Simulations: Version=93
  Memo TitlePage
    # The APSIM Teff Model

    The APSIM Teff model has been developed using the Plant Modelling Framework (PMF) of ([brown_plant_2014]). This new framework provides a library of plant organ and process submodels that can be coupled, at runtime, to construct a model in much the same way that models can be coupled to construct a simulation. This means that dynamic composition of lower level process and organ classes (e.g. photosynthesis, leaf) into larger constructions (e.g. maize, wheat, sorghum) can be achieved by the model developer without additional coding.

    The model consists of:

    * a phenology model to simulate development between growth phases
    * a collection of organs to simulate the various plant parts
    * an arbitrator to allocate resources (N, biomass) to the various plant organs
  Replacements
    Plant Teff: CropType=Teff; IsAlive=false; IsEnding=false; DaysAfterEnding=0
      Memo TitlePage
        # The APSIM Teff Model

        The APSIM Teff model has been developed using the Plant Modelling Framework (PMF)[brown_plant_2014]. This new framework provides a library of plant organ and process submodels that can be coupled, at runtime, to construct a model in much the same way that models can be coupled to construct a simulation. This means that dynamic composition of lower level process and organ classes (e.g. photosynthesis, leaf) into larger constructions (e.g. Teff, wheat, sorghum) can be achieved by the model developer without additional coding.

        The APSIM Teff model includes components to simulate the following plant parts and processes:

        * Phenological development
        * Leaf and canopy development
        * Stem Growth
        * Panicle Growth
        * Grain Growth
        * Root Growth
      OrganArbitrator Arbitrator
        BiomassTypeArbitrator DMArbitration
          Folder PotentialPartitioningMethods
            ReallocationMethod
            AllocateFixationMethod
            RetranslocationMethod
            SendPotentialDMAllocationsMethod
          Folder AllocationMethods
            NutrientConstrainedAllocationMethod
            DryMatterAllocationsMethod
          RelativeAllocation ArbitrationMethod
        BiomassTypeArbitrator NArbitration
          Folder PotentialPartitioningMethods
            ReallocationMethod
          Folder ActualPartitioningMethods
            AllocateFixationMethod
            RetranslocationMethod
          Folder AllocationMethods
            NitrogenAllocationsMethod
          PrioritythenRelativeAllocation ArbitrationMethod
          AllocateUptakesMethod
        WaterUptakeMethod
        NitrogenUptakeMethod
      Phenology
        Memo
          The phenology model used in the APSIM Teff model follows the approach used in earlier cereal models [Carberry1989CERESMaize;vanOosterom200167;Wang2002GenericCropModel].  The model predicts development of primordia on the apex of the main stem and appearance of individual leaves to predict time to flag leaf.  Other stages use thermal time targets.  After emergence and an initial juvenile phase, photoperiod effects the timing of floral initiation.
        AirTemperatureFunction ThermalTime
          Memo
            Little information is available on the impact of air temperature on the rate of development of Teff as is the case for other crops.  Therefore, cardinal temperatures (ie base temperature, optimum temperature, maximum temperature) have been taken from previous work on modelling development in millet [vanOosterom200167].
          XYPairs: X=[10, 33, 47]; Y=[0, 23, 0]
        Constant MinimumLeafNumber: FixedValue=6
        Constant PpSensitivity: FixedValue=3
        GerminatingPhase Germinating: Start=Sowing; End=Germination
        EmergingPhase Emerging: ShootLag=30; ShootRate=0; Start=Germination; End=Emergence; TTForTimeStep=0
          VariableReference ThermalTime: VariableName=[Phenology].ThermalTime
        GenericPhase Juvenile: Start=Emergence; End=EndJuvenile
          Memo
            Data from [vanDelden2012] showed that panicle initiation occurred at leaf number 4 or 5 for 4 varieties grown under short day lengths.  This suggests that the duration of the juvenile phase should be approximately 4-5 phyllochrons, depending on the cultivar.  The default is assumed to be 4, but this can be changed as required for other cultivars.<br/>
          Constant Target: FixedValue=100; Units=oC.d
          VariableReference Progression: VariableName=[Phenology].ThermalTime
        GenericPhase Photosensitive: Start=EndJuvenile; End=FloralInitiation
          Memo
            Data from [vanDelden2012] showed that final leaf number for a selection of teff cultivars increased with increasing photoperiod.  A photoperiod response has been fitted to these data.  Cultivar Gibe showed an increase in final leaf number from 4 to 7 leaves as photoperiod increased from 10.3h to 13.5h.  Cultivar Ziquala showed an increase in final leaf number from 4 to 9 leaves as photoperiod increased from 11.5 h to 13.5h.  The photoperiod response for Dutch cultivars extended to much longer day lengths.  Cultivar Ayana showed an increase in final leaf number from 4 to 5 leaves as photoperiod increased from 10 h to 15 h. Cultivar 04T19  showed an increase in final leaf number from 4 to 7 leaves as photoperiod increased from 9.5 h to 17 h.<br/>
          VariableReference Progression: VariableName=[Phenology].ThermalTime
          LinearInterpolationFunction Target
            XYPairs: X=[0, 10.3, 13.5, 16]; Y=[0, 0, 150, 150]
            VariableReference XValue: VariableName=[Phenology].Photoperiod
        SimpleLeafAppearancePhase LeafAppearance: Start=FloralInitiation; End=FlagLeaf
          VariableReference TargetLeafNumber: VariableName=[Leaf].FinalLeafNumber
          VariableReference CurrentLeafNumber: VariableName=[Leaf].NodeNumber
        GenericPhase FlagLeafToFlowering: Start=FlagLeaf; End=Flowering
          Memo
            [vanDelden2012] explain that many teff varieties are self-polinating with flowering co-incident with heading.  We assume that heading occurs one phyllochron after flag leaf.<br/>
          Constant Target: FixedValue=100; Units=oC.d
          VariableReference Progression: VariableName=[Phenology].ThermalTime
        GenericPhase FloweringToGrainFilling: Start=Flowering; End=StartGrainFill
          Memo
            Unknown?????????????????????????????????????<br/>
          Constant Target: FixedValue=120; Units=oC.d
          VariableReference Progression: VariableName=[Phenology].ThermalTime
        GenericPhase GrainFilling: Start=StartGrainFill; End=EndGrainFill
          Memo
            Unknown?????????????????????????????????????<br/>
          Constant Target: FixedValue=550; Units=oC.d
          VariableReference Progression: VariableName=[Phenology].ThermalTime
        GenericPhase Maturing: Start=EndGrainFill; End=Maturity
          Memo
            Unknown?????????????????????????????????????<br/>
          Constant Target: FixedValue=10; Units=oC.d
          VariableReference Progression: VariableName=[Phenology].ThermalTime
        GenericPhase MaturityToHarvestRipe: Start=Maturity; End=HarvestRipe
          Memo
            Unknown?????????????????????????????????????<br/>
          Constant Target: FixedValue=10; Units=oC.d
          VariableReference Progression: VariableName=[Phenology].ThermalTime
        EndPhase ReadyForHarvesting: Start=HarvestRipe; End=Unused
          VariableReference ThermalTime: VariableName=[Phenology].ThermalTime
        PhotoperiodFunction Photoperiod: Twilight=-6; DayLength=0
        OnEventFunction FloweringDAS: SetEvent=Flowering; ReSetEvent=never
          Memo
            A function is used to provide flowering date as days after sowing(DAS).
            <br/>
          Constant PreEventValue: FixedValue=0
          VariableReference PostEventValue: VariableName=[Phenology].DaysAfterSowing
        OnEventFunction MaturityDAS: SetEvent=Maturity; ReSetEvent=never
          Memo
            A function is used to provide maturity date as days after sowing(DAS).
            <br/>
          Constant PreEventValue: FixedValue=0
          VariableReference PostEventValue: VariableName=[Phenology].DaysAfterSowing
        OnEventFunction PanicleInitiationDAS: SetEvent=FloralInitiation; ReSetEvent=never
          Memo
            A function is used to provide flowering date as days after sowing(DAS).
            <br/>
          Constant PreEventValue: FixedValue=0
          VariableReference PostEventValue: VariableName=[Phenology].DaysAfterSowing
      ReproductiveOrgan Grain: GrowthRespiration=0; MaintenanceRespiration=0
        Biomass Live: DMDOfStructural=0.6
        Biomass Dead: DMDOfStructural=0.6
        Constant PotentialHarvestIndex: FixedValue=0.4
        VariableReference FillingDuration: VariableName=[Phenology].GrainFilling.Target
        PhaseLookup DMDemandFunction
          PhaseLookupValue GrainFilling: Start=StartGrainFill; End=EndGrainFill
            MultiplyFunction HIGrainDemand
              VariableReference AboveGroundWt: VariableName=[AboveGround].Wt
              DivideFunction HarvestIndexIncrease
                VariableReference PotentialHarvestIndex: VariableName=[Grain].PotentialHarvestIndex
                VariableReference FillingDuration: VariableName=[Grain].FillingDuration
              VariableReference ThermalTime: VariableName=[Phenology].ThermalTime
        Constant MinimumNConc: FixedValue=0.008
        Constant MaximumNConc: FixedValue=0.013
        Constant WaterContent: FixedValue=0.12
        MultiplyFunction NFillingRate
          VariableReference NConc: VariableName=[Grain].MaximumNConc
          VariableReference DMDemand: VariableName=[Grain].DMDemandFunction
          VariableReference DMConversionEfficiency: VariableName=[Grain].DMConversionEfficiency
        BiomassRemoval BiomassRemovalDefaults
          OrganBiomassRemovalType Harvest: FractionLiveToRemove=1; FractionDeadToRemove=1; FractionLiveToResidue=0; FractionDeadToResidue=0
          OrganBiomassRemovalType Cut: FractionLiveToRemove=0; FractionDeadToRemove=0; FractionLiveToResidue=1; FractionDeadToResidue=1
          OrganBiomassRemovalType Prune: FractionLiveToRemove=0; FractionDeadToRemove=0; FractionLiveToResidue=0; FractionDeadToResidue=0
          OrganBiomassRemovalType Graze: FractionLiveToRemove=0; FractionDeadToRemove=0; FractionLiveToResidue=0; FractionDeadToResidue=0
        Constant DMConversionEfficiency: FixedValue=1
        Constant RemobilisationCost: FixedValue=0
        Constant CarbonConcentration: FixedValue=0.4
        DivideFunction HarvestIndex
          VariableReference GrainWt: VariableName=[Grain].Wt
          VariableReference AboveGroundWt: VariableName=[AboveGround].Wt
        Constant MaximumPotentialGrainSize: FixedValue=0
          Memo
            This parameter is not used.  Grain growth is calculated from harvest index increase.
        Constant NumberFunction: FixedValue=0
          Memo
            Grain number is not estimated by this model.
      Root: GrowthRespiration=0; MaintenanceRespiration=0; RootAngle=45
        LinearInterpolationFunction KLModifier
          Memo
            The parameter KL is is described by Meinke et al (1993) to combine elements of soil conductivity (K) with root length (L) in determining root water uptake.  Peake et al (2013) demonstrated that in maize KL varied with plant population through impacts on root length density.  Here we adjust KL linearly with plant population.
            <br/>
          XYPairs: X=[0, 10]; Y=[1, 1]
          VariableReference XValue: VariableName=[Teff].Population
        Constant SoilWaterEffect: FixedValue=1
          Memo
            No effect of soil water content on root growth is currently captured in the model.<br/>
        Constant TemperatureEffect: FixedValue=1
          Memo
            No effect of temperature on root growth is currently captured in the model.<br/>
        Constant MaxDailyNUptake: FixedValue=20
          Memo
            Maximum daily N uptake is set to an arbitrarily high value.<br/>
        Constant SenescenceRate: FixedValue=0.005
          Memo
            Jones and Kiniry (1986) used a constant root senescence fraction in the CERES-maize model.<br/>
        Constant MaximumNConc: FixedValue=0.01; Units=g/g
        Constant MinimumNConc: FixedValue=0.01; Units=g/g
        Constant MaximumRootDepth: FixedValue=1000000
        PhaseLookup RootFrontVelocity
          Memo
            Hammer et al (2009) used a constant extraction front velocity of 2.5cm per day in their analysis of historical maize yield trends in the US corn belt.
            <br/>
          PhaseLookupValue PreFlowering: Start=Germination; End=Flowering
            Constant Function: FixedValue=25
          PhaseLookupValue PostFlowering: Start=Flowering; End=Maturity
            Constant Function: FixedValue=0
        PhaseBasedSwitch NitrogenDemandSwitch: Start=Germination; End=Maturity
        BiomassRemoval BiomassRemovalDefaults
          OrganBiomassRemovalType Harvest: FractionLiveToRemove=0; FractionDeadToRemove=0; FractionLiveToResidue=0.2; FractionDeadToResidue=0
          OrganBiomassRemovalType Cut: FractionLiveToRemove=0; FractionDeadToRemove=0; FractionLiveToResidue=0.3; FractionDeadToResidue=0
          OrganBiomassRemovalType Prune: FractionLiveToRemove=0; FractionDeadToRemove=0; FractionLiveToResidue=0.1; FractionDeadToResidue=0
          OrganBiomassRemovalType Graze: FractionLiveToRemove=0; FractionDeadToRemove=0; FractionLiveToResidue=0.15; FractionDeadToResidue=0
        LinearInterpolationFunction KNO3
          XYPairs: X=[0, 0.003]; Y=[0.03, 0.03]
          VariableReference XValue: VariableName=[Root].LengthDensity
        LinearInterpolationFunction KNH4
          XYPairs: X=[0, 0.003]; Y=[0.01, 0.01]
          VariableReference XValue: VariableName=[Root].LengthDensity
        LinearInterpolationFunction NUptakeSWFactor
          XYPairs: X=[0, 1]; Y=[0, 1]
          VariableReference XValue: VariableName=[Root].RWC
        Constant InitialDM: FixedValue=0.2; Units=g/plant
        Constant SpecificRootLength: FixedValue=40; Units=m/g
        Constant DMConversionEfficiency: FixedValue=1
        Constant MaintenanceRespirationFunction: FixedValue=1
        Constant RemobilisationCost: FixedValue=0
        Constant CarbonConcentration: FixedValue=0.4
        BiomassDemand DMDemands
          MultiplyFunction Structural
            PartitionFractionDemandFunction DMDemandFunction
              LinearInterpolationFunction PartitionFraction
                XYPairs: X=[0, 2.99, 3, 6, 7]; Y=[0, 0, 0.2, 0.2, 0]
                VariableReference XValue: VariableName=[Phenology].Stage
            Constant StructuralFraction: FixedValue=1
          Constant Metabolic: FixedValue=0
          StorageDMDemandFunction Storage
            SubtractFunction StorageFraction
              Constant One: FixedValue=1
              VariableReference StructuralFraction: VariableName=[Root].DMDemands.Structural.StructuralFraction
        BiomassDemand NDemands
          MultiplyFunction Structural
            VariableReference MinNconc: VariableName=[Root].minimumNconc
            VariableReference PotentialDMAllocation: VariableName=[Root].potentialDMAllocation.Structural
          MultiplyFunction Metabolic
            SubtractFunction MetabolicNconc
              VariableReference CritNconc: VariableName=[Root].criticalNConc
              VariableReference MinNconc: VariableName=[Root].minimumNconc
            VariableReference PotentialDMAllocation: VariableName=[Root].potentialDMAllocation.Structural
          StorageNDemandFunction Storage
            VariableReference NitrogenDemandSwitch: VariableName=[Root].nitrogenDemandSwitch
            VariableReference MaxNconc: VariableName=[Root].maximumNconc
        VariableReference CriticalNConc: VariableName=[Root].MinimumNConc
      SimpleLeaf Leaf: Albedo=0.25; Gsmax350=0.015; R50=150; LeafInitialisationStage=Emergence; Height=0; BaseHeight=0; Width=0; FRGR=0; PotentialEP=0; WaterDemand=0; KDead=0.2; LAIDead=0
        Memo Description
          Stover represents any part of the crop that is not removed at harvest (i.e not part of the product).
        RUEModel Photosynthesis
          Constant RUE: FixedValue=1.5
          WeightedTemperatureFunction FT: MaximumTemperatureWeighting=0.75
            XYPairs: X=[0, 8, 20, 35, 50]; Y=[0, 0, 1, 1, 0]
          LinearInterpolationFunction FVPD
            XYPairs: X=[0, 10, 50]; Y=[1, 1, 1]
            VariableReference XValue: VariableName=[Leaf].Photosynthesis.VPD
          LinearInterpolationFunction FN
            XYPairs: X=[0, 1]; Y=[0.3, 1]
            VariableReference XValue: VariableName=[Leaf].Fn
          LinearInterpolationFunction FW
            XYPairs: X=[0, 0.3]; Y=[0, 1]
            VariableReference XValue: VariableName=[Leaf].Fw
          RUECO2Function FCO2: PhotosyntheticPathway=C4
          VariableReference RadnInt: VariableName=[Leaf].RadIntTot
        ExpressionFunction CO2internal: Expression=(163 - [IWeather].MeanT)/(5 - 0.1*[IWeather].MeanT)
        DivideFunction StomatalConductanceCO2Modifier
          VariableReference FCO2: VariableName=[Leaf].Photosynthesis.FCO2
          ExpressionFunction RelativeCO2Gradient
            Expression=([IWeather].CO2 - [Leaf].CO2internal)/(350 - [Leaf].CO2internal)
        MultiplyFunction Area
          VariableReference SLA: VariableName=[Leaf].SpecificArea
          VariableReference LeafLiveWt: VariableName=[Leaf].Live.Wt
        MinimumFunction FRGR
          VariableReference RUE_FT: VariableName=[Leaf].Photosynthesis.FT
          MinimumFunction Others
            VariableReference RUE_FN: VariableName=[Leaf].Photosynthesis.FN
            VariableReference RUE_FVPD: VariableName=[Leaf].Photosynthesis.FVPD
        Constant ExtinctionCoefficient: FixedValue=0.65
        LinearInterpolationFunction Tallness
          XYPairs: X=[1, 2, 3, 4, 5, 6, 9]; Y=[0, 0, 50, 400, 700, 900, 1000]
          VariableReference XValue: VariableName=[Phenology].Stage
        AccumulateFunction NodeNumber: StartStageName=Emergence; EndStageName=FlagLeaf; FractionRemovedOnCut=1; FractionRemovedOnHarvest=1; FractionRemovedOnGraze=1; FractionRemovedOnPrune=0
          DivideFunction DeltaNode
            VariableReference ThermalTime: VariableName=[Phenology].ThermalTime
            VariableReference Phyllochron: VariableName=[Leaf].Phyllochron
        Constant NReallocationFactor: FixedValue=1
          Memo
            This model assumes that all metabolic and storage N is available for reallocation from senescing leaves.
        MaximumFunction SenescenceRate
          PhaseLookup AgeSenescenceRate
            PhaseLookupValue Vegetative: Start=Emergence; End=StartGrainFill
              Constant Rate: FixedValue=0
            PhaseLookupValue Reproductive: Start=StartGrainFill; End=Maturity
              Memo
                Leaf senescence rate is calculated to ensure that all leaves are senesced by crop maturity.
              MinimumFunction Rate
                DivideFunction PotentialRate
                  VariableReference TT: VariableName=[Phenology].ThermalTime
                  SubtractFunction TTRemaining
                    ExpressionFunction TTRequired
                      Expression=[Phenology].FloweringToGrainFilling.Target + [Phenology].GrainFilling.Target + [Phenology].Maturing.Target
                    ExpressionFunction TTComplete
                      Expression=[Phenology].FloweringToGrainFilling.ProgressThroughPhase + [Phenology].GrainFilling.ProgressThroughPhase + [Phenology].Maturing.ProgressThroughPhase
                Constant One: FixedValue=1
          LinearInterpolationFunction WaterSenescenceRate
            XYPairs: X=[0.5, 1]; Y=[0.1, 0]
            VariableReference XValue: VariableName=[Leaf].Fw
        Constant DetachmentRate: FixedValue=0; Units=/d
        Constant InitialWt: FixedValue=1
        MultiplyFunction LAIDead
          VariableReference SLA: VariableName=[Leaf].SpecificArea
          VariableReference LeafDeadWt: VariableName=[Leaf].Dead.Wt
        Constant MaximumNConc: FixedValue=0.063
        Constant CriticalNConc: FixedValue=0.05
        Constant MinimumNConc: FixedValue=0.01
        Constant MaintenanceRespiration: FixedValue=0; Units=0-1
        Constant DMConversionEfficiency: FixedValue=1; Units=0-1
        BiomassRemoval BiomassRemovalDefaults
          OrganBiomassRemovalType Harvest: FractionLiveToRemove=0; FractionDeadToRemove=0; FractionLiveToResidue=1; FractionDeadToResidue=1
          OrganBiomassRemovalType Cut: FractionLiveToRemove=0; FractionDeadToRemove=0; FractionLiveToResidue=1; FractionDeadToResidue=1
          OrganBiomassRemovalType Prune: FractionLiveToRemove=0; FractionDeadToRemove=0; FractionLiveToResidue=0; FractionDeadToResidue=0
          OrganBiomassRemovalType Graze: FractionLiveToRemove=0; FractionDeadToRemove=0; FractionLiveToResidue=0; FractionDeadToResidue=0
        Constant NRetranslocationFactor: FixedValue=0.5
        Constant DMReallocationFactor: FixedValue=0
        Constant DMRetranslocationFactor: FixedValue=0.5
        Constant RemobilisationCost: FixedValue=0
        Constant CarbonConcentration: FixedValue=0.4
        BiomassDemand DMDemands
          DivideFunction Structural
            VariableReference DeltaLAI: VariableName=[Leaf].DeltaLAI
            VariableReference SLA: VariableName=[Leaf].SpecificArea
            Memo
              Growth in leaf area is used to calculate the leaf dry matter demand.  Note that leaf biomass is assumed to consist of entirely structural dry matter.
          Constant Storage: FixedValue=0
          Constant Metabolic: FixedValue=0
        BiomassDemand NDemands
          MultiplyFunction Structural
            VariableReference MinNconc: VariableName=[Leaf].minimumNconc
            VariableReference PotentialDMAllocation: VariableName=[Leaf].potentialDMAllocation.Structural
          MultiplyFunction Metabolic
            SubtractFunction MetabolicNconc
              VariableReference CritNconc: VariableName=[Leaf].criticalNConc
              VariableReference MinNconc: VariableName=[Leaf].minimumNconc
            VariableReference PotentialDMAllocation: VariableName=[Leaf].potentialDMAllocation.Structural
          StorageNDemandFunction Storage
            Constant NitrogenDemandSwitch: FixedValue=1
            VariableReference MaxNconc: VariableName=[Leaf].maximumNconc
        LinearInterpolationFunction FrostFraction
          XYPairs: X=[-4, 4]; Y=[1, 0]
          VariableReference XValue: VariableName=[Weather].MinT
        LinearInterpolationFunction SpecificArea
          XYPairs: X=[0.1, 6]; Y=[0.021, 0.021]
          VariableReference XValue: VariableName=[Leaf].LAI
        PhaseLookup DeltaLAI
          PhaseLookupValue Vegetative: Start=Emergence; End=FlagLeaf
            MultiplyFunction Delta
              VariableReference AreaLargestLeaf: VariableName=[Leaf].AreaLargestLeaf
              LinearInterpolationFunction RelativeSize
                XYPairs: X=[3, 6]; Y=[0.1, 1]
                VariableReference XValue: VariableName=[Phenology].Stage
              VariableReference PlantNumber: VariableName=[Teff].SowingData.Population
              LinearInterpolationFunction Branches
                XYPairs: X=[0, 3, 5, 6, 7]; Y=[1, 2, 3, 5, 8]
                VariableReference XValue: VariableName=[Leaf].NodeNumber
              DivideFunction LAR
                VariableReference TT: VariableName=[Phenology].ThermalTime
                VariableReference Phyllochron: VariableName=[Leaf].Phyllochron
              VariableReference NSress: VariableName=[Leaf].Photosynthesis.FN
          PhaseLookupValue Reproductive: Start=FlagLeaf; End=Maturity
            Constant: FixedValue=0
        Constant AreaLargestLeaf: FixedValue=0.0015
        PhaseLookup Phyllochron
          PhaseLookupValue Phyllochron: Start=Emergence; End=FlagLeaf
            LinearInterpolationFunction Phyllochron
              XYPairs: X=[1, 4, 5, 9]; Y=[25, 25, 50, 150]
              VariableReference XValue: VariableName=[Leaf].NodeNumber
        HoldFunction FinalLeafNumber: WhenToHold=FloralInitiation
          AddFunction FLN
            VariableReference MinLeafNumber: VariableName=[Phenology].MinimumLeafNumber
            MultiplyFunction PhotoPLeaves
              VariableReference ShortPpLeaves: VariableName=[Phenology].PpSensitivity
              LinearInterpolationFunction PhotoPeriodReductionFactor
                XYPairs: X=[10.5, 14]; Y=[0, 1]
                VariableReference XValue: VariableName=[Phenology].Photoperiod
      GenericOrgan Panicle: IsAboveGround=true
        Constant NReallocationFactor: FixedValue=0
        Constant NRetranslocationFactor: FixedValue=0.1
        Constant MaximumNConc: FixedValue=0.01
        Constant SenescenceRate: FixedValue=0; Units=/d
        Constant MinimumNConc: FixedValue=0.01
        MultiplyFunction HeadNumber
          Constant FertileTillers: FixedValue=1
          VariableReference StemPopulation: VariableName=[Structure].TotalStemPopn
        BiomassRemoval BiomassRemovalDefaults
          OrganBiomassRemovalType Harvest: FractionLiveToRemove=0.5; FractionDeadToRemove=0; FractionLiveToResidue=0.1; FractionDeadToResidue=0
          OrganBiomassRemovalType Cut: FractionLiveToRemove=0.8; FractionDeadToRemove=0; FractionLiveToResidue=0; FractionDeadToResidue=0
          OrganBiomassRemovalType Prune: FractionLiveToRemove=0; FractionDeadToRemove=0; FractionLiveToResidue=0.6; FractionDeadToResidue=0
          OrganBiomassRemovalType Graze: FractionLiveToRemove=0.6; FractionDeadToRemove=0; FractionLiveToResidue=0.2; FractionDeadToResidue=0
        Constant InitialWtFunction: FixedValue=0; Units=g/m^2
        Constant DetachmentRateFunction: FixedValue=0; Units=/d
        Constant MaintenanceRespirationFunction: FixedValue=0; Units=0-1
        Constant DMConversionEfficiency: FixedValue=1; Units=0-1
        Constant NitrogenDemandSwitch: FixedValue=1
        Constant DMReallocationFactor: FixedValue=0
        Constant DMRetranslocationFactor: FixedValue=0
        VariableReference CriticalNConc: VariableName=[Panicle].MinimumNConc
        Constant RemobilisationCost: FixedValue=0
        Constant CarbonConcentration: FixedValue=0.4
        BiomassDemand DMDemands
          MultiplyFunction Structural
            PartitionFractionDemandFunction DMDemandFunction
              PhaseLookup PartitionFraction
                PhaseLookupValue PreFlagLeaf: Start=Emergence; End=FlagLeaf
                  Constant StemFraction: FixedValue=0
                PhaseLookupValue StemElongation: Start=FlagLeaf; End=StartGrainFill
                  Constant PanicleFraction: FixedValue=0.6
            Constant StructuralFraction: FixedValue=1; Units=g/g
          Constant Metabolic: FixedValue=0
          StorageDMDemandFunction Storage
            SubtractFunction StorageFraction
              Constant One: FixedValue=1
              VariableReference StructuralFraction: VariableName=[Panicle].DMDemands.Structural.StructuralFraction
        BiomassDemand NDemands
          MultiplyFunction Structural
            VariableReference MinNconc: VariableName=[Panicle].minimumNconc
            VariableReference PotentialDMAllocation: VariableName=[Panicle].potentialDMAllocation.Structural
          MultiplyFunction Metabolic
            SubtractFunction MetabolicNconc
              VariableReference CritNconc: VariableName=[Panicle].criticalNConc
              VariableReference MinNconc: VariableName=[Panicle].minimumNconc
            VariableReference PotentialDMAllocation: VariableName=[Panicle].potentialDMAllocation.Structural
          StorageNDemandFunction Storage
            VariableReference NitrogenDemandSwitch: VariableName=[Panicle].nitrogenDemandSwitch
            VariableReference MaxNconc: VariableName=[Panicle].maximumNconc
        RetranslocateNonStructural RetranslocateNitrogen
      GenericOrgan Stem: IsAboveGround=true
        Constant SenescenceRate: FixedValue=0; Units=/d
        LinearInterpolationFunction MaximumNConc
          XYPairs: X=[3, 5.3]; Y=[0.06, 0.025]
          VariableReference XValue: VariableName=[Phenology].Stage
        Constant MinimumNConc: FixedValue=0.006
        PhaseBasedSwitch NitrogenDemandSwitch: Start=Emergence; End=StartGrainFill
        Constant NReallocationFactor: FixedValue=0
        Constant NRetranslocationFactor: FixedValue=0.5
        PhaseLookup DMRetranslocationFactor
          PhaseLookupValue VegetativeGrowth: Start=Emergence; End=StartGrainFill
            Constant DMRetranslocationFactor: FixedValue=0
          PhaseLookupValue ReproductiveGrowth: Start=StartGrainFill; End=EndGrainFill
            Constant DMRetranslocationFactor: FixedValue=0.5
        MinimumFunction DMDemandFunctionOLD
          MultiplyFunction PotentialDMAccumulation
            VariableReference NodesAppearing: VariableName=[Structure].DeltaTipNumber
            VariableReference Branches: VariableName=[Structure].TotalStemPopn
            LinearInterpolationFunction PotentialInternodeWt
              XYPairs: X=[0, 0.5, 1]; Y=[0, 0.2, 16]
              VariableReference XValue: VariableName=[Structure].RelativeNodeApperance
          MultiplyFunction HightLimitedDMAccumulation
            Constant SpecificStemLengthMax: FixedValue=500
            VariableReference Branches: VariableName=[Structure].TotalStemPopn
            VariableReference DeltaHeight: VariableName=[Structure].HeightModel.DeltaHeight
        BiomassRemoval BiomassRemovalDefaults: same as Replacements.Teff.Panicle.BiomassRemovalDefaults
        Constant InitialWtFunction: FixedValue=0; Units=g/m^2
        Constant DetachmentRateFunction: FixedValue=0; Units=/d
        Constant MaintenanceRespirationFunction: FixedValue=0; Units=0-1
        Constant DMConversionEfficiency: FixedValue=1; Units=0-1
        Constant DMReallocationFactor: FixedValue=0
        VariableReference CriticalNConc: VariableName=[Stem].MinimumNConc
        Constant RemobilisationCost: FixedValue=0
        Constant CarbonConcentration: FixedValue=0.4
        BiomassDemand DMDemands
          MultiplyFunction Structural
            PartitionFractionDemandFunction DMDemandFunction
              PhaseLookup PartitionFraction
                PhaseLookupValue PreStemElongation: Start=Emergence; End=FloralInitiation
                  Constant StemFraction: FixedValue=0.3
                PhaseLookupValue StemElongation: Start=FloralInitiation; End=FlagLeaf
                  Constant StemFraction: FixedValue=0.6
            PhaseLookup StructuralFraction
              PhaseLookupValue VegetativeGrowth: Start=Sowing; End=FlagLeaf
                Constant Fraction: FixedValue=0.7
              PhaseLookupValue ReproductiveGrowth: Start=FlagLeaf; End=HarvestRipe
                Constant Fraction: FixedValue=0.01
          Constant Metabolic: FixedValue=0
          StorageDMDemandFunction Storage
            SubtractFunction StorageFraction
              Constant One: FixedValue=1
              VariableReference StructuralFraction: VariableName=[Stem].DMDemands.Structural.StructuralFraction
        BiomassDemand NDemands
          MultiplyFunction Structural
            VariableReference MinNconc: VariableName=[Stem].minimumNconc
            VariableReference PotentialDMAllocation: VariableName=[Stem].potentialDMAllocation.Structural
          MultiplyFunction Metabolic
            SubtractFunction MetabolicNconc
              VariableReference CritNconc: VariableName=[Stem].criticalNConc
              VariableReference MinNconc: VariableName=[Stem].minimumNconc
            VariableReference PotentialDMAllocation: VariableName=[Stem].potentialDMAllocation.Structural
          StorageNDemandFunction Storage
            VariableReference NitrogenDemandSwitch: VariableName=[Stem].nitrogenDemandSwitch
            VariableReference MaxNconc: VariableName=[Stem].maximumNconc
        RetranslocateNonStructural RetranslocateNitrogen
      Cultivar Gibe
        Command:
          [Phenology].Juvenile.Target.FixedValue = 65
          [Phenology].MinimumLeafNumber.FixedValue = 7
          [Phenology].PpSensitivity.FixedValue = 4
          [Phenology].FlagLeafToFlowering.Target.FixedValue = 10
          [Phenology].FloweringToGrainFilling.Target.FixedValue = 100
          [Phenology].GrainFilling.Target.FixedValue = 400
        Memo
          The variety Katumani Composite B was formed in 1966 and released in 1968 as part of the maize breeding work undertaken at the Katumani Research Station in Kenya which started in 1956.  Katumani Composite B was an advanced generation of Katumani Synthetic V X Katumani Synthetic VI.  It has slight photoperiod sensitivity and relatively small potential cob size.<br/>
      Cultivar Ziquala
        Command:
          [Phenology].Juvenile.Target.FixedValue = 120
          [Phenology].MinimumLeafNumber.FixedValue = 8
          [Phenology].PpSensitivity.FixedValue = 3
          [Phenology].FlagLeafToFlowering.Target.FixedValue = 10
          [Phenology].FloweringToGrainFilling.Target.FixedValue = 50
          [Phenology].GrainFilling.Target.FixedValue = 200
        Memo: same as Replacements.Teff.Gibe.memo
      Cultivar Ayana
        Command:
          [Phenology].Juvenile.Target.FixedValue = 40
          [Phenology].MinimumLeafNumber.FixedValue = 7
          [Phenology].PpSensitivity.FixedValue = 1
          [Phenology].FlagLeafToFlowering.Target.FixedValue = 10
          [Phenology].FloweringToGrainFilling.Target.FixedValue = 50
          [Phenology].GrainFilling.Target.FixedValue = 200
        Memo: same as Replacements.Teff.Gibe.memo
      Cultivar 04T19
        Command:
          [Phenology].Juvenile.Target.FixedValue = 120
          [Phenology].MinimumLeafNumber.FixedValue = 8
          [Phenology].PpSensitivity.FixedValue = 2
          [Phenology].FlagLeafToFlowering.Target.FixedValue = 10
          [Phenology].FloweringToGrainFilling.Target.FixedValue = 100
          [Phenology].GrainFilling.Target.FixedValue = 400
        Memo: same as Replacements.Teff.Gibe.memo
      Cultivar Wajera
        Command:
          [Phenology].Juvenile.Target.FixedValue = 40
          [Phenology].MinimumLeafNumber.FixedValue = 7
          [Phenology].PpSensitivity.FixedValue = 1
          [Phenology].FlagLeafToFlowering.Target.FixedValue = 10
          [Phenology].FloweringToGrainFilling.Target.FixedValue = 50
          [Phenology].GrainFilling.Target.FixedValue = 200
        Memo
          A local variety used in a study by Abebe Getu (2012) which seems to mature quickly and achieve a high harvest index (e.g. 0.4).
      Cultivar DZ974: same as Replacements.Teff.Wajera
      Cultivar Kuncho
        Command:
          [Phenology].Juvenile.Target.FixedValue = 65
          [Phenology].MinimumLeafNumber.FixedValue = 8
          [Phenology].PpSensitivity.FixedValue = 3
          [Phenology].FlagLeafToFlowering.Target.FixedValue = 10
          [Phenology].FloweringToGrainFilling.Target.FixedValue = 100
          [Phenology].GrainFilling.Target.FixedValue = 400
        Memo: same as Replacements.Teff.Gibe.memo
      CompositeBiomass AboveGround: DMDOfStructural=0.6
        Propertys=[[Leaf].Live, [Leaf].Dead, [Stem].Live, [Stem].Dead, [Grain].Live, [Grain].Dead, [Panicle].Live, [Panicle].Dead]
    Report HarvestReport: EventNames=[Teff].Harvesting
      VariableNames:
        [Clock].Today
        [Teff].Phenology.CurrentStageName
        [Teff].AboveGround.Wt
        [Teff].AboveGround.N
        [Teff].Grain.Size as GrainSize
        [Teff].Grain.Wt
        [Teff].Grain.N
        [Teff].Leaf.FinalLeafNumber
        [Teff].Phenology.PanicleInitiationDAS as PanicleInitiationDAS
        [Teff].Phenology.FloweringDAS as FloweringDAS
        [Teff].Phenology.MaturityDAS  as MaturityDAS
    Report: EventNames=[Clock].DoReport
      VariableNames:
        [Clock].Today
        [Teff].Phenology.CurrentStageName
        [Teff].Phenology.DaysAfterSowing
        [Soil].SoilWater.SW
        [Soil].SoilWater.Eo
        [Soil].SoilWater.Es
        [Soil].SoilWater.Drainage
        [Soil].SoilWater.Runoff
        [Soil].SoilWater.pond
        sum([Soil].SoilWater.SWmm[1:3]) as SW30cm
        sum([Soil].SoilWater.SWmm) as ProfileWater
        sum([Soil].Nutrient.NO3.kgha) as ProfileNO3
        [Soil].Nutrient.NO3.kgha
        [Teff].Leaf.LAI
        [Teff].Leaf.Wt
        [Teff].Leaf.Transpiration
        [Teff].Leaf.CoverGreen
        [Teff].Leaf.Fn
        [Teff].Leaf.Fw
        [Teff].AboveGround.Wt
        [Teff].AboveGround.N
        [Teff].Leaf.N
        [Teff].Stem.N
        [Teff].Grain.N
        [Teff].Grain.Wt
        ([Teff].Leaf.Transpiration+[Soil].SoilWater.Es) as ET
        [Teff].Leaf.NodeNumber
        [Teff].Stem.Wt
        [Teff].Panicle.Wt
        [Teff].Root.Wt
        ([Teff].Leaf.Transpiration+[Soil].SoilWater.Es) as ET
        [Teff].Leaf.NodeNumber
        [Teff].Leaf.FinalLeafNumber
    Report ControlledEnvironmentReport: EventNames=[Teff].Harvesting
      VariableNames:
        [Clock].Today
        [ControlledEnvironment].DayLength
        [Teff].Phenology.CurrentStageName
        [Teff].AboveGround.Wt
        [Teff].Grain.Size as GrainSize
        [Teff].Grain.Wt
        [Teff].Leaf.FinalLeafNumber
        [Teff].Phenology.PanicleInitiationDAS as PanicleInitiationDAS
        [Teff].Phenology.FloweringDAS as FloweringDAS
        [Teff].Phenology.MaturityDAS  as MaturityDAS
    Plant Wheat: CropType=Wheat; IsAlive=false; IsEnding=false; DaysAfterEnding=0
      Memo TitlePage
        # The APSIM Wheat Model

        _Brown, H.E., Huth, N.I. and Holzworth, D.P._

        The APSIM wheat model has been developed using the Plant Modelling Framework (PMF) of [brown_plant_2014]. This new framework provides a library of plant organ and process submodels that can be coupled, at runtime, to construct a model in much the same way that models can be coupled to construct a simulation. This means that dynamic composition of lower level process and organ classes (e.g. photosynthesis, leaf) into larger constructions (e.g. maize, wheat, sorghum) can be achieved by the model developer without additional coding.

        The model consists of:

        * a phenology model to simulate development between developmental phases
        * a structure model to simulate plant morphology
        * a collection of organs to simulate the various plant parts
        * an arbitrator to allocate resources (N, biomass) to the various plant organs
      OrganArbitrator Arbitrator
        BiomassTypeArbitrator DMArbitration: same as Replacements.Teff.Arbitrator.DMArbitration
        BiomassTypeArbitrator NArbitration
          Folder PotentialPartitioningMethods
            ReallocationMethod
          Folder ActualPartitioningMethods
            AllocateFixationMethod
            RetranslocationMethod
          Folder AllocationMethods
            NitrogenAllocationsMethod
          RelativeAllocation ArbitrationMethod
          AllocateUptakesMethod
        WaterUptakeMethod
        NitrogenUptakeMethod
      Phenology
        Memo
          Wheat exhibits a range of developmental responses to environment and these are strongly influences by genotype characteristics.
          Temperature effects development increasing development rates and decreasing phase durations as temperatures increase.  Theset affects are captured by thermal time, .  However, wheat also exhibits vernalisation and photoperiod sensitivities in its Vegetative phase and further photoperiod sensitivity in the EarlyReproducivePhase.  Photoperiod responses are seen as a reduction in the length of a phase for a photoperiod sensitive genotype in response to a longer photoperiod.  Vernalisation responses are more complicated as they are driven by temperature but interact with photoperiod.  For vernalisation sensitive varieties (Winter types) exposure to cool temperatures or short photoperiods during the Vegetative phase will reduce the thermal time duration of the vegetative phase.

          We draw on the Kirby Framework to capture these vernalisation and photoperiod responses.  This framework assumes that the timing of anthesis is a result of the timing of flag leaf and an additional thermal time passage from there to anthesis.  It also assumes the timing of flag leaf is a result of the Final Leaf Number which sets a target, and leaf appearance rate, which sets the rate of progress toward this target.  Leaf appearance rate is a function of Thermal time and a genotype specific Phyllochron which changes with Haun stage as described by [Jamieson_LeafAppearance_1995].

          Final Leaf Number (FLN) is modeled as the sum of three numbers:

          FLN = MinLeafNumber + VernalLeaves + PhotoLeaves

          Where MinLeafNumber is the number of leaves that a wheat crop will produce when vernalisation is satisified early in the crops duration (before 2nd true leaf) and it is grown in a long photoperiod..  VernalLeaves are the number of leaves that are added due to vernalisation effects.  For insensitive varieties this will always be zero but this is potentially a larger number for sensitivie varieties and the number progresively decreases as the crop encounters more vernalisation.  PhotoLeaves are the number of leaves that are added to the minimum leaf number as a result of short day exposure.  For insensitive varieties this will be zero but is potential larger for more sensitivie varieties and decreases as day length increases.  More detailed explinations of the components of phenology are provided below.
        AirTemperatureFunction ThermalTime
          XYPairs: X=[0, 26, 37]; Y=[0, 26, 0]
          Memo
            Thermal time determines the rate of developmental progress through many of the crops phases and is used by organs to determing potential growth rates.
        MultiplyFunction DailyVernalisation
          Memo
            Vernalisation responses are based on those described by [Brown_Anthesis_2013].   Vernalisation is assumed to be related to the expression of the Vrn1 Gene.  Its experssion is accumulated daily and daily upregulation as a function of development (DeltaHaunStage) and a TempResponseProfile that declines exponentially from a maximum at 1<sup>o</sup>C to zero at 0<sup>o</sup>C and at 18<sup>o</sup>C.
          VariableReference DeltaHaunStage: VariableName=[Structure].DeltaHaunStage
          AirTemperatureFunction TempResponseProfile
            XYPairs
              X=[0, 1, 2, 3, 4, 5, 6, 7, 8, 9, 10, 11, 12, 13, 14, 15, 16, 17, 18, 19, 20, 30, 32]
              Y=[0, 1.205, 1.037, 0.893, 0.768, 0.661, 0.569, 0.49, 0.422, 0.363, 0.312, 0.269, 0.231, 0.199, 0.171, 0.148, 0.127, 0.109, 0.094, 0.081, 0, 0, -0.5]
        PhotoperiodFunction Photoperiod: Twilight=-6; DayLength=0
        PhaseLookup PerceivedPhotoPeriod
          PhaseLookupValue ApexBelowGround: Start=Germination; End=Emergence
            Constant Photoperiod: FixedValue=0; Units=h
          PhaseLookupValue ApexAboveGround: Start=Emergence; End=HarvestRipe
            VariableReference Photoperiod: VariableName=[Phenology].Photoperiod
        MinimumFunction Vrn1
          Memo
            Vrn1 accumulation begins when Vrn4 experssion is down regulated to zero and stops, assuming vernalisation saturation, at a value of 1
          Constant Saturation: FixedValue=1; Units=Relative Experssion
          AccumulateFunction CurrentExpression: StartStageName=Germination; EndStageName=TerminalSpikelet; FractionRemovedOnCut=0; FractionRemovedOnHarvest=0; FractionRemovedOnGraze=0; FractionRemovedOnPrune=0
            LessThanFunction Vernalisation
              VariableReference If_Vrn4: VariableName=[Phenology].Vrn4
              VariableReference IsLessThanLag: VariableName=[Phenology].VernLag
              Constant Return_Zero: FixedValue=0
              VariableReference elseReturn_Vernalisation: VariableName=[Phenology].DailyVernalisation
        MinimumFunction Vrn4
          VariableReference MaxExpression: VariableName=[Phenology].VernLag
          AccumulateFunction CurrentExpression: StartStageName=Germination; EndStageName=TerminalSpikelet; FractionRemovedOnCut=0; FractionRemovedOnHarvest=0; FractionRemovedOnGraze=0; FractionRemovedOnPrune=0
            VariableReference VernalisationConditioning: VariableName=[Phenology].DailyVernalisation
        Constant MinimumLeafNumber: FixedValue=7; Units=Leaves
          Memo
            Number of leaves the plant will produce when fully vernalised early and grown in long photoperiod
        Constant VrnSensitivity: FixedValue=0; Units=Leaves
          Memo
            The difference between Inherent earlyness leaf number and the number of leaves produced when the plant is unvernalised and grown in long photoperiod
        Constant VernLag: FixedValue=1; Units=Unitless
          Memo
            The amount of vernalising temperature required before vernalisation response will be evident.  Value of relative to the amount offl vernalisation temperature required from the end of the lag until vernalisation saturation.  A value of 0 means there is no lag, a value of 1 means the lag is the same (in vernal time) as the vernalisation requirement and a value of 2 means the lag is twice as long as the vernalisation response phase
        Constant PpSensitivity: FixedValue=3; Units=Leaves
          Memo
            The reduction in leaf number going from 8 to 16 h Pp
        Constant HeadEmergencePpSensitivity: FixedValue=0
          Memo
            The phyllochrons duration for the plant to go from flag leaf ligual appearance at 16 h Pp compared to the phyllochron duration for the same phase at 8 h Pp.
        Constant HeadEmergenceLongDayBase: FixedValue=2.5
          Memo
            The phyllochrons duration for the plant to go from flag leaf ligual appearance at 16 h Pp.
        GerminatingPhase Germinating: Start=Sowing; End=Germination
        EmergingPhase Emerging: ShootLag=40; ShootRate=1.5; Start=Germination; End=Emergence; TTForTimeStep=0
          VariableReference ThermalTime: VariableName=[Phenology].ThermalTime
        NodeNumberPhase Vegetative: Start=Emergence; End=FloralInitiation
          VariableReference ThermalTime: VariableName=[Phenology].ThermalTime
          VariableReference CompletionNodeNumber: VariableName=[Structure].HaunStageTerminalSpikelet
        GenericPhase SpikeletDifferentiation: Start=FloralInitiation; End=TerminalSpikelet
          VariableReference Progression: VariableName=[Phenology].ThermalTime
          Constant Target: FixedValue=0
        LeafAppearancePhase StemElongation: Start=TerminalSpikelet; End=FlagLeaf
          Memo
            The Final leaf number is fixed at Terminal Spikelet and leaves contune to appear at a rate set by thermal time and phyllochron until flag leaf liguale appears and this phase is completed.
          VariableReference ThermalTime: VariableName=[Phenology].ThermalTime
        GenericPhase HeadEmergence: Start=FlagLeaf; End=Heading
          VariableReference Progression: VariableName=[Phenology].ThermalTime
          MultiplyFunction Target
            VariableReference Phyllochron: VariableName=[Structure].Phyllochron.BasePhyllochron
            AddFunction Phyllochrons
              VariableReference LongDayBase: VariableName=[Phenology].HeadEmergenceLongDayBase
              MultiplyFunction IncreaseDueToShortPhotoPeriod
                LinearInterpolationFunction PhotoPeriodResponse
                  XYPairs: X=[11, 16]; Y=[1, 0]
                  VariableReference XValue: VariableName=[Phenology].Photoperiod
                VariableReference PpSensitivity: VariableName=[Phenology].HeadEmergencePpSensitivity
        GenericPhase EarlyFlowering: Start=Heading; End=Flowering
          VariableReference Progression: VariableName=[Phenology].ThermalTime
          Constant Target: FixedValue=0
        GenericPhase GrainDevelopment: Start=Flowering; End=StartGrainFill
          Constant Target: FixedValue=120
          VariableReference Progression: VariableName=[Phenology].ThermalTime
        GenericPhase GrainFilling: Start=StartGrainFill; End=EndGrainFill
          Constant Target: FixedValue=545
          VariableReference Progression: VariableName=[Phenology].ThermalTime
        GenericPhase Maturing: Start=EndGrainFill; End=Maturity
          Constant Target: FixedValue=35
          VariableReference Progression: VariableName=[Phenology].ThermalTime
        GenericPhase Ripening: Start=Maturity; End=HarvestRipe
          Constant Target: FixedValue=300
          VariableReference Progression: VariableName=[Phenology].ThermalTime
        EndPhase ReadyForHarvesting: Start=HarvestRipe; End=Unused
          VariableReference ThermalTime: VariableName=[Phenology].ThermalTime
        ZadokPMFWheat Zadok
        OnEventFunction FlagLeafDAS: SetEvent=FlagLeaf; ReSetEvent=never
          Memo
            A function is used to provide flowering date as days after sowing(DAS).
          Constant PreEventValue: FixedValue=0
          VariableReference PostEventValue: VariableName=[Phenology].DaysAfterSowing
        OnEventFunction FloweringDAS: SetEvent=Flowering; ReSetEvent=never
          Memo
            A function is used to provide flowering date as days after sowing(DAS).
          Constant PreEventValue: FixedValue=0
          VariableReference PostEventValue: VariableName=[Phenology].DaysAfterSowing
        OnEventFunction MaturityDAS: SetEvent=Maturity; ReSetEvent=never
          Memo
            A function is used to provide maturity date as days after sowing(DAS).
          Constant PreEventValue: FixedValue=0
          VariableReference PostEventValue: VariableName=[Phenology].DaysAfterSowing
        OnEventFunction EmergenceDAS: SetEvent=Emergence; ReSetEvent=never
          Memo
            A function is used to provide flowering date as days after sowing(DAS).
          Constant PreEventValue: FixedValue=0
          VariableReference PostEventValue: VariableName=[Phenology].DaysAfterSowing
        LinearInterpolationFunction RewindDueToBiomassRemoved
          XYPairs: X=[0, 0.1, 0.4, 0.5, 1]; Y=[0, 0.08, 0.4, 0.5, 1]
          VariableReference XValue: VariableName=[Phenology].FractionBiomassRemoved
      Structure: CohortInitialisationStage=Germination; LeafInitialisationStage=Emergence
        VariableReference ThermalTime: VariableName=[Phenology].ThermalTime
        MultiplyFunction Phyllochron
          Memo Rational
            This is the thermal time between the emergence of leaf tips.  The model used here is based on [Jamieson_SIRIUS_1998] where leaf appearace could be described by a base phyllochron determined between leaves 2 and 7 and a phyllochron that was 70% of base phyllochron for leaves < 2 and 130% of base phyllochron for leaves > 7
          LinearInterpolationFunction LeafStageFactor
            XYPairs: X=[0, 2, 3, 7, 8, 11, 12]; Y=[0.75, 0.75, 1, 1, 1.4, 1.4, 1.4]
            VariableReference XValue: VariableName=[Leaf].AppearedCohortNo
          Constant BasePhyllochron: FixedValue=120; Units=oC.d
          LinearInterpolationFunction PhotoPeriodEffect
            XYPairs: X=[8, 12, 14]; Y=[1.6, 1, 1]
            VariableReference XValue: VariableName=[Phenology].Photoperiod
        MultiplyFunction BranchingRate
          Memo
            Potential branching rate is determined by the commonly observed pattern of tillering in wheat, in which each tiller emerges with the third leaf on its parent axis (e.g. first tiller emerges at the same time as the third leaf on the main stem, the first secondary tiller appears with the third leaf on tiller 1).  This is described as a simple function of main stem leaf number.
          PhaseLookup PotentialBranchingRate
            PhaseLookupValue Vegetative: Start=Emergence; End=TerminalSpikelet
              LinearInterpolationFunction PotentialBranchingRate
                XYPairs: X=[1, 2, 3, 4, 5, 6, 7, 8]; Y=[0, 0, 1, 2, 4, 7, 12, 20]
                VariableReference XValue: VariableName=[Structure].LeafTipsAppeared
            PhaseLookupValue Reproductive: Start=TerminalSpikelet; End=HarvestRipe
              Constant Zero: FixedValue=0
          MinimumFunction StressFactors
            LinearInterpolationFunction NitrogenEffect
              Memo
                Inadequate Nitrogen supply is assumed to affect tillering prior to any effect on photosynthesis or leaf size.
              XYPairs: X=[0.5, 2, 3]; Y=[0, 1, 1]
              VariableReference XValue: VariableName=[Arbitrator].FN
            LinearInterpolationFunction CoverEffect
              Memo
                Tillering is said to cease once a threshold fraction of incoming radiation has been achieved.  This captures shading effects on tillering described by [evers2006cessation].
              XYPairs: X=[0, 0.1, 0.25]; Y=[1, 1, 0]
              VariableReference XValue: VariableName=[Leaf].CoverTotal
            LinearInterpolationFunction WaterStressEffect
              XYPairs: X=[0, 1]; Y=[0, 1]
              VariableReference XValue: VariableName=[Root].WaterTensionFactor
        PhaseLookup BranchMortality
          PhaseLookupValue MortalityPhase: Start=FlagLeaf; End=Flowering
            MultiplyFunction Mortality
              LinearInterpolationFunction MortalityPerDegDay
                XYPairs: X=[0, 0.005]; Y=[0.002, 0]
                VariableReference XValue: VariableName=[Structure].MeanTillerGrowthRate
              VariableReference ThermalTime: VariableName=[Phenology].ThermalTime
        HeightFunction HeightModel
          LinearInterpolationFunction PotentialHeight
            XYPairs: X=[3, 4, 5, 6, 7, 8, 9]; Y=[10, 200, 200, 1000, 1000, 1000, 1000]
            VariableReference XValue: VariableName=[Phenology].Stage
          LinearInterpolationFunction WaterStress
            XYPairs: X=[0.3, 1]; Y=[0, 1]
            VariableReference XValue: VariableName=[Leaf].Fw
        MovingAverageFunction MeanTillerGrowthRate: NumberOfDays=5; StageToStartMovingAverage=Emergence
          Memo
            This is calculated to represent the supply of asslimilate to individual tillers over the past 5 days to use as an index to determine tiller mortality.  When tiller numbers are high or total crop assimilate supply is small there will not be enough assimilate to maintain all of the tillers so the model will senesce some.
          DivideFunction TillerGrowthRate
            VariableReference DailyGrowth: VariableName=[Arbitrator].DM.TotalFixationSupply
            VariableReference ThermalTime: VariableName=[Phenology].ThermalTime
            VariableReference StemPopulation: VariableName=[Structure].TotalStemPopn
        MovingAverageFunction MeanPhyllochron: NumberOfDays=300; StageToStartMovingAverage=Emergence
          VariableReference Phyllochron: VariableName=[Structure].Phyllochron
        HoldFunction FinalLeafNumber: WhenToHold=TerminalSpikelet
          AddFunction FinalNodeNumber
            VariableReference MinLeafNumber: VariableName=[Phenology].MinimumLeafNumber
            MultiplyFunction VernalLeaves
              VariableReference UnVernalisedLeaves: VariableName=[Phenology].VrnSensitivity
              SubtractFunction VernalisationReductionFactor
                Constant One: FixedValue=1
                VariableReference RelativeVrn1Expression: VariableName=[Phenology].Vrn1
            MultiplyFunction PhotoPLeaves
              VariableReference ShortPpLeaves: VariableName=[Phenology].PpSensitivity
              LinearInterpolationFunction PhotoPeriodReductionFactor
                XYPairs: X=[10, 16]; Y=[1, 0]
                VariableReference XValue: VariableName=[Phenology].Photoperiod
        ExpressionFunction HaunStageTerminalSpikelet: Expression=([Structure].FinalLeafNumber - 2.85)/1.1
          Memo
            The Haun stage at which Terminal Spikelet occurs is determined from final leaf number using the approach described in [Brown_Anthesis_2013].
        AddFunction HaunStage
          VariableReference AppearedLeaves: VariableName=[Leaf].ExpandedCohortNo
          VariableReference ProportionOfExpandingLeaf: VariableName=[Leaf].NextExpandingLeafProportion
        Constant StemSenescenceAge: FixedValue=0
        DivideFunction PTQ
          MultiplyFunction Radn_mol_per_m2
            VariableReference SolarRadiation: VariableName=[IWeather].Radn
            Constant: FixedValue=2.285
            Memo
              Multiply Radn (MJ/m2/d) by 4.57 to convert to mol/m2/day and divide by 2 to convert to mol PAR/m2/d
          VariableReference ThermalTime: VariableName=[Phenology].ThermalTime
        Constant MaxLAR: FixedValue=0.021
      ReproductiveOrgan Grain: GrowthRespiration=0; MaintenanceRespiration=0; RipeStage=Ripe
        Biomass Live: DMDOfStructural=0.6
        Biomass Dead: DMDOfStructural=0.6
        HoldFunction NumberFunction: WhenToHold=Flowering
          MultiplyFunction GrainNumber
            Constant GrainsPerGramOfStem: FixedValue=26; Units=grains
            VariableReference StemMass: VariableName=[StemPlusSpike].Wt
        Constant DMConversionEfficiency: FixedValue=1
        Constant RemobilisationCost: FixedValue=0
        Constant InitialGrainProportion: FixedValue=0.05
        Constant MaximumPotentialGrainSize: FixedValue=0.05; Units=g
        PhaseLookup DMDemandFunction
          PhaseLookupValue InitialPhase: Start=Flowering; End=StartGrainFill
            FillingRateFunction
              VariableReference NumberFunction: VariableName=[Grain].NumberFunction
              VariableReference FillingDuration: VariableName=[Phenology].GrainDevelopment.Target
              VariableReference ThermalTime: VariableName=[Phenology].ThermalTime
              MultiplyFunction PotentialSizeIncrement
                VariableReference InitialProportion: VariableName=[Grain].InitialGrainProportion
                VariableReference MaximumSize: VariableName=[Grain].MaximumPotentialGrainSize
          PhaseLookupValue LinearPhase: Start=StartGrainFill; End=EndGrainFill
            FillingRateFunction
              VariableReference NumberFunction: VariableName=[Grain].NumberFunction
              VariableReference FillingDuration: VariableName=[Phenology].GrainFilling.Target
              VariableReference ThermalTime: VariableName=[Phenology].ThermalTime
              MultiplyFunction PotentialSizeIncrement
                SubtractFunction ProportionLinearPhase
                  Constant One: FixedValue=1
                  VariableReference InitialProportion: VariableName=[Grain].InitialGrainProportion
                VariableReference MaximumSize: VariableName=[Grain].MaximumPotentialGrainSize
        Constant MinimumNConc: FixedValue=0.0123
        Constant MaxNConcDailyGrowth: FixedValue=0.03
        Constant MaximumNConc: FixedValue=0.03
        PhaseLookup NFillingRate
          PhaseLookupValue GrainFilling: Start=Flowering; End=EndGrainFill
            FillingRateFunction
              VariableReference NumberFunction: VariableName=[Grain].NumberFunction
              AddFunction FillingDuration
                VariableReference FloweringToGrainFilling: VariableName=[Phenology].GrainDevelopment.Target
                VariableReference GrainFilling: VariableName=[Phenology].GrainFilling.Target
              VariableReference ThermalTime: VariableName=[Phenology].ThermalTime
              MultiplyFunction PotentialSizeIncrement
                VariableReference MaximumSize: VariableName=[Grain].MaximumPotentialGrainSize
                VariableReference MaximumNConc: VariableName=[Grain].MaximumNConc
        Constant WaterContent: FixedValue=0.12
        AccumulateFunction AccumThermalTime: StartStageName=Flowering; EndStageName=Maturity; FractionRemovedOnCut=0; FractionRemovedOnHarvest=0; FractionRemovedOnGraze=0; FractionRemovedOnPrune=0
          VariableReference DailyThermalTimeValue: VariableName=[Phenology].ThermalTime
        ExpressionFunction Protein
          Expression=([Grain].Live.N + [Grain].Dead.N)/([Grain].Live.Wt + [Grain].Dead.Wt) * 100 * 5.71
        BiomassRemoval BiomassRemovalDefaults
          OrganBiomassRemovalType Harvest: FractionLiveToRemove=1; FractionDeadToRemove=0; FractionLiveToResidue=0; FractionDeadToResidue=0
          OrganBiomassRemovalType Cut: FractionLiveToRemove=1; FractionDeadToRemove=0; FractionLiveToResidue=0; FractionDeadToResidue=0
          OrganBiomassRemovalType Prune: FractionLiveToRemove=0; FractionDeadToRemove=0; FractionLiveToResidue=0.8; FractionDeadToResidue=0
          OrganBiomassRemovalType Graze: FractionLiveToRemove=0.6; FractionDeadToRemove=0; FractionLiveToResidue=0.2; FractionDeadToResidue=0
          OrganBiomassRemovalType Thin: FractionLiveToRemove=0; FractionDeadToRemove=0; FractionLiveToResidue=0.05; FractionDeadToResidue=0
        Constant CarbonConcentration: FixedValue=0.4
      Root: GrowthRespiration=0; MaintenanceRespiration=0; RootAngle=45
        Constant DMConversionEfficiency: FixedValue=1
        Constant RemobilisationCost: FixedValue=0
        Constant KLModifier: FixedValue=1
        Constant SoilWaterEffect: FixedValue=1
        Constant MaxDailyNUptake: FixedValue=20
        Constant SenescenceRate: FixedValue=0.005
        Constant MaximumRootDepth: FixedValue=1000000
        Constant MaximumNConc: FixedValue=0.01
        Constant MinimumNConc: FixedValue=0.01
        PhaseBasedSwitch NitrogenDemandSwitch: Start=Germination; End=Maturity
        BiomassRemoval BiomassRemovalDefaults
          OrganBiomassRemovalType Harvest: FractionLiveToRemove=0; FractionDeadToRemove=0; FractionLiveToResidue=0.2; FractionDeadToResidue=0
          OrganBiomassRemovalType Cut: FractionLiveToRemove=0; FractionDeadToRemove=0; FractionLiveToResidue=0.3; FractionDeadToResidue=0
          OrganBiomassRemovalType Prune: FractionLiveToRemove=0; FractionDeadToRemove=0; FractionLiveToResidue=0.1; FractionDeadToResidue=0
          OrganBiomassRemovalType Graze: FractionLiveToRemove=0; FractionDeadToRemove=0; FractionLiveToResidue=0.15; FractionDeadToResidue=0
          OrganBiomassRemovalType Thin: FractionLiveToRemove=0; FractionDeadToRemove=0; FractionLiveToResidue=0.05; FractionDeadToResidue=0
        Constant KNO3: FixedValue=0.02
        Constant KNH4: FixedValue=0.01
        Constant InitialDM: FixedValue=0.005; Units=g/plant
        Constant SpecificRootLength: FixedValue=105; Units=m/g
        MultiplyFunction RootFrontVelocity
          PhaseLookup PotentialRootFrontVelocity
            PhaseLookupValue PreEmergence: Start=Germination; End=Emergence
              Constant Value: FixedValue=5; Units=mm/d
            PhaseLookupValue PostEmergence: Start=Emergence; End=Maturity
              Constant Value: FixedValue=20; Units=mm/d
          WeightedTemperatureFunction TemperatureFactor: MaximumTemperatureWeighting=0.5
            XYPairs: X=[0, 15, 25, 35]; Y=[0, 1, 1, 0]
          LinearInterpolationFunction WaterFactor
            SoilWaterScale
            XYPairs: X=[0, 0.25, 1]; Y=[0, 1, 1]
            VariableReference XValue: VariableName=[SoilWaterScale]
        LinearInterpolationFunction NUptakeSWFactor
          SoilWaterScale
          XYPairs: X=[0, 1]; Y=[0, 1]
          Memo
            This is modelled in the same way as the old wheat model where potential N uptake is decreased as the soil dries as described by NUptakeSWFactor
          VariableReference XValue: VariableName=[SoilWaterScale]
        Constant CarbonConcentration: FixedValue=0.4
        Constant MaintenanceRespirationFunction: FixedValue=0
        BiomassDemand DMDemands
          MultiplyFunction Structural
            PartitionFractionDemandFunction DMDemandFunction
              PhaseLookup PartitionFraction
                PhaseLookupValue PreEmergence: Start=Germination; End=Emergence
                  Constant Value: FixedValue=0
                PhaseLookupValue PreFlowering: Start=Emergence; End=Flowering
                  LinearInterpolationFunction AgeFactor
                    XYPairs: X=[3, 4, 5]; Y=[0.5, 0.2, 0.2]
                    VariableReference XValue: VariableName=[Phenology].Stage
                PhaseLookupValue PostFlowering: Start=Flowering; End=EndGrainFill
                  Constant Value: FixedValue=0.2
            Constant StructuralFraction: FixedValue=1
          Constant Metabolic: FixedValue=0
          StorageDMDemandFunction Storage
            SubtractFunction StorageFraction
              Constant One: FixedValue=1
              VariableReference StructuralFraction: VariableName=[Root].DMDemands.Structural.StructuralFraction
        BiomassDemand NDemands: same as Replacements.Teff.Root.NDemands
        VariableReference CriticalNConc: VariableName=[Root].MinimumNConc
      Leaf: MaxCover=1; Albedo=0.25; Gsmax350=0.011; R50=150; KDead=0.1; MaximumMainStemLeafNumber=30
        zero: CurrentExpandingLeaf, StartFractionExpanded, FractionNextleafExpanded, DeadNodesYesterday, GrowthRespiration, LAI, FRGR, PotentialEP, WaterDemand, TipsAtEmergence, CohortsAtInitialisation, FractionDied
        ExpressionFunction CO2internal: Expression=(163 - [IWeather].MeanT)/(5 - 0.1*[IWeather].MeanT)
        DivideFunction StomatalConductanceCO2Modifier
          VariableReference FCO2: VariableName=[Leaf].Photosynthesis.FCO2
          ExpressionFunction RelativeCO2Gradient
            Expression=([IWeather].CO2 - [Leaf].CO2internal)/(350 - [Leaf].CO2internal)
        LeafCohort InitialLeaves[1]: Rank=1; Area=200
          zero: NReallocationFactor, DMReallocationFactor, NRetranslocationFactor, DMRetranslocationFactor, ShadeInducedSenRate, SenescedFrac, DeltaPotentialArea, DeltaStressConstrainedArea, DeltaCarbonConstrainedArea, PotentialStructuralDMAllocation, PotentialMetabolicDMAllocation, MetabolicNReallocated, MetabolicWtReallocated, StorageNReallocated, StorageWtReallocated, MetabolicNRetranslocated, StorageNRetrasnlocated, DMRetranslocated, MetabolicNAllocation, StructuralDMAllocation, MetabolicDMAllocation, MaintenanceRespiration
        LeafCohort InitialLeaves[2]: Rank=2
          zero: NReallocationFactor, DMReallocationFactor, NRetranslocationFactor, DMRetranslocationFactor, ShadeInducedSenRate, SenescedFrac, DeltaPotentialArea, DeltaStressConstrainedArea, DeltaCarbonConstrainedArea, PotentialStructuralDMAllocation, PotentialMetabolicDMAllocation, MetabolicNReallocated, MetabolicWtReallocated, StorageNReallocated, StorageWtReallocated, MetabolicNRetranslocated, StorageNRetrasnlocated, DMRetranslocated, MetabolicNAllocation, StructuralDMAllocation, MetabolicDMAllocation, Area, MaintenanceRespiration
        LeafCohortParameters CohortParameters: ExpansionStressValue=0
          Constant NReallocationFactor: FixedValue=1
          Constant RemobilisationCost: FixedValue=0
          Constant MaintenanceRespirationFunction: FixedValue=0
          Constant NRetranslocationFactor: FixedValue=0.03
          Constant DMReallocationFactor: FixedValue=1
          Constant DMRetranslocationFactor: FixedValue=1
          MinimumFunction CellDivisionStress
            LinearInterpolationFunction WaterStressEffect
              XYPairs: X=[0.5, 1]; Y=[0.1, 1]
              VariableReference XValue: VariableName=[Leaf].Fw
            LinearInterpolationFunction NitrogenStressEffect
              XYPairs: X=[0, 0.5, 1]; Y=[0.1, 0.1, 1]
              VariableReference XValue: VariableName=[Wheat].Leaf.Fn
          MinimumFunction ExpansionStress
            LinearInterpolationFunction WaterStressEffect
              XYPairs: X=[0.1, 1.1, 1.3]; Y=[0, 1, 1]
              VariableReference XValue: VariableName=[Root].WaterTensionFactor
            LinearInterpolationFunction TemperatureEffect
              XYPairs: X=[0, 12, 14]; Y=[0, 1, 1]
              VariableReference XValue: VariableName=[IWeather].MeanT
            LinearInterpolationFunction NitrogenStressEffect
              XYPairs: X=[0, 0.5, 1]; Y=[0.1, 0.1, 1]
              VariableReference XValue: VariableName=[Wheat].Leaf.Fn
          MultiplyFunction MaxArea
            Constant AreaLargestLeaves: FixedValue=2600; Units=mm^2
            LinearInterpolationFunction AgeFactor
              XYPairs: X=[3, 3.45, 4, 5]; Y=[0.1, 0.5, 1, 1]
              VariableReference XValue: VariableName=[Phenology].Stage
          MultiplyFunction GrowthDuration
            Constant Multiplier: FixedValue=1.3
            VariableReference Phyllochron: VariableName=[Structure].Phyllochron
          MultiplyFunction LagDuration
            LinearInterpolationFunction AgeFactor
              XYPairs: X=[3, 4, 5]; Y=[0.4, 1, 1]
              VariableReference XValue: VariableName=[Phenology].Stage
            SubtractFunction LastLeafDuration
              AddFunction ThermalTimeToRipe
                VariableReference HeadEmergence: VariableName=[Phenology].HeadEmergence.Target
                VariableReference EarlyFlowering: VariableName=[Phenology].EarlyFlowering.Target
                VariableReference GrainDevelopment: VariableName=[Phenology].GrainDevelopment.Target
                VariableReference GrainFilling: VariableName=[Phenology].GrainFilling.Target
                VariableReference Maturing: VariableName=[Phenology].Maturing.Target
                VariableReference Ripening: VariableName=[Phenology].Ripening.Target
              VariableReference SenescenceDuration: VariableName=[Leaf].CohortParameters.SenescenceDuration
          MultiplyFunction SenescenceDuration
            Constant Multiplier: FixedValue=3
            VariableReference Phyllochron: VariableName=[Structure].Phyllochron
          Constant DetachmentLagDuration: FixedValue=1000000
          Constant DetachmentDuration: FixedValue=1000000
          Constant RelativeBranchLeafSize: FixedValue=1
          LinearInterpolationFunction MaximumNConc
            XYPairs: X=[3, 4, 5, 6, 7, 8]; Y=[0.05, 0.05, 0.05, 0.035, 0.02, 0.02]
            VariableReference XValue: VariableName=[Phenology].Stage
          MultiplyFunction CriticalNConc
            LinearInterpolationFunction CriticalNConcAt350ppm
              XYPairs: X=[3, 4, 5, 6, 7, 8]; Y=[0.04, 0.04, 0.04, 0.0275, 0.015, 0.015]
              VariableReference XValue: VariableName=[Phenology].Stage
            LinearInterpolationFunction CO2Factor
              XYPairs: X=[350, 700]; Y=[1, 0.93]
              VariableReference XValue: VariableName=[IWeather].CO2
          LinearInterpolationFunction MinimumNConc
            XYPairs: X=[3, 4, 5, 6, 7, 8]; Y=[0.01, 0.01, 0.01, 0.01, 0.01, 0.01]
            VariableReference XValue: VariableName=[Phenology].Stage
          AddFunction DroughtInducedLagAcceleration
            Constant One: FixedValue=1
            MultiplyFunction Stress
              Constant StressResponseCoefficient: FixedValue=1
              LinearInterpolationFunction StressFactor
                XYPairs: X=[0, 1]; Y=[2, 0]
                VariableReference XValue: VariableName=[Leaf].Fw
          AddFunction DroughtInducedSenAcceleration: same as Replacements.Wheat.Leaf.CohortParameters.DroughtInducedLagAcceleration
          LinearInterpolationFunction SpecificLeafAreaMax
            XYPairs: X=[3, 4, 5, 6, 7, 8]; Y=[17000, 20000, 20000, 18500, 17000, 17000]
            VariableReference XValue: VariableName=[Phenology].Stage
          LinearInterpolationFunction SpecificLeafAreaMin
            XYPairs: X=[0.4, 1]; Y=[14000, 14000]
            VariableReference XValue: VariableName=[Leaf].Fn
          Constant InitialNConc: FixedValue=0
          Constant StructuralFraction: FixedValue=0.5
          Constant StorageFraction: FixedValue=0.3
          Constant LeafSizeShapeParameter: FixedValue=0.3
          Constant SenessingLeafRelativeSize: FixedValue=1; Units=0-1
          Constant ShadeInducedSenescenceRate: FixedValue=0
          ArrayFunction LagDurationAgeMultiplier: Values=1 1 1
          ArrayFunction SenescenceDurationAgeMultiplier: Values=1 1 1
          ArrayFunction LeafSizeAgeMultiplier: Values=1 1 1 1 1 1 1 1 1 1 1 1
        RUEModel Photosynthesis
          Constant RUE: FixedValue=1.5
          WeightedTemperatureFunction FT: MaximumTemperatureWeighting=0.75
            XYPairs: X=[0, 15, 25, 35]; Y=[0, 1, 1, 0]
          LinearInterpolationFunction FN
            XYPairs: X=[0, 1, 1.5]; Y=[0, 1, 1]
            VariableReference XValue: VariableName=[Leaf].Fn
          LinearInterpolationFunction FW
            XYPairs: X=[0, 1, 1]; Y=[0, 1, 1]
            VariableReference XValue: VariableName=[Leaf].Fw
          LinearInterpolationFunction FVPD
            DailyMeanVPD DailyVPD: MaximumVPDWeight=0.66
            XYPairs: X=[0, 10, 40]; Y=[1, 1, 0]
            VariableReference XValue: VariableName=[DailyVPD]
          RUECO2Function FCO2: PhotosyntheticPathway=C3
          VariableReference RadnInt: VariableName=[Leaf].RadIntTot
        Constant FrostFraction: FixedValue=0
        Constant RemobilisationCost: FixedValue=0
        VariableReference ThermalTime: VariableName=[Phenology].ThermalTime
        MinimumFunction FRGRFunction
          WeightedTemperatureFunction FT: MaximumTemperatureWeighting=0.75
            XYPairs: X=[0, 15, 25, 35]; Y=[0, 1, 1, 0]
          LinearInterpolationFunction FN
            XYPairs: X=[0, 1, 1.5]; Y=[0, 1, 1]
            VariableReference XValue: VariableName=[Leaf].Fn
          LinearInterpolationFunction FVPD
            DailyMeanVPD DailyVPD: MaximumVPDWeight=0.66
            XYPairs: X=[0, 10, 40]; Y=[1, 1, 0]
            VariableReference XValue: VariableName=[DailyVPD]
        BiomassRemoval BiomassRemovalDefaults
          OrganBiomassRemovalType Harvest: FractionLiveToRemove=0; FractionDeadToRemove=0; FractionLiveToResidue=0.3; FractionDeadToResidue=0.3
          OrganBiomassRemovalType Cut: FractionLiveToRemove=0.8; FractionDeadToRemove=0.8; FractionLiveToResidue=0; FractionDeadToResidue=0
          OrganBiomassRemovalType Prune: FractionLiveToRemove=0; FractionDeadToRemove=0; FractionLiveToResidue=0.6; FractionDeadToResidue=0.6
          OrganBiomassRemovalType Graze: FractionLiveToRemove=0.6; FractionDeadToRemove=0.6; FractionLiveToResidue=0.1; FractionDeadToResidue=0.1
          OrganBiomassRemovalType Thin: FractionLiveToRemove=0; FractionDeadToRemove=0; FractionLiveToResidue=0.05; FractionDeadToResidue=0.05
        MultiplyFunction ExtinctionCoeff
          Constant VegetativePhase: FixedValue=0.5
          LinearInterpolationFunction DevelopmentFactor
            XYPairs: X=[3, 4, 5, 5.7, 6]; Y=[1, 1, 1, 1, 1.2]
            Memo
              Exntiction coefficient increases at stem extension as leaves become more prostrate
            VariableReference XValue: VariableName=[Phenology].Stage
        Constant StructuralFraction: FixedValue=0.5
        Constant DMConversionEfficiency: FixedValue=1
        Constant CarbonConcentration: FixedValue=0.4
      GenericOrgan Spike: IsAboveGround=true
        Constant NReallocationFactor: FixedValue=0
        Constant RemobilisationCost: FixedValue=0
        PhaseLookup NRetranslocationFactor
          PhaseLookupValue EarlyGrowth: Start=Emergence; End=StartGrainFill
            Constant ValueDuringEarlyGrowth: FixedValue=0
          PhaseLookupValue ReproductiveGrowth: Start=StartGrainFill; End=EndGrainFill
            Constant ValueDuringGrainFill: FixedValue=0.5
        LinearInterpolationFunction MaximumNConc
          XYPairs: X=[3, 4, 5, 5.5, 6.5, 7, 8]; Y=[0.01, 0.01, 0.01, 0.01, 0.025, 0.025, 0.025]
          VariableReference XValue: VariableName=[Phenology].Stage
        Constant MinimumNConc: FixedValue=0.004
        BiomassRemoval BiomassRemovalDefaults
          OrganBiomassRemovalType Harvest: FractionLiveToRemove=0.5; FractionDeadToRemove=0; FractionLiveToResidue=0.1; FractionDeadToResidue=0
          OrganBiomassRemovalType Cut: FractionLiveToRemove=0.8; FractionDeadToRemove=0; FractionLiveToResidue=0; FractionDeadToResidue=0
          OrganBiomassRemovalType Prune: FractionLiveToRemove=0; FractionDeadToRemove=0; FractionLiveToResidue=0.6; FractionDeadToResidue=0
          OrganBiomassRemovalType Graze: FractionLiveToRemove=0.6; FractionDeadToRemove=0; FractionLiveToResidue=0.2; FractionDeadToResidue=0
          OrganBiomassRemovalType Thin: FractionLiveToRemove=0; FractionDeadToRemove=0; FractionLiveToResidue=0.05; FractionDeadToResidue=0
        PhaseBasedSwitch NitrogenDemandSwitch: Start=Emergence; End=StartGrainFill
        PhaseLookup DMRetranslocationFactor: same as Replacements.Teff.Stem.DMRetranslocationFactor
        Constant InitialWtFunction: FixedValue=0; Units=g/m^2
        Constant DetachmentRateFunction: FixedValue=0; Units=/d
        Constant MaintenanceRespirationFunction: FixedValue=0; Units=0-1
        Constant DMConversionEfficiency: FixedValue=1; Units=0-1
        VariableReference HeadNumber: VariableName=[Structure].TotalStemPopn
        Constant DMReallocationFactor: FixedValue=0
        AddFunction CriticalNConc
          VariableReference MinimumNConc: VariableName=[Spike].MinimumNConc
          MultiplyFunction MetabolicNconc
            SubtractFunction NonStructuralN
              VariableReference MaximumNConc: VariableName=[Spike].MaximumNConc
              VariableReference MinimumNConc: VariableName=[Spike].MinimumNConc
            Constant Proportion: FixedValue=0.8
        LinearInterpolationFunction SenescenceRate
          XYPairs: X=[3, 4, 5, 6, 7, 8]; Y=[0.07, 0.04, 0.04, 0.015, 0.012, 0.012]
          VariableReference XValue: VariableName=[Phenology].Stage
        Constant CarbonConcentration: FixedValue=0.4
        BiomassDemand DMDemands
          MultiplyFunction Structural
            PartitionFractionDemandFunction DMDemandFunction
              LinearInterpolationFunction PartitionFraction
                XYPairs: X=[3, 4, 5, 5.7, 6, 7, 8, 9, 9.000001]; Y=[0, 0, 0, 0.01, 0.7, 0.7, 0.7, 0.7, 0]
                VariableReference XValue: VariableName=[Phenology].Stage
            PhaseLookup StructuralFraction
              PhaseLookupValue VegetativeGrowth: Start=Emergence; End=StartGrainFill
                Constant StructuralFractionEG: FixedValue=0.3
              PhaseLookupValue ReproductiveGrowth: Start=StartGrainFill; End=EndGrainFill
                Constant StructuralFractionGF: FixedValue=0
          Constant Metabolic: FixedValue=0
          StorageDMDemandFunction Storage
            SubtractFunction StorageFraction
              Constant One: FixedValue=1
              VariableReference StructuralFraction: VariableName=[Spike].DMDemands.Structural.StructuralFraction
        BiomassDemand NDemands
          MultiplyFunction Structural
            VariableReference MinNconc: VariableName=[Spike].minimumNconc
            VariableReference PotentialDMAllocation: VariableName=[Spike].potentialDMAllocation.Structural
          MultiplyFunction Metabolic
            SubtractFunction MetabolicNconc
              VariableReference CritNconc: VariableName=[Spike].criticalNConc
              VariableReference MinNconc: VariableName=[Spike].minimumNconc
            VariableReference PotentialDMAllocation: VariableName=[Spike].potentialDMAllocation.Structural
          StorageNDemandFunction Storage
            VariableReference NitrogenDemandSwitch: VariableName=[Spike].nitrogenDemandSwitch
            VariableReference MaxNconc: VariableName=[Spike].maximumNconc
        RetranslocateNonStructural RetranslocateNitrogen
      GenericOrgan Stem: IsAboveGround=true
        LinearInterpolationFunction SenescenceRate
          XYPairs: X=[3, 4, 5, 6, 7, 8, 9, 10, 11]; Y=[0, 0, 0, 0, 0, 0, 0, 0.2, 0.5]
          VariableReference XValue: VariableName=[Phenology].Stage
        Constant RemobilisationCost: FixedValue=0
        LinearInterpolationFunction MaximumNConc
          XYPairs: X=[3, 4, 5, 6, 7, 8]; Y=[0.07, 0.04, 0.04, 0.015, 0.012, 0.012]
          VariableReference XValue: VariableName=[Phenology].Stage
        Constant MinimumNConc: FixedValue=0.0025
        PhaseBasedSwitch NitrogenDemandSwitch: Start=Emergence; End=StartGrainFill
        Constant NReallocationFactor: FixedValue=0
        PhaseLookup NRetranslocationFactor
          PhaseLookupValue VegetativeGrowth: Start=Sowing; End=Flowering
            Constant Fraction: FixedValue=0
          PhaseLookupValue ReproductiveGrowth: Start=Flowering; End=HarvestRipe
            Constant Fraction: FixedValue=0.5
        PhaseLookup DMRetranslocationFactor: same as Replacements.Teff.Stem.DMRetranslocationFactor
        BiomassRemoval BiomassRemovalDefaults: same as Replacements.Wheat.Spike.BiomassRemovalDefaults
        DivideFunction PercentWSC
          VariableReference WSC: VariableName=[Stem].Live.StorageWt
          VariableReference StemWt: VariableName=[Stem].Live.Wt
        Constant InitialWtFunction: FixedValue=0; Units=g/m^2
        Constant DetachmentRateFunction: FixedValue=0; Units=/d
        Constant MaintenanceRespirationFunction: FixedValue=0; Units=0-1
        Constant DMConversionEfficiency: FixedValue=1; Units=0-1
        Constant DMReallocationFactor: FixedValue=0
        AddFunction CriticalNConc
          VariableReference MinimumNConc: VariableName=[Stem].MinimumNConc
          MultiplyFunction MetabolicNconc
            SubtractFunction NonStructuralN
              VariableReference MaximumNConc: VariableName=[Stem].MaximumNConc
              VariableReference MinimumNConc: VariableName=[Stem].MinimumNConc
            Constant Proportion: FixedValue=0.5
        Constant CarbonConcentration: FixedValue=0.4
        BiomassDemand DMDemands
          MultiplyFunction Structural
            PartitionFractionDemandFunction DMDemandFunction
              PhaseLookup PartitionFraction
                PhaseLookupValue PreStemElongation: Start=Emergence; End=TerminalSpikelet
                  Constant StemFraction: FixedValue=0.2
                PhaseLookupValue StemElongation: Start=TerminalSpikelet; End=StartGrainFill
                  Constant StemFraction: FixedValue=0.7; Units=0
                PhaseLookupValue EarEmergence: Start=StartGrainFill; End=HarvestRipe
                  Constant StemFraction: FixedValue=0
            PhaseLookup StructuralFraction
              PhaseLookupValue VegetativeGrowth: Start=Sowing; End=StartGrainFill
                Constant Fraction: FixedValue=0.3
              PhaseLookupValue ReproductiveGrowth: Start=StartGrainFill; End=HarvestRipe
                Constant Fraction: FixedValue=0.01
          Constant Metabolic: FixedValue=0
          StorageDMDemandFunction Storage
            SubtractFunction StorageFraction
              Constant One: FixedValue=1
              VariableReference StructuralFraction: VariableName=[Stem].DMDemands.Structural.StructuralFraction
        BiomassDemand NDemands: same as Replacements.Teff.Stem.NDemands
        RetranslocateNonStructural RetranslocateNitrogen
      CompositeBiomass AboveGround: DMDOfStructural=0.6
        Propertys=[[Leaf].Live, [Leaf].Dead, [Stem].Live, [Stem].Dead, [Spike].Live, [Spike].Dead, [Grain].Live, [Grain].Dead]
      CompositeBiomass AboveGroundLive: Propertys=[[Leaf].Live, [Stem].Live, [Spike].Live, [Grain].Live]; DMDOfStructural=0.6
      CompositeBiomass AboveGroundDead: Propertys=[[Leaf].Dead, [Stem].Dead, [Spike].Dead, [Grain].Dead]; DMDOfStructural=0.6
      CompositeBiomass BelowGround: Propertys=[[Root].Live, [Root].Dead]; DMDOfStructural=0.6
      CompositeBiomass Total: DMDOfStructural=0.6
        Propertys=[[Leaf].Live, [Leaf].Dead, [Stem].Live, [Stem].Dead, [Root].Live, [Root].Dead, [Spike].Live, [Spike].Dead, [Grain].Live, [Grain].Dead]
      CompositeBiomass TotalLive: DMDOfStructural=0.6
        Propertys=[[Leaf].Live, [Stem].Live, [Root].Live, [Spike].Live, [Grain].Live]
      CompositeBiomass TotalDead: DMDOfStructural=0.6
        Propertys=[[Leaf].Dead, [Stem].Dead, [Root].Dead, [Spike].Dead, [Grain].Dead]
      CompositeBiomass Ear: Propertys=[[Spike].Live, [Grain].Live, [Spike].Dead, [Grain].Dead]; DMDOfStructural=0.6
        Memo
          The Ear composite biomass object includes the Live and dead pools of all organs within the Ear to allow output for total dry matter and Nutrient contents, including total structural, non-structural and metabolic pools.
      CompositeBiomass StemPlusSpike: Propertys=[[Stem].Live, [Spike].Live, [Stem].Dead, [Spike].Dead]; DMDOfStructural=0.6
      CultivarFolder Cultivars
        CultivarFolder New Zealand
          Cultivar Alberic
            Command:
              [Phenology].MinimumLeafNumber.FixedValue = 9
              [Phenology].VrnSensitivity.FixedValue = 7
              [Phenology].PpSensitivity.FixedValue = 3
          Cultivar Amarok
            Command:
              [Phenology].MinimumLeafNumber.FixedValue = 9
              [Phenology].VrnSensitivity.FixedValue = 10
              [Phenology].PpSensitivity.FixedValue = 6
              [Phenology].HeadEmergencePpSensitivity.FixedValue = 5
              [Structure].Phyllochron.BasePhyllochron.FixedValue = 80
          Cultivar Aspiring
            Command:
              [Phenology].MinimumLeafNumber.FixedValue = 9
              [Phenology].VrnSensitivity.FixedValue = 7
              [Phenology].PpSensitivity.FixedValue = 3
          Cultivar BattenWinter
            Command:
              [Phenology].MinimumLeafNumber.FixedValue = 8
              [Phenology].VrnSensitivity.FixedValue = 8
              [Phenology].PpSensitivity.FixedValue = 5
              [Phenology].HeadEmergencePpSensitivity.FixedValue = 3
              [Structure].Phyllochron.BasePhyllochron.FixedValue = 100
              [Leaf].ExtinctionCoeff.VegetativePhase.FixedValue = 0.7
              [Grain].NumberFunction.GrainNumber.GrainsPerGramOfStem.FixedValue = 22
          Cultivar BattenSpring
            Command:
              [Phenology].MinimumLeafNumber.FixedValue = 7
              [Phenology].VrnSensitivity.FixedValue = 0
              [Phenology].PpSensitivity.FixedValue = 5
              [Phenology].HeadEmergencePpSensitivity.FixedValue = 3
              [Structure].Phyllochron.BasePhyllochron.FixedValue = 100
              [Leaf].ExtinctionCoeff.VegetativePhase.FixedValue = 0.7
              [Grain].NumberFunction.GrainNumber.GrainsPerGramOfStem.FixedValue = 22
          Cultivar Centaur
            Command:
              [Phenology].MinimumLeafNumber.FixedValue = 9
              [Phenology].VrnSensitivity.FixedValue = 7
              [Phenology].PpSensitivity.FixedValue = 3
          Cultivar Claire
            Command:
              [Phenology].MinimumLeafNumber.FixedValue = 8
              [Phenology].VrnSensitivity.FixedValue = 8
              [Phenology].PpSensitivity.FixedValue = 8
              [Phenology].HeadEmergencePpSensitivity.FixedValue = 3
              [Structure].Phyllochron.BasePhyllochron.FixedValue = 100
          Cultivar Conquest
            Command:
              [Phenology].MinimumLeafNumber.FixedValue = 7
              [Phenology].VrnSensitivity.FixedValue = 0
              [Phenology].PpSensitivity.FixedValue = 3
              [Structure].Phyllochron.BasePhyllochron.FixedValue = 100
          Cultivar CRWT153
            Command:
              [Phenology].MinimumLeafNumber.FixedValue = 14
              [Phenology].VrnSensitivity.FixedValue = 1
              [Phenology].PpSensitivity.FixedValue = 2
          Cultivar Discovery
            Command:
              [Phenology].MinimumLeafNumber.FixedValue = 8.5
              [Phenology].VrnSensitivity.FixedValue = 0
              [Phenology].PpSensitivity.FixedValue = 0
              [Structure].Phyllochron.BasePhyllochron.FixedValue = 80
              [Leaf].CohortParameters.MaxArea.AreaLargestLeaves.FixedValue = 1600
              [Grain].MaximumPotentialGrainSize.FixedValue = 0.051
              [Grain].NumberFunction.GrainNumber.GrainsPerGramOfStem.FixedValue = 35
              [Leaf].ExtinctionCoeff.VegetativePhase.FixedValue = 0.5
              [Structure].BranchingRate.PotentialBranchingRate.Vegetative.PotentialBranchingRate.XYPairs.Y = 0,0,0,0,4,7,12,20
              [Grain].MaximumNConc.FixedValue = 0.025
              [Grain].MaxNConcDailyGrowth.FixedValue = 0.025
              [Leaf].ExtinctionCoeff.DevelopmentFactor.XYPairs.Y = 1,1,1,1,1.4
              [Leaf].CohortParameters.MinimumNConc.XYPairs.Y = 0.01,0.008, 0.008,0.008, 0.008, 0.008
              [Stem].MinimumNConc.FixedValue = 0.006
              [Spike].DMRetranslocationFactor.ReproductiveGrowth.DMRetranslocationFactor.FixedValue = 0.05
            Memo
              This is a spring wheat with a high grain number and later tillering
          Cultivar Einstein
            Command:
              [Phenology].MinimumLeafNumber.FixedValue = 9
              [Phenology].VrnSensitivity.FixedValue = 7
              [Phenology].PpSensitivity.FixedValue = 3
          Cultivar Exceed
            Command:
              [Phenology].MinimumLeafNumber.FixedValue = 9
              [Phenology].VrnSensitivity.FixedValue = 7
              [Phenology].PpSensitivity.FixedValue = 3
          Cultivar Majestic
            Command:
              [Phenology].MinimumLeafNumber.FixedValue = 9
              [Phenology].VrnSensitivity.FixedValue = 7
              [Phenology].PpSensitivity.FixedValue = 3
          Cultivar Option
            Command:
              [Phenology].MinimumLeafNumber.FixedValue = 9
              [Phenology].VrnSensitivity.FixedValue = 7
              [Phenology].PpSensitivity.FixedValue = 3
          Cultivar Otane
            Command:
              [Phenology].MinimumLeafNumber.FixedValue = 6
              [Phenology].VrnSensitivity.FixedValue = 0
              [Phenology].PpSensitivity.FixedValue = 4
              [Phenology].HeadEmergencePpSensitivity.FixedValue = 2
              [Structure].Phyllochron.BasePhyllochron.FixedValue = 100
          Cultivar Pennant
            Command:
              [Phenology].MinimumLeafNumber.FixedValue = 9
              [Phenology].VrnSensitivity.FixedValue = 7
              [Phenology].PpSensitivity.FixedValue = 3
          Cultivar Regency
            Command:
              [Phenology].MinimumLeafNumber.FixedValue = 9
              [Phenology].VrnSensitivity.FixedValue = 7
              [Phenology].PpSensitivity.FixedValue = 3
          Cultivar Richmond
            Command:
              [Phenology].MinimumLeafNumber.FixedValue = 9
              [Phenology].VrnSensitivity.FixedValue = 7
              [Phenology].PpSensitivity.FixedValue = 3
          Cultivar Robigus
            Command:
              [Phenology].MinimumLeafNumber.FixedValue = 9
              [Phenology].VrnSensitivity.FixedValue = 7
              [Phenology].PpSensitivity.FixedValue = 3
          Cultivar Rongotea
            Command:
              [Phenology].MinimumLeafNumber.FixedValue = 7
              [Phenology].VrnSensitivity.FixedValue = 0
              [Phenology].PpSensitivity.FixedValue = 2
              [Phenology].HeadEmergencePpSensitivity.FixedValue = 3
              [Structure].Phyllochron.BasePhyllochron.FixedValue = 100
          Cultivar Rubric
            Command:
              [Phenology].MinimumLeafNumber.FixedValue = 9
              [Phenology].VrnSensitivity.FixedValue = 7
              [Phenology].PpSensitivity.FixedValue = 3
          Cultivar Sage
            Command:
              [Phenology].MinimumLeafNumber.FixedValue = 9
              [Phenology].VrnSensitivity.FixedValue = 7
              [Phenology].PpSensitivity.FixedValue = 3
          Cultivar Saracen
            Command:
              [Phenology].MinimumLeafNumber.FixedValue = 9
              [Phenology].VrnSensitivity.FixedValue = 7
              [Phenology].PpSensitivity.FixedValue = 3
          Cultivar Savannah
            Command:
              [Phenology].MinimumLeafNumber.FixedValue = 9
              [Phenology].VrnSensitivity.FixedValue = 7
              [Phenology].PpSensitivity.FixedValue = 3
          Cultivar Solstice
            Command:
              [Phenology].MinimumLeafNumber.FixedValue = 9
              [Phenology].VrnSensitivity.FixedValue = 7
              [Phenology].PpSensitivity.FixedValue = 3
          Cultivar Tanker
            Command:
              [Phenology].MinimumLeafNumber.FixedValue = 9
              [Phenology].VrnSensitivity.FixedValue = 7
              [Phenology].PpSensitivity.FixedValue = 3
          Cultivar Tribute
            Command:
              [Phenology].MinimumLeafNumber.FixedValue = 9
              [Phenology].VrnSensitivity.FixedValue = 7
              [Phenology].PpSensitivity.FixedValue = 3
          Cultivar Wakanui
            Command:
              [Phenology].MinimumLeafNumber.FixedValue = 8
              [Phenology].VrnSensitivity.FixedValue = 10
              [Phenology].PpSensitivity.FixedValue = 0
              [Phenology].HeadEmergenceLongDayBase.FixedValue = 4
              [Structure].Phyllochron.BasePhyllochron.FixedValue = 100
              [Phenology].DailyVernalisation.TempResponseProfile.XYPairs.X = 0,1,8
              [Phenology].DailyVernalisation.TempResponseProfile.XYPairs.Y = 0,1.204,0
              [Leaf].ExtinctionCoeff.VegetativePhase.FixedValue = 0.7
              [Grain].NumberFunction.GrainNumber.GrainsPerGramOfStem.FixedValue = 22
              [Grain].MaximumPotentialGrainSize.FixedValue = 0.035
              [Leaf].CohortParameters.MaxArea.AreaLargestLeaves.FixedValue = 3000
          Cultivar Weston
            Command:
              [Phenology].MinimumLeafNumber.FixedValue = 9
              [Phenology].VrnSensitivity.FixedValue = 7
              [Phenology].PpSensitivity.FixedValue = 3
        CultivarFolder Australia
          Cultivar Axe
            Command:
              [Phenology].MinimumLeafNumber.FixedValue = 5
              [Phenology].VrnSensitivity.FixedValue = 0
              [Phenology].PpSensitivity.FixedValue = 4
              [Phenology].HeadEmergencePpSensitivity.FixedValue = 0
              [Structure].Phyllochron.BasePhyllochron.FixedValue = 100
          Cultivar Bolac
            Command:
              [Phenology].MinimumLeafNumber.FixedValue = 6
              [Phenology].VrnSensitivity.FixedValue = 0
              [Phenology].PpSensitivity.FixedValue = 4
              [Structure].Phyllochron.BasePhyllochron.FixedValue = 100
          Cultivar Cunningham
            Command:
              [Phenology].MinimumLeafNumber.FixedValue = 6
              [Phenology].VrnSensitivity.FixedValue = 0
              [Phenology].PpSensitivity.FixedValue = 4
              [Structure].Phyllochron.BasePhyllochron.FixedValue = 100
            Alias Anlace
            Alias Arrivato
            Alias Babbler
            Alias Barham
            Alias Baxter
            Alias Bowie
            Alias Buckley
            Alias Burunga
            Alias Camm
            Alias Carinya
            Alias Chief
            Alias Dagger
            Alias Aurora
            Alias Elmore
            Alias Espada
            Alias Frame
            Alias Gazelle
            Alias Halberd
            Alias Meteor
            Alias Preston
            Alias Saphire
            Alias Scout
            Alias Stiletto
            Alias Wallup
          Cultivar Derrimut
            Command:
              [Phenology].MinimumLeafNumber.FixedValue = 6
              [Phenology].VrnSensitivity.FixedValue = 0
              [Phenology].PpSensitivity.FixedValue = 4
              [Structure].Phyllochron.BasePhyllochron.FixedValue = 100
          Cultivar Gregory
            Command:
              [Phenology].MinimumLeafNumber.FixedValue = 6
              [Phenology].VrnSensitivity.FixedValue = 1
              [Phenology].PpSensitivity.FixedValue = 4
              [Structure].Phyllochron.BasePhyllochron.FixedValue = 100
            Alias Lancer
          Cultivar GattonHartog
            Command:
              [Phenology].MinimumLeafNumber.FixedValue = 8
              [Phenology].VrnSensitivity.FixedValue = 0
              [Phenology].PpSensitivity.FixedValue = 4
          Cultivar Gamenya
            Command:
              [Phenology].MinimumLeafNumber.FixedValue = 5
              [Phenology].VrnSensitivity.FixedValue = 0
              [Phenology].PpSensitivity.FixedValue = 3.5
              [Structure].Phyllochron.BasePhyllochron.FixedValue = 100
              [Phenology].HeadEmergencePpSensitivity.FixedValue = 0
              [Phenology].HeadEmergenceLongDayBase.FixedValue
          Cultivar Gauntlet
            Command:
              [Phenology].MinimumLeafNumber.FixedValue = 5
              [Phenology].VrnSensitivity.FixedValue = 0
              [Phenology].PpSensitivity.FixedValue = 4
              [Structure].Phyllochron.BasePhyllochron.FixedValue = 100
            Alias Braewood
            Alias Chara
            Alias Drysdale
            Alias Envoy
            Alias Estoc
            Alias Giles
            Alias Harper
            Alias Krichauff
            Alias Magenta
            Alias Mitch
            Alias Phantom
            Alias Pugsley
            Alias Sentinel
            Alias Silverstar
            Alias Suneca
            Alias Sunlin
            Alias Sunvale
            Alias Trojan
            Alias Strzelecki
          Cultivar Gladius
            Command:
              [Phenology].MinimumLeafNumber.FixedValue = 6
              [Phenology].VrnSensitivity.FixedValue = 0
              [Phenology].PpSensitivity.FixedValue = 5
              [Structure].Phyllochron.BasePhyllochron.FixedValue = 100
          Cultivar Gutha
            Command:
              [Phenology].MinimumLeafNumber.FixedValue = 6
              [Phenology].VrnSensitivity.FixedValue = 0
              [Phenology].PpSensitivity.FixedValue = 5
              [Structure].Phyllochron.BasePhyllochron.FixedValue = 100
              [Grain].MaximumPotentialGrainSize.FixedValue = 0.041
              [Grain].NumberFunction.GrainNumber.GrainsPerGramOfStem.FixedValue = 17
          Cultivar H45
            Command:
              [Phenology].MinimumLeafNumber.FixedValue = 6
              [Phenology].VrnSensitivity.FixedValue = 0
              [Phenology].PpSensitivity.FixedValue = 4
              [Structure].Phyllochron.BasePhyllochron.FixedValue = 100
              [Grain].NumberFunction.GrainNumber.GrainsPerGramOfStem.FixedValue = 20
            Alias Saintly
            Alias Tamarinrock
            Alias Waagin
            Alias Wollaroi
            Alias Zippy
          Cultivar H46
            Command:
              [Phenology].MinimumLeafNumber.FixedValue = 8
              [Phenology].VrnSensitivity.FixedValue = 0
              [Phenology].PpSensitivity.FixedValue = 4
              [Structure].Phyllochron.BasePhyllochron.FixedValue = 100
          Cultivar Hartog
            Command:
              [Phenology].MinimumLeafNumber.FixedValue = 6
              [Phenology].VrnSensitivity.FixedValue = 0
              [Phenology].PpSensitivity.FixedValue = 5
              [Structure].Phyllochron.BasePhyllochron.FixedValue = 100
              [Grain].MaximumPotentialGrainSize.FixedValue = 0.041
            Alias Annuello
            Alias Carnamah
            Alias Catalina
            Alias Cobra
            Alias Corack
            Alias Correll
            Alias Diamondbird
            Alias Goroke
            Alias Grenade
            Alias Guardian
            Alias Impala
            Alias Justica
            Alias Kord
            Alias Merlin
            Alias Mitre
            Alias Peake
            Alias Shield
            Alias Spitfire
            Alias Sunguard
            Alias Sunstate
            Alias Yallaroi
            Alias Yawa
          Cultivar Mercury
            Command:
              [Phenology].MinimumLeafNumber.FixedValue = 7
              [Phenology].VrnSensitivity.FixedValue = 0
              [Phenology].PpSensitivity.FixedValue = 4
              [Phenology].HeadEmergenceLongDayBase.FixedValue = 3.5
              [Structure].Phyllochron.BasePhyllochron.FixedValue = 80
            Alias Scythe
            Alias Arrino
            Alias BonnieRock
            Alias Bowerbird
            Alias Condo
            Alias Dart
            Alias Dollarbird
            Alias EmuRock
            Alias Hyperno
            Alias Impose
            Alias Kalka
            Alias Kukri
            Alias Hunter
            Alias Arrow
            Alias Ouyen
            Alias Tamaroi
            Alias Katana
            Alias Hume
            Alias Merinda
            Alias Wills
          Cultivar Janz
            Command:
              [Phenology].MinimumLeafNumber.FixedValue = 6
              [Phenology].VrnSensitivity.FixedValue = 1
              [Phenology].PpSensitivity.FixedValue = 4
              [Structure].Phyllochron.BasePhyllochron.FixedValue = 100
          Cultivar Kellalac
            Command:
              [Phenology].MinimumLeafNumber.FixedValue = 8
              [Phenology].VrnSensitivity.FixedValue = 0
              [Phenology].PpSensitivity.FixedValue = 4
              [Structure].Phyllochron.BasePhyllochron.FixedValue = 100
            Alias Beaufort
            Alias Calingiri
            Alias Endure
            Alias Forrest
            Alias Scenario
            Alias Zen
          Cultivar Kennedy
            Command:
              [Phenology].MinimumLeafNumber.FixedValue = 8
              [Phenology].VrnSensitivity.FixedValue = 0
              [Phenology].PpSensitivity.FixedValue = 4
              [Structure].Phyllochron.BasePhyllochron.FixedValue = 100
          Cultivar Lang
            Command:
              [Phenology].MinimumLeafNumber.FixedValue = 6
              [Phenology].VrnSensitivity.FixedValue = 0
              [Phenology].PpSensitivity.FixedValue = 5
              [Structure].Phyllochron.BasePhyllochron.FixedValue = 100
          Cultivar Livingston
            Command:
              [Phenology].MinimumLeafNumber.FixedValue = 5
              [Phenology].VrnSensitivity.FixedValue = 0
              [Phenology].PpSensitivity.FixedValue = 4
              [Structure].Phyllochron.BasePhyllochron.FixedValue = 100
          Cultivar Lincoln
            Command:
              [Phenology].MinimumLeafNumber.FixedValue = 6
              [Phenology].VrnSensitivity.FixedValue = 0
              [Phenology].PpSensitivity.FixedValue = 4
              [Structure].Phyllochron.BasePhyllochron.FixedValue = 100
            Alias Crusader
          Cultivar Mace
            Command:
              [Phenology].MinimumLeafNumber.FixedValue = 6
              [Phenology].VrnSensitivity.FixedValue = 0
              [Phenology].PpSensitivity.FixedValue = 4
              [Structure].Phyllochron.BasePhyllochron.FixedValue = 100
          Cultivar MacKellar
            Command:
              [Phenology].MinimumLeafNumber.FixedValue = 7
              [Phenology].VrnSensitivity.FixedValue = 5
              [Phenology].PpSensitivity.FixedValue = 5
              [Phenology].HeadEmergenceLongDayBase.FixedValue = 3.5
              [Structure].Phyllochron.BasePhyllochron.FixedValue = 100
            Alias Adagio
            Alias Brennan
            Alias Declic
            Alias Revenue
          Cultivar Matong
            Command:
              [Phenology].MinimumLeafNumber.FixedValue = 7
              [Phenology].VrnSensitivity.FixedValue = 1
              [Phenology].PpSensitivity.FixedValue = 4
              [Structure].Phyllochron.BasePhyllochron.FixedValue = 100
              [Grain].NumberFunction.GrainNumber.GrainsPerGramOfStem.FixedValue = 22
          Cultivar McCubbin
            Command:
              [Phenology].MinimumLeafNumber.FixedValue = 8
              [Phenology].VrnSensitivity.FixedValue = 0
              [Phenology].PpSensitivity.FixedValue = 5
              [Structure].Phyllochron.BasePhyllochron.FixedValue = 90
          Cultivar Ruby
            Command:
              [Phenology].MinimumLeafNumber.FixedValue = 8
              [Phenology].VrnSensitivity.FixedValue = 0
              [Phenology].PpSensitivity.FixedValue = 4
              [Structure].Phyllochron.BasePhyllochron.FixedValue = 100
          Cultivar Spear
            Command:
              [Phenology].MinimumLeafNumber.FixedValue = 7
              [Phenology].VrnSensitivity.FixedValue = 0
              [Phenology].PpSensitivity.FixedValue = 4
              [Structure].Phyllochron.BasePhyllochron.FixedValue = 100
              [Grain].MaximumPotentialGrainSize.FixedValue = 0.045
          Cultivar Sunbri
            Command:
              [Phenology].MinimumLeafNumber.FixedValue = 7
              [Phenology].VrnSensitivity.FixedValue = 0
              [Phenology].PpSensitivity.FixedValue = 5
              [Structure].Phyllochron.BasePhyllochron.FixedValue = 100
          Cultivar Sunco
            Command:
              [Phenology].MinimumLeafNumber.FixedValue = 6.5
              [Phenology].VrnSensitivity.FixedValue = 0
              [Phenology].PpSensitivity.FixedValue = 3.5
              [Phenology].HeadEmergencePpSensitivity.FixedValue = 4
              [Structure].Phyllochron.BasePhyllochron.FixedValue = 100
            Alias Advantage
            Alias Bellaroi
            Alias Caparoi
            Alias Ellison
            Alias Suntop
          Cultivar Ventura
            Command:
              [Phenology].MinimumLeafNumber.FixedValue = 8
              [Phenology].VrnSensitivity.FixedValue = 0
              [Phenology].PpSensitivity.FixedValue = 4
              [Structure].Phyllochron.BasePhyllochron.FixedValue = 100
          Cultivar Wedgetail
            Command:
              [Phenology].MinimumLeafNumber.FixedValue = 8
              [Phenology].VrnSensitivity.FixedValue = 0
              [Phenology].PpSensitivity.FixedValue = 4
              [Structure].Phyllochron.BasePhyllochron.FixedValue = 100
            Alias Lorikeet
            Alias Rosella
            Alias Whistler
            Alias Wylah
            Alias Eaglehawk
          Cultivar Westonia
            Command:
              [Phenology].MinimumLeafNumber.FixedValue = 5
              [Phenology].VrnSensitivity.FixedValue = 0
              [Phenology].PpSensitivity.FixedValue = 4
              [Structure].Phyllochron.BasePhyllochron.FixedValue = 100
          Cultivar Wilgoyne
            Command:
              [Phenology].MinimumLeafNumber.FixedValue = 6
              [Phenology].VrnSensitivity.FixedValue = 0
              [Phenology].PpSensitivity.FixedValue = 4
              [Structure].Phyllochron.BasePhyllochron.FixedValue = 100
              [Grain].NumberFunction.GrainNumber.GrainsPerGramOfStem.FixedValue = 20
              [Grain].MaximumPotentialGrainSize.FixedValue = 0.045
          Cultivar Wyalkatchem
            Command:
              [Phenology].MinimumLeafNumber.FixedValue = 8
              [Phenology].VrnSensitivity.FixedValue = 0
              [Phenology].PpSensitivity.FixedValue = 4
              [Structure].Phyllochron.BasePhyllochron.FixedValue = 100
          Cultivar Yitpi
            Command:
              [Phenology].MinimumLeafNumber.FixedValue = 8
              [Phenology].VrnSensitivity.FixedValue = 0
              [Phenology].PpSensitivity.FixedValue = 5
              [Phenology].HeadEmergenceLongDayBase.FixedValue = 2.5
              [Phenology].HeadEmergencePpSensitivity.FixedValue = 5
              [Structure].Phyllochron.BasePhyllochron.FixedValue = 80
          Cultivar Young
            Command:
              [Phenology].MinimumLeafNumber.FixedValue = 8
              [Phenology].VrnSensitivity.FixedValue = 0
              [Phenology].PpSensitivity.FixedValue = 4
              [Structure].Phyllochron.BasePhyllochron.FixedValue = 100
          Cultivar Scepter
            Command:
              [Phenology].MinimumLeafNumber.FixedValue = 6.3
              [Phenology].PpSensitivity.FixedValue = 1.7
              [Phenology].VrnSensitivity.FixedValue = 5.0
          Cultivar Cutlass
            Command:
              [Phenology].MinimumLeafNumber.FixedValue = 5.7
              [Phenology].PpSensitivity.FixedValue = 5.3
              [Phenology].VrnSensitivity.FixedValue = 2.3
          Cultivar Longsword
            Command:
              [Phenology].MinimumLeafNumber.FixedValue = 8.0
              [Phenology].PpSensitivity.FixedValue = 1.7
              [Phenology].VrnSensitivity.FixedValue = 8.0
          Cultivar CSIROW007
            Command:
              [Phenology].MinimumLeafNumber.FixedValue = 7.3
              [Phenology].PpSensitivity.FixedValue = 0.0
              [Phenology].VrnSensitivity.FixedValue = 6.3
          Cultivar CSIROW023
            Command:
              [Phenology].MinimumLeafNumber.FixedValue = 7.0
              [Phenology].PpSensitivity.FixedValue = 1.7
              [Phenology].VrnSensitivity.FixedValue = 5.3
          Cultivar CSIROW073
            Command:
              [Phenology].MinimumLeafNumber.FixedValue = 7.7
              [Phenology].PpSensitivity.FixedValue = 1.3
              [Phenology].VrnSensitivity.FixedValue = 6.3
        CultivarFolder Turkey
          Cultivar Konya
            Command:
              [Phenology].MinimumLeafNumber.FixedValue = 7
              [Phenology].VrnSensitivity.FixedValue = 4
              [Phenology].PpSensitivity.FixedValue = 4
              [Structure].Phyllochron.BasePhyllochron.FixedValue = 100
              [Grain].NumberFunction.GrainNumber.GrainsPerGramOfStem.FixedValue = 16
              [Grain].MaximumPotentialGrainSize.FixedValue = 0.050
              [Grain].MaximumNConc.FixedValue = 0.026
              [Phenology].GrainFilling.Target.FixedValue = 450
              [Stem].DMRetranslocationFactor.ReproductiveGrowth.DMRetranslocationFactor.FixedValue = 0.2
              [Stem].DMDemands.Structural.StructuralFraction.VegetativeGrowth.Fraction.FixedValue = 0.6
              [Leaf].ExtinctionCoeff.VegetativePhase.FixedValue = 0.8
        CultivarFolder China
          Cultivar Keyu13
            Command:
              [Phenology].MinimumLeafNumber.FixedValue = 7
              [Phenology].VrnSensitivity.FixedValue = 5
              [Phenology].PpSensitivity.FixedValue = 3
              [Structure].Phyllochron.BasePhyllochron.FixedValue = 100
        CultivarFolder USA
          Cultivar Yecora
            Command:
              [Phenology].MinimumLeafNumber.FixedValue = 6
              [Phenology].VrnSensitivity.FixedValue = 0
              [Phenology].PpSensitivity.FixedValue = 4
              [Structure].Phyllochron.BasePhyllochron.FixedValue = 90
              [Leaf].CohortParameters.MaxArea.AreaLargestLeaves.FixedValue = 4000
          Cultivar Rex
            Command:
              [Phenology].MinimumLeafNumber.FixedValue = 7
              [Phenology].VrnSensitivity.FixedValue = 6
              [Phenology].PpSensitivity.FixedValue = 4
              [Grain].NumberFunction.GrainNumber.GrainsPerGramOfStem.FixedValue = 18
              [Grain].MaximumNConc.FixedValue = 0.02
          Cultivar Nugaines
            Command:
              [Phenology].MinimumLeafNumber.FixedValue = 7
              [Phenology].VrnSensitivity.FixedValue = 6
              [Phenology].PpSensitivity.FixedValue = 4
              [Grain].NumberFunction.GrainNumber.GrainsPerGramOfStem.FixedValue = 20
              [Grain].MaximumNConc.FixedValue = 0.02
          Cultivar Hyslop
            Command:
              [Phenology].MinimumLeafNumber.FixedValue = 7
              [Phenology].VrnSensitivity.FixedValue = 6
              [Phenology].PpSensitivity.FixedValue = 4
              [Grain].NumberFunction.GrainNumber.GrainsPerGramOfStem.FixedValue = 22
              [Grain].MaximumNConc.FixedValue = 0.02
          Cultivar Stephens
            Command:
              [Phenology].MinimumLeafNumber.FixedValue = 7
              [Phenology].VrnSensitivity.FixedValue = 6
              [Phenology].PpSensitivity.FixedValue = 4
              [Grain].NumberFunction.GrainNumber.GrainsPerGramOfStem.FixedValue = 25
              [Grain].MaximumNConc.FixedValue = 0.02
        CultivarFolder Europe
          Cultivar Dekan
            Command:
              [Phenology].MinimumLeafNumber.FixedValue = 9
              [Phenology].VrnSensitivity.FixedValue = 7
              [Phenology].PpSensitivity.FixedValue = 3
              [Phenology].HeadEmergencePpSensitivity.FixedValue = 3
              [Structure].Phyllochron.BasePhyllochron.FixedValue = 100
              [Leaf].ExtinctionCoeff.VegetativePhase.FixedValue = 0.8
          Cultivar Rosario
            Command:
              [Phenology].MinimumLeafNumber.FixedValue = 9
              [Phenology].VrnSensitivity.FixedValue = 7
              [Phenology].PpSensitivity.FixedValue = 3
              [Phenology].HeadEmergencePpSensitivity.FixedValue = 3
              [Structure].Phyllochron.BasePhyllochron.FixedValue = 100
              [Leaf].ExtinctionCoeff.VegetativePhase.FixedValue = 0.8
          Cultivar Ararat
            Command:
              [Phenology].MinimumLeafNumber.FixedValue = 9
              [Phenology].VrnSensitivity.FixedValue = 7
              [Phenology].PpSensitivity.FixedValue = 3
              [Phenology].HeadEmergencePpSensitivity.FixedValue = 3
              [Structure].Phyllochron.BasePhyllochron.FixedValue = 100
              [Leaf].ExtinctionCoeff.VegetativePhase.FixedValue = 0.8
          Cultivar Tybalt
            Command:
              [Phenology].MinimumLeafNumber.FixedValue = 9
              [Phenology].VrnSensitivity.FixedValue = 0
              [Phenology].PpSensitivity.FixedValue = 0
              [Structure].Phyllochron.BasePhyllochron.FixedValue = 90
        CultivarFolder Africa
          Cultivar HAR1685
            Command:
              [Phenology].MinimumLeafNumber.FixedValue = 7
              [Phenology].VrnSensitivity.FixedValue = 0
              [Phenology].PpSensitivity.FixedValue = 3
              [Structure].Phyllochron.BasePhyllochron.FixedValue = 100
              [Grain].NumberFunction.GrainNumber.GrainsPerGramOfStem.FixedValue = 17
              [Phenology].GrainFilling.Target.FixedValue = 350
        CultivarFolder Iran
          Cultivar Gorgan
            Command:
              [Phenology].MinimumLeafNumber.FixedValue = 7
              [Phenology].VrnSensitivity.FixedValue = 0
              [Phenology].PpSensitivity.FixedValue = 4
              [Structure].Phyllochron.BasePhyllochron.FixedValue = 100
  DataStore
    ExcelInput Observed: FileNames=[Observed.xlsx]; SheetNames=[ObservedHarvestData]
    ExcelInput ObservedSW: FileNames=[Observed.xlsx]; SheetNames=[Mekelle2008SW]
    ExcelInput ObservedMekelle08Biomass: FileNames=[Observed.xlsx]; SheetNames=[Mekelle2008Crop]
    ExcelInput ObservedVanDelden: FileNames=[Observed.xlsx]; SheetNames=[VanDelden]
    ExcelInput ObservedLysimeter2: FileNames=[Observed.xlsx]; SheetNames=[ObservedLysimeter2]
    ExcelInput ObservedLysimeter4: FileNames=[Observed.xlsx]; SheetNames=[ObservedLysimeter4]
    ExcelInput ObservedCWP2010: FileNames=[Observed.xlsx]; SheetNames=[CWP2010]
    ExcelInput ObservedMekelleET: FileNames=[Observed.xlsx]; SheetNames=[MekelleET]
    ExcelInput ObservedPhenology: FileNames=[Observed.xlsx]; SheetNames=[Phenology]
    ExcelInput ObservedCanopy: FileNames=[Observed.xlsx]; SheetNames=[Canopy]
    PredictedObserved PredictedObservedCanopy: PredictedTableName=Report; ObservedTableName=Canopy; FieldNameUsedForMatch=Clock.Today
    PredictedObserved PredictedObservedHarvest: PredictedTableName=HarvestReport; ObservedTableName=ObservedHarvestData; FieldNameUsedForMatch=Teff.Phenology.CurrentStageName
  Folder Validation
    Memo
      The teff model has been tested across a range of planting and agronomic conditions.  These include datasets from Ethiopia covering a wide range of weather conditions (See graphs that follow) and agronomic factors (irrigation, fertiliser, sowing dates).
    Folder Ethiopia
      Experiment Jamma
        Memo
          ;From

          Soil Characterization and Evaluation of Slow Release Urea Fertilizer Rates on Yield Traits and Grain Yields of Wheat and Teff on Vertisols of Jamma District of South Wollo Zone, Amhara Region b0

          By

          Abebe Getu (BSc), Hawassa University, Ethiopia
        Factors
          Permutation
            Factor Crop: Specification=[Sowing]
              Operations Teff
                2011-07-25  [Teff].Sow(population:100., cultivar:"Wajera", depth:50, rowSpacing:250);
              Operations Wheat
            Factor NRate: Specification=[NRate]
              Operations 0NUSG
                2011-08-01  [Fertiliser].Apply(0, Fertiliser.Types.UreaN, 10);
                2011-09-01  [Fertiliser].Apply(0, Fertiliser.Types.UreaN, 10);
              Operations 23NUSG
                2011-08-01  [Fertiliser].Apply(11.5, Fertiliser.Types.UreaN, 10);
                2011-09-01  [Fertiliser].Apply(11.5, Fertiliser.Types.UreaN, 10);
              Operations 46NUSG
                2011-08-01  [Fertiliser].Apply(23, Fertiliser.Types.UreaN, 10);
                2011-09-01  [Fertiliser].Apply(23, Fertiliser.Types.UreaN, 10);
              Operations 69NUSG
                2011-08-01  [Fertiliser].Apply(34.5, Fertiliser.Types.UreaN, 10);
                2011-09-01  [Fertiliser].Apply(34.5, Fertiliser.Types.UreaN, 10);
              Operations 46NUC
                2011-08-01  [Fertiliser].Apply(23, Fertiliser.Types.UreaN, 10);
                2011-09-01  [Fertiliser].Apply(23, Fertiliser.Types.UreaN, 10);
        Simulation Jamma
          Weather: FileName=%root%\Prototypes\Teff\Jamma.met
          Clock: Start=2011-07-25; End=2012-01-21
          Summary summaryfile
          SoilArbitrator Soil Arbitrator
          MicroClimate: a_interception=0; b_interception=1; c_interception=0; d_interception=0; soil_albedo=0.23; SoilHeatFluxFraction=0.4; MinimumHeightDiffForNewLayer=0; NightInterceptionFraction=0.5; ReferenceHeight=2
          Zone Field: Area=1; Slope=0; AspectAngle=0; Altitude=50
            Irrigation
            Fertiliser
            SurfaceOrganicMatter: InitialResidueName=maize; InitialResidueType=maize; InitialResidueMass=500; InitialStandingFraction=0; InitialCPR=0; InitialCNR=65
            Operations Sowing
            Operations NRate
              1985-11-08  [Fertiliser].Apply(50, Fertiliser.Types.NH4NO3N, 10);
              1985-11-29  [Fertiliser].Apply(30, Fertiliser.Types.NH4NO3N, 10);
            Report: EventNames=[Clock].DoReport
              VariableNames:
                [Clock].Today
                [Soil].SoilWater.SW
                [Soil].SoilWater.Eo
                [Soil].SoilWater.Es
                [Soil].SoilWater.Drainage
                [Soil].SoilWater.Runoff
                [Soil].SoilWater.pond
                sum([Soil].SoilWater.SWmm) as ProfileWater
                [Soil].SoilNitrogen.NO3.kgha
                [MicroClimate].net_radn
                [MicroClimate].peta
                [MicroClimate].petr
            Soil: Latitude=0; Longitude=0
              Physical
                Thickness  BD    AirDry  LL15  DUL   SAT
                150        1.03  0.1     0.35  0.55  0.6
                150        1.03  0.1     0.35  0.55  0.6
                300        1.03  0.26    0.35  0.55  0.6
                300        1.03  0.32    0.35  0.55  0.6
                SoilCrop TeffSoil: LL=[0.35, 0.35, 0.35, 0.35]; KL=[0.1, 0.1, 0.06, 0.06]; XF=[1, 1, 1, 0]
              WaterBalance SoilWater: SummerDate=1-Nov; SummerU=6; SummerCona=3.5; WinterDate=1-Apr; WinterU=6; WinterCona=3.5; DiffusConst=40; DiffusSlope=16; Salb=0.13; CN2Bare=75; CNRed=20; CNCov=0.8; Thickness=[100, 100, 100, 200, 200, 200, 200, 200, 200]; SWCON=[0.5, 0.5, 0.5, 0.5, 0.5, 0.5, 0.5, 0.5, 0.5]
              Organic: FOMCNRatio=45
                Thickness  Carbon  SoilCNRatio  FBiom  FInert  FOM
                150        1.4     14.5         0.02   0.42    523.082
                150        0.9     14.5         0.01   0.5     317.265
                300        0.8     14.5         0.01   0.3     116.715
                300        0.6     14.5         0.01   0.9     42.9372
              Chemical
                Thickness  NO3N  NH4N  PH
                150        14.4  0.6   6.7
                150        10    0.1   6.7
                300        2.45  0.1   6.7
                300        1.08  0.1   6.7
              Sample InitialSW: Thickness=[150, 150, 300, 300]; SW=[0.55, 0.55, 0.55, 0.55]; SWUnits=Volumetric; OCUnits=Total; PHUnits=Water
              CERESSoilTemperature
              Nutrient
            Report HarvestReport: EventNames=[Teff].Harvesting
              VariableNames:
                [Clock].Today
                [Teff].Phenology.CurrentStageName as Stage
                [Teff].AboveGround.Wt as Biomass
                [Teff].AboveGround.N as BiomassN
                [Teff].Grain.Yield
                [Teff].Grain.Size as GrainSize
                [Teff].Grain.Live.Wt as GrainWt
                [Teff].Grain.Live.N as GrainN
                [Teff].Leaf.Live.N as LeafN
                [Teff].Structure.MainStemFinalNodeNo
                [Teff].Phenology.FloweringDAS as FloweringDAS
                [Teff].Phenology.MaturityDAS  as MaturityDAS
            Manager TeffHarvesting
```csharp
using APSIM.Shared.Utilities;
using System.Xml.Serialization;
using Models;
using Models.PMF;
using Models.Soils;
using System.Text;
using System.Collections.Generic;
using Models.Core;
using System;

namespace Models
{
    [Serializable] 
    public class Script : Model
    {
        [Link] Plant Teff;
        [Link] Zone zone;
                    
        
        [EventSubscribe("StartOfSimulation")]
        private void OnSimulationCommencing(object sender, EventArgs e)
        {
        }
        
        [EventSubscribe("DoManagement")]
        private void OnDoManagement(object sender, EventArgs e)
        {
            if (Teff.Phenology.CurrentPhaseName == "ReadyForHarvesting")
            {
                Teff.Harvest();
                Teff.EndCrop();
            }
        }
        
        [EventSubscribe("DoManagementCalculations")]
        private void OnDoManagementCalculations(object sender, EventArgs e)
        {
            
        }
    }
}
```
            Plant Teff: CropType=Chickpea
      Experiment Ofla
        Memo
          SOIL FERTILITY CHARACTERIZATION AND RESPONSE OF WHEAT (iTriticum aestivum) i0AND TEFF (iEragrostis tefi0) TO DIFFERENT RATES OF SLOW RELEASE AND CONVENTIONAL UREA FERTILIZERS IN VERTISOLS OF OFLA DISTRICT, SOUTHERN TIGRAY, ETHIOPIA b0bMSc THESIS b0bOKUBAY GIDAY
        Factors
          Permutation
            Factor Crop: Specification=[Sowing]
              Operations Teff
                2011-08-01  [Teff].Sow(population:100., cultivar:"Kuncho", depth:50, rowSpacing:250);
              Operations Wheat
            Factor NRate: Specification=[NRate]
              Operations 0NUSG
                2011-08-01  [Fertiliser].Apply(0, Fertiliser.Types.UreaN, 10);
              Operations 23NUSG
                2011-08-01  [Fertiliser].Apply(23, Fertiliser.Types.UreaN, 10);
              Operations 46NUSG
                2011-08-01  [Fertiliser].Apply(46, Fertiliser.Types.UreaN, 10);
              Operations 69NUSG
                2011-08-01  [Fertiliser].Apply(69, Fertiliser.Types.UreaN, 10);
              Operations 46NUC
                2011-08-01  [Fertiliser].Apply(46, Fertiliser.Types.UreaN, 10);
        Simulation Ofla
          Weather: FileName=%root%\Prototypes\Teff\Korem.met
          Clock: Start=2011-08-01; End=2011-12-31
          Summary summaryfile
          SoilArbitrator Soil Arbitrator
          MicroClimate: a_interception=0; b_interception=1; c_interception=0; d_interception=0; soil_albedo=0.23; SoilHeatFluxFraction=0.4; MinimumHeightDiffForNewLayer=0; NightInterceptionFraction=0.5; ReferenceHeight=2
          Zone Field: Area=1; Slope=0; AspectAngle=0; Altitude=50
            Irrigation
            Fertiliser
            SurfaceOrganicMatter: InitialResidueName=maize; InitialResidueType=maize; InitialResidueMass=500; InitialStandingFraction=0; InitialCPR=0; InitialCNR=65
            Operations Sowing
            Operations NRate
              1985-11-08  [Fertiliser].Apply(50, Fertiliser.Types.NH4NO3N, 10);
              1985-11-29  [Fertiliser].Apply(30, Fertiliser.Types.NH4NO3N, 10);
            Report: same as Validation.Ethiopia.Jamma.Jamma.Field.Report
            Soil: Latitude=0; Longitude=0
              Physical
                Thickness  BD    AirDry  LL15   DUL    SAT
                150        1.32  0.1     0.31   0.413  0.453
                150        1.32  0.1     0.31   0.413  0.45
                150        1.38  0.26    0.313  0.454  0.479
                300        1.33  0.32    0.376  0.495  0.498
                300        1.33  0.3     0.356  0.495  0.498
                300        1.42  0.27    0.3    0.418  0.464
                300        1.33  0.24    0.303  0.4    0.457
                300        1.35  0.31    0.31   0.37   0.435
                400        1.4   0.16    0.16   0.29   0.38
                SoilCrop WheatSoil: LL=[0.25, 0.25, 0.26, 0.32, 0.3, 0.27, 0.303, 0.31, 0.16]; KL=[0.06, 0.06, 0.06, 0.06, 0.05, 0.04, 0.02, 0.02, 0.01]; XF=[1, 1, 1, 1, 1, 1, 1, 1, 1]
                SoilCrop TeffSoil: LL=[0.25, 0.25, 0.26, 0.32, 0.3, 0.27, 0.303, 0.31, 0.16]; KL=[0.06, 0.06, 0.06, 0.06, 0.05, 0.04, 0.02, 0.02, 0.01]; XF=[1, 1, 1, 1, 1, 1, 1, 1, 1]
              WaterBalance SoilWater: SummerDate=1-Nov; SummerU=9; SummerCona=3; WinterDate=1-Apr; WinterU=9; WinterCona=3; DiffusConst=88; DiffusSlope=35.4; Salb=0.13; CN2Bare=50; CNRed=20; CNCov=0.8; Thickness=[100, 100, 100, 200, 200, 200, 200, 200, 200]; SWCON=[0.5, 0.5, 0.5, 0.5, 0.5, 0.5, 0.5, 0.5, 0.5]
              Organic: FOMCNRatio=45
                Thickness  Carbon  SoilCNRatio  FBiom  FInert  FOM
                100        1.2     14.5         0.02   0.42    268.216
                100        1       14.5         0.01   0.5     219.597
                100        0.86    14.5         0.01   0.58    179.791
                200        0.83    14.5         0.01   0.55    120.517
                200        0.58    14.5         0.01   0.86    80.7852
                200        0.54    14.5         0.01   0.9     54.1519
                200        0.47    14.5         0.01   0.95    36.2991
                200        0.5     14.5         0.01   0.95    24.332
                200        0.5     14.5         0.01   0.95    16.3103
              Chemical
                Thickness  NO3N   NH4N  PH
                100        14.4   0.6   6
                100        10.49  0.35  6
                100        6.58   0.1   6
                200        2.45   0.1   6.2
                200        1.765  0.1   6.5
                200        1.08   0.1   6.7
                200        0.15   0.1   6.8
                200        0.49   0.1   6.8
                200        0.83   0.1   6.8
              Sample InitialN: Thickness=[150, 150, 300, 300, 300, 300, 300]; SWUnits=Volumetric; OCUnits=Total; PHUnits=Water
              Sample InitialSW: Thickness=[150, 150, 300, 300, 300, 300, 300]; SW=[0.413, 0.45, 0.408, 0.374, 0.327, 0.325, 0.371]; SWUnits=Volumetric; OCUnits=Total; PHUnits=Water
              CERESSoilTemperature
              Nutrient
            Report HarvestReport: EventNames=[Teff].Harvesting
              VariableNames:
                [Clock].Today
                [Teff].Phenology.CurrentStageName as Stage
                [Teff].AboveGround.Wt as Biomass
                [Teff].Grain.Yield
                [Teff].Grain.Size as GrainSize
                [Teff].Grain.Live.Wt as GrainWt
                [Teff].Structure.MainStemFinalNodeNo
                [Teff].Phenology.FloweringDAS as FloweringDAS
                [Teff].Phenology.MaturityDAS  as MaturityDAS
            Manager TeffHarvesting
              script: same as in Validation.Ethiopia.Jamma.Jamma.Field.TeffHarvesting
            Plant Teff: CropType=Chickpea
      Experiment CWP2010
        Memo
          From Crop Water Productivity of Irrigated Teff in a WaterStressed RegionYenesew Mengiste Yihun & Abraham Mehari Haile &Bart Schultz & Teklu ErkossaWater Resour Manage (2013) 27:31153125
        Factors
          Permutation
            Factor Pop: Specification=[Sowing]
              Operations Low
                2010-12-01  [Teff].Sow(population:50., cultivar:"Kuncho", depth:50, rowSpacing:250);
              Operations High
                2010-12-01  [Teff].Sow(population:100., cultivar:"Kuncho", depth:50, rowSpacing:250);
            Factor Treatment: Specification=[IrrigationRate]
              Operations 1
                2010-12-21  [Irrigation].Apply(amount:4.4, depth:0,efficiency:1, willRunoff:false);
                2010-12-24  [Irrigation].Apply(amount:4.4, depth:0,efficiency:1, willRunoff:false);
                2010-12-27  [Irrigation].Apply(amount:4.4, depth:0,efficiency:1, willRunoff:false);
                2010-12-31  [Irrigation].Apply(amount:19.1, depth:0,efficiency:1, willRunoff:false);
                2011-01-03  [Irrigation].Apply(amount:19.1, depth:0,efficiency:1, willRunoff:false);
                2011-01-06  [Irrigation].Apply(amount:19.1, depth:0,efficiency:1, willRunoff:false);
                2011-01-10  [Irrigation].Apply(amount:26.2, depth:0,efficiency:1, willRunoff:false);
                2011-01-13  [Irrigation].Apply(amount:26.2, depth:0,efficiency:1, willRunoff:false);
                2011-01-16  [Irrigation].Apply(amount:26.2, depth:0,efficiency:1, willRunoff:false);
                2011-01-19  [Irrigation].Apply(amount:26.2, depth:0,efficiency:1, willRunoff:false);
                2011-01-22  [Irrigation].Apply(amount:26.2, depth:0,efficiency:1, willRunoff:false);
                2011-01-25  [Irrigation].Apply(amount:26.2, depth:0,efficiency:1, willRunoff:false);
                2011-01-29  [Irrigation].Apply(amount:17.8, depth:0,efficiency:1, willRunoff:false);
                2011-02-02  [Irrigation].Apply(amount:17.8, depth:0,efficiency:1, willRunoff:false);
                2011-02-05  [Irrigation].Apply(amount:17.8, depth:0,efficiency:1, willRunoff:false);
              Operations 2
                2010-12-21  [Irrigation].Apply(amount:3.3, depth:0,efficiency:1, willRunoff:false);
                2010-12-24  [Irrigation].Apply(amount:3.3, depth:0,efficiency:1, willRunoff:false);
                2010-12-27  [Irrigation].Apply(amount:3.3, depth:0,efficiency:1, willRunoff:false);
                2010-12-31  [Irrigation].Apply(amount:14.3, depth:0,efficiency:1, willRunoff:false);
                2011-01-03  [Irrigation].Apply(amount:14.3, depth:0,efficiency:1, willRunoff:false);
                2011-01-06  [Irrigation].Apply(amount:14.3, depth:0,efficiency:1, willRunoff:false);
                2011-01-10  [Irrigation].Apply(amount:19.7, depth:0,efficiency:1, willRunoff:false);
                2011-01-13  [Irrigation].Apply(amount:19.7, depth:0,efficiency:1, willRunoff:false);
                2011-01-16  [Irrigation].Apply(amount:19.7, depth:0,efficiency:1, willRunoff:false);
                2011-01-19  [Irrigation].Apply(amount:19.7, depth:0,efficiency:1, willRunoff:false);
                2011-01-22  [Irrigation].Apply(amount:19.7, depth:0,efficiency:1, willRunoff:false);
                2011-01-25  [Irrigation].Apply(amount:19.7, depth:0,efficiency:1, willRunoff:false);
                2011-01-29  [Irrigation].Apply(amount:13.4, depth:0,efficiency:1, willRunoff:false);
                2011-02-02  [Irrigation].Apply(amount:13.4, depth:0,efficiency:1, willRunoff:false);
                2011-02-05  [Irrigation].Apply(amount:13.4, depth:0,efficiency:1, willRunoff:false);
              Operations 3
                2010-12-21  [Irrigation].Apply(amount:2.2, depth:0,efficiency:1, willRunoff:false);
                2010-12-24  [Irrigation].Apply(amount:2.2, depth:0,efficiency:1, willRunoff:false);
                2010-12-27  [Irrigation].Apply(amount:2.2, depth:0,efficiency:1, willRunoff:false);
                2010-12-31  [Irrigation].Apply(amount:9.6, depth:0,efficiency:1, willRunoff:false);
                2011-01-03  [Irrigation].Apply(amount:9.6, depth:0,efficiency:1, willRunoff:false);
                2011-01-06  [Irrigation].Apply(amount:9.6, depth:0,efficiency:1, willRunoff:false);
                2011-01-10  [Irrigation].Apply(amount:13.1, depth:0,efficiency:1, willRunoff:false);
                2011-01-13  [Irrigation].Apply(amount:13.1, depth:0,efficiency:1, willRunoff:false);
                2011-01-16  [Irrigation].Apply(amount:13.1, depth:0,efficiency:1, willRunoff:false);
                2011-01-19  [Irrigation].Apply(amount:13.1, depth:0,efficiency:1, willRunoff:false);
                2011-01-22  [Irrigation].Apply(amount:13.1, depth:0,efficiency:1, willRunoff:false);
                2011-01-25  [Irrigation].Apply(amount:13.1, depth:0,efficiency:1, willRunoff:false);
                2011-01-29  [Irrigation].Apply(amount:8.9, depth:0,efficiency:1, willRunoff:false);
                2011-02-02  [Irrigation].Apply(amount:8.9, depth:0,efficiency:1, willRunoff:false);
                2011-02-05  [Irrigation].Apply(amount:8.9, depth:0,efficiency:1, willRunoff:false);
              Operations 4
                2010-12-21  [Irrigation].Apply(amount:1.1, depth:0,efficiency:1, willRunoff:false);
                2010-12-24  [Irrigation].Apply(amount:1.1, depth:0,efficiency:1, willRunoff:false);
                2010-12-27  [Irrigation].Apply(amount:1.1, depth:0,efficiency:1, willRunoff:false);
                2010-12-31  [Irrigation].Apply(amount:4.8, depth:0,efficiency:1, willRunoff:false);
                2011-01-03  [Irrigation].Apply(amount:4.8, depth:0,efficiency:1, willRunoff:false);
                2011-01-06  [Irrigation].Apply(amount:4.8, depth:0,efficiency:1, willRunoff:false);
                2011-01-10  [Irrigation].Apply(amount:6.6, depth:0,efficiency:1, willRunoff:false);
                2011-01-13  [Irrigation].Apply(amount:6.6, depth:0,efficiency:1, willRunoff:false);
                2011-01-16  [Irrigation].Apply(amount:6.6, depth:0,efficiency:1, willRunoff:false);
                2011-01-19  [Irrigation].Apply(amount:6.6, depth:0,efficiency:1, willRunoff:false);
                2011-01-22  [Irrigation].Apply(amount:6.6, depth:0,efficiency:1, willRunoff:false);
                2011-01-25  [Irrigation].Apply(amount:6.6, depth:0,efficiency:1, willRunoff:false);
                2011-01-29  [Irrigation].Apply(amount:4.4, depth:0,efficiency:1, willRunoff:false);
                2011-02-02  [Irrigation].Apply(amount:4.4, depth:0,efficiency:1, willRunoff:false);
                2011-02-05  [Irrigation].Apply(amount:4.4, depth:0,efficiency:1, willRunoff:false);
              Operations 5
                2010-12-21  [Irrigation].Apply(amount:1.1, depth:0,efficiency:1, willRunoff:false);
                2010-12-24  [Irrigation].Apply(amount:1.1, depth:0,efficiency:1, willRunoff:false);
                2010-12-27  [Irrigation].Apply(amount:1.1, depth:0,efficiency:1, willRunoff:false);
                2010-12-31  [Irrigation].Apply(amount:19.1, depth:0,efficiency:1, willRunoff:false);
                2011-01-03  [Irrigation].Apply(amount:19.1, depth:0,efficiency:1, willRunoff:false);
                2011-01-06  [Irrigation].Apply(amount:19.1, depth:0,efficiency:1, willRunoff:false);
                2011-01-10  [Irrigation].Apply(amount:26.2, depth:0,efficiency:1, willRunoff:false);
                2011-01-13  [Irrigation].Apply(amount:26.2, depth:0,efficiency:1, willRunoff:false);
                2011-01-16  [Irrigation].Apply(amount:26.2, depth:0,efficiency:1, willRunoff:false);
                2011-01-19  [Irrigation].Apply(amount:26.2, depth:0,efficiency:1, willRunoff:false);
                2011-01-22  [Irrigation].Apply(amount:26.2, depth:0,efficiency:1, willRunoff:false);
                2011-01-25  [Irrigation].Apply(amount:26.2, depth:0,efficiency:1, willRunoff:false);
                2011-01-29  [Irrigation].Apply(amount:17.8, depth:0,efficiency:1, willRunoff:false);
                2011-02-02  [Irrigation].Apply(amount:17.8, depth:0,efficiency:1, willRunoff:false);
                2011-02-05  [Irrigation].Apply(amount:17.8, depth:0,efficiency:1, willRunoff:false);
              Operations 6
                2010-12-21  [Irrigation].Apply(amount:4.4, depth:0,efficiency:1, willRunoff:false);
                2010-12-24  [Irrigation].Apply(amount:4.4, depth:0,efficiency:1, willRunoff:false);
                2010-12-27  [Irrigation].Apply(amount:4.4, depth:0,efficiency:1, willRunoff:false);
                2010-12-31  [Irrigation].Apply(amount:4.8, depth:0,efficiency:1, willRunoff:false);
                2011-01-03  [Irrigation].Apply(amount:4.8, depth:0,efficiency:1, willRunoff:false);
                2011-01-06  [Irrigation].Apply(amount:4.8, depth:0,efficiency:1, willRunoff:false);
                2011-01-10  [Irrigation].Apply(amount:26.2, depth:0,efficiency:1, willRunoff:false);
                2011-01-13  [Irrigation].Apply(amount:26.2, depth:0,efficiency:1, willRunoff:false);
                2011-01-16  [Irrigation].Apply(amount:26.2, depth:0,efficiency:1, willRunoff:false);
                2011-01-19  [Irrigation].Apply(amount:26.2, depth:0,efficiency:1, willRunoff:false);
                2011-01-22  [Irrigation].Apply(amount:26.2, depth:0,efficiency:1, willRunoff:false);
                2011-01-25  [Irrigation].Apply(amount:26.2, depth:0,efficiency:1, willRunoff:false);
                2011-01-29  [Irrigation].Apply(amount:17.8, depth:0,efficiency:1, willRunoff:false);
                2011-02-02  [Irrigation].Apply(amount:17.8, depth:0,efficiency:1, willRunoff:false);
                2011-02-05  [Irrigation].Apply(amount:17.8, depth:0,efficiency:1, willRunoff:false);
              Operations 7
                2010-12-21  [Irrigation].Apply(amount:4.4, depth:0,efficiency:1, willRunoff:false);
                2010-12-24  [Irrigation].Apply(amount:4.4, depth:0,efficiency:1, willRunoff:false);
                2010-12-27  [Irrigation].Apply(amount:4.4, depth:0,efficiency:1, willRunoff:false);
                2010-12-31  [Irrigation].Apply(amount:19.1, depth:0,efficiency:1, willRunoff:false);
                2011-01-03  [Irrigation].Apply(amount:19.1, depth:0,efficiency:1, willRunoff:false);
                2011-01-06  [Irrigation].Apply(amount:19.1, depth:0,efficiency:1, willRunoff:false);
                2011-01-10  [Irrigation].Apply(amount:6.6, depth:0,efficiency:1, willRunoff:false);
                2011-01-13  [Irrigation].Apply(amount:6.6, depth:0,efficiency:1, willRunoff:false);
                2011-01-16  [Irrigation].Apply(amount:6.6, depth:0,efficiency:1, willRunoff:false);
                2011-01-19  [Irrigation].Apply(amount:6.6, depth:0,efficiency:1, willRunoff:false);
                2011-01-22  [Irrigation].Apply(amount:6.6, depth:0,efficiency:1, willRunoff:false);
                2011-01-25  [Irrigation].Apply(amount:6.6, depth:0,efficiency:1, willRunoff:false);
                2011-01-29  [Irrigation].Apply(amount:17.8, depth:0,efficiency:1, willRunoff:false);
                2011-02-02  [Irrigation].Apply(amount:17.8, depth:0,efficiency:1, willRunoff:false);
                2011-02-05  [Irrigation].Apply(amount:17.8, depth:0,efficiency:1, willRunoff:false);
              Operations 8
                2010-12-21  [Irrigation].Apply(amount:4.4, depth:0,efficiency:1, willRunoff:false);
                2010-12-24  [Irrigation].Apply(amount:4.4, depth:0,efficiency:1, willRunoff:false);
                2010-12-27  [Irrigation].Apply(amount:4.4, depth:0,efficiency:1, willRunoff:false);
                2010-12-31  [Irrigation].Apply(amount:19.1, depth:0,efficiency:1, willRunoff:false);
                2011-01-03  [Irrigation].Apply(amount:19.1, depth:0,efficiency:1, willRunoff:false);
                2011-01-06  [Irrigation].Apply(amount:19.1, depth:0,efficiency:1, willRunoff:false);
                2011-01-10  [Irrigation].Apply(amount:26.2, depth:0,efficiency:1, willRunoff:false);
                2011-01-13  [Irrigation].Apply(amount:26.2, depth:0,efficiency:1, willRunoff:false);
                2011-01-16  [Irrigation].Apply(amount:26.2, depth:0,efficiency:1, willRunoff:false);
                2011-01-19  [Irrigation].Apply(amount:26.2, depth:0,efficiency:1, willRunoff:false);
                2011-01-22  [Irrigation].Apply(amount:26.2, depth:0,efficiency:1, willRunoff:false);
                2011-01-25  [Irrigation].Apply(amount:26.2, depth:0,efficiency:1, willRunoff:false);
                2011-01-29  [Irrigation].Apply(amount:4.4, depth:0,efficiency:1, willRunoff:false);
                2011-02-02  [Irrigation].Apply(amount:4.4, depth:0,efficiency:1, willRunoff:false);
                2011-02-05  [Irrigation].Apply(amount:4.4, depth:0,efficiency:1, willRunoff:false);
              Operations 9
                2010-12-21  [Irrigation].Apply(amount:2.2, depth:0,efficiency:1, willRunoff:false);
                2010-12-24  [Irrigation].Apply(amount:2.2, depth:0,efficiency:1, willRunoff:false);
                2010-12-27  [Irrigation].Apply(amount:2.2, depth:0,efficiency:1, willRunoff:false);
                2010-12-31  [Irrigation].Apply(amount:19.1, depth:0,efficiency:1, willRunoff:false);
                2011-01-03  [Irrigation].Apply(amount:19.1, depth:0,efficiency:1, willRunoff:false);
                2011-01-06  [Irrigation].Apply(amount:19.1, depth:0,efficiency:1, willRunoff:false);
                2011-01-10  [Irrigation].Apply(amount:26.2, depth:0,efficiency:1, willRunoff:false);
                2011-01-13  [Irrigation].Apply(amount:26.2, depth:0,efficiency:1, willRunoff:false);
                2011-01-16  [Irrigation].Apply(amount:26.2, depth:0,efficiency:1, willRunoff:false);
                2011-01-19  [Irrigation].Apply(amount:26.2, depth:0,efficiency:1, willRunoff:false);
                2011-01-22  [Irrigation].Apply(amount:26.2, depth:0,efficiency:1, willRunoff:false);
                2011-01-25  [Irrigation].Apply(amount:26.2, depth:0,efficiency:1, willRunoff:false);
                2011-01-29  [Irrigation].Apply(amount:17.8, depth:0,efficiency:1, willRunoff:false);
                2011-02-02  [Irrigation].Apply(amount:17.8, depth:0,efficiency:1, willRunoff:false);
                2011-02-05  [Irrigation].Apply(amount:17.8, depth:0,efficiency:1, willRunoff:false);
              Operations 10
                2010-12-21  [Irrigation].Apply(amount:4.4, depth:0,efficiency:1, willRunoff:false);
                2010-12-24  [Irrigation].Apply(amount:4.4, depth:0,efficiency:1, willRunoff:false);
                2010-12-27  [Irrigation].Apply(amount:4.4, depth:0,efficiency:1, willRunoff:false);
                2010-12-31  [Irrigation].Apply(amount:9.6, depth:0,efficiency:1, willRunoff:false);
                2011-01-03  [Irrigation].Apply(amount:9.6, depth:0,efficiency:1, willRunoff:false);
                2011-01-06  [Irrigation].Apply(amount:9.6, depth:0,efficiency:1, willRunoff:false);
                2011-01-10  [Irrigation].Apply(amount:26.2, depth:0,efficiency:1, willRunoff:false);
                2011-01-13  [Irrigation].Apply(amount:26.2, depth:0,efficiency:1, willRunoff:false);
                2011-01-16  [Irrigation].Apply(amount:26.2, depth:0,efficiency:1, willRunoff:false);
                2011-01-19  [Irrigation].Apply(amount:26.2, depth:0,efficiency:1, willRunoff:false);
                2011-01-22  [Irrigation].Apply(amount:26.2, depth:0,efficiency:1, willRunoff:false);
                2011-01-25  [Irrigation].Apply(amount:26.2, depth:0,efficiency:1, willRunoff:false);
                2011-01-29  [Irrigation].Apply(amount:17.8, depth:0,efficiency:1, willRunoff:false);
                2011-02-02  [Irrigation].Apply(amount:17.8, depth:0,efficiency:1, willRunoff:false);
                2011-02-05  [Irrigation].Apply(amount:17.8, depth:0,efficiency:1, willRunoff:false);
              Operations 11
                2010-12-21  [Irrigation].Apply(amount:4.4, depth:0,efficiency:1, willRunoff:false);
                2010-12-24  [Irrigation].Apply(amount:4.4, depth:0,efficiency:1, willRunoff:false);
                2010-12-27  [Irrigation].Apply(amount:4.4, depth:0,efficiency:1, willRunoff:false);
                2010-12-31  [Irrigation].Apply(amount:19.1, depth:0,efficiency:1, willRunoff:false);
                2011-01-03  [Irrigation].Apply(amount:19.1, depth:0,efficiency:1, willRunoff:false);
                2011-01-06  [Irrigation].Apply(amount:19.1, depth:0,efficiency:1, willRunoff:false);
                2011-01-10  [Irrigation].Apply(amount:13.1, depth:0,efficiency:1, willRunoff:false);
                2011-01-13  [Irrigation].Apply(amount:13.1, depth:0,efficiency:1, willRunoff:false);
                2011-01-16  [Irrigation].Apply(amount:13.1, depth:0,efficiency:1, willRunoff:false);
                2011-01-19  [Irrigation].Apply(amount:13.1, depth:0,efficiency:1, willRunoff:false);
                2011-01-22  [Irrigation].Apply(amount:13.1, depth:0,efficiency:1, willRunoff:false);
                2011-01-25  [Irrigation].Apply(amount:13.1, depth:0,efficiency:1, willRunoff:false);
                2011-01-29  [Irrigation].Apply(amount:17.8, depth:0,efficiency:1, willRunoff:false);
                2011-02-02  [Irrigation].Apply(amount:17.8, depth:0,efficiency:1, willRunoff:false);
                2011-02-05  [Irrigation].Apply(amount:17.8, depth:0,efficiency:1, willRunoff:false);
              Operations 12
                2010-12-21  [Irrigation].Apply(amount:4.4, depth:0,efficiency:1, willRunoff:false);
                2010-12-24  [Irrigation].Apply(amount:4.4, depth:0,efficiency:1, willRunoff:false);
                2010-12-27  [Irrigation].Apply(amount:4.4, depth:0,efficiency:1, willRunoff:false);
                2010-12-31  [Irrigation].Apply(amount:19.1, depth:0,efficiency:1, willRunoff:false);
                2011-01-03  [Irrigation].Apply(amount:19.1, depth:0,efficiency:1, willRunoff:false);
                2011-01-06  [Irrigation].Apply(amount:19.1, depth:0,efficiency:1, willRunoff:false);
                2011-01-10  [Irrigation].Apply(amount:26.2, depth:0,efficiency:1, willRunoff:false);
                2011-01-13  [Irrigation].Apply(amount:26.2, depth:0,efficiency:1, willRunoff:false);
                2011-01-16  [Irrigation].Apply(amount:26.2, depth:0,efficiency:1, willRunoff:false);
                2011-01-19  [Irrigation].Apply(amount:26.2, depth:0,efficiency:1, willRunoff:false);
                2011-01-22  [Irrigation].Apply(amount:26.2, depth:0,efficiency:1, willRunoff:false);
                2011-01-25  [Irrigation].Apply(amount:26.2, depth:0,efficiency:1, willRunoff:false);
                2011-01-29  [Irrigation].Apply(amount:8.9, depth:0,efficiency:1, willRunoff:false);
                2011-02-02  [Irrigation].Apply(amount:8.9, depth:0,efficiency:1, willRunoff:false);
                2011-02-05  [Irrigation].Apply(amount:8.9, depth:0,efficiency:1, willRunoff:false);
              Operations 13
                2010-12-21  [Irrigation].Apply(amount:3.3, depth:0,efficiency:1, willRunoff:false);
                2010-12-24  [Irrigation].Apply(amount:3.3, depth:0,efficiency:1, willRunoff:false);
                2010-12-27  [Irrigation].Apply(amount:3.3, depth:0,efficiency:1, willRunoff:false);
                2010-12-31  [Irrigation].Apply(amount:19.1, depth:0,efficiency:1, willRunoff:false);
                2011-01-03  [Irrigation].Apply(amount:19.1, depth:0,efficiency:1, willRunoff:false);
                2011-01-06  [Irrigation].Apply(amount:19.1, depth:0,efficiency:1, willRunoff:false);
                2011-01-10  [Irrigation].Apply(amount:26.2, depth:0,efficiency:1, willRunoff:false);
                2011-01-13  [Irrigation].Apply(amount:26.2, depth:0,efficiency:1, willRunoff:false);
                2011-01-16  [Irrigation].Apply(amount:26.2, depth:0,efficiency:1, willRunoff:false);
                2011-01-19  [Irrigation].Apply(amount:26.2, depth:0,efficiency:1, willRunoff:false);
                2011-01-22  [Irrigation].Apply(amount:26.2, depth:0,efficiency:1, willRunoff:false);
                2011-01-25  [Irrigation].Apply(amount:26.2, depth:0,efficiency:1, willRunoff:false);
                2011-01-29  [Irrigation].Apply(amount:17.8, depth:0,efficiency:1, willRunoff:false);
                2011-02-02  [Irrigation].Apply(amount:17.8, depth:0,efficiency:1, willRunoff:false);
                2011-02-05  [Irrigation].Apply(amount:17.8, depth:0,efficiency:1, willRunoff:false);
              Operations 14
                2010-12-21  [Irrigation].Apply(amount:4.4, depth:0,efficiency:1, willRunoff:false);
                2010-12-24  [Irrigation].Apply(amount:4.4, depth:0,efficiency:1, willRunoff:false);
                2010-12-27  [Irrigation].Apply(amount:4.4, depth:0,efficiency:1, willRunoff:false);
                2010-12-31  [Irrigation].Apply(amount:14.3, depth:0,efficiency:1, willRunoff:false);
                2011-01-03  [Irrigation].Apply(amount:14.3, depth:0,efficiency:1, willRunoff:false);
                2011-01-06  [Irrigation].Apply(amount:14.3, depth:0,efficiency:1, willRunoff:false);
                2011-01-10  [Irrigation].Apply(amount:26.2, depth:0,efficiency:1, willRunoff:false);
                2011-01-13  [Irrigation].Apply(amount:26.2, depth:0,efficiency:1, willRunoff:false);
                2011-01-16  [Irrigation].Apply(amount:26.2, depth:0,efficiency:1, willRunoff:false);
                2011-01-19  [Irrigation].Apply(amount:26.2, depth:0,efficiency:1, willRunoff:false);
                2011-01-22  [Irrigation].Apply(amount:26.2, depth:0,efficiency:1, willRunoff:false);
                2011-01-25  [Irrigation].Apply(amount:26.2, depth:0,efficiency:1, willRunoff:false);
                2011-01-29  [Irrigation].Apply(amount:17.8, depth:0,efficiency:1, willRunoff:false);
                2011-02-02  [Irrigation].Apply(amount:17.8, depth:0,efficiency:1, willRunoff:false);
                2011-02-05  [Irrigation].Apply(amount:17.8, depth:0,efficiency:1, willRunoff:false);
              Operations 15
                2010-12-21  [Irrigation].Apply(amount:4.4, depth:0,efficiency:1, willRunoff:false);
                2010-12-24  [Irrigation].Apply(amount:4.4, depth:0,efficiency:1, willRunoff:false);
                2010-12-27  [Irrigation].Apply(amount:4.4, depth:0,efficiency:1, willRunoff:false);
                2010-12-31  [Irrigation].Apply(amount:19.1, depth:0,efficiency:1, willRunoff:false);
                2011-01-03  [Irrigation].Apply(amount:19.1, depth:0,efficiency:1, willRunoff:false);
                2011-01-06  [Irrigation].Apply(amount:19.1, depth:0,efficiency:1, willRunoff:false);
                2011-01-10  [Irrigation].Apply(amount:19.7, depth:0,efficiency:1, willRunoff:false);
                2011-01-13  [Irrigation].Apply(amount:19.7, depth:0,efficiency:1, willRunoff:false);
                2011-01-16  [Irrigation].Apply(amount:19.7, depth:0,efficiency:1, willRunoff:false);
                2011-01-19  [Irrigation].Apply(amount:19.7, depth:0,efficiency:1, willRunoff:false);
                2011-01-22  [Irrigation].Apply(amount:19.7, depth:0,efficiency:1, willRunoff:false);
                2011-01-25  [Irrigation].Apply(amount:19.7, depth:0,efficiency:1, willRunoff:false);
                2011-01-29  [Irrigation].Apply(amount:17.8, depth:0,efficiency:1, willRunoff:false);
                2011-02-02  [Irrigation].Apply(amount:17.8, depth:0,efficiency:1, willRunoff:false);
                2011-02-05  [Irrigation].Apply(amount:17.8, depth:0,efficiency:1, willRunoff:false);
              Operations 16
                2010-12-21  [Irrigation].Apply(amount:4.4, depth:0,efficiency:1, willRunoff:false);
                2010-12-24  [Irrigation].Apply(amount:4.4, depth:0,efficiency:1, willRunoff:false);
                2010-12-27  [Irrigation].Apply(amount:4.4, depth:0,efficiency:1, willRunoff:false);
                2010-12-31  [Irrigation].Apply(amount:19.1, depth:0,efficiency:1, willRunoff:false);
                2011-01-03  [Irrigation].Apply(amount:19.1, depth:0,efficiency:1, willRunoff:false);
                2011-01-06  [Irrigation].Apply(amount:19.1, depth:0,efficiency:1, willRunoff:false);
                2011-01-10  [Irrigation].Apply(amount:26.2, depth:0,efficiency:1, willRunoff:false);
                2011-01-13  [Irrigation].Apply(amount:26.2, depth:0,efficiency:1, willRunoff:false);
                2011-01-16  [Irrigation].Apply(amount:26.2, depth:0,efficiency:1, willRunoff:false);
                2011-01-19  [Irrigation].Apply(amount:26.2, depth:0,efficiency:1, willRunoff:false);
                2011-01-22  [Irrigation].Apply(amount:26.2, depth:0,efficiency:1, willRunoff:false);
                2011-01-29  [Irrigation].Apply(amount:13.4, depth:0,efficiency:1, willRunoff:false);
                2011-02-02  [Irrigation].Apply(amount:13.4, depth:0,efficiency:1, willRunoff:false);
                2011-02-05  [Irrigation].Apply(amount:13.4, depth:0,efficiency:1, willRunoff:false);
        Simulation CWP
          Weather: FileName=MelkasaGY.met
          Clock: Start=2010-12-01; End=2011-03-31
          Summary summaryfile
          SoilArbitrator Soil Arbitrator
          MicroClimate: a_interception=0; b_interception=1; c_interception=0; d_interception=0; soil_albedo=0.23; SoilHeatFluxFraction=0.4; MinimumHeightDiffForNewLayer=0; NightInterceptionFraction=0.5; ReferenceHeight=2
          Zone Field: Area=1; Slope=0; AspectAngle=0; Altitude=50
            Irrigation
            Fertiliser
            SurfaceOrganicMatter: InitialResidueName=maize; InitialResidueType=maize; InitialResidueMass=500; InitialStandingFraction=0; InitialCPR=0; InitialCNR=65
            Operations Sowing
            Operations NRate
              2010-12-01  [Fertiliser].Apply(23.4, Fertiliser.Types.NH4N, 10);
              2011-01-01  [Fertiliser].Apply(16.1, Fertiliser.Types.UreaN, 10);
            Operations IrrigationRate
            Report: EventNames=[Clock].DoReport
              VariableNames:
                [Clock].Today
                [Soil].SoilWater.SW
                [Soil].SoilWater.Eo
                [Soil].SoilWater.Es
                [Soil].SoilWater.Drainage
                [Soil].SoilWater.Runoff
                [Soil].SoilWater.pond
                sum([Soil].SoilWater.SWmm) as ProfileWater
                [Soil].SoilNitrogen.NO3.kgha
                [MicroClimate].net_radn
                [MicroClimate].peta
                [MicroClimate].petr
                [Teff].Leaf.LAI
                [Teff].Leaf.Transpiration
                [Teff].Root.Depth
                [Teff].Leaf.Fw
                [Teff].Leaf.Fn
                [Teff].Leaf.CoverGreen
                [Teff].Total.Wt
                [Teff].Leaf.AppearedCohortNo
                [Teff].Leaf.ExpandedCohortNo
                [Teff].Leaf.SenescingCohortNo
                [Teff].Structure.TotalStemPopn
                [Teff].Leaf.CohortArea[1:10]
            Soil: Latitude=0; Longitude=0
              Physical
                Thickness  BD   AirDry  LL15  DUL   SAT
                150        1.4  0.06    0.17  0.29  0.453
                150        1.4  0.06    0.17  0.29  0.453
                150        1.5  0.06    0.18  0.32  0.41
                150        1.5  0.06    0.18  0.32  0.41
                300        1.5  0.06    0.18  0.32  0.41
                SoilCrop WheatSoil: LL=[0.17, 0.17, 0.18, 0.18, 0.18]; KL=[0.06, 0.06, 0.06, 0.06, 0.06]; XF=[1, 1, 1, 1, 1]
                SoilCrop TeffSoil: LL=[0.17, 0.17, 0.18, 0.18, 0.18]; KL=[0.06, 0.06, 0.06, 0.06, 0.06]; XF=[1, 1, 1, 0, 0]
              WaterBalance SoilWater: same as Validation.Ethiopia.Ofla.Ofla.Field.soil.SoilWater
              Organic: FOMCNRatio=45
                Thickness  Carbon  SoilCNRatio  FBiom  FInert  FOM
                150        1.1     14.5         0.02   0.42    523.082
                150        0.9     14.5         0.01   0.5     317.265
                300        0.84    14.5         0.01   0.58    116.715
                300        0.46    14.5         0.01   0.9     42.9372
              Chemical
                Thickness  NO3N     NH4N       PH
                100        19.0476  0.285714   6
                100        16.6667  0.166667   6
                100        14.2857  0.047619   6
                200        2.22222  0.0222222  6.2
                200        1.23111  0.0222222  6.5
                200        0.24     0.0222222  6.7
                200        1        0.2        6.8
                200        1        0.2        6.8
                200        1        0.2        6.8
              Sample InitialN: Thickness=[150, 150, 300, 300]; SWUnits=Volumetric; OCUnits=Total; PHUnits=Water
              Sample InitialSW: Thickness=[150, 150, 300, 300]; SW=[0.29, 0.29, 0.32, 0.32]; SWUnits=Volumetric; OCUnits=Total; PHUnits=Water
              CERESSoilTemperature
              Nutrient
            Report HarvestReport: same as Validation.Ethiopia.Ofla.Ofla.Field.HarvestReport
            Manager TeffHarvesting: same as Validation.Ethiopia.Ofla.Ofla.Field.TeffHarvesting
            Plant Teff: CropType=Chickpea
      Experiment CWP2011
        Memo
          From Crop Water Productivity of Irrigated Teff in a WaterStressed RegionYenesew Mengiste Yihun & Abraham Mehari Haile &Bart Schultz & Teklu ErkossaWater Resour Manage (2013) 27:31153125
        Factors
          Factor Treatment: Specification=[IrrigationRate]
            Operations 1
              2012-01-09  [Irrigation].Apply(amount:33, depth:0,efficiency:1, willRunoff:false);
              2012-01-15  [Irrigation].Apply(amount:33, depth:0,efficiency:1, willRunoff:false);
              2012-01-21  [Irrigation].Apply(amount:33, depth:0,efficiency:1, willRunoff:false);
              2012-01-27  [Irrigation].Apply(amount:28, depth:0,efficiency:1, willRunoff:false);
              2012-02-02  [Irrigation].Apply(amount:28, depth:0,efficiency:1, willRunoff:false);
              2012-02-08  [Irrigation].Apply(amount:28, depth:0,efficiency:1, willRunoff:false);
              2012-02-14  [Irrigation].Apply(amount:52, depth:0,efficiency:1, willRunoff:false);
              2012-02-20  [Irrigation].Apply(amount:52, depth:0,efficiency:1, willRunoff:false);
              2012-02-26  [Irrigation].Apply(amount:52, depth:0,efficiency:1, willRunoff:false);
              2012-03-03  [Irrigation].Apply(amount:40, depth:0,efficiency:1, willRunoff:false);
            Operations 2
              2012-01-09  [Irrigation].Apply(amount:15, depth:0,efficiency:1, willRunoff:false);
              2012-01-15  [Irrigation].Apply(amount:15, depth:0,efficiency:1, willRunoff:false);
              2012-01-21  [Irrigation].Apply(amount:15, depth:0,efficiency:1, willRunoff:false);
              2012-01-27  [Irrigation].Apply(amount:19, depth:0,efficiency:1, willRunoff:false);
              2012-02-02  [Irrigation].Apply(amount:19, depth:0,efficiency:1, willRunoff:false);
              2012-02-08  [Irrigation].Apply(amount:19, depth:0,efficiency:1, willRunoff:false);
              2012-02-14  [Irrigation].Apply(amount:42, depth:0,efficiency:1, willRunoff:false);
              2012-02-20  [Irrigation].Apply(amount:42, depth:0,efficiency:1, willRunoff:false);
              2012-02-26  [Irrigation].Apply(amount:42, depth:0,efficiency:1, willRunoff:false);
              2012-03-03  [Irrigation].Apply(amount:27, depth:0,efficiency:1, willRunoff:false);
            Operations 3
              2012-01-09  [Irrigation].Apply(amount:9, depth:0,efficiency:1, willRunoff:false);
              2012-01-15  [Irrigation].Apply(amount:9, depth:0,efficiency:1, willRunoff:false);
              2012-01-21  [Irrigation].Apply(amount:9, depth:0,efficiency:1, willRunoff:false);
              2012-01-27  [Irrigation].Apply(amount:12, depth:0,efficiency:1, willRunoff:false);
              2012-02-02  [Irrigation].Apply(amount:12, depth:0,efficiency:1, willRunoff:false);
              2012-02-08  [Irrigation].Apply(amount:12, depth:0,efficiency:1, willRunoff:false);
              2012-02-14  [Irrigation].Apply(amount:44, depth:0,efficiency:1, willRunoff:false);
              2012-02-20  [Irrigation].Apply(amount:44, depth:0,efficiency:1, willRunoff:false);
              2012-02-26  [Irrigation].Apply(amount:44, depth:0,efficiency:1, willRunoff:false);
              2012-03-03  [Irrigation].Apply(amount:12, depth:0,efficiency:1, willRunoff:false);
            Operations 4
              2012-01-09  [Irrigation].Apply(amount:5, depth:0,efficiency:1, willRunoff:false);
              2012-01-15  [Irrigation].Apply(amount:5, depth:0,efficiency:1, willRunoff:false);
              2012-01-21  [Irrigation].Apply(amount:5, depth:0,efficiency:1, willRunoff:false);
              2012-01-27  [Irrigation].Apply(amount:6, depth:0,efficiency:1, willRunoff:false);
              2012-02-02  [Irrigation].Apply(amount:6, depth:0,efficiency:1, willRunoff:false);
              2012-02-08  [Irrigation].Apply(amount:6, depth:0,efficiency:1, willRunoff:false);
              2012-02-14  [Irrigation].Apply(amount:31, depth:0,efficiency:1, willRunoff:false);
              2012-02-20  [Irrigation].Apply(amount:31, depth:0,efficiency:1, willRunoff:false);
              2012-02-26  [Irrigation].Apply(amount:31, depth:0,efficiency:1, willRunoff:false);
              2012-03-03  [Irrigation].Apply(amount:9, depth:0,efficiency:1, willRunoff:false);
            Operations 5
              2012-01-09  [Irrigation].Apply(amount:15, depth:0,efficiency:1, willRunoff:false);
              2012-01-15  [Irrigation].Apply(amount:15, depth:0,efficiency:1, willRunoff:false);
              2012-01-21  [Irrigation].Apply(amount:15, depth:0,efficiency:1, willRunoff:false);
              2012-01-27  [Irrigation].Apply(amount:28, depth:0,efficiency:1, willRunoff:false);
              2012-02-02  [Irrigation].Apply(amount:28, depth:0,efficiency:1, willRunoff:false);
              2012-02-08  [Irrigation].Apply(amount:28, depth:0,efficiency:1, willRunoff:false);
              2012-02-14  [Irrigation].Apply(amount:52, depth:0,efficiency:1, willRunoff:false);
              2012-02-20  [Irrigation].Apply(amount:52, depth:0,efficiency:1, willRunoff:false);
              2012-02-26  [Irrigation].Apply(amount:52, depth:0,efficiency:1, willRunoff:false);
              2012-03-03  [Irrigation].Apply(amount:40, depth:0,efficiency:1, willRunoff:false);
            Operations 6
              2012-01-09  [Irrigation].Apply(amount:33, depth:0,efficiency:1, willRunoff:false);
              2012-01-15  [Irrigation].Apply(amount:33, depth:0,efficiency:1, willRunoff:false);
              2012-01-21  [Irrigation].Apply(amount:33, depth:0,efficiency:1, willRunoff:false);
              2012-01-27  [Irrigation].Apply(amount:19, depth:0,efficiency:1, willRunoff:false);
              2012-02-02  [Irrigation].Apply(amount:19, depth:0,efficiency:1, willRunoff:false);
              2012-02-08  [Irrigation].Apply(amount:19, depth:0,efficiency:1, willRunoff:false);
              2012-02-14  [Irrigation].Apply(amount:52, depth:0,efficiency:1, willRunoff:false);
              2012-02-20  [Irrigation].Apply(amount:52, depth:0,efficiency:1, willRunoff:false);
              2012-02-26  [Irrigation].Apply(amount:52, depth:0,efficiency:1, willRunoff:false);
              2012-03-03  [Irrigation].Apply(amount:40, depth:0,efficiency:1, willRunoff:false);
            Operations 7
              2012-01-09  [Irrigation].Apply(amount:33, depth:0,efficiency:1, willRunoff:false);
              2012-01-15  [Irrigation].Apply(amount:33, depth:0,efficiency:1, willRunoff:false);
              2012-01-21  [Irrigation].Apply(amount:33, depth:0,efficiency:1, willRunoff:false);
              2012-01-27  [Irrigation].Apply(amount:28, depth:0,efficiency:1, willRunoff:false);
              2012-02-02  [Irrigation].Apply(amount:28, depth:0,efficiency:1, willRunoff:false);
              2012-02-08  [Irrigation].Apply(amount:28, depth:0,efficiency:1, willRunoff:false);
              2012-02-14  [Irrigation].Apply(amount:42, depth:0,efficiency:1, willRunoff:false);
              2012-02-20  [Irrigation].Apply(amount:42, depth:0,efficiency:1, willRunoff:false);
              2012-02-26  [Irrigation].Apply(amount:42, depth:0,efficiency:1, willRunoff:false);
              2012-03-03  [Irrigation].Apply(amount:40, depth:0,efficiency:1, willRunoff:false);
            Operations 8
              2012-01-09  [Irrigation].Apply(amount:33, depth:0,efficiency:1, willRunoff:false);
              2012-01-15  [Irrigation].Apply(amount:33, depth:0,efficiency:1, willRunoff:false);
              2012-01-21  [Irrigation].Apply(amount:33, depth:0,efficiency:1, willRunoff:false);
              2012-01-27  [Irrigation].Apply(amount:28, depth:0,efficiency:1, willRunoff:false);
              2012-02-02  [Irrigation].Apply(amount:28, depth:0,efficiency:1, willRunoff:false);
              2012-02-08  [Irrigation].Apply(amount:28, depth:0,efficiency:1, willRunoff:false);
              2012-02-14  [Irrigation].Apply(amount:52, depth:0,efficiency:1, willRunoff:false);
              2012-02-20  [Irrigation].Apply(amount:52, depth:0,efficiency:1, willRunoff:false);
              2012-02-26  [Irrigation].Apply(amount:52, depth:0,efficiency:1, willRunoff:false);
              2012-03-03  [Irrigation].Apply(amount:27, depth:0,efficiency:1, willRunoff:false);
            Operations 9
              2012-01-09  [Irrigation].Apply(amount:9, depth:0,efficiency:1, willRunoff:false);
              2012-01-15  [Irrigation].Apply(amount:9, depth:0,efficiency:1, willRunoff:false);
              2012-01-21  [Irrigation].Apply(amount:9, depth:0,efficiency:1, willRunoff:false);
              2012-01-27  [Irrigation].Apply(amount:28, depth:0,efficiency:1, willRunoff:false);
              2012-02-02  [Irrigation].Apply(amount:28, depth:0,efficiency:1, willRunoff:false);
              2012-02-08  [Irrigation].Apply(amount:28, depth:0,efficiency:1, willRunoff:false);
              2012-02-14  [Irrigation].Apply(amount:52, depth:0,efficiency:1, willRunoff:false);
              2012-02-20  [Irrigation].Apply(amount:52, depth:0,efficiency:1, willRunoff:false);
              2012-02-26  [Irrigation].Apply(amount:52, depth:0,efficiency:1, willRunoff:false);
              2012-03-03  [Irrigation].Apply(amount:40, depth:0,efficiency:1, willRunoff:false);
            Operations 10
              2012-01-09  [Irrigation].Apply(amount:33, depth:0,efficiency:1, willRunoff:false);
              2012-01-15  [Irrigation].Apply(amount:33, depth:0,efficiency:1, willRunoff:false);
              2012-01-21  [Irrigation].Apply(amount:33, depth:0,efficiency:1, willRunoff:false);
              2012-01-27  [Irrigation].Apply(amount:12, depth:0,efficiency:1, willRunoff:false);
              2012-02-02  [Irrigation].Apply(amount:12, depth:0,efficiency:1, willRunoff:false);
              2012-02-08  [Irrigation].Apply(amount:12, depth:0,efficiency:1, willRunoff:false);
              2012-02-14  [Irrigation].Apply(amount:52, depth:0,efficiency:1, willRunoff:false);
              2012-02-20  [Irrigation].Apply(amount:52, depth:0,efficiency:1, willRunoff:false);
              2012-02-26  [Irrigation].Apply(amount:52, depth:0,efficiency:1, willRunoff:false);
              2012-03-03  [Irrigation].Apply(amount:40, depth:0,efficiency:1, willRunoff:false);
            Operations 11
              2012-01-09  [Irrigation].Apply(amount:33, depth:0,efficiency:1, willRunoff:false);
              2012-01-15  [Irrigation].Apply(amount:33, depth:0,efficiency:1, willRunoff:false);
              2012-01-21  [Irrigation].Apply(amount:33, depth:0,efficiency:1, willRunoff:false);
              2012-01-27  [Irrigation].Apply(amount:28, depth:0,efficiency:1, willRunoff:false);
              2012-02-02  [Irrigation].Apply(amount:28, depth:0,efficiency:1, willRunoff:false);
              2012-02-08  [Irrigation].Apply(amount:28, depth:0,efficiency:1, willRunoff:false);
              2012-02-14  [Irrigation].Apply(amount:45, depth:0,efficiency:1, willRunoff:false);
              2012-02-20  [Irrigation].Apply(amount:45, depth:0,efficiency:1, willRunoff:false);
              2012-02-26  [Irrigation].Apply(amount:45, depth:0,efficiency:1, willRunoff:false);
              2012-03-03  [Irrigation].Apply(amount:40, depth:0,efficiency:1, willRunoff:false);
            Operations 12
              2012-01-09  [Irrigation].Apply(amount:33, depth:0,efficiency:1, willRunoff:false);
              2012-01-15  [Irrigation].Apply(amount:33, depth:0,efficiency:1, willRunoff:false);
              2012-01-21  [Irrigation].Apply(amount:33, depth:0,efficiency:1, willRunoff:false);
              2012-01-27  [Irrigation].Apply(amount:28, depth:0,efficiency:1, willRunoff:false);
              2012-02-02  [Irrigation].Apply(amount:28, depth:0,efficiency:1, willRunoff:false);
              2012-02-08  [Irrigation].Apply(amount:28, depth:0,efficiency:1, willRunoff:false);
              2012-02-14  [Irrigation].Apply(amount:52, depth:0,efficiency:1, willRunoff:false);
              2012-02-20  [Irrigation].Apply(amount:52, depth:0,efficiency:1, willRunoff:false);
              2012-02-26  [Irrigation].Apply(amount:52, depth:0,efficiency:1, willRunoff:false);
              2012-03-03  [Irrigation].Apply(amount:12, depth:0,efficiency:1, willRunoff:false);
            Operations 13
              2012-01-09  [Irrigation].Apply(amount:5, depth:0,efficiency:1, willRunoff:false);
              2012-01-15  [Irrigation].Apply(amount:5, depth:0,efficiency:1, willRunoff:false);
              2012-01-21  [Irrigation].Apply(amount:5, depth:0,efficiency:1, willRunoff:false);
              2012-01-27  [Irrigation].Apply(amount:28, depth:0,efficiency:1, willRunoff:false);
              2012-02-02  [Irrigation].Apply(amount:28, depth:0,efficiency:1, willRunoff:false);
              2012-02-08  [Irrigation].Apply(amount:28, depth:0,efficiency:1, willRunoff:false);
              2012-02-14  [Irrigation].Apply(amount:52, depth:0,efficiency:1, willRunoff:false);
              2012-02-20  [Irrigation].Apply(amount:52, depth:0,efficiency:1, willRunoff:false);
              2012-02-26  [Irrigation].Apply(amount:52, depth:0,efficiency:1, willRunoff:false);
              2012-03-03  [Irrigation].Apply(amount:40, depth:0,efficiency:1, willRunoff:false);
            Operations 14
              2012-01-09  [Irrigation].Apply(amount:33, depth:0,efficiency:1, willRunoff:false);
              2012-01-15  [Irrigation].Apply(amount:33, depth:0,efficiency:1, willRunoff:false);
              2012-01-21  [Irrigation].Apply(amount:33, depth:0,efficiency:1, willRunoff:false);
              2012-01-27  [Irrigation].Apply(amount:6, depth:0,efficiency:1, willRunoff:false);
              2012-02-02  [Irrigation].Apply(amount:6, depth:0,efficiency:1, willRunoff:false);
              2012-02-08  [Irrigation].Apply(amount:6, depth:0,efficiency:1, willRunoff:false);
              2012-02-14  [Irrigation].Apply(amount:52, depth:0,efficiency:1, willRunoff:false);
              2012-02-20  [Irrigation].Apply(amount:52, depth:0,efficiency:1, willRunoff:false);
              2012-02-26  [Irrigation].Apply(amount:52, depth:0,efficiency:1, willRunoff:false);
              2012-03-03  [Irrigation].Apply(amount:40, depth:0,efficiency:1, willRunoff:false);
            Operations 15
              2012-01-09  [Irrigation].Apply(amount:33, depth:0,efficiency:1, willRunoff:false);
              2012-01-15  [Irrigation].Apply(amount:33, depth:0,efficiency:1, willRunoff:false);
              2012-01-21  [Irrigation].Apply(amount:33, depth:0,efficiency:1, willRunoff:false);
              2012-01-27  [Irrigation].Apply(amount:28, depth:0,efficiency:1, willRunoff:false);
              2012-02-02  [Irrigation].Apply(amount:28, depth:0,efficiency:1, willRunoff:false);
              2012-02-08  [Irrigation].Apply(amount:28, depth:0,efficiency:1, willRunoff:false);
              2012-02-14  [Irrigation].Apply(amount:31, depth:0,efficiency:1, willRunoff:false);
              2012-02-20  [Irrigation].Apply(amount:31, depth:0,efficiency:1, willRunoff:false);
              2012-02-26  [Irrigation].Apply(amount:31, depth:0,efficiency:1, willRunoff:false);
              2012-03-03  [Irrigation].Apply(amount:40, depth:0,efficiency:1, willRunoff:false);
            Operations 16
              2012-01-09  [Irrigation].Apply(amount:33, depth:0,efficiency:1, willRunoff:false);
              2012-01-15  [Irrigation].Apply(amount:33, depth:0,efficiency:1, willRunoff:false);
              2012-01-21  [Irrigation].Apply(amount:33, depth:0,efficiency:1, willRunoff:false);
              2012-01-27  [Irrigation].Apply(amount:28, depth:0,efficiency:1, willRunoff:false);
              2012-02-02  [Irrigation].Apply(amount:28, depth:0,efficiency:1, willRunoff:false);
              2012-02-08  [Irrigation].Apply(amount:28, depth:0,efficiency:1, willRunoff:false);
              2012-02-14  [Irrigation].Apply(amount:52, depth:0,efficiency:1, willRunoff:false);
              2012-02-20  [Irrigation].Apply(amount:52, depth:0,efficiency:1, willRunoff:false);
              2012-02-26  [Irrigation].Apply(amount:52, depth:0,efficiency:1, willRunoff:false);
              2012-03-03  [Irrigation].Apply(amount:9, depth:0,efficiency:1, willRunoff:false);
        Simulation CWP2011
          Weather: FileName=MelkasaGY.met
          Clock: Start=2011-12-20; End=2012-03-30
          Summary summaryfile
          SoilArbitrator Soil Arbitrator
          Zone Field: Area=1; Slope=0; AspectAngle=0; Altitude=50
            MicroClimate: a_interception=0; b_interception=1; c_interception=0; d_interception=0; soil_albedo=0.23; SoilHeatFluxFraction=0.4; MinimumHeightDiffForNewLayer=0; NightInterceptionFraction=0.5; ReferenceHeight=2
            Irrigation
            Fertiliser
            SurfaceOrganicMatter: InitialResidueName=maize; InitialResidueType=maize; InitialResidueMass=500; InitialStandingFraction=0; InitialCPR=0; InitialCNR=65
            Operations Sowing
              2011-12-20  [Teff].Sow(population:100., cultivar:"Kuncho", depth:50, rowSpacing:250);
            Operations NRate
              2011-12-20  [Fertiliser].Apply(23.4, Fertiliser.Types.NH4NO3N, 10);
              2012-01-20  [Fertiliser].Apply(16.1, Fertiliser.Types.NH4NO3N, 10);
            Operations IrrigationRate
            Soil: Latitude=0; Longitude=0
              Physical: same as Validation.Ethiopia.CWP2010.CWP.Field.soil.Physical
              WaterBalance SoilWater: same as Validation.Ethiopia.Ofla.Ofla.Field.soil.SoilWater
              Organic: FOMCNRatio=45
                Thickness  Carbon  SoilCNRatio  FBiom  FInert  FOM
                150        1.1     14.5         0.02   0.42    523.082
                150        0.9     14.5         0.01   0.5     317.265
                300        0.84    14.5         0.01   0.58    116.715
                300        0.46    14.5         0.01   0.9     42.9372
              Chemical
                Thickness  NO3N     NH4N       PH
                100        33.3333  0.285714   6
                100        28.5714  0.166667   6
                100        23.8095  0.047619   6
                200        4.44444  0.0222222  6.2
                200        2.34222  0.0222222  6.5
                200        0.24     0.0222222  6.7
                200        1        0.2        6.8
                200        1        0.2        6.8
                200        1        0.2        6.8
              Sample InitialN: Thickness=[150, 150, 300, 300]; SWUnits=Volumetric; OCUnits=Total; PHUnits=Water
              Sample InitialSW: Thickness=[150, 150, 300, 300]; SW=[0.29, 0.29, 0.32, 0.32]; SWUnits=Volumetric; OCUnits=Total; PHUnits=Water
              CERESSoilTemperature
              Nutrient
            Report: EventNames=[Clock].DoReport
              VariableNames:
                [Clock].Today
                [Soil].SoilWater.SW
                [Soil].SoilWater.Eo
                [Soil].SoilWater.Es
                [Soil].SoilWater.Drainage
                [Soil].SoilWater.Runoff
                [Soil].SoilWater.pond
                sum([Soil].SoilWater.SWmm) as ProfileWater
                [Soil].SoilNitrogen.NO3.kgha
                [MicroClimate].net_radn
                [MicroClimate].peta
                [MicroClimate].petr
                [Teff].Leaf.LAI
                [Teff].Leaf.Transpiration
                [Teff].Root.Depth
                [Teff].Leaf.Fw
                [Teff].Leaf.Fn
                [Teff].Leaf.CoverGreen
                [Teff].Total.Wt
            Report HarvestReport: same as Validation.Ethiopia.Ofla.Ofla.Field.HarvestReport
            Manager TeffHarvesting: same as Validation.Ethiopia.Ofla.Ofla.Field.TeffHarvesting
            Plant Teff: CropType=Chickpea
      Experiment Mekelle2008
        Memo
          ;

          ### From

          Simulating yield response to water of Teff (Eragrostis tef) with FAOs AquaCrop

          model

          A. Araya a,b,*, S.D. Keesstra b, L. Stroosnijder b

          ###

          Field Crops Research 116 (2010) 196204
        Factors
          Factor Irrigation: Specification=[IrrigationRate]
            Operations 0
            Operations 2
              2008-09-17  [Irrigation].Apply(amount:10, depth:0,efficiency:1, willRunoff:false);
              2008-09-19  [Irrigation].Apply(amount:10, depth:0,efficiency:1, willRunoff:false);
            Operations 4
              2008-09-17  [Irrigation].Apply(amount:10, depth:0,efficiency:1, willRunoff:false);
              2008-09-19  [Irrigation].Apply(amount:10, depth:0,efficiency:1, willRunoff:false);
              2008-09-21  [Irrigation].Apply(amount:12, depth:0,efficiency:1, willRunoff:false);
              2008-09-24  [Irrigation].Apply(amount:15, depth:0,efficiency:1, willRunoff:false);
            Operations 6
              2008-09-17  [Irrigation].Apply(amount:10, depth:0,efficiency:1, willRunoff:false);
              2008-09-19  [Irrigation].Apply(amount:10, depth:0,efficiency:1, willRunoff:false);
              2008-09-21  [Irrigation].Apply(amount:12, depth:0,efficiency:1, willRunoff:false);
              2008-09-24  [Irrigation].Apply(amount:15, depth:0,efficiency:1, willRunoff:false);
              2008-09-29  [Irrigation].Apply(amount:12, depth:0,efficiency:1, willRunoff:false);
              2008-10-03  [Irrigation].Apply(amount:12, depth:0,efficiency:1, willRunoff:false);
            Operations 8
              2008-09-17  [Irrigation].Apply(amount:10, depth:0,efficiency:1, willRunoff:false);
              2008-09-19  [Irrigation].Apply(amount:10, depth:0,efficiency:1, willRunoff:false);
              2008-09-21  [Irrigation].Apply(amount:12, depth:0,efficiency:1, willRunoff:false);
              2008-09-24  [Irrigation].Apply(amount:15, depth:0,efficiency:1, willRunoff:false);
              2008-09-29  [Irrigation].Apply(amount:12, depth:0,efficiency:1, willRunoff:false);
              2008-10-03  [Irrigation].Apply(amount:12, depth:0,efficiency:1, willRunoff:false);
              2008-10-07  [Irrigation].Apply(amount:12, depth:0,efficiency:1, willRunoff:false);
              2008-10-09  [Irrigation].Apply(amount:12, depth:0,efficiency:1, willRunoff:false);
        Simulation Mekelle
          Weather: FileName=%root%\Prototypes\Teff\mekelle2008.met
          Clock: Start=2008-08-02; End=2008-11-16
          Summary summaryfile
          SoilArbitrator Soil Arbitrator
          MicroClimate: a_interception=0; b_interception=1; c_interception=0; d_interception=0; soil_albedo=0.23; SoilHeatFluxFraction=0.4; MinimumHeightDiffForNewLayer=0; NightInterceptionFraction=0.5; ReferenceHeight=2
          Zone Field: Area=1; Slope=0; AspectAngle=0; Altitude=50
            Irrigation
            Fertiliser
            SurfaceOrganicMatter: InitialResidueName=maize; InitialResidueType=maize; InitialResidueMass=500; InitialStandingFraction=0; InitialCPR=0; InitialCNR=65
            Operations Sowing
              2008-08-02  [Teff].Sow(population:100., cultivar:"DZ974", depth:50, rowSpacing:250);
            Operations NRate
              2008-08-02  [Fertiliser].Apply(60, Fertiliser.Types.UreaN, 10);
            Operations IrrigationRate
            Report: EventNames=[Clock].DoReport
              VariableNames:
                [Clock].Today
                [Soil].SoilWater.SW
                [Soil].SoilWater.Eo
                [Soil].SoilWater.Es
                [Soil].SoilWater.Drainage
                [Soil].SoilWater.Runoff
                [Soil].SoilWater.pond
                sum([Soil].SoilWater.SWmm) as ProfileWater
                sum([Soil].SoilNitrogen.NO3.kgha) as ProfileNO3
                sum([Soil].SoilWater.SWmm[1:3]) as SW30cm
                [MicroClimate].net_radn
                [MicroClimate].peta
                [MicroClimate].petr
                [Teff].Leaf.LAI
                [Teff].Total.Wt as AboveGroundBiomass
                [Teff].Grain.Live.Wt as GrainWt
                [Teff].Grain.Size as GrainSize
                [Teff].Leaf.Transpiration
                ([Teff].Leaf.Transpiration+[Soil].SoilWater.Es) as ET
                [Teff].Root.Depth
                [Teff].Leaf.Fw
                [Teff].Leaf.Fn
                [Teff].Leaf.Photosynthesis
                [Teff].Stem.Live.Wt
                [Teff].Panicle.Live.Wt
                [Teff].Leaf.Total.Wt
                [Teff].Panicle.DMDemands.Structural.DMDemandFunction
                [Teff].Leaf.Live.Wt
                [Teff].Leaf.Dead.Wt
                [Teff].Leaf.CoverGreen
                [Teff].Leaf.AppearedCohortNo
                [Teff].Leaf.ExpandedCohortNo
                [Teff].Leaf.SenescingCohortNo
                [Teff].Structure.TotalStemPopn
                [Teff].Leaf.CohortArea[1:10]
            Soil: Latitude=0; Longitude=0
              Physical
                Thickness  BD    AirDry  LL15  DUL   SAT   KS
                100        1.55  0.05    0.14  0.27  0.41  250
                100        1.55  0.05    0.14  0.27  0.41  250
                100        1.45  0.07    0.22  0.42  0.45  175
                300        1.45  0.07    0.22  0.42  0.45  175
                300        1.45  0.07    0.22  0.42  0.45  175
                SoilCrop WheatSoil: LL=[0.14, 0.14, 0.22, 0.22, 0.22]; KL=[0.06, 0.06, 0.06, 0.06, 0.05]; XF=[1, 1, 1, 1, 1]
                SoilCrop TeffSoil: LL=[0.14, 0.14, 0.22, 0.32, 0.42]; KL=[0.1, 0.1, 0.06, 0.02, 0.01]; XF=[1, 1, 1, 0.5, 0]
              WaterBalance SoilWater: SummerDate=1-Nov; SummerU=6; SummerCona=3.5; WinterDate=1-Apr; WinterU=6; WinterCona=3.5; DiffusConst=88; DiffusSlope=35.4; Salb=0.18; CN2Bare=87; CNRed=20; CNCov=0.8; Thickness=[100, 100, 100, 200, 200, 200, 200, 200, 200]; SWCON=[0.5, 0.5, 0.5, 0.5, 0.5, 0.5, 0.5, 0.5, 0.5]
              Organic: same as Validation.Ethiopia.Ofla.Ofla.Field.soil.Organic
              Chemical
                Thickness  NO3N       NH4N  PH
                100        19.3548    0.6   6
                100        6.45161    0.1   6
                100        3.44828    0.1   6
                200        0.248276   0.1   6.2
                200        0.141379   0.1   6.5
                200        0.0344828  0.1   6.7
                200        1          0.2   6.8
                200        1          0.2   6.8
                200        1          0.2   6.8
              Sample InitialN: Thickness=[100, 100, 100, 300, 300]; SWUnits=Volumetric; OCUnits=Total; PHUnits=Water
              Sample InitialSW: Thickness=[100, 100, 100, 300, 300]; SW=[0.27, 0.27, 0.42, 0.42, 0.42]; SWUnits=Volumetric; OCUnits=Total; PHUnits=Water
              CERESSoilTemperature
              Nutrient
            Report HarvestReport: EventNames=[Teff].Harvesting
              VariableNames:
                [Clock].Today
                [Teff].Phenology.CurrentStageName as Stage
                [Teff].AboveGround.Wt as Biomass
                [Teff].Grain.Yield
                [Teff].Grain.Size as GrainSize
                [Teff].Grain.Live.Wt as GrainWt
                [Teff].Structure.MainStemFinalNodeNo
                [Teff].Phenology.FloweringDAS as FloweringDAS
                [Teff].Phenology.MaturityDAS  as MaturityDASS
            Manager TeffHarvesting: same as Validation.Ethiopia.Jamma.Jamma.Field.TeffHarvesting
            Plant Teff: CropType=Chickpea
      Experiment Mekelle2009
        Memo
          ;

          ### From

          Simulating yield response to water of Teff (Eragrostis tef) with FAOs AquaCrop

          model

          A. Araya a,b,*, S.D. Keesstra b, L. Stroosnijder b

          ###

          Field Crops Research 116 (2010) 196204
        Factors
          Factor Irrigation: Specification=[IrrigationRate]
            Operations 0
            Operations 4
              2009-09-17  [Irrigation].Apply(amount:10, depth:0,efficiency:1, willRunoff:false);
              2009-09-19  [Irrigation].Apply(amount:10, depth:0,efficiency:1, willRunoff:false);
              2009-09-20  [Irrigation].Apply(amount:10, depth:0,efficiency:1, willRunoff:false);
              2009-09-24  [Irrigation].Apply(amount:10, depth:0,efficiency:1, willRunoff:false);
            Operations 9
              2009-09-17  [Irrigation].Apply(amount:10, depth:0,efficiency:1, willRunoff:false);
              2009-09-19  [Irrigation].Apply(amount:10, depth:0,efficiency:1, willRunoff:false);
              2009-09-20  [Irrigation].Apply(amount:10, depth:0,efficiency:1, willRunoff:false);
              2009-09-24  [Irrigation].Apply(amount:10, depth:0,efficiency:1, willRunoff:false);
              2009-09-27  [Irrigation].Apply(amount:10, depth:0,efficiency:1, willRunoff:false);
              2009-10-01  [Irrigation].Apply(amount:10, depth:0,efficiency:1, willRunoff:false);
              2009-10-03  [Irrigation].Apply(amount:10, depth:0,efficiency:1, willRunoff:false);
              2009-10-05  [Irrigation].Apply(amount:10, depth:0,efficiency:1, willRunoff:false);
              2009-10-07  [Irrigation].Apply(amount:10, depth:0,efficiency:1, willRunoff:false);
        Simulation Mekelle2009
          Weather: FileName=mekelleGY.met
          Clock: Start=2009-07-31; End=2009-12-31
          Summary summaryfile
          SoilArbitrator Soil Arbitrator
          MicroClimate: a_interception=0; b_interception=1; c_interception=0; d_interception=0; soil_albedo=0.23; SoilHeatFluxFraction=0.4; MinimumHeightDiffForNewLayer=0; NightInterceptionFraction=0.5; ReferenceHeight=2
          Zone Field: Area=1; Slope=0; AspectAngle=0; Altitude=50
            Irrigation
            Fertiliser
            SurfaceOrganicMatter: InitialResidueName=maize; InitialResidueType=maize; InitialResidueMass=500; InitialStandingFraction=0; InitialCPR=0; InitialCNR=65
            Operations Sowing
              2009-07-31  [Teff].Sow(population:100., cultivar:"DZ974", depth:50, rowSpacing:250);
            Operations NRate
              2009-07-31  [Fertiliser].Apply(60, Fertiliser.Types.UreaN, 10);
            Operations IrrigationRate
            Soil: Latitude=0; Longitude=0
              Physical
                Thickness  BD    AirDry  LL15  DUL   SAT
                100        1.55  0.05    0.14  0.27  0.41
                100        1.55  0.05    0.14  0.27  0.41
                100        1.45  0.07    0.22  0.42  0.45
                300        1.45  0.07    0.22  0.42  0.45
                300        1.45  0.07    0.22  0.42  0.45
                SoilCrop WheatSoil: LL=[0.14, 0.14, 0.22, 0.22, 0.22]; KL=[0.06, 0.06, 0.06, 0.06, 0.05]; XF=[1, 1, 1, 1, 1]
                SoilCrop TeffSoil: LL=[0.14, 0.14, 0.22, 0.22, 0.22]; KL=[0.1, 0.08, 0.04, 0.02, 0.01]; XF=[1, 1, 1, 1, 0]
              WaterBalance SoilWater: SummerDate=1-Nov; SummerU=9; SummerCona=3; WinterDate=1-Apr; WinterU=9; WinterCona=3; DiffusConst=88; DiffusSlope=35.4; Salb=0.13; CN2Bare=87; CNRed=20; CNCov=0.8; Thickness=[100, 100, 100, 200, 200, 200, 200, 200, 200]; SWCON=[0.5, 0.5, 0.5, 0.5, 0.5, 0.5, 0.5, 0.5, 0.5]
              Organic: same as Validation.Ethiopia.Ofla.Ofla.Field.soil.Organic
              Chemical
                Thickness  NO3N       NH4N       PH
                100        4.51613    0.387097   6
                100        1.93548    0.0645161  6
                100        0.0689655  0.0689655  6
                200        0.0229885  0.0229885  6.2
                200        0.0229885  0.0229885  6.5
                200        0.0229885  0.0229885  6.7
                200        1          0.2        6.8
                200        1          0.2        6.8
                200        1          0.2        6.8
              Sample InitialN: Thickness=[100, 100, 100, 300, 300]; SWUnits=Volumetric; OCUnits=Total; PHUnits=Water
              Sample InitialSW: Thickness=[100, 100, 100, 300, 300]; SW=[0.27, 0.27, 0.42, 0.42, 0.42]; SWUnits=Volumetric; OCUnits=Total; PHUnits=Water
              CERESSoilTemperature
              Nutrient
            Report: same as Validation.Ethiopia.Mekelle2008.Mekelle.Field.Report
            Report HarvestReport: same as Validation.Ethiopia.Ofla.Ofla.Field.HarvestReport
            Manager TefHarvesting: same as Validation.Ethiopia.Jamma.Jamma.Field.TeffHarvesting
            Plant Teff: CropType=Chickpea
      Folder Lysimeter
        Simulation Lysimeter2
          Weather: FileName=MelkasaGY.met
          Clock: Start=2011-03-07; End=2011-06-30
          Summary summaryfile
          SoilArbitrator Soil Arbitrator
          Zone Field: Area=1; Slope=0; AspectAngle=0; Altitude=50
            MicroClimate: a_interception=0; b_interception=1; c_interception=0; d_interception=0; soil_albedo=0.23; SoilHeatFluxFraction=0.4; MinimumHeightDiffForNewLayer=0; NightInterceptionFraction=0.5; ReferenceHeight=2
            Irrigation
            Fertiliser
            SurfaceOrganicMatter: InitialResidueName=maize; InitialResidueType=maize; InitialResidueMass=500; InitialStandingFraction=0; InitialCPR=0; InitialCNR=65
            Operations Sowing
              2011-03-07  [Teff].Sow(population:100., cultivar:"Ayana", depth:50, rowSpacing:250);
            Operations NRate
              1985-11-08  [Fertiliser].Apply(50, Fertiliser.Types.NH4NO3N, 10);
              1985-11-29  [Fertiliser].Apply(30, Fertiliser.Types.NH4NO3N, 10);
            Operations IrrigationRate
              2011-03-17  [Irrigation].Apply(amount:8, depth:0,efficiency:1, willRunoff:false);
              2011-03-21  [Irrigation].Apply(amount:10.4, depth:0,efficiency:1, willRunoff:false);
              2011-03-25  [Irrigation].Apply(amount:10.1, depth:0,efficiency:1, willRunoff:false);
              2011-03-29  [Irrigation].Apply(amount:22.2, depth:0,efficiency:1, willRunoff:false);
              2011-04-03  [Irrigation].Apply(amount:16.7, depth:0,efficiency:1, willRunoff:false);
              2011-04-07  [Irrigation].Apply(amount:15.3, depth:0,efficiency:1, willRunoff:false);
              2011-04-10  [Irrigation].Apply(amount:16.5, depth:0,efficiency:1, willRunoff:false);
              2011-04-15  [Irrigation].Apply(amount:32.5, depth:0,efficiency:1, willRunoff:false);
              2011-04-21  [Irrigation].Apply(amount:30.8, depth:0,efficiency:1, willRunoff:false);
              2011-04-26  [Irrigation].Apply(amount:30, depth:0,efficiency:1, willRunoff:false);
              2011-05-01  [Irrigation].Apply(amount:27.2, depth:0,efficiency:1, willRunoff:false);
              2011-05-05  [Irrigation].Apply(amount:23.7, depth:0,efficiency:1, willRunoff:false);
              2011-05-09  [Irrigation].Apply(amount:27.3, depth:0,efficiency:1, willRunoff:false);
              2011-05-14  [Irrigation].Apply(amount:27.2, depth:0,efficiency:1, willRunoff:false);
              2011-05-19  [Irrigation].Apply(amount:12.4, depth:0,efficiency:1, willRunoff:false);
              2011-05-24  [Irrigation].Apply(amount:24.3, depth:0,efficiency:1, willRunoff:false);
            Report: EventNames=[Clock].DoReport
              VariableNames:
                [Clock].Today
                [Soil].SoilWater.SW
                [Soil].SoilWater.Eo
                [Soil].SoilWater.Es
                [Soil].SoilWater.Drainage
                [Soil].SoilWater.Runoff
                [Soil].SoilWater.pond
                sum([Soil].SoilWater.SWmm[1:2]) as SW30cm
                [Soil].SoilNitrogen.NO3.kgha
                [MicroClimate].net_radn
                [MicroClimate].peta
                [MicroClimate].petr
                [Teff].Leaf.LAI
                [Teff].Leaf.Transpiration
                ([Teff].Leaf.Transpiration+[Soil].SoilWater.Es) as ET
            Soil: Latitude=0; Longitude=0
              Physical
                Thickness  BD   AirDry  LL15  DUL   SAT
                150        1.4  0.06    0.17  0.29  0.453
                150        1.4  0.06    0.17  0.29  0.453
                300        1.5  0.06    0.18  0.32  0.41
                300        1.5  0.06    0.18  0.32  0.41
                SoilCrop WheatSoil: LL=[0.17, 0.17, 0.18, 0.18]; KL=[0.06, 0.06, 0.06, 0.06]; XF=[1, 1, 1, 1]
                SoilCrop TeffSoil: LL=[0.17, 0.17, 0.18, 0.18]; KL=[0.06, 0.06, 0.04, 0.02]; XF=[1, 1, 1, 1]
              WaterBalance SoilWater: same as Validation.Ethiopia.Ofla.Ofla.Field.soil.SoilWater
              Organic: same as Validation.Ethiopia.Ofla.Ofla.Field.soil.Organic
              Chemical: same as Validation.Ethiopia.Ofla.Ofla.Field.soil.Chemical
              Sample InitialN: Thickness=[150, 150, 300, 300, 300, 300, 300]; SWUnits=Volumetric; OCUnits=Total; PHUnits=Water
              Sample InitialSW: Thickness=[150, 150, 300, 300, 300, 300, 300]; SW=[0.413, 0.453, 0.408, 0.374, 0.327, 0.325, 0.371]; SWUnits=Volumetric; OCUnits=Total; PHUnits=Water
              CERESSoilTemperature
              Nutrient
            Report HarvestReport: same as Validation.Ethiopia.Ofla.Ofla.Field.HarvestReport
            Manager TeffHarvesting: same as Validation.Ethiopia.Jamma.Jamma.Field.TeffHarvesting
            Plant Teff: CropType=Chickpea
        Simulation Lysimeter4
          Weather: FileName=MelkasaGY.met
          Clock: Start=2012-03-11; End=2012-06-30
          Summary summaryfile
          SoilArbitrator Soil Arbitrator
          Zone Field: Area=1; Slope=0; AspectAngle=0; Altitude=50
            MicroClimate: a_interception=0; b_interception=1; c_interception=0; d_interception=0; soil_albedo=0.23; SoilHeatFluxFraction=0.4; MinimumHeightDiffForNewLayer=0; NightInterceptionFraction=0.5; ReferenceHeight=2
            Irrigation
            Fertiliser
            SurfaceOrganicMatter: InitialResidueName=maize; InitialResidueType=maize; InitialResidueMass=500; InitialStandingFraction=0; InitialCPR=0; InitialCNR=65
            Operations Sowing
              2012-03-11  [Teff].Sow(population:100., cultivar:"Ayana", depth:50, rowSpacing:250);
            Operations NRate
              1985-11-08  [Fertiliser].Apply(50, Fertiliser.Types.NH4NO3N, 10);
              1985-11-29  [Fertiliser].Apply(30, Fertiliser.Types.NH4NO3N, 10);
            Operations IrrigationRate
              2012-03-21  [Irrigation].Apply(amount:23.7, depth:0,efficiency:1, willRunoff:false);
              2012-03-26  [Irrigation].Apply(amount:13.3, depth:0,efficiency:1, willRunoff:false);
              2012-03-29  [Irrigation].Apply(amount:5, depth:0,efficiency:1, willRunoff:false);
              2012-04-05  [Irrigation].Apply(amount:21.7, depth:0,efficiency:1, willRunoff:false);
              2012-04-13  [Irrigation].Apply(amount:36.7, depth:0,efficiency:1, willRunoff:false);
              2012-04-19  [Irrigation].Apply(amount:33.1, depth:0,efficiency:1, willRunoff:false);
              2012-04-23  [Irrigation].Apply(amount:22.1, depth:0,efficiency:1, willRunoff:false);
              2012-04-27  [Irrigation].Apply(amount:22.1, depth:0,efficiency:1, willRunoff:false);
              2012-04-30  [Irrigation].Apply(amount:25.6, depth:0,efficiency:1, willRunoff:false);
              2012-05-03  [Irrigation].Apply(amount:20.2, depth:0,efficiency:1, willRunoff:false);
              2012-05-12  [Irrigation].Apply(amount:33.7, depth:0,efficiency:1, willRunoff:false);
              2012-05-20  [Irrigation].Apply(amount:30.2, depth:0,efficiency:1, willRunoff:false);
              2012-05-24  [Irrigation].Apply(amount:12.3, depth:0,efficiency:1, willRunoff:false);
            Report: same as Validation.Ethiopia.Lysimeter.Lysimeter2.Field.Report
            Soil: same as Validation.Ethiopia.Lysimeter.Lysimeter2.Field.soil
            Report HarvestReport: same as Validation.Ethiopia.Ofla.Ofla.Field.HarvestReport
            Manager TeffHarvesting: same as Validation.Ethiopia.Jamma.Jamma.Field.TeffHarvesting
            Plant Teff: CropType=Chickpea
      Experiment Mekelle2004
        Memo
          ;

          ### From

          Simulating yield response to water of Teff (Eragrostis tef) with FAOs AquaCrop

          model

          A. Araya a,b,*, S.D. Keesstra b, L. Stroosnijder b

          ###

          Field Crops Research 116 (2010) 196204
        Factors
          Factor N: Specification=[NRate]
            Operations 0
              2004-07-05  [Fertiliser].Apply(0, Fertiliser.Types.UreaN, 10);
            Operations 1
              2004-07-05  [Fertiliser].Apply(70, Fertiliser.Types.UreaN, 10);
            Operations 2
              2004-07-05  [Fertiliser].Apply(105, Fertiliser.Types.UreaN, 10);
            Operations 0Split
              2004-07-05  [Fertiliser].Apply(0, Fertiliser.Types.UreaN, 10);
              2004-08-05  [Fertiliser].Apply(0, Fertiliser.Types.UreaN, 10);
            Operations 1Split
              2004-07-05  [Fertiliser].Apply(23, Fertiliser.Types.UreaN, 10);
              2004-08-05  [Fertiliser].Apply(47, Fertiliser.Types.UreaN, 10);
            Operations 2Split
              2004-07-05  [Fertiliser].Apply(35, Fertiliser.Types.UreaN, 10);
              2004-08-05  [Fertiliser].Apply(70, Fertiliser.Types.UreaN, 10);
        Simulation Mekelle2004
          Weather: FileName=mekelleGY.met
          Clock: Start=2004-07-05; End=2004-12-31
          Summary summaryfile
          SoilArbitrator Soil Arbitrator
          Zone Field: Area=1; Slope=0; AspectAngle=0; Altitude=50
            MicroClimate: a_interception=0; b_interception=1; c_interception=0; d_interception=0; soil_albedo=0.23; SoilHeatFluxFraction=0.4; MinimumHeightDiffForNewLayer=0; NightInterceptionFraction=0.5; ReferenceHeight=2
            Irrigation
            Fertiliser
            SurfaceOrganicMatter: InitialResidueName=maize; InitialResidueType=maize; InitialResidueMass=500; InitialStandingFraction=0; InitialCPR=0; InitialCNR=65
            Operations Sowing
              2004-07-05  [Teff].Sow(population:100., cultivar:"DZ974", depth:50, rowSpacing:250);
            Operations NRate
              2008-08-02  [Fertiliser].Apply(60, Fertiliser.Types.UreaN, 10);
            Operations IrrigationRate
              2004-08-05  [Irrigation].Apply(amount:30, depth:0,efficiency:1, willRunoff:false);
              Memo
                Note that the timing and volume of this supplemental irrigation are not known.  The authors simply inform the reader that supplemental irrigation was applied at stem elongation to avoid terminal water stress.
            Report: same as Validation.Ethiopia.Mekelle2008.Mekelle.Field.Report
            Soil: Latitude=0; Longitude=0
              Physical
                Thickness  BD    AirDry  LL15  DUL   SAT   KS
                100        1.55  0.05    0.14  0.27  0.41  250
                100        1.55  0.05    0.14  0.27  0.41  250
                100        1.45  0.07    0.22  0.42  0.45  175
                300        1.45  0.07    0.22  0.42  0.45  175
                300        1.45  0.07    0.22  0.42  0.45  175
                SoilCrop WheatSoil: LL=[0.14, 0.14, 0.22, 0.22, 0.22]; KL=[0.06, 0.06, 0.06, 0.06, 0.05]; XF=[1, 1, 1, 1, 1]
                SoilCrop TeffSoil: LL=[0.14, 0.14, 0.22, 0.22, 0.22]; KL=[0.1, 0.1, 0.06, 0.02, 0.01]; XF=[1, 1, 1, 1, 0]
              WaterBalance SoilWater: same as Validation.Ethiopia.Mekelle2008.Mekelle.Field.soil.SoilWater
              Organic: same as Validation.Ethiopia.Ofla.Ofla.Field.soil.Organic
              Chemical: same as Validation.Ethiopia.Mekelle2008.Mekelle.Field.soil.Chemical
              Sample InitialN: Thickness=[100, 100, 100, 300, 300]; SWUnits=Volumetric; OCUnits=Total; PHUnits=Water
              Sample InitialSW: Thickness=[100, 100, 100, 300, 300]; SW=[0.27, 0.27, 0.42, 0.42, 0.42]; SWUnits=Volumetric; OCUnits=Total; PHUnits=Water
              CERESSoilTemperature
              Nutrient
            Report HarvestReport: same as Validation.Ethiopia.Mekelle2008.Mekelle.Field.HarvestReport
            Manager TeffHarvesting: same as Validation.Ethiopia.Jamma.Jamma.Field.TeffHarvesting
            Plant Teff: CropType=Chickpea
      Experiment Mekelle2005
        Memo
          ;

          ### From

          Simulating yield response to water of Teff (Eragrostis tef) with FAOs AquaCrop

          model

          A. Araya a,b,*, S.D. Keesstra b, L. Stroosnijder b

          ###

          Field Crops Research 116 (2010) 196204
        Factors
          Factor N: Specification=[NRate]
            Operations 0
              2005-07-01  [Fertiliser].Apply(0, Fertiliser.Types.UreaN, 10);
            Operations 1
              2005-07-01  [Fertiliser].Apply(70, Fertiliser.Types.UreaN, 10);
            Operations 2
              2005-07-01  [Fertiliser].Apply(105, Fertiliser.Types.UreaN, 10);
            Operations 0Split
              2005-07-01  [Fertiliser].Apply(0, Fertiliser.Types.UreaN, 10);
              2005-08-01  [Fertiliser].Apply(0, Fertiliser.Types.UreaN, 10);
            Operations 1Split
              2005-07-01  [Fertiliser].Apply(23, Fertiliser.Types.UreaN, 10);
              2005-08-01  [Fertiliser].Apply(47, Fertiliser.Types.UreaN, 10);
            Operations 2Split
              2005-07-01  [Fertiliser].Apply(35, Fertiliser.Types.UreaN, 10);
              2005-08-01  [Fertiliser].Apply(70, Fertiliser.Types.UreaN, 10);
        Simulation Mekelle2005
          Weather: FileName=mekelleGY.met
          Clock: Start=2005-07-01; End=2005-12-31
          Summary summaryfile
          SoilArbitrator Soil Arbitrator
          Zone Field: Area=1; Slope=0; AspectAngle=0; Altitude=50
            MicroClimate: a_interception=0; b_interception=1; c_interception=0; d_interception=0; soil_albedo=0.23; SoilHeatFluxFraction=0.4; MinimumHeightDiffForNewLayer=0; NightInterceptionFraction=0.5; ReferenceHeight=2
            Irrigation
            Fertiliser
            SurfaceOrganicMatter: InitialResidueName=maize; InitialResidueType=maize; InitialResidueMass=500; InitialStandingFraction=0; InitialCPR=0; InitialCNR=65
            Operations Sowing
              2005-07-01  [Teff].Sow(population:100., cultivar:"DZ974", depth:50, rowSpacing:250);
            Operations NRate
              2008-08-02  [Fertiliser].Apply(60, Fertiliser.Types.UreaN, 10);
            Operations IrrigationRate
            Report: same as Validation.Ethiopia.Mekelle2008.Mekelle.Field.Report
            Soil: same as Validation.Ethiopia.Mekelle2004.Mekelle2004.Field.soil
            Report HarvestReport: same as Validation.Ethiopia.Mekelle2008.Mekelle.Field.HarvestReport
            Manager TeffHarvesting: same as Validation.Ethiopia.Jamma.Jamma.Field.TeffHarvesting
            Plant Teff: CropType=Chickpea
    Folder ControlledEnvironment
      Experiment VanDelden
        Factors
          Permutation
            Factor Cv: Specification=[Sowing]
              Operations Gibe
                2000-01-01  [Teff].Sow(population:100., cultivar:"Gibe", depth:50, rowSpacing:250);
              Operations Ziquala
                2000-01-01  [Teff].Sow(population:100., cultivar:"Ziquala", depth:50, rowSpacing:250);
              Operations Ayana
                2000-01-01  [Teff].Sow(population:100., cultivar:"Ayana", depth:50, rowSpacing:250);
              Operations 04T19
                2000-01-01  [Teff].Sow(population:100., cultivar:"04T19", depth:50, rowSpacing:250);
            Factor PP: Specification=[ControlledEnvironment]
              ControlledEnvironment 1: MaxT=23; MinT=16; Rain=0; Radn=25; PanEvap=5; VP=2; Wind=0; CO2=350; AirPressure=1010; Latitude=-2; DayLength=9
              ControlledEnvironment 2: MaxT=23; MinT=16; Rain=0; Radn=25; PanEvap=5; VP=2; Wind=0; CO2=350; AirPressure=1010; Latitude=-2; DayLength=10.5
              ControlledEnvironment 3: MaxT=23; MinT=16; Rain=0; Radn=25; PanEvap=5; VP=2; Wind=0; CO2=350; AirPressure=1010; Latitude=-2; DayLength=12
              ControlledEnvironment 4: MaxT=23; MinT=16; Rain=0; Radn=25; PanEvap=5; VP=2; Wind=0; CO2=350; AirPressure=1010; Latitude=-2; DayLength=13.5
              ControlledEnvironment 5: MaxT=23; MinT=16; Rain=0; Radn=25; PanEvap=5; VP=2; Wind=0; CO2=350; AirPressure=1010; Latitude=-2; DayLength=15
              ControlledEnvironment 6: MaxT=23; MinT=16; Rain=0; Radn=25; PanEvap=5; VP=2; Wind=0; CO2=350; AirPressure=1010; Latitude=-2; DayLength=16.5
        Simulation VanDelden
          Clock: Start=2000-01-01; End=2000-12-31
          ControlledEnvironment: MaxT=23; MinT=16; Rain=0; Radn=25; PanEvap=5; VP=2; Wind=0; CO2=350; AirPressure=1010; Latitude=-2; DayLength=9
          Summary summaryfile
          SoilArbitrator Soil Arbitrator
          MicroClimate: a_interception=0; b_interception=1; c_interception=0; d_interception=0; soil_albedo=0.23; SoilHeatFluxFraction=0.4; MinimumHeightDiffForNewLayer=0; NightInterceptionFraction=0.5; ReferenceHeight=2
          Zone Field: Area=1; Slope=0; AspectAngle=0; Altitude=50
            Irrigation
            Fertiliser
            SurfaceOrganicMatter: InitialResidueName=maize; InitialResidueType=maize; InitialResidueMass=500; InitialStandingFraction=0; InitialCPR=0; InitialCNR=65
            Operations Sowing
            Operations NRate
              1985-11-08  [Fertiliser].Apply(50, Fertiliser.Types.NH4NO3N, 10);
              1985-11-29  [Fertiliser].Apply(30, Fertiliser.Types.NH4NO3N, 10);
            Report: EventNames=[Clock].DoReport
              VariableNames:
                [Clock].Today
                [Teff].Phenology.DaysAfterSowing
                [Teff].Leaf.AppearedCohortNo
            Soil: Latitude=0; Longitude=0
              Physical
                Thickness  BD    AirDry  LL15   DUL    SAT
                150        1.32  0.1     0.25   0.413  0.45
                150        1.32  0.1     0.25   0.413  0.45
                150        1.38  0.26    0.26   0.454  0.479
                300        1.33  0.32    0.32   0.495  0.498
                300        1.33  0.3     0.3    0.495  0.498
                300        1.42  0.27    0.27   0.418  0.464
                300        1.33  0.24    0.303  0.4    0.457
                300        1.35  0.31    0.31   0.37   0.435
                400        1.4   0.16    0.16   0.29   0.38
                SoilCrop WheatSoil: LL=[0.25, 0.25, 0.26, 0.32, 0.3, 0.27, 0.303, 0.31, 0.16]; KL=[0.06, 0.06, 0.06, 0.06, 0.05, 0.04, 0.02, 0.02, 0.01]; XF=[1, 1, 1, 1, 1, 1, 1, 1, 1]
                SoilCrop TeffSoil: LL=[0.25, 0.25, 0.26, 0.32, 0.3, 0.27, 0.303, 0.31, 0.16]; KL=[0.06, 0.06, 0.06, 0.06, 0.05, 0.04, 0.02, 0.02, 0.01]; XF=[1, 1, 1, 1, 1, 1, 1, 1, 1]
              WaterBalance SoilWater: same as Validation.Ethiopia.Ofla.Ofla.Field.soil.SoilWater
              Organic: same as Validation.Ethiopia.Ofla.Ofla.Field.soil.Organic
              Chemical: same as Validation.Ethiopia.Ofla.Ofla.Field.soil.Chemical
              Sample InitialN: Thickness=[150, 150, 300, 300, 300, 300, 300]; SWUnits=Volumetric; OCUnits=Total; PHUnits=Water
              Sample InitialSW: Thickness=[150, 150, 300, 300, 300, 300, 300]; SW=[0.413, 0.45, 0.408, 0.374, 0.327, 0.325, 0.371]; SWUnits=Volumetric; OCUnits=Total; PHUnits=Water
              CERESSoilTemperature
              Nutrient
            Manager TeffHarvesting: same as Validation.Ethiopia.Jamma.Jamma.Field.TeffHarvesting
            Plant Teff: CropType=Chickpea
            Report ControlledEnvironmentReport: EventNames=[Teff].Harvesting
              VariableNames:
                [Clock].Today
                [ControlledEnvironment].DayLength
                [Teff].Phenology.CurrentStageName
                [Teff].AboveGround.Wt
                [Teff].Grain.Size as GrainSize
                [Teff].Grain.Wt
                [Teff].Structure.FinalLeafNumber
                [Teff].Phenology.PanicleInitiationDAS as PanicleInitiationDAS
                [Teff].Phenology.FloweringDAS as FloweringDAS
                [Teff].Phenology.MaturityDAS  as MaturityDAS
  Folder Sensibility
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