Simulations: Version=220
  DataStore
    ExcelInput: FileNames=[ThinzarObserved.xlsx]; SheetNames=[Observed]
      PredictedObserved: PredictedTableName=Report; ObservedTableName=Observed; FieldNameUsedForMatch=SimulationName; FieldName2UsedForMatch=Clock.Today; AllColumns=false
        Tests
          Memo Note
            Where:
             - n: The number of PO (predicted-observed) pairs for the given variable;
             - Slope: The slope of the straight line linear regression. A perfect fit would have a value of 1;
             - Intercept: The intercept of the straight line linear regression. A perfect fit would have a value of 0;
             - SEslope: Standard error in the slope;
             - SEintercept: Standard error in the intercept.;
             - R2: The value for the coefficient of determination. It varies between 0 and 1, where 1 is a perfect fit;
             - RMSE: Root Mean Squared Error. 0 is a perfect fit. Values less than half the standard deviation of the observed data are acceptable;
             - NSE: Nash-Sutcliffe Efficiency. Indicates how well the PO data fits the 1:1 line. Ranges from -infinity to 1 with 1 being the optimal value while values  between 0 and 1 are generally viewed as acceptable. Values < 0 indicate unacceptable model performance;
             - ME: Mean Error between predicted and observed values. 0 is a perfect fit;
             - MAE: Mean Absolute Error. 0 is a perfect fit. Values less than half the standard deviation of the observed data are acceptable;
             - RSR: Ratio between the RMSE and the standard deviation of observations. 0 is a perfect fit;
             - RMR: Ratio between the RMSE and the mean of observations. 0 indicates a perfect fit;
  Folder Validation
    Folder NewZealand
      Folder Lincoln
        Folder ThinzarExperiment
          Documentation
            The simulations in this folder aim to replicate the experiment conducted by [#ThinzarSoeBlaclMoot], with a primary focus on Perennial Ryegrass and White Clover monocultures under nitrogen‑plus and nitrogen‑minus treatments. This folder contains multiple experiments built using two pasture modelling frameworks namely AGPasture and Pasture Model. Both models are used to explore differences in growth and yield under constrasting nitrogen treatments for Perennial Ryegrass. AGPasture is used for White Colver. Defoliation is implemented using AgPasture's SimpleGrazing and Management operations for scheduled defoliation. The defoliation, irriation and fertilisation events are consistent with the original experiment.

            The experiment is set up under the following conditions:
            1. Location: Lincoln, New Zealand
            2. Clock: 1/03/2017 - 30/06/2021
            3. Soil: The soil was a Wakanui silt loam with medium fertility
            4. Sowing date: 2017-03-31
            5. Irrigation: Followed the schedule provided
            6. Fertilisation: Followed the schedule provided
            7. Defoliation: Followed the schedule
            8. Report variables: Biomass, LAI, NConc and NDVI
            8. Observed Excel: ThinzarObserved.xlsx
          Experiment AgPastureRemoveBiomass
            Factors
              Permutation
                Factor Ferilisation
                  CompositeFactor LincolnNMinus
                    Specifications:
                      [FertilisationEvents]
                      [DefoliationSchedule]
                    Operations FertilisationEvents
                      2017-03-23  [Fertiliser].Apply(amount: 50, type: "UreaN")
                      2017-04-01  [Fertiliser].Apply(amount: 0, type: "UreaN")
                      2025-08-08  [Fertiliser].Apply(amount: 0, type: "UreaN")
                      2017-09-22  [Fertiliser].Apply(amount: 0, type: "UreaN")
                      2017-10-27  [Fertiliser].Apply(amount: 0, type: "UreaN")
                      2017-12-08  [Fertiliser].Apply(amount: 0, type: "UreaN")
                      2018-01-22  [Fertiliser].Apply(amount: 0, type: "UreaN")
                      2018-02-21  [Fertiliser].Apply(amount: 0, type: "UreaN")
                      2018-03-28  [Fertiliser].Apply(amount: 0, type: "UreaN")
                      2018-05-23  [Fertiliser].Apply(amount: 0, type: "UreaN")
                      2018-08-10  [Fertiliser].Apply(amount: 0, type: "UreaN")
                      2018-09-26  [Fertiliser].Apply(amount: 0, type: "UreaN")
                      2018-11-04  [Fertiliser].Apply(amount: 0, type: "UreaN")
                      2018-12-14  [Fertiliser].Apply(amount: 0, type: "UreaN")
                      2019-01-25  [Fertiliser].Apply(amount: 0, type: "UreaN")
                      2019-02-28  [Fertiliser].Apply(amount: 0, type: "UreaN")
                      2019-04-08  [Fertiliser].Apply(amount: 0, type: "UreaN")
                      2019-05-27  [Fertiliser].Apply(amount: 0, type: "UreaN")
                      2019-08-09  [Fertiliser].Apply(amount: 0, type: "UreaN")
                      2019-09-23  [Fertiliser].Apply(amount: 0, type: "UreaN")
                      2019-11-08  [Fertiliser].Apply(amount: 0, type: "UreaN")
                      2019-12-22  [Fertiliser].Apply(amount: 0, type: "UreaN")
                      2020-01-23  [Fertiliser].Apply(amount: 0, type: "UreaN")
                      2020-02-26  [Fertiliser].Apply(amount: 0, type: "UreaN")
                      2020-04-08  [Fertiliser].Apply(amount: 0, type: "UreaN")
                      2020-06-10  [Fertiliser].Apply(amount: 0, type: "UreaN")
                      2020-08-10  [Fertiliser].Apply(amount: 0, type: "UreaN")
                      2020-10-02  [Fertiliser].Apply(amount: 0, type: "UreaN")
                      2020-11-04  [Fertiliser].Apply(amount: 0, type: "UreaN")
                      2020-12-14  [Fertiliser].Apply(amount: 0, type: "UreaN")
                      2021-01-25  [Fertiliser].Apply(amount: 0, type: "UreaN")
                      2021-03-01  [Fertiliser].Apply(amount: 0, type: "UreaN")
                      2021-04-05  [Fertiliser].Apply(amount: 0, type: "UreaN")
                    Operations DefoliationSchedule
                      2018-08-06  [Ryegrass].RemoveBiomass(amount: 345.623859603095,type: "SetResidueAmount")
                      2018-09-23  [Ryegrass].RemoveBiomass(amount: 45.3333,type: "SetResidueAmount")
                      2018-11-02  [Ryegrass].RemoveBiomass(amount: 66.6667,type: "SetResidueAmount")
                      2018-12-10  [Ryegrass].RemoveBiomass(amount: 272.1795,type: "SetResidueAmount")
                      2019-01-21  [Ryegrass].RemoveBiomass(amount: 266.1332,type: "SetResidueAmount")
                      2019-02-26  [Ryegrass].RemoveBiomass(amount: 156.1741,type: "SetResidueAmount")
                      2019-04-04  [Ryegrass].RemoveBiomass(amount: 130.6667,type: "SetResidueAmount")
                      2019-05-24  [Ryegrass].RemoveBiomass(amount:140.5,type: "SetResidueAmount")
                      2019-08-06  [Ryegrass].RemoveBiomass(amount: 266.6667,type: "SetResidueAmount")
                      2019-09-23  [Ryegrass].RemoveBiomass(amount: 235,type: "SetResidueAmount")
                      2019-10-31  [Ryegrass].RemoveBiomass(amount: 87.8333,type: "SetResidueAmount")
                      2019-12-16  [Ryegrass].RemoveBiomass(amount: 266.333,type: "SetResidueAmount")
                      2020-01-21  [Ryegrass].RemoveBiomass(amount: 593,type: "SetResidueAmount")
                      2020-02-24  [Ryegrass].RemoveBiomass(amount: 379.5833,type: "SetResidueAmount")
                      2020-04-06  [Ryegrass].RemoveBiomass(amount: 379.583,type: "SetResidueAmount")
                      2020-06-08  [Ryegrass].RemoveBiomass(amount: 237.833,type: "SetResidueAmount")
                      2020-08-07  [Ryegrass].RemoveBiomass(amount: 288.5 ,type: "SetResidueAmount")
                      2020-09-30  [Ryegrass].RemoveBiomass(amount: 284.6,type: "SetResidueAmount")
                      2020-11-02  [Ryegrass].RemoveBiomass(amount: 328.66,type: "SetResidueAmount")
                      2020-12-10  [Ryegrass].RemoveBiomass(amount: 787.1666,type: "SetResidueAmount")
                      2021-01-21  [Ryegrass].RemoveBiomass(amount: 451.833,type: "SetResidueAmount")
                      2021-02-25  [Ryegrass].RemoveBiomass(amount: 599.5 ,type: "SetResidueAmount")
                      2021-04-01  [Ryegrass].RemoveBiomass(amount: 630.0333 ,type: "SetResidueAmount")
                  CompositeFactor LincolnNPlus
                    Specifications:
                      [FertilisationEvents]
                      [DefoliationSchedule]
                    Operations FertilisationEvents
                      2017-03-23  [Fertiliser].Apply(amount: 50, type: "UreaN")
                      2017-04-01  [Fertiliser].Apply(amount: 25, type: "UreaN")
                      2025-08-08  [Fertiliser].Apply(amount: 25, type: "UreaN")
                      2017-09-22  [Fertiliser].Apply(amount: 25, type: "UreaN")
                      2017-10-27  [Fertiliser].Apply(amount: 25, type: "UreaN")
                      2017-12-08  [Fertiliser].Apply(amount: 25, type: "UreaN")
                      2018-01-22  [Fertiliser].Apply(amount: 25, type: "UreaN")
                      2018-02-21  [Fertiliser].Apply(amount: 25, type: "UreaN")
                      2018-03-28  [Fertiliser].Apply(amount: 25, type: "UreaN")
                      2018-05-23  [Fertiliser].Apply(amount: 25, type: "UreaN")
                      2018-08-10  [Fertiliser].Apply(amount: 25, type: "UreaN")
                      2018-09-26  [Fertiliser].Apply(amount: 25, type: "UreaN")
                      2018-11-04  [Fertiliser].Apply(amount: 25, type: "UreaN")
                      2018-12-14  [Fertiliser].Apply(amount: 25, type: "UreaN")
                      2019-01-25  [Fertiliser].Apply(amount: 25, type: "UreaN")
                      2019-02-28  [Fertiliser].Apply(amount: 25, type: "UreaN")
                      2019-04-08  [Fertiliser].Apply(amount: 25, type: "UreaN")
                      2019-05-27  [Fertiliser].Apply(amount: 25, type: "UreaN")
                      2019-08-09  [Fertiliser].Apply(amount: 25, type: "UreaN")
                      2019-09-23  [Fertiliser].Apply(amount: 25, type: "UreaN")
                      2019-11-08  [Fertiliser].Apply(amount: 25, type: "UreaN")
                      2019-12-22  [Fertiliser].Apply(amount: 25, type: "UreaN")
                      2020-01-23  [Fertiliser].Apply(amount: 25, type: "UreaN")
                      2020-02-26  [Fertiliser].Apply(amount: 25, type: "UreaN")
                      2020-04-08  [Fertiliser].Apply(amount: 25, type: "UreaN")
                      2020-06-10  [Fertiliser].Apply(amount: 25, type: "UreaN")
                      2020-08-10  [Fertiliser].Apply(amount: 25, type: "UreaN")
                      2020-10-02  [Fertiliser].Apply(amount: 25, type: "UreaN")
                      2020-11-04  [Fertiliser].Apply(amount: 25, type: "UreaN")
                      2020-12-14  [Fertiliser].Apply(amount: 25, type: "UreaN")
                      2021-01-25  [Fertiliser].Apply(amount: 25, type: "UreaN")
                      2021-03-01  [Fertiliser].Apply(amount: 25, type: "UreaN")
                      2021-04-05  [Fertiliser].Apply(amount: 25, type: "UreaN")
                    Operations DefoliationSchedule
                      2018-08-06  [Ryegrass].RemoveBiomass(amount: 297.0662 ,type: "SetResidueAmount")
                      2018-09-23  [Ryegrass].RemoveBiomass(amount: 45.8333,type: "SetResidueAmount")
                      2018-11-02  [Ryegrass].RemoveBiomass(amount: 54 ,type: "SetResidueAmount")
                      2018-12-10  [Ryegrass].RemoveBiomass(amount: 252.8708,type: "SetResidueAmount")
                      2019-01-21  [Ryegrass].RemoveBiomass(amount: 383.8988  ,type: "SetResidueAmount")
                      2019-02-26  [Ryegrass].RemoveBiomass(amount: 139.04  ,type: "SetResidueAmount")
                      2019-04-04  [Ryegrass].RemoveBiomass(amount: 139.8333 ,type: "SetResidueAmount")
                      2019-05-24  [Ryegrass].RemoveBiomass(amount: 215.5  ,type: "SetResidueAmount")
                      2019-08-06  [Ryegrass].RemoveBiomass(amount: 306.66,type: "SetResidueAmount")
                      2019-09-23  [Ryegrass].RemoveBiomass(amount: 274.8333  ,type: "SetResidueAmount")
                      2019-10-31  [Ryegrass].RemoveBiomass(amount: 111, type: "SetResidueAmount")
                      2019-12-16  [Ryegrass].RemoveBiomass(amount: 306.666,type: "SetResidueAmount")
                      2020-01-21  [Ryegrass].RemoveBiomass(amount: 656.33 ,type: "SetResidueAmount")
                      2020-02-24  [Ryegrass].RemoveBiomass(amount: 359.33 ,type: "SetResidueAmount")
                      2020-04-06  [Ryegrass].RemoveBiomass(amount: 507.833,type: "SetResidueAmount")
                      2020-06-08  [Ryegrass].RemoveBiomass(amount: 597.0,type: "SetResidueAmount")
                      2020-08-07  [Ryegrass].RemoveBiomass(amount: 325,type: "SetResidueAmount")
                      2020-09-30  [Ryegrass].RemoveBiomass(amount: 224.333,type: "SetResidueAmount")
                      2020-11-02  [Ryegrass].RemoveBiomass(amount: 214.66,type: "SetResidueAmount")
                      2020-12-10  [Ryegrass].RemoveBiomass(amount: 855.55,type: "SetResidueAmount")
                      2021-01-21  [Ryegrass].RemoveBiomass(amount: 232.8,type: "SetResidueAmount")
                      2021-02-25  [Ryegrass].RemoveBiomass(amount:  876.33,type: "SetResidueAmount")
                      2021-04-01  [Ryegrass].RemoveBiomass(amount: 879.5 ,type: "SetResidueAmount")
            Simulation Lincoln
              Clock: Start=2017-03-01; End=2021-06-30
              Weather: FileName=Lincoln_23.met
              Summary summaryfile
              SoilArbitrator Soil Arbitrator
              MicroClimate: a_interception=0; b_interception=1; c_interception=0; d_interception=0; SoilHeatFluxFraction=0.4; MinimumHeightDiffForNewLayer=0; NightInterceptionFraction=0.5; ReferenceHeight=2
              Zone Field: Area=1; Slope=0; AspectAngle=0; Altitude=50
                Soil Silt clay loam (Lincoln No1414): SoilType=Silt clay loam; LocalName=Wakanui; Site=Canterbury Agriculture and Science Centre; NearestTown=Lincoln; Region=Canterbury; Country=New Zealand; ApsoilNumber=1414; Latitude=-43.638; Longitude=172.474; LocationAccuracy=+/-50 m; YearOfSampling=1988
                  DataSource=The database of New Zealand soils was compiled by AgResearch (www.agresearch.co.nz) and based on soil properties gathered, mainly from publications, in the course of conducting several simulation-based research projects but particularly from the Pastoral 21 Environment program which was funded by the New Zealand Ministry for Business, Innovation and Employment,  Dairy NZ, Fonterra and Meat & Wool NZ.
                  Comments=The data is a combination of published or supplied measurements, pedotransfer functions, and expert opinion. See Cichota et al. (2013; Soil Research 51: 92-111, http://dx.doi.org/10.1071/SR12338) for a description of the pedotransfer functions. The soil carbon and fresh organic matter settings have been set as those broadly appropriate for permanent productive pastoral systems, see Cichota el al. (2012; Soil Research 50: 694-707, http://dx.doi.org/10.1071/SR12208). Users should take care to adapt these to local conditions before using the data in simulations. FOM values estimated to be 900 kg/ha of FOM in top 600mm of soil and another 100 kg/ha below. Soil C:N ratios taken from soil Silt clay loam (Ashburton NoXXXX).
                  Physical
                    Thickness  ParticleSizeSand  ParticleSizeSilt  ParticleSizeClay  Rocks  BD     AirDry  LL15   DUL    SAT    KS
                    90         5.333             67.001            27.667            0      1.203  0.061   0.185  0.356  0.511  1282.394
                    90         5.21              67.29             27.5              0      1.275  0.062   0.188  0.362  0.485  309.644
                    80         5.708             66.292            28                0      1.27   0.063   0.192  0.37   0.487  64.122
                    100        2.857             65.143            32                0      1.515  0.074   0.224  0.338  0.417  7.192
                    140        1.879             68.121            30                0      1.605  0.073   0.221  0.333  0.387  5.255
                    190        0.968             69.032            30                0      1.535  0.073   0.221  0.348  0.411  5.691
                    260        8.998             77.002            14                0      1.566  0.049   0.147  0.304  0.399  9.235
                    100        16.927            69.073            14                0      1.598  0.03    0.09   0.259  0.394  10.04
                    150        69.98             23.02             7                 0      1.55   0.016   0.05   0.217  0.415  150.652
                    300        13.705            60.295            26                0      1.574  0.055   0.166  0.323  0.401  7.564
                    BD source: Field measured and checked for sensibility
                    AirDry source: Estimated based on local knowledge
                    LL15, DUL source: Laboratory measured
                    SAT source: Calculated from measured, estimated or calculated BD
                    SoilCrop wheatSoil
                      LL=[0.185, 0.188, 0.192, 0.224, 0.221, 0.221, 0.147, 0.09, 0.05, 0.166]
                      KL=[0.06, 0.06, 0.06, 0.06, 0.06, 0.051, 0.04, 0.04, 0.04, 0.02]
                      XF=[1, 1, 1, 1, 1, 1, 1, 1, 1, 1]
                      LL source: Estimated based on local knowledge
                    SoilCrop perennialgrassSoil: same as Validation.NewZealand.Lincoln.ThinzarExperiment.AgPastureRemoveBiomass.Lincoln.Field.Silt clay loam (Lincoln No1414).Physical.wheatSoil
                    SoilCrop SCRUMSoil: same as Validation.NewZealand.Lincoln.ThinzarExperiment.AgPastureRemoveBiomass.Lincoln.Field.Silt clay loam (Lincoln No1414).Physical.wheatSoil
                    SoilCrop RyegrassSoil: LL=[0.24, 0.24, 0.22, 0.24, 0.23, 0.23, 0.18, 0.18, 0.18]; KL=[0.06, 0.045, 0.045, 0.04, 0.04, 0.06, 0.06, 0.06, 0.06]; XF=[1, 1, 1, 1, 1, 1, 1, 1, 1]
                  WaterBalance SoilWater: SummerDate=1-nov; SummerU=6; SummerCona=3.5; WinterDate=1-apr; WinterU=2; WinterCona=2; DiffusConst=88; DiffusSlope=35; Salb=0.13; CN2Bare=73; CNRed=20; CNCov=0.8; DischargeWidth=0; CatchmentArea=0; PSIDul=-100; Thickness=[90, 90, 80, 100, 140, 190, 260, 100, 150, 300]
                    SWCON=[0.587, 0.554, 0.494, 0.325, 0.293, 0.238, 0.2, 0.297, 0.458, 0.185]
                  Organic: FOMCNRatio=40; CarbonUnits=Total
                    Thickness  Carbon  SoilCNRatio  FBiom  FInert  FOM
                    90         2.867   11.715       0.08   0.289   30.9257
                    90         2.55    11.715       0.066  0.467   25.8313
                    80         2.3     11.715       0.032  0.728   22.012
                    100        0.62    11.715       0.012  0.728   18.0219
                    140        0.31    11.715       0.008  0.839   13.6207
                    190        0.25    11.715       0.008  0.93    9.31464
                    260        0.18    11.715       0.008  0.961   5.53774
                    100        0.15    11.715       0.008  0.985   4.53392
                    150        0.12    11.715       0.008  0.986   3.35881
                    300        0.14    11.715       0.008  0.989   1.84335
                  Chemical: PHUnits=Water
                    Thickness  PH   CEC
                    90         6.5  14.83
                    90         6.5  14.55
                    80         6.5  14.2
                    100        6.5  10.3
                    140        6.5  13
                    190        6.5  13.7
                    260        6.5  8.8
                    100        6.5  9
                    150        6.5  6
                    300        6.5  11.2
                    CEC source: Measured
                    PH source: Estimated based on local knowledge
                  Nutrient
                  Solute NO3: InitialValuesUnits=ppm; WaterTableConcentration=0; D0=0; DepthConstant=0; MaxDepthSoluteAccessible=0; RunoffEffectivenessAtMovingSolute=0; MaxEffectiveRunoff=0
                  Solute NH4: InitialValuesUnits=ppm; WaterTableConcentration=0; D0=0; DepthConstant=0; MaxDepthSoluteAccessible=0; RunoffEffectivenessAtMovingSolute=0; MaxEffectiveRunoff=0
                  Solute Urea: Thickness=[90, 90, 80, 100, 140, 190, 260, 100, 150, 300]; InitialValues=[0, 0, 0, 0, 0, 0, 0, 0, 0, 0]; InitialValuesUnits=kg/ha; WaterTableConcentration=0; D0=0; DepthConstant=0; MaxDepthSoluteAccessible=0; RunoffEffectivenessAtMovingSolute=0; MaxEffectiveRunoff=0
                  Water: Thickness=[90, 90, 80, 100, 140, 190, 260, 100, 150, 300]; FilledFromTop=false
                    InitialValues=[0.356, 0.362, 0.37, 0.338, 0.333, 0.348, 0.304, 0.259, 0.217, 0.323]
                  SoilTemperature Temperature: InteractionsPerDay=8
                Operations IrrigationEvents
                  2017-11-15  [Irrigation].Apply(25)
                  2017-11-18  [Irrigation].Apply(25)
                  2017-12-07  [Irrigation].Apply(25)
                  2017-12-08  [Irrigation].Apply(25)
                  2017-12-12  [Irrigation].Apply(25)
                  2017-12-13  [Irrigation].Apply(25)
                  2017-12-14  [Irrigation].Apply(25)
                  2017-12-15  [Irrigation].Apply(25)
                  2018-01-24  [Irrigation].Apply(25)
                  2018-01-25  [Irrigation].Apply(25)
                  2018-11-05  [Irrigation].Apply(25)
                  2018-11-06  [Irrigation].Apply(25)
                  2018-12-12  [Irrigation].Apply(25)
                  2018-12-16  [Irrigation].Apply(25)
                  2019-01-07  [Irrigation].Apply(25)
                  2019-01-09  [Irrigation].Apply(25)
                  2019-01-26  [Irrigation].Apply(25)
                  2019-01-28  [Irrigation].Apply(25)
                  2019-02-08  [Irrigation].Apply(25)
                  2019-02-10  [Irrigation].Apply(25)
                  2019-03-05  [Irrigation].Apply(25)
                  2019-03-07  [Irrigation].Apply(25)
                  2019-11-18  [Irrigation].Apply(25)
                  2019-11-19  [Irrigation].Apply(25)
                  2019-11-26  [Irrigation].Apply(25)
                  2019-12-03  [Irrigation].Apply(25)
                  2019-12-17  [Irrigation].Apply(25)
                  2020-01-07  [Irrigation].Apply(25)
                  2020-01-08  [Irrigation].Apply(25)
                  2020-01-22  [Irrigation].Apply(25)
                  2020-02-24  [Irrigation].Apply(25)
                  2020-03-05  [Irrigation].Apply(25)
                  2020-03-06  [Irrigation].Apply(25)
                  2020-03-20  [Irrigation].Apply(25)
                  2020-03-21  [Irrigation].Apply(25)
                  2020-03-22  [Irrigation].Apply(25)
                  2020-03-23  [Irrigation].Apply(25)
                  2020-03-25  [Irrigation].Apply(25)
                  2020-03-26  [Irrigation].Apply(25)
                  2020-04-30  [Irrigation].Apply(25)
                  2020-05-01  [Irrigation].Apply(25)
                  2020-10-02  [Irrigation].Apply(25)
                  2020-10-04  [Irrigation].Apply(25)
                  2020-10-19  [Irrigation].Apply(25)
                  2020-10-20  [Irrigation].Apply(25)
                  2020-11-10  [Irrigation].Apply(25)
                  2020-11-11  [Irrigation].Apply(25)
                  2020-12-11  [Irrigation].Apply(25)
                  2020-12-12  [Irrigation].Apply(25)
                  2020-12-17  [Irrigation].Apply(25)
                  2020-12-18  [Irrigation].Apply(25)
                  2021-01-22  [Irrigation].Apply(25)
                  2021-01-24  [Irrigation].Apply(25)
                  2021-02-02  [Irrigation].Apply(25)
                  2021-02-03  [Irrigation].Apply(25)
                  2021-02-15  [Irrigation].Apply(25)
                  2021-02-16  [Irrigation].Apply(25)
                  2021-03-01  [Irrigation].Apply(25)
                  2021-03-02  [Irrigation].Apply(25)
                  2021-03-15  [Irrigation].Apply(25)
                  2021-03-16  [Irrigation].Apply(25)
                  2021-04-07  [Irrigation].Apply(25)
                  2021-04-08  [Irrigation].Apply(25)
                Operations FertilisationEvents
                Irrigation
                Fertiliser
                SurfaceOrganicMatter: InitialResidueName=grass; InitialResidueType=grass; InitialResidueMass=1000; InitialStandingFraction=0; InitialCPR=0; InitialCNR=25
                PastureSpecies Ryegrass: doyGermination=275; daysEmergenceToAnthesis=120; daysAnthesisToMaturity=85; degreesDayForAnthesis=1100; degreesDayForMaturity=900; daysAnnualsFactor=45; CanopyType=PastureSpecies; InitialisePlantAtStartOfSimulation=true; InitialShootDM=0; InitialRootDM=0; InitialRootDepth=1000; PotentialRootingDepth=-1; initialDMFractionsGrasses=[0.15, 0.25, 0.25, 0.05, 0.05, 0.1, 0.1, 0.05, 0, 0, 0]; initialDMFractionsForbs=[0.2, 0.2, 0.15, 0.05, 0.1, 0.15, 0.1, 0.05, 0, 0, 0]; UseHeatStressFactor=0; UseColdStressFactor=0; UseReproSeasonFactor=0; ReproSeasonReferenceLatitude=41; ReproSeasonTimingCoeff=0.14; ReproSeasonDurationCoeff=2; ReproSeasonShouldersLengthFactor=1; ReproSeasonOnsetDurationFactor=0.6; ReproSeasonMaxAllocationIncrease=0.5; ReproSeasonAllocationCoeff=0.1; StolonProportionTarget=0; RelativeTurnoverEmerging=2; TurnoverDefoliationEffectMin=0.025; GlfGeneric=1; GlfSoilFertility=1; MinimumGreenLeafProp=0.8; MinimumGreenRootProp=0.5; PreferenceForLeafOverStems=1; ResourceName=AGPRyegrass
                  initialDMFractionsLegumes=[0.16, 0.23, 0.22, 0.05, 0.03, 0.05, 0.05, 0.01, 0.04, 0.08, 0.08]
                  LinearInterpolationFunction FVPDFunction
                Report: EventNames=[Clock].EndOfDay
                  VariableNames:
                    [Clock].Today
                    [Ryegrass].Harvestable.wt
                    [Ryegrass].AboveGround.Wt
                    [Ryegrass].HarvestedWt/10
                    [Ryegrass].LAI
                    [Ryegrass].AboveGroundCrudeProtein
                    [Ryegrass].AboveGround.NConc
                    [Spectral].NDVI
                Operations DefoliationSchedule
                Operations Sow
                  2017-03-31  [Ryegrass].Sow(population: 120, cultivar: "P Ryegrass", depth: 30, rowSpacing: 250);
                Spectral: DrySoilNDVI=0.1; WetSoilNDVI=0.25; GreenCropNDVI=0.9; DeadCropNDVI=0.1
          Experiment AgPastureSimpleGrazing
            Factors
              Permutation
                Factor Ferilisation
                  CompositeFactor LincolnNMinus
                    Specifications:
                      [FertilisationEvents]
                      [DefoliationSchedule]
                    Operations FertilisationEvents: same as Validation.NewZealand.Lincoln.ThinzarExperiment.AgPastureRemoveBiomass.Factors.Permutation.Ferilisation.LincolnNMinus.FertilisationEvents
                    Operations DefoliationSchedule
                      2018-08-06  [SimpleGrazing].GrazeToResidual(34.523859603095)
                      2018-09-23  [SimpleGrazing].GrazeToResidual(45.3333)
                      2018-11-02  [SimpleGrazing].GrazeToResidual(66.6667)
                      2018-12-10  [SimpleGrazing].GrazeToResidual(272.1795)
                      2019-01-21  [SimpleGrazing].GrazeToResidual(266.1332)
                      2019-02-26  [SimpleGrazing].GrazeToResidual(156.1741)
                      2019-04-04  [SimpleGrazing].GrazeToResidual(130.6667)
                      2019-05-24  [SimpleGrazing].GrazeToResidual(140.5)
                      2019-08-06  [SimpleGrazing].GrazeToResidual(266.6667)
                      2019-09-23  [SimpleGrazing].GrazeToResidual(235)
                      2019-10-31  [SimpleGrazing].GrazeToResidual(87.8333)
                      2019-12-16  [SimpleGrazing].GrazeToResidual(266.333)
                      2020-01-21  [SimpleGrazing].GrazeToResidual(593)
                      2020-02-24  [SimpleGrazing].GrazeToResidual(379.5833)
                      2020-04-06  [SimpleGrazing].GrazeToResidual(379.583)
                      2020-06-08  [SimpleGrazing].GrazeToResidual(237.833)
                      2020-08-07  [SimpleGrazing].GrazeToResidual(288.5 )
                      2020-09-30  [SimpleGrazing].GrazeToResidual(284.6)
                      2020-11-02  [SimpleGrazing].GrazeToResidual(328.66)
                      2020-12-10  [SimpleGrazing].GrazeToResidual(787.1666)
                      2021-01-21  [SimpleGrazing].GrazeToResidual(451.833)
                      2021-02-25  [SimpleGrazing].GrazeToResidual(599.5)
                      2021-04-01  [SimpleGrazing].GrazeToResidual(630.0333)
                  CompositeFactor LincolnNPlus
                    Specifications:
                      [FertilisationEvents]
                      [DefoliationSchedule]
                    Operations FertilisationEvents: same as Validation.NewZealand.Lincoln.ThinzarExperiment.AgPastureRemoveBiomass.Factors.Permutation.Ferilisation.LincolnNPlus.FertilisationEvents
                    Operations DefoliationSchedule
                      2018-08-06  [SimpleGrazing].GrazeToResidual(297.0662)
                      2018-09-23  [SimpleGrazing].GrazeToResidual(45.8333)
                      2018-11-02  [SimpleGrazing].GrazeToResidual(54)
                      2018-12-10  [SimpleGrazing].GrazeToResidual(252.8708)
                      2019-01-21  [SimpleGrazing].GrazeToResidual(383.8988)
                      2019-02-26  [SimpleGrazing].GrazeToResidual(139.04)
                      2019-04-04  [SimpleGrazing].GrazeToResidual(139.8333)
                      2019-05-24  [SimpleGrazing].GrazeToResidual(215.5)
                      2019-08-06  [SimpleGrazing].GrazeToResidual(306.66)
                      2019-09-23  [SimpleGrazing].GrazeToResidual(274.8333)
                      2019-10-31  [SimpleGrazing].GrazeToResidual(111)
                      2019-12-16  [SimpleGrazing].GrazeToResidual(306.666)
                      2020-01-21  [SimpleGrazing].GrazeToResidual(656.33)
                      2020-02-24  [SimpleGrazing].GrazeToResidual(359.33)
                      2020-04-06  [SimpleGrazing].GrazeToResidual(507.833)
                      2020-06-08  [SimpleGrazing].GrazeToResidual(597.0)
                      2020-08-07  [SimpleGrazing].GrazeToResidual(325)
                      2020-09-30  [SimpleGrazing].GrazeToResidual(224.333)
                      2020-11-02  [SimpleGrazing].GrazeToResidual(214.66)
                      2020-12-10  [SimpleGrazing].GrazeToResidual(855.55)
                      2021-01-21  [SimpleGrazing].GrazeToResidual(232.8)
                      2021-02-25  [SimpleGrazing].GrazeToResidual(876.33)
                      2021-04-01  [SimpleGrazing].GrazeToResidual(879.5)
            Simulation LincolnSimpleGrazing
              Clock: Start=2017-03-01; End=2021-06-30
              Weather: FileName=Lincoln_23.met
              Summary summaryfile
              SoilArbitrator Soil Arbitrator
              Forages
                Parameters:
                  Name                          LiveDigestibility  DeadDigestibility  LiveFractionConsumable  DeadFractionConsumable  LiveMinimumBiomass  DeadMinimumBiomass
                  SurfaceOrganicMatter.Residue  0                  0                  0                       0                       0                   0
                  Ryegrass.Leaf                 0.7                0.3                1                       1                       80                  0
                  Ryegrass.Stem                 0.7                0.3                1                       1                       20                  0
                  Ryegrass.Stolon               0.7                0.3                1                       1                       0                   0
                  AGPWhiteClover.Leaf           0.7                0.3                1                       1                       60                  0
                  AGPWhiteClover.Stem           0.7                0.3                1                       1                       15                  0
                  AGPWhiteClover.Stolon         0.7                0.3                1                       1                       10                  0
                  AGPPaspalum.Leaf              0.7                0.3                1                       1                       40                  0
                  AGPPaspalum.Stem              0.7                0.3                1                       1                       10                  0
                  AGPPaspalum.Stolon            0.7                0.3                1                       1                       0                   0
              MicroClimate: a_interception=0; b_interception=1; c_interception=0; d_interception=0; SoilHeatFluxFraction=0.4; MinimumHeightDiffForNewLayer=0; NightInterceptionFraction=0.5; ReferenceHeight=2
              Zone Field: Area=1; Slope=0; AspectAngle=0; Altitude=50
                Soil Silt clay loam (Lincoln No1414): same as Validation.NewZealand.Lincoln.ThinzarExperiment.AgPastureRemoveBiomass.Lincoln.Field.Silt clay loam (Lincoln No1414)
                Operations IrrigationEvents: same as Validation.NewZealand.Lincoln.ThinzarExperiment.AgPastureRemoveBiomass.Lincoln.Field.IrrigationEvents
                Operations FertilisationEvents
                Irrigation
                Fertiliser
                SurfaceOrganicMatter: InitialResidueName=grass; InitialResidueType=grass; InitialResidueMass=1000; InitialStandingFraction=0; InitialCPR=0; InitialCNR=25
                PastureSpecies Ryegrass: same as Validation.NewZealand.Lincoln.ThinzarExperiment.AgPastureRemoveBiomass.Lincoln.Field.Ryegrass
                Report: EventNames=[Clock].EndOfDay
                  VariableNames:
                    [Clock].Today
                    [Ryegrass].Harvestable.wt
                    [Ryegrass].AboveGround.Wt
                    [Ryegrass].HarvestedWt/10
                    [Ryegrass].LAI
                    [Ryegrass].AboveGround.NConc
                    [Spectral].NDVI
                Operations DefoliationSchedule
                Operations Sow
                  2017-03-31  [Ryegrass].Sow(population: 120, cultivar: "P Ryegrass", depth: 30, rowSpacing: 250);
                SimpleGrazing: GrazingRotationType=2; SimpleMinGrazable=3500; SimpleGrazingResidual=350; FlexibleGrazePostDM=0; NoGrazingStartString=1-mar; NoGrazingEndString=1-jun; IsCutAndCarry=true; FractionClippingsReturned=0; FractionIntakeNToAnimal=[0]; DungNConc=2.6; FractionOfDungUrineOffPaddock=[0]; DepthUrineIsAdded=0; ShowAdvancedExcretaOptions=false; SendDungElsewhere=0; SendUrineElsewhere=0; UsePatching=false; PseudoPatches=true; ZoneCount=25; UrineReturnPattern=2; PseudoRandomSeed=666; MaxEffectiveNConcentration=3.5; FractionPopulationDecline=0; TramplingOn=false; MaximumPropLitterMovedToSoil=0.1; PastureConsumedAtMaximumRateOfLitterRemoval=1200
                Spectral: DrySoilNDVI=0.1; WetSoilNDVI=0.25; GreenCropNDVI=0.9; DeadCropNDVI=0.1
          Experiment AusFarmPastureRemoveBiomass
            Factors
              Permutation
                Factor Ferilisation
                  CompositeFactor LincolnNMinus
                    Specifications:
                      [FertilisationEvents]
                      [DefoliationSchedule]
                    Operations FertilisationEvents: same as Validation.NewZealand.Lincoln.ThinzarExperiment.AgPastureRemoveBiomass.Factors.Permutation.Ferilisation.LincolnNMinus.FertilisationEvents
                    Operations DefoliationSchedule
                      2018-08-06  [Pasture].RemoveBiomass(amount: 34.5623859603095,type: "SetResidueAmount")
                      2018-09-23  [Pasture].RemoveBiomass(amount: 4.53333,type: "SetResidueAmount")
                      2018-11-02  [Pasture].RemoveBiomass(amount: 6.66667,type: "SetResidueAmount")
                      2018-12-10  [Pasture].RemoveBiomass(amount: 27.21795,type: "SetResidueAmount")
                      2019-01-21  [Pasture].RemoveBiomass(amount: 26.61332,type: "SetResidueAmount")
                      2019-02-26  [Pasture].RemoveBiomass(amount: 15.61741,type: "SetResidueAmount")
                      2019-04-04  [Pasture].RemoveBiomass(amount: 13.06667,type: "SetResidueAmount")
                      2019-05-24  [Pasture].RemoveBiomass(amount:14.05,type: "SetResidueAmount")
                      2019-08-06  [Pasture].RemoveBiomass(amount: 26.66667,type: "SetResidueAmount")
                      2019-09-23  [Pasture].RemoveBiomass(amount: 23.5,type: "SetResidueAmount")
                      2019-10-31  [Pasture].RemoveBiomass(amount: 8.78333,type: "SetResidueAmount")
                      2019-12-16  [Pasture].RemoveBiomass(amount: 26.6333,type: "SetResidueAmount")
                      2020-01-21  [Pasture].RemoveBiomass(amount: 59.3,type: "SetResidueAmount")
                      2020-02-24  [Pasture].RemoveBiomass(amount:16.6166666666667 ,type: "SetResidueAmount")
                      2020-04-06  [Pasture].RemoveBiomass(amount: 37.9583,type: "SetResidueAmount")
                      2020-06-08  [Pasture].RemoveBiomass(amount: 23.7833,type: "SetResidueAmount")
                      2020-08-07  [Pasture].RemoveBiomass(amount: 28.85 ,type: "SetResidueAmount")
                      2020-09-30  [Pasture].RemoveBiomass(amount: 28.46,type: "SetResidueAmount")
                      2020-11-02  [Pasture].RemoveBiomass(amount: 32.866,type: "SetResidueAmount")
                      2020-12-10  [Pasture].RemoveBiomass(amount: 78.71666,type: "SetResidueAmount")
                      2021-01-21  [Pasture].RemoveBiomass(amount: 45.1833,type: "SetResidueAmount")
                      2021-02-25  [Pasture].RemoveBiomass(amount: 59.95 ,type: "SetResidueAmount")
                      2021-04-01  [Pasture].RemoveBiomass(amount: 63.00333 ,type: "SetResidueAmount")
                  CompositeFactor LincolnNPlus
                    Specifications:
                      [FertilisationEvents]
                      [DefoliationSchedule]
                    Operations FertilisationEvents: same as Validation.NewZealand.Lincoln.ThinzarExperiment.AgPastureRemoveBiomass.Factors.Permutation.Ferilisation.LincolnNPlus.FertilisationEvents
                    Operations DefoliationSchedule
                      2018-08-06  [Pasture].RemoveBiomass(amount: 29.70662 ,type: "SetResidueAmount")
                      2018-09-23  [Pasture].RemoveBiomass(amount: 4.58333,type: "SetResidueAmount")
                      2018-11-02  [Pasture].RemoveBiomass(amount: 5.4 ,type: "SetResidueAmount")
                      2018-12-10  [Pasture].RemoveBiomass(amount: 25.28708, type: "SetResidueAmount")
                      2019-01-21  [Pasture].RemoveBiomass(amount: 38.38988  ,type: "SetResidueAmount")
                      2019-02-26  [Pasture].RemoveBiomass(amount: 13.904  ,type: "SetResidueAmount")
                      2019-04-04  [Pasture].RemoveBiomass(amount: 13.98333 ,type: "SetResidueAmount")
                      2019-05-24  [Pasture].RemoveBiomass(amount: 21.55  ,type: "SetResidueAmount")
                      2019-08-06  [Pasture].RemoveBiomass(amount: 30.666,type: "SetResidueAmount")
                      2019-09-23  [Pasture].RemoveBiomass(amount: 27.48333  ,type: "SetResidueAmount")
                      2019-10-31  [Pasture].RemoveBiomass(amount: 11.1, type: "SetResidueAmount")
                      2019-12-16  [Pasture].RemoveBiomass(amount: 30.6666,type: "SetResidueAmount")
                      2020-01-21  [Pasture].RemoveBiomass(amount: 65.633 ,type: "SetResidueAmount")
                      2020-02-24  [Pasture].RemoveBiomass(amount: 35.933 ,type: "SetResidueAmount")
                      2020-04-06  [Pasture].RemoveBiomass(amount: 50.7833,type: "SetResidueAmount")
                      2020-06-08  [Pasture].RemoveBiomass(amount: 59.70,type: "SetResidueAmount")
                      2020-08-07  [Pasture].RemoveBiomass(amount: 32.5,type: "SetResidueAmount")
                      2020-09-30  [Pasture].RemoveBiomass(amount: 22.4333,type: "SetResidueAmount")
                      2020-11-02  [Pasture].RemoveBiomass(amount: 21.466,type: "SetResidueAmount")
                      2020-12-10  [Pasture].RemoveBiomass(amount: 85.555,type: "SetResidueAmount")
                      2021-01-21  [Pasture].RemoveBiomass(amount: 23.28,type: "SetResidueAmount")
                      2021-02-25  [Pasture].RemoveBiomass(amount:  87.633,type: "SetResidueAmount")
                      2021-04-01  [Pasture].RemoveBiomass(amount: 87.95 ,type: "SetResidueAmount")
            Simulation LincolnPasture
              Clock: Start=2017-03-01; End=2021-06-30
              Weather: FileName=Lincoln_23.met
              Summary summaryfile
              SoilArbitrator Soil Arbitrator
              MicroClimate: a_interception=0; b_interception=1; c_interception=0; d_interception=0; SoilHeatFluxFraction=0.4; MinimumHeightDiffForNewLayer=0; NightInterceptionFraction=0.5; ReferenceHeight=2
              Zone Field: Area=1; Slope=0; AspectAngle=0; Altitude=50; CanopyType=BroadAcre
                Operations IrrigationEvents: same as Validation.NewZealand.Lincoln.ThinzarExperiment.AgPastureRemoveBiomass.Lincoln.Field.IrrigationEvents
                Operations FertilisationEvents
                Operations DefoliationSchedule
                Irrigation
                Fertiliser
                SurfaceOrganicMatter: InitialResidueName=grass; InitialResidueType=grass; InitialResidueMass=1000; InitialStandingFraction=0; InitialCPR=0; InitialCNR=25
                Report: EventNames=[Clock].EndOfDay
                  VariableNames:
                    [Clock].Today
                    [Pasture].AboveGround.NConc
                    [Pasture].AboveGround.Wt
                    [Spectral].NDVI
                    [Pasture].LAI
                Operations Sow
                  2017-03-31  [Pasture].Sow(population: 120, cultivar: "P Ryegrass", depth: 30, rowSpacing: 250);
                Pasture: Species=Perennial Ryegrass; Fertility=0.8; Nutrients=N; MaxRtDep=650; LaggedDayT=-999.9; Phenology=1.0015; FlowerLen=0; FlowerTime=0; SencIndex=0; DormIndex=0; DormT=-999.9; ExtinctCoeff=[0, 10, 0]; SeedDormTime=0; GermIndex=0; Albedo=0.23; Gsmax=0.011; R50=200; WaterDemand=0; LAI=0
                  GenericOrgan Leaf: IsAboveGround=true
                  GenericOrgan Stem: IsAboveGround=true
                  GenericOrgan Root: IsAboveGround=false
                  CompositeBiomass AboveGround: OrganNames=[Leaf, Stem]; IncludeLive=true; IncludeDead=true
                  CompositeBiomass AboveGroundLive: OrganNames=[Leaf, Stem]; IncludeLive=true; IncludeDead=false
                  CompositeBiomass AboveGroundDead: OrganNames=[Leaf, Stem]; IncludeLive=false; IncludeDead=true
                  GreenCohortInitialise: RootWeight=[0, 0]; RootDepth=650; EstIndex=0; StressIndex=0; StemReloc=0; Frosts=0; Status=established; LeafDMD=[0.825]; LeafWeight=[0]; LeafNConc=[0.01]; LeafSpecificArea=[430]; StemDMD=[0.825]; StemWeight=[0]; StemNConc=[0.01]; StemSpecificArea=[10]
                  DryCohortInitialise: Status=established; LeafDMD=[0.825]; LeafWeight=[0]; LeafNConc=[0.01]; LeafSpecificArea=[430]; StemDMD=[0.825]; StemWeight=[0]; StemNConc=[0.01]; StemSpecificArea=[10]
                  CompositeBiomass Total: OrganNames=[Leaf, Stem, Root]; IncludeLive=true; IncludeDead=true
                Soil: SoilType=NZ_sedementary; Region=Plains; State=Canterbury; Country=New Zealnd; Latitude=0; Longitude=0
                  Chemical: PHUnits=Water
                    Thickness  PH   CEC
                    100        5.8  14.287
                    100        5.9  10.51
                    100        6.6  12.726
                    150        6.8  12.501
                    200        7    16.239
                    200        7.1  16.059
                    CEC source: Calculated
                  Physical
                    Thickness  ParticleSizeSand  ParticleSizeSilt  ParticleSizeClay  Rocks  BD    AirDry  LL15  DUL   SAT
                    100        58                14                28                0      1.22  0.022   0.1   0.17  0.51
                    100        61                20                19                0      1.45  0.028   0.13  0.19  0.42
                    100        45                22                33                0      1.45  0.03    0.14  0.2   0.42
                    150        45                22                33                0      1.45  0.032   0.15  0.23  0.42
                    200        45                8                 47                0      1.45  0.039   0.19  0.27  0.42
                    200        45                8                 47                0      1.5   0.044   0.22  0.29  0.4
                    Rocks source: Calculated
                    SoilCrop Perennial RyegrassSoil: LL=[0.1, 0.13, 0.14, 0.15, 0.19, 0.22]; KL=[0.07, 0.07, 0.07, 0.06, 0.04, 0]; XF=[1, 1, 1, 1, 1, 1]
                  WaterBalance SoilWater: SummerDate=1-Nov; SummerU=6; SummerCona=3.5; WinterDate=1-Apr; WinterU=2; WinterCona=2; DiffusConst=0; DiffusSlope=0; Salb=0.13; CN2Bare=52; CNRed=20; CNCov=0.8; DischargeWidth=0; CatchmentArea=0; PSIDul=-100
                    Thickness  SWCON  KLAT
                    100        0.4    0
                    100        0.4    0
                    100        0.4    0
                    150        0.4    0
                    200        0.4    0
                    200        0.4    0
                  Organic: FOMCNRatio=53.5; CarbonUnits=Total
                    Thickness  Carbon  SoilCNRatio  FBiom  FInert  FOM
                    100        1.3     14.5         0.02   0       975
                    100        0.6     14.5         0.01   0       600
                    100        0.4     14.5         0.01   0       400
                    150        0.3     14.5         0.006  0       150
                    200        0.3     14.5         0.006  0       30
                    200        0.22    14.5         0.006  0       20
                  SoilTemperature SoilTemperatureCampbell (disabled): InteractionsPerDay=8
                  CERESSoilTemperature Temperature0
                  Water: Thickness=[100, 100, 100, 150, 200, 200]; InitialValues=[0.17, 0.19, 0.2, 0.23, 0.27, 0.29]; FilledFromTop=false
                  Nutrient
                  Solute Urea: Thickness=[100, 100, 100, 150, 200, 200]; InitialValues=[0, 0, 0, 0, 0, 0]; InitialValuesUnits=ppm; WaterTableConcentration=0; D0=0; DepthConstant=0; MaxDepthSoluteAccessible=0; RunoffEffectivenessAtMovingSolute=0; MaxEffectiveRunoff=0
                  Solute NO3: Thickness=[100, 100, 100, 150, 200, 200]; InitialValues=[30, 10, 4, 2, 1.5, 1.5]; InitialValuesUnits=ppm; WaterTableConcentration=0; D0=0; DepthConstant=0; MaxDepthSoluteAccessible=0; RunoffEffectivenessAtMovingSolute=0; MaxEffectiveRunoff=0
                  Solute NH4: same as Validation.NewZealand.Lincoln.ThinzarExperiment.AusFarmPastureRemoveBiomass.LincolnPasture.Field.Soil.Urea
                  CERESSoilTemperature Temperature
                Spectral: DrySoilNDVI=0.1; WetSoilNDVI=0.25; GreenCropNDVI=0.9; DeadCropNDVI=0.1
          Experiment AusFarmPastureSimplegrazing
            Factors
              Permutation
                Factor Ferilisation
                  CompositeFactor LincolnNMinus
                    Specifications:
                      [FertilisationEvents]
                      [DefoliationSchedule]
                    Operations FertilisationEvents: same as Validation.NewZealand.Lincoln.ThinzarExperiment.AgPastureRemoveBiomass.Factors.Permutation.Ferilisation.LincolnNMinus.FertilisationEvents
                    Operations DefoliationSchedule
                      2018-08-06  [SimpleGrazing].GrazeToResidual(345.623859603095)
                      2018-09-23  [SimpleGrazing].GrazeToResidual(45.3333)
                      2018-11-02  [SimpleGrazing].GrazeToResidual(66.6667)
                      2018-12-10  [SimpleGrazing].GrazeToResidual(272.1795)
                      2019-01-21  [SimpleGrazing].GrazeToResidual(266.1332)
                      2019-02-26  [SimpleGrazing].GrazeToResidual(156.1741)
                      2019-04-04  [SimpleGrazing].GrazeToResidual(130.6667)
                      2019-05-24  [SimpleGrazing].GrazeToResidual(140.5)
                      2019-08-06  [SimpleGrazing].GrazeToResidual(266.6667)
                      2019-09-23  [SimpleGrazing].GrazeToResidual(235)
                      2019-10-31  [SimpleGrazing].GrazeToResidual(87.8333)
                      2019-12-16  [SimpleGrazing].GrazeToResidual(266.333)
                      2020-01-21  [SimpleGrazing].GrazeToResidual(593)
                      2020-02-24  [SimpleGrazing].GrazeToResidual(379.5833)
                      2020-04-06  [SimpleGrazing].GrazeToResidual(379.583)
                      2020-06-08  [SimpleGrazing].GrazeToResidual(237.833)
                      2020-08-07  [SimpleGrazing].GrazeToResidual(288.5 )
                      2020-09-30  [SimpleGrazing].GrazeToResidual(284.6)
                      2020-11-02  [SimpleGrazing].GrazeToResidual(328.66)
                      2020-12-10  [SimpleGrazing].GrazeToResidual(787.1666)
                      2021-01-21  [SimpleGrazing].GrazeToResidual(451.833)
                      2021-02-25  [SimpleGrazing].GrazeToResidual(599.5)
                      2021-04-01  [SimpleGrazing].GrazeToResidual(630.0333)
                  CompositeFactor LincolnNPlus
                    Specifications:
                      [FertilisationEvents]
                      [DefoliationSchedule]
                    Operations FertilisationEvents: same as Validation.NewZealand.Lincoln.ThinzarExperiment.AgPastureRemoveBiomass.Factors.Permutation.Ferilisation.LincolnNPlus.FertilisationEvents
                    Operations DefoliationSchedule
                      2018-09-23  [SimpleGrazing].GrazeToResidual(45.8333)
                      2018-11-02  [SimpleGrazing].GrazeToResidual(54)
                      2018-12-10  [SimpleGrazing].GrazeToResidual(252.8708)
                      2019-01-21  [SimpleGrazing].GrazeToResidual(383.8988)
                      2019-02-26  [SimpleGrazing].GrazeToResidual(139.04)
                      2019-04-04  [SimpleGrazing].GrazeToResidual(139.8333)
                      2019-05-24  [SimpleGrazing].GrazeToResidual(215.5)
                      2019-08-06  [SimpleGrazing].GrazeToResidual(306.66)
                      2019-09-23  [SimpleGrazing].GrazeToResidual(274.8333)
                      2019-10-31  [SimpleGrazing].GrazeToResidual(111)
                      2019-12-16  [SimpleGrazing].GrazeToResidual(306.666)
                      2020-01-21  [SimpleGrazing].GrazeToResidual(656.33)
                      2020-02-24  [SimpleGrazing].GrazeToResidual(359.33)
                      2020-04-06  [SimpleGrazing].GrazeToResidual(507.833)
                      2020-06-08  [SimpleGrazing].GrazeToResidual(597.0)
                      2020-08-07  [SimpleGrazing].GrazeToResidual(325)
                      2020-09-30  [SimpleGrazing].GrazeToResidual(224.333)
                      2020-11-02  [SimpleGrazing].GrazeToResidual(214.66)
                      2020-12-10  [SimpleGrazing].GrazeToResidual(855.55)
                      2021-01-21  [SimpleGrazing].GrazeToResidual(232.8)
                      2021-02-25  [SimpleGrazing].GrazeToResidual(876.33)
                      2021-04-01  [SimpleGrazing].GrazeToResidual(879.5)
            Simulation LincolnPastureSimpleGrazing
              Clock: Start=2017-03-01; End=2021-06-30
              Weather: FileName=Lincoln_23.met
              Summary summaryfile
              SoilArbitrator Soil Arbitrator
              Forages
                Parameters:
                  Name                          LiveDigestibility  DeadDigestibility  LiveFractionConsumable  DeadFractionConsumable  LiveMinimumBiomass  DeadMinimumBiomass
                  SurfaceOrganicMatter.Residue  0.7                0.3                0                       0                       0                   0
                  Pasture.Leaf                  FromModel          FromModel          1                       1                       25                  0
                  Pasture.Stem                  FromModel          FromModel          1                       1                       10                  0
                  AGPRyegrass.Stolon            FromModel          FromModel          1                       1                       0                   0
                  AGPWhiteClover.Leaf           FromModel          FromModel          1                       1                       15                  0
                  AGPWhiteClover.Stem           FromModel          FromModel          1                       1                       5                   0
                  AGPWhiteClover.Stolon         FromModel          FromModel          1                       1                       5                   0
              MicroClimate: a_interception=0; b_interception=1; c_interception=0; d_interception=0; SoilHeatFluxFraction=0.4; MinimumHeightDiffForNewLayer=0; NightInterceptionFraction=0.5; ReferenceHeight=2
              Zone Field: Area=1; Slope=0; AspectAngle=0; Altitude=50; CanopyType=BroadAcre
                SimpleGrazing: GrazingRotationType=2; SimpleMinGrazable=2000; SimpleGrazingResidual=1000; FlexibleGrazePostDM=0; MinimumRotationLengthArray=[5, 5, 5, 5, 5, 5, 5, 5, 5, 5, 5, 5]; NoGrazingStartString=01-jun; NoGrazingEndString=15-sep; IsCutAndCarry=false; FractionClippingsReturned=0; FractionIntakeNToAnimal=[0]; DungNConc=2.6; FractionOfDungUrineOffPaddock=[0.75]; DepthUrineIsAdded=10; ShowAdvancedExcretaOptions=false; SendDungElsewhere=0; SendUrineElsewhere=0; UsePatching=false; PseudoPatches=false; ZoneCount=20; UrineReturnPattern=0; PseudoRandomSeed=0; MaxEffectiveNConcentration=3.5; FractionPopulationDecline=0; TramplingOn=false; MaximumPropLitterMovedToSoil=0.1; PastureConsumedAtMaximumRateOfLitterRemoval=1200
                  PreGrazeDMArray=[3500, 3500, 3500, 3500, 3500, 3500, 3500, 3500, 3500, 3500, 3500, 3500]
                  PostGrazeDMArray=[2000, 2000, 2000, 2000, 2000, 2000, 2000, 2000, 2000, 2000, 2000, 2000]
                Operations IrrigationEvents: same as Validation.NewZealand.Lincoln.ThinzarExperiment.AgPastureRemoveBiomass.Lincoln.Field.IrrigationEvents
                Operations FertilisationEvents
                Operations DefoliationSchedule
                Irrigation
                Fertiliser
                SurfaceOrganicMatter: InitialResidueName=grass; InitialResidueType=grass; InitialResidueMass=1000; InitialStandingFraction=0; InitialCPR=0; InitialCNR=25
                Report: EventNames=[Clock].EndOfDay
                  VariableNames:
                    [Clock].Today
                    [Pasture].AboveGround.Wt
                    [Pasture].AboveGround.NConc
                    [Spectral].NDVI
                    [Pasture].LAI
                Operations Sow
                  2017-03-31  [Pasture].Sow(population: 120, cultivar: "P Ryegrass", depth: 30, rowSpacing: 250);
                Pasture: Species=Perennial Ryegrass; Fertility=0.8; Nutrients=N; MaxRtDep=650; LaggedDayT=-999.9; Phenology=1.0015; FlowerLen=0; FlowerTime=0; SencIndex=0; DormIndex=0; DormT=-999.9; ExtinctCoeff=[0, 10, 0]; SeedDormTime=0; GermIndex=0; Albedo=0.23; Gsmax=0.011; R50=200; WaterDemand=0; LAI=0
                  GenericOrgan Leaf: IsAboveGround=true
                  GenericOrgan Stem: IsAboveGround=true
                  CompositeBiomass AboveGround: OrganNames=[Leaf, Stem]; IncludeLive=true; IncludeDead=true
                  CompositeBiomass AboveGroundLive: OrganNames=[Leaf, Stem]; IncludeLive=true; IncludeDead=false
                  CompositeBiomass AboveGroundDead: OrganNames=[Leaf, Stem]; IncludeLive=false; IncludeDead=true
                  GreenCohortInitialise: same as Validation.NewZealand.Lincoln.ThinzarExperiment.AusFarmPastureRemoveBiomass.LincolnPasture.Field.Pasture.GreenCohortInitialise
                  DryCohortInitialise: Status=established; LeafDMD=[0.825]; LeafWeight=[0]; LeafNConc=[0.01]; LeafSpecificArea=[430]; StemDMD=[0.825]; StemWeight=[0]; StemNConc=[0.01]; StemSpecificArea=[10]
                Soil: same as Validation.NewZealand.Lincoln.ThinzarExperiment.AusFarmPastureRemoveBiomass.LincolnPasture.Field.Soil
                Spectral: DrySoilNDVI=0.1; WetSoilNDVI=0.25; GreenCropNDVI=0.9; DeadCropNDVI=0.1
          Experiment WCMonoculture
            Factors
              Permutation
                Factor Ferilisation
                  CompositeFactor LincolnNMinus
                    Specifications:
                      [FertilisationEvents]
                      [DefoliationSchedule]
                    Operations FertilisationEvents: same as Validation.NewZealand.Lincoln.ThinzarExperiment.AgPastureRemoveBiomass.Factors.Permutation.Ferilisation.LincolnNMinus.FertilisationEvents
                    Operations DefoliationSchedule
                      2018-08-06  [WhiteClover].RemoveBiomass(amount:1614.80924753868, type: "SetResidueAmount")
                      2018-09-23  [WhiteClover].RemoveBiomass(amount:453.333333333333, type: "SetResidueAmount")
                      2018-11-02  [WhiteClover].RemoveBiomass(amount:1507.11211211211, type: "SetResidueAmount")
                      2018-12-10  [WhiteClover].RemoveBiomass(amount:1581.56784188034, type: "SetResidueAmount")
                      2019-01-21  [WhiteClover].RemoveBiomass(amount:2847.8478964401, type: "SetResidueAmount")
                      2019-02-26  [WhiteClover].RemoveBiomass(amount:859.260249554367, type: "SetResidueAmount")
                      2019-04-04  [WhiteClover].RemoveBiomass(amount:1063.05084745763, type: "SetResidueAmount")
                      2019-05-24  [WhiteClover].RemoveBiomass(amount:744.285714285714, type: "SetResidueAmount")
                      2019-08-06  [WhiteClover].RemoveBiomass(amount:366.666666666667, type: "SetResidueAmount")
                      2019-09-23  [WhiteClover].RemoveBiomass(amount:583.064516129032, type: "SetResidueAmount")
                      2019-10-31  [WhiteClover].RemoveBiomass(amount:481.666666666667, type: "SetResidueAmount")
                      2019-12-16  [WhiteClover].RemoveBiomass(amount:448.333333333333, type: "SetResidueAmount")
                      2020-01-21  [WhiteClover].RemoveBiomass(amount:601.666666666667, type: "SetResidueAmount")
                      2020-02-24  [WhiteClover].RemoveBiomass(amount:633.33333333333, type: "SetResidueAmount")
                      2020-04-06  [WhiteClover].RemoveBiomass(amount:617.5, type: "SetResidueAmount")
                  CompositeFactor LincolnNPlus
                    Specifications:
                      [FertilisationEvents]
                      [DefoliationSchedule]
                    Operations FertilisationEvents: same as Validation.NewZealand.Lincoln.ThinzarExperiment.AgPastureRemoveBiomass.Factors.Permutation.Ferilisation.LincolnNPlus.FertilisationEvents
                    Operations DefoliationSchedule
                      2018-08-06  [WhiteClover].RemoveBiomass(amount:1613.17632597552, type: "SetResidueAmount")
                      2019-01-21  [WhiteClover].RemoveBiomass(amount:1225, type: "SetResidueAmount")
                      2019-02-26  [WhiteClover].RemoveBiomass(amount:1216.74862661705, type: "SetResidueAmount")
                      2019-04-04  [WhiteClover].RemoveBiomass(amount:723.333333333333, type: "SetResidueAmount")
                      2019-05-24  [WhiteClover].RemoveBiomass(amount:586.666666666667, type: "SetResidueAmount")
                      2019-08-06  [WhiteClover].RemoveBiomass(amount:950, type: "SetResidueAmount")
                      2019-09-23  [WhiteClover].RemoveBiomass(amount:674.022687609075, type: "SetResidueAmount")
                      2019-10-31  [WhiteClover].RemoveBiomass(amount:393.333333333333, type: "SetResidueAmount")
                      2020-01-21  [WhiteClover].RemoveBiomass(amount:368.333333333333, type: "SetResidueAmount")
                      2020-02-24  [WhiteClover].RemoveBiomass(amount:655, type: "SetResidueAmount")
                      2020-04-06  [WhiteClover].RemoveBiomass(amount:511.666666666667, type: "SetResidueAmount")
                      2019-12-16  [WhiteClover].RemoveBiomass(amount:500.0, type: "SetResidueAmount")
            Simulation LincolnWC
              Clock: Start=2017-03-01; End=2021-06-30
              Weather: FileName=Lincoln_23.met
              Summary summaryfile
              SoilArbitrator Soil Arbitrator
              MicroClimate: a_interception=0; b_interception=1; c_interception=0; d_interception=0; SoilHeatFluxFraction=0.4; MinimumHeightDiffForNewLayer=0; NightInterceptionFraction=0.5; ReferenceHeight=2
              Zone Field: Area=1; Slope=0; AspectAngle=0; Altitude=50
                Soil Silt clay loam (Lincoln No1414): SoilType=Silt clay loam; LocalName=Wakanui; Site=Canterbury Agriculture and Science Centre; NearestTown=Lincoln; Region=Canterbury; Country=New Zealand; ApsoilNumber=1414; Latitude=-43.638; Longitude=172.474; LocationAccuracy=+/-50 m; YearOfSampling=1988
                  DataSource=The database of New Zealand soils was compiled by AgResearch (www.agresearch.co.nz) and based on soil properties gathered, mainly from publications, in the course of conducting several simulation-based research projects but particularly from the Pastoral 21 Environment program which was funded by the New Zealand Ministry for Business, Innovation and Employment,  Dairy NZ, Fonterra and Meat & Wool NZ.
                  Comments=The data is a combination of published or supplied measurements, pedotransfer functions, and expert opinion. See Cichota et al. (2013; Soil Research 51: 92-111, http://dx.doi.org/10.1071/SR12338) for a description of the pedotransfer functions. The soil carbon and fresh organic matter settings have been set as those broadly appropriate for permanent productive pastoral systems, see Cichota el al. (2012; Soil Research 50: 694-707, http://dx.doi.org/10.1071/SR12208). Users should take care to adapt these to local conditions before using the data in simulations. FOM values estimated to be 900 kg/ha of FOM in top 600mm of soil and another 100 kg/ha below. Soil C:N ratios taken from soil Silt clay loam (Ashburton NoXXXX).
                  Physical
                    Thickness  ParticleSizeSand  ParticleSizeSilt  ParticleSizeClay  Rocks  BD     AirDry  LL15   DUL    SAT    KS
                    90         5.333             67.001            27.667            0      1.203  0.061   0.185  0.356  0.511  1282.394
                    90         5.21              67.29             27.5              0      1.275  0.062   0.188  0.362  0.485  309.644
                    80         5.708             66.292            28                0      1.27   0.063   0.192  0.37   0.487  64.122
                    100        2.857             65.143            32                0      1.515  0.074   0.224  0.338  0.417  7.192
                    140        1.879             68.121            30                0      1.605  0.073   0.221  0.333  0.387  5.255
                    190        0.968             69.032            30                0      1.535  0.073   0.221  0.348  0.411  5.691
                    260        8.998             77.002            14                0      1.566  0.049   0.147  0.304  0.399  9.235
                    100        16.927            69.073            14                0      1.598  0.03    0.09   0.259  0.394  10.04
                    150        69.98             23.02             7                 0      1.55   0.016   0.05   0.217  0.415  150.652
                    300        13.705            60.295            26                0      1.574  0.055   0.166  0.323  0.401  7.564
                    BD source: Field measured and checked for sensibility
                    AirDry source: Estimated based on local knowledge
                    LL15, DUL source: Laboratory measured
                    SAT source: Calculated from measured, estimated or calculated BD
                    SoilCrop wheatSoil: same as Validation.NewZealand.Lincoln.ThinzarExperiment.AgPastureRemoveBiomass.Lincoln.Field.Silt clay loam (Lincoln No1414).Physical.wheatSoil
                    SoilCrop perennialgrassSoil: same as Validation.NewZealand.Lincoln.ThinzarExperiment.AgPastureRemoveBiomass.Lincoln.Field.Silt clay loam (Lincoln No1414).Physical.wheatSoil
                    SoilCrop SCRUMSoil: same as Validation.NewZealand.Lincoln.ThinzarExperiment.AgPastureRemoveBiomass.Lincoln.Field.Silt clay loam (Lincoln No1414).Physical.wheatSoil
                    SoilCrop RyegrassSoil: same as Validation.NewZealand.Lincoln.ThinzarExperiment.AgPastureRemoveBiomass.Lincoln.Field.Silt clay loam (Lincoln No1414).Physical.RyegrassSoil
                    SoilCrop WhiteCloverSoil: LL=[0.14, 0.14, 0.14, 0.14]; KL=[0.1, 0.1, 0.1, 0.02]; XF=[1, 1, 1, 1]
                  WaterBalance SoilWater: same as Validation.NewZealand.Lincoln.ThinzarExperiment.AgPastureRemoveBiomass.Lincoln.Field.Silt clay loam (Lincoln No1414).SoilWater
                  Organic: same as Validation.NewZealand.Lincoln.ThinzarExperiment.AgPastureRemoveBiomass.Lincoln.Field.Silt clay loam (Lincoln No1414).Organic
                  Chemical: same as Validation.NewZealand.Lincoln.ThinzarExperiment.AgPastureRemoveBiomass.Lincoln.Field.Silt clay loam (Lincoln No1414).Chemical
                  Nutrient
                  Solute NO3: InitialValuesUnits=ppm; WaterTableConcentration=0; D0=0; DepthConstant=0; MaxDepthSoluteAccessible=0; RunoffEffectivenessAtMovingSolute=0; MaxEffectiveRunoff=0
                  Solute NH4: InitialValuesUnits=ppm; WaterTableConcentration=0; D0=0; DepthConstant=0; MaxDepthSoluteAccessible=0; RunoffEffectivenessAtMovingSolute=0; MaxEffectiveRunoff=0
                  Solute Urea: same as Validation.NewZealand.Lincoln.ThinzarExperiment.AgPastureRemoveBiomass.Lincoln.Field.Silt clay loam (Lincoln No1414).Urea
                  Water: Thickness=[90, 90, 80, 100, 140, 190, 260, 100, 150, 300]; FilledFromTop=false
                    InitialValues=[0.356, 0.362, 0.37, 0.338, 0.333, 0.348, 0.304, 0.259, 0.217, 0.323]
                  SoilTemperature Temperature: InteractionsPerDay=8
                Operations IrrigationEvents: same as Validation.NewZealand.Lincoln.ThinzarExperiment.AgPastureRemoveBiomass.Lincoln.Field.IrrigationEvents
                Operations FertilisationEvents
                Irrigation
                Fertiliser
                SurfaceOrganicMatter: InitialResidueName=grass; InitialResidueType=grass; InitialResidueMass=1000; InitialStandingFraction=0; InitialCPR=0; InitialCNR=25
                Report: EventNames=[Clock].EndOfDay
                  VariableNames:
                    [Clock].Today
                    [WhiteClover].AboveGround.Wt
                    [WhiteClover].LAI
                    [WhiteClover].AboveGround.N
                    [WhiteClover].AboveGroundCrudeProtein
                    [WhiteClover].AboveGround.NConc
                    [Spectral].NDVI
                    [Irrigation].IrrigationApplied
                Operations DefoliationSchedule
                Operations Sow
                  2017-03-31  [WhiteClover].Sow(population: 120, cultivar: "WhiteClover", depth: 30, rowSpacing: 250);
                PastureSpecies WhiteClover: doyGermination=275; daysEmergenceToAnthesis=120; daysAnthesisToMaturity=85; degreesDayForAnthesis=1100; degreesDayForMaturity=900; daysAnnualsFactor=45; CanopyType=PastureSpecies; Albedo=0.26; Gsmax=0.011; R50=200; PlantType=AGPWhiteClover; SpeciesFamily=1; PhotosyntheticPathway=0; InitialisePlantAtStartOfSimulation=true; InitialShootDM=100; InitialRootDM=100; InitialRootDepth=100; PotentialRootingDepth=-1; initialDMFractionsGrasses=[0.15, 0.25, 0.25, 0.05, 0.05, 0.1, 0.1, 0.05, 0, 0, 0]; initialDMFractionsForbs=[0.2, 0.2, 0.15, 0.05, 0.1, 0.15, 0.1, 0.05, 0, 0, 0]; ReferencePhotosyntheticRate=1; PhotosyntheticEfficiency=0.01; PhotosynthesisCurveFactor=0.8; LightExtinctionCoefficient=0.8; GrowthTminimum=4; GrowthToptimum=22.5; GrowthTEffectExponent=1.6; ReferenceCO2=380; CO2EffectScaleFactor=700; CO2EffectOffsetFactor=600; CO2EffectMinimum=0.7; CO2EffectExponent=2; UseHeatStressFactor=0; HeatOnsetTemperature=30; HeatFullTemperature=36; HeatRecoverySumDD=20; HeatRecoveryTReference=25; UseColdStressFactor=0; ColdOnsetTemperature=3; ColdFullTemperature=-3; ColdRecoverySumDD=35; ColdRecoveryTReference=2; MaintenanceRespirationCoefficient=0.04; GrowthRespirationCoefficient=0.275; RespirationTReference=20; RespirationExponent=1.55; DegreesDayForGermination=125; TargetShootRootRatio=3.5; MaxRootAllocation=0.3; ShootRootGlfFactor=0.5; UseReproSeasonFactor=0; ReproSeasonReferenceLatitude=41; ReproSeasonTimingCoeff=0.14; ReproSeasonDurationCoeff=2; ReproSeasonShouldersLengthFactor=1; ReproSeasonOnsetDurationFactor=0.6; ReproSeasonMaxAllocationIncrease=0.5; ReproSeasonAllocationCoeff=0.1; LeafProportionMaximum=0.56; LeafProportionMinimum=0.28; LeafPropDMThreshold=500; LeafPropDMFactor=2000; LeafPropExponent=3; StolonProportionTarget=0.2; SpecificLeafArea=27.5; StolonEffectOnLAI=0; ShootMaxEffectOnLAI=500; MaxStemEffectOnLAI=0.5; LiveLeavesPerTiller=3; TissueTurnoverRefRateShoot=0.05; TissueTurnoverRefRateRoot=0.02; RelativeTurnoverEmerging=2; DetachmentRefRateShoot=0.11; TurnoverTemperatureMin=1; TurnoverTemperatureRef=18; TurnoverTemperatureExponent=1.5; TurnoverDroughtEffectMax=1; TurnoverDroughtThreshold=0.6; TurnoverDroughtExponent=2; DetachmentDroughtCoefficient=3; DetachmentDroughtEffectMin=0.1; TurnoverDefoliationMultiplier=1; TurnoverDefoliationCoefficient=0.5; TurnoverDefoliationEffectMin=0.025; TurnoverDefoliationEffectOnRoots=0.1; MinimumNFixation=0.2; MaximumNFixation=0.6; SoilSaturationEffectMax=0.1; MinimumWaterFreePorosity=-1; SoilSaturationRecoveryFactor=0.25; NDilutionCoefficient=1; GlfGeneric=1; GlfSoilFertility=1; PlantHeightMinimum=150; PlantHeightMaximum=150; PlantHeightMassForMax=7500; PlantHeightExponent=2.5; MinimumGreenWt=50; MinimumGreenLeafProp=0.8; MinimumGreenRootProp=0.5; PreferenceForLeafOverStems=1
                  initialDMFractionsLegumes=[0.16, 0.23, 0.22, 0.05, 0.03, 0.05, 0.05, 0.01, 0.04, 0.08, 0.08]
                  LinearInterpolationFunction FVPDFunction
                  PastureAboveGroundOrgan Leaf: NConcOptimum=0.05; NConcMinimum=0.0135; NConcMaximum=0.06; FractionStanding=1; MinimumLiveDM=10
                    GenericTissue EmergingTissue: FractionNRemobilisable=0; FractionSugarNewGrowth=0.5; DigestibilityCellWall=0.9; DigestibilityProtein=1; DMTransferredIn=0; NTransferredIn=0; NRemobilisable=0; NRemobilised=0
                    GenericTissue DevelopingTissue: FractionNRemobilisable=0.1; FractionSugarNewGrowth=0; DigestibilityCellWall=0.8; DigestibilityProtein=1; DMTransferredIn=0; NTransferredIn=0; NRemobilisable=0; NRemobilised=0
                    GenericTissue MatureTissue: FractionNRemobilisable=0.2; FractionSugarNewGrowth=0; DigestibilityCellWall=0.7; DigestibilityProtein=1; DMTransferredIn=0; NTransferredIn=0; NRemobilisable=0; NRemobilised=0
                    GenericTissue DeadTissue: FractionNRemobilisable=1; FractionSugarNewGrowth=0; DigestibilityCellWall=0.2; DigestibilityProtein=1; DMTransferredIn=0; NTransferredIn=0; NRemobilisable=0; NRemobilised=0
                  PastureAboveGroundOrgan Stem: NConcOptimum=0.0225; NConcMinimum=0.0073; NConcMaximum=0.03; FractionStanding=1; MinimumLiveDM=10
                    GenericTissue EmergingTissue: FractionNRemobilisable=0; FractionSugarNewGrowth=0.5; DigestibilityCellWall=0.9; DigestibilityProtein=1; DMTransferredIn=0; NTransferredIn=0; NRemobilisable=0; NRemobilised=0
                    GenericTissue DevelopingTissue: FractionNRemobilisable=0.1; FractionSugarNewGrowth=0; DigestibilityCellWall=0.8; DigestibilityProtein=1; DMTransferredIn=0; NTransferredIn=0; NRemobilisable=0; NRemobilised=0
                    GenericTissue MatureTissue: FractionNRemobilisable=0.2; FractionSugarNewGrowth=0; DigestibilityCellWall=0.7; DigestibilityProtein=1; DMTransferredIn=0; NTransferredIn=0; NRemobilisable=0; NRemobilised=0
                    GenericTissue DeadTissue: FractionNRemobilisable=1; FractionSugarNewGrowth=0; DigestibilityCellWall=0.2; DigestibilityProtein=1; DMTransferredIn=0; NTransferredIn=0; NRemobilisable=0; NRemobilised=0
                  PastureAboveGroundOrgan Stolon: NConcOptimum=0.025; NConcMinimum=0.008; NConcMaximum=0.0325; FractionStanding=0.3; MinimumLiveDM=10
                    GenericTissue EmergingTissue: FractionNRemobilisable=0; FractionSugarNewGrowth=0.5; DigestibilityCellWall=0.9; DigestibilityProtein=1; DMTransferredIn=0; NTransferredIn=0; NRemobilisable=0; NRemobilised=0
                    GenericTissue DevelopingTissue: FractionNRemobilisable=0.1; FractionSugarNewGrowth=0; DigestibilityCellWall=0.8; DigestibilityProtein=1; DMTransferredIn=0; NTransferredIn=0; NRemobilisable=0; NRemobilised=0
                    GenericTissue MatureTissue: FractionNRemobilisable=0.2; FractionSugarNewGrowth=0; DigestibilityCellWall=0.7; DigestibilityProtein=1; DMTransferredIn=0; NTransferredIn=0; NRemobilisable=0; NRemobilised=0
                    GenericTissue DeadTissue: FractionNRemobilisable=1; FractionSugarNewGrowth=0; DigestibilityCellWall=0.2; DigestibilityProtein=1; DMTransferredIn=0; NTransferredIn=0; NRemobilisable=0; NRemobilised=0
                  PastureBelowGroundOrgan Root: NConcOptimum=0.0225; NConcMinimum=0.01; NConcMaximum=0.0275; MinimumRootingDepth=30; MaximumPotentialRootingDepth=350; ElongationRate=25; DepthDistributionParamTop=70; DepthDistributionExponent=2.5; DepthDistributionParamBottom=1.05; SpecificRootLength=45; KNH4=0.005; KNO3=0.01; MaximumNUptake=5; NExtractionSWFactorExponent=1.5; MinimumLiveDM=1; Depth=0; MaximumAllowedDepth=0
                    RootTissue Live: DMTransferredOut=0; FractionNRemobilisable=0.1; DMRemoved=0; NRemoved=0; NRemobilisable=0; NRemobilised=0
                    RootTissue Dead: DMTransferredOut=0; FractionNRemobilisable=1; DMRemoved=0; NRemoved=0; NRemobilisable=0; NRemobilised=0
                Spectral: DrySoilNDVI=0.1; WetSoilNDVI=0.25; GreenCropNDVI=0.9; DeadCropNDVI=0.1
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