Simulations: Version=163
  Memo TitlePage
    # The APSIM Tropical Pasture Model

    The APSIM Tropical Pasture model has been developed using the Plant Modelling Framework (PMF) of [brown_plant_2014]. This new framework provides a library of plant organ and process submodels that can be coupled, at runtime, to construct a model in much the same way that models can be coupled to construct a simulation. This means that dynamic composition of lower level process and organ classes (e.g. photosynthesis, leaf) into larger constructions (e.g. maize, wheat, sorghum) can be achieved by the model developer without additional coding.

    The model consists of:

    * a phenology model to simulate development between growth phases
    * a collection of organs to simulate the various plant parts
    * an arbitrator to allocate resources (N, biomass) to the various plant organs
  Folder Replacements
    Plant TropicalPasture: PlantType=TropicalPasture; IsEnding=false; DaysAfterEnding=0
      AccumulateFunction Age: StartStageName=Germination; EndStageName=EndReproductive; FractionRemovedOnCut=0; FractionRemovedOnHarvest=0; FractionRemovedOnGraze=0; FractionRemovedOnPrune=0
        Constant day: FixedValue=0.00273973
      PhotoperiodFunction Photoperiod: Twilight=0; DayLength=0
      PhotoperiodDeltaFunction PhotoperiodDelta: Twilight=0
      Phenology
        Constant ThermalTime: FixedValue=1
        GerminatingPhase Germinating: Start=Sowing; End=Germination; IsEmerged=false
        EmergingPhase Emerging: Start=Germination; End=StartVegetative; IsEmerged=true; TTForTimeStep=0
          VariableReference ThermalTime: VariableName=[Phenology].ThermalTime.Value
          AddFunction Target
            Constant ShootLag: FixedValue=7
            MultiplyFunction DepthxRate
              VariableReference SowingDepth: VariableName=[Plant].SowingData.Depth
              Constant ShootRate: FixedValue=0
        PhotoperiodPhase VegetativePhase: CricialPhotoperiod=13; PPDirection=0; Start=StartVegetative; End=StartReproductive; IsEmerged=true
        PhotoperiodPhase ReproductivePhase: CricialPhotoperiod=11; PPDirection=1; Start=StartReproductive; End=EndReproductive; IsEmerged=true
        GotoPhase: Start=EndReproductive; IsEmerged=true; PhaseNameToGoto=VegetativePhase
      OrganArbitrator Arbitrator
        BiomassTypeArbitrator DMArbitration
          Folder PotentialPartitioningMethods
            ReallocationMethod
            AllocateFixationMethod
            RetranslocationMethod
            SendPotentialDMAllocationsMethod
          Folder AllocationMethods
            NutrientConstrainedAllocationMethod
            DryMatterAllocationsMethod
          RelativeAllocation ArbitrationMethod
        BiomassTypeArbitrator NArbitration
          Folder PotentialPartitioningMethods
            ReallocationMethod
          Folder ActualPartitioningMethods
            AllocateFixationMethod
            RetranslocationMethod
          Folder AllocationMethods
            NitrogenAllocationsMethod
          RelativeAllocation ArbitrationMethod
          AllocateUptakesMethod
        WaterUptakeMethod
        NitrogenUptakeMethod
      CompositeBiomass AboveGround: OrganNames=[Leaf, Stem, Crown]; IncludeLive=true; IncludeDead=true
      CompositeBiomass AboveGroundLive: OrganNames=[Leaf, Stem, Crown]; IncludeLive=true; IncludeDead=false
      CompositeBiomass AboveGroundDead: OrganNames=[Leaf, Stem, Crown]; IncludeLive=false; IncludeDead=true
      CompositeBiomass BelowGround: OrganNames=[Root]; IncludeLive=true; IncludeDead=true
      CompositeBiomass Total: OrganNames=[Leaf, Stem, Root, Crown]; IncludeLive=true; IncludeDead=true
      CompositeBiomass TotalLive: OrganNames=[Leaf, Stem, Root, Crown]; IncludeLive=true; IncludeDead=false
      CompositeBiomass TotalDead: OrganNames=[Leaf, Stem, Root, Crown]; IncludeLive=false; IncludeDead=true
      CompositeBiomass Forage: OrganNames=[Leaf, Stem]; IncludeLive=true; IncludeDead=true
      PerennialLeaf Leaf: MaintenanceRespiration=0; GrowthRespiration=0; Albedo=0.26; Gsmax350=0.0075; R50=200; LAI=0; Height=0; FRGR=0; PotentialEP=0; WaterDemand=0
        MultiplyFunction InitialWtFunction
          Constant InitialPlantWt: FixedValue=0.01; Units=g/plant
          VariableReference Population: VariableName=[Plant].Population
        MinimumFunction FRGRFunction
          VariableReference: VariableName=[Leaf].Photosynthesis.FT
        Constant ExtinctionCoefficient: FixedValue=0.65
          Memo
            Value of 0.57 from
            Radiation Interception and Growth of Planted and Coppice Stands of Four Fast-GrowingTropical Trees
            Author(s): Robin A. Harrington and James H. Fownes
            Source: Journal of Applied Ecology, Vol. 32, No. 1 (Feb., 1995), pp. 1-8

            But their data suggests a value of 0.3

            For the Brazilian Brachiaria data (Piata cultivar), the extinction coefficient was 0.65.
        LinearInterpolationFunction HeightFunction
          XYPairs: X=[0, 100, 1000]; Y=[100, 300, 1200]
          VariableReference XValue: VariableName=[AboveGround].Wt
        Constant MaximumNConc: FixedValue=0.021
          Memo
            0.043 gN/g from R.B. Thomas 1, D.D. Richter 2, H. Ye 2, P.R. Heine z, and B.R. Strain 1 Nitrogen dynamics and growth of seedlings of an N-fixing tree
            (GKricidia sepium (Jacq.) Walp.) exposed to elevated atmospheric carbon dioxide Oecologia (1991) 88:415-421
        Constant MinimumNConc: FixedValue=0.005
        Constant NReallocationFactor: FixedValue=0.5
          Memo
            N reallocation is working and recycling some of the non-structural N during senescence.
        BiomassRemoval BiomassRemovalDefaults: HarvestFractionLiveToRemove=0; HarvestFractionDeadToRemove=0; HarvestFractionLiveToResidue=0; HarvestFractionDeadToResidue=0
        Constant DMConversionEfficiency: FixedValue=1
        MultiplyFunction LeafResidenceTime
          Constant Potential: FixedValue=80; Units=days
          LinearInterpolationFunction LAIfactor
            XYPairs: X=[0, 5, 6, 7]; Y=[1, 1, 0.8, 0.5]
            VariableReference XValue: VariableName=[Leaf].LAI
          LinearInterpolationFunction FloweringFactor
            XYPairs: X=[0, 0.77, 1.1, 1.11, 1.27, 1.28, 5]; Y=[1, 1, 1, 0.7, 0.7, 1, 1]
            VariableReference XValue: VariableName=[TropicalPasture].Age
          Memo
            The flowering factor is determined by daylength, but there is not a tool for this control in Apsim, so were used the plant ages correspondent to each daylength value.
        Constant LeafDetachmentTime: FixedValue=30
        Constant DMRetranslocationFactor: FixedValue=0
        Constant NRetranslocationFactor: FixedValue=0
        RUEModel Photosynthesis
          Constant RUE: FixedValue=1.44
          WeightedTemperatureFunction FT: MaximumTemperatureWeighting=0.5
            XYPairs: X=[8.9, 30.2, 40, 45]; Y=[0, 1, 1, 0]
          LinearInterpolationFunction FVPD
            XYPairs: X=[0, 10, 50]; Y=[1, 1, 1]
            VariableReference XValue: VariableName=[Leaf].Photosynthesis.VPD
          LinearInterpolationFunction FN
            XYPairs: X=[0, 1, 1.5]; Y=[0, 1, 1]
            VariableReference XValue: VariableName=[Leaf].Fn
          LinearInterpolationFunction FW
            XYPairs: X=[0, 1, 1.5]; Y=[0, 1, 1]
            VariableReference XValue: VariableName=[Leaf].Fw
          RUECO2Function FCO2: PhotosyntheticPathway=C4
          Memo
            Ayaz eta 2004 presented a RUE of 1.6 g/MJ PAR during non-limiting temperature conditions for field pea.  Halving this to make it total radiation gives 0.8 g/MJ and adding 20% to account for root and  nodule production and N fixiation costs gives 1.0 g/MJ.

            Bosi 2017 found a RUE of 2.31 g/MJ PAR for Brachiaria brizantha cv. BRS Piata (C4 grass) in irrigated experiment, applying a correction factor for limiting temperature and not considering data in flowering period (it changes the partitioning). Converting this to total radiation was obtained 1.16 g/MJ and adding 20% to account for root production gives 1.44 g/MJ.
          VariableReference RadnInt: VariableName=[Leaf].RadiationIntercepted
        LinearInterpolationFunction LeafKillFraction
          XYPairs: X=[0, 2]; Y=[1, 0]
          VariableReference XValue: VariableName=[Weather].MinT
        Constant MinimumLAI: FixedValue=0.1; Units=m2/m2
        Constant ExtinctionCoefficientDead: FixedValue=0.57
          Memo
            Value of 0.57 from
            Radiation Interception and Growth of Planted and Coppice Stands of Four Fast-GrowingTropical Trees
            Author(s): Robin A. Harrington and James H. Fownes
            Source: Journal of Applied Ecology, Vol. 32, No. 1 (Feb., 1995), pp. 1-8

            But their data suggests a value of 0.3
        MultiplyFunction SpecificLeafAreaFunction
          LinearInterpolationFunction SLAmax
            XYPairs: X=[0, 0.3, 0.7, 2]; Y=[0.015, 0.018, 0.02, 0.02]
            VariableReference XValue: VariableName=[TropicalPasture].Age
          LinearInterpolationFunction WaterFactor
            XYPairs: X=[0, 0.8, 1]; Y=[0, 0.4, 1]
            VariableReference XValue: VariableName=[Leaf].Fw
          LinearInterpolationFunction Radiationfactor
            XYPairs: X=[0, 15, 30]; Y=[1.4, 1, 1]
            VariableReference XValue: VariableName=[Weather].Radn
          Memo
            The water deficit is decreasing SLA and the shading is increasing SLA, but is necessary improve the SLA simulation by solar radiation.
        Constant CarbonConcentration: FixedValue=0.4
        Constant LeafDevelopmentRate: FixedValue=1
        NutrientPoolFunctions DMDemands
          MultiplyFunction Structural
            PartitionFractionDemandFunction DMDemandFunction
              Memo
                The flowering factor is determined by daylength, but there is not a tool for this control in Apsim, so were used the plant ages correspondent to each daylength value.
              LinearInterpolationFunction PartitionFraction
                XYPairs: X=[0, 0.2, 0.3, 0.4, 0.71, 0.72, 1.21, 1.22, 5]; Y=[0.5, 0.5, 0.55, 0.55, 0.55, 0.55, 0.55, 0.55, 0.55]
                VariableReference XValue: VariableName=[TropicalPasture].Age
          Constant Metabolic: FixedValue=0
          Constant Storage: FixedValue=0
        NutrientPoolFunctions NDemands
          MultiplyFunction Structural
            VariableReference MinNconc: VariableName=[Leaf].minimumNconc
            VariableReference PotentialDMAllocation: VariableName=[Leaf].potentialDMAllocation.Structural
          Constant Metabolic: FixedValue=0
          StorageNDemandFunction Storage
            VariableReference MaxNconc: VariableName=[Leaf].MaximumNconc
            Constant NitrogenDemandSwitch: FixedValue=1
        Constant StomatalConductanceCO2Modifier: FixedValue=1
      Root: GrowthRespiration=0; MaintenanceRespiration=0
        RootShapeCylinder RootShape
        Constant RootFrontVelocity: FixedValue=20
        Constant SenescenceRate: FixedValue=0.001
        Constant MaximumNConc: FixedValue=0.003
        Constant MaxDailyNUptake: FixedValue=6
        Constant MinimumNConc: FixedValue=0.001
        Constant MaximumRootDepth: FixedValue=1000000
        LinearInterpolationFunction KLModifier
          XYPairs: X=[0, 3, 10]; Y=[1, 1, 1]
          VariableReference XValue: VariableName=[Leaf].LAI
        LinearInterpolationFunction KNO3
          XYPairs: X=[0, 0.003]; Y=[0.03, 0.03]
          VariableReference XValue: VariableName=[Root].LengthDensity
        LinearInterpolationFunction KNH4
          XYPairs: X=[0, 0.003]; Y=[0, 0]
          VariableReference XValue: VariableName=[Root].LengthDensity
        LinearInterpolationFunction NUptakeSWFactor
          XYPairs: X=[0, 0.5, 1]; Y=[1, 1, 1]
          VariableReference XValue: VariableName=[Root].RWC
        Constant SpecificRootLength: FixedValue=100; Units=m/g
        BiomassRemoval BiomassRemovalDefaults: HarvestFractionLiveToRemove=0; HarvestFractionDeadToRemove=0; HarvestFractionLiveToResidue=0; HarvestFractionDeadToResidue=0
        Constant NitrogenDemandSwitch: FixedValue=1
        MultiplyFunction DMRetranslocationFactor
          Constant PotentialDMRetranslocationFactor: FixedValue=0
          LinearInterpolationFunction FloweringFactor
            XYPairs
              X=[0, 0.71, 0.72, 1.21, 1.22, 1.82, 1.83, 2.32, 2.33, 2.82, 2.83, 3.32, 3.33, 5]
              Y=[0, 0, 0, 0, 0, 0, 0, 0, 0, 0, 0, 0, 0, 0]
            VariableReference XValue: VariableName=[TropicalPasture].Age
          LinearInterpolationFunction LAIfactor
            XYPairs: X=[0, 0.76, 0.77, 1.2, 1.21, 2]; Y=[0, 0, 0, 0, 0, 0]
            VariableReference XValue: VariableName=[Leaf].LAI
          Memo
            The flowering factor is determined by daylength, but there is not a tool for this control in Apsim, so were used the plant ages correspondent to each daylength value.

            DM retranslocation is not working currently, so it is necessary build that in Apsim.
        MultiplyFunction NRetranslocationFactor
          Constant PotentialNRetranslocationFactor: FixedValue=0
          LinearInterpolationFunction FnFactor
            XYPairs: X=[0, 0.45, 1, 1.5]; Y=[1, 0, 0, 0]
            VariableReference XValue: VariableName=[Leaf].Fn
          LinearInterpolationFunction LAIfactor
            XYPairs: X=[0, 1, 7]; Y=[1, 1, 1]
            VariableReference XValue: VariableName=[Leaf].LAI
          Memo
            N retranslocation is working, but studies about N concentration are necessary to improve these simulations.
        Constant DMConversionEfficiency: FixedValue=1
        Constant MaintenanceRespirationFunction: FixedValue=1
        Constant RemobilisationCost: FixedValue=0
        Constant CarbonConcentration: FixedValue=0.4
        NutrientDemandFunctions DMDemands
          MultiplyFunction Structural
            PartitionFractionDemandFunction DMDemandFunction
              LinearInterpolationFunction PartitionFraction
                XYPairs: X=[0, 0.2, 0.3, 0.4, 0.71, 0.72, 1.21, 1.22, 5]; Y=[0.33, 0.33, 0.25, 0.25, 0.2, 0, 0, 0.2, 0.2]
                Memo
                  The flowering factor is determined by daylength, but there is not a tool for this control in Apsim, so were used the plant ages correspondent to each daylength value.
                VariableReference XValue: VariableName=[TropicalPasture].Age
            Constant StructuralFraction: FixedValue=0.8; Units=g/g
          Constant Metabolic: FixedValue=0
          StorageDMDemandFunction Storage
            SubtractFunction StorageFraction
              Constant One: FixedValue=1
              VariableReference StructuralFraction: VariableName=[Root].DMDemands.Structural.StructuralFraction
          Constant QStructuralPriority: FixedValue=1
          Constant QMetabolicPriority: FixedValue=1
          Constant QStoragePriority: FixedValue=1
        NutrientDemandFunctions NDemands
          MultiplyFunction Structural
            VariableReference MinNconc: VariableName=[Root].minimumNconc
            VariableReference PotentialDMAllocation: VariableName=[Root].potentialDMAllocation.Structural
          MultiplyFunction Metabolic
            SubtractFunction MetabolicNconc
              VariableReference CritNconc: VariableName=[Root].criticalNConc
              VariableReference MinNconc: VariableName=[Root].minimumNconc
            VariableReference PotentialDMAllocation: VariableName=[Root].potentialDMAllocation.Structural
          StorageNDemandFunction Storage
            VariableReference NitrogenDemandSwitch: VariableName=[Root].nitrogenDemandSwitch
            VariableReference MaxNconc: VariableName=[Root].maximumNconc
          Constant QStructuralPriority: FixedValue=1
          Constant QMetabolicPriority: FixedValue=1
          Constant QStoragePriority: FixedValue=1
        VariableReference CriticalNConc: VariableName=[Root].MinimumNConc
        NutrientPoolFunctions InitialWt
          Constant Structural: FixedValue=0.02; Units=g/plant
          Constant Metabolic: FixedValue=0
          Constant Storage: FixedValue=0
        Constant RootDepthStressFactor: FixedValue=1
      GenericOrgan Stem: IsAboveGround=true
        Constant NReallocationFactor: FixedValue=0
          Memo
            N reallocation is working and recycling some of the non-structural N during senescence.
        Constant NRetranslocationFactor: FixedValue=0
        Constant DMRetranslocationFactor: FixedValue=0
        Constant MaximumNConc: FixedValue=0.003
        Constant MinimumNConc: FixedValue=0.001
        Constant DetachmentRateFunction: FixedValue=0.01; Units=/d
        BiomassRemoval BiomassRemovalDefaults: HarvestFractionLiveToRemove=0; HarvestFractionDeadToRemove=0; HarvestFractionLiveToResidue=0; HarvestFractionDeadToResidue=0
        Constant MaintenanceRespirationFunction: FixedValue=0; Units=0-1
        Constant DMConversionEfficiency: FixedValue=1; Units=0-1
        Constant NitrogenDemandSwitch: FixedValue=1
        LinearInterpolationFunction SenescenceRate
          XYPairs
            X=[0, 0.77, 1.1, 1.11, 1.27, 1.28, 2.21, 2.22, 2.38, 2.39, 3.21, 3.22, 3.38, 3.39, 5]
            Y=[0.005, 0.005, 0.005, 0.015, 0.015, 0.005, 0.005, 0.005, 0.005, 0.005, 0.005, 0.005, 0.005, 0.005, 0.005]
          Memo
            The flowering factor is determined by daylength, but there is not a tool for this control in Apsim, so were used the plant ages correspondent to each daylength value.
          VariableReference XValue: VariableName=[TropicalPasture].Age
        Constant DMReallocationFactor: FixedValue=0
        VariableReference CriticalNConc: VariableName=[Stem].MinimumNConc
        Constant RemobilisationCost: FixedValue=0
        Constant CarbonConcentration: FixedValue=0.4
        NutrientDemandFunctions DMDemands
          MultiplyFunction Structural
            PartitionFractionDemandFunction DMDemandFunction
              MultiplyFunction PartitionFraction
                LinearInterpolationFunction PartitionFraction
                  XYPairs
                    X=[0, 0.2, 0.3, 0.4, 0.71, 0.72, 0.98, 0.99, 1.21, 1.22, 5]
                    Y=[0.09, 0.09, 0.1, 0.1, 0.15, 0.25, 0.25, 0.35, 0.35, 0.15, 0.15]
                  VariableReference XValue: VariableName=[TropicalPasture].Age
              Memo
                The flowering factor is determined by daylength, but there is not a tool for this control in Apsim, so were used the plant ages correspondent to each daylength value.
            Constant StructuralFraction: FixedValue=1; Units=g/g
          Constant Metabolic: FixedValue=0
          StorageDMDemandFunction Storage
            SubtractFunction StorageFraction
              Constant One: FixedValue=1
              VariableReference StructuralFraction: VariableName=[Stem].DMDemands.Structural.StructuralFraction
          Constant QStructuralPriority: FixedValue=1
          Constant QMetabolicPriority: FixedValue=1
          Constant QStoragePriority: FixedValue=1
        NutrientDemandFunctions NDemands
          MultiplyFunction Structural
            VariableReference MinNconc: VariableName=[Stem].minimumNconc
            VariableReference PotentialDMAllocation: VariableName=[Stem].potentialDMAllocation.Structural
          MultiplyFunction Metabolic
            SubtractFunction MetabolicNconc
              VariableReference CritNconc: VariableName=[Stem].criticalNConc
              VariableReference MinNconc: VariableName=[Stem].minimumNconc
            VariableReference PotentialDMAllocation: VariableName=[Stem].potentialDMAllocation.Structural
          StorageNDemandFunction Storage
            VariableReference NitrogenDemandSwitch: VariableName=[Stem].nitrogenDemandSwitch
            VariableReference MaxNconc: VariableName=[Stem].maximumNconc
          Constant QStructuralPriority: FixedValue=1
          Constant QMetabolicPriority: FixedValue=1
          Constant QStoragePriority: FixedValue=1
        RetranslocateNonStructural RetranslocateNitrogen
        NutrientPoolFunctions InitialWt
          Constant Structural: FixedValue=0; Units=g/m^2
          Constant Metabolic: FixedValue=0
          Constant Storage: FixedValue=0
        Constant Photosynthesis: FixedValue=0
        VariableReference initialNConcFunction: VariableName=[Stem].MinimumNConc
      GenericOrgan Crown: IsAboveGround=true
        Constant NReallocationFactor: FixedValue=0
          Memo
            N reallocation is working and recycling some of the non-structural N during senescence.
        Constant MaximumNConc: FixedValue=0.003
        Constant MinimumNConc: FixedValue=0.001
        Constant DetachmentRateFunction: FixedValue=0.01; Units=/d
        BiomassRemoval BiomassRemovalDefaults: HarvestFractionLiveToRemove=0; HarvestFractionDeadToRemove=0; HarvestFractionLiveToResidue=0; HarvestFractionDeadToResidue=0
        Constant MaintenanceRespirationFunction: FixedValue=0; Units=0-1
        Constant DMConversionEfficiency: FixedValue=1; Units=0-1
        Constant NitrogenDemandSwitch: FixedValue=1
        MultiplyFunction DMRetranslocationFactor1
          Constant PotentialDMRetranslocationFactor: FixedValue=0
          LinearInterpolationFunction FloweringFactor
            XYPairs: X=[0, 0.94, 0.95, 1.1, 1.11, 5]; Y=[1, 1, 1, 1, 1, 1]
            VariableReference XValue: VariableName=[TropicalPasture].Age
          LinearInterpolationFunction LAIfactor
            XYPairs: X=[0, 0.76, 0.77, 1.2, 1.21, 7]; Y=[1, 1, 1, 1, 1, 1]
            VariableReference XValue: VariableName=[TropicalPasture].Photoperiod.Value
          Memo
            The flowering factor is determined by daylength, but there is not a tool for this control in Apsim, so were used the plant ages correspondent to each daylength value.

            DM retranslocation is not working currently, so it is necessary build that in Apsim.
        MultiplyFunction NRetranslocationFactor
          Constant PotentialNRetranslocationFactor: FixedValue=0
          LinearInterpolationFunction FnFactor
            XYPairs: X=[0, 0.5, 1]; Y=[1, 1, 1]
            VariableReference XValue: VariableName=[Leaf].Fn
          LinearInterpolationFunction LAIfactor
            XYPairs: X=[0, 1, 7]; Y=[1, 1, 1]
            VariableReference XValue: VariableName=[Leaf].LAI
          Memo
            N retranslocation is working, but studies about N concentration are necessary to improve these simulations.
        LinearInterpolationFunction SenescenceRate: same as Replacements.TropicalPasture.Stem.SenescenceRate
        Constant DMReallocationFactor: FixedValue=0
        Constant DMRetranslocationFactor: FixedValue=0
        VariableReference CriticalNConc: VariableName=[Crown].MinimumNConc
        Constant RemobilisationCost: FixedValue=0
        Constant CarbonConcentration: FixedValue=0.4
        NutrientDemandFunctions DMDemands
          MultiplyFunction Structural
            PartitionFractionDemandFunction DMDemandFunction
              MultiplyFunction PartitionFraction
                LinearInterpolationFunction PartitionFraction
                  XYPairs: X=[0, 0.2, 0.3, 0.4, 0.71, 0.72, 0.98, 0.99, 1.21, 1.22, 5]; Y=[0.08, 0.08, 0.1, 0.1, 0.1, 0.2, 0.2, 0.1, 0.1, 0.1, 0.1]
                  VariableReference XValue: VariableName=[TropicalPasture].Age
              Memo
                The flowering factor is determined by daylength, but there is not a tool for this control in Apsim, so were used the plant ages correspondent to each daylength value.
            Constant StructuralFraction: FixedValue=0.5; Units=g/g
          Constant Metabolic: FixedValue=0
          StorageDMDemandFunction Storage
            SubtractFunction StorageFraction
              Constant One: FixedValue=1
              VariableReference StructuralFraction: VariableName=[Crown].DMDemands.Structural.StructuralFraction
          Constant QStructuralPriority: FixedValue=1
          Constant QMetabolicPriority: FixedValue=1
          Constant QStoragePriority: FixedValue=1
        NutrientDemandFunctions NDemands
          MultiplyFunction Structural
            VariableReference MinNconc: VariableName=[Crown].minimumNconc
            VariableReference PotentialDMAllocation: VariableName=[Crown].potentialDMAllocation.Structural
          MultiplyFunction Metabolic
            SubtractFunction MetabolicNconc
              VariableReference CritNconc: VariableName=[Crown].criticalNConc
              VariableReference MinNconc: VariableName=[Crown].minimumNconc
            VariableReference PotentialDMAllocation: VariableName=[Crown].potentialDMAllocation.Structural
          StorageNDemandFunction Storage
            VariableReference NitrogenDemandSwitch: VariableName=[Crown].nitrogenDemandSwitch
            VariableReference MaxNconc: VariableName=[Crown].maximumNconc
          Constant QStructuralPriority: FixedValue=1
          Constant QMetabolicPriority: FixedValue=1
          Constant QStoragePriority: FixedValue=1
        RetranslocateNonStructural RetranslocateNitrogen
        NutrientPoolFunctions InitialWt: same as Replacements.TropicalPasture.Stem.InitialWt
        Constant Photosynthesis: FixedValue=0
        VariableReference initialNConcFunction: VariableName=[Crown].MinimumNConc
      Cultivar Bambatsi
      Cultivar Brachiaria
      Constant MortalityRate: FixedValue=0
      Constant SeedMortalityRate: FixedValue=0
  DataStore
    ExcelInput Observed: FileNames=[Observed.xlsx]; SheetNames=[Observed, ObservedSoilWater]
    PredictedObserved: PredictedTableName=Report; ObservedTableName=Observed; FieldNameUsedForMatch=SimulationName; FieldName2UsedForMatch=Clock.Today; AllColumns=false
    PredictedObserved PredictedObservedSoilWater: PredictedTableName=Report; ObservedTableName=ObservedSoilWater; FieldNameUsedForMatch=SimulationName; FieldName2UsedForMatch=Clock.Today; AllColumns=false
  Folder Validation
    Folder Australia
      Folder LiverpoolPlains
        Simulation Hudson
          Weather: FileName=Hudson.met
          Clock: Start=1994-08-05; End=2000-01-23
          Summary
          SoilArbitrator Soil Arbitrator
          Zone Field: Area=1; Slope=0; AspectAngle=0; Altitude=50
            Soil: Latitude=0; Longitude=0
              Physical
                Thickness  BD   AirDry  LL15  DUL   SAT   KS
                100        1    0.1     0.24  0.47  0.53  384
                200        1.1  0.1     0.28  0.49  0.54  384
                200        1.1  0.1     0.28  0.52  0.57  384
                200        1.1  0.1     0.29  0.52  0.55  384
                200        1.1  0.1     0.29  0.51  0.54  384
                200        1.2  0.1     0.29  0.5   0.53  384
                200        1.2  0.1     0.29  0.5   0.53  384
                200        1.2  0.1     0.33  0.48  0.51  384
                200        1.2  0.1     0.33  0.48  0.51  384
                200        1.2  0.1     0.35  0.48  0.51  384
                200        1.2  0.1     0.35  0.47  0.5   384
                200        1.2  0.1     0.35  0.47  0.5   384
                200        1.3  0.1     0.35  0.47  0.5   384
                200        1.3  0.1     0.35  0.47  0.5   384
                200        1.3  0.1     0.35  0.47  0.5   384
                200        1.3  0.1     0.35  0.47  0.5   384
                SoilCrop TropicalPastureSoil
                  LL=[0.25, 0.3, 0.3, 0.3, 0.3, 0.33, 0.35, 0.38, 0.38, 0.4, 0.4, 0.4, 0.4, 0.4, 0.4, 0.4]
                  KL=[0.04, 0.04, 0.04, 0.03, 0.02, 0.01, 0.01, 0.01, 0.005, 0.005, 0.005, 0.005, 0.005, 0.005, 0.005, 0.005]
                  XF=[1, 1, 1, 1, 1, 0.75, 0.75, 0.5, 0.5, 0.25, 0.25, 0, 0, 0, 0, 0]
              WaterBalance SoilWater: SummerDate=1-Nov; SummerU=9; SummerCona=5; WinterDate=1-Apr; WinterU=9; WinterCona=5; DiffusConst=40; DiffusSlope=16; Salb=0.13; CN2Bare=75; CNRed=20; CNCov=0.8; PSIDul=-100
                Thickness=[100, 200, 200, 200, 200, 200, 200, 200, 200, 200, 200, 200, 200, 200, 200, 200]
                SWCON=[0.4, 0.4, 0.4, 0.4, 0.4, 0.4, 0.4, 0.4, 0.4, 0.4, 0.4, 0.4, 0.4, 0.4, 0.4, 0.4]
              SoilNitrogen: fom_types=[default, manure, mucuna, lablab, shemp, stable]; fract_carb=[0.2, 0.3, 0.54, 0.57, 0.45, 0]; fract_cell=[0.7, 0.3, 0.37, 0.37, 0.47, 0.1]; fract_lign=[0.1, 0.4, 0.09, 0.06, 0.08, 0.9]; NPartitionApproach=0
              Organic: FOMCNRatio=40; CarbonUnits=Total
                Thickness  Carbon  SoilCNRatio  FBiom  FInert  FOM
                100        1.4     14.5         0.03   0.45    1.84299
                200        1.4     14.5         0.03   0.45    1.51868
                200        1.4     14.5         0.02   0.6     1.25144
                200        1.35    14.5         0.015  0.7     1.03122
                200        0.95    14.5         0.01   0.85    0.849759
                200        1       14.5         0.01   0.9     0.700227
                200        0.8     14.5         0.01   0.99    0.577008
                200        0.45    14.5         0.01   0.99    0.475472
                200        0.45    14.5         0.01   0.99    0.391803
                200        0.45    14.5         0.01   0.99    0.322858
                200        0.45    14.5         0.01   0.99    0.266044
                200        0.45    14.5         0.01   0.99    0.219228
                200        0.45    14.5         0.01   0.99    0.180651
                200        0.45    14.5         0.01   0.99    0.148862
                200        0.45    14.5         0.01   0.99    0.122667
                200        0.45    14.5         0.01   0.99    0.101081
              Chemical: PH=[6, 6.4, 6.8, 7.2, 7.6, 8, 8, 8, 8, 8, 8, 8, 8, 8, 8, 8]; PHUnits=Water
                Thickness=[100, 200, 200, 200, 200, 200, 200, 200, 200, 200, 200, 200, 200, 200, 200, 200]
              Water: InitialPAWmm=401; RelativeTo=LL15; FilledFromTop=false
                Thickness=[100, 200, 200, 200, 200, 200, 200, 200, 200, 200, 200, 200, 200, 200, 200, 200]
                InitialValues=[0.47, 0.47, 0.53, 0.5, 0.47, 0.46, 0.45, 0.45, 0.45, 0.43, 0.42, 0.42, 0.41, 0.43, 0.42, 0.41]
              CERESSoilTemperature Temperature
              SoilNitrogenNO3 NO3: InitialValuesUnits=ppm; WaterTableConcentration=0; D0=0; DepthConstant=0; MaxDepthSoluteAccessible=0; RunoffEffectivenessAtMovingSolute=0; MaxEffectiveRunoff=0
                Thickness=[100, 200, 200, 200, 200, 200, 200, 200, 200, 200, 200, 200, 200, 200, 200, 200]
                InitialValues=[10.7, 9.99, 7.87, 6.2, 4.85, 3.56, 2.72, 2.34, 2.47, 3.24, 4.25, 4.94, 5.2, 4.95, 4.52, 4.24]
              SoilNitrogenNH4 NH4: InitialValuesUnits=ppm; WaterTableConcentration=0; D0=0; DepthConstant=0; MaxDepthSoluteAccessible=0; RunoffEffectivenessAtMovingSolute=0; MaxEffectiveRunoff=0
                Thickness=[100, 200, 200, 200, 200, 200, 200, 200, 200, 200, 200, 200, 200, 200, 200, 200]
                InitialValues=[0.3, 0.3, 0.3, 0.3, 0.3, 0.3, 0.3, 0.3, 0.3, 0.3, 0.3, 0.3, 0.3, 0.3, 0.3, 0.3]
              SoilNitrogenUrea Urea: InitialValues=[0, 0, 0, 0, 0, 0, 0, 0, 0, 0, 0, 0, 0, 0, 0, 0]; InitialValuesUnits=kg/ha; WaterTableConcentration=0; D0=0; DepthConstant=0; MaxDepthSoluteAccessible=0; RunoffEffectivenessAtMovingSolute=0; MaxEffectiveRunoff=0
                Thickness=[100, 200, 200, 200, 200, 200, 200, 200, 200, 200, 200, 200, 200, 200, 200, 200]
            Irrigation
            Fertiliser
            SurfaceOrganicMatter: InitialResidueName=Wheat; InitialResidueType=Wheat; InitialResidueMass=2000; InitialStandingFraction=0; InitialCPR=0; InitialCNR=80
            MicroClimate: a_interception=0.1; b_interception=1; c_interception=0; d_interception=0; SoilHeatFluxFraction=0.4; MinimumHeightDiffForNewLayer=0; NightInterceptionFraction=0.5; ReferenceHeight=2
            Plant TropicalPasture: PlantType=TropicalPasture; IsEnding=false; DaysAfterEnding=0
            Operations
              1994-12-08  [Fertiliser].Apply(20.0, Fertiliser.Types.UreaN, 0);
              1995-01-01  [TropicalPasture].Sow(population: 100, cultivar: Bambatsi, depth: 100, rowSpacing: 100);
              1995-10-09  [CuttingManagement].Script.DoCut(10.0, 5.0);
              1995-11-21  [Fertiliser].Apply(50.0, Fertiliser.Types.UreaN, 0);
              1995-12-01  [CuttingManagement].Script.DoCut(10.0, 5.0);
              1996-01-30  [CuttingManagement].Script.DoCut(10.0, 5.0);
              1996-02-28  [CuttingManagement].Script.DoCut(10.0, 5.0);
              1996-11-26  [CuttingManagement].Script.DoCut(10.0, 5.0);
              1996-12-22  [Fertiliser].Apply(50.0, Fertiliser.Types.UreaN, 0);
              1997-01-14  [CuttingManagement].Script.DoCut(10.0, 5.0);
              1997-03-04  [CuttingManagement].Script.DoCut(10.0, 5.0);
              1997-06-26  [Fertiliser].Apply(22.0, Fertiliser.Types.UreaN, 0);
              1997-11-17  [CuttingManagement].Script.DoCut(10.0, 5.0);
              1998-04-07  [CuttingManagement].Script.DoCut(10.0, 5.0);
              1998-10-09  [Fertiliser].Apply(30.0, Fertiliser.Types.UreaN, 0);
              1998-12-17  [CuttingManagement].Script.DoCut(10.0, 5.0);
              1999-02-16  [CuttingManagement].Script.DoCut(10.0, 5.0);
              1999-06-02  [CuttingManagement].Script.DoCut(10.0, 5.0);
              1999-11-10  [Fertiliser].Apply(50.0, Fertiliser.Types.UreaN, 0);
              1999-09-29  [CuttingManagement].Script.DoCut(10.0, 5.0);
              2000-02-02  [CuttingManagement].Script.DoCut(10.0, 5.0);
            Report: EventNames=[Clock].DoReport
              VariableNames:
                [Clock].Today
                [TropicalPasture].Phenology.CurrentPhase.Name
                [TropicalPasture].Phenology.CurrentStageName
                [TropicalPasture].Photoperiod
                [Soil].SoilWater.Eo
                [Soil].SoilWater.Es
                [Soil].SoilWater.Drainage
                [Soil].SoilWater.Runoff
                [Soil].SoilWater.pond
                sum([Soil].Water.MM[2:3]) as SW10_50cm
                sum([Soil].Water.MM[4:5]) as SW50_90cm
                sum([Soil].Water.MM[6:7]) as SW90_130cm
                sum([Soil].Water.MM[8:9]) as SW130_170cm
                sum([Soil].Water.MM[10:11]) as SW170_210cm
                sum([Soil].Water.MM[12:13]) as SW210_250cm
                sum([Soil].Water.MM[2:13]) as SW10_250cm
                ([TropicalPasture].Leaf.Live.Wt + [TropicalPasture].Stem.Live.Wt) as LiveCuttingWt
                ([TropicalPasture].Leaf.Dead.Wt + [TropicalPasture].Stem.Dead.Wt) as DeadCuttingWt
                [TropicalPasture].AboveGround.Wt
                [TropicalPasture].AboveGroundLive.Wt
                [TropicalPasture].AboveGroundDead.Wt
                [TropicalPasture].BelowGround.Wt
                [TropicalPasture].Total.Wt
                [TropicalPasture].Leaf.Dead.Wt
                [TropicalPasture].Leaf.Live.Wt
                [TropicalPasture].Stem.Dead.Wt
                [TropicalPasture].Stem.Live.Wt
                [TropicalPasture].Root.Dead.Wt
                [TropicalPasture].Root.Live.Wt
                [TropicalPasture].AboveGround.N
                [TropicalPasture].BelowGround.N
                [TropicalPasture].Total.N
                [TropicalPasture].TotalLive.N
                [TropicalPasture].TotalDead.N
                [TropicalPasture].Leaf.Dead.N
                [TropicalPasture].Leaf.Live.N
                [TropicalPasture].Stem.Dead.N
                [TropicalPasture].Stem.Live.N
                [TropicalPasture].Root.Live.N
                [TropicalPasture].Root.Dead.N
                [TropicalPasture].Leaf.Live.NConc
                [TropicalPasture].Leaf.Dead.NConc
                [TropicalPasture].Stem.Live.NConc
                [TropicalPasture].Root.Live.NConc
                [TropicalPasture].Root.WaterUptake
                [TropicalPasture].Leaf.Transpiration
                [TropicalPasture].Leaf.WaterDemand
                [TropicalPasture].Root.Depth
                [TropicalPasture].Leaf.CoverGreen
                [TropicalPasture].Leaf.CoverTotal
                [TropicalPasture].Leaf.CoverDead
                [TropicalPasture].Leaf.LAI
                [TropicalPasture].Leaf.LAIDead
                [TropicalPasture].Leaf.Fn
                [TropicalPasture].Leaf.Fw
                [TropicalPasture].Leaf.Photosynthesis.FT
                [TropicalPasture].Leaf.Photosynthesis.FVPD
                [TropicalPasture].Leaf.Photosynthesis.RueAct
                [TropicalPasture].Stem.MinimumNConc
                [TropicalPasture].Root.MinimumNConc
                [TropicalPasture].Stem.MaximumNConc
                [TropicalPasture].Root.MaximumNConc
                [TropicalPasture].TotalLive.Wt
                [TropicalPasture].Stem.Live.StructuralWt
                [TropicalPasture].Stem.Live.StorageWt
                [TropicalPasture].TotalDead.Wt
                [Soil].Water.MM
                [Soil].NO3.kgha
                [TropicalPasture].Arbitrator.N.TotalPlantDemand
                [TropicalPasture].Age
            Manager CuttingManagement
```csharp
using Models.PMF.Interfaces;
using Newtonsoft.Json;
using System;
using System.Collections.Generic;
using Models.Core;
using Models.PMF;
using Models.PMF.Interfaces;
using System.Xml.Serialization;
using Models.Soils;

namespace Models
{
    [Serializable] 
    [System.Xml.Serialization.XmlInclude(typeof(Model))]
    public class Script : Model
    {
        [Link(ByName = true)] Plant TropicalPasture;
        [Link] Clock Clock;

    

        
        [EventSubscribe("StartOfSimulation")]
        private void OnSimulationCommencing(object sender, EventArgs e)
        {
            
        }

        public void DoCut(double LeafResidue, double StemResidue)
        {
            if (TropicalPasture == null)
                throw new Exception("Tropical pasture is null");
            double L = (double)TropicalPasture.FindByPath("Leaf.Live.Wt").Value;
            double LeafRemovalFraction = 0;
            if (L > 0)
                LeafRemovalFraction = (L - LeafResidue) / L;
            if (LeafRemovalFraction < 0)
                LeafRemovalFraction = 0;
               
            double S = (double)TropicalPasture.FindByPath("Stem.Live.Wt").Value;
            double StemRemovalFraction = 0;
            if (S > 0)
                StemRemovalFraction = (S - StemResidue) / S;               
            if (StemRemovalFraction < 0)
                StemRemovalFraction = 0;
               
            if (TropicalPasture == null)
                throw new Exception("Cannot find tropical pasture model");
            var Leaf = TropicalPasture.FindChild<IHasDamageableBiomass>("Leaf");
            var Stem = TropicalPasture.FindChild<IHasDamageableBiomass>("Stem");
            Leaf.RemoveBiomass(liveToRemove: LeafRemovalFraction, deadToRemove: 0.0, liveToResidue: 0.0, deadToResidue: 0.0);
            Stem.RemoveBiomass(liveToRemove: StemRemovalFraction, deadToRemove: 0.0, liveToResidue: 0.0, deadToResidue: 0.0);

        }
        
    }
}
```
      Folder Dalby
        Manager Wet
          StartDate = 1-Nov
          EndDate = 30-Mar
          PanFraction = 0.75
          RainDays = 28
```csharp
using Models.Climate;
using System;
using Models.Core;
using Models.PMF;
using Models.Soils;
using Models.Utilities;
using APSIM.Shared.Utilities;

namespace Models
{
    [Serializable]
    public class Script : Model
    {
        [Link] Clock Clock;
        [Link] Fertiliser Fertiliser;
        [Link] Summary Summary;
        [Link] Irrigation Irrigation;
        [Link] Soil Soil;
        Accumulator accumulatedRain;
        Accumulator accumulatedPan;
        
        [Description("Start of sowing window (d-mmm)")]
        public string StartDate { get; set; }
        [Description("End of sowing window (d-mmm)")]
        public string EndDate { get; set; }
        [Description("Pan Fraction (0-1)")]
        public double PanFraction { get; set; }
        [Description("Duration of rainfall accumulation (d)")]
        public int RainDays { get; set; }
        private double DaysSinceIrrigation = 0;
        
        
        [EventSubscribe("StartOfSimulation")]
        private void OnSimulationCommencing(object sender, EventArgs e)
        {
            accumulatedRain = new Accumulator(this, "[Weather].Rain", RainDays);
            accumulatedPan = new Accumulator(this, "[Soil].SoilWater.Eo", RainDays);
            DaysSinceIrrigation = 0;
        }
        

        [EventSubscribe("DoManagement")]
        private void OnDoManagement(object sender, EventArgs e)
        {
            accumulatedRain.Update();
            accumulatedPan.Update();
            DaysSinceIrrigation += 1;
            double RainDeficit = accumulatedPan.Sum * PanFraction - accumulatedRain.Sum;

            if (DaysSinceIrrigation == RainDays)
            {
                DaysSinceIrrigation = 0;
                if (DateUtilities.WithinDates(StartDate, Clock.Today, EndDate) &&
                    RainDeficit > 0)
                {
                    Irrigation.Apply(RainDeficit);
                }
            }
        }
        
    }
}
```
        Experiment Dalby
          Factors
            Factor Irr: Specification=[IrrigationSchedule]
              Operations Wet
                1982-03-01  [Irrigation].Apply(50);
                1982-10-05  [Irrigation].Apply(50);
                1982-11-01  [Irrigation].Apply(50);
                1983-01-30  [Irrigation].Apply(75);
                1983-02-18  [Irrigation].Apply(75);
                1984-03-05  [Irrigation].Apply(50);
              Operations Dry
          Simulation DalbyBase
            Weather: FileName=DALBYCOL.met
            Clock: Start=1982-01-12; End=1984-04-29
            Summary
            SoilArbitrator Soil Arbitrator
            Zone Field: Area=1; Slope=0; AspectAngle=0; Altitude=50
              Soil: Latitude=0; Longitude=0
                Physical
                  Thickness  BD    AirDry  LL15  DUL    SAT    KS
                  100        1.24  0.2     0.3   0.42   0.44   50
                  125        1.24  0.2     0.31  0.42   0.44   50
                  200        1.27  0.2     0.32  0.42   0.44   20
                  275        1.3   0.2     0.36  0.42   0.44   20
                  300        1.32  0.2     0.37  0.425  0.445  10
                  300        1.34  0.2     0.38  0.43   0.45   10
                  300        1.35  0.2     0.39  0.42   0.44   10
                  300        1.38  0.2     0.41  0.43   0.45   10
                  SoilCrop TropicalPastureSoil: LL=[0.27, 0.29, 0.32, 0.36, 0.37, 0.38, 0.39, 0.41]; KL=[0.05, 0.05, 0.04, 0.04, 0.03, 0.02, 0.02, 0.02]; XF=[1, 1, 1, 1, 1, 1, 1, 1]
                WaterBalance SoilWater: SummerDate=1-Nov; SummerU=6; SummerCona=3.5; WinterDate=1-Apr; WinterU=6; WinterCona=35; DiffusConst=40; DiffusSlope=16; Salb=0.13; CN2Bare=72; CNRed=20; CNCov=0.8; PSIDul=-100; Thickness=[100, 2150, 2000, -3550, 300, 300, 300, 300]; SWCON=[0.2, 0.2, 0.2, 0.2, 0.2, 0.2, 0.2, 0.2]
                SoilNitrogen: fom_types=[default, manure, mucuna, lablab, shemp, stable]; fract_carb=[0.2, 0.3, 0.54, 0.57, 0.45, 0]; fract_cell=[0.7, 0.3, 0.37, 0.37, 0.47, 0.1]; fract_lign=[0.1, 0.4, 0.09, 0.06, 0.08, 0.9]; NPartitionApproach=0
                Organic: FOMCNRatio=60; CarbonUnits=Total
                  Thickness  Carbon  SoilCNRatio  FBiom  FInert  FOM
                  100        1       14           0.03   0.3     596.837
                  125        1       14           0.02   0.4     489.936
                  200        1       14           0.015  0.6     357.268
                  275        0.5     14           0.01   0.8     231.43
                  300        0.4     14           0.01   0.95    144.112
                  300        0.4     14           0.01   0.95    89.7391
                  300        0.4     14           0.01   0.95    55.8809
                  300        0.4     14           0.01   0.95    34.7973
                Chemical: same as Validation.Australia.LiverpoolPlains.Hudson.Field.soil.Chemical
                Water: Thickness=[100, 125, 200, 275, 300, 300, 300, 300]; InitialValues=[0.42, 0.42, 0.42, 0.42, 0.4, 0.405, 0.415, 0.425]; InitialPAWmm=90.75; RelativeTo=LL15; FilledFromTop=false
                CERESSoilTemperature Temperature
                SoilNitrogenNO3 NO3: InitialValues=[20, 12, 5.5, 3, 1, 1, 1, 1, 1, 1, 1, 1, 1, 1, 1, 1]; InitialValuesUnits=ppm; WaterTableConcentration=0; D0=0; DepthConstant=0; MaxDepthSoluteAccessible=0; RunoffEffectivenessAtMovingSolute=0; MaxEffectiveRunoff=0
                  Thickness=[100, 200, 200, 200, 200, 200, 200, 200, 200, 200, 200, 200, 200, 200, 200, 200]
                SoilNitrogenNH4 NH4: InitialValuesUnits=ppm; WaterTableConcentration=0; D0=0; DepthConstant=0; MaxDepthSoluteAccessible=0; RunoffEffectivenessAtMovingSolute=0; MaxEffectiveRunoff=0
                  Thickness=[100, 200, 200, 200, 200, 200, 200, 200, 200, 200, 200, 200, 200, 200, 200, 200]
                  InitialValues=[0.1, 0.1, 0.1, 0.1, 0.1, 0.1, 0.1, 0.1, 0.1, 0.1, 0.2, 0.2, 0.2, 0.2, 0.2, 0.2]
                SoilNitrogenUrea Urea: same as Validation.Australia.LiverpoolPlains.Hudson.Field.soil.Urea
              Irrigation
              Fertiliser
              SurfaceOrganicMatter: InitialResidueName=Wheat; InitialResidueType=Wheat; InitialResidueMass=100; InitialStandingFraction=0; InitialCPR=0; InitialCNR=80
              MicroClimate: a_interception=0; b_interception=1; c_interception=0; d_interception=0; SoilHeatFluxFraction=0.4; MinimumHeightDiffForNewLayer=0; NightInterceptionFraction=0.5; ReferenceHeight=2
              Plant TropicalPasture: PlantType=TropicalPasture; IsEnding=false; DaysAfterEnding=0
              Operations
                1982-01-12  [TropicalPasture].Sow(population: 100, cultivar: Bambatsi, depth: 100, rowSpacing: 100);
                1982-01-12  [Fertiliser].Apply(100.0, Fertiliser.Types.UreaN, 5);
                1982-01-12  [Irrigation].Apply(5);
                1982-01-15  [Irrigation].Apply(5);
                1982-01-18  [Irrigation].Apply(5);
                1982-01-21  [Irrigation].Apply(5);
                1982-01-24  [Irrigation].Apply(5);
                1982-01-27  [Irrigation].Apply(5);
                1982-08-01  [Fertiliser].Apply(100.0, Fertiliser.Types.UreaN, 5);
                1982-08-01  [CuttingManagement].Script.DoCut(10.0, 5.0);
                1983-08-01  [Fertiliser].Apply(100.0, Fertiliser.Types.UreaN, 5);
                1983-08-01  [CuttingManagement].Script.DoCut(10.0, 5.0);
                1984-08-01  [Fertiliser].Apply(100.0, Fertiliser.Types.UreaN, 5);
                1984-08-01  [CuttingManagement].Script.DoCut(10.0, 5.0);
              Report: EventNames=[Clock].DoReport
                VariableNames:
                  [Clock].Today
                  [TropicalPasture].Phenology.CurrentPhase.Name
                  [TropicalPasture].Phenology.CurrentStageName
                  [TropicalPasture].Photoperiod
                  [Soil].SoilWater.Eo
                  [Soil].SoilWater.Es
                  [Soil].SoilWater.Drainage
                  [Soil].SoilWater.Runoff
                  [Soil].SoilWater.pond
                  sum([Soil].Water.MM[1:3]) as SW0_42cm
                  sum([Soil].Water.MM[4:5]) as SW42_100cm
                  sum([Soil].Water.MM[6:8]) as SW100_190cm
                  sum([Soil].Water.MM[1:8]) as SW0_190cm
                  sum([Soil].NO3.kgha[1:8]) as TotalNO3
                  [TropicalPasture].AboveGround.Wt
                  [TropicalPasture].AboveGroundLive.Wt
                  [TropicalPasture].AboveGroundDead.Wt
                  [TropicalPasture].BelowGround.Wt
                  [TropicalPasture].Total.Wt
                  [TropicalPasture].Leaf.Dead.Wt
                  [TropicalPasture].Leaf.Live.Wt
                  [TropicalPasture].Stem.Dead.Wt
                  [TropicalPasture].Stem.Live.Wt
                  [TropicalPasture].Root.Dead.Wt
                  [TropicalPasture].Root.Live.Wt
                  [TropicalPasture].AboveGround.N
                  [TropicalPasture].BelowGround.N
                  [TropicalPasture].Total.N
                  [TropicalPasture].TotalLive.N
                  [TropicalPasture].TotalDead.N
                  [TropicalPasture].Leaf.Dead.N
                  [TropicalPasture].Leaf.Live.N
                  [TropicalPasture].Stem.Dead.N
                  [TropicalPasture].Stem.Live.N
                  [TropicalPasture].Root.Live.N
                  [TropicalPasture].Root.Dead.N
                  [TropicalPasture].Leaf.Live.NConc
                  [TropicalPasture].Leaf.Dead.NConc
                  [TropicalPasture].Stem.Live.NConc
                  [TropicalPasture].Root.Live.NConc
                  [TropicalPasture].Root.WaterUptake
                  [TropicalPasture].Leaf.Transpiration
                  [TropicalPasture].Leaf.PotentialEP
                  [TropicalPasture].Root.Depth
                  [TropicalPasture].Leaf.CoverGreen
                  [TropicalPasture].Leaf.CoverTotal
                  [TropicalPasture].Leaf.CoverDead
                  [TropicalPasture].Leaf.LAI
                  [TropicalPasture].Leaf.LAIDead
                  [TropicalPasture].Leaf.Fn
                  [TropicalPasture].Leaf.Fw
                  [TropicalPasture].Leaf.Photosynthesis.FT
                  [TropicalPasture].Leaf.Photosynthesis.FVPD
                  [TropicalPasture].Leaf.Photosynthesis.RueAct
                  [TropicalPasture].Stem.MinimumNConc
                  [TropicalPasture].Root.MinimumNConc
                  [TropicalPasture].Stem.MaximumNConc
                  [TropicalPasture].Root.MaximumNConc
                  [TropicalPasture].TotalLive.Wt
                  [TropicalPasture].Stem.Live.StructuralWt
                  [TropicalPasture].Stem.Live.StorageWt
                  [TropicalPasture].TotalDead.Wt
                  [Soil].Water.MM
                  [Soil].NO3.kgha
                  [TropicalPasture].Arbitrator.N.TotalPlantDemand
                  [TropicalPasture].Age
                  [TropicalPasture].Root.LengthDensity
                  [TropicalPasture].Leaf.Height
              Operations IrrigationSchedule
                1982-01-12  [Irrigation].Apply(20);
              Manager CuttingManagement: same as Validation.Australia.LiverpoolPlains.Hudson.Field.CuttingManagement
      Folder Lansdown
        Simulation Lansdown
          Weather: FileName=Lansdown.met
          Clock: Start=1963-01-01; End=1968-12-31
          Summary
          SoilArbitrator Soil Arbitrator
          Zone Field: Area=1; Slope=0; AspectAngle=0; Altitude=50
            Soil: Latitude=0; Longitude=0
              Physical
                Thickness  BD   AirDry  LL15  DUL  SAT  KS
                100        1.3  0.1     0.15  0.3  0.4  200
                200        1.3  0.1     0.15  0.3  0.4  200
                200        1.3  0.1     0.15  0.3  0.4  200
                200        1.3  0.1     0.15  0.3  0.4  200
                200        1.3  0.1     0.15  0.3  0.4  200
                200        1.3  0.1     0.15  0.3  0.4  200
                200        1.3  0.1     0.15  0.3  0.4  200
                200        1.3  0.1     0.15  0.3  0.4  200
                SoilCrop TropicalPastureSoil: LL=[0.15, 0.15, 0.15, 0.15, 0.15, 0.2, 0.23, 0.26]; KL=[0.04, 0.04, 0.04, 0.03, 0.02, 0.01, 0.01, 0.01]; XF=[1, 1, 1, 1, 1, 0.75, 0.75, 0.5]
              WaterBalance SoilWater: same as Validation.Australia.LiverpoolPlains.Hudson.Field.soil.SoilWater
              SoilNitrogen: fom_types=[default, manure, mucuna, lablab, shemp, stable]; fract_carb=[0.2, 0.3, 0.54, 0.57, 0.45, 0]; fract_cell=[0.7, 0.3, 0.37, 0.37, 0.47, 0.1]; fract_lign=[0.1, 0.4, 0.09, 0.06, 0.08, 0.9]; NPartitionApproach=0
              Organic: same as Validation.Australia.LiverpoolPlains.Hudson.Field.soil.Organic
              Chemical: same as Validation.Australia.LiverpoolPlains.Hudson.Field.soil.Chemical
              Water: InitialPAWmm=813; RelativeTo=LL15; FilledFromTop=false
                Thickness=[100, 200, 200, 200, 200, 200, 200, 200, 200, 200, 200, 200, 200, 200, 200, 200]
                InitialValues=[0.4, 0.4, 0.4, 0.4, 0.4, 0.4, 0.4, 0.4, 0.45, 0.43, 0.42, 0.42, 0.41, 0.43, 0.42, 0.41]
              CERESSoilTemperature Temperature
              SoilNitrogenNO3 NO3: same as Validation.Australia.LiverpoolPlains.Hudson.Field.soil.NO3
              SoilNitrogenNH4 NH4: same as Validation.Australia.LiverpoolPlains.Hudson.Field.soil.NH4
              SoilNitrogenUrea Urea: same as Validation.Australia.LiverpoolPlains.Hudson.Field.soil.Urea
            Irrigation
            Fertiliser
            SurfaceOrganicMatter: InitialResidueName=Wheat; InitialResidueType=Wheat; InitialResidueMass=2000; InitialStandingFraction=0; InitialCPR=0; InitialCNR=80
            MicroClimate: a_interception=0.1; b_interception=1; c_interception=0; d_interception=0; SoilHeatFluxFraction=0.4; MinimumHeightDiffForNewLayer=0; NightInterceptionFraction=0.5; ReferenceHeight=2
            Plant TropicalPasture: PlantType=TropicalPasture; IsEnding=false; DaysAfterEnding=0
            Operations
              1963-01-01  [Fertiliser].Apply(20.0, Fertiliser.Types.UreaN, 0);
              1963-01-01  [TropicalPasture].Sow(population: 100, cultivar: Bambatsi, depth: 100, rowSpacing: 100);
              1999-09-29  [CuttingManagement].Script.DoCut(50.0, 75.0);
              2000-02-02  [CuttingManagement].Script.DoCut(50.0, 75.0);
              1964-01-30  [CuttingManagement].Script.DoCut(50.0, 75.0);
              1964-02-26  [CuttingManagement].Script.DoCut(50.0, 75.0);
              1964-03-27  [CuttingManagement].Script.DoCut(50.0, 75.0);
              1964-04-23  [CuttingManagement].Script.DoCut(50.0, 75.0);
              1964-05-23  [CuttingManagement].Script.DoCut(50.0, 75.0);
              1964-06-19  [CuttingManagement].Script.DoCut(50.0, 75.0);
              1964-11-19  [CuttingManagement].Script.DoCut(50.0, 75.0);
              1964-12-15  [CuttingManagement].Script.DoCut(50.0, 75.0);
              1965-01-14  [CuttingManagement].Script.DoCut(50.0, 75.0);
              1965-02-11  [CuttingManagement].Script.DoCut(50.0, 75.0);
              1965-03-13  [CuttingManagement].Script.DoCut(50.0, 75.0);
              1965-04-09  [CuttingManagement].Script.DoCut(50.0, 75.0);
              1966-01-10  [CuttingManagement].Script.DoCut(50.0, 75.0);
              1966-02-07  [CuttingManagement].Script.DoCut(50.0, 75.0);
              1966-03-08  [CuttingManagement].Script.DoCut(50.0, 75.0);
              1966-04-04  [CuttingManagement].Script.DoCut(50.0, 75.0);
              1966-05-04  [CuttingManagement].Script.DoCut(50.0, 75.0);
              1966-05-31  [CuttingManagement].Script.DoCut(50.0, 75.0);
              1966-12-06  [CuttingManagement].Script.DoCut(50.0, 75.0);
              1967-01-03  [CuttingManagement].Script.DoCut(50.0, 75.0);
              1967-01-31  [CuttingManagement].Script.DoCut(50.0, 75.0);
              1967-02-27  [CuttingManagement].Script.DoCut(50.0, 75.0);
              1967-03-30  [CuttingManagement].Script.DoCut(50.0, 75.0);
              1967-11-22  [CuttingManagement].Script.DoCut(50.0, 75.0);
              1967-12-21  [CuttingManagement].Script.DoCut(50.0, 75.0);
              1968-01-17  [CuttingManagement].Script.DoCut(50.0, 75.0);
              1968-02-14  [CuttingManagement].Script.DoCut(50.0, 75.0);
              1968-03-15  [CuttingManagement].Script.DoCut(50.0, 75.0);
              1968-04-11  [CuttingManagement].Script.DoCut(50.0, 75.0);
              1968-05-10  [CuttingManagement].Script.DoCut(50.0, 75.0);
            Report: EventNames=[Clock].DoReport
              VariableNames:
                [Clock].Today
                [TropicalPasture].Phenology.CurrentPhase.Name
                [Soil].SoilWater.Eo
                [Soil].SoilWater.Es
                [Soil].SoilWater.Drainage
                [Soil].SoilWater.Runoff
                [Soil].SoilWater.pond
                [TropicalPasture].AboveGround.Wt
                [TropicalPasture].AboveGroundLive.Wt
                [TropicalPasture].AboveGroundDead.Wt
                [TropicalPasture].BelowGround.Wt
                [TropicalPasture].Total.Wt
                [TropicalPasture].Leaf.Dead.Wt
                [TropicalPasture].Leaf.Live.Wt
                [TropicalPasture].Stem.Dead.Wt
                [TropicalPasture].Stem.Live.Wt
                [TropicalPasture].Root.Dead.Wt
                [TropicalPasture].Root.Live.Wt
                [TropicalPasture].AboveGround.N
                [TropicalPasture].BelowGround.N
                [TropicalPasture].Total.N
                [TropicalPasture].TotalLive.N
                [TropicalPasture].TotalDead.N
                [TropicalPasture].Leaf.Dead.N
                [TropicalPasture].Leaf.Live.N
                [TropicalPasture].Stem.Dead.N
                [TropicalPasture].Stem.Live.N
                [TropicalPasture].Root.Live.N
                [TropicalPasture].Root.Dead.N
                [TropicalPasture].Leaf.Live.NConc
                [TropicalPasture].Leaf.Dead.NConc
                [TropicalPasture].Stem.Live.NConc
                [TropicalPasture].Root.Live.NConc
                [TropicalPasture].Root.WaterUptake
                [TropicalPasture].Leaf.Transpiration
                [TropicalPasture].Leaf.WaterDemand
                [TropicalPasture].Root.Depth
                [TropicalPasture].Leaf.CoverGreen
                [TropicalPasture].Leaf.CoverTotal
                [TropicalPasture].Leaf.CoverDead
                [TropicalPasture].Leaf.LAI
                [TropicalPasture].Leaf.LAIDead
                [TropicalPasture].Leaf.Fn
                [TropicalPasture].Leaf.Fw
                [TropicalPasture].Leaf.Photosynthesis.FT
                [TropicalPasture].Leaf.Photosynthesis.FVPD
                [TropicalPasture].Leaf.Photosynthesis.RueAct
                [TropicalPasture].Stem.MinimumNConc
                [TropicalPasture].Root.MinimumNConc
                [TropicalPasture].Stem.MaximumNConc
                [TropicalPasture].Root.MaximumNConc
                [TropicalPasture].TotalLive.Wt
                [TropicalPasture].Stem.Live.StructuralWt
                [TropicalPasture].Stem.Live.StorageWt
                [TropicalPasture].TotalDead.Wt
                [Soil].Water.MM
                [Soil].NO3.kgha
                [TropicalPasture].Arbitrator.N.TotalPlantDemand
                [TropicalPasture].Age
            Manager CuttingManagement
```csharp
using Models.PMF.Interfaces;
using Newtonsoft.Json;
using System;
using System.Collections.Generic;
using Models.Core;
using Models.PMF;
using Models.PMF.Interfaces;
using System.Xml.Serialization;
using Models.Soils;

namespace Models
{
    [Serializable] 
    [System.Xml.Serialization.XmlInclude(typeof(Model))]
    public class Script : Model
    {
        [Link(ByName = true)] Plant TropicalPasture;
        [Link] Clock Clock;

    

        
        [EventSubscribe("StartOfSimulation")]
        private void OnSimulationCommencing(object sender, EventArgs e)
        {
            
        }

        public void DoCut(double LeafResidue, double StemResidue)
        {
            double L = (double)TropicalPasture.FindByPath("Leaf.Live.Wt").Value;
            double LeafRemovalFraction = 0;
            if (L > 0)
                LeafRemovalFraction = (L - LeafResidue) / L;
            if (LeafRemovalFraction < 0)
                LeafRemovalFraction = 0;
               
            double S = (double)TropicalPasture.FindByPath("Stem.Live.Wt").Value;
            double StemRemovalFraction = 0;
            if (S > 0)
                StemRemovalFraction = (S - StemResidue) / S;               
            if (StemRemovalFraction < 0)
                StemRemovalFraction = 0;
               
               
            var Leaf = TropicalPasture.FindChild<IHasDamageableBiomass>("Leaf");
            var Stem = TropicalPasture.FindChild<IHasDamageableBiomass>("Stem");
            Leaf.RemoveBiomass(liveToRemove: LeafRemovalFraction, deadToRemove: 0.0, liveToResidue: 0.0, deadToResidue: 0.0);
            Stem.RemoveBiomass(liveToRemove: StemRemovalFraction, deadToRemove: 0.0, liveToResidue: 0.0, deadToResidue: 0.0);

        }
        
    }
}
```
      Folder Toowoomba
        Experiment Toowoomba
          Factors
            Factor N: Specification=[NManagement].Script.NRate = 0,50,100,200,400
          Simulation ToowoombaBase
            Weather: FileName=Toowoomba.met
            Clock: Start=1971-08-01; End=1979-12-31
            Summary
            SoilArbitrator Soil Arbitrator
            Zone Field: Area=1; Slope=0; AspectAngle=0; Altitude=50
              Soil: same as Validation.Australia.Dalby.Dalby.DalbyBase.Field.soil
              Irrigation
              Fertiliser
              SurfaceOrganicMatter: InitialResidueName=Wheat; InitialResidueType=Wheat; InitialResidueMass=100; InitialStandingFraction=0; InitialCPR=0; InitialCNR=80
              MicroClimate: a_interception=0; b_interception=1; c_interception=0; d_interception=0; SoilHeatFluxFraction=0.4; MinimumHeightDiffForNewLayer=0; NightInterceptionFraction=0.5; ReferenceHeight=2
              Plant TropicalPasture: PlantType=TropicalPasture; IsEnding=false; DaysAfterEnding=0
              Operations
                1971-08-01  [TropicalPasture].Sow(population: 100, cultivar: Bambatsi, depth: 100, rowSpacing: 100);
                1973-02-01  [CuttingManagement].Script.Reset();
                1973-12-01  [CuttingManagement].Script.DoCut(10.0, 5.0);
                1974-02-01  [CuttingManagement].Script.DoCut(10.0, 5.0);
                1974-04-01  [CuttingManagement].Script.DoCut(10.0, 5.0);
                1974-12-01  [CuttingManagement].Script.DoCut(10.0, 5.0);
                1975-02-01  [CuttingManagement].Script.DoCut(10.0, 5.0);
                1975-04-01  [CuttingManagement].Script.DoCut(10.0, 5.0);
                1975-12-01  [CuttingManagement].Script.DoCut(10.0, 5.0);
                1976-02-01  [CuttingManagement].Script.DoCut(10.0, 5.0);
                1976-04-01  [CuttingManagement].Script.DoCut(10.0, 5.0);
                1976-12-01  [CuttingManagement].Script.DoCut(10.0, 5.0);
                1977-02-01  [CuttingManagement].Script.DoCut(10.0, 5.0);
                1977-04-01  [CuttingManagement].Script.DoCut(10.0, 5.0);
                1977-12-01  [CuttingManagement].Script.DoCut(10.0, 5.0);
                1978-02-01  [CuttingManagement].Script.DoCut(10.0, 5.0);
                1978-04-01  [CuttingManagement].Script.DoCut(10.0, 5.0);
                1978-12-01  [CuttingManagement].Script.DoCut(10.0, 5.0);
                1979-02-01  [CuttingManagement].Script.DoCut(10.0, 5.0);
                1979-04-01  [CuttingManagement].Script.DoCut(10.0, 5.0);
              Report: EventNames=[Clock].DoReport
                VariableNames:
                  [Clock].Today
                  [TropicalPasture].Phenology.CurrentPhase.Name
                  [TropicalPasture].Phenology.CurrentStageName
                  [TropicalPasture].Photoperiod
                  [TropicalPasture].AboveGround.Wt
                  [TropicalPasture].AboveGroundLive.Wt
                  [TropicalPasture].AboveGroundDead.Wt
                  [TropicalPasture].BelowGround.Wt
                  [TropicalPasture].Leaf.LAI
                  [Soil].Water.MM
                  [Soil].NO3.kgha
                  [CuttingManagement].Script.ForageRemoved
                  [CuttingManagement].Script.ForageNRemoved
              Operations IrrigationSchedule
                1982-01-12  [Irrigation].Apply(20);
              Manager CuttingManagement
```csharp
using Models.PMF.Interfaces;
using Newtonsoft.Json;
using System;
using System.Collections.Generic;
using Models.Core;
using Models.PMF;
using Models.PMF.Interfaces;
using System.Xml.Serialization;
using Models.Soils;

namespace Models
{
    [Serializable] 
    [System.Xml.Serialization.XmlInclude(typeof(Model))]
    public class Script : Model
    {
        [Link(ByName = true)] Plant TropicalPasture;
        [Link] Clock Clock;

        [JsonIgnore] public double ForageRemoved { get; set; }
        [JsonIgnore] public double ForageNRemoved { get; set; }
    

        
        [EventSubscribe("StartOfSimulation")]
        private void OnSimulationCommencing(object sender, EventArgs e)
        {
            
            ForageRemoved = 0;
            ForageNRemoved = 0;
        }

        public void Reset()
        {
        ForageRemoved = 0.0;
        ForageNRemoved = 0.0;
        }

        public void DoCut(double LeafResidue, double StemResidue)
        {
            if (TropicalPasture == null)
                throw new Exception("Tropical pasture is null");
            double L = (double)TropicalPasture.FindByPath("Leaf.Wt").Value;
            double LN = (double)TropicalPasture.FindByPath("Leaf.N").Value;
            double LeafRemovalFraction = 0;
            if (L > 0)
                LeafRemovalFraction = (L - LeafResidue) / L;
            if (LeafRemovalFraction < 0)
                LeafRemovalFraction = 0;
            ForageRemoved += LeafRemovalFraction * L;
            ForageNRemoved += LeafRemovalFraction * LN;
               
            double S = (double)TropicalPasture.FindByPath("Stem.Wt").Value;
            double SN = (double)TropicalPasture.FindByPath("Stem.N").Value;
            double StemRemovalFraction = 0;
            if (S > 0)
                StemRemovalFraction = (S - StemResidue) / S;               
            if (StemRemovalFraction < 0)
                StemRemovalFraction = 0;
            ForageRemoved += StemRemovalFraction * S;
            ForageNRemoved += StemRemovalFraction * SN;
               
            if (TropicalPasture == null)
                throw new Exception("Cannot find tropical pasture model");

            
            var Leaf = TropicalPasture.FindChild<IHasDamageableBiomass>("Leaf");
            var Stem = TropicalPasture.FindChild<IHasDamageableBiomass>("Stem");
            Leaf.RemoveBiomass(liveToRemove: LeafRemovalFraction, deadToRemove: 0.0, liveToResidue: 0.0, deadToResidue: 0.0);
            Stem.RemoveBiomass(liveToRemove: StemRemovalFraction, deadToRemove: 0.0, liveToResidue: 0.0, deadToResidue: 0.0);

        }
        
    }
}
```
              Manager NManagement
                NRate = 0
```csharp
using Models.Soils;
using System;
using System.Collections.Generic;
using Models.Core;
using Models.PMF;
using Models.PMF.Interfaces;
using System.Xml.Serialization;
using APSIM.Shared.Utilities;

namespace Models
{
    [Serializable] 
    [System.Xml.Serialization.XmlInclude(typeof(Model))]
    public class Script : Model
    {
        [Link] Clock Clock;
        [Link] Fertiliser Fertiliser;

        [Description("Annual Fertiliser N Rate (kg N/ha)")]
        public double NRate { get; set;} 
        
        [EventSubscribe("StartOfSimulation")]
        private void OnSimulationCommencing(object sender, EventArgs e)
        {
        }

        [EventSubscribe("DoManagement")]
        private void OnDoManagement(object sender, EventArgs e)
        {
            
            if (DateUtilities.WithinDates("1-Oct",Clock.Today,"1-Oct") ||
                DateUtilities.WithinDates("1-Dec",Clock.Today,"1-Dec") ||
                DateUtilities.WithinDates("1-Feb",Clock.Today,"1-Feb"))
            {
               double Amount = NRate / 3.0;
               Fertiliser.Apply(Amount, Fertiliser.Types.NH4NO3N, 0);
            }
        
        }
        
    }
}
```
    Folder Brazil
      Folder Sao_Carlos
        Manager Wet
          StartDate = 1-Nov
          EndDate = 30-Mar
          PanFraction = 0.75
          RainDays = 14
          script: same as in Validation.Australia.Dalby.Wet
        Experiment SaoCarlos
          Factors
            Factor Irr: Specification=[IrrigationSchedule]
              Operations Wet
                2011-10-06  [Irrigation].Apply(12.5);
                2011-05-05  [Irrigation].Apply(9.9);
                2011-05-11  [Irrigation].Apply(22.1);
                2011-05-16  [Irrigation].Apply(15.4);
                2011-05-26  [Irrigation].Apply(20.7);
                2011-05-31  [Irrigation].Apply(14.5);
                2011-06-18  [Irrigation].Apply(18.6);
                2011-06-22  [Irrigation].Apply(10.3);
                2011-06-27  [Irrigation].Apply(11.2);
                2011-07-04  [Irrigation].Apply(16.3);
                2011-07-12  [Irrigation].Apply(17.2);
                2011-07-18  [Irrigation].Apply(15.8);
                2011-07-25  [Irrigation].Apply(16.5);
                2011-08-03  [Irrigation].Apply(19.5);
                2011-08-09  [Irrigation].Apply(14.5);
                2011-08-12  [Irrigation].Apply(3.7);
                2011-08-16  [Irrigation].Apply(11);
                2011-08-28  [Irrigation].Apply(20.5);
                2011-09-05  [Irrigation].Apply(18.5);
                2011-09-11  [Irrigation].Apply(14.8);
                2011-09-12  [Irrigation].Apply(11.2);
                2011-09-18  [Irrigation].Apply(22.7);
                2011-09-25  [Irrigation].Apply(25.3);
                2011-09-29  [Irrigation].Apply(7.4);
                2011-10-20  [Irrigation].Apply(5.5);
                2011-11-06  [Irrigation].Apply(28.8);
                2011-11-10  [Irrigation].Apply(7.4);
                2011-11-20  [Irrigation].Apply(20.2);
                2011-11-23  [Irrigation].Apply(4.7);
                2011-12-13  [Irrigation].Apply(15.9);
                2011-12-21  [Irrigation].Apply(16.3);
                2012-02-01  [Irrigation].Apply(5.2);
                2012-02-05  [Irrigation].Apply(22.2);
                2012-02-08  [Irrigation].Apply(14.8);
                2012-02-14  [Irrigation].Apply(5.8);
                2012-02-26  [Irrigation].Apply(17.8);
                2012-03-08  [Irrigation].Apply(7.4);
                2012-03-12  [Irrigation].Apply(6.1);
                2012-03-15  [Irrigation].Apply(11);
                2012-03-16  [Irrigation].Apply(15.8);
                2012-03-20  [Irrigation].Apply(14.8);
                2012-03-25  [Irrigation].Apply(7.5);
                2012-04-02  [Irrigation].Apply(13.6);
                2012-04-03  [Irrigation].Apply(4);
                2012-04-12  [Irrigation].Apply(9.4);
                2012-04-17  [Irrigation].Apply(11.7);
                2012-05-03  [Irrigation].Apply(8.7);
                2012-05-08  [Irrigation].Apply(14.4);
                2012-05-20  [Irrigation].Apply(16.6);
                2012-06-17  [Irrigation].Apply(21.2);
                2012-07-01  [Irrigation].Apply(2.7);
                2012-07-09  [Irrigation].Apply(18.6);
                2012-08-02  [Irrigation].Apply(42.2);
                2012-08-08  [Irrigation].Apply(14.6);
                2012-08-14  [Irrigation].Apply(18.9);
                2012-08-19  [Irrigation].Apply(15.1);
                2012-08-26  [Irrigation].Apply(24);
                2012-09-03  [Irrigation].Apply(23.8);
                2012-09-09  [Irrigation].Apply(22);
                2012-09-19  [Irrigation].Apply(35.5);
                2012-10-01  [Irrigation].Apply(4.7);
                2012-10-08  [Irrigation].Apply(30.8);
                2012-10-14  [Irrigation].Apply(7.9);
                2012-11-04  [Irrigation].Apply(4);
                2012-11-13  [Irrigation].Apply(9.2);
                2011-04-26  [CuttingManagement].Script.DoCut(44.0, 17.6);
                2011-06-22  [CuttingManagement].Script.DoCut(59.9, 29.9);
                2011-08-17  [CuttingManagement].Script.DoCut(61.3, 38.5);
                2011-10-18  [CuttingManagement].Script.DoCut(65.0, 52.0);
                2011-11-23  [CuttingManagement].Script.DoCut(66.9, 100.4);
                2012-01-04  [CuttingManagement].Script.DoCut(66.7, 170.6);
                2012-02-15  [CuttingManagement].Script.DoCut(62.9, 204.3);
                2012-03-28  [CuttingManagement].Script.DoCut(58.8, 183.7);
                2012-05-23  [CuttingManagement].Script.DoCut(62.1, 139.7);
                2012-07-18  [CuttingManagement].Script.DoCut(63, 126.1);
                2012-09-12  [CuttingManagement].Script.DoCut(67.6, 121.1);
              Operations Rainfed
                2011-04-26  [CuttingManagement].Script.DoCut(39.0, 15.6);
                2011-06-22  [CuttingManagement].Script.DoCut(66.0, 21.6);
                2011-08-17  [CuttingManagement].Script.DoCut(62.5, 21.6);
                2011-10-18  [CuttingManagement].Script.DoCut(50, 15.9);
                2011-11-23  [CuttingManagement].Script.DoCut(60, 39);
                2012-01-04  [CuttingManagement].Script.DoCut(70, 56.4);
                2012-02-15  [CuttingManagement].Script.DoCut(75, 115);
                2012-03-28  [CuttingManagement].Script.DoCut(47, 110.5);
                2012-05-23  [CuttingManagement].Script.DoCut(54.6, 88.2);
                2012-07-18  [CuttingManagement].Script.DoCut(53.2, 79.8);
                2012-09-12  [CuttingManagement].Script.DoCut(52.5, 73.5);
          Simulation SaoCarlosBase
            Clock: Start=2011-02-12; End=2012-07-19
            Weather: FileName=sao carlos completo.met
            Summary
            SoilArbitrator Soil Arbitrator
            Zone Field: Area=1; Slope=0; AspectAngle=0; Altitude=50
              Soil: SoilType=Oxisol; Site=Embrapa Pecuária Sudeste; NearestTown=São Carlos; Region=Central; State=São Paulo; Country=Brazil; NaturalVegetation=Cerrado-Mata atlantica; Latitude=-21.97; Longitude=47.5
                Physical
                  Thickness  BD    AirDry  LL15   DUL    SAT
                  100        1.28  0.08    0.09   0.25   0.3
                  100        1.48  0.1     0.109  0.275  0.33
                  100        1.53  0.145   0.152  0.24   0.28
                  100        1.44  0.16    0.163  0.253  0.29
                  100        1.38  0.17    0.171  0.252  0.28
                  100        1.36  0.17    0.171  0.256  0.28
                  100        1.36  0.15    0.154  0.247  0.27
                  100        1.36  0.155   0.155  0.235  0.26
                  100        1.36  0.15    0.154  0.243  0.28
                  100        1.36  0.138   0.138  0.227  0.26
                  SoilCrop TropicalPastureSoil
                    LL=[0.09, 0.11, 0.15, 0.16, 0.17, 0.17, 0.15, 0.16, 0.15, 0.14]
                    KL=[0.05, 0.05, 0.02, 0.05, 0.04, 0.03, 0.04, 0.03, 0.03, 0.04]
                    XF=[1, 1, 1, 1, 1, 1, 1, 1, 1, 1]
                WaterBalance SoilWater: SummerDate=1-Oct; SummerU=6; SummerCona=3.5; WinterDate=1-Apr; WinterU=3; WinterCona=1.5; DiffusConst=88; DiffusSlope=35.4; Salb=0.13; CN2Bare=85; CNRed=10; CNCov=0.8; PSIDul=-100; Thickness=[100, 100, 100, 100, 100, 100, 100, 100, 100, 100]; SWCON=[0.9, 0.9, 0.9, 0.9, 0.9, 0.9, 0.9, 0.9, 0.9, 0.9]
                SoilNitrogen: fom_types=[default, manure, mucuna, lablab, shemp, stable]; fract_carb=[0.2, 0.3, 0.54, 0.57, 0.45, 0]; fract_cell=[0.7, 0.3, 0.37, 0.37, 0.47, 0.1]; fract_lign=[0.1, 0.4, 0.09, 0.06, 0.08, 0.9]; NPartitionApproach=0
                Organic: FOMCNRatio=40; CarbonUnits=Total
                  Thickness  Carbon  SoilCNRatio  FBiom  FInert  FOM
                  100        2       12.5         0.025  0.3     40.5897
                  100        1.6     12.5         0.02   0.37    34.9359
                  100        1.4     12.5         0.015  0.45    30.0696
                  100        1.1     12.5         0.01   0.5     25.8812
                  100        1       12.5         0.01   0.6     22.2761
                  100        0.8     12.5         0.01   0.8     19.1732
                  200        0.6     12.5         0.01   0.95    14.2039
                  200        0.4     12.5         0.01   0.95    10.5225
                  1000       0.4     12.5         0.01   0.95    2.34789
                Chemical: Thickness=[100, 100, 100, 100, 100, 100, 400, 1000]; PH=[5.5, 5.5, 6.2, 6.2, 6.2, 6.3, 6.3, 6.3]; PHUnits=Water
                Water: Thickness=[100, 100, 100, 100, 100, 100, 100, 100, 100, 100]; InitialPAWmm=51.05; RelativeTo=LL15; FilledFromTop=true
                  InitialValues=[0.25, 0.275, 0.24, 0.253, 0.1775, 0.171, 0.154, 0.155, 0.154, 0.138]
                CERESSoilTemperature Temperature
                SoilNitrogenNO3 NO3: Thickness=[100, 100, 100, 100, 100, 100, 400, 1000]; InitialValues=[9, 9, 7, 7, 5, 5, 5, 2.8]; InitialValuesUnits=ppm; WaterTableConcentration=0; D0=0; DepthConstant=0; MaxDepthSoluteAccessible=0; RunoffEffectivenessAtMovingSolute=0; MaxEffectiveRunoff=0
                SoilNitrogenNH4 NH4: Thickness=[100, 100, 100, 100, 100, 100, 400, 1000]; InitialValues=[10, 10, 8, 8, 6, 0, 0, 0.02]; InitialValuesUnits=ppm; WaterTableConcentration=0; D0=0; DepthConstant=0; MaxDepthSoluteAccessible=0; RunoffEffectivenessAtMovingSolute=0; MaxEffectiveRunoff=0
                SoilNitrogenUrea Urea: Thickness=[100, 100, 100, 100, 100, 100, 400, 1000]; InitialValues=[0, 0, 0, 0, 0, 0, 0, 0]; InitialValuesUnits=kg/ha; WaterTableConcentration=0; D0=0; DepthConstant=0; MaxDepthSoluteAccessible=0; RunoffEffectivenessAtMovingSolute=0; MaxEffectiveRunoff=0
              Irrigation
              Fertiliser
              Manager LeachingControl
```csharp
using Models.Soils.Nutrients;
using System.Xml.Serialization;
using Models.PMF.Interfaces;
using Models.Soils;
using Models.PMF;
using Models.Core;
using System.Collections.Generic;
using System;
using Models.Interfaces;

namespace Models
{
    [Serializable] 
    [System.Xml.Serialization.XmlInclude(typeof(Model))]
    public class Script : Model
    {
        [Link] private ISoilWater water;


    
        
        [EventSubscribe("StartOfSimulation")]
        private void OnSimulationCommencing(object sender, EventArgs e)
        {
            water.SoluteFluxEfficiency[0] = 0.05;
        }

                
    }
}
```
              SurfaceOrganicMatter: InitialResidueName=Wheat; InitialResidueType=Wheat; InitialResidueMass=10; InitialStandingFraction=0; InitialCPR=0; InitialCNR=80
              MicroClimate: a_interception=0; b_interception=1; c_interception=0.1; d_interception=0; SoilHeatFluxFraction=0.4; MinimumHeightDiffForNewLayer=0; NightInterceptionFraction=0.5; ReferenceHeight=2
              Plant TropicalPasture: PlantType=TropicalPasture; IsEnding=false; DaysAfterEnding=0
              Operations
                2011-02-18  [TropicalPasture].Sow(population: 225, cultivar: Brachiaria, depth: 100, rowSpacing: 200);
                2011-02-18  [Fertiliser].Apply(10.0, Fertiliser.Types.Urea, 5);
                2011-03-22  [Fertiliser].Apply(111.1, Fertiliser.Types.Urea, 5);
                2011-04-26  [Fertiliser].Apply(70.0, Fertiliser.Types.Urea, 5);
                2011-06-22  [Fertiliser].Apply(70.0, Fertiliser.Types.Urea, 5);
                2011-08-17  [Fertiliser].Apply(70.0, Fertiliser.Types.Urea, 5);
                2011-10-18  [Fertiliser].Apply(70.0, Fertiliser.Types.Urea, 5);
                2011-11-23  [Fertiliser].Apply(70.0, Fertiliser.Types.Urea, 5);
                2012-01-04  [Fertiliser].Apply(70.0, Fertiliser.Types.Urea, 5);
                2012-02-15  [Fertiliser].Apply(70.0, Fertiliser.Types.Urea, 5);
                2012-03-28  [Fertiliser].Apply(70.0, Fertiliser.Types.Urea, 5);
                2012-05-23  [Fertiliser].Apply(70.0, Fertiliser.Types.Urea, 5);
                2012-07-18  [Fertiliser].Apply(70.0, Fertiliser.Types.Urea, 5);
                2012-09-12  [Fertiliser].Apply(70.0, Fertiliser.Types.Urea, 5);
              Operations IrrigationSchedule
              Manager CuttingManagement: same as Validation.Australia.Lansdown.Lansdown.Field.CuttingManagement
              Report: EventNames=[Clock].DoReport
                VariableNames:
                  [Clock].Today
                  [Clock].Today.Year
                  [TropicalPasture].Phenology.CurrentPhase.Name
                  [TropicalPasture].Phenology.CurrentStageName
                  [TropicalPasture].Photoperiod
                  [TropicalPasture].Root.NUptake
                  [TropicalPasture].Root.NSupply.Uptake
                  [Soil].SoilWater.Eo
                  [Soil].SoilWater.Es
                  [Soil].SoilWater.Drainage
                  [Soil].SoilWater.Runoff
                  [Soil].SoilWater.pond
                  [Soil].Water.MM[1] as SW0_10cm
                  [Soil].Water.MM[2] as SW10_20cm
                  [Soil].Water.MM[3] as SW20_30cm
                  [Soil].Water.MM[4] as SW30_40cm
                  [Soil].Water.MM[5] as SW40_50cm
                  [Soil].Water.MM[6] as SW50_60cm
                  [Soil].Water.MM[7] as SW60_70cm
                  [Soil].Water.MM[8] as SW70_80cm
                  [Soil].Water.MM[9] as SW80_90cm
                  [Soil].Water.MM[10] as SW90_100cm
                  sum([Soil].Water.MM[1:10]) as SW0_100cm
                  (sum([Soil].Water.MM[1:10]) - sum([Soil].Physical.LL15mm[1:10])) as ESW0_100cm
                  sum([Soil].Water.MM[1:6]) as SW0_60cm
                  sum([Soil].NO3.kgha[1:10]) as TotalNO3
                  sum ([Soil].SoilNitrogen.TotalN) as TotalN
                  [Soil].Water.MM
                  sum ([Soil].SoilNitrogen.FOMN) as FOMN
                  sum ([Soil].SoilNitrogen.HumicN) as HumicN
                  sum ([Soil].SoilNitrogen.MicrobialN) as MicN
                  sum ([soil].SoilNitrogen.MineralisedN) as MinN
                  sum ([soil].SoilNitrogen.n2o_atm) as N2O
                  sum ([soil].SoilNitrogen.NH4.kgha) as NH4
                  sum ([soil].SoilNitrogen.Nitrification) as Nitrification
                  sum ([soil].SoilNitrogen.Urea.kgha) as Urea
                  sum ([soil].SoilWater.FlowNH4) as NH4flow
                  [soil].SoilWater.FlowNO3[10] as NO3flow
                  [TropicalPasture].AboveGround.Wt
                  [TropicalPasture].AboveGroundLive.Wt
                  [TropicalPasture].AboveGroundDead.Wt
                  [TropicalPasture].BelowGround.Wt
                  [TropicalPasture].Crown.Wt
                  [TropicalPasture].Crown.Live.Wt
                  [TropicalPasture].Crown.Live.StructuralWt
                  [TropicalPasture].Crown.Live.StorageWt
                  [TropicalPasture].Crown.Live.StructuralN
                  [TropicalPasture].Crown.Live.StorageN
                  [TropicalPasture].Crown.Dead.N
                  [TropicalPasture].Total.Wt
                  [TropicalPasture].Leaf.Dead.Wt
                  [TropicalPasture].Leaf.Live.Wt
                  [TropicalPasture].Stem.Dead.Wt
                  [TropicalPasture].Stem.Live.Wt
                  [TropicalPasture].Root.Dead.Wt
                  [TropicalPasture].Root.Live.Wt
                  [TropicalPasture].AboveGround.N
                  [TropicalPasture].AboveGroundLive.NConc
                  [TropicalPasture].BelowGround.N
                  [TropicalPasture].Total.N
                  [TropicalPasture].TotalLive.N
                  [TropicalPasture].TotalDead.N
                  [TropicalPasture].Leaf.Dead.N
                  [TropicalPasture].Leaf.Live.N
                  [TropicalPasture].Stem.Dead.N
                  [TropicalPasture].Stem.Live.N
                  [TropicalPasture].Root.Live.N
                  [TropicalPasture].Root.Dead.N
                  [TropicalPasture].Leaf.Live.NConc
                  [TropicalPasture].Leaf.Dead.NConc
                  [TropicalPasture].Stem.Live.NConc
                  [TropicalPasture].Root.Live.NConc
                  [TropicalPasture].Root.WaterUptake
                  [TropicalPasture].Leaf.Transpiration
                  [TropicalPasture].Leaf.PotentialEP
                  [TropicalPasture].Root.Depth
                  [TropicalPasture].Leaf.CoverGreen
                  [TropicalPasture].Leaf.CoverTotal
                  [TropicalPasture].Leaf.CoverDead
                  [TropicalPasture].Leaf.LAI
                  [TropicalPasture].Leaf.LAIDead
                  [TropicalPasture].Leaf.SpecificLeafArea
                  [TropicalPasture].Leaf.Fn
                  [TropicalPasture].Leaf.Fw
                  [TropicalPasture].Leaf.Photosynthesis.RueAct
                  [TropicalPasture].TotalLive.Wt
                  [TropicalPasture].Stem.Live.StructuralWt
                  [TropicalPasture].Stem.Live.StorageWt
                  [TropicalPasture].Stem.Live.StructuralN
                  [TropicalPasture].Stem.Live.StorageN
                  [TropicalPasture].TotalDead.Wt
                  [Soil].Water.MM
                  [TropicalPasture].Age
                  [TropicalPasture].Root.LengthDensity
                  [TropicalPasture].Leaf.Height
                  [Leaf].RadiationIntercepted
                  [Soil].SoilWater.LeachNO3
                  sum([Soil].SoilNitrogen.Denitrification) as Denitrification
                  [Weather].Radn
                  [Weather].Rain
                  [SurfaceOrganicMatter].Wt
                  ([TropicalPasture].AboveGround.Wt + ([SurfaceOrganicMatter].Wt / 10)) as DeadWt
                  [TropicalPasture].Leaf.Live.NConc
                  [TropicalPasture].Leaf.Dead.NConc
                  [TropicalPasture].Leaf.Live.StructuralN
                  [TropicalPasture].Leaf.Live.StorageN
                  [TropicalPasture].Leaf.Live.StructuralWt
                  [TropicalPasture].Leaf.Live.StorageWt
                  [TropicalPasture].Root.Live.StructuralN
                  [TropicalPasture].Root.Live.StorageN
                  [TropicalPasture].Root.Live.StructuralWt
                  [TropicalPasture].Root.Live.StorageWt
                  [TropicalPasture].Leaf.NDemand.Total
              Memo
                Leaching was excessive for this soil, using ApsimSoilWat, so we needed decrease leaching by the Leaching Control script.

                Cutting management is a script to set residual leaf and stem mass after cut or grazing.
  Folder Sensibility
    Folder ResidueTest
      Simulation ResidueTest
        Weather: FileName=Hudson.met
        Clock: Start=1994-08-05; End=2000-01-23
        Summary
        SoilArbitrator Soil Arbitrator
        Zone Field: Area=1; Slope=0; AspectAngle=0; Altitude=50
          Soil: same as Validation.Australia.LiverpoolPlains.Hudson.Field.soil
          Irrigation
          Fertiliser
          SurfaceOrganicMatter: InitialResidueName=Wheat; InitialResidueType=Wheat; InitialResidueMass=2000; InitialStandingFraction=0; InitialCPR=0; InitialCNR=80
          MicroClimate: a_interception=0.1; b_interception=1; c_interception=0; d_interception=0; SoilHeatFluxFraction=0.4; MinimumHeightDiffForNewLayer=0; NightInterceptionFraction=0.5; ReferenceHeight=2
          Plant TropicalPasture: PlantType=TropicalPasture; IsEnding=false; DaysAfterEnding=0
          Operations
            1994-12-08  [Fertiliser].Apply(20.0, Fertiliser.Types.UreaN, 0);
            1995-01-01  [TropicalPasture].Sow(population: 100, cultivar: Bambatsi, depth: 100, rowSpacing: 100);
            1995-10-09  [CuttingManagement].Script.DoCut(100, 100);
            1995-11-21  [Fertiliser].Apply(50.0, Fertiliser.Types.UreaN, 0);
            1995-12-01  [CuttingManagement].Script.DoCut(100, 100);
            1996-01-30  [CuttingManagement].Script.DoCut(100, 100);
            1996-02-28  [CuttingManagement].Script.DoCut(100, 100);
            1996-11-26  [CuttingManagement].Script.DoCut(100, 100);
            1996-12-22  [Fertiliser].Apply(50.0, Fertiliser.Types.UreaN, 0);
            1997-01-14  [CuttingManagement].Script.DoCut(100, 100);
            1997-03-04  [CuttingManagement].Script.DoCut(100, 100);
            1997-06-26  [Fertiliser].Apply(22.0, Fertiliser.Types.UreaN, 0);
            1997-11-17  [CuttingManagement].Script.DoCut(100, 100);
            1998-04-07  [CuttingManagement].Script.DoCut(100, 100);
            1998-10-09  [Fertiliser].Apply(30.0, Fertiliser.Types.UreaN, 0);
            1998-12-17  [CuttingManagement].Script.DoCut(100, 100);
            1999-02-16  [CuttingManagement].Script.DoCut(100, 100);
            1999-06-02  [CuttingManagement].Script.DoCut(100, 100);
            1999-11-10  [Fertiliser].Apply(50.0, Fertiliser.Types.UreaN, 0);
            1999-09-29  [CuttingManagement].Script.DoCut(100, 100);
            2000-02-02  [CuttingManagement].Script.DoCut(100, 100);
          Report: EventNames=[Clock].DoReport
            VariableNames:
              [Clock].Today
              [TropicalPasture].Phenology.CurrentPhase.Name
              [Soil].SoilWater.Eo
              [Soil].SoilWater.Es
              [Soil].SoilWater.Drainage
              [Soil].SoilWater.Runoff
              [Soil].SoilWater.pond
              sum([Soil].Water.MM[2:3]) as SW10_50cm
              sum([Soil].Water.MM[4:5]) as SW50_90cm
              sum([Soil].Water.MM[6:7]) as SW90_130cm
              sum([Soil].Water.MM[8:9]) as SW130_170cm
              sum([Soil].Water.MM[10:11]) as SW170_210cm
              sum([Soil].Water.MM[12:13]) as SW210_250cm
              sum([Soil].Water.MM[2:13]) as SW10_250cm
              [TropicalPasture].AboveGround.Wt
              [TropicalPasture].AboveGroundLive.Wt
              [TropicalPasture].AboveGroundDead.Wt
              [TropicalPasture].BelowGround.Wt
              [TropicalPasture].Total.Wt
              [TropicalPasture].Leaf.Dead.Wt
              [TropicalPasture].Leaf.Live.Wt
              [TropicalPasture].Stem.Dead.Wt
              [TropicalPasture].Stem.Live.Wt
              [TropicalPasture].Root.Dead.Wt
              [TropicalPasture].Root.Live.Wt
              [TropicalPasture].AboveGround.N
              [TropicalPasture].BelowGround.N
              [TropicalPasture].Total.N
              [TropicalPasture].TotalLive.N
              [TropicalPasture].TotalDead.N
              [TropicalPasture].Leaf.Dead.N
              [TropicalPasture].Leaf.Live.N
              [TropicalPasture].Stem.Dead.N
              [TropicalPasture].Stem.Live.N
              [TropicalPasture].Root.Live.N
              [TropicalPasture].Root.Dead.N
              [TropicalPasture].Leaf.Live.NConc
              [TropicalPasture].Leaf.Dead.NConc
              [TropicalPasture].Stem.Live.NConc
              [TropicalPasture].Root.Live.NConc
              [TropicalPasture].Root.WaterUptake
              [TropicalPasture].Leaf.Transpiration
              [TropicalPasture].Leaf.WaterDemand
              [TropicalPasture].Root.Depth
              [TropicalPasture].Leaf.CoverGreen
              [TropicalPasture].Leaf.CoverTotal
              [TropicalPasture].Leaf.CoverDead
              [TropicalPasture].Leaf.LAI
              [TropicalPasture].Leaf.LAIDead
              [TropicalPasture].Leaf.Fn
              [TropicalPasture].Leaf.Fw
              [TropicalPasture].Leaf.Photosynthesis.FT
              [TropicalPasture].Leaf.Photosynthesis.FVPD
              [TropicalPasture].Leaf.Photosynthesis.RueAct
              [TropicalPasture].Stem.MinimumNConc
              [TropicalPasture].Root.MinimumNConc
              [TropicalPasture].Stem.MaximumNConc
              [TropicalPasture].Root.MaximumNConc
              [TropicalPasture].TotalLive.Wt
              [TropicalPasture].Stem.Live.StructuralWt
              [TropicalPasture].Stem.Live.StorageWt
              [TropicalPasture].TotalDead.Wt
              [Soil].Water.MM
              [Soil].NO3.kgha
              [TropicalPasture].Arbitrator.N.TotalPlantDemand
              [TropicalPasture].Age
          Manager CuttingManagement
```csharp
using Models.PMF.Interfaces;
using Newtonsoft.Json;
using System;
using System.Collections.Generic;
using Models.Core;
using Models.PMF;
using Models.PMF.Interfaces;
using System.Xml.Serialization;
using Models.Soils;

namespace Models
{
    [Serializable] 
    [System.Xml.Serialization.XmlInclude(typeof(Model))]
    public class Script : Model
    {
        [Link] Plant TropicalPasture;
        [Link] Clock Clock;

    

        
        [EventSubscribe("StartOfSimulation")]
        private void OnSimulationCommencing(object sender, EventArgs e)
        {
            
        }

        public void DoCut(double LeafResidue, double StemResidue)
        {
            double L = (double)TropicalPasture.FindByPath("Leaf.Live.Wt").Value;
            double LeafRemovalFraction = 0;
            if (L > 0)
                LeafRemovalFraction = (L - LeafResidue) / L;
            if (LeafRemovalFraction < 0)
                LeafRemovalFraction = 0;
               
            double S = (double)TropicalPasture.FindByPath("Stem.Live.Wt").Value;
            double StemRemovalFraction = 0;
            if (S > 0)
                StemRemovalFraction = (S - StemResidue) / S;               
            if (StemRemovalFraction < 0)
                StemRemovalFraction = 0;
               
               
            var Leaf = TropicalPasture.FindChild<IHasDamageableBiomass>("Leaf");
            var Stem = TropicalPasture.FindChild<IHasDamageableBiomass>("Stem");
            Leaf.RemoveBiomass(liveToRemove: LeafRemovalFraction, deadToRemove: 0.0, liveToResidue: 0.0, deadToResidue: 0.0);
            Stem.RemoveBiomass(liveToRemove: StemRemovalFraction, deadToRemove: 0.0, liveToResidue: 0.0, deadToResidue: 0.0);

        }
        
    }
}
```
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