Simulations: Version=205
  DataStore
  Memo ToDo
    # This is work in progress - please do not use for any project delivery work at this stage

     vc
    - send warning if model is SoilWater or top soil layer is > 10 mm
    - send comments to Summary if any of the above
    - test that no volatilisation if SoilWater

    - why is there colatilisaiton when Exco is 1?

    - get some of those parameters off the UI
    - what is going on with the two depth parameters and are both actually needed
    - can the second depth parameter be converted to something that is not layerign dependent?

    - sensitivity to layering
    - pH should rise in only a few days, drop below and then rise

    ### test the code
    - rain/irrigation sensitivity - 3-10 mm range - works as intended

    ### Depth_for_NH3 and f_NV[z]
    - Depth_for_NH3  is barely used, really only for the maximum layer for the loop on gas exxchange
    - f_NV[z] is needed (but perhaps not in this format) as the fractional exchange
    - it should not be by layer though - change to somethign basaed on depth
  Experiment RainFactorWorksAsIntended
    Memo RainFactor
      it takes 6 days of rain to completely suppress volatilisaiton (when exco = 1)

      the patter with amoutn is as expected/intended
    Factors
      Factor: Specification=[ModifyRain].Script.AssertedRainfallAmount = 0 to 5 step 1
    Simulation Sim4
      Clock: Start=1980-01-03; End=1980-01-31
      Weather: FileName=%root%/Examples/WeatherFiles/NZ_Lincoln.met
      Manager ModifyRain
        AssertedRainfallAmount = 6
        AssertedRainfallDate = 01/15/1980 00:00:00
        AssertedRainfallDuration = 6
```csharp
using Models.Interfaces;
using System.Linq;
using APSIM.Shared.Utilities;
using Models.PMF;
using Models.Soils;
using Models.Soils.Nutrients;
using Models.Core;
using System;
using Models.Soils.Nutrients;

namespace Models
{
    [Serializable]
    public class Script : Model
    {
        [Link] private Clock clock;
        [Link] private IWeather weather;

        [Separator("???")]
        [Description("Amount of rainfall")]
        public double AssertedRainfallAmount { get; set; }

        [Description("Date of first rain day")]
        public DateTime AssertedRainfallDate { get; set; }

        [Description("Duration of the rainfall event (days)")]
        public double AssertedRainfallDuration { get; set; }

        [EventSubscribe("StartOfSimulation")]
        private void FindSoilNOrNutrient(object sender, EventArgs e)
        {
        }

        [EventSubscribe("DoManagement")]
        private void OnDoManagement(object sender, EventArgs e)
        {
            if ((clock.Today >= AssertedRainfallDate) && (clock.Today <= AssertedRainfallDate.AddDays(AssertedRainfallDuration))) 
                weather.Rain = AssertedRainfallAmount;           
            else 
                weather.Rain = 0.0;
        }

    }
}
```
      MicroClimate: a_interception=0; b_interception=1; c_interception=0; d_interception=0; SoilHeatFluxFraction=0.4; MinimumHeightDiffForNewLayer=0; NightInterceptionFraction=0.5; ReferenceHeight=2
      Forages
        Parameters:
          Name                          LiveDigestibility  DeadDigestibility  LiveFractionConsumable  DeadFractionConsumable  LiveMinimumBiomass  DeadMinimumBiomass
          SurfaceOrganicMatter.Residue  0.7                0.3                1                       1                       100                 0
          AGPRyegrass.Leaf              FromModel          FromModel          1                       1                       100                 0
          AGPRyegrass.Stem              FromModel          FromModel          1                       1                       100                 0
          AGPRyegrass.Stolon            FromModel          FromModel          1                       1                       100                 0
          AGPWhiteClover.Leaf           FromModel          FromModel          1                       1                       100                 0
          AGPWhiteClover.Stem           FromModel          FromModel          1                       1                       100                 0
          AGPWhiteClover.Stolon         FromModel          FromModel          1                       1                       100                 0
      SoilArbitrator
      Summary
      Zone Field: Area=1; Slope=0; AspectAngle=0; Altitude=50
        SimpleGrazing: GrazingRotationType=0; SimpleGrazingFrequencyString=end of month; SimpleMinGrazable=0; SimpleGrazingResidual=1500; FlexibleGrazePostDM=0; IsCutAndCarry=false; FractionClippingsReturned=0; FractionIntakeNToAnimal=[1]; DungNConc=2.6; FractionOfDungUrineOffPaddock=[1]; DepthUrineIsAdded=0; ShowAdvancedExcretaOptions=false; SendDungElsewhere=0; SendUrineElsewhere=0; UsePatching=false; PseudoPatches=true; ZoneCount=25; UrineReturnPattern=2; PseudoRandomSeed=666; MaxEffectiveNConcentration=3.5; FractionPopulationDecline=0; TramplingOn=false; MaximumPropLitterMovedToSoil=0.1; PastureConsumedAtMaximumRateOfLitterRemoval=1200
        Manager Fertilise
          EachYear = True
          Dates = 15-jan
          UseCritNThreshold = False
          CritNThreshold = 50
          CritNDepth = 75
          Depth = 0
          Amount = 50
          FertiliserType = UreaN
```csharp
using APSIM.Core;
using System;
using Models.Core;
using Models.Soils.Nutrients;
using Models.Soils;
using Models.PMF;
using APSIM.Shared.Utilities;
using System.Linq;
using Models.Interfaces;

namespace Models
{
    [Serializable]
    public class Script : Model, IStructureDependency
    {
        [Link] private Clock clock;
        [Link] private Fertiliser fertiliser;
        [Link] private ISummary summary;
        [Link] private Soil soil;
        private Nutrient nutrient;
        private Nutrient soilN;
        [Link]
        private IPhysical soilPhysical;
        [Link]
        private Nutrient Nutrient;
        [Link(Path="[SurfaceOrganicMatter].SurfaceResidue.Decomposition")]
        private OrganicFlow ResidueDecomposition;
        public IStructure Structure { private get; set; }
        
        


        [Separator("Fertiliser will be applied on the date(s) below")]
        [Description("Apply fertiliser on the same day(s) each year? If no, then must include the year of appliaction below")]
        public bool EachYear { get; set; }

        [Description("Dates for one or more fertiliser applications (dd-mmm or dd-mmm-yyyy) as a list with a comma between dates")]
        public string[] Dates { get; set; }

        [Separator("Test for the mineral N in the soil and don't apply the fertiliser if greater than X kgN/ha is stored in the soil above a depth of Y mm")]
        [Description("Use a critical soil mineral N to prevent application above a threshold?")]
        public bool UseCritNThreshold { get; set; }

        [Description("Don't add fertiliser if N in the soil to the depth below exceeds (kg/ha)")]
        public double CritNThreshold { get; set; }

        [Description("Depth to which the amount of N in the soil should be calculated (mm)")]
        public double CritNDepth { get; set; }

        [Separator("Fertiliser application details")]
        [Description("Depth at which to apply the fertiliser (mm)")]
        public double Depth { get; set; }

        [Description("Amount of fertiliser to apply (kg N /ha) per application")]
        public double Amount { get; set; }

        [Description("Fertiliser type - select from the list")]
        [Display(Type = DisplayType.FertiliserType)]public string FertiliserType { get; set; }


        [EventSubscribe("StartOfSimulation")]
        private void FindSoilNOrNutrient(object sender, EventArgs e)
        {
            nutrient =  Structure.Find<Nutrient>() as Nutrient;
            soilN =  Structure.Find<Nutrient>() as Nutrient;

            if (nutrient == null && soilN == null)
                throw new Exception(string.Format("Error in script {0}: Unable to find nutrient or soilN.", Name));
        }

        [EventSubscribe("DoManagement")]
        private void OnDoManagement(object sender, EventArgs e)
        {
            if (OnApplicationDate())
            {
                if (NContentBelowThreshold())
                    fertiliser.Apply(Amount, FertiliserType, Depth);
                else
                    summary.WriteMessage(this, "Skipping fertiliser application due to soil mineral N content being above critical threshold.", MessageType.Diagnostic);
            }
        }

        /// <summary>Checks if today's date is one of the specified fertiliser application dates.</summary>
        private bool OnApplicationDate()
        {
            if (EachYear)
                return Dates.Any(d => DateUtilities.DatesEqual(d, clock.Today));
            
            DateTime[] dates = Dates.Select(d => DateTime.ParseExact(d, "d-MMM-yyyy", null)).ToArray();
            return dates.Any(d => SameDate(d, clock.Today));
        }

        /// <summary>Checks if N content in soil is below critical threshold.</summary>
        private bool NContentBelowThreshold()
        {
            if (!UseCritNThreshold)
                return true;
            
            double[] weights = GetLayerWeights();
            double cumSoilN = 0;

            for (int i = 0; i < soilPhysical.Thickness.Length; i++)
            {
                if (nutrient != null)
                    cumSoilN += weights[i] * nutrient.MineralN[i];
                else if (soilN != null)
                    cumSoilN += weights[i] * soilN.MineralN[i];
            }

            return cumSoilN <= CritNThreshold;
        }

        private double[] GetLayerWeights()
        {
            double[] weights = new double[soilPhysical.Thickness.Length];
            double cumDepth = 0;

            for (int i = 0; i < soilPhysical.Thickness.Length; i++)
            {
                cumDepth += soilPhysical.Thickness[i];
                if (cumDepth < CritNDepth)
                    weights[i] = 1;
                else if (cumDepth - soilPhysical.Thickness[i] <= CritNDepth)
                    weights[i] = (CritNDepth - (cumDepth - soilPhysical.Thickness[i])) / soilPhysical.Thickness[i];
                else
                    weights[i] = 0;
            }

            return weights;
        }

        private bool SameDate(DateTime d1, DateTime d2)
        {
            return d1.Year == d2.Year && d1.DayOfYear == d2.DayOfYear;
        }
    }
}
```
        Manager AutomaticIrrigation
          allowIrrigation = False
          seasonStart = 1-sep
          seasonEnd = 30-apr
          seasonsAllocation = 10000
          triggerDeficit = 50
          targetDeficit = 100
          returndays = 21
          maximumAmount = 100
          depthPAWC = 300
```csharp
using Newtonsoft.Json;
using APSIM.Shared.Utilities;
using System.Xml.Serialization;
using Models.Soils;
using Models.PMF;
using Models.Core;
using System;
using System.Linq;
using Models.Interfaces;


        
namespace Models
{
    [Serializable] 
    [System.Xml.Serialization.XmlInclude(typeof(Model))]
    public class Script : Model
    {
        [Link] private ISummary summary;
        [Link] private Irrigation Irrigation;
        [Link] private Clock Clock;
        [Link] private Soil Soil;
        [Link(IsOptional = true)] private IPlant existingCrop;
        private DateTime StartDate;
        private DateTime EndDate;
        private double TopDUL;
        private double TopLL;
        private int nLayers;
        [Link]
        private IPhysical soilPhysical;
        [Link]
        private ISoilWater waterBalance;
        //Communication to other modules
       
        //User inputs from properties tab
        [Description("Turn irrigation on?")]
        public bool allowIrrigation { get; set; }
        [Description("Start of irrigation season (dd-MMM)")]
        public string seasonStart { get; set; }
        [Description("End of irrigation season (dd-MMM)")]
        public string seasonEnd { get; set; }
        [Description("Season allocation (mm)")]
        public double seasonsAllocation { get; set; }
        [Description("Deficit to trigger irrigation (% PAWC)")]
        public double triggerDeficit { get; set; }
        [Description("Deficit to stop irrigaton (% PAWC)")]
        public double targetDeficit { get; set; }
        [Description("Minimum days for irrigation to return")]
        public double returndays { get; set; }
        [Description("Maximum irrigation application (mm/day)")]
        public double maximumAmount { get; set; }
        [Description("Depth to calculate PAWC (mm)")]
        public double depthPAWC { get; set; }

        //Class members
        [JsonIgnore] public double TopSWdeficit { get; set; }
        [JsonIgnore] public double TopSWC { get; set; }
        [JsonIgnore] public double DaysSinceIrrigation { get; set; }
        [JsonIgnore] public double AmountToApply { get; set; }
        [JsonIgnore] public double SeasonAppliedAmount { get; set; }
        
        private bool IrrigationIsAllowed { get; set; }
        private bool SeasonIsOpen { get; set; }
        private bool CropIsActive { get; set; }
        private bool IrrigatorIsAvailable { get; set; }
        private bool SoilIsDry { get; set; }

    
        //Calculate static soil variables
        [EventSubscribe("StartOfSimulation")]
        private void OnStartOfSimulation(object sender, EventArgs e)
        {   
            //Set the season dates
            StartDate = DateTime.Parse(seasonStart + "-" + Clock.Today.Year.ToString());
            EndDate = DateTime.Parse(seasonEnd + "-" + Clock.Today.Year.ToString());
            
            //Can we irrigate at all?
            IrrigationIsAllowed = false; 
            if (allowIrrigation)
                IrrigationIsAllowed = true; 

            //Calculate soil water variables
            double depthFromSurface = 0.0;
            double fracLayer = 0.0;
            nLayers = soilPhysical.Thickness.Length;
            for (int layer = 0; layer < nLayers; layer++)
            {
                fracLayer = Math.Min(1.0, (depthPAWC - depthFromSurface) / soilPhysical.Thickness[layer]);
                TopLL += soilPhysical.LL15mm[layer] * fracLayer;
                TopDUL += soilPhysical.DULmm[layer] * fracLayer;
                depthFromSurface += soilPhysical.Thickness[layer];
                if (depthFromSurface >= depthPAWC)
                    layer = nLayers;
            }
        }
             
        //Determine daily requirement for irrigation
        [EventSubscribe("StartOfDay")]
        private void OnStartOfDay(object sender, EventArgs e)
        {
            //Can we irrigate today?          
            SeasonIsOpen = isBetween(Clock.Today, StartDate, EndDate);
            if (!SeasonIsOpen)
                SeasonAppliedAmount = 0;

            //Is there a crop in the ground that needs irrigation?
            CropIsActive = false;
            if ((existingCrop != null) && (existingCrop.IsAlive))
                CropIsActive = true;
            //if ((existingCrop.Phenology.Stage >= 3.0) && (existingCrop.Phenology.Stage < 6.0))
          
            //Is the irrigator available?
            IrrigatorIsAvailable = false;
            DaysSinceIrrigation += 1;
            if (DaysSinceIrrigation >= returndays)
                IrrigatorIsAvailable = true;
          
            //Is the soil dry enough to require irrigation?
            SoilIsDry = false;
            double depthFromSurface = 0.0;
            double fracLayer = 0.0;
            TopSWC = 0.0;
            for (int layer = 0; layer < nLayers; layer++)
            //for (int layer = 0; depthFromSurface < depthPAWC + soilPhysical.Thickness[layer]; layer++)
            {
                fracLayer = Math.Min(1.0, (depthPAWC - depthFromSurface) / soilPhysical.Thickness[layer]);
                TopSWC += waterBalance.SWmm[layer] * fracLayer;
                depthFromSurface += soilPhysical.Thickness[layer];
                if (depthFromSurface >= depthPAWC)
                    layer = nLayers;
            }
            
            TopSWdeficit = TopSWC - TopDUL;
            if (Math.Max(0.0, -TopSWdeficit) >= (TopDUL - TopLL) * (100 - triggerDeficit) / 100)
                SoilIsDry = true;
                
            //Are all the conditions ratifying irrigation
            if (IrrigationIsAllowed && SeasonIsOpen && CropIsActive && IrrigatorIsAvailable && SoilIsDry)
            {
                //Lets bloody well irrigate then!!!!
                AmountToApply = TopDUL * targetDeficit / 100 - TopSWC;
                AmountToApply = Math.Max(0.0, Math.Min(AmountToApply, seasonsAllocation - SeasonAppliedAmount));
                Irrigation.Apply(AmountToApply);
                DaysSinceIrrigation = 0;
                SeasonAppliedAmount += AmountToApply;
            }
        }
        
        ///Checks whether theDate is between iniDate and endDate (non-year specific)
        private bool isBetween(DateTime theDay, DateTime iniDate, DateTime endDate)
        {
            bool result = false;
            if (iniDate.DayOfYear < endDate.DayOfYear)
            {
                // period is within one year, ex: summer in the northern hemisphere
                if ((theDay.DayOfYear >= iniDate.DayOfYear) && (theDay.DayOfYear <= endDate.DayOfYear))
                    result = true;
            }
            else
            {
                // period goes over the end of the year, ex: summer in the southern hemisphere
                if ((theDay.DayOfYear >= iniDate.DayOfYear) || (theDay.DayOfYear <= endDate.DayOfYear))
                    result = true;
            }
            
            return result;
        }
    }
}
```
        Irrigation
        Fertiliser
        SurfaceOrganicMatter: InitialResidueName=Sward; InitialResidueType=grass; InitialResidueMass=1000; InitialStandingFraction=0; InitialCPR=0; InitialCNR=15
        PastureSpecies AGPRyegrass: doyGermination=275; daysEmergenceToAnthesis=120; daysAnthesisToMaturity=85; degreesDayForAnthesis=1100; degreesDayForMaturity=900; daysAnnualsFactor=45; CanopyType=PastureSpecies; InitialShootDM=1500; InitialRootDM=450; InitialRootDepth=750; initialDMFractionsGrasses=[0.15, 0.25, 0.25, 0.05, 0.05, 0.1, 0.1, 0.05, 0, 0, 0]; initialDMFractionsForbs=[0.2, 0.2, 0.15, 0.05, 0.1, 0.15, 0.1, 0.05, 0, 0, 0]; PhotosyntheticEfficiency=0.01; PhotosynthesisCurveFactor=0.8; FractionPAR=0.5; ReferenceCO2=380; CO2EffectScaleFactor=700; CO2EffectOffsetFactor=600; CO2EffectMinimum=0.7; CO2EffectExponent=2; ReproSeasonDurationCoeff=2; ReproSeasonShouldersLengthFactor=1; ReproSeasonOnsetDurationFactor=0.6; RelativeTurnoverEmerging=2; DetachmentDroughtCoefficient=3; DetachmentDroughtEffectMin=0.1; TurnoverStockFactor=0.01; TurnoverDefoliationEffectMin=0.025; MinimumGreenLeafProp=0.8; MinimumGreenRootProp=0.5
          initialDMFractionsLegumes=[0.16, 0.23, 0.22, 0.05, 0.03, 0.05, 0.05, 0.01, 0.04, 0.08, 0.08]
          LinearInterpolationFunction FVPDFunction
        PastureSpecies AGPWhiteClover: doyGermination=275; daysEmergenceToAnthesis=120; daysAnthesisToMaturity=85; degreesDayForAnthesis=1100; degreesDayForMaturity=900; daysAnnualsFactor=45; CanopyType=PastureSpecies; InitialShootDM=500; InitialRootDM=150; InitialRootDepth=350; initialDMFractionsGrasses=[0.15, 0.25, 0.25, 0.05, 0.05, 0.1, 0.1, 0.05, 0, 0, 0]; initialDMFractionsForbs=[0.2, 0.2, 0.15, 0.05, 0.1, 0.15, 0.1, 0.05, 0, 0, 0]; PhotosyntheticEfficiency=0.01; PhotosynthesisCurveFactor=0.8; FractionPAR=0.5; ReferenceCO2=380; CO2EffectScaleFactor=700; CO2EffectOffsetFactor=600; CO2EffectMinimum=0.7; CO2EffectExponent=2; ReproSeasonDurationCoeff=2; ReproSeasonShouldersLengthFactor=1; ReproSeasonOnsetDurationFactor=0.6; RelativeTurnoverEmerging=2; DetachmentDroughtCoefficient=3; DetachmentDroughtEffectMin=0.1; TurnoverStockFactor=0.01; TurnoverDefoliationEffectMin=0.025; MinimumGreenLeafProp=0.8; MinimumGreenRootProp=0.5
          initialDMFractionsLegumes=[0.16, 0.23, 0.22, 0.05, 0.03, 0.05, 0.05, 0.01, 0.04, 0.08, 0.08]
          LinearInterpolationFunction FVPDFunction
        Soil: ASCOrder=Pumice; SoilType=Sandy loam; LocalName=Oropi (Sandy loam (Te Puke No1329)); Site=No.2 Rd; NearestTown=Te Puke; Region=BayOfPlenty; Country=New Zealand; NaturalVegetation=long term grass; ApsoilNumber=1329; Latitude=-37.863; Longitude=176.291; LocationAccuracy=+/-50 m; YearOfSampling=1982
          DataSource=The database of New Zealand soils was compiled by AgResearch (www.agresearch.co.nz) and based on soil properties gathered, mainly from publications, in the course of conducting several simulation-based research projects but particularly from the Pastoral 21 Environment program which was funded by the New Zealand Ministry for Business, Innovation and Employment,  Dairy NZ, Fonterra and Meat & Wool NZ.
          Comments=The data is a combination of published or supplied measurements, pedotransfer functions, and expert opinion. See Cichota et al. (2013; Soil Research 51: 92-111, http://dx.doi.org/10.1071/SR12338) for a description of the pedotransfer functions. The soil carbon and fresh organic matter settings have been set as those broadly appropriate for permanent productive pastoral systems, see Cichota el al. (2012; Soil Research 50: 694-707, http://dx.doi.org/10.1071/SR12208). Users should take care to adapt these to local conditions before using the data in simulations. FOM values estimated to be 900 kg/ha of FOM in top 600mm of soil and another 100 kg/ha below.
          Physical
            Thickness  ParticleSizeSand  ParticleSizeSilt  ParticleSizeClay  Rocks  BD    AirDry  LL15   DUL    SAT    KS
            200        59.63             34.37             6                 0      0.91  0.054   0.165  0.403  0.56   20963.266
            150        63.7              31.68             4.62              0      0.93  0.043   0.13   0.321  0.566  16928.41
            300        50.12             38.56             11.32             0      0.81  0.072   0.219  0.409  0.606  10150.978
            350        61.19             25.3              13.51             0      0.82  0.073   0.221  0.388  0.615  9243.651
            SoilCrop AGPRyegrassSoil: LL=[0.165, 0.13, 0.219, 0.221]; KL=[0.06, 0.06, 0.057, 0.04]; XF=[1, 1, 1, 1]
            SoilCrop AGPWhiteCloverSoil: LL=[0.165, 0.13, 0.219, 0.221]; KL=[0.06, 0.06, 0.057, 0.04]; XF=[1, 1, 1, 1]
          Organic: FOMCNRatio=40; CarbonUnits=Total
            Thickness  Carbon  SoilCNRatio  FBiom  FInert  FOM
            200        5.4     12.273       0.075  0.638   123.785
            150        2.5     12.273       0.017  0.801   91.7021
            300        2.6     12.273       0.008  0.924   50.3272
            350        0.9     12.273       0.008  0.97    24.9918
            2000       0.8     12.273       0.008  0.994   9.19395
          Chemical: PHUnits=Water
            Thickness  PH   CEC
            200        6.5  15.7
            150        6.5  9.4
            300        6.5  10.4
            350        6.5  8.1
            2000       6.5  10.1
            PH source: Estimated based on local knowledge
          Nutrient
            NH3Volatilisation: DepthEmissable1=30; DepthEmissable2=100; k_BC=0.03; k_pH_hyd=1; k_pH_nit=1; k_pH_x=0.2; k_AFPV=300; f_AV=0.5; CritRain1=3; CritRain2=10
          Swim3: Salb=0.13; CN2Bare=0; CNRed=0; CNCov=0.8; KDul=1; PSIDul=-100; VC=true; DTMin=0; DTMax=1400; MaxWaterIncrement=10; SpaceWeightingFactor=0; SoluteSpaceWeightingFactor=1; Dis=0; Disp=1; A=2; DTHC=0.1; DTHP=2; vcon1=7.28e-09; vcon2=7.26e-07; eo_time=06:00; eo_durn=720; default_rain_time=00:00; default_rain_duration=720; Diagnostics=false
          Water: Thickness=[200, 150, 300, 350, 2000]; InitialValues=[0.403, 0.321, 0.409, 0.388, 0.489]; FilledFromTop=false
          Solute NO3: InitialValuesUnits=ppm; WaterTableConcentration=0; D0=0; DepthConstant=0; MaxDepthSoluteAccessible=0; RunoffEffectivenessAtMovingSolute=0; MaxEffectiveRunoff=0
            Thickness  InitialValues  Exco  FIP
            200        6              0     1
            150        2              0     1
            300        1              0     1
            350        1              0     1
            2000       1              0     1
          Solute NH4: InitialValuesUnits=ppm; WaterTableConcentration=0; D0=0; DepthConstant=0; MaxDepthSoluteAccessible=0; RunoffEffectivenessAtMovingSolute=0; MaxEffectiveRunoff=0
            Thickness  InitialValues  Exco  FIP
            200        0              1     1
            150        0              1     1
            300        0              1     1
            350        0              1     1
            2000       0              1     1
          Solute Urea: InitialValuesUnits=kg/ha; WaterTableConcentration=0; D0=0; DepthConstant=0; MaxDepthSoluteAccessible=0; RunoffEffectivenessAtMovingSolute=0; MaxEffectiveRunoff=0
            Thickness  InitialValues  Exco  FIP
            200        0              0     1
            150        0              0     1
            300        0              0     1
            350        0              0     1
            2000       0              0     1
          LayerStructure
            Thickness=[5, 5, 10, 10, 20, 50, 100, 100, 100, 100, 100, 100, 100, 100, 100]
          SoilTemperature Temperature
        Report: EventNames=[Clock].EndOfDay
          VariableNames:
            [Clock].Today as Date
            [Weather].Rain as Rain
            [Irrigation].IrrigationApplied as Irrigation
            //[AGPRyegrass].HarvestedWt + [AGPWhiteClover].HarvestedWt as HarvestedWt   //the amount harvested (kg DM /ha)
            //[AGPRyegrass].AboveGroundWt + [AGPWhiteClover].AboveGroundWt as AboveGroundWt
            sum([Nutrient].NH3Volatilisation.EmissionNH3) as Volat
            sum([Nutrient].Urea.kgha[1:2]) as Urea30mm
            sum([Nutrient].NH4.kgha[1:2]) as NH430mm
            sum([Nutrient].NO3.kgha[1:2]) as NO330mm
            mean([Nutrient].NH3Volatilisation.pH[1:2]) as pH
            [Nutrient].NH3Volatilisation.RainFactor as RainFactor
  Experiment ExcoWasNotAsExpected
    Memo RainFactor
      it takes 6 days of rain to completely suppress volatilisaiton (when exco = 1)

      the patter with amoutn is as expected/intended
    Factors
      Factor: Specification=[NH4].Exco[1] =  0, 0.5, 1, 2, 5, 10, 100, 1000
    Simulation Sim1
      Clock: Start=1980-01-01; End=1980-01-20
      Weather: FileName=%root%/Examples/WeatherFiles/NZ_Lincoln.met
      Manager ModifyRain
        AssertedRainfallAmount = 0
        AssertedRainfallDate = 01/15/1980 00:00:00
        AssertedRainfallDuration = 6
```csharp
using Models.Interfaces;
using System.Linq;
using APSIM.Shared.Utilities;
using Models.PMF;
using Models.Soils;
using Models.Soils.Nutrients;
using Models.Core;
using System;
using Models.Soils.Nutrients;

namespace Models
{
    [Serializable]
    public class Script : Model
    {
        [Link] private Clock clock;
        [Link] private IWeather weather;

        [Separator("???")]
        [Description("Amount of rainfall")]
        public double AssertedRainfallAmount { get; set; }

        [Description("Date of first rain day")]
        public DateTime AssertedRainfallDate { get; set; }

        [Description("Duration of the rainfall event (days)")]
        public double AssertedRainfallDuration { get; set; }

        [EventSubscribe("StartOfSimulation")]
        private void FindSoilNOrNutrient(object sender, EventArgs e)
        {
        }

        [EventSubscribe("DoManagement")]
        private void OnDoManagement(object sender, EventArgs e)
        {
            if ((clock.Today >= AssertedRainfallDate) && (clock.Today <= AssertedRainfallDate.AddDays(AssertedRainfallDuration))) 
                weather.Rain = AssertedRainfallAmount;           
            else 
                weather.Rain = 0.0;
            //
        }

    }
}
```
      MicroClimate: a_interception=0; b_interception=1; c_interception=0; d_interception=0; SoilHeatFluxFraction=0.4; MinimumHeightDiffForNewLayer=0; NightInterceptionFraction=0.5; ReferenceHeight=2
      Forages: same as RainFactorWorksAsIntended.Sim4.Forages
      SoilArbitrator
      Summary
      Zone Field: Area=1; Slope=0; AspectAngle=0; Altitude=50
        SimpleGrazing: same as RainFactorWorksAsIntended.Sim4.Field.SimpleGrazing
        Manager Fertilise
          EachYear = True
          Dates = 15-jan
          UseCritNThreshold = False
          CritNThreshold = 50
          CritNDepth = 75
          Depth = 0
          Amount = 50
          FertiliserType = NH4N
          script: same as in RainFactorWorksAsIntended.Sim4.Field.Fertilise
        Manager AutomaticIrrigation
          allowIrrigation = True
          seasonStart = 1-sep
          seasonEnd = 30-apr
          seasonsAllocation = 10000
          triggerDeficit = 99
          targetDeficit = 100
          returndays = 1
          maximumAmount = 100
          depthPAWC = 300
          script: same as in RainFactorWorksAsIntended.Sim4.Field.AutomaticIrrigation
        Irrigation
        Fertiliser
        SurfaceOrganicMatter: InitialResidueName=Sward; InitialResidueType=grass; InitialResidueMass=1000; InitialStandingFraction=0; InitialCPR=0; InitialCNR=15
        PastureSpecies AGPRyegrass: same as RainFactorWorksAsIntended.Sim4.Field.AGPRyegrass
        PastureSpecies AGPWhiteClover: same as RainFactorWorksAsIntended.Sim4.Field.AGPWhiteClover
        Soil: ASCOrder=Pumice; SoilType=Sandy loam; LocalName=Oropi (Sandy loam (Te Puke No1329)); Site=No.2 Rd; NearestTown=Te Puke; Region=BayOfPlenty; Country=New Zealand; NaturalVegetation=long term grass; ApsoilNumber=1329; Latitude=-37.863; Longitude=176.291; LocationAccuracy=+/-50 m; YearOfSampling=1982
          DataSource=The database of New Zealand soils was compiled by AgResearch (www.agresearch.co.nz) and based on soil properties gathered, mainly from publications, in the course of conducting several simulation-based research projects but particularly from the Pastoral 21 Environment program which was funded by the New Zealand Ministry for Business, Innovation and Employment,  Dairy NZ, Fonterra and Meat & Wool NZ.
          Comments=The data is a combination of published or supplied measurements, pedotransfer functions, and expert opinion. See Cichota et al. (2013; Soil Research 51: 92-111, http://dx.doi.org/10.1071/SR12338) for a description of the pedotransfer functions. The soil carbon and fresh organic matter settings have been set as those broadly appropriate for permanent productive pastoral systems, see Cichota el al. (2012; Soil Research 50: 694-707, http://dx.doi.org/10.1071/SR12208). Users should take care to adapt these to local conditions before using the data in simulations. FOM values estimated to be 900 kg/ha of FOM in top 600mm of soil and another 100 kg/ha below.
          Physical: same as RainFactorWorksAsIntended.Sim4.Field.Soil.Physical
          Organic: same as RainFactorWorksAsIntended.Sim4.Field.Soil.Organic
          Chemical: same as RainFactorWorksAsIntended.Sim4.Field.Soil.Chemical
          Swim3: same as RainFactorWorksAsIntended.Sim4.Field.Soil.Swim3
          Nutrient
            NH3Volatilisation: DepthEmissable1=30; DepthEmissable2=100; k_BC=0.03; k_pH_hyd=1; k_pH_nit=1; k_pH_x=0.2; k_AFPV=300; f_AV=0.5; CritRain1=3; CritRain2=10
          Water: Thickness=[200, 150, 300, 350, 2000]; InitialValues=[0.403, 0.321, 0.409, 0.388, 0.489]; FilledFromTop=false
          Solute NO3: same as RainFactorWorksAsIntended.Sim4.Field.Soil.NO3
          Solute NH4: Thickness=[3000]; InitialValues=[0]; InitialValuesUnits=ppm; WaterTableConcentration=0; D0=0; Exco=[0.5]; FIP=[1]; DepthConstant=0; MaxDepthSoluteAccessible=0; RunoffEffectivenessAtMovingSolute=0; MaxEffectiveRunoff=0
          Solute Urea: same as RainFactorWorksAsIntended.Sim4.Field.Soil.Urea
          LayerStructure
            Thickness=[5, 5, 10, 10, 20, 50, 100, 100, 100, 100, 100, 100, 100, 100, 100]
          SoilTemperature Temperature
        Report
          VariableNames:
            [Clock].Today as Date
            [Nutrient].NH4.kgha[1]
            [Nutrient].NH4.AmountInSolution[1]
            [SWIM3].ConcWaterNH4[1]
            sum([Nutrient].NH3Volatilisation.EmissionNH3) as Volat
            [Nutrient].NH4.AmountInSolution[1] / [Nutrient].NH4.kgha[1] as PropInSolution
          EventNames:
            [Clock].EndOfDay
            //Clock.Today >= new DateTime(1980, 1, 10) && [Clock].EndOfDay
  Experiment NoVolatilisationWithSoilWater
    Factors
      Factor: Specification=[ModifyRain].Script.AssertedRainfallAmount = 0 to 15 step 2
    Simulation Sim5
      Clock: Start=1980-01-03; End=1980-01-31
      Weather: FileName=%root%/Examples/WeatherFiles/NZ_Lincoln.met
      Manager ModifyRain: same as RainFactorWorksAsIntended.Sim4.ModifyRain
      MicroClimate: a_interception=0; b_interception=1; c_interception=0; d_interception=0; SoilHeatFluxFraction=0.4; MinimumHeightDiffForNewLayer=0; NightInterceptionFraction=0.5; ReferenceHeight=2
      Forages: same as RainFactorWorksAsIntended.Sim4.Forages
      SoilArbitrator
      Summary
      Zone Field: Area=1; Slope=0; AspectAngle=0; Altitude=50
        SimpleGrazing: same as RainFactorWorksAsIntended.Sim4.Field.SimpleGrazing
        Manager Fertilise: same as RainFactorWorksAsIntended.Sim4.Field.Fertilise
        Manager AutomaticIrrigation: same as RainFactorWorksAsIntended.Sim4.Field.AutomaticIrrigation
        Irrigation
        Fertiliser
        SurfaceOrganicMatter: InitialResidueName=Sward; InitialResidueType=grass; InitialResidueMass=1000; InitialStandingFraction=0; InitialCPR=0; InitialCNR=15
        Soil: SoilType=NZ_Sedimentary; LocalName=Lismore; Site=Winchmore; NearestTown=Ashburton; Region=Canterbury; Country=New Zealand; Latitude=-48.48; Longitude=0
          Chemical: PHUnits=Water
            Thickness  PH  CEC
            150        6   13.966
            150        6   8.24825
            200        6   6.6176
            150        6   5.1934
            250        6   4.3688
            300        6   3.90025
            300        6   3.78775
            CEC source: Calculated
          Physical
            Thickness  ParticleSizeSand  ParticleSizeSilt  ParticleSizeClay  Rocks     BD    AirDry  LL15   DUL    SAT   KS
            150        28                52                20                0         1.3   0.05    0.15   0.36   0.45  5000
            150        29.75             55.25             15                0         1.35  0.12    0.14   0.34   0.43  2500
            200        30.8              57.2              12                0.568263  1     0.055   0.055  0.19   0.25  3000
            150        32.2              59.8              8                 0.798387  0.53  0.015   0.015  0.065  0.15  10000
            250        32.9              61.1              6                 0.866051  0.31  0.01    0.01   0.04   0.11  17500
            300        33.25             61.75             5                 0.866621  0.3   0.01    0.01   0.03   0.11  20000
            300        33.25             61.75             5                 0.866621  0.3   0.01    0.01   0.03   0.11  20000
            Rocks, ParticleSizeSand, ParticleSizeSilt source: Calculated
            SoilCrop AGPRyegrassSoil: LL=[0.15, 0.14, 0.06, 0.02, 0.01, 0.01, 0.01]; KL=[0.1, 0.1, 0.08, 0.04, 0.01, 0, 0]; XF=[1, 1, 1, 1, 1, 0, 0]
            SoilCrop AGPWhiteCloverSoil: LL=[0.15, 0.14, 0.06, 0.02, 0.01, 0.01, 0.01]; KL=[0.1, 0.1, 0.08, 0.04, 0.01, 0, 0]; XF=[1, 1, 1, 1, 1, 0, 0]
          WaterBalance SoilWater: SummerDate=1-Nov; SummerU=6; SummerCona=3.5; WinterDate=1-apr; WinterU=2; WinterCona=2; DiffusConst=88; DiffusSlope=35; Salb=0.13; CN2Bare=73; CNRed=20; CNCov=0.8; DischargeWidth=0; CatchmentArea=0; PSIDul=-100
            Thickness  SWCON  KLAT
            150        0.5    0
            150        0.52   0
            200        0.55   0
            150        0.6    0
            250        0.65   0
            300        0.65   0
            300        0.65   0
          Organic: FOMCNRatio=40; CarbonUnits=Total
            Thickness  Carbon  SoilCNRatio  FBiom  FInert  FOM
            150        3       12           0.04   0.5     331.337
            150        1       12           0.02   0.7     245.461
            200        0.6     12           0.02   0.83    164.537
            150        0.4     12           0.01   0.9     121.892
            250        0.25    12           0.01   0.95    73.9313
            300        0.15    12           0      0.99    40.5743
            300        0.1     12           0      0.99    22.2677
          Water: Thickness=[150, 150, 200, 150, 250, 300, 300]; InitialValues=[0.3495, 0.33, 0.18325, 0.0625, 0.0385, 0.029, 0.029]; FilledFromTop=false
          Nutrient
            NH3Volatilisation: DepthEmissable1=30; DepthEmissable2=100; k_BC=0.03; k_pH_hyd=1; k_pH_nit=1; k_pH_x=0.2; k_AFPV=300; f_AV=0.5; CritRain1=3; CritRain2=10
          Solute NO3: Thickness=[150, 150, 200, 150, 250, 300, 300]; InitialValues=[5, 2.5, 1, 0.75, 0.5, 0.5, 0.5]; InitialValuesUnits=ppm; WaterTableConcentration=0; D0=0; DepthConstant=0; MaxDepthSoluteAccessible=0; RunoffEffectivenessAtMovingSolute=0; MaxEffectiveRunoff=0
          Solute NH4: Thickness=[150, 150, 200, 150, 250, 300, 300]; InitialValues=[0.1, 0.1, 0.1, 0.1, 0.1, 0.1, 0.1]; InitialValuesUnits=ppm; WaterTableConcentration=0; D0=0; DepthConstant=0; MaxDepthSoluteAccessible=0; RunoffEffectivenessAtMovingSolute=0; MaxEffectiveRunoff=0
          Solute Urea: Thickness=[150, 150, 200, 150, 250, 300, 300]; InitialValues=[0, 0, 0, 0, 0, 0, 0]; InitialValuesUnits=kg/ha; WaterTableConcentration=0; D0=0; DepthConstant=0; MaxDepthSoluteAccessible=0; RunoffEffectivenessAtMovingSolute=0; MaxEffectiveRunoff=0
          SoilTemperature Temperature
        PastureSpecies AGPRyegrass: same as RainFactorWorksAsIntended.Sim4.Field.AGPRyegrass
        PastureSpecies AGPWhiteClover: same as RainFactorWorksAsIntended.Sim4.Field.AGPWhiteClover
        Report: EventNames=[Clock].EndOfDay
          VariableNames:
            [Clock].Today as Date
            [Weather].Rain as Rain
            [Irrigation].IrrigationApplied as Irrigation
            sum([Nutrient].NH3Volatilisation.EmissionNH3) as Volat
            sum([Nutrient].Urea.kgha[1:2]) as Urea30mm
            sum([Nutrient].NH4.kgha[1:2]) as NH430mm
            sum([Nutrient].NO3.kgha[1:2]) as NO330mm
            mean([Nutrient].NH3Volatilisation.pH[1:2]) as pH
            [Nutrient].NH3Volatilisation.RainFactor as RainFactor
  Experiment QuickTestsForTidying
    Factors
      Permutation
        Factor Climate
          CompositeFactor Lincoln
            Specifications=[Weather].FileName = %root%\Examples\WeatherFiles\NZ_Lincoln.met
          CompositeFactor Hamilton
            Specifications=[Weather].FileName = %root%\Examples\WeatherFiles\NZ_Hamilton.met
        Factor Season
          Specification=[FertiliseFixedDates].Script.Dates = 15-jan, 15-mar, 15-may, 15-jul, 15-sep, 15-nov
    Simulation AgPastureExample
      Clock: Start=1980-01-01; End=1980-12-31
      Weather: FileName=%root%/Examples/WeatherFiles/NZ_Lincoln.met
      MicroClimate: a_interception=0; b_interception=1; c_interception=0; d_interception=0; SoilHeatFluxFraction=0.4; MinimumHeightDiffForNewLayer=0; NightInterceptionFraction=0.5; ReferenceHeight=2
      SoilArbitrator
      Forages
        Parameters:
          Name                          LiveDigestibility  DeadDigestibility  LiveFractionConsumable  DeadFractionConsumable  LiveMinimumBiomass  DeadMinimumBiomass
          SurfaceOrganicMatter.Residue  0.7                0.3                1                       1                       100                 0
          AGPRyegrass.Leaf              0.7                0.3                1                       1                       100                 0
          AGPRyegrass.Stem              0.7                0.3                1                       1                       100                 0
          AGPRyegrass.Stolon            0.7                0.3                1                       1                       100                 0
          AGPWhiteClover.Leaf           0.7                0.3                1                       1                       100                 0
          AGPWhiteClover.Stem           0.7                0.3                1                       1                       100                 0
          AGPWhiteClover.Stolon         0.7                0.3                1                       1                       100                 0
      Summary
      Zone Field: Area=1; Slope=0; AspectAngle=0; Altitude=50
        SimpleGrazing: GrazingRotationType=0; SimpleGrazingFrequencyString=21; SimpleMinGrazable=0; SimpleGrazingResidual=1500; FlexibleGrazePostDM=0; IsCutAndCarry=false; FractionClippingsReturned=0; FractionIntakeNToAnimal=[0]; DungNConc=2.6; FractionOfDungUrineOffPaddock=[0.3]; DepthUrineIsAdded=250; ShowAdvancedExcretaOptions=false; SendDungElsewhere=1; SendUrineElsewhere=1; UsePatching=false; PseudoPatches=true; ZoneCount=25; UrineReturnPattern=2; PseudoRandomSeed=666; MaxEffectiveNConcentration=3.5; FractionPopulationDecline=0; TramplingOn=false; MaximumPropLitterMovedToSoil=0.1; PastureConsumedAtMaximumRateOfLitterRemoval=1200
          PreGrazeDMArray=[1000, 1000, 1000, 1000, 1000, 1000, 1000, 1000, 1000, 1000, 1000, 1000]
          PostGrazeDMArray=[2000, 2000, 2000, 2000, 2000, 2000, 2000, 2000, 2000, 2000, 2000, 2000]
        Manager FertiliseFixedDates
          EachYear = True
          Dates = 5-jan
          UseCritNThreshold = False
          CritNThreshold = 50
          CritNDepth = 75
          Depth = 0
          Amount = 50
          FertiliserType = UreaN
          script: same as in RainFactorWorksAsIntended.Sim4.Field.Fertilise
        Manager AutomaticIrrigation
          allowIrrigation = True
          seasonStart = 1-sep
          seasonEnd = 30-apr
          seasonsAllocation = 10000
          triggerDeficit = 75
          targetDeficit = 95
          returndays = 3
          maximumAmount = 30
          depthPAWC = 300
          script: same as in RainFactorWorksAsIntended.Sim4.Field.AutomaticIrrigation
        Irrigation
        Fertiliser
        SurfaceOrganicMatter: InitialResidueName=Sward; InitialResidueType=grass; InitialResidueMass=1000; InitialStandingFraction=0; InitialCPR=0; InitialCNR=15
        PastureSpecies AGPRyegrass: same as RainFactorWorksAsIntended.Sim4.Field.AGPRyegrass
        PastureSpecies AGPWhiteClover: same as RainFactorWorksAsIntended.Sim4.Field.AGPWhiteClover
        Soil: same as RainFactorWorksAsIntended.Sim4.Field.Soil
        Report: EventNames=[Clock].EndOfDay
          VariableNames:
            [Clock].Today as Date
            sum([Nutrient].NH3Volatilisation.EmissionNH3) as Volat
            sum([Nutrient].Urea.kgha[1:2]) as Urea30mm
  Simulation FundamentalTesting
    Clock: Start=2000-01-01; End=2000-12-31
    Weather: ExcelWorkSheetName=Warm
      FileName=%root%/Tests/Validation/SoilTemperature/AnalyticalWeather.xlsx
    MicroClimate: a_interception=0; b_interception=0; c_interception=0; d_interception=0; SoilHeatFluxFraction=0; MinimumHeightDiffForNewLayer=0; NightInterceptionFraction=0; ReferenceHeight=2
    Summary
    Zone FieldThin: Area=1; Slope=0; AspectAngle=0; Altitude=50
      Manager DummyWaterBalance
        Eos = 0
        Es = 0
        Eo = 0
        Salb = 0
```csharp
using APSIM.Numerics;
using Newtonsoft.Json;
using APSIM.Shared.Utilities;
using Models.Soils;
using Models.Interfaces;
using System;
using Models.Core;
using Models.PMF;

namespace Models
{
    [Serializable] 
    public class Script : Model, ISoilWater
    {
        [Link]
        private Physical physical;
        [Link]
        private IPhysical soilPhysical;
        [Link]
        private Water water;
        
        private double[] waterVolumetric = null;

        ///<summary>Gets or sets soil thickness for each layer (mm)(</summary>
        public double[] Thickness { get { return soilPhysical.Thickness; } }

        ///<summary>Gets or sets soil thickness for each layer (mm)(</summary>
        public double[] LayerThickness { get { return soilPhysical.Thickness; } }

        ///<summary>Gets or sets volumetric soil water content (mm/mm)(</summary>
        //[Description("Soil water content (mm/mm), comma separated values")]
        public double[] SW { get {return waterVolumetric;} set {waterVolumetric = value;} }

        ///<summary>Gets soil water content (mm)</summary>
        public double[] SWmm { get { return MathUtilities.Multiply(SW, Thickness); } }

        ///<summary>Gets extractable soil water relative to LL15(mm)</summary>
        public double[] ESW { get { throw new NotImplementedException(); } }

        ///<summary>Gets extractable soil water relative to LL15(mm)</summary>
        public double[] PSI { get { throw new NotImplementedException(); } }

        ///<summary>Gets K</summary>
        public double[] K { get { throw new NotImplementedException(); } }
        
        ///<summary>Gets PoreInteractionIndex</summary>
        [JsonIgnore]
        public double[] PoreInteractionIndex { get { throw new NotImplementedException(); } set { throw new NotImplementedException(); }}
                
        ///<summary>Gets potential evaporation from soil surface (mm)</summary>
        [Description("Eos (mm)")]
        public double Eos { get; set; }

        /// <summary>Gets the actual (realised) soil water evaporation (mm)</summary>
        [Description("Es (mm)")]
        public double Es { get; set; }

        /// <summary>Gets potential evapotranspiration of the whole soil-plant system (mm)</summary>
        [Description("Eo (mm)")]
        public double Eo { get; set; }

        /// <summary>Gets the amount of water runoff (mm)</summary>
        public double Runoff { get { return 0; } }
        
        /// <summary>Gets the amount of water drainage from bottom of profile(mm)</summary>
        public double Drainage { get { return 0; } }

        /// <summary>Fraction of incoming radiation reflected from bare soil</summary>
        [Description("Salb")]
        public double Salb { get; set; }

        /// <summary>Amount of water moving laterally out of the profile (mm)</summary>
        public double[] LateralOutflow { get { throw new NotImplementedException(); } }

        /// <summary>Amount of N leaching as NO3-N from the deepest soil layer (kg /ha)</summary>
        public double LeachNO3 { get { return 0; } }

        /// <summary>Amount of N leaching as NH4-N from the deepest soil layer (kg /ha)</summary>
        public double LeachNH4 { get { return 0; } }
        
        /// <summary>Amount of N leaching as urea-N  from the deepest soil layer (kg /ha)</summary>
        public double LeachUrea { get { return 0; } }

        /// <summary>Amount of Cl leaching  from the deepest soil layer (kg /ha)</summary>
        public double LeachCl { get { return 0; } }
        
        /// <summary>Amount of N leaching as NO3 from each soil layer (kg /ha)</summary>
        public double[] FlowNO3 { get { throw new NotImplementedException(); } }

        /// <summary>Amount of N leaching as NH4 from each soil layer (kg /ha)</summary>
        public double[] FlowNH4 { get { throw new NotImplementedException(); } }

        /// <summary>Amount of N leaching as urea from each soil layer (kg /ha)</summary>
        public double[] FlowUrea { get { throw new NotImplementedException(); } }

        /// <summary>Amount of N leaching as urea from each soil layer (kg /ha)</summary>
        public double[] FlowCl { get { throw new NotImplementedException(); } }

        /// <summary>Amount of water moving upward from each soil layer during unsaturated flow (negative value means downward movement) (mm)</summary>
        public double[] Flow  { get { throw new NotImplementedException(); } }

        /// <summary>Amount of water moving downward out of each soil layer due to gravity drainage (above DUL) (mm)</summary>
        public double[] Flux { get { throw new NotImplementedException(); } }

        /// <summary> This is set by Microclimate and is rainfall less that intercepted by the canopy and residue components </summary>
        public double PotentialInfiltration { get; set; }
        
        /// <summary> The amount of rainfall intercepted by crop and residue canopies </summary>
        public double PrecipitationInterception { get; set; }

        /// <summary>Water table depth (mm)</summary>
        public double WaterTable { get; set; }
        
        /// <summary>Pond depth (mm)</summary>
        public double Pond { get; set; }

        /// <summary>Pond depth (mm)</summary>
        public double SubsurfaceDrain { get; set; }

        /// <summary>Sets the water table.</summary>
        /// <param name="InitialDepth">The initial depth.</param> 
        public void SetWaterTable(double InitialDepth)
        {
            throw new NotImplementedException();
        }

        /// <summary>The efficiency (0-1) that solutes move down with water.</summary>
        public double[] SoluteFluxEfficiency { get; set; }

        /// <summary>The efficiency (0-1) that solutes move up with water.</summary>
        public double[] SoluteFlowEfficiency { get; set; }

        ///<summary>Perform a reset</summary>
        public void Reset()
        {
            waterVolumetric = water.InitialValues.Clone() as double[];
        }

        ///<summary>Perform tillage</summary>
        public void Tillage(TillageType Data)
        {
            throw new NotImplementedException();
        }

        ///<summary>Perform tillage</summary>
        public void Tillage(string tillageType)
        {
            throw new NotImplementedException();
        }

        ///<summary>Remove water from the profile</summary>
        public void RemoveWater(double[] amountToRemove)
        {
            throw new NotImplementedException();
        }
        
        /// <summary>Called when a simulation commences.</summary>
        /// <param name="sender">The sender.</param>
        /// <param name="e">The event data.</param>
        [EventSubscribe("Commencing")]
        private void OnStartOfSimulation(object sender, EventArgs e)
        {
            Reset();
        }
        
        /// <summary>Plant available water SW-LL15 (mm/mm).</summary>
        [Units("mm/mm")]
        public double[] PAW
        {
            get
            {
                return SoilUtilities.CalcPAWC(soilPhysical.Thickness,
                                              soilPhysical.LL15,
                                              SW,
                                              null);
            }
        }

        /// <summary>Plant available water SW-LL15 (mm).</summary>
        [Units("mm")]
        public double[] PAWmm
        {
            get
            {
                return MathUtilities.Multiply(PAW, soilPhysical.Thickness);
            }
        }

    }
}
```
      SurfaceOrganicMatter: InitialResidueName=Sward; InitialResidueType=grass; InitialResidueMass=1000; InitialStandingFraction=0; InitialCPR=0; InitialCNR=15
      Irrigation
      Fertiliser
      Soil: ASCOrder=Pumice; SoilType=Sandy loam; LocalName=Oropi (Sandy loam (Te Puke No1329)); Site=No.2 Rd; NearestTown=Te Puke; Region=BayOfPlenty; Country=New Zealand; NaturalVegetation=long term grass; ApsoilNumber=1329; Latitude=-37.863; Longitude=176.291; LocationAccuracy=+/-50 m; YearOfSampling=1982
        DataSource=The database of New Zealand soils was compiled by AgResearch (www.agresearch.co.nz) and based on soil properties gathered, mainly from publications, in the course of conducting several simulation-based research projects but particularly from the Pastoral 21 Environment program which was funded by the New Zealand Ministry for Business, Innovation and Employment,  Dairy NZ, Fonterra and Meat & Wool NZ.
        Comments=The data is a combination of published or supplied measurements, pedotransfer functions, and expert opinion. See Cichota et al. (2013; Soil Research 51: 92-111, http://dx.doi.org/10.1071/SR12338) for a description of the pedotransfer functions. The soil carbon and fresh organic matter settings have been set as those broadly appropriate for permanent productive pastoral systems, see Cichota el al. (2012; Soil Research 50: 694-707, http://dx.doi.org/10.1071/SR12208). Users should take care to adapt these to local conditions before using the data in simulations. FOM values estimated to be 900 kg/ha of FOM in top 600mm of soil and another 100 kg/ha below.
        Physical: same as RainFactorWorksAsIntended.Sim4.Field.Soil.Physical
        Organic: same as RainFactorWorksAsIntended.Sim4.Field.Soil.Organic
        Chemical: same as RainFactorWorksAsIntended.Sim4.Field.Soil.Chemical
        Nutrient
          NH3Volatilisation: DepthEmissable1=30; DepthEmissable2=100; k_BC=0.03; k_pH_hyd=1; k_pH_nit=1; k_pH_x=0.2; k_AFPV=300; f_AV=0.5; CritRain1=3; CritRain2=10
        Swim3 (disabled): Salb=0.13; CN2Bare=0; CNRed=0; CNCov=0.8; KDul=1; PSIDul=-100; VC=true; DTMin=0; DTMax=1400; MaxWaterIncrement=10; SpaceWeightingFactor=0; SoluteSpaceWeightingFactor=1; Dis=0; Disp=1; A=2; DTHC=0.1; DTHP=2; vcon1=7.28e-09; vcon2=7.26e-07; eo_time=06:00; eo_durn=720; default_rain_time=00:00; default_rain_duration=720; Diagnostics=false
        Water: Thickness=[3000]; InitialValues=[0.56]; FilledFromTop=false
        Solute NO3: same as RainFactorWorksAsIntended.Sim4.Field.Soil.NO3
        Solute NH4: same as RainFactorWorksAsIntended.Sim4.Field.Soil.NH4
        Solute Urea: same as RainFactorWorksAsIntended.Sim4.Field.Soil.Urea
        LayerStructure
          Thickness=[5, 5, 10, 10, 20, 50, 100, 100, 100, 100, 100, 100, 100, 100, 100]
        SoilTemperature
      Report ReportLayering: EventNames=[Clock].DoReport
        VariableNames:
          [Clock].Today as Date
          [Soil].SoilTemperature.AverageSoilTemperature[1] as AverageSoilTemp@0001mm
          [Soil].SoilTemperature.AverageSoilTemperature[3] as AverageSoilTemp@0008mm
          [Soil].SoilTemperature.AverageSoilTemperature[4] as AverageSoilTemp@0015mm
          [Soil].SoilTemperature.AverageSoilTemperature[8] as AverageSoilTemp@0150mm
          [Soil].SoilTemperature.AverageSoilTemperature[11] as AverageSoilTemp@1000mm
          [Soil].SoilTemperature.MaximumSoilTemperature[1] as MaxSoilTemp@0001mm
          [Soil].SoilTemperature.MaximumSoilTemperature[3] as MaxSoilTemp@0008mm
          [Soil].SoilTemperature.MaximumSoilTemperature[4] as MaxSoilTemp@0015mm
          [Soil].SoilTemperature.MaximumSoilTemperature[8] as MaxSoilTemp@0150mm
          [Soil].SoilTemperature.MaximumSoilTemperature[11] as MaxSoilTemp@1000mm
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