Simulations: Version=205
  DataStore
  Experiment AirTemperature (disabled)
    Factors
      Permutation
        Factor Climate
          CompositeFactor Hamilton
            Specifications=[Weather].FileName = %root%\Examples\WeatherFiles\NZ_Hamilton.met
        Factor Season
          Specification=[FertiliseFixedDates].Script.Dates = 15-jan, 15-mar, 15-may, 15-jul, 15-sep, 15-nov
    Simulation Base
      Clock: Start=2000-01-01; End=2000-12-31
      Weather: FileName=%root%/Tests/Simulation/Volatilisation/FakeWeather.xlsx; ExcelWorkSheetName=CoolAdd2WeeklyOsc
      MicroClimate: a_interception=0; b_interception=1; c_interception=0; d_interception=0; SoilHeatFluxFraction=0.4; MinimumHeightDiffForNewLayer=0; NightInterceptionFraction=0.5; ReferenceHeight=2
      Forages
        Parameters:
          Name                          LiveDigestibility  DeadDigestibility  LiveFractionConsumable  DeadFractionConsumable  LiveMinimumBiomass  DeadMinimumBiomass
          SurfaceOrganicMatter.Residue  0.7                0.3                0                       0                       0                   0
          AGPRyegrass.Leaf              FromModel          FromModel          1                       1                       25                  0
          AGPRyegrass.Stem              FromModel          FromModel          1                       1                       10                  0
          AGPRyegrass.Stolon            FromModel          FromModel          1                       1                       0                   0
          AGPWhiteClover.Leaf           FromModel          FromModel          1                       1                       15                  0
          AGPWhiteClover.Stem           FromModel          FromModel          1                       1                       5                   0
          AGPWhiteClover.Stolon         FromModel          FromModel          1                       1                       5                   0
      SoilArbitrator
      Summary
      Zone Field: Area=1; Slope=0; AspectAngle=0; Altitude=50
        SimpleGrazing: GrazingRotationType=0; SimpleGrazingFrequencyString=21; SimpleMinGrazable=0; SimpleGrazingResidual=1500; FlexibleGrazePostDM=0; IsCutAndCarry=false; FractionClippingsReturned=0; FractionIntakeNToAnimal=[0]; DungNConc=2.6; FractionOfDungUrineOffPaddock=[0.3]; DepthUrineIsAdded=250; ShowAdvancedExcretaOptions=false; SendDungElsewhere=1; SendUrineElsewhere=1; UsePatching=false; PseudoPatches=true; ZoneCount=25; UrineReturnPattern=2; PseudoRandomSeed=666; MaxEffectiveNConcentration=3.5; FractionPopulationDecline=0; TramplingOn=false; MaximumPropLitterMovedToSoil=0.1; PastureConsumedAtMaximumRateOfLitterRemoval=1200
          PreGrazeDMArray=[1000, 1000, 1000, 1000, 1000, 1000, 1000, 1000, 1000, 1000, 1000, 1000]
          PostGrazeDMArray=[2000, 2000, 2000, 2000, 2000, 2000, 2000, 2000, 2000, 2000, 2000, 2000]
        Manager FertiliseFixedDates
          EachYear = True
          Dates = 5-jan
          UseCritNThreshold = False
          CritNThreshold = 50
          CritNDepth = 75
          Depth = 0
          Amount = 50
          FertiliserType = UreaN
```csharp
using APSIM.Core;
using System;
using Models.Core;
using Models.Soils.Nutrients;
using Models.Soils;
using Models.PMF;
using APSIM.Shared.Utilities;
using System.Linq;
using Models.Interfaces;

namespace Models
{
    [Serializable]
    public class Script : Model, IStructureDependency
    {
        [Link] private Clock clock;
        [Link] private Fertiliser fertiliser;
        [Link] private ISummary summary;
        [Link] private Soil soil;
        private Nutrient nutrient;
        private Nutrient soilN;
        [Link]
        private IPhysical soilPhysical;
        [Link]
        private Nutrient Nutrient;
        [Link(Path="[SurfaceOrganicMatter].SurfaceResidue.Decomposition")]
        private OrganicFlow ResidueDecomposition;
        public IStructure Structure { private get; set; }
        
        


        [Separator("Fertiliser will be applied on the date(s) below")]
        [Description("Apply fertiliser on the same day(s) each year? If no, then must include the year of appliaction below")]
        public bool EachYear { get; set; }

        [Description("Dates for one or more fertiliser applications (dd-mmm or dd-mmm-yyyy) as a list with a comma between dates")]
        public string[] Dates { get; set; }

        [Separator("Test for the mineral N in the soil and don't apply the fertiliser if greater than X kgN/ha is stored in the soil above a depth of Y mm")]
        [Description("Use a critical soil mineral N to prevent application above a threshold?")]
        public bool UseCritNThreshold { get; set; }

        [Description("Don't add fertiliser if N in the soil to the depth below exceeds (kg/ha)")]
        public double CritNThreshold { get; set; }

        [Description("Depth to which the amount of N in the soil should be calculated (mm)")]
        public double CritNDepth { get; set; }

        [Separator("Fertiliser application details")]
        [Description("Depth at which to apply the fertiliser (mm)")]
        public double Depth { get; set; }

        [Description("Amount of fertiliser to apply (kg N /ha) per application")]
        public double Amount { get; set; }

        [Description("Fertiliser type - select from the list")]
        [Display(Type = DisplayType.FertiliserType)]public string FertiliserType { get; set; }


        [EventSubscribe("StartOfSimulation")]
        private void FindSoilNOrNutrient(object sender, EventArgs e)
        {
            nutrient =  Structure.Find<Nutrient>() as Nutrient;
            soilN =  Structure.Find<Nutrient>() as Nutrient;

            if (nutrient == null && soilN == null)
                throw new Exception(string.Format("Error in script {0}: Unable to find nutrient or soilN.", Name));
        }

        [EventSubscribe("DoManagement")]
        private void OnDoManagement(object sender, EventArgs e)
        {
            if (OnApplicationDate())
            {
                if (NContentBelowThreshold())
                    fertiliser.Apply(Amount, FertiliserType, Depth);
                else
                    summary.WriteMessage(this, "Skipping fertiliser application due to soil mineral N content being above critical threshold.", MessageType.Diagnostic);
            }
        }

        /// <summary>Checks if today's date is one of the specified fertiliser application dates.</summary>
        private bool OnApplicationDate()
        {
            if (EachYear)
                return Dates.Any(d => DateUtilities.DatesEqual(d, clock.Today));
            
            DateTime[] dates = Dates.Select(d => DateTime.ParseExact(d, "d-MMM-yyyy", null)).ToArray();
            return dates.Any(d => SameDate(d, clock.Today));
        }

        /// <summary>Checks if N content in soil is below critical threshold.</summary>
        private bool NContentBelowThreshold()
        {
            if (!UseCritNThreshold)
                return true;
            
            double[] weights = GetLayerWeights();
            double cumSoilN = 0;

            for (int i = 0; i < soilPhysical.Thickness.Length; i++)
            {
                if (nutrient != null)
                    cumSoilN += weights[i] * nutrient.MineralN[i];
                else if (soilN != null)
                    cumSoilN += weights[i] * soilN.MineralN[i];
            }

            return cumSoilN <= CritNThreshold;
        }

        private double[] GetLayerWeights()
        {
            double[] weights = new double[soilPhysical.Thickness.Length];
            double cumDepth = 0;

            for (int i = 0; i < soilPhysical.Thickness.Length; i++)
            {
                cumDepth += soilPhysical.Thickness[i];
                if (cumDepth < CritNDepth)
                    weights[i] = 1;
                else if (cumDepth - soilPhysical.Thickness[i] <= CritNDepth)
                    weights[i] = (CritNDepth - (cumDepth - soilPhysical.Thickness[i])) / soilPhysical.Thickness[i];
                else
                    weights[i] = 0;
            }

            return weights;
        }

        private bool SameDate(DateTime d1, DateTime d2)
        {
            return d1.Year == d2.Year && d1.DayOfYear == d2.DayOfYear;
        }
    }
}
```
        Manager AutomaticIrrigation
          allowIrrigation = True
          seasonStart = 1-sep
          seasonEnd = 30-apr
          seasonsAllocation = 10000
          triggerDeficit = 75
          targetDeficit = 95
          returndays = 3
          maximumAmount = 30
          depthPAWC = 300
```csharp
using Newtonsoft.Json;
using APSIM.Shared.Utilities;
using System.Xml.Serialization;
using Models.Soils;
using Models.PMF;
using Models.Core;
using System;
using System.Linq;
using Models.Interfaces;


        
namespace Models
{
    [Serializable] 
    [System.Xml.Serialization.XmlInclude(typeof(Model))]
    public class Script : Model
    {
        [Link] private ISummary summary;
        [Link] private Irrigation Irrigation;
        [Link] private Clock Clock;
        [Link] private Soil Soil;
        [Link(IsOptional = true)] private IPlant existingCrop;
        private DateTime StartDate;
        private DateTime EndDate;
        private double TopDUL;
        private double TopLL;
        private int nLayers;
        [Link]
        private IPhysical soilPhysical;
        [Link]
        private ISoilWater waterBalance;
        //Communication to other modules
       
        //User inputs from properties tab
        [Description("Turn irrigation on?")]
        public bool allowIrrigation { get; set; }
        [Description("Start of irrigation season (dd-MMM)")]
        public string seasonStart { get; set; }
        [Description("End of irrigation season (dd-MMM)")]
        public string seasonEnd { get; set; }
        [Description("Season allocation (mm)")]
        public double seasonsAllocation { get; set; }
        [Description("Deficit to trigger irrigation (% PAWC)")]
        public double triggerDeficit { get; set; }
        [Description("Deficit to stop irrigaton (% PAWC)")]
        public double targetDeficit { get; set; }
        [Description("Minimum days for irrigation to return")]
        public double returndays { get; set; }
        [Description("Maximum irrigation application (mm/day)")]
        public double maximumAmount { get; set; }
        [Description("Depth to calculate PAWC (mm)")]
        public double depthPAWC { get; set; }

        //Class members
        [JsonIgnore] public double TopSWdeficit { get; set; }
        [JsonIgnore] public double TopSWC { get; set; }
        [JsonIgnore] public double DaysSinceIrrigation { get; set; }
        [JsonIgnore] public double AmountToApply { get; set; }
        [JsonIgnore] public double SeasonAppliedAmount { get; set; }
        
        private bool IrrigationIsAllowed { get; set; }
        private bool SeasonIsOpen { get; set; }
        private bool CropIsActive { get; set; }
        private bool IrrigatorIsAvailable { get; set; }
        private bool SoilIsDry { get; set; }

    
        //Calculate static soil variables
        [EventSubscribe("StartOfSimulation")]
        private void OnStartOfSimulation(object sender, EventArgs e)
        {   
            //Set the season dates
            StartDate = DateTime.Parse(seasonStart + "-" + Clock.Today.Year.ToString());
            EndDate = DateTime.Parse(seasonEnd + "-" + Clock.Today.Year.ToString());
            
            //Can we irrigate at all?
            IrrigationIsAllowed = false; 
            if (allowIrrigation)
                IrrigationIsAllowed = true; 

            //Calculate soil water variables
            double depthFromSurface = 0.0;
            double fracLayer = 0.0;
            nLayers = soilPhysical.Thickness.Length;
            for (int layer = 0; layer < nLayers; layer++)
            {
                fracLayer = Math.Min(1.0, (depthPAWC - depthFromSurface) / soilPhysical.Thickness[layer]);
                TopLL += soilPhysical.LL15mm[layer] * fracLayer;
                TopDUL += soilPhysical.DULmm[layer] * fracLayer;
                depthFromSurface += soilPhysical.Thickness[layer];
                if (depthFromSurface >= depthPAWC)
                    layer = nLayers;
            }
        }
             
        //Determine daily requirement for irrigation
        [EventSubscribe("StartOfDay")]
        private void OnStartOfDay(object sender, EventArgs e)
        {
            //Can we irrigate today?          
            SeasonIsOpen = isBetween(Clock.Today, StartDate, EndDate);
            if (!SeasonIsOpen)
                SeasonAppliedAmount = 0;

            //Is there a crop in the ground that needs irrigation?
            CropIsActive = false;
            if ((existingCrop != null) && (existingCrop.IsAlive))
                CropIsActive = true;
            //if ((existingCrop.Phenology.Stage >= 3.0) && (existingCrop.Phenology.Stage < 6.0))
          
            //Is the irrigator available?
            IrrigatorIsAvailable = false;
            DaysSinceIrrigation += 1;
            if (DaysSinceIrrigation >= returndays)
                IrrigatorIsAvailable = true;
          
            //Is the soil dry enough to require irrigation?
            SoilIsDry = false;
            double depthFromSurface = 0.0;
            double fracLayer = 0.0;
            TopSWC = 0.0;
            for (int layer = 0; layer < nLayers; layer++)
            //for (int layer = 0; depthFromSurface < depthPAWC + soilPhysical.Thickness[layer]; layer++)
            {
                fracLayer = Math.Min(1.0, (depthPAWC - depthFromSurface) / soilPhysical.Thickness[layer]);
                TopSWC += waterBalance.SWmm[layer] * fracLayer;
                depthFromSurface += soilPhysical.Thickness[layer];
                if (depthFromSurface >= depthPAWC)
                    layer = nLayers;
            }
            
            TopSWdeficit = TopSWC - TopDUL;
            if (Math.Max(0.0, -TopSWdeficit) >= (TopDUL - TopLL) * (100 - triggerDeficit) / 100)
                SoilIsDry = true;
                
            //Are all the conditions ratifying irrigation
            if (IrrigationIsAllowed && SeasonIsOpen && CropIsActive && IrrigatorIsAvailable && SoilIsDry)
            {
                //Lets bloody well irrigate then!!!!
                AmountToApply = TopDUL * targetDeficit / 100 - TopSWC;
                AmountToApply = Math.Max(0.0, Math.Min(AmountToApply, seasonsAllocation - SeasonAppliedAmount));
                Irrigation.Apply(AmountToApply);
                DaysSinceIrrigation = 0;
                SeasonAppliedAmount += AmountToApply;
            }
        }
        
        ///Checks whether theDate is between iniDate and endDate (non-year specific)
        private bool isBetween(DateTime theDay, DateTime iniDate, DateTime endDate)
        {
            bool result = false;
            if (iniDate.DayOfYear < endDate.DayOfYear)
            {
                // period is within one year, ex: summer in the northern hemisphere
                if ((theDay.DayOfYear >= iniDate.DayOfYear) && (theDay.DayOfYear <= endDate.DayOfYear))
                    result = true;
            }
            else
            {
                // period goes over the end of the year, ex: summer in the southern hemisphere
                if ((theDay.DayOfYear >= iniDate.DayOfYear) || (theDay.DayOfYear <= endDate.DayOfYear))
                    result = true;
            }
            
            return result;
        }
    }
}
```
        Irrigation
        Fertiliser
        SurfaceOrganicMatter: InitialResidueName=Sward; InitialResidueType=grass; InitialResidueMass=1000; InitialStandingFraction=0; InitialCPR=0; InitialCNR=15
        PastureSpecies AGPRyegrass: doyGermination=275; daysEmergenceToAnthesis=120; daysAnthesisToMaturity=85; degreesDayForAnthesis=1100; degreesDayForMaturity=900; daysAnnualsFactor=45; CanopyType=PastureSpecies; InitialShootDM=1500; InitialRootDM=450; InitialRootDepth=750; initialDMFractionsGrasses=[0.15, 0.25, 0.25, 0.05, 0.05, 0.1, 0.1, 0.05, 0, 0, 0]; initialDMFractionsForbs=[0.2, 0.2, 0.15, 0.05, 0.1, 0.15, 0.1, 0.05, 0, 0, 0]; PhotosyntheticEfficiency=0.01; PhotosynthesisCurveFactor=0.8; FractionPAR=0.5; ReferenceCO2=380; CO2EffectScaleFactor=700; CO2EffectOffsetFactor=600; CO2EffectMinimum=0.7; CO2EffectExponent=2; ReproSeasonDurationCoeff=2; ReproSeasonShouldersLengthFactor=1; ReproSeasonOnsetDurationFactor=0.6; RelativeTurnoverEmerging=2; DetachmentDroughtCoefficient=3; DetachmentDroughtEffectMin=0.1; TurnoverStockFactor=0.01; TurnoverDefoliationEffectMin=0.025; MinimumGreenLeafProp=0.8; MinimumGreenRootProp=0.5
          initialDMFractionsLegumes=[0.16, 0.23, 0.22, 0.05, 0.03, 0.05, 0.05, 0.01, 0.04, 0.08, 0.08]
          LinearInterpolationFunction FVPDFunction
        PastureSpecies AGPWhiteClover: doyGermination=275; daysEmergenceToAnthesis=120; daysAnthesisToMaturity=85; degreesDayForAnthesis=1100; degreesDayForMaturity=900; daysAnnualsFactor=45; CanopyType=PastureSpecies; InitialShootDM=500; InitialRootDM=150; InitialRootDepth=350; initialDMFractionsGrasses=[0.15, 0.25, 0.25, 0.05, 0.05, 0.1, 0.1, 0.05, 0, 0, 0]; initialDMFractionsForbs=[0.2, 0.2, 0.15, 0.05, 0.1, 0.15, 0.1, 0.05, 0, 0, 0]; PhotosyntheticEfficiency=0.01; PhotosynthesisCurveFactor=0.8; FractionPAR=0.5; ReferenceCO2=380; CO2EffectScaleFactor=700; CO2EffectOffsetFactor=600; CO2EffectMinimum=0.7; CO2EffectExponent=2; ReproSeasonDurationCoeff=2; ReproSeasonShouldersLengthFactor=1; ReproSeasonOnsetDurationFactor=0.6; RelativeTurnoverEmerging=2; DetachmentDroughtCoefficient=3; DetachmentDroughtEffectMin=0.1; TurnoverStockFactor=0.01; TurnoverDefoliationEffectMin=0.025; MinimumGreenLeafProp=0.8; MinimumGreenRootProp=0.5
          initialDMFractionsLegumes=[0.16, 0.23, 0.22, 0.05, 0.03, 0.05, 0.05, 0.01, 0.04, 0.08, 0.08]
          LinearInterpolationFunction FVPDFunction
        Report: EventNames=[Clock].EndOfDay
          VariableNames:
            [Clock].Today as Date
            sum([Nutrient].NH3Volatilisation.EmissionNH3) as Volat
            sum([Nutrient].Urea.kgha[1:2]) as Urea30mm
        Soil: SoilType=Loam; LocalName=Horotiu-gn; Site=Ruakura, Horotiu-gn; NearestTown=Hamilton, Horotiu; Region=Waikato; Country=New Zealand; ApsoilNumber=1356; Latitude=-37.7; Longitude=175.31; LocationAccuracy=+/-100 m; YearOfSampling=2010
          DataSource=The database of New Zealand soils was compiled by AgResearch (www.agresearch.co.nz) and based on soil properties gathered, mainly from publications, in the course of conducting several simulation-based research projects but particularly from the Pastoral 21 Environment program which was funded by the New Zealand Ministry for Business, Innovation and Employment,  Dairy NZ, Fonterra and Meat & Wool NZ.
          Comments=Gravel soil. The bulk density of this APSoil reflects weight of fine-earth fraction per volume of bulk soil. Use with gravimetric water contents measured on the fine-earth fraction. Gravel assumed to not hold water as reflected in low SAT, DUL, LL15, LL and AD. The data is a combination of published or supplied measurements, pedotransfer functions, and expert opinion. See Cichota et al. (2013; Soil Research 51: 92-111, http://dx.doi.org/10.1071/SR12338) for a description of the pedotransfer functions. The soil carbon and fresh organic matter settings have been set as those broadly appropriate for permanent productive pastoral systems, see Cichota el al. (2012; Soil Research 50: 694-707, http://dx.doi.org/10.1071/SR12208). Users should take care to adapt these to local conditions before using the data in simulations. FOM values estimated to be 900 kg/ha of FOM in top 600mm of soil and another 100 kg/ha below. Soil C:N ratios taken from soil Loam (Morrinsville NoXXXX).
          Physical
            Thickness  ParticleSizeSand  ParticleSizeSilt  ParticleSizeClay  Rocks  BD     AirDry  LL15   DUL    SAT    KS
            100        41                37                22                0      0.8    0.071   0.216  0.465  0.629  2943.79
            100        31                47                22                0      0.75   0.066   0.2    0.448  0.643  2035.022
            200        45                45                10                0      0.76   0.073   0.222  0.437  0.658  3660.426
            250        52                45                3                 0      0.84   0.079   0.24   0.425  0.641  5378.75
            200        45                32                23                0      0.9    0.079   0.238  0.387  0.614  5995.583
            250        50                29                21                0      0.941  0.074   0.225  0.333  0.591  6769.637
            200        50                29                21                0      0.941  0.074   0.225  0.333  0.591  6769.637
            200        50                29                21                0      0.941  0.074   0.225  0.333  0.591  6769.637
            Rocks source: Calculated (layer 1, 2, 3, 4, 5, 6)
            SoilCrop AGPRyegrassSoil: LL=[0.216, 0.2, 0.222, 0.24, 0.238, 0.225, 0.225, 0.225]; KL=[0.011, 0.011, 0.006, 0.002, 0.001, 0, 0, 0]; XF=[1, 1, 1, 1, 0, 0, 0, 0]
            SoilCrop AGPWhiteCloverSoil: LL=[0.216, 0.2, 0.222, 0.24, 0.238, 0.225, 0.225, 0.225]; KL=[0.011, 0.011, 0.003, 0, 0, 0, 0, 0]; XF=[1, 1, 1, 0, 0, 0, 0, 0]
          Swim3 Swim: Salb=0.13; CN2Bare=73; CNRed=20; CNCov=0.8; KDul=1; PSIDul=-10; VC=true; DTMin=0; DTMax=1440; MaxWaterIncrement=10; SpaceWeightingFactor=0; SoluteSpaceWeightingFactor=1; Dis=0; Disp=1; A=2; DTHC=0.1; DTHP=2; vcon1=7.28e-09; vcon2=7.26e-07; eo_time=06:00; eo_durn=720; default_rain_time=00:00; default_rain_duration=1440; Diagnostics=false
          Water: Thickness=[100, 100, 200, 250, 200, 250, 200, 200]; InitialValues=[0.465, 0.448, 0.437, 0.425, 0.387, 0.333, 0.333, 0.333]; FilledFromTop=true
          Solute NO3: InitialValuesUnits=ppm; WaterTableConcentration=0; D0=0; DepthConstant=0; MaxDepthSoluteAccessible=0; RunoffEffectivenessAtMovingSolute=0; MaxEffectiveRunoff=0
            Thickness  InitialValues  Exco  FIP
            100        0              0     1
            100        0              0     1
            200        0              0     1
            250        0              0     1
            200        0              0     1
            250        0              0     1
            200        0              0     1
            200        0              0     1
          Solute NH4: InitialValuesUnits=ppm; WaterTableConcentration=0; D0=0; DepthConstant=0; MaxDepthSoluteAccessible=0; RunoffEffectivenessAtMovingSolute=0; MaxEffectiveRunoff=0
            Thickness  InitialValues  Exco   FIP
            100        0              34.1   0.84
            100        0              33.26  0.85
            200        0              31.59  0.64
            250        0              28.52  0.54
            200        0              48.11  0.71
            250        0              46.65  0.69
            200        0              46.65  0.69
            200        0              46.65  0.69
          Solute Urea: same as AirTemperature.Base.Field.Soil.NO3
          Nutrient
          Organic: FOMCNRatio=40; CarbonUnits=Total
            Thickness  Carbon  SoilCNRatio  FBiom  FInert  FOM
            100        4.7     12           0.069  0.57    361.11
            100        4.7     12           0.043  0.681   361.11
            200        1.6     12           0.023  0.797   304.65
            250        0.4     12           0.013  0.896   117.23
            200        0.2     12           0.011  0.947   38.06
            250        0.2     12           0.01   0.973   12.36
            200        0.2     12           0.01   0.986   4.01
            200        0.2     12           0.01   0.993   1.48
          Chemical: PHUnits=Water
            Thickness  PH   CEC
            100        6.5  18.93
            100        6.5  19.6
            200        6.5  9.18
            250        6.5  4.77
            200        6.5  8.82
            250        6.5  8.01
            200        6.5  7.8
            200        6.5  5.13
          LayerStructure
            Thickness=[10, 15, 25, 25, 25, 50, 50, 100, 100, 100, 150, 150, 200, 250, 100, 50, 50, 50]
          SoilTemperature Temperature: Thickness=[100, 100, 200, 250, 200, 250, 200, 200]
  Simulation FundamentalTesting
    Clock: Start=2000-01-01; End=2000-12-31
    Weather: FileName=%root%/Examples/WeatherFiles/AU_Dalby.met
    MicroClimate: a_interception=0; b_interception=0; c_interception=0; d_interception=0; SoilHeatFluxFraction=0; MinimumHeightDiffForNewLayer=0; NightInterceptionFraction=0; ReferenceHeight=2
    Forages
      Parameters:
        Name                          LiveDigestibility  DeadDigestibility  LiveFractionConsumable  DeadFractionConsumable  LiveMinimumBiomass  DeadMinimumBiomass
        SurfaceOrganicMatter.Residue  0.7                0.3                0                       0                       0                   0
        AGPRyegrass.Leaf              FromModel          FromModel          1                       1                       25                  0
        AGPRyegrass.Stem              FromModel          FromModel          1                       1                       10                  0
        AGPRyegrass.Stolon            FromModel          FromModel          1                       1                       0                   0
        AGPWhiteClover.Leaf           FromModel          FromModel          1                       1                       15                  0
        AGPWhiteClover.Stem           FromModel          FromModel          1                       1                       5                   0
        AGPWhiteClover.Stolon         FromModel          FromModel          1                       1                       5                   0
    Summary
    Zone Field: Area=1; Slope=0; AspectAngle=0; Altitude=50
      Manager DummyWaterBalance (disabled)
        Eos = 0
        Es = 0
        Eo = 0
        Salb = 0
```csharp
using APSIM.Numerics;
using Newtonsoft.Json;
using APSIM.Shared.Utilities;
using Models.Soils;
using Models.Interfaces;
using System;
using Models.Core;
using Models.PMF;

namespace Models
{
    [Serializable] 
    public class Script : Model, ISoilWater
    {
        [Link]
        private Physical physical;
        [Link]
        private IPhysical soilPhysical;
        [Link]
        private Water water;

        ///<summary>Gets or sets soil thickness for each layer (mm)(</summary>
        public double[] Thickness { get { return soilPhysical.Thickness; } }

        ///<summary>Gets or sets soil thickness for each layer (mm)(</summary>
        public double[] LayerThickness { get { return soilPhysical.Thickness; } }

        ///<summary>Gets or sets volumetric soil water content (mm/mm)(</summary>
        //[Description("Soil water content (mm/mm), comma separated values")]
        public double[] SW { get {return water.Volumetric;} set {water.Volumetric = value;} }

        ///<summary>Gets soil water content (mm)</summary>
        public double[] SWmm { get { return MathUtilities.Multiply(SW, Thickness); } }

        ///<summary>Gets extractable soil water relative to LL15(mm)</summary>
        public double[] ESW { get { throw new NotImplementedException(); } }

        ///<summary>Gets extractable soil water relative to LL15(mm)</summary>
        public double[] PSI { get { throw new NotImplementedException(); } }

        ///<summary>Gets K</summary>
        public double[] K { get { throw new NotImplementedException(); } }
        
        ///<summary>Gets PoreInteractionIndex</summary>
        [JsonIgnore]
        public double[] PoreInteractionIndex { get { throw new NotImplementedException(); } set { throw new NotImplementedException(); }}
                
        ///<summary>Gets potential evaporation from soil surface (mm)</summary>
        [Description("Eos (mm)")]
        public double Eos { get; set; }

        /// <summary>Gets the actual (realised) soil water evaporation (mm)</summary>
        [Description("Es (mm)")]
        public double Es { get; set; }

        /// <summary>Gets potential evapotranspiration of the whole soil-plant system (mm)</summary>
        [Description("Eo (mm)")]
        public double Eo { get; set; }

        /// <summary>Gets the amount of water runoff (mm)</summary>
        public double Runoff { get { return 0; } }
        
        /// <summary>Gets the amount of water drainage from bottom of profile(mm)</summary>
        public double Drainage { get { return 0; } }

        /// <summary>Fraction of incoming radiation reflected from bare soil</summary>
        [Description("Salb")]
        public double Salb { get; set; }

        /// <summary>Amount of water moving laterally out of the profile (mm)</summary>
        public double[] LateralOutflow { get { throw new NotImplementedException(); } }

        /// <summary>Amount of N leaching as NO3-N from the deepest soil layer (kg /ha)</summary>
        public double LeachNO3 { get { return 0; } }

        /// <summary>Amount of N leaching as NH4-N from the deepest soil layer (kg /ha)</summary>
        public double LeachNH4 { get { return 0; } }
        
        /// <summary>Amount of N leaching as urea-N  from the deepest soil layer (kg /ha)</summary>
        public double LeachUrea { get { return 0; } }

        /// <summary>Amount of Cl leaching  from the deepest soil layer (kg /ha)</summary>
        public double LeachCl { get { return 0; } }
        
        /// <summary>Amount of N leaching as NO3 from each soil layer (kg /ha)</summary>
        public double[] FlowNO3 { get { throw new NotImplementedException(); } }

        /// <summary>Amount of N leaching as NH4 from each soil layer (kg /ha)</summary>
        public double[] FlowNH4 { get { throw new NotImplementedException(); } }

        /// <summary>Amount of N leaching as urea from each soil layer (kg /ha)</summary>
        public double[] FlowUrea { get { throw new NotImplementedException(); } }

        /// <summary>Amount of N leaching as urea from each soil layer (kg /ha)</summary>
        public double[] FlowCl { get { throw new NotImplementedException(); } }

        /// <summary>Amount of water moving upward from each soil layer during unsaturated flow (negative value means downward movement) (mm)</summary>
        public double[] Flow  { get { throw new NotImplementedException(); } }

        /// <summary>Amount of water moving downward out of each soil layer due to gravity drainage (above DUL) (mm)</summary>
        public double[] Flux { get { throw new NotImplementedException(); } }

        /// <summary> This is set by Microclimate and is rainfall less that intercepted by the canopy and residue components </summary>
        public double PotentialInfiltration { get; set; }
        
        /// <summary> The amount of rainfall intercepted by crop and residue canopies </summary>
        public double PrecipitationInterception { get; set; }

        /// <summary>Water table depth (mm)</summary>
        public double WaterTable { get; set; }
        
        /// <summary>Pond depth (mm)</summary>
        public double Pond { get; set; }

        /// <summary>Pond depth (mm)</summary>
        public double SubsurfaceDrain { get; set; }

        /// <summary>Sets the water table.</summary>
        /// <param name="InitialDepth">The initial depth.</param> 
        public void SetWaterTable(double InitialDepth)
        {
            throw new NotImplementedException();
        }

        /// <summary>The efficiency (0-1) that solutes move down with water.</summary>
        public double[] SoluteFluxEfficiency { get; set; }

        /// <summary>The efficiency (0-1) that solutes move up with water.</summary>
        public double[] SoluteFlowEfficiency { get; set; }

        ///<summary>Perform a reset</summary>
        public void Reset()
        {
            throw new NotImplementedException();
        }

        ///<summary>Perform tillage</summary>
        public void Tillage(TillageType Data)
        {
            throw new NotImplementedException();
        }

        ///<summary>Perform tillage</summary>
        public void Tillage(string tillageType)
        {
            throw new NotImplementedException();
        }

        ///<summary>Remove water from the profile</summary>
        public void RemoveWater(double[] amountToRemove)
        {
            throw new NotImplementedException();
        }
        public void Standardise(double[] targetThickness)
        {
        
        
        }
        
        /// <summary>Plant available water SW-LL15 (mm/mm).</summary>
        [Units("mm/mm")]
        public double[] PAW
        {
            get
            {
                return SoilUtilities.CalcPAWC(soilPhysical.Thickness,
                                              soilPhysical.LL15,
                                              SW,
                                              null);
            }
        }

        /// <summary>Plant available water SW-LL15 (mm).</summary>
        [Units("mm")]
        public double[] PAWmm
        {
            get
            {
                return MathUtilities.Multiply(PAW, soilPhysical.Thickness);
            }
        }

    }
}
```
      Manager Fertilise on fixed dates
        FertiliserType = NO3N
        FertiliserDates = 1-mar
        FertiliseDepth = 0
        Amount = 100
        AmountType = True
```csharp
using Models.Soils;
using System;
using System.Linq;
using Models.Core;
using Models.PMF;
using APSIM.Shared.Utilities;
namespace Models
{
    [Serializable]
    public class Script : Model
    {
        [Link] Clock Clock;
        [Link] Fertiliser Fertiliser;
        
        [Separator("A component to apply fertiliser on one or more dates on every year of the simulation")]

        [Description("Type of fertiliser to apply? ")] 
        [Display(Type = DisplayType.FertiliserType)]public string FertiliserType { get; set; }

        [Description("Enter the fertilisation dates as dd-mmm with comma separation (any year information entered will be ignored): ")] 
        public string[] FertiliserDates { get; set; } 
        
        [Description("Fertilise depth (mm)")]
        public double FertiliseDepth { get; set; }

        [Description("Amount of fertiliser to be applied (kg/ha)")] 
        public double Amount { get; set; }

        [Description("Is the above amount to be applied each time? (yes/ticked)? Or is it the total annual amount across all dates (no/unticked)")] 
        public bool AmountType { get; set; }

        
        [EventSubscribe("DoManagement")]
        private void OnDoManagement(object sender, EventArgs e)
        {
            foreach (string ddMMM in FertiliserDates)
            {
                if (DateUtilities.DatesEqual(ddMMM, Clock.Today))
                {
                    if (AmountType)
                        Fertiliser.Apply(amount: Amount, type: FertiliserType);
                    else
                        Fertiliser.Apply(amount: Amount / FertiliserDates.Length, type: FertiliserType, depth: FertiliseDepth);
                }
            }
        }
    }
}
```
      Irrigation
      Fertiliser
      SurfaceOrganicMatter: InitialResidueName=Sward; InitialResidueType=grass; InitialResidueMass=1000; InitialStandingFraction=0; InitialCPR=0; InitialCNR=15
      Soil: SoilType=Loam; LocalName=Horotiu-gn; Site=Ruakura, Horotiu-gn; NearestTown=Hamilton, Horotiu; Region=Waikato; Country=New Zealand; ApsoilNumber=1356; Latitude=-37.7; Longitude=175.31; LocationAccuracy=+/-100 m; YearOfSampling=2010
        DataSource=The database of New Zealand soils was compiled by AgResearch (www.agresearch.co.nz) and based on soil properties gathered, mainly from publications, in the course of conducting several simulation-based research projects but particularly from the Pastoral 21 Environment program which was funded by the New Zealand Ministry for Business, Innovation and Employment,  Dairy NZ, Fonterra and Meat & Wool NZ.
        Comments=Gravel soil. The bulk density of this APSoil reflects weight of fine-earth fraction per volume of bulk soil. Use with gravimetric water contents measured on the fine-earth fraction. Gravel assumed to not hold water as reflected in low SAT, DUL, LL15, LL and AD. The data is a combination of published or supplied measurements, pedotransfer functions, and expert opinion. See Cichota et al. (2013; Soil Research 51: 92-111, http://dx.doi.org/10.1071/SR12338) for a description of the pedotransfer functions. The soil carbon and fresh organic matter settings have been set as those broadly appropriate for permanent productive pastoral systems, see Cichota el al. (2012; Soil Research 50: 694-707, http://dx.doi.org/10.1071/SR12208). Users should take care to adapt these to local conditions before using the data in simulations. FOM values estimated to be 900 kg/ha of FOM in top 600mm of soil and another 100 kg/ha below. Soil C:N ratios taken from soil Loam (Morrinsville NoXXXX).
        Physical
          Thickness  ParticleSizeSand  ParticleSizeSilt  ParticleSizeClay  Rocks  BD     AirDry  LL15   DUL    SAT    KS
          100        41                37                22                0      0.8    0.071   0.216  0.465  0.629  2943.79
          100        31                47                22                0      0.75   0.066   0.2    0.448  0.643  2035.022
          200        45                45                10                0      0.76   0.073   0.222  0.437  0.658  3660.426
          250        52                45                3                 0      0.84   0.079   0.24   0.425  0.641  5378.75
          200        45                32                23                0      0.9    0.079   0.238  0.387  0.614  5995.583
          250        50                29                21                0      0.941  0.074   0.225  0.333  0.591  6769.637
          200        50                29                21                0      0.941  0.074   0.225  0.333  0.591  6769.637
          200        50                29                21                0      0.941  0.074   0.225  0.333  0.591  6769.637
          Rocks source: Calculated (layer 1, 2, 3, 4, 5, 6)
          SoilCrop AGPRyegrassSoil: LL=[0.216, 0.2, 0.222, 0.24, 0.238, 0.225, 0.225, 0.225]; KL=[0.011, 0.011, 0.006, 0.002, 0.001, 0, 0, 0]; XF=[1, 1, 1, 1, 0, 0, 0, 0]
          SoilCrop AGPWhiteCloverSoil: LL=[0.216, 0.2, 0.222, 0.24, 0.238, 0.225, 0.225, 0.225]; KL=[0.011, 0.011, 0.003, 0, 0, 0, 0, 0]; XF=[1, 1, 1, 0, 0, 0, 0, 0]
        Swim3 Swim: Salb=0.13; CN2Bare=73; CNRed=20; CNCov=0.8; KDul=1; PSIDul=-10; VC=true; DTMin=0; DTMax=1440; MaxWaterIncrement=10; SpaceWeightingFactor=0; SoluteSpaceWeightingFactor=1; Dis=0; Disp=1; A=2; DTHC=0.1; DTHP=2; vcon1=7.28e-09; vcon2=7.26e-07; eo_time=06:00; eo_durn=720; default_rain_time=00:00; default_rain_duration=1440; Diagnostics=false
        Water: Thickness=[100, 100, 200, 250, 200, 250, 200, 200]; InitialValues=[0.465, 0.448, 0.437, 0.425, 0.387, 0.333, 0.333, 0.333]; FilledFromTop=true
        Solute NO3: InitialValuesUnits=ppm; WaterTableConcentration=0; D0=0; DepthConstant=0; MaxDepthSoluteAccessible=0; RunoffEffectivenessAtMovingSolute=0; MaxEffectiveRunoff=0
          Thickness  InitialValues  Exco  FIP
          100        0              0     1
          100        0              0     1
          200        0              0     1
          250        0              0     1
          200        0              0     1
          250        0              0     1
          200        0              0     1
          200        0              0     1
        Solute NH4: InitialValuesUnits=ppm; WaterTableConcentration=0; D0=0; DepthConstant=0; MaxDepthSoluteAccessible=0; RunoffEffectivenessAtMovingSolute=0; MaxEffectiveRunoff=0
          Thickness  InitialValues  Exco   FIP
          100        0              34.1   0.84
          100        0              33.26  0.85
          200        0              31.59  0.64
          250        0              28.52  0.54
          200        0              48.11  0.71
          250        0              46.65  0.69
          200        0              46.65  0.69
          200        0              46.65  0.69
        Solute Urea: same as FundamentalTesting.Field.Soil.NO3
        Nutrient
          NH3Volatilisation: DepthEmissable1=30; DepthEmissable2=100; k_BC=0.03; k_pH_hyd=1; k_pH_nit=1; k_pH_x=0.2; k_AFPV=300; f_AV=0.5; CritRain1=3; CritRain2=10
        Organic: FOMCNRatio=40; CarbonUnits=Total
          Thickness  Carbon  SoilCNRatio  FBiom  FInert  FOM
          100        4.7     12           0.069  0.57    361.11
          100        4.7     12           0.043  0.681   361.11
          200        1.6     12           0.023  0.797   304.65
          250        0.4     12           0.013  0.896   117.23
          200        0.2     12           0.011  0.947   38.06
          250        0.2     12           0.01   0.973   12.36
          200        0.2     12           0.01   0.986   4.01
          200        0.2     12           0.01   0.993   1.48
        Chemical: PHUnits=Water
          Thickness  PH  CEC
          100        7   18.93
          100        7   19.6
          200        7   9.18
          250        7   4.77
          200        7   8.82
          250        7   8.01
          200        7   7.8
          200        7   5.13
        LayerStructure
          Thickness=[10, 15, 25, 25, 25, 50, 50, 100, 100, 100, 150, 150, 200, 250, 100, 50, 50, 50]
        SoilTemperature Temperature: Thickness=[100, 100, 200, 250, 200, 250, 200, 200]
      Report: EventNames=[Clock].DoReport
        VariableNames:
          [Clock].Today as Date
          sum([Nutrient].NH3Volatilisation.EmissionNH3) as Volat
          sum([Nutrient].Urea.kgha[1:2]) as Urea30mm
  Experiment Rate
    Factors
      Factor Urea: Specification=[FertiliseFixedDates].Script.Amount = 0 to 100 step 20
    Simulation RateSim
      Clock: Start=2000-01-01; End=2000-02-28
      Weather: FileName=%root%/Examples/WeatherFiles/NZ_Hamilton.met
      MicroClimate: a_interception=0; b_interception=1; c_interception=0; d_interception=0; SoilHeatFluxFraction=0.4; MinimumHeightDiffForNewLayer=0; NightInterceptionFraction=0.5; ReferenceHeight=2
      Forages: same as FundamentalTesting.Forages
      SoilArbitrator
      Summary
      Zone Field: Area=1; Slope=0; AspectAngle=0; Altitude=50
        SimpleGrazing: GrazingRotationType=0; SimpleGrazingFrequencyString=21; SimpleMinGrazable=0; SimpleGrazingResidual=1500; FlexibleGrazePostDM=0; IsCutAndCarry=false; FractionClippingsReturned=0; FractionIntakeNToAnimal=[100]; DungNConc=2.6; FractionOfDungUrineOffPaddock=[0.3]; DepthUrineIsAdded=250; ShowAdvancedExcretaOptions=false; SendDungElsewhere=1; SendUrineElsewhere=1; UsePatching=false; PseudoPatches=true; ZoneCount=25; UrineReturnPattern=2; PseudoRandomSeed=666; MaxEffectiveNConcentration=3.5; FractionPopulationDecline=0; TramplingOn=false; MaximumPropLitterMovedToSoil=0.1; PastureConsumedAtMaximumRateOfLitterRemoval=1200
          PreGrazeDMArray=[1000, 1000, 1000, 1000, 1000, 1000, 1000, 1000, 1000, 1000, 1000, 1000]
          PostGrazeDMArray=[2000, 2000, 2000, 2000, 2000, 2000, 2000, 2000, 2000, 2000, 2000, 2000]
        Manager FertiliseFixedDates
          EachYear = True
          Dates = 2-jan
          UseCritNThreshold = False
          CritNThreshold = 50
          CritNDepth = 75
          Depth = 0
          Amount = 50
          FertiliserType = UreaN
          script: same as in AirTemperature.Base.Field.FertiliseFixedDates
        Manager AutomaticIrrigation
          allowIrrigation = True
          seasonStart = 1-sep
          seasonEnd = 30-apr
          seasonsAllocation = 10000
          triggerDeficit = 95
          targetDeficit = 100
          returndays = 10
          maximumAmount = 30
          depthPAWC = 300
          script: same as in AirTemperature.Base.Field.AutomaticIrrigation
        Irrigation
        Fertiliser
        SurfaceOrganicMatter: InitialResidueName=Sward; InitialResidueType=grass; InitialResidueMass=1000; InitialStandingFraction=0; InitialCPR=0; InitialCNR=15
        PastureSpecies AGPRyegrass: doyGermination=275; daysEmergenceToAnthesis=120; daysAnthesisToMaturity=85; degreesDayForAnthesis=1100; degreesDayForMaturity=900; daysAnnualsFactor=45; CanopyType=PastureSpecies; InitialShootDM=1500; InitialRootDM=450; InitialRootDepth=750; initialDMFractionsGrasses=[0.15, 0.25, 0.25, 0.05, 0.05, 0.1, 0.1, 0.05, 0, 0, 0]; initialDMFractionsForbs=[0.2, 0.2, 0.15, 0.05, 0.1, 0.15, 0.1, 0.05, 0, 0, 0]; PhotosyntheticEfficiency=0.01; PhotosynthesisCurveFactor=0.8; FractionPAR=0.5; ReferenceCO2=380; CO2EffectScaleFactor=700; CO2EffectOffsetFactor=600; CO2EffectMinimum=0.7; CO2EffectExponent=2; ReproSeasonDurationCoeff=2; ReproSeasonShouldersLengthFactor=1; ReproSeasonOnsetDurationFactor=0.6; RelativeTurnoverEmerging=2; DetachmentDroughtCoefficient=3; DetachmentDroughtEffectMin=0.1; TurnoverStockFactor=0.01; TurnoverDefoliationEffectMin=0.025; MinimumGreenLeafProp=0.8; MinimumGreenRootProp=0.5
          initialDMFractionsLegumes=[0.16, 0.23, 0.22, 0.05, 0.03, 0.05, 0.05, 0.01, 0.04, 0.08, 0.08]
          LinearInterpolationFunction FVPDFunction
        PastureSpecies AGPWhiteClover: doyGermination=275; daysEmergenceToAnthesis=120; daysAnthesisToMaturity=85; degreesDayForAnthesis=1100; degreesDayForMaturity=900; daysAnnualsFactor=45; CanopyType=PastureSpecies; InitialShootDM=500; InitialRootDM=150; InitialRootDepth=350; initialDMFractionsGrasses=[0.15, 0.25, 0.25, 0.05, 0.05, 0.1, 0.1, 0.05, 0, 0, 0]; initialDMFractionsForbs=[0.2, 0.2, 0.15, 0.05, 0.1, 0.15, 0.1, 0.05, 0, 0, 0]; PhotosyntheticEfficiency=0.01; PhotosynthesisCurveFactor=0.8; FractionPAR=0.5; ReferenceCO2=380; CO2EffectScaleFactor=700; CO2EffectOffsetFactor=600; CO2EffectMinimum=0.7; CO2EffectExponent=2; ReproSeasonDurationCoeff=2; ReproSeasonShouldersLengthFactor=1; ReproSeasonOnsetDurationFactor=0.6; RelativeTurnoverEmerging=2; DetachmentDroughtCoefficient=3; DetachmentDroughtEffectMin=0.1; TurnoverStockFactor=0.01; TurnoverDefoliationEffectMin=0.025; MinimumGreenLeafProp=0.8; MinimumGreenRootProp=0.5
          initialDMFractionsLegumes=[0.16, 0.23, 0.22, 0.05, 0.03, 0.05, 0.05, 0.01, 0.04, 0.08, 0.08]
          LinearInterpolationFunction FVPDFunction
        Report: EventNames=[Clock].EndOfDay
          VariableNames:
            [Clock].Today as Date
            [FertiliseFixedDates].Script.Amount as NInput
            sum([Soil].NH3Volatilisation.EmissionNH3) as Volatilisation
            sum([Soil].NH3Volatilisation.EmissionNH3[:])/([FertiliseFixedDates].Script.Amount + 0.0001) as PropFertVolatilised
            sum([Nutrient].Urea.kgha[1:5]) as Urea100mm
            sum([Nutrient].NH4.kgha[1:5]) as NH4100mm
            sum([Nutrient].NO3.kgha[1:5]) as NO3100mm
            mean([NH3Volatilisation].pH[1:5]) as pH
            sum([Soil].Water.PAWmm[1:5]) as PAW100mm
            [MicroClimate].PetTotal as PET
        Soil: SoilType=Loam; LocalName=Horotiu-gn; Site=Ruakura, Horotiu-gn; NearestTown=Hamilton, Horotiu; Region=Waikato; Country=New Zealand; ApsoilNumber=1356; Latitude=-37.7; Longitude=175.31; LocationAccuracy=+/-100 m; YearOfSampling=2010
          DataSource=The database of New Zealand soils was compiled by AgResearch (www.agresearch.co.nz) and based on soil properties gathered, mainly from publications, in the course of conducting several simulation-based research projects but particularly from the Pastoral 21 Environment program which was funded by the New Zealand Ministry for Business, Innovation and Employment,  Dairy NZ, Fonterra and Meat & Wool NZ.
          Comments=Gravel soil. The bulk density of this APSoil reflects weight of fine-earth fraction per volume of bulk soil. Use with gravimetric water contents measured on the fine-earth fraction. Gravel assumed to not hold water as reflected in low SAT, DUL, LL15, LL and AD. The data is a combination of published or supplied measurements, pedotransfer functions, and expert opinion. See Cichota et al. (2013; Soil Research 51: 92-111, http://dx.doi.org/10.1071/SR12338) for a description of the pedotransfer functions. The soil carbon and fresh organic matter settings have been set as those broadly appropriate for permanent productive pastoral systems, see Cichota el al. (2012; Soil Research 50: 694-707, http://dx.doi.org/10.1071/SR12208). Users should take care to adapt these to local conditions before using the data in simulations. FOM values estimated to be 900 kg/ha of FOM in top 600mm of soil and another 100 kg/ha below. Soil C:N ratios taken from soil Loam (Morrinsville NoXXXX).
          Physical: same as FundamentalTesting.Field.Soil.Physical
          Swim3 Swim: same as FundamentalTesting.Field.Soil.Swim
          Water: Thickness=[100, 100, 200, 250, 200, 250, 200, 200]; InitialValues=[0.465, 0.448, 0.437, 0.425, 0.387, 0.333, 0.333, 0.333]; FilledFromTop=false
          Solute NO3: InitialValuesUnits=ppm; WaterTableConcentration=0; D0=0; DepthConstant=0; MaxDepthSoluteAccessible=0; RunoffEffectivenessAtMovingSolute=0; MaxEffectiveRunoff=0
            Thickness  InitialValues  Exco  FIP
            100        10             0     1
            100        10             0     1
            200        5              0     1
            250        1              0     1
            200        0              0     1
            250        0              0     1
            200        0              0     1
            200        0              0     1
          Solute NH4: InitialValuesUnits=ppm; WaterTableConcentration=0; D0=0; DepthConstant=0; MaxDepthSoluteAccessible=0; RunoffEffectivenessAtMovingSolute=0; MaxEffectiveRunoff=0
            Thickness  InitialValues  Exco   FIP
            100        2              34.1   0.84
            100        1              33.26  0.85
            200        0.5            31.59  0.64
            250        0              28.52  0.54
            200        0              48.11  0.71
            250        0              46.65  0.69
            200        0              46.65  0.69
            200        0              46.65  0.69
          Solute Urea: same as FundamentalTesting.Field.Soil.NO3
          Nutrient
          Organic: FOMCNRatio=40; CarbonUnits=Total
            Thickness  Carbon  SoilCNRatio  FBiom  FInert  FOM
            100        4.7     12           0.069  0.57    361.1
            100        4.7     12           0.043  0.681   361.1
            200        1.6     12           0.023  0.797   304.6
            250        0.4     12           0.013  0.896   117.2
            200        0.2     12           0.011  0.947   38.1
            250        0.2     12           0.01   0.973   12.4
            200        0.2     12           0.01   0.986   4
            200        0.2     12           0.01   0.993   1.5
          Chemical: PHUnits=Water
            Thickness  PH   CEC
            100        6.5  18.93
            100        6.5  19.6
            200        6.5  9.18
            250        6.5  4.77
            200        6.5  8.82
            250        6.5  8.01
            200        6.5  7.8
            200        6.5  5.13
          LayerStructure
            Thickness=[10, 15, 25, 25, 25, 50, 50, 100, 100, 100, 150, 150, 200, 250, 100, 50, 50, 50]
          SoilTemperature Temperature: Thickness=[100, 100, 200, 250, 200, 250, 200, 200]
          NH3Volatilisation: DepthEmissable1=30; DepthEmissable2=100; k_BC=0.03; k_pH_hyd=1; k_pH_nit=1; k_pH_x=0.2; k_AFPV=300; f_AV=0.5; CritRain1=3; CritRain2=10
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