Simulations: Version=6
  DataStore
  Simulation DetailOutputs
    Clock: StartDate=1999-01-01; EndDate=1999-02-20
    Summary SummaryFile
    Weather: FileName=lincoln.met
    Zone Field: Area=1; Slope=0
      Report: EventNames=[Soil].WEIRDO.ReportDetails
        VariableNames:
          [Soil].WEIRDO.TimeStep as TimeStep
          [Clock].Today as Date
          [Soil].WEIRDO.Process as Process
          [Soil].WEIRDO.Hour as Hour
          [Soil].WEIRDO.ReportLayer as Layer
          [Soil].WEIRDO.PoreWater as PW
          sum([Soil].SoilWater.SWmm) as ProfileWater
          [Soil].SoilWater.SWmm as SWmm
          [Soil].SoilWater.SW as SW
          [Soil].WEIRDO.Drainage as Drainage
          [Soil].WEIRDO.Infiltration as Infiltration
          [Soil].WEIRDO.pond as Pond
          [Soil].WEIRDO.Thickness as Thickness
          [Irrigation].IrrigationApplied as Irrigation
      Fertiliser
      SurfaceOrganicMatter: PoolName=wheat_stubble; type=wheat; mass=0; standing_fraction=0; cnr=100; CriticalResidueWeight=2000; OptimumDecompTemp=20; MaxCumulativeEOS=20; CNRatioDecompCoeff=0.277; CNRatioDecompThreshold=25; TotalLeachRain=25; MinRainToLeach=10; CriticalMinimumOrganicC=0.004; DefaultCPRatio=0; DefaultStandingFraction=0; StandingExtinctCoeff=0.5; FractionFaecesAdded=0.5
        Pools:
          {PoolName=wheat_stubble, ResidueType=wheat, Mass=0, CNRatio=100, StandingFraction=0}
        ResidueTypes: LoadFromResource=ResidueTypes
      MicroClimate: a_interception=0; b_interception=1; c_interception=0; d_interception=0; soil_albedo=0.3; sun_angle=15; soil_heat_flux_fraction=0.4; night_interception_fraction=0.5; refheight=2; albedo=0.15; emissivity=0.96; RadIntTotal=0
      Irrigation
      Manager Irrigate on a fixed date
        IrrigateDate = 2-Jan
        Amount = 100
        Depth = 0
        Efficiency = 1
        WillRunoff = False
        Duration = 2
```csharp
using System;
using Models.Core;
using Models.PMF;
using APSIM.Shared.Utilities;
namespace Models
{
	[Serializable]
	public class Script : Model
	{
		[Link] Clock Clock;
		[Link] Irrigation Irrigation;
		
		[Description("Date to irrigate")]
		public string IrrigateDate { get; set; }
		
		[Description("Amount of irrigation to be applied (mm)")]
		public double Amount { get; set; }
		
		[Description("Depth of irrigation (mm)")]
		public double Depth { get; set; }
		
		[Description("Efficiency of irrigation (0-1)")]
		public double Efficiency { get; set; }
		
		[Description("Will the irrigation runoff?")]
		public bool WillRunoff { get; set; }
		
		[Description("How may hours did it take to apply irrigation?")]
		public double Duration { get; set; }
		
		
		[EventSubscribe("DoManagement")]
		private void OnDoManagement(object sender, EventArgs e)
		{
			if (DateUtilities.WithinDates(IrrigateDate, Clock.Today, IrrigateDate))
			{
				Irrigation.Apply(amount: Amount, depth: Depth, efficiency: Efficiency, willRunoff: WillRunoff, duration: Duration);
			}
		}
	}
}
```
      Report Initial: EventNames=[Clock].DoInitialSummary
        VariableNames:
          [Soil].WEIRDO.Thickness as Thickness
          [Soil].WEIRDO.Depth as Depth
          [Soil].WEIRDO.PsiUpper as PsiUp
          [Soil].WEIRDO.RelativePoreVolume as RelWC
      Manager ClimateControl
        StartDate = 1998-01-01
        EndDate = 1998-02-20
```csharp
using System;
using Models.Core;
using APSIM.Shared.Utilities;



using System.Collections.Generic;
using System.Text;
using Models.PMF;
using Models;
using System.Xml.Serialization;

namespace Models
{
	[Serializable] 
	[System.Xml.Serialization.XmlInclude(typeof(Model))]
	public class Script : Model
	{
		[Link] Weather Met;
		[Link] Clock Clock;
    
		[Description("Start Date")]
		public DateTime StartDate { get; set; }
        
		[Description("End Date")]
		public DateTime EndDate { get; set; }
 
    
		[EventSubscribe("PreparingNewWeatherData")]
		private void OnPreparingNewWeatherData(object sender, EventArgs e)
		{
			if ((Clock.Today.Date >= StartDate) && (Clock.Today.Date <= EndDate))
				Met.Rain = 0;		
		}
	}
}
```
      Soil: ASCOrder=Vertosol; ASCSubOrder=Black; SoilType=Clay; Site=Norwin; NearestTown=Norwin; Region=Darling Downs and Granite Belt; State=Queensland; Country=Australia; NaturalVegetation=Qld. Bluegrass, possible Qld. Blue gum; ApsoilNumber=900; Latitude=-27.581836; Longitude=151.320206; LocationAccuracy=+/- 20m
        DataSource=CSIRO Sustainable Ecosystems, Toowoomba; Characteriesd as part of the GRDC funded project"Doing it better, doing it smarter, managing soil water in Australian agriculture' 2011
        Comments=OC, CLL for all crops estimated-based on Bongeen Mywybilla Soil No1
        WEIRDO: Salb=0.15; SubProfileConductance=20; WaterTableDepth=10; CalculateInfiltration=true; CalculateDrainage=true; ReportDetail=false; IncludeSorption=true; CalculateEvaporation=true; CalculateDiffusion=true; DiffusivityMultiplier=2; ExtractionMultiplier=0; ProfileWaterExtraction=0; TotalCover=0; ResidueWater=0; Hour=0; ReportLayer=0; TimeStep=0
          Thickness  ParamThickness  LL15  DUL   SAT   CFlow  XFlow  PsiBub  MinRepellancyFactor  LowerRepellentWC  UpperRepellentWC  XF   BD
          30         30              0.16  0.3   0.44  7E-11  3      -20     1                    0.2               0.8               1.1  1
          170        170             0.15  0.3   0.44  7E-11  3      -20     1                    0.2               0.8               1.1  1
          200        200             0.14  0.28  0.46  7E-11  3      -70     1                    0.2               0.8               1.1  1.2
          200        200             0.14  0.28  0.46  7E-11  3      -70     1                    0.2               0.8               1.1  1.2
          200        200             0.14  0.26  0.36  7E-11  3      -70     1                    0.2               0.8               1.1  1.3
          200        200             0.14  0.26  0.36  7E-11  3      -70     1                    0.2               0.8               1.1  1.4
          200        200             0.14  0.26  0.36  7E-11  3      -70     1                    0.2               0.8               1.1  1.5
          200        200             0.14  0.26  0.36  7E-11  3      -70     1                    0.2               0.8               1.1  1.6
        LayerStructure: Thickness=[30, 170, 200, 200, 200, 200, 200, 200]
        Evapotranspiration
        MRSpline
        SoilNitrogen: fom_type=[default, manure, mucuna, lablab, shemp, stable]; fract_carb=[0.2, 0.3, 0.54, 0.57, 0.45, 0]; fract_cell=[0.7, 0.3, 0.37, 0.37, 0.47, 0.1]; fract_lign=[0.1, 0.4, 0.09, 0.06, 0.08, 0.9]; wfpsN2N2O_x=[22, 88]; wfpsN2N2O_y=[0.1, 1]
        SoilOrganicMatter: RootCN=40; RootWt=1000; SoilCN=11; EnrACoeff=7.4; EnrBCoeff=0.2; OCUnits=Total
          Thickness  OC    FBiom  FInert
          200        2.63  0.03   0.4
          200        1.25  0.02   0.7
          200        0.32  0.01   0.8
          200        0.21  0.01   0.9
          200        0.2   0.01   1
          200        0.2   0.01   1
          200        0.2   0.01   1
        Analysis: Thickness=[200, 200, 200, 200, 200, 200, 200]; PH=[6, 6, 6, 6, 6, 6, 6]; PHUnits=Water; BoronUnits=HotWater
        Sample InitialN: NO3Units=ppm; NH4Units=ppm; SWUnits=Volumetric; OCUnits=Total; PHUnits=Water
          Thickness  NO3  NH4
          150        10   0.1
          150        10   0.1
          300        10   0.1
          300        10   0.1
          300        10   0.1
          300        1    0.1
          300        1    0.1
        Sample InitialWater: Thickness=[50, 150, 200, 200, 200, 200, 200, 200]; SW=[0.27, 0.27, 0.25, 0.25, 0.2, 0.25, 0.25, 0.25]; NO3Units=ppm; NH4Units=ppm; SWUnits=Volumetric; OCUnits=Total; PHUnits=Water
        CERESSoilTemperature
        Weirdo: Salb=0.15; SubProfileConductance=20; WaterTableDepth=10; CalculateInfiltration=true; CalculateDrainage=true; ReportDetail=false; IncludeSorption=true; CalculateEvaporation=true; CalculateDiffusion=true; DiffusivityMultiplier=2; ExtractionMultiplier=0; ProfileWaterExtraction=0; TotalCover=0; ResidueWater=0; Hour=0; ReportLayer=0; TimeStep=0
          Thickness  ParamThickness  LL15  DUL   SAT   CFlow  XFlow  PsiBub  MinRepellancyFactor  LowerRepellentWC  UpperRepellentWC  XF   BD
          30         30              0.16  0.3   0.44  7E-11  3      -20     1                    0.2               0.8               1.1  1
          170        170             0.15  0.3   0.44  7E-11  3      -20     1                    0.2               0.8               1.1  1
          200        200             0.14  0.28  0.46  7E-11  3      -70     1                    0.2               0.8               1.1  1.2
          200        200             0.14  0.28  0.46  7E-11  3      -70     1                    0.2               0.8               1.1  1.2
          200        200             0.14  0.26  0.36  7E-11  3      -70     1                    0.2               0.8               1.1  1.3
          200        200             0.14  0.26  0.36  7E-11  3      -70     1                    0.2               0.8               1.1  1.4
          200        200             0.14  0.26  0.36  7E-11  3      -70     1                    0.2               0.8               1.1  1.5
          200        200             0.14  0.26  0.36  7E-11  3      -70     1                    0.2               0.8               1.1  1.6
      SoluteManager
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