Simulations: Version=201
  Memo
    EXP 1 and 2 are Kaur (USA)

    EXP 3 is Tian (China)

    Kaur et al., 2017. https://doi.org/10.2134/agronj2016.07.0411

    Kaur et al., 2020. https://doi.org/10.3390/agronomy10030378

    Tian et al., 2020, https://doi.org/10.1016/j.eja.2020.126054
  DataStore
    ExcelInput: FileNames=[obs data.xlsx, Obs.xlsx]; SheetNames=[obsdata, maize, TianObs]
    PredictedObserved: PredictedTableName=ReportHarvest; ObservedTableName=TianObs; FieldNameUsedForMatch=SimulationName; FieldName2UsedForMatch=Clock.Today.Year; AllColumns=true
    PredictedObserved PredictedObservedKaur: PredictedTableName=Report_Harvest; ObservedTableName=obsdata; FieldNameUsedForMatch=SimulationName; FieldName2UsedForMatch=Year; AllColumns=true
  Folder Replacements
    Report Report_Harvest: EventNames=[Maize].Harvesting
      VariableNames:
        [Clock].Today.Year as Year
        [Maize].SowingDate as SowingDate
        [Maize].Phenology.FloweringDAS as DTF
        [Maize].Phenology.MaturityDAS as DTM
        [Maize].Grain.Wt * 10 as Yield_kgha
        [Maize].Grain.N * 10 as GrainN_kgha
        [Maize].Grain.Wt * 10 * 0.0159/0.85 as Yield_buac
        [Maize].Grain.Wt/([Maize].AboveGround.Wt+0.00001) as HI
        [Maize].Grain.N/([Maize].AboveGround.N+0.00001) as NHI
        [Maize].AboveGround.Wt * 10 as Biomass_kgha
        [Maize].AboveGround.N * 10 as BiomassN_kgha
        (([Maize].AboveGround.Wt) - ([Maize].Grain.Wt))*10 as StoverDM_kgha
        (([Maize].AboveGround.N) - ([Maize].Grain.N))*10 as StoverN_kgha
        [Maize].LAI
        Divide (GrainN_kgha, Yield_kgha)*100 as GrainN_conc
        Divide (StoverN_kgha, StoverDM_kgha)*100 as StoverN_conc
        [Maize].Population
        [Maize].Grain.Size * 1000 as GrainSize_mg
        [Maize].Grain.Number as GrainNumber_m2
        sum([Soil].NO3.kgha[1:5]) as NO3_harvest_0to30cm
        sum([Soil].NO3.kgha[6:11]) as NO3_harvest_30to150cm
        //sum of [Swim].FlowNO3[11] from [Maize].Sowing to [Maize].Harvesting as GS_leaching_150cm
        [NO3].Flow[11] from [Maize].Sowing to [Maize].Harvesting as GS_leaching_150cm
        sum of sum([Soil].Nutrient.N2Oatm) from [Maize].Sowing to [Maize].Harvesting as GS_N20
        sum of sum([Soil].Nutrient.DenitrifiedN) from [Maize].Sowing to [Maize].Harvesting as GS_Denitrification
        sum of [Fertiliser].NitrogenApplied from [Maize].Sowing to [Maize].Harvesting as N_fertilizer
        sum of sum([Soil].Nutrient.MineralisedN + [SurfaceOrganicMatter].SurfaceResidue.Decomposition.MineralisedN) from [Maize].Sowing to [Maize].Harvesting as GS_NetNMineralization
        sum of [Irrigation].IrrigationApplied from [Maize].Sowing to [Maize].Harvesting as TotalIrrigation
        [Structure].FinalLeafNumber
        [Structure].AllLeavesAppeared
        //[Maize].Grain.NConc as GrainN_conc  not working at harvest
    Report Report_Day: EventNames=[Clock].DoReport
      VariableNames:
        [Clock].Today
        [Maize].Grain.Wt * 10 * 1.15 as Yield_kgha
        [Maize].Grain.Wt * 10 * 0.0159/0.85 as Yield_buac
        [Maize].AboveGround.Wt * 10 as Biomass_kgha
        [Maize].AboveGround.N * 10 as BiomassN_kgha
        [Maize].LAI
        Divide (GrainN_kgha, Yield_kgha)*100 as GrainN_conc
        Divide (StoverN_kgha, StoverDM_kgha)*100 as StoverN_conc
        [Maize].Population
        [Maize].Grain.Size * 1000 as GrainSize_mg
        [Maize].Grain.Number as GrainNumber_m2
        sum([Soil].NO3.kgha[1:5]) as NO3_0to30cm
        sum of [Fertiliser].NitrogenApplied from [Maize].Sowing to [Maize].Harvesting as N_fertilizer
        sum of sum([Soil].Nutrient.MineralisedN + [SurfaceOrganicMatter].SurfaceResidue.Decomposition.MineralisedN) from [Maize].Sowing to [Maize].Harvesting as GS_NetNMineralization
        sum of [Irrigation].IrrigationApplied from [Maize].Sowing to [Maize].Harvesting as TotalIrrigation
        [Structure].FinalLeafNumber
        [Structure].AllLeavesAppeared
        [Maize].Phenology.CurrentStageName
        [Weather].MaxT
        [Weather].MinT
        [Weather].Radn
        [Weather].Rain
        [Leaf].Photosynthesis.FW.Excess.PersistentReduction
        [Leaf].Photosynthesis.FW.Excess.Today
        [Leaf].Transpiration
        [Maize].Leaf.Photosynthesis.FW.Deficient
        [Maize].CumulativeExcessWaterStress
        [Root].WetRootFraction
        [Root].Depth
        [Swim3].SW[1]
        [Swim3].SW[3]
        [Swim3].Es
        [Swim3].WaterTable
        [Leaf].Photosynthesis.RueAct
        [Swim3].Pond
        [Swim3].Runoff
        [Swim3].Drainage
        [Swim3].SubsurfaceDrain
        [Irrigation].IrrigationApplied
        [Leaf].Transpiration + [Swim3].Es as evapotranspiration
        ((sum([Swim3].SWmm) - sum([Soil].Physical.LL15mm)) / (sum([Soil].Physical.SATmm) -  sum([Soil].Physical.LL15mm))) as SWRatio
    Report ReportHarvest: EventNames=[Maize].Harvesting
      VariableNames:
        [Clock].Today
        [Clock].Today.Year
        [Maize].Phenology.CurrentStageName
        [Maize].AboveGround.Wt*10 as Biomass
        [Maize].Grain.Wt
        [Maize].Grain.Number
        [Maize].Grain.Size
    Report: EventNames=[Clock].EndOfDay
      VariableNames:
        [Clock].Today
        [Maize].DaysAfterSowing
        [Maize].Phenology.BBCH.Stage
        [Maize].Phenology.CurrentStageName
        [Maize].AboveGround.Wt*10 as Biomass
        [Maize].Leaf.Photosynthesis.FW.Excess
        [Maize].Grain.Total.Wt*10 as Yield
        [Maize].Root.WetRootFraction
        [Maize].Leaf.Transpiration
        [Maize].Root.Depth
        [Maize].Leaf.Photosynthesis.RUEAct
        [Maize].Stem.Wt
        [Maize].Rachis.Wt
        [Maize].Leaf.Wt
        [Maize].Leaf.LAI
        [Maize].Husk.Wt
        [Maize].Root.Wt
        [Grain].Number
        [Leaf].AppearedCohortNo
        [Leaf].ApexNum
        [Swim3].watertable
        sum([Swim3].SWmm[1:3]) as SW_030cm
        sum([Swim3].SWmm[4:12]) as SW_3060cm
        sum([Swim3].SWmm[13:24]) as SW_60120cm
        sum([Swim3].SWmm[1:24]) as SW_0120cm
        sum([Soil].Physical.DULmm[1:3]) as DUL_030cm
        sum([Soil].Physical.DULmm[4:12]) as DUL_3060cm
        sum([Soil].Physical.DULmm[13:24]) as DUL_60120cm
        sum([Soil].Physical.DULmm[1:24]) as DUL_0120cm
        sum([Soil].Physical.SATmm[1:3]) as SAT_030cm
        sum([Soil].Physical.SATmm[4:12]) as SAT_3060cm
        sum([Soil].Physical.SATmm[13:24]) as SAT_60120cm
        sum([Soil].Physical.SATmm[1:24]) as SAT_0120cm
        [Swim3].Pond
        [Swim3].Drainage
        [Swim3].Es
        [Swim3].Infiltration
        [Swim3].Runoff
        [Swim3].SubsurfaceDrain
        [Swim3].WaterTable
        [Weather].Rain
        [Irrigation].IrrigationApplied
        ((sum([Swim3].SWmm) - sum([Soil].Physical.LL15mm)) / (sum([Soil].Physical.SATmm) -  sum([Soil].Physical.LL15mm))) as SWRatio
        [AutomaticIrrigationSat].Script.WaterDeficit
        sum of [Maize].Root.WetRootFraction from [Maize].Sowing to [Maize].Harvesting as WRF_GS_Sum
        sum of (1 - [Maize].Leaf.Photosynthesis.FW.Excess) from [Maize].Sowing to [Maize].Harvesting as FOX_GS_Sum
        sum of (1 - [Maize].Leaf.Photosynthesis.FW.Excess.Today) from [Maize].Sowing to [Maize].Harvesting as FOXToday_GS_Sum
    Plant Maize: PlantType=Maize
      Memo Introduction
        _Brown, H.E., Teixeira, E.I., Huth, N.I. and Holzworth, D.P._
      OrganArbitrator Arbitrator
        BiomassTypeArbitrator DMArbitration
          Folder PotentialPartitioningMethods
            ReallocationMethod
            AllocateFixationMethod
            RetranslocationMethod
            SendPotentialDMAllocationsMethod
          Folder AllocationMethods
            NutrientConstrainedAllocationMethod
            DryMatterAllocationsMethod
          RelativeAllocation ArbitrationMethod
        BiomassTypeArbitrator NArbitration
          Folder PotentialPartitioningMethods
            ReallocationMethod
          Folder ActualPartitioningMethods
            AllocateFixationMethod
            RetranslocationMethod
          Folder AllocationMethods
            NitrogenAllocationsMethod
          RelativeAllocation ArbitrationMethod
          AllocateUptakesMethod
        WaterUptakeMethod
        NitrogenUptakeMethod
      Phenology
        MultiplyFunction ThermalTime
          SubDailyInterpolation BaseThermalTime: agregationMethod=0
            XYPairs Response: X=[0, 18, 26, 34, 44]; Y=[0, 10, 18, 26, 0]
            ThreeHourAirTemperature InterpolationMethod
        GerminatingPhase Germinating: Start=Sowing; End=Germination; IsEmerged=false
          Constant MinSoilTemperature: FixedValue=0
        EmergingPhase Emerging: Start=Germination; End=Emergence; IsEmerged=false; TTForTimeStep=0
          VariableReference ThermalTime: VariableName=[Phenology].ThermalTime
          AddFunction Target
            Constant ShootLag: FixedValue=55
            MultiplyFunction DepthxRate
              VariableReference SowingDepth: VariableName=[Plant].SowingData.Depth
              Constant ShootRate: FixedValue=0.6
        GenericPhase Juvenile: Start=Emergence; End=EndJuvenile; IsEmerged=true
          Constant Target: FixedValue=200; Units=deg day
          VariableReference Progression: VariableName=[Phenology].ThermalTime
        GenericPhase Photosensitive: Start=EndJuvenile; End=FloralInitiation; IsEmerged=true
          VariableReference Progression: VariableName=[Phenology].ThermalTime
          LinearInterpolationFunction Target
            Memo
              The photoperiod is likely to vary with individual maize cultivars.  Therefore, the response shown here is indicative only.  See the descriptions of individual cultivars for more detail on photoperiod responses used by the maize model.
            XYPairs: X=[0, 12.5, 24]; Y=[0, 0, 10]
            VariableReference XValue: VariableName=[Phenology].Photoperiod
        LeafAppearancePhase LeafAppearance: Start=FloralInitiation; End=FlagLeaf; IsEmerged=true
          VariableReference ThermalTime: VariableName=[Phenology].ThermalTime
          VariableReference FinalLeafNumber: VariableName=[Structure].FinalLeafNumber
          ExpressionFunction LeafNumber
            Expression=[Leaf].ExpandedCohortNo + [Leaf].NextExpandingLeafProportion
          VariableReference FullyExpandedLeafNo: VariableName=[Leaf].ExpandedCohortNo
          VariableReference InitialisedLeafNumber: VariableName=[Leaf].InitialisedCohortNo
        GenericPhase FlagLeafToFlowering: Start=FlagLeaf; End=Flowering; IsEmerged=true
          Constant Target: FixedValue=50; Units=deg day
          VariableReference Progression: VariableName=[Phenology].ThermalTime
        GenericPhase FloweringToGrainFilling: Start=Flowering; End=StartGrainFill; IsEmerged=true
          Constant Target: FixedValue=120; Units=deg day
          VariableReference Progression: VariableName=[Phenology].ThermalTime
        GenericPhase GrainFilling: Start=StartGrainFill; End=EndGrainFill; IsEmerged=true
          Constant Target: FixedValue=550; Units=deg day
          VariableReference Progression: VariableName=[Phenology].ThermalTime
        GenericPhase Maturing: Start=EndGrainFill; End=Maturity; IsEmerged=true
          Constant Target: FixedValue=10; Units=deg day
          VariableReference Progression: VariableName=[Phenology].ThermalTime
        GenericPhase MaturityToHarvestRipe: Start=Maturity; End=HarvestRipe; IsEmerged=true
          Constant Target: FixedValue=10; Units=deg day
          VariableReference Progression: VariableName=[Phenology].ThermalTime
        EndPhase ReadyForHarvesting: Start=HarvestRipe; End=Unused; IsEmerged=true
          VariableReference ThermalTime: VariableName=[Phenology].ThermalTime
        PhotoperiodFunction Photoperiod: Twilight=-6; DayLength=0
        OnEventFunction FloweringDAS: SetEvent=Flowering; ReSetEvent=never
          Memo
            A function is used to provide flowering date as days after sowing(DAS).
          Constant PreEventValue: FixedValue=0
          VariableReference PostEventValue: VariableName=[Plant].DaysAfterSowing
        OnEventFunction MaturityDAS: SetEvent=Maturity; ReSetEvent=never
          Memo
            A function is used to provide maturity date as days after sowing(DAS).
          Constant PreEventValue: FixedValue=0
          VariableReference PostEventValue: VariableName=[Plant].DaysAfterSowing
        OnEventFunction EmergenceDAS: SetEvent=Emergence; ReSetEvent=never
          Memo
            A function is used to provide maturity date as days after sowing(DAS).
          Constant PreEventValue: FixedValue=0
          VariableReference PostEventValue: VariableName=[Plant].DaysAfterSowing
        OnEventFunction HarvestDAS: SetEvent=HarvestRipe; ReSetEvent=never
          Memo
            A function is used to provide maturity date as days after sowing(DAS).
          Constant PreEventValue: FixedValue=0
          VariableReference PostEventValue: VariableName=[Plant].DaysAfterSowing
        BBCH
      Structure: CohortInitialisationStage=Germination; LeafInitialisationStage=Emergence
        Memo
          Though tillering is common in some maize varieties under certain agronomic conditions, no tillering is accounted for within this model.  Therefore all branching has been parameterised out of the current maize model.
        Constant StemSenescenceAge: FixedValue=0
        VariableReference ThermalTime: VariableName=[Phenology].ThermalTime
        HeightFunction HeightModel
          LinearInterpolationFunction PotentialHeight
            XYPairs: X=[3, 4, 5, 6]; Y=[20, 400, 450, 1700]
            VariableReference XValue: VariableName=[Phenology].Stage
          LinearInterpolationFunction WaterStress
            XYPairs: X=[0, 0.6]; Y=[0, 1]
            VariableReference XValue: VariableName=[Maize].Leaf.Fw
        Constant BranchingRate: FixedValue=0
        AddFunction BranchMortality
          Constant ShadeInducedBranchMortality: FixedValue=0
          Constant DroughtInducedBranchMortality: FixedValue=0
        Constant zFinalLeafNumber: FixedValue=15
        HoldFunction FinalLeafNumber: WhenToHold=FloralInitiation
          AddFunction ValueToHold
            Constant PrimordiaAtEmergence: FixedValue=6
            DivideFunction PrimordiaDuringJuvenilePhase
              AddFunction
                VariableReference JuvenilePhaseDuration: VariableName=[Phenology].Juvenile.Target
                VariableReference PhotoSensitivePhaseDuration: VariableName=[Phenology].Photosensitive.Target
              PhaseLookup MeanPlastochron
                PhaseLookupValue PreEmerg: Start=Germination; End=Emergence
                  Constant: FixedValue=15
                PhaseLookupValue PostEmerg: Start=Emergence; End=FlagLeaf
                  DivideFunction MeanPlastochron
                    AccumulateFunction AccumulatedPlastochron: StartStageName=Emergence; EndStageName=FloralInitiation; FractionRemovedOnCut=0; FractionRemovedOnHarvest=0; FractionRemovedOnGraze=0; FractionRemovedOnPrune=0
                      MultiplyFunction Plastochron
                        VariableReference Phyllochron: VariableName=[Structure].Phyllochron
                        Constant LeafTipsPerPrimordia: FixedValue=0.5
                    AccumulateFunction Days: StartStageName=Emergence; EndStageName=FloralInitiation; FractionRemovedOnCut=0; FractionRemovedOnHarvest=0; FractionRemovedOnGraze=0; FractionRemovedOnPrune=0
                      Constant: FixedValue=1
        MultiplyFunction Phyllochron
          PhaseLookup BasePhyllochron
            PhaseLookupValue Phyllochron: Start=Emergence; End=FlagLeaf
              LinearInterpolationFunction Phyllochron
                XYPairs: X=[1, 3.4, 4]; Y=[30, 30, 42]
                VariableReference XValue: VariableName=[Structure].LeafTipsAppeared
          LinearInterpolationFunction FOXphyllo
            XYPairs: X=[0, 5, 10]; Y=[1, 1, 1]
            VariableReference XValue: VariableName=[CumulativeExcessWaterStress]
      ReproductiveOrgan Grain: GrowthRespiration=0; MaintenanceRespiration=0
        Biomass Live
        Biomass Dead
        Constant DMConversionEfficiency: FixedValue=1
        Constant RemobilisationCost: FixedValue=0
        Constant InitialGrainProportion: FixedValue=0.05
        MultiplyFunction MaximumPotentialGrainSize
          Constant PotentialGrainSize: FixedValue=0.3; Units=g
          LinearInterpolationFunction FOXgs
            XYPairs: X=[0, 5, 10]; Y=[1, 1, 1]
            VariableReference XValue: VariableName=[CumulativeExcessWaterStress]
        MultiplyFunction MaximumGrainsPerCob
          Constant PotentialMaximumGrainsPerCob: FixedValue=700; Units=number
          LinearInterpolationFunction FOXgn
            XYPairs: X=[0, 5, 10]; Y=[1, 1, 1]
            VariableReference XValue: VariableName=[CumulativeExcessWaterStress]
        PhaseLookup DMDemandFunction
          PhaseLookupValue InitialPhase: Start=Flowering; End=StartGrainFill
            FillingRateFunction
              VariableReference NumberFunction: VariableName=[Grain].NumberFunction
              VariableReference FillingDuration: VariableName=[Phenology].FloweringToGrainFilling.Target
              VariableReference ThermalTime: VariableName=[Phenology].ThermalTime
              MultiplyFunction PotentialSizeIncrement
                VariableReference InitialProportion: VariableName=[Grain].InitialGrainProportion
                VariableReference MaximumSize: VariableName=[Grain].MaximumPotentialGrainSize
          PhaseLookupValue LinearPhase: Start=StartGrainFill; End=EndGrainFill
            FillingRateFunction
              VariableReference NumberFunction: VariableName=[Grain].NumberFunction
              VariableReference FillingDuration: VariableName=[Phenology].GrainFilling.Target
              VariableReference ThermalTime: VariableName=[Phenology].ThermalTime
              MultiplyFunction PotentialSizeIncrement
                SubtractFunction ProportionLinearPhase
                  Constant One: FixedValue=1
                  VariableReference InitialProportion: VariableName=[Grain].InitialGrainProportion
                VariableReference MaximumSize: VariableName=[Grain].MaximumPotentialGrainSize
        Constant MinimumNConc: FixedValue=0.008; Units=g/g
        PhaseLookup MaximumNConc
          PhaseLookupValue InitialPhase: Start=Flowering; End=StartGrainFill
            Constant InitialNconc: FixedValue=0.05
          PhaseLookupValue LinearPhase: Start=StartGrainFill; End=EndGrainFill
            Constant FinalNconc: FixedValue=0.013
        Constant WaterContent: FixedValue=0.12; Units=g/g
        PhaseLookup NFillingRate
          PhaseLookupValue GrainFilling: Start=Flowering; End=EndGrainFill
            FillingRateFunction
              VariableReference NumberFunction: VariableName=[Grain].NumberFunction
              AddFunction FillingDuration
                VariableReference FloweringToGrainFilling: VariableName=[Phenology].FloweringToGrainFilling.Target
                VariableReference GrainFilling: VariableName=[Phenology].GrainFilling.Target
              VariableReference ThermalTime: VariableName=[Phenology].ThermalTime
              MultiplyFunction PotentialSizeIncrement
                VariableReference MaximumFinalNConc: VariableName=[Grain].MaximumNConc.LinearPhase.FinalNconc
                VariableReference MaximumSize: VariableName=[Grain].MaximumPotentialGrainSize
        MultiplyFunction NumberFunction
          VariableReference PotentialGrainNumber: VariableName=[MaximumGrainsPerCob]
          LinearInterpolationFunction GrowthRateFactor
            XYPairs: X=[0.55, 3.3, 6.6, 10]; Y=[0, 0.6, 1, 1]
            VariableReference XValue: VariableName=[GrowthRateGrainDevelopment]
          VariableReference Population: VariableName=[Maize].Population
          LinearInterpolationFunction FOXnum
            XYPairs: X=[0, 5, 10]; Y=[1, 1, 1]
            VariableReference XValue: VariableName=[CumulativeExcessWaterStress]
        ExpressionFunction YieldBuPerAcre: Expression=[Grain].Live.Wt * 10 * 56 * 0.4536 * 2.471
        AccumulateFunction GrowthGrainDevelopment: StartStageName=FlagLeaf; EndStageName=StartGrainFill; FractionRemovedOnCut=0; FractionRemovedOnHarvest=0; FractionRemovedOnGraze=0; FractionRemovedOnPrune=0
          VariableReference DailyBiomassProduction: VariableName=[Arbitrator].DM.TotalFixationSupply
        AccumulateFunction DaysGrainDevelopment: StartStageName=FlagLeaf; EndStageName=StartGrainFill; FractionRemovedOnCut=0; FractionRemovedOnHarvest=0; FractionRemovedOnGraze=0; FractionRemovedOnPrune=0
          Constant LenthOfADay: FixedValue=1; Units=days/day
        DivideFunction GrowthRateGrainDevelopment
          VariableReference AccumulatedGrowth: VariableName=[GrowthGrainDevelopment]
          VariableReference GrowthDuration: VariableName=[DaysGrainDevelopment]
          VariableReference Population: VariableName=[Maize].Population
        BiomassRemoval BiomassRemovalDefaults: HarvestFractionLiveToRemove=1; HarvestFractionDeadToRemove=0; HarvestFractionLiveToResidue=0; HarvestFractionDeadToResidue=0
        Constant CarbonConcentration: FixedValue=0.4
        NutrientPoolFunctions DMDemandPriorityFactors
          Constant Structural: FixedValue=1
          Constant Metabolic: FixedValue=1
          Constant Storage: FixedValue=1
        NutrientPoolFunctions NDemandPriorityFactors: same as Replacements.Maize.Grain.DMDemandPriorityFactors
      Root: GrowthRespiration=0; MaintenanceRespiration=0
        RootShapeCylinder RootShape
        LinearInterpolationFunction KLModifier
          Memo
            The parameter KL is is described by Meinke et al (1993) to combine elements of soil conductivity (K) with root length (L) in determining root water uptake.  Peake et al (2013) demonstrated that in maize KL varied with plant population through impacts on root length density.  Here we adjust KL linearly with plant population.
          XYPairs: X=[0, 10]; Y=[1, 1]
          VariableReference XValue: VariableName=[Maize].Population
        Constant DMConversionEfficiency: FixedValue=1
        Constant RemobilisationCost: FixedValue=0
        Constant SoilWaterEffect: FixedValue=1
          Memo
            No effect of soil water content on root growth is currently captured in the model.
        Constant MaxDailyNUptake: FixedValue=20; Units=g/m2/d
          Memo
            Maximum daily N uptake is set to an arbitrarily high value.
        Constant SenescenceRate: FixedValue=0.005; Units=/d
          Memo
            Jones and Kiniry (1986) used a constant root senescence fraction in the CERES-Maize model.
        Constant MaximumRootDepth: FixedValue=1000000
        Constant MaximumNConc: FixedValue=0.01; Units=g/g
        Constant MinimumNConc: FixedValue=0.01; Units=g/g
        MultiplyFunction RootFrontVelocity
          PhaseLookup PotentialRootFrontVelocity
            Memo
              [Hammer_etal_2009] used a constant extraction front velocity of 2.5cm per day in their analysis of historical maize yield trends in the US corn belt.
            PhaseLookupValue PreFlowering: Start=Germination; End=Flowering
              Constant RootFrontVelocity: FixedValue=25; Units=mm/d
            PhaseLookupValue PostFlowering: Start=Flowering; End=Maturity
              Constant RootFrontVelocity: FixedValue=0; Units=mm/d
          WeightedTemperatureFunction TemperatureFactor: MaximumTemperatureWeighting=0.5
            XYPairs: X=[0, 8, 15, 35, 50]; Y=[0, 0, 1, 1, 0]
          LinearInterpolationFunction WaterFactor
            SoilWaterScale: LLModel=1
            XYPairs: X=[0, 0.25, 1]; Y=[0, 1, 1]
            VariableReference XValue: VariableName=[SoilWaterScale]
          LinearInterpolationFunction AFPSFactor
            XYPairs: X=[0, 0.03, 1]; Y=[1, 1, 1]
            VariableReference XValue: VariableName=[Root].AirFilledPoreSpace
          Constant RootDepthStressFactor: FixedValue=1
        PhaseLookupValue NitrogenDemandSwitch: Start=Germination; End=Maturity
          Constant: FixedValue=1
        BiomassRemoval BiomassRemovalDefaults: HarvestFractionLiveToRemove=0; HarvestFractionDeadToRemove=0; HarvestFractionLiveToResidue=0.2; HarvestFractionDeadToResidue=0
        Constant SpecificRootLength: FixedValue=40; Units=m/g
        Constant KNO3: FixedValue=0.03
        Constant KNH4: FixedValue=0.02
        LinearInterpolationFunction NUptakeSWFactor
          XYPairs: X=[0, 1]; Y=[0, 1]
          VariableReference XValue: VariableName=[Root].RWC
        Constant MaintenanceRespirationFunction: FixedValue=0
        Constant CarbonConcentration: FixedValue=0.4
        NutrientDemandFunctions DMDemands
          MultiplyFunction Structural
            PartitionFractionDemandFunction DMDemandFunction
              LinearInterpolationFunction PartitionFraction
                XYPairs: X=[0, 2.99, 3, 6, 7]; Y=[0, 0, 0.2, 0.2, 0]
                VariableReference XValue: VariableName=[Phenology].Stage
            Constant StructuralFraction: FixedValue=1
          Constant Metabolic: FixedValue=0
          StorageDMDemandFunction Storage
            SubtractFunction StorageFraction
              Constant One: FixedValue=1
              VariableReference StructuralFraction: VariableName=[Root].DMDemands.Structural.StructuralFraction
          Constant QStructuralPriority: FixedValue=1
          Constant QMetabolicPriority: FixedValue=1
          Constant QStoragePriority: FixedValue=1
        NutrientDemandFunctions NDemands
          MultiplyFunction Structural
            VariableReference MinNconc: VariableName=[Root].minimumNconc
            VariableReference PotentialDMAllocation: VariableName=[Root].potentialDMAllocation.Structural
          MultiplyFunction Metabolic
            SubtractFunction MetabolicNconc
              VariableReference CritNconc: VariableName=[Root].criticalNConc
              VariableReference MinNconc: VariableName=[Root].minimumNconc
            VariableReference PotentialDMAllocation: VariableName=[Root].potentialDMAllocation.Structural
          StorageNDemandFunction Storage
            VariableReference NitrogenDemandSwitch: VariableName=[Root].nitrogenDemandSwitch
            VariableReference MaxNconc: VariableName=[Root].maximumNconc
          Constant QStructuralPriority: FixedValue=1
          Constant QMetabolicPriority: FixedValue=1
          Constant QStoragePriority: FixedValue=1
        VariableReference CriticalNConc: VariableName=[Root].MinimumNConc
        NutrientPoolFunctions InitialWt
          Constant Structural: FixedValue=0.2; Units=g/plant
          Constant Metabolic: FixedValue=0
          Constant Storage: FixedValue=0
      Leaf: MaxCover=1; Albedo=0.18; Gsmax350=0.009; R50=160; KDead=0.03; MaximumMainStemLeafNumber=30
        zero: CurrentExpandingLeaf, StartFractionExpanded, FractionNextleafExpanded, DeadNodesYesterday, GrowthRespiration, LAI, Depth, Width, PotentialEP, WaterDemand, TipsAtEmergence, CohortsAtInitialisation, FractionDied
        ExpressionFunction CO2internal: Expression=(163 - [IWeather].MeanT)/(5 - 0.1*[IWeather].MeanT)
        DivideFunction StomatalConductanceCO2Modifier
          VariableReference FCO2: VariableName=[Leaf].Photosynthesis.FCO2
          ExpressionFunction RelativeCO2Gradient
            Expression=([IWeather].CO2 - [Leaf].CO2internal)/(350 - [Leaf].CO2internal)
        LeafCohort InitialLeaves[1]: Rank=1; Area=380
          zero: NReallocationFactor, DMReallocationFactor, NRetranslocationFactor, DMRetranslocationFactor, ShadeInducedSenRate, SenescedFrac, DeltaPotentialArea, DeltaStressConstrainedArea, DeltaCarbonConstrainedArea, PotentialStructuralDMAllocation, PotentialMetabolicDMAllocation, MetabolicNReallocated, MetabolicWtReallocated, StorageNReallocated, StorageWtReallocated, MetabolicNRetranslocated, StorageNRetrasnlocated, DMRetranslocated, MetabolicNAllocation, StructuralDMAllocation, MetabolicDMAllocation
        LeafCohort InitialLeaves[2]: Rank=2
          zero: NReallocationFactor, DMReallocationFactor, NRetranslocationFactor, DMRetranslocationFactor, ShadeInducedSenRate, SenescedFrac, DeltaPotentialArea, DeltaStressConstrainedArea, DeltaCarbonConstrainedArea, PotentialStructuralDMAllocation, PotentialMetabolicDMAllocation, MetabolicNReallocated, MetabolicWtReallocated, StorageNReallocated, StorageWtReallocated, MetabolicNRetranslocated, StorageNRetrasnlocated, DMRetranslocated, MetabolicNAllocation, StructuralDMAllocation, MetabolicDMAllocation, Area
        LeafCohortParameters CohortParameters: ExpansionStressValue=0; CellDivisionStressValue=0; LagAccelerationValue=0; SenescenceAccelerationValue=0; ShadeInducedSenescenceRateValue=0; SenessingLeafRelativeSizeValue=0
          Constant DMReallocationFactor: FixedValue=1
          Constant RemobilisationCost: FixedValue=0
          Constant LeafSizeShapeParameter: FixedValue=0.01
          Constant MaintenanceRespirationFunction: FixedValue=0
          Constant SenessingLeafRelativeSize: FixedValue=1; Units=0-1
          BellCurveFunction MaxArea
            Memo
              Potential leaf area is calculated from leaf number using the approach of Keating and Wafula (1992).
              Individual leaf size is described using a bell-shaped curve, the parameters of which are derived from final leaf number.
            MultiplyFunction LargestLeafPosition
              VariableReference FinalLeafNumber: VariableName=[Structure].FinalLeafNumber
              Constant RelativePositionOfLargestLeaf: FixedValue=0.67
            LinearInterpolationFunction AreaMax
              XYPairs: X=[0, 2, 7, 12, 17, 22]; Y=[32530, 39259, 49659, 60000, 75000, 90000]
              VariableReference XValue: VariableName=[Structure].FinalLeafNumber
            LinearInterpolationFunction Breadth
              XYPairs: X=[5, 10, 15, 20, 25]; Y=[-0.377, -0.144, -0.059, -0.027, -0.016]
              VariableReference XValue: VariableName=[Structure].FinalLeafNumber
            Constant Skewness: FixedValue=0.00025
          Constant NReallocationFactor: FixedValue=1
          Constant NRetranslocationFactor: FixedValue=0
          Constant DMRetranslocationFactor: FixedValue=0.5
          LinearInterpolationFunction CellDivisionStress
            XYPairs: X=[0.9, 1]; Y=[1, 1]
            VariableReference XValue: VariableName=[Maize].Leaf.Fw
          MinimumFunction ExpansionStress
            LinearInterpolationFunction WaterStressEffect
              XYPairs: X=[0, 0.9, 1.3]; Y=[0, 1, 1]
              VariableReference XValue: VariableName=[Root].WaterTensionFactor
            LinearInterpolationFunction TemperatureEffect
              XYPairs: X=[0, 12, 14]; Y=[0, 1, 1]
              VariableReference XValue: VariableName=[IWeather].MeanT
            LinearInterpolationFunction NitrogenStressEffect
              XYPairs: X=[0, 0.5, 1]; Y=[0.1, 0.1, 1]
              VariableReference XValue: VariableName=[Maize].Leaf.Fn
            LinearInterpolationFunction FOXToday
              XYPairs: X=[0, 0.5, 1]; Y=[1, 1, 1]
              VariableReference XValue: VariableName=[Root].WetRootFraction
          LinearInterpolationFunction GrowthDuration
            XYPairs: X=[0, 0.3, 0.5, 1]; Y=[1, 200, 250, 100]
            VariableReference XValue: VariableName=[Structure].RelativeNodeApperance
          LinearInterpolationFunction LagDuration
            XYPairs: X=[0, 0.5, 0.7, 0.8, 1]; Y=[300, 300, 700, 900, 1300]
            VariableReference XValue: VariableName=[Structure].RelativeNodeApperance
          LinearInterpolationFunction SenescenceDuration
            XYPairs: X=[0, 0.3, 0.5]; Y=[150, 150, 350]
            VariableReference XValue: VariableName=[Structure].RelativeNodeApperance
          Constant DetachmentLagDuration: FixedValue=1000000
          Constant DetachmentDuration: FixedValue=1000000
          AddFunction MaximumNConc
            VariableReference CriticalNConc: VariableName=[Leaf].CohortParameters.CriticalNConc
            MultiplyFunction StorageNConc
              LinearInterpolationFunction NonStructuralNConc
                XYPairs: X=[1, 10]; Y=[0.034, 0.01]
                VariableReference XValue: VariableName=[Structure].LeafTipsAppeared
              LinearInterpolationFunction WaterStressEffect
                XYPairs: X=[0.5, 0.95, 1]; Y=[0, 0, 1]
                VariableReference XValue: VariableName=[Root].WaterTensionFactor
          Constant CriticalNConc: FixedValue=0.01; Units=g/g
          Constant MinimumNConc: FixedValue=0.005; Units=g/g
          AddFunction LagAcceleration
            Constant One: FixedValue=1
            MultiplyFunction Stress
              Constant StressResponseCoefficient: FixedValue=2
              LinearInterpolationFunction StressFactor
                XYPairs: X=[0.5, 1]; Y=[1, 0]
                VariableReference XValue: VariableName=[Maize].Leaf.Fw
          AddFunction SenescenceAcceleration
            Constant One: FixedValue=1
            MultiplyFunction Stress
              Constant StressResponseCoefficient: FixedValue=0
              LinearInterpolationFunction StressFactor
                XYPairs: X=[0, 1]; Y=[1, 0]
                VariableReference XValue: VariableName=[Root].WaterTensionFactor
          LinearInterpolationFunction SpecificLeafAreaMax
            XYPairs: X=[1, 9]; Y=[30000, 20000]
            VariableReference XValue: VariableName=[Structure].LeafTipsAppeared
          LinearInterpolationFunction SpecificLeafAreaMin
            XYPairs: X=[1, 9]; Y=[25000, 15000]
            VariableReference XValue: VariableName=[Structure].LeafTipsAppeared
          Constant StructuralFraction: FixedValue=0.3
          Constant StorageFraction: FixedValue=0.1
          LinearInterpolationFunction ShadeInducedSenescenceRate
            XYPairs: X=[0, 0.7, 0.8, 0.96, 0.99]; Y=[0, 0, 0, 0, 0]
            VariableReference XValue: VariableName=[Leaf].CohortCurrentRankCoverAbove
          Constant InitialNConc: FixedValue=0; Units=g/g
          ArrayFunction LagDurationAgeMultiplier: Values=1 1 1
          ArrayFunction SenescenceDurationAgeMultiplier: Values=1 1 1
          ArrayFunction LeafSizeAgeMultiplier: Values=1 1 1 1 1 1 1 1 1 1 1 1
        RUEModel Photosynthesis
          Constant RUE: FixedValue=2
          WeightedTemperatureFunction FT: MaximumTemperatureWeighting=0.75
            XYPairs: X=[0, 8, 15, 35, 50]; Y=[0, 0, 1, 1, 0]
          LinearInterpolationFunction FVPD
            XYPairs: X=[0, 10, 50]; Y=[1, 1, 1]
            VariableReference XValue: VariableName=[Leaf].Photosynthesis.VPD
          LinearInterpolationFunction FN
            XYPairs: X=[0, 1]; Y=[0.3, 1]
            VariableReference XValue: VariableName=[Leaf].Fn
          MinimumFunction FW
            LinearInterpolationFunction Deficient
              XYPairs: X=[0, 0.3]; Y=[0, 1]
              VariableReference XValue: VariableName=[Leaf].Fw
            MinimumFunction Excess
              PhaseLookup Today
                PhaseLookupValue SowToFloralInitiation: Start=Sowing; End=FloralInitiation
                  LinearInterpolationFunction EarlySeason
                    XYPairs: X=[0, 0.9, 1]; Y=[1, 1, 1]
                    VariableReference XValue: VariableName=[Root].WetRootFraction
                PhaseLookupValue FloralInitiationToStartGrainFill: Start=FloralInitiation; End=StartGrainFill
                  LinearInterpolationFunction MidSeason
                    XYPairs: X=[0, 0.9, 1]; Y=[1, 1, 1]
                    VariableReference XValue: VariableName=[Root].WetRootFraction
                PhaseLookupValue StartGFToEndCrop: Start=StartGrainFill; End=Unused
                  LinearInterpolationFunction LateSeason
                    XYPairs: X=[0, 0.9, 1]; Y=[1, 1, 1]
                    VariableReference XValue: VariableName=[Root].WetRootFraction
              ExponentialFunction PersistentReduction: A=0; B=1; C=-0.1
                MovingSumFunction: NumberOfDays=25
                  ExpressionFunction: Expression=1 - [Leaf].Photosynthesis.FW.Excess.Today
          RUECO2Function FCO2: PhotosyntheticPathway=C4
          VariableReference RadnInt: VariableName=[Leaf].RadiationIntercepted
        MultiplyFunction ExtinctionCoeff
          Memo
            Extinction coefficient is specified in terms of a potential extinction coefficient which is then discounted during periods of water stress to account for the impact of leaf curling.
          LinearInterpolationFunction PotentialExtinctionCoeff
            XYPairs: X=[0.2, 0.5, 1]; Y=[0.7, 0.5, 0.4]
            VariableReference XValue: VariableName=[Maize].SowingData.RowSpacing
          LinearInterpolationFunction WaterStressImpact
            XYPairs: X=[0, 0.7]; Y=[0.5, 1]
            VariableReference XValue: VariableName=[Maize].Leaf.Fw
          LinearInterpolationFunction FOXk
            XYPairs: X=[0, 5, 10]; Y=[1, 1, 1]
            VariableReference XValue: VariableName=[CumulativeExcessWaterStress]
        LinearInterpolationFunction FrostFraction
          XYPairs: X=[-2, 2]; Y=[1, 0]
          VariableReference XValue: VariableName=[Weather].MinT
        VariableReference ThermalTime: VariableName=[Phenology].ThermalTime
        Constant RemobilisationCost: FixedValue=0
        MinimumFunction FRGRFunction
          VariableReference FT: VariableName=[Leaf].Photosynthesis.FT
          VariableReference FN: VariableName=[Leaf].Photosynthesis.FN
          VariableReference FVPD: VariableName=[Leaf].Photosynthesis.FVPD
        Constant StructuralFraction: FixedValue=0.7
        Constant DMConversionEfficiency: FixedValue=1; Units=0-1
        BiomassRemoval BiomassRemovalDefaults: HarvestFractionLiveToRemove=0; HarvestFractionDeadToRemove=0; HarvestFractionLiveToResidue=0.3; HarvestFractionDeadToResidue=0
        Constant CarbonConcentration: FixedValue=0.4
        Constant WidthFunction: FixedValue=0
        VariableReference DepthFunction: VariableName=[Leaf].Height
        NutrientPoolFunctions DMDemandPriorityFactors: same as Replacements.Maize.Grain.DMDemandPriorityFactors
        NutrientPoolFunctions NDemandPriorityFactors: same as Replacements.Maize.Grain.DMDemandPriorityFactors
      GenericOrgan Husk: IsAboveGround=true
        Constant NReallocationFactor: FixedValue=0
        Constant RemobilisationCost: FixedValue=0
        Constant NRetranslocationFactor: FixedValue=0.1
        Constant MaximumNConc: FixedValue=0.007; Units=g/g
        Constant SenescenceRate: FixedValue=0; Units=/d
        Constant MinimumNConc: FixedValue=0.005; Units=g/g
        Constant DMRetranslocationFactor: FixedValue=0.1
        BiomassRemoval BiomassRemovalDefaults: HarvestFractionLiveToRemove=0.5; HarvestFractionDeadToRemove=0; HarvestFractionLiveToResidue=0.1; HarvestFractionDeadToResidue=0
        Constant DetachmentRateFunction: FixedValue=0; Units=/d
        Constant MaintenanceRespirationFunction: FixedValue=0; Units=0-1
        Constant DMConversionEfficiency: FixedValue=1; Units=0-1
        Constant DMReallocationFactor: FixedValue=0
        VariableReference CriticalNConc: VariableName=[Husk].MinimumNConc
        PhaseLookupValue NitrogenDemandSwitch: Start=Emergence; End=StartGrainFill
          Constant: FixedValue=1
        Constant CarbonConcentration: FixedValue=0.4
        NutrientDemandFunctions DMDemands
          MultiplyFunction Structural
            PopulationBasedDemandFunction DMDemandFunction
              VariableReference ThermalTime: VariableName=[Phenology].ThermalTime
              Constant StartStage: FixedValue=5.5
              Constant GrowthDuration: FixedValue=300
              Constant MaximumOrganWt: FixedValue=25
              VariableReference OrganPopulation: VariableName=[Rachis].CobNumber
              Constant SenescenceRate: FixedValue=0; Units=/d
              LinearInterpolationFunction ExpansionStress2
                XYPairs: X=[0, 0.35]; Y=[0, 1]
                VariableReference XValue: VariableName=[Maize].Leaf.Fw
              MinimumFunction ExpansionStress
                LinearInterpolationFunction WaterStressEffect
                  XYPairs: X=[0.1, 0.7, 1.3]; Y=[0, 1, 1]
                  VariableReference XValue: VariableName=[Root].WaterTensionFactor
                LinearInterpolationFunction TemperatureEffect
                  XYPairs: X=[0, 12, 14]; Y=[0, 1, 1]
                  VariableReference XValue: VariableName=[IWeather].MeanT
                LinearInterpolationFunction NitrogenStressEffect
                  XYPairs: X=[0, 0.5, 1]; Y=[0.1, 0.1, 1]
                  VariableReference XValue: VariableName=[Maize].Leaf.Fn
            PhaseLookup StructuralFraction
              PhaseLookupValue PreStemElongation: Start=Emergence; End=StartGrainFill
                Constant StemFraction: FixedValue=0.5
              PhaseLookupValue StemElongation: Start=StartGrainFill; End=HarvestRipe
                Constant StemFraction: FixedValue=1
          Constant Metabolic: FixedValue=0
          StorageDMDemandFunction Storage
            SubtractFunction StorageFraction
              Constant One: FixedValue=1
              VariableReference StructuralFraction: VariableName=[Husk].DMDemands.Structural.StructuralFraction
          Constant QStructuralPriority: FixedValue=1
          Constant QMetabolicPriority: FixedValue=1
          Constant QStoragePriority: FixedValue=1
        NutrientDemandFunctions NDemands
          MultiplyFunction Structural
            VariableReference MinNconc: VariableName=[Husk].minimumNconc
            VariableReference PotentialDMAllocation: VariableName=[Husk].potentialDMAllocation.Structural
          MultiplyFunction Metabolic
            SubtractFunction MetabolicNconc
              VariableReference CritNconc: VariableName=[Husk].criticalNConc
              VariableReference MinNconc: VariableName=[Husk].minimumNconc
            VariableReference PotentialDMAllocation: VariableName=[Husk].potentialDMAllocation.Structural
          StorageNDemandFunction Storage
            VariableReference NitrogenDemandSwitch: VariableName=[Husk].nitrogenDemandSwitch
            VariableReference MaxNconc: VariableName=[Husk].maximumNconc
          Constant QStructuralPriority: FixedValue=1
          Constant QMetabolicPriority: FixedValue=1
          Constant QStoragePriority: FixedValue=1
        RetranslocateNonStructural RetranslocateNitrogen
        NutrientPoolFunctions InitialWt
          Constant Structural: FixedValue=0; Units=g/m^2
          Constant Metabolic: FixedValue=0
          Constant Storage: FixedValue=0
        Constant Photosynthesis: FixedValue=0
        VariableReference initialNConcFunction: VariableName=[Husk].MinimumNConc
      GenericOrgan Rachis: IsAboveGround=true
        MultiplyFunction CobNumber
          VariableReference StemNumber: VariableName=[Structure].TotalStemPopn
          Constant CobsPerStem: FixedValue=1.1
        DivideFunction CobSize
          VariableReference CobMass: VariableName=[Rachis].Live.Wt
          VariableReference CobNumber: VariableName=[Rachis].CobNumber
        Constant NReallocationFactor: FixedValue=0
        Constant RemobilisationCost: FixedValue=0
        Constant NRetranslocationFactor: FixedValue=0.1
        Constant MaximumNConc: FixedValue=0.008; Units=g/g
        Constant SenescenceRate: FixedValue=0; Units=/d
        Constant MinimumNConc: FixedValue=0.003; Units=g/g
        LinearInterpolationFunction ExpansionStress
          XYPairs: X=[0.1, 0.7]; Y=[0, 1]
          VariableReference XValue: VariableName=[Maize].Leaf.Fw
        BiomassRemoval BiomassRemovalDefaults: HarvestFractionLiveToRemove=0.5; HarvestFractionDeadToRemove=0; HarvestFractionLiveToResidue=0.1; HarvestFractionDeadToResidue=0
        Constant DetachmentRateFunction: FixedValue=0; Units=/d
        Constant MaintenanceRespirationFunction: FixedValue=0; Units=0-1
        Constant DMConversionEfficiency: FixedValue=1; Units=0-1
        Constant DMReallocationFactor: FixedValue=0
        Constant DMRetranslocationFactor: FixedValue=0
        VariableReference CriticalNConc: VariableName=[Rachis].MinimumNConc
        PhaseLookupValue NitrogenDemandSwitch: Start=Emergence; End=StartGrainFill
          Constant: FixedValue=1
        Constant CarbonConcentration: FixedValue=0.4
        NutrientDemandFunctions DMDemands
          MultiplyFunction Structural
            PopulationBasedDemandFunction DMDemandFunction
              VariableReference ThermalTime: VariableName=[Phenology].ThermalTime
              Constant StartStage: FixedValue=5.5
              Constant GrowthDuration: FixedValue=300
              Constant MaximumOrganWt: FixedValue=23
              VariableReference OrganPopulation: VariableName=[Rachis].CobNumber
              MinimumFunction ExpansionStress: same as Replacements.Maize.Husk.DMDemands.Structural.DMDemandFunction.ExpansionStress
            Constant StructuralFraction: FixedValue=1; Units=g/g
          Constant Metabolic: FixedValue=0
          StorageDMDemandFunction Storage
            SubtractFunction StorageFraction
              Constant One: FixedValue=1
              VariableReference StructuralFraction: VariableName=[Rachis].DMDemands.Structural.StructuralFraction
          Constant QStructuralPriority: FixedValue=1
          Constant QMetabolicPriority: FixedValue=1
          Constant QStoragePriority: FixedValue=1
        NutrientDemandFunctions NDemands
          MultiplyFunction Structural
            VariableReference MinNconc: VariableName=[Rachis].minimumNconc
            VariableReference PotentialDMAllocation: VariableName=[Rachis].potentialDMAllocation.Structural
          MultiplyFunction Metabolic
            SubtractFunction MetabolicNconc
              VariableReference CritNconc: VariableName=[Rachis].criticalNConc
              VariableReference MinNconc: VariableName=[Rachis].minimumNconc
            VariableReference PotentialDMAllocation: VariableName=[Rachis].potentialDMAllocation.Structural
          StorageNDemandFunction Storage
            VariableReference NitrogenDemandSwitch: VariableName=[Rachis].nitrogenDemandSwitch
            VariableReference MaxNconc: VariableName=[Rachis].maximumNconc
          Constant QStructuralPriority: FixedValue=1
          Constant QMetabolicPriority: FixedValue=1
          Constant QStoragePriority: FixedValue=1
        RetranslocateNonStructural RetranslocateNitrogen
        NutrientPoolFunctions InitialWt: same as Replacements.Maize.Husk.InitialWt
        Constant Photosynthesis: FixedValue=0
        VariableReference initialNConcFunction: VariableName=[Rachis].MinimumNConc
      GenericOrgan Stem: IsAboveGround=true
        Constant RemobilisationCost: FixedValue=0
        LinearInterpolationFunction MaximumNConc
          XYPairs: X=[0, 0.7, 1]; Y=[0.025, 0.025, 0.005]
          VariableReference XValue: VariableName=[Structure].RelativeNodeApperance
        Constant MinimumNConc: FixedValue=0.004; Units=g/g
        PhaseLookupValue NitrogenDemandSwitch: Start=Emergence; End=StartGrainFill
          Constant: FixedValue=1
        Constant NReallocationFactor: FixedValue=0
        PhaseLookup NRetranslocationFactor
          PhaseLookupValue PreStemElongation: Start=Emergence; End=FlagLeaf
            Constant StemFraction: FixedValue=0
          PhaseLookupValue StemElongation: Start=FlagLeaf; End=HarvestRipe
            Constant NRetranslocationFactor: FixedValue=0.05
        Constant DMRetranslocationFactor: FixedValue=0.1
        BiomassRemoval BiomassRemovalDefaults: HarvestFractionLiveToRemove=0.5; HarvestFractionDeadToRemove=0; HarvestFractionLiveToResidue=0.1; HarvestFractionDeadToResidue=0
        Constant DetachmentRateFunction: FixedValue=0; Units=/d
        Constant SenescenceRate: FixedValue=0; Units=/d
        Constant MaintenanceRespirationFunction: FixedValue=0; Units=0-1
        Constant DMConversionEfficiency: FixedValue=1; Units=0-1
        Constant DMReallocationFactor: FixedValue=0
        AddFunction CriticalNConc
          VariableReference MinimumNConc: VariableName=[Stem].MinimumNConc
          MultiplyFunction MetabolicNConc
            SubtractFunction NonStructuralNConc
              VariableReference MaximumNConc: VariableName=[Stem].MaximumNConc
              VariableReference MinimumNConc: VariableName=[Stem].MinimumNConc
            Constant Proportion: FixedValue=0.2
        Constant CarbonConcentration: FixedValue=0.4
        NutrientDemandFunctions DMDemands
          MultiplyFunction Structural
            PartitionFractionDemandFunction DMDemandFunction
              LinearInterpolationFunction PartitionFraction
                XYPairs: X=[3, 5, 6, 7, 7.0001]; Y=[0.1, 0.1, 1, 1, 0]
                VariableReference XValue: VariableName=[Phenology].Stage
            PhaseLookup StructuralFraction: same as Replacements.Maize.Husk.DMDemands.Structural.StructuralFraction
          Constant Metabolic: FixedValue=0
          StorageDMDemandFunction Storage
            SubtractFunction StorageFraction
              Constant One: FixedValue=1
              VariableReference StructuralFraction: VariableName=[Stem].DMDemands.Structural.StructuralFraction
          Constant QStructuralPriority: FixedValue=1
          Constant QMetabolicPriority: FixedValue=1
          Constant QStoragePriority: FixedValue=1
        NutrientDemandFunctions NDemands
          MultiplyFunction Structural
            VariableReference MinNconc: VariableName=[Stem].minimumNconc
            VariableReference PotentialDMAllocation: VariableName=[Stem].potentialDMAllocation.Structural
          MultiplyFunction Metabolic
            SubtractFunction MetabolicNconc
              VariableReference CritNconc: VariableName=[Stem].criticalNConc
              VariableReference MinNconc: VariableName=[Stem].minimumNconc
            VariableReference PotentialDMAllocation: VariableName=[Stem].potentialDMAllocation.Structural
          StorageNDemandFunction Storage
            VariableReference NitrogenDemandSwitch: VariableName=[Stem].nitrogenDemandSwitch
            VariableReference MaxNconc: VariableName=[Stem].maximumNconc
          Constant QStructuralPriority: FixedValue=1
          Constant QMetabolicPriority: FixedValue=1
          Constant QStoragePriority: FixedValue=1
        RetranslocateNonStructural RetranslocateNitrogen
        NutrientPoolFunctions InitialWt: same as Replacements.Maize.Husk.InitialWt
        Constant Photosynthesis: FixedValue=0
        VariableReference initialNConcFunction: VariableName=[Stem].MinimumNConc
      CompositeBiomass AboveGround: OrganNames=[Leaf, Stem, Husk, Grain, Rachis]; IncludeLive=true; IncludeDead=true
        Memo
          The AboveGround composite biomass object includes all organs occurring above the soil surface to allow output for total dry matter and Nutrient contents, including total structural, non-structural and metabolic pools.
      CompositeBiomass BelowGround: OrganNames=[Root]; IncludeLive=true; IncludeDead=true
        Memo
          The BelowGround composite biomass object includes all root biomass pools to allow output for total dry matter and Nutrient contents, including total structural, non-structural and metabolic pools.
      CompositeBiomass Total: OrganNames=[Leaf, Stem, Husk, Grain, Rachis, Root]; IncludeLive=true; IncludeDead=true
        Memo
          The Total composite biomass object includes all organs (above+below ground) to allow output for total dry matter and Nutrient contents, including total structural, non-structural and metabolic pools.
      CompositeBiomass TotalLive: OrganNames=[Leaf, Stem, Husk, Grain, Rachis, Root]; IncludeLive=true; IncludeDead=false
        Memo
          The TotalLive composite biomass object includes the Live pools of all organs (above+below ground) to allow output for total dry matter and Nutrient contents, including total structural, non-structural and metabolic pools.
      CompositeBiomass TotalDead: OrganNames=[Leaf, Stem, Husk, Grain, Rachis, Root]; IncludeLive=false; IncludeDead=true
        Memo
          The TotalDead composite biomass object includes the Dead pools of all organs (above+below ground) to allow output for total dry matter and Nutrient contents, including total structural, non-structural and metabolic pools.
      CompositeBiomass EarLive: OrganNames=[Husk, Grain, Rachis]; IncludeLive=true; IncludeDead=false
        Memo
          The EarLive composite biomass object includes the Live pools of all organs within the Ear to allow output for total dry matter and Nutrient contents, including total structural, non-structural and metabolic pools.
      CompositeBiomass AboveGroundLive: OrganNames=[Leaf, Stem, Husk, Grain, Rachis]; IncludeLive=true; IncludeDead=false
        Memo
          The AboveGroundLive composite biomass object includes the Live pools of all organs occurring above the soil surface to allow output for total dry matter and Nutrient contents, including total structural, non-structural and metabolic pools.
      CompositeBiomass AboveGroundDead: OrganNames=[Leaf, Stem, Husk, Grain, Rachis]; IncludeLive=false; IncludeDead=true
        Memo
          The AboveGroundDead composite biomass object includes the Dead pools of all organs occurring above the soil surface to allow output for total dry matter and Nutrient contents, including total structural, non-structural and metabolic pools.
      Memo Future Development Needs
        #Future Development requirements

        * Phenology not responding to stress events.  Requires better data sets for quantifying the effects of water and nitrogen on leaf apperance and the timing of development stages.
        * Phosphorus response
        * Improved parameterisation of supply and demand for N and DM from organs and arbitration of these resources.
        * Heat Stress responses in grain number
        * More validation under a wider range of environments with more detailed datasets
        * Seedling mortality
        * Water demand (MicroClimate) needs validation
      Folder CultivarFolder
        Cultivar Hycorn_53
          Command:
            [Phenology].Juvenile.Target.FixedValue = 190
            [Phenology].Photosensitive.Target.XYPairs.X = 0, 12.5, 24
            [Phenology].Photosensitive.Target.XYPairs.Y = 0, 0, 124
            [Phenology].FlagLeafToFlowering.Target.FixedValue = 10
            [Phenology].FloweringToGrainFilling.Target.FixedValue = 170
            [Phenology].GrainFilling.Target.FixedValue = 520
            [Rachis].DMDemands.Structural.DMDemandFunction.MaximumOrganWt.FixedValue = 25
            [Grain].MaximumGrainsPerCob.FixedValue =  550
        Cultivar Pioneer_33M54
          Command:
            [Phenology].GrainFilling.Target.FixedValue = 550
            [Phenology].Juvenile.Target.FixedValue = 270
        Cultivar Pioneer_38H20
          Command:
            [Phenology].Juvenile.Target.FixedValue = 210
            [Phenology].GrainFilling.Target.FixedValue = 550
        Cultivar Pioneer_34K77
          Command:
            [Phenology].Juvenile.Target.FixedValue = 280
            [Phenology].GrainFilling.Target.FixedValue = 550
          Memo
            VShort duration variety released in New Zealand by Pioneer
        Cultivar Pioneer_39V43
          Command:
            [Phenology].Juvenile.Target.FixedValue = 100
            [Phenology].GrainFilling.Target.FixedValue = 500
            [Phenology].FloweringToGrainFilling.Target.FixedValue = 170
            [Structure].Phyllochron.Phyllochron.Phyllochron.XYPairs.X = 1, 4, 4.2, 10.5, 11
            [Structure].Phyllochron.Phyllochron.Phyllochron.XYPairs.Y = 26, 26, 46, 46, 70
            [Rachis].DMDemands.Structural.DMDemandFunction.MaximumOrganWt.FixedValue = 18
            [Structure].HeightModel.PotentialHeight.XYPairs.X = 3, 4, 5, 6
            [Structure].HeightModel.PotentialHeight.XYPairs.Y = 20, 40, 50, 1300
          Memo
            VShort duration variety released in New Zealand by Pioneer
        Cultivar Atrium
          Command:
            [Phenology].Juvenile.Target.FixedValue = 150
            [Phenology].GrainFilling.Target.FixedValue = 500
            [Phenology].FloweringToGrainFilling.Target.FixedValue = 170
            [Structure].Phyllochron.Phyllochron.Phyllochron.XYPairs.X = 1, 4, 4.2, 10.5, 11
            [Structure].Phyllochron.Phyllochron.Phyllochron.XYPairs.Y = 26, 26, 46, 46, 70
            [Rachis].DMDemands.Structural.DMDemandFunction.MaximumOrganWt.FixedValue = 18
            [Structure].HeightModel.PotentialHeight.XYPairs.X = 3, 4, 5, 6
            [Structure].HeightModel.PotentialHeight.XYPairs.Y = 20, 40, 50, 2370
          Memo
            Maize variety used in trials at Wageningen University
        Cultivar Laila
          Command:
            [Phenology].Juvenile.Target.FixedValue = 211
            [Phenology].Photosensitive.Target.XYPairs.X = 0, 12.5, 24
            [Phenology].Photosensitive.Target.XYPairs.Y = 0, 0, 0
            [Phenology].FlagLeafToFlowering.Target.FixedValue = 1
            [Phenology].FloweringToGrainFilling.Target.FixedValue = 170
            [Phenology].GrainFilling.Target.FixedValue = 812
            [Phenology].Maturing.Target.FixedValue = 1
            [Phenology].MaturityToHarvestRipe.Target.FixedValue = 1
            [Rachis].DMDemands.Structural.DMDemandFunction.MaximumOrganWt.FixedValue = 36
            [Grain].MaximumGrainsPerCob.FixedValue =  720
        Cultivar GH_5019WX
          Command:
            [Phenology].Juvenile.Target.FixedValue = 225
            [Phenology].Photosensitive.Target.XYPairs.X = 0, 12.5, 24.0
            [Phenology].Photosensitive.Target.XYPairs.Y = 0, 0, 124
            [Phenology].FlagLeafToFlowering.Target.FixedValue = 101
            [Phenology].FloweringToGrainFilling.Target.FixedValue = 170
            [Phenology].GrainFilling.Target.FixedValue = 694
            [Rachis].DMDemands.Structural.DMDemandFunction.MaximumOrganWt.FixedValue = 25
            [Grain].MaximumGrainsPerCob.FixedValue = 550
        Cultivar Hycorn_40
          Command:
            [Phenology].Juvenile.Target.FixedValue = 190
            [Phenology].Photosensitive.Target.XYPairs.X = 0, 12.5, 24
            [Phenology].Photosensitive.Target.XYPairs.Y = 0, 0, 124
            [Phenology].FlagLeafToFlowering.Target.FixedValue = 50
            [Phenology].FloweringToGrainFilling.Target.FixedValue = 170
            [Phenology].GrainFilling.Target.FixedValue = 713
            [Rachis].DMDemands.Structural.DMDemandFunction.MaximumOrganWt.FixedValue = 25
            [Grain].MaximumGrainsPerCob.FixedValue =  550
        Cultivar GH_5009
          Command:
            [Phenology].Juvenile.Target.FixedValue = 190
            [Phenology].Photosensitive.Target.XYPairs.X = 0, 12.5, 24
            [Phenology].Photosensitive.Target.XYPairs.Y = 0, 0, 300
            [Phenology].FlagLeafToFlowering.Target.FixedValue = 50
            [Phenology].FloweringToGrainFilling.Target.FixedValue = 170
            [Phenology].GrainFilling.Target.FixedValue = 713
            [Rachis].DMDemands.Structural.DMDemandFunction.MaximumOrganWt.FixedValue = 25
            [Grain].MaximumGrainsPerCob.FixedValue =  550
        Cultivar Dekalb_XL82
          Command:
            [Phenology].Juvenile.Target.FixedValue = 211
            [Phenology].Photosensitive.Target.XYPairs.X = 0, 12.5, 24
            [Phenology].Photosensitive.Target.XYPairs.Y = 0, 0, 472
            [Phenology].FlagLeafToFlowering.Target.FixedValue = 101
            [Phenology].FloweringToGrainFilling.Target.FixedValue = 170
            [Phenology].GrainFilling.Target.FixedValue = 813
            [Rachis].DMDemands.Structural.DMDemandFunction.MaximumOrganWt.FixedValue = 25
            [Grain].MaximumGrainsPerCob.FixedValue = 550
        Cultivar malawi_local
          Command:
            [Phenology].Juvenile.Target.FixedValue = 280
            [Phenology].Photosensitive.Target.XYPairs.X = 0, 12.5, 24
            [Phenology].Photosensitive.Target.XYPairs.Y = 0, 0, 264.5
            [Phenology].FlagLeafToFlowering.Target.FixedValue = 10
            [Phenology].FloweringToGrainFilling.Target.FixedValue = 170
            [Phenology].GrainFilling.Target.FixedValue = 600
            [Rachis].DMDemands.Structural.DMDemandFunction.MaximumOrganWt.FixedValue = 14
            [Grain].MaximumGrainsPerCob.FixedValue = 360
            [Grain].MaximumPotentialGrainSize.FixedValue = 0.217
          Memo
            The variety malawi_local is a Malawian medium-late maturing local variety.  Photoperiod response is taken from Ellis et al Crop Sci 32:1225 for SR52.
        Cultivar mh19
          Command:
            [Phenology].Juvenile.Target.FixedValue = 290
            [Phenology].Photosensitive.Target.XYPairs.X = 0, 12.5, 24
            [Phenology].Photosensitive.Target.XYPairs.Y = 0, 0, 264.5
            [Phenology].FlagLeafToFlowering.Target.FixedValue = 10
            [Phenology].FloweringToGrainFilling.Target.FixedValue = 170
            [Phenology].GrainFilling.Target.FixedValue = 570
            [Rachis].DMDemands.Structural.DMDemandFunction.MaximumOrganWt.FixedValue = 14
            [Grain].MaximumGrainsPerCob.FixedValue = 504
            [Grain].MaximumPotentialGrainSize.FixedValue = 0.361
          Memo
            The variety mh19 is a Malawian medium-late maturing hybrid.  Photoperiod response is taken from Ellis et al Crop Sci 32:1225 for SR52.
        Cultivar mh17
          Command:
            [Phenology].Juvenile.Target.FixedValue = 290
            [Phenology].Photosensitive.Target.XYPairs.X = 0, 12.5, 24
            [Phenology].Photosensitive.Target.XYPairs.Y = 0, 0, 264.5
            [Phenology].FlagLeafToFlowering.Target.FixedValue = 10
            [Phenology].FloweringToGrainFilling.Target.FixedValue = 170
            [Phenology].GrainFilling.Target.FixedValue = 570
            [Rachis].DMDemands.Structural.DMDemandFunction.MaximumOrganWt.FixedValue = 14
            [Grain].MaximumGrainsPerCob.FixedValue = 504
            [Grain].MaximumPotentialGrainSize.FixedValue = 0.361
          Memo
            The variety mh17 is a Malawian medium-late maturing hybrid.  Photoperiod response is taken from Ellis et al Crop Sci 32:1225 for SR52.
        Cultivar mh16
          Command:
            [Phenology].Juvenile.Target.FixedValue = 290
            [Phenology].Photosensitive.Target.XYPairs.X = 0, 12.5, 24
            [Phenology].Photosensitive.Target.XYPairs.Y = 0, 0, 264.5
            [Phenology].FlagLeafToFlowering.Target.FixedValue = 10
            [Phenology].FloweringToGrainFilling.Target.FixedValue = 170
            [Phenology].GrainFilling.Target.FixedValue = 570
            [Rachis].DMDemands.Structural.DMDemandFunction.MaximumOrganWt.FixedValue = 14
            [Grain].MaximumGrainsPerCob.FixedValue = 504
            [Grain].MaximumPotentialGrainSize.FixedValue = 0.361
          Memo
            The variety mh16 is a Malawian medium-late maturing hybrid.  Photoperiod response is taken from Ellis et al Crop Sci 32:1225 for SR52.
        Cultivar mh12
          Command:
            [Phenology].Juvenile.Target.FixedValue = 290
            [Phenology].Photosensitive.Target.XYPairs.X = 0, 12.5, 24
            [Phenology].Photosensitive.Target.XYPairs.Y = 0, 0, 264.5
            [Phenology].FlagLeafToFlowering.Target.FixedValue = 10
            [Phenology].FloweringToGrainFilling.Target.FixedValue = 170
            [Phenology].GrainFilling.Target.FixedValue = 570
            [Rachis].DMDemands.Structural.DMDemandFunction.MaximumOrganWt.FixedValue = 14
            [Grain].MaximumGrainsPerCob.FixedValue = 504
            [Grain].MaximumPotentialGrainSize.FixedValue = 0.361
          Memo
            The variety mh12 is a Malawian medium-late maturing hybrid.  Photoperiod response is taken from Ellis et al Crop Sci 32:1225 for SR52.
        Cultivar sc623
          Command:
            [Phenology].Juvenile.Target.FixedValue = 280
            [Phenology].Photosensitive.Target.XYPairs.X = 0, 12.5, 24
            [Phenology].Photosensitive.Target.XYPairs.Y = 0, 0, 264.5
            [Phenology].FlagLeafToFlowering.Target.FixedValue = 10
            [Phenology].FloweringToGrainFilling.Target.FixedValue = 170
            [Phenology].GrainFilling.Target.FixedValue = 550
            [Rachis].DMDemands.Structural.DMDemandFunction.MaximumOrganWt.FixedValue = 14
            [Grain].MaximumGrainsPerCob.FixedValue = 504
            [Grain].MaximumPotentialGrainSize.FixedValue = 0.361
          Memo
            The variety sc623 is a Zimbabwean medium-late maturing hybrid.  Photoperiod response is taken from Ellis et al Crop Sci 32:1225 for SR52.
        Cultivar sc625
          Command:
            [Phenology].Juvenile.Target.FixedValue = 280
            [Phenology].Photosensitive.Target.XYPairs.X = 0, 12.5, 24
            [Phenology].Photosensitive.Target.XYPairs.Y = 0, 0, 264.5
            [Phenology].FlagLeafToFlowering.Target.FixedValue = 10
            [Phenology].FloweringToGrainFilling.Target.FixedValue = 170
            [Phenology].GrainFilling.Target.FixedValue = 570
            [Rachis].DMDemands.Structural.DMDemandFunction.MaximumOrganWt.FixedValue = 14
            [Grain].MaximumGrainsPerCob.FixedValue = 504
            [Grain].MaximumPotentialGrainSize.FixedValue = 0.361
          Memo
            The variety sc625 is a Zimbabwean medium-late maturing hybrid.  Photoperiod response is taken from Ellis et al Crop Sci 32:1225 for SR52.
        Cultivar sc601
          Command:
            [Phenology].Juvenile.Target.FixedValue = 280
            [Phenology].Photosensitive.Target.XYPairs.X = 0, 12.5, 24
            [Phenology].Photosensitive.Target.XYPairs.Y = 0, 0, 264.5
            [Phenology].FlagLeafToFlowering.Target.FixedValue = 10
            [Phenology].FloweringToGrainFilling.Target.FixedValue = 170
            [Phenology].GrainFilling.Target.FixedValue = 560
            [Rachis].DMDemands.Structural.DMDemandFunction.MaximumOrganWt.FixedValue = 14
            [Grain].MaximumGrainsPerCob.FixedValue = 495
            [Grain].MaximumPotentialGrainSize.FixedValue = 0.361
          Memo
            The variety sc601 is a Zimbabwean medium-late maturing hybrid.  Photoperiod response is taken from Ellis et al Crop Sci 32:1225 for SR52.
        Cultivar CG4141
          Command:
            [Phenology].Juvenile.Target.FixedValue = 233
            [Phenology].Photosensitive.Target.XYPairs.X = 0, 12.5, 24
            [Phenology].Photosensitive.Target.XYPairs.Y = 0, 0, 264.5
            [Phenology].FlagLeafToFlowering.Target.FixedValue = 10
            [Phenology].FloweringToGrainFilling.Target.FixedValue = 170
            [Phenology].GrainFilling.Target.FixedValue = 550
            [Rachis].DMDemands.Structural.DMDemandFunction.MaximumOrganWt.FixedValue = 14
            [Grain].MaximumGrainsPerCob.FixedValue = 468
            [Grain].MaximumPotentialGrainSize.FixedValue = 0.361
          Memo
            The variety CG4141 is a Zimbabwean early-medium maturing hybrid.  Photoperiod response is taken from Ellis et al Crop Sci 32:1225 for SR52.
        Cultivar mh18
          Command:
            [Phenology].Juvenile.Target.FixedValue = 260
            [Phenology].Photosensitive.Target.XYPairs.X = 0, 12.5, 24
            [Phenology].Photosensitive.Target.XYPairs.Y = 0, 0, 264.5
            [Phenology].FlagLeafToFlowering.Target.FixedValue = 10
            [Phenology].FloweringToGrainFilling.Target.FixedValue = 170
            [Phenology].GrainFilling.Target.FixedValue = 550
            [Rachis].DMDemands.Structural.DMDemandFunction.MaximumOrganWt.FixedValue = 14
            [Grain].MaximumGrainsPerCob.FixedValue = 486
            [Grain].MaximumPotentialGrainSize.FixedValue = 0.361
          Memo
            The variety mh18 is a Zimbabwean early-medium maturing hybrid.  Photoperiod response is taken from Ellis et al Crop Sci 32:1225 for SR52.
        Cultivar r215
          Command:
            [Phenology].Juvenile.Target.FixedValue = 250
            [Phenology].Photosensitive.Target.XYPairs.X = 0, 12.5, 24
            [Phenology].Photosensitive.Target.XYPairs.Y = 0, 0, 264.5
            [Phenology].FlagLeafToFlowering.Target.FixedValue = 10
            [Phenology].FloweringToGrainFilling.Target.FixedValue = 170
            [Phenology].GrainFilling.Target.FixedValue = 550
            [Rachis].DMDemands.Structural.DMDemandFunction.MaximumOrganWt.FixedValue = 14
            [Grain].MaximumGrainsPerCob.FixedValue = 468
            [Grain].MaximumPotentialGrainSize.FixedValue = 0.361
          Memo
            The variety r215 is a Zimbabwean early-medium maturing hybrid.  Photoperiod response is taken from Ellis et al Crop Sci 32:1225 for SR52.
        Cultivar Melkassa
          Command:
            [Phenology].Juvenile.Target.FixedValue = 230
            [Phenology].Photosensitive.Target.XYPairs.X = 0, 12.5, 24
            [Phenology].Photosensitive.Target.XYPairs.Y = 0, 0, 264.5
            [Phenology].FlagLeafToFlowering.Target.FixedValue = 10
            [Phenology].FloweringToGrainFilling.Target.FixedValue = 160
            [Phenology].GrainFilling.Target.FixedValue = 550
            [Rachis].DMDemands.Structural.DMDemandFunction.MaximumOrganWt.FixedValue = 14
            [Grain].MaximumGrainsPerCob.FixedValue = 387
            [Grain].MaximumPotentialGrainSize.FixedValue = 0.33
          Memo
            The variety Melkassa is a local early-medium maturing Ethiopian variety.
        Cultivar sr52
          Command:
            [Phenology].Juvenile.Target.FixedValue = 250
            [Phenology].Photosensitive.Target.XYPairs.X = 0, 12.5, 24
            [Phenology].Photosensitive.Target.XYPairs.Y = 0, 0, 264.5
            [Phenology].FlagLeafToFlowering.Target.FixedValue = 10
            [Phenology].FloweringToGrainFilling.Target.FixedValue = 170
            [Phenology].GrainFilling.Target.FixedValue = 550
            [Rachis].DMDemands.Structural.DMDemandFunction.MaximumOrganWt.FixedValue = 14
            [Grain].MaximumGrainsPerCob.FixedValue = 468
            [Grain].MaximumPotentialGrainSize.FixedValue = 0.361
          Memo
            The variety sr52 is a Zimbabwean early-medium maturing hybrid.  Photoperiod response is taken from Ellis et al Crop Sci 32:1225 for SR52.
        Cultivar sc501
          Command:
            [Phenology].Juvenile.Target.FixedValue = 250
            [Phenology].Photosensitive.Target.XYPairs.X = 0, 12.5, 24
            [Phenology].Photosensitive.Target.XYPairs.Y = 0, 0, 264.5
            [Phenology].FlagLeafToFlowering.Target.FixedValue = 10
            [Phenology].FloweringToGrainFilling.Target.FixedValue = 170
            [Phenology].GrainFilling.Target.FixedValue = 550
            [Rachis].DMDemands.Structural.DMDemandFunction.MaximumOrganWt.FixedValue = 14
            [Grain].MaximumGrainsPerCob.FixedValue = 468
            [Grain].MaximumPotentialGrainSize.FixedValue = 0.361
          Memo
            The variety sc501 is a Zimbabwean early-medium maturing hybrid.  Photoperiod response is taken from Ellis et al Crop Sci 32:1225 for SR52.
        Cultivar r201
          Command:
            [Phenology].Juvenile.Target.FixedValue = 230
            [Phenology].Photosensitive.Target.XYPairs.X = 0, 12.5, 24
            [Phenology].Photosensitive.Target.XYPairs.Y = 0, 0, 264.5
            [Phenology].FlagLeafToFlowering.Target.FixedValue = 10
            [Phenology].FloweringToGrainFilling.Target.FixedValue = 170
            [Phenology].GrainFilling.Target.FixedValue = 550
            [Rachis].DMDemands.Structural.DMDemandFunction.MaximumOrganWt.FixedValue = 14
            [Grain].MaximumGrainsPerCob.FixedValue = 450
            [Grain].MaximumPotentialGrainSize.FixedValue = 0.375
          Memo
            The variety r201 is a Zimbabwean early maturing hybrid.  Photoperiod response is taken from Ellis et al Crop Sci 32:1225 for SR52.
        Cultivar sc401
          Command:
            [Phenology].Juvenile.Target.FixedValue = 230
            [Phenology].Photosensitive.Target.XYPairs.X = 0, 12.5, 24
            [Phenology].Photosensitive.Target.XYPairs.Y = 0, 0, 264.5
            [Phenology].FlagLeafToFlowering.Target.FixedValue = 10
            [Phenology].FloweringToGrainFilling.Target.FixedValue = 170
            [Phenology].GrainFilling.Target.FixedValue = 550
            [Rachis].DMDemands.Structural.DMDemandFunction.MaximumOrganWt.FixedValue = 14
            [Grain].MaximumGrainsPerCob.FixedValue = 450
            [Grain].MaximumPotentialGrainSize.FixedValue = 0.375
          Memo
            The variety NSCM_41 is a Zimbabwean early maturing hybrid.  Photoperiod response is taken from Ellis et al Crop Sci 32:1225 for SR52.
        Cultivar NSCM_41: same as Replacements.Maize.CultivarFolder.sc401
        Cultivar Makueni
          Command:
            [Phenology].Juvenile.Target.FixedValue = 150
            [Phenology].Photosensitive.Target.XYPairs.X = 0, 12.5, 24
            [Phenology].Photosensitive.Target.XYPairs.Y = 0, 0, 115
            [Phenology].FlagLeafToFlowering.Target.FixedValue = 10
            [Phenology].FloweringToGrainFilling.Target.FixedValue = 120
            [Phenology].GrainFilling.Target.FixedValue = 530
            [Rachis].DMDemands.Structural.DMDemandFunction.MaximumOrganWt.FixedValue = 14
            [Grain].MaximumGrainsPerCob.FixedValue = 432
            [Grain].MaximumPotentialGrainSize.FixedValue = 0.375
          Memo
            The variety Makueni Composite is a kenyan variety with similar phenology but slightly higher cob size than Katumani composite.
        Cultivar Katumani
          Command:
            [Phenology].Juvenile.Target.FixedValue = 150
            [Phenology].Photosensitive.Target.XYPairs.X = 0, 12.5, 24
            [Phenology].Photosensitive.Target.XYPairs.Y = 0, 0, 115
            [Phenology].FlagLeafToFlowering.Target.FixedValue = 10
            [Phenology].FloweringToGrainFilling.Target.FixedValue = 120
            [Phenology].GrainFilling.Target.FixedValue = 530
            [Rachis].DMDemands.Structural.DMDemandFunction.MaximumOrganWt.FixedValue = 14
            [Grain].MaximumGrainsPerCob.FixedValue = 405
            [Grain].MaximumPotentialGrainSize.FixedValue = 0.375
          Memo
            The variety Katumani Composite B was formed in 1966 and released in 1968 as part of the maize breeding work undertaken at the Katumani Research Station in Kenya which started in 1956.  Katumani Composite B was an advanced generation of Katumani Synthetic V X Katumani Synthetic VI.  It has slight photoperiod sensitivity and relatively small potential cob size.
        Cultivar Pioneer_3153
        Cultivar Pioneer_39G12
          Command:
            [Phenology].Juvenile.Target.FixedValue = 180
            [Phenology].GrainFilling.Target.FixedValue = 500
            [Grain].MaximumGrainsPerCob.FixedValue = 550
            [Grain].NumberFunction.GrowthRateFactor.XYPairs.X = 0.2,2,4,10
            [Grain].NumberFunction.GrowthRateFactor.XYPairs.Y = 0,0.6,1,1
            [Grain].MaximumPotentialGrainSize.FixedValue = 0.25
        Folder Generic
          Cultivar B_80
            Command:
              [Phenology].Juvenile.Target.FixedValue = 135
              [Phenology].Photosensitive.Target.XYPairs.X = 0, 12.5, 24
              [Phenology].Photosensitive.Target.XYPairs.Y = 0, 0, 0
              [Phenology].FlagLeafToFlowering.Target.FixedValue = 1
              [Phenology].FloweringToGrainFilling.Target.FixedValue = 170
              [Phenology].GrainFilling.Target.FixedValue = 430
              [Phenology].Maturing.Target.FixedValue = 1
              [Phenology].MaturityToHarvestRipe.Target.FixedValue = 100
              [Rachis].DMDemands.Structural.DMDemandFunction.MaximumOrganWt.FixedValue = 36
          Cultivar B_90
            Command:
              [Phenology].Juvenile.Target.FixedValue = 155
              [Phenology].Photosensitive.Target.XYPairs.X = 0, 12.5, 24
              [Phenology].Photosensitive.Target.XYPairs.Y = 0, 0, 0
              [Phenology].FlagLeafToFlowering.Target.FixedValue = 1
              [Phenology].FloweringToGrainFilling.Target.FixedValue = 170
              [Phenology].GrainFilling.Target.FixedValue = 530
              [Phenology].Maturing.Target.FixedValue = 1
              [Phenology].MaturityToHarvestRipe.Target.FixedValue = 100
              [Rachis].DMDemands.Structural.DMDemandFunction.MaximumOrganWt.FixedValue = 36
          Cultivar B_95
            Command:
              [Phenology].Juvenile.Target.FixedValue = 170
              [Phenology].Photosensitive.Target.XYPairs.X = 0, 12.5, 24
              [Phenology].Photosensitive.Target.XYPairs.Y = 0, 0, 0
              [Phenology].FlagLeafToFlowering.Target.FixedValue = 1
              [Phenology].FloweringToGrainFilling.Target.FixedValue = 170
              [Phenology].GrainFilling.Target.FixedValue = 578
              [Phenology].Maturing.Target.FixedValue = 1
              [Phenology].MaturityToHarvestRipe.Target.FixedValue = 100
              [Rachis].DMDemands.Structural.DMDemandFunction.MaximumOrganWt.FixedValue = 36
          Cultivar B_100
            Command:
              [Phenology].Juvenile.Target.FixedValue = 185
              [Phenology].Photosensitive.Target.XYPairs.X = 0, 12.5, 24
              [Phenology].Photosensitive.Target.XYPairs.Y = 0, 0, 0
              [Phenology].FlagLeafToFlowering.Target.FixedValue = 1
              [Phenology].FloweringToGrainFilling.Target.FixedValue = 170
              [Phenology].GrainFilling.Target.FixedValue = 630
              [Phenology].Maturing.Target.FixedValue = 1
              [Phenology].MaturityToHarvestRipe.Target.FixedValue = 100
              [Rachis].DMDemands.Structural.DMDemandFunction.MaximumOrganWt.FixedValue = 36
          Cultivar B_103
            Command:
              [Phenology].Juvenile.Target.FixedValue = 188
              [Phenology].Photosensitive.Target.XYPairs.X = 0, 12.5, 24
              [Phenology].Photosensitive.Target.XYPairs.Y = 0, 0, 0
              [Phenology].FlagLeafToFlowering.Target.FixedValue = 1
              [Phenology].FloweringToGrainFilling.Target.FixedValue = 170
              [Phenology].GrainFilling.Target.FixedValue = 654
              [Phenology].Maturing.Target.FixedValue = 1
              [Phenology].MaturityToHarvestRipe.Target.FixedValue = 100
              [Rachis].DMDemands.Structural.DMDemandFunction.MaximumOrganWt.FixedValue = 36
          Cultivar B_105
            Command:
              [Phenology].Juvenile.Target.FixedValue = 192
              [Phenology].Photosensitive.Target.XYPairs.X = 0, 12.5, 24
              [Phenology].Photosensitive.Target.XYPairs.Y = 0, 0, 0
              [Phenology].FlagLeafToFlowering.Target.FixedValue = 1
              [Phenology].FloweringToGrainFilling.Target.FixedValue = 170
              [Phenology].GrainFilling.Target.FixedValue = 673
              [Phenology].Maturing.Target.FixedValue = 1
              [Phenology].MaturityToHarvestRipe.Target.FixedValue = 100
              [Rachis].DMDemands.Structural.DMDemandFunction.MaximumOrganWt.FixedValue = 36
          Cultivar B_108
            Command:
              [Phenology].Juvenile.Target.FixedValue = 199
              [Phenology].Photosensitive.Target.XYPairs.X = 0, 12.5, 24
              [Phenology].Photosensitive.Target.XYPairs.Y = 0, 0, 0
              [Phenology].FlagLeafToFlowering.Target.FixedValue = 1
              [Phenology].FloweringToGrainFilling.Target.FixedValue = 170
              [Phenology].GrainFilling.Target.FixedValue = 701
              [Phenology].Maturing.Target.FixedValue = 1
              [Phenology].MaturityToHarvestRipe.Target.FixedValue = 100
              [Rachis].DMDemands.Structural.DMDemandFunction.MaximumOrganWt.FixedValue = 36
          Cultivar B_110
            Command:
              [Phenology].Juvenile.Target.FixedValue = 210
              [Phenology].Photosensitive.Target.XYPairs.X = 0, 12.5, 24
              [Phenology].Photosensitive.Target.XYPairs.Y = 0, 0, 0
              [Phenology].FlagLeafToFlowering.Target.FixedValue = 1
              [Phenology].FloweringToGrainFilling.Target.FixedValue = 170
              [Phenology].GrainFilling.Target.FixedValue = 730
              [Phenology].Maturing.Target.FixedValue = 1
              [Phenology].MaturityToHarvestRipe.Target.FixedValue = 100
              [Rachis].DMDemands.Structural.DMDemandFunction.MaximumOrganWt.FixedValue = 36
          Cultivar B_112
            Command:
              [Phenology].Juvenile.Target.FixedValue = 208
              [Phenology].Photosensitive.Target.XYPairs.X = 0, 12.5, 24
              [Phenology].Photosensitive.Target.XYPairs.Y = 0, 0, 0
              [Phenology].FlagLeafToFlowering.Target.FixedValue = 1
              [Phenology].FloweringToGrainFilling.Target.FixedValue = 170
              [Phenology].GrainFilling.Target.FixedValue = 739
              [Phenology].Maturing.Target.FixedValue = 1
              [Phenology].MaturityToHarvestRipe.Target.FixedValue = 100
              [Rachis].DMDemands.Structural.DMDemandFunction.MaximumOrganWt.FixedValue = 36
          Cultivar B_115
            Command:
              [Phenology].Juvenile.Target.FixedValue = 215
              [Phenology].Photosensitive.Target.XYPairs.X = 0, 12.5, 24
              [Phenology].Photosensitive.Target.XYPairs.Y = 0, 0, 0
              [Phenology].FlagLeafToFlowering.Target.FixedValue = 1
              [Phenology].FloweringToGrainFilling.Target.FixedValue = 170
              [Phenology].GrainFilling.Target.FixedValue = 767
              [Phenology].Maturing.Target.FixedValue = 1
              [Phenology].MaturityToHarvestRipe.Target.FixedValue = 100
              [Rachis].DMDemands.Structural.DMDemandFunction.MaximumOrganWt.FixedValue = 36
          Cultivar B_120
            Command:
              [Phenology].Juvenile.Target.FixedValue = 220
              [Phenology].Photosensitive.Target.XYPairs.X = 0, 12.5, 24
              [Phenology].Photosensitive.Target.XYPairs.Y = 0, 0, 0
              [Phenology].FlagLeafToFlowering.Target.FixedValue = 1
              [Phenology].FloweringToGrainFilling.Target.FixedValue = 170
              [Phenology].GrainFilling.Target.FixedValue = 815
              [Phenology].Maturing.Target.FixedValue = 1
              [Phenology].MaturityToHarvestRipe.Target.FixedValue = 100
              [Rachis].DMDemands.Structural.DMDemandFunction.MaximumOrganWt.FixedValue = 36
          Cultivar B_130
            Command:
              [Phenology].Juvenile.Target.FixedValue = 250
              [Phenology].Photosensitive.Target.XYPairs.X = 0, 12.5, 24
              [Phenology].Photosensitive.Target.XYPairs.Y = 0, 0, 0
              [Phenology].FlagLeafToFlowering.Target.FixedValue = 1
              [Phenology].FloweringToGrainFilling.Target.FixedValue = 170
              [Phenology].GrainFilling.Target.FixedValue = 900
              [Phenology].Maturing.Target.FixedValue = 1
              [Phenology].MaturityToHarvestRipe.Target.FixedValue = 100
              [Rachis].DMDemands.Structural.DMDemandFunction.MaximumOrganWt.FixedValue = 36
          Cultivar A_80
            Command:
              [Phenology].Juvenile.Target.FixedValue = 140
              [Phenology].Photosensitive.Target.XYPairs.X = 0, 12.5, 24
              [Phenology].Photosensitive.Target.XYPairs.Y = 0, 0, 0
              [Phenology].FlagLeafToFlowering.Target.FixedValue = 1
              [Phenology].FloweringToGrainFilling.Target.FixedValue = 170
              [Phenology].GrainFilling.Target.FixedValue = 420
              [Phenology].Maturing.Target.FixedValue = 1
              [Phenology].MaturityToHarvestRipe.Target.FixedValue = 100
              [Rachis].DMDemands.Structural.DMDemandFunction.MaximumOrganWt.FixedValue = 36
          Cultivar A_90
            Command:
              [Phenology].Juvenile.Target.FixedValue = 170
              [Phenology].Photosensitive.Target.XYPairs.X = 0, 12.5, 24
              [Phenology].Photosensitive.Target.XYPairs.Y = 0, 0, 0
              [Phenology].FlagLeafToFlowering.Target.FixedValue = 1
              [Phenology].FloweringToGrainFilling.Target.FixedValue = 170
              [Phenology].GrainFilling.Target.FixedValue = 505
              [Phenology].Maturing.Target.FixedValue = 1
              [Phenology].MaturityToHarvestRipe.Target.FixedValue = 100
              [Rachis].DMDemands.Structural.DMDemandFunction.MaximumOrganWt.FixedValue = 36
          Cultivar A_95
            Command:
              [Phenology].Juvenile.Target.FixedValue = 181
              [Phenology].Photosensitive.Target.XYPairs.X = 0, 12.5, 24
              [Phenology].Photosensitive.Target.XYPairs.Y = 0, 0, 0
              [Phenology].FlagLeafToFlowering.Target.FixedValue = 1
              [Phenology].FloweringToGrainFilling.Target.FixedValue = 170
              [Phenology].GrainFilling.Target.FixedValue = 558
              [Phenology].Maturing.Target.FixedValue = 1
              [Phenology].MaturityToHarvestRipe.Target.FixedValue = 100
              [Rachis].DMDemands.Structural.DMDemandFunction.MaximumOrganWt.FixedValue = 36
          Cultivar A_100
            Command:
              [Phenology].Juvenile.Target.FixedValue = 190
              [Phenology].Photosensitive.Target.XYPairs.X = 0, 12.5, 24
              [Phenology].Photosensitive.Target.XYPairs.Y = 0, 0, 0
              [Phenology].FlagLeafToFlowering.Target.FixedValue = 1
              [Phenology].FloweringToGrainFilling.Target.FixedValue = 170
              [Phenology].GrainFilling.Target.FixedValue = 615
              [Phenology].Maturing.Target.FixedValue = 1
              [Phenology].MaturityToHarvestRipe.Target.FixedValue = 100
              [Rachis].DMDemands.Structural.DMDemandFunction.MaximumOrganWt.FixedValue = 36
          Cultivar A_103
            Command:
              [Phenology].Juvenile.Target.FixedValue = 204
              [Phenology].Photosensitive.Target.XYPairs.X = 0, 12.5, 24
              [Phenology].Photosensitive.Target.XYPairs.Y = 0, 0, 0
              [Phenology].FlagLeafToFlowering.Target.FixedValue = 1
              [Phenology].FloweringToGrainFilling.Target.FixedValue = 170
              [Phenology].GrainFilling.Target.FixedValue = 630
              [Phenology].Maturing.Target.FixedValue = 1
              [Phenology].MaturityToHarvestRipe.Target.FixedValue = 100
              [Rachis].DMDemands.Structural.DMDemandFunction.MaximumOrganWt.FixedValue = 36
          Cultivar A_105
            Command:
              [Phenology].Juvenile.Target.FixedValue = 209
              [Phenology].Photosensitive.Target.XYPairs.X = 0, 12.5, 24
              [Phenology].Photosensitive.Target.XYPairs.Y = 0, 0, 0
              [Phenology].FlagLeafToFlowering.Target.FixedValue = 1
              [Phenology].FloweringToGrainFilling.Target.FixedValue = 170
              [Phenology].GrainFilling.Target.FixedValue = 648
              [Phenology].Maturing.Target.FixedValue = 1
              [Phenology].MaturityToHarvestRipe.Target.FixedValue = 100
              [Rachis].DMDemands.Structural.DMDemandFunction.MaximumOrganWt.FixedValue = 36
          Cultivar A_108
            Command:
              [Phenology].Juvenile.Target.FixedValue = 218
              [Phenology].Photosensitive.Target.XYPairs.X = 0, 12.5, 24
              [Phenology].Photosensitive.Target.XYPairs.Y = 0, 0, 0
              [Phenology].FlagLeafToFlowering.Target.FixedValue = 1
              [Phenology].FloweringToGrainFilling.Target.FixedValue = 170
              [Phenology].GrainFilling.Target.FixedValue = 674
              [Phenology].Maturing.Target.FixedValue = 1
              [Phenology].MaturityToHarvestRipe.Target.FixedValue = 100
              [Rachis].DMDemands.Structural.DMDemandFunction.MaximumOrganWt.FixedValue = 36
          Cultivar A_110
            Command:
              [Phenology].Juvenile.Target.FixedValue = 230
              [Phenology].Photosensitive.Target.XYPairs.X = 0, 12.5, 24
              [Phenology].Photosensitive.Target.XYPairs.Y = 0, 0, 0
              [Phenology].FlagLeafToFlowering.Target.FixedValue = 1
              [Phenology].FloweringToGrainFilling.Target.FixedValue = 170
              [Phenology].GrainFilling.Target.FixedValue = 700
              [Phenology].Maturing.Target.FixedValue = 1
              [Phenology].MaturityToHarvestRipe.Target.FixedValue = 100
              [Rachis].DMDemands.Structural.DMDemandFunction.MaximumOrganWt.FixedValue = 36
          Cultivar A_112
            Command:
              [Phenology].Juvenile.Target.FixedValue = 229
              [Phenology].Photosensitive.Target.XYPairs.X = 0, 12.5, 24
              [Phenology].Photosensitive.Target.XYPairs.Y = 0, 0, 0
              [Phenology].FlagLeafToFlowering.Target.FixedValue = 1
              [Phenology].FloweringToGrainFilling.Target.FixedValue = 170
              [Phenology].GrainFilling.Target.FixedValue = 710
              [Phenology].Maturing.Target.FixedValue = 1
              [Phenology].MaturityToHarvestRipe.Target.FixedValue = 100
              [Rachis].DMDemands.Structural.DMDemandFunction.MaximumOrganWt.FixedValue = 36
          Cultivar A_115
            Command:
              [Phenology].Juvenile.Target.FixedValue = 238
              [Phenology].Photosensitive.Target.XYPairs.X = 0, 12.5, 24
              [Phenology].Photosensitive.Target.XYPairs.Y = 0, 0, 0
              [Phenology].FlagLeafToFlowering.Target.FixedValue = 1
              [Phenology].FloweringToGrainFilling.Target.FixedValue = 170
              [Phenology].GrainFilling.Target.FixedValue = 737
              [Phenology].Maturing.Target.FixedValue = 1
              [Phenology].MaturityToHarvestRipe.Target.FixedValue = 100
              [Rachis].DMDemands.Structural.DMDemandFunction.MaximumOrganWt.FixedValue = 36
          Cultivar A_120
            Command:
              [Phenology].Juvenile.Target.FixedValue = 250
              [Phenology].Photosensitive.Target.XYPairs.X = 0, 12.5, 24
              [Phenology].Photosensitive.Target.XYPairs.Y = 0, 0, 0
              [Phenology].FlagLeafToFlowering.Target.FixedValue = 1
              [Phenology].FloweringToGrainFilling.Target.FixedValue = 170
              [Phenology].GrainFilling.Target.FixedValue = 775
              [Phenology].Maturing.Target.FixedValue = 1
              [Phenology].MaturityToHarvestRipe.Target.FixedValue = 100
              [Rachis].DMDemands.Structural.DMDemandFunction.MaximumOrganWt.FixedValue = 36
          Cultivar A_130
            Command:
              [Phenology].Juvenile.Target.FixedValue = 285
              [Phenology].Photosensitive.Target.XYPairs.X = 0, 12.5, 24
              [Phenology].Photosensitive.Target.XYPairs.Y = 0, 0, 0
              [Phenology].FlagLeafToFlowering.Target.FixedValue = 1
              [Phenology].FloweringToGrainFilling.Target.FixedValue = 170
              [Phenology].GrainFilling.Target.FixedValue = 865
              [Phenology].Maturing.Target.FixedValue = 1
              [Phenology].MaturityToHarvestRipe.Target.FixedValue = 100
              [Rachis].DMDemands.Structural.DMDemandFunction.MaximumOrganWt.FixedValue = 36
          Cultivar HY_110
            Command:
              [Phenology].Juvenile.Target.FixedValue = 212
              [Phenology].Photosensitive.Target.XYPairs.X = 0, 12.5, 24
              [Phenology].Photosensitive.Target.XYPairs.Y = 0, 0, 0
              [Phenology].FlagLeafToFlowering.Target.FixedValue = 1
              [Phenology].FloweringToGrainFilling.Target.FixedValue = 170
              [Phenology].GrainFilling.Target.FixedValue = 775
              [Phenology].Maturing.Target.FixedValue = 1
              [Phenology].MaturityToHarvestRipe.Target.FixedValue = 100
              [Rachis].DMDemands.Structural.DMDemandFunction.MaximumOrganWt.FixedValue = 36
              [Leaf].Photosynthesis.RUE.FixedValue = 2.2
              [Grain].MaximumPotentialGrainSize.FixedValue = 0.36
              [Grain].MaximumGrainsPerCob.FixedValue = 850
          Cultivar LY_110
            Command:
              [Phenology].Juvenile.Target.FixedValue = 216
              [Phenology].Photosensitive.Target.XYPairs.X = 0, 12.5, 24
              [Phenology].Photosensitive.Target.XYPairs.Y = 0, 0, 0
              [Phenology].FlagLeafToFlowering.Target.FixedValue = 1
              [Phenology].FloweringToGrainFilling.Target.FixedValue = 170
              [Phenology].GrainFilling.Target.FixedValue = 705
              [Phenology].Maturing.Target.FixedValue = 1
              [Phenology].MaturityToHarvestRipe.Target.FixedValue = 100
              [Rachis].DMDemands.Structural.DMDemandFunction.MaximumOrganWt.FixedValue = 36
              [Leaf].Photosynthesis.RUE.FixedValue = 1.7
              [Grain].MaximumPotentialGrainSize.FixedValue = 0.25
              [Grain].MaximumGrainsPerCob.FixedValue = 550
          Cultivar P1197
            Command:
              [Phenology].Juvenile.Target.FixedValue = 270
              [Phenology].Photosensitive.Target.XYPairs.Y = 0,0,0
              [Phenology].FlagLeafToFlowering.Target.FixedValue = 1
              [Phenology].FloweringToGrainFilling.Target.FixedValue = 170
              [Phenology].GrainFilling.Target.FixedValue = 640
              [Phenology].Maturing.Target.FixedValue=50
              [Phenology].MaturityToHarvestRipe.Target.FixedValue=50
              [Maize].Grain.MaximumGrainsPerCob.FixedValue = 640
              [Maize].Grain.MaximumPotentialGrainSize.FixedValue = 0.32
              [Maize].Root.SpecificRootLength.FixedValue = 135
              [Maize].Root.RootFrontVelocity.PotentialRootFrontVelocity.PreFlowering.RootFrontVelocity.FixedValue=22
              [Grain].MaximumNConc.InitialPhase.InitialNconc.FixedValue=0.03
        Cultivar Example_Oxdef_cultivar
          Command:
            [Phenology].Juvenile.Target.FixedValue = 210
            [Phenology].Photosensitive.Target.XYPairs.X = 0, 12.5, 24
            [Phenology].Photosensitive.Target.XYPairs.Y = 0, 0, 0
            [Phenology].FlagLeafToFlowering.Target.FixedValue = 1
            [Phenology].FloweringToGrainFilling.Target.FixedValue = 170
            [Phenology].GrainFilling.Target.FixedValue = 730
            [Phenology].Maturing.Target.FixedValue = 1
            [Phenology].MaturityToHarvestRipe.Target.FixedValue = 100
            [Rachis].DMDemands.Structural.DMDemandFunction.MaximumOrganWt.FixedValue = 36
            //---   WL  suggested changes ---
            [Root].RootFrontVelocity.AFPSFactor.XYPairs.Y = 0, 1, 1
            [Leaf].Photosynthesis.FW.Excess.Today.SowToFloralInitiation.EarlySeason.XYPairs.X = 0, 0.5, 1
            [Leaf].Photosynthesis.FW.Excess.Today.SowToFloralInitiation.EarlySeason.XYPairs.Y = 1, 1, 0.5
            [Leaf].Photosynthesis.FW.Excess.Today.FloralInitiationToStartGrainFill.MidSeason.XYPairs.X = 0, 0.75, 1
            [Leaf].Photosynthesis.FW.Excess.Today.FloralInitiationToStartGrainFill.MidSeason.XYPairs.Y = 1, 1, 0.75
            [Leaf].Photosynthesis.FW.Excess.Today.StartGFToEndCrop.LateSeason.XYPairs.X = 0, 0.95, 1
            [Leaf].Photosynthesis.FW.Excess.Today.StartGFToEndCrop.LateSeason.XYPairs.Y = 1, 1, 0.95
            //------  WL optional changes ----
            //   [Structure].Phyllochron.FOXphyllo.XYPairs.Y = 1, 1.2, 1.4
            //   [Grain].MaximumGrainsPerCob.FOXgn.XYPairs.X = 0, 1, 5, 16, 20
            //   [Grain].MaximumGrainsPerCob.FOXgn.XYPairs.Y = 1, 1, 0.95, 0.9, 0.85
            //   [Grain].MaximumPotentialGrainSize.FOXgs.XYPairs.X = 0, 1, 3, 5, 10, 20
            //   [Grain].MaximumPotentialGrainSize.FOXgs.XYPairs.Y = 1, 1, 1, 1, 0.97, 0.90
            //   [Leaf].Photosynthesis.FW.Excess.PersistentReduction.C = -0.1
            //   [Leaf].Photosynthesis.FW.Excess.PersistentReduction.MovingSumFunction.NumberOfDays = 25
            //   [Leaf].ExtinctionCoeff.FOXk.XYPairs.Y = 1, 0.9, 0.88
            //   [Leaf].CohortParameters.ExpansionStress.FOXToday.XYPairs.Y = 1, 1, 0
        Cultivar DeKalb_62_97VT3_Kaur
          Command:
            [Phenology].Juvenile.Target.FixedValue = 270
            [Phenology].Photosensitive.Target.XYPairs.Y = 0, 0 ,0
            [Phenology].FlagLeafToFlowering.Target.FixedValue = 1
            [Phenology].FloweringToGrainFilling.Target.FixedValue = 170
            [Phenology].GrainFilling.Target.FixedValue = 640
            [Phenology].Maturing.Target.FixedValue = 50
            [Phenology].MaturityToHarvestRipe.Target.FixedValue = 50
            [Leaf].Photosynthesis.RUE.FixedValue = 2.25
            [Stem].DMDemands.Structural.DMDemandFunction.PartitionFraction.XYPairs.Y = 0.1, 1, 1, 1,0
            [Leaf].CohortParameters.SenescenceDuration.XYPairs.Y = 200, 300, 1100
            [Leaf].CohortParameters.DMRetranslocationFactor.FixedValue = 0.025
            [Maize].Grain.MaximumGrainsPerCob.PotentialMaximumGrainsPerCob.FixedValue = 640
            [Maize].Grain.MaximumPotentialGrainSize.PotentialGrainSize.FixedValue = 0.32
            [Maize].Root.SpecificRootLength.FixedValue = 135
            [Maize].Root.RootFrontVelocity.PotentialRootFrontVelocity.PreFlowering.RootFrontVelocity.FixedValue = 25
            [Grain].MaximumNConc.InitialPhase.InitialNconc.FixedValue = 0.025
            [Root].RootFrontVelocity.AFPSFactor.XYPairs.X = 0, 0.05, 1
            //    WL_params
            [Root].RootFrontVelocity.AFPSFactor.XYPairs.Y = 0, 1, 1
            [Leaf].Photosynthesis.FW.Excess.Today.SowToFloralInitiation.EarlySeason.XYPairs.X = 0, 0.5, 1
            [Leaf].Photosynthesis.FW.Excess.Today.SowToFloralInitiation.EarlySeason.XYPairs.Y = 1, 1, 0.2
            [Leaf].Photosynthesis.FW.Excess.Today.FloralInitiationToStartGrainFill.MidSeason.XYPairs.X = 0, 0.5, 1
            [Leaf].Photosynthesis.FW.Excess.Today.FloralInitiationToStartGrainFill.MidSeason.XYPairs.Y = 1, 1, 0.2
            [Leaf].Photosynthesis.FW.Excess.Today.StartGFToEndCrop.LateSeason.XYPairs.X = 0, 0.5, 1
            [Leaf].Photosynthesis.FW.Excess.Today.StartGFToEndCrop.LateSeason.XYPairs.Y = 1, 1, 0.2
            [Leaf].Photosynthesis.FW.Excess.PersistentReduction.C = -0.04
        Cultivar DMY1
          Command:
            [Phenology].Juvenile.Target.FixedValue = 350
            [Phenology].Photosensitive.Target.XYPairs.Y = 0,0,0
            [Phenology].FlagLeafToFlowering.Target.FixedValue = 1
            [Phenology].FloweringToGrainFilling.Target.FixedValue = 95
            [Phenology].GrainFilling.Target.FixedValue = 450
            [Phenology].Maturing.Target.FixedValue = 1
            [Phenology].MaturityToHarvestRipe.Target.FixedValue = 100
            [Rachis].DMDemands.Structural.DMDemandFunction.MaximumOrganWt.FixedValue = 36
            [Leaf].Photosynthesis.RUE.FixedValue = 2.4
            [Grain].MaximumGrainsPerCob.PotentialMaximumGrainsPerCob.FixedValue =  637
            [Grain].MaximumPotentialGrainSize.PotentialGrainSize.FixedValue = 0.34
            [Phenology].Emerging.Target.ShootLag.FixedValue = 250
            [Phenology].Emerging.Target.DepthxRate.ShootRate.FixedValue = 0.7
            // WL params
            [Root].RootFrontVelocity.AFPSFactor.XYPairs.Y = 0, 1, 1
            [Leaf].Photosynthesis.FW.Excess.Today.SowToFloralInitiation.EarlySeason.XYPairs.X = 0, 0.25, 1
            [Leaf].Photosynthesis.FW.Excess.Today.SowToFloralInitiation.EarlySeason.XYPairs.Y = 1, 1, 0.15
            [Leaf].Photosynthesis.FW.Excess.Today.FloralInitiationToStartGrainFill.MidSeason.XYPairs.X = 0, 0.75, 1
            [Leaf].Photosynthesis.FW.Excess.Today.FloralInitiationToStartGrainFill.MidSeason.XYPairs.Y = 1, 1, 0.5
            [Leaf].Photosynthesis.FW.Excess.Today.StartGFToEndCrop.LateSeason.XYPairs.X = 0, 0.95, 1
            [Leaf].Photosynthesis.FW.Excess.Today.StartGFToEndCrop.LateSeason.XYPairs.Y = 1, 1, 0.9
            [Grain].MaximumGrainsPerCob.FOXgn.XYPairs.X = 0, 1, 5, 16, 20
            [Grain].MaximumGrainsPerCob.FOXgn.XYPairs.Y = 1, 1, 0.95, 0.9, 0.85
            [Leaf].Photosynthesis.FW.Excess.PersistentReduction.C = -0.18
      CompositeBiomass Spike: OrganNames=[Husk, Rachis]; IncludeLive=true; IncludeDead=false
        Memo
          The SpikeLive composite biomass object includes the Live pools of then non-grain organs within the reproductive spike to allow output for total dry matter and Nutrient contents, including total structural, non-structural and metabolic pools.
      Constant MortalityRate: FixedValue=0
      Constant SeedMortalityRate: FixedValue=0
      AccumulateFunction CumulativeExcessWaterStress: StartStageName=Emergence; EndStageName=Maturity; FractionRemovedOnCut=0; FractionRemovedOnHarvest=1; FractionRemovedOnGraze=0; FractionRemovedOnPrune=0
        SubtractFunction
          Constant: FixedValue=1
          VariableReference: VariableName=[Leaf].Photosynthesis.FW.Excess.Today
  Folder Exp1and2
    Experiment Exp1_2013
      Factors
        Permutation
          Factor _WL_: Specification=[WL]
            Operations 0
            Operations 1
              2013-06-18  [SwimSubsurfaceDrain].Open = false
              2013-06-18  [DumpWater].Script.Dump = true
              2013-06-19  [SwimSubsurfaceDrain].Open = true
              2013-06-19  [DumpWater].Script.Dump = false
            Operations 3
              2013-06-18  [SwimSubsurfaceDrain].Open = false
              2013-06-18  [DumpWater].Script.Dump = true
              2013-06-21  [SwimSubsurfaceDrain].Open = true
              2013-06-21  [DumpWater].Script.Dump = false
            Operations 7
              2013-06-18  [SwimSubsurfaceDrain].Open = false
              2013-06-18  [DumpWater].Script.Dump = true
              2013-06-25  [SwimSubsurfaceDrain].Open = true
              2013-06-25  [DumpWater].Script.Dump = false
      Simulation Base_1
        Clock: Start=2013-01-01; End=2013-12-31
        Summary SummaryFile
        Weather: FileName=Kaur.met
        SoilArbitrator Soil Arbitrator
        Zone Field: Area=1; Slope=0; AspectAngle=0; Altitude=50
          Fertiliser
          Manager SWIMSetLowerBC
            LowerBCType = watertable
            LowerBCValue = 3000
```csharp
using Models.Climate;
using APSIM.Shared.Utilities;
using Models.Soils.Nutrients;
using Models.Soils;
using Models.PMF;
using Models.Core;
using System.Xml.Serialization;
using System;
using System.Linq;
using Models.AgPasture;
using Models.Interfaces;

namespace Models
{
    [Serializable] 
    [System.Xml.Serialization.XmlInclude(typeof(Model))]
    public class Script : Model
    {
        [Link] Clock clock;
        [Link] ISummary summary;
        [Link] private Swim3 swim;
        //[Link] private PastureSpecies ryegrass;
        //[Link] private SimpleGrazing grazing;
        
        public enum LowerBCTypeOptions {gradient,seepage,potential,watertable};

        [Separator("Sets the lower boundary condition type (and value if set to 'potential' for SWIM3. The change is applied at the beginning of the first day of the simulation.")]
        
        [Description("What lower boundary condition is wanted?")] public LowerBCTypeOptions LowerBCType { get; set; }


        [Display(VisibleCallback = "IsBCPotentialOrWater")]
        [Description("What should the lower BC potential be set to (should be positive for a watertable) (mm)?")] public double LowerBCValue { get; set; }
        
        public bool IsBCPotentialOrWater => LowerBCType == LowerBCTypeOptions.potential || LowerBCType == LowerBCTypeOptions.watertable;





        public double SoilWaterStart  { get; set; }
        public double SoilWaterEnd  { get; set; }

        [EventSubscribe("DoDailyInitialisation")]
        private void DoDailyInitialisation(object sender, EventArgs e)
        {
        }

        [EventSubscribe("DoReportCalculations")]
        private void DoReportCalculations(object sender, EventArgs e)
        {
        }

        [EventSubscribe("DoManagement")]
        private void DoDailyCalculations(object sender, EventArgs e)
        {
            if (clock.Today == clock.StartDate)
            {
                summary.WriteMessage(this, "Script is setting lower boundary condition to " + LowerBCType, MessageType.Diagnostic);
                if (LowerBCType == LowerBCTypeOptions.gradient)
                    swim.SetLowerBCForGradient(bbcGradient: 0.0);   // in cm/cm (ibbc=0) Note that this is the default setting
                else if (LowerBCType == LowerBCTypeOptions.potential)
                    swim.SetLowerBCForGivenPotential(bbcPotential: LowerBCValue /10.0 );    //  convert to cm (ibbc=1), DUL is -100 cm so values more positive will often result in inflow to the bottom of the soil profile. Input in mm so divide here.
                else if (LowerBCType == LowerBCTypeOptions.seepage)
                    swim.SetLowerBCForSeepage(bbcPotentialSeepage: 0.0);  // in cm (ibbc=3). This is for zero-tension lysimeters
                else if (LowerBCType == LowerBCTypeOptions.watertable)
                    swim.SetLowerBCForSeepage(LowerBCValue / 10.0);  // in cm (ibbc=4). This is for water tables
                else
                    throw new Exception("Wrong lower boundary condition type");
            }
        }
    }
}
```
          Manager SWIMSetSurfaceBC
            SurfaceBCType = PowerFunction
            MinimumSurfaceStorage = 10
            MaximumSurfaceStorage = 20
            InitialSurfaceStorage = 15
            PrecipitationConstant = 50
            RunoffRateFactor = 0.2
            RunoffRatePower = 2
```csharp
using Models.Climate;
using APSIM.Shared.Utilities;
using Models.Soils.Nutrients;
using Models.Soils;
using Models.PMF;
using Models.Core;
using System.Xml.Serialization;
using System;
using System.Linq;
using Models.AgPasture;
using Models.Interfaces;

namespace Models
{
    [Serializable] 
    [System.Xml.Serialization.XmlInclude(typeof(Model))]
    public class Script : Model
    {
        [Link] ISummary summary;
        [Link] private Swim3 swim;
        
        public enum SurfaceBCOptions { CurveNumber, PowerFunction };

        [Separator("Sets SWIMs surface boundary condition to either a curve number approach or a power function.")]
        

        [Description("What surface boundary condition?")] 
        public SurfaceBCOptions SurfaceBCType { get; set; }

        [Description("Minimum surface storage (mm):")] 
        [Display(EnabledCallback = "IsPowerFunction")] 
        public double MinimumSurfaceStorage { get; set; }

        [Description("Maximum surface storage (mm):")] 
        [Display(EnabledCallback = "IsPowerFunction")] 
        public double MaximumSurfaceStorage { get; set; }

        [Description("Initial surface storage (mm):")] 
        [Display(EnabledCallback = "IsPowerFunction")] 
        public double InitialSurfaceStorage { get; set; }

        [Description("Precipitation constant:")] 
        [Display(EnabledCallback = "IsPowerFunction")] 
        public double PrecipitationConstant { get; set; }

        [Description("Runoff rate factor:")] 
        [Display(EnabledCallback = "IsPowerFunction")] 
        public double RunoffRateFactor { get; set; }

        [Description("Runoff rate power:")] 
        [Display(EnabledCallback = "IsPowerFunction")] 
        public double RunoffRatePower { get; set; }

        /// <summary></summary>
        public bool IsPowerFunction => SurfaceBCType == SurfaceBCOptions.PowerFunction;


        [EventSubscribe("StartOfSimulation")]
        private void DoDailyInitialisation(object sender, EventArgs e)
        {
            summary.WriteMessage(this, "Script is setting surface boundary condition to " + SurfaceBCType, MessageType.Diagnostic);
            if (SurfaceBCType == SurfaceBCOptions.CurveNumber)
                swim.SetSurfaceBCForCurveNumber();
            else if (SurfaceBCType == SurfaceBCOptions.PowerFunction)
                swim.SetSurfaceBCForPowerFunction(minimumSurfaceStorage: 10, 
                                                    maximumSurfaceStorage: 20, 
                                                     initialSurfaceStorage: 15, 
                                                     precipitationConstant: 50, 
                                                     runoffRateFactor: 0.2, 
                                                     runoffRatePower: 2);
        }
    }
}
```
          SurfaceOrganicMatter: InitialResidueName=soybean; InitialResidueType=soybean; InitialResidueMass=2000; InitialStandingFraction=0; InitialCPR=0; InitialCNR=35
          MicroClimate: a_interception=0; b_interception=1; c_interception=0; d_interception=0; SoilHeatFluxFraction=0.4; MinimumHeightDiffForNewLayer=0; NightInterceptionFraction=0.5; ReferenceHeight=2
          Plant Maize
          Irrigation
          Soil KaurSoil: Latitude=42; Longitude=-94; DataSource=CSIRO Sustainable Ecosystems, Toowoomba
            Comments=Soil naming structure: \State\Region\Classification-Local Name (Site/district and locator number); oc and ph estimated
            Physical
              Thickness  ParticleSizeSand  ParticleSizeSilt  ParticleSizeClay  Rocks  BD     AirDry  LL15   DUL      SAT    KS
              50         11                66                23                0      1.52   0.077   0.155  0.332    0.414  69.306
              50         11                66                23                0      1.52   0.077   0.155  0.332    0.414  69.306
              50         11                66                23                0      1.52   0.077   0.155  0.332    0.414  69.306
              150        11                66                23                0      1.521  0.124   0.155  0.33213  0.413  69.131
              150        10.86667          66.53333          22.6              0      1.534  0.151   0.151  0.33247  0.408  66.849
              150        10.26667          65.46667          24.26667          0      1.3    0.161   0.161  0.3402   0.38   38.711
              200        11                53                36                0      1.3    0.2     0.2    0.371    0.39   8.325
              200        11                53                36                0      1.3    0.2     0.2    0.371    0.39   8.325
              200        11                53                36                0      1.3    0.2     0.2    0.371    0.39   8.325
              300        11                54.73333          34.26667          0      1.3    0.2     0.2    0.3697   0.39   1.93
              300        11                57                32                0      1.3    0.2     0.2    0.368    0.39   2.002
              300        11                57                32                0      1.3    0.2     0.2    0.368    0.39   1
              300        11                57                32                0      1.3    0.2     0.2    0.368    0.39   0.5
              300        11                57                32                0      1.3    0.2     0.2    0.368    0.39   0.25
              300        11                57                32                0      1.3    0.2     0.2    0.368    0.39   0.1
              300        11                57                32                0      1.3    0.2     0.2    0.368    0.39   0.05
              300        11                57                32                0      1.3    0.2     0.2    0.368    0.39   0.0025
              300        11                57                32                0      1.3    0.2     0.2    0.368    0.39   0.001
              Rocks source: Calculated
              SoilCrop MaizeSoil
                LL=[0.155, 0.15503, 0.15509, 0.15506, 0.15127, 0.16053, 0.217, 0.217, 0.217, 0.20963, 0.2, 0.2, 0.2, 0.2, 0.2, 0.2, 0.2, 0.2]
                KL=[0.08, 0.08, 0.08, 0.08, 0.08, 0.08, 0.08, 0.08, 0.06802, 0.06371, 0.05798, 0.05172, 0.04494, 0.0377, 0.03002, 0.02193, 0.01344, 0.00457]
                XF=[0.99, 0.99, 0.99, 0.98, 0.852, 0.745, 0.55, 0.55, 0.55, 0.623, 0.718, 0.718, 0.718, 0.718, 0.718, 0.718, 0.718, 0.25]
              SoilCrop SoybeanSoil
                LL=[0.155, 0.15503, 0.15509, 0.15506, 0.15127, 0.16053, 0.217, 0.217, 0.217, 0.20963, 0.2, 0.2, 0.2, 0.2, 0.2, 0.2, 0.2, 0.2]
                KL=[0.08, 0.08, 0.08, 0.08, 0.08, 0.08, 0.08, 0.08, 0.06802, 0.06371, 0.05798, 0.05172, 0.04494, 0.0377, 0.03002, 0.02193, 0.01344, 0.00457]
                XF=[0.872, 0.872, 0.872, 0.87013, 0.8524, 0.74507, 0.55, 0.55, 0.55, 0.6228, 0.718, 0.718, 0.718, 0.718, 0.718, 0.718, 0.718, 0.25]
              SoilCrop WheatSoil: same as Exp1and2.Exp1_2013.Base_1.Field.KaurSoil.Physical.SoybeanSoil
              SoilCrop BarleySoil: same as Exp1and2.Exp1_2013.Base_1.Field.KaurSoil.Physical.SoybeanSoil
              SoilCrop CanolaSoil: same as Exp1and2.Exp1_2013.Base_1.Field.KaurSoil.Physical.SoybeanSoil
            Swim3: Salb=0.23; CN2Bare=60; CNRed=20; CNCov=0.8; KDul=0.1; PSIDul=-100; VC=true; DTMin=0; DTMax=1440; MaxWaterIncrement=5; SpaceWeightingFactor=0.5; SoluteSpaceWeightingFactor=0.5; Dis=15; Disp=1; A=1; DTHC=0; DTHP=1; vcon1=7.28e-09; vcon2=7.26e-07; eo_time=06:00; eo_durn=720; default_rain_time=00:00; default_rain_duration=720; Diagnostics=false
              SwimSubsurfaceDrain: DrainDepth=300; DrainSpacing=180000; DrainRadius=10; Klat=100; ImpermDepth=3900; Open=true
            Organic: FOMCNRatio=29; CarbonUnits=Total
              Thickness  Carbon   SoilCNRatio  FBiom    FInert   FOM
              50         2.03488  11           0.1264   0.365    100
              50         2.03488  11           0.09159  0.365    100
              50         2.03488  11           0.06997  0.365    100
              150        1.95736  11           0.04416  0.44712  100
              150        1.37597  11           0.03374  0.69875  100
              150        0.71705  11           0.02787  0.71825  100
              200        0.2907   11           0.02302  0.82251  100
              200        0.2907   11           0.01985  0.85137  100
              200        0.2907   11           0.01759  0.88023  100
              300        0.22771  11           0.01517  0.902    100
              300        0.14535  11           0.01344  0.92502  100
              300        0.14535  11           0.01213  0.96674  100
              300        0.14535  11           0.0111   0.999    100
              300        0.14535  11           0.01027  0.999    100
              300        0.14535  11           0.00957  0.999    100
              300        0.14535  11           0.00899  0.999    100
              300        0.14535  11           0.00848  0.999    100
              300        0.14535  11           0.00804  0.999    100
            Chemical: PHUnits=Water
              Thickness  PH       CEC
              50         7        11.45648
              50         7        11.45648
              50         7        11.45648
              150        6.90667  11.28206
              150        6.16667  9.8582
              150        5.3      8.78043
              200        5.3      11.003075
              200        5.3      11.003075
              200        5.3      11.003075
              300        5.73333  10.3985
              300        6.3      9.6080375
              300        6.3      9.6080375
              300        6.3      9.6080375
              300        6.3      9.6080375
              300        6.3      9.6080375
              300        6.3      9.6080375
              300        6.3      9.6080375
              300        6.3      9.6080375
              CEC source: Calculated
            Water: FilledFromTop=false
              Thickness=[50, 50, 50, 150, 150, 150, 200, 200, 200, 300, 300, 300, 300, 300, 300, 300, 300, 300]
              InitialValues=[0.332, 0.332, 0.332, 0.332, 0.332, 0.34, 0.371, 0.39, 0.39, 0.39, 0.39, 0.39, 0.39, 0.39, 0.39, 0.39, 0.39, 0.39]
            Solute NO3: InitialValuesUnits=kg/ha; WaterTableConcentration=0; D0=0.05; DepthConstant=0; MaxDepthSoluteAccessible=0; RunoffEffectivenessAtMovingSolute=0; MaxEffectiveRunoff=0
              Thickness  InitialValues  Exco  FIP
              50         3.05233        0     1
              50         3.05233        0     1
              50         3.05233        0     1
              150        2.93605        0     1
              150        2.06395        0     1
              150        1.07558        0     1
              200        0.43605        0     1
              200        0.43605        0     1
              200        0.43605        0     1
              300        0.34157        0     1
              300        0.21802        0     1
              300        0.21802        0     1
              300        0.21802        0     1
              300        0.21802        0     1
              300        0.21802        0     1
              300        0.21802        0     1
              300        0.21802        0     1
              300        0.21802        0     1
            Solute NH4: InitialValuesUnits=kg/ha; WaterTableConcentration=0; D0=0.05; DepthConstant=0; MaxDepthSoluteAccessible=0; RunoffEffectivenessAtMovingSolute=0; MaxEffectiveRunoff=0
              Thickness  InitialValues  Exco  FIP
              50         3.05233        1     1
              50         3.05233        1     1
              50         3.05233        1     1
              150        2.93605        1     1
              150        2.06395        1     1
              150        1.07558        1     1
              200        0.43605        1     1
              200        0.43605        1     1
              200        0.43605        1     1
              300        0.34157        1     1
              300        0.21802        1     1
              300        0.21802        1     1
              300        0.21802        1     1
              300        0.21802        1     1
              300        0.21802        1     1
              300        0.21802        1     1
              300        0.21802        1     1
              300        0.21802        1     1
            Solute Urea: InitialValuesUnits=kg/ha; WaterTableConcentration=0; D0=0.05; DepthConstant=0; MaxDepthSoluteAccessible=0; RunoffEffectivenessAtMovingSolute=0; MaxEffectiveRunoff=0
              Thickness  InitialValues  Exco  FIP
              50         0              0     1
              50         0              0     1
              50         0              0     1
              150        0              0     1
              150        0              0     1
              150        0              0     1
              200        0              0     1
              200        0              0     1
              200        0              0     1
              300        0              0     1
              300        0              0     1
              300        0              0     1
              300        0              0     1
              300        0              0     1
              300        0              0     1
              300        0              0     1
              300        0              0     1
              300        0              0     1
            Nutrient
            SoilTemperature Temperature
          Operations WL
          Manager Fert_Preplant
            FertiliserType = UreaN
            FertiliserDates = 14-May
            Amount = 168
            AmountType = False
```csharp
using Models.Soils;
using System;
using System.Linq;
using Models.Core;
using Models.PMF;
using APSIM.Shared.Utilities;
namespace Models
{
    [Serializable]
    public class Script : Model
    {
        [Link] Clock Clock;
        [Link] Fertiliser Fertiliser;
        
        [Separator("A component to apply fertiliser on one or more dates on every year of the simulation")]

        [Description("Type of fertiliser to apply? ")] 
        [Display(Type = DisplayType.FertiliserType)]public string FertiliserType { get; set; }

        [Description("Enter the fertilisation dates as dd-mmm with comma separation (any year information entered will be ignored): ")] 
        public string[] FertiliserDates { get; set; } 

        [Description("Amount of fertiliser to be applied (kg /ha)")] 
        public double Amount { get; set; }

        [Description("Is the above amount to be applied each time? (yes/ticked)? Or is it the total annual amount across all dates (no/unticked)")] 
        public bool AmountType { get; set; }
        
        [EventSubscribe("DoManagement")]
        private void OnDoManagement(object sender, EventArgs e)
        {
            foreach (string ddMMM in FertiliserDates)
            {
                if (DateUtilities.DatesEqual(ddMMM, Clock.Today))
                {
                    if (AmountType)
                        Fertiliser.Apply(amount: Amount, type: FertiliserType);
                    else
                        Fertiliser.Apply(amount: Amount / FertiliserDates.Length, type: FertiliserType);
                }
            }
        }
    }
}
```
          Manager Fert_RescusN
            FertiliserType = UreaN
            FertiliserDates = 08-Jul
            Amount = 84
            AmountType = False
            script: same as in Exp1and2.Exp1_2013.Base_1.Field.Fert_Preplant
          Manager Sowing
            Crop = [Maize]
            SowDate = 14-May
            CultivarName = DeKalb_62_97VT3_Kaur
            SowingDepth = 60
            RowSpacing = 760
            Population = 7
```csharp
using APSIM.Shared.Utilities;
using Models.Utilities;
using Models.Soils;
using Models.PMF;
using Models.Core;
using System;

namespace Models
{
    [Serializable]
    public class Script : Model
    {
        [Link] Clock Clock;
        [Link] Fertiliser Fertiliser;
        [Link] Summary Summary;
        [Link] Soil Soil;
        
        [Description("Crop")]
        public IPlant Crop { get; set; }

        [Description("Sowing date (d-mmm)")]
        public string SowDate { get; set; }

        [Display(Type = DisplayType.CultivarName)]
        [Description("Cultivar to be sown")]
        public string CultivarName { get; set; }

        [Description("Sowing depth (mm)")]
        public double SowingDepth { get; set; }

        [Description("Row spacing (mm)")]
        public double RowSpacing { get; set; }

        [Description("Plant population (/m2)")]
        public double Population { get; set; }

        [EventSubscribe("DoManagement")]
        private void OnDoManagement(object sender, EventArgs e)
        {
            if (DateUtilities.WithinDates(SowDate, Clock.Today, SowDate))
            {
                Crop.Sow(population: Population, cultivar: CultivarName, depth: SowingDepth, rowSpacing: RowSpacing);    
            }
        }
    }
}
```
          Manager Harvesting
            Crop = [Maize]
```csharp
using APSIM.Shared.Utilities;
using Models.Utilities;
using Models.Soils;
using Models.PMF;
using Models.Core;
using System;
using System.Linq;

namespace Models
{
    [Serializable] 
    public class Script : Model
    {
        [Description("Crop")]
        public IPlant Crop { get; set; }
        
        [EventSubscribe("DoManagement")]
        private void OnDoManagement(object sender, EventArgs e)
        {
            if (Crop.IsReadyForHarvesting)
            {
                Crop.Harvest();
                Crop.EndCrop();
            }
        }
    }
}
```
          Report Report_Harvest: EventNames=[Maize].Harvesting
            VariableNames:
              [Maize].SowingDate as SowingDate
          Manager DumpWater
            ApplicationAmount = 100
```csharp
using System;
using Models.Core;
using Models.Interfaces;
using Models.PMF;
using APSIM.Shared.Utilities;

namespace Models
{
    [Serializable]
    public class Script : Model
    {
        [Link] IClock Clock;
        [Link] ISummary Summary;
        [Link] Irrigation Irrigation;
        
        [Description("Ammount of water to dump (mm).")]
        public double ApplicationAmount { get; set; }
        
        public bool Dump { get; set;} = false;

        [EventSubscribe("DoManagement")]
        private void DoDailyCalculations(object sender, EventArgs e)
        {
            if (!Dump)
                return;
            Irrigation.Apply(ApplicationAmount);
        }
    }
}
```
          Report Report_Day: VariableNames=[Clock].Today; EventNames=[Clock].Today
    Experiment Exp1_2014
      Factors
        Permutation
          Factor _WL_: Specification=[WL]
            Operations 0
            Operations 1
              2014-05-29  [SwimSubsurfaceDrain].Open = false
              2014-05-29  [DumpWater].Script.Dump = true
              2014-05-30  [SwimSubsurfaceDrain].Open = true
              2014-05-30  [DumpWater].Script.Dump = false
            Operations 3
              2014-05-30  [SwimSubsurfaceDrain].Open = false
              2014-05-30  [DumpWater].Script.Dump = true
              2014-06-01  [SwimSubsurfaceDrain].Open = true
              2014-06-01  [DumpWater].Script.Dump = false
            Operations 7
              2014-05-28  [SwimSubsurfaceDrain].Open = false
              2014-05-28  [DumpWater].Script.Dump = true
              2014-06-12  [SwimSubsurfaceDrain].Open = true
              2014-06-12  [DumpWater].Script.Dump = false
      Simulation Base_2
        Clock: Start=2014-01-01; End=2014-12-31
        Summary SummaryFile
        Weather: FileName=Kaur.met
        SoilArbitrator Soil Arbitrator
        Zone Field: Area=1; Slope=0; AspectAngle=0; Altitude=50
          Fertiliser
          Manager SWIMSetLowerBC: same as Exp1and2.Exp1_2013.Base_1.Field.SWIMSetLowerBC
          Manager SWIMSetSurfaceBC: same as Exp1and2.Exp1_2013.Base_1.Field.SWIMSetSurfaceBC
          SurfaceOrganicMatter: InitialResidueName=soybean; InitialResidueType=soybean; InitialResidueMass=2000; InitialStandingFraction=0; InitialCPR=0; InitialCNR=35
          MicroClimate: a_interception=0; b_interception=1; c_interception=0; d_interception=0; SoilHeatFluxFraction=0.4; MinimumHeightDiffForNewLayer=0; NightInterceptionFraction=0.5; ReferenceHeight=2
          Plant Maize
          Irrigation
          Soil KaurSoil: same as Exp1and2.Exp1_2013.Base_1.Field.KaurSoil
          Operations WL
          Manager Fert_Preplant
            FertiliserType = UreaN
            FertiliserDates = 11-Apr
            Amount = 168
            AmountType = False
            script: same as in Exp1and2.Exp1_2013.Base_1.Field.Fert_Preplant
          Manager Fert_RescusN
            FertiliserType = UreaN
            FertiliserDates = 23-Jun
            Amount = 84
            AmountType = False
            script: same as in Exp1and2.Exp1_2013.Base_1.Field.Fert_Preplant
          Manager Sowing
            Crop = [Maize]
            SowDate = 11-Apr
            CultivarName = DeKalb_62_97VT3_Kaur
            SowingDepth = 60
            RowSpacing = 760
            Population = 8.1
            script: same as in Exp1and2.Exp1_2013.Base_1.Field.Sowing
          Manager Harvesting: same as Exp1and2.Exp1_2013.Base_1.Field.Harvesting
          Report Report_Harvest: EventNames=[Maize].Harvesting
            VariableNames:
              [Maize].SowingDate as SowingDate
          Manager DumpWater
            ApplicationAmount = 25
            script: same as in Exp1and2.Exp1_2013.Base_1.Field.DumpWater
          Report Report_Day: VariableNames=[Clock].Today; EventNames=[Clock].Today
    Experiment Exp2_2013
      Factors
        Permutation
          Factor _WL_: Specification=[WL]
            Operations 0
            Operations 7
              2013-06-02  [SwimSubsurfaceDrain].Open = false
              2013-06-02  [DumpWater].Script.Dump = true
              2013-06-12  [SwimSubsurfaceDrain].Open = true
              2013-06-12  [DumpWater].Script.Dump = false
      Simulation Base_3
        Clock: Start=2013-01-01; End=2013-12-31
        Summary SummaryFile
        Weather: FileName=Kaur.met
        SoilArbitrator Soil Arbitrator
        Zone Field: Area=1; Slope=0; AspectAngle=0; Altitude=50
          Fertiliser
          Manager SWIMSetLowerBC: same as Exp1and2.Exp1_2013.Base_1.Field.SWIMSetLowerBC
          Manager SWIMSetSurfaceBC: same as Exp1and2.Exp1_2013.Base_1.Field.SWIMSetSurfaceBC
          SurfaceOrganicMatter: InitialResidueName=soybean; InitialResidueType=soybean; InitialResidueMass=2000; InitialStandingFraction=0; InitialCPR=0; InitialCNR=35
          MicroClimate: a_interception=0; b_interception=1; c_interception=0; d_interception=0; SoilHeatFluxFraction=0.4; MinimumHeightDiffForNewLayer=0; NightInterceptionFraction=0.5; ReferenceHeight=2
          Plant Maize
          Irrigation
          Soil KaurSoil: same as Exp1and2.Exp1_2013.Base_1.Field.KaurSoil
          Operations WL
          Manager Fert_Preplant
            FertiliserType = UreaN
            FertiliserDates = 14-May
            Amount = 112
            AmountType = False
            script: same as in Exp1and2.Exp1_2013.Base_1.Field.Fert_Preplant
          Manager Fert_RescusN
            FertiliserType = UreaN
            FertiliserDates = 01-Jul
            Amount = 25
            AmountType = False
            script: same as in Exp1and2.Exp1_2013.Base_1.Field.Fert_Preplant
          Manager Sowing
            Crop = [Maize]
            SowDate = 15-May
            CultivarName = DeKalb_62_97VT3_Kaur
            SowingDepth = 60
            RowSpacing = 760
            Population = 7.2
            script: same as in Exp1and2.Exp1_2013.Base_1.Field.Sowing
          Manager Harvesting: same as Exp1and2.Exp1_2013.Base_1.Field.Harvesting
          Report Report_Harvest: EventNames=[Maize].Harvesting
            VariableNames:
              [Maize].SowingDate as SowingDate
          Manager DumpWater: same as Exp1and2.Exp1_2013.Base_1.Field.DumpWater
          Report Report_Day: VariableNames=[Clock].Today; EventNames=[Clock].Today
    Experiment Exp2_2015
      Factors
        Permutation
          Factor _WL_: Specification=[WL]
            Operations 0
            Operations 7
              2015-05-13  [SwimSubsurfaceDrain].Open = false
              2015-05-13  [DumpWater].Script.Dump = true
              2015-05-17  [SwimSubsurfaceDrain].Open = true
              2015-05-17  [DumpWater].Script.Dump = false
          Factor _N_: Specification=[Fert_Preplant].Script.Amount = 0,168
      Simulation Base_4
        Clock: Start=2015-01-01; End=2015-12-31
        Summary SummaryFile
        Weather: FileName=Kaur.met
        SoilArbitrator Soil Arbitrator
        Zone Field: Area=1; Slope=0; AspectAngle=0; Altitude=50
          Fertiliser
          Manager SWIMSetLowerBC: same as Exp1and2.Exp1_2013.Base_1.Field.SWIMSetLowerBC
          Manager SWIMSetSurfaceBC: same as Exp1and2.Exp1_2013.Base_1.Field.SWIMSetSurfaceBC
          SurfaceOrganicMatter: InitialResidueName=soybean; InitialResidueType=soybean; InitialResidueMass=2000; InitialStandingFraction=0; InitialCPR=0; InitialCNR=35
          MicroClimate: a_interception=0; b_interception=1; c_interception=0; d_interception=0; SoilHeatFluxFraction=0.4; MinimumHeightDiffForNewLayer=0; NightInterceptionFraction=0.5; ReferenceHeight=2
          Plant Maize
          Irrigation
          Soil KaurSoil: same as Exp1and2.Exp1_2013.Base_1.Field.KaurSoil
          Operations WL
          Manager Fert_Preplant
            FertiliserType = UreaN
            FertiliserDates = 22-Apr
            Amount = 168
            AmountType = False
            script: same as in Exp1and2.Exp1_2013.Base_1.Field.Fert_Preplant
          Manager Fert_RescusN
            FertiliserType = UreaN
            FertiliserDates = 07-Jun
            Amount = 30
            AmountType = False
            script: same as in Exp1and2.Exp1_2013.Base_1.Field.Fert_Preplant
          Manager Sowing
            Crop = [Maize]
            SowDate = 22-Apr
            CultivarName = DeKalb_62_97VT3_Kaur
            SowingDepth = 50
            RowSpacing = 760
            Population = 7.5
            script: same as in Exp1and2.Exp1_2013.Base_1.Field.Sowing
          Manager Harvesting: same as Exp1and2.Exp1_2013.Base_1.Field.Harvesting
          Report Report_Harvest: EventNames=[Maize].Harvesting
            VariableNames:
              [Maize].SowingDate as SowingDate
          Manager DumpWater
            ApplicationAmount = 20
            script: same as in Exp1and2.Exp1_2013.Base_1.Field.DumpWater
          Report Report_Day: VariableNames=[Clock].Today; EventNames=[Clock].Today
  Folder Exp3
    Folder Experiment2017
      Simulation Control2017
        Clock: Start=2017-01-01; End=2017-10-31
        Summary
        Weather: FileName=Harbin2017-2018.met
        SoilArbitrator
        MicroClimate: a_interception=0; b_interception=1; c_interception=0; d_interception=0; SoilHeatFluxFraction=0.4; MinimumHeightDiffForNewLayer=0; NightInterceptionFraction=0.5; ReferenceHeight=2
        Zone Field: Area=1; Slope=0; AspectAngle=0; Altitude=50
          Report: EventNames=[Clock].EndOfDay
            VariableNames:
              [Clock].Today
              [Maize].Phenology.BBCH.Stage
              [Maize].Phenology.CurrentStageName
              [Maize].AboveGround.Wt*10 as Biomass
              [Maize].Grain.Total.Wt*10 as Yield
              [Grain].Number
              [Swim3].watertable
          Report ReportHarvest: EventNames=[Maize].Harvesting
            VariableNames:
              [Clock].Today
              [Maize].Phenology.CurrentStageName
              [Maize].AboveGround.Wt*10 as Biomass
              [Maize].Grain.Total.Wt
              [Grain].Number
          Fertiliser
          SurfaceOrganicMatter: InitialResidueName=wheat_stubble; InitialResidueType=wheat; InitialResidueMass=500; InitialStandingFraction=0; InitialCPR=0; InitialCNR=100
          Plant Maize
          Manager Fertilise at sowing
            Crop = [Maize]
            FertiliserType = UreaN
            Amount = 450
```csharp
using Models.Soils;
using System;
using System.Linq;
using Models.Core;
using Models.PMF;
namespace Models
{
    [Serializable]
    public class Script : Model
    {
        [Link] Clock Clock;
        [Link] Fertiliser Fertiliser;
        
        [Description("Crop to be fertilised")]
        public IPlant Crop { get; set; }

        [Description("Type of fertiliser to apply? ")] 
        [Display(Type = DisplayType.FertiliserType)]public string FertiliserType { get; set; }
    
        [Description("Amount of fertiliser to be applied (kg/ha)")]
        public double Amount { get; set; }
        
        [EventSubscribe("Sowing")]
        private void OnSowing(object sender, EventArgs e)
        {
            Model crop = sender as Model;
            if (Crop != null && crop.Name.ToLower() == (Crop as IModel).Name.ToLower())
                Fertiliser.Apply(amount: Amount, type: FertiliserType);
        }
    }
}
```
          Manager Harvest: same as Exp1and2.Exp1_2013.Base_1.Field.Harvesting
          Irrigation
          Operations
            2017-04-25  [Maize].Sow(DMY1,7.5,30,500)
            2018-04-28  [Maize].Sow(DMY1,7.5,30,500)
          Soil TianSoil: ASCOrder=NA; ASCSubOrder=NA; State=China; NaturalVegetation=Unknown; Latitude=45.93; Longitude=126.57
            Water: FilledFromTop=false
              Thickness=[10, 10, 10, 10, 10, 10, 240, 100, 50, 50, 50, 50, 50, 50, 50, 50, 50, 50, 50, 50, 50, 60, 40, 50]
              InitialValues=[0.331, 0.331, 0.331, 0.293, 0.293, 0.293, 0.302, 0.302, 0.302, 0.307, 0.307, 0.307, 0.306, 0.306, 0.306, 0.306, 0.303, 0.303, 0.303, 0.303, 0.331, 0.331, 0.331, 0.331]
            Physical
              Thickness  ParticleSizeSand  ParticleSizeSilt  ParticleSizeClay  Rocks  BD     AirDry  LL15   DUL    SAT    KS
              10         5                 65                30                0      1.303  0.059   0.177  0.331  0.438  60.746
              10         5                 65                30                0      1.303  0.059   0.177  0.331  0.438  60.746
              10         5                 65                30                0      1.303  0.059   0.177  0.331  0.438  60.746
              10         5                 65                30                0      1.38   0.057   0.171  0.293  0.422  27.853
              10         5                 65                30                0      1.38   0.057   0.171  0.293  0.422  27.853
              10         5                 65                30                0      1.38   0.057   0.171  0.293  0.422  27.853
              240        5                 65                30                0      1.379  0.065   0.194  0.302  0.432  10.428
              100        5                 65                30                0      1.379  0.065   0.194  0.302  0.432  10.428
              50         5                 65                30                0      1.379  0.065   0.194  0.302  0.432  10.428
              50         5                 65                30                0      1.364  0.069   0.207  0.307  0.444  5.597
              50         5                 65                30                0      1.364  0.069   0.207  0.307  0.444  5.597
              50         5                 65                30                0      1.364  0.069   0.207  0.307  0.444  5.597
              50         5                 65                30                0      1.38   0.07    0.209  0.306  0.44   4.921
              50         5                 65                30                0      1.38   0.07    0.209  0.306  0.44   4.921
              50         5                 65                30                0      1.38   0.07    0.209  0.306  0.44   4.921
              50         5                 65                30                0      1.38   0.07    0.209  0.306  0.44   4.921
              50         5                 65                30                0      1.407  0.069   0.206  0.303  0.43   5.418
              50         5                 65                30                0      1.407  0.069   0.206  0.303  0.43   5.418
              50         5                 65                30                0      1.407  0.069   0.206  0.303  0.43   5.418
              50         5                 65                30                0      1.407  0.069   0.206  0.303  0.43   5.418
              50         5                 65                30                0      1.303  0.059   0.177  0.331  0.438  2
              60         5                 65                30                0      1.303  0.059   0.177  0.331  0.438  2
              40         5                 65                30                0      1.303  0.059   0.177  0.331  0.438  1
              50         5                 65                30                0      1.303  0.059   0.177  0.331  0.438  0.01
              Rocks, ParticleSizeSand, ParticleSizeSilt, ParticleSizeClay source: Calculated (layer 1, 2, 3, 4, 5, 6, 7)
              SoilCrop MaizeSoil
                LL=[0.2, 0.2, 0.2, 0.22, 0.22, 0.22, 0.21, 0.21, 0.21, 0.214, 0.214, 0.214, 0.215, 0.215, 0.215, 0.215, 0.21, 0.21, 0.21, 0.21, 0.2, 0.2, 0.2, 0.2]
                KL=[0.07, 0.07, 0.07, 0.07, 0.07, 0.07, 0.07, 0.07, 0.07, 0.065, 0.065, 0.065, 0.058, 0.058, 0.058, 0.058, 0.049, 0.049, 0.049, 0.049, 0.07, 0.07, 0.07, 0.07]
                XF=[1, 1, 1, 1, 1, 1, 1, 1, 1, 1, 1, 1, 1, 1, 1, 1, 1, 1, 1, 1, 1, 1, 1, 1]
            Organic: FOMCNRatio=40; CarbonUnits=Total
              Thickness  Carbon  SoilCNRatio  FBiom  FInert  FOM
              150        3.626   14           0.04   0.134   417.668
              150        1.915   14           0.031  0.246   287.059
              150        1.151   14           0.014  0.414   197.293
              150        0.622   14           0.01   0.761   135.597
              200        0.464   14           0.01   0.995   82.244
              200        0.476   14           0.01   0.988   49.883
              200        0.458   14           0.01   0.999   30.256
            Chemical: PHUnits=Water
              Thickness  PH     CEC
              150        5.862  16.5035
              150        5.856  12.65375
              150        5.936  10.9348
              150        6.04   9.7445
              200        6.154  9.389
              200        6.252  9.416
              200        6.31   9.3755
              CEC source: Calculated
            Solute NO3: InitialValuesUnits=kg/ha; WaterTableConcentration=0; D0=0; DepthConstant=0; MaxDepthSoluteAccessible=0; RunoffEffectivenessAtMovingSolute=0; MaxEffectiveRunoff=0
              Thickness  InitialValues  Exco  FIP
              10         30.506         1     1
              10         15.253         1     1
              10         30.506         1     1
              10         15.253         1     1
              10         15.253         1     1
              10         15.253         1     1
              240        15.253         1     1
              100        30.506         1     1
              50         15.253         1     1
              50         30.506         1     1
              50         15.253         1     1
              50         15.253         1     1
              50         15.253         1     1
              50         15.253         1     1
              50         30.506         1     1
              50         15.253         1     1
              50         30.506         1     1
              50         15.253         1     1
              50         30.506         1     1
              50         15.253         1     1
              50         15.253         1     1
              60         15.253         1     1
              40         15.253         1     1
              50         15.253         1     1
            Solute NH4: InitialValuesUnits=kg/ha; WaterTableConcentration=0; D0=0; DepthConstant=0; MaxDepthSoluteAccessible=0; RunoffEffectivenessAtMovingSolute=0; MaxEffectiveRunoff=0
              Thickness=[10, 10, 10, 10, 10, 10, 240, 100, 50, 50, 50, 50, 50, 50, 50, 50, 50, 50, 50, 50, 50, 60, 40, 50]
              InitialValues=[18.304, 9.152, 18.304, 9.152, 9.152, 9.152, 9.152, 18.304, 9.152, 18.304, 9.152, 9.152, 9.152, 9.152, 18.304, 9.152, 18.304, 9.152, 18.304, 9.152, 18.304, 9.152, 9.152, 9.152, 9.152]
              Exco=[1, 1, 1, 1, 1, 1, 1, 1, 1, 1, 1, 1, 1, 1, 1, 1, 1, 1, 1, 1, 1, 1, 1, 1, 1]
              FIP=[1, 1, 1, 1, 1, 1, 1, 1, 1, 1, 1, 1, 1, 1, 1, 1, 1, 1, 1, 1, 1, 1, 1, 1, 1]
            Solute Urea: InitialValuesUnits=kg/ha; WaterTableConcentration=0; D0=0; DepthConstant=0; MaxDepthSoluteAccessible=0; RunoffEffectivenessAtMovingSolute=0; MaxEffectiveRunoff=0
              Thickness  InitialValues  Exco  FIP
              10         0              1     1
              10         0              1     1
              10         0              1     1
              10         0              1     1
              10         0              1     1
              10         0              1     1
              240        0              1     1
              100        0              1     1
              50         0              1     1
              50         0              1     1
              50         0              1     1
              50         0              1     1
              50         0              1     1
              50         0              1     1
              50         0              1     1
              50         0              1     1
              50         0              1     1
              50         0              1     1
              50         0              1     1
              50         0              1     1
              50         0              1     1
              60         0              1     1
              40         0              1     1
              50         0              1     1
            Nutrient
            Swim3: Salb=0.13; CN2Bare=0; CNRed=20; CNCov=0.8; KDul=0.1; PSIDul=-260; VC=true; DTMin=0; DTMax=1440; MaxWaterIncrement=10; SpaceWeightingFactor=0.5; SoluteSpaceWeightingFactor=0.5; Dis=15; Disp=1; A=1; DTHC=0; DTHP=1; vcon1=7.28e-09; vcon2=7.26e-07; eo_time=06:00; eo_durn=720; default_rain_time=00:00; default_rain_duration=720; Diagnostics=false
              SwimSubsurfaceDrain: DrainDepth=10; DrainSpacing=30000; DrainRadius=50; Klat=1000; ImpermDepth=2000; Open=true
            SoilTemperature CERESSoilTemperature
            CERESSoilTemperature Temperature
          Manager AutomaticIrrigationSat
            Crop = [Maize]
            AutoIrrigationOn = True
            FASWThreshold = 0.7
            FASWDepth = 1200
            weeks = 0
            afterSowing = 1
```csharp
using APSIM.Numerics;
using Models.Interfaces;
using APSIM.Shared.Utilities;
using System.Xml.Serialization;
using Models;
using Models.PMF;
using Models.Soils;
using System.Text;
using System.Collections.Generic;
using Models.Core;
using System.Linq;
using System;
using Models.Interfaces;
namespace Models
{
    [Serializable] 
    public class Script : Model
    {
        [Link] private Zone zone;
        [Link] private Irrigation irrigation;
        [Link] private ISoilWater waterBalance;
        [Link] private IPhysical soilPhysical;
        public double FASW { get; set; }
        public double WaterDeficit  { get; set; }
    


        [Description("Crop to irrigate")]
        public IPlant Crop { get; set; }
        
        [Description("Auto irrigation on?")]
        public bool AutoIrrigationOn { get; set; }

        [Description("Threshold fraction available water (0-1)")]
        public double FASWThreshold { get; set; }

        [Description("Soil depth (mm) to which fraction available water is calculated")]
        public double FASWDepth { get; set; }

        [Description("Minimum weeks between irrigations")]
        public double weeks { get; set; }

        [Description("Minimum days after sowing for first irrigation")]
        public int afterSowing { get; set; }

        private double irrigationGap = 0;    // gap between irrigations

        /// <summary>Called at start of simulation. Performs some basic error checking. </summary>
        [EventSubscribe("StartOfSimulation")]
        private void ErrorChecking(object sender, EventArgs args)
        {
            if (Crop == null)
                throw new Exception("No crop was specified in script " + Parent.Name);
        }

        [EventSubscribe("DoManagement")]
        private void OnDoManagement(object sender, EventArgs e)
        {
            if (AutoIrrigationOn)
            {
                   irrigationGap += 1;                // increment gap between irrigations
                CalculateFASW();                // calc FASW and WaterDeficit
                if ((FASW < FASWThreshold) && (irrigationGap >= weeks * 7))
                {
                    irrigation.Apply(WaterDeficit, depth: 0);
                    irrigationGap = 0;            // reset
                }
            }
            else
            {
                irrigationGap = weeks * 7 - afterSowing - 1;    // allow irrigation a number of days after it becomes alive/sown
            }
        }

        // Calculate the fraction of the potential available sw
        // Calculate the deficit amount from DUL
        private void CalculateFASW()
        {
            double[] LL15 = MathUtilities.Multiply(soilPhysical.LL15, soilPhysical.Thickness);
            double[] SAT = MathUtilities.Multiply(soilPhysical.SAT, soilPhysical.Thickness);
        
            int nlayr = GetLayerIndex(FASWDepth);
            nlayr = Math.Min(nlayr, soilPhysical.Thickness.Length-1);
            double cumdep = MathUtilities.Sum(soilPhysical.Thickness, 0, nlayr, 0.0);    // tricky function that sums up to before nlayr

            double part_layer = MathUtilities.Divide((FASWDepth - cumdep), soilPhysical.Thickness[nlayr], 0.0);

            // note that results may be strange if swdep < ll15
            double avail_sw = (MathUtilities.Sum(waterBalance.SWmm, 0, nlayr, 0.0) + part_layer * waterBalance.SWmm[nlayr])
                            - (MathUtilities.Sum(LL15, 0, nlayr, 0.0) + part_layer * LL15[nlayr]);

            double pot_avail_sw = (MathUtilities.Sum(SAT, 0, nlayr, 0.0) + part_layer * SAT[nlayr])
                                - (MathUtilities.Sum(LL15, 0, nlayr, 0.0) + part_layer * LL15[nlayr]);
            
            FASW = MathUtilities.Divide(avail_sw, pot_avail_sw, 0.0);
            WaterDeficit = MathUtilities.Constrain(pot_avail_sw * FASWThreshold - avail_sw, 0.0, 100000);
        }

        // Get index of the layer that has this depth in it 
        private int GetLayerIndex(double pointDepth)
        {
            double[] cumThickness = soilPhysical.ThicknessCumulative;
            int layerIdx = 0;
            while ((layerIdx < cumThickness.Length) && (pointDepth > cumThickness[layerIdx]))
            {
                layerIdx += 1;
            }

            return layerIdx;
        }
    }
}
```
          Manager SWIMSetLowerBC
            LowerBCType = gradient
            LowerBCValue = 3000
            script: same as in Exp1and2.Exp1_2013.Base_1.Field.SWIMSetLowerBC
          Manager SWIMSetSurfaceBC: same as Exp1and2.Exp1_2013.Base_1.Field.SWIMSetSurfaceBC
      Experiment Experiment2017
        Factors
          Permutation
            Factor V
              CompositeFactor 3: Specifications=[WLControl].Script.BBCHStart = 12
              CompositeFactor 6: Specifications=[WLControl].Script.BBCHStart = 17
              CompositeFactor T: Specifications=[WLControl].Script.BBCHStart = 66
            Factor -
              CompositeFactor F3
                Specifications:
                  [WLControl].Script.Type = Flooding
                  [WLControl].Script.EffectDuration = 3
              CompositeFactor F6
                Specifications:
                  [WLControl].Script.Type = Flooding
                  [WLControl].Script.EffectDuration = 6
              CompositeFactor F9
                Specifications:
                  [WLControl].Script.Type = Flooding
                  [WLControl].Script.EffectDuration = 11
              CompositeFactor WL5
                Specifications:
                  [WLControl].Script.Type = Waterlogging
                  [WLControl].Script.EffectDuration = 5
              CompositeFactor WL10
                Specifications:
                  [WLControl].Script.Type = Waterlogging
                  [WLControl].Script.EffectDuration = 10
              CompositeFactor WL15
                Specifications:
                  [WLControl].Script.Type = Waterlogging
                  [WLControl].Script.EffectDuration = 16
        Simulation Base_5
          Clock: Start=2017-01-01; End=2017-10-31
          Summary
          Weather: FileName=Harbin2017-2018.met
          SoilArbitrator
          MicroClimate: a_interception=0; b_interception=1; c_interception=0; d_interception=0; SoilHeatFluxFraction=0.4; MinimumHeightDiffForNewLayer=0; NightInterceptionFraction=0.5; ReferenceHeight=2
          Zone Field: Area=1; Slope=0; AspectAngle=0; Altitude=50
            Report: EventNames=[Clock].EndOfDay
              VariableNames:
                [Clock].Today
                [Maize].Phenology.BBCH.Stage
                [Maize].Phenology.CurrentStageName
                [Maize].AboveGround.Wt*10 as Biomass
                [Maize].Grain.Total.Wt*10 as Yield
                [Grain].Number
                [Swim3].watertable
            Report ReportHarvest: EventNames=[Maize].Harvesting
              VariableNames:
                [Clock].Today
                [Maize].Phenology.CurrentStageName
                [Maize].AboveGround.Wt*10 as Biomass
                [Maize].Grain.Total.Wt
                [Grain].Number
            Fertiliser
            SurfaceOrganicMatter: InitialResidueName=wheat_stubble; InitialResidueType=wheat; InitialResidueMass=500; InitialStandingFraction=0; InitialCPR=0; InitialCNR=100
            Plant Maize
            Manager Fertilise at sowing: same as Exp3.Experiment2017.Control2017.Field.Fertilise at sowing
            Manager Harvest: same as Exp1and2.Exp1_2013.Base_1.Field.Harvesting
            Irrigation
            Operations: same as Exp3.Experiment2017.Control2017.Field.Operations
            Soil TianSoil: same as Exp3.Experiment2017.Control2017.Field.TianSoil
            Manager WLControl
              TheCrop = [Maize]
              IrrigScript = [AutomaticIrrigationSat]
              BBCHStart = 0
              Type = Flooding
              EffectDuration = 0
```csharp
using APSIM.Core;
using APSIM.Shared.Utilities;
using Models.Soils;
using Models.PMF.Phen;
using Models.PMF;
using Models.Interfaces;
using Models.Core;
using System;

namespace Models;

[Serializable]
public class Script : Model, IStructureDependency
{
        [Link] private IClock Clock;
        [Link] private ISummary Summary;
        [Link] private Swim3 Swim;
        [Link] private SwimSubsurfaceDrain SwimDrain;
        [Link] private Irrigation Irrig;
        private double bbchYesterday;
        private double previousMoistureTarget;
        private BBCH bbchModel;
        private int ndays;
        [field:NonSerialized]
        public IStructure Structure { private get; set; }

    
    public enum WLType
    {
        Flooding,
        Waterlogging
    }
    
    [Description("The target crop")]
    public IPlant TheCrop { get; set; }
    
    [Description("Irrigation script. (Used for Waterlogging approach)")]
    public Manager IrrigScript { get; set; }
    
    [Description("BBCH stage target number")]
    public double BBCHStart { get; set; }
    
    [Description("Type of effect.")]
    public WLType Type { get; set; }
    
    [Description("Duration of effect")]
    public int EffectDuration { get; set; }
    
    private bool needToRestore = false;
    

        

    [EventSubscribe("StartOfSimulation")]
    private void OnStartOfSimulation(object s, EventArgs e)
    {
        bbchModel =   Structure.FindChild<BBCH>(recurse: true, relativeTo: (INodeModel)TheCrop);
        if (bbchModel == null)
            throw new Exception("Can't get BBCH model from crop " + TheCrop.Name);
        previousMoistureTarget = (double) Structure.GetObject("Script.FASWThreshold", relativeTo: IrrigScript)?.Value;
    }
    
    [EventSubscribe("DoManagement")]
    private void DoDailyCalculations(object sender, EventArgs e)
    {
        if (!TheCrop.IsAlive)
            return;
        if (bbchYesterday < BBCHStart && bbchModel.Stage >= BBCHStart)
            ndays = EffectDuration;
        if (ndays > 0)
        {
            SwimDrain.Open = false;
            HandleEffect(Type);
            --ndays;
        }
        else
        {
            if (needToRestore)
            {
                var moistTarget = Structure.GetObject("Script.FASWThreshold", relativeTo: IrrigScript) ?? throw new Exception("Can't get the target!");
                moistTarget.Value = previousMoistureTarget;
                needToRestore = false;
            }
            //Swim.SetLowerBCForGradient(-1);
            Swim.SetSurfaceBCForCurveNumber();
            SwimDrain.Open = true;
        }
        bbchYesterday = bbchModel.Stage;
    }
    
    private void HandleEffect(WLType type)
    {
        switch (type)
        {
        case WLType.Flooding:
        {
            // TODO: Allow ponding.
            Swim.SetSurfaceBCForPowerFunction(0, 150, 0, 50, 0.2, 2);
            Irrig.Apply(50);
            break;
         }
        case WLType.Waterlogging: {
            // Swim.SetLowerBCForGivenPotential(121);
            var moistTarget = Structure.GetObject("Script.FASWThreshold", relativeTo: IrrigScript) ?? throw new Exception("Can't get the target!");
            moistTarget.Value = 1;
            needToRestore = true;
            break; }
        }
    }
}
```
            Manager AutomaticIrrigationSat: same as Exp3.Experiment2017.Control2017.Field.AutomaticIrrigationSat
    Folder Experiment2018
      Simulation Control2018
        Clock: Start=2018-01-01; End=2018-10-31
        Summary
        Weather: FileName=Harbin2017-2018.met
        SoilArbitrator
        MicroClimate: a_interception=0; b_interception=1; c_interception=0; d_interception=0; SoilHeatFluxFraction=0.4; MinimumHeightDiffForNewLayer=0; NightInterceptionFraction=0.5; ReferenceHeight=2
        Zone Field: Area=1; Slope=0; AspectAngle=0; Altitude=50
          Report: EventNames=[Clock].EndOfDay
            VariableNames:
              [Clock].Today
              [Maize].Phenology.BBCH.Stage
              [Maize].Phenology.CurrentStageName
              [Maize].AboveGround.Wt*10 as Biomass
              [Maize].Grain.Total.Wt*10 as Yield
              [Grain].Number
              [Swim3].watertable
          Report ReportHarvest: EventNames=[Maize].Harvesting
            VariableNames:
              [Clock].Today
              [Maize].Phenology.CurrentStageName
              [Maize].AboveGround.Wt*10 as Biomass
              [Maize].Grain.Total.Wt
              [Grain].Number
          Fertiliser
          SurfaceOrganicMatter: InitialResidueName=wheat_stubble; InitialResidueType=wheat; InitialResidueMass=500; InitialStandingFraction=0; InitialCPR=0; InitialCNR=100
          Plant Maize
          Manager Fertilise at sowing: same as Exp3.Experiment2017.Control2017.Field.Fertilise at sowing
          Manager Harvest: same as Exp1and2.Exp1_2013.Base_1.Field.Harvesting
          Irrigation
          Operations: same as Exp3.Experiment2017.Control2017.Field.Operations
          Soil TianSoil: same as Exp3.Experiment2017.Control2017.Field.TianSoil
          Manager AutomaticIrrigationSat: same as Exp3.Experiment2017.Control2017.Field.AutomaticIrrigationSat
      Experiment Experiment2018
        Factors
          Permutation
            Factor V
              CompositeFactor 3: Specifications=[WLControl].Script.BBCHStart = 12
              CompositeFactor 6: Specifications=[WLControl].Script.BBCHStart = 17
              CompositeFactor T: Specifications=[WLControl].Script.BBCHStart = 67
            Factor -
              CompositeFactor F3
                Specifications:
                  [WLControl].Script.Type = Flooding
                  [WLControl].Script.EffectDuration = 3
              CompositeFactor F6
                Specifications:
                  [WLControl].Script.Type = Flooding
                  [WLControl].Script.EffectDuration = 6
              CompositeFactor F9
                Specifications:
                  [WLControl].Script.Type = Flooding
                  [WLControl].Script.EffectDuration = 9
              CompositeFactor WL5
                Specifications:
                  [WLControl].Script.Type = Waterlogging
                  [WLControl].Script.EffectDuration = 5
              CompositeFactor WL10
                Specifications:
                  [WLControl].Script.Type = Waterlogging
                  [WLControl].Script.EffectDuration = 10
              CompositeFactor WL15
                Specifications:
                  [WLControl].Script.Type = Waterlogging
                  [WLControl].Script.EffectDuration = 15
        Simulation Base_6
          Clock: Start=2018-01-01; End=2018-10-31
          Summary
          Weather: FileName=Harbin2017-2018.met
          SoilArbitrator
          MicroClimate: a_interception=0; b_interception=1; c_interception=0; d_interception=0; SoilHeatFluxFraction=0.4; MinimumHeightDiffForNewLayer=0; NightInterceptionFraction=0.5; ReferenceHeight=2
          Zone Field: same as Exp3.Experiment2017.Experiment2017.Base_5.Field
    Memo
      v3 = bbch 12

      v6 = bbch 17

      vt = bbch 66
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