Simulations: Version=2
  Memo Introduction
    The APSIM Wheat model has been tested on a range of datasets to provide tests across a range of environmental conditions.
  Replacements
    Plant Wheat: CropType=Wheat
      Memo TitlePage
        # The APSIM Wheat Model

        _Brown, H.E., Huth, N.I. and Holzworth, D.P._

        The APSIM wheat model has been developed using the Plant Modelling Framework (PMF) of [brown_plant_2014]. This new framework provides a library of plant organ and process submodels that can be coupled, at runtime, to construct a model in much the same way that models can be coupled to construct a simulation. This means that dynamic composition of lower level process and organ classes (e.g. photosynthesis, leaf) into larger constructions (e.g. maize, wheat, sorghum) can be achieved by the model developer without additional coding.

        The model consists of:

        * a phenology model to simulate development between growth phases
        * a structure model to simulate plant morphology
        * a collection of organs to simulate the various plant parts
        * an arbitrator to allocate resources (N, biomass) to the various plant organs
      OrganArbitrator Arbitrator: NArbitrationOption=PriorityThenRelativeAllocation; DMArbitrationOption=PriorityThenRelativeAllocation
      Phenology
        MultiplyFunction ThermalTime
          PhaseLookup Temperature
            PhaseLookupValue SoilTemperature: Start=Sowing; End=TerminalSpikelet
              AirTemperatureFunction AirThermalTime
                XYPairs: X=[0, 26, 37]; Y=[0, 26, 0]
            PhaseLookupValue AirTemperature: Start=TerminalSpikelet; End=HarvestRipe
              AirTemperatureFunction AirThermalTime
                XYPairs: X=[0, 26, 37]; Y=[0, 26, 0]
          AddFunction DroughtPhenologyAcelleration
            Constant One: Value=1
            MultiplyFunction Stress
              Constant StressResponseCoefficient: Value=2
              LinearInterpolationFunction StressFactor: XProperty=[Wheat].WaterSupplyDemandRatio
                XYPairs: X=[0, 1]; Y=[0, 0]
        GerminatingPhase Germinating: Start=Sowing; End=Germination
        EmergingPhase Emerging: Start=Germination; End=Emergence; ShootLag=40; ShootRate=1.5
          VariableReference ThermalTime: VariableName=[Phenology].ThermalTime.Value
        GenericPhase Vegetative: Start=Emergence; End=TerminalSpikelet
          Constant Target: Value=401
          VariableReference ThermalTime: VariableName=[Phenology].ThermalTime.Value
          MinimumFunction Stress
            VariableReference VernalisationEffect: VariableName=[Phenology].Vernalisation.VernEff
            VariableReference PhotoperiodEffect: VariableName=[Phenology].Vernalisation.PhotopEff
        GenericPhase EarlyReproductive: Start=TerminalSpikelet; End=Flowering
          Constant Target: Value=555
          LinearInterpolationFunction ThermalTime: XProperty=[Vernalisation].CrownTemperature
            XYPairs: X=[0, 26, 34]; Y=[0, 26, 0]
          MultiplyFunction Stress
            MinimumFunction
              VariableReference: VariableName=[Vernalisation].VernEff
              VariableReference Variable1: VariableName=[Vernalisation].PhotopEff
        GenericPhase GrainDevelopment: Start=Flowering; End=StartGrainFill
          Constant Target: Value=120
          VariableReference ThermalTime: VariableName=[Phenology].ThermalTime.Value
        GenericPhase GrainFilling: Start=StartGrainFill; End=EndGrainFill
          Constant Target: Value=545
          VariableReference ThermalTime: VariableName=[Phenology].ThermalTime.Value
        GenericPhase Maturing: Start=EndGrainFill; End=Maturity
          Constant Target: Value=200
          VariableReference ThermalTime: VariableName=[Phenology].ThermalTime.Value
        GenericPhase Ripening: Start=Maturity; End=HarvestRipe
          Constant Target: Value=300
          VariableReference ThermalTime: VariableName=[Phenology].ThermalTime.Value
        EndPhase ReadyForHarvesting: Start=HarvestRipe; End=Unused
          VariableReference ThermalTime: VariableName=[Phenology].ThermalTime.Value
        PhotoperiodFunction Photoperiod: Twilight=-6
        VernalisationCW Vernalisation: VernSens=2.5; PhotopSens=2; StartStageForEffects=Emergence; EndStageForEffects=TerminalSpikelet; StartStageForCumulativeVD=Germination; EndStageForCumulativeVD=TerminalSpikelet
          AirTemperatureFunction VDModel
            XYPairs: X=[0, 2, 15]; Y=[0, 1, 0]
          PhotoperiodFunction Photoperiod: Twilight=-6
        ZadokPMF Zadok
        AccumulateFunction DaysAfterSowing111: StartStageName=Sowing; EndStageName=Maturity
          Constant one: Value=1
      Structure: InitialiseStage=Emergence; PrimaryBudNo=1
        PhaseLookup MainStemPrimordiaInitiationRate
          PhaseLookupValue VegetativePrimordiaInitiationRate: Start=Emergence; End=TerminalSpikelet
            DivideFunction RelativeToPyllochron
              VariableReference Phyllochron
                VariableName=[Structure].MainStemNodeAppearanceRate.BasePhyllochron.Value
              Constant PrimordiaPerMainstemNode: Value=1.1
          Memo Rational
            [Brown_Anthesis_2013] showed final leaf number (FLN) could be estimated as 2.86 + HSTS * 1.1 where HS<sup>TS</sup> is the the Haun stage at terminal spikelet.  To caputre this in the wheat model we have set the initial number of primordia (determined by the number of initialleaf objects on the leaf class) to 3 and have set this function to produce primordia 10% faster than mainstem leaves.  Primordia are initiated until the therminal spikelet stage and then the number remains fixed, giving final leaf number.
        MultiplyFunction MainStemNodeAppearanceRate
          LinearInterpolationFunction LeafStageFactor: XProperty=[Structure].MainStemNodeNo
            XYPairs: X=[0, 2, 3, 7, 8, 14]; Y=[0.6, 0.6, 1, 1, 1.3, 1.3]
          Constant BasePhyllochron: Value=100
          Memo Rational
            Based on [Jamieson_SIRIUS_1998] where leaf appearace could be described by a base phyllochron determined between leaves 2 and 7 and a phyllochron that was 70% of base phyllochron for leaves < 2 and 130% of base phyllochron for leaves > 7
        HeightFunction HeightModel
          LinearInterpolationFunction PotentialHeight: XProperty=[Phenology].Stage
            XYPairs: X=[3, 4, 4.8, 6, 7]; Y=[10, 50, 100, 1100, 1200]
          LinearInterpolationFunction WaterStress: XProperty=[Wheat].WaterSupplyDemandRatio
            XYPairs: X=[0.3, 1]; Y=[0, 1]
        MultiplyFunction BranchingRate
          PhaseLookup PotentialBranchingRate
            PhaseLookupValue Vegetative: Start=Emergence; End=TerminalSpikelet
              LinearInterpolationFunction PotentialBranchingRate: XProperty=[Leaf].AppearedCohortNo
                XYPairs: X=[1, 2, 5, 14]; Y=[0, 1, 2, 2]
            PhaseLookupValue Reproductive: Start=TerminalSpikelet; End=HarvestRipe
              Constant Zero: Value=0
          LinearInterpolationFunction WaterStress: XProperty=[Wheat].WaterSupplyDemandRatio
            XYPairs: X=[0, 1]; Y=[0, 1]
          LinearInterpolationFunction Shading: XProperty=[Leaf].CoverGreen
            XYPairs: X=[0, 0.6, 0.7]; Y=[1, 1, 0]
        AddFunction BranchMortality
          PhaseLookup ShadeInducedBranchMortality
            PhaseLookupValue Vegetative: Start=Emergence; End=StartGrainFill
              LinearInterpolationFunction ShadeInducedBranchMortality: XProperty=[Leaf].CoverGreen
                XYPairs: X=[0, 0.99, 0.99, 1]; Y=[0, 0, 0.01, 0.01]
          PhaseLookup DroughtInducedBranchMortality
            PhaseLookupValue Vegetative: Start=Emergence; End=StartGrainFill
              LinearInterpolationFunction DroughtInducedBranchMortality: XProperty=[Wheat].WaterSupplyDemandRatio
                XYPairs: X=[0.1, 0.6]; Y=[0.1, 0]
        VariableReference ThermalTime: VariableName=[Phenology].ThermalTime.Value
        Constant MaximumMainStemNodeNumber: Value=18
        MainStemFinalNodeNumberFunction MainStemFinalNodeNumber: MaximumMainStemNodeNumber=30
          OnEventFunction FinalLeafNumber: SetEvent=TerminalSpikelet
            AddFunction PreEventValue
              Constant PrimordiaAtEmergence: Value=2
              DivideFunction PrimordiaDuringJuvenilePhase
                VariableReference JuvenilePhaseDuration: VariableName=[Phenology].Vegetative.Target.Value
                Constant ApproximatePlastochron: Value=30
            VariableReference PostEventValue: VariableName=[Structure].MainStemPrimordiaNo
      ReproductiveOrgan Grain: RipeStage=Ripe
        Biomass Live
        Biomass Dead
        Constant MaxNConcDailyGrowth: Value=0.03
        Constant WaterContent: Value=0.12
        Constant MinimumNConc: Value=0.006
        Constant MaximumNConc: Value=0.022
        Constant MaximumPotentialGrainSize: Value=1
        PhaseBasedSwitch NitrogenDemandSwitch: Start=Germination; End=Maturity
        AccumulateFunction AccumThermalTime: StartStageName=Flowering; EndStageName=Maturity
          VariableReference DailyThermalTimeValue: VariableName=[Phenology].ThermalTime.Value
        AirTemperatureFunction FillingRate
          XYPairs: X=[0, 26, 30, 35]; Y=[0, 0.0015, 0.0015, 0.0015]
        AirTemperatureFunction NFillingRate
          XYPairs: X=[0, 25, 30, 35]; Y=[0, 55, 55, 55]
        PhaseLookup DMDemandFunction
          PhaseLookupValue Grainfilling: Start=StartGrainFill; End=EndGrainFill
            MinimumFunction
              MultiplyFunction Demand
                VariableReference GrainNumber: VariableName=[Grain].NumberFunction.Value
                AirTemperatureFunction FillingRate
                  XYPairs: X=[0, 26, 30, 35]; Y=[0, 0.0015, 0.0015, 0.0015]
              MultiplyFunction Capacity
                SubtractFunction IndividualGrainCapacity
                  Constant MaximumGrainSize: Value=0.042
                  DivideFunction CurrentSize
                    VariableReference Wt: VariableName=[Grain].Live.Wt
                    VariableReference GrainNumber: VariableName=[Grain].NumberFunction.Value
                VariableReference GrainNumber: VariableName=[Grain].NumberFunction.Value
        MultiplyFunction NumberFunction
          VariableReference HeadNumber: VariableName=[Spike].HeadNumber.Value
          LinearInterpolationFunction GrainsPerSpike: XProperty=[Spike].Live.Wt
            XYPairs: X=[0, 1]; Y=[0, 80]
        ExpressionFunction Protein
          Expression=([Grain].Live.N + [Grain].Dead.N)/([Grain].Live.Wt + [Grain].Dead.Wt) * 100 * 5.71
        Folder BiomassRemovalDefaults
          OrganBiomassRemovalType Harvest: FractionRemoved=1; FractionToResidue=0.0
          OrganBiomassRemovalType Cut: FractionRemoved=1; FractionToResidue=0
          OrganBiomassRemovalType Prune: FractionRemoved=0; FractionToResidue=0.8
          OrganBiomassRemovalType Graze: FractionRemoved=0.6; FractionToResidue=0.2
      Root: InitialDM=0.2; SpecificRootLength=40000; KNO3_yProperty=[0.03, 0.03]; KNO3_xRootLength=[0, 0.003]; KNH4_yProperty=[0, 0]; KNH4_xRootLength=[0, 0.003]; NuptakeSupply=0
        CompositeBiomass Live: Propertys=[[Root].LayerLive]
        CompositeBiomass Dead: Propertys=[[Root].LayerDead]
        LinearInterpolationFunction KLModifier: XProperty=[Leaf].LAI
          XYPairs: X=[0, 3]; Y=[1, 1]
        Constant SoilWaterEffect: Value=1
        AirTemperatureFunction TemperatureEffect
          XYPairs: X=[0, 26, 35]; Y=[1, 1, 1]
        Constant MaxDailyNUptake: Value=20
        Constant SenescenceRate: Value=0
        Constant StructuralFraction: Value=1
        Constant MaximumNConc: Value=0.01
        Constant MinimumNConc: Value=0.01
        Constant PartitionFraction: Value=0.1
        PhaseLookup RootFrontVelocity
          PhaseLookupValue PreEmergence: Start=Germination; End=Emergence
            Constant Function: Value=5
          PhaseLookupValue PostEmergence: Start=Emergence; End=Maturity
            Constant Function: Value=30
        PhaseBasedSwitch NitrogenDemandSwitch: Start=Germination; End=Maturity
        Folder BiomassRemovalDefaults
          OrganBiomassRemovalType Harvest: FractionRemoved=0; FractionToResidue=0.2
          OrganBiomassRemovalType Cut: FractionRemoved=0; FractionToResidue=0.3
          OrganBiomassRemovalType Prune: FractionRemoved=0; FractionToResidue=0.1
          OrganBiomassRemovalType Graze: FractionRemoved=0.0; FractionToResidue=0.15
      Leaf: MaxCover=1; R50=200; KDead=0.03
        zero: CurrentExpandingLeaf, StartFractionExpanded, FractionNextleafExpanded, _ExpandedNodeNo, DeadNodesYesterday, Albedo, Gsmax, FRGR, PotentialEP, FractionDied
        LeafCohort InitialLeaves[1]: Rank=1; Area=200
        LeafCohort InitialLeaves[2]: Rank=2; Area=0
        LeafCohort InitialLeaves[3]: Rank=3; Area=0
        CompositeBiomass Live: Propertys=[[Leaf].CohortLive]
        CompositeBiomass Dead: Propertys=[[Leaf].CohortDead]
        ArrayBiomass CohortArrayLive: Propertys=[[Leaf].Live]; ArraySize=[Leaf].MaxNodeNo
        ArrayBiomass CohortArrayDead: Propertys=[[Leaf].Dead]; ArraySize=[Leaf].MaxNodeNo
        LeafCohortParameters CohortParameters
          Constant NReallocationFactor: Value=0.05
          Constant NRetranslocationFactor: Value=0.1
          Constant DMReallocationFactor: Value=1
          Constant DMRetranslocationFactor: Value=0.5
          LinearInterpolationFunction CellDivisionStress: XProperty=[Wheat].WaterSupplyDemandRatio
            XYPairs: X=[0.5, 1]; Y=[0.1, 1]
          LinearInterpolationFunction ExpansionStress: XProperty=[Wheat].WaterSupplyDemandRatio
            XYPairs: X=[0.3, 1]; Y=[0, 1]
          MultiplyFunction GrowthDuration
            VariableReference Phyllochron
              VariableName=[Structure].MainStemNodeAppearanceRate.BasePhyllochron.Value
            LinearInterpolationFunction NumberOfExpandingLeaves: XProperty=[Structure].RelativeNodeApperance
              XYPairs: X=[0, 1]; Y=[1, 1]
          Constant LagDuration: Value=900
          Constant SenescenceDuration: Value=200
          Constant DetachmentLagDuration: Value=1000000
          Constant DetachmentDuration: Value=1000000
          Constant RelativeBranchLeafSize: Value=1
          Constant MaximumNConc: Value=0.063
          Constant CriticalNConc: Value=0.05
          Constant MinimumNConc: Value=0.01
          AddFunction DroughtInducedSenAcceleration
            Constant One: Value=1
            MultiplyFunction Stress
              Constant StressResponseCoefficient: Value=1
              LinearInterpolationFunction StressFactor: XProperty=[Wheat].WaterSupplyDemandRatio
                XYPairs: X=[0, 0.7]; Y=[1, 0]
          LinearInterpolationFunction SpecificLeafAreaMax: XProperty=[Structure].RelativeNodeApperance
            XYPairs: X=[0, 1]; Y=[22000, 22000]
          LinearInterpolationFunction SpecificLeafAreaMin: XProperty=[Structure].RelativeNodeApperance
            XYPairs: X=[0, 0.5, 1]; Y=[10000, 20000, 20000]
          Constant InitialNConc: Value=0
          Constant StructuralFraction: Value=0.5
          Constant NonStructuralFraction: Value=0
          LinearInterpolationFunction ShadeInducedSenescenceRate: XProperty=[Leaf].CohortCurrentRankCoverAbove
            XYPairs: X=[0, 0.7, 0.8, 0.97, 0.98]; Y=[0, 0, 0, 0, 0]
          LinearInterpolationFunction MaxArea: XProperty=[Structure].RelativeNodeApperance
            XYPairs: X=[0, 0.3, 0.5, 0.8, 1]; Y=[300, 800, 1500, 4000, 4000]
        RUEModel Photosynthesis
          Constant RUE: Value=1.37
          WeightedTemperatureFunction FT: MaximumTemperatureWeighting=0.5
            XYPairs: X=[0, 10, 25, 35]; Y=[0, 1, 1, 0]
          LinearInterpolationFunction FVPD: XProperty=[Leaf].Photosynthesis.VPD
            XYPairs: X=[0, 10, 50]; Y=[1, 1, 1]
          LinearInterpolationFunction FN: XProperty=[Leaf].Fn
            XYPairs: X=[0, 1, 1.5]; Y=[0, 1, 1]
          LinearInterpolationFunction FW: XProperty=[Leaf].Fw
            XYPairs: X=[0, 0.3]; Y=[0, 1]
          RUECO2Function FCO2: PhotosyntheticPathway=C3
          VariableReference RadnInt: VariableName=[Leaf].RadIntTot
        MultiplyFunction ExtinctionCoeff
          LinearInterpolationFunction PotentialExtinctionCoeff: XProperty=[Leaf].LAI
            XYPairs: X=[0, 1]; Y=[1, 0.5]
          LinearInterpolationFunction WaterStress: XProperty=[Wheat].WaterSupplyDemandRatio
            XYPairs: X=[0, 0.7]; Y=[0.5, 1]
        LinearInterpolationFunction FrostFraction: XProperty=[Weather].MinT
          XYPairs: X=[-1, 0]; Y=[0, 0]
        VariableReference ThermalTime: VariableName=[Phenology].ThermalTime.Value
        MinimumFunction FRGRFunction
          VariableReference RUE_FT: VariableName=[Leaf].Photosynthesis.FT.Value
          MinimumFunction Others
            VariableReference RUE_FN: VariableName=[Leaf].Photosynthesis.FN.Value
            VariableReference RUE_FVPD: VariableName=[Leaf].Photosynthesis.FVPD.Value
        Folder BiomassRemovalDefaults
          OrganBiomassRemovalType Harvest: FractionRemoved=0.; FractionToResidue=0.3
          OrganBiomassRemovalType Cut: FractionRemoved=0.8; FractionToResidue=0
          OrganBiomassRemovalType Prune: FractionRemoved=0; FractionToResidue=0.6
          OrganBiomassRemovalType Graze: FractionRemoved=0.6; FractionToResidue=0.1
      GenericAboveGroundOrgan Spike
        PopulationBasedDemandFunction DMDemandFunction
          VariableReference ThermalTime: VariableName=[Phenology].ThermalTime.Value
          Constant ExpansionStress: Value=1
          VariableReference OrganPopulation: VariableName=[Spike].HeadNumber.Value
          Constant StartStage: Value=5.2
          Constant MaximumOrganWt: Value=0.7
          Constant GrowthDuration: Value=453
        Biomass Live
        Biomass Dead
        Constant NReallocationFactor: Value=0
        Constant NRetranslocationFactor: Value=0.1
        Constant MaximumNConc: Value=0.01
        Constant StructuralFraction: Value=1
        Constant MinimumNConc: Value=0.01
        MultiplyFunction HeadNumber
          Constant FertileTillers: Value=1
          VariableReference StemPopulation: VariableName=[Structure].TotalStemPopn
        Folder BiomassRemovalDefaults
          OrganBiomassRemovalType Harvest: FractionRemoved=0.5; FractionToResidue=0.1
          OrganBiomassRemovalType Cut: FractionRemoved=0.8; FractionToResidue=0
          OrganBiomassRemovalType Prune: FractionRemoved=0; FractionToResidue=0.6
          OrganBiomassRemovalType Graze: FractionRemoved=0.6; FractionToResidue=0.2
      GenericAboveGroundOrgan Stem
        Biomass Live
        Biomass Dead
        MinimumFunction DMDemandFunction
          MultiplyFunction NodeNumberLimitedDemand
            LinearInterpolationFunction SpecificStemDensityMax: XProperty=[Phenology].Stage
              XYPairs: X=[3, 4, 6]; Y=[0, 10, 40]
            VariableReference DeltaNodes: VariableName=[Structure].DeltaNodeNumber
            VariableReference Stems: VariableName=[Structure].TotalStemPopn
          MultiplyFunction HeightLimitedDemand
            Constant SpecificStemLengthMax: Value=0.022
            VariableReference DeltaHeight: VariableName=[Structure].HeightModel.DeltaHeight
            VariableReference Stems: VariableName=[Structure].TotalStemPopn
        Constant StructuralFraction: Value=0.7
        LinearInterpolationFunction MaximumNConc: XProperty=[Phenology].Stage
          XYPairs: X=[3, 4, 5.3]; Y=[0.06, 0.06, 0.025]
        Constant MinimumNConc: Value=0.006
        PhaseBasedSwitch NitrogenDemandSwitch: Start=Emergence; End=StartGrainFill
        Constant NReallocationFactor: Value=0
        Constant NRetranslocationFactor: Value=0.5
        Constant DMRetranslocationFactor: Value=0.5
        Folder BiomassRemovalDefaults: same as Replacements.Wheat.Spike.BiomassRemovalDefaults
      CompositeBiomass AboveGround
        Propertys=[[Leaf].Live, [Leaf].Dead, [Stem].Live, [Stem].Dead, [Spike].Live, [Spike].Dead, [Grain].Live, [Grain].Dead]
      CompositeBiomass BelowGround: Propertys=[[Root].Live, [Root].Dead]
      CompositeBiomass Total
        Propertys=[[Leaf].Live, [Leaf].Dead, [Stem].Live, [Stem].Dead, [Root].Live, [Root].Dead, [Spike].Live, [Spike].Dead, [Grain].Live, [Grain].Dead]
      CompositeBiomass TotalLive
        Propertys=[[Leaf].Live, [Stem].Live, [Root].Live, [Spike].Live, [Grain].Live]
      CompositeBiomass TotalDead
        Propertys=[[Leaf].Dead, [Stem].Dead, [Root].Dead, [Spike].Dead, [Grain].Dead]
      CompositeBiomass AboveGroundLive: Propertys=[[Leaf].Live, [Stem].Live, [Spike].Live, [Grain].Live]
      Cultivar Wakanui
        Command:
          [Phenology].Vernalisation.VernSens = 5
          [Phenology].Vernalisation.PhotopSens = 4
      Cultivar GattonHartog
        Command:
          [Phenology].Vernalisation.VernSens = 2.5
          [Phenology].Vernalisation.PhotopSens = 3.5
      Cultivar h45
        Command:
          [Phenology].Vernalisation.VernSens = 1.5
          [Phenology].Vernalisation.PhotopSens = 1.5
      Cultivar Rongotea
        Command:
          [Phenology].Vernalisation.VernSens = 2.0
          [Phenology].Vernalisation.PhotopSens = 4.0
          [Grain].NumberFunction.GrainsPerSpike.XYPairs.X = 0, 1
          [Grain].NumberFunction.GrainsPerSpike.XYPairs.Y = 0, 50
          [Grain].MaximumPotentialGrainSize.Value = 1
      Cultivar Hartog
        Command:
          [Phenology].Vernalisation.VernSens = 1.5
          [Phenology].Vernalisation.PhotopSens = 3.0
      Cultivar Gamenya
        Command:
          [Phenology].Vernalisation.VernSens = 1.6
          [Phenology].Vernalisation.PhotopSens = 2.0
          [Phenology].EarlyReproductive.Target.Value = 630.0
      Cultivar Spear
        Command:
          [Phenology].Vernalisation.VernSens = 1.5
          [Phenology].Vernalisation.PhotopSens = 3.5
          [Grain].NumberFunction.GrainsPerSpike.XYPairs.X = 0, 1
          [Grain].NumberFunction.GrainsPerSpike.XYPairs.Y = 0, 50
          [Grain].MaximumPotentialGrainSize.Value = 1
          [Phenology].GrainFilling.Target.Value = 580
          [Phenology].EarlyReproductive.Target.Value = 555.0
      Cultivar Gutha
        Command:
          [Phenology].Vernalisation.VernSens = 1.5
          [Phenology].Vernalisation.PhotopSens = 3.0
          [Grain].NumberFunction.GrainsPerSpike.XYPairs.X = 0, 1
          [Grain].NumberFunction.GrainsPerSpike.XYPairs.Y = 0, 50
      Cultivar Wilgoyne
        Command:
          [Phenology].Vernalisation.VernSens = 1.4
          [Phenology].Vernalisation.PhotopSens = 1.8
          [Grain].NumberFunction.GrainsPerSpike.XYPairs.X = 0, 1
          [Grain].NumberFunction.GrainsPerSpike.XYPairs.Y = 0, 50
          [Grain].MaximumPotentialGrainSize.Value = 1
          [Phenology].GrainFilling.Target.Value = 580
          [Phenology].EarlyReproductive.Target.Value = 555.0
      Cultivar BattenWinter
        Command:
          [Phenology].Vernalisation.VernSens = 2.0
          [Phenology].Vernalisation.PhotopSens = 4.0
          [Grain].NumberFunction.GrainsPerSpike.XYPairs.X = 0, 1
          [Grain].NumberFunction.GrainsPerSpike.XYPairs.Y = 0, 50
          [Grain].MaximumPotentialGrainSize.Value = 1
      Cultivar Bolac
        Command:
          [Phenology].Vernalisation.VernSens = 2.5
          [Phenology].Vernalisation.PhotopSens = 4.0
      Cultivar EGAGregory
        Command:
          [Phenology].Vernalisation.VernSens = 2.7
          [Phenology].Vernalisation.PhotopSens = 3.2
      Cultivar Kelallac
        Command:
          [Phenology].Vernalisation.VernSens = 2.5
          [Phenology].Vernalisation.PhotopSens = 4.0
      Cultivar Mckellar
        Command:
          [Phenology].Vernalisation.VernSens = 5.0
          [Phenology].Vernalisation.PhotopSens = 4.0
      Cultivar Kennedy
        Command:
          [Phenology].Vernalisation.VernSens = 2.5
          [Phenology].Vernalisation.PhotopSens = 4.0
      Cultivar Derrimut
        Command:
          [Phenology].Vernalisation.VernSens = 1.5
          [Phenology].Vernalisation.PhotopSens = 3.5
      Cultivar Janz
        Command:
          [Phenology].Vernalisation.VernSens = 1.5
          [Phenology].Vernalisation.PhotopSens = 3.5
      Cultivar Gladius
        Command:
          [Phenology].Vernalisation.VernSens = 1.5
          [Phenology].Vernalisation.PhotopSens = 3.0
      Cultivar Ventura
        Command:
          [Phenology].Vernalisation.VernSens = 1.5
          [Phenology].Vernalisation.PhotopSens = 3.0
      Cultivar Young
        Command:
          [Phenology].Vernalisation.VernSens = 2.3
          [Phenology].Vernalisation.PhotopSens = 3.2
      Cultivar Yitpi
        Command:
          [Phenology].Vernalisation.VernSens = 1.5
          [Phenology].Vernalisation.PhotopSens = 3.0
      Cultivar Ruby
        Command:
          [Phenology].Vernalisation.VernSens = 2.3
          [Phenology].Vernalisation.PhotopSens = 3.2
      Cultivar Wyalkatchem
        Command:
          [Phenology].Vernalisation.VernSens = 2.3
          [Phenology].Vernalisation.PhotopSens = 3.2
          [Phenology].EarlyReproductive.Target.Value = 380
      Cultivar Wedgetail
        Command:
          [Phenology].Vernalisation.VernSens = 3.9
          [Phenology].Vernalisation.PhotopSens = 3.9
      Cultivar H46
        Command:
          [Phenology].Vernalisation.VernSens = 1.5
          [Phenology].Vernalisation.PhotopSens = 1.5
      Cultivar Mercury
        Command:
          [Phenology].Vernalisation.VernSens = 1.5
          [Phenology].Vernalisation.PhotopSens = 2.5
  DataStore
    Input: ErrorMessage=The specified file does not exist.; FileName=Hartog.prn
  Memo Combined Results
    #Combined Results
    Simulation results for the combined datasets from the various countries are shown in the following graphs.  The model is able to adequately capture the influence of growing conditions (soil, climate) and management (population, Nitrogen, irrigation, sowing date).
  Experiment Hermitage2009
    Factors
      Factor Cv: Specifications=[SowingRule].Script.Cultivar = Hartog
    Simulation Hermitage2009Base: Area=0; Slope=0
      Clock: StartDate=2009-06-01; EndDate=2009-11-30
      Summary summaryfile
      Weather: FileName=Hermitage2009.met
      SoilArbitrator Soil Arbitrator
      Zone Field: Area=1; Slope=0
        Irrigation
        Fertiliser
        Soil HRSField: SoilType=APS6Soil; LocalName=APS6Site; Site=APS6Site; NearestTown=Unknown; Region=Lawes; NaturalVegetation=Unknown; Latitude=0; Longitude=0
          Water
            Thickness  BD    AirDry  LL15  DUL   SAT
            150        1.03  0.28    0.33  0.56  0.61
            150        1.06  0.24    0.29  0.55  0.6
            300        1.06  0.24    0.29  0.55  0.6
            300        1.08  0.25    0.3   0.54  0.59
            300        1.11  0.26    0.31  0.53  0.58
            300        1.14  0.28    0.33  0.52  0.57
            300        1.17  0.3     0.35  0.51  0.55
            SoilCrop WheatSoil: LL=[0.33, 0.29, 0.29, 0.3, 0.31, 0.33, 0.35]; KL=[0.07, 0.07, 0.07, 0.05, 0.05, 0.03, 0.02]; XF=[1, 1, 1, 1, 1, 1, 1]
          SoilWater: residueinterception=0; SummerDate=1-Nov; SummerU=6; SummerCona=3.5; WinterDate=1-Apr; WinterU=6; WinterCona=3.5; DiffusConst=88; DiffusSlope=35.4; Salb=0.13; CN2Bare=60; CNRed=20; CNCov=0.8; slope=0; discharge_width=0; catchment_area=0; max_pond=0
            Thickness  SWCON  KLAT
            150        0.3    0
            150        0.3    0
            300        0.3    0
            300        0.3    0
            300        0.3    0
            300        0.3    0
            300        0.3    0
          SoilNitrogen: fom_type=[default, manure, mucuna, lablab, shemp, stable]; fract_carb=[0.2, 0.3, 0.54, 0.57, 0.45, 0]; fract_cell=[0.7, 0.3, 0.37, 0.37, 0.47, 0.1]; fract_lign=[0.1, 0.4, 0.09, 0.06, 0.08, 0.9]; wfpsN2N2O_x=[22, 88]; wfpsN2N2O_y=[0.1, 1]
          SoilOrganicMatter: RootCN=60; RootWt=2000; SoilCN=14.5; EnrACoeff=1; EnrBCoeff=1; OCUnits=Total
            Thickness  OC    FBiom  FInert
            150        2.2   0.03   0.45
            150        1.6   0.02   0.6
            300        1.15  0.01   0.78
            300        1     0.01   0.9
            300        0.8   0.01   0.99
            300        0.45  0.01   0.99
            300        0.45  0.01   0.99
          Analysis: Thickness=[150, 150, 300, 300, 300, 300, 300]; PH=[7.5, 8, 8, 8, 8, 8, 8]; PHUnits=Water; BoronUnits=HotWater
          Sample Initial Water: Thickness=[150, 150, 300, 300, 300, 300, 300]; SW=[0.56, 0.55, 0.55, 0.54, 0.53, 0.52, 0.51]; NO3Units=ppm; NH4Units=ppm; SWUnits=Volumetric; OCUnits=Total; PHUnits=Water
          Sample Initial Nitrogen: NO3Units=kgha; NH4Units=kgha; SWUnits=Volumetric; OCUnits=Total; PHUnits=Water
            Thickness  NO3   NH4
            150        50    1.3
            150        50    1
            300        0.25  1
            300        0.2   0.8
            300        0.1   0.8
            300        0.1   0.5
            300        0.1   0.5
        Manager SowingRule
          Cultivar = Hartog
```csharp
using System;
using Models.Core;
using Models.PMF;
namespace Models
{
           
	[Serializable] 
	[System.Xml.Serialization.XmlInclude(typeof(Model))]
	public class Script : Model
	{
	
		[Link] Plant Wheat;
		[Link] Clock Clock;
			
		[Description("Cultivar")]
		public String Cultivar { get; set; }
	
		
		private void OnDoManagement(object sender, EventArgs e)
		{
			if (Clock.Today.DayOfYear == 170)
			{
				Wheat.Sow(population: 100, cultivar: Cultivar, depth: 60, rowSpacing: 200);
				
			}
		}
	}
}
```
        SurfaceOrganicMatter: PoolName=wheat_stubble; type=wheat; mass=500; standing_fraction=0; cnr=100; CriticalResidueWeight=2000; OptimumDecompTemp=20; MaxCumulativeEOS=20; CNRatioDecompCoeff=0.277; CNRatioDecompThreshold=25; TotalLeachRain=25; MinRainToLeach=10; CriticalMinimumOrganicC=0.004; DefaultCPRatio=0; DefaultStandingFraction=0; StandingExtinctCoeff=0.5; FractionFaecesAdded=0.5
          Pools:
            {PoolName=wheat_stubble, ResidueType=wheat, Mass=500, CNRatio=100, StandingFraction=0}
          ResidueTypes: LoadFromResource=ResidueTypes
        Plant Wheat: CropType=Wheat
        MicroClimate: a_interception=0; b_interception=1; c_interception=0; d_interception=0; soil_albedo=0.3; air_pressure=1010; soil_emissivity=0.96; sun_angle=15; soil_heat_flux_fraction=0.4; night_interception_fraction=0.5; windspeed_default=3; refheight=2; albedo=0.15; emissivity=0.96; gsmax=0.01; r50=200
        Report
          VariableNames:
            [Clock].Today
            [Wheat].Phenology.DaysAfterSowing.Value
            Wheat.Phenology.CurrentPhaseName
            Wheat.Phenology.Stage
            Wheat.Phenology.Zadok.Stage
            Wheat.AboveGround.Wt
            Wheat.Leaf.LAI
            Wheat.Leaf.Live.Wt
            Wheat.Spike.Wt
            Wheat.Stem.Live.Wt
            Wheat.Structure.TotalStemPopn
            Wheat.Structure.MainStemPrimordiaNo
            Wheat.Structure.MainStemNodeNo
            Wheat.Structure.PlantTotalNodeNo
            Wheat.Grain.Number
            Wheat.Grain.Wt
            Wheat.WaterSupplyDemandRatio
            Wheat.Leaf.CoverTotal
            [Wheat].Leaf.SpecificArea
            [Wheat].Leaf.CohortParameters.SpecificLeafAreaMax.Value
            [Wheat].Leaf.CohortParameters.SpecificLeafAreaMin.Value
          EventNames:
            [Clock].DoReport
        Operations IrrigationSchedule
          2009-08-12  [Irrigation].Apply(amount:29);
          2009-08-13  [Irrigation].Apply(amount:25);
          2009-09-29  [Irrigation].Apply(amount:32);
        Operations FertiliserSchedule
          2009-06-02  [Fertiliser].Apply(Amount: 152, Type: Fertiliser.Types.Urea);
  Experiment GattonStandard2010
    Factors
      Factor Cv: Specifications=[SowingRule].Script.Cultivar = Hartog
    Simulation GattonStandard2010Base: Area=0; Slope=0
      Clock: StartDate=2010-05-06; EndDate=2010-10-31
      Summary summaryfile
      Weather: FileName=Gatton2010.met
      SoilArbitrator Soil Arbitrator
      Zone Field: Area=1; Slope=0
        Irrigation
        Fertiliser
        Soil LawesField: SoilType=APS6Soil; LocalName=APS6Site; Site=APS6Site; NearestTown=Unknown; Region=Lawes; NaturalVegetation=Unknown; Latitude=0; Longitude=0
          Water
            Thickness  BD    AirDry  LL15  DUL   SAT
            150        1.38  0.1     0.2   0.38  0.45
            150        1.38  0.168   0.21  0.38  0.45
            300        1.28  0.2     0.2   0.44  0.49
            300        1.38  0.19    0.19  0.4   0.45
            300        1.4   0.15    0.15  0.39  0.44
            300        1.46  0.2     0.2   0.4   0.45
            300        1.47  0.2     0.2   0.43  0.48
            SoilCrop WheatSoil: LL=[0.2, 0.21, 0.2, 0.19, 0.15, 0.32, 0.34]; KL=[0.06, 0.06, 0.06, 0.04, 0.04, 0.02, 0.02]; XF=[1, 1, 1, 1, 1, 1, 1]
          SoilWater: residueinterception=0; SummerDate=1-Nov; SummerU=6; SummerCona=3.5; WinterDate=1-Apr; WinterU=6; WinterCona=3.5; DiffusConst=88; DiffusSlope=35.4; Salb=0.13; CN2Bare=91; CNRed=20; CNCov=0.8; slope=0; discharge_width=0; catchment_area=0; max_pond=0
            Thickness  SWCON  KLAT
            150        0.3    0
            150        0.3    0
            300        0.3    0
            300        0.3    0
            300        0.3    0
            300        0.3    0
            300        0.3    0
          SoilNitrogen: fom_type=[default, manure, mucuna, lablab, shemp, stable]; fract_carb=[0.2, 0.3, 0.54, 0.57, 0.45, 0]; fract_cell=[0.7, 0.3, 0.37, 0.37, 0.47, 0.1]; fract_lign=[0.1, 0.4, 0.09, 0.06, 0.08, 0.9]; wfpsN2N2O_x=[22, 88]; wfpsN2N2O_y=[0.1, 1]
          SoilOrganicMatter: same as Hermitage2009.Hermitage2009Base.Field.HRSField.SoilOrganicMatter
          Analysis: Thickness=[150, 150, 300, 300, 300, 300, 300]; PH=[7.5, 8, 8, 8, 8, 8, 8]; PHUnits=Water; BoronUnits=HotWater
          Sample Initial Water: Thickness=[150, 150, 300, 300, 300, 300, 300]; SW=[0.38, 0.38, 0.44, 0.4, 0.39, 0.4, 0.43]; NO3Units=ppm; NH4Units=ppm; SWUnits=Volumetric; OCUnits=Total; PHUnits=Water
          Sample Initial Nitrogen: NO3Units=kgha; NH4Units=kgha; SWUnits=Volumetric; OCUnits=Total; PHUnits=Water
            Thickness  NO3  NH4
            150        100  1.3
            150        50   1
            300        20   1
            300        20   0.8
            300        20   0.8
            300        20   0.5
            300        20   0.5
        SurfaceOrganicMatter: same as Hermitage2009.Hermitage2009Base.Field.SurfaceOrganicMatter
        Plant Wheat: CropType=Wheat
        MicroClimate: same as Hermitage2009.Hermitage2009Base.Field.MicroClimate
        Operations IrrigationSchedule
          2010-05-28  [Irrigation].Apply(amount:25);
          2010-07-22  [Irrigation].Apply(amount:35);
          2010-10-05  [Irrigation].Apply(amount:60);
        Manager SowingRule
          Cultivar = Hartog
```csharp
using System;
using Models.Core;
using Models.PMF;
namespace Models
{
           
	[Serializable] 
	[System.Xml.Serialization.XmlInclude(typeof(Model))]
	public class Script : Model
	{
	
		[Link] Plant Wheat;
		[Link] Clock Clock;
			
		[Description("Cultivar")]
		public String Cultivar { get; set; }
		[EventSubscribe("DoManagement")]
		private void OnDoManagement(object sender, EventArgs e)
		{
			if (Clock.Today.DayOfYear == 148)
			{
				Wheat.Sow(population: 100, cultivar: Cultivar, depth: 50, rowSpacing: 250);
			}
		}


	}
}
```
        Report
          VariableNames:
            [Clock].Today
            Wheat.Phenology.CurrentPhaseName
            Wheat.Phenology.Stage
            Wheat.Phenology.Zadok.Stage
            Wheat.AboveGround.Wt
            Wheat.Leaf.LAI
            Wheat.Leaf.Live.Wt
            Wheat.Spike.Wt
            Wheat.Stem.Live.Wt
            Wheat.Structure.TotalStemPopn
            Wheat.Structure.MainStemPrimordiaNo
            Wheat.Structure.MainStemNodeNo
            Wheat.Structure.PlantTotalNodeNo
            Wheat.Grain.Number
            Wheat.Grain.Wt
            Wheat.WaterSupplyDemandRatio
            [Wheat].Leaf.SpecificArea
            [Wheat].Leaf.CohortParameters.SpecificLeafAreaMax.Value
            [Wheat].Leaf.CohortParameters.SpecificLeafAreaMin.Value
          EventNames:
            [Clock].DoReport
  Experiment GattonLate2010
    Factors
      Factor Cv: Specifications=[SowingRule].Script.Cultivar = Hartog
    Simulation GattonLate2010Base: Area=0; Slope=0
      Clock: StartDate=2010-07-16; EndDate=2010-12-15
      Summary summaryfile
      Weather: FileName=Gatton2010Late.met
      SoilArbitrator Soil Arbitrator
      Zone Field: Area=1; Slope=0
        Irrigation
        Fertiliser
        Soil CSIROField: SoilType=APS6Soil; LocalName=APS6Site; Site=APS6Site; NearestTown=Unknown; Region=Lawes; NaturalVegetation=Unknown; Latitude=0; Longitude=0
          SoilWater: same as GattonStandard2010.GattonStandard2010Base.Field.LawesField.SoilWater
          SoilNitrogen: fom_type=[default, manure, mucuna, lablab, shemp, stable]; fract_carb=[0.2, 0.3, 0.54, 0.57, 0.45, 0]; fract_cell=[0.7, 0.3, 0.37, 0.37, 0.47, 0.1]; fract_lign=[0.1, 0.4, 0.09, 0.06, 0.08, 0.9]; wfpsN2N2O_x=[22, 88]; wfpsN2N2O_y=[0.1, 1]
          SoilOrganicMatter: same as Hermitage2009.Hermitage2009Base.Field.HRSField.SoilOrganicMatter
          Analysis: Thickness=[150, 150, 300, 300, 300, 300, 300]; PH=[7.5, 8, 8, 8, 8, 8, 8]; PHUnits=Water; BoronUnits=HotWater
          Sample Initial Water: Thickness=[150, 150, 300, 300, 300, 300, 300]; SW=[0.38, 0.38, 0.44, 0.4, 0.39, 0.4, 0.43]; NO3Units=ppm; NH4Units=ppm; SWUnits=Volumetric; OCUnits=Total; PHUnits=Water
          Sample Initial Nitrogen: NO3Units=kgha; NH4Units=kgha; SWUnits=Volumetric; OCUnits=Total; PHUnits=Water
            Thickness  NO3  NH4
            150        100  1.3
            150        50   1
            300        20   1
            300        20   0.8
            300        20   0.8
            300        20   0.5
            300        20   0.5
          Water: same as GattonStandard2010.GattonStandard2010Base.Field.LawesField.Water
        SurfaceOrganicMatter: same as Hermitage2009.Hermitage2009Base.Field.SurfaceOrganicMatter
        Plant Wheat: CropType=Wheat
        MicroClimate: same as Hermitage2009.Hermitage2009Base.Field.MicroClimate
        Manager SowingRule
          Cultivar = Hartog
```csharp
using System;
using Models.Core;
using Models.PMF;
namespace Models
{
           
	[Serializable] 
	[System.Xml.Serialization.XmlInclude(typeof(Model))]
	public class Script : Model
	{
	
		[Link] Plant Wheat;
		[Link] Clock Clock;
			
		[Description("Cultivar")]
		public String Cultivar { get; set; }
		[EventSubscribe("DoManagement")]
		private void OnDoManagement(object sender, EventArgs e)
		{
			if (Clock.Today.DayOfYear == 214)
			{
				Wheat.Sow(population: 100, cultivar: Cultivar, depth: 50, rowSpacing: 250);
				
			}
		}


	}
}
```
        Report: same as GattonStandard2010.GattonStandard2010Base.Field.Report
  Experiment Hermitage2011
    Factors
      Factor Cv: Specifications=[SowingRule].Script.Cultivar = Hartog
    Simulation Hermitage2011Base: Area=0; Slope=0
      Clock: StartDate=2011-06-16; EndDate=2011-12-12
      Summary summaryfile
      Weather: FileName=Hermitage2011.met
      SoilArbitrator Soil Arbitrator
      Zone Field: Area=1; Slope=0
        Irrigation
        Fertiliser
        Soil HRSField: SoilType=APS6Soil; LocalName=APS6Site; Site=APS6Site; NearestTown=Unknown; Region=Lawes; NaturalVegetation=Unknown; Latitude=0; Longitude=0
          SoilWater: same as GattonStandard2010.GattonStandard2010Base.Field.LawesField.SoilWater
          SoilNitrogen: fom_type=[default, manure, mucuna, lablab, shemp, stable]; fract_carb=[0.2, 0.3, 0.54, 0.57, 0.45, 0]; fract_cell=[0.7, 0.3, 0.37, 0.37, 0.47, 0.1]; fract_lign=[0.1, 0.4, 0.09, 0.06, 0.08, 0.9]; wfpsN2N2O_x=[22, 88]; wfpsN2N2O_y=[0.1, 1]
          SoilOrganicMatter: same as Hermitage2009.Hermitage2009Base.Field.HRSField.SoilOrganicMatter
          Analysis: Thickness=[150, 150, 300, 300, 300, 300, 300]; PH=[7.5, 8, 8, 8, 8, 8, 8]; PHUnits=Water; BoronUnits=HotWater
          Sample Initial Water: Thickness=[150, 150, 300, 300, 300, 300, 300]; SW=[0.56, 0.55, 0.55, 0.54, 0.53, 0.52, 0.51]; NO3Units=ppm; NH4Units=ppm; SWUnits=Volumetric; OCUnits=Total; PHUnits=Water
          Sample Initial Nitrogen: NO3Units=kgha; NH4Units=kgha; SWUnits=Volumetric; OCUnits=Total; PHUnits=Water
            Thickness  NO3  NH4
            150        100  1.3
            150        50   1
            300        20   1
            300        20   0.8
            300        20   0.8
            300        20   0.5
            300        20   0.5
          Water: same as Hermitage2009.Hermitage2009Base.Field.HRSField.Water
        SurfaceOrganicMatter: same as Hermitage2009.Hermitage2009Base.Field.SurfaceOrganicMatter
        Plant Wheat: CropType=Wheat
        MicroClimate: same as Hermitage2009.Hermitage2009Base.Field.MicroClimate
        Manager SowingRule
          Cultivar = Hartog
```csharp
using System;
using Models.Core;
using Models.PMF;
namespace Models
{
           
	[Serializable] 
	[System.Xml.Serialization.XmlInclude(typeof(Model))]
	public class Script : Model
	{
	
		[Link] Plant Wheat;
		[Link] Clock Clock;
			
		[Description("Cultivar")]
		public String Cultivar { get; set; }
		[EventSubscribe("DoManagement")]
		private void OnDoManagement(object sender, EventArgs e)
		{
			if (Clock.Today.DayOfYear == 181)
			{
				Wheat.Sow(population: 100, cultivar: Cultivar, depth: 60, rowSpacing: 200);
			
			}
		}
	}


}
```
        Report: same as GattonStandard2010.GattonStandard2010Base.Field.Report
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