Simulations: Version=2
  Memo TitlePage
    # The APSIM Wheat Model

    _Brown, H.E., Huth, N.I. and Holzworth, D.P._
  Memo Introduction
    The APSIM wheat model has been developed using the Plant Modelling Framework (PMF) of [brown_plant_2014]. This new framework provides a library of plant organ and process submodels that can be coupled, at runtime, to construct a model in much the same way that models can be coupled to construct a simulation. This means that dynamic composition of lower level process and organ classes (e.g. photosynthesis, leaf) into larger constructions (e.g. maize, wheat, sorghum) can be achieved by the model developer without additional coding.

    The wheat model consists of:

    * a phenology model to simulate development through sequential growth phases
    * a structure model to simulate plant morphology
    * a collection of organs to simulate the various plant parts
    * an arbitrator to allocate resources (N, biomass) to the various plant organs
  Replacements
    Plant Wheat: CropType=Wheat
      Memo TitlePage
        # The APSIM Wheat Model

        _Brown, H.E., Huth, N.I. and Holzworth, D.P._

        The APSIM wheat model has been developed using the Plant Modelling Framework (PMF) of [brown_plant_2014]. This new framework provides a library of plant organ and process submodels that can be coupled, at runtime, to construct a model in much the same way that models can be coupled to construct a simulation. This means that dynamic composition of lower level process and organ classes (e.g. photosynthesis, leaf) into larger constructions (e.g. maize, wheat, sorghum) can be achieved by the model developer without additional coding.

        The model consists of:

        * a phenology model to simulate development between growth phases
        * a structure model to simulate plant morphology
        * a collection of organs to simulate the various plant parts
        * an arbitrator to allocate resources (N, biomass) to the various plant organs
      OrganArbitrator Arbitrator: NArbitrationOption=RelativeAllocation; DMArbitrationOption=RelativeAllocation
      Phenology
        AirTemperatureFunction ThermalTime
          XYPairs: X=[0, 26, 37]; Y=[0, 26, 0]
          Memo
            Thermal time determines the rate of developmental progress through many of the crops phases and is used by organs to determing potential growth rates.
        GerminatingPhase Germinating: Start=Sowing; End=Germination
        EmergingPhase Emerging: Start=Germination; End=Emergence; ShootLag=40; ShootRate=1.5
          VariableReference ThermalTime: VariableName=[Phenology].ThermalTime.Value
        GenericPhase Vegetative: Start=Emergence; End=TerminalSpikelet
          Constant Target: Value=401
          VariableReference ThermalTime: VariableName=[Phenology].ThermalTime.Value
          MinimumFunction Stress
            VariableReference VernalisationEffect: VariableName=[Phenology].Vernalisation.VernEff
            VariableReference PhotoperiodEffect: VariableName=[Phenology].Vernalisation.PhotopEff
        LeafAppearancePhase StemElongation: Start=TerminalSpikelet; End=FlagLeaf
          VariableReference ThermalTime: VariableName=[Phenology].ThermalTime.Value
        GenericPhase EarlyReproductive: Start=FlagLeaf; End=Flowering
          VariableReference ThermalTime: VariableName=[Phenology].ThermalTime.Value
          MultiplyFunction Target
            Constant Multiplier: Value=2.5
            VariableReference Phyllochron
              VariableName=[Structure].MainStemNodeAppearanceRate.BasePhyllochron.Value
            AddFunction PhotoPeriodResponse
              Constant Base: Value=1
              MultiplyFunction IncreaseDueToPhotoPeriod
                LinearInterpolationFunction PhotoPeriodResponse: XProperty=[Phenology].Photoperiod.Value
                  XYPairs: X=[10.99, 11, 16]; Y=[0, 2, 0]
                DivideFunction RelativePhotoPeriodSensitivity
                  VariableReference PpSensitivity: VariableName=[Phenology].Vernalisation.PhotopSens
                  Constant MaxPpSensitivity: Value=5
        GenericPhase GrainDevelopment: Start=Flowering; End=StartGrainFill
          Constant Target: Value=120
          VariableReference ThermalTime: VariableName=[Phenology].ThermalTime.Value
        GenericPhase GrainFilling: Start=StartGrainFill; End=EndGrainFill
          Constant Target: Value=545
          VariableReference ThermalTime: VariableName=[Phenology].ThermalTime.Value
        GenericPhase Maturing: Start=EndGrainFill; End=Maturity
          Constant Target: Value=35
          VariableReference ThermalTime: VariableName=[Phenology].ThermalTime.Value
        GenericPhase Ripening: Start=Maturity; End=HarvestRipe
          Constant Target: Value=300
          VariableReference ThermalTime: VariableName=[Phenology].ThermalTime.Value
        EndPhase ReadyForHarvesting: Start=HarvestRipe; End=Unused
          VariableReference ThermalTime: VariableName=[Phenology].ThermalTime.Value
        PhotoperiodFunction Photoperiod: Twilight=-6
        VernalisationCW Vernalisation: VernSens=2.5; PhotopSens=2; StartStageForEffects=Emergence; EndStageForEffects=TerminalSpikelet; StartStageForCumulativeVD=Germination; EndStageForCumulativeVD=TerminalSpikelet
          AirTemperatureFunction VDModel
            XYPairs: X=[0, 2, 15]; Y=[0, 1, 0]
            Memo
              Thermal time determines the rate of developmental progress through many of the crops phases and is used by organs to determing potential growth rates.
          PhotoperiodFunction Photoperiod: Twilight=-6
        ZadokPMF Zadok
        OnEventFunction FlagLeafDAS: SetEvent=FlagLeaf; ReSetEvent=never
          Memo
            A function is used to provide flowering date as days after sowing(DAS).
          Constant PreEventValue: Value=0
          VariableReference PostEventValue: VariableName=[Phenology].DaysAfterSowing
        OnEventFunction FloweringDAS: SetEvent=Flowering; ReSetEvent=never
          Memo
            A function is used to provide flowering date as days after sowing(DAS).
          Constant PreEventValue: Value=0
          VariableReference PostEventValue: VariableName=[Phenology].DaysAfterSowing
        OnEventFunction MaturityDAS: SetEvent=Maturity; ReSetEvent=never
          Memo
            A function is used to provide maturity date as days after sowing(DAS).
          Constant PreEventValue: Value=0
          VariableReference PostEventValue: VariableName=[Phenology].DaysAfterSowing
      Structure: InitialiseStage=Emergence; PrimaryBudNo=1
        PhaseLookup MainStemPrimordiaInitiationRate
          PhaseLookupValue VegetativePrimordiaInitiationRate: Start=Emergence; End=TerminalSpikelet
            MultiplyFunction
              VariableReference Phyllochron: VariableName=[Structure].MainStemNodeAppearanceRate.Value
              Constant: Value=0.5
          Memo Rational
            [Brown_Anthesis_2013] showed final leaf number (FLN) could be estimated as 2.86 + HSTS * 1.1 where HS<sup>TS</sup> is the the Haun stage at terminal spikelet.  To caputre this in the wheat model we have set the initial number of primordia (determined by the number of initialleaf objects on the leaf class) to 3 and have set this function to produce primordia 10% faster than mainstem leaves.  Primordia are initiated until the therminal spikelet stage and then the number remains fixed, giving final leaf number.
        MultiplyFunction MainStemNodeAppearanceRate
          LinearInterpolationFunction LeafStageFactor: XProperty=[Structure].LeafTipsAppeared
            XYPairs: X=[0, 2, 3, 7, 8, 14]; Y=[0.6, 0.6, 1, 1, 1.3, 1.3]
          Constant BasePhyllochron: Value=100
          Memo Rational
            Based on [Jamieson_SIRIUS_1998] where leaf appearace could be described by a base phyllochron determined between leaves 2 and 7 and a phyllochron that was 70% of base phyllochron for leaves < 2 and 130% of base phyllochron for leaves > 7
        HeightFunction HeightModel
          LinearInterpolationFunction PotentialHeight: XProperty=[Phenology].Stage
            XYPairs: X=[3, 4, 5, 6, 7]; Y=[10, 200, 1000, 1100, 1200]
          LinearInterpolationFunction WaterStress: XProperty=[Wheat].WaterSupplyDemandRatio
            XYPairs: X=[0.3, 1]; Y=[0, 1]
        MultiplyFunction BranchingRate
          PhaseLookup PotentialBranchingRate
            PhaseLookupValue Vegetative: Start=Emergence; End=TerminalSpikelet
              LinearInterpolationFunction PotentialBranchingRate: XProperty=[Leaf].AppearedCohortNo
                XYPairs: X=[1, 2, 3, 4, 5, 6, 7]; Y=[0, 0, 1, 1, 2, 2, 3]
            PhaseLookupValue Reproductive: Start=TerminalSpikelet; End=HarvestRipe
              Constant Zero: Value=0
          MinimumFunction StressFactors
            LinearInterpolationFunction WSC: XProperty=[Stem].PercentWSC.Value
              XYPairs: X=[0.1, 0.2]; Y=[0, 1]
            LinearInterpolationFunction Nitrogen: XProperty=[Arbitrator].FN
              XYPairs: X=[0, 1.5, 2]; Y=[0, 1, 1]
            LinearInterpolationFunction Cover: XProperty=[Leaf].CoverTotal
              XYPairs: X=[0, 0.9, 1]; Y=[1, 1, 0]
                XYPairs: X=[0, 0.45, 0.6]; Y=[1, 1, 0]
        VariableReference ThermalTime: VariableName=[Phenology].ThermalTime.Value
        MovingAverageFunction MeanTillerGrowthRate: NumberOfDays=5; InitialValue=0
          DivideFunction TillerGrowthRate
            VariableReference DailyGrowth: VariableName=[Arbitrator].DMSupply
            VariableReference ThermalTime: VariableName=[Phenology].ThermalTime.Value
            VariableReference StemPopulation: VariableName=[Structure].TotalStemPopn
        PhaseLookup BranchMortality
          PhaseLookupValue MortalityPhase: Start=TerminalSpikelet; End=Flowering
            LinearInterpolationFunction Mortality: XProperty=[Structure].MeanTillerGrowthRate.Value
              XYPairs: X=[0, 0.004, 0.005]; Y=[0.07, 0, 0]
        OnEventFunction ReproductiveNodes: SetEvent=TerminalSpikelet
          SubtractFunction PostEventValue
            VariableReference VegetativePrimordia: VariableName=[Structure].MainStemPrimordiaNo
            VariableReference AppearedLeaves: VariableName=[Structure].LeafTipsAppeared
          Constant PreEventValue: Value=0
        MainStemFinalNodeNumberFunction MainStemFinalNodeNumber: MaximumMainStemNodeNumber=30
          AddFunction FinalLeafNumber
            Constant Intercept: Value=2.65
            MultiplyFunction Increment
              Constant Slope: Value=1.1
              VariableReference HaunStageAtTerminalSpikelet: VariableName=[Structure].HaunStageAtTerminalSpikelet.Value
        HoldFunction HaunStageAtTerminalSpikelet: WhenToHold=TerminalSpikelet
          VariableReference ValueToHold: VariableName=[Structure].LeafTipsAppeared
      ReproductiveOrgan Grain: RipeStage=Ripe
        Biomass Live
        Biomass Dead
        Constant MaxNConcDailyGrowth: Value=0.03
        Constant WaterContent: Value=0.12
        Constant MinimumNConc: Value=0.006
        Constant MaximumNConc: Value=0.03
        Constant MaximumPotentialGrainSize: Value=0.043; Units=g
        PhaseBasedSwitch NitrogenDemandSwitch: Start=Germination; End=Maturity
        AccumulateFunction AccumThermalTime: StartStageName=Flowering; EndStageName=Maturity
          VariableReference DailyThermalTimeValue: VariableName=[Phenology].ThermalTime.Value
        AirTemperatureFunction FillingRate
          XYPairs: X=[0, 26, 30, 35]; Y=[0, 0.0015, 0.0015, 0.0015]
        PhaseLookup DMDemandFunction
          PhaseLookupValue InitialPhase: Start=Flowering; End=StartGrainFill
            FillingRateFunction
              VariableReference GrainNumber: VariableName=[Grain].NumberFunction.Value
              VariableReference FillingDuration: VariableName=[Phenology].GrainDevelopment.Target.Value
              VariableReference ThermalTime: VariableName=[Phenology].ThermalTime.Value
              MultiplyFunction PotentialSizeIncrement
                VariableReference InitialProportion: VariableName=[Grain].InitialGrainProportion.Value
                VariableReference MaximumSize: VariableName=[Grain].MaximumPotentialGrainSize.Value
          PhaseLookupValue LinearPhase: Start=StartGrainFill; End=EndGrainFill
            FillingRateFunction
              VariableReference GrainNumber: VariableName=[Grain].NumberFunction.Value
              VariableReference FillingDuration: VariableName=[Phenology].GrainFilling.Target.Value
              VariableReference ThermalTime: VariableName=[Phenology].ThermalTime.Value
              MultiplyFunction PotentialSizeIncrement
                SubtractFunction ProportionLinearPhase
                  Constant One: Value=1
                  VariableReference InitialProportion: VariableName=[Grain].InitialGrainProportion.Value
                VariableReference MaximumSize: VariableName=[Grain].MaximumPotentialGrainSize.Value
        MultiplyFunction NumberFunction
          Constant GrainsPerStem: Value=25; Units=/g
          VariableReference StemMass: VariableName=[StemPlusSpike].Wt
        ExpressionFunction Protein
          Expression=([Grain].Live.N + [Grain].Dead.N)/([Grain].Live.Wt + [Grain].Dead.Wt) * 100 * 5.71
        DivideFunction GrowthRateGrainDevelopment
          AccumulateFunction GrowthGrainDevelopment: StartStageName=FlagLeaf; EndStageName=StartGrainFill
            VariableReference DailyBiomassProduction: VariableName=[Arbitrator].DMSupply
          AccumulateFunction DaysGrainDevelopment: StartStageName=FlagLeaf; EndStageName=StartGrainFill
            Constant LenthOfADay: Value=1; Units=days/day
        Constant InitialGrainProportion: Value=0.05
        PhaseLookup NFillingRate
          PhaseLookupValue GrainFilling: Start=Flowering; End=EndGrainFill
            FillingRateFunction
              VariableReference GrainNumber: VariableName=[Grain].NumberFunction.Value
              AddFunction FillingDuration
                VariableReference FloweringToGrainFilling: VariableName=[Phenology].GrainDevelopment.Target.Value
                VariableReference GrainFilling: VariableName=[Phenology].GrainFilling.Target.Value
              VariableReference ThermalTime: VariableName=[Phenology].ThermalTime.Value
              MultiplyFunction PotentialSizeIncrement
                Constant MaximumFinalNConc: Value=0.026; Units=g/g
                VariableReference MaximumSize: VariableName=[Grain].MaximumPotentialGrainSize.Value
        Folder BiomassRemovalDefaults
          OrganBiomassRemovalType Harvest: FractionLiveToRemove=1; FractionDeadToRemove=0; FractionLiveToResidue=0; FractionDeadToResidue=0
          OrganBiomassRemovalType Cut: FractionLiveToRemove=1; FractionDeadToRemove=0; FractionLiveToResidue=0; FractionDeadToResidue=0
          OrganBiomassRemovalType Prune: FractionLiveToRemove=0; FractionDeadToRemove=0; FractionLiveToResidue=0.8; FractionDeadToResidue=0
          OrganBiomassRemovalType Graze: FractionLiveToRemove=0.6; FractionDeadToRemove=0; FractionLiveToResidue=0.2; FractionDeadToResidue=0
          OrganBiomassRemovalType Thin: FractionLiveToRemove=0; FractionDeadToRemove=0; FractionLiveToResidue=0.05; FractionDeadToResidue=0
      Root: NuptakeSupply=0
        CompositeBiomass Live: Propertys=[[Root].LayerLive]
        CompositeBiomass Dead: Propertys=[[Root].LayerDead]
        LinearInterpolationFunction KLModifier: XProperty=[Leaf].LAI
          XYPairs: X=[0, 3]; Y=[1, 1]
        Constant SoilWaterEffect: Value=1
        AirTemperatureFunction TemperatureEffect
          XYPairs: X=[0, 26, 35]; Y=[1, 1, 1]
        Constant MaxDailyNUptake: Value=20
        Constant SenescenceRate: Value=0.005
        Constant StructuralFraction: Value=1
        PhaseLookup PartitionFraction
          PhaseLookupValue PreEmergence: Start=Germination; End=Emergence
            Constant Value: Value=0
          PhaseLookupValue PreFlowering: Start=Emergence; End=Flowering
            Constant Value: Value=0.2
          PhaseLookupValue PostFlowering: Start=Emergence; End=Flowering
            Constant Value: Value=0
        Constant MaximumNConc: Value=0.01
        Constant MinimumNConc: Value=0.01
        PhaseLookup RootFrontVelocity
          PhaseLookupValue PreEmergence: Start=Germination; End=Emergence
            Constant Value: Value=5
          PhaseLookupValue PostEmergence: Start=Emergence; End=Maturity
            Constant Value: Value=20
        PhaseBasedSwitch NitrogenDemandSwitch: Start=Germination; End=Maturity
        Folder BiomassRemovalDefaults
          OrganBiomassRemovalType Harvest: FractionLiveToRemove=0; FractionDeadToRemove=0; FractionLiveToResidue=0.2; FractionDeadToResidue=0
          OrganBiomassRemovalType Cut: FractionLiveToRemove=0; FractionDeadToRemove=0; FractionLiveToResidue=0.3; FractionDeadToResidue=0
          OrganBiomassRemovalType Prune: FractionLiveToRemove=0; FractionDeadToRemove=0; FractionLiveToResidue=0.1; FractionDeadToResidue=0
          OrganBiomassRemovalType Graze: FractionLiveToRemove=0; FractionDeadToRemove=0; FractionLiveToResidue=0.15; FractionDeadToResidue=0
          OrganBiomassRemovalType Thin: FractionLiveToRemove=0; FractionDeadToRemove=0; FractionLiveToResidue=0.05; FractionDeadToResidue=0
        LinearInterpolationFunction KNO3: XProperty=[Root].RootLengthDenisty
          XYPairs: X=[0, 0.003]; Y=[0.03, 0.03]
        LinearInterpolationFunction KNH4: XProperty=[Root].RootLengthDenisty
          XYPairs: X=[0, 0.003]; Y=[0.03, 0.03]
        LinearInterpolationFunction NUptakeSWFactor: XProperty=[Root].RWC
          XYPairs: X=[0, 0.2, 1]; Y=[1, 1, 1]
        Constant InitialDM: Value=0.2; Units=g/plant
        Constant SpecificRootLength: Value=40; Units=m/g
      Leaf: CurrentExpandingLeaf=0; StartFractionExpanded=0; FractionNextleafExpanded=0; _ExpandedNodeNo=0; DeadNodesYesterday=0; MaxCover=1; Albedo=0.2; Gsmax=0.015; R50=150; FRGR=0; PotentialEP=0; KDead=0.3; MaximumMainStemLeafNumber=30; FractionDied=0
        LeafCohort InitialLeaves[1]: Rank=1; Area=200
        LeafCohort InitialLeaves[2]: Rank=2; Area=0
        CompositeBiomass Live: Propertys=[[Leaf].CohortLive]
        CompositeBiomass Dead: Propertys=[[Leaf].CohortDead]
        ArrayBiomass CohortArrayLive: Propertys=[[Leaf].Live]; ArraySize=[Leaf].MaxNodeNo
        ArrayBiomass CohortArrayDead: Propertys=[[Leaf].Dead]; ArraySize=[Leaf].MaxNodeNo
        LeafCohortParameters CohortParameters
          Constant NReallocationFactor: Value=0.3
          Constant NRetranslocationFactor: Value=0.1
          Constant DMReallocationFactor: Value=0
          Constant DMRetranslocationFactor: Value=0
          MinimumFunction CellDivisionStress
            LinearInterpolationFunction WaterStressFactor: XProperty=[Wheat].WaterSupplyDemandRatio
              XYPairs: X=[0.5, 1]; Y=[0.1, 1]
            LinearInterpolationFunction NitrogenStressFactor: XProperty=[Wheat].Leaf.Fn
              XYPairs: X=[0, 0.5, 1]; Y=[0.1, 0.1, 1]
          LinearInterpolationFunction ExpansionStress: XProperty=[Wheat].WaterSupplyDemandRatio
            XYPairs: X=[0.1, 0.7, 1]; Y=[0, 1, 1]
          VariableReference GrowthDuration: VariableName=[Structure].MainStemNodeAppearanceRate.Value
          PhaseLookup LagDuration
            PhaseLookupValue VegetativeGrowth: Start=Emergence; End=TerminalSpikelet
              MultiplyFunction LagDuration
                Constant Multiplier: Value=4
                VariableReference Phyllochron: VariableName=[Structure].MainStemNodeAppearanceRate.Value
            PhaseLookupValue StemElongation: Start=TerminalSpikelet; End=FlagLeaf
              ExpressionFunction LagDuration
                Expression=[Phenology].GrainFilling.Target.Value+[Phenology].GrainDevelopment.Target.Value + [Phenology].EarlyReproductive.Target.Value - [Leaf].CohortParameters.SenescenceDuration.Value
          MultiplyFunction SenescenceDuration
            Constant Multiplier: Value=3
            VariableReference Phyllochron: VariableName=[Structure].MainStemNodeAppearanceRate.Value
          Constant DetachmentLagDuration: Value=1000000
          Constant DetachmentDuration: Value=1000000
          Constant RelativeBranchLeafSize: Value=1
          LinearInterpolationFunction MaximumNConc: XProperty=[Phenology].Stage
            XYPairs: X=[3, 4, 6]; Y=[0.08, 0.05, 0.02]
          LinearInterpolationFunction CriticalNConc: XProperty=[Phenology].Stage
            XYPairs: X=[3, 4, 6]; Y=[0.07, 0.04, 0.015]
          LinearInterpolationFunction MinimumNConc: XProperty=[Phenology].Stage
            XYPairs: X=[3, 4]; Y=[0.01, 0.005]
          AddFunction DroughtInducedSenAcceleration
            Constant One: Value=1
            MultiplyFunction Stress
              Constant StressResponseCoefficient: Value=1
              LinearInterpolationFunction StressFactor: XProperty=[Wheat].WaterSupplyDemandRatio
                XYPairs: X=[0, 0.7]; Y=[1, 0]
          LinearInterpolationFunction SpecificLeafAreaMax: XProperty=[Phenology].Stage
            XYPairs: X=[3, 4]; Y=[18000, 30000]
          LinearInterpolationFunction SpecificLeafAreaMin: XProperty=[Leaf].Fn
            XYPairs: X=[0.4, 1]; Y=[10000, 18000]
          Constant InitialNConc: Value=0
          Constant StructuralFraction: Value=0.5
          Constant NonStructuralFraction: Value=0
          LinearInterpolationFunction ShadeInducedSenescenceRate: XProperty=[Leaf].CohortCurrentRankCoverAbove
            XYPairs: X=[0, 0.7, 0.8, 0.97, 0.98]; Y=[0, 0, 0, 0, 0]
          Constant LeafSizeShapeParameter: Value=0.3
          MultiplyFunction MaxArea
            Constant AreaLargestLeaves: Value=2600; Units=mm^2
            LinearInterpolationFunction AgeFactor: XProperty=[Phenology].Stage
              XYPairs: X=[3, 4]; Y=[0.1, 1]
          Constant SenessingLeafRelativeSize: Value=0.1; Units=0-1
        RUEModel Photosynthesis
          Constant RUE: Value=1.5
          WeightedTemperatureFunction FT: MaximumTemperatureWeighting=0.5
            XYPairs: X=[0, 10, 25, 35]; Y=[0, 1, 1, 0]
          LinearInterpolationFunction FVPD: XProperty=[Leaf].Photosynthesis.VPD
            XYPairs: X=[0, 10, 50]; Y=[1, 1, 1]
          LinearInterpolationFunction FN: XProperty=[Leaf].Fn
            XYPairs: X=[0, 1, 1.5]; Y=[0, 1, 1]
          LinearInterpolationFunction FW: XProperty=[Leaf].Fw
            XYPairs: X=[0, 1]; Y=[0, 1]
          RUECO2Function FCO2: PhotosyntheticPathway=C3
          VariableReference RadnInt: VariableName=[Leaf].RadIntTot
        MultiplyFunction ExtinctionCoeff
          LinearInterpolationFunction PotentialExtinctionCoeff: XProperty=[Leaf].LAI
            XYPairs: X=[0, 0.5]; Y=[0.5, 0.5]
          LinearInterpolationFunction WaterStress: XProperty=[Wheat].WaterSupplyDemandRatio
            XYPairs: X=[0, 0.7]; Y=[0.5, 1]
        LinearInterpolationFunction FrostFraction: XProperty=[Weather].MinT
          XYPairs: X=[-1, 0]; Y=[0, 0]
        VariableReference ThermalTime: VariableName=[Phenology].ThermalTime.Value
        MinimumFunction FRGRFunction
          VariableReference RUE_FT: VariableName=[Leaf].Photosynthesis.FT.Value
          MinimumFunction Others
            VariableReference RUE_FN: VariableName=[Leaf].Photosynthesis.FN.Value
            VariableReference RUE_FVPD: VariableName=[Leaf].Photosynthesis.FVPD.Value
        Folder BiomassRemovalDefaults
          OrganBiomassRemovalType Harvest: FractionLiveToRemove=0; FractionDeadToRemove=0; FractionLiveToResidue=0.3; FractionDeadToResidue=0.3
          OrganBiomassRemovalType Cut: FractionLiveToRemove=0.8; FractionDeadToRemove=0.8; FractionLiveToResidue=0; FractionDeadToResidue=0
          OrganBiomassRemovalType Prune: FractionLiveToRemove=0; FractionDeadToRemove=0; FractionLiveToResidue=0.6; FractionDeadToResidue=0.6
          OrganBiomassRemovalType Graze: FractionLiveToRemove=0.6; FractionDeadToRemove=0.6; FractionLiveToResidue=0.1; FractionDeadToResidue=0.1
          OrganBiomassRemovalType Thin: FractionLiveToRemove=0; FractionDeadToRemove=0; FractionLiveToResidue=0.05; FractionDeadToResidue=0.05
      GenericAboveGroundOrgan Spike
        PopulationBasedDemandFunction DMDemandFunction
          VariableReference ThermalTime: VariableName=[Phenology].ThermalTime.Value
          Constant ExpansionStress: Value=1
          VariableReference OrganPopulation: VariableName=[Spike].HeadNumber.Value
          Constant StartStage: Value=5.2
          Constant MaximumOrganWt: Value=0.4
          Constant GrowthDuration: Value=453
        Biomass Live
        Biomass Dead
        Constant NReallocationFactor: Value=0
        Constant NRetranslocationFactor: Value=0.1
        Constant MaximumNConc: Value=0.01
        Constant StructuralFraction: Value=0.7
        Constant MinimumNConc: Value=0.003
        MultiplyFunction HeadNumber
          Constant FertileTillers: Value=1
          VariableReference StemPopulation: VariableName=[Structure].TotalStemPopn
        Folder BiomassRemovalDefaults
          OrganBiomassRemovalType Harvest: FractionLiveToRemove=0.5; FractionDeadToRemove=0; FractionLiveToResidue=0.1; FractionDeadToResidue=0
          OrganBiomassRemovalType Cut: FractionLiveToRemove=0.8; FractionDeadToRemove=0; FractionLiveToResidue=0; FractionDeadToResidue=0
          OrganBiomassRemovalType Prune: FractionLiveToRemove=0; FractionDeadToRemove=0; FractionLiveToResidue=0.6; FractionDeadToResidue=0
          OrganBiomassRemovalType Graze: FractionLiveToRemove=0.6; FractionDeadToRemove=0; FractionLiveToResidue=0.2; FractionDeadToResidue=0
          OrganBiomassRemovalType Thin: FractionLiveToRemove=0; FractionDeadToRemove=0; FractionLiveToResidue=0.05; FractionDeadToResidue=0
      GenericAboveGroundOrgan Stem
        Biomass Live
        Biomass Dead
        Constant StructuralFraction: Value=0.7
        LinearInterpolationFunction MaximumNConc: XProperty=[Phenology].Stage
          XYPairs: X=[3, 4, 6]; Y=[0.07, 0.03, 0.015]
        LinearInterpolationFunction MinimumNConc: XProperty=[Phenology].Stage
          XYPairs: X=[3, 4, 6]; Y=[0.015, 0.01, 0.0025]
        PhaseBasedSwitch NitrogenDemandSwitch: Start=Emergence; End=StartGrainFill
        Constant NReallocationFactor: Value=0
        Constant NRetranslocationFactor: Value=0.5
        PhaseLookup DMRetranslocationFactor
          PhaseLookupValue VegetativeGrowth: Start=Emergence; End=Flowering
            Constant DMRetranslocationFactor: Value=0
          PhaseLookupValue ReproductiveGrowth: Start=Flowering; End=EndGrainFill
            Constant DMRetranslocationFactor: Value=0.5
        PartitionFractionDemandFunction DMDemandFunction
          PhaseLookup PartitionFraction
            PhaseLookupValue PreStemElongation: Start=Emergence; End=TerminalSpikelet
              Constant StemFraction: Value=0.4
            PhaseLookupValue StemElongation: Start=TerminalSpikelet; End=Flowering
              Constant StemFraction: Value=0.6
        Folder BiomassRemovalDefaults: same as Replacements.Wheat.Spike.BiomassRemovalDefaults
        DivideFunction PercentWSC
          VariableReference WSC: VariableName=[Stem].Live.NonStructuralWt
          VariableReference StemWt: VariableName=[Stem].Live.Wt
      CompositeBiomass AboveGround
        Propertys=[[Leaf].Live, [Leaf].Dead, [Stem].Live, [Stem].Dead, [Spike].Live, [Spike].Dead, [Grain].Live, [Grain].Dead]
      CompositeBiomass AboveGroundLive: Propertys=[[Leaf].Live, [Stem].Live, [Spike].Live, [Grain].Live]
      CompositeBiomass AboveGroundDead: Propertys=[[Leaf].Dead, [Stem].Dead, [Spike].Dead, [Grain].Dead]
      CompositeBiomass BelowGround: Propertys=[[Root].Live, [Root].Dead]
      CompositeBiomass Total
        Propertys=[[Leaf].Live, [Leaf].Dead, [Stem].Live, [Stem].Dead, [Root].Live, [Root].Dead, [Spike].Live, [Spike].Dead, [Grain].Live, [Grain].Dead]
      CompositeBiomass TotalLive
        Propertys=[[Leaf].Live, [Stem].Live, [Root].Live, [Spike].Live, [Grain].Live]
      CompositeBiomass TotalDead
        Propertys=[[Leaf].Dead, [Stem].Dead, [Root].Dead, [Spike].Dead, [Grain].Dead]
      CompositeBiomass Ear: Propertys=[[Spike].Live, [Grain].Live, [Spike].Dead, [Grain].Dead]
        Memo
          The Ear composite biomass object includes the Live and dead pools of all organs within the Ear to allow output for total dry matter and Nutrient contents, including total structural, non-structural and metabolic pools.
      CompositeBiomass StemPlusSpike: Propertys=[[Stem].Live, [Spike].Live, [Stem].Dead, [Spike].Dead]
      CultivarFolder Cultivars
        CultivarFolder New Zealand
          Cultivar Alberic
            Command:
              [Phenology].Vernalisation.VernSens = 3.0
              [Phenology].Vernalisation.PhotopSens = 5
          Cultivar Amarok
            Command:
              [Phenology].Vernalisation.VernSens = 3.0
              [Phenology].Vernalisation.PhotopSens = 4.0
          Cultivar Aspiring
            Command:
              [Phenology].Vernalisation.VernSens = 5.0
              [Phenology].Vernalisation.PhotopSens = 3.0
          Cultivar BattenWinter
            Command:
              [Phenology].Vernalisation.VernSens = 3.0
              [Phenology].Vernalisation.PhotopSens = 5.0
          Cultivar BattenSpring
            Command:
              [Phenology].Vernalisation.VernSens = 1
              [Phenology].Vernalisation.PhotopSens = 5
          Cultivar Centaur
            Command:
              [Phenology].Vernalisation.VernSens = 5.0
              [Phenology].Vernalisation.PhotopSens = 4.0
          Cultivar Claire
            Command:
              [Phenology].Vernalisation.VernSens = 3.0
              [Phenology].Vernalisation.PhotopSens = 5.0
          Cultivar Conquest
            Command:
              [Phenology].Vernalisation.VernSens = 1.0
              [Phenology].Vernalisation.PhotopSens = 5.0
          Cultivar Einstein
            Command:
              [Phenology].Vernalisation.VernSens = 5.0
              [Phenology].Vernalisation.PhotopSens = 4.0
          Cultivar Exceed
            Command:
              [Phenology].Vernalisation.VernSens = 5.0
              [Phenology].Vernalisation.PhotopSens = 4.0
          Cultivar Majestic
            Command:
              [Phenology].Vernalisation.VernSens = 1.0
              [Phenology].Vernalisation.PhotopSens = 5.0
          Cultivar Option
            Command:
              [Phenology].Vernalisation.VernSens = 4.0
              [Phenology].Vernalisation.PhotopSens = 5.0
          Cultivar Otane
            Command:
              [Phenology].Vernalisation.VernSens = 0
              [Phenology].Vernalisation.PhotopSens = 3.5
          Cultivar Pennant
            Command:
              [Phenology].Vernalisation.VernSens = 5.0
              [Phenology].Vernalisation.PhotopSens  = 3.0
          Cultivar Regency
            Command:
              [Phenology].Vernalisation.VernSens = 5.0
              [Phenology].Vernalisation.PhotopSens = 5.0
          Cultivar Richmond
            Command:
              [Phenology].Vernalisation.VernSens = 5.0
              [Phenology].Vernalisation.PhotopSens = 4.0
          Cultivar Robigus
            Command:
              [Phenology].Vernalisation.VernSens = 3.0
              [Phenology].Vernalisation.PhotopSens = 5.0
          Cultivar Rongotea
            Command:
              [Phenology].Vernalisation.VernSens = 2.0
              [Phenology].Vernalisation.PhotopSens = 4.0
          Cultivar Rubric
            Command:
              [Phenology].Vernalisation.VernSens = 1.0
              [Phenology].Vernalisation.PhotopSens = 4.0
          Cultivar Sage
            Command:
              [Phenology].Vernalisation.VernSens = 1.0
              [Phenology].Vernalisation.PhotopSens = 5.0
          Cultivar Saracen
            Command:
              [Phenology].Vernalisation.VernSens = 2.0
              [Phenology].Vernalisation.PhotopSens = 5.0
          Cultivar Savannah
            Command:
              [Phenology].Vernalisation.VernSens = 5.0
              [Phenology].Vernalisation.PhotopSens = 4.0
          Cultivar Solstice
            Command:
              [Phenology].Vernalisation.VernSens = 5.0
              [Phenology].Vernalisation.PhotopSens = 3.0
          Cultivar Tanker
            Command:
              [Phenology].Vernalisation.VernSens = 5.0
              [Phenology].Vernalisation.PhotopSens = 4.0
          Cultivar Tribute
            Command:
              [Phenology].Vernalisation.VernSens = 1.0
              [Phenology].Vernalisation.PhotopSens = 4.0
          Cultivar Wakanui
            Command:
              [Phenology].Vernalisation.VernSens = 0
              [Phenology].Vernalisation.PhotopSens = 3
              [Structure].MainStemNodeAppearanceRate.BasePhyllochron.Value = 120
              [Leaf].ExtinctionCoeff.PotentialExtinctionCoeff.XYPairs.Y = 0.9,0.9
              [Phenology].EarlyReproductive.Target.Multiplier.Value = 2.5
              [Leaf].CohortParameters.SpecificLeafAreaMin.XYPairs.Y = 1000,1000
              [Phenology].Vegetative.Target.Value = 660
          Cultivar Weston
            Command:
              [Phenology].Vernalisation.VernSens = 5.0
              [Phenology].Vernalisation.PhotopSens = 4.0
        CultivarFolder Australia
          Cultivar Axe
            Command:
              [Phenology].Vernalisation.VernSens = 0.1
              [Phenology].Vernalisation.PhotopSens = 3.0
          Cultivar Bolac
            Command:
              [Phenology].Vernalisation.VernSens = 2.5
              [Phenology].Vernalisation.PhotopSens = 4.0
          Cultivar Derrimut
            Command:
              [Phenology].Vernalisation.VernSens = 1.5
              [Phenology].Vernalisation.PhotopSens = 3.5
          Cultivar EGAGregory
            Command:
              [Phenology].Vernalisation.VernSens = 0.1
              [Phenology].Vernalisation.PhotopSens = 3.3
          Cultivar GattonHartog
            Command:
              [Phenology].Vernalisation.VernSens = 2.5
              [Phenology].Vernalisation.PhotopSens = 3.5
          Cultivar Gamenya
            Command:
              [Phenology].Vernalisation.VernSens = 1.6
              [Phenology].Vernalisation.PhotopSens = 2.0
          Cultivar Gladius
            Command:
              [Phenology].Vernalisation.VernSens = 1.5
              [Phenology].Vernalisation.PhotopSens = 3.0
          Cultivar Gutha
            Command:
              [Phenology].Vernalisation.VernSens = 1.5
              [Phenology].Vernalisation.PhotopSens = 3.0
          Cultivar H45
            Command:
              [Phenology].Vernalisation.VernSens = 0.1
              [Phenology].Vernalisation.PhotopSens = 3.0
          Cultivar H46
            Command:
              [Phenology].Vernalisation.VernSens = 1.5
              [Phenology].Vernalisation.PhotopSens = 1.5
          Cultivar Hartog
            Command:
              [Phenology].Vernalisation.VernSens = 0.1
              [Phenology].Vernalisation.PhotopSens = 3.6
          Cultivar Janz
            Command:
              [Phenology].Vernalisation.VernSens = 0
              [Phenology].Vernalisation.PhotopSens = 3.5
              [Phenology].Vegetative.Target.Value = 420
          Cultivar Kelallac
            Command:
              [Phenology].Vernalisation.VernSens = 2.5
              [Phenology].Vernalisation.PhotopSens = 4.0
          Cultivar Kennedy
            Command:
              [Phenology].Vernalisation.VernSens = 2.5
              [Phenology].Vernalisation.PhotopSens = 4.0
          Cultivar Lang
            Command:
              [Phenology].Vernalisation.VernSens = 0
              [Phenology].Vernalisation.PhotopSens = 3.5
              [Phenology].Vegetative.Target.Value = 460
          Cultivar Livingston
            Command:
              [Phenology].Vernalisation.VernSens = 2.3
              [Phenology].Vernalisation.PhotopSens = 3.2
          Cultivar Lorikeet
            Command:
              [Phenology].Vernalisation.VernSens = 2.0
              [Phenology].Vernalisation.PhotopSens = 4.0
          Cultivar MacKellar
            Command:
              [Phenology].Vernalisation.VernSens = 5.0
              [Phenology].Vernalisation.PhotopSens = 4.0
          Cultivar McCubbin
            Command:
              [Phenology].Vernalisation.VernSens = 1
              [Phenology].Vernalisation.PhotopSens = 5
          Cultivar Mercury
            Command:
              [Phenology].Vernalisation.VernSens = 1.5
              [Phenology].Vernalisation.PhotopSens = 2.5
          Cultivar Ruby
            Command:
              [Phenology].Vernalisation.VernSens = 2.3
              [Phenology].Vernalisation.PhotopSens = 3.2
          Cultivar Spear
            Command:
              [Phenology].Vernalisation.VernSens = 1.5
              [Phenology].Vernalisation.PhotopSens = 3.5
              [Grain].MaximumPotentialGrainSize.Value = 1
              [Phenology].GrainFilling.Target.Value = 580
          Cultivar Sunco
            Command:
              [Phenology].Vernalisation.VernSens = 1
              [Phenology].Vernalisation.PhotopSens = 4
          Cultivar Ventura
            Command:
              [Phenology].Vernalisation.VernSens = 1.5
              [Phenology].Vernalisation.PhotopSens = 3.0
          Cultivar Wedgetail
            Command:
              [Phenology].Vernalisation.VernSens = 3.9
              [Phenology].Vernalisation.PhotopSens = 3.9
          Cultivar Wilgoyne
            Command:
              [Phenology].Vernalisation.VernSens = 1.4
              [Phenology].Vernalisation.PhotopSens = 1.8
              [Grain].MaximumPotentialGrainSize.Value = 1
              [Phenology].GrainFilling.Target.Value = 580
          Cultivar Wyalkatchem
            Command:
              [Phenology].Vernalisation.VernSens = 2.3
              [Phenology].Vernalisation.PhotopSens = 3.2
          Cultivar Yitpi
            Command:
              [Phenology].Vernalisation.VernSens = 0
              [Phenology].Vernalisation.PhotopSens = 3.8
              [Phenology].Vegetative.Target.Value = 420
          Cultivar Young
            Command:
              [Phenology].Vernalisation.VernSens = 2.3
              [Phenology].Vernalisation.PhotopSens = 3.2
        CultivarFolder Turkey
          Cultivar Konya
            Command:
              [Phenology].Vernalisation.VernSens = 2.7
              [Phenology].Vernalisation.PhotopSens = 3.2
              [Grain].NumberFunction.GrainsPerStem.Value = 20
              [Grain].MaximumPotentialGrainSize.Value = 0.050
        CultivarFolder China
          Cultivar Keyu13
            Command:
              [Phenology].Vernalisation.VernSens = 5
              [Phenology].Vernalisation.PhotopSens = 2
        CultivarFolder USA
          Cultivar Yecora
            Command:
              [Phenology].Vernalisation.VernSens = 1.5
              [Phenology].Vernalisation.PhotopSens = 2.0
        CultivarFolder Europe
          Cultivar Dekan
            Command:
              [Phenology].Vernalisation.VernSens = 5.0
              [Phenology].Vernalisation.PhotopSens = 3.0
          Cultivar Rosario
            Command:
              [Phenology].Vernalisation.VernSens = 5.0
              [Phenology].Vernalisation.PhotopSens = 3.0
          Cultivar Ararat
            Command:
              [Phenology].Vernalisation.VernSens = 5.0
              [Phenology].Vernalisation.PhotopSens = 3.0
        CultivarFolder Africa
          Cultivar HAR1685
            Command:
              [Phenology].Vernalisation.VernSens = 1.5
              [Phenology].Vernalisation.PhotopSens = 2.0
              [Phenology].GrainFilling.Target.Value = 400
  DataStore
  Experiment CPT
    Factors
      Factor VrnSens
        Specifications=[SetPhenology].Script.VrnSens = 0,0.5,1,1.5,2,2,5,3,3.5,4,4.5,5
      Factor PhotopSens
        Specifications=[SetPhenology].Script.VrnSens = 0,0.5,1,1.5,2,2,5,3,3.5,4,4.5,5
      Factor TtTs
        Specifications=[SetPhenology].Script.VrnSens = 300,350,450,450,500,550,600,650,700
      Factor Sow
        Specifications=[Clock].StartDate = 2000-03-03,2000-05-15,2000-09-20,2001-04-09,2001-06-15,2001-08-09,2002-03-07,2002-05-15,2002-09-09,2003-03-14,2003-05-21,2003-09-02,2004-03-23,2004-05-28,2004-09-06,2005-04-04,2005-05-27,2005-09-05,2005-12-05,2006-03-13,2006-05-10,2006-10-11,2006-12-14,2007-04-24,2007-06-28,2007-09-13,2007-11-29,2008-04-11,2008-06-06,2008-09-11,2008-12-05,2009-03-20,2009-06-05,2009-08-24,2009-12-07,2010-03-30,2010-07-06,2010-10-04,2010-11-30,2011-03-30,2011-05-11,2011-09-09,2011-12-09,2012-04-05,2012-06-28,2012-09-25
    Simulation LincolnCPT: Area=0; Slope=0
      Clock: StartDate=1991-06-08; EndDate=2013-07-01
      Summary summaryfile
      Weather: FileName=lincoln.met
      Zone paddock: Area=1; Slope=0
        Irrigation
        Soil: SoilType=LincolnSoil; LocalName=Lincoln; Site=Lincoln; NearestTown=Unknown; Region=NZ; NaturalVegetation=Unknown; Latitude=0; Longitude=0
          Water
            Thickness  BD   AirDry  LL15  DUL   SAT
            100        1.3  0.05    0.08  0.31  0.44
            200        1.3  0.05    0.07  0.3   0.44
            200        1.3  0.05    0.07  0.28  0.44
            200        1.3  0.05    0.09  0.31  0.44
            200        1.3  0.05    0.11  0.3   0.44
            200        1.3  0.05    0.16  0.28  0.44
            200        1.3  0.05    0.15  0.3   0.44
            200        1.3  0.05    0.12  0.34  0.44
            SoilCrop WheatSoil: LL=[0.08, 0.07, 0.07, 0.09, 0.11, 0.16, 0.15, 0.12]; KL=[0.06, 0.06, 0.06, 0.04, 0.03, 0.02, 0.02, 0.02]; XF=[1, 1, 1, 1, 0.6, 0.4, 0.4, 0.4]
          SoilWater: residueinterception=0; SummerDate=1-Nov; SummerU=7; SummerCona=3; WinterDate=1-Apr; WinterU=7; WinterCona=3; DiffusConst=40; DiffusSlope=16; Salb=0.2; CN2Bare=75; CNRed=20; CNCov=0.8; slope=0; discharge_width=0; catchment_area=0; max_pond=0
            Thickness  SWCON  KLAT
            100        0.6    0
            200        0.6    0
            200        0.6    0
            200        0.6    0
            200        0.6    0
            200        0.6    0
            200        0.6    0
            200        0.6    0
          SoilNitrogen: fom_type=[default, manure, mucuna, lablab, shemp, stable]; fract_carb=[0.2, 0.3, 0.54, 0.57, 0.45, 0]; fract_cell=[0.7, 0.3, 0.37, 0.37, 0.47, 0.1]; fract_lign=[0.1, 0.4, 0.09, 0.06, 0.08, 0.9]; wfpsN2N2O_x=[22, 88]; wfpsN2N2O_y=[0.1, 1]
            oc=[0.360302, 0.270806, 0.241057, 0.16141, 0.160396, 0.299235, 0.0996345, 0.0996568]
          SoilOrganicMatter: RootCN=0; RootWt=0; SoilCN=0; EnrACoeff=0; EnrBCoeff=0; OCUnits=Total
            Thickness  OC    FBiom  FInert
            100        0.35  0.04   0.31
            200        0.27  0.03   0.31
            200        0.24  0.02   0.31
            200        0.16  0.01   0.31
            200        0.16  0.01   0.31
            200        0.3   0.01   0.25
            200        0.1   0.01   0.2
            200        0.1   0.01   0.2
          Analysis: Thickness=[100, 200, 200, 200, 200, 200, 200, 200]; PH=[8.5, 8.5, 8.6, 8.6, 8.6, 8.6, 8.6, 8.6]; PHUnits=Water; BoronUnits=HotWater
          Sample Initial nitrogen: NO3Units=ppm; NH4Units=ppm; SWUnits=Volumetric; OCUnits=Total; PHUnits=Water
            Thickness  NO3   NH4
            100        24.9  1.3
            200        16    1
            200        9.8   1
            200        9.8   0.8
            200        2.1   0.8
            200        2.1   0.5
            200        2.1   0.5
            200        2.1   0.5
          Sample Initial water: Thickness=[100, 200, 200, 200, 200, 200, 200, 200]; SW=[0.27, 0.3, 0.28, 0.25, 0.24, 0.27, 0.27, 0.21]; NO3Units=ppm; NH4Units=ppm; SWUnits=Volumetric; OCUnits=Total; PHUnits=Water
        SurfaceOrganicMatter Surface Organic Matter: PoolName=wheat_stubble; type=wheat; mass=1000; standing_fraction=0; cnr=80; CriticalResidueWeight=2000; OptimumDecompTemp=20; MaxCumulativeEOS=20; CNRatioDecompCoeff=0.277; CNRatioDecompThreshold=25; TotalLeachRain=25; MinRainToLeach=10; CriticalMinimumOrganicC=0.004; DefaultCPRatio=0; DefaultStandingFraction=0; StandingExtinctCoeff=0.5; FractionFaecesAdded=0.5
          Pools:
            {PoolName=wheat_stubble, ResidueType=wheat, Mass=1000, CNRatio=80, StandingFraction=0}
          ResidueTypes: LoadFromResource=ResidueTypes
        Fertiliser
        MicroClimate: a_interception=0; b_interception=1; c_interception=0; d_interception=0; soil_albedo=0.3; air_pressure=1010; soil_emissivity=0.96; sun_angle=15; soil_heat_flux_fraction=0.4; night_interception_fraction=0.5; windspeed_default=3; refheight=2; albedo=0.293662; emissivity=0.96; gsmax=0.01; r50=200
        Plant Wheat: CropType=Wheat
        Manager SetPhenology
          VrnSens = 0
          PhotopSens = 3
          TtTs = 401
```csharp
using System;
using Models.Core;
using System.Collections.Generic;
using System.Text;
using Models.PMF;
using Models;
using System.Xml.Serialization;
using APSIM.Shared.Utilities;
using System.Data;

namespace Models
{
	[Serializable] 
	//[System.Xml.Serialization.XmlInclude(typeof(Model))]
	public class Script : Model
	{
		[Link] Zone zone;
		[Link] Simulation Simulation;
		
		[Description("VrnSens")]
		public double VrnSens { get; set; }
		[Description("PhotopSens")]
		public  double PhotopSens { get; set; }
		[Description("TtTs")]
		public double TtTs { get; set; }
		
		[EventSubscribe("StartOfDay")]
		private void OnStartOfDay(object sender, EventArgs e)
		{
			object VrnSensResetValue = VrnSens;
			zone.Set("[Phenology].Vernalisation.VernSens", VrnSens);  
			object PhotopSensResetValue = PhotopSens;
			zone.Set("[Phenology].Vernalisation.PhotopSens", PhotopSens);  
			object TtTsResetValue = TtTs;
			zone.Set("[Phenology].Vegetative.Target.Value", TtTs);  
		}
	}
}
```
        Manager SowAndHarvest
          Cultivar = Otane
```csharp
using System;
using Models.Core;
using Models.PMF;
using APSIM.Shared.Utilities;
using System.Xml.Serialization;
        
namespace Models
{
	[Serializable] 
	[System.Xml.Serialization.XmlInclude(typeof(Model))]
	public class Script : Model
	{
		[Link] Plant Wheat;
		[Link] Clock Clock;
		[Link] Simulation sim;
		[Link] Summary Summary;
		
		[Description("Cultivar")]
		public string Cultivar { get; set; }
		
		[XmlIgnore] public bool Sown { get; set; }
		[XmlIgnore] public bool Harvested { get; set; }
		[XmlIgnore] public bool EndSet { get; set; }
		
		[EventSubscribe("Commencing")]
		private void OnSimulationCommencing(object sender, EventArgs e)
		{
			Sown = false;
			Harvested = false;
			EndSet = false;
		}
		
		[EventSubscribe("DoManagement")]
		private void OnDoManagement(object sender, EventArgs e)
		{
			if (Sown == false)
			{
				Wheat.Sow(population: 200, cultivar: Cultivar, depth: 15, rowSpacing: 150, budNumber: 1);
				Sown = true;
			}
			
			if (Wheat.Phenology.CurrentPhaseName == "GrainFilling")
			{
				Wheat.Harvest();
				Wheat.EndCrop();
				Harvested = true;
				Summary.WriteMessage(this, "Flowering reached so setting end date to stop simulation");
			}
			
			if ((Harvested == true) && (EndSet == false))
			{
				sim.Set("Clock.EndDate", Clock.Today.AddDays(1));
				EndSet = true;
			}
		}
	}
}
```
        Report HarvestReport: EventNames=[Wheat].Harvesting
          VariableNames:
            [Clock].Today
            [Wheat].Phenology.CurrentPhaseName
            [Wheat].Phenology.CurrentStageName
            [Wheat].Phenology.FlagLeafDAS.Value
            [Wheat].Phenology.FloweringDAS.Value
      SoilArbitrator Soil Arbitrator
