Simulations: Version=10
  Memo TitlePage
    # The APSIM Wheat Model

    _Brown, H.E., Huth, N.I. and Holzworth, D.P._
  Memo Introduction
    The APSIM wheat model has been developed using the Plant Modelling Framework (PMF) of [brown_plant_2014]. This new framework provides a library of plant organ and process submodels that can be coupled, at runtime, to construct a model in much the same way that models can be coupled to construct a simulation. This means that dynamic composition of lower level process and organ classes (e.g. photosynthesis, leaf) into larger constructions (e.g. maize, wheat, sorghum) can be achieved by the model developer without additional coding.

    The wheat model consists of:

    * a phenology model to simulate development through sequential growth phases
    * a structure model to simulate plant morphology
    * a collection of organs to simulate the various plant parts
    * an arbitrator to allocate resources (N, biomass) to the various plant organs
  Replacements
    Plant Maize: CropType=Maize
      Memo TitlePage
        # The APSIM Maize Model

        _Brown, H.E., Teixeira, E.I., Huth, N.I. and Holzworth, D.P._

        The APSIM maize model has been developed using the Plant Modelling Framework (PMF) of [brown_plant_2014]. This new framework provides a library of plant organ and process submodels that can be coupled, at runtime, to construct a model in much the same way that models can be coupled to construct a simulation. This means that dynamic composition of lower level process and organ classes (e.g. photosynthesis, leaf) into larger constructions (e.g. maize, wheat, sorghum) can be achieved by the model developer without additional coding.

        The model consists of:

        * a phenology model to simulate development between growth phases
        * a structure model to simulate plant morphology
        * a collection of organs to simulate the various plant parts
        * an arbitrator to allocate resources (N, biomass) to the various plant organs
      OrganArbitrator Arbitrator
        RelativeAllocation NArbitrator
        RelativeAllocation DMArbitrator
      Phenology: DaysAfterSowing=0
        MultiplyFunction ThermalTime
          AirTemperatureFunction BaseThermalTime
            XYPairs: X=[0, 18, 26, 34, 44]; Y=[0, 10, 18, 26, 0]
        GerminatingPhase Germinating: Start=Sowing; End=Germination
        EmergingPhase Emerging: Start=Germination; End=Emergence; ShootLag=55; ShootRate=0.6
          VariableReference ThermalTime: VariableName=[Phenology].ThermalTime.Value()
        GenericPhase Juvenile: Start=Emergence; End=EndJuvenile
          Constant Target: FixedValue=200; Units=deg day
          VariableReference ThermalTime: VariableName=[Phenology].ThermalTime.Value()
        GenericPhase Photosensitive: Start=EndJuvenile; End=FloralInitiation
          VariableReference ThermalTime: VariableName=[Phenology].ThermalTime.Value()
          LinearInterpolationFunction Target: XProperty=[Phenology].Photoperiod.Value()
            Memo
              The photoperiod is likely to vary with individual maize cultivars.  Therefore, the response shown here is indicative only.  See the descriptions of individual cultivars for more detail on photoperiod responses used by the maize model.
            XYPairs: X=[0, 12.5, 24]; Y=[0, 0, 10]
        LeafAppearancePhase LeafAppearance: Start=FloralInitiation; End=FlagLeaf
          VariableReference ThermalTime: VariableName=[Phenology].ThermalTime.Value()
        GenericPhase FlagLeafToFlowering: Start=FlagLeaf; End=Flowering
          Constant Target: FixedValue=50; Units=deg day
          VariableReference ThermalTime: VariableName=[Phenology].ThermalTime.Value()
        GenericPhase FloweringToGrainFilling: Start=Flowering; End=StartGrainFill
          Constant Target: FixedValue=120; Units=deg day
          VariableReference ThermalTime: VariableName=[Phenology].ThermalTime.Value()
        GenericPhase GrainFilling: Start=StartGrainFill; End=EndGrainFill
          Constant Target: FixedValue=550; Units=deg day
          VariableReference ThermalTime: VariableName=[Phenology].ThermalTime.Value()
        GenericPhase Maturing: Start=EndGrainFill; End=Maturity
          Constant Target: FixedValue=10; Units=deg day
          VariableReference ThermalTime: VariableName=[Phenology].ThermalTime.Value()
        GenericPhase MaturityToHarvestRipe: Start=Maturity; End=HarvestRipe
          Constant Target: FixedValue=10; Units=deg day
          VariableReference ThermalTime: VariableName=[Phenology].ThermalTime.Value()
        EndPhase ReadyForHarvesting: Start=HarvestRipe; End=Unused
          VariableReference ThermalTime: VariableName=[Phenology].ThermalTime.Value()
        PhotoperiodFunction Photoperiod: Twilight=-6; DayLength=0
        OnEventFunction FloweringDAS: SetEvent=Flowering; ReSetEvent=never
          Memo
            A function is used to provide flowering date as days after sowing(DAS).
          Constant PreEventValue: FixedValue=0
          VariableReference PostEventValue: VariableName=[Phenology].DaysAfterSowing
        OnEventFunction MaturityDAS: SetEvent=Maturity; ReSetEvent=never
          Memo
            A function is used to provide maturity date as days after sowing(DAS).
          Constant PreEventValue: FixedValue=0
          VariableReference PostEventValue: VariableName=[Phenology].DaysAfterSowing
      Structure: Initialised=false; Germinated=false; Emerged=false; CohortToInitialise=0; TipToAppear=0; ApexNum=0
        Memo
          Though tillering is common in some maize varieties under certain agronomic conditions, no tillering is accounted for within this model.  Therefore all branching has been parameterised out of the current maize model.
        VariableReference ThermalTime: VariableName=[Phenology].ThermalTime.Value()
        PhaseLookup MainStemPrimordiaInitiationRate
          PhaseLookupValue Plastochron: Start=Emergence; End=FloralInitiation
            MultiplyFunction Plastochron
              VariableReference Phyllochron: VariableName=[Structure].MainStemNodeAppearanceRate.Value()
              Constant LeafTipsPerPrimordia: FixedValue=0.5
        PhaseLookup MainStemNodeAppearanceRate
          PhaseLookupValue Phyllochron: Start=Emergence; End=FlagLeaf
            LinearInterpolationFunction Phyllochron: XProperty=[Structure].LeafTipsAppeared
              XYPairs: X=[1, 3.4, 4]; Y=[30, 30, 42]
        HeightFunction HeightModel
          LinearInterpolationFunction PotentialHeight: XProperty=[Phenology].Stage
            XYPairs: X=[3, 4, 5, 6]; Y=[20, 400, 450, 1700]
          LinearInterpolationFunction WaterStress: XProperty=[Maize].WaterSupplyDemandRatio
            XYPairs: X=[0, 0.6]; Y=[0, 1]
        Constant BranchingRate: FixedValue=0
        Constant ShadeInducedBranchMortality: FixedValue=0
        Constant DroughtInducedBranchMortality: FixedValue=0
      ReproductiveOrgan Grain: GrowthRespiration=0; MaintenanceRespiration=0
        Constant InitialGrainProportion: FixedValue=0.05
        Constant MaximumPotentialGrainSize: FixedValue=0.3; Units=g
        Constant MaximumGrainsPerCob: FixedValue=700; Units=number
        PhaseLookup DMDemandFunction
          PhaseLookupValue InitialPhase: Start=Flowering; End=StartGrainFill
            FillingRateFunction
              VariableReference GrainNumber: VariableName=[Grain].NumberFunction.Value()
              VariableReference FillingDuration: VariableName=[Phenology].FloweringToGrainFilling.Target.Value()
              VariableReference ThermalTime: VariableName=[Phenology].ThermalTime.Value()
              MultiplyFunction PotentialSizeIncrement
                VariableReference InitialProportion: VariableName=[Grain].InitialGrainProportion.Value()
                VariableReference MaximumSize: VariableName=[Grain].MaximumPotentialGrainSize.Value()
          PhaseLookupValue LinearPhase: Start=StartGrainFill; End=EndGrainFill
            FillingRateFunction
              VariableReference GrainNumber: VariableName=[Grain].NumberFunction.Value()
              VariableReference FillingDuration: VariableName=[Phenology].GrainFilling.Target.Value()
              VariableReference ThermalTime: VariableName=[Phenology].ThermalTime.Value()
              MultiplyFunction PotentialSizeIncrement
                SubtractFunction ProportionLinearPhase
                  Constant One: FixedValue=1
                  VariableReference InitialProportion: VariableName=[Grain].InitialGrainProportion.Value()
                VariableReference MaximumSize: VariableName=[Grain].MaximumPotentialGrainSize.Value()
        Biomass Live
        Biomass Dead
        Constant MinimumNConc: FixedValue=0.008; Units=g/g
        PhaseLookup MaximumNConc
          PhaseLookupValue InitialPhase: Start=Flowering; End=StartGrainFill
            Constant InitialNconc: FixedValue=0.05
          PhaseLookupValue LinearPhase: Start=StartGrainFill; End=EndGrainFill
            Constant FinalNconc: FixedValue=0.013
        Constant WaterContent: FixedValue=0.12; Units=g/g
        PhaseLookup NFillingRate
          PhaseLookupValue GrainFilling: Start=Flowering; End=EndGrainFill
            FillingRateFunction
              VariableReference GrainNumber: VariableName=[Grain].NumberFunction.Value()
              AddFunction FillingDuration
                VariableReference FloweringToGrainFilling: VariableName=[Phenology].FloweringToGrainFilling.Target.Value()
                VariableReference GrainFilling: VariableName=[Phenology].GrainFilling.Target.Value()
              VariableReference ThermalTime: VariableName=[Phenology].ThermalTime.Value()
              MultiplyFunction PotentialSizeIncrement
                Constant MaximumFinalNConc: FixedValue=0.013
                VariableReference MaximumSize: VariableName=[Grain].MaximumPotentialGrainSize.Value()
        MultiplyFunction NumberFunction
          VariableReference PotentialGrainNumber: VariableName=[MaximumGrainsPerCob].Value()
          LinearInterpolationFunction GrowthRateFactor: XProperty=[GrowthRateGrainDevelopment].Value()
            XYPairs: X=[0.55, 3.3, 6.6, 10]; Y=[0, 0.6, 1, 1]
          VariableReference Population: VariableName=[Maize].Population
        ExpressionFunction YieldBuPerAcre: Expression=[Grain].Live.Wt * 10 * 56 * 0.4536 * 2.471
        AccumulateFunction GrowthGrainDevelopment: StartStageName=FlagLeaf; EndStageName=StartGrainFill; FractionRemovedOnCut=0; FractionRemovedOnHarvest=0; FractionRemovedOnGraze=0; FractionRemovedOnPrune=0
          VariableReference DailyBiomassProduction: VariableName=[Arbitrator].DM.TotalFixationSupply
        AccumulateFunction DaysGrainDevelopment: StartStageName=FlagLeaf; EndStageName=StartGrainFill; FractionRemovedOnCut=0; FractionRemovedOnHarvest=0; FractionRemovedOnGraze=0; FractionRemovedOnPrune=0
          Constant LenthOfADay: FixedValue=1; Units=days/day
        DivideFunction GrowthRateGrainDevelopment
          VariableReference AccumulatedGrowth: VariableName=[GrowthGrainDevelopment].Value()
          VariableReference GrowthDuration: VariableName=[DaysGrainDevelopment].Value()
          VariableReference Population: VariableName=[Maize].Population
        BiomassRemoval BiomassRemovalDefaults
          OrganBiomassRemovalType Harvest: FractionLiveToRemove=1; FractionDeadToRemove=0; FractionLiveToResidue=0; FractionDeadToResidue=0
          OrganBiomassRemovalType Cut: FractionLiveToRemove=1; FractionDeadToRemove=0; FractionLiveToResidue=0; FractionDeadToResidue=0
          OrganBiomassRemovalType Prune: FractionLiveToRemove=0; FractionDeadToRemove=0; FractionLiveToResidue=0.8; FractionDeadToResidue=0
          OrganBiomassRemovalType Graze: FractionLiveToRemove=0.6; FractionDeadToRemove=0; FractionLiveToResidue=0.2; FractionDeadToResidue=0
          OrganBiomassRemovalType Thin: FractionLiveToRemove=0; FractionDeadToRemove=0; FractionLiveToResidue=0.05; FractionDeadToResidue=0
      Root: GrowthRespiration=0; MaintenanceRespiration=0
        CompositeBiomass Live: Propertys=[[Root].LayerLive]
        CompositeBiomass Dead: Propertys=[[Root].LayerDead]
        LinearInterpolationFunction KLModifier: XProperty=[Maize].Population
          Memo
            The parameter KL is is described by Meinke et al (1993) to combine elements of soil conductivity (K) with root length (L) in determining root water uptake.  Peake et al (2013) demonstrated that in maize KL varied with plant population through impacts on root length density.  Here we adjust KL linearly with plant population.
          XYPairs: X=[0, 10]; Y=[1, 1]
        Constant SoilWaterEffect: FixedValue=1
          Memo
            No effect of soil water content on root growth is currently captured in the model.
        Constant TemperatureEffect: FixedValue=1
          Memo
            No effect of temperature on root growth is currently captured in the model.
        Constant MaxDailyNUptake: FixedValue=20; Units=g/m2/d
          Memo
            Maximum daily N uptake is set to an arbitrarily high value.
        Constant SenescenceRate: FixedValue=0.005; Units=/d
          Memo
            Jones and Kiniry (1986) used a constant root senescence fraction in the CERES-Maize model.
        Constant StructuralFraction: FixedValue=1
        Constant MaximumNConc: FixedValue=0.01; Units=g/g
        Constant MinimumNConc: FixedValue=0.01; Units=g/g
        Constant MaximumRootDepth: FixedValue=1000000
        PhaseLookup RootFrontVelocity
          Memo
            [Hammer_etal_2009] used a constant extraction front velocity of 2.5cm per day in their analysis of historical maize yield trends in the US corn belt.
          PhaseLookupValue PreFlowering: Start=Germination; End=Flowering
            Constant RootFrontVelocity: FixedValue=25; Units=mm/d
          PhaseLookupValue PostFlowering: Start=Flowering; End=Maturity
            Constant RootFrontVelocity: FixedValue=0; Units=mm/d
        PhaseBasedSwitch NitrogenDemandSwitch: Start=Germination; End=Maturity
        Constant InitialDM: FixedValue=0.2; Units=g/plant
        Constant SpecificRootLength: FixedValue=40; Units=m/g
        BiomassRemoval BiomassRemovalDefaults
          OrganBiomassRemovalType Harvest: FractionLiveToRemove=0; FractionDeadToRemove=0; FractionLiveToResidue=0.2; FractionDeadToResidue=0
          OrganBiomassRemovalType Cut: FractionLiveToRemove=0; FractionDeadToRemove=0; FractionLiveToResidue=0.3; FractionDeadToResidue=0
          OrganBiomassRemovalType Prune: FractionLiveToRemove=0; FractionDeadToRemove=0; FractionLiveToResidue=0.1; FractionDeadToResidue=0
          OrganBiomassRemovalType Graze: FractionLiveToRemove=0; FractionDeadToRemove=0; FractionLiveToResidue=0.15; FractionDeadToResidue=0
          OrganBiomassRemovalType Thin: FractionLiveToRemove=0; FractionDeadToRemove=0; FractionLiveToResidue=0.05; FractionDeadToResidue=0
        PartitionFractionDemandFunction DMDemandFunction
          LinearInterpolationFunction PartitionFraction: XProperty=[Phenology].Stage
            XYPairs: X=[0, 2.99, 3, 6, 7]; Y=[0, 0, 0.2, 0.2, 0]
      Leaf: MaxCover=1; Albedo=0.18; Gsmax=0.009; R50=160; MicroClimatePresent=true; KDead=0.03
        zero: GrowthRespiration, MaintenanceRespiration, CurrentExpandingLeaf, StartFractionExpanded, FractionNextleafExpanded, DeadNodesYesterday, FRGR, PotentialEP, MaximumMainStemLeafNumber, DMConversionEfficiency, TipsAtEmergence, CohortsAtInitialisation, FractionDied
        LeafCohort InitialLeaves[1]: Rank=1; Area=380
          zero: NReallocationFactor, DMReallocationFactor, NRetranslocationFactor, DMRetranslocationFactor, ShadeInducedSenRate, SenescedFrac, DeltaPotentialArea, DeltaWaterConstrainedArea, DeltaCarbonConstrainedArea, PotentialStructuralDMAllocation, PotentialMetabolicDMAllocation, MetabolicNReallocated, MetabolicWtReallocated, NonStructuralNReallocated, NonStructuralWtReallocated, MetabolicNRetranslocated, NonStructuralNRetrasnlocated, DMRetranslocated, MetabolicNAllocation, StructuralDMAllocation, MetabolicDMAllocation, MaintenanceRespiration
        LeafCohort InitialLeaves[2]: Rank=2
          zero: NReallocationFactor, DMReallocationFactor, NRetranslocationFactor, DMRetranslocationFactor, ShadeInducedSenRate, SenescedFrac, DeltaPotentialArea, DeltaWaterConstrainedArea, DeltaCarbonConstrainedArea, PotentialStructuralDMAllocation, PotentialMetabolicDMAllocation, MetabolicNReallocated, MetabolicWtReallocated, NonStructuralNReallocated, NonStructuralWtReallocated, MetabolicNRetranslocated, NonStructuralNRetrasnlocated, DMRetranslocated, MetabolicNAllocation, StructuralDMAllocation, MetabolicDMAllocation, Area, MaintenanceRespiration
        LeafCohort InitialLeaves[3]: Rank=3
          zero: NReallocationFactor, DMReallocationFactor, NRetranslocationFactor, DMRetranslocationFactor, ShadeInducedSenRate, SenescedFrac, DeltaPotentialArea, DeltaWaterConstrainedArea, DeltaCarbonConstrainedArea, PotentialStructuralDMAllocation, PotentialMetabolicDMAllocation, MetabolicNReallocated, MetabolicWtReallocated, NonStructuralNReallocated, NonStructuralWtReallocated, MetabolicNRetranslocated, NonStructuralNRetrasnlocated, DMRetranslocated, MetabolicNAllocation, StructuralDMAllocation, MetabolicDMAllocation, Area, MaintenanceRespiration
        LeafCohort InitialLeaves[4]: Rank=4
          zero: NReallocationFactor, DMReallocationFactor, NRetranslocationFactor, DMRetranslocationFactor, ShadeInducedSenRate, SenescedFrac, DeltaPotentialArea, DeltaWaterConstrainedArea, DeltaCarbonConstrainedArea, PotentialStructuralDMAllocation, PotentialMetabolicDMAllocation, MetabolicNReallocated, MetabolicWtReallocated, NonStructuralNReallocated, NonStructuralWtReallocated, MetabolicNRetranslocated, NonStructuralNRetrasnlocated, DMRetranslocated, MetabolicNAllocation, StructuralDMAllocation, MetabolicDMAllocation, Area, MaintenanceRespiration
        LeafCohort InitialLeaves[5]: Rank=5
          zero: NReallocationFactor, DMReallocationFactor, NRetranslocationFactor, DMRetranslocationFactor, ShadeInducedSenRate, SenescedFrac, DeltaPotentialArea, DeltaWaterConstrainedArea, DeltaCarbonConstrainedArea, PotentialStructuralDMAllocation, PotentialMetabolicDMAllocation, MetabolicNReallocated, MetabolicWtReallocated, NonStructuralNReallocated, NonStructuralWtReallocated, MetabolicNRetranslocated, NonStructuralNRetrasnlocated, DMRetranslocated, MetabolicNAllocation, StructuralDMAllocation, MetabolicDMAllocation, Area, MaintenanceRespiration
        LeafCohort InitialLeaves[6]: Rank=6
          zero: NReallocationFactor, DMReallocationFactor, NRetranslocationFactor, DMRetranslocationFactor, ShadeInducedSenRate, SenescedFrac, DeltaPotentialArea, DeltaWaterConstrainedArea, DeltaCarbonConstrainedArea, PotentialStructuralDMAllocation, PotentialMetabolicDMAllocation, MetabolicNReallocated, MetabolicWtReallocated, NonStructuralNReallocated, NonStructuralWtReallocated, MetabolicNRetranslocated, NonStructuralNRetrasnlocated, DMRetranslocated, MetabolicNAllocation, StructuralDMAllocation, MetabolicDMAllocation, Area, MaintenanceRespiration
        CompositeBiomass Live: Propertys=[[Leaf].CohortLive]
        CompositeBiomass Dead: Propertys=[[Leaf].CohortDead]
        ArrayBiomass CohortArrayLive: Propertys=[[Leaf].Live]; ArraySize=[Leaf].MaxNodeNo
        ArrayBiomass CohortArrayDead: Propertys=[[Leaf].Dead]; ArraySize=[Leaf].MaxNodeNo
        LeafCohortParameters CohortParameters
          BellCurveFunction MaxArea
            Memo
              Potential leaf area is calculated from leaf number using the approach of Keating and Wafula (1992).
              Individual leaf size is described using a bell-shaped curve, the parameters of which are derived from final leaf number.
            MultiplyFunction LargestLeafPosition
              VariableReference FinalLeafNumber: VariableName=[Structure].MainStemFinalNodeNumber.Value()
              Constant RelativePositionOfLargestLeaf: FixedValue=0.67
            LinearInterpolationFunction AreaMax: XProperty=[Structure].MainStemFinalNodeNumber.Value()
              XYPairs: X=[1, 5, 10, 15, 20, 25]; Y=[32530, 39259, 49659, 60000, 75000, 90000]
            LinearInterpolationFunction Breadth: XProperty=[Structure].MainStemFinalNodeNumber.Value()
              XYPairs: X=[5, 10, 15, 20, 25]; Y=[-0.377, -0.144, -0.059, -0.027, -0.016]
            Constant Skewness: FixedValue=0.00025
          Constant NReallocationFactor: FixedValue=1
          Constant NRetranslocationFactor: FixedValue=0.03
          Constant DMRetranslocationFactor: FixedValue=0.5
          LinearInterpolationFunction CellDivisionStress: XProperty=[Maize].WaterSupplyDemandRatio
            XYPairs: X=[0.9, 1]; Y=[1, 1]
          LinearInterpolationFunction ExpansionStress: XProperty=[Maize].WaterSupplyDemandRatio
            XYPairs: X=[0.1, 0.7, 1]; Y=[0, 1, 1]
          LinearInterpolationFunction GrowthDuration: XProperty=[Structure].RelativeNodeApperance
            XYPairs: X=[0, 0.3, 0.5, 1]; Y=[0, 200, 250, 100]
          LinearInterpolationFunction LagDuration: XProperty=[Structure].RelativeNodeApperance
            XYPairs: X=[0, 0.4, 0.6]; Y=[300, 300, 650]
          LinearInterpolationFunction SenescenceDuration: XProperty=[Structure].RelativeNodeApperance
            XYPairs: X=[0, 0.4, 0.6]; Y=[150, 150, 350]
          Constant DetachmentLagDuration: FixedValue=1000000
          Constant DetachmentDuration: FixedValue=1000000
          LinearInterpolationFunction MaximumNConc: XProperty=[Structure].LeafTipsAppeared
            XYPairs: X=[1, 10]; Y=[0.054, 0.03]
          Constant CriticalNConc: FixedValue=0.015; Units=g/g
          Constant MinimumNConc: FixedValue=0.008; Units=g/g
          AddFunction DroughtInducedSenAcceleration
            Constant One: FixedValue=1
            MultiplyFunction Stress
              Constant StressResponseCoefficient: FixedValue=1
              LinearInterpolationFunction StressFactor: XProperty=[Maize].WaterSupplyDemandRatio
                XYPairs: X=[0, 1]; Y=[0.5, 0]
          LinearInterpolationFunction SpecificLeafAreaMax: XProperty=[Structure].LeafTipsAppeared
            XYPairs: X=[1, 9]; Y=[50000, 25000]
          LinearInterpolationFunction SpecificLeafAreaMin: XProperty=[Structure].LeafTipsAppeared
            XYPairs: X=[1, 9]; Y=[8000, 8000]
          Constant StructuralFraction: FixedValue=0.7
          Constant NonStructuralFraction: FixedValue=0
          LinearInterpolationFunction ShadeInducedSenescenceRate: XProperty=[Leaf].CohortCurrentRankCoverAbove
            XYPairs: X=[0, 0.7, 0.8, 0.96, 0.99]; Y=[0, 0, 0, 0, 0]
          Constant InitialNConc: FixedValue=0; Units=g/g
        RUEModel Photosynthesis
          Constant RUE: FixedValue=2
          WeightedTemperatureFunction FT: MaximumTemperatureWeighting=0.75
            XYPairs: X=[0, 8, 15, 35, 50]; Y=[0, 0, 1, 1, 0]
          LinearInterpolationFunction FVPD: XProperty=[Leaf].Photosynthesis.VPD
            XYPairs: X=[0, 10, 50]; Y=[1, 1, 1]
          LinearInterpolationFunction FN: XProperty=[Leaf].Fn
            XYPairs: X=[0, 1]; Y=[0.3, 1]
          LinearInterpolationFunction FW: XProperty=[Leaf].Fw
            XYPairs: X=[0, 0.3]; Y=[0, 1]
          RUECO2Function FCO2: PhotosyntheticPathway=C4
          VariableReference RadnInt: VariableName=[Leaf].RadIntTot
        MultiplyFunction ExtinctionCoeff
          Memo
            Extinction coefficient is specified in terms of a potential extinction coefficient which is then discounted during periods of water stress to account for the impact of leaf curling.
          LinearInterpolationFunction PotentialExtinctionCoeff: XProperty=[Maize].SowingData.RowSpacing
            XYPairs: X=[0.2, 0.5, 1]; Y=[0.7, 0.5, 0.4]
          LinearInterpolationFunction WaterStressImpact: XProperty=[Maize].WaterSupplyDemandRatio
            XYPairs: X=[0, 0.7]; Y=[0.5, 1]
        LinearInterpolationFunction FrostFraction: XProperty=[Weather].MinT
          XYPairs: X=[-2, 2]; Y=[1, 0]
        VariableReference ThermalTime: VariableName=[Phenology].ThermalTime.Value()
        MinimumFunction FRGRFunction
          VariableReference FT: VariableName=[Leaf].Photosynthesis.FT.Value()
          VariableReference FN: VariableName=[Leaf].Photosynthesis.FN.Value()
          VariableReference FVPD: VariableName=[Leaf].Photosynthesis.FVPD.Value()
      GenericOrgan Husk
        PopulationBasedDemandFunction DMDemandFunction
          VariableReference ThermalTime: VariableName=[Phenology].ThermalTime.Value()
          Constant StartStage: FixedValue=5.2
          Constant GrowthDuration: FixedValue=120
          Constant MaximumOrganWt: FixedValue=25
          VariableReference OrganPopulation: VariableName=[Rachis].CobNumber.Value()
          LinearInterpolationFunction ExpansionStress: XProperty=[Maize].WaterSupplyDemandRatio
            XYPairs: X=[0.3, 0.8]; Y=[0, 1]
        Biomass Live
        Biomass Dead
        Constant NReallocationFactor: FixedValue=0
        Constant NRetranslocationFactor: FixedValue=0.1
        Constant MaximumNConc: FixedValue=0.01; Units=g/g
        Constant StructuralFraction: FixedValue=0.3; Units=g/g
        Constant SenescenceRate: FixedValue=0; Units=/d
        Constant MinimumNConc: FixedValue=0.01; Units=g/g
        Constant DMRetranslocationFactor: FixedValue=0.1
        Constant InitialWtFunction: FixedValue=0; Units=g/m^2
        Constant DetachmentRateFunction: FixedValue=0; Units=/d
        Constant MaintenanceRespirationFunction: FixedValue=0; Units=0-1
        Constant DMConversionEfficiency: FixedValue=1; Units=0-1
        BiomassRemoval BiomassRemovalDefaults
          OrganBiomassRemovalType Harvest: FractionLiveToRemove=0.5; FractionDeadToRemove=0; FractionLiveToResidue=0.1; FractionDeadToResidue=0
          OrganBiomassRemovalType Cut: FractionLiveToRemove=0.8; FractionDeadToRemove=0; FractionLiveToResidue=0; FractionDeadToResidue=0
          OrganBiomassRemovalType Prune: FractionLiveToRemove=0; FractionDeadToRemove=0; FractionLiveToResidue=0.6; FractionDeadToResidue=0
          OrganBiomassRemovalType Graze: FractionLiveToRemove=0.6; FractionDeadToRemove=0; FractionLiveToResidue=0.2; FractionDeadToResidue=0
          OrganBiomassRemovalType Thin: FractionLiveToRemove=0; FractionDeadToRemove=0; FractionLiveToResidue=0.05; FractionDeadToResidue=0
        Constant NitrogenDemandSwitch: FixedValue=1
        Constant DMReallocationFactor: FixedValue=0
        VariableReference CriticalNConc: VariableName=[Husk].MinimumNConc.Value()
      GenericOrgan Rachis
        MultiplyFunction CobNumber
          VariableReference StemNumber: VariableName=[Structure].TotalStemPopn
          Constant CobsPerStem: FixedValue=1.1
        DivideFunction CobSize
          VariableReference CobMass: VariableName=[Rachis].Live.Wt
          VariableReference CobNumber: VariableName=[Rachis].CobNumber.Value()
        PopulationBasedDemandFunction DMDemandFunction
          VariableReference ThermalTime: VariableName=[Phenology].ThermalTime.Value()
          Constant StartStage: FixedValue=5.5
          Constant GrowthDuration: FixedValue=300
          Constant MaximumOrganWt: FixedValue=23
          VariableReference OrganPopulation: VariableName=[Rachis].CobNumber.Value()
          LinearInterpolationFunction ExpansionStress: XProperty=[Maize].WaterSupplyDemandRatio
            XYPairs: X=[0, 0.35]; Y=[0, 1]
        Biomass Live
        Biomass Dead
        Constant NReallocationFactor: FixedValue=0
        Constant NRetranslocationFactor: FixedValue=0.1
        Constant MaximumNConc: FixedValue=0.008; Units=g/g
        Constant StructuralFraction: FixedValue=1; Units=g/g
        Constant SenescenceRate: FixedValue=0; Units=/d
        Constant MinimumNConc: FixedValue=0.003; Units=g/g
        LinearInterpolationFunction ExpansionStress: XProperty=[Maize].WaterSupplyDemandRatio
          XYPairs: X=[0.1, 0.7]; Y=[0, 1]
        Constant InitialWtFunction: FixedValue=0; Units=g/m^2
        Constant DetachmentRateFunction: FixedValue=0; Units=/d
        Constant MaintenanceRespirationFunction: FixedValue=0; Units=0-1
        Constant DMConversionEfficiency: FixedValue=1; Units=0-1
        BiomassRemoval BiomassRemovalDefaults: same as Replacements.Maize.Husk.BiomassRemovalDefaults
        Constant NitrogenDemandSwitch: FixedValue=1
        Constant DMReallocationFactor: FixedValue=0
        Constant DMRetranslocationFactor: FixedValue=0
        VariableReference CriticalNConc: VariableName=[Rachis].MinimumNConc.Value()
      GenericOrgan Stem
        Biomass Live
        Biomass Dead
        Constant StructuralFraction: FixedValue=0.7
        LinearInterpolationFunction MaximumNConc: XProperty=[Structure].LeafTipsAppeared
          XYPairs: X=[0, 10, 11]; Y=[0.03, 0.03, 0.005]
        Constant MinimumNConc: FixedValue=0.006; Units=g/g
        PhaseBasedSwitch NitrogenDemandSwitch: Start=Emergence; End=StartGrainFill
        Constant NReallocationFactor: FixedValue=0
        Constant NRetranslocationFactor: FixedValue=0.5
        Constant DMRetranslocationFactor: FixedValue=0.1
        MinimumFunction DMDemandFunctionX
          MultiplyFunction PotentialDMAccumulation
            VariableReference NodesAppearing: VariableName=[Structure].DeltaTipNumber
            VariableReference Branches: VariableName=[Structure].TotalStemPopn
            LinearInterpolationFunction PotentialInternodeWt: XProperty=[Structure].RelativeNodeApperance
              XYPairs: X=[0, 0.2, 0.8, 1]; Y=[0, 2, 16, 16]
          MultiplyFunction HightLimitedDMAccumulation
            Constant SpecificStemLengthMax: FixedValue=0.1
              Constant SpecificStemLengthMax: FixedValue=0.1
            VariableReference Branches: VariableName=[Structure].TotalStemPopn
            VariableReference DeltaHeight: VariableName=[Structure].HeightModel.DeltaHeight
        PartitionFractionDemandFunction DMDemandFunction
          PhaseLookup PartitionFraction
            PhaseLookupValue PreStemElongation: Start=Emergence; End=FloralInitiation
              Constant StemFraction: FixedValue=0.6
            PhaseLookupValue StemElongation: Start=FloralInitiation; End=Flowering
              Constant StemFraction: FixedValue=0.82
        Constant InitialWtFunction: FixedValue=0; Units=g/m^2
        Constant StructuralFraction: FixedValue=1; Units=g/g
        Constant DetachmentRateFunction: FixedValue=0; Units=/d
        Constant SenescenceRate: FixedValue=0; Units=/d
        Constant MaintenanceRespirationFunction: FixedValue=0; Units=0-1
        Constant DMConversionEfficiency: FixedValue=1; Units=0-1
        BiomassRemoval BiomassRemovalDefaults: same as Replacements.Maize.Husk.BiomassRemovalDefaults
        Constant DMReallocationFactor: FixedValue=0
        VariableReference CriticalNConc: VariableName=[Stem].MinimumNConc.Value()
      CompositeBiomass AboveGround
        Propertys=[[Leaf].Live, [Leaf].Dead, [Stem].Live, [Stem].Dead, [Husk].Live, [Husk].Dead, [Grain].Live, [Grain].Dead, [Rachis].Live, [Rachis].Dead]
        Memo
          The AboveGround composite biomass object includes all organs occurring above the soil surface to allow output for total dry matter and Nutrient contents, including total structural, non-structural and metabolic pools.
      CompositeBiomass BelowGround: Propertys=[[Root].Live, [Root].Dead]
        Memo
          The BelowGround composite biomass object includes all root biomass pools to allow output for total dry matter and Nutrient contents, including total structural, non-structural and metabolic pools.
      CompositeBiomass Total
        Propertys=[[Leaf].Live, [Leaf].Dead, [Stem].Live, [Stem].Dead, [Husk].Live, [Husk].Dead, [Grain].Live, [Grain].Dead, [Rachis].Live, [Rachis].Dead, [Root].Live, [Root].Dead]
        Memo
          The Total composite biomass object includes all organs (above+below ground) to allow output for total dry matter and Nutrient contents, including total structural, non-structural and metabolic pools.
      CompositeBiomass TotalLive
        Propertys=[[Leaf].Live, [Stem].Live, [Husk].Live, [Grain].Live, [Rachis].Live, [Root].Live]
        Memo
          The TotalLive composite biomass object includes the Live pools of all organs (above+below ground) to allow output for total dry matter and Nutrient contents, including total structural, non-structural and metabolic pools.
      CompositeBiomass TotalDead
        Propertys=[[Leaf].Dead, [Stem].Dead, [Husk].Dead, [Grain].Dead, [Rachis].Dead, [Root].Dead]
        Memo
          The TotalDead composite biomass object includes the Dead pools of all organs (above+below ground) to allow output for total dry matter and Nutrient contents, including total structural, non-structural and metabolic pools.
      CompositeBiomass EarLive: Propertys=[[Husk].Live, [Grain].Live, [Rachis].Live]
        Memo
          The EarLive composite biomass object includes the Live pools of all organs within the Ear to allow output for total dry matter and Nutrient contents, including total structural, non-structural and metabolic pools.
      CompositeBiomass AboveGroundLive
        Propertys=[[Leaf].Live, [Stem].Live, [Husk].Live, [Grain].Live, [Rachis].Live]
        Memo
          The AboveGroundLive composite biomass object includes the Live pools of all organs occurring above the soil surface to allow output for total dry matter and Nutrient contents, including total structural, non-structural and metabolic pools.
      CompositeBiomass AboveGroundDead
        Propertys=[[Leaf].Dead, [Stem].Dead, [Husk].Dead, [Grain].Dead, [Rachis].Dead]
        Memo
          The AboveGroundDead composite biomass object includes the Dead pools of all organs occurring above the soil surface to allow output for total dry matter and Nutrient contents, including total structural, non-structural and metabolic pools.
      Memo Future Development Needs
        ##Future Development requirements

        * Phenology not responding to stress events.  Requires better data sets for quantifying the effects of water and nitrogen on leaf apperance and the timing of development stages.
        * Phosphorus response
        * Improved parameterisation of supply and demand for N and DM from organs and arbitration of these resources.
        * Heat Stress responses in grain number
        * More validation under a wider range of environments with more detailed datasets
        * Seedling mortality
        * Water demand (MicroClimate) needs validation
      Cultivar Pioneer_39G12
        Command:
          [Phenology].GrainFilling.Target.FixedValue = 550
          [Grain].MaximumGrainsPerCob.FixedValue = 550
          [Grain].NumberFunction.GrowthRateFactor.XYPairs.X = 0.2,2,4,10
          [Grain].NumberFunction.GrowthRateFactor.XYPairs.Y = 0,0.6,1,1
      Cultivar Pioneer_3153
      Cultivar Katumani
        Command:
          [Phenology].Juvenile.Target.FixedValue = 150
          [Phenology].Photosensitive.Target.XYPairs.X = 0, 12.5, 24
          [Phenology].Photosensitive.Target.XYPairs.Y = 0, 0, 115
          [Phenology].FlagLeafToFlowering.Target.FixedValue = 10
          [Phenology].FloweringToGrainFilling.Target.FixedValue = 120
          [Phenology].GrainFilling.Target.FixedValue = 530
          [Rachis].DMDemandFunction.MaximumOrganWt.FixedValue = 14
          [Grain].MaximumGrainsPerCob.FixedValue = 405
          [Grain].MaximumPotentialGrainSize.FixedValue = 0.375
        Memo
          The variety Katumani Composite B was formed in 1966 and released in 1968 as part of the maize breeding work undertaken at the Katumani Research Station in Kenya which started in 1956.  Katumani Composite B was an advanced generation of Katumani Synthetic V X Katumani Synthetic VI.  It has slight photoperiod sensitivity and relatively small potential cob size.
      Cultivar Makueni
        Command:
          [Phenology].Juvenile.Target.FixedValue = 150
          [Phenology].Photosensitive.Target.XYPairs.X = 0, 12.5, 24
          [Phenology].Photosensitive.Target.XYPairs.Y = 0, 0, 115
          [Phenology].FlagLeafToFlowering.Target.FixedValue = 10
          [Phenology].FloweringToGrainFilling.Target.FixedValue = 120
          [Phenology].GrainFilling.Target.FixedValue = 530
          [Rachis].DMDemandFunction.MaximumOrganWt.FixedValue = 14
          [Grain].MaximumGrainsPerCob.FixedValue = 432
          [Grain].MaximumPotentialGrainSize.FixedValue = 0.375
        Memo
          The variety Makueni Composite is a kenyan variety with similar phenology but slightly higher cob size than Katumani composite.
      Cultivar NSCM_41
        Command:
          [Phenology].Juvenile.Target.FixedValue = 230
          [Phenology].Photosensitive.Target.XYPairs.X = 0, 12.5, 24
          [Phenology].Photosensitive.Target.XYPairs.Y = 0, 0, 264.5
          [Phenology].FlagLeafToFlowering.Target.FixedValue = 10
          [Phenology].FloweringToGrainFilling.Target.FixedValue = 170
          [Phenology].GrainFilling.Target.FixedValue = 550
          [Rachis].DMDemandFunction.MaximumOrganWt.FixedValue = 14
          [Grain].MaximumGrainsPerCob.FixedValue = 450
          [Grain].MaximumPotentialGrainSize.FixedValue = 0.375
        Memo
          The variety NSCM_41 is a Zimbabwean early maturing hybrid.  Photoperiod response is taken from Ellis et al Crop Sci 32:1225 for SR52.
      Cultivar sc401: same as Replacements.Maize.NSCM_41
      Cultivar r201
        Command:
          [Phenology].Juvenile.Target.FixedValue = 230
          [Phenology].Photosensitive.Target.XYPairs.X = 0, 12.5, 24
          [Phenology].Photosensitive.Target.XYPairs.Y = 0, 0, 264.5
          [Phenology].FlagLeafToFlowering.Target.FixedValue = 10
          [Phenology].FloweringToGrainFilling.Target.FixedValue = 170
          [Phenology].GrainFilling.Target.FixedValue = 550
          [Rachis].DMDemandFunction.MaximumOrganWt.FixedValue = 14
          [Grain].MaximumGrainsPerCob.FixedValue = 450
          [Grain].MaximumPotentialGrainSize.FixedValue = 0.375
        Memo
          The variety r201 is a Zimbabwean early maturing hybrid.  Photoperiod response is taken from Ellis et al Crop Sci 32:1225 for SR52.
      Cultivar sc501
        Command:
          [Phenology].Juvenile.Target.FixedValue = 250
          [Phenology].Photosensitive.Target.XYPairs.X = 0, 12.5, 24
          [Phenology].Photosensitive.Target.XYPairs.Y = 0, 0, 264.5
          [Phenology].FlagLeafToFlowering.Target.FixedValue = 10
          [Phenology].FloweringToGrainFilling.Target.FixedValue = 170
          [Phenology].GrainFilling.Target.FixedValue = 550
          [Rachis].DMDemandFunction.MaximumOrganWt.FixedValue = 14
          [Grain].MaximumGrainsPerCob.FixedValue = 468
          [Grain].MaximumPotentialGrainSize.FixedValue = 0.361
        Memo
          The variety sc501 is a Zimbabwean early-medium maturing hybrid.  Photoperiod response is taken from Ellis et al Crop Sci 32:1225 for SR52.
      Cultivar sr52
        Command:
          [Phenology].Juvenile.Target.FixedValue = 250
          [Phenology].Photosensitive.Target.XYPairs.X = 0, 12.5, 24
          [Phenology].Photosensitive.Target.XYPairs.Y = 0, 0, 264.5
          [Phenology].FlagLeafToFlowering.Target.FixedValue = 10
          [Phenology].FloweringToGrainFilling.Target.FixedValue = 170
          [Phenology].GrainFilling.Target.FixedValue = 550
          [Rachis].DMDemandFunction.MaximumOrganWt.FixedValue = 14
          [Grain].MaximumGrainsPerCob.FixedValue = 468
          [Grain].MaximumPotentialGrainSize.FixedValue = 0.361
        Memo
          The variety sr52 is a Zimbabwean early-medium maturing hybrid.  Photoperiod response is taken from Ellis et al Crop Sci 32:1225 for SR52.
      Cultivar Melkassa
        Command:
          [Phenology].Juvenile.Target.FixedValue = 230
          [Phenology].Photosensitive.Target.XYPairs.X = 0, 12.5, 24
          [Phenology].Photosensitive.Target.XYPairs.Y = 0, 0, 264.5
          [Phenology].FlagLeafToFlowering.Target.FixedValue = 10
          [Phenology].FloweringToGrainFilling.Target.FixedValue = 160
          [Phenology].GrainFilling.Target.FixedValue = 550
          [Rachis].DMDemandFunction.MaximumOrganWt.FixedValue = 14
          [Grain].MaximumGrainsPerCob.FixedValue = 387
          [Grain].MaximumPotentialGrainSize.FixedValue = 0.33
        Memo
          The variety Melkassa is a local early-medium maturing Ethiopian variety.
      Cultivar r215
        Command:
          [Phenology].Juvenile.Target.FixedValue = 250
          [Phenology].Photosensitive.Target.XYPairs.X = 0, 12.5, 24
          [Phenology].Photosensitive.Target.XYPairs.Y = 0, 0, 264.5
          [Phenology].FlagLeafToFlowering.Target.FixedValue = 10
          [Phenology].FloweringToGrainFilling.Target.FixedValue = 170
          [Phenology].GrainFilling.Target.FixedValue = 550
          [Rachis].DMDemandFunction.MaximumOrganWt.FixedValue = 14
          [Grain].MaximumGrainsPerCob.FixedValue = 468
          [Grain].MaximumPotentialGrainSize.FixedValue = 0.361
        Memo
          The variety r215 is a Zimbabwean early-medium maturing hybrid.  Photoperiod response is taken from Ellis et al Crop Sci 32:1225 for SR52.
      Cultivar mh18
        Command:
          [Phenology].Juvenile.Target.FixedValue = 260
          [Phenology].Photosensitive.Target.XYPairs.X = 0, 12.5, 24
          [Phenology].Photosensitive.Target.XYPairs.Y = 0, 0, 264.5
          [Phenology].FlagLeafToFlowering.Target.FixedValue = 10
          [Phenology].FloweringToGrainFilling.Target.FixedValue = 170
          [Phenology].GrainFilling.Target.FixedValue = 550
          [Rachis].DMDemandFunction.MaximumOrganWt.FixedValue = 14
          [Grain].MaximumGrainsPerCob.FixedValue = 486
          [Grain].MaximumPotentialGrainSize.FixedValue = 0.361
        Memo
          The variety mh18 is a Zimbabwean early-medium maturing hybrid.  Photoperiod response is taken from Ellis et al Crop Sci 32:1225 for SR52.
      Cultivar CG4141
        Command:
          [Phenology].Juvenile.Target.FixedValue = 233
          [Phenology].Photosensitive.Target.XYPairs.X = 0, 12.5, 24
          [Phenology].Photosensitive.Target.XYPairs.Y = 0, 0, 264.5
          [Phenology].FlagLeafToFlowering.Target.FixedValue = 10
          [Phenology].FloweringToGrainFilling.Target.FixedValue = 170
          [Phenology].GrainFilling.Target.FixedValue = 550
          [Rachis].DMDemandFunction.MaximumOrganWt.FixedValue = 14
          [Grain].MaximumGrainsPerCob.FixedValue = 468
          [Grain].MaximumPotentialGrainSize.FixedValue = 0.361
        Memo
          The variety CG4141 is a Zimbabwean early-medium maturing hybrid.  Photoperiod response is taken from Ellis et al Crop Sci 32:1225 for SR52.
      Cultivar sc601
        Command:
          [Phenology].Juvenile.Target.FixedValue = 280
          [Phenology].Photosensitive.Target.XYPairs.X = 0, 12.5, 24
          [Phenology].Photosensitive.Target.XYPairs.Y = 0, 0, 264.5
          [Phenology].FlagLeafToFlowering.Target.FixedValue = 10
          [Phenology].FloweringToGrainFilling.Target.FixedValue = 170
          [Phenology].GrainFilling.Target.FixedValue = 560
          [Rachis].DMDemandFunction.MaximumOrganWt.FixedValue = 14
          [Grain].MaximumGrainsPerCob.FixedValue = 495
          [Grain].MaximumPotentialGrainSize.FixedValue = 0.361
        Memo
          The variety sc601 is a Zimbabwean medium-late maturing hybrid.  Photoperiod response is taken from Ellis et al Crop Sci 32:1225 for SR52.
      Cultivar sc625
        Command:
          [Phenology].Juvenile.Target.FixedValue = 280
          [Phenology].Photosensitive.Target.XYPairs.X = 0, 12.5, 24
          [Phenology].Photosensitive.Target.XYPairs.Y = 0, 0, 264.5
          [Phenology].FlagLeafToFlowering.Target.FixedValue = 10
          [Phenology].FloweringToGrainFilling.Target.FixedValue = 170
          [Phenology].GrainFilling.Target.FixedValue = 570
          [Rachis].DMDemandFunction.MaximumOrganWt.FixedValue = 14
          [Grain].MaximumGrainsPerCob.FixedValue = 504
          [Grain].MaximumPotentialGrainSize.FixedValue = 0.361
        Memo
          The variety sc625 is a Zimbabwean medium-late maturing hybrid.  Photoperiod response is taken from Ellis et al Crop Sci 32:1225 for SR52.
      Cultivar sc623
        Command:
          [Phenology].Juvenile.Target.FixedValue = 280
          [Phenology].Photosensitive.Target.XYPairs.X = 0, 12.5, 24
          [Phenology].Photosensitive.Target.XYPairs.Y = 0, 0, 264.5
          [Phenology].FlagLeafToFlowering.Target.FixedValue = 10
          [Phenology].FloweringToGrainFilling.Target.FixedValue = 170
          [Phenology].GrainFilling.Target.FixedValue = 550
          [Rachis].DMDemandFunction.MaximumOrganWt.FixedValue = 14
          [Grain].MaximumGrainsPerCob.FixedValue = 504
          [Grain].MaximumPotentialGrainSize.FixedValue = 0.361
        Memo
          The variety sc623 is a Zimbabwean medium-late maturing hybrid.  Photoperiod response is taken from Ellis et al Crop Sci 32:1225 for SR52.
      Cultivar mh12
        Command:
          [Phenology].Juvenile.Target.FixedValue = 290
          [Phenology].Photosensitive.Target.XYPairs.X = 0, 12.5, 24
          [Phenology].Photosensitive.Target.XYPairs.Y = 0, 0, 264.5
          [Phenology].FlagLeafToFlowering.Target.FixedValue = 10
          [Phenology].FloweringToGrainFilling.Target.FixedValue = 170
          [Phenology].GrainFilling.Target.FixedValue = 570
          [Rachis].DMDemandFunction.MaximumOrganWt.FixedValue = 14
          [Grain].MaximumGrainsPerCob.FixedValue = 504
          [Grain].MaximumPotentialGrainSize.FixedValue = 0.361
        Memo
          The variety mh12 is a Malawian medium-late maturing hybrid.  Photoperiod response is taken from Ellis et al Crop Sci 32:1225 for SR52.
      Cultivar mh16
        Command:
          [Phenology].Juvenile.Target.FixedValue = 290
          [Phenology].Photosensitive.Target.XYPairs.X = 0, 12.5, 24
          [Phenology].Photosensitive.Target.XYPairs.Y = 0, 0, 264.5
          [Phenology].FlagLeafToFlowering.Target.FixedValue = 10
          [Phenology].FloweringToGrainFilling.Target.FixedValue = 170
          [Phenology].GrainFilling.Target.FixedValue = 570
          [Rachis].DMDemandFunction.MaximumOrganWt.FixedValue = 14
          [Grain].MaximumGrainsPerCob.FixedValue = 504
          [Grain].MaximumPotentialGrainSize.FixedValue = 0.361
        Memo
          The variety mh16 is a Malawian medium-late maturing hybrid.  Photoperiod response is taken from Ellis et al Crop Sci 32:1225 for SR52.
      Cultivar mh17
        Command:
          [Phenology].Juvenile.Target.FixedValue = 290
          [Phenology].Photosensitive.Target.XYPairs.X = 0, 12.5, 24
          [Phenology].Photosensitive.Target.XYPairs.Y = 0, 0, 264.5
          [Phenology].FlagLeafToFlowering.Target.FixedValue = 10
          [Phenology].FloweringToGrainFilling.Target.FixedValue = 170
          [Phenology].GrainFilling.Target.FixedValue = 570
          [Rachis].DMDemandFunction.MaximumOrganWt.FixedValue = 14
          [Grain].MaximumGrainsPerCob.FixedValue = 504
          [Grain].MaximumPotentialGrainSize.FixedValue = 0.361
        Memo
          The variety mh17 is a Malawian medium-late maturing hybrid.  Photoperiod response is taken from Ellis et al Crop Sci 32:1225 for SR52.
      Cultivar mh19
        Command:
          [Phenology].Juvenile.Target.FixedValue = 290
          [Phenology].Photosensitive.Target.XYPairs.X = 0, 12.5, 24
          [Phenology].Photosensitive.Target.XYPairs.Y = 0, 0, 264.5
          [Phenology].FlagLeafToFlowering.Target.FixedValue = 10
          [Phenology].FloweringToGrainFilling.Target.FixedValue = 170
          [Phenology].GrainFilling.Target.FixedValue = 570
          [Rachis].DMDemandFunction.MaximumOrganWt.FixedValue = 14
          [Grain].MaximumGrainsPerCob.FixedValue = 504
          [Grain].MaximumPotentialGrainSize.FixedValue = 0.361
        Memo
          The variety mh19 is a Malawian medium-late maturing hybrid.  Photoperiod response is taken from Ellis et al Crop Sci 32:1225 for SR52.
      Cultivar malawi_local
        Command:
          [Phenology].Juvenile.Target.FixedValue = 280
          [Phenology].Photosensitive.Target.XYPairs.X = 0, 12.5, 24
          [Phenology].Photosensitive.Target.XYPairs.Y = 0, 0, 264.5
          [Phenology].FlagLeafToFlowering.Target.FixedValue = 10
          [Phenology].FloweringToGrainFilling.Target.FixedValue = 170
          [Phenology].GrainFilling.Target.FixedValue = 600
          [Rachis].DMDemandFunction.MaximumOrganWt.FixedValue = 14
          [Grain].MaximumGrainsPerCob.FixedValue = 360
          [Grain].MaximumPotentialGrainSize.FixedValue = 0.217
        Memo
          The variety malawi_local is a Malawian medium-late maturing local variety.  Photoperiod response is taken from Ellis et al Crop Sci 32:1225 for SR52.
      Cultivar Dekalb_XL82
        Command:
          [Phenology].Juvenile.Target.FixedValue = 211
          [Phenology].Photosensitive.Target.XYPairs.X = 0, 12.5, 24
          [Phenology].Photosensitive.Target.XYPairs.Y = 0, 0, 472
          [Phenology].FlagLeafToFlowering.Target.FixedValue = 101
          [Phenology].FloweringToGrainFilling.Target.FixedValue = 170
          [Phenology].GrainFilling.Target.FixedValue = 813
          [Rachis].DMDemandFunction.MaximumOrganWt.FixedValue = 25
          [Grain].MaximumGrainsPerCob.FixedValue = 550
      Cultivar GH_5009
        Command:
          [Phenology].Juvenile.Target.FixedValue = 220
          [Phenology].Photosensitive.Target.XYPairs.X = 0, 12.5, 24
          [Phenology].Photosensitive.Target.XYPairs.Y = 0, 0, 300
          [Phenology].FlagLeafToFlowering.Target.FixedValue = 50
          [Phenology].FloweringToGrainFilling.Target.FixedValue = 170
          [Phenology].GrainFilling.Target.FixedValue = 713
          [Rachis].DMDemandFunction.MaximumOrganWt.FixedValue = 25
          [Grain].MaximumGrainsPerCob.FixedValue =  550
      Cultivar Hycorn_40
        Command:
          [Phenology].Juvenile.Target.FixedValue = 220
          [Phenology].Photosensitive.Target.XYPairs.X = 0, 12.5, 24
          [Phenology].Photosensitive.Target.XYPairs.Y = 0, 0, 124
          [Phenology].FlagLeafToFlowering.Target.FixedValue = 50
          [Phenology].FloweringToGrainFilling.Target.FixedValue = 170
          [Phenology].GrainFilling.Target.FixedValue = 713
          [Rachis].DMDemandFunction.MaximumOrganWt.FixedValue = 25
          [Grain].MaximumGrainsPerCob.FixedValue =  550
      Cultivar GH_5019WX
        Command:
          [Phenology].Juvenile.Target.FixedValue = 255
          [Phenology].Photosensitive.Target.XYPairs.X = 0, 12.5, 24.0
          [Phenology].Photosensitive.Target.XYPairs.Y = 0, 0, 124
          [Phenology].FlagLeafToFlowering.Target.FixedValue = 101
          [Phenology].FloweringToGrainFilling.Target.FixedValue = 170
          [Phenology].GrainFilling.Target.FixedValue = 694
          [Rachis].DMDemandFunction.MaximumOrganWt.FixedValue = 25
          [Grain].MaximumGrainsPerCob.FixedValue = 550
      Cultivar Laila
        Command:
          [Phenology].Juvenile.Target.FixedValue = 211
          [Phenology].Photosensitive.Target.XYPairs.X = 0, 12.5, 24
          [Phenology].Photosensitive.Target.XYPairs.Y = 0, 0, 0
          [Phenology].FlagLeafToFlowering.Target.FixedValue = 1
          [Phenology].FloweringToGrainFilling.Target.FixedValue = 170
          [Phenology].GrainFilling.Target.FixedValue = 812
          [Phenology].Maturing.Target.FixedValue = 1
          [Phenology].MaturityToHarvestRipe.Target.FixedValue = 1
          [Rachis].DMDemandFunction.MaximumOrganWt.FixedValue = 36
          [Grain].MaximumGrainsPerCob.FixedValue =  720
      Cultivar Pioneer_39V43
        Command:
          [Phenology].Juvenile.Target.FixedValue = 150
          [Phenology].GrainFilling.Target.FixedValue = 450
          [Phenology].FloweringToGrainFilling.Target.FixedValue = 170
          [Structure].MainStemNodeAppearanceRate.Phyllochron.Phyllochron.XYPairs.X = 1, 4, 4.2, 10.5, 11
          [Structure].MainStemNodeAppearanceRate.Phyllochron.Phyllochron.XYPairs.Y = 26, 26, 46, 46, 70
          [Rachis].DMDemandFunction.MaximumOrganWt.FixedValue = 18
          [Structure].HeightModel.PotentialHeight.XYPairs.X = 3, 4, 5, 6
          [Structure].HeightModel.PotentialHeight.XYPairs.Y = 20, 40, 50, 1300
        Memo
          VShort duration variety released in New Zealand by Pioneer
      Cultivar Pioneer_34K77
        Command:
          [Phenology].Juvenile.Target.FixedValue = 280
          [Phenology].GrainFilling.Target.FixedValue = 550
        Memo
          VShort duration variety released in New Zealand by Pioneer
      Cultivar Pioneer_38H20
        Command:
          [Phenology].Juvenile.Target.FixedValue = 210
          [Phenology].GrainFilling.Target.FixedValue = 550
      Cultivar Pioneer_33M54
        Command:
          [Phenology].GrainFilling.Target.FixedValue = 550
          [Phenology].Juvenile.Target.FixedValue = 270
      Cultivar Hycorn_53
        Command:
          [Phenology].Juvenile.Target.FixedValue = 235
          [Phenology].Photosensitive.Target.XYPairs.X = 0, 12.5, 24
          [Phenology].Photosensitive.Target.XYPairs.Y = 0, 0, 124
          [Phenology].FlagLeafToFlowering.Target.FixedValue = 10
          [Phenology].FloweringToGrainFilling.Target.FixedValue = 170
          [Phenology].GrainFilling.Target.FixedValue = 520
          [Rachis].DMDemandFunction.MaximumOrganWt.FixedValue = 25
          [Grain].MaximumGrainsPerCob.FixedValue =  550
    Plant Wheat: CropType=Wheat
      Memo TitlePage
        # The APSIM Wheat Model

        _Brown, H.E., Huth, N.I. and Holzworth, D.P._

        The APSIM wheat model has been developed using the Plant Modelling Framework (PMF) of [brown_plant_2014]. This new framework provides a library of plant organ and process submodels that can be coupled, at runtime, to construct a model in much the same way that models can be coupled to construct a simulation. This means that dynamic composition of lower level process and organ classes (e.g. photosynthesis, leaf) into larger constructions (e.g. maize, wheat, sorghum) can be achieved by the model developer without additional coding.

        The model consists of:

        * a phenology model to simulate development between growth phases
        * a structure model to simulate plant morphology
        * a collection of organs to simulate the various plant parts
        * an arbitrator to allocate resources (N, biomass) to the various plant organs
      OrganArbitrator Arbitrator
        RelativeAllocation NArbitrator
        RelativeAllocation DMArbitrator
      Phenology: DaysAfterSowing=0
        AirTemperatureFunction ThermalTime
          XYPairs: X=[0, 26, 37]; Y=[0, 26, 0]
          Memo
            Thermal time determines the rate of developmental progress through many of the crops phases and is used by organs to determing potential growth rates.
        GerminatingPhase Germinating: Start=Sowing; End=Germination
        EmergingPhase Emerging: Start=Germination; End=Emergence; ShootLag=40; ShootRate=1.5
          VariableReference ThermalTime: VariableName=[Phenology].ThermalTime.Value()
        GenericPhase Vegetative: Start=Emergence; End=TerminalSpikelet
          VariableReference ThermalTime: VariableName=[Phenology].ThermalTime.Value()
          MultiplyFunction Target
            VariableReference Phyllochron: VariableName=[Structure].MeanPhyllochron.Value()
            VariableReference HSTS: VariableName=[Phenology].HaunStageTerminalSpikelet.Value()
        LeafAppearancePhase StemElongation: Start=TerminalSpikelet; End=FlagLeaf
          VariableReference ThermalTime: VariableName=[Phenology].ThermalTime.Value()
        GenericPhase EarlyReproductive: Start=FlagLeaf; End=Flowering
          VariableReference ThermalTime: VariableName=[Phenology].ThermalTime.Value()
          MultiplyFunction Target
            Constant Multiplier: FixedValue=2.5
            VariableReference Phyllochron
              VariableName=[Structure].MainStemNodeAppearanceRate.BasePhyllochron.Value()
            AddFunction PhotoPeriodResponse
              Constant Base: FixedValue=1
              MultiplyFunction IncreaseDueToPhotoPeriod
                LinearInterpolationFunction PhotoPeriodResponse: XProperty=[Phenology].Photoperiod.Value()
                  XYPairs: X=[10.99, 11, 16]; Y=[0, 0, 0]
                DivideFunction RelativePhotoPeriodSensitivity
                  VariableReference PpSensitivity: VariableName=[Phenology].Vernalisation.PhotopSens
                  Constant MaxPpSensitivity: FixedValue=5
        GenericPhase GrainDevelopment: Start=Flowering; End=StartGrainFill
          Constant Target: FixedValue=120
          VariableReference ThermalTime: VariableName=[Phenology].ThermalTime.Value()
        GenericPhase GrainFilling: Start=StartGrainFill; End=EndGrainFill
          Constant Target: FixedValue=545
          VariableReference ThermalTime: VariableName=[Phenology].ThermalTime.Value()
        GenericPhase Maturing: Start=EndGrainFill; End=Maturity
          Constant Target: FixedValue=35
          VariableReference ThermalTime: VariableName=[Phenology].ThermalTime.Value()
        GenericPhase Ripening: Start=Maturity; End=HarvestRipe
          Constant Target: FixedValue=300
          VariableReference ThermalTime: VariableName=[Phenology].ThermalTime.Value()
        EndPhase ReadyForHarvesting: Start=HarvestRipe; End=Unused
          VariableReference ThermalTime: VariableName=[Phenology].ThermalTime.Value()
        PhotoperiodFunction Photoperiod: Twilight=-6; DayLength=0
        VernalisationCW Vernalisation: VernSens=2.5; PhotopSens=2; StartStageForEffects=Emergence; EndStageForEffects=TerminalSpikelet; StartStageForCumulativeVD=Germination; EndStageForCumulativeVD=TerminalSpikelet
          AirTemperatureFunction VDModel
            XYPairs: X=[0, 2, 15]; Y=[0, 1, 0]
            Memo
              Thermal time determines the rate of developmental progress through many of the crops phases and is used by organs to determing potential growth rates.
          PhotoperiodFunction Photoperiod: Twilight=-6; DayLength=0
        ZadokPMF Zadok
        OnEventFunction FlagLeafDAS: SetEvent=FlagLeaf; ReSetEvent=never
          Memo
            A function is used to provide flowering date as days after sowing(DAS).
          Constant PreEventValue: FixedValue=0
          VariableReference PostEventValue: VariableName=[Phenology].DaysAfterSowing
        OnEventFunction FloweringDAS: same as Replacements.Maize.Phenology.FloweringDAS
        OnEventFunction MaturityDAS: same as Replacements.Maize.Phenology.MaturityDAS
        Constant MinimumLeafNumber: FixedValue=7; Units=Leaves
          Memo
            Number of leaves the plant will produce when fully vernalised early and grown in long photoperiod
        Constant VrnSensitivity: FixedValue=8; Units=Leaves
          Memo
            The difference between Inherent earlyness leaf number and the number of leaves produced when the plant is unvernalisaed and grown in long photoperiod
        Constant PpSensitivity: FixedValue=3; Units=Leaves
          Memo
            The reduction in leaf number going from 8 to 16 h Pp
        DivideFunction MeanTemp
          AddFunction
            VariableReference MaxT: VariableName=[Weather].MaxT
            VariableReference MinT: VariableName=[Weather].MinT
          Constant Two: FixedValue=2
        HoldFunction FinalLeafNumber: WhenToHold=TerminalSpikelet
          AddFunction ValueToHold
            VariableReference MineafNumber: VariableName=[Phenology].MinimumLeafNumber.Value()
            MultiplyFunction VernalLeaves
              VariableReference UnVernalisedLeaves: VariableName=[Phenology].VrnSensitivity.Value()
              MaximumFunction RelativeVernalisation
                Constant Zero: FixedValue=0
                SubtractFunction RelativeVernalisation
                  Constant One: FixedValue=1
                  AccumulateFunction AccumVern: StartStageName=Germination; EndStageName=FlagLeaf; FractionRemovedOnCut=0; FractionRemovedOnHarvest=0; FractionRemovedOnGraze=0; FractionRemovedOnPrune=0
                    MultiplyFunction DailyVrn
                      DivideFunction DeltaHS
                        VariableReference ThermalTime: VariableName=[Phenology].ThermalTime.Value()
                        VariableReference Phyllochron: VariableName=[Structure].MainStemNodeAppearanceRate.Value()
                      ExponentialFunction: A=0; B=0.4; C=-0.19
                        VariableReference MeanTemperature: VariableName=[Phenology].MeanTemp.Value()
            MultiplyFunction PhotoPLeaves
              VariableReference ShortPpLeaves: VariableName=[Phenology].PpSensitivity.Value()
              LinearInterpolationFunction PhotoPeriodReductionFactor: XProperty=[Phenology].Photoperiod.Value()
                XYPairs: X=[11, 18]; Y=[1, 0]
        DivideFunction HaunStageTerminalSpikelet
          SubtractFunction FLNlessIntercept
            VariableReference FinalLeafNumber: VariableName=[Phenology].FinalLeafNumber.Value()
            Constant Intercept: FixedValue=2.85
          Constant Slope: FixedValue=1.1
      Structure: Initialised=false; Germinated=false; Emerged=false; CohortToInitialise=0; TipToAppear=0; ApexNum=0
        VariableReference ThermalTime: VariableName=[Phenology].ThermalTime.Value()
        MultiplyFunction MainStemNodeAppearanceRate
          LinearInterpolationFunction LeafStageFactor: XProperty=[Structure].LeafTipsAppeared
            XYPairs: X=[0, 2, 3, 7, 8, 14]; Y=[0.6, 0.6, 1, 1, 1.3, 1.3]
          Constant BasePhyllochron: FixedValue=100
          Memo Rational
            Based on [Jamieson_SIRIUS_1998] where leaf appearace could be described by a base phyllochron determined between leaves 2 and 7 and a phyllochron that was 70% of base phyllochron for leaves < 2 and 130% of base phyllochron for leaves > 7
        VariableReference MainStemFinalNodeNumber: VariableName=[Phenology].FinalLeafNumber.Value()
        MultiplyFunction BranchingRate
          PhaseLookup PotentialBranchingRate
            PhaseLookupValue Vegetative: Start=Emergence; End=TerminalSpikelet
              LinearInterpolationFunction PotentialBranchingRate: XProperty=[Leaf].AppearedCohortNo
                XYPairs: X=[1, 2, 3, 4, 5, 6, 7]; Y=[0, 0, 1, 1, 2, 2, 3]
            PhaseLookupValue Reproductive: Start=TerminalSpikelet; End=HarvestRipe
              Constant Zero: FixedValue=0
          MinimumFunction StressFactors
            LinearInterpolationFunction WSC: XProperty=[Stem].PercentWSC.Value()
              XYPairs: X=[0.1, 0.2]; Y=[0, 1]
            LinearInterpolationFunction Nitrogen: XProperty=[Arbitrator].FN
              XYPairs: X=[0, 1.5, 2]; Y=[0, 1, 1]
            LinearInterpolationFunction Cover: XProperty=[Leaf].CoverTotal
              XYPairs: X=[0, 0.9, 1]; Y=[1, 1, 0]
                XYPairs: X=[0, 0.45, 0.6]; Y=[1, 1, 0]
        PhaseLookup BranchMortality
          PhaseLookupValue MortalityPhase: Start=TerminalSpikelet; End=Flowering
            LinearInterpolationFunction Mortality: XProperty=[Structure].MeanTillerGrowthRate.Value()
              XYPairs: X=[0, 0.004, 0.005]; Y=[0.07, 0, 0]
        HeightFunction HeightModel
          LinearInterpolationFunction PotentialHeight: XProperty=[Phenology].Stage
            XYPairs: X=[3, 4, 5, 6, 7]; Y=[10, 200, 1000, 1100, 1200]
          LinearInterpolationFunction WaterStress: XProperty=[Wheat].WaterSupplyDemandRatio
            XYPairs: X=[0.3, 1]; Y=[0, 1]
        MovingAverageFunction MeanTillerGrowthRate: NumberOfDays=5; InitialValue=0
          DivideFunction TillerGrowthRate
            VariableReference DailyGrowth: VariableName=[Arbitrator].DM.TotalFixationSupply
            VariableReference ThermalTime: VariableName=[Phenology].ThermalTime.Value()
            VariableReference StemPopulation: VariableName=[Structure].TotalStemPopn
        MovingAverageFunction MeanPhyllochron: NumberOfDays=300; InitialValue=80
          VariableReference Phyllochron: VariableName=[Structure].MainStemNodeAppearanceRate.Value()
        Constant StemSenescenceAge: FixedValue=0
      ReproductiveOrgan Grain: GrowthRespiration=0; MaintenanceRespiration=0; RipeStage=Ripe
        Biomass Live
        Biomass Dead
        Constant MaxNConcDailyGrowth: FixedValue=0.03
        Constant WaterContent: FixedValue=0.12
        Constant MinimumNConc: FixedValue=0.006
        Constant MaximumNConc: FixedValue=0.03
        Constant MaximumPotentialGrainSize: FixedValue=0.043; Units=g
        PhaseBasedSwitch NitrogenDemandSwitch: Start=Germination; End=Maturity
        AccumulateFunction AccumThermalTime: StartStageName=Flowering; EndStageName=Maturity; FractionRemovedOnCut=0; FractionRemovedOnHarvest=0; FractionRemovedOnGraze=0; FractionRemovedOnPrune=0
          VariableReference DailyThermalTimeValue: VariableName=[Phenology].ThermalTime.Value()
        AirTemperatureFunction FillingRate
          XYPairs: X=[0, 26, 30, 35]; Y=[0, 0.0015, 0.0015, 0.0015]
        PhaseLookup DMDemandFunction
          PhaseLookupValue InitialPhase: Start=Flowering; End=StartGrainFill
            FillingRateFunction
              VariableReference NumberFunction: VariableName=[Grain].NumberFunction.Value()
              VariableReference FillingDuration: VariableName=[Phenology].GrainDevelopment.Target.Value()
              VariableReference ThermalTime: VariableName=[Phenology].ThermalTime.Value()
              MultiplyFunction PotentialSizeIncrement
                VariableReference InitialProportion: VariableName=[Grain].InitialGrainProportion.Value()
                VariableReference MaximumSize: VariableName=[Grain].MaximumPotentialGrainSize.Value()
          PhaseLookupValue LinearPhase: Start=StartGrainFill; End=EndGrainFill
            FillingRateFunction
              VariableReference NumberFunction: VariableName=[Grain].NumberFunction.Value()
              VariableReference FillingDuration: VariableName=[Phenology].GrainFilling.Target.Value()
              VariableReference ThermalTime: VariableName=[Phenology].ThermalTime.Value()
              MultiplyFunction PotentialSizeIncrement: same as Replacements.Maize.Grain.DMDemandFunction.LinearPhase.FillingRateFunction.PotentialSizeIncrement
        MultiplyFunction NumberFunction
          Constant GrainsPerStem: FixedValue=25; Units=/g
          VariableReference StemMass: VariableName=[StemPlusSpike].Wt
        ExpressionFunction Protein
          Expression=([Grain].Live.N + [Grain].Dead.N)/([Grain].Live.Wt + [Grain].Dead.Wt) * 100 * 5.71
        DivideFunction GrowthRateGrainDevelopment
          AccumulateFunction GrowthGrainDevelopment: StartStageName=FlagLeaf; EndStageName=StartGrainFill; FractionRemovedOnCut=0; FractionRemovedOnHarvest=0; FractionRemovedOnGraze=0; FractionRemovedOnPrune=0
            VariableReference DailyBiomassProduction: VariableName=[Arbitrator].DM.TotalFixationSupply
          AccumulateFunction DaysGrainDevelopment: StartStageName=FlagLeaf; EndStageName=StartGrainFill; FractionRemovedOnCut=0; FractionRemovedOnHarvest=0; FractionRemovedOnGraze=0; FractionRemovedOnPrune=0
            Constant LenthOfADay: FixedValue=1; Units=days/day
        Constant InitialGrainProportion: FixedValue=0.05
        PhaseLookup NFillingRate
          PhaseLookupValue GrainFilling: Start=Flowering; End=EndGrainFill
            FillingRateFunction
              VariableReference NumberFunction: VariableName=[Grain].NumberFunction.Value()
              AddFunction FillingDuration
                VariableReference FloweringToGrainFilling: VariableName=[Phenology].GrainDevelopment.Target.Value()
                VariableReference GrainFilling: VariableName=[Phenology].GrainFilling.Target.Value()
              VariableReference ThermalTime: VariableName=[Phenology].ThermalTime.Value()
              MultiplyFunction PotentialSizeIncrement
                Constant MaximumFinalNConc: FixedValue=0.026; Units=g/g
                VariableReference MaximumSize: VariableName=[Grain].MaximumPotentialGrainSize.Value()
        BiomassRemoval BiomassRemovalDefaults: same as Replacements.Maize.Grain.BiomassRemovalDefaults
      Root: GrowthRespiration=0; MaintenanceRespiration=0
        CompositeBiomass Live: Propertys=[[Root].LayerLive]
        CompositeBiomass Dead: Propertys=[[Root].LayerDead]
        LinearInterpolationFunction KLModifier: XProperty=[Leaf].LAI
          XYPairs: X=[0, 3]; Y=[1, 1]
        Constant SoilWaterEffect: FixedValue=1
        AirTemperatureFunction TemperatureEffect
          XYPairs: X=[0, 26, 35]; Y=[1, 1, 1]
        Constant MaxDailyNUptake: FixedValue=20
        Constant SenescenceRate: FixedValue=0.005
        Constant StructuralFraction: FixedValue=1
        Constant MaximumNConc: FixedValue=0.01
        Constant MinimumNConc: FixedValue=0.01
        Constant MaximumRootDepth: FixedValue=1000000
        PhaseLookup RootFrontVelocity
          PhaseLookupValue PreEmergence: Start=Germination; End=Emergence
            Constant Value: FixedValue=5
          PhaseLookupValue PostEmergence: Start=Emergence; End=Maturity
            Constant Value: FixedValue=20
        PhaseBasedSwitch NitrogenDemandSwitch: Start=Germination; End=Maturity
        BiomassRemoval BiomassRemovalDefaults: same as Replacements.Maize.Root.BiomassRemovalDefaults
        LinearInterpolationFunction KNO3: XProperty=[Root].LengthDensity
          XYPairs: X=[0, 0.003]; Y=[0.03, 0.03]
        LinearInterpolationFunction KNH4: XProperty=[Root].LengthDensity
          XYPairs: X=[0, 0.003]; Y=[0.03, 0.03]
        LinearInterpolationFunction NUptakeSWFactor: XProperty=[Root].RWC
          XYPairs: X=[0, 0.2, 1]; Y=[1, 1, 1]
        Constant InitialDM: FixedValue=0.2; Units=g/plant
        Constant SpecificRootLength: FixedValue=40; Units=m/g
        PartitionFractionDemandFunction DMDemandFunction
          PhaseLookup PartitionFraction
            PhaseLookupValue PreEmergence: Start=Germination; End=Emergence
              Constant Value: FixedValue=0
            PhaseLookupValue PreFlowering: Start=Emergence; End=Flowering
              Constant Value: FixedValue=0.2
            PhaseLookupValue PostFlowering: Start=Emergence; End=Flowering
              Constant Value: FixedValue=0
      Leaf: MaxCover=1; Albedo=0.2; Gsmax=0.015; R50=150; MicroClimatePresent=true; KDead=0.3; MaximumMainStemLeafNumber=30
        zero: GrowthRespiration, MaintenanceRespiration, CurrentExpandingLeaf, StartFractionExpanded, FractionNextleafExpanded, DeadNodesYesterday, FRGR, PotentialEP, DMConversionEfficiency, TipsAtEmergence, CohortsAtInitialisation, FractionDied
        LeafCohort InitialLeaves[1]: Rank=1; Area=200
          zero: NReallocationFactor, DMReallocationFactor, NRetranslocationFactor, DMRetranslocationFactor, ShadeInducedSenRate, SenescedFrac, DeltaPotentialArea, DeltaWaterConstrainedArea, DeltaCarbonConstrainedArea, PotentialStructuralDMAllocation, PotentialMetabolicDMAllocation, MetabolicNReallocated, MetabolicWtReallocated, NonStructuralNReallocated, NonStructuralWtReallocated, MetabolicNRetranslocated, NonStructuralNRetrasnlocated, DMRetranslocated, MetabolicNAllocation, StructuralDMAllocation, MetabolicDMAllocation, MaintenanceRespiration
        LeafCohort InitialLeaves[2]: same as Replacements.Maize.Leaf.InitialLeaves[2]
        CompositeBiomass Live: Propertys=[[Leaf].CohortLive]
        CompositeBiomass Dead: Propertys=[[Leaf].CohortDead]
        ArrayBiomass CohortArrayLive: Propertys=[[Leaf].Live]; ArraySize=[Leaf].MaxNodeNo
        ArrayBiomass CohortArrayDead: Propertys=[[Leaf].Dead]; ArraySize=[Leaf].MaxNodeNo
        LeafCohortParameters CohortParameters
          Constant NReallocationFactor: FixedValue=0.3
          Constant NRetranslocationFactor: FixedValue=0.1
          Constant DMReallocationFactor: FixedValue=0
          Constant DMRetranslocationFactor: FixedValue=0
          MinimumFunction CellDivisionStress
            LinearInterpolationFunction WaterStressFactor: XProperty=[Wheat].WaterSupplyDemandRatio
              XYPairs: X=[0.5, 1]; Y=[0.1, 1]
            LinearInterpolationFunction NitrogenStressFactor: XProperty=[Wheat].Leaf.Fn
              XYPairs: X=[0, 0.5, 1]; Y=[0.1, 0.1, 1]
          LinearInterpolationFunction ExpansionStress: XProperty=[Wheat].WaterSupplyDemandRatio
            XYPairs: X=[0.1, 0.7, 1]; Y=[0, 1, 1]
          VariableReference GrowthDuration: VariableName=[Structure].MainStemNodeAppearanceRate.Value()
          PhaseLookup LagDuration
            PhaseLookupValue VegetativeGrowth: Start=Emergence; End=TerminalSpikelet
              MultiplyFunction LagDuration
                Constant Multiplier: FixedValue=4
                VariableReference Phyllochron: VariableName=[Structure].MainStemNodeAppearanceRate.Value()
            PhaseLookupValue StemElongation: Start=TerminalSpikelet; End=FlagLeaf
              ExpressionFunction LagDuration
                Expression=[Phenology].GrainFilling.Target.Value()+[Phenology].GrainDevelopment.Target.Value() + [Phenology].EarlyReproductive.Target.Value() - [Leaf].CohortParameters.SenescenceDuration.Value()
          MultiplyFunction SenescenceDuration
            Constant Multiplier: FixedValue=3
            VariableReference Phyllochron: VariableName=[Structure].MainStemNodeAppearanceRate.Value()
          Constant DetachmentLagDuration: FixedValue=1000000
          Constant DetachmentDuration: FixedValue=1000000
          Constant RelativeBranchLeafSize: FixedValue=1
          LinearInterpolationFunction MaximumNConc: XProperty=[Phenology].Stage
            XYPairs: X=[3, 4, 6]; Y=[0.08, 0.05, 0.02]
          LinearInterpolationFunction CriticalNConc: XProperty=[Phenology].Stage
            XYPairs: X=[3, 4, 6]; Y=[0.07, 0.04, 0.015]
          LinearInterpolationFunction MinimumNConc: XProperty=[Phenology].Stage
            XYPairs: X=[3, 4]; Y=[0.01, 0.005]
          AddFunction DroughtInducedLagAcceleration
            Constant One: FixedValue=1
            MultiplyFunction Stress
              Constant StressResponseCoefficient: FixedValue=1
              LinearInterpolationFunction StressFactor: XProperty=[Wheat].WaterSupplyDemandRatio
                XYPairs: X=[0, 0.7]; Y=[1, 0]
          AddFunction DroughtInducedSenAcceleration: same as Replacements.Wheat.Leaf.CohortParameters.DroughtInducedLagAcceleration
          LinearInterpolationFunction SpecificLeafAreaMax: XProperty=[Phenology].Stage
            XYPairs: X=[3, 4]; Y=[18000, 30000]
          LinearInterpolationFunction SpecificLeafAreaMin: XProperty=[Leaf].Fn
            XYPairs: X=[0.4, 1]; Y=[10000, 18000]
          Constant InitialNConc: FixedValue=0
          Constant StructuralFraction: FixedValue=0.5
          Constant NonStructuralFraction: FixedValue=0
          LinearInterpolationFunction ShadeInducedSenescenceRate: XProperty=[Leaf].CohortCurrentRankCoverAbove
            XYPairs: X=[0, 0.7, 0.8, 0.97, 0.98]; Y=[0, 0, 0, 0, 0]
          Constant LeafSizeShapeParameter: FixedValue=0.3
          MultiplyFunction MaxArea
            Constant AreaLargestLeaves: FixedValue=2600; Units=mm^2
            LinearInterpolationFunction AgeFactor: XProperty=[Phenology].Stage
              XYPairs: X=[3, 4]; Y=[0.1, 1]
          Constant SenessingLeafRelativeSize: FixedValue=0.1; Units=0-1
          Constant MaintenanceRespirationFunction: FixedValue=0
        RUEModel Photosynthesis
          Constant RUE: FixedValue=1.5
          WeightedTemperatureFunction FT: MaximumTemperatureWeighting=0.5
            XYPairs: X=[0, 10, 25, 35]; Y=[0, 1, 1, 0]
          LinearInterpolationFunction FVPD: XProperty=[Leaf].Photosynthesis.VPD
            XYPairs: X=[0, 10, 50]; Y=[1, 1, 1]
          LinearInterpolationFunction FN: XProperty=[Leaf].Fn
            XYPairs: X=[0, 1, 1.5]; Y=[0, 1, 1]
          LinearInterpolationFunction FW: XProperty=[Leaf].Fw
            XYPairs: X=[0, 1]; Y=[0, 1]
          RUECO2Function FCO2: PhotosyntheticPathway=C3
          VariableReference RadnInt: VariableName=[Leaf].RadIntTot
        MultiplyFunction ExtinctionCoeff
          LinearInterpolationFunction PotentialExtinctionCoeff: XProperty=[Leaf].LAI
            XYPairs: X=[0, 0.5]; Y=[0.5, 0.5]
          LinearInterpolationFunction WaterStress: XProperty=[Wheat].WaterSupplyDemandRatio
            XYPairs: X=[0, 0.7]; Y=[0.5, 1]
        LinearInterpolationFunction FrostFraction: XProperty=[Weather].MinT
          XYPairs: X=[-1, 0]; Y=[0, 0]
        VariableReference ThermalTime: VariableName=[Phenology].ThermalTime.Value()
        MinimumFunction FRGRFunction
          VariableReference RUE_FT: VariableName=[Leaf].Photosynthesis.FT.Value()
          MinimumFunction Others
            VariableReference RUE_FN: VariableName=[Leaf].Photosynthesis.FN.Value()
            VariableReference RUE_FVPD: VariableName=[Leaf].Photosynthesis.FVPD.Value()
        BiomassRemoval BiomassRemovalDefaults
          OrganBiomassRemovalType Harvest: FractionLiveToRemove=0; FractionDeadToRemove=0; FractionLiveToResidue=0.3; FractionDeadToResidue=0.3
          OrganBiomassRemovalType Cut: FractionLiveToRemove=0.8; FractionDeadToRemove=0.8; FractionLiveToResidue=0; FractionDeadToResidue=0
          OrganBiomassRemovalType Prune: FractionLiveToRemove=0; FractionDeadToRemove=0; FractionLiveToResidue=0.6; FractionDeadToResidue=0.6
          OrganBiomassRemovalType Graze: FractionLiveToRemove=0.6; FractionDeadToRemove=0.6; FractionLiveToResidue=0.1; FractionDeadToResidue=0.1
          OrganBiomassRemovalType Thin: FractionLiveToRemove=0; FractionDeadToRemove=0; FractionLiveToResidue=0.05; FractionDeadToResidue=0.05
        Constant StructuralFraction: FixedValue=0.5
        Constant DMConversionEfficiencyFunction: FixedValue=1
        ApexStandard
      GenericOrgan Spike
        PopulationBasedDemandFunction DMDemandFunction
          VariableReference ThermalTime: VariableName=[Phenology].ThermalTime.Value()
          Constant ExpansionStress: FixedValue=1
          VariableReference OrganPopulation: VariableName=[Spike].HeadNumber.Value()
          Constant StartStage: FixedValue=5.2
          Constant MaximumOrganWt: FixedValue=0.4
          Constant GrowthDuration: FixedValue=453
        Biomass Live
        Biomass Dead
        Constant NReallocationFactor: FixedValue=0
        Constant NRetranslocationFactor: FixedValue=0.1
        Constant MaximumNConc: FixedValue=0.01
        Constant StructuralFraction: FixedValue=0.7
        Constant SenescenceRate: FixedValue=0; Units=/d
        Constant MinimumNConc: FixedValue=0.003
        MultiplyFunction HeadNumber
          Constant FertileTillers: FixedValue=1
          VariableReference StemPopulation: VariableName=[Structure].TotalStemPopn
        BiomassRemoval BiomassRemovalDefaults: same as Replacements.Maize.Husk.BiomassRemovalDefaults
        Constant InitialWtFunction: FixedValue=0; Units=g/m^2
        Constant DetachmentRateFunction: FixedValue=0; Units=/d
        Constant MaintenanceRespirationFunction: FixedValue=0; Units=0-1
        Constant DMConversionEfficiency: FixedValue=1; Units=0-1
        Constant NitrogenDemandSwitch: FixedValue=1
        Constant DMReallocationFactor: FixedValue=0
        Constant DMRetranslocationFactor: FixedValue=0
        VariableReference CriticalNConc: VariableName=[Spike].MinimumNConc.Value()
      GenericOrgan Stem
        Biomass Live
        Biomass Dead
        Constant StructuralFraction: FixedValue=0.7
        Constant SenescenceRate: FixedValue=0; Units=/d
        LinearInterpolationFunction MaximumNConc: XProperty=[Phenology].Stage
          XYPairs: X=[3, 4, 6]; Y=[0.07, 0.03, 0.015]
        LinearInterpolationFunction MinimumNConc: XProperty=[Phenology].Stage
          XYPairs: X=[3, 4, 6]; Y=[0.015, 0.01, 0.0025]
        PhaseBasedSwitch NitrogenDemandSwitch: Start=Emergence; End=StartGrainFill
        Constant NReallocationFactor: FixedValue=0
        Constant NRetranslocationFactor: FixedValue=0.5
        PhaseLookup DMRetranslocationFactor
          PhaseLookupValue VegetativeGrowth: Start=Emergence; End=Flowering
            Constant DMRetranslocationFactor: FixedValue=0
          PhaseLookupValue ReproductiveGrowth: Start=Flowering; End=EndGrainFill
            Constant DMRetranslocationFactor: FixedValue=0.5
        PartitionFractionDemandFunction DMDemandFunction
          PhaseLookup PartitionFraction
            PhaseLookupValue PreStemElongation: Start=Emergence; End=TerminalSpikelet
              Constant StemFraction: FixedValue=0.4
            PhaseLookupValue StemElongation: Start=TerminalSpikelet; End=Flowering
              Constant StemFraction: FixedValue=0.6
        BiomassRemoval BiomassRemovalDefaults: same as Replacements.Maize.Husk.BiomassRemovalDefaults
        DivideFunction PercentWSC
          VariableReference WSC: VariableName=[Stem].Live.NonStructuralWt
          VariableReference StemWt: VariableName=[Stem].Live.Wt
        Constant InitialWtFunction: FixedValue=0; Units=g/m^2
        Constant DetachmentRateFunction: FixedValue=0; Units=/d
        Constant MaintenanceRespirationFunction: FixedValue=0; Units=0-1
        Constant DMConversionEfficiency: FixedValue=1; Units=0-1
        Constant DMReallocationFactor: FixedValue=0
        VariableReference CriticalNConc: VariableName=[Stem].MinimumNConc.Value()
      CompositeBiomass AboveGround
        Propertys=[[Leaf].Live, [Leaf].Dead, [Stem].Live, [Stem].Dead, [Spike].Live, [Spike].Dead, [Grain].Live, [Grain].Dead]
      CompositeBiomass AboveGroundLive: Propertys=[[Leaf].Live, [Stem].Live, [Spike].Live, [Grain].Live]
      CompositeBiomass AboveGroundDead: Propertys=[[Leaf].Dead, [Stem].Dead, [Spike].Dead, [Grain].Dead]
      CompositeBiomass BelowGround: Propertys=[[Root].Live, [Root].Dead]
      CompositeBiomass Total
        Propertys=[[Leaf].Live, [Leaf].Dead, [Stem].Live, [Stem].Dead, [Root].Live, [Root].Dead, [Spike].Live, [Spike].Dead, [Grain].Live, [Grain].Dead]
      CompositeBiomass TotalLive
        Propertys=[[Leaf].Live, [Stem].Live, [Root].Live, [Spike].Live, [Grain].Live]
      CompositeBiomass TotalDead
        Propertys=[[Leaf].Dead, [Stem].Dead, [Root].Dead, [Spike].Dead, [Grain].Dead]
      CompositeBiomass Ear: Propertys=[[Spike].Live, [Grain].Live, [Spike].Dead, [Grain].Dead]
        Memo
          The Ear composite biomass object includes the Live and dead pools of all organs within the Ear to allow output for total dry matter and Nutrient contents, including total structural, non-structural and metabolic pools.
      CompositeBiomass StemPlusSpike: Propertys=[[Stem].Live, [Spike].Live, [Stem].Dead, [Spike].Dead]
      CultivarFolder Cultivars
        CultivarFolder New Zealand
          Cultivar Alberic
            Command:
              [Phenology].MinimumLeafNumber.FixedValue = 9
              [Phenology].VrnSensitivity.FixedValue = 7
              [Phenology].PpSensitivity.FixedValue = 3
          Cultivar Amarok
            Command:
              [Phenology].MinimumLeafNumber.FixedValue = 9
              [Phenology].VrnSensitivity.FixedValue = 7
              [Phenology].PpSensitivity.FixedValue = 3
          Cultivar Aspiring
            Command:
              [Phenology].MinimumLeafNumber.FixedValue = 9
              [Phenology].VrnSensitivity.FixedValue = 7
              [Phenology].PpSensitivity.FixedValue = 3
          Cultivar BattenWinter
            Command:
              [Phenology].MinimumLeafNumber.FixedValue = 9
              [Phenology].VrnSensitivity.FixedValue = 7
              [Phenology].PpSensitivity.FixedValue = 3
          Cultivar BattenSpring
            Command:
              [Phenology].MinimumLeafNumber.FixedValue = 9
              [Phenology].VrnSensitivity.FixedValue = 7
              [Phenology].PpSensitivity.FixedValue = 3
          Cultivar Centaur
            Command:
              [Phenology].MinimumLeafNumber.FixedValue = 9
              [Phenology].VrnSensitivity.FixedValue = 7
              [Phenology].PpSensitivity.FixedValue = 3
          Cultivar Claire
            Command:
              [Phenology].MinimumLeafNumber.FixedValue = 9
              [Phenology].VrnSensitivity.FixedValue = 7
              [Phenology].PpSensitivity.FixedValue = 3
          Cultivar Conquest
            Command:
              [Phenology].MinimumLeafNumber.FixedValue = 9
              [Phenology].VrnSensitivity.FixedValue = 7
              [Phenology].PpSensitivity.FixedValue = 3
          Cultivar Einstein
            Command:
              [Phenology].MinimumLeafNumber.FixedValue = 9
              [Phenology].VrnSensitivity.FixedValue = 7
              [Phenology].PpSensitivity.FixedValue = 3
          Cultivar Exceed
            Command:
              [Phenology].MinimumLeafNumber.FixedValue = 9
              [Phenology].VrnSensitivity.FixedValue = 7
              [Phenology].PpSensitivity.FixedValue = 3
          Cultivar Majestic
            Command:
              [Phenology].MinimumLeafNumber.FixedValue = 9
              [Phenology].VrnSensitivity.FixedValue = 7
              [Phenology].PpSensitivity.FixedValue = 3
          Cultivar Option
            Command:
              [Phenology].MinimumLeafNumber.FixedValue = 9
              [Phenology].VrnSensitivity.FixedValue = 7
              [Phenology].PpSensitivity.FixedValue = 3
          Cultivar Otane
            Command:
              [Phenology].MinimumLeafNumber.FixedValue = 9
              [Phenology].VrnSensitivity.FixedValue = 7
              [Phenology].PpSensitivity.FixedValue = 3
          Cultivar Pennant
            Command:
              [Phenology].MinimumLeafNumber.FixedValue = 9
              [Phenology].VrnSensitivity.FixedValue = 7
              [Phenology].PpSensitivity.FixedValue = 3
          Cultivar Regency
            Command:
              [Phenology].MinimumLeafNumber.FixedValue = 9
              [Phenology].VrnSensitivity.FixedValue = 7
              [Phenology].PpSensitivity.FixedValue = 3
          Cultivar Richmond
            Command:
              [Phenology].MinimumLeafNumber.FixedValue = 9
              [Phenology].VrnSensitivity.FixedValue = 7
              [Phenology].PpSensitivity.FixedValue = 3
          Cultivar Robigus
            Command:
              [Phenology].MinimumLeafNumber.FixedValue = 9
              [Phenology].VrnSensitivity.FixedValue = 7
              [Phenology].PpSensitivity.FixedValue = 3
          Cultivar Rongotea
            Command:
              [Phenology].MinimumLeafNumber.FixedValue = 9
              [Phenology].VrnSensitivity.FixedValue = 7
              [Phenology].PpSensitivity.FixedValue = 3
          Cultivar Rubric
            Command:
              [Phenology].MinimumLeafNumber.FixedValue = 9
              [Phenology].VrnSensitivity.FixedValue = 7
              [Phenology].PpSensitivity.FixedValue = 3
          Cultivar Sage
            Command:
              [Phenology].MinimumLeafNumber.FixedValue = 9
              [Phenology].VrnSensitivity.FixedValue = 7
              [Phenology].PpSensitivity.FixedValue = 3
          Cultivar Saracen
            Command:
              [Phenology].MinimumLeafNumber.FixedValue = 9
              [Phenology].VrnSensitivity.FixedValue = 7
              [Phenology].PpSensitivity.FixedValue = 3
          Cultivar Savannah
            Command:
              [Phenology].MinimumLeafNumber.FixedValue = 9
              [Phenology].VrnSensitivity.FixedValue = 7
              [Phenology].PpSensitivity.FixedValue = 3
          Cultivar Solstice
            Command:
              [Phenology].MinimumLeafNumber.FixedValue = 9
              [Phenology].VrnSensitivity.FixedValue = 7
              [Phenology].PpSensitivity.FixedValue = 3
          Cultivar Tanker
            Command:
              [Phenology].MinimumLeafNumber.FixedValue = 9
              [Phenology].VrnSensitivity.FixedValue = 7
              [Phenology].PpSensitivity.FixedValue = 3
          Cultivar Tribute
            Command:
              [Phenology].MinimumLeafNumber.FixedValue = 9
              [Phenology].VrnSensitivity.FixedValue = 7
              [Phenology].PpSensitivity.FixedValue = 3
          Cultivar Wakanui
            Command:
              [Phenology].MinimumLeafNumber.FixedValue = 9
              [Phenology].VrnSensitivity.FixedValue = 7
              [Phenology].PpSensitivity.FixedValue = 3
          Cultivar Weston
            Command:
              [Phenology].MinimumLeafNumber.FixedValue = 9
              [Phenology].VrnSensitivity.FixedValue = 7
              [Phenology].PpSensitivity.FixedValue = 3
        CultivarFolder Australia
          Cultivar Axe
            Command:
              [Phenology].MinimumLeafNumber.FixedValue = 9
              [Phenology].VrnSensitivity.FixedValue = 7
              [Phenology].PpSensitivity.FixedValue = 3
          Cultivar Bolac
            Command:
              [Phenology].MinimumLeafNumber.FixedValue = 9
              [Phenology].VrnSensitivity.FixedValue = 7
              [Phenology].PpSensitivity.FixedValue = 3
          Cultivar Derrimut
            Command:
              [Phenology].MinimumLeafNumber.FixedValue = 9
              [Phenology].VrnSensitivity.FixedValue = 7
              [Phenology].PpSensitivity.FixedValue = 3
          Cultivar EGAGregory
            Command:
              [Phenology].MinimumLeafNumber.FixedValue = 9
              [Phenology].VrnSensitivity.FixedValue = 7
              [Phenology].PpSensitivity.FixedValue = 3
          Cultivar GattonHartog
            Command:
              [Phenology].MinimumLeafNumber.FixedValue = 9
              [Phenology].VrnSensitivity.FixedValue = 7
              [Phenology].PpSensitivity.FixedValue = 3
          Cultivar Gamenya
            Command:
              [Phenology].MinimumLeafNumber.FixedValue = 9
              [Phenology].VrnSensitivity.FixedValue = 7
              [Phenology].PpSensitivity.FixedValue = 3
          Cultivar Gladius
            Command:
              [Phenology].MinimumLeafNumber.FixedValue = 9
              [Phenology].VrnSensitivity.FixedValue = 7
              [Phenology].PpSensitivity.FixedValue = 3
          Cultivar Gutha
            Command:
              [Phenology].MinimumLeafNumber.FixedValue = 9
              [Phenology].VrnSensitivity.FixedValue = 7
              [Phenology].PpSensitivity.FixedValue = 3
          Cultivar H45
            Command:
              [Phenology].MinimumLeafNumber.FixedValue = 9
              [Phenology].VrnSensitivity.FixedValue = 7
              [Phenology].PpSensitivity.FixedValue = 3
          Cultivar H46
            Command:
              [Phenology].MinimumLeafNumber.FixedValue = 9
              [Phenology].VrnSensitivity.FixedValue = 7
              [Phenology].PpSensitivity.FixedValue = 3
          Cultivar Hartog
            Command:
              [Phenology].MinimumLeafNumber.FixedValue = 9
              [Phenology].VrnSensitivity.FixedValue = 7
              [Phenology].PpSensitivity.FixedValue = 3
          Cultivar Janz
            Command:
              [Phenology].MinimumLeafNumber.FixedValue = 9
              [Phenology].VrnSensitivity.FixedValue = 7
              [Phenology].PpSensitivity.FixedValue = 3
          Cultivar Kelallac
            Command:
              [Phenology].MinimumLeafNumber.FixedValue = 9
              [Phenology].VrnSensitivity.FixedValue = 7
              [Phenology].PpSensitivity.FixedValue = 3
          Cultivar Kennedy
            Command:
              [Phenology].MinimumLeafNumber.FixedValue = 9
              [Phenology].VrnSensitivity.FixedValue = 7
              [Phenology].PpSensitivity.FixedValue = 3
          Cultivar Lang
            Command:
              [Phenology].MinimumLeafNumber.FixedValue = 9
              [Phenology].VrnSensitivity.FixedValue = 7
              [Phenology].PpSensitivity.FixedValue = 3
          Cultivar Livingston
            Command:
              [Phenology].MinimumLeafNumber.FixedValue = 9
              [Phenology].VrnSensitivity.FixedValue = 7
              [Phenology].PpSensitivity.FixedValue = 3
          Cultivar Lorikeet
            Command:
              [Phenology].MinimumLeafNumber.FixedValue = 9
              [Phenology].VrnSensitivity.FixedValue = 7
              [Phenology].PpSensitivity.FixedValue = 3
          Cultivar MacKellar
            Command:
              [Phenology].MinimumLeafNumber.FixedValue = 9
              [Phenology].VrnSensitivity.FixedValue = 7
              [Phenology].PpSensitivity.FixedValue = 3
          Cultivar McCubbin
            Command:
              [Phenology].MinimumLeafNumber.FixedValue = 9
              [Phenology].VrnSensitivity.FixedValue = 7
              [Phenology].PpSensitivity.FixedValue = 3
          Cultivar Mercury
            Command:
              [Phenology].MinimumLeafNumber.FixedValue = 9
              [Phenology].VrnSensitivity.FixedValue = 7
              [Phenology].PpSensitivity.FixedValue = 3
          Cultivar Ruby
            Command:
              [Phenology].MinimumLeafNumber.FixedValue = 9
              [Phenology].VrnSensitivity.FixedValue = 7
              [Phenology].PpSensitivity.FixedValue = 3
          Cultivar Spear
            Command:
              [Phenology].MinimumLeafNumber.FixedValue = 9
              [Phenology].VrnSensitivity.FixedValue = 7
              [Phenology].PpSensitivity.FixedValue = 3
              [Grain].MaximumPotentialGrainSize.FixedValue = 1
              [Phenology].GrainFilling.Target.FixedValue = 580
          Cultivar Sunco
            Command:
              [Phenology].MinimumLeafNumber.FixedValue = 9
              [Phenology].VrnSensitivity.FixedValue = 7
              [Phenology].PpSensitivity.FixedValue = 3
          Cultivar Ventura
            Command:
              [Phenology].MinimumLeafNumber.FixedValue = 9
              [Phenology].VrnSensitivity.FixedValue = 7
              [Phenology].PpSensitivity.FixedValue = 3
          Cultivar Wedgetail
            Command:
              [Phenology].MinimumLeafNumber.FixedValue = 9
              [Phenology].VrnSensitivity.FixedValue = 7
              [Phenology].PpSensitivity.FixedValue = 3
          Cultivar Wilgoyne
            Command:
              [Phenology].MinimumLeafNumber.FixedValue = 9
              [Phenology].VrnSensitivity.FixedValue = 7
              [Phenology].PpSensitivity.FixedValue = 3
              [Grain].MaximumPotentialGrainSize.FixedValue = 1
              [Phenology].GrainFilling.Target.FixedValue = 580
          Cultivar Wyalkatchem
            Command:
              [Phenology].MinimumLeafNumber.FixedValue = 9
              [Phenology].VrnSensitivity.FixedValue = 7
              [Phenology].PpSensitivity.FixedValue = 3
          Cultivar Yitpi
            Command:
              [Phenology].MinimumLeafNumber.FixedValue = 9
              [Phenology].VrnSensitivity.FixedValue = 7
              [Phenology].PpSensitivity.FixedValue = 3
          Cultivar Young
            Command:
              [Phenology].MinimumLeafNumber.FixedValue = 9
              [Phenology].VrnSensitivity.FixedValue = 7
              [Phenology].PpSensitivity.FixedValue = 3
        CultivarFolder Turkey
          Cultivar Konya
            Command:
              [Phenology].MinimumLeafNumber.FixedValue = 9
              [Phenology].VrnSensitivity.FixedValue = 7
              [Phenology].PpSensitivity.FixedValue = 3
              [Grain].NumberFunction.GrainsPerStem.FixedValue = 20
              [Grain].MaximumPotentialGrainSize.FixedValue = 0.050
        CultivarFolder China
          Cultivar Keyu13
            Command:
              [Phenology].MinimumLeafNumber.FixedValue = 9
              [Phenology].VrnSensitivity.FixedValue = 7
              [Phenology].PpSensitivity.FixedValue = 3
        CultivarFolder USA
          Cultivar Yecora
            Command:
              [Phenology].MinimumLeafNumber.FixedValue = 9
              [Phenology].VrnSensitivity.FixedValue = 7
              [Phenology].PpSensitivity.FixedValue = 3
        CultivarFolder Europe
          Cultivar Dekan
            Command:
              [Phenology].MinimumLeafNumber.FixedValue = 9
              [Phenology].VrnSensitivity.FixedValue = 7
              [Phenology].PpSensitivity.FixedValue = 3
          Cultivar Rosario
            Command:
              [Phenology].MinimumLeafNumber.FixedValue = 9
              [Phenology].VrnSensitivity.FixedValue = 7
              [Phenology].PpSensitivity.FixedValue = 3
          Cultivar Ararat
            Command:
              [Phenology].MinimumLeafNumber.FixedValue = 9
              [Phenology].VrnSensitivity.FixedValue = 7
              [Phenology].PpSensitivity.FixedValue = 3
        CultivarFolder Africa
          Cultivar HAR1685
            Command:
              [Phenology].MinimumLeafNumber.FixedValue = 9
              [Phenology].VrnSensitivity.FixedValue = 7
              [Phenology].PpSensitivity.FixedValue = 3
  DataStore
    ExcelInput Observed: FileName=Observed.xlsx
      SheetNames=[Observed, TimeSeries, LeafAppearance, Zadok, SoilWater, ET, MaxLeafSize, Phenology]
    PredictedObserved: PredictedTableName=Report; ObservedTableName=Observed; FieldNameUsedForMatch=Wheat.Phenology.CurrentStageName
    Input NZObservations: FileName=%root%\Tests\Validation\Wheat\RainShelterBiomass.txt
    TimeSeriesStats: TableName=PredictedObserved
    PredictedObserved PredictedObservedAll: PredictedTableName=Report; ObservedTableName=Observed; FieldNameUsedForMatch=Clock.Today
  Experiment 15TraitMod
    Factors
      Factor Cultivar: Specifications=[Sowing]
        Operations ega_gregory
          2015-05-21  [wheat].Sow(cultivar:"EGAGregory", population:150, depth:40, rowSpacing:250);
        Operations hartog
          2015-05-21  [wheat].Sow(cultivar:"hartog", population:150, depth:40, rowSpacing:250);
      Factor Management: Specifications=[Management]
        Operations IHN
          2015-05-21  [Fertiliser].Apply(Amount: 205, Type: Fertiliser.Types.Urea);
          2015-05-22  [Irrigation].Apply(amount:24);
          2015-06-26  [Irrigation].Apply(amount:25);
          2015-07-14  [Irrigation].Apply(amount:26);
          2015-07-31  [Irrigation].Apply(amount:26);
          2015-08-14  [Irrigation].Apply(amount:25);
          2015-08-26  [Irrigation].Apply(amount:25);
          2015-09-09  [Irrigation].Apply(amount:25);
        Operations ILN
          2015-05-21  [Fertiliser].Apply(Amount: 50, Type: Fertiliser.Types.Urea);
          2015-05-22  [Irrigation].Apply(amount:24);
          2015-06-26  [Irrigation].Apply(amount:25);
          2015-07-14  [Irrigation].Apply(amount:26);
          2015-07-31  [Irrigation].Apply(amount:26);
          2015-08-14  [Irrigation].Apply(amount:25);
          2015-08-26  [Irrigation].Apply(amount:25);
          2015-09-09  [Irrigation].Apply(amount:25);
        Operations RHN
          2015-05-21  [Fertiliser].Apply(Amount: 205, Type: Fertiliser.Types.Urea);
          2015-05-22  [Irrigation].Apply(amount:24);
          2015-06-26  [Irrigation].Apply(amount:25);
        Operations RLN
          2015-05-21  [Fertiliser].Apply(Amount: 50, Type: Fertiliser.Types.Urea);
          2015-05-22  [Irrigation].Apply(amount:24);
          2015-06-26  [Irrigation].Apply(amount:25);
    Simulation
      Weather: FileName=gatton15g3.met
      Clock: StartDate=2015-05-19; EndDate=2015-11-17T01:00:00
      Summary
      SoilArbitrator
      Zone Field: Area=1; Slope=0
        Irrigation
        Fertiliser
        Soil: SoilType=Black Vertosol; Site=Lawes; NearestTown=Lawes, Q 4343; Region=Lockyer; State=Queensland; Country=Australia; NaturalVegetation=Blue Gum, Moreton Bay Ash, Tea Tree; ApsoilNumber=38; Latitude=-27.537; Longitude=152.336; LocationAccuracy=+-20m; DataSource=CSIRO Sustainable Ecosystems, Toowoomba
          Comments=Soil naming structure: \State\Region\Classification-Local Name (Site/district and locator number); oc and ph estimated
          Water
            Thickness  BD    AirDry  LL15  DUL   SAT
            150        1.32  0.13    0.26  0.41  0.47
            150        1.3   0.208   0.26  0.43  0.48
            300        1.23  0.26    0.26  0.46  0.51
            300        1.27  0.26    0.26  0.44  0.49
            300        1.37  0.25    0.25  0.4   0.45
            300        1.35  0.26    0.26  0.41  0.46
            300        1.35  0.26    0.26  0.38  0.46
            SoilCrop WheatSoil: LL=[0.26, 0.26, 0.26, 0.26, 0.25, 0.29, 0.36]; KL=[0.06, 0.06, 0.06, 0.04, 0.04, 0.02, 0.02]; XF=[1, 1, 1, 1, 1, 1, 1]
          SoilWater: SummerDate=1-Nov; SummerU=6; SummerCona=3.5; WinterDate=1-Apr; WinterU=4; WinterCona=2.5; DiffusConst=40; DiffusSlope=16; Salb=0.12; CN2Bare=73; CNRed=20; CNCov=0.8; max_pond=0; Thickness=[150, 150, 300, 300, 300, 300, 300]; SWCON=[0.3, 0.3, 0.3, 0.3, 0.3, 0.3, 0.3]; residueinterception=0
          SoilNitrogen: fom_type=[default, manure, mucuna, lablab, shemp, stable]; fract_carb=[0.2, 0.3, 0.54, 0.57, 0.45, 0]; fract_cell=[0.7, 0.3, 0.37, 0.37, 0.47, 0.1]; fract_lign=[0.1, 0.4, 0.09, 0.06, 0.08, 0.9]
          SoilOrganicMatter: RootCN=40; RootWt=1000; SoilCN=12; EnrACoeff=7.4; EnrBCoeff=0.2; OCUnits=Total
            Thickness  OC        FBiom  FInert
            150        0.953846  0.04   0.4
            150        0.953846  0.02   0.6
            300        0.961538  0.02   0.8
            300        0.846154  0.02   1
            300        0.546154  0.01   1
            300        0.261538  0.01   1
            300        0.2       0.01   1
          Analysis: Thickness=[150, 150, 300, 300, 300, 300, 300]; PH=[8, 8, 8, 8, 8, 8, 8]; PHUnits=Water; BoronUnits=HotWater
          InitialWater: PercentMethod=FilledFromTop; FractionFull=1; RelativeTo=LL15
          Sample Initial nitrogen: NO3Units=kgha; NH4Units=kgha; SWUnits=Volumetric; OCUnits=Total; PHUnits=Water
            Thickness  NO3  NH4
            200        20   1
            1800       12   1
          CERESSoilTemperature
        SurfaceOrganicMatter: PoolName=wheat_stubble; type=Wheat; mass=0; standing_fraction=0; cpr=0; cnr=80; CriticalResidueWeight=2000; OptimumDecompTemp=20; MaxCumulativeEOS=20; CNRatioDecompCoeff=0.277; CNRatioDecompThreshold=25; TotalLeachRain=25; MinRainToLeach=10; CriticalMinimumOrganicC=0.004; DefaultCPRatio=0; DefaultStandingFraction=0; StandingExtinctCoeff=0.5; FractionFaecesAdded=0.5
          Pools:
            {PoolName=wheat_stubble, ResidueType=Wheat, Mass=0, CNRatio=80, CPRatio=0, StandingFraction=0}
          ResidueTypes: LoadFromResource=ResidueTypes
        Plant wheat: CropType=Wheat
        Operations Sowing
          2015-05-21  [wheat].Sow(cultivar:"EGAGregory", population:150, depth:50, rowSpacing:250);
        MicroClimate: a_interception=0; b_interception=1; c_interception=0; d_interception=0; soil_albedo=0.3; sun_angle=15; soil_heat_flux_fraction=0.4; night_interception_fraction=0.5; refheight=2; albedo=0.15; emissivity=0.96; RadIntTotal=0
        Operations Management
          2015-05-21  [wheat].Sow(cultivar:"ega_gregory", population:150, depth:50, rowSpacing:250);
        Report: EventNames=[Clock].DoReport
          VariableNames:
            [Clock].Today
            Wheat.Phenology.CurrentPhaseName
            Wheat.Phenology.Stage
            Wheat.Phenology.Zadok.Stage
            Wheat.AboveGround.Wt
            Wheat.Leaf.LAI
            Wheat.Leaf.Live.Wt
            Wheat.Spike.Wt
            Wheat.Stem.Live.Wt
            Wheat.Structure.TotalStemPopn
            Wheat.Structure.MainStemPrimordiaNo
            Wheat.Structure.LeafTipsAppeared
            Wheat.Structure.PlantTotalNodeNo
            Wheat.Grain.Number
            Wheat.Grain.Wt
            Wheat.WaterSupplyDemandRatio
            Wheat.Leaf.CoverTotal
            [Wheat].Leaf.SpecificArea
        SoluteManager
  Folder KCTrials
    Simulation Hermitage2009
      Clock: StartDate=2009-06-01; EndDate=2009-11-30
      Summary summaryfile
      Weather: FileName=Hermitage2009.met
      SoilArbitrator Soil Arbitrator
      Zone Field: Area=1; Slope=0
        Irrigation
        Fertiliser
        Soil HRSField: SoilType=APS6Soil; LocalName=APS6Site; Site=APS6Site; NearestTown=Unknown; Region=Lawes; NaturalVegetation=Unknown; Latitude=0; Longitude=0
          Water
            Thickness  BD    AirDry  LL15  DUL   SAT
            150        1.03  0.28    0.33  0.56  0.61
            150        1.06  0.24    0.29  0.55  0.6
            300        1.06  0.24    0.29  0.55  0.6
            300        1.08  0.25    0.3   0.54  0.59
            300        1.11  0.26    0.31  0.53  0.58
            300        1.14  0.28    0.33  0.52  0.57
            300        1.17  0.3     0.35  0.51  0.55
            SoilCrop WheatSoil: LL=[0.33, 0.29, 0.29, 0.3, 0.31, 0.33, 0.35]; KL=[0.07, 0.07, 0.07, 0.05, 0.05, 0.03, 0.02]; XF=[1, 1, 1, 1, 1, 1, 1]
          SoilWater: SummerDate=1-Nov; SummerU=6; SummerCona=3.5; WinterDate=1-Apr; WinterU=6; WinterCona=3.5; DiffusConst=88; DiffusSlope=35.4; Salb=0.13; CN2Bare=60; CNRed=20; CNCov=0.8; slope=0; discharge_width=0; catchment_area=0; max_pond=0; residueinterception=0
            Thickness  SWCON  KLAT
            150        0.3    0
            150        0.3    0
            300        0.3    0
            300        0.3    0
            300        0.3    0
            300        0.3    0
            300        0.3    0
          SoilNitrogen: fom_type=[default, manure, mucuna, lablab, shemp, stable]; fract_carb=[0.2, 0.3, 0.54, 0.57, 0.45, 0]; fract_cell=[0.7, 0.3, 0.37, 0.37, 0.47, 0.1]; fract_lign=[0.1, 0.4, 0.09, 0.06, 0.08, 0.9]
          SoilOrganicMatter: RootCN=60; RootWt=2000; SoilCN=14.5; EnrACoeff=1; EnrBCoeff=1; OCUnits=Total
            Thickness  OC    FBiom  FInert
            150        2.2   0.03   0.45
            150        1.6   0.02   0.6
            300        1.15  0.01   0.78
            300        1     0.01   0.9
            300        0.8   0.01   0.99
            300        0.45  0.01   0.99
            300        0.45  0.01   0.99
          Analysis: Thickness=[150, 150, 300, 300, 300, 300, 300]; PH=[7.5, 8, 8, 8, 8, 8, 8]; PHUnits=Water; BoronUnits=HotWater
          Sample Initial Water: Thickness=[150, 150, 300, 300, 300, 300, 300]; SW=[0.56, 0.55, 0.55, 0.54, 0.53, 0.52, 0.51]; NO3Units=ppm; NH4Units=ppm; SWUnits=Volumetric; OCUnits=Total; PHUnits=Water
          Sample Initial Nitrogen: NO3Units=kgha; NH4Units=kgha; SWUnits=Volumetric; OCUnits=Total; PHUnits=Water
            Thickness  NO3   NH4
            150        50    1.3
            150        50    1
            300        0.25  1
            300        0.2   0.8
            300        0.1   0.8
            300        0.1   0.5
            300        0.1   0.5
          CERESSoilTemperature
        Manager SowingRule
          Cultivar = Hartog
```csharp
using System;
using Models.Core;
using Models.PMF;
namespace Models
{
           
	[Serializable] 
	[System.Xml.Serialization.XmlInclude(typeof(Model))]
	public class Script : Model
	{
	
		[Link] Plant Wheat;
		[Link] Clock Clock;
			
		[Description("Cultivar")]
		public String Cultivar { get; set; }
	
		
		private void OnDoManagement(object sender, EventArgs e)
		{
			if (Clock.Today.DayOfYear == 170)
			{
				Wheat.Sow(population: 100, cultivar: Cultivar, depth: 60, rowSpacing: 200);
				
			}
		}
	}
}
```
        SurfaceOrganicMatter: PoolName=wheat_stubble; type=wheat; mass=500; standing_fraction=0; cnr=100; CriticalResidueWeight=2000; OptimumDecompTemp=20; MaxCumulativeEOS=20; CNRatioDecompCoeff=0.277; CNRatioDecompThreshold=25; TotalLeachRain=25; MinRainToLeach=10; CriticalMinimumOrganicC=0.004; DefaultCPRatio=0; DefaultStandingFraction=0; StandingExtinctCoeff=0.5; FractionFaecesAdded=0.5
          Pools:
            {PoolName=wheat_stubble, ResidueType=wheat, Mass=500, CNRatio=100, StandingFraction=0}
          ResidueTypes: LoadFromResource=ResidueTypes
        Plant Wheat: CropType=Wheat
        MicroClimate: a_interception=0; b_interception=1; c_interception=0; d_interception=0; soil_albedo=0.3; sun_angle=15; soil_heat_flux_fraction=0.4; night_interception_fraction=0.5; refheight=2; albedo=0.15; emissivity=0.96; RadIntTotal=0
        Report
          VariableNames:
            [Clock].Today
            [Wheat].Phenology.DaysAfterSowing.Value()
            Wheat.Phenology.CurrentPhaseName
            Wheat.Phenology.Stage
            Wheat.Phenology.Zadok.Stage
            Wheat.AboveGround.Wt
            Wheat.Leaf.LAI
            Wheat.Leaf.Live.Wt
            Wheat.Spike.Wt
            Wheat.Stem.Live.Wt
            Wheat.Structure.TotalStemPopn
            Wheat.Structure.MainStemPrimordiaNo
            Wheat.Structure.LeafTipsAppeared
            Wheat.Structure.PlantTotalNodeNo
            Wheat.Grain.Number
            Wheat.Grain.Wt
            Wheat.WaterSupplyDemandRatio
            Wheat.Leaf.CoverTotal
            [Wheat].Leaf.SpecificArea
            [Wheat].Leaf.CohortParameters.SpecificLeafAreaMax.Value()
            [Wheat].Leaf.CohortParameters.SpecificLeafAreaMin.Value()
          EventNames:
            [Clock].DoReport
        Operations IrrigationSchedule
          2009-08-12  [Irrigation].Apply(amount:29);
          2009-08-13  [Irrigation].Apply(amount:25);
          2009-09-29  [Irrigation].Apply(amount:32);
        Operations FertiliserSchedule
          2009-06-02  [Fertiliser].Apply(Amount: 152, Type: Fertiliser.Types.Urea);
        SoluteManager
    Simulation GattonStandard2010
      Clock: StartDate=2010-05-06; EndDate=2010-10-31
      Summary summaryfile
      Weather: FileName=Gatton2010.met
      SoilArbitrator Soil Arbitrator
      Zone Field: Area=1; Slope=0
        Irrigation
        Fertiliser
        Soil LawesField: SoilType=APS6Soil; LocalName=APS6Site; Site=APS6Site; NearestTown=Unknown; Region=Lawes; NaturalVegetation=Unknown; Latitude=0; Longitude=0
          Water
            Thickness  BD    AirDry  LL15  DUL   SAT
            150        1.38  0.1     0.2   0.38  0.45
            150        1.38  0.168   0.21  0.38  0.45
            300        1.28  0.2     0.2   0.44  0.49
            300        1.38  0.19    0.19  0.4   0.45
            300        1.4   0.15    0.15  0.39  0.44
            300        1.46  0.2     0.2   0.4   0.45
            300        1.47  0.2     0.2   0.43  0.48
            SoilCrop WheatSoil: LL=[0.2, 0.21, 0.2, 0.19, 0.15, 0.32, 0.34]; KL=[0.06, 0.06, 0.06, 0.04, 0.04, 0.02, 0.02]; XF=[1, 1, 1, 1, 1, 1, 1]
          SoilWater: SummerDate=1-Nov; SummerU=6; SummerCona=3.5; WinterDate=1-Apr; WinterU=6; WinterCona=3.5; DiffusConst=88; DiffusSlope=35.4; Salb=0.13; CN2Bare=91; CNRed=20; CNCov=0.8; slope=0; discharge_width=0; catchment_area=0; max_pond=0; residueinterception=0
            Thickness  SWCON  KLAT
            150        0.3    0
            150        0.3    0
            300        0.3    0
            300        0.3    0
            300        0.3    0
            300        0.3    0
            300        0.3    0
          SoilNitrogen: fom_type=[default, manure, mucuna, lablab, shemp, stable]; fract_carb=[0.2, 0.3, 0.54, 0.57, 0.45, 0]; fract_cell=[0.7, 0.3, 0.37, 0.37, 0.47, 0.1]; fract_lign=[0.1, 0.4, 0.09, 0.06, 0.08, 0.9]
          SoilOrganicMatter: same as KCTrials.Hermitage2009.Field.HRSField.SoilOrganicMatter
          Analysis: Thickness=[150, 150, 300, 300, 300, 300, 300]; PH=[7.5, 8, 8, 8, 8, 8, 8]; PHUnits=Water; BoronUnits=HotWater
          Sample Initial Water: Thickness=[150, 150, 300, 300, 300, 300, 300]; SW=[0.38, 0.38, 0.44, 0.4, 0.39, 0.4, 0.43]; NO3Units=ppm; NH4Units=ppm; SWUnits=Volumetric; OCUnits=Total; PHUnits=Water
          Sample Initial Nitrogen: NO3Units=kgha; NH4Units=kgha; SWUnits=Volumetric; OCUnits=Total; PHUnits=Water
            Thickness  NO3  NH4
            150        100  1.3
            150        50   1
            300        20   1
            300        20   0.8
            300        20   0.8
            300        20   0.5
            300        20   0.5
          CERESSoilTemperature
        SurfaceOrganicMatter: same as KCTrials.Hermitage2009.Field.SurfaceOrganicMatter
        Plant Wheat: CropType=Wheat
        MicroClimate: a_interception=0; b_interception=1; c_interception=0; d_interception=0; soil_albedo=0.3; sun_angle=15; soil_heat_flux_fraction=0.4; night_interception_fraction=0.5; refheight=2; albedo=0.15; emissivity=0.96; RadIntTotal=0
        Operations IrrigationSchedule
          2010-05-28  [Irrigation].Apply(amount:25);
          2010-07-22  [Irrigation].Apply(amount:35);
          2010-10-05  [Irrigation].Apply(amount:60);
        Manager SowingRule
          Cultivar = Hartog
```csharp
using System;
using Models.Core;
using Models.PMF;
namespace Models
{
           
	[Serializable] 
	[System.Xml.Serialization.XmlInclude(typeof(Model))]
	public class Script : Model
	{
	
		[Link] Plant Wheat;
		[Link] Clock Clock;
			
		[Description("Cultivar")]
		public String Cultivar { get; set; }
		[EventSubscribe("DoManagement")]
		private void OnDoManagement(object sender, EventArgs e)
		{
			if (Clock.Today.DayOfYear == 148)
			{
				Wheat.Sow(population: 100, cultivar: Cultivar, depth: 50, rowSpacing: 250);
			}
		}


	}
}
```
        Report
          VariableNames:
            [Clock].Today
            Wheat.Phenology.CurrentPhaseName
            Wheat.Phenology.Stage
            Wheat.Phenology.Zadok.Stage
            Wheat.AboveGround.Wt
            Wheat.Leaf.LAI
            Wheat.Leaf.Live.Wt
            Wheat.Spike.Wt
            Wheat.Stem.Live.Wt
            Wheat.Structure.TotalStemPopn
            Wheat.Structure.MainStemPrimordiaNo
            Wheat.Structure.LeafTipsAppeared
            Wheat.Structure.PlantTotalNodeNo
            Wheat.Grain.Number
            Wheat.Grain.Wt
            Wheat.WaterSupplyDemandRatio
            [Wheat].Leaf.SpecificArea
            [Wheat].Leaf.CohortParameters.SpecificLeafAreaMax.Value()
            [Wheat].Leaf.CohortParameters.SpecificLeafAreaMin.Value()
          EventNames:
            [Clock].DoReport
        SoluteManager
    Simulation GattonLate2010
      Clock: StartDate=2010-07-16; EndDate=2010-12-15
      Summary summaryfile
      Weather: FileName=Gatton2010Late.met
      SoilArbitrator Soil Arbitrator
      Zone Field: Area=1; Slope=0
        Irrigation
        Fertiliser
        Soil CSIROField: SoilType=APS6Soil; LocalName=APS6Site; Site=APS6Site; NearestTown=Unknown; Region=Lawes; NaturalVegetation=Unknown; Latitude=0; Longitude=0
          SoilWater: same as KCTrials.GattonStandard2010.Field.LawesField.SoilWater
          SoilNitrogen: fom_type=[default, manure, mucuna, lablab, shemp, stable]; fract_carb=[0.2, 0.3, 0.54, 0.57, 0.45, 0]; fract_cell=[0.7, 0.3, 0.37, 0.37, 0.47, 0.1]; fract_lign=[0.1, 0.4, 0.09, 0.06, 0.08, 0.9]
          SoilOrganicMatter: same as KCTrials.Hermitage2009.Field.HRSField.SoilOrganicMatter
          Analysis: Thickness=[150, 150, 300, 300, 300, 300, 300]; PH=[7.5, 8, 8, 8, 8, 8, 8]; PHUnits=Water; BoronUnits=HotWater
          Sample Initial Water: Thickness=[150, 150, 300, 300, 300, 300, 300]; SW=[0.38, 0.38, 0.44, 0.4, 0.39, 0.4, 0.43]; NO3Units=ppm; NH4Units=ppm; SWUnits=Volumetric; OCUnits=Total; PHUnits=Water
          Sample Initial Nitrogen: NO3Units=kgha; NH4Units=kgha; SWUnits=Volumetric; OCUnits=Total; PHUnits=Water
            Thickness  NO3  NH4
            150        100  1.3
            150        50   1
            300        20   1
            300        20   0.8
            300        20   0.8
            300        20   0.5
            300        20   0.5
          Water: same as KCTrials.GattonStandard2010.Field.LawesField.Water
          CERESSoilTemperature
        SurfaceOrganicMatter: same as KCTrials.Hermitage2009.Field.SurfaceOrganicMatter
        Plant Wheat: CropType=Wheat
        MicroClimate: a_interception=0; b_interception=1; c_interception=0; d_interception=0; soil_albedo=0.3; sun_angle=15; soil_heat_flux_fraction=0.4; night_interception_fraction=0.5; refheight=2; albedo=0.15; emissivity=0.96; RadIntTotal=0
        Manager SowingRule
          Cultivar = Hartog
```csharp
using System;
using Models.Core;
using Models.PMF;
namespace Models
{
           
	[Serializable] 
	[System.Xml.Serialization.XmlInclude(typeof(Model))]
	public class Script : Model
	{
	
		[Link] Plant Wheat;
		[Link] Clock Clock;
			
		[Description("Cultivar")]
		public String Cultivar { get; set; }
		[EventSubscribe("DoManagement")]
		private void OnDoManagement(object sender, EventArgs e)
		{
			if (Clock.Today.DayOfYear == 214)
			{
				Wheat.Sow(population: 100, cultivar: Cultivar, depth: 50, rowSpacing: 250);
				
			}
		}


	}
}
```
        Report: same as KCTrials.GattonStandard2010.Field.Report
        SoluteManager
    Simulation Hermitage2011
      Clock: StartDate=2011-06-16; EndDate=2011-12-12
      Summary summaryfile
      Weather: FileName=Hermitage2011.met
      SoilArbitrator Soil Arbitrator
      Zone Field: Area=1; Slope=0
        Irrigation
        Fertiliser
        Soil HRSField: SoilType=APS6Soil; LocalName=APS6Site; Site=APS6Site; NearestTown=Unknown; Region=Lawes; NaturalVegetation=Unknown; Latitude=0; Longitude=0
          SoilWater: same as KCTrials.GattonStandard2010.Field.LawesField.SoilWater
          SoilNitrogen: fom_type=[default, manure, mucuna, lablab, shemp, stable]; fract_carb=[0.2, 0.3, 0.54, 0.57, 0.45, 0]; fract_cell=[0.7, 0.3, 0.37, 0.37, 0.47, 0.1]; fract_lign=[0.1, 0.4, 0.09, 0.06, 0.08, 0.9]
          SoilOrganicMatter: same as KCTrials.Hermitage2009.Field.HRSField.SoilOrganicMatter
          Analysis: Thickness=[150, 150, 300, 300, 300, 300, 300]; PH=[7.5, 8, 8, 8, 8, 8, 8]; PHUnits=Water; BoronUnits=HotWater
          Sample Initial Water: Thickness=[150, 150, 300, 300, 300, 300, 300]; SW=[0.56, 0.55, 0.55, 0.54, 0.53, 0.52, 0.51]; NO3Units=ppm; NH4Units=ppm; SWUnits=Volumetric; OCUnits=Total; PHUnits=Water
          Sample Initial Nitrogen: NO3Units=kgha; NH4Units=kgha; SWUnits=Volumetric; OCUnits=Total; PHUnits=Water
            Thickness  NO3  NH4
            150        100  1.3
            150        50   1
            300        20   1
            300        20   0.8
            300        20   0.8
            300        20   0.5
            300        20   0.5
          Water: same as KCTrials.Hermitage2009.Field.HRSField.Water
          CERESSoilTemperature
        SurfaceOrganicMatter: same as KCTrials.Hermitage2009.Field.SurfaceOrganicMatter
        Plant Wheat: CropType=Wheat
        MicroClimate: a_interception=0; b_interception=1; c_interception=0; d_interception=0; soil_albedo=0.3; sun_angle=15; soil_heat_flux_fraction=0.4; night_interception_fraction=0.5; refheight=2; albedo=0.15; emissivity=0.96; RadIntTotal=0
        Manager SowingRule
          Cultivar = Hartog
```csharp
using System;
using Models.Core;
using Models.PMF;
namespace Models
{
           
	[Serializable] 
	[System.Xml.Serialization.XmlInclude(typeof(Model))]
	public class Script : Model
	{
	
		[Link] Plant Wheat;
		[Link] Clock Clock;
			
		[Description("Cultivar")]
		public String Cultivar { get; set; }
		[EventSubscribe("DoManagement")]
		private void OnDoManagement(object sender, EventArgs e)
		{
			if (Clock.Today.DayOfYear == 181)
			{
				Wheat.Sow(population: 100, cultivar: Cultivar, depth: 60, rowSpacing: 200);
			
			}
		}
	}


}
```
        Report: same as KCTrials.GattonStandard2010.Field.Report
        SoluteManager
  Experiment Gatton2009
    Factors
      Factor TOS: Specifications=[SowingRule].Script.TOS = 1, 2, 3
      Factor Cv
        Specifications=[SowingRule].Script.Cultivar = Bolac, Derrimut, EGAGregory, Gladius, H46, Hartog, Janz, Kelallac, Kennedy, MacKellar, Ruby, Ventura, Wedgetail, Wyalkatchem, Yitpi, Young
    Simulation Gatton2009Base
      Clock: StartDate=2009-04-01; EndDate=2009-12-30
      Summary summaryfile
      Weather: FileName=Gatton2009.met
      SoilArbitrator Soil Arbitrator
      Zone Field: Area=1; Slope=0
        Irrigation
        Fertiliser
        Soil APS6Field: SoilType=APS6Soil; LocalName=APS6Site; Site=APS6Site; NearestTown=Unknown; Region=Lawes; NaturalVegetation=Unknown; Latitude=0; Longitude=0
          Water
            Thickness  BD    AirDry  LL15  DUL   SAT
            150        1.38  0.1     0.2   0.38  0.43
            150        1.34  0.1     0.2   0.38  0.43
            300        1.35  0.1     0.22  0.4   0.43
            300        1.5   0.1     0.18  0.4   0.43
            300        1.49  0.1     0.14  0.39  0.42
            300        1.46  0.1     0.2   0.38  0.4
            300        1.46  0.1     0.2   0.38  0.4
            SoilCrop WheatSoil: LL=[0.2, 0.2, 0.22, 0.18, 0.14, 0.25, 0.28]; KL=[0.06, 0.06, 0.06, 0.06, 0.06, 0.06, 0.06]; XF=[1, 1, 1, 1, 1, 1, 1]
          SoilWater: same as KCTrials.Hermitage2009.Field.HRSField.SoilWater
          SoilNitrogen: fom_type=[default, manure, mucuna, lablab, shemp, stable]; fract_carb=[0.2, 0.3, 0.54, 0.57, 0.45, 0]; fract_cell=[0.7, 0.3, 0.37, 0.37, 0.47, 0.1]; fract_lign=[0.1, 0.4, 0.09, 0.06, 0.08, 0.9]
          SoilOrganicMatter: same as KCTrials.Hermitage2009.Field.HRSField.SoilOrganicMatter
          Analysis: Thickness=[150, 150, 300, 300, 300, 300, 300]; PH=[7.5, 8, 8, 8, 8, 8, 8]; PHUnits=Water; BoronUnits=HotWater
          Sample Initial Water: Thickness=[150, 150, 300, 300, 300, 300, 300]; SW=[0.326, 0.326, 0.346, 0.333, 0.315, 0.326, 0.326]; NO3Units=ppm; NH4Units=ppm; SWUnits=Volumetric; OCUnits=Total; PHUnits=Water
          Sample Initial Nitrogen: NO3Units=ppm; NH4Units=ppm; SWUnits=Volumetric; OCUnits=Total; PHUnits=Water
            Thickness  NO3   NH4
            150        1.3   1.3
            150        0.6   1
            300        0.25  1
            300        0.2   0.8
            300        0.1   0.8
            300        0.1   0.5
            300        0.1   0.5
          CERESSoilTemperature
        Manager SowingRule
          TOS = 1
          Cultivar = Hartog
```csharp
using System;
using Models.Core;
using Models.PMF;
namespace Models
{
           
	[Serializable] 
	[System.Xml.Serialization.XmlInclude(typeof(Model))]
	public class Script : Model
	{
	
		[Link] Plant Wheat;
		[Link] Clock Clock;
			
		[Description("Time of Sowing")]
		public int TOS { get; set; }

		[Description("Cultivar")]
		public String Cultivar { get; set; }
		
		[EventSubscribe("DoManagement")]
		private void OnDoManagement(object sender, EventArgs e)
		{
			if (((Clock.Today.DayOfYear == 120) && (TOS == 1)) ||
			    ((Clock.Today.DayOfYear == 150) && (TOS == 2)) ||
			    ((Clock.Today.DayOfYear == 177) && (TOS == 3)))
			{
				Wheat.Sow(population: 100, cultivar: Cultivar, depth: 30, rowSpacing: 250);
			}
		}


	}
}
```
        SurfaceOrganicMatter: same as KCTrials.Hermitage2009.Field.SurfaceOrganicMatter
        Plant Wheat: CropType=Wheat
        MicroClimate: a_interception=0; b_interception=1; c_interception=0; d_interception=0; soil_albedo=0.3; sun_angle=15; soil_heat_flux_fraction=0.4; night_interception_fraction=0.5; refheight=2; albedo=0.15; emissivity=0.96; RadIntTotal=0
        Report
          VariableNames:
            [Clock].Today
            Wheat.Zadok.Stage
            Wheat.Phenology.CurrentStageName
            Wheat.AboveGround.Wt
            Wheat.AboveGround.N
            Wheat.Grain.Wt
            Wheat.Grain.Protein
            Wheat.Grain.Size
            Wheat.Grain.Number
            Wheat.Grain.Live.Wt
            Wheat.Grain.Live.N
            Wheat.Leaf.LAI
            Wheat.Leaf.Live.Wt
            Wheat.Leaf.Live.N
            Wheat.Spike.Wt
            Wheat.Spike.N
            Wheat.Stem.Live.Wt
            Wheat.Stem.Live.N
            Wheat.Root.Depth
            [Wheat].Root.WaterUptake
            [Wheat].Leaf.Fw
            [Wheat].Leaf.Fn
            [Wheat].Total.Wt
            [Wheat].Phenology.Zadok.Stage
            [Wheat].Leaf.AppearedCohortNo
            [Wheat].Structure.LeafTipsAppeared
          EventNames:
            [Clock].DoReport
        SoluteManager
  Memo Combined Results
    #Combined Results
    Simulation results for the combined datasets from the various countries are shown in the following graphs.  The model is able to adequately capture the influence of growing conditions (soil, climate) and management (population, Nitrogen, irrigation, sowing date).
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