Simulations: Version=220
  Folder Replacements
    Report HarvestReport: EventNames=[Wheat].Harvesting
      VariableNames:
        [Clock].Today
        [Clock].StartDate
        [Wheat].SowingDate
        [Wheat].SowingData.Cultivar
        [Wheat].SowingData.Population
        [Wheat].SowingDate.DayOfYear
        [Wheat].SowingData.RowSpacing
        [IWeather].Latitude
        [IWeather].Longitude
        [IWeather].FileName
        [LocationInfo].Script.Country
        [LocationInfo].Script.State
        [LocationInfo].Script.Region
        [Wheat].AboveGround.N
        [Wheat].AboveGround.NConc
        [Wheat].AboveGround.Wt
        [Wheat].Ear.N
        [Wheat].Ear.NConc
        [Wheat].Ear.Wt
        [Wheat].Grain.N
        [Wheat].Grain.NConc
        [Wheat].Grain.Number
        [Wheat].Grain.Protein
        [Wheat].Grain.Size
        [Wheat].Grain.Wt
        [Wheat].Leaf.N
        [Wheat].Leaf.StemPopulation
        [Wheat].Leaf.Wt
        [Wheat].Phenology.CAMP.TSHS
        [Wheat].Phenology.CAMP.VSHS
        [Wheat].Phenology.CurrentStageName
        [Wheat].Phenology.EmergenceDAS
        [Wheat].Phenology.FinalLeafNumber
        [Wheat].Phenology.FlagLeafDAS
        [Wheat].Phenology.FloweringDAS
        [Wheat].Phenology.HeadingDAS
        [Wheat].Phenology.MaturityDAS
        [Wheat].Phenology.TerminalSpikeletDAS
        [Wheat].Spike.HeadNumber
        [Wheat].Spike.N
        [Wheat].Spike.Wt
        [Wheat].Stem.N
        [Wheat].Stem.NConc
        [Wheat].Stem.Wt
    Report DailyReport: EventNames=[Clock].DoReport
      VariableNames:
        [Clock].Today
        [IWeather].MinT
        [IWeather].MaxT
        [IWeather].Radn
        [Wheat].Phenology.AccumulatedTT
        [Wheat].Phenology.CurrentStageName
        [Wheat].Phenology.CurrentPhaseName
        [Wheat].Phenology.PTQ
        [Wheat].Phenology.Stage
        [Wheat].DaysAfterSowing
        [Wheat].SowingData.Cultivar
        [Wheat].AboveGround.N
        [Wheat].AboveGround.NConc
        [Wheat].AboveGround.Wt
        [Wheat].Ear.N
        [Wheat].Ear.NConc
        [Wheat].Ear.Wt
        [Wheat].Ear.WtProportion
        [Wheat].Grain.N
        [Wheat].Grain.NConc
        [Wheat].Grain.Wt
        [Wheat].Leaf.CoverGreen
        [Wheat].Leaf.CoverTotal
        [Wheat].Leaf.Dead.N
        [Wheat].Leaf.Dead.NConc
        [Wheat].Leaf.Dead.Wt
        [Wheat].Leaf.DeadWtProportion
        [Wheat].Leaf.Fn
        [Wheat].Leaf.Fw
        [Wheat].Leaf.Height
        [Wheat].Leaf.LAI
        [Wheat].Leaf.Live.N
        [Wheat].Leaf.Live.NConc
        [Wheat].Leaf.Live.StorageWt
        [Wheat].Leaf.Live.StorageN
        [Wheat].Leaf.Live.StructuralN
        [Wheat].Leaf.Live.MetabolicN
        [Wheat].Leaf.Live.Wt
        [Wheat].Leaf.LiveWtProportion
        [Wheat].Leaf.Photosynthesis
        [Wheat].Leaf.N
        //[Wheat].Leaf.Canopy.TotalSpecificArea
        [Wheat].Leaf.SpecificAreaCanopy
        [Wheat].Leaf.StemNumberPerPlant
        [Wheat].Leaf.StemPopulation
        [Wheat].Leaf.Wt
        [Wheat].Phenology.CurrentStageName
        [Wheat].Phenology.HaunStage
        [Wheat].Phenology.Zadok.Stage
        [Wheat].Root.Wt
        [Wheat].Spike.N
        [Wheat].Spike.NConc
        [Wheat].Spike.Live.StorageWt
        [Wheat].Spike.Wt
        [Wheat].Stem.N
        [Wheat].Stem.NConc
        [Wheat].Stem.Live.StorageWt
        [Wheat].Stem.Wt
        [Wheat].Stem.Live.StorageWt
        [Wheat].Stem.Live.StructuralWt
        [Wheat].Stem.DMDemand.Storage
        [Wheat].Stem.DMDemand.Structural
        [Wheat].Stem.DMDemand.Total
        [Wheat].Stem.WtProportion
        ([Wheat].Leaf.Transpiration + [ISoilWater].Es + [MicroClimate].PrecipitationInterception)
        sum([Soil].NO3.kgha)
        sum([Soil].Water.MM)
        [Soil].Water.Volumetric
    Manager MaxLeafSize
```csharp
using APSIM.Core;
using Newtonsoft.Json;
using APSIM.Shared.Utilities;
using Models.Soils.Arbitrator;
using Models.PMF.Organs;
using Models.PMF;
using Models.Interfaces;
using Models.Core;
using System.Xml.Serialization;
using System.Collections.Generic;
using System;
using Models.PMF.Struct;
using Models.Soils;



namespace Models
{
    [Serializable] 
    public class Script : Model, IStructureDependency
    {
        public IStructure Structure { private get; set; }
//        [Link] private Clock Clock;
//        [Link] private Plant Wheat;
//        public  event EventHandler LeafReport;
//        [Link(Type = LinkType.Path, Path = "[Wheat].Structure")]
//        private Structure structure;
//        
//        private Zone thisZone {get; set;}
//        
//        
//        [JsonIgnore] public int LeafPosition { get; set; }
//        [JsonIgnore] public double LeafSize { get; set; }
//        [JsonIgnore] public double MaxLeafSize { get; set; }
//        

        

//        [EventSubscribe("StartOfSimulation")]
//        private void DoStartOfSimulation(object sender, EventArgs e)
//        {
//               thisZone = this.Parent.Parent as Zone;
//        }
//        
//        [EventSubscribe("NewLeaf")]
//        private void OnNewLeaf(object sender, EventArgs e)
//        {
//                LeafPosition = (int)Structure.Get("Wheat.Leaf.ExpandedCohortNo", relativeTo: thisZone); 
//                LeafSize =   (double)Structure.Get("Wheat.Leaf.CohortSize["+((LeafPosition+1).ToString())+"]", relativeTo: thisZone);
//                MaxLeafSize = (double)Structure.Get("Wheat.Leaf.CohortMaxArea["+((LeafPosition+1).ToString())+"]", relativeTo: thisZone);
//                LeafReport.Invoke(this, new EventArgs());
//        }
    }
}
```
    Report MaxLeafSizeReport: EventNames=//[MaxLeafSize].Script.LeafReport
      VariableNames:
        //[MaxLeafSize].Script.LeafSize
        //[MaxLeafSize].Script.LeafPosition
        //[MaxLeafSize].Script.MaxLeafSize
    Manager Harvesting
```csharp
using APSIM.Core;
using Models.Soils.Nutrients;
using System;
using Models.Core;
using System.Collections.Generic;
using System.Text;
using Models.Soils;
using Models.PMF;
using Models;
using System.Xml.Serialization;
using APSIM.Shared.Utilities;
using Models.PMF.Phen;

namespace Models
{
    [Serializable] 
    public class Script : Model, IStructureDependency
    {
        [Link] private Plant Wheat;
        [Link] private Simulation sim;
        [Link] private Clock clock;
        [Link(Type = LinkType.Path, Path = "[Wheat].Phenology")]
        private Phenology phenology;
        public IStructure Structure { private get; set; }


        

        [EventSubscribe("DoManagement")]
        private void OnDoManagement(object sender, EventArgs e)
        {
            if (phenology.CurrentPhase.Name == "GrainRipening")
            {
                Wheat.Harvest();
                Wheat.EndCrop();
                Structure.Set("Clock.EndDate", clock.Today, relativeTo: sim);  
            }
        }

        [EventSubscribe("EndOfDay")]
        private void OnEndOfDay(object sender, EventArgs e)
        {
            if ((clock.Today.Equals(clock.EndDate))&&(Wheat.IsAlive))
            {
                Wheat.Harvest();
                Wheat.EndCrop();
                Structure.Set("Clock.EndDate", clock.Today, relativeTo: sim);  
            }
        }

    }
}
```
    Report NDVIDailyReport: EventNames=[Clock].DoReport
      VariableNames:
        [Simulation].Name
        [Clock].Today
        [Spectral].NDVI
        [Wheat].SowingData.Cultivar
    Plant Wheat: ResourceName=WinterCereal
      ModelOverrides: Overrides=[[Wheat].PlantType=Wheat]
      Folder Cultivars
        Folder New Zealand
          Cultivar Amarok
            Command:
              [Phenology].HeadEmergencePpSensitivity.FixedValue = 4
              [Phenology].Phyllochron.BasePhyllochron.FixedValue = 100.0
              [Phenology].PhyllochronPpSensitivity.FixedValue = 0.6
              [Phenology].CAMP.FLNparams.MinLN = 8
              [Phenology].CAMP.FLNparams.PpLN = 4
              [Phenology].CAMP.FLNparams.VrnLN = 5
              [Phenology].CAMP.FLNparams.VxPLN = 2
              [Phenology].HeadEmergenceLongDayBase.FixedValue = 90
              [Phenology].CAMP.EnvData.VrnTreatTemp = 6
              [Phenology].CAMP.EnvData.VrnTreatDuration = 60
          Cultivar BattenWinter
            Command:
              [Phenology].HeadEmergencePpSensitivity.FixedValue = 3.8423212708469157
              [Phenology].Phyllochron.BasePhyllochron.FixedValue = 100.0
              [Phenology].PhyllochronPpSensitivity.FixedValue = 0.6
              [Phenology].CAMP.FLNparams.MinLN = 8.15781757053076
              [Phenology].CAMP.FLNparams.PpLN = 3.6074343511019427
              [Phenology].CAMP.FLNparams.VrnLN = 3.096547775405041
              [Phenology].CAMP.FLNparams.VxPLN = 6.987099381114945
              [Phenology].HeadEmergenceLongDayBase.FixedValue = 266.0
              [Phenology].CAMP.EnvData.VrnTreatTemp = 6
              [Phenology].CAMP.EnvData.VrnTreatDuration = 60
          Cultivar BattenSpring
            Command:
              [Phenology].HeadEmergencePpSensitivity.FixedValue = 0.006727231500210627
              [Phenology].Phyllochron.BasePhyllochron.FixedValue = 100.0
              [Phenology].PhyllochronPpSensitivity.FixedValue = 0.6
              [Phenology].CAMP.FLNparams.MinLN = 8.25262475446035
              [Phenology].CAMP.FLNparams.PpLN = 7.552256317837019
              [Phenology].CAMP.FLNparams.VrnLN = 0.18541366678983096
              [Phenology].CAMP.FLNparams.VxPLN = -0.03479769923441367
              [Phenology].HeadEmergenceLongDayBase.FixedValue = 107.0
              [Phenology].CAMP.EnvData.VrnTreatTemp = 6
              [Phenology].CAMP.EnvData.VrnTreatDuration = 60
          Cultivar Claire
            Command:
              [Phenology].HeadEmergencePpSensitivity.FixedValue = 2
              [Phenology].Phyllochron.BasePhyllochron.FixedValue = 100
              [Phenology].CAMP.FLNparams.MinLN = 9
              [Phenology].CAMP.FLNparams.PpLN = 5
              [Phenology].CAMP.FLNparams.VrnLN = 4
              [Phenology].CAMP.FLNparams.VxPLN = 4
              [Phenology].HeadEmergenceLongDayBase.FixedValue = 150
              [Phenology].CAMP.EnvData.VrnTreatTemp = 6
              [Phenology].CAMP.EnvData.VrnTreatDuration = 60
            Alias Savannah
            Alias Atlanta
            Alias Istabraq
          Cultivar Conquest
            Command:
              [Phenology].Phyllochron.BasePhyllochron.FixedValue = 100
              [Phenology].CAMP.FLNparams.MinLN = 7.5
              [Phenology].CAMP.FLNparams.PpLN = 2.5
              [Phenology].CAMP.FLNparams.VrnLN = 0.0
              [Phenology].CAMP.FLNparams.VxPLN = 0.0
              [Phenology].HeadEmergenceLongDayBase.FixedValue = 100
              [Phenology].HeadEmergencePpSensitivity.FixedValue = 1.0
              [Phenology].CAMP.EnvData.VrnTreatTemp = 6
              [Phenology].CAMP.EnvData.VrnTreatDuration = 60
          Cultivar CRWT153
            Command:
              [Phenology].Phyllochron.BasePhyllochron.FixedValue = 100.0
              [Phenology].PhyllochronPpSensitivity.FixedValue = 0.6
              [Phenology].CAMP.FLNparams.MinLN = 14.27272727272727
              [Phenology].CAMP.FLNparams.PpLN = -0.028282828282829797
              [Phenology].CAMP.FLNparams.VrnLN = 2.6000000000000014
              [Phenology].CAMP.FLNparams.VxPLN = -1.2477272727272712
              [Phenology].HeadEmergenceLongDayBase.FixedValue = 200
              [Phenology].HeadEmergencePpSensitivity.FixedValue = 2.3
              [Phenology].CAMP.EnvData.VrnTreatTemp = 6
              [Phenology].CAMP.EnvData.VrnTreatDuration = 60
          Cultivar Discovery
            Command:
              [Phenology].Phyllochron.BasePhyllochron.FixedValue = 80
              [Phenology].CAMP.FLNparams.MinLN = 9.0
              [Phenology].CAMP.FLNparams.PpLN = 0.0
              [Phenology].CAMP.FLNparams.VrnLN = 0.0
              [Phenology].CAMP.FLNparams.VxPLN = 0.0
              [Phenology].HeadEmergenceLongDayBase.FixedValue = 100
              [Phenology].HeadEmergencePpSensitivity.FixedValue = 1.0
              [Phenology].CAMP.EnvData.VrnTreatTemp = 6
              [Phenology].CAMP.EnvData.VrnTreatDuration = 60
            Memo
              This is a spring wheat with a high grain number and later tillering
          Cultivar Exceed
            Command:
              [Phenology].CAMP.FLNparams.MinLN = 9
              [Phenology].CAMP.FLNparams.PpLN = 3.0
              [Phenology].CAMP.FLNparams.VrnLN = 7
              [Phenology].CAMP.FLNparams.VxPLN = 0.0
          Cultivar Option
            Command:
              [Phenology].CAMP.FLNparams.MinLN = 9
              [Phenology].CAMP.FLNparams.PpLN = 3.0
              [Phenology].CAMP.FLNparams.VrnLN = 7
              [Phenology].CAMP.FLNparams.VxPLN = 0.0
          Cultivar Otane
            Command:
              [Phenology].HeadEmergencePpSensitivity.FixedValue = 2
              [Phenology].Phyllochron.BasePhyllochron.FixedValue = 100.0
              [Phenology].PhyllochronPpSensitivity.FixedValue = 0.6
              [Phenology].CAMP.FLNparams.MinLN = 7
              [Phenology].CAMP.FLNparams.PpLN = 4
              [Phenology].CAMP.FLNparams.VrnLN = 0
              [Phenology].CAMP.FLNparams.VxPLN = 0
              [Phenology].HeadEmergenceLongDayBase.FixedValue = 150
              [Phenology].CAMP.EnvData.VrnTreatTemp = 6
              [Phenology].CAMP.EnvData.VrnTreatDuration = 60
          Cultivar Regency
            Command:
              [Phenology].CAMP.FLNparams.MinLN = 9
              [Phenology].CAMP.FLNparams.PpLN = 3.0
              [Phenology].CAMP.FLNparams.VrnLN = 7
              [Phenology].CAMP.FLNparams.VxPLN = 0.0
          Cultivar Robigus
            Command:
              [Phenology].CAMP.FLNparams.MinLN = 9
              [Phenology].CAMP.FLNparams.PpLN = 3.0
              [Phenology].CAMP.FLNparams.VrnLN = 7
              [Phenology].CAMP.FLNparams.VxPLN = 0.0
          Cultivar Rongotea
            Command:
              [Phenology].HeadEmergencePpSensitivity.FixedValue = 3.92123686073301
              [Phenology].Phyllochron.BasePhyllochron.FixedValue = 100
              [Phenology].CAMP.FLNparams.MinLN = 7.73858795204672
              [Phenology].CAMP.FLNparams.PpLN = 10.6418278399273
              [Phenology].CAMP.FLNparams.VrnLN = 0.307012432477857
              [Phenology].CAMP.FLNparams.VxPLN = -0.256935248010825
              [Phenology].HeadEmergenceLongDayBase.FixedValue = 168
              [Phenology].CAMP.EnvData.VrnTreatTemp = 6
              [Phenology].CAMP.EnvData.VrnTreatDuration = 60
          Cultivar Sage
            Command:
              [Phenology].CAMP.FLNparams.MinLN = 9
              [Phenology].CAMP.FLNparams.PpLN = 3.0
              [Phenology].CAMP.FLNparams.VrnLN = 7
              [Phenology].CAMP.FLNparams.VxPLN = 0.0
          Cultivar Saracen
            Command:
              [Phenology].Phyllochron.BasePhyllochron.FixedValue = 100.0
              [Phenology].PhyllochronPpSensitivity.FixedValue = 0.6
              [Phenology].CAMP.FLNparams.MinLN = 8
              [Phenology].CAMP.FLNparams.PpLN = 2
              [Phenology].CAMP.FLNparams.VrnLN = 1
              [Phenology].CAMP.FLNparams.VxPLN = 2
              [Phenology].HeadEmergenceLongDayBase.FixedValue = 170
              [Phenology].HeadEmergencePpSensitivity.FixedValue = 4
              [Phenology].CAMP.EnvData.VrnTreatTemp = 6
              [Phenology].CAMP.EnvData.VrnTreatDuration = 60
          Cultivar Solstice
            Command:
              [Phenology].CAMP.FLNparams.MinLN = 9
              [Phenology].CAMP.FLNparams.PpLN = 3.0
              [Phenology].CAMP.FLNparams.VrnLN = 7
              [Phenology].CAMP.FLNparams.VxPLN = 0.0
          Cultivar Tribute
            Command:
              [Phenology].CAMP.FLNparams.MinLN = 9
              [Phenology].CAMP.FLNparams.PpLN = 3.0
              [Phenology].CAMP.FLNparams.VrnLN = 7
              [Phenology].CAMP.FLNparams.VxPLN = 0.0
          Cultivar Wakanui
            Command:
              [Phenology].HeadEmergenceLongDayBase.FixedValue = 50
              [Phenology].Phyllochron.BasePhyllochron.FixedValue = 105.0
              [Phenology].PhyllochronPpSensitivity.FixedValue = 0.33
              [Phenology].CAMP.FLNparams.MinLN = 10
              [Phenology].CAMP.FLNparams.PpLN = 12
              [Phenology].CAMP.FLNparams.VrnLN = 12
              [Phenology].CAMP.FLNparams.VxPLN = 4
              [Phenology].HeadEmergencePpSensitivity.FixedValue = 8
              [Phenology].CAMP.EnvData.VrnTreatTemp = 6
              [Phenology].CAMP.EnvData.VrnTreatDuration = 60
          Cultivar Voltron
            Command:
              [Phenology].HeadEmergenceLongDayBase.FixedValue = 50
              [Phenology].Phyllochron.BasePhyllochron.FixedValue = 105.0
              [Phenology].PhyllochronPpSensitivity.FixedValue = 0.33
              [Phenology].CAMP.FLNparams.MinLN = 10
              [Phenology].CAMP.FLNparams.PpLN = 6
              [Phenology].CAMP.FLNparams.VrnLN = 4
              [Phenology].CAMP.FLNparams.VxPLN = 0
              [Phenology].HeadEmergencePpSensitivity.FixedValue = 8
              [Phenology].CAMP.EnvData.VrnTreatTemp = 6
              [Phenology].CAMP.EnvData.VrnTreatDuration = 60
              [Phenology].GrainFilling.Target.FixedValue = 700
          Cultivar Sorrial: same as Replacements.Wheat.Cultivars.New Zealand.Voltron
          Cultivar Cesario
            Command:
              [Phenology].HeadEmergenceLongDayBase.FixedValue = 50
              [Phenology].Phyllochron.BasePhyllochron.FixedValue = 105.0
              [Phenology].PhyllochronPpSensitivity.FixedValue = 0.33
              [Phenology].CAMP.FLNparams.MinLN = 8
              [Phenology].CAMP.FLNparams.PpLN = 12
              [Phenology].CAMP.FLNparams.VrnLN = 12
              [Phenology].CAMP.FLNparams.VxPLN = 4
              [Phenology].HeadEmergencePpSensitivity.FixedValue = 8
              [Phenology].CAMP.EnvData.VrnTreatTemp = 6
              [Phenology].CAMP.EnvData.VrnTreatDuration = 60
              [Phenology].GrainFilling.Target.FixedValue = 700
          Cultivar Stockade
            Command:
              [Phenology].HeadEmergenceLongDayBase.FixedValue = 50
              [Phenology].Phyllochron.BasePhyllochron.FixedValue = 105.0
              [Phenology].PhyllochronPpSensitivity.FixedValue = 0.33
              [Phenology].CAMP.FLNparams.MinLN = 8
              [Phenology].CAMP.FLNparams.PpLN = 12
              [Phenology].CAMP.FLNparams.VrnLN = 12
              [Phenology].CAMP.FLNparams.VxPLN = 4
              [Phenology].HeadEmergencePpSensitivity.FixedValue = 8
              [Phenology].CAMP.EnvData.VrnTreatTemp = 6
              [Phenology].CAMP.EnvData.VrnTreatDuration = 60
          Cultivar CRW247
            Command:
              [Phenology].HeadEmergenceLongDayBase.FixedValue = 50
              [Phenology].Phyllochron.BasePhyllochron.FixedValue = 105.0
              [Phenology].PhyllochronPpSensitivity.FixedValue = 0.33
              [Phenology].CAMP.FLNparams.MinLN = 10
              [Phenology].CAMP.FLNparams.PpLN = 8
              [Phenology].CAMP.FLNparams.VrnLN = 0
              [Phenology].CAMP.FLNparams.VxPLN = 0
              [Phenology].HeadEmergencePpSensitivity.FixedValue = 8
              [Phenology].CAMP.EnvData.VrnTreatTemp = 6
              [Phenology].CAMP.EnvData.VrnTreatDuration = 60
          Cultivar Zyatt: same as Replacements.Wheat.Cultivars.New Zealand.Wakanui
          Cultivar Graham
            Command:
              [Phenology].HeadEmergenceLongDayBase.FixedValue = 50
              [Phenology].Phyllochron.BasePhyllochron.FixedValue = 105.0
              [Phenology].PhyllochronPpSensitivity.FixedValue = 0.33
              [Phenology].CAMP.FLNparams.MinLN = 10
              [Phenology].CAMP.FLNparams.PpLN = 12
              [Phenology].CAMP.FLNparams.VrnLN = 12
              [Phenology].CAMP.FLNparams.VxPLN = 4
              [Phenology].HeadEmergencePpSensitivity.FixedValue = 8
              [Phenology].CAMP.EnvData.VrnTreatTemp = 6
              [Phenology].CAMP.EnvData.VrnTreatDuration = 60
              [Phenology].GrainFilling.Target.FixedValue = 700
          Cultivar Kerrin: same as Replacements.Wheat.Cultivars.New Zealand.Graham
        Folder Australia
          Cultivar Adv08_0008
            Command:
              [Phenology].Phyllochron.BasePhyllochron.FixedValue = 107.385378970476
              [Phenology].PhyllochronPpSensitivity.FixedValue = 0.246728222459184
              [Phenology].CAMP.EnvData.VrnTreatTemp = 5.8
              [Phenology].CAMP.EnvData.VrnTreatDuration = 60
              [Phenology].CAMP.FLNparams.MinLN = 8
              [Phenology].CAMP.FLNparams.VrnLN = 5
              [Phenology].CAMP.FLNparams.PpLN = 1
              [Phenology].CAMP.FLNparams.VxPLN = 0
              [Phenology].HeadEmergenceLongDayBase.FixedValue = 290
              [Phenology].HeadEmergencePpSensitivity.FixedValue = 0
          Cultivar Axe
            Command:
              [Phenology].HeadEmergencePpSensitivity.FixedValue = 1
              [Phenology].Phyllochron.BasePhyllochron.FixedValue = 92.9812317822162
              [Phenology].PhyllochronPpSensitivity.FixedValue = 0.268590208069814
              [Phenology].CAMP.FLNparams.MinLN = 7
              [Phenology].CAMP.FLNparams.PpLN = 2
              [Phenology].CAMP.FLNparams.VrnLN = 0
              [Phenology].CAMP.FLNparams.VxPLN = 0
              [Phenology].CAMP.EnvData.VrnTreatTemp = 5.8
              [Phenology].CAMP.EnvData.VrnTreatDuration = 60
              [Phenology].HeadEmergenceLongDayBase.FixedValue = 130
          Cultivar Batavia
            Command:
              [Phenology].Phyllochron.BasePhyllochron.FixedValue = 100
              [Phenology].CAMP.FLNparams.MinLN = 5
              [Phenology].CAMP.FLNparams.PpLN = 9
              [Phenology].CAMP.FLNparams.VrnLN = 0
              [Phenology].CAMP.FLNparams.VxPLN = 6
              [Phenology].HeadEmergenceLongDayBase.FixedValue = 130
              [Phenology].HeadEmergencePpSensitivity.FixedValue = 6
          Cultivar Beaufort
            Command:
              [Phenology].Phyllochron.BasePhyllochron.FixedValue = 102.321288321408
              [Phenology].PhyllochronPpSensitivity.FixedValue = 0.254667061341894
              [Phenology].CAMP.FLNparams.MinLN = 8
              [Phenology].CAMP.FLNparams.PpLN = 3
              [Phenology].CAMP.FLNparams.VrnLN = 3
              [Phenology].CAMP.FLNparams.VxPLN = 3
              [Phenology].CAMP.EnvData.VrnTreatTemp = 6
              [Phenology].CAMP.EnvData.VrnTreatDuration = 60
              [Phenology].HeadEmergenceLongDayBase.FixedValue = 170
              [Phenology].HeadEmergencePpSensitivity.FixedValue = 0
          Cultivar Bennett
            Command:
              [Phenology].Phyllochron.BasePhyllochron.FixedValue = 106.269847259128
              [Phenology].PhyllochronPpSensitivity.FixedValue = 0.221423439420895
              [Phenology].CAMP.FLNparams.MinLN = 8
              [Phenology].CAMP.FLNparams.PpLN = 1
              [Phenology].CAMP.FLNparams.VrnLN = 6
              [Phenology].CAMP.FLNparams.VxPLN = 1
              [Phenology].CAMP.EnvData.VrnTreatTemp = 5.8
              [Phenology].CAMP.EnvData.VrnTreatDuration = 60
              [Phenology].HeadEmergenceLongDayBase.FixedValue = 230
              [Phenology].HeadEmergencePpSensitivity.FixedValue = 2
          Cultivar Bolac
            Command:
              [Phenology].Phyllochron.BasePhyllochron.FixedValue = 99.3767047504637
              [Phenology].PhyllochronPpSensitivity.FixedValue = 0.204801292585874
              [Phenology].CAMP.FLNparams.MinLN = 7
              [Phenology].CAMP.FLNparams.PpLN = 5
              [Phenology].CAMP.FLNparams.VrnLN = 1
              [Phenology].CAMP.FLNparams.VxPLN = 0
              [Phenology].CAMP.EnvData.VrnTreatTemp = 5.8
              [Phenology].CAMP.EnvData.VrnTreatDuration = 60
              [Phenology].HeadEmergenceLongDayBase.FixedValue = 170
              [Phenology].HeadEmergencePpSensitivity.FixedValue = 1
          Cultivar Braewood
            Command:
              [Phenology].Phyllochron.BasePhyllochron.FixedValue = 92.1177406284002
              [Phenology].PhyllochronPpSensitivity.FixedValue = 0.269041869726177
              [Phenology].CAMP.FLNparams.MinLN = 8
              [Phenology].CAMP.FLNparams.PpLN = 2
              [Phenology].CAMP.FLNparams.VrnLN = 3
              [Phenology].CAMP.FLNparams.VxPLN = -3
              [Phenology].CAMP.EnvData.VrnTreatTemp = 5.8
              [Phenology].CAMP.EnvData.VrnTreatDuration = 60
              [Phenology].HeadEmergenceLongDayBase.FixedValue = 150
              [Phenology].HeadEmergencePpSensitivity.FixedValue = 2
          Cultivar Calingiri
            Command:
              [Phenology].Phyllochron.BasePhyllochron.FixedValue = 112.665706012865
              [Phenology].PhyllochronPpSensitivity.FixedValue = 0.16928704526596
              [Phenology].CAMP.FLNparams.MinLN = 7
              [Phenology].CAMP.FLNparams.PpLN = 2
              [Phenology].CAMP.FLNparams.VrnLN = 2
              [Phenology].CAMP.FLNparams.VxPLN = -1
              [Phenology].CAMP.EnvData.VrnTreatTemp = 5.8
              [Phenology].CAMP.EnvData.VrnTreatDuration = 60
              [Phenology].HeadEmergenceLongDayBase.FixedValue = 50
              [Phenology].HeadEmergencePpSensitivity.FixedValue = 4
          Cultivar Catalina
            Command:
              [Phenology].Phyllochron.BasePhyllochron.FixedValue = 93.1373432728081
              [Phenology].PhyllochronPpSensitivity.FixedValue = 0.403019826488085
              [Phenology].CAMP.FLNparams.MinLN = 7
              [Phenology].CAMP.FLNparams.PpLN = 1
              [Phenology].CAMP.FLNparams.VrnLN = 0
              [Phenology].CAMP.FLNparams.VxPLN = 0
              [Phenology].CAMP.EnvData.VrnTreatTemp = 5.8
              [Phenology].CAMP.EnvData.VrnTreatDuration = 60
              [Phenology].HeadEmergenceLongDayBase.FixedValue = 230
              [Phenology].HeadEmergencePpSensitivity.FixedValue = 1
          Cultivar Condo
            Command:
              [Phenology].Phyllochron.BasePhyllochron.FixedValue = 94.4306598856844
              [Phenology].PhyllochronPpSensitivity.FixedValue = 0.179475706868039
              [Phenology].CAMP.FLNparams.MinLN = 7
              [Phenology].CAMP.FLNparams.PpLN = 2
              [Phenology].CAMP.FLNparams.VrnLN = 3
              [Phenology].CAMP.FLNparams.VxPLN = 0
              [Phenology].CAMP.EnvData.VrnTreatTemp = 5.8
              [Phenology].CAMP.EnvData.VrnTreatDuration = 60
              [Phenology].HeadEmergenceLongDayBase.FixedValue = 190
              [Phenology].HeadEmergencePpSensitivity.FixedValue = 0
          Cultivar Corack
            Command:
              // Phenology parameters taken from Harto as it is near isogenic
              [Phenology].Phyllochron.BasePhyllochron.FixedValue = 100. //107.48
              [Grain].MaximumPotentialGrainSize.FixedValue = 0.041
              [Grain].NumberFunction.GrainNumber.GrainsPerGramOfStem.FixedValue = 24
              [Phenology].PhyllochronPpSensitivity.FixedValue = 0.247
              [Phenology].CAMP.FLNparams.MinLN = 7
              [Phenology].CAMP.FLNparams.PpLN = 4
              [Phenology].CAMP.FLNparams.VrnLN = 2
              [Phenology].CAMP.FLNparams.VxPLN = 0
              [Phenology].HeadEmergenceLongDayBase.FixedValue = 50
              [Phenology].HeadEmergencePpSensitivity.FixedValue = 5
              [Phenology].CAMP.EnvData.VrnTreatTemp = 6
              [Phenology].CAMP.EnvData.VrnTreatDuration = 60
          Cultivar Crusader
            Command:
              [Phenology].Phyllochron.BasePhyllochron.FixedValue = 100.832025052954
              [Phenology].PhyllochronPpSensitivity.FixedValue = 0.199967770650946
              [Phenology].CAMP.FLNparams.MinLN = 6
              [Phenology].CAMP.FLNparams.PpLN = 5
              [Phenology].CAMP.FLNparams.VrnLN = 3
              [Phenology].CAMP.FLNparams.VxPLN = 0
              [Phenology].CAMP.EnvData.VrnTreatTemp = 6
              [Phenology].CAMP.EnvData.VrnTreatDuration = 60
              [Phenology].HeadEmergenceLongDayBase.FixedValue = 230
              [Phenology].HeadEmergencePpSensitivity.FixedValue = 0
          Cultivar Cunningham
            Command:
              [Phenology].Phyllochron.BasePhyllochron.FixedValue = 100
              [Phenology].CAMP.FLNparams.MinLN = 7
              [Phenology].CAMP.FLNparams.PpLN = 12
              [Phenology].CAMP.FLNparams.VrnLN = 9
              [Phenology].CAMP.FLNparams.VxPLN = -9
              [Phenology].HeadEmergenceLongDayBase.FixedValue = 50
              [Phenology].HeadEmergencePpSensitivity.FixedValue = 0
          Cultivar Cutlass
            Command:
              [Phenology].Phyllochron.BasePhyllochron.FixedValue = 95.8008034182983
              [Phenology].PhyllochronPpSensitivity.FixedValue = 0.352406544577556
              [Phenology].CAMP.FLNparams.MinLN = 7
              [Phenology].CAMP.FLNparams.PpLN = 5
              [Phenology].CAMP.FLNparams.VrnLN = 1
              [Phenology].CAMP.FLNparams.VxPLN = 2
              [Phenology].CAMP.EnvData.VrnTreatTemp = 5.8
              [Phenology].CAMP.EnvData.VrnTreatDuration = 60
              [Phenology].HeadEmergenceLongDayBase.FixedValue = 130
              [Phenology].HeadEmergencePpSensitivity.FixedValue = 2
          Cultivar Derrimut
            Command:
              [Phenology].Phyllochron.BasePhyllochron.FixedValue = 94.7552823110091
              [Phenology].PhyllochronPpSensitivity.FixedValue = 0.263180943521024
              [Phenology].CAMP.FLNparams.MinLN = 7
              [Phenology].CAMP.FLNparams.PpLN = 3
              [Phenology].CAMP.FLNparams.VrnLN = 2
              [Phenology].CAMP.FLNparams.VxPLN = -2
              [Phenology].CAMP.EnvData.VrnTreatTemp = 5.8
              [Phenology].CAMP.EnvData.VrnTreatDuration = 60
              [Phenology].HeadEmergenceLongDayBase.FixedValue = 150
              [Phenology].HeadEmergencePpSensitivity.FixedValue = 1
          Cultivar Eaglehawk
            Command:
              [Phenology].Phyllochron.BasePhyllochron.FixedValue = 122.758992485634
              [Phenology].PhyllochronPpSensitivity.FixedValue = 0.119042603665788
              [Phenology].CAMP.FLNparams.MinLN = 6
              [Phenology].CAMP.FLNparams.PpLN = 3
              [Phenology].CAMP.FLNparams.VrnLN = 1
              [Phenology].CAMP.FLNparams.VxPLN = 3
              [Phenology].CAMP.EnvData.VrnTreatTemp = 5.8
              [Phenology].CAMP.EnvData.VrnTreatDuration = 60
              [Phenology].HeadEmergenceLongDayBase.FixedValue = 190
              [Phenology].HeadEmergencePpSensitivity.FixedValue = 4
          Cultivar Ellison
            Command:
              [Phenology].Phyllochron.BasePhyllochron.FixedValue = 110.512287746208
              [Phenology].PhyllochronPpSensitivity.FixedValue = 0.282156394448543
              [Phenology].CAMP.FLNparams.MinLN = 6
              [Phenology].CAMP.FLNparams.PpLN = 4
              [Phenology].CAMP.FLNparams.VrnLN = 1
              [Phenology].CAMP.FLNparams.VxPLN = 2
              [Phenology].CAMP.EnvData.VrnTreatTemp = 5.8
              [Phenology].CAMP.EnvData.VrnTreatDuration = 60
              [Phenology].HeadEmergenceLongDayBase.FixedValue = 130
              [Phenology].HeadEmergencePpSensitivity.FixedValue = 4
          Cultivar Egret
            Command:
              [Phenology].Phyllochron.BasePhyllochron.FixedValue =80
              [Phenology].CAMP.FLNparams.MinLN = 8
              [Phenology].CAMP.FLNparams.PpLN = 9
              [Phenology].CAMP.FLNparams.VrnLN = 8
              [Phenology].CAMP.FLNparams.VxPLN = -8
              [Phenology].HeadEmergenceLongDayBase.FixedValue = 110
              [Phenology].HeadEmergencePpSensitivity.FixedValue = 0
              [Phenology].CAMP.EnvData.VrnTreatTemp = 6
              [Phenology].CAMP.EnvData.VrnTreatDuration = 60
          Cultivar Emu_Rock
            Command:
              [Phenology].Phyllochron.BasePhyllochron.FixedValue = 94.7698873180009
              [Phenology].PhyllochronPpSensitivity.FixedValue = 0.358007951256312
              [Phenology].CAMP.FLNparams.MinLN = 6
              [Phenology].CAMP.FLNparams.PpLN = 1
              [Phenology].CAMP.FLNparams.VrnLN = 1
              [Phenology].CAMP.FLNparams.VxPLN = -1
              [Phenology].CAMP.EnvData.VrnTreatTemp = 5.8
              [Phenology].CAMP.EnvData.VrnTreatDuration = 60
              [Phenology].HeadEmergenceLongDayBase.FixedValue = 183.0
              [Phenology].HeadEmergencePpSensitivity.FixedValue = 1.7962741039794823
          Cultivar Forrest
            Command:
              [Phenology].Phyllochron.BasePhyllochron.FixedValue = 99.8910902837222
              [Phenology].PhyllochronPpSensitivity.FixedValue = 0.417874283738016
              [Phenology].CAMP.FLNparams.MinLN = 6
              [Phenology].CAMP.FLNparams.PpLN = 5
              [Phenology].CAMP.FLNparams.VrnLN = 2
              [Phenology].CAMP.FLNparams.VxPLN = 1
              [Phenology].CAMP.EnvData.VrnTreatTemp = 5.8
              [Phenology].CAMP.EnvData.VrnTreatDuration = 60
              [Phenology].HeadEmergenceLongDayBase.FixedValue = 370
              [Phenology].HeadEmergencePpSensitivity.FixedValue = 1
          Cultivar Gregory
            Command:
              [Phenology].Phyllochron.BasePhyllochron.FixedValue = 96.2227321902995
              [Phenology].PhyllochronPpSensitivity.FixedValue = 0.199981872553676
              [Phenology].CAMP.FLNparams.MinLN = 8
              [Phenology].CAMP.FLNparams.PpLN = 2
              [Phenology].CAMP.FLNparams.VrnLN = 4
              [Phenology].CAMP.FLNparams.VxPLN = -3
              [Phenology].CAMP.EnvData.VrnTreatTemp = 6
              [Phenology].CAMP.EnvData.VrnTreatDuration = 60
              [Phenology].HeadEmergenceLongDayBase.FixedValue = 110
              [Phenology].HeadEmergencePpSensitivity.FixedValue = 1
              [Grain].MaximumPotentialGrainSize.FixedValue = 0.041
              [Grain].NumberFunction.GrainNumber.GrainsPerGramOfStem.FixedValue = 22
          Cultivar Gamenya
            Command:
              [Phenology].Phyllochron.BasePhyllochron.FixedValue = 100
              [Phenology].PhyllochronPpSensitivity.FixedValue = 0.349562436956343
              [Phenology].CAMP.FLNparams.MinLN = 8
              [Phenology].CAMP.FLNparams.PpLN = 3
              [Phenology].CAMP.FLNparams.VrnLN = 0.5
              [Phenology].CAMP.FLNparams.VxPLN = 0
              [Phenology].CAMP.EnvData.VrnTreatTemp = 6
              [Phenology].CAMP.EnvData.VrnTreatDuration = 60
              [Phenology].HeadEmergenceLongDayBase.FixedValue = 50
              [Phenology].HeadEmergencePpSensitivity.FixedValue = 4
          Cultivar Gauntlet
            Command:
              [Phenology].Phyllochron.BasePhyllochron.FixedValue = 91.4777217640106
              [Phenology].PhyllochronPpSensitivity.FixedValue = 0.28135751778138
              [Phenology].CAMP.FLNparams.MinLN = 7
              [Phenology].CAMP.FLNparams.PpLN = 2
              [Phenology].CAMP.FLNparams.VrnLN = 4
              [Phenology].CAMP.FLNparams.VxPLN = -4
              [Phenology].CAMP.EnvData.VrnTreatTemp = 5.8
              [Phenology].CAMP.EnvData.VrnTreatDuration = 60
              [Phenology].HeadEmergenceLongDayBase.FixedValue = 230
              [Phenology].HeadEmergencePpSensitivity.FixedValue = 1
          Cultivar Gladius
            Command:
              [Phenology].Phyllochron.BasePhyllochron.FixedValue = 100
              [Phenology].CAMP.FLNparams.MinLN = 6
              [Phenology].CAMP.FLNparams.PpLN = 5.0
              [Phenology].CAMP.FLNparams.VrnLN = 0
              [Phenology].CAMP.FLNparams.VxPLN = 0.0
          Cultivar Grenade
            Command:
              [Phenology].Phyllochron.BasePhyllochron.FixedValue = 96.8120116390919
              [Phenology].PhyllochronPpSensitivity.FixedValue = 0.3478103654812
              [Phenology].CAMP.FLNparams.MinLN = 7
              [Phenology].CAMP.FLNparams.PpLN = 3
              [Phenology].CAMP.FLNparams.VrnLN = 1
              [Phenology].CAMP.FLNparams.VxPLN = 0
              [Phenology].CAMP.EnvData.VrnTreatTemp = 5.8
              [Phenology].CAMP.EnvData.VrnTreatDuration = 60
              [Phenology].HeadEmergenceLongDayBase.FixedValue = 230
              [Phenology].HeadEmergencePpSensitivity.FixedValue = 0
          Cultivar Gutha
            Command:
              [Phenology].Phyllochron.BasePhyllochron.FixedValue = 107
              [Phenology].PhyllochronPpSensitivity.FixedValue = 0.247088996399892
              [Grain].NumberFunction.GrainNumber.GrainsPerGramOfStem.FixedValue = 17
              [Phenology].CAMP.EnvData.VrnTreatTemp = 5.8
              [Phenology].CAMP.EnvData.VrnTreatDuration = 60
              [Phenology].CAMP.FLNparams.MinLN = 7
              [Phenology].CAMP.FLNparams.PpLN = 2
              [Phenology].CAMP.FLNparams.VrnLN = 1
              [Phenology].CAMP.FLNparams.VxPLN = 0
              [Phenology].HeadEmergenceLongDayBase.FixedValue = 50
              [Phenology].HeadEmergencePpSensitivity.FixedValue = 5
          Cultivar H45
            Command:
              [Phenology].Phyllochron.BasePhyllochron.FixedValue = 85.6989214218668
              [Grain].NumberFunction.GrainNumber.GrainsPerGramOfStem.FixedValue = 20
              [Phenology].PhyllochronPpSensitivity.FixedValue = 0.349562436956343
              [Phenology].CAMP.FLNparams.MinLN = 8
              [Phenology].CAMP.FLNparams.PpLN = 3
              [Phenology].CAMP.FLNparams.VrnLN = 0
              [Phenology].CAMP.FLNparams.VxPLN = 0
              [Phenology].CAMP.EnvData.VrnTreatTemp = 6
              [Phenology].CAMP.EnvData.VrnTreatDuration = 60
              [Phenology].HeadEmergenceLongDayBase.FixedValue = 50
              [Phenology].HeadEmergencePpSensitivity.FixedValue = 4
          Cultivar H46
            Command:
              [Phenology].Phyllochron.BasePhyllochron.FixedValue = 100
              [Phenology].CAMP.FLNparams.MinLN = 8
              [Phenology].CAMP.FLNparams.PpLN = 4.0
              [Phenology].CAMP.FLNparams.VrnLN = 0
              [Phenology].CAMP.FLNparams.VxPLN = 0.0
          Cultivar Hartog
            Command:
              [Phenology].Phyllochron.BasePhyllochron.FixedValue = 100. //107.48
              //[Leaf].TilleringRate.Vegetative.StressedRate.PotentialtilleringRate.GenotypeTilleringTendency.FixedValue = 1.
              //[Leaf].TilleringRate.Vegetative.StressedRate.Stresses.CoverEffect.XYPairs.X=0,0.2,0.7,1
              //[Leaf].TilleringRate.Vegetative.StressedRate.Stresses.CoverEffect.XYPairs.X=1.0,1.0,1,1
              [Grain].MaximumPotentialGrainSize.FixedValue = 0.041
              [Grain].NumberFunction.GrainNumber.GrainsPerGramOfStem.FixedValue = 22
              [Phenology].PhyllochronPpSensitivity.FixedValue = 0.247
              [Phenology].CAMP.FLNparams.MinLN = 7
              [Phenology].CAMP.FLNparams.PpLN = 4
              [Phenology].CAMP.FLNparams.VrnLN = 2
              [Phenology].CAMP.FLNparams.VxPLN = 0
              [Phenology].HeadEmergenceLongDayBase.FixedValue = 50
              [Phenology].HeadEmergencePpSensitivity.FixedValue = 5
              [Phenology].CAMP.EnvData.VrnTreatTemp = 6
              [Phenology].CAMP.EnvData.VrnTreatDuration = 60
          Cultivar Hume
            Command:
              [Phenology].Phyllochron.BasePhyllochron.FixedValue = 86.6877539944917
              [Phenology].PhyllochronPpSensitivity.FixedValue = 0.340327517277635
              [Phenology].CAMP.FLNparams.MinLN = 7
              [Phenology].CAMP.FLNparams.PpLN = 3
              [Phenology].CAMP.FLNparams.VrnLN = 1
              [Phenology].CAMP.FLNparams.VxPLN = -1
              [Phenology].CAMP.EnvData.VrnTreatTemp = 5.8
              [Phenology].CAMP.EnvData.VrnTreatDuration = 60
              [Phenology].HeadEmergenceLongDayBase.FixedValue = 190
              [Phenology].HeadEmergencePpSensitivity.FixedValue = 1
          Cultivar Illabo
            Command:
              [Phenology].Phyllochron.BasePhyllochron.FixedValue = 100.550798402656
              [Phenology].PhyllochronPpSensitivity.FixedValue = 0.238435422022958
              [Phenology].CAMP.EnvData.VrnTreatTemp = 5.8
              [Phenology].CAMP.EnvData.VrnTreatDuration = 60
              [Phenology].CAMP.FLNparams.MinLN = 8
              [Phenology].CAMP.FLNparams.VrnLN = 7
              [Phenology].CAMP.FLNparams.PpLN = 1
              [Phenology].CAMP.FLNparams.VxPLN = -1
              [Phenology].HeadEmergenceLongDayBase.FixedValue = 110
              [Phenology].HeadEmergencePpSensitivity.FixedValue = 0
          Cultivar Janz
            Command:
              [Phenology].Phyllochron.BasePhyllochron.FixedValue = 91.4460925764448
              [Phenology].PhyllochronPpSensitivity.FixedValue = 0.235020437209909
              [Phenology].CAMP.FLNparams.MinLN = 8
              [Phenology].CAMP.FLNparams.PpLN = 3
              [Phenology].CAMP.FLNparams.VrnLN = 1
              [Phenology].CAMP.FLNparams.VxPLN = -1
              [Phenology].CAMP.EnvData.VrnTreatTemp = 5.8
              [Phenology].CAMP.EnvData.VrnTreatDuration = 60
              [Phenology].HeadEmergenceLongDayBase.FixedValue = 130
              [Phenology].HeadEmergencePpSensitivity.FixedValue = 1
          Cultivar Mercury
            Command:
              [Phenology].HeadEmergenceLongDayBase.FixedValue = 100
              [Phenology].Phyllochron.BasePhyllochron.FixedValue = 80
              [Phenology].CAMP.FLNparams.MinLN = 9.0
              [Phenology].CAMP.FLNparams.PpLN = 2.0
              [Phenology].CAMP.FLNparams.VrnLN = 0.0
              [Phenology].CAMP.FLNparams.VxPLN = 0.0
              [Phenology].HeadEmergencePpSensitivity.FixedValue = 0.0
              [Phenology].CAMP.EnvData.VrnTreatTemp = 6
              [Phenology].CAMP.EnvData.VrnTreatDuration = 60
          Cultivar Kellalac
            Command:
              [Phenology].Phyllochron.BasePhyllochron.FixedValue = 88.1945544451052
              [Phenology].PhyllochronPpSensitivity.FixedValue = 0.350967201537242
              [Phenology].CAMP.FLNparams.MinLN = 7
              [Phenology].CAMP.FLNparams.PpLN = 4
              [Phenology].CAMP.FLNparams.VrnLN = 2
              [Phenology].CAMP.FLNparams.VxPLN = 0
              [Phenology].CAMP.EnvData.VrnTreatTemp = 6
              [Phenology].CAMP.EnvData.VrnTreatDuration = 60
              [Phenology].HeadEmergenceLongDayBase.FixedValue = 210
              [Phenology].HeadEmergencePpSensitivity.FixedValue = 3
          Cultivar Kennedy
            Command:
              [Phenology].Phyllochron.BasePhyllochron.FixedValue = 100
              [Phenology].CAMP.FLNparams.MinLN = 8
              [Phenology].CAMP.FLNparams.PpLN = 4.0
              [Phenology].CAMP.FLNparams.VrnLN = 0
              [Phenology].CAMP.FLNparams.VxPLN = 0.0
          Cultivar Kittyhawk
            Command:
              [Phenology].Phyllochron.BasePhyllochron.FixedValue = 93.7220123291132
              [Phenology].PhyllochronPpSensitivity.FixedValue = 0.212225680614483
              [Phenology].CAMP.FLNparams.MinLN = 10
              [Phenology].CAMP.FLNparams.PpLN = 2
              [Phenology].CAMP.FLNparams.VrnLN = 8
              [Phenology].CAMP.FLNparams.VxPLN = -1
              [Phenology].CAMP.EnvData.VrnTreatTemp = 5.8
              [Phenology].CAMP.EnvData.VrnTreatDuration = 60
              [Phenology].HeadEmergenceLongDayBase.FixedValue = 50
              [Phenology].HeadEmergencePpSensitivity.FixedValue = 4
          Cultivar Lancer
            Command:
              [Phenology].Phyllochron.BasePhyllochron.FixedValue = 85.6623042725763
              [Phenology].PhyllochronPpSensitivity.FixedValue = 0.324980109776406
              [Phenology].CAMP.FLNparams.MinLN = 8
              [Phenology].CAMP.FLNparams.PpLN = 4
              [Phenology].CAMP.FLNparams.VrnLN = 2
              [Phenology].CAMP.FLNparams.VxPLN = -2
              [Phenology].CAMP.EnvData.VrnTreatTemp = 5.8
              [Phenology].CAMP.EnvData.VrnTreatDuration = 60
              [Phenology].HeadEmergenceLongDayBase.FixedValue = 150
              [Phenology].HeadEmergencePpSensitivity.FixedValue = 1
          Cultivar Lang
            Command:
              [Phenology].Phyllochron.BasePhyllochron.FixedValue = 100
              [Phenology].CAMP.FLNparams.MinLN = 7
              [Phenology].CAMP.FLNparams.PpLN = 7
              [Phenology].CAMP.FLNparams.VrnLN = 0
              [Phenology].CAMP.FLNparams.VxPLN = 0
              [Phenology].HeadEmergenceLongDayBase.FixedValue = 70
              [Phenology].HeadEmergencePpSensitivity.FixedValue = 4
              [Phenology].CAMP.EnvData.VrnTreatTemp = 6
              [Phenology].CAMP.EnvData.VrnTreatDuration = 60
          Cultivar Livingston
            Command:
              [Phenology].Phyllochron.BasePhyllochron.FixedValue = 100
              [Phenology].CAMP.FLNparams.MinLN = 6.1
              [Phenology].CAMP.FLNparams.PpLN = 3.0
              [Phenology].CAMP.FLNparams.VrnLN = 1.8000000000000007
              [Phenology].CAMP.FLNparams.VxPLN = 4.0
              [Phenology].HeadEmergenceLongDayBase.FixedValue = 108
              [Phenology].HeadEmergencePpSensitivity.FixedValue = 1.3
              [Phenology].CAMP.EnvData.VrnTreatTemp = 6
              [Phenology].CAMP.EnvData.VrnTreatDuration = 60
              [Grain].MaximumPotentialGrainSize.FixedValue = 0.041
              [Grain].NumberFunction.GrainNumber.GrainsPerGramOfStem.FixedValue = 22
          Cultivar Lincoln
            Command:
              [Phenology].Phyllochron.BasePhyllochron.FixedValue = 100
              [Phenology].CAMP.FLNparams.MinLN = 6
              [Phenology].CAMP.FLNparams.PpLN = 4.0
              [Phenology].CAMP.FLNparams.VrnLN = 0
              [Phenology].CAMP.FLNparams.VxPLN = 0.0
          Cultivar Longsword
            Command:
              [Phenology].Phyllochron.BasePhyllochron.FixedValue = 100.389906627796
              [Phenology].PhyllochronPpSensitivity.FixedValue = 0.205225247925933
              [Phenology].CAMP.EnvData.VrnTreatTemp = 5.8
              [Phenology].CAMP.EnvData.VrnTreatDuration = 60
              [Phenology].CAMP.FLNparams.MinLN = 8
              [Phenology].CAMP.FLNparams.PpLN = 1
              [Phenology].CAMP.FLNparams.VrnLN = 7
              [Phenology].CAMP.FLNparams.VxPLN = 1
              [Phenology].HeadEmergenceLongDayBase.FixedValue = 110
              [Phenology].HeadEmergencePpSensitivity.FixedValue = 2
          Cultivar Mace
            Command:
              [Phenology].Phyllochron.BasePhyllochron.FixedValue = 100. //106.268453805677
              [Phenology].PhyllochronPpSensitivity.FixedValue = 0.137742329295879
              [Grain].NumberFunction.GrainNumber.GrainsPerGramOfStem.FixedValue = 24
              [Phenology].CAMP.EnvData.VrnTreatTemp = 6
              [Phenology].CAMP.EnvData.VrnTreatDuration = 60
              [Phenology].CAMP.FLNparams.MinLN = 7
              [Phenology].CAMP.FLNparams.PpLN = 2
              [Phenology].CAMP.FLNparams.VrnLN = 3
              [Phenology].CAMP.FLNparams.VxPLN = -3
              [Phenology].HeadEmergenceLongDayBase.FixedValue = 70
              [Phenology].HeadEmergencePpSensitivity.FixedValue = 1
          Cultivar MacKellar
            Command:
              [Phenology].HeadEmergenceLongDayBase.FixedValue = 114.0
              [Phenology].Phyllochron.BasePhyllochron.FixedValue = 100
              [Phenology].CAMP.FLNparams.MinLN = 8.664527440257086
              [Phenology].CAMP.FLNparams.PpLN = 1.0215422635640583
              [Phenology].CAMP.FLNparams.VrnLN = 10.022473345513335
              [Phenology].CAMP.FLNparams.VxPLN = -2.1045318640627455
              [Phenology].HeadEmergencePpSensitivity.FixedValue = 3.533066035654082
              [Phenology].CAMP.EnvData.VrnTreatTemp = 6
              [Phenology].CAMP.EnvData.VrnTreatDuration = 60
          Cultivar Magenta
            Command:
              [Phenology].Phyllochron.BasePhyllochron.FixedValue = 113.040956826707
              [Phenology].PhyllochronPpSensitivity.FixedValue = 0.138444741551648
              [Phenology].CAMP.EnvData.VrnTreatTemp = 5.8
              [Phenology].CAMP.EnvData.VrnTreatDuration = 60
              [Phenology].CAMP.FLNparams.MinLN = 7
              [Phenology].CAMP.FLNparams.PpLN = 3
              [Phenology].CAMP.FLNparams.VrnLN = 2
              [Phenology].CAMP.FLNparams.VxPLN = 1
              [Phenology].HeadEmergenceLongDayBase.FixedValue = 130
              [Phenology].HeadEmergencePpSensitivity.FixedValue = 0
          Cultivar Manning
            Command:
              [Phenology].Phyllochron.BasePhyllochron.FixedValue = 104.816433323058
              [Phenology].PhyllochronPpSensitivity.FixedValue = 0.253254338348875
              [Phenology].CAMP.EnvData.VrnTreatTemp = 6
              [Phenology].CAMP.EnvData.VrnTreatDuration = 60
              [Phenology].CAMP.FLNparams.MinLN = 9
              [Phenology].CAMP.FLNparams.PpLN = 6
              [Phenology].CAMP.FLNparams.VrnLN = 8
              [Phenology].CAMP.FLNparams.VxPLN = 0
              [Phenology].HeadEmergenceLongDayBase.FixedValue = 230
              [Phenology].HeadEmergencePpSensitivity.FixedValue = 0
          Cultivar Matong
            Command:
              [Phenology].Phyllochron.BasePhyllochron.FixedValue = 100
              [Grain].NumberFunction.GrainNumber.GrainsPerGramOfStem.FixedValue = 22
              [Phenology].CAMP.FLNparams.MinLN = 7
              [Phenology].CAMP.FLNparams.PpLN = 4.0
              [Phenology].CAMP.FLNparams.VrnLN = 1
              [Phenology].CAMP.FLNparams.VxPLN = 0.0
          Cultivar McCubbin
            Command:
              [Phenology].Phyllochron.BasePhyllochron.FixedValue = 90
              [Phenology].CAMP.FLNparams.MinLN = 8.0
              [Phenology].CAMP.FLNparams.PpLN = 8.0
              [Phenology].CAMP.FLNparams.VrnLN = 0.0
              [Phenology].CAMP.FLNparams.VxPLN = 3.0
              [Phenology].HeadEmergenceLongDayBase.FixedValue = 200.0
              [Phenology].HeadEmergencePpSensitivity.FixedValue = 2.0
              [Phenology].CAMP.EnvData.VrnTreatTemp = 6
              [Phenology].CAMP.EnvData.VrnTreatDuration = 60
          Cultivar Merinda
            Command:
              [Phenology].Phyllochron.BasePhyllochron.FixedValue = 98.5779272570712
              [Phenology].PhyllochronPpSensitivity.FixedValue = 0.347160824156039
              [Phenology].CAMP.EnvData.VrnTreatTemp = 5.8
              [Phenology].CAMP.EnvData.VrnTreatDuration = 60
              [Phenology].CAMP.FLNparams.MinLN = 7
              [Phenology].CAMP.FLNparams.PpLN = 1
              [Phenology].CAMP.FLNparams.VrnLN = 1
              [Phenology].CAMP.FLNparams.VxPLN = -1
              [Phenology].HeadEmergenceLongDayBase.FixedValue = 210
              [Phenology].HeadEmergencePpSensitivity.FixedValue = 1
          Cultivar Mitch
            Command:
              [Phenology].Phyllochron.BasePhyllochron.FixedValue = 90.7949886258521
              [Phenology].PhyllochronPpSensitivity.FixedValue = 0.313387918745248
              [Phenology].CAMP.EnvData.VrnTreatTemp = 5.8
              [Phenology].CAMP.EnvData.VrnTreatDuration = 60
              [Phenology].CAMP.FLNparams.MinLN = 8
              [Phenology].CAMP.FLNparams.PpLN = 2
              [Phenology].CAMP.FLNparams.VrnLN = 3
              [Phenology].CAMP.FLNparams.VxPLN = -2
              [Phenology].HeadEmergenceLongDayBase.FixedValue = 130
              [Phenology].HeadEmergencePpSensitivity.FixedValue = 1
          Cultivar Nighthawk
            Command:
              [Phenology].Phyllochron.BasePhyllochron.FixedValue = 97.5749140549815
              [Phenology].PhyllochronPpSensitivity.FixedValue = 0.234188946138953
              [Phenology].CAMP.EnvData.VrnTreatTemp = 5.8
              [Phenology].CAMP.EnvData.VrnTreatDuration = 60
              [Phenology].CAMP.FLNparams.MinLN = 8
              [Phenology].CAMP.FLNparams.VrnLN = 4
              [Phenology].CAMP.FLNparams.PpLN = 2
              [Phenology].CAMP.FLNparams.VxPLN = -1
              [Phenology].HeadEmergenceLongDayBase.FixedValue = 70
              [Phenology].HeadEmergencePpSensitivity.FixedValue = 8
          Cultivar Ouyen
            Command:
              [Phenology].Phyllochron.BasePhyllochron.FixedValue = 84.1472430387947
              [Phenology].PhyllochronPpSensitivity.FixedValue = 0.332456383177313
              [Phenology].CAMP.EnvData.VrnTreatTemp = 5.8
              [Phenology].CAMP.EnvData.VrnTreatDuration = 60
              [Phenology].CAMP.FLNparams.MinLN = 8
              [Phenology].CAMP.FLNparams.PpLN = 2
              [Phenology].CAMP.FLNparams.VrnLN = 2
              [Phenology].CAMP.FLNparams.VxPLN = -2
              [Phenology].HeadEmergenceLongDayBase.FixedValue = 190
              [Phenology].HeadEmergencePpSensitivity.FixedValue = 1
          Cultivar Peake
            Command:
              [Phenology].Phyllochron.BasePhyllochron.FixedValue = 87.7433052533018
              [Phenology].PhyllochronPpSensitivity.FixedValue = 0.44431162843274
              [Phenology].CAMP.EnvData.VrnTreatTemp = 5.8
              [Phenology].CAMP.EnvData.VrnTreatDuration = 60
              [Phenology].CAMP.FLNparams.MinLN = 7
              [Phenology].CAMP.FLNparams.PpLN = 2
              [Phenology].CAMP.FLNparams.VrnLN = 0
              [Phenology].CAMP.FLNparams.VxPLN = 0
              [Phenology].HeadEmergenceLongDayBase.FixedValue = 190
              [Phenology].HeadEmergencePpSensitivity.FixedValue = 1
          Cultivar Revenue
            Command:
              [Phenology].Phyllochron.BasePhyllochron.FixedValue = 113.782112306367
              [Phenology].PhyllochronPpSensitivity.FixedValue = 0.155926785053575
              [Phenology].CAMP.EnvData.VrnTreatTemp = 5.8
              [Phenology].CAMP.EnvData.VrnTreatDuration = 60
              [Phenology].CAMP.FLNparams.MinLN = 8
              [Phenology].CAMP.FLNparams.PpLN = 2
              [Phenology].CAMP.FLNparams.VrnLN = 7
              [Phenology].CAMP.FLNparams.VxPLN = 2
              [Phenology].HeadEmergenceLongDayBase.FixedValue = 150
              [Phenology].HeadEmergencePpSensitivity.FixedValue = 4
          Cultivar Rosella
            Command:
              [Phenology].Phyllochron.BasePhyllochron.FixedValue = 96.7111881914136
              [Phenology].PhyllochronPpSensitivity.FixedValue = 0.209478791477046
              [Phenology].CAMP.EnvData.VrnTreatTemp = 5.8
              [Phenology].CAMP.EnvData.VrnTreatDuration = 60
              [Phenology].CAMP.FLNparams.MinLN = 7
              [Phenology].CAMP.FLNparams.PpLN = 5
              [Phenology].CAMP.FLNparams.VrnLN = 8
              [Phenology].CAMP.FLNparams.VxPLN = 5
              [Phenology].HeadEmergenceLongDayBase.FixedValue = 90
              [Phenology].HeadEmergencePpSensitivity.FixedValue = 5
          Cultivar Ruby
            Command:
              [Phenology].Phyllochron.BasePhyllochron.FixedValue = 100
              [Phenology].CAMP.FLNparams.MinLN = 8
              [Phenology].CAMP.FLNparams.PpLN = 4.0
              [Phenology].CAMP.FLNparams.VrnLN = 0
              [Phenology].CAMP.FLNparams.VxPLN = 0.0
          Cultivar Scepter
            Command:
              [Phenology].Phyllochron.BasePhyllochron.FixedValue = 107.602580952482
              [Phenology].PhyllochronPpSensitivity.FixedValue = 0.23032920462638
              [Phenology].CAMP.EnvData.VrnTreatTemp = 6
              [Phenology].CAMP.EnvData.VrnTreatDuration = 60
              [Phenology].CAMP.FLNparams.MinLN = 7
              [Phenology].CAMP.FLNparams.PpLN = 2
              [Phenology].CAMP.FLNparams.VrnLN = 2
              [Phenology].CAMP.FLNparams.VxPLN = -1
              [Phenology].HeadEmergenceLongDayBase.FixedValue = 170
              [Phenology].HeadEmergencePpSensitivity.FixedValue = 0
          Cultivar Scout
            Command:
              [Phenology].Phyllochron.BasePhyllochron.FixedValue = 102.794916048683
              [Phenology].PhyllochronPpSensitivity.FixedValue = 0.192036818570067
              [Phenology].CAMP.EnvData.VrnTreatTemp = 6
              [Phenology].CAMP.EnvData.VrnTreatDuration = 60
              [Phenology].CAMP.FLNparams.MinLN = 7
              [Phenology].CAMP.FLNparams.PpLN = 2
              [Phenology].CAMP.FLNparams.VrnLN = 4
              [Phenology].CAMP.FLNparams.VxPLN = -2
              [Phenology].HeadEmergenceLongDayBase.FixedValue = 170
              [Phenology].HeadEmergencePpSensitivity.FixedValue = 0
          Cultivar Scythe
            Command:
              [Phenology].Phyllochron.BasePhyllochron.FixedValue = 106.486507449716
              [Phenology].PhyllochronPpSensitivity.FixedValue = 0.22806739407445
              [Phenology].CAMP.EnvData.VrnTreatTemp = 5.8
              [Phenology].CAMP.EnvData.VrnTreatDuration = 60
              [Phenology].CAMP.FLNparams.MinLN = 6
              [Phenology].CAMP.FLNparams.PpLN = 4
              [Phenology].CAMP.FLNparams.VrnLN = 2
              [Phenology].CAMP.FLNparams.VxPLN = 2
              [Phenology].HeadEmergenceLongDayBase.FixedValue = 90
              [Phenology].HeadEmergencePpSensitivity.FixedValue = 4
          Cultivar Spear
            Command:
              [Phenology].Phyllochron.BasePhyllochron.FixedValue = 102.794916048683
              [Phenology].PhyllochronPpSensitivity.FixedValue = 0.192036818570067
              [Grain].NumberFunction.GrainNumber.GrainsPerGramOfStem.FixedValue = 22
              [Phenology].CAMP.EnvData.VrnTreatTemp = 6
              [Phenology].CAMP.EnvData.VrnTreatDuration = 60
              [Phenology].CAMP.FLNparams.MinLN = 7
              [Phenology].CAMP.FLNparams.PpLN = 2
              [Phenology].CAMP.FLNparams.VrnLN = 4
              [Phenology].CAMP.FLNparams.VxPLN = -2
              [Phenology].HeadEmergenceLongDayBase.FixedValue = 170
              [Phenology].HeadEmergencePpSensitivity.FixedValue = 0
          Cultivar Spitfire
            Command:
              [Phenology].Phyllochron.BasePhyllochron.FixedValue = 87.8426291924597
              [Phenology].PhyllochronPpSensitivity.FixedValue = 0.226170449889058
              [Phenology].CAMP.EnvData.VrnTreatTemp = 5.8
              [Phenology].CAMP.EnvData.VrnTreatDuration = 60
              [Phenology].CAMP.FLNparams.MinLN = 8
              [Phenology].CAMP.FLNparams.PpLN = 1
              [Phenology].CAMP.FLNparams.VrnLN = 3
              [Phenology].CAMP.FLNparams.VxPLN = -3
              [Phenology].HeadEmergenceLongDayBase.FixedValue = 130
              [Phenology].HeadEmergencePpSensitivity.FixedValue = 1
            Alias Drysdale
          Cultivar Strzelecki
            Command:
              [Phenology].Phyllochron.BasePhyllochron.FixedValue = 96.5633530493006
              [Phenology].PhyllochronPpSensitivity.FixedValue = 0.245575047413057
              [Phenology].CAMP.EnvData.VrnTreatTemp = 5.8
              [Phenology].CAMP.EnvData.VrnTreatDuration = 60
              [Phenology].CAMP.FLNparams.MinLN = 7
              [Phenology].CAMP.FLNparams.PpLN = 3
              [Phenology].CAMP.FLNparams.VrnLN = 3
              [Phenology].CAMP.FLNparams.VxPLN = 0
              [Phenology].HeadEmergenceLongDayBase.FixedValue = 110
              [Phenology].HeadEmergencePpSensitivity.FixedValue = 3
          Cultivar Sunbri
            Command:
              [Phenology].Phyllochron.BasePhyllochron.FixedValue = 91.5032903672171
              [Phenology].PhyllochronPpSensitivity.FixedValue = 0.207593313150283
              [Phenology].CAMP.EnvData.VrnTreatTemp = 5.8
              [Phenology].CAMP.EnvData.VrnTreatDuration = 60
              [Phenology].CAMP.FLNparams.MinLN = 8
              [Phenology].CAMP.FLNparams.PpLN = 4
              [Phenology].CAMP.FLNparams.VrnLN = 2
              [Phenology].CAMP.FLNparams.VxPLN = -1
              [Phenology].HeadEmergenceLongDayBase.FixedValue = 170
              [Phenology].HeadEmergencePpSensitivity.FixedValue = 2
          Cultivar Sunbee
            Command:
              [Phenology].Phyllochron.BasePhyllochron.FixedValue = 97.2940011008473
              [Phenology].PhyllochronPpSensitivity.FixedValue = 0.185142054210791
              [Phenology].CAMP.EnvData.VrnTreatTemp = 5.8
              [Phenology].CAMP.EnvData.VrnTreatDuration = 60
              [Phenology].CAMP.FLNparams.MinLN = 7
              [Phenology].CAMP.FLNparams.PpLN = 1
              [Phenology].CAMP.FLNparams.VrnLN = 3
              [Phenology].CAMP.FLNparams.VxPLN = -3
              [Phenology].HeadEmergenceLongDayBase.FixedValue = 370
              [Phenology].HeadEmergencePpSensitivity.FixedValue = 0
          Cultivar Sunco
            Command:
              [Phenology].HeadEmergencePpSensitivity.FixedValue = 1
              [Phenology].Phyllochron.BasePhyllochron.FixedValue = 100
              [Phenology].CAMP.FLNparams.MinLN = 6
              [Phenology].CAMP.FLNparams.PpLN = 11
              [Phenology].CAMP.FLNparams.VrnLN = 10
              [Phenology].CAMP.FLNparams.VxPLN = -9
              [Phenology].HeadEmergenceLongDayBase.FixedValue = 170
          Cultivar Sunlamb
            Command:
              [Phenology].Phyllochron.BasePhyllochron.FixedValue = 100.382265746297
              [Phenology].PhyllochronPpSensitivity.FixedValue = 0.154235967458266
              [Phenology].CAMP.EnvData.VrnTreatTemp = 5.8
              [Phenology].CAMP.EnvData.VrnTreatDuration = 60
              [Phenology].CAMP.FLNparams.MinLN = 7
              [Phenology].CAMP.FLNparams.PpLN = 5
              [Phenology].CAMP.FLNparams.VrnLN = 10
              [Phenology].CAMP.FLNparams.VxPLN = -5
              [Phenology].HeadEmergenceLongDayBase.FixedValue = 150
              [Phenology].HeadEmergencePpSensitivity.FixedValue = 4
          Cultivar Suneca
            Command:
              [Phenology].CAMP.FLNparams.MinLN = 5
              [Phenology].CAMP.FLNparams.PpLN = 6
              [Phenology].CAMP.FLNparams.VrnLN = 3
              [Phenology].CAMP.FLNparams.VxPLN = 3
              [Phenology].HeadEmergenceLongDayBase.FixedValue = 190
              [Phenology].HeadEmergencePpSensitivity.FixedValue = 2
          Cultivar Sunstate
            Command:
              [Phenology].Phyllochron.BasePhyllochron.FixedValue = 95.0758950229683
              [Phenology].PhyllochronPpSensitivity.FixedValue = 0.225986092694718
              [Phenology].CAMP.EnvData.VrnTreatTemp = 6
              [Phenology].CAMP.EnvData.VrnTreatDuration = 60
              [Phenology].CAMP.FLNparams.MinLN = 7
              [Phenology].CAMP.FLNparams.PpLN = 1
              [Phenology].CAMP.FLNparams.VrnLN = 4
              [Phenology].CAMP.FLNparams.VxPLN = -4
              [Phenology].HeadEmergenceLongDayBase.FixedValue = 190
              [Phenology].HeadEmergencePpSensitivity.FixedValue = 1
          Cultivar Suntop
            Command:
              [Phenology].Phyllochron.BasePhyllochron.FixedValue = 93.1036394598307
              [Phenology].PhyllochronPpSensitivity.FixedValue = 0.335203758711104
              [Phenology].CAMP.EnvData.VrnTreatTemp = 5.8
              [Phenology].CAMP.EnvData.VrnTreatDuration = 60
              [Phenology].CAMP.FLNparams.MinLN = 8
              [Phenology].CAMP.FLNparams.PpLN = 2
              [Phenology].CAMP.FLNparams.VrnLN = 0
              [Phenology].CAMP.FLNparams.VxPLN = 0
              [Phenology].HeadEmergenceLongDayBase.FixedValue = 210
              [Phenology].HeadEmergencePpSensitivity.FixedValue = 0
          Cultivar Trojan
            Command:
              [Phenology].Phyllochron.BasePhyllochron.FixedValue = 99.1351271229079
              [Phenology].PhyllochronPpSensitivity.FixedValue = 0.35511766231399
              [Phenology].CAMP.EnvData.VrnTreatTemp = 6
              [Phenology].CAMP.EnvData.VrnTreatDuration = 60
              [Phenology].CAMP.FLNparams.MinLN = 7
              [Phenology].CAMP.FLNparams.PpLN = 5
              [Phenology].CAMP.FLNparams.VrnLN = 2
              [Phenology].CAMP.FLNparams.VxPLN = 1
              [Phenology].HeadEmergenceLongDayBase.FixedValue = 50
              [Phenology].HeadEmergencePpSensitivity.FixedValue = 4
          Cultivar Ventura
            Command:
              [Phenology].Phyllochron.BasePhyllochron.FixedValue = 100
              [Phenology].CAMP.FLNparams.MinLN = 8
              [Phenology].CAMP.FLNparams.PpLN = 4.0
              [Phenology].CAMP.FLNparams.VrnLN = 0
              [Phenology].CAMP.FLNparams.VxPLN = 0.0
          Cultivar Wedgetail
            Command:
              [Phenology].Phyllochron.BasePhyllochron.FixedValue = 111.579556421375
              [Phenology].PhyllochronPpSensitivity.FixedValue = 0.217687425020179
              [Phenology].CAMP.EnvData.VrnTreatTemp = 5.8
              [Phenology].CAMP.EnvData.VrnTreatDuration = 60
              [Phenology].CAMP.FLNparams.MinLN = 7
              [Phenology].CAMP.FLNparams.PpLN = 1
              [Phenology].CAMP.FLNparams.VrnLN = 9
              [Phenology].CAMP.FLNparams.VxPLN = -1
              [Phenology].HeadEmergenceLongDayBase.FixedValue = 170
              [Phenology].HeadEmergencePpSensitivity.FixedValue = 2
          Cultivar Whistler
            Command:
              [Phenology].Phyllochron.BasePhyllochron.FixedValue = 101.152462224521
              [Phenology].PhyllochronPpSensitivity.FixedValue = 0.160519169483945
              [Phenology].CAMP.FLNparams.MinLN = 8
              [Phenology].CAMP.FLNparams.PpLN = 2
              [Phenology].CAMP.FLNparams.VrnLN = 8
              [Phenology].CAMP.FLNparams.VxPLN = -2
              [Phenology].CAMP.EnvData.VrnTreatTemp = 5.8
              [Phenology].CAMP.EnvData.VrnTreatDuration = 60
              [Phenology].HeadEmergenceLongDayBase.FixedValue = 150
              [Phenology].HeadEmergencePpSensitivity.FixedValue = 1
          Cultivar Wilgoyne
            Command:
              [Phenology].Phyllochron.BasePhyllochron.FixedValue = 100
              [Phenology].PhyllochronPpSensitivity.FixedValue = 0.349562436956343
              [Grain].NumberFunction.GrainNumber.GrainsPerGramOfStem.FixedValue = 17
              [Phenology].CAMP.FLNparams.MinLN = 8
              [Phenology].CAMP.FLNparams.PpLN = 3
              [Phenology].CAMP.FLNparams.VrnLN = 0.5
              [Phenology].CAMP.FLNparams.VxPLN = 0
              [Phenology].CAMP.EnvData.VrnTreatTemp = 6
              [Phenology].CAMP.EnvData.VrnTreatDuration = 60
              [Phenology].HeadEmergenceLongDayBase.FixedValue = 50
              [Phenology].HeadEmergencePpSensitivity.FixedValue = 4
          Cultivar Wills
            Command:
              [Phenology].Phyllochron.BasePhyllochron.FixedValue = 94.9906866085437
              [Phenology].PhyllochronPpSensitivity.FixedValue = 0.264808096779551
              [Phenology].CAMP.EnvData.VrnTreatTemp = 5.8
              [Phenology].CAMP.EnvData.VrnTreatDuration = 60
              [Phenology].CAMP.FLNparams.MinLN = 8
              [Phenology].CAMP.FLNparams.PpLN = 2
              [Phenology].CAMP.FLNparams.VrnLN = 4
              [Phenology].CAMP.FLNparams.VxPLN = -3
              [Phenology].HeadEmergenceLongDayBase.FixedValue = 110
              [Phenology].HeadEmergencePpSensitivity.FixedValue = 1
          Cultivar Wyalkatchem
            Command:
              [Phenology].Phyllochron.BasePhyllochron.FixedValue = 101.991162889267
              [Phenology].PhyllochronPpSensitivity.FixedValue = 0.203541157884576
              [Phenology].CAMP.EnvData.VrnTreatTemp = 5.8
              [Phenology].CAMP.EnvData.VrnTreatDuration = 60
              [Phenology].CAMP.FLNparams.MinLN = 7
              [Phenology].CAMP.FLNparams.PpLN = 2
              [Phenology].CAMP.FLNparams.VrnLN = 3
              [Phenology].CAMP.FLNparams.VxPLN = -3
              [Phenology].HeadEmergenceLongDayBase.FixedValue = 90
              [Phenology].HeadEmergencePpSensitivity.FixedValue = 3
          Cultivar Yitpi
            Command:
              [Phenology].Phyllochron.BasePhyllochron.FixedValue = 107.48018743345
              [Phenology].PhyllochronPpSensitivity.FixedValue = 0.247088996399892
              [Phenology].CAMP.EnvData.VrnTreatTemp = 5.8
              [Phenology].CAMP.EnvData.VrnTreatDuration = 60
              [Phenology].CAMP.FLNparams.MinLN = 7
              [Phenology].CAMP.FLNparams.PpLN = 4
              [Phenology].CAMP.FLNparams.VrnLN = 2
              [Phenology].CAMP.FLNparams.VxPLN = 0
              [Phenology].HeadEmergenceLongDayBase.FixedValue = 50
              [Phenology].HeadEmergencePpSensitivity.FixedValue = 5
          Cultivar Young
            Command:
              [Phenology].Phyllochron.BasePhyllochron.FixedValue = 86.0661362380018
              [Phenology].PhyllochronPpSensitivity.FixedValue = 0.347762945437436
              [Phenology].CAMP.EnvData.VrnTreatTemp = 5.8
              [Phenology].CAMP.EnvData.VrnTreatDuration = 60
              [Phenology].CAMP.FLNparams.MinLN = 8
              [Phenology].CAMP.FLNparams.PpLN = 1
              [Phenology].CAMP.FLNparams.VrnLN = 1
              [Phenology].CAMP.FLNparams.VxPLN = -1
              [Phenology].HeadEmergenceLongDayBase.FixedValue = 150
              [Phenology].HeadEmergencePpSensitivity.FixedValue = 1
        Folder NILs
          Cultivar CSIROW002
            Command:
              [Phenology].Phyllochron.BasePhyllochron.FixedValue = 97.1048561789481
              [Phenology].PhyllochronPpSensitivity.FixedValue = 0.330486171103675
              [Phenology].CAMP.FLNparams.MinLN = 6.658457459336699
              [Phenology].CAMP.FLNparams.PpLN = 1.9822634447408163
              [Phenology].CAMP.FLNparams.VrnLN = 2.6921517428015016
              [Phenology].CAMP.FLNparams.VxPLN = 0.012348660067480921
              [Phenology].CAMP.EnvData.VrnTreatTemp = 5.8
              [Phenology].CAMP.EnvData.VrnTreatDuration = 60
              [Phenology].HeadEmergenceLongDayBase.FixedValue = 169.0
              [Phenology].HeadEmergencePpSensitivity.FixedValue = 1.3207357239932465
          Cultivar CSIROW003
            Command:
              [Phenology].Phyllochron.BasePhyllochron.FixedValue = 97.9080402900587
              [Phenology].PhyllochronPpSensitivity.FixedValue = 0.219427317086708
              [Phenology].CAMP.FLNparams.MinLN = 5.793366821378284
              [Phenology].CAMP.FLNparams.PpLN = 0.0
              [Phenology].CAMP.FLNparams.VrnLN = 4.787965491738554
              [Phenology].CAMP.FLNparams.VxPLN = -2.8680601480674017
              [Phenology].CAMP.EnvData.VrnTreatTemp = 5.8
              [Phenology].CAMP.EnvData.VrnTreatDuration = 60
              [Phenology].HeadEmergenceLongDayBase.FixedValue = 145.0
              [Phenology].HeadEmergencePpSensitivity.FixedValue = 2.658836674667949
          Cultivar CSIROW005
            Command:
              [Phenology].Phyllochron.BasePhyllochron.FixedValue = 100.324132823901
              [Phenology].PhyllochronPpSensitivity.FixedValue = 0.16547784419225
              [Phenology].CAMP.FLNparams.MinLN = 5.759207332491177
              [Phenology].CAMP.FLNparams.PpLN = 2.4191796388445765
              [Phenology].CAMP.FLNparams.VrnLN = 3.0756722363145896
              [Phenology].CAMP.FLNparams.VxPLN = -0.2627994305564112
              [Phenology].CAMP.EnvData.VrnTreatTemp = 5.8
              [Phenology].CAMP.EnvData.VrnTreatDuration = 60
              [Phenology].HeadEmergenceLongDayBase.FixedValue = 369.0
              [Phenology].HeadEmergencePpSensitivity.FixedValue = 0.0
          Cultivar CSIROW007
            Command:
              [Phenology].Phyllochron.BasePhyllochron.FixedValue = 102.785879373288
              [Phenology].PhyllochronPpSensitivity.FixedValue = 0.18434106648197
              [Phenology].CAMP.FLNparams.MinLN = 7.326398633965955
              [Phenology].CAMP.FLNparams.PpLN = 0.0
              [Phenology].CAMP.FLNparams.VrnLN = 7.554300061869201
              [Phenology].CAMP.FLNparams.VxPLN = -1.6841419188674127
              [Phenology].CAMP.EnvData.VrnTreatTemp = 5.8
              [Phenology].CAMP.EnvData.VrnTreatDuration = 60
              [Phenology].HeadEmergenceLongDayBase.FixedValue = 193.0
              [Phenology].HeadEmergencePpSensitivity.FixedValue = 1.4807227520020911
          Cultivar CSIROW011
            Command:
              [Phenology].Phyllochron.BasePhyllochron.FixedValue = 90.109466190558
              [Phenology].PhyllochronPpSensitivity.FixedValue = 0.349636600984782
              [Phenology].CAMP.FLNparams.MinLN = 6.0
              [Phenology].CAMP.FLNparams.PpLN = 1.0
              [Phenology].CAMP.FLNparams.VrnLN = 1.0
              [Phenology].CAMP.FLNparams.VxPLN = -1.0
              [Phenology].CAMP.EnvData.VrnTreatTemp = 5.8
              [Phenology].CAMP.EnvData.VrnTreatDuration = 60
              [Phenology].HeadEmergenceLongDayBase.FixedValue = 200.0
              [Phenology].HeadEmergencePpSensitivity.FixedValue = 2.0
          Cultivar CSIROW018
            Command:
              [Phenology].Phyllochron.BasePhyllochron.FixedValue = 100.218976921681
              [Phenology].PhyllochronPpSensitivity.FixedValue = 0.305627551956816
              [Phenology].CAMP.FLNparams.MinLN = 5.0
              [Phenology].CAMP.FLNparams.PpLN = 2.0037887506286465
              [Phenology].CAMP.FLNparams.VrnLN = 3.5823533971961172
              [Phenology].CAMP.FLNparams.VxPLN = -2.0415045806529806
              [Phenology].CAMP.EnvData.VrnTreatTemp = 5.8
              [Phenology].CAMP.EnvData.VrnTreatDuration = 60
              [Phenology].HeadEmergenceLongDayBase.FixedValue = 371.0
              [Phenology].HeadEmergencePpSensitivity.FixedValue = 0.94606616045257
          Cultivar CSIROW021
            Command:
              [Phenology].Phyllochron.BasePhyllochron.FixedValue = 100.85898282236
              [Phenology].PhyllochronPpSensitivity.FixedValue = 0.228645304743823
              [Phenology].CAMP.FLNparams.MinLN = 8.0
              [Phenology].CAMP.FLNparams.PpLN = 1.333333333333334
              [Phenology].CAMP.FLNparams.VrnLN = 6.166666666666666
              [Phenology].CAMP.FLNparams.VxPLN = -0.8333333333333357
              [Phenology].CAMP.EnvData.VrnTreatTemp = 5.8
              [Phenology].CAMP.EnvData.VrnTreatDuration = 60
              [Phenology].HeadEmergenceLongDayBase.FixedValue = 200.0
              [Phenology].HeadEmergencePpSensitivity.FixedValue = 2.0
          Cultivar CSIROW023
            Command:
              [Phenology].Phyllochron.BasePhyllochron.FixedValue = 102.809488116017
              [Phenology].PhyllochronPpSensitivity.FixedValue = 0.218898108718466
              [Phenology].CAMP.FLNparams.MinLN = 7.493027691870457
              [Phenology].CAMP.FLNparams.PpLN = 2.584156511279189
              [Phenology].CAMP.FLNparams.VrnLN = 2.37442378811967
              [Phenology].CAMP.FLNparams.VxPLN = 0.28214981195795374
              [Phenology].CAMP.EnvData.VrnTreatTemp = 5.8
              [Phenology].CAMP.EnvData.VrnTreatDuration = 60
              [Phenology].HeadEmergenceLongDayBase.FixedValue = 219.0
              [Phenology].HeadEmergencePpSensitivity.FixedValue = 0.0
          Cultivar CSIROW027
            Command:
              [Phenology].Phyllochron.BasePhyllochron.FixedValue = 91.9686702262851
              [Phenology].PhyllochronPpSensitivity.FixedValue = 0.298865609355012
              [Phenology].CAMP.FLNparams.MinLN = 5.666666666666667
              [Phenology].CAMP.FLNparams.PpLN = 1.0
              [Phenology].CAMP.FLNparams.VrnLN = 1.0
              [Phenology].CAMP.FLNparams.VxPLN = -0.666666666666667
              [Phenology].CAMP.EnvData.VrnTreatTemp = 5.8
              [Phenology].CAMP.EnvData.VrnTreatDuration = 60
              [Phenology].HeadEmergenceLongDayBase.FixedValue = 200.0
              [Phenology].HeadEmergencePpSensitivity.FixedValue = 2.0
          Cultivar CSIROW029
            Command:
              [Phenology].Phyllochron.BasePhyllochron.FixedValue = 98.5813007346922
              [Phenology].PhyllochronPpSensitivity.FixedValue = 0.228833970802351
              [Phenology].CAMP.FLNparams.MinLN = 5.666666666666667
              [Phenology].CAMP.FLNparams.PpLN = 0.33333333333333304
              [Phenology].CAMP.FLNparams.VrnLN = 1.0
              [Phenology].CAMP.FLNparams.VxPLN = -0.666666666666667
              [Phenology].CAMP.EnvData.VrnTreatTemp = 5.8
              [Phenology].CAMP.EnvData.VrnTreatDuration = 60
              [Phenology].HeadEmergenceLongDayBase.FixedValue = 200.0
              [Phenology].HeadEmergencePpSensitivity.FixedValue = 2.0
          Cultivar CSIROW073
            Command:
              [Phenology].Phyllochron.BasePhyllochron.FixedValue = 95.6693440169749
              [Phenology].PhyllochronPpSensitivity.FixedValue = 0.226791235396558
              [Phenology].CAMP.FLNparams.MinLN = 8.790112770072708
              [Phenology].CAMP.FLNparams.PpLN = 0.7295023618186995
              [Phenology].CAMP.FLNparams.VrnLN = 4.373125182546708
              [Phenology].CAMP.FLNparams.VxPLN = 9.99670899443495
              [Phenology].CAMP.EnvData.VrnTreatTemp = 5.8
              [Phenology].CAMP.EnvData.VrnTreatDuration = 60
              [Phenology].HeadEmergenceLongDayBase.FixedValue = 50.0
              [Phenology].HeadEmergencePpSensitivity.FixedValue = 3.5452031099169528
          Cultivar CSIROW077
            Command:
              [Phenology].Phyllochron.BasePhyllochron.FixedValue = 89.0413135981221
              [Phenology].PhyllochronPpSensitivity.FixedValue = 0.320389882541901
              [Phenology].CAMP.FLNparams.MinLN = 5.0
              [Phenology].CAMP.FLNparams.PpLN = 0.7789007198658495
              [Phenology].CAMP.FLNparams.VrnLN = 0.9296483932829428
              [Phenology].CAMP.FLNparams.VxPLN = -0.4548378579547272
              [Phenology].CAMP.EnvData.VrnTreatTemp = 5.8
              [Phenology].CAMP.EnvData.VrnTreatDuration = 60
              [Phenology].HeadEmergenceLongDayBase.FixedValue = 201.0
              [Phenology].HeadEmergencePpSensitivity.FixedValue = 1.988848467332372
          Cultivar CSIROW087
            Command:
              [Phenology].Phyllochron.BasePhyllochron.FixedValue = 95.8407854192227
              [Phenology].PhyllochronPpSensitivity.FixedValue = 0.379363409943707
              [Phenology].CAMP.FLNparams.MinLN = 6.088762673975456
              [Phenology].CAMP.FLNparams.PpLN = 1.3098995454756082
              [Phenology].CAMP.FLNparams.VrnLN = 1.7408533665776218
              [Phenology].CAMP.FLNparams.VxPLN = -1.377321640166457
              [Phenology].CAMP.EnvData.VrnTreatTemp = 5.8
              [Phenology].CAMP.EnvData.VrnTreatDuration = 60
              [Phenology].HeadEmergenceLongDayBase.FixedValue = 214.0
              [Phenology].HeadEmergencePpSensitivity.FixedValue = 2.2429157431718143
          Cultivar CSIROW102
            Command:
              [Phenology].Phyllochron.BasePhyllochron.FixedValue = 88.798911538629
              [Phenology].PhyllochronPpSensitivity.FixedValue = 0.366324783260731
              [Phenology].CAMP.FLNparams.MinLN = 5.431828108909145
              [Phenology].CAMP.FLNparams.PpLN = 0.9159899681289015
              [Phenology].CAMP.FLNparams.VrnLN = 3.8766835434634936
              [Phenology].CAMP.FLNparams.VxPLN = -2.3613865675565133
              [Phenology].CAMP.EnvData.VrnTreatTemp = 5.8
              [Phenology].CAMP.EnvData.VrnTreatDuration = 60
              [Phenology].HeadEmergenceLongDayBase.FixedValue = 211.0
              [Phenology].HeadEmergencePpSensitivity.FixedValue = 1.796407285473646
          Cultivar CSIROW105
            Command:
              [Phenology].Phyllochron.BasePhyllochron.FixedValue = 93.3581645003809
              [Phenology].PhyllochronPpSensitivity.FixedValue = 0.233916879031932
              [Phenology].CAMP.FLNparams.MinLN = 5.0
              [Phenology].CAMP.FLNparams.PpLN = 1.0
              [Phenology].CAMP.FLNparams.VrnLN = 1.0
              [Phenology].CAMP.FLNparams.VxPLN = 0.0
              [Phenology].CAMP.EnvData.VrnTreatTemp = 5.8
              [Phenology].CAMP.EnvData.VrnTreatDuration = 60
              [Phenology].HeadEmergenceLongDayBase.FixedValue = 200.0
              [Phenology].HeadEmergencePpSensitivity.FixedValue = 2.0
        Folder APP Generic
          Cultivar Spring Very Quick-Quick
            Command:
              [Phenology].CAMP.FLNparams.MinLN = 5
              [Phenology].CAMP.FLNparams.PpLN = 0.8
              [Phenology].CAMP.FLNparams.VrnLN = 0.9
              [Phenology].CAMP.FLNparams.VxPLN = -0.5
              [Phenology].Phyllochron.BasePhyllochron.FixedValue = 89
              [Phenology].PhyllochronPpSensitivity.FixedValue = 0.3
              [Phenology].CAMP.EnvData.VrnTreatTemp = 5.8
              [Phenology].CAMP.EnvData.VrnTreatDuration = 60
              [Phenology].HeadEmergenceLongDayBase.FixedValue = 201
              [Phenology].HeadEmergencePpSensitivity.FixedValue = 2
          Cultivar Spring Quick
            Command:
              [Phenology].CAMP.FLNparams.MinLN = 6.6
              [Phenology].CAMP.FLNparams.PpLN = 1.9
              [Phenology].CAMP.FLNparams.VrnLN = 1.1
              [Phenology].CAMP.FLNparams.VxPLN = -0.6
              [Phenology].Phyllochron.BasePhyllochron.FixedValue = 91.8
              [Phenology].PhyllochronPpSensitivity.FixedValue = 0.3
              [Phenology].CAMP.EnvData.VrnTreatTemp = 5.8
              [Phenology].CAMP.EnvData.VrnTreatDuration = 60
              [Phenology].HeadEmergenceLongDayBase.FixedValue = 175.6
              [Phenology].HeadEmergencePpSensitivity.FixedValue = 1.4
          Cultivar Spring Quick-Mid
            Command:
              [Phenology].CAMP.FLNparams.MinLN = 6.9
              [Phenology].CAMP.FLNparams.PpLN = 1.9
              [Phenology].CAMP.FLNparams.VrnLN = 2.5
              [Phenology].CAMP.FLNparams.VxPLN = -1.6
              [Phenology].Phyllochron.BasePhyllochron.FixedValue = 98.6
              [Phenology].PhyllochronPpSensitivity.FixedValue = 0.2
              [Phenology].CAMP.EnvData.VrnTreatTemp = 5.8
              [Phenology].CAMP.EnvData.VrnTreatDuration = 60
              [Phenology].HeadEmergenceLongDayBase.FixedValue = 175.8
              [Phenology].HeadEmergencePpSensitivity.FixedValue = 1.2
          Cultivar Spring Mid
            Command:
              [Phenology].CAMP.FLNparams.MinLN = 7.1
              [Phenology].CAMP.FLNparams.PpLN = 3.1
              [Phenology].CAMP.FLNparams.VrnLN = 2.4
              [Phenology].CAMP.FLNparams.VxPLN = -0.9
              [Phenology].Phyllochron.BasePhyllochron.FixedValue = 96.3
              [Phenology].PhyllochronPpSensitivity.FixedValue = 0.3
              [Phenology].CAMP.EnvData.VrnTreatTemp = 5.8
              [Phenology].CAMP.EnvData.VrnTreatDuration = 60
              [Phenology].HeadEmergenceLongDayBase.FixedValue = 154
              [Phenology].HeadEmergencePpSensitivity.FixedValue = 2
          Cultivar Spring Mid-Slow
            Command:
              [Phenology].CAMP.FLNparams.MinLN = 6.8
              [Phenology].CAMP.FLNparams.PpLN = 3.2
              [Phenology].CAMP.FLNparams.VrnLN = 2.1
              [Phenology].CAMP.FLNparams.VxPLN = 0.8
              [Phenology].Phyllochron.BasePhyllochron.FixedValue = 103.3
              [Phenology].PhyllochronPpSensitivity.FixedValue = 0.2
              [Phenology].CAMP.EnvData.VrnTreatTemp = 5.8
              [Phenology].CAMP.EnvData.VrnTreatDuration = 60
              [Phenology].HeadEmergenceLongDayBase.FixedValue = 153
              [Phenology].HeadEmergencePpSensitivity.FixedValue = 2.3
          Cultivar Spring Slow
            Command:
              [Phenology].CAMP.FLNparams.MinLN = 7.3
              [Phenology].CAMP.FLNparams.PpLN = 4
              [Phenology].CAMP.FLNparams.VrnLN = 2.3
              [Phenology].CAMP.FLNparams.VxPLN = 0.8
              [Phenology].Phyllochron.BasePhyllochron.FixedValue = 95.5
              [Phenology].PhyllochronPpSensitivity.FixedValue = 0.3
              [Phenology].CAMP.EnvData.VrnTreatTemp = 5.9
              [Phenology].CAMP.EnvData.VrnTreatDuration = 60
              [Phenology].HeadEmergenceLongDayBase.FixedValue = 230
              [Phenology].HeadEmergencePpSensitivity.FixedValue = 1.5
          Cultivar Spring Slow-Very Slow
            Command:
              [Phenology].CAMP.FLNparams.MinLN =6
              [Phenology].CAMP.FLNparams.PpLN = 3
              [Phenology].CAMP.FLNparams.VrnLN = 1
              [Phenology].CAMP.FLNparams.VxPLN = 3
              [Phenology].Phyllochron.BasePhyllochron.FixedValue = 122.8
              [Phenology].PhyllochronPpSensitivity.FixedValue = 0.1
              [Phenology].CAMP.EnvData.VrnTreatTemp = 5.8
              [Phenology].CAMP.EnvData.VrnTreatDuration = 60
              [Phenology].HeadEmergenceLongDayBase.FixedValue = 190
              [Phenology].HeadEmergencePpSensitivity.FixedValue = 4
          Cultivar Spring Very Slow
            Command:
              [Phenology].CAMP.FLNparams.MinLN = 7
              [Phenology].CAMP.FLNparams.PpLN = 5
              [Phenology].CAMP.FLNparams.VrnLN = 10
              [Phenology].CAMP.FLNparams.VxPLN = -5
              [Phenology].Phyllochron.BasePhyllochron.FixedValue = 100.4
              [Phenology].PhyllochronPpSensitivity.FixedValue = 0.2
              [Phenology].CAMP.EnvData.VrnTreatTemp = 5.8
              [Phenology].CAMP.EnvData.VrnTreatDuration = 60
              [Phenology].HeadEmergenceLongDayBase.FixedValue = 150
              [Phenology].HeadEmergencePpSensitivity.FixedValue = 4
          Cultivar Winter Very-Quick
            Command:
              [Phenology].CAMP.FLNparams.MinLN = 7.3
              [Phenology].CAMP.FLNparams.PpLN = 0
              [Phenology].CAMP.FLNparams.VrnLN = 7.6
              [Phenology].CAMP.FLNparams.VxPLN = -1.7
              [Phenology].Phyllochron.BasePhyllochron.FixedValue = 102.8
              [Phenology].PhyllochronPpSensitivity.FixedValue = 0.2
              [Phenology].CAMP.EnvData.VrnTreatTemp = 5.8
              [Phenology].CAMP.EnvData.VrnTreatDuration = 60
              [Phenology].HeadEmergenceLongDayBase.FixedValue = 193
              [Phenology].HeadEmergencePpSensitivity.FixedValue = 1.5
          Cultivar Winter Quick
            Command:
              [Phenology].CAMP.FLNparams.MinLN = 8.4
              [Phenology].CAMP.FLNparams.PpLN = 0.9
              [Phenology].CAMP.FLNparams.VrnLN = 5.7
              [Phenology].CAMP.FLNparams.VxPLN = 5.5
              [Phenology].Phyllochron.BasePhyllochron.FixedValue = 98
              [Phenology].PhyllochronPpSensitivity.FixedValue = 0.2
              [Phenology].CAMP.EnvData.VrnTreatTemp = 5.8
              [Phenology].CAMP.EnvData.VrnTreatDuration = 60
              [Phenology].HeadEmergenceLongDayBase.FixedValue = 80
              [Phenology].HeadEmergencePpSensitivity.FixedValue = 2.8
          Cultivar Winter Mid
            Command:
              [Phenology].CAMP.FLNparams.MinLN = 8
              [Phenology].CAMP.FLNparams.PpLN = 2.3
              [Phenology].CAMP.FLNparams.VrnLN = 7.8
              [Phenology].CAMP.FLNparams.VxPLN = 0
              [Phenology].Phyllochron.BasePhyllochron.FixedValue = 100.8
              [Phenology].PhyllochronPpSensitivity.FixedValue = 0.2
              [Phenology].CAMP.EnvData.VrnTreatTemp = 5.8
              [Phenology].CAMP.EnvData.VrnTreatDuration = 60
              [Phenology].HeadEmergenceLongDayBase.FixedValue = 132
              [Phenology].HeadEmergencePpSensitivity.FixedValue = 2.8
          Cultivar Winter Very Slow
            Command:
              [Phenology].CAMP.FLNparams.MinLN = 8.5
              [Phenology].CAMP.FLNparams.PpLN = 4
              [Phenology].CAMP.FLNparams.VrnLN = 7.5
              [Phenology].CAMP.FLNparams.VxPLN = 1
              [Phenology].Phyllochron.BasePhyllochron.FixedValue = 109.3
              [Phenology].PhyllochronPpSensitivity.FixedValue = 0.2
              [Phenology].CAMP.EnvData.VrnTreatTemp = 5.9
              [Phenology].CAMP.EnvData.VrnTreatDuration = 60
              [Phenology].HeadEmergenceLongDayBase.FixedValue = 190
              [Phenology].HeadEmergencePpSensitivity.FixedValue = 2
        Folder Turkey
          Cultivar Konya
            Command:
              [Phenology].Phyllochron.BasePhyllochron.FixedValue = 100
              [Grain].NumberFunction.GrainNumber.GrainsPerGramOfStem.FixedValue = 13
              [Grain].MaximumPotentialGrainSize.FixedValue = 0.05
              [Phenology].GrainFilling.Target.FixedValue = 450
              //[Stem].DMRetranslocationFactor.ReproductiveGrowth.DMRetranslocationFactor.FixedValue = 0.2
              //[Stem].DMDemands.Structural.StructuralFraction.VegetativeGrowth.Fraction.FixedValue = 0.6
              //[Leaf].ExtinctionCoeff.VegetativePhase.FixedValue = 0.8
              [Phenology].CAMP.FLNparams.MinLN = 7
              [Phenology].CAMP.FLNparams.PpLN = 2.0
              [Phenology].CAMP.FLNparams.VrnLN = 2
              [Phenology].CAMP.FLNparams.VxPLN = 0.0
        Folder China
          Cultivar Keyu13
            Command:
              [Phenology].Phyllochron.BasePhyllochron.FixedValue = 100
              [Phenology].CAMP.FLNparams.MinLN = 7
              [Phenology].CAMP.FLNparams.PpLN = 3.0
              [Phenology].CAMP.FLNparams.VrnLN = 5
              [Phenology].CAMP.FLNparams.VxPLN = 0.0
        Folder USA
          Cultivar Yecora
            Command:
              [Phenology].Phyllochron.BasePhyllochron.FixedValue = 90
              //[Leaf].CohortParameters.MaxArea.AreaLargestLeaves.FixedValue = 4000
              [Phenology].CAMP.FLNparams.MinLN = 7
              [Phenology].CAMP.FLNparams.PpLN = 2
              [Phenology].CAMP.FLNparams.VrnLN = 2
              [Phenology].CAMP.FLNparams.VxPLN = 2
              [Phenology].HeadEmergenceLongDayBase.FixedValue = 110
              [Phenology].HeadEmergencePpSensitivity.FixedValue = 0
              [Phenology].CAMP.EnvData.VrnTreatTemp = 6
              [Phenology].CAMP.EnvData.VrnTreatDuration = 60
          Cultivar Rex
            Command:
              [Grain].NumberFunction.GrainNumber.GrainsPerGramOfStem.FixedValue = 18
              [Grain].MaximumNConc.FixedValue = 0.02
              [Phenology].CAMP.FLNparams.MinLN = 7
              [Phenology].CAMP.FLNparams.PpLN = 4.0
              [Phenology].CAMP.FLNparams.VrnLN = 6
              [Phenology].CAMP.FLNparams.VxPLN = 0.0
          Cultivar Nugaines
            Command:
              [Grain].NumberFunction.GrainNumber.GrainsPerGramOfStem.FixedValue = 20
              [Grain].MaximumNConc.FixedValue = 0.02
              [Phenology].CAMP.FLNparams.MinLN = 7
              [Phenology].CAMP.FLNparams.PpLN = 4.0
              [Phenology].CAMP.FLNparams.VrnLN = 6
              [Phenology].CAMP.FLNparams.VxPLN = 0.0
          Cultivar Hyslop
            Command:
              [Grain].NumberFunction.GrainNumber.GrainsPerGramOfStem.FixedValue = 22
              [Grain].MaximumNConc.FixedValue = 0.02
              [Phenology].CAMP.FLNparams.MinLN = 7
              [Phenology].CAMP.FLNparams.PpLN = 4.0
              [Phenology].CAMP.FLNparams.VrnLN = 6
              [Phenology].CAMP.FLNparams.VxPLN = 0.0
          Cultivar Stephens
            Command:
              [Grain].NumberFunction.GrainNumber.GrainsPerGramOfStem.FixedValue = 25
              [Grain].MaximumNConc.FixedValue = 0.02
              [Phenology].CAMP.FLNparams.MinLN = 7
              [Phenology].CAMP.FLNparams.PpLN = 4.0
              [Phenology].CAMP.FLNparams.VrnLN = 6
              [Phenology].CAMP.FLNparams.VxPLN = 0.0
        Folder Europe
          Cultivar Dekan
            Command:
              [Phenology].HeadEmergencePpSensitivity.FixedValue = 3
              [Phenology].Phyllochron.BasePhyllochron.FixedValue = 100.0
              //[Leaf].ExtinctionCoeff.VegetativePhase.FixedValue = 0.8
              [Phenology].PhyllochronPpSensitivity.FixedValue = 0.6
              [Phenology].CAMP.FLNparams.MinLN = 9
              [Phenology].CAMP.FLNparams.PpLN = 3.0
              [Phenology].CAMP.FLNparams.VrnLN = 7
              [Phenology].CAMP.FLNparams.VxPLN = 0.0
          Cultivar Rosario: same as Replacements.Wheat.Cultivars.Europe.Dekan
          Cultivar Ararat: same as Replacements.Wheat.Cultivars.Europe.Dekan
          Cultivar Tybalt
            Command:
              [Phenology].Phyllochron.BasePhyllochron.FixedValue = 90.0
              [Phenology].PhyllochronPpSensitivity.FixedValue = 0.6
              [Phenology].CAMP.FLNparams.MinLN = 9.0
              [Phenology].CAMP.FLNparams.PpLN = 0.0
              [Phenology].CAMP.FLNparams.VrnLN = 0.0
              [Phenology].CAMP.FLNparams.VxPLN = 0.0
              [Phenology].HeadEmergenceLongDayBase.FixedValue = 145
              [Phenology].HeadEmergencePpSensitivity.FixedValue = 0.0
              [Phenology].CAMP.EnvData.VrnTreatTemp = 6
              [Phenology].CAMP.EnvData.VrnTreatDuration = 60
        Folder Africa
          Cultivar HAR1685
            Command:
              [Phenology].Phyllochron.BasePhyllochron.FixedValue = 100
              [Grain].NumberFunction.GrainNumber.GrainsPerGramOfStem.FixedValue = 17
              [Phenology].GrainFilling.Target.FixedValue = 350
              [Phenology].CAMP.FLNparams.MinLN = 7
              [Phenology].CAMP.FLNparams.PpLN = 3.0
              [Phenology].CAMP.FLNparams.VrnLN = 0
              [Phenology].CAMP.FLNparams.VxPLN = 0.0
        Folder Iran
          Cultivar Gorgan
            Command:
              [Phenology].Phyllochron.BasePhyllochron.FixedValue = 100
              [Phenology].CAMP.FLNparams.MinLN = 7
              [Phenology].CAMP.FLNparams.PpLN = 4.0
              [Phenology].CAMP.FLNparams.VrnLN = 0
              [Phenology].CAMP.FLNparams.VxPLN = 0.0
        Folder Preliminary
          Cultivar Accroc: same as Replacements.Wheat.Cultivars.APP Generic.Winter Very Slow
          Cultivar Cesario: same as Replacements.Wheat.Cultivars.APP Generic.Winter Very Slow
          Cultivar Anapurna: same as Replacements.Wheat.Cultivars.APP Generic.Winter Very Slow
          Cultivar RockStar: same as Replacements.Wheat.Cultivars.APP Generic.Spring Mid
          Cultivar Calibro: same as Replacements.Wheat.Cultivars.APP Generic.Winter Very Slow
          Cultivar BigRed: same as Replacements.Wheat.Cultivars.APP Generic.Winter Very Slow
          Cultivar Catapult: same as Replacements.Wheat.Cultivars.APP Generic.Spring Mid
          Cultivar Stockade: same as Replacements.Wheat.Cultivars.APP Generic.Spring Slow
          Cultivar Mowhawk
            Command:
              [Phenology].CAMP.FLNparams.MinLN = 8
              [Phenology].CAMP.FLNparams.PpLN = 2.3
              [Phenology].CAMP.FLNparams.VrnLN = 7.8
              [Phenology].CAMP.FLNparams.VxPLN = 0
              [Phenology].Phyllochron.BasePhyllochron.FixedValue = 100
              [Phenology].PhyllochronPpSensitivity.FixedValue = 0.2
              [Phenology].CAMP.EnvData.VrnTreatTemp = 5.8
              [Phenology].CAMP.EnvData.VrnTreatDuration = 60
              [Phenology].HeadEmergenceLongDayBase.FixedValue = 132
              [Phenology].HeadEmergencePpSensitivity.FixedValue = 2.8
          Cultivar Waugh: same as Replacements.Wheat.Cultivars.APP Generic.Winter Very Slow
          Cultivar Einstein: same as Replacements.Wheat.Cultivars.APP Generic.Winter Very Slow
          Cultivar Zanzibar: same as Replacements.Wheat.Cultivars.APP Generic.Spring Slow
          Cultivar Longford: same as Replacements.Wheat.Cultivars.APP Generic.Winter Very Slow
          Cultivar Conqueror: same as Replacements.Wheat.Cultivars.APP Generic.Winter Very Slow
          Cultivar Genius: same as Replacements.Wheat.Cultivars.APP Generic.Winter Very Slow
          Cultivar Vixin: same as Replacements.Wheat.Cultivars.APP Generic.Spring Quick
          Cultivar Meering
            Command:
              [Phenology].CAMP.FLNparams.MinLN = 7.1
              [Phenology].CAMP.FLNparams.PpLN = 3.1
              [Phenology].CAMP.FLNparams.VrnLN = 2.4
              [Phenology].CAMP.FLNparams.VxPLN = -0.9
              [Phenology].Phyllochron.BasePhyllochron.FixedValue = 100
              [Phenology].PhyllochronPpSensitivity.FixedValue = 0.3
              [Phenology].CAMP.EnvData.VrnTreatTemp = 5.8
              [Phenology].CAMP.EnvData.VrnTreatDuration = 60
              [Phenology].HeadEmergenceLongDayBase.FixedValue = 154
              [Phenology].HeadEmergencePpSensitivity.FixedValue = 1
          Cultivar Sunmaster
            Command:
              [Phenology].CAMP.FLNparams.MinLN = 7.1
              [Phenology].CAMP.FLNparams.PpLN = 3.1
              [Phenology].CAMP.FLNparams.VrnLN = 2.4
              [Phenology].CAMP.FLNparams.VxPLN = -0.9
              [Phenology].Phyllochron.BasePhyllochron.FixedValue = 100
              [Phenology].PhyllochronPpSensitivity.FixedValue = 0.3
              [Phenology].CAMP.EnvData.VrnTreatTemp = 5.8
              [Phenology].CAMP.EnvData.VrnTreatDuration = 60
              [Phenology].HeadEmergenceLongDayBase.FixedValue = 154
              [Phenology].HeadEmergencePpSensitivity.FixedValue = 2
          Cultivar Osprey
            Command:
              [Phenology].CAMP.FLNparams.MinLN = 8
              [Phenology].CAMP.FLNparams.PpLN = 2.3
              [Phenology].CAMP.FLNparams.VrnLN = 7.8
              [Phenology].CAMP.FLNparams.VxPLN = 0
              [Phenology].Phyllochron.BasePhyllochron.FixedValue = 95
              [Phenology].PhyllochronPpSensitivity.FixedValue = 0.2
              [Phenology].CAMP.EnvData.VrnTreatTemp = 5.8
              [Phenology].CAMP.EnvData.VrnTreatDuration = 60
              [Phenology].HeadEmergenceLongDayBase.FixedValue = 132
              [Phenology].HeadEmergencePpSensitivity.FixedValue = 2.8
          Cultivar Whistler
            Command:
              [Phenology].CAMP.FLNparams.MinLN = 8
              [Phenology].CAMP.FLNparams.PpLN = 2.3
              [Phenology].CAMP.FLNparams.VrnLN = 7.8
              [Phenology].CAMP.FLNparams.VxPLN = 0
              [Phenology].Phyllochron.BasePhyllochron.FixedValue = 100
              [Phenology].PhyllochronPpSensitivity.FixedValue = 0.0
              [Phenology].CAMP.EnvData.VrnTreatTemp = 5.8
              [Phenology].CAMP.EnvData.VrnTreatDuration = 60
              [Phenology].HeadEmergenceLongDayBase.FixedValue = 132
              [Phenology].HeadEmergencePpSensitivity.FixedValue = 2.8
          Cultivar Wylah: same as Replacements.Wheat.Cultivars.Preliminary.Mowhawk
          Cultivar UOM001_3_47: same as Replacements.Wheat.Cultivars.APP Generic.Spring Mid
          Cultivar UOM001_9_1: same as Replacements.Wheat.Cultivars.APP Generic.Spring Mid
  Virtual: FileName=%root%/Tests/Validation/Wheat/Wheat.apsimx; ModelPath=Simulations
