Simulations: Version=2
  Simulation: Area=0; Slope=0
    Weather: FileName=Harwood.met
    Clock: StartDate=1993-09-21; EndDate=1995-09-29
    Summary summaryfile
    Zone WholeFarm: Area=1; Slope=0
      Resources
        HumanFoodStore
          HumanFoodStoreType Wheat: DryMatter=50; DMD=50; Nitrogen=20; StartingAge=0; StartingAmount=100
          HumanFoodStoreType Rice: DryMatter=50; DMD=50; Nitrogen=20; StartingAge=0; StartingAmount=100
          HumanFoodStoreType Nuts: DryMatter=50; DMD=50; Nitrogen=20; StartingAge=0; StartingAmount=100
        AnimalFoodStore
          AnimalFoodStoreType Lucerne: DryMatter=50; DMD=50; Nitrogen=20; StartingAge=0; StartingAmount=100; PurchaseAsNeeded=false; KgPerUnitPurchased=0; CostPerUnitPurchased=0; LabourPerUnitPurchased=0; OtherCosts=0
          AnimalFoodStoreType Maize: DryMatter=50; DMD=50; Nitrogen=20; StartingAge=0; StartingAmount=100; PurchaseAsNeeded=false; KgPerUnitPurchased=0; CostPerUnitPurchased=0; LabourPerUnitPurchased=0; OtherCosts=0
          AnimalFoodStoreType CutGrass: DryMatter=50; DMD=50; Nitrogen=20; StartingAge=0; StartingAmount=100; PurchaseAsNeeded=false; KgPerUnitPurchased=0; CostPerUnitPurchased=0; LabourPerUnitPurchased=0; OtherCosts=0
          AnimalFoodStoreType BoughtSupplement: DryMatter=50; DMD=50; Nitrogen=20; StartingAge=0; StartingAmount=100; PurchaseAsNeeded=false; KgPerUnitPurchased=0; CostPerUnitPurchased=0; LabourPerUnitPurchased=0; OtherCosts=0
        Land
          LandType Sandy loam country: LandArea=100; UnusablePortion=0; BundedPortion=0; SoilType=1; NDecline=1000
          LandType Cracking clay plains: LandArea=50; UnusablePortion=0; BundedPortion=0; SoilType=2; NDecline=1000
        LabourFamily
        LabourHired
        Pasture
          PastureType IrrigatedPasture: DryMatter=50; DMD=50; Nitrogen=20; PoolToAddTo=0; StartingAmount=100; PurchaseAsNeeded=false; KgPerUnitPurchased=0; CostPerUnitPurchased=0; LabourPerUnitPurchased=0; OtherCosts=0
          PastureType NativePasture: DryMatter=50; DMD=50; Nitrogen=20; PoolToAddTo=0; StartingAmount=100; PurchaseAsNeeded=false; KgPerUnitPurchased=0; CostPerUnitPurchased=0; LabourPerUnitPurchased=0; OtherCosts=0
        RuminantHerd Ruminants
          RuminantType Bos indicus: Breed=Bos indicus; EMaintCoefficient=0.368; EMaintIntercept=0.5; EGrowthCoefficient=0.79; EGrowthIntercept=0; ELactationCoefficient=0.35; ELactationIntercept=0.42; Kme=1; SRWFemale=520; SRWMaleMultiplier=1.2; SRWBirth=0.08; AgeGrowthRateCoefficient=0.0115; SRWGrowthScalar=0.32; IntakeCoefficient=0.0115; IntakeIntercept=0.32; ProteinCoefficient=120; BaseAnimalEquivalent=450; GreenDietMax=98; GreenDietCoefficient=0.15; GreenDietZero=4; IntakeTropicalQuality=0.16; IntakeCoefficientQuality=1.7; IntakeCoefficientBiomass=0.006; ProportionOfMaxWeightToSurvive=0.5; LactatingPotentialModifierConstantA=0.57; LactatingPotentialModifierConstantB=81; LactatingPotentialModifierConstantC=0.7; MilkCurveSuckling=0.6; MilkCurveNonSuckling=0.11; MilkingDays=300; MilkPeakYield=20; MilkOffsetDay=4; MilkPeakDay=45; InterParturitionIntervalIntercept=10.847; InterParturitionIntervalCoefficient=-0.7994; GestationInterval=12; MinimumAge1stMating=24; MinimumSize1stMating=100
            RuminantTypeCohort CalfF: Gender=Female; StartingAge=0; StartingNumber=1; StartingWeight=40; StartingWeightSD=0; StartingPrice=0
            RuminantTypeCohort CalfM: Gender=Male; StartingAge=0; StartingNumber=1; StartingWeight=40; StartingWeightSD=0; StartingPrice=0
            RuminantTypeCohort WeanerF: Gender=Female; StartingAge=8; StartingNumber=0; StartingWeight=0; StartingWeightSD=180; StartingPrice=0
            RuminantTypeCohort WeanerM: Gender=Male; StartingAge=8; StartingNumber=0; StartingWeight=180; StartingWeightSD=0; StartingPrice=0
            RuminantTypeCohort Female1_2: Gender=Female; StartingAge=18; StartingNumber=3; StartingWeight=270; StartingWeightSD=0; StartingPrice=0
            RuminantTypeCohort Female2_3: Gender=Female; StartingAge=30; StartingNumber=1; StartingWeight=400; StartingWeightSD=0; StartingPrice=0
            RuminantTypeCohort Female3_4: Gender=Female; StartingAge=42; StartingNumber=1; StartingWeight=450; StartingWeightSD=0; StartingPrice=0
            RuminantTypeCohort Female4_5: Gender=Female; StartingAge=54; StartingNumber=1; StartingWeight=460; StartingWeightSD=0; StartingPrice=0
            RuminantTypeCohort Female5_6: Gender=Female; StartingAge=66; StartingNumber=1; StartingWeight=470; StartingWeightSD=0; StartingPrice=0
            RuminantTypeCohort Female6_7: Gender=Female; StartingAge=78; StartingNumber=1; StartingWeight=480; StartingWeightSD=0; StartingPrice=0
            RuminantTypeCohort Female7_8: Gender=Female; StartingAge=90; StartingNumber=2; StartingWeight=480; StartingWeightSD=0; StartingPrice=0
            RuminantTypeCohort Female8_9: Gender=Female; StartingAge=102; StartingNumber=2; StartingWeight=490; StartingWeightSD=0; StartingPrice=0
            RuminantTypeCohort Female9_10: Gender=Female; StartingAge=114; StartingNumber=1; StartingWeight=500; StartingWeightSD=0; StartingPrice=0
            RuminantTypeCohort Male1_2: Gender=Male; StartingAge=18; StartingNumber=2; StartingWeight=350; StartingWeightSD=0; StartingPrice=0
            RuminantTypeCohort Male2_3: Gender=Male; StartingAge=30; StartingNumber=1; StartingWeight=520; StartingWeightSD=0; StartingPrice=0
            RuminantTypeCohort Male3_4: Gender=Male; StartingAge=42; StartingNumber=1; StartingWeight=610; StartingWeightSD=0; StartingPrice=0
            RuminantTypeCohort Breeding_sires: Gender=Male; StartingAge=48; StartingNumber=2; StartingWeight=720; StartingWeightSD=0; StartingPrice=0
      Arbitrators
        RuminantArbitratorFeed Ruminant feed arbitrator
      Activities
        PastureActivityManage Manage paddock 1: LandConditionIndexAtStart=2; AreaRequested=10
          FodderLimitsFilterGroup Fodder limits: PoolValues=[0.6, 0.8, 1, 1, 1, 1, 1, 1, 1, 1, 1, 1]
            RuminantFilter Filter[Breed=Bos indicus]: Parameter=Breed; Operator=Equal; Value=Bos indicus
          LandTypeToUse LandType: LandArea=0; UnusablePortion=0; BundedPortion=0; SoilType=0; NDecline=0
          FeedType PastureType: PurchaseAsNeeded=false
            zero: DryMatter, DMD, Nitrogen, PoolToAddTo, StartingAmount, KgPerUnitPurchased, CostPerUnitPurchased, LabourPerUnitPurchased, OtherCosts
        PastureActivityManage Manage paddock 2: LandConditionIndexAtStart=2; AreaRequested=90
          FodderLimitsFilterGroup Fodder limits: PoolValues=[0.6, 0.8, 1, 1, 1, 1, 1, 1, 1, 1, 1, 1]
            RuminantFilter Filter[Breed=Bos indicus]: Parameter=Breed; Operator=Equal; Value=Bos indicus
          LandTypeToUse LandType: LandArea=0; UnusablePortion=0; BundedPortion=0; SoilType=0; NDecline=0
          FeedType PastureType: PurchaseAsNeeded=false
            zero: DryMatter, DMD, Nitrogen, PoolToAddTo, StartingAmount, KgPerUnitPurchased, CostPerUnitPurchased, LabourPerUnitPurchased, OtherCosts
        RuminantActivityFeed Feed female Bos indicus lucerne: FeedStyle=SpecifiedAmount; Priority=0
          RuminantFilterGroup FemaleBosIndicus: MonthlyValues=[2, 2, 2, 2, 0, 0, 0, 0, 0, 0, 0, 0]
            RuminantFilter Filter[Breed=Bos indicus]: Parameter=Breed; Operator=Equal; Value=Bos indicus
            RuminantFilter Filter[Gender=Female]: Parameter=Gender; Operator=Equal; Value=Female
        RuminantActivityGraze Graze ruminants located on pasture: Priority=0; HoursGrazed=0
        RuminantActivityGrow Grow all ruminants
      Report: EventNames=[Clock].DoReport
        VariableNames:
          [Clock].Today
          [Clock].Today.Year as year
          [Clock].Today.DayOfYear as day
  DataStore
