Simulations: Version=2
  Simulation: Area=0; Slope=0
    Weather: FileName=Harwood.met
    Clock: StartDate=1993-09-21; EndDate=1995-09-29
    Summary summaryfile
    Zone WholeFarm: Area=1; Slope=0
      Resources
        AnimalFoodStore
          AnimalFoodStoreType Lucerne: DryMatter=50; DMD=70; Nitrogen=2; StartingAmount=1000; PurchaseAsNeeded=false; KgPerUnitPurchased=0; CostPerUnitPurchased=0; LabourPerUnitPurchased=0; OtherCosts=0
        GrazeFoodStore Graze food store
          GrazeFoodStoreType NativePasture: DryMatter=50; DMD=50; Nitrogen=20; StartingAmount=100; DecayNitrogen=0.35; MinimumNitrogen=0.4; DecayDMD=0.1; MinimumDMD=43; DetachPasture=0.03; DetachCarryOver=0.12
        RuminantHerd Ruminants
          RuminantType Bos indicus: Breed=Bos indicus; EMaintCoefficient=0.368; EMaintIntercept=0.5; EGrowthCoefficient=0.79; EGrowthIntercept=0; ELactationCoefficient=0.35; ELactationIntercept=0.42; Kme=1; SRWFemale=520; SRWMaleMultiplier=1.2; SRWBirth=0.08; AgeGrowthRateCoefficient=0.0115; SRWGrowthScalar=0.32; IntakeCoefficient=0.024; IntakeIntercept=1.7; ProteinCoefficient=120; BaseAnimalEquivalent=450; GreenDietMax=98; GreenDietCoefficient=0.15; GreenDietZero=4; IntakeTropicalQuality=0.16; IntakeCoefficientQuality=1.7; IntakeCoefficientBiomass=0.006; StrictFeedingLimits=false; ProportionOfMaxWeightToSurvive=0.5; LactatingPotentialModifierConstantA=0.57; LactatingPotentialModifierConstantB=81; LactatingPotentialModifierConstantC=0.7; MilkCurveSuckling=0.6; MilkCurveNonSuckling=0.11; MilkingDays=300; MilkPeakYield=20; MilkOffsetDay=4; MilkPeakDay=45; InterParturitionIntervalIntercept=10.847; InterParturitionIntervalCoefficient=-0.7994; GestationInterval=12; MinimumAge1stMating=24; MinimumSize1stMating=100
            RuminantTypeCohort CalfF: Gender=Female; StartingAge=0; StartingNumber=1; StartingWeight=40; StartingWeightSD=0; StartingPrice=0; Suckling=true
            RuminantTypeCohort CalfM: Gender=Male; StartingAge=0; StartingNumber=1; StartingWeight=40; StartingWeightSD=0; StartingPrice=0; Suckling=true
            RuminantTypeCohort WeanerF: Gender=Female; StartingAge=8; StartingNumber=1; StartingWeight=180; StartingWeightSD=0; StartingPrice=0; Suckling=false
            RuminantTypeCohort WeanerM: Gender=Male; StartingAge=8; StartingNumber=1; StartingWeight=180; StartingWeightSD=0; StartingPrice=0; Suckling=false
            RuminantTypeCohort Female1_2: Gender=Female; StartingAge=18; StartingNumber=3; StartingWeight=270; StartingWeightSD=0; StartingPrice=0; Suckling=false
            RuminantTypeCohort Female2_3: Gender=Female; StartingAge=30; StartingNumber=1; StartingWeight=400; StartingWeightSD=0; StartingPrice=0; Suckling=false
            RuminantTypeCohort Female3_4: Gender=Female; StartingAge=42; StartingNumber=1; StartingWeight=450; StartingWeightSD=0; StartingPrice=0; Suckling=false
            RuminantTypeCohort Female4_5: Gender=Female; StartingAge=54; StartingNumber=1; StartingWeight=460; StartingWeightSD=0; StartingPrice=0; Suckling=false
            RuminantTypeCohort Female5_6: Gender=Female; StartingAge=66; StartingNumber=1; StartingWeight=470; StartingWeightSD=0; StartingPrice=0; Suckling=false
            RuminantTypeCohort Female6_7: Gender=Female; StartingAge=78; StartingNumber=1; StartingWeight=480; StartingWeightSD=0; StartingPrice=0; Suckling=false
            RuminantTypeCohort Female7_8: Gender=Female; StartingAge=90; StartingNumber=2; StartingWeight=480; StartingWeightSD=0; StartingPrice=0; Suckling=false
            RuminantTypeCohort Female8_9: Gender=Female; StartingAge=102; StartingNumber=2; StartingWeight=490; StartingWeightSD=0; StartingPrice=0; Suckling=false
            RuminantTypeCohort Female9_10: Gender=Female; StartingAge=114; StartingNumber=1; StartingWeight=500; StartingWeightSD=0; StartingPrice=0; Suckling=false
            RuminantTypeCohort Male1_2: Gender=Male; StartingAge=18; StartingNumber=2; StartingWeight=350; StartingWeightSD=0; StartingPrice=0; Suckling=false
            RuminantTypeCohort Male2_3: Gender=Male; StartingAge=30; StartingNumber=1; StartingWeight=520; StartingWeightSD=0; StartingPrice=0; Suckling=false
            RuminantTypeCohort Male3_4: Gender=Male; StartingAge=42; StartingNumber=1; StartingWeight=610; StartingWeightSD=0; StartingPrice=0; Suckling=false
            RuminantTypeCohort Breeding_sires: Gender=Male; StartingAge=48; StartingNumber=2; StartingWeight=720; StartingWeightSD=0; StartingPrice=0; Suckling=false
        Land
          LandType Sandy loam country: LandArea=100; UnusablePortion=0; BundedPortion=0; SoilType=1; NDecline=1000
      Arbitrators
        RuminantArbitratorFeed Ruminant feed arbitrator
      Activities
        PastureActivityManage Manage paddock 1: LandTypeNameToUse=Sandy loam country; FeedTypeName=NativePasture; LandConditionIndexAtStart=2; UnitsOfArea=Squarekm; AreaRequested=90
        RuminantActivityGrow Grow all ruminants: EnergyGross=18.4
        RuminantActivityFeed Feed female Bos indicus lucerne: FeedArbitratorName=Ruminant feed arbitrator; FeedTypeName=Lucerne; FeedStyle=SpecifiedAmount; FeedPriority=10; LabourPriority=10
          RuminantFilterGroup FemaleBosIndicus: MonthlyValues=[2, 2, 2, 2, 2, 2, 2, 2, 2, 2, 2, 2]
            RuminantFilter Filter[Breed=Bos indicus]: Parameter=Breed; Operator=Equal; Value=Bos indicus
            RuminantFilter Filter[Gender=Female]: Parameter=Gender; Operator=Equal; Value=Female
        RuminantActivityMuster Muster Activity
          RuminantMusterGroup BosIndicus to Paddock1: ManagedPastureName=Manage paddock 1; MusterOnLabourShortfall=false; PerformAtStartOfSimulation=true; Month=5
            RuminantFilter Filter[Breed=Bos indicus]: Parameter=Breed; Operator=Equal; Value=Bos indicus
        RuminantActivityGraze Graze all ruminants: FeedArbitratorName=Ruminant feed arbitrator; FeedPriority=1; HoursGrazed=8
      Report: EventNames=[Clock].DoReport
        VariableNames:
          Name as ZoneName
          [Clock].Today
          [Clock].Today.Year as year
          [Clock].Today.DayOfYear as day
  DataStore
