Simulations: Version=2
  Simulation: Area=0; Slope=0
    Weather: FileName=Harwood.met
    Clock: StartDate=1993-09-21; EndDate=1995-09-29
    Summary summaryfile
    Zone WholeFarm: Area=1; Slope=0
      Folder Resources
        LabourFamily
          LabourFamilyPerson Father: InitialAge=0; Gender=M; MaxLabourSupply=[0, 0, 0, 0, 0, 5, 0, 0, 0, 0, 0, 0]; DoesNonFarmLabour=true; DefaultNonFarmPayRate=0
            ColumnNames=[Jan, Feb, March, April, May, June, July, Aug, Sep, Oct, Nov, Dec]
          LabourFamilyPerson Mother: InitialAge=0; Gender=M; MaxLabourSupply=[0, 0, 0, 0, 0, 5, 0, 0, 0, 0, 0, 0]; DoesNonFarmLabour=true; DefaultNonFarmPayRate=0
            ColumnNames=[Jan, Feb, March, April, May, June, July, Aug, Sep, Oct, Nov, Dec]
          LabourFamilyPerson TeenageBoy: InitialAge=0; Gender=M; MaxLabourSupply=[0, 0, 0, 0, 0, 5, 0, 0, 0, 0, 0, 0]; DoesNonFarmLabour=true; DefaultNonFarmPayRate=0
            ColumnNames=[Jan, Feb, March, April, May, June, July, Aug, Sep, Oct, Nov, Dec]
      Folder Activities
      Report: EventNames=[Clock].DoReport
        VariableNames:
          [Clock].Today
          [Clock].Today.Year as year
          [Clock].Today.DayOfYear as day
  DataStore
