Simulations: Version=2
  Simulation: Area=0; Slope=0
    Weather: FileName=Harwood.met
    Clock: StartDate=1993-09-21; EndDate=1995-09-29
    Summary summaryfile
    Zone WholeFarm: Area=1; Slope=0
      Resources
        FoodStore HomeFoodStore
          FoodStoreType Wheat: DryMatter=50; DMD=50; Nitrogen=20; StartingAge=0; StartingAmount=100
          FoodStoreType Rice: DryMatter=50; DMD=50; Nitrogen=20; StartingAge=0; StartingAmount=100
          FoodStoreType Nuts: DryMatter=50; DMD=50; Nitrogen=20; StartingAge=0; StartingAmount=100
        Fodder
          FodderType Lucerne: IsForage=true; IsSupplement=false; DryMatter=50; DMD=50; Nitrogen=20; StartingAge=0; StartingAmount=100
          FodderType Maize: IsForage=false; IsSupplement=true; DryMatter=50; DMD=50; Nitrogen=20; StartingAge=0; StartingAmount=100
          FodderType CutGrass: IsForage=true; IsSupplement=false; DryMatter=50; DMD=50; Nitrogen=20; StartingAge=0; StartingAmount=100
          FodderType BoughtSupplement: IsForage=false; IsSupplement=true; DryMatter=50; DMD=50; Nitrogen=20; StartingAge=0; StartingAmount=100
        Land
          LandType Field1: LandArea=10; UnusablePortion=0; BundedPortion=0; SoilType=1; NDecline=1000
        Pasture
          PastureType IrrigatedPasture: DryMatter=50; DMD=50; Nitrogen=20; StartingAmount=100
        LabourFamily
        LabourHired
        RuminantHerd Ruminants
          RuminantType BosIndicus: Breed=Bos Indicus; SRW=520; birth_SRW=0.08; Critical_cow_wt=50; grwth_coeff1=0.0115; grwth_coeff2=0.32; km_coeff=0.368; km_incpt=0.5; kg_coeff=0.79; kl_coeff=0.35; kl_incpt=0.42; kme=1; intake_coeff=0.024; intake_incpt=1.7; AFP_coeff=-0.8184; AFP_incpt=20; IPI_coeff=-0.7994; IPI_incpt=10.847; concep_rate_coeff=-10.7; concep_rate_incpt=6.754; concep_rate_assym=95; concep_rate_max=90; juvenile_mort_coeff=3; juvenile_mort_exp=1.8; juvenile_mort_max=20; Rum_gest_int=9; Milk_offset_day=4; Milk_Peak_day=45; Milk_Curve_suck=0.6; Milk_Curve_nonsuck=0.11; protein_coeff=120; concep_rate_coeff12=-12.634; concep_rate_incpt12=7.073; concep_rate_assym12=90; concep_rate_coeff24=-13.247; concep_rate_incpt24=5.182; concep_rate_assym24=90; concep_rate_coeff2nd=-11; concep_rate_incpt2nd=8.6; concep_rate_assym2nd=90; prenatal_mort=7.9; Anim_max=1.2; Male_SRW=1.2; Min_birth2concep=61; Intake_coeff_lact=0.42; Intake_peak_lact=60; Intake_exp_lact=1.7; Intake_coeff_biomass=0.006; protein_intake_min=0.3; Maint_max_age=6; Maint_energy_coeff=0.26; Maint_energy_exp=8.2E-05; Maint_energy_int=0.09; Growth_energy_incpt1=6.7; Growth_energy_incpt2=20.3; Growth_effic=1.09; Calf_sub_prop=0.2; Calf_intake_prop=0.035; Calf_milk_sub=0.3; Milk_intake_coeff=0.1206; Milk_intake_incpt=3.8146; Milk_intake_max=12; Anim_mort_coeff=2.5; Anim_mort_incpt=0.05; Anim_mort_exp=3; Max_breeders=10000; Max_breeder_age=120; Dry_breeder_cull_rate=10; Anim_sell_age=24; Anim_sell_wt=300; Weaning_age=8; Weaning_weight=220; Feeding=10; Mustering=30; Transporting=10; Other_Labour=60; Vet_costs=2; Vaccines=2; Dips=2; FeedTrough=true; MilkYN=false; Mortality_base=9; Rum_Hcon_Cat=14; Max_Bull_age=96; Bull_replace_cost=3500; Seasonal_mating=true; Feeding_system=2; Seas_mating_int=12; Joining_age=18; Joining_size=50; Milk_max=15; Milk_end=10; Graze_hrs=5; market_dist=500; kl_cost=1.65; No_load=20; Yard_fees=5; MLA_fees=5; Commission=4; Female_selling=true; Intake_lactating=true; Min_concep_cull=30; Green_diet_max=98; Green_diet_coeff=0.15; Green_diet_zero=4; Max_concep_uncontrolled=70
            zero: kg_incpt, wool_coeff, cashmere_coeff, wool_price, cashmere_price, Milking, Home_milk, Milk_value, Milk_Costs, Rum_Hcon_No, Twin_rate, Seas_mat_ben
            RuminantTypeCohort CalfF: Gender=F; StartingAge=0; StartingNumber=0; StartingWeight=0; StartingPrice=0
            RuminantTypeCohort CalfM: Gender=M; StartingAge=0; StartingNumber=0; StartingWeight=0; StartingPrice=0
            RuminantTypeCohort WeanerF: Gender=F; StartingAge=8; StartingNumber=0; StartingWeight=0; StartingPrice=0
            RuminantTypeCohort WeanerM: Gender=M; StartingAge=8; StartingNumber=0; StartingWeight=0; StartingPrice=0
            RuminantTypeCohort Female1_2: Gender=F; StartingAge=18; StartingNumber=3; StartingWeight=0; StartingPrice=0
            RuminantTypeCohort Female2_3: Gender=F; StartingAge=30; StartingNumber=0; StartingWeight=0; StartingPrice=0
            RuminantTypeCohort Female3_4: Gender=F; StartingAge=42; StartingNumber=0; StartingWeight=0; StartingPrice=0
            RuminantTypeCohort Female4_5: Gender=F; StartingAge=54; StartingNumber=0; StartingWeight=0; StartingPrice=0
            RuminantTypeCohort Female5_6: Gender=F; StartingAge=66; StartingNumber=0; StartingWeight=0; StartingPrice=0
            RuminantTypeCohort Female6_7: Gender=F; StartingAge=78; StartingNumber=0; StartingWeight=0; StartingPrice=0
            RuminantTypeCohort Female7_8: Gender=F; StartingAge=90; StartingNumber=0; StartingWeight=0; StartingPrice=0
            RuminantTypeCohort Female8_9: Gender=F; StartingAge=102; StartingNumber=0; StartingWeight=0; StartingPrice=0
            RuminantTypeCohort Female9_10: Gender=F; StartingAge=114; StartingNumber=0; StartingWeight=0; StartingPrice=0
            RuminantTypeCohort Male1_2: Gender=M; StartingAge=18; StartingNumber=0; StartingWeight=0; StartingPrice=0
            RuminantTypeCohort Male2_3: Gender=M; StartingAge=30; StartingNumber=0; StartingWeight=0; StartingPrice=0
            RuminantTypeCohort Male3_4: Gender=M; StartingAge=42; StartingNumber=0; StartingWeight=0; StartingPrice=0
            RuminantTypeCohort Breeding_sires: Gender=M; StartingAge=48; StartingNumber=0; StartingWeight=0; StartingPrice=0
      Folder Activities
        Manager Add Lucerne on fixed date
          ApplyDayOfYear = 265
          Amount = 0
```csharp
using System;
using Models.Core;
using Models.WholeFarm;
using APSIM.Shared.Utilities;

namespace Models
{
	[Serializable]
	public class Script : Model
	{
		[Link] Clock Clock;
		[Link] Resources Resources;
		[Link] Summary Summary;
		
		[Description("Day of year fodder is to be applied")]
		public int ApplyDayOfYear { get; set; }

		[Description("Amount of fodder to be applied")]
		public double Amount { get; set; }

		[EventSubscribe("DoManagement")]
		private void OnDoManagement(object sender, EventArgs e)
		{
			if (Clock.Today.DayOfYear == ApplyDayOfYear)
			{
				Fodder fodder = Resources.Fodder();
				FodderType lucerne = fodder.GetByName("Lucerne");
				lucerne.Add(Amount);
			}
		
		}
		
	}
}
```
      Report: EventNames=[Clock].DoReport
        VariableNames:
          [Clock].Today
          [Clock].Today.Year as year
          [Clock].Today.DayOfYear as day
  DataStore
