Simulations: Version=6
  Simulation
    FileAPSIM File APSIM: FileName=forage.out
    FileGRASP File GRASP: FileName=GRASP_FZHlCk_Blk_NABSAdb.CSV
    Clock: StartDate=1993-09-21; EndDate=1995-09-29
    Summary summaryfile
    WholeFarm: Area=1; Slope=0; RandomSeed=1; EcologicalIndicatorsCalculationInterval=12; EcologicalIndicatorsCalculationMonth=9
      ResourcesHolder Resources
        Finance Finances
          FinanceType General account: OpeningBalance=10000; WithdrawalLimit=-5000; InterestRateCharged=7.5; InterestRatePaid=2
        HumanFoodStore
          HumanFoodStoreType Wheat: DryMatter=50; DMD=50; Nitrogen=20; StartingAge=0; StartingAmount=100
          HumanFoodStoreType Rice: DryMatter=50; DMD=50; Nitrogen=20; StartingAge=0; StartingAmount=100
          HumanFoodStoreType Nuts: DryMatter=50; DMD=50; Nitrogen=20; StartingAge=0; StartingAmount=100
        AnimalFoodStore
          AnimalFoodStoreType Lucerne: DryMatter=61; DMD=61; Nitrogen=7; StartingAmount=1000
            Transmutation Purchase: AmountPerUnitPurchase=1000
              TransmutationCost Money: ResourceName=Finances; ResourceTypeName=General account; CostPerUnit=100
              TransmutationCost Labour: CostPerUnit=0.5
                LabourFilterGroup Labour details
                  LabourFilter Filter[Name=Joe B]: Parameter=Name; Operator=Equal; Value=Joe B
          AnimalFoodStoreType Maize: DryMatter=50; DMD=50; Nitrogen=20; StartingAmount=100
          AnimalFoodStoreType CutGrass: DryMatter=50; DMD=50; Nitrogen=20; StartingAmount=100
          AnimalFoodStoreType BoughtSupplement: DryMatter=50; DMD=50; Nitrogen=20; StartingAmount=100
          AnimalFoodStoreType Chicken pellets: DryMatter=61; DMD=61; Nitrogen=7; StartingAmount=20
            Transmutation Purchase: AmountPerUnitPurchase=100
              TransmutationCost Money: ResourceName=Finances; ResourceTypeName=General account; CostPerUnit=100
          AnimalFoodStoreType Household scraps: DryMatter=61; DMD=61; Nitrogen=7; StartingAmount=5
        GrazeFoodStore
          GrazeFoodStoreType Native Pasture: NToDMDCoefficient=11.03; NToDMDIntercept=41.4; GreenNitrogen=2; DecayNitrogen=0.35; MinimumNitrogen=4; DecayDMD=0.1; MinimumDMD=43; DetachRate=0.03; CarryoverDetachRate=0.12; IntakeTropicalQualityCoefficient=0.16; IntakeQualityCoefficient=1.7
        Land: UnitOfArea=Hectares
          LandType Sandy loam country: LandArea=100; UnusablePortion=0; BundedPortion=0; SoilType=1; NDecline=1000
          LandType Cracking clay plains: LandArea=50; UnusablePortion=0; BundedPortion=0; SoilType=2; NDecline=1000
        Labour: AllowAging=false
          LabourType Joe B: InitialAge=42; Gender=Male; MaxLabourSupply=[25, 25, 25, 25, 25, 25, 25, 25, 25, 25, 25, 25]; Individuals=1
          LabourType Jane D: InitialAge=40; Gender=Female; MaxLabourSupply=[25, 25, 25, 25, 25, 25, 25, 25, 25, 25, 25, 25]; Individuals=1
        RuminantHerd Ruminants
          RuminantType Breeding: Breed=Bos indicus; EMaintCoefficient=0.35; EMaintIntercept=0.503; EMaintExponent=0; EGrowthCoefficient=0.79; EGrowthIntercept=0; ELactationCoefficient=0.35; ELactationIntercept=0.42; Kme=1; GrowthEnergyIntercept1=6.7; GrowthEnergyIntercept2=20.3; GrowthEfficiency=1.09; SRWFemale=500; SRWMaleMultiplier=1.2; SRWBirth=0.08; AgeGrowthRateCoefficient=0.0115; SRWGrowthScalar=0.32; IntakeCoefficient=0.024; IntakeIntercept=1.7; ProteinCoefficient=120; BaseAnimalEquivalent=450; GreenDietMax=98; GreenDietCoefficient=0.15; GreenDietZero=4; IntakeTropicalQuality=0.16; IntakeCoefficientQuality=1.7; IntakeCoefficientBiomass=0.006; StrictFeedingLimits=true; MilkIntakeCoefficient=0.1206; MilkIntakeIntercept=3.8146; MilkIntakeMaximum=20; MilkLWTFodderSubstitutionProportion=0.2; MaxJuvenileIntake=0.035; ProportionalDiscountDueToMilk=0.3; ProportionOfMaxWeightToSurvive=0.5; LactatingPotentialModifierConstantA=0.42; LactatingPotentialModifierConstantB=61; LactatingPotentialModifierConstantC=1.7; MaximumSizeOfIndividual=1.2; MortalityBase=0.03; MortalityCoefficient=2.5; MortalityIntercept=0.05; MortalityExponent=3; JuvenileMortalityCoefficient=3; JuvenileMortalityMaximum=0.2; JuvenileMortalityExponent=1.8; WoolCoefficient=0; CashmereCoefficient=0; MilkCurveSuckling=0.6; MilkCurveNonSuckling=0.11; MilkingDays=300; MilkPeakYield=20; MilkOffsetDay=4; MilkPeakDay=45; InterParturitionIntervalIntercept=10.847; InterParturitionIntervalCoefficient=-0.7994; GestationLength=9; MinimumAge1stMating=24; MinimumSize1stMating=0.5; TwinRate=0; CriticalCowWeight=0.5; ConceptionRateCoefficent=[-12.634, -14.247, -11, -9.8353]; ConceptionRateIntercept=[7.073, 5.182, 8.6, 6.754]; ConceptionRateAsymptote=[90, 90, 90, 95]; MaximumMaleMatingsPerDay=30; PrenatalMortality=7.9; MaximumConceptionUncontrolledBreeding=0.7; MethaneProductionIntercept=-34.8; MethaneProductionCoefficient=35.16
            RuminantInitialCohorts Initial cohorts
              RuminantTypeCohort CalfF: Gender=Female; StartingAge=0; StartingNumber=1; StartingWeight=40; StartingWeightSD=0; Suckling=true
              RuminantTypeCohort WeanerF: Gender=Female; StartingAge=8; StartingNumber=0; StartingWeight=0; StartingWeightSD=180; Suckling=false
              RuminantTypeCohort Female1_2: Gender=Female; StartingAge=18; StartingNumber=1; StartingWeight=270; StartingWeightSD=0; Suckling=false
            AnimalPricing Prices: PricingStyle=perKg
              AnimalPriceEntry Female calves: Gender=Female; Age=0; PurchaseValue=2; SellValue=2
              AnimalPriceEntry Female weaners: Gender=Female; Age=9; PurchaseValue=1.8; SellValue=1.8
              AnimalPriceEntry Female 1-3y: Gender=Female; Age=12; PurchaseValue=1.6; SellValue=1.6
              AnimalPriceEntry Female 3+y: Gender=Female; Age=36; PurchaseValue=1.2; SellValue=1.2
              AnimalPriceEntry Male calves: Gender=Male; Age=0; PurchaseValue=2; SellValue=2
              AnimalPriceEntry Male weaners: Gender=Male; Age=9; PurchaseValue=1.8; SellValue=1.8
              AnimalPriceEntry Male 1-3y: Gender=Male; Age=12; PurchaseValue=1.6; SellValue=1.6
              AnimalPriceEntry Male 3+y: Gender=Male; Age=36; PurchaseValue=1.5; SellValue=1.5
        OtherAnimals
          OtherAnimalsType Pigs: AgeWhenAdult=12
            OtherAnimalsTypeCohort Adult male: Gender=Male; Age=24; Number=2; Weight=200; StartingWeightSD=0; SaleFlag=None
            OtherAnimalsTypeCohort Adult female: Gender=Female; Age=24; Number=3; Weight=200; StartingWeightSD=0; SaleFlag=None
          OtherAnimalsType Chickens: AgeWhenAdult=10
            OtherAnimalsTypeCohort Rooster: Gender=Male; Age=12; Number=1; Weight=3; StartingWeightSD=0; SaleFlag=None
            OtherAnimalsTypeCohort Hens: Gender=Female; Age=12; Number=5; Weight=3; StartingWeightSD=0; SaleFlag=None
        GreenhouseGases
          GreenhouseGasesType Methane store: StartingAmount=1100; GlobalWarmingPotential=25
          GreenhouseGasesType Methane: StartingAmount=0; GlobalWarmingPotential=25
          GreenhouseGasesType CO2: StartingAmount=0; GlobalWarmingPotential=1
          GreenhouseGasesType NOx: StartingAmount=0; GlobalWarmingPotential=298
        AnimalFoodStore Water
          AnimalFoodStoreType Bore: DryMatter=0; DMD=0; Nitrogen=0; StartingAmount=0
      ActivitiesHolder Activities
        ActivityFolder Cash flow: OnPartialResourcesAvailableAction=ReportErrorAndStop
          FinanceActivityCalculateInterest Bank interest: OnPartialResourcesAvailableAction=ReportErrorAndStop
          FinanceActivityPayOverhead General farm maintenance: OnPartialResourcesAvailableAction=ReportErrorAndStop; PaymentInterval=1; MonthDue=1; Amount=3333.33; AccountName=General account
          FinanceActivityPayOverhead Fuel costs: OnPartialResourcesAvailableAction=ReportErrorAndStop; PaymentInterval=1; MonthDue=1; Amount=2500; AccountName=General account
          FinanceActivityPayOverhead Pest control: OnPartialResourcesAvailableAction=ReportErrorAndStop; PaymentInterval=12; MonthDue=12; Amount=5000; AccountName=General account
          FinanceActivityPayOverhead Contractors: OnPartialResourcesAvailableAction=ReportErrorAndStop; PaymentInterval=12; MonthDue=10; Amount=30000; AccountName=General account
          FinanceActivityPayOverhead Administration: OnPartialResourcesAvailableAction=ReportErrorAndStop; PaymentInterval=1; MonthDue=1; Amount=1666.67; AccountName=General account
          FinanceActivityPayOverhead Rates and Fees: OnPartialResourcesAvailableAction=ReportErrorAndStop; PaymentInterval=12; MonthDue=7; Amount=15000; AccountName=General account
          FinanceActivityPayOverhead Insurance: OnPartialResourcesAvailableAction=ReportErrorAndStop; PaymentInterval=12; MonthDue=12; Amount=20000; AccountName=General account
          FinanceActivityPayOverhead Electricity: OnPartialResourcesAvailableAction=ReportErrorAndStop; PaymentInterval=3; MonthDue=1; Amount=2000; AccountName=General account
          FinanceActivityPayOverhead Living costs: OnPartialResourcesAvailableAction=ReportErrorAndStop; PaymentInterval=6; MonthDue=6; Amount=1000; AccountName=General account
        ActivityFolder Off farm labour: OnPartialResourcesAvailableAction=ReportErrorAndStop
          LabourActivityOffFarm Hired ploughing: OnPartialResourcesAvailableAction=ReportErrorAndStop; DailyRate=100; DaysWorkAvailableEachMonth=[2, 2, 2, 1, 1, 1, 0, 0, 0, 1, 1.2, 1.5]; BankAccountName=General account
            LabourFilterGroup Labour details
              LabourFilter Filter[Name=Joe B]: Parameter=Name; Operator=Equal; Value=Joe B
          LabourActivityOffFarm Hired Sowing: same as Simulation.WholeFarm.Activities.Off farm labour.Hired ploughing
        ActivityFolder Manage breeding herd: OnPartialResourcesAvailableAction=ReportErrorAndStop
          RuminantActivityFeed Feed female Bos indicus lucerne: OnPartialResourcesAvailableAction=ReportErrorAndStop; FeedTypeName=Lucerne; FeedStyle=ProportionOfPotentialIntake
            RuminantFeedGroup FemaleBosIndicus: MonthlyValues=[1, 1, 1, 1, 1, 1, 1, 1, 1, 1, 1, 1]
              RuminantFilter Filter[HerdName=Breeding]: Parameter=HerdName; Operator=Equal; Value=Breeding
              RuminantFilter Filter[Gender=Female]: Parameter=Gender; Operator=Equal; Value=Female
            LabourFilterGroup Labour details
              LabourFilter Filter[Name=Joe B]: Parameter=Name; Operator=Equal; Value=Joe B
          RuminantActivityGrow Grow all ruminants: OnPartialResourcesAvailableAction=ReportErrorAndStop; EnergyGross=18.4
          RuminantActivityBreed Breed Bos indicus: OnPartialResourcesAvailableAction=ReportErrorAndStop; HerdName=Breeding; MaximumConceptionRateUncontrolled=0.8
            ControlledMatingSettings Controlled mating: BreedInterval=12; MonthDue=8
              LabourFilterGroup Labour details
                LabourFilter Filter[Name=Joe B]: Parameter=Name; Operator=Equal; Value=Joe B
          RuminantActivityManage Manage Bos indicus herd: OnPartialResourcesAvailableAction=ReportErrorAndStop; HerdName=Breeding; MaximumBreedersKept=60; MaximumBreederAge=120; MaximumSiresKept=5; MaximumBullAge=96; AllowSireReplacement=true; MaleSellingAge=0; MaleSellingWeight=0; ManagementMonth=10; MonthlyManagement=false; WeaningAge=9; WeaningWeight=250; MinimumPastureBeforeRestock=0; SellFemalesLikeMales=false
          RuminantActivityBuySell Buy and sell Bos indicus with trucking: OnPartialResourcesAvailableAction=ReportErrorAndStop; BreedName=Bos indicus; BreedingSirePrice=4500; BankAccountName=General account
            TruckingSettings Trucking details: DistanceToMarket=200; CostPerKmTrucking=1.9; Number450kgPerTruck=20; MinimumTrucksBeforeSelling=0; MinimumLoadBeforeSelling=0
            RuminantSaleFee MLA Fee: Amount=2; PaymentStyle=perHead
            RuminantSaleFee Yard Fees: Amount=2; PaymentStyle=perHead
            RuminantSaleFee Sales commission: Amount=0.02; PaymentStyle=ProportionOfTotalSales
          RuminantActivityBuySell Buy and sell Bos indicus: OnPartialResourcesAvailableAction=ReportErrorAndStop; BreedName=Bos indicus; BreedingSirePrice=4500; BankAccountName=General account
            RuminantSaleFee MLA Fee: Amount=2; PaymentStyle=perHead
            RuminantSaleFee Yard Fees: Amount=2; PaymentStyle=perHead
            RuminantSaleFee Sales commission: Amount=0.02; PaymentStyle=ProportionOfTotalSales
          RuminantActivityMilking Milking: OnPartialResourcesAvailableAction=ReportErrorAndStop; HerdName=Breeding
            LabourFilterGroupSpecified Labour details: UnitType=perHead; UnitSize=300; LabourPerUnit=0.5
              LabourFilter Filter[Name=Joe B]: Parameter=Name; Operator=Equal; Value=Joe B
          RuminantActivityPredictiveStocking Dry season stocking: OnPartialResourcesAvailableAction=ReportErrorAndStop; HerdName=Breeding; AssessmentMonth=5; DrySeasonLength=6; FeedLowLimit=500; MinimumBreederAgeLimit=48; SellDryCows=false; SellWetCows=false; SellSteers=true
          RuminantActivityPredictiveStockingENSO ENSO stocking: OnPartialResourcesAvailableAction=ReportErrorAndStop; HerdName=Breeding; AssessmentMonth=5; MinimumFeedBeforeRestock=1500; SellDryCows=false; SellWetCows=false; SellSteers=true; MonthlySIOFile=ENSO.txt; MeanSOIForLaNina=7; MeanSOIForElNino=7; GrazeFoodStoreName=Native pasture
            MeanSOIForLaNina LaNina pasture to herd change: StartingValue=0; Minumum=1.0; Maximum=1.2; XValues=[1000, 1000.5, 3000, 3000.5]; YValues=[1.0, 1.1, 1.1, 1.2]
            MeanSOIForElNino ElNino pasture to herd change: StartingValue=0; Minumum=0.7; Maximum=0.9; XValues=[1000, 1000.5, 3000, 3000.5]; YValues=[0.7, 0.8, 0.8, 0.9]
          RuminantActivityHerdCost Vet costs: OnPartialResourcesAvailableAction=ReportErrorAndStop; PaymentInterval=6; MonthDue=2; Amount=2; PaymentStyle=perHead; AccountName=General account
            RuminantFilterGroup BosIndicus
              RuminantFilter Filter[HerdName=Breeding]: Parameter=HerdName; Operator=Equal; Value=Breeding
          RuminantActivityHerdCost Vaccines and drenches: OnPartialResourcesAvailableAction=ReportErrorAndStop; PaymentInterval=5; MonthDue=7; Amount=200; PaymentStyle=Fixed; AccountName=General account
          RuminantActivityHerdCost Dips and sprays: OnPartialResourcesAvailableAction=ReportErrorAndStop; PaymentInterval=12; MonthDue=5; Amount=5; PaymentStyle=perAE; AccountName=General account
            RuminantFilterGroup BosIndicus
              RuminantFilter Filter[HerdName=Breeding]: Parameter=HerdName; Operator=Equal; Value=Breeding
        ActivityFolder Chooks: OnPartialResourcesAvailableAction=ReportErrorAndStop
          OtherAnimalsActivityFeed Feed chooks: OnPartialResourcesAvailableAction=ReportErrorAndStop; FeedTypeName=Chicken pellets; FeedStyle=SpecifiedDailyAmount
            OtherAnimalsFilterGroup All chickens: AnimalType=Chickens
              MonthlyValues=[0.09, 0.09, 0.09, 0.09, 0.09, 0.09, 0.09, 0.09, 0.09, 0.09, 0.09, 0.09]
              OtherAnimalsFilter Filter[Age>=0]: Parameter=Age; Operator=GreaterThanOrEqual; Value=0
          OtherAnimalsActivityBreed Breed chooks: OnPartialResourcesAvailableAction=ReportErrorAndStop; AnimalType=Chickens; OffspringPerBreeder=2; StartBreedingMonth=1; BreedingInterval=4; CostPerBreeder=0; BreedingAge=12; UseLocalMales=true
          OtherAnimalsActivityGrow Grow chickens: OnPartialResourcesAvailableAction=ReportErrorAndStop; OtherAnimalType=Chickens
        ActivityFolder Manage paddocks: OnPartialResourcesAvailableAction=ReportErrorAndStop
          PastureActivityManage Native pasture paddock: OnPartialResourcesAvailableAction=UseResourcesAvailable; LandTypeNameToUse=Sandy loam country; FeedTypeName=Native Pasture; StartingAmount=2000; UnitsOfArea=Hectares; AreaRequested=50; EcolCalculationMonth=9; EcolCalculationInterval=12
            Relationship LandConditionIndex: StartingValue=2; Minumum=0; Maximum=11; XValues=[0, 15, 35, 100]; YValues=[-1.5, -0.3, 0.3, 1.5]
            Relationship GrassBasalArea: StartingValue=3; Minumum=0; Maximum=3; XValues=[0, 15, 35, 100]; YValues=[-0.75, -0.15, 0.15, 0.75]
          PastureActivityBurn Burn native pasture: OnPartialResourcesAvailableAction=ReportErrorAndStop; BurnInterval=12; BurnMonth=11; MinimumProportionGreen=0.5; PaddockName=Native Pasture
        SummariseRuminantHerd SummariseHerd
      Folder Reports
        Report HerdLedger: EventNames=[Resources].Ruminants.TransactionOccurred
          VariableNames:
            [Clock].Today
            [Resources].Ruminants.LastTransaction.ExtraInformation.ID as UId
            [Resources].Ruminants.LastTransaction.ExtraInformation.Breed as Breed
            [Resources].Ruminants.LastTransaction.ExtraInformation.HerdName as Herd
            [Resources].Ruminants.LastTransaction.ExtraInformation.GenderAsString as Sex
            [Resources].Ruminants.LastTransaction.ExtraInformation.Age as Age
            [Resources].Ruminants.LastTransaction.ExtraInformation.Weight as Weight
            [Resources].Ruminants.LastTransaction.ExtraInformation.SaleFlagAsString as Reason
            [Resources].Ruminants.LastTransaction.ExtraInformation.PopulationChangeDirection as Change
        Report HerdSummary: EventNames=[Activities].SummariseHerd.OnReportItemGenerated
          VariableNames:
            [Clock].Today
            [Activities].SummariseHerd.ReportDetails.Breed as Breed
            [Activities].SummariseHerd.ReportDetails.Herd as Herd
            [Activities].SummariseHerd.ReportDetails.Age as AgeGroup
            [Activities].SummariseHerd.ReportDetails.Sex as Sex
            [Activities].SummariseHerd.ReportDetails.Number as Num
            [Activities].SummariseHerd.ReportDetails.AverageWeight as AvgWt
            [Activities].SummariseHerd.ReportDetails.AverageWeightGain as AvgWtGn
            [Activities].SummariseHerd.ReportDetails.AverageIntake as AvgIntake
            [Activities].SummariseHerd.ReportDetails.AdultEquivalents as AE
            [Activities].SummariseHerd.ReportDetails.NumberPregnant as NoPregnant
            [Activities].SummariseHerd.ReportDetails.NumberOfBirths as Births
        Report OtherAnimalsLedger: EventNames=[Resources].OtherAnimals.TransactionOccurred
          VariableNames:
            [Clock].Today as Date
            [Resources].OtherAnimals.LastTransaction.Reason as Type
            [Resources].OtherAnimals.LastTransaction.ExtraInformation.GenderAsString as Gender
            [Resources].OtherAnimals.LastTransaction.ExtraInformation.Age as Age
            [Resources].OtherAnimals.LastTransaction.ExtraInformation.SaleFlagAsString as Reason
            [Resources].OtherAnimals.LastTransaction.Credit as Credit
            [Resources].OtherAnimals.LastTransaction.Debit as Debit
        Report FinancesLedger: EventNames=[Resources].Finances.TransactionOccurred
          VariableNames:
            [Clock].Today as Date
            [Resources].Finances.LastTransaction.Credit as Credit
            [Resources].Finances.LastTransaction.Debit as Debit
            [Resources].Finances.LastTransaction.ResourceType as Resource
            [Resources].Finances.LastTransaction.Activity as Activity
            [Resources].Finances.LastTransaction.Reason as Reason
        Report LandLedger: EventNames=[Resources].Land.TransactionOccurred
          VariableNames:
            [Clock].Today as Date
            [Resources].Land.LastTransaction.Credit as Credit
            [Resources].Land.LastTransaction.Debit as Debit
            [Resources].Land.LastTransaction.ResourceType as Resource
            [Resources].Land.LastTransaction.Activity as Activity
            [Resources].Land.LastTransaction.Reason as Reason
        Report AnimalFoodLedger: EventNames=[Resources].AnimalFoodStore.TransactionOccurred
          VariableNames:
            [Clock].Today as Date
            [Resources].AnimalFoodStore.LastTransaction.Credit as Credit
            [Resources].AnimalFoodStore.LastTransaction.Debit as Debit
            [Resources].AnimalFoodStore.LastTransaction.ResourceType as Resource
            [Resources].AnimalFoodStore.LastTransaction.Activity as Activity
        Report LabourLedger: EventNames=[Resources].Labour.TransactionOccurred
          VariableNames:
            [Clock].Today as Date
            [Resources].Labour.LastTransaction.Credit as Credit
            [Resources].Labour.LastTransaction.Debit as Debit
            [Resources].Labour.LastTransaction.ResourceType as Resource
            [Resources].Labour.LastTransaction.Activity as Activity
        Report ResourceShortfallLedger: EventNames=[Activities].ResourceShortfallOccurred
          VariableNames:
            [Clock].Today as Date
            [Activities].LastShortfallResourceRequest.ResourceType.Name as Resource
            [Activities].LastShortfallResourceRequest.ResourceTypeName as Type
            [Activities].LastShortfallResourceRequest.ActivityModel.Name as Activity
            [Activities].LastShortfallResourceRequest.Required as Required
            [Activities].LastShortfallResourceRequest.Available as Available
        Report EcologicalCondition: EventNames=[Resources].GrazeFoodStore.EcologicalIndicatorsCalculated
          VariableNames:
            [Clock].Today as Date
            [Resources].GrazeFoodStore.LastEcologicalIndicators.ResourceType as Resource
            [Resources].GrazeFoodStore.LastEcologicalIndicators.LandConditionIndex as LandConditionIndex
            [Resources].GrazeFoodStore.LastEcologicalIndicators.GrassBasalArea as GrassBasalArea
            [Resources].GrazeFoodStore.LastEcologicalIndicators.StockingRate as StockingRate
            [Resources].GrazeFoodStore.LastEcologicalIndicators.Utilisation as Utilisation
        Report Pasture: EventNames=[Clock].EndOfMonth
          VariableNames:
            [Clock].Today as Date
            [Resources].GrazeFoodStore.Native Pasture.TonnesPerHectare as NativePasture
        Report GreenhouseGases: EventNames=[Resources].GreenhouseGases.TransactionOccurred
          VariableNames:
            [Clock].Today as Date
            [Resources].GreenhouseGases.LastTransaction.Credit as Credit
            [Resources].GreenhouseGases.LastTransaction.CreditStandardised as CreditCO2e
            [Resources].GreenhouseGases.LastTransaction.ResourceType as Resource
            [Resources].GreenhouseGases.LastTransaction.Activity as Activity
            [Resources].GreenhouseGases.LastTransaction.Reason as Reason
  DataStore
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