Simulations: Version=2
  Simulation
    Weather: FileName=Harwood.met
    Clock: StartDate=1993-09-21; EndDate=1995-09-29
    Summary summaryfile
    Zone WholeFarm: Area=1; Slope=0
      Resources
        Finance Finances
          FinanceType General account: OpeningBalance=10000; WithdrawalLimit=-5000; InterestRateCharged=7.5; InterestRatePaid=2
        HumanFoodStore
          HumanFoodStoreType Wheat: DryMatter=50; DMD=50; Nitrogen=20; StartingAge=0; StartingAmount=100
          HumanFoodStoreType Rice: DryMatter=50; DMD=50; Nitrogen=20; StartingAge=0; StartingAmount=100
          HumanFoodStoreType Nuts: DryMatter=50; DMD=50; Nitrogen=20; StartingAge=0; StartingAmount=100
        AnimalFoodStore
          AnimalFoodStoreType Lucerne: DryMatter=50; DMD=50; Nitrogen=20; StartingAmount=100; PurchaseAsNeeded=false; KgPerUnitPurchased=0; CostPerUnitPurchased=0; LabourPerUnitPurchased=0; OtherCosts=0
          AnimalFoodStoreType Maize: DryMatter=50; DMD=50; Nitrogen=20; StartingAmount=100; PurchaseAsNeeded=false; KgPerUnitPurchased=0; CostPerUnitPurchased=0; LabourPerUnitPurchased=0; OtherCosts=0
          AnimalFoodStoreType CutGrass: DryMatter=50; DMD=50; Nitrogen=20; StartingAmount=100; PurchaseAsNeeded=false; KgPerUnitPurchased=0; CostPerUnitPurchased=0; LabourPerUnitPurchased=0; OtherCosts=0
          AnimalFoodStoreType BoughtSupplement: DryMatter=50; DMD=50; Nitrogen=20; StartingAmount=100; PurchaseAsNeeded=false; KgPerUnitPurchased=0; CostPerUnitPurchased=0; LabourPerUnitPurchased=0; OtherCosts=0
        GrazeFoodStore
          GrazeFoodStoreType Native Pasture: DryMatter=0; DMD=0; Nitrogen=0; StartingAmount=1000; DecayNitrogen=0.35; MinimumNitrogen=0.4; DecayDMD=0.1; MinimumDMD=0.43; DetachRate=0.03; CarryoverDetachRate=0.12
        Land: UnitOfArea=Hectares
          LandType Sandy loam country: LandArea=100; UnusablePortion=0; BundedPortion=0; SoilType=1; NDecline=1000
          LandType Cracking clay plains: LandArea=50; UnusablePortion=0; BundedPortion=0; SoilType=2; NDecline=1000
        LabourFamily: AllowAging=false
          LabourFamilyType Joe B.: InitialAge=42; Gender=Male; MaxLabourSupply=[25, 25, 25, 25, 25, 25, 25, 25, 25, 25, 25, 25]
          LabourFamilyType Jane D.: InitialAge=40; Gender=Female; MaxLabourSupply=[25, 25, 25, 25, 25, 25, 25, 25, 25, 25, 25, 25]
        LabourHired
        RuminantHerd Ruminants
          RuminantType Breeding: Breed=Bos indicus; EMaintCoefficient=0.35; EMaintIntercept=0.503; EMaintExponent=0; EGrowthCoefficient=0.79; EGrowthIntercept=0; ELactationCoefficient=0.35; ELactationIntercept=0.42; Kme=1; GrowthEnergyIntercept1=6.7; GrowthEnergyIntercept2=20.3; GrowthEfficiency=1.09; SRWFemale=500; SRWMaleMultiplier=1.2; SRWBirth=0.08; AgeGrowthRateCoefficient=0.0115; SRWGrowthScalar=0.32; IntakeCoefficient=0.024; IntakeIntercept=1.7; ProteinCoefficient=120; BaseAnimalEquivalent=450; GreenDietMax=98; GreenDietCoefficient=0.15; GreenDietZero=4; IntakeTropicalQuality=0.16; IntakeCoefficientQuality=1.7; IntakeCoefficientBiomass=0.006; StrictFeedingLimits=true; MilkIntakeCoefficient=0.1206; MilkIntakeIntercept=3.8146; MilkIntakeMaximum=20; MilkLWTFodderSubstitutionProportion=0.2; MaxJuvenileIntake=0.035; ProportionalDiscountDueToMilk=0.3; ProportionOfMaxWeightToSurvive=0.5; LactatingPotentialModifierConstantA=0.42; LactatingPotentialModifierConstantB=61; LactatingPotentialModifierConstantC=1.7; MaximumSizeOfIndividual=1.2; MortalityBase=0.03; MortalityCoefficient=2.5; MortalityIntercept=0.05; MortalityExponent=3; JuvenileMortalityCoefficient=3; JuvenileMortalityMaximum=0.2; JuvenileMortalityExponent=1.8; WoolCoefficient=0; CashmereCoefficient=0; MilkCurveSuckling=0.6; MilkCurveNonSuckling=0.11; MilkingDays=300; MilkPeakYield=20; MilkOffsetDay=4; MilkPeakDay=45; InterParturitionIntervalIntercept=10.847; InterParturitionIntervalCoefficient=-0.7994; GestationLength=9; MinimumAge1stMating=24; MinimumSize1stMating=0.5; TwinRate=0; CriticalCowWeight=0.5; MaximumMaleMatingsPerDay=30; PrenatalMortality=7.9; MaximumConceptionUncontrolledBreeding=0.7
            RuminantTypeCohort CalfF: Gender=Female; StartingAge=0; StartingNumber=1; StartingWeight=40; StartingWeightSD=0; Suckling=true
            RuminantTypeCohort CalfM: Gender=Male; StartingAge=0; StartingNumber=1; StartingWeight=40; StartingWeightSD=0; Suckling=true
            RuminantTypeCohort WeanerF: Gender=Female; StartingAge=8; StartingNumber=0; StartingWeight=0; StartingWeightSD=180; Suckling=false
            RuminantTypeCohort WeanerM: Gender=Male; StartingAge=8; StartingNumber=0; StartingWeight=180; StartingWeightSD=0; Suckling=false
            RuminantTypeCohort Female1_2: Gender=Female; StartingAge=18; StartingNumber=3; StartingWeight=270; StartingWeightSD=0; Suckling=false
            RuminantTypeCohort Female2_3: Gender=Female; StartingAge=30; StartingNumber=1; StartingWeight=400; StartingWeightSD=0; Suckling=false
            RuminantTypeCohort Female3_4: Gender=Female; StartingAge=42; StartingNumber=1; StartingWeight=450; StartingWeightSD=0; Suckling=false
            RuminantTypeCohort Female4_5: Gender=Female; StartingAge=54; StartingNumber=1; StartingWeight=460; StartingWeightSD=0; Suckling=false
            RuminantTypeCohort Female5_6: Gender=Female; StartingAge=66; StartingNumber=1; StartingWeight=470; StartingWeightSD=0; Suckling=false
            RuminantTypeCohort Female6_7: Gender=Female; StartingAge=78; StartingNumber=1; StartingWeight=480; StartingWeightSD=0; Suckling=false
            RuminantTypeCohort Female7_8: Gender=Female; StartingAge=90; StartingNumber=2; StartingWeight=480; StartingWeightSD=0; Suckling=false
            RuminantTypeCohort Female8_9: Gender=Female; StartingAge=102; StartingNumber=2; StartingWeight=490; StartingWeightSD=0; Suckling=false
            RuminantTypeCohort Female9_10: Gender=Female; StartingAge=114; StartingNumber=1; StartingWeight=500; StartingWeightSD=0; Suckling=false
            RuminantTypeCohort Male1_2: Gender=Male; StartingAge=18; StartingNumber=2; StartingWeight=350; StartingWeightSD=0; Suckling=false
            RuminantTypeCohort Male2_3: Gender=Male; StartingAge=30; StartingNumber=1; StartingWeight=520; StartingWeightSD=0; Suckling=false
            RuminantTypeCohort Male3_4: Gender=Male; StartingAge=42; StartingNumber=1; StartingWeight=610; StartingWeightSD=0; Suckling=false
            RuminantTypeCohort Breeding_sires: Gender=Male; StartingAge=48; StartingNumber=2; StartingWeight=720; StartingWeightSD=0; Suckling=false
          RuminantType Trade: Breed=Bos indicus; EMaintCoefficient=0.35; EMaintIntercept=0.503; EMaintExponent=0; EGrowthCoefficient=0.79; EGrowthIntercept=0; ELactationCoefficient=0.35; ELactationIntercept=0.42; Kme=1; GrowthEnergyIntercept1=6.7; GrowthEnergyIntercept2=20.3; GrowthEfficiency=1.09; SRWFemale=500; SRWMaleMultiplier=1.2; SRWBirth=0.08; AgeGrowthRateCoefficient=0.0115; SRWGrowthScalar=0.32; IntakeCoefficient=0.024; IntakeIntercept=1.7; ProteinCoefficient=120; BaseAnimalEquivalent=450; GreenDietMax=98; GreenDietCoefficient=0.15; GreenDietZero=4; IntakeTropicalQuality=0.16; IntakeCoefficientQuality=1.7; IntakeCoefficientBiomass=0.006; StrictFeedingLimits=true; MilkIntakeCoefficient=0.1206; MilkIntakeIntercept=3.8146; MilkIntakeMaximum=20; MilkLWTFodderSubstitutionProportion=0.2; MaxJuvenileIntake=0.035; ProportionalDiscountDueToMilk=0.3; ProportionOfMaxWeightToSurvive=0.5; LactatingPotentialModifierConstantA=0.42; LactatingPotentialModifierConstantB=61; LactatingPotentialModifierConstantC=1.7; MaximumSizeOfIndividual=1.2; MortalityBase=0.03; MortalityCoefficient=2.5; MortalityIntercept=0.05; MortalityExponent=3; JuvenileMortalityCoefficient=3; JuvenileMortalityMaximum=0.2; JuvenileMortalityExponent=1.8; WoolCoefficient=0; CashmereCoefficient=0; MilkCurveSuckling=0.6; MilkCurveNonSuckling=0.11; MilkingDays=300; MilkPeakYield=20; MilkOffsetDay=4; MilkPeakDay=45; InterParturitionIntervalIntercept=10.847; InterParturitionIntervalCoefficient=-0.7994; GestationLength=9; MinimumAge1stMating=24; MinimumSize1stMating=0.5; TwinRate=0; CriticalCowWeight=0.5; MaximumMaleMatingsPerDay=30; PrenatalMortality=7.9; MaximumConceptionUncontrolledBreeding=0.7
            RuminantTypeCohort Female2_3: Gender=Female; StartingAge=30; StartingNumber=1; StartingWeight=400; StartingWeightSD=0; Suckling=false
            RuminantTypeCohort Female3_4: Gender=Female; StartingAge=42; StartingNumber=1; StartingWeight=450; StartingWeightSD=0; Suckling=false
            RuminantTypeCohort Male1_2: Gender=Male; StartingAge=18; StartingNumber=2; StartingWeight=350; StartingWeightSD=0; Suckling=false
            RuminantTypeCohort Male2_3: Gender=Male; StartingAge=30; StartingNumber=1; StartingWeight=520; StartingWeightSD=0; Suckling=false
      Arbitrators
        RuminantArbitratorFeed Ruminant feed arbitrator
      Activities
        EnterpriseActivityManage Property overheads
          EnterpriseOverhead General farm maintenance: PaymentInterval=1; MonthDue=1; Amount=3333.33
          EnterpriseOverhead Fuel costs: PaymentInterval=1; MonthDue=1; Amount=2500
          EnterpriseOverhead Pest control: PaymentInterval=12; MonthDue=12; Amount=5000
          EnterpriseOverhead Contractors: PaymentInterval=12; MonthDue=10; Amount=30000
          EnterpriseOverhead Administration: PaymentInterval=1; MonthDue=1; Amount=1666.67
          EnterpriseOverhead Rates and Fees: PaymentInterval=12; MonthDue=7; Amount=15000
          EnterpriseOverhead Insurance: PaymentInterval=12; MonthDue=12; Amount=20000
          EnterpriseOverhead Electricity: PaymentInterval=3; MonthDue=1; Amount=2000
          EnterpriseOverhead Living costs: PaymentInterval=6; MonthDue=6; Amount=1000
        PastureActivityManage Manage native pasture: LandTypeNameToUse=Sandy loam country; FeedTypeName=Native Pasture; LandConditionIndexAtStart=2; UnitsOfArea=Squarekm; AreaRequested=50
          FodderLimitsFilterGroup Fodder limits: PoolValues=[0.6, 0.8, 1, 1, 1, 1, 1, 1, 1, 1, 1, 1]; StrictLimits=false
            RuminantFilter Filter[Breed=Bos indicus]: Parameter=Breed; Operator=Equal; Value=Bos indicus
        RuminantActivityBreed Breed Bos indicus: HerdName=Breeding; ControlledMatings=false; MaximumConceptionRateUncontrolled=0
        RuminantActivityFeed Feed female Bos indicus lucerne: FeedArbitratorName=Ruminant feed arbitrator; FeedTypeName=Lucerne; FeedStyle=SpecifiedDailyAmount; FeedPriority=10; LabourPriority=10
          RuminantFilterGroup FemaleBosIndicus: MonthlyValues=[2, 2, 2, 2, 0, 0, 0, 0, 0, 0, 0, 0]
            RuminantFilter Filter[HerdName=Breeding]: Parameter=HerdName; Operator=Equal; Value=Breeding
            RuminantFilter Filter[Gender=Female]: Parameter=Gender; Operator=Equal; Value=Female
        RuminantActivityGraze Graze ruminants located on pasture: FeedArbitratorName=Ruminant feed arbitrator; FeedPriority=0; HoursGrazed=6
        RuminantActivityGrow Grow all ruminants: EnergyGross=18.4
        RuminantActivityManage Manage Bos indicus herd: HerdName=Breeding; MaximumBreedersKept=60; MaximumBreederAge=120; MaximumSiresKept=5; MaximumBullAge=96; SellingAge=42; SellingWeight=580; ManagementMonth=10; MonthlyManagement=true; WeaningAge=9; WeaningWeight=250; VetCosts=3; DipCosts=2; VaccineCosts=2; SellFemalesLikeMales=false
        RuminantActivityMuster Muster
          RuminantMusterGroup Female Bos Indicus to paddock 1: ManagedPastureName=Manage native pasture; MusterOnLabourShortfall=true; PerformAtStartOfSimulation=true; Month=10; MoveSucklings=false
            RuminantFilter Filter[Breed=Bos indicus]: Parameter=Breed; Operator=Equal; Value=Bos indicus
            RuminantFilter Filter[Gender=Female]: Parameter=Gender; Operator=Equal; Value=Female
        RuminantActivitySellDryBreeders Identify Bos indicus dry breeders: HerdName=Breeding; SellFromManagedPaddock=false; MinimumConceptionBeforeSell=0.3; MonthsSinceBirth=24; ProportionToRemove=0.2
        RuminantActivityBuySell Buy and sell Bos indicus: BreedName=Bos indicus; BreedingSirePrice=4500; DistanceToMarket=200; CostPerKmTrucking=1.9; Number450kgPerTruck=20; YardFees=0; MLAFees=5; MinimumTrucksBeforeSelling=0; MinimumLoadBeforeSelling=0; SalesCommission=0
          RuminantPricing Prices: PricingStyle=perKg
            RuminantPriceEntry Female calves: Gender=Female; Age=0; PurchaseValue=2; SellValue=2
            RuminantPriceEntry Female weaners: Gender=Female; Age=9; PurchaseValue=1.8; SellValue=1.8
            RuminantPriceEntry Female 1-3y: Gender=Female; Age=12; PurchaseValue=1.6; SellValue=1.6
            RuminantPriceEntry Female 3+y: Gender=Female; Age=36; PurchaseValue=1.2; SellValue=1.2
            RuminantPriceEntry Male calves: Gender=Male; Age=0; PurchaseValue=2; SellValue=2
            RuminantPriceEntry Male weaners: Gender=Male; Age=9; PurchaseValue=1.8; SellValue=1.8
            RuminantPriceEntry Male 1-3y: Gender=Male; Age=12; PurchaseValue=1.6; SellValue=1.6
            RuminantPriceEntry Male 3+y: Gender=Male; Age=36; PurchaseValue=1.5; SellValue=1.5
        RuminantActivityPredictiveStocking Stock Bos indicus: AssessmentMonth=6; DrySeasonLength=5; FeedLowLimit=200; MinimumBreederAgeLimit=0; MinimumFeedBeforeRestock=1000; SellDryCows=false; SellWetCows=false; SellSteers=true
        RuminantActivityTrade Trade Bos indicus: HerdName=Trade
        LabourActivityOffFarm Off farm labour
          LabourOffFarmFilterGroup Hired ploughing: DailyRate=100; DaysWorkAvailableEachMonth=[2, 2, 2, 1, 1, 1, 0, 0, 0, 1, 1.2, 1.5]; NumberOfPeople=1; Priority=2
            LabourFilter Filter[Name=Joe B.]: Parameter=Name; Operator=Equal; Value=Joe B.
        SummariseRuminantHerd SummariseHerd
      Report GeneralLedger: EventNames=[Resources].Finances.General account.OnTransactionOccurred
        VariableNames:
          Name as ZoneName
          [Clock].Today as Date
          [Resources].Finances.General account.LastTransaction.Credit as Credit
          [Resources].Finances.General account.LastTransaction.Debit as Debit
          [Resources].Finances.General account.LastTransaction.Sender as Sender
          [Resources].Finances.General account.LastTransaction.Reason as Reason
      Report HerdLedger: EventNames=[Resources].Ruminants.OnHerdChanged
        VariableNames:
          Name as ZoneName
          [Clock].Today
          [Resources].Ruminants.LastIndividualChanged.ID as UId
          [Resources].Ruminants.LastIndividualChanged.Breed as Breed
          [Resources].Ruminants.LastIndividualChanged.HerdName as Herd
          [Resources].Ruminants.LastIndividualChanged.GenderAsString as Sex
          [Resources].Ruminants.LastIndividualChanged.Age as Age
          [Resources].Ruminants.LastIndividualChanged.Weight as Weight
          [Resources].Ruminants.LastIndividualChanged.SaleFlagAsString as Reason
          [Resources].Ruminants.LastIndividualChanged.PopulationChangeDirection as Change
      Report HerdSummary: EventNames=[Activities].SummariseHerd.OnReportItemGenerated
        VariableNames:
          Name as ZoneName
          [Clock].Today
          [Activities].SummariseHerd.ReportDetails.Breed as Breed
          [Activities].SummariseHerd.ReportDetails.Herd as Herd
          [Activities].SummariseHerd.ReportDetails.Age as AgeGroup
          [Activities].SummariseHerd.ReportDetails.Sex as Sex
          [Activities].SummariseHerd.ReportDetails.Number as Num
          [Activities].SummariseHerd.ReportDetails.AverageWeight as AvgWt
          [Activities].SummariseHerd.ReportDetails.AverageWeightGain as AvgWtGn
          [Activities].SummariseHerd.ReportDetails.AverageIntake as AvgIntake
          [Activities].SummariseHerd.ReportDetails.AdultEquivalents as AE
          [Activities].SummariseHerd.ReportDetails.NumberPregnant as NoPregnant
          [Activities].SummariseHerd.ReportDetails.NumberOfBirths as Births
  DataStore
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