Simulations: Version=2
  Simulation
    Weather: FileName=Harwood.met
    Clock: StartDate=1993-09-21; EndDate=1995-09-29
    Summary summaryfile
    Zone WholeFarm: Area=1; Slope=0
      Resources
        AnimalFoodStore
          AnimalFoodStoreType Lucerne: DryMatter=50; DMD=50; Nitrogen=0.5; StartingAmount=100000; PurchaseAsNeeded=false; KgPerUnitPurchased=0; CostPerUnitPurchased=0; LabourPerUnitPurchased=0; OtherCosts=0
          AnimalFoodStoreType Maize: DryMatter=50; DMD=50; Nitrogen=20; StartingAmount=100; PurchaseAsNeeded=false; KgPerUnitPurchased=0; CostPerUnitPurchased=0; LabourPerUnitPurchased=0; OtherCosts=0
          AnimalFoodStoreType CutGrass: DryMatter=50; DMD=50; Nitrogen=20; StartingAmount=100; PurchaseAsNeeded=false; KgPerUnitPurchased=0; CostPerUnitPurchased=0; LabourPerUnitPurchased=0; OtherCosts=0
          AnimalFoodStoreType BoughtSupplement: DryMatter=50; DMD=50; Nitrogen=20; StartingAmount=100; PurchaseAsNeeded=false; KgPerUnitPurchased=0; CostPerUnitPurchased=0; LabourPerUnitPurchased=0; OtherCosts=0
        GrazeFoodStore
          GrazeFoodStoreType Native Pasture: DryMatter=0; DMD=0; Nitrogen=0; StartingAmount=1000; DecayNitrogen=0.35; MinimumNitrogen=0.4; DecayDMD=0.1; MinimumDMD=0.43; DetachRate=0.03; CarryoverDetachRate=0.12
        Land: UnitOfArea=Hectares
          LandType Sandy loam country: LandArea=100; UnusablePortion=0; BundedPortion=0; SoilType=1; NDecline=1000
          LandType Cracking clay plains: LandArea=50; UnusablePortion=0; BundedPortion=0; SoilType=2; NDecline=1000
        LabourFamily: AllowAging=false
          LabourFamilyType Joe B.: InitialAge=42; Gender=Male; MaxLabourSupply=[25, 25, 25, 25, 25, 25, 25, 25, 25, 25, 25, 25]
          LabourFamilyType Jane D.: InitialAge=40; Gender=Female; MaxLabourSupply=[25, 25, 25, 25, 25, 25, 25, 25, 25, 25, 25, 25]
        LabourHired
        RuminantHerd Ruminants
          RuminantType Breeding: Breed=Bos indicus; EMaintCoefficient=0.35; EMaintIntercept=0.503; EMaintExponent=0; EGrowthCoefficient=0.79; EGrowthIntercept=0; ELactationCoefficient=0.35; ELactationIntercept=0.42; Kme=1; GrowthEnergyIntercept1=6.7; GrowthEnergyIntercept2=20.3; GrowthEfficiency=1.09; SRWFemale=500; SRWMaleMultiplier=1.2; SRWBirth=0.08; AgeGrowthRateCoefficient=0.0115; SRWGrowthScalar=0.32; IntakeCoefficient=0.024; IntakeIntercept=1.7; ProteinCoefficient=120; BaseAnimalEquivalent=450; GreenDietMax=98; GreenDietCoefficient=0.15; GreenDietZero=4; IntakeTropicalQuality=0.16; IntakeCoefficientQuality=1.7; IntakeCoefficientBiomass=0.006; StrictFeedingLimits=true; MilkIntakeCoefficient=0.1206; MilkIntakeIntercept=3.8146; MilkIntakeMaximum=20; MilkLWTFodderSubstitutionProportion=0.2; MaxJuvenileIntake=0.035; ProportionalDiscountDueToMilk=0.3; ProportionOfMaxWeightToSurvive=0.5; LactatingPotentialModifierConstantA=0.42; LactatingPotentialModifierConstantB=61; LactatingPotentialModifierConstantC=1.7; MaximumSizeOfIndividual=1.2; MortalityBase=0.03; MortalityCoefficient=2.5; MortalityIntercept=0.05; MortalityExponent=3; JuvenileMortalityCoefficient=3; JuvenileMortalityMaximum=0.2; JuvenileMortalityExponent=1.8; WoolCoefficient=0; CashmereCoefficient=0; MilkCurveSuckling=0.6; MilkCurveNonSuckling=0.11; MilkingDays=300; MilkPeakYield=20; MilkOffsetDay=4; MilkPeakDay=45; InterParturitionIntervalIntercept=10.847; InterParturitionIntervalCoefficient=-0.7994; GestationLength=9; MinimumAge1stMating=24; MinimumSize1stMating=0.5; TwinRate=0; CriticalCowWeight=0.5; MaximumMaleMatingsPerDay=30; PrenatalMortality=7.9; MaximumConceptionUncontrolledBreeding=0.7
            RuminantTypeCohort Female1_2: Gender=Female; StartingAge=18; StartingNumber=1; StartingWeight=270; StartingWeightSD=0; Suckling=false
            RuminantTypeCohort Male1_2: Gender=Male; StartingAge=18; StartingNumber=1; StartingWeight=270; StartingWeightSD=0; Suckling=false
      Arbitrators
        RuminantArbitratorFeed Ruminant feed arbitrator
      Activities
        RuminantActivityFeed Feed Bos indicus lucerne: FeedArbitratorName=Ruminant feed arbitrator; FeedTypeName=Lucerne; FeedStyle=ProportionOfPotentialIntake; FeedPriority=10; LabourPriority=10
          RuminantFilterGroup FemaleBosIndicus: MonthlyValues=[1, 1, 1, 1, 1, 1, 1, 1, 1, 1, 1, 1]
            RuminantFilter Filter[HerdName=Breeding]: Parameter=HerdName; Operator=Equal; Value=Breeding
            RuminantFilter Filter[Gender=Female]: Parameter=Gender; Operator=Equal; Value=Female
          RuminantFilterGroup MaleBosIndicus
            MonthlyValues=[0.5, 0.5, 0.5, 0.5, 0.5, 0.5, 0.5, 0.5, 0.5, 0.5, 0.5, 0.5]
            RuminantFilter Filter[HerdName=Breeding]: Parameter=HerdName; Operator=Equal; Value=Breeding
            RuminantFilter Filter[Gender=Male]: Parameter=Gender; Operator=Equal; Value=Male
        RuminantActivityGrow Grow all ruminants: EnergyGross=18.4
        SummariseRuminantHerd SummariseHerd
      Report HerdLedger: EventNames=[Resources].Ruminants.OnHerdChanged
        VariableNames:
          Name as ZoneName
          [Clock].Today
          [Resources].Ruminants.LastIndividualChanged.ID as UId
          [Resources].Ruminants.LastIndividualChanged.Breed as Breed
          [Resources].Ruminants.LastIndividualChanged.HerdName as Herd
          [Resources].Ruminants.LastIndividualChanged.GenderAsString as Sex
          [Resources].Ruminants.LastIndividualChanged.Age as Age
          [Resources].Ruminants.LastIndividualChanged.Weight as Weight
          [Resources].Ruminants.LastIndividualChanged.SaleFlagAsString as Reason
      Report HerdSummary: EventNames=[Activities].SummariseHerd.OnReportItemGenerated
        VariableNames:
          Name as ZoneName
          [Clock].Today
          [Activities].SummariseHerd.ReportDetails.Breed as Breed
          [Activities].SummariseHerd.ReportDetails.Herd as Herd
          [Activities].SummariseHerd.ReportDetails.Age as AgeGroup
          [Activities].SummariseHerd.ReportDetails.Sex as Sex
          [Activities].SummariseHerd.ReportDetails.Number as Num
          [Activities].SummariseHerd.ReportDetails.AverageWeight as AvgWt
          [Activities].SummariseHerd.ReportDetails.AverageWeightGain as AvgWtGn
          [Activities].SummariseHerd.ReportDetails.AverageIntake as AvgIntake
          [Activities].SummariseHerd.ReportDetails.AdultEquivalents as AE
          [Activities].SummariseHerd.ReportDetails.NumberPregnant as NoPregnant
          [Activities].SummariseHerd.ReportDetails.NumberOfBirths as Births
  DataStore
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