Simulations: Version=15
  Simulation
    FileGRASP File GRASP: FileName=GRASP_FZHlCk_Blk_NABSAdb.CSV
    Clock: StartDate=1995-01-01; EndDate=2009-12-31
    Summary summaryfile
    WholeFarm WF_NABSANthQLDSn00Baseline_v1: Area=1; Slope=0; RandomSeed=0; EcologicalIndicatorsCalculationInterval=12; EcologicalIndicatorsCalculationMonth=9
      ResourcesHolder Resources
        Land: UnitOfArea=Hectares
          LandType NthQld_NtvPast_SandyCntry: LandArea=30000; UnusablePortion=30; BundedPortion=0; SoilType=1; NDecline=3000
          LandType NthQld_CrackingClayPlains: LandArea=250; UnusablePortion=0; BundedPortion=0; SoilType=3; NDecline=4000
        Finance Finances
          FinanceType General account: OpeningBalance=10000000; WithdrawalLimit=-5000; InterestRateCharged=7.5; InterestRatePaid=2
        GrazeFoodStore
          GrazeFoodStoreType Native Pasture: NToDMDCoefficient=11.03; NToDMDIntercept=41.4; GreenNitrogen=2; DecayNitrogen=0.35; MinimumNitrogen=4; DecayDMD=0.1; MinimumDMD=43; DetachRate=0.03; CarryoverDetachRate=0.12; IntakeTropicalQualityCoefficient=0.16; IntakeQualityCoefficient=1.7
        AnimalFoodStore
          AnimalFoodStoreType Lucerne: DryMatter=61; DMD=61; Nitrogen=7; CurrentStoreNitrogen=0; StartingAmount=10000
          AnimalFoodStoreType Maize: DryMatter=50; DMD=50; Nitrogen=20; CurrentStoreNitrogen=0; StartingAmount=100
          AnimalFoodStoreType BoughtSupplement_SorghumStraw: DryMatter=80; DMD=47; Nitrogen=0.7; CurrentStoreNitrogen=0; StartingAmount=100
        RuminantHerd Ruminants
          RuminantType BosIndicus: Breed=Bos indicus; EMaintCoefficient=0.35; EMaintIntercept=0.503; EMaintExponent=0; EGrowthCoefficient=0.79; EGrowthIntercept=0; ELactationCoefficient=0.35; ELactationIntercept=0.42; Kme=1; GrowthEnergyIntercept1=6.7; GrowthEnergyIntercept2=20.3; GrowthEfficiency=1.09; SRWFemale=500; SRWMaleMultiplier=1.2; SRWBirth=0.08; AgeGrowthRateCoefficient=0.0115; SRWGrowthScalar=0.32; IntakeCoefficient=0.024; IntakeIntercept=1.7; ProteinCoefficient=120; BaseAnimalEquivalent=450; GreenDietMax=98; GreenDietCoefficient=0.15; GreenDietZero=4; IntakeTropicalQuality=0.16; IntakeCoefficientQuality=1.7; IntakeCoefficientBiomass=0.006; StrictFeedingLimits=true; MilkIntakeCoefficient=0.1206; MilkIntakeIntercept=3.8146; MilkIntakeMaximum=20; MilkLWTFodderSubstitutionProportion=0.2; MaxJuvenileIntake=0.035; ProportionalDiscountDueToMilk=0.3; ProportionOfMaxWeightToSurvive=0.5; LactatingPotentialModifierConstantA=0.42; LactatingPotentialModifierConstantB=61; LactatingPotentialModifierConstantC=1.7; MaximumSizeOfIndividual=1.2; MortalityBase=0.03; MortalityCoefficient=2.5; MortalityIntercept=0.05; MortalityExponent=3; JuvenileMortalityCoefficient=3; JuvenileMortalityMaximum=0.2; JuvenileMortalityExponent=1.8; WoolCoefficient=0; CashmereCoefficient=0; MilkCurveSuckling=0.6; MilkCurveNonSuckling=0.11; MilkingDays=300; MilkPeakYield=20; MilkOffsetDay=4; MilkPeakDay=45; InterParturitionIntervalIntercept=10.847; InterParturitionIntervalCoefficient=-0.7994; GestationLength=9; MinimumAge1stMating=24; MinimumSize1stMating=0.5; TwinRate=0; CriticalCowWeight=0.5; ConceptionRateCoefficent=[-12.634, -14.247, -11, -9.8353]; ConceptionRateIntercept=[7.073, 5.182, 8.6, 6.754]; ConceptionRateAsymptote=[90, 90, 90, 95]; MaximumMaleMatingsPerDay=30; PrenatalMortality=7.9; MaximumConceptionUncontrolledBreeding=0.7; MethaneProductionIntercept=35.16; MethaneProductionCoefficient=-34.8
            RuminantInitialCohorts Initial cohorts
              RuminantTypeCohort CalfF: Gender=Female; StartingAge=5; StartingNumber=200; StartingWeight=40; StartingWeightSD=0; Suckling=true
              RuminantTypeCohort CalfM: Gender=Male; StartingAge=5; StartingNumber=200; StartingWeight=40; StartingWeightSD=0; Suckling=true
              RuminantTypeCohort WeanerF: Gender=Female; StartingAge=5; StartingNumber=500; StartingWeight=180; StartingWeightSD=0; Suckling=false
              RuminantTypeCohort WeanerM: Gender=Male; StartingAge=5; StartingNumber=500; StartingWeight=180; StartingWeightSD=0; Suckling=false
              RuminantTypeCohort Female1_2: Gender=Female; StartingAge=18; StartingNumber=200; StartingWeight=270; StartingWeightSD=0; Suckling=false
              RuminantTypeCohort Female2_3: Gender=Female; StartingAge=30; StartingNumber=200; StartingWeight=400; StartingWeightSD=0; Suckling=false
              RuminantTypeCohort Female3_4: Gender=Female; StartingAge=42; StartingNumber=200; StartingWeight=450; StartingWeightSD=0; Suckling=false
              RuminantTypeCohort Female4_5: Gender=Female; StartingAge=54; StartingNumber=180; StartingWeight=460; StartingWeightSD=0; Suckling=false
              RuminantTypeCohort Female5_6: Gender=Female; StartingAge=66; StartingNumber=180; StartingWeight=470; StartingWeightSD=0; Suckling=false
              RuminantTypeCohort Female6_7: Gender=Female; StartingAge=78; StartingNumber=150; StartingWeight=480; StartingWeightSD=0; Suckling=false
              RuminantTypeCohort Female7_8: Gender=Female; StartingAge=90; StartingNumber=150; StartingWeight=480; StartingWeightSD=0; Suckling=false
              RuminantTypeCohort Female8_9: Gender=Female; StartingAge=102; StartingNumber=150; StartingWeight=490; StartingWeightSD=0; Suckling=false
              RuminantTypeCohort Female9_10: Gender=Female; StartingAge=114; StartingNumber=150; StartingWeight=500; StartingWeightSD=0; Suckling=false
              RuminantTypeCohort Male1_2: Gender=Male; StartingAge=18; StartingNumber=200; StartingWeight=350; StartingWeightSD=0; Suckling=false
              RuminantTypeCohort Male2_3: Gender=Male; StartingAge=30; StartingNumber=200; StartingWeight=520; StartingWeightSD=0; Suckling=false
              RuminantTypeCohort Male3_4: Gender=Male; StartingAge=42; StartingNumber=0; StartingWeight=610; StartingWeightSD=0; Suckling=false
              RuminantTypeCohort Breeding_sires: Gender=Male; StartingAge=36; StartingNumber=60; StartingWeight=720; StartingWeightSD=0; Suckling=false
            AnimalPricing Prices: PricingStyle=perKg
              AnimalPriceEntry Female calves: Gender=Female; Age=0; PurchaseValue=2; SellValue=2
              AnimalPriceEntry Female weaners: Gender=Female; Age=9; PurchaseValue=1.8; SellValue=1.8
              AnimalPriceEntry Female 1-3y: Gender=Female; Age=12; PurchaseValue=1.6; SellValue=1.6
              AnimalPriceEntry Female 3+y: Gender=Female; Age=36; PurchaseValue=1.2; SellValue=1.2
              AnimalPriceEntry Male calves: Gender=Male; Age=0; PurchaseValue=2; SellValue=2
              AnimalPriceEntry Male weaners: Gender=Male; Age=9; PurchaseValue=1.8; SellValue=1.8
              AnimalPriceEntry Male 1-3y: Gender=Male; Age=12; PurchaseValue=1.6; SellValue=1.6
              AnimalPriceEntry Male 3+y: Gender=Male; Age=36; PurchaseValue=1.5; SellValue=1.5
        GreenhouseGases
          GreenhouseGasesType Methane store: StartingAmount=1100; GlobalWarmingPotential=25
          GreenhouseGasesType Methane: StartingAmount=0; GlobalWarmingPotential=25
          GreenhouseGasesType CO2: StartingAmount=0; GlobalWarmingPotential=1
          GreenhouseGasesType NOx: StartingAmount=0; GlobalWarmingPotential=298
      ActivitiesHolder Activities
        ActivityFolder Cash flow: OnPartialResourcesAvailableAction=ReportErrorAndStop
          FinanceActivityCalculateInterest Bank interest: OnPartialResourcesAvailableAction=SkipActivity
          FinanceActivityPayOverhead General farm maintenance: OnPartialResourcesAvailableAction=SkipActivity; PaymentInterval=1; MonthDue=1; Amount=40000; AccountName=General account
          FinanceActivityPayOverhead Fuel costs: OnPartialResourcesAvailableAction=SkipActivity; PaymentInterval=1; MonthDue=1; Amount=30000; AccountName=General account
          FinanceActivityPayOverhead Pest control: OnPartialResourcesAvailableAction=SkipActivity; PaymentInterval=12; MonthDue=12; Amount=5000; AccountName=General account
          FinanceActivityPayOverhead Contractors: OnPartialResourcesAvailableAction=SkipActivity; PaymentInterval=12; MonthDue=10; Amount=30000; AccountName=General account
          FinanceActivityPayOverhead Administration: OnPartialResourcesAvailableAction=SkipActivity; PaymentInterval=1; MonthDue=1; Amount=1666.67; AccountName=General account
          FinanceActivityPayOverhead Rates and Fees: OnPartialResourcesAvailableAction=SkipActivity; PaymentInterval=12; MonthDue=7; Amount=15000; AccountName=General account
          FinanceActivityPayOverhead Insurance: OnPartialResourcesAvailableAction=SkipActivity; PaymentInterval=12; MonthDue=12; Amount=20000; AccountName=General account
          FinanceActivityPayOverhead Electricity: OnPartialResourcesAvailableAction=SkipActivity; PaymentInterval=3; MonthDue=1; Amount=2000; AccountName=General account
          FinanceActivityPayOverhead Living costs: OnPartialResourcesAvailableAction=SkipActivity; PaymentInterval=6; MonthDue=6; Amount=1000; AccountName=General account
        ActivityFolder Manage paddocks: OnPartialResourcesAvailableAction=ReportErrorAndStop
          PastureActivityManage Native pasture paddock: OnPartialResourcesAvailableAction=UseResourcesAvailable; Region=1; SoilNumber=1; LandTypeNameToUse=NthQld_NtvPast_SandyCntry; FeedTypeName=Native Pasture; StartingAmount=2000; StartingStockingRate=1; UnitsOfArea=Hectares; AreaRequested=30000; EcolCalculationMonth=9; EcolCalculationInterval=12
            Relationship LandConditionIndex: StartingValue=2; Minumum=0; Maximum=11; XValues=[0, 15, 35, 100]; YValues=[-1.5, -0.3, 0.3, 1.5]
            Relationship GrassBasalArea: StartingValue=3; Minumum=0; Maximum=3; XValues=[0, 15, 35, 100]; YValues=[-0.75, -0.15, 0.15, 0.75]
        ActivityFolder Manage breeding herd: OnPartialResourcesAvailableAction=ReportErrorAndStop
          RuminantActivityFeed Feed Bos indicus lucerne: OnPartialResourcesAvailableAction=UseResourcesAvailable; FeedTypeName=Lucerne; ProportionTramplingWastage=0; FeedStyle=ProportionOfPotentialIntake
            RuminantFeedGroup BosIndicus: MonthlyValues=[1, 1, 1, 1, 1, 1, 1, 1, 1, 1, 1, 1]
              RuminantFilter Filter[HerdName=BosIndicus]: Parameter=HerdName; Operator=Equal; Value=BosIndicus
          RuminantActivityGrow Grow all ruminants: OnPartialResourcesAvailableAction=ReportErrorAndStop; EnergyGross=18.4
          RuminantActivityBreed Breed Bos indicus: OnPartialResourcesAvailableAction=ReportErrorAndStop; HerdName=BosIndicus; MaximumConceptionRateUncontrolled=0.8
            ControlledMatingSettings Controlled mating: BreedInterval=12; MonthDue=8
          RuminantActivityManage Manage Bos indicus herd: OnPartialResourcesAvailableAction=ReportErrorAndStop; HerdName=BosIndicus; MaximumBreedersKept=1800; MaximumBreederAge=120; MaximumSiresKept=60; MaximumBullAge=96; AllowSireReplacement=false; MaleSellingAge=0; MaleSellingWeight=0; ManagementMonth=10; MonthlyManagement=false; WeaningAge=9; WeaningWeight=250; GrazeFoodStoreName=Native Pasture; MinimumPastureBeforeRestock=3000; SellFemalesLikeMales=false
          RuminantActivityBuySell Buy and sell Bos indicus: OnPartialResourcesAvailableAction=ReportErrorAndStop; BreedName=Bos indicus; BreedingSirePrice=4500; BankAccountName=General account
            RuminantSaleFee MLA Fee: PaymentStyle=perHead; Amount=2
            RuminantSaleFee Yard Fees: PaymentStyle=perHead; Amount=2
            RuminantSaleFee Sales commission: PaymentStyle=ProportionOfTotalSales; Amount=0.02
            TruckingSettings Trucking details: DistanceToMarket=120; CostPerKmTrucking=5; Number450kgPerTruck=100; MinimumTrucksBeforeSelling=0; MinimumLoadBeforeSelling=0
          RuminantActivityHerdCost Vet costs: OnPartialResourcesAvailableAction=ReportErrorAndStop; PaymentInterval=6; MonthDue=2; Amount=2; PaymentStyle=perHead; AccountName=General account
            RuminantFilterGroup BosIndicus
              RuminantFilter Filter[HerdName=Breeding]: Parameter=HerdName; Operator=Equal; Value=Breeding
          RuminantActivityHerdCost Vaccines and drenches: OnPartialResourcesAvailableAction=SkipActivity; PaymentInterval=5; MonthDue=7; Amount=200; PaymentStyle=Fixed; AccountName=General account
          RuminantActivityHerdCost Dips and sprays: OnPartialResourcesAvailableAction=SkipActivity; PaymentInterval=12; MonthDue=5; Amount=5; PaymentStyle=perAE; AccountName=General account
            RuminantFilterGroup BosIndicus
              RuminantFilter Filter[HerdName=Breeding]: Parameter=HerdName; Operator=Equal; Value=Breeding
        SummariseRuminantHerd SummariseHerd
      Folder Reports
        Report HerdLedger: EventNames=[Resources].Ruminants.TransactionOccurred
          VariableNames:
            [Clock].Today
            [Resources].Ruminants.LastTransaction.ExtraInformation.ID as UId
            [Resources].Ruminants.LastTransaction.ExtraInformation.Breed as Breed
            [Resources].Ruminants.LastTransaction.ExtraInformation.HerdName as Herd
            [Resources].Ruminants.LastTransaction.ExtraInformation.GenderAsString as Sex
            [Resources].Ruminants.LastTransaction.ExtraInformation.Age as Age
            [Resources].Ruminants.LastTransaction.ExtraInformation.Weight as Weight
            [Resources].Ruminants.LastTransaction.ExtraInformation.SaleFlagAsString as Reason
            [Resources].Ruminants.LastTransaction.ExtraInformation.PopulationChangeDirection as Change
        Report HerdSummary: EventNames=[Activities].SummariseHerd.OnReportItemGenerated
          VariableNames:
            [Clock].Today
            [Activities].SummariseHerd.ReportDetails.Breed as Breed
            [Activities].SummariseHerd.ReportDetails.Herd as Herd
            [Activities].SummariseHerd.ReportDetails.Age as AgeGroup
            [Activities].SummariseHerd.ReportDetails.Sex as Sex
            [Activities].SummariseHerd.ReportDetails.Number as Num
            [Activities].SummariseHerd.ReportDetails.AverageWeight as AvgWt
            [Activities].SummariseHerd.ReportDetails.AverageWeightGain as AvgWtGn
            [Activities].SummariseHerd.ReportDetails.AverageIntake as AvgIntake
            [Activities].SummariseHerd.ReportDetails.AdultEquivalents as AE
            [Activities].SummariseHerd.ReportDetails.NumberPregnant as NoPregnant
            [Activities].SummariseHerd.ReportDetails.NumberOfBirths as Births
        Report FinancesLedger: EventNames=[Resources].Finances.TransactionOccurred
          VariableNames:
            [Clock].Today as Date
            [Resources].Finances.LastTransaction.Credit as Credit
            [Resources].Finances.LastTransaction.Debit as Debit
            [Resources].Finances.LastTransaction.ResourceType as Resource
            [Resources].Finances.LastTransaction.Activity as Activity
            [Resources].Finances.LastTransaction.Reason as Reason
        Report LandLedger: EventNames=[Resources].Land.TransactionOccurred
          VariableNames:
            [Clock].Today as Date
            [Resources].Land.LastTransaction.Credit as Credit
            [Resources].Land.LastTransaction.Debit as Debit
            [Resources].Land.LastTransaction.ResourceType as Resource
            [Resources].Land.LastTransaction.Activity as Activity
            [Resources].Land.LastTransaction.Reason as Reason
        Report AnimalFoodLedger: EventNames=[Resources].AnimalFoodStore.TransactionOccurred
          VariableNames:
            [Clock].Today as Date
            [Resources].AnimalFoodStore.LastTransaction.Credit as Credit
            [Resources].AnimalFoodStore.LastTransaction.Debit as Debit
            [Resources].AnimalFoodStore.LastTransaction.ResourceType as Resource
            [Resources].AnimalFoodStore.LastTransaction.Activity as Activity
        Report ResourceShortfallLedger: EventNames=[Activities].ResourceShortfallOccurred
          VariableNames:
            [Clock].Today as Date
            [Activities].LastShortfallResourceRequest.ResourceType.Name as Resource
            [Activities].LastShortfallResourceRequest.ResourceTypeName as Type
            [Activities].LastShortfallResourceRequest.ActivityModel.Name as Activity
            [Activities].LastShortfallResourceRequest.Reason as Reason
            [Activities].LastShortfallResourceRequest.Required as Required
            [Activities].LastShortfallResourceRequest.Available as Available
        Report Pasture: EventNames=[Clock].EndOfMonth
          VariableNames:
            [Clock].Today as Date
            [Resources].GrazeFoodStore.Native Pasture.TonnesPerHectare as NativePasture
        Report GreenhouseGases: EventNames=[Resources].GreenhouseGases.TransactionOccurred
          VariableNames:
            [Clock].Today as Date
            [Resources].GreenhouseGases.LastTransaction.Credit as Credit
            [Resources].GreenhouseGases.LastTransaction.CreditStandardised as CreditCO2e
            [Resources].GreenhouseGases.LastTransaction.ResourceType as Resource
            [Resources].GreenhouseGases.LastTransaction.Activity as Activity
            [Resources].GreenhouseGases.LastTransaction.Reason as Reason
  DataStore
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