Simulations
  DataStore
  Simulation Test1: Area=0; Slope=0
    Clock: StartDate=2000-07-01; EndDate=2001-06-30
    WeatherFile: FileName=..\WeatherFiles\Ruakura.met
    Manager SetCO2
      ambientCO2 = 380
```csharp
using System;
using Models.Core;
using Models.PMF;
namespace Models
{
	[Serializable]
	public class Script : Model
	{      
	[Link] WeatherFile MetData;
	[Link] Clock Clock;
	
	[Description("Ambient CO2 concentration (ppm):")]
	public double ambientCO2 {get; set;} //= 350;
	
    [EventSubscribe("Commencing")]
    private void OnSimulationCommencing(object sender, EventArgs e)
	{
		MetData.CO2 = ambientCO2;
	}
	}
}
```
    Summary
    Zone Field: Area=0; Slope=0
      MicroClimate: air_pressure=1010; soil_emissivity=0.96; sun_angle=15; soil_heat_flux_fraction=0.4; night_interception_fraction=0.5; windspeed_default=3; refheight=2; albedo=0.293662; emissivity=0.96; gsmax=0.01; r50=200; a_interception=0; b_interception=0; c_interception=0; d_interception=0; soil_albedo=0.23
      Irrigation
      Fertiliser
      SurfaceOrganicMatter: ReportAdditions=no; ReportRemovals=no; PoolName=AgPasture; type=grass; mass=1000; standing_fraction=0; cnr=40; CriticalResidueWeight=2000; OptimumDecompTemp=20; MaxCumulativeEOS=20; CNRatioDecompCoeff=0.277; CNRatioDecompThreshold=25; TotalLeachRain=25; MinRainToLeach=10; CriticalMinimumOrganicC=0.004; DefaultCPRatio=0; DefaultStandingFraction=0; StandingExtinctCoeff=0.5; FractionFaecesAdded=0.5
        Pools:
          {PoolName=AgPasture, ResidueType=grass, Mass=1000, CNRatio=40, StandingFraction=0}
        ResidueTypes: LoadFromResource=ResidueTypes
        TillageTypes TillageTypesList
      Soil: SoilType=NZ_Sedimentary; Site=Winchmore; NearestTown=Ashburton; Region=Canterbury; Country=New Zealand; Latitude=-48.48; Longitude=0
        Analysis: Thickness=[150, 150, 200, 150, 250, 300, 300]; PH=[5.9, 5.9, 5.9, 5.9, 5.9, 5.9, 5.9]; PHUnits=Water; BoronUnits=HotWater
        Water
          Thickness  BD    AirDry  LL15   DUL    SAT    KS
          150        1.3   0.075   0.15   0.36   0.45   5000
          150        1.33  0.12    0.133  0.33   0.428  5000
          200        1.01  0.075   0.075  0.24   0.3    5000
          150        0.54  0.02    0.02   0.08   0.172  10000
          250        0.31  0.01    0.01   0.035  0.11   17500
          300        0.31  0.01    0.01   0.03   0.11   20000
          300        0.31  0.01    0.01   0.03   0.11   20000
          SoilCrop ryegrass_clover: LL=[0.15, 0.13, 0.08, 0.02, 0.01, 0.01, 0.01]; KL=[0.08, 0.08, 0.07, 0.04, 0.01, 0, 0]; XF=[1, 1, 1, 1, 1, 0, 0]
          SoilCrop agpasture: LL=[0.15, 0.13, 0.08, 0.02, 0.01, 0.01, 0.01]; KL=[0.08, 0.08, 0.07, 0.04, 0.01, 0, 0]; XF=[1, 1, 1, 1, 1, 0, 0]
          SoilCrop ryegrass: LL=[0.15, 0.13, 0.08, 0.02, 0.01, 0.01, 0.01]; KL=[0.1, 0.1, 0.1, 0.02, 0, 0, 0]; XF=[1, 1, 1, 1, 0, 0, 0]
          SoilCrop clover: LL=[0.15, 0.13, 0.08, 0.02, 0.01, 0.01, 0.01]; KL=[0.1, 0.1, 0.1, 0.02, 0, 0, 0]; XF=[1, 1, 1, 1, 0, 0, 0]
          SoilCrop maize: LL=[0.15, 0.13, 0.08, 0.02, 0.01, 0.01, 0.01]; KL=[0.06, 0.06, 0.06, 0.06, 0.06, 0.06, 0.06]; XF=[1, 1, 1, 1, 1, 1, 1]
          SoilCrop cotton: LL=[0.14, 0.14, 0.03, 0.02, 0.02, 0.02, 0.02]; KL=[0.1, 0.1, 0.1, 0.1, 0.09, 0.07, 0.05]; XF=[1, 1, 1, 1, 1, 1, 1]
          SoilCrop sorghum: LL=[0.14, 0.14, 0.03, 0.02, 0.02, 0.02, 0.02]; KL=[0.07, 0.07, 0.07, 0.05, 0.05, 0.04, 0.03]; XF=[1, 1, 1, 1, 1, 1, 0.9]
          SoilCrop slurp: LL=[0.14, 0.14, 0.03, 0.02, 0.02, 0.02, 0.02]; KL=[0.06, 0.06, 0.06, 0.06, 0.06, 0.06, 0.06]; XF=[1, 1, 1, 1, 1, 1, 1]
        SoilWater: min_crit_temp=5; max_crit_temp=35; max_albedo=0.23; A_to_evap_fact=0.44; canopy_eos_coef=1.7; sw_top_crit=0.9; sumes1_max=100; sumes2_max=25; solute_flow_eff=[1]; solute_flux_eff=[1]; gravity_gradient=2E-05; specific_bd=2.65; hydrol_effective_depth=450; immobile_solutes=[nh4]; canopy_fact=[1, 1, 0, 0]; canopy_fact_height=[0, 600, 1800, 30000]; canopy_fact_default=0.5; act_evap_method=ritchie; irrigation_will_runoff=false; irrigation_layer=0; slope=0; discharge_width=0; catchment_area=0; max_pond=0; SummerCona=3.5; SummerU=6; SummerDate=1-Nov; WinterCona=2; WinterU=2; WinterDate=1-apr; DiffusConst=88; DiffusSlope=35; Salb=0.13; CN2Bare=73; CNRed=20; CNCov=0.8
          Thickness  SWCON  KLAT
          150        0.5    0
          150        0.52   0
          200        0.55   0
          150        0.6    0
          250        0.65   0
          300        0.65   0
          300        0.65   0
          mobile_solutes=[no3, urea, cl, br, org_n, org_c_pool1, org_c_pool2, org_c_pool3]
        SoilNitrogen: fom_type=[default, manure, mucuna, lablab, shemp, stable]; fract_carb=[0.2, 0.3, 0.54, 0.57, 0.45, 0]; fract_cell=[0.7, 0.3, 0.37, 0.37, 0.47, 0.1]; fract_lign=[0.1, 0.4, 0.09, 0.06, 0.08, 0.9]; wfpsN2N2O_x=[22, 88]; wfpsN2N2O_y=[0.1, 1]
          oc=[3.76254, 2.4866, 1.24506, 0.499634, 0.250309, 0.150293, 0.100187]
        SoilOrganicMatter: RootCN=40; RootWt=800; SoilCN=11.3; EnrACoeff=7.4; EnrBCoeff=0.2; OCUnits=Total
          Thickness  OC    FBiom  FInert
          150        3.8   0.04   0.3
          150        2.5   0.02   0.5
          200        1.25  0.02   0.6
          150        0.5   0.01   0.8
          250        0.25  0.01   1
          300        0.15  0      1
          300        0.1   0      1
        InitialWater Initial water: PercentMethod=EvenlyDistributed; FractionFull=0.99
        Sample Initial nitrogen: NO3Units=ppm; NH4Units=ppm; SWUnits=Volumetric; OCUnits=Total; PHUnits=Water
          Thickness  NO3      NH4
          150        7.61905  0.1
          150        7.27008  0.1
          200        3.87147  0.1
          150        3.84025  0.1
          250        2.1      0.1
          300        1.2      0.1
          300        1.2      0.1
          999999     -        -
      AgPasture: alt_N_uptake=no; SwardName=AgPasture; NumSpecies=1; WaterUptakeSource=calc; SpeciesName=[Ryegrass]; SpeciesNType=[grass]; SpeciesCType=[C3]; InitialDMShoot=[2000]; InitialDMRoot=[500]; MinimumGreenWt=[300]; InitialRootDepth=[750]; ExpoLinearDepthParam=0.1; ExpoLinearCurveParam=3
      Report: EventNames=[Clock].DoReport
        VariableNames:
          [Clock].Today
          AgPasture.SwardName
          AgPasture.SpeciesName
          AgPasture.TotalPlantWt
          AgPasture.AboveGroundWt
          AgPasture.StandingPlantWt
          AgPasture.BelowGroundWt
          AgPasture.HarvestableWt
          AgPasture.SpeciesTotalWt
          AgPasture.SpeciesAboveGroundWt
          AgPasture.HarvestWt
          AgPasture.SpeciesHarvestWt
          AgPasture.LAI_total
          AgPasture.LAI_green
          AgPasture.LAI_dead
          AgPasture.PlantPotentialGrowthWt
          AgPasture.PlantGrowthNoNLimit
          AgPasture.PlantGrowthWt
          AgPasture.HerbageGrowthWt
          AgPasture.LitterDepositionWt
          AgPasture.RootSenescenceWt
          AgPasture.WaterDemand
          AgPasture.WaterSupply
          AgPasture.WaterUptake
          AgPasture.TotalPlantN
          AgPasture.NitrogenDemand
          AgPasture.PlantFixedN
          AgPasture.NitrogenUptake
          AgPasture.LitterDepositionN
          AgPasture.RootSenescenceN
          AgPasture.GLFtemp
          AgPasture.GLFwater
          AgPasture.GLFn
          AgPasture.GLFnConcentration
          AgPasture.GLFrgr
          AgPasture.GPP
          AgPasture.NitrogenSupply
          [SurfaceOrganicMatter].surfaceom_wt
          [Soil].SoilWater.drain
          [Soil].SoilWater.es as evaporation
          Evaluate sum([Soil].SoilNitrogen.no3) as TotalNO3
          Evaluate sum([Soil].SoilNitrogen.nh4) as TotalNH4
          Evaluate sum([Soil].SoilNitrogen.hum_n) as TotalHumusN
          Evaluate sum([Soil].SoilNitrogen.biom_n) as TotalBiomN
          Evaluate sum([Soil].SoilNitrogen.fom_n) as TotalFomN
          [SurfaceOrganicMatter].surfaceom_n
    Input Observed
  Simulation Test2: Area=0; Slope=0
    Clock: StartDate=2000-07-01; EndDate=2002-06-30
    WeatherFile: FileName=..\WeatherFiles\Ruakura.met
    Manager SetCO2: same as Test1.SetCO2
    Summary
    Zone Field: Area=0; Slope=0
      Manager CutRotation
        CutRotationDate = 1900-01-01
        CutInterval = 21
        PastureAmount = 1500
```csharp
using System;
using Models.Core;
using Models.PMF;
namespace Models
{
	[Serializable]
	public class Script : Model
	{      
		[Link] Clock Clock;
		[Link] AgPasture AgPasture;
		
		[Description("Date to begin rotation:")]
		public DateTime CutRotationDate {get; set;}
		[Description("Rotation interval (days):")]
		public int CutInterval {get; set;} //= 500;
		[Description("Residual amount of pasture (kg/ha):")]
		public double PastureAmount {get; set;} //= 500;
		
		private bool RotationAllowed = false;
		private int DaysAfterCut { get; set; }
		
        [EventSubscribe("Commencing")]
        private void OnSimulationCommencing(object sender, EventArgs e)
		{
		DaysAfterCut = 1000;
		}
		
		[EventSubscribe("DoManagement")]
		private void OnDoManagement(object sender, EventArgs e)
		{
			if (Clock.Today.Date >= CutRotationDate)
			{
				if (DaysAfterCut >= CutInterval)
				{
					AgPasture.Graze(type:"SetResidueAmount",amount:PastureAmount);
					DaysAfterCut = 0;
				}
				else
				{
					DaysAfterCut += 1;
				}
			}
		}
	}
}
```
      MicroClimate: same as Test1.Field.MicroClimate
      Irrigation
      Fertiliser
      SurfaceOrganicMatter: same as Test1.Field.SurfaceOrganicMatter
      Soil: SoilType=NZ_Sedimentary; Site=Winchmore; NearestTown=Ashburton; Region=Canterbury; Country=New Zealand; Latitude=-48.48; Longitude=0
        Analysis: same as Test1.Field.Soil.Analysis
        Water: same as Test1.Field.Soil.Water
        SoilWater: same as Test1.Field.Soil.SoilWater
        SoilNitrogen: fom_type=[default, manure, mucuna, lablab, shemp, stable]; fract_carb=[0.2, 0.3, 0.54, 0.57, 0.45, 0]; fract_cell=[0.7, 0.3, 0.37, 0.37, 0.47, 0.1]; fract_lign=[0.1, 0.4, 0.09, 0.06, 0.08, 0.9]; wfpsN2N2O_x=[22, 88]; wfpsN2N2O_y=[0.1, 1]
          oc=[3.70769, 2.46858, 1.23789, 0.498246, 0.250185, 0.150347, 0.100196]
        SoilOrganicMatter: same as Test1.Field.Soil.SoilOrganicMatter
        InitialWater Initial water: PercentMethod=EvenlyDistributed; FractionFull=0.99
        Sample Initial nitrogen: same as Test1.Field.Soil.Initial nitrogen
      AgPasture: same as Test1.Field.AgPasture
      Report: EventNames=[Clock].DoReport
        VariableNames:
          [Clock].Today
          AgPasture.SwardName
          AgPasture.SpeciesName
          AgPasture.TotalPlantWt
          AgPasture.AboveGroundWt
          AgPasture.StandingPlantWt
          AgPasture.BelowGroundWt
          AgPasture.HarvestableWt
          AgPasture.SpeciesTotalWt
          AgPasture.SpeciesAboveGroundWt
          AgPasture.HarvestWt
          AgPasture.SpeciesHarvestWt
          AgPasture.LAI_total
          AgPasture.LAI_green
          AgPasture.LAI_dead
          AgPasture.PlantPotentialGrowthWt
          AgPasture.PlantGrowthNoNLimit
          AgPasture.PlantGrowthWt
          AgPasture.HerbageGrowthWt
          AgPasture.LitterDepositionWt
          AgPasture.RootSenescenceWt
          AgPasture.WaterDemand
          AgPasture.WaterSupply
          AgPasture.WaterUptake
          AgPasture.TotalPlantN
          AgPasture.NitrogenDemand
          AgPasture.PlantFixedN
          AgPasture.NitrogenUptake
          AgPasture.LitterDepositionN
          AgPasture.RootSenescenceN
          AgPasture.GLFtemp
          AgPasture.GLFwater
          AgPasture.GLFn
          AgPasture.GLFnConcentration
          AgPasture.GLFrgr
          AgPasture.GPP
          AgPasture.NitrogenSupply
          [SurfaceOrganicMatter].surfaceom_wt
          [Soil].SoilWater.drain
          [Soil].SoilWater.es as evaporation
          Evaluate sum([Soil].SoilNitrogen.no3) as TotalNO3
          Evaluate sum([Soil].SoilNitrogen.nh4) as TotalNH4
          Evaluate sum([Soil].SoilNitrogen.hum_n) as TotalHumusN
          Evaluate sum([Soil].SoilNitrogen.biom_n) as TotalBiomN
          Evaluate sum([Soil].SoilNitrogen.fom_n) as TotalFomN
    Input Observed
  Simulation Test3: Area=0; Slope=0
    Clock: StartDate=2000-07-01; EndDate=2002-06-30
    WeatherFile: FileName=..\WeatherFiles\Ruakura.met
    Manager SetCO2: same as Test1.SetCO2
    Summary
    Zone Field: Area=0; Slope=0
      Manager CutRotation: same as Test2.Field.CutRotation
      MicroClimate: same as Test1.Field.MicroClimate
      Irrigation
      Fertiliser
      SurfaceOrganicMatter: same as Test1.Field.SurfaceOrganicMatter
      Soil: SoilType=NZ_Sedimentary; Site=Winchmore; NearestTown=Ashburton; Region=Canterbury; Country=New Zealand; Latitude=-48.48; Longitude=0
        Analysis: same as Test1.Field.Soil.Analysis
        Water: same as Test1.Field.Soil.Water
        SoilWater: same as Test1.Field.Soil.SoilWater
        SoilNitrogen: fom_type=[default, manure, mucuna, lablab, shemp, stable]; fract_carb=[0.2, 0.3, 0.54, 0.57, 0.45, 0]; fract_cell=[0.7, 0.3, 0.37, 0.37, 0.47, 0.1]; fract_lign=[0.1, 0.4, 0.09, 0.06, 0.08, 0.9]; wfpsN2N2O_x=[22, 88]; wfpsN2N2O_y=[0.1, 1]
          oc=[3.71368, 2.46983, 1.2384, 0.49836, 0.250251, 0.150353, 0.100194]
        SoilOrganicMatter: same as Test1.Field.Soil.SoilOrganicMatter
        InitialWater Initial water: PercentMethod=EvenlyDistributed; FractionFull=0.99
        Sample Initial nitrogen: same as Test1.Field.Soil.Initial nitrogen
      AgPasture: alt_N_uptake=no; SwardName=AgPasture; NumSpecies=2; WaterUptakeSource=calc; SpeciesName=[Ryegrass, WhiteClover]; SpeciesNType=[grass, legume]; SpeciesCType=C3; InitialDMShoot=[2000, 500]; InitialDMRoot=[500, 250]; MinimumGreenWt=[300, 100]; InitialRootDepth=[750, 350]; ExpoLinearDepthParam=0.1; ExpoLinearCurveParam=3
      Report: same as Test1.Field.Report
    Input Observed
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