Simulations
  Simulation FoodInPond: Area=0; Slope=0
    Weather: FileName=%root%\Tests\Aqua\FoodInPond\Ingham.met
    Clock: StartDate=1990-01-01; EndDate=1990-12-31
    Summary summaryfile
    Zone Pond: Area=1; Slope=0
      PondWater: SurfaceArea=10000; MaxPondDepth=1; Kpan=1
      FoodInPond
      Folder Manager folder
        Manager Add water on fixed date
          added_date = 01-jan
          volume = 10000
          temperature = 15
          salinity = 5
          ph = 2
          n = 3
          p = 4
          tss = 10
```csharp
using System;
using Models.Core;
using APSIM.Shared.Utilities;
using Models.Aqua;

namespace Models
{
	[Serializable]
	[System.Xml.Serialization.XmlInclude(typeof(Model))]
	public class Script : Model
	{

		[Link] Clock Clock;
		[Link] Summary Summary;
		[Link] PondWater PondWater;
		
		
	    [Description("Add Water on this date (dd-mmm)")]
		public string added_date {get; set;}
		
		[Description("Volume of Water Added (m^3)")]
		public double volume {get; set;}
		
		[Description("Temperature of Water Added (oC)")]
		public double temperature {get; set;}
		
		[Description("Salinity of Water Added (kg/m^3)")]
		public double salinity {get; set;}
		
		[Description("PH of Water Added")]
		public double ph {get; set;}
		
		[Description("Nitrogen of Water Added (kg/m^3)")]
		public double n {get; set;}
	
	    [Description("Phosphorus of Water Added (kg/m^3)")]
		public double p {get; set;}
		
		[Description("Total Suspended Solids of Water Added (kg/m^3)")]
		public double tss {get; set;}


        
       [EventSubscribe("StartOfSimulation")]
		private void OnStartOfSimulation(object sender, EventArgs e)
		{
		}
        
        
        
		[EventSubscribe("StartOfDay")]
		private void OnStartOfDay(object sender, EventArgs e)
		{

        if (DateUtilities.DatesEqual(added_date, Clock.Today))
			{
			WaterProperties addedProps = new WaterProperties(temperature, salinity, ph, n, p, tss);
			PondWater.Fill(Volume: volume, WaterProperties: addedProps);
			}

		}
      
	}
}
```
        Manager Add water on fixed date1
          added_date = 01-oct
          volume = 10000
          temperature = 15
          salinity = 5
          ph = 2
          n = 3
          p = 4
          tss = 10
          script: same as in FoodInPond.Pond.Manager folder.Add water on fixed date
        Manager Add Feed on fixed date
          added_date = 05-jan
          FeedName = TestFeed
          DryMatter = 100
          Nitrogen = 20
          DigestibleEnergy = 3000
```csharp
using System;
using Models.Core;
using APSIM.Shared.Utilities;
using Models.Aqua;

namespace Models
{
	[Serializable]
	[System.Xml.Serialization.XmlInclude(typeof(Model))]
	public class Script : Model
	{

		[Link] Clock Clock;
		[Link] Summary Summary;
		[Link] FoodInPond FoodInPond;
		
		
	    [Description("Add feed on this date (dd-mmm)")]
		public string added_date {get; set;}

	    [Description("Name of the feed")]
		public string FeedName {get; set;}
		
		[Description("Amount of feed added (as Dry Matter) (kg)")]
		public double DryMatter {get; set;}
		
		[Description("Amount of Nitrogen in the feed added (kg)")]
		public double Nitrogen {get; set;}
		
		[Description("Amount of Digestible Energy in the feed added (MJ)")]
		public double DigestibleEnergy {get; set;}
		


        
       [EventSubscribe("StartOfSimulation")]
		private void OnStartOfSimulation(object sender, EventArgs e)
		{
		}
        
        
        
		[EventSubscribe("StartOfDay")]
		private void OnStartOfDay(object sender, EventArgs e)
		{

        if (DateUtilities.DatesEqual(added_date, Clock.Today))
			{
			Feed newFeed = new Feed(FeedName, DryMatter, Nitrogen, DigestibleEnergy);
			FoodInPond.Food.AddFeed(newFeed);
			}

		}
      
	}
}
```
        Manager Add Feed on fixed date1
          added_date = 10-jan
          FeedName = ShaunFeed
          DryMatter = 100
          Nitrogen = 20
          DigestibleEnergy = 3000
          script: same as in FoodInPond.Pond.Manager folder.Add Feed on fixed date
      Report: EventNames=[Clock].DoReport
        VariableNames:
          [Clock].Today
          [FoodInPond].Food.TotalDM as TotalDM
          [FoodInPond].Food..TotalN as TotalN
          [FoodInPond].Food..TotalDE as TotalDE
          [FoodInPond].Food.NumFeeds as NumFeeds
          [FoodInPond].Food.FeedNames as FeedNames
          [FoodInPond].Food.FeedDMs as FeedDMs
          [FoodInPond].Food.FeedNs as FeedNs
          [FoodInPond].Food.FeedDEs as FeedDEs
  DataStore
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