Simulations
  Experiment Ratio
    Factors
      Factor Level1
        Specifications:
          [Field].Slurp1.localDemandNitrogen=6
          [Field].Slurp2.localDemandNitrogen=0
      Factor Level2
        Specifications:
          [Field].Slurp1.localDemandNitrogen=5
          [Field].Slurp2.localDemandNitrogen=1
      Factor Level3
        Specifications:
          [Field].Slurp1.localDemandNitrogen=4
          [Field].Slurp2.localDemandNitrogen=2
      Factor Level4
        Specifications:
          [Field].Slurp1.localDemandNitrogen=3
          [Field].Slurp2.localDemandNitrogen=3
      Factor Level5
        Specifications:
          [Field].Slurp1.localDemandNitrogen=2
          [Field].Slurp2.localDemandNitrogen=4
      Factor Level6
        Specifications:
          [Field].Slurp1.localDemandNitrogen=1
          [Field].Slurp2.localDemandNitrogen=5
      Factor Level7
        Specifications:
          [Field].Slurp1.localDemandNitrogen=0
          [Field].Slurp2.localDemandNitrogen=6
    Simulation Base: Area=0; Slope=0
      WeatherFile: FileName=ForeverSpringNoRain.met
      Clock: StartDate=2000-01-01; EndDate=2000-01-30
      Summary
      Zone Field: Area=0; Slope=0
        Soil: SoilType=Uniform soil; Latitude=0; Longitude=0
          Water
            Thickness  BD  AirDry  LL15  DUL   SAT  KS
            150        1   0.15    0.3   0.55  0.6  100
            150        1   0.15    0.3   0.55  0.6  100
            300        1   0.15    0.3   0.55  0.6  100
            300        1   0.15    0.3   0.55  0.6  100
            SoilCrop Slurp: LL=[0.3, 0.3, 0.3, 0.3]; KL=[0.1, 0.1, 0.1, 0.1]; XF=[1, 1, 1, 1]
            SoilCrop Slurp1: LL=[0.3, 0.3, 0.3, 0.3]; KL=[0.1, 0.1, 0.1, 0.1]; XF=[1, 1, 1, 1]
            SoilCrop Slurp2: LL=[0.3, 0.3, 0.3, 0.3]; KL=[0.1, 0.1, 0.1, 0.1]; XF=[1, 1, 1, 1]
          SoilWater: min_crit_temp=5; max_crit_temp=35; max_albedo=0.23; A_to_evap_fact=0.44; canopy_eos_coef=1.7; sw_top_crit=0.9; sumes1_max=100; sumes2_max=25; solute_flow_eff=[1]; solute_flux_eff=[1]; gravity_gradient=2E-05; specific_bd=2.65; hydrol_effective_depth=450; immobile_solutes=[nh4]; canopy_fact_default=0.5; act_evap_method=ritchie; irrigation_will_runoff=false; irrigation_layer=1; SummerCona=3; SummerU=6; SummerDate=1-Nov; WinterCona=3; WinterU=6; WinterDate=1-Apr; DiffusConst=40; DiffusSlope=16; Salb=0.13; slope=0; discharge_width=0; catchment_area=0; max_pond=0; CN2Bare=73; CNRed=20; CNCov=0.8
            canopy_fact  canopy_fact_height  Thickness  SWCON  KLAT
            1            0                   150        0      0
            1            600                 150        0      0
            0            1800                300        0      0
            0            30000               300        0      0
            mobile_solutes=[no3, urea, cl, br, org_n, org_c_pool1, org_c_pool2, org_c_pool3]
          SoilNitrogen: fom_type=[default, manure, mucuna, lablab, shemp, stable]; fract_carb=[0.2, 0.3, 0.54, 0.57, 0.45, 0]; fract_cell=[0.7, 0.3, 0.37, 0.37, 0.47, 0.1]; fract_lign=[0.1, 0.4, 0.09, 0.06, 0.08, 0.9]; wfpsN2N2O_x=[22, 88]; wfpsN2N2O_y=[0.1, 1]; oc=[0, 0, 0, 0]
          SoilOrganicMatter: RootCN=40; RootWt=0; SoilCN=12.5; EnrACoeff=7.4; EnrBCoeff=0.2; OCUnits=Total
            Thickness  OC  FBiom  FInert
            150        0   0      1
            150        0   0      1
            300        0   0      1
            300        0   0      1
          Analysis: PHUnits=Water; BoronUnits=HotWater
            Thickness  EC    PH
            150        0.2   8.4
            150        0.25  8.8
            300        0.31  9
            300        0.4   9.2
          InitialWater Initial water: PercentMethod=EvenlyDistributed; FractionFull=1; RelativeTo=LL15
          Sample: NO3Units=kgha; NH4Units=kgha; SWUnits=Volumetric; OCUnits=Total; PHUnits=Water
            Thickness  NO3  NH4
            100        50   0
            200        50   0
            300        50   0
            300        50   0
        SurfaceOrganicMatter: ReportAdditions=no; ReportRemovals=no; PoolName=Wheat; type=Wheat; mass=0; standing_fraction=0; cnr=80; CriticalResidueWeight=2000; OptimumDecompTemp=20; MaxCumulativeEOS=20; CNRatioDecompCoeff=0.277; CNRatioDecompThreshold=25; TotalLeachRain=25; MinRainToLeach=10; CriticalMinimumOrganicC=0.004; DefaultCPRatio=0; DefaultStandingFraction=0; StandingExtinctCoeff=0.5; FractionFaecesAdded=0.5
          Pools:
            {PoolName=Wheat, ResidueType=Wheat, Mass=0, CNRatio=80, StandingFraction=0}
          ResidueTypes ResidueTypesList: LoadFromResource=ResidueTypes
          TillageTypes TillageTypesList
        Manager Diffs
```csharp
using System;
using Models.Core;
using Models.PMF;
using Models.PMF.Slurp;
using System.Xml.Serialization;
namespace Models
{
	[Serializable]
	[System.Xml.Serialization.XmlInclude(typeof(Model))]
	public class Script : Model
	{
		[Link] Clock Clock;
		[Link] Report Report;
		[Link] Summary Summary;
		[Link] Soils.Soil Soil;

		public string myString;
        private double tempSum;

        [XmlIgnore] public double initSWDep { get; set; }
        [XmlIgnore] public double currSWDep { get; set; }
        [XmlIgnore] public double diffSWDepUptake { get; set; }

        [XmlIgnore] public double initMinN { get; set; }
        [XmlIgnore] public double currMinN { get; set; }
        [XmlIgnore] public double diffMinNUptake { get; set; }

        [EventSubscribe("Commencing")]
        private void OnSimulationCommencing(object sender, EventArgs e)
		{
		}

		[EventSubscribe("DoDailyInitialisation")]
		private void DoDailyInitialisation(object sender, EventArgs e)
		{
		    initSWDep = 0.0;
		    initMinN = 0.0;
		    for (int j = 0; j < Soil.SoilWater.dlayer.Length; j++)
		    {
		       initSWDep += Soil.SoilWater.sw_dep[j];
		       initMinN += Soil.SoilNitrogen.no3[j] + Soil.SoilNitrogen.nh4[j];
		    }
		}
		
		[EventSubscribe("DoManagementCalculations")]
		private void DoManagementCalculations(object sender, EventArgs e)
		{	
		    currSWDep = 0.0;
		    currMinN = 0.0;
		    for (int j = 0; j < Soil.SoilWater.dlayer.Length; j++)
		    {
		       currSWDep += Soil.SoilWater.sw_dep[j];
		       currMinN += Soil.SoilNitrogen.no3[j] + Soil.SoilNitrogen.nh4[j];

			   // Summary.WriteMessage(FullPath, (Soil.SoilWater.sw_dep[j].ToString() + " " + currSWDep.ToString()));
		    }
            diffSWDepUptake = (initSWDep - currSWDep) - Soil.SoilWater.es;
            diffMinNUptake = (initMinN - currMinN); // what about denitrification?
        }
	}
}
```
        Slurp Slurp1: localLAIGreen=0; localLAItot=5; localLightExtinction=0.6; localCanopyHeight=500; localCanopyDepth=500; localMaximumStomatalConductance=0.011; localFrgr=1; localDemandWater=5; localDemandNitrogen=1; localKNO3=0.1; localKNH4=0; localRootDepth=500; localSurfaceRootLengthDensity=0.05
        Slurp Slurp2: same as Ratio.Base.Field.Slurp1
        Arbitrator: ArbitrationMethod=new; NutrientUptakeMethod=1
        Report: EventNames=[Clock].DoReport
          VariableNames:
            [Clock].Today
            Evaluate (Slurp1.demandWater + Slurp2.demandWater) as demandWater
            Evaluate sum(Slurp1.uptakeWater[1:4] + Slurp2.uptakeWater[1:4]) as UptakeWater
            Evaluate sum([Soil].SoilWater.sw_dep[1:4]) as SWDep
            [Diffs].Script.diffSWDepUptake as deltaSWDep
            Evaluate (Slurp1.demandNitrogen + Slurp2.demandNitrogen) as demandNitrogen
            Evaluate sum(Slurp1.uptakeNitrogen[1:4] + Slurp2.uptakeNitrogen[1:4]) as UptakeNitrogen
            Evaluate sum(Slurp1.uptakeNitrogenPropNO3[1:4] + Slurp2.uptakeNitrogenPropNO3[1:4]) as UptakeNPropNO3
            Evaluate (sum([Soil].SoilNitrogen.nh4[1:4]) + sum([Soil].SoilNitrogen.no3[1:4]) as MinN
            [Diffs].Script.diffMinNUptake as deltaMinN
            Evaluate sum(Slurp1.uptakeNitrogen[1:4]) as UptakeNitrogen1
            Evaluate sum(Slurp2.uptakeNitrogen[1:4]) as UptakeNitrogen2
            Slurp1.demandNitrogen as demandNitrogen1
            Slurp2.demandNitrogen as demandNitrogen2
  DataStore
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