Simulations: Version=1
  Replacements
    Plant SCUM: CropType=SLURP
      Memo TitlePage
        # SCUM: the Simple Crop Uptake Model

        _Hamish Brown and Rob Zyskowski, Plant and Food Research, New Zealand_

        This model has been built to simulate a range of different crops in simulations where water and nitrogen balance are of interest but a fully mechanistic plant model is not needed. It is a daily time step implementation of the crop model that is used on the Overseer nutrient balance model (Cichota_etal_2010).  It uses simple sigmoidal functions for estimating daily cover and biomass deltas to give realistic water and nitrogen demands. It does not simulate potential yield, this is specified as an input. Yield will be reduced below the specified potential yield if N or water supplies from the soil are insufficient to meet demand. The model has been paramaterised for simulating water and nitrogen balances of cropping rotations in New Zealand (where over 50 different crop types are grown and it is not feasible to produce full crop models for each of these). It may be adapted for other purposes and other crop types may be added but the user will need to keep in mind that it is empirical and the parameters might need changing for crops from different locations.
      Phenology
        AirTemperatureFunction ThermalTime
          Memo Description
            Progression through each of the phenological stages is driven by thermal time.  As temperature increases from zero to 30 degrees development acellerates and then slows down again above 30 degress
          XYPairs: X=[0, 30, 40]; Y=[0, 30, 0]
        Memo Description1
          As ThermalTime accumulates the crop progresses through the following phases:
        GerminatingPhase Germinating: Start=Sowing; End=Germination; TTinPhase=0; FractionComplete=0.999
        EmergingPhase Emerging: Start=Germination; End=Emergence; TTinPhase=0; FractionComplete=1; ShootLag=0; ShootRate=0
          VariableReference ThermalTime: VariableName=[Phenology].ThermalTime.Value
          Memo Description
            Currently the duration of the Emergence phase is set to zero.  However this phase is included if parameterisations of other crops in the future wish to give this phase a duration.
        GenericPhase CanopyExpanding: Start=Emergence; End=StartReproductive; TTinPhase=0; FractionComplete=1
          Memo Description
            During this phase the plant only partitions biomass to Root and Stover (leaf and stem) Organs
          Constant Target: Value=1000; Units=<sup>o</sup>Cd
          VariableReference ThermalTime: VariableName=[Phenology].ThermalTime.Value
        GenericPhase YieldIncreasing: Start=StartReproductive; End=StartSenescence; TTinPhase=0; FractionComplete=1
          Memo Description
            During this phase the plant is partitioning biomass to Root Stover and Product organs
          Constant Target: Value=600; Units=<sup>o</sup>Cd
          VariableReference ThermalTime: VariableName=[Phenology].ThermalTime.Value
        GenericPhase Senescing: Start=StartSenescence; End=EndReproductive; TTinPhase=0; FractionComplete=1
          Memo Description
            During this phase the plant is partitioning biomass to Root and Product organs and the canopy cover decreases from its maximum to zero
          Constant Target: Value=600; Units=<sup>o</sup>Cd
          VariableReference ThermalTime: VariableName=[Phenology].ThermalTime.Value
        GenericPhase Mature: Start=EndReproductive; End=Maturity; TTinPhase=0; FractionComplete=1
          Constant Target: Value=600; Units=<sup>o</sup>Cd
          VariableReference ThermalTime: VariableName=[Phenology].ThermalTime.Value
          Memo Description
            During this phase the plant does bugger all but wait to be ready for harvest
        EndPhase ReadyForHarvest: Start=Maturity; End=Unused; TTinPhase=0; FractionComplete=0
          VariableReference ThermalTime: VariableName=[Phenology].ThermalTime.Value
        AccumulateFunction AccumulatedThermalTime: StartStageName=Emergence; EndStageName=Maturity
          VariableReference ThermalTime: VariableName=[Phenology].ThermalTime.Value
          Memo Description
            Accumulates ThermalTime daily throughout the duration of the crop
      OrganArbitrator Arbitrator: NArbitrationOption=RelativeAllocation; DMArbitrationOption=RelativeAllocation
      GenericAboveGroundOrgan Product: FractionRemoved=0; FractionToResidue=0
        Biomass Live
        Biomass Dead
        Constant MaximumNConc: Value=0.012
        Constant MinimumNConc: Value=0.008
        PartitionFractionDemandFunction DMDemandFunction
          PhaseLookup PartitionFraction
            PhaseLookupValue YieldIncreasing: Start=StartReproductive; End=StartSenescence
              SubtractFunction ProductProportion
                Constant: Value=1
                VariableReference RootFraction: VariableName=[Root].RootProportion.Value
                VariableReference StoverFraction
                  VariableName=[Stover].DMDemandFunction.PartitionFraction.YieldIncreasing.Value
            PhaseLookupValue Senescing: Start=StartSenescence; End=EndReproductive
              SubtractFunction StoverFraction
                Constant One: Value=1
                VariableReference RootFraction: VariableName=[Root].RootProportion.Value
        SubtractFunction WaterContent
          Constant One: Value=1
          VariableReference DMcontent: VariableName=[Product].ProductDMProportion.Value
        VariableReference DryMatterContent: VariableName=[Product].ProductDMProportion.Value
        Constant ExpectedYield: Value=800
          Memo Description
            This is the Product yield (g/m2 fresh weight) that MSCP will predict provided nitrogen and water supply are adequate
        LinearInterpolationFunction HarvestIndex: XProperty=[Product].ExpectedYield.Value
          Memo Description
            The harvest index is related to the Expected Yield of the crop with higher yields giving a higer harvest index for some crops.  The Harvest index parameter is used with ExpectedYield to calculation total above ground produciton
          XYPairs: X=[0, 800, 1392]; Y=[0.14, 0.46, 0.78]
        Constant ProductDMProportion: Value=0.87
          Memo Description
            This is the dry matter content of the harvested yield and is used to set the Partitioning Fraction in the Root
        MultiplyFunction DryYield
          Memo Description
            This variable is the product yield of the crop in g/m2 dry weight
          VariableReference FreshYld: VariableName=[Product].ExpectedYield.Value
          VariableReference DMPercent: VariableName=[Product].ProductDMProportion.Value
      SimpleLeaf Stover
        zero: FractionRemoved, FractionToResidue, BiomassYesterday, LAI, Height, FRGR, PotentialEP, K, KDead, DeltaBiomass, LAIDead, WaterAllocation
        Memo Description
          Stover represents any part of the crop that is not removed at harvest (i.e not part of the product).  It uses a Simple leaf organ so is responsible to the crops potential biomass supply and transpiraiton demand
        Biomass Live
        Biomass Dead
        MultiplyFunction Photosynthesis
          DeltaFunction UnStressedBiomass: StartStageName=Emergence
            SigmoidFunction2 Integral
              VariableReference Ymax: VariableName=[Stover].Ymax.Value
              VariableReference XValue: VariableName=[Phenology].AccumulatedThermalTime.Value
              VariableReference Xo: VariableName=[Stover].XoBiomass.Value
              VariableReference b: VariableName=[Stover].bBiomass.Value
          LinearInterpolationFunction WaterStressFactor: XProperty=[Stover].Fw
            XYPairs: X=[0, 0.1, 0.7, 1]; Y=[0, 0, 1, 1]
          Memo Description
            This function provides the DM fixation supply to the arbitrator which is then partitioned between the organs based on their DM Demands (From DMDemandFunctions).  In this case it takes the daily delta of a sigmoidal function to estimate daily potential biomass production as a function of accumulated thermal time and reduces this for water stress effects
        AirTemperatureFunction FRGRFunction
          XYPairs: X=[0, 10, 25, 40]; Y=[0, 1, 1, 0]
        PartitionFractionDemandFunction DMDemandFunction
          Memo Description
            DM demand is based on a simple partitioning coefficients.  At harvest the biomass partitioned to the stover = (1 - RootProportion) - Harvest index.  However the partitioningFraction is more complicated that this as it partitions more biomass to the stover in the CanopyExpanding Phase and less in the Yield increasing phase to give realistic patterns of accumulation of biomass in the Stover and Product
          PhaseLookup PartitionFraction
            PhaseLookupValue Expanding: Start=Emergence; End=StartReproductive
              SubtractFunction DMPartitionCoefficient
                Constant One: Value=1
                VariableReference RootFraction: VariableName=[Root].RootProportion.Value
            PhaseLookupValue YieldIncreasing: Start=StartReproductive; End=StartSenescence
              DivideFunction DMPartitionCoefficient
                SubtractFunction StoverBiomass
                  MultiplyFunction StoverAtMaturity
                    SubtractFunction AboveGroundProportion
                      Constant One: Value=1
                      VariableReference RootFraction: VariableName=[Root].RootProportion.Value
                    SubtractFunction StoverProportion
                      Constant One: Value=1
                      VariableReference HI: VariableName=[Product].HarvestIndex.Value
                    VariableReference BiomassAtMaturity: VariableName=[Stover].TotalBiomassAtMaturity.Value
                  MultiplyFunction StoverAtStartReproductive
                    VariableReference BiomassAtStartReproductive: VariableName=[Stover].TotalBiomassAtStartReproductive.Value
                    SubtractFunction AboveGroundProportion
                      Constant: Value=1
                      VariableReference RootFraction: VariableName=[Root].RootProportion.Value
                SubtractFunction TotalBiomass
                  VariableReference BiomassAtStartSenescence: VariableName=[Stover].TotalBiomassAtStartSenescence.Value
                  VariableReference BiomassAtStartReproductive: VariableName=[Stover].TotalBiomassAtStartReproductive.Value
        PhaseLookup CoverFunction
          Memo Description
            The cover of the canopy is estimated using a simple sigmoidal increase in the expanding phases and a linear decrease in the senescing phase
          PhaseLookupValue Expanding: Start=Emergence; End=StartSenescence
            SigmoidFunction2 SigCoverFunction
              Constant Ymax: Value=0.97
              VariableReference XValue: VariableName=[Phenology].AccumulatedThermalTime.Value
              Constant Xo: Value=540
              Constant b: Value=120
          PhaseLookupValue Senescence: Start=StartSenescence; End=Maturity
            MultiplyFunction DecreasingCover
              HoldFunction MaxCover: WhenToHold=StartSenescence
                VariableReference ValueToHold: VariableName=[Stover].CoverGreen
              SubtractFunction ProportionLost
                Constant: Value=1
                DivideFunction ProportionRemaining
                  SubtractFunction TTSenesce
                    VariableReference AccumulatedThermalTime: VariableName=[Phenology].AccumulatedThermalTime.Value
                    AddFunction ThermalTimeAtStartSenescence
                      VariableReference CanopyExpandingTT: VariableName=[Phenology].CanopyExpanding.Target.Value
                      VariableReference YieldIncreasingTT: VariableName=[Phenology].YieldIncreasing.Target.Value
                  VariableReference SenescentPhaseDuration: VariableName=[Phenology].Senescing.Target.Value
        Constant ExtinctionCoefficientFunction: Value=0.5
          Memo Description
            The extinction coefficient is used to calculate a LAI value (needed by MicroClimate) from the canopy cover
        LinearInterpolationFunction HeightFunction: XProperty=[Phenology].Stage
          XYPairs: X=[3, 5, 6]; Y=[100, 800, 1200]
        Constant NConc: Value=0.008
        PhaseLookupValue NitrogenDemandSwitch: Start=Emergence; End=StartSenescence
          Constant Function: Value=1
        Constant XoBiomass: Value=800
          Memo Description
            Is a coefficient for the potential biomass accumulation function
        Constant bBiomass: Value=800
          Memo Description
            Is another coefficient for the potential biomass accumulation function
        DivideFunction Ymax
          Memo Description
            This variable is the total biomass (g/m2dry weight) that the crop will produce at maturity in the absence of stress
          VariableReference DryYield: VariableName=[Product].DryYield.Value
          SubtractFunction AboveGroundDMProportion
            Constant One: Value=1
            VariableReference RootFraction: VariableName=[Root].RootProportion.Value
          VariableReference HarvestIndex: VariableName=[Product].HarvestIndex.Value
        SigmoidFunction2 TotalBiomassAtStartReproductive
          VariableReference XValue: VariableName=[Phenology].CanopyExpanding.Target.Value
          VariableReference Ymax: VariableName=[Stover].Ymax.Value
          VariableReference Xo: VariableName=[Stover].XoBiomass.Value
          VariableReference b: VariableName=[Stover].bBiomass.Value
        SigmoidFunction2 TotalBiomassAtStartSenescence
          AddFunction XValue
            VariableReference CanopyExpandingTT: VariableName=[Phenology].CanopyExpanding.Target.Value
            VariableReference YieldIncreasingTT: VariableName=[Phenology].YieldIncreasing.Target.Value
          VariableReference Ymax: VariableName=[Stover].Ymax.Value
          VariableReference Xo: VariableName=[Stover].XoBiomass.Value
          VariableReference b: VariableName=[Stover].bBiomass.Value
        SigmoidFunction2 TotalBiomassAtMaturity
          AddFunction XValue
            VariableReference CanopyExpandingTT: VariableName=[Phenology].CanopyExpanding.Target.Value
            VariableReference YieldIncreasingTT: VariableName=[Phenology].YieldIncreasing.Target.Value
            VariableReference SenescingTT: VariableName=[Phenology].Senescing.Target.Value
          VariableReference Ymax: VariableName=[Stover].Ymax.Value
          VariableReference Xo: VariableName=[Stover].XoBiomass.Value
          VariableReference b: VariableName=[Stover].bBiomass.Value
      Root: FractionRemoved=0; FractionToResidue=0; InitialDM=0.2; SpecificRootLength=40000; KNO3_yProperty=[0.02, 0.02]; KNO3_xRootLength=[0, 0.003]; KNH4_yProperty=[0, 0]; KNH4_xRootLength=[0, 0.003]; NuptakeSupply=0
        Memo Description
          The root organ demands and is partitioned N and DM and its depth increases through time to provide a water uptake supply
        CompositeBiomass Live: Propertys=[[Root].LayerLive]
        CompositeBiomass Dead: Propertys=[[Root].LayerDead]
        LinearInterpolationFunction KLModifier: XProperty=[Root].LayerMidPointDepth
          XYPairs: X=[0, 200, 1500]; Y=[1, 1, 0]
          Memo Description
            This is important in MCSP as it is set for each species to represent their differences in rooting patterns between crop species
        Constant SoilWaterEffect: Value=1
        Constant MaxDailyNUptake: Value=12
        Constant SenescenceRate: Value=0
        Constant MaximumNConc: Value=0.009
        Constant MinimumNConc: Value=0.009
        PhaseBasedSwitch NitrogenDemandSwitch: Start=Germination; End=Maturity
        Constant TemperatureEffect: Value=1
        Constant MaximumRootDepth: Value=1500
        MultiplyFunction RootFrontVelocity
          LessThanFunction RootFrontVelocity
            VariableReference TestVariable: VariableName=[Phenology].AccumulatedThermalTime.Value
            AddFunction GrowthDuration: same as Replacements.SCUM.Stover.TotalBiomassAtMaturity.XValue
            DivideFunction IfTrue
              VariableReference MaxRootDepth: VariableName=[Root].MaximumRootDepth.Value
              VariableReference GrowthDuration
                VariableName=[Root].RootFrontVelocity.RootFrontVelocity.GrowthDuration.Value
            Constant IfFalse: Value=0
          VariableReference ThermalTime: VariableName=[Phenology].ThermalTime.Value
        PhaseLookupValue PartitionFraction: Start=Emergence; End=EndReproductive
          VariableReference RootProportion: VariableName=[Root].RootProportion.Value
        Constant RootProportion: Value=0.1
          Memo Description
            This is the proportion of total biomass that is paritioned into the roots and is used to set the partitioning fraction for the roots
      Nodule: FractionRemoved=0; FractionToResidue=0; NFixationOption=None
        Memo Description
          The nodule organ is unparameterised and simply has a switch that is turned on for legume crops (so they can fix what ever N the crop demands) and switched off for non legume crops (which fix no N)
        Biomass Live
        Biomass Dead
        Constant MaximumNConc: Value=0
        Constant MinimumNConc: Value=0
      Summariser
        CompositeBiomass Total
          Propertys=[[Stover].Live, [Stover].Dead, [Product].Live, [Product].Dead, [Root].Live, [Root].Dead]
      Cultivar Barley_Spring: Alias=Barley_Spring
        Command:
          [Root].MaximumRootDepth.Value = 1000
          [Root].KLModifier.XYPairs.X = 0, 200, 500, 1000, 1500
          [Root].KLModifier.XYPairs.Y = 1, 1, 0.8, 0.2, 0.0
          [Stover].CoverFunction.Expanding.SigCoverFunction.Xo.Value = 540
          [Stover].CoverFunction.Expanding.SigCoverFunction.b.Value = 120
          [Stover].CoverFunction.Expanding.SigCoverFunction.Ymax.Value = 0.97
          [Stover].XoBiomass.Value = 1080
          [Stover].bBiomass.Value = 216
          [Product].ExpectedYield.Value = 800
          [Root].RootProportion.Value = 0.1
          [Product].HarvestIndex.XYPairs.X = 0,1150
          [Product].HarvestIndex.XYPairs.Y = 0.14,0.6
          [Product].ProductDMProportion.Value = 0.87
          [Phenology].CanopyExpanding.Target.Value = 1000
          [Phenology].YieldIncreasing.Target.Value= 500
          [Phenology].Senescing.Target.Value = 300
          [Phenology].Mature.Target.Value = 300
          [Stover].NConc.Value = 0.005
          [Product].MinimumNConc.Value = 0.005
          [Product].MaximumNConc.Value = 0.012
          [Root].MinimumNConc.Value = 0.009
          [Root].MaximumNConc.Value = 0.009
      Cultivar Wheat_Spring: Alias=Barley_Spring
        Command:
          [Root].MaximumRootDepth.Value = 1000
          [Root].KLModifier.XYPairs.X = 0, 200, 500, 1000, 1500
          [Root].KLModifier.XYPairs.Y = 1, 1, 0.8, 0.2, 0.0
          [Stover].CoverFunction.Expanding.SigCoverFunction.Xo.Value = 540
          [Stover].CoverFunction.Expanding.SigCoverFunction.b.Value = 120
          [Stover].CoverFunction.Expanding.SigCoverFunction.Ymax.Value = 0.97
          [Stover].XoBiomass.Value = 1080
          [Stover].bBiomass.Value = 216
          [Product].ExpectedYield.Value = 800
          [Root].RootProportion.Value = 0.1
          [Product].HarvestIndex.XYPairs.X = 0,1150
          [Product].HarvestIndex.XYPairs.Y = 0.14,0.6
          [Product].ProductDMProportion.Value = 0.87
          [Phenology].CanopyExpanding.Target.Value = 1000
          [Phenology].YieldIncreasing.Target.Value= 500
          [Phenology].Senescing.Target.Value = 300
          [Phenology].Mature.Target.Value = 300
          [Stover].NConc.Value = 0.005
          [Product].MinimumNConc.Value = 0.005
          [Product].MaximumNConc.Value = 0.013
          [Root].MinimumNConc.Value = 0.009
          [Root].MaximumNConc.Value = 0.009
      Cultivar Wheat_Autumn: Alias=Barley_Spring
        Command:
          [Root].MaximumRootDepth.Value = 1500
          [Root].KLModifier.XYPairs.X = 0, 200, 500, 1000, 1500
          [Root].KLModifier.XYPairs.Y = 1, 1, 0.9, 0.6, 0.3
          [Stover].CoverFunction.Expanding.SigCoverFunction.Xo.Value = 540
          [Stover].CoverFunction.Expanding.SigCoverFunction.b.Value = 120
          [Stover].CoverFunction.Expanding.SigCoverFunction.Ymax.Value = 0.97
          [Stover].XoBiomass.Value = 1900
          [Stover].bBiomass.Value = 399
          [Product].ExpectedYield.Value = 1450
          [Root].RootProportion.Value = 0.1
          [Product].HarvestIndex.XYPairs.X = 0,1733
          [Product].HarvestIndex.XYPairs.Y = 0.08,0.6
          [Product].ProductDMProportion.Value = 0.87
          [Phenology].CanopyExpanding.Target.Value = 1785
          [Phenology].YieldIncreasing.Target.Value= 615
          [Phenology].Senescing.Target.Value = 600
          [Phenology].Mature.Target.Value = 300
          [Stover].NConc.Value = 0.005
          [Product].MinimumNConc.Value = 0.005
          [Product].MaximumNConc.Value = 0.013
          [Root].MinimumNConc.Value = 0.009
          [Root].MaximumNConc.Value = 0.009
      Cultivar Potatoes_Long: Alias=Barley_Spring
        Command:
          [Root].MaximumRootDepth.Value = 500
          [Root].KLModifier.XYPairs.X = 0, 200, 500, 1000, 1500
          [Root].KLModifier.XYPairs.Y = 1, 1, 0.5, 0.1, 0.0
          [Stover].CoverFunction.Expanding.SigCoverFunction.Xo.Value = 690
          [Stover].CoverFunction.Expanding.SigCoverFunction.b.Value = 60
          [Stover].CoverFunction.Expanding.SigCoverFunction.Ymax.Value = 0.97
          [Stover].XoBiomass.Value = 1500
          [Stover].bBiomass.Value = 330
          [Product].ExpectedYield.Value = 5800
          [Root].RootProportion.Value = 0.1
          [Product].HarvestIndex.XYPairs.X = 0,11000
          [Product].HarvestIndex.XYPairs.Y = 0.84,0.97
          [Product].ProductDMProportion.Value = 0.22
          [Phenology].CanopyExpanding.Target.Value = 652
          [Phenology].YieldIncreasing.Target.Value= 1598
          [Phenology].Senescing.Target.Value = 600
          [Phenology].Mature.Target.Value = 300
          [Stover].NConc.Value = 0.02
          [Product].MinimumNConc.Value = 0.012
          [Product].MaximumNConc.Value = 0.018
          [Root].MinimumNConc.Value = 0.01
          [Root].MaximumNConc.Value = 0.01
      Cultivar Green_Peas: Alias=Barley_Spring
        Command:
          [Root].MaximumRootDepth.Value = 800
          [Root].KLModifier.XYPairs.X = 0, 200, 500, 1000, 1500
          [Root].KLModifier.XYPairs.Y = 1, 1, 0.4, 0.2, 0.0
          [Stover].CoverFunction.Expanding.SigCoverFunction.Xo.Value = 690
          [Stover].CoverFunction.Expanding.SigCoverFunction.b.Value = 60
          [Stover].CoverFunction.Expanding.SigCoverFunction.Ymax.Value = 0.97
          [Stover].XoBiomass.Value = 750
          [Stover].bBiomass.Value = 180
          [Product].ExpectedYield.Value = 630
          [Root].RootProportion.Value = 0.1
          [Product].HarvestIndex.XYPairs.X = 0,1200
          [Product].HarvestIndex.XYPairs.Y = 0.45,0.45
          [Product].ProductDMProportion.Value = 0.21
          [Phenology].CanopyExpanding.Target.Value = 707
          [Phenology].YieldIncreasing.Target.Value= 400
          [Phenology].Senescing.Target.Value = 200
          [Phenology].Mature.Target.Value = 100
          [Stover].NConc.Value = 0.03
          [Product].MinimumNConc.Value = 0.03
          [Product].MaximumNConc.Value = 0.035
          [Root].MinimumNConc.Value = 0.015
          [Root].MaximumNConc.Value = 0.015
          [Nodule].NFixationOption = Majic
      Cultivar Maize_Short: Alias=Barley_Spring
        Command:
          [Root].MaximumRootDepth.Value = 1500
          [Root].KLModifier.XYPairs.X = 0, 200, 500, 1000, 1500
          [Root].KLModifier.XYPairs.Y = 1, 1, 0.8, 0.6, 0.3
          [Stover].CoverFunction.Expanding.SigCoverFunction.Xo.Value = 900
          [Stover].CoverFunction.Expanding.SigCoverFunction.b.Value = 180
          [Stover].CoverFunction.Expanding.SigCoverFunction.Ymax.Value = 0.97
          [Stover].XoBiomass.Value = 1620
          [Stover].bBiomass.Value = 330
          [Product].ExpectedYield.Value = 1220
          [Root].RootProportion.Value = 0.1
          [Product].HarvestIndex.XYPairs.X = 0,1830
          [Product].HarvestIndex.XYPairs.Y = 0.5,0.6
          [Product].ProductDMProportion.Value = 0.87
          [Phenology].CanopyExpanding.Target.Value = 1486
          [Phenology].YieldIncreasing.Target.Value= 614
          [Phenology].Senescing.Target.Value = 1500
          [Phenology].Mature.Target.Value = 300
          [Stover].NConc.Value = 0.007
          [Product].MinimumNConc.Value = 0.007
          [Product].MaximumNConc.Value = 0.014
          [Root].MinimumNConc.Value = 0.007
          [Root].MaximumNConc.Value = 0.007
      Cultivar Spinich: Alias=Barley_Spring
        Command:
          [Root].MaximumRootDepth.Value = 700
          [Root].KLModifier.XYPairs.X = 0, 200, 500, 1000, 1500
          [Root].KLModifier.XYPairs.Y = 1, 1, 0.3, 0.1, 0.0
          [Stover].CoverFunction.Expanding.SigCoverFunction.Xo.Value = 360
          [Stover].CoverFunction.Expanding.SigCoverFunction.b.Value = 120
          [Stover].CoverFunction.Expanding.SigCoverFunction.Ymax.Value = 0.8
          [Stover].XoBiomass.Value = 540
          [Stover].bBiomass.Value = 90
          [Product].ExpectedYield.Value = 2200
          [Root].RootProportion.Value = 0.1
          [Product].HarvestIndex.XYPairs.X = 0,3300
          [Product].HarvestIndex.XYPairs.Y = 0.7,0.7
          [Product].ProductDMProportion.Value = 0.05
          [Phenology].CanopyExpanding.Target.Value = 436
          [Phenology].YieldIncreasing.Target.Value= 1664
          [Phenology].Senescing.Target.Value = 900
          [Phenology].Mature.Target.Value = 300
          [Stover].NConc.Value = 0.015
          [Product].MinimumNConc.Value = 0.015
          [Product].MaximumNConc.Value = 0.03
          [Root].MinimumNConc.Value = 0.009
          [Root].MaximumNConc.Value = 0.009
      Cultivar Kale: Alias=Barley_Spring
        Command:
          [Root].MaximumRootDepth.Value = 3000
          [Root].KLModifier.XYPairs.X = 0, 200, 500, 1000, 1500
          [Root].KLModifier.XYPairs.Y = 1, 1, 0.7, 0.3, 0.1
          [Stover].CoverFunction.Expanding.SigCoverFunction.Xo.Value = 867
          [Stover].CoverFunction.Expanding.SigCoverFunction.b.Value = 141
          [Stover].CoverFunction.Expanding.SigCoverFunction.Ymax.Value = 0.95
          [Stover].XoBiomass.Value = 1830
          [Stover].bBiomass.Value = 300
          [Product].ExpectedYield.Value = 7500
          [Root].RootProportion.Value = 0.1
          [Product].HarvestIndex.XYPairs.X = 0,10000
          [Product].HarvestIndex.XYPairs.Y = 0.9,0.5
          [Product].ProductDMProportion.Value = 0.16
          [Phenology].CanopyExpanding.Target.Value = 0
          [Phenology].YieldIncreasing.Target.Value= 4000
          [Phenology].Senescing.Target.Value = 0
          [Phenology].Mature.Target.Value = 0
          [Stover].NConc.Value = 0.01
          [Product].MinimumNConc.Value = 0.02
          [Product].MaximumNConc.Value = 0.03
          [Root].MinimumNConc.Value = 0.008
          [Root].MaximumNConc.Value = 0.008
        Memo Forage quirks
          Kale has 0oCd duration canopy expanding, senescence and maturity targets with a long (4000) yield increasing phase.  This is so biomass is partitioned to the product (leaf and stem in this case) from emergence and so cover increases to a maximum and stays there.  Setting this phase so long meant the roots were growing to slow so the root depth parameter was increased to achieve faster root growth.
          </p>
          <p>
      Cultivar Rape: Alias=Barley_Spring
        Command:
          [Root].MaximumRootDepth.Value = 2400
          [Root].KLModifier.XYPairs.X = 0, 200, 500, 1000, 1500
          [Root].KLModifier.XYPairs.Y = 1, 1, 0.7, 0.3, 0.0
          [Stover].CoverFunction.Expanding.SigCoverFunction.Xo.Value = 770
          [Stover].CoverFunction.Expanding.SigCoverFunction.b.Value = 57
          [Stover].CoverFunction.Expanding.SigCoverFunction.Ymax.Value = 0.95
          [Stover].XoBiomass.Value = 1296
          [Stover].bBiomass.Value = 189
          [Product].ExpectedYield.Value = 4615
          [Root].RootProportion.Value = 0.1
          [Product].HarvestIndex.XYPairs.X = 0,6000
          [Product].HarvestIndex.XYPairs.Y = .95,0.5
          [Product].ProductDMProportion.Value = 0.13
          [Phenology].CanopyExpanding.Target.Value = 0
          [Phenology].YieldIncreasing.Target.Value= 3000
          [Phenology].Senescing.Target.Value = 0
          [Phenology].Mature.Target.Value = 0
          [Stover].NConc.Value = 0.01
          [Product].MinimumNConc.Value = 0.02
          [Product].MaximumNConc.Value = 0.03
          [Root].MinimumNConc.Value = 0.008
          [Root].MaximumNConc.Value = 0.008
        Memo Forage quirks
          Rape has 0oCd duration canopy expanding, senescence and maturity targets with a long (4000) yield increasing phase.  This is so biomass is partitioned to the product (Stover and stem in this case) from emergence and so cover increases to a maximum and stays there.  Setting this phase so long meant the roots were growing to slow so the root depth parameter was increased to achieve faster root growth.
          </p>
          <p>
      Memo References
        Cichota R, Brown H, Snow VO, Wheeler DM, Hedderley D, Zyskowski R, Thomas S. 2010. A nitrogen balance model for environmental accountability in cropping systems. New Zealand Journal of Crop and Horticultural Science,38: 189-207.
  DataStore
  Tests TestsBinary
    Test:
      SimulationName            TableName  Type       ColumnNames                            Parameters
      BiomassRemoveHarvestTest  Report     Tolerance  ExtraVariables.Script.DeltaSoilOMN     1,1
      BiomassRemoveHarvestTest  Report     Tolerance  ExtraVariables.Script.DeltaSurfaceOMN  1,1
      BiomassRemoveHarvestTest  Report     Tolerance  MCSP.Summariser.Total.Wt               1,1
      BiomassRemoveCutTest      Report     Tolerance  ExtraVariables.Script.DeltaSoilOMN     1,1
      BiomassRemoveCutTest      Report     Tolerance  ExtraVariables.Script.DeltaSurfaceOMN  1,1
      BiomassRemoveCutTest      Report     Tolerance  MCSP.Summariser.Total.Wt               1,1
      BiomassRemovePruneTest    Report     Tolerance  ExtraVariables.Script.DeltaSoilOMN     1,1
      BiomassRemovePruneTest    Report     Tolerance  ExtraVariables.Script.DeltaSurfaceOMN  1,1
      BiomassRemovePruneTest    Report     Tolerance  MCSP.Summariser.Total.Wt               1,1
      BiomassRemoveGrazeTest    Report     Tolerance  ExtraVariables.Script.DeltaSoilOMN     1,1
      BiomassRemoveGrazeTest    Report     Tolerance  ExtraVariables.Script.DeltaSurfaceOMN  1,1
      BiomassRemoveGrazeTest    Report     Tolerance  MCSP.Summariser.Total.Wt               1,1
  Simulation BiomassRemoveHarvestTest: Area=0; Slope=0
    Weather: FileName=%root%\Tests\WeatherFiles\lincoln.met
    Clock: StartDate=2010-10-01; EndDate=2013-07-31
    Summary
    SoilArbitrator Soil Arbitrator
    Zone Field: Area=0; Slope=0
      Soil: Latitude=0; Longitude=0
        Analysis: Thickness=[100, 200, 300, 300, 300, 300]; PH=[6.6, 6.2, 5.7, 5.5, 5.5, 5.5]; PHUnits=Water; BoronUnits=HotWater
        InitialWater Initial water: PercentMethod=EvenlyDistributed; FractionFull=1
        Water
          Thickness  BD   AirDry  LL15  DUL   SAT
          100        1.2  0.08    0.13  0.33  0.5
          200        1.2  0.13    0.13  0.33  0.5
          300        1.2  0.1     0.1   0.31  0.44
          300        1.2  0.06    0.06  0.15  0.46
          300        1.2  0.04    0.04  0.1   0.44
          300        1.2  0.02    0.02  0.06  0.44
          SoilCrop SCUMSoil: LL=[0.13, 0.13, 0.1, 0.08, 0.11, 0.11]; KL=[0.1, 0.1, 0.1, 0.1, 0.1, 0.1]; XF=[1, 1, 1, 1, 1, 1]
          SoilCrop PotatoSoil: LL=[0.13, 0.13, 0.27, 0.27, 0.3, 0.3]; KL=[0.1, 0.06, 0.03, 0.01, 0, 0]; XF=[1, 1, 0.1, 0, 0, 0]
        SoilWater: residueinterception=0; SummerDate=1-Nov; SummerU=9; SummerCona=4.4; WinterDate=1-Apr; WinterU=9; WinterCona=4.4; DiffusConst=88; DiffusSlope=35.4; Salb=0.18; CN2Bare=68; CNRed=20; CNCov=0.8; slope=0; discharge_width=0; catchment_area=0; max_pond=0
          Thickness  SWCON  KLAT
          100        0.55   0
          200        0.55   0
          300        0.55   0
          300        0.55   0
          300        0.55   0
          300        0.55   0
        SoilNitrogen: fom_type=[default, manure, mucuna, lablab, shemp, stable]; fract_carb=[0.2, 0.3, 0.54, 0.57, 0.45, 0]; fract_cell=[0.7, 0.3, 0.37, 0.37, 0.47, 0.1]; fract_lign=[0.1, 0.4, 0.09, 0.06, 0.08, 0.9]; wfpsN2N2O_x=[22, 88]; wfpsN2N2O_y=[0.1, 1]; oc=[1.83566, 1.46334, 1.19884, 1.0301, 0.470338, 0.470138]
        SoilOrganicMatter: RootCN=30; RootWt=3000; SoilCN=11.5; EnrACoeff=7.4; EnrBCoeff=0.2; OCUnits=Total
          Thickness  OC    FBiom  FInert
          100        1.82  0.025  0.3
          200        1.47  0.025  0.4
          300        1.2   0.015  0.75
          300        1.03  0.01   0.9
          300        0.47  0.01   0.96
          300        0.47  0.01   0.96
        Sample Initial nitrogen: NO3Units=kgha; NH4Units=ppm; SWUnits=Volumetric; OCUnits=Total; PHUnits=Water
          Thickness  NO3  NH4
          100        270  0
          200        30   0
          300        5    0
          300        5    0
          300        0    0
          300        0    0
      SurfaceOrganicMatter surface organic matter: PondActive=no; ReportAdditions=no; ReportRemovals=no; PoolName=wheat; type=wheat; mass=2000; standing_fraction=0; cnr=80; CriticalResidueWeight=2000; OptimumDecompTemp=20; MaxCumulativeEOS=20; CNRatioDecompCoeff=0.277; CNRatioDecompThreshold=25; TotalLeachRain=25; MinRainToLeach=10; CriticalMinimumOrganicC=0.004; DefaultCPRatio=0; DefaultStandingFraction=0; StandingExtinctCoeff=0.5; FractionFaecesAdded=0.5
        Pools:
          {PoolName=wheat, ResidueType=wheat, Mass=2000, CNRatio=80, StandingFraction=0}
        ResidueTypes: LoadFromResource=ResidueTypes
        TillageTypes TillageTypesList
      MicroClimate: air_pressure=1010; soil_emissivity=0.96; sun_angle=15; soil_heat_flux_fraction=0.4; night_interception_fraction=0.5; windspeed_default=3; refheight=2; albedo=0.26; emissivity=0.96; gsmax=0.01; r50=200; a_interception=0; b_interception=1; c_interception=0; d_interception=0; soil_albedo=0.23
      Plant SCUM: CropType=MCSP
      Irrigation
      Fertiliser
      Manager SowingAndHarvesting
        CultivarName = Green_Peas
        InitialRootDepth = 10
        SowingDate = 2010-10-14
        SowingDate2 = 2011-09-14
        SowingDate3 = 2012-08-14
        HarvestDate = 2011-03-14
        HarvestDate2 = 2012-02-14
        HarvestDate3 = 2013-01-14
        EndCropDate = 2011-05-14
        EndCropDate2 = 2012-06-14
        EndCropDate3 = 2013-07-14
```csharp
using System;
using System.Collections.Generic;
using Models.Core;
using Models.PMF;
using Models.PMF.Interfaces;
using System.Xml.Serialization;

namespace Models
{
	[Serializable] 
	[System.Xml.Serialization.XmlInclude(typeof(Model))]
	public class Script : Model
	{
		[Link] Plant MCSP;
		[Link] Clock Clock;

		[Description("Cultivar")]
		public string CultivarName { get; set; }
		[Description("Initial Root Depth")]
		public double InitialRootDepth { get; set; }
		[Description("Sowing Date")]
		public DateTime SowingDate { get; set; }
		[Description("Sowing Date2")]
		public DateTime SowingDate2 { get; set; }
		[Description("Sowing Date3")]
		public DateTime SowingDate3 { get; set; }
		[Description("Harvest Date")]
		public DateTime HarvestDate { get; set; }
		[Description("Harvest Date2")]
		public DateTime HarvestDate2 { get; set; }
		[Description("Harvest Date3")]
		public DateTime HarvestDate3 { get; set; }
		[Description("EndCrop Date")]
		public DateTime EndCropDate { get; set; }
		[Description("EndCrop Date2")]
		public DateTime EndCropDate2 { get; set; }
		[Description("EndCrop Date3")]
		public DateTime EndCropDate3 { get; set; }
		
		[XmlIgnore] private RemovalFractions Remove { get; set; }
		
		[EventSubscribe("Commencing")]
		private void OnSimulationCommencing(object sender, EventArgs e)
		{
			Remove = new RemovalFractions(MCSP.Organs);
		}
		
		[EventSubscribe("DoManagement")]
		private void OnDoManagement(object sender, EventArgs e)
		{
			//Set up  array of remove fractions to send with harvest method.  Each member in the array corresponds to an organ in the same order they are set up in.

			if (Clock.Today.Date == SowingDate)
				MCSP.Sow(cultivar: CultivarName, population: 1, depth: InitialRootDepth, rowSpacing: 150);
			else if (Clock.Today.Date == HarvestDate)
			{
				//Harvest without sending defoliation data to test defaults
				MCSP.Harvest();
			}
			else if (Clock.Today.Date == EndCropDate)
				MCSP.EndCrop();
			
			//Change fractions to remove
			if (Clock.Today.Date == SowingDate2)
				MCSP.Sow(cultivar: CultivarName, population: 1, depth: InitialRootDepth, rowSpacing: 150);
			else if (Clock.Today.Date == HarvestDate2)
			{
				//Harvest with manager specified removal fractions
				Remove.SetFractionRemoved("Product", 0.3);
				Remove.SetFractionRemoved("Stover", 0.1);
				Remove.SetFractionToResidue("Product", 0.3);
				Remove.SetFractionToResidue("Stover", 0.7);
				MCSP.Harvest(Remove);
			}
			else if (Clock.Today.Date == EndCropDate2)
				MCSP.EndCrop();
			
			//Change fractions to remove
			if (Clock.Today.Date == SowingDate3)
				MCSP.Sow(cultivar: CultivarName, population: 1, depth: InitialRootDepth, rowSpacing: 150);
			else if (Clock.Today.Date == HarvestDate3)
			{
				Remove.SetFractionRemoved("Product", 0.5);
				Remove.SetFractionRemoved("Stover", 0.3);
				Remove.SetFractionToResidue("Product", 0.3);
				Remove.SetFractionToResidue("Stover", 0.7);
				MCSP.Harvest(Remove);
			}
			else if (Clock.Today.Date == EndCropDate3)
				MCSP.EndCrop();
			//PMFCrop.Sow(... Contains the following arguements:
			//Population  double  Optional  Seeds sowing/m2.  Default is zero
			//Cultivar    string  Required  "NameOfCultivar"
			//Depth       double  Optional  Depth (mm) seed sown.   Default is 100mm 
			//MaxCover    double  Optional  Proportion (0-1) of the ground row crop will cover.   Default is 1.0
			//BudNumber   double  Optional  Number of mainstems per seed sown.  Default is 1.0
			//RowSpacing  double  Optional  Spaceing (mm) between drill rows when crop is sown.  Default is 150mm
			//CropClass   string  Optional  Crop class to instantiate when crop is sown.  Default is "Plant"
		}
	}
}
```
      Manager ExtraVariables
```csharp
using System;
using Models.Core;
using System.Collections.Generic;
using System.Text;
using Models.Soils;
using Models.PMF;
using Models;
using System.Xml.Serialization;
using APSIM.Shared.Utilities;


namespace Models
{
	[Serializable] 
	public class Script : Model
	{
		[Link] Clock Clock;
		[Link] Soils.Soil Soil;
		[Link] Models.SurfaceOM.SurfaceOrganicMatter SOM;
		[Link] Weather Met;
		[Link] Fertiliser Fert;
		[Link] Irrigation Irrig;
		[Link] Plant SCUM;
		[Link] Zone zone;
					
		[XmlIgnore] public bool InitialDay { get; set; }
		
		[XmlIgnore] public double AccumPlantN { get; set; }
		[XmlIgnore] public double AccumMineralisation { get; set; }
		[XmlIgnore] public double AccumDenit { get; set; }
		[XmlIgnore] public double AccumFert { get; set; }
		[XmlIgnore] public double AccumLeach { get; set; }
		[XmlIgnore] public double AccumDetach { get; set; }
		[XmlIgnore] public double DeltaSoilOMN { get; set; }
		[XmlIgnore] public double DeltaSurfaceOMN { get; set; }
		[XmlIgnore] public double DeltaSoilMineralN { get; set; }
		[XmlIgnore] public double SoilNitrogenContent { get; set; }
		
		[XmlIgnore] public double AccumEO { get; set; }
		[XmlIgnore] public double AccumEP { get; set; }
		[XmlIgnore] public double AccumES { get; set; }
		[XmlIgnore] public double AccumDrainage { get; set; }
		[XmlIgnore] public double AccumRunoff { get; set; }
		[XmlIgnore] public double AccumOutflowLat { get; set; }
		[XmlIgnore] public double AccumIrrigation { get; set; }
		[XmlIgnore] public double AccumRainfall { get; set; }
		[XmlIgnore] public double SoilWaterDeficit { get; set; }
	
		[XmlIgnore] public double  InitialSoilOMN { get; set; }
		[XmlIgnore] public double  InitialSurfaceOMN { get; set; }
		[XmlIgnore] public double  InitialMineralN { get; set; }
		
		[XmlIgnore] public double SWC { get; set; }
		[XmlIgnore] public double DUL { get; set; }
		[XmlIgnore] public double OutFlowLat { get; set; }

		[XmlIgnore] public double FomN { get; set; }
		[XmlIgnore] public double BiomN { get; set; }
		[XmlIgnore] public double HumN { get; set; }
		[XmlIgnore] public double OrganicN { get; set; }
		[XmlIgnore] public double NO3N { get; set; }
		[XmlIgnore] public double NH4N { get; set; }
		[XmlIgnore] public double UreaN { get; set; }
		[XmlIgnore] public double MineralN { get; set; }
		[XmlIgnore] public double DltNMinRes { get; set; }
		[XmlIgnore] public double DltNMinTot { get; set; }
		
		[EventSubscribe("Commencing")]
		private void OnSimulationCommencing(object sender, EventArgs e)
		{
			InitialDay = true;
		}
		
		[EventSubscribe("DoManagement")]
		private void OnDoManagement(object sender, EventArgs e)
		{
			//!!!!!! Nitrogen balance components !!!!!!
			//!!!!!!^^^^^^^^^^^^^^^^^^^^^^^^^^^^^!!!!!!
			FomN = MathUtilities.Sum(Soil.SoilNitrogen.FOMN);
			HumN = MathUtilities.Sum(Soil.SoilNitrogen.HumicN);
			BiomN = MathUtilities.Sum(Soil.SoilNitrogen.MicrobialN);
			OrganicN = FomN + HumN + BiomN;
			NO3N = MathUtilities.Sum(Soil.NO3N);
			NH4N = MathUtilities.Sum(Soil.NH4N);
			UreaN = MathUtilities.Sum(Soil.SoilNitrogen.urea);
			MineralN = NO3N + NH4N + UreaN; 
			DltNMinRes = MathUtilities.Sum(Soil.SoilNitrogen.dlt_n_min_res);
			DltNMinTot = MathUtilities.Sum(Soil.SoilNitrogen.MineralisedN);
			int layers = Soil.Thickness.Length;
			if (InitialDay == true)
			{
				InitialSurfaceOMN = SOM.N;
				InitialSoilOMN = OrganicN;
				InitialMineralN = MineralN;
				InitialDay = false;
			}
			DeltaSurfaceOMN = SOM.N - InitialSurfaceOMN;
			AccumLeach = AccumLeach - Soil.SoilWater.LeachNH4 - Soil.SoilWater.LeachNO3 - Soil.SoilWater.LeachUrea; //Fails
			AccumMineralisation += MathUtilities.Sum(Soil.SoilNitrogen.MineralisedN);
			AccumDenit -= MathUtilities.Sum(Soil.SoilNitrogen.Denitrification);
			AccumPlantN -= (double)zone.Get("SCUM.Root.NUptake");
			DeltaSoilOMN = OrganicN - InitialSoilOMN;
			DeltaSoilMineralN = MineralN - InitialMineralN;
			SoilNitrogenContent = MineralN;
			
			//!!!!!! Water balance components !!!!!!
			//!!!!!!^^^^^^^^^^^^^^^^^^^^^^^^^^!!!!!!

			AccumRainfall += Met.Rain;
			//AccumEP -= (double)zone.Get("[SCUM].Stover.Transpiration");
			AccumEP -= (double)zone.Get("SCUM.Root.WaterUptake");
			SoilWaterDeficit = (SWC - DUL);
			double OutFlowLat = MathUtilities.Sum(Soil.SoilWater.outflow_lat);
			AccumOutflowLat -= OutFlowLat;
		}
		
		[EventSubscribe("DoManagementCalculations")]
		private void OnDoManagementCalculations(object sender, EventArgs e)
		{
			FomN = MathUtilities.Sum(Soil.SoilNitrogen.FOMN);
			HumN = MathUtilities.Sum(Soil.SoilNitrogen.HumicN);
			BiomN = MathUtilities.Sum(Soil.SoilNitrogen.MicrobialN);
			AccumFert += Fert.NitrogenApplied;
			AccumIrrigation += Irrig.IrrigationApplied;
			
			
			AccumEO -= Soil.SoilWater.Eo;
			AccumES -= Soil.SoilWater.Es; 
			AccumDrainage -= Soil.SoilWater.Drainage;
			AccumRunoff -= Soil.SoilWater.Runoff;
			SWC = MathUtilities.Sum(Soil.SoilWater.SWmm);
			DUL = MathUtilities.Sum(Soil.SoilWater.DULmm);
		}
	}
}
```
      Report: EventNames=[Clock].DoReport
        VariableNames:
          [Clock].Today
          [ExtraVariables].Script.AccumPlantN
          [ExtraVariables].Script.AccumMineralisation
          [ExtraVariables].Script.AccumDenit
          [ExtraVariables].Script.AccumFert
          [ExtraVariables].Script.AccumLeach
          [ExtraVariables].Script.AccumDetach
          [ExtraVariables].Script.DeltaSoilOMN
          [ExtraVariables].Script.DeltaSurfaceOMN
          [ExtraVariables].Script.DeltaSoilMineralN
          [ExtraVariables].Script.SWC
          [ExtraVariables].Script.DUL
          [ExtraVariables].Script.OutFlowLat
          [ExtraVariables].Script.AccumEO
          [ExtraVariables].Script.AccumEP
          [ExtraVariables].Script.AccumES
          [ExtraVariables].Script.AccumDrainage
          [ExtraVariables].Script.AccumRunoff
          [ExtraVariables].Script.AccumRainfall
          [ExtraVariables].Script.AccumIrrigation
          [ExtraVariables].Script.AccumOutflowLat
          [ExtraVariables].Script.SoilWaterDeficit
          [ExtraVariables].Script.SoilNitrogenContent
          [ExtraVariables].Script.FomN
          [ExtraVariables].Script.HumN
          [ExtraVariables].Script.BiomN
          [ExtraVariables].Script.DltNMinRes
          [ExtraVariables].Script.DltNMinTot
          [MicroClimate].net_radn
          [MicroClimate].peta
          [MicroClimate].petr
          [Soil].SoilWater.Drainage
          [Soil].SoilWater.Runoff
          [Soil].SoilWater.Eo
          [Soil].SoilWater.Es
          [Soil].SoilWater.pond
          [Soil].SoilWater.SWmm
          [Soil].NO3N
          [SCUM].Stover.Live.Wt
          [SCUM].Root.Live.Wt
          [SCUM].Product.Live.Wt
          [SCUM].Stover.Live.N
          [SCUM].Root.Live.N
          [SCUM].Product.Live.N
          [SCUM].Stover.Live.NConc
          [SCUM].Root.Live.NConc
          [SCUM].Product.Live.NConc
          [SCUM].Root.WaterSupply
          [SCUM].Root.WaterUptake
          [SCUM].Stover.Transpiration
          [SCUM].Stover.WaterDemand
          [SCUM].Root.Depth
          [SCUM].Stover.CoverTotal
          [SCUM].Stover.CoverDead
          [SCUM].Stover.LAI
          [SCUM].Stover.Height
          [SCUM].Stover.PotentialBiomass.Value
          [SCUM].Product.LiveFWt
          [SCUM].Arbitrator.NDemand
          [SCUM].Arbitrator.NSupply
          [SCUM].Stover.Fw
          [SCUM].Stover.Fn
          [SCUM].Summariser.Total.Wt
          [SCUM].ExpectedYield.Value
          [SCUM].DryYield.Value
          [SCUM].TotalBiomassAtStartReproductive.Value
          [SCUM].TotalBiomassAtStartSenescence.Value
          [SCUM].Ymax.Value
          [SCUM].Summariser.Total.N
          [SCUM].Arbitrator.DMSupply
          [SCUM].Arbitrator.DMDemand
          [SCUM].Phenology.AccumulatedThermalTime.Value
          [SCUM].Arbitrator.DMSinkLimitation
          [SCUM].Arbitrator.DMNutrientLimitation
          [SCUM].Phenology.ThermalTime.Value
          [SCUM].Phenology.CurrentPhaseName
          [SCUM].Phenology.Stage
          [AutomaticIrrigation].Script.Top_Refull
          [AutomaticIrrigation].Script.Top_Trigger
          [AutomaticIrrigation].Script.Top_SW
          [AutomaticIrrigation].Script.Top_DUL
          [Irrigation].IrrigationApplied
          [AutomaticIrrigation].Script.Amount_to_apply
          [AutomaticIrrigation].Script.StartDate
          [Clock].Today
          [AutomaticIrrigation].Script.SeasonIsOpen
          [AutomaticIrrigation].Script.EndDate
          [AutomaticIrrigation].Script.TodayYear
          [SCUM].Arbitrator.FN
          [SurfaceOrganicMatter].wt
          sum([Soil].SoilNitrogen.FOMN)
  Simulation BiomassRemoveCutTest: Area=0; Slope=0
    Weather: FileName=%root%\Tests\WeatherFiles\lincoln.met
    Clock: StartDate=2010-10-01; EndDate=2013-07-31
    Summary
    SoilArbitrator Soil Arbitrator
    Zone Field: Area=0; Slope=0
      Soil: same as BiomassRemoveHarvestTest.Field.Soil
      SurfaceOrganicMatter surface organic matter: same as BiomassRemoveHarvestTest.Field.surface organic matter
      MicroClimate: same as BiomassRemoveHarvestTest.Field.MicroClimate
      Plant SCUM: CropType=MCSP
      Irrigation
      Fertiliser
      Manager SowingAndCutting
        CultivarName = Green_Peas
        InitialRootDepth = 10
        SowingDate = 2010-10-14
        SowingDate2 = 2011-09-14
        SowingDate3 = 2012-08-14
        CutDate = 2011-03-14
        CutDate2 = 2012-02-14
        CutDate3 = 2013-01-14
        EndCropDate = 2011-05-14
        EndCropDate2 = 2012-06-14
        EndCropDate3 = 2013-07-14
```csharp
using System;
using System.Collections.Generic;
using Models.Core;
using Models.PMF;
using Models.PMF.Interfaces;
using System.Xml.Serialization;

namespace Models
{
	[Serializable] 
	[System.Xml.Serialization.XmlInclude(typeof(Model))]
	public class Script : Model
	{
		[Link] Plant MCSP;
		[Link] Clock Clock;

		[Description("Cultivar")]
		public string CultivarName { get; set; }
		[Description("Initial Root Depth")]
		public double InitialRootDepth { get; set; }
		[Description("Sowing Date")]
		public DateTime SowingDate { get; set; }
		[Description("Sowing Date2")]
		public DateTime SowingDate2 { get; set; }
		[Description("Sowing Date3")]
		public DateTime SowingDate3 { get; set; }
		[Description("Cut Date")]
		public DateTime CutDate { get; set; }
		[Description("Cut Date2")]
		public DateTime CutDate2 { get; set; }
		[Description("Cut Date3")]
		public DateTime CutDate3 { get; set; }
		[Description("EndCrop Date")]
		public DateTime EndCropDate { get; set; }
		[Description("EndCrop Date2")]
		public DateTime EndCropDate2 { get; set; }
		[Description("EndCrop Date3")]
		public DateTime EndCropDate3 { get; set; }
		
		[XmlIgnore] private RemovalFractions Remove { get; set; }
		
		[EventSubscribe("Commencing")]
		private void OnSimulationCommencing(object sender, EventArgs e)
		{
			Remove = new RemovalFractions(MCSP.Organs);
		}
		
		[EventSubscribe("DoManagement")]
		private void OnDoManagement(object sender, EventArgs e)
		{
			//Set up  array of remove fractions to send with Cut method.  Each member in the array corresponds to an organ in the same order they are set up in.

			if (Clock.Today.Date == SowingDate)
				MCSP.Sow(cultivar: CultivarName, population: 1, depth: InitialRootDepth, rowSpacing: 150);
			else if (Clock.Today.Date == CutDate)
			{
				//Cut without sending defoliation data to test defaults
				MCSP.Cut();
			}
			else if (Clock.Today.Date == EndCropDate)
				MCSP.EndCrop();
			
			//Change fractions to remove
			if (Clock.Today.Date == SowingDate2)
				MCSP.Sow(cultivar: CultivarName, population: 1, depth: InitialRootDepth, rowSpacing: 150);
			else if (Clock.Today.Date == CutDate2)
			{
				//Harvest with manager specified removal fractions
				Remove.SetFractionRemoved("Product", 0.3);
				Remove.SetFractionRemoved("Stover", 0.1);
				Remove.SetFractionToResidue("Product", 0.3);
				Remove.SetFractionToResidue("Stover", 0.7);
				MCSP.Cut(Remove);
			}
			else if (Clock.Today.Date == EndCropDate2)
				MCSP.EndCrop();
			
			//Change fractions to remove
			if (Clock.Today.Date == SowingDate3)
				MCSP.Sow(cultivar: CultivarName, population: 1, depth: InitialRootDepth, rowSpacing: 150);
			else if (Clock.Today.Date == CutDate3)
			{
				Remove.SetFractionRemoved("Product", 0.5);
				Remove.SetFractionRemoved("Stover", 0.3);
				Remove.SetFractionToResidue("Product", 0.3);
				Remove.SetFractionToResidue("Stover", 0.7);
				MCSP.Cut(Remove);
			}
			else if (Clock.Today.Date == EndCropDate3)
				MCSP.EndCrop();
			//PMFCrop.Sow(... Contains the following arguements:
			//Population  double  Optional  Seeds sowing/m2.  Default is zero
			//Cultivar    string  Required  "NameOfCultivar"
			//Depth       double  Optional  Depth (mm) seed sown.   Default is 100mm 
			//MaxCover    double  Optional  Proportion (0-1) of the ground row crop will cover.   Default is 1.0
			//BudNumber   double  Optional  Number of mainstems per seed sown.  Default is 1.0
			//RowSpacing  double  Optional  Spaceing (mm) between drill rows when crop is sown.  Default is 150mm
			//CropClass   string  Optional  Crop class to instantiate when crop is sown.  Default is "Plant"
		}
	}
}
```
      Manager ExtraVariables: same as BiomassRemoveHarvestTest.Field.ExtraVariables
      Report: same as BiomassRemoveHarvestTest.Field.Report
  Simulation BiomassRemovePrunTest: Area=0; Slope=0
    Weather: FileName=%root%\Tests\WeatherFiles\lincoln.met
    Clock: StartDate=2010-10-01; EndDate=2013-07-31
    Summary
    SoilArbitrator Soil Arbitrator
    Zone Field: Area=0; Slope=0
      Soil: same as BiomassRemoveHarvestTest.Field.Soil
      SurfaceOrganicMatter surface organic matter: same as BiomassRemoveHarvestTest.Field.surface organic matter
      MicroClimate: same as BiomassRemoveHarvestTest.Field.MicroClimate
      Plant SCUM: CropType=MCSP
      Irrigation
      Fertiliser
      Manager SowingAndPruning
        CultivarName = Green_Peas
        InitialRootDepth = 10
        SowingDate = 2010-10-14
        SowingDate2 = 2011-09-14
        SowingDate3 = 2012-08-14
        PruneDate = 2011-03-14
        PruneDate2 = 2012-02-14
        PruneDate3 = 2013-01-14
        EndCropDate = 2011-05-14
        EndCropDate2 = 2012-06-14
        EndCropDate3 = 2013-07-14
```csharp
using System;
using System.Collections.Generic;
using Models.Core;
using Models.PMF;
using Models.PMF.Interfaces;
using System.Xml.Serialization;

namespace Models
{
	[Serializable] 
	[System.Xml.Serialization.XmlInclude(typeof(Model))]
	public class Script : Model
	{
		[Link] Plant MCSP;
		[Link] Clock Clock;

		[Description("Cultivar")]
		public string CultivarName { get; set; }
		[Description("Initial Root Depth")]
		public double InitialRootDepth { get; set; }
		[Description("Sowing Date")]
		public DateTime SowingDate { get; set; }
		[Description("Sowing Date2")]
		public DateTime SowingDate2 { get; set; }
		[Description("Sowing Date3")]
		public DateTime SowingDate3 { get; set; }
		[Description("Prune Date")]
		public DateTime PruneDate { get; set; }
		[Description("Prune Date2")]
		public DateTime PruneDate2 { get; set; }
		[Description("Prune Date3")]
		public DateTime PruneDate3 { get; set; }
		[Description("EndCrop Date")]
		public DateTime EndCropDate { get; set; }
		[Description("EndCrop Date2")]
		public DateTime EndCropDate2 { get; set; }
		[Description("EndCrop Date3")]
		public DateTime EndCropDate3 { get; set; }
		
		[XmlIgnore] private RemovalFractions Remove { get; set; }
		
		[EventSubscribe("Commencing")]
		private void OnSimulationCommencing(object sender, EventArgs e)
		{
			Remove = new RemovalFractions(MCSP.Organs);
		}
		
		[EventSubscribe("DoManagement")]
		private void OnDoManagement(object sender, EventArgs e)
		{
			//Set up  array of remove fractions to send with Prune method.  Each member in the array corresponds to an organ in the same order they are set up in.

			if (Clock.Today.Date == SowingDate)
				MCSP.Sow(cultivar: CultivarName, population: 1, depth: InitialRootDepth, rowSpacing: 150);
			else if (Clock.Today.Date == PruneDate)
			{
				//Prune without sending defoliation data to test defaults
				MCSP.Prune();
			}
			else if (Clock.Today.Date == EndCropDate)
				MCSP.EndCrop();
			
			//Change fractions to remove
			if (Clock.Today.Date == SowingDate2)
				MCSP.Sow(cultivar: CultivarName, population: 1, depth: InitialRootDepth, rowSpacing: 150);
			else if (Clock.Today.Date == PruneDate2)
			{
				//Harvest with manager specified removal fractions
				Remove.SetFractionRemoved("Product", 0.3);
				Remove.SetFractionRemoved("Stover", 0.1);
				Remove.SetFractionToResidue("Product", 0.3);
				Remove.SetFractionToResidue("Stover", 0.7);
				MCSP.Prune(Remove);
			}
			else if (Clock.Today.Date == EndCropDate2)
				MCSP.EndCrop();
			
			//Change fractions to remove
			if (Clock.Today.Date == SowingDate3)
				MCSP.Sow(cultivar: CultivarName, population: 1, depth: InitialRootDepth, rowSpacing: 150);
			else if (Clock.Today.Date == PruneDate3)
			{
				Remove.SetFractionRemoved("Product", 0.1);
				Remove.SetFractionRemoved("Stover", 0.3);
				Remove.SetFractionToResidue("Product", 0.7);
				Remove.SetFractionToResidue("Stover", 0.3);
				MCSP.Prune(Remove);
			}
			else if (Clock.Today.Date == EndCropDate3)
				MCSP.EndCrop();
			//PMFCrop.Sow(... Contains the following arguements:
			//Population  double  Optional  Seeds sowing/m2.  Default is zero
			//Cultivar    string  Required  "NameOfCultivar"
			//Depth       double  Optional  Depth (mm) seed sown.   Default is 100mm 
			//MaxCover    double  Optional  Proportion (0-1) of the ground row crop will cover.   Default is 1.0
			//BudNumber   double  Optional  Number of mainstems per seed sown.  Default is 1.0
			//RowSpacing  double  Optional  Spaceing (mm) between drill rows when crop is sown.  Default is 150mm
			//CropClass   string  Optional  Crop class to instantiate when crop is sown.  Default is "Plant"
		}
	}
}
```
      Manager ExtraVariables: same as BiomassRemoveHarvestTest.Field.ExtraVariables
      Report: same as BiomassRemoveHarvestTest.Field.Report
  Simulation BiomassRemoveGrazeTest: Area=0; Slope=0
    Weather: FileName=%root%\Tests\WeatherFiles\lincoln.met
    Clock: StartDate=2010-10-01; EndDate=2013-07-31
    Summary
    SoilArbitrator Soil Arbitrator
    Zone Field: Area=0; Slope=0
      Soil: same as BiomassRemoveHarvestTest.Field.Soil
      SurfaceOrganicMatter surface organic matter: same as BiomassRemoveHarvestTest.Field.surface organic matter
      MicroClimate: same as BiomassRemoveHarvestTest.Field.MicroClimate
      Plant SCUM: CropType=MCSP
      Irrigation
      Fertiliser
      Manager SowingAndGrazing
        CultivarName = Green_Peas
        InitialRootDepth = 10
        SowingDate = 2010-10-14
        SowingDate2 = 2011-09-14
        SowingDate3 = 2012-08-14
        GrazeDate = 2011-03-14
        GrazeDate2 = 2012-02-14
        GrazeDate3 = 2013-01-14
        EndCropDate = 2011-05-14
        EndCropDate2 = 2012-06-14
        EndCropDate3 = 2013-07-14
```csharp
using System;
using System.Collections.Generic;
using Models.Core;
using Models.PMF;
using Models.PMF.Interfaces;
using System.Xml.Serialization;

namespace Models
{
	[Serializable] 
	[System.Xml.Serialization.XmlInclude(typeof(Model))]
	public class Script : Model
	{
		[Link] Plant MCSP;
		[Link] Clock Clock;

		[Description("Cultivar")]
		public string CultivarName { get; set; }
		[Description("Initial Root Depth")]
		public double InitialRootDepth { get; set; }
		[Description("Sowing Date")]
		public DateTime SowingDate { get; set; }
		[Description("Sowing Date2")]
		public DateTime SowingDate2 { get; set; }
		[Description("Sowing Date3")]
		public DateTime SowingDate3 { get; set; }
		[Description("Graze Date")]
		public DateTime GrazeDate { get; set; }
		[Description("Graze Date2")]
		public DateTime GrazeDate2 { get; set; }
		[Description("Graze Date3")]
		public DateTime GrazeDate3 { get; set; }
		[Description("EndCrop Date")]
		public DateTime EndCropDate { get; set; }
		[Description("EndCrop Date2")]
		public DateTime EndCropDate2 { get; set; }
		[Description("EndCrop Date3")]
		public DateTime EndCropDate3 { get; set; }
		
		[XmlIgnore] private RemovalFractions Remove { get; set; }
		
		[EventSubscribe("Commencing")]
		private void OnSimulationCommencing(object sender, EventArgs e)
		{
			Remove = new RemovalFractions(MCSP.Organs);
		}
		
		[EventSubscribe("DoManagement")]
		private void OnDoManagement(object sender, EventArgs e)
		{
			//Set up  array of remove fractions to send with Graze method.  Each member in the array corresponds to an organ in the same order they are set up in.

			if (Clock.Today.Date == SowingDate)
				MCSP.Sow(cultivar: CultivarName, population: 1, depth: InitialRootDepth, rowSpacing: 150);
			else if (Clock.Today.Date == GrazeDate)
			{
				//Graze without sending defoliation data to test defaults
				MCSP.Graze();
			}
			else if (Clock.Today.Date == EndCropDate)
				MCSP.EndCrop();
			
			//Change fractions to remove
			if (Clock.Today.Date == SowingDate2)
				MCSP.Sow(cultivar: CultivarName, population: 1, depth: InitialRootDepth, rowSpacing: 150);
			else if (Clock.Today.Date == GrazeDate2)
			{
				//Harvest with manager specified removal fractions
				Remove.SetFractionRemoved("Product", 0.3);
				Remove.SetFractionRemoved("Stover", 0.1);
				Remove.SetFractionToResidue("Product", 0.3);
				Remove.SetFractionToResidue("Stover", 0.7);
				MCSP.Graze(Remove);
			}
			else if (Clock.Today.Date == EndCropDate2)
				MCSP.EndCrop();
			
			//Change fractions to remove
			if (Clock.Today.Date == SowingDate3)
				MCSP.Sow(cultivar: CultivarName, population: 1, depth: InitialRootDepth, rowSpacing: 150);
			else if (Clock.Today.Date == GrazeDate3)
			{
				Remove.SetFractionRemoved("Product", 0.1);
				Remove.SetFractionRemoved("Stover", 0.3);
				Remove.SetFractionToResidue("Product", 0.7);
				Remove.SetFractionToResidue("Stover", 0.3);
				MCSP.Graze(Remove);
			}
			else if (Clock.Today.Date == EndCropDate3)
				MCSP.EndCrop();
			//PMFCrop.Sow(... Contains the following arguements:
			//Population  double  Optional  Seeds sowing/m2.  Default is zero
			//Cultivar    string  Required  "NameOfCultivar"
			//Depth       double  Optional  Depth (mm) seed sown.   Default is 100mm 
			//MaxCover    double  Optional  Proportion (0-1) of the ground row crop will cover.   Default is 1.0
			//BudNumber   double  Optional  Number of mainstems per seed sown.  Default is 1.0
			//RowSpacing  double  Optional  Spaceing (mm) between drill rows when crop is sown.  Default is 150mm
			//CropClass   string  Optional  Crop class to instantiate when crop is sown.  Default is "Plant"
		}
	}
}
```
      Manager ExtraVariables: same as BiomassRemoveHarvestTest.Field.ExtraVariables
      Report: same as BiomassRemoveHarvestTest.Field.Report
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