Simulations
  Simulation Test: Area=0; Slope=0
    Memo
      This test simulation has two 'Weather' models in it, one at the top level and one in the Field. It tests that GetWeather in the field links to the local 'WeatherOverridden' model and not the top level one. It also tests that WeatherOverridden can have a link to the top level Weather.
    Weather: FileName=%root%\Tests\WeatherFiles\lincoln.met
    Clock: StartDate=1960-01-02; EndDate=1960-01-02
    Summary
    Zone Field: Area=0; Slope=0
      Report: EventNames=[Clock].DoReport
        VariableNames:
          [Clock].Today
          [GetWeather].Script.LocalMaxT
          [GetWeather].Script.LocalMinT
          [GetWeather].Script.LocalRain
      Manager WeatherOverridden
```csharp
using System;
using Models.Core;
using Models.PMF;
using Models.Interfaces;
namespace Models
{
	[Serializable]
	public class Script : Model, IWeather
	{
		[Link] Clock Clock;
		[Link] IWeather weather; // parent weather.
		
		/// <summary>Gets the start date of the weather file</summary>
        public DateTime StartDate { get { return weather.StartDate; } }

        /// <summary>Gets the end date of the weather file</summary>
        public DateTime EndDate { get { return weather.EndDate; } }

        /// <summary>Gets or sets the maximum temperature (oc)</summary>
        public double MaxT { get { return 1.0; } }

        /// <summary>Gets or sets the minimum temperature (oc)</summary>
        public double MinT { get { return 2.0; } }

        /// <summary>Gets or sets the rainfall (mm)</summary>
        public double Rain { get { return weather.Rain; } }

        /// <summary>Gets or sets the solar radiation. MJ/m2/day</summary>
        public double Radn { get { return weather.Radn; } }

        /// <summary>Gets or sets the vapor pressure</summary>
        public double VP { get { return 5.0; } }

        /// <summary>
        /// Gets or sets the wind value found in weather file or zero if not specified.
        /// </summary>
        public double Wind { get { return 6.0; } }

        /// <summary>
        /// Gets or sets the CO2 level. If not specified in the weather file the default is 350.
        /// </summary>
        public double CO2 { get { return 7.0; } }

        /// <summary>Gets the latitude</summary>
        public double Latitude { get { return 8.0; } }

        /// <summary>Gets the average temperature</summary>
        public double Tav { get { return 9.0; } }

        /// <summary>Gets the temperature amplitude.</summary>
        public double Amp { get { return 10.0; } }

        /// <summary>Gets the duration of the day in hours.</summary>
        public double DayLength { get { return 11.0; } }
		
	}
}
```
      Manager GetWeather
```csharp
using System;
using Models.Core;
using Models.PMF;
using Models.Interfaces;
namespace Models
{
	[Serializable]
	public class Script : Model
	{
		[Link] IWeather weather; // parent in this field.
		
		public DateTime LocalStartDate { get { return weather.StartDate; } }
		public double LocalMaxT { get {	return weather.MaxT; } }
		public double LocalMinT { get {	return weather.MinT; } }
		public double LocalRain { get {	return weather.Rain; } }
		
		[EventSubscribe("DoManagement")]
		private void OnDoManagement(object sender, EventArgs e)
		{
			
		}
	}
	

}
```
  DataStore
  Tests
    Test:
      SimulationName  TableName  Type     ColumnNames                  Parameters
      Test            Report     EqualTo  GetWeather.Script.LocalMaxT  1
      Test            Report     EqualTo  GetWeather.Script.LocalMinT  2
      Test            Report     EqualTo  GetWeather.Script.LocalRain  100
