Simulations: Area=0
  Simulation GympieIrrigatedFertilized: Area=0
    WeatherFile: FileName=toolara8797.met; MaxT=28; MinT=17; Rain=0; Radn=25; vp=18; wind=3; CO2=350
    Clock: StartDate=1987-02-04; EndDate=1997-02-04
    Summary
    Zone Plantation: Area=0
      Soil: Latitude=0; Longitude=0
        InitialWater Initial water: FractionFull=0.8; PercentMethod=EvenlyDistributed
        Water
          Thickness  BD    AirDry  LL15  DUL   SAT
          100        1.5   0.01    0.05  0.16  0.29
          300        1.6   0.01    0.05  0.15  0.29
          600        1.68  0.01    0.05  0.14  0.29
          1000       1.75  0.02    0.05  0.13  0.29
          1000       1.7   0.05    0.05  0.12  0.29
          1000       1.7   0.05    0.05  0.12  0.29
          1000       1.7   0.05    0.05  0.12  0.29
          1000       1.7   0.05    0.05  0.12  0.29
          SoilCrop Eucalyptus: LL=[0.1, 0.1, 0.1, 0.1, 0.1, 0.1, 0.1, 0.1]; KL=[0.07, 0.07, 0.05, 0.02, 0.02, 0.02, 0.01, 0.01]; XF=[1, 1, 1, 1, 1, 0, 0, 0]
        SoilWater: min_crit_temp=5; max_crit_temp=35; max_albedo=0.23; A_to_evap_fact=0.44; canopy_eos_coef=1.7; sw_top_crit=0.9; sumes1_max=100; sumes2_max=25; solute_flow_eff=[1]; solute_flux_eff=[1]; gravity_gradient=2E-05; specific_bd=2.65; hydrol_effective_depth=450; immobile_solutes=[nh4]; canopy_fact=[1, 1, 0, 0]; canopy_fact_height=[0, 600, 1800, 30000]; canopy_fact_default=0.5; act_evap_method=ritchie; irrigation_will_runoff=false; irrigation_layer=0; SummerCona=3.5; SummerU=4; SummerDate=1-Nov; WinterCona=3.5; WinterU=4; WinterDate=1-Apr; DiffusConst=88; DiffusSlope=35.4; Salb=0.13; slope=0; discharge_width=0; catchment_area=0; max_pond=0; CN2Bare=65; CNRed=20; CNCov=0.8
          mobile_solutes  Thickness  SWCON  KLAT
          no3             100        0.9    0
          urea            300        0.9    0
          cl              600        0.9    0
          br              1000       0.6    0
          org_n           1000       0.6    0
          org_c_pool1     1000       0.6    0
          org_c_pool2     1000       0.6    0
          org_c_pool3     1000       0.6    0
        SoilNitrogen: fom_type=[default, manure, mucuna, lablab, shemp, stable]; fract_carb=[0.2, 0.3, 0.54, 0.57, 0.45, 0]; fract_cell=[0.7, 0.3, 0.37, 0.37, 0.47, 0.1]; fract_lign=[0.1, 0.4, 0.09, 0.06, 0.08, 0.9]
        SoilOrganicMatter: RootCN=60; RootWt=1; SoilCN=20; EnrACoeff=7.4; EnrBCoeff=0.2; OCUnits=Total
          Thickness  OC    FBiom  FInert
          100        1     0.02   0.6
          300        1     0.02   0.7
          600        0.29  0.01   0.95
          1000       0.2   0.01   0.99
          1000       0.12  0.01   0.99
          1000       0.1   0.01   0.99
          1000       0.1   0.01   0.99
          1000       0.1   0.01   0.99
        Analysis: Thickness=[100, 300, 600, 1000, 1000, 1000, 1000, 1000]; PH=[5.8, 5.7, 5.7, 5.9, 5.7, 5.7, 5.7, 5.7]; PHUnits=Water; BoronUnits=HotWater
        Sample Initial nitrogen: NO3Units=ppm; NH4Units=ppm; SWUnits=Volumetric; OCUnits=Total; PHUnits=Water
          Thickness  NO3   NH4
          100        0.1   0.01
          300        0.1   0.01
          600        0.1   0.01
          1000       0.01  0.01
          1000       0.01  0.01
          1000       0.01  0.01
          1000       0.01  0.01
          1000       0.01  0.01
      Irrigation
      Fertiliser
        Definitions:
          Name         FractionNO3  FractionNH4  FractionUrea  FractionRockP  FractionBandedP  FractionLabileP  FractionCa  Description
          UreaN        0            0            1             0              0                0                0           -
          NO3N         1            0            0             0              0                0                0           -
          CalciteCA    0            0            0             0              0                0                1           Ca as finely ground Agricultural Lime
          CalciteFine  0            0            0             0              0                0                0.4         finely ground Agricultural Lime
          Dolomite     0            0            0             0              0                0                0.22        finely ground dolomite
          NO3N         1            0            0             0              0                0                0           N as nitrate
          NH4N         0            1            0             0              0                0                0           N as ammonium
          NH4NO3N      0.5          0.5          0             0              0                0                0           ammonium nitrate
          DAP          0            0.18         0             0              0                0                0           di-ammonium phosphate
          MAP          0            0.11         0             0              0                0                0           mono-ammonium phosphate
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      SurfaceOrganicMatter: crit_residue_wt=2000; opt_temp=20; cum_eos_max=20; cnrf_coeff=0.277; cnrf_optcn=25; c_fract=0.4; leach_rain_tot=25; min_rain_to_leach=10; crit_min_surfom_orgC=0.004; default_cpr=0; default_standing_fraction=0; standing_extinct_coeff=0.5; fractionFaecesAdded=0.5; PoolName=Wheat; type=Wheat; mass=2000; standing_fraction=0; cnr=80
        ResidueTypes:
          Name         fom_type       fraction_C  po4ppm  nh4ppm  no3ppm  specific_area  cf_contrib  pot_decomp_rate  fr_c             fr_n             fr_p
          ResidueType  wheat          0.4         0       0       0       0.0005         1           0.1              [0.2, 0.7, 0.1]  [0.2, 0.7, 0.1]  [0.2, 0.7, 0.1]
          ResidueType  lucerne        0.4         0       0       0       0.0002         1           0.1              [0.2, 0.7, 0.1]  [0.2, 0.7, 0.1]  [0.2, 0.7, 0.1]
          ResidueType  barley         0.4         0       0       0       0.0005         1           0.1              [0.2, 0.7, 0.1]  [0.2, 0.7, 0.1]  [0.2, 0.7, 0.1]
          ResidueType  tithonia       0.4         0       0       0       0.0005         1           0.1              [0.2, 0.7, 0.1]  [0.2, 0.7, 0.1]  [0.2, 0.7, 0.1]
          ResidueType  bambatsi       0.4         0       0       0       0.0005         1           0.1              [0.2, 0.7, 0.1]  [0.2, 0.7, 0.1]  [0.2, 0.7, 0.1]
          ResidueType  barley         0.4         0       0       0       0.0005         1           0.1              [0.2, 0.7, 0.1]  [0.2, 0.7, 0.1]  [0.2, 0.7, 0.1]
          ResidueType  broccoli       0.4         0       0       0       0.0004         1           0.1              [0.2, 0.7, 0.1]  [0.2, 0.7, 0.1]  [0.2, 0.7, 0.1]
          ResidueType  butterflypea   0.4         0       0       0       0.0004         1           0.1              [0.2, 0.7, 0.1]  [0.2, 0.7, 0.1]  [0.2, 0.7, 0.1]
          ResidueType  camaldulensis  0.4         0       0       0       0.0002         1           0.1              [0.2, 0.7, 0.1]  [0.2, 0.7, 0.1]  [0.2, 0.7, 0.1]
          ResidueType  canola         0.4         0       0       0       0.0002         1           0.1              [0.2, 0.7, 0.1]  [0.2, 0.7, 0.1]  [0.2, 0.7, 0.1]
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        TillageTypes
      MicroClimate: air_pressure=1010; soil_emissivity=0.96; sun_angle=15; soil_heat_flux_fraction=0.4; night_interception_fraction=0.5; windspeed_default=3; refheight=2; albedo=0.293662; emissivity=0.96; gsmax=0.01; r50=200; a_interception=0; b_interception=1; c_interception=0; d_interception=0; soil_albedo=0.13
        ComponentData Eucalyptus: Type=Eucalyptus; Albedo=0.26; Emissivity=0.96; R50=200; Gsmax=0.011
        ComponentData crop: Albedo=0.26; Emissivity=0.96; R50=200; Gsmax=0.011
        ComponentData broccoli: Albedo=0.26; Emissivity=0.96; R50=200; Gsmax=0.011
        ComponentData tree: Albedo=0.15; Emissivity=0.96; R50=200; Gsmax=0.005
        ComponentData grandis: Albedo=0.15; Emissivity=0.96; R50=200; Gsmax=0.005
        ComponentData oilpalm: Albedo=0.15; Emissivity=0.96; R50=200; Gsmax=0.005
        ComponentData oilmallee: Albedo=0.15; Emissivity=0.96; R50=200; Gsmax=0.005
        ComponentData globulus: Albedo=0.15; Emissivity=0.96; R50=200; Gsmax=0.005
        ComponentData camaldulensis: Albedo=0.15; Emissivity=0.96; R50=200; Gsmax=0.005
        ComponentData grass: Albedo=0.23; Emissivity=0.96; R50=200; Gsmax=0
        ComponentData wheat: Albedo=0.26; Emissivity=0.96; R50=200; Gsmax=0.011
        ComponentData barley: Albedo=0.26; Emissivity=0.96; R50=200; Gsmax=0.011
        ComponentData canola: Albedo=0.26; Emissivity=0.96; R50=200; Gsmax=0.011
        ComponentData raphanus_raphanistrum: Albedo=0.26; Emissivity=0.96; R50=200; Gsmax=0.011
        ComponentData lolium_rigidum: Albedo=0.26; Emissivity=0.96; R50=200; Gsmax=0.011
        ComponentData chickpea: Albedo=0.26; Emissivity=0.96; R50=200; Gsmax=0.011
        ComponentData weed: Albedo=0.26; Emissivity=0.96; R50=200; Gsmax=0.011
        ComponentData oats: Albedo=0.26; Emissivity=0.96; R50=200; Gsmax=0.011
        ComponentData chickpea: Albedo=0.26; Emissivity=0.96; R50=200; Gsmax=0.011
        ComponentData fieldpea: Albedo=0.26; Emissivity=0.96; R50=200; Gsmax=0.011
        ComponentData sugar: Albedo=0.26; Emissivity=0.96; R50=200; Gsmax=0.011
        ComponentData potato: Albedo=0.15; Emissivity=0.96; R50=200; Gsmax=0
        ComponentData frenchbean: Albedo=0.26; Emissivity=0.96; R50=200; Gsmax=0.011
        ComponentData bambatsi: Albedo=0.23; Emissivity=0.96; R50=150; Gsmax=0.015
        ComponentData lucerne: Albedo=0.26; Emissivity=0.96; R50=200; Gsmax=0.011
        ComponentData maize: Albedo=0.26; Emissivity=0.96; R50=200; Gsmax=0.011
        ComponentData banksia: Albedo=0.15; Emissivity=0.96; R50=200; Gsmax=0.005
        ComponentData understorey: Albedo=0.26; Emissivity=0.96; R50=200; Gsmax=0.011
        ComponentData ryegrass: Albedo=0.23; Emissivity=0.96; R50=200; Gsmax=0
        ComponentData vine: Albedo=0.26; Emissivity=0.96; R50=200; Gsmax=0.011
        ComponentData saltbush: Albedo=0.15; Emissivity=0.96; R50=200; Gsmax=0.005
        ComponentData sorghum: Albedo=0.26; Emissivity=0.96; R50=200; Gsmax=0.011
        ComponentData danthonia: Albedo=0.23; Emissivity=0.96; R50=200; Gsmax=0
        ComponentData nativepasture: Albedo=0.15; Emissivity=0.96; R50=200; Gsmax=0
        ComponentData raphanus_raphanistrum: Albedo=0.26; Emissivity=0.96; R50=200; Gsmax=0.011
        ComponentData canola: Albedo=0.26; Emissivity=0.96; R50=200; Gsmax=0.011
        ComponentData kale2: Albedo=0.26; Emissivity=0.96; R50=200; Gsmax=0.011
        ComponentData Carrots4: Albedo=0.26; Emissivity=0.96; R50=200; Gsmax=0.011
        ComponentData crop: Albedo=0.26; Emissivity=0.96; R50=200; Gsmax=0.011
        ComponentData broccoli: Albedo=0.26; Emissivity=0.96; R50=200; Gsmax=0.011
        ComponentData tree: Albedo=0.15; Emissivity=0.96; R50=200; Gsmax=0.005
        ComponentData grandis: Albedo=0.15; Emissivity=0.96; R50=200; Gsmax=0.005
        ComponentData oilpalm: Albedo=0.15; Emissivity=0.96; R50=200; Gsmax=0.005
        ComponentData oilmallee: Albedo=0.15; Emissivity=0.96; R50=200; Gsmax=0.005
        ComponentData globulus: Albedo=0.15; Emissivity=0.96; R50=200; Gsmax=0.005
        ComponentData camaldulensis: Albedo=0.15; Emissivity=0.96; R50=200; Gsmax=0.005
        ComponentData grass: Albedo=0.23; Emissivity=0.96; R50=200; Gsmax=0
        ComponentData wheat: Albedo=0.26; Emissivity=0.96; R50=200; Gsmax=0.011
        ComponentData barley: Albedo=0.26; Emissivity=0.96; R50=200; Gsmax=0.011
        ComponentData canola: Albedo=0.26; Emissivity=0.96; R50=200; Gsmax=0.011
        ComponentData raphanus_raphanistrum: Albedo=0.26; Emissivity=0.96; R50=200; Gsmax=0.011
        ComponentData lolium_rigidum: Albedo=0.26; Emissivity=0.96; R50=200; Gsmax=0.011
        ComponentData chickpea: Albedo=0.26; Emissivity=0.96; R50=200; Gsmax=0.011
        ComponentData weed: Albedo=0.26; Emissivity=0.96; R50=200; Gsmax=0.011
        ComponentData oats: Albedo=0.26; Emissivity=0.96; R50=200; Gsmax=0.011
        ComponentData chickpea: Albedo=0.26; Emissivity=0.96; R50=200; Gsmax=0.011
        ComponentData fieldpea: Albedo=0.26; Emissivity=0.96; R50=200; Gsmax=0.011
        ComponentData sugar: Albedo=0.26; Emissivity=0.96; R50=200; Gsmax=0.011
        ComponentData potato: Albedo=0.15; Emissivity=0.96; R50=200; Gsmax=0
        ComponentData frenchbean: Albedo=0.26; Emissivity=0.96; R50=200; Gsmax=0.011
        ComponentData bambatsi: Albedo=0.23; Emissivity=0.96; R50=150; Gsmax=0.015
        ComponentData lucerne: Albedo=0.26; Emissivity=0.96; R50=200; Gsmax=0.011
        ComponentData maize: Albedo=0.26; Emissivity=0.96; R50=200; Gsmax=0.011
        ComponentData banksia: Albedo=0.15; Emissivity=0.96; R50=200; Gsmax=0.005
        ComponentData understorey: Albedo=0.26; Emissivity=0.96; R50=200; Gsmax=0.011
        ComponentData ryegrass: Albedo=0.23; Emissivity=0.96; R50=200; Gsmax=0
        ComponentData vine: Albedo=0.26; Emissivity=0.96; R50=200; Gsmax=0.011
        ComponentData saltbush: Albedo=0.15; Emissivity=0.96; R50=200; Gsmax=0.005
        ComponentData sorghum: Albedo=0.26; Emissivity=0.96; R50=200; Gsmax=0.011
        ComponentData danthonia: Albedo=0.23; Emissivity=0.96; R50=200; Gsmax=0
        ComponentData nativepasture: Albedo=0.15; Emissivity=0.96; R50=200; Gsmax=0
        ComponentData raphanus_raphanistrum: Albedo=0.26; Emissivity=0.96; R50=200; Gsmax=0.011
        ComponentData canola: Albedo=0.26; Emissivity=0.96; R50=200; Gsmax=0.011
        ComponentData kale2: Albedo=0.26; Emissivity=0.96; R50=200; Gsmax=0.011
        ComponentData Carrots4: Albedo=0.26; Emissivity=0.96; R50=200; Gsmax=0.011
        ComponentData crop: Albedo=0.26; Emissivity=0.96; R50=200; Gsmax=0.011
        ComponentData broccoli: Albedo=0.26; Emissivity=0.96; R50=200; Gsmax=0.011
        ComponentData tree: Albedo=0.15; Emissivity=0.96; R50=200; Gsmax=0.005
        ComponentData grandis: Albedo=0.15; Emissivity=0.96; R50=200; Gsmax=0.005
        ComponentData oilpalm: Albedo=0.15; Emissivity=0.96; R50=200; Gsmax=0.005
        ComponentData oilmallee: Albedo=0.15; Emissivity=0.96; R50=200; Gsmax=0.005
        ComponentData globulus: Albedo=0.15; Emissivity=0.96; R50=200; Gsmax=0.005
        ComponentData camaldulensis: Albedo=0.15; Emissivity=0.96; R50=200; Gsmax=0.005
        ComponentData grass: Albedo=0.23; Emissivity=0.96; R50=200; Gsmax=0
        ComponentData wheat: Albedo=0.26; Emissivity=0.96; R50=200; Gsmax=0.011
        ComponentData barley: Albedo=0.26; Emissivity=0.96; R50=200; Gsmax=0.011
        ComponentData canola: Albedo=0.26; Emissivity=0.96; R50=200; Gsmax=0.011
        ComponentData raphanus_raphanistrum: Albedo=0.26; Emissivity=0.96; R50=200; Gsmax=0.011
        ComponentData lolium_rigidum: Albedo=0.26; Emissivity=0.96; R50=200; Gsmax=0.011
        ComponentData chickpea: Albedo=0.26; Emissivity=0.96; R50=200; Gsmax=0.011
        ComponentData weed: Albedo=0.26; Emissivity=0.96; R50=200; Gsmax=0.011
        ComponentData oats: Albedo=0.26; Emissivity=0.96; R50=200; Gsmax=0.011
        ComponentData chickpea: Albedo=0.26; Emissivity=0.96; R50=200; Gsmax=0.011
        ComponentData fieldpea: Albedo=0.26; Emissivity=0.96; R50=200; Gsmax=0.011
        ComponentData sugar: Albedo=0.26; Emissivity=0.96; R50=200; Gsmax=0.011
        ComponentData potato: Albedo=0.15; Emissivity=0.96; R50=200; Gsmax=0
        ComponentData frenchbean: Albedo=0.26; Emissivity=0.96; R50=200; Gsmax=0.011
        ComponentData bambatsi: Albedo=0.23; Emissivity=0.96; R50=150; Gsmax=0.015
        ComponentData lucerne: Albedo=0.26; Emissivity=0.96; R50=200; Gsmax=0.011
        ComponentData maize: Albedo=0.26; Emissivity=0.96; R50=200; Gsmax=0.011
        ComponentData banksia: Albedo=0.15; Emissivity=0.96; R50=200; Gsmax=0.005
        ComponentData understorey: Albedo=0.26; Emissivity=0.96; R50=200; Gsmax=0.011
        ComponentData ryegrass: Albedo=0.23; Emissivity=0.96; R50=200; Gsmax=0
        ComponentData vine: Albedo=0.26; Emissivity=0.96; R50=200; Gsmax=0.011
        ComponentData saltbush: Albedo=0.15; Emissivity=0.96; R50=200; Gsmax=0.005
        ComponentData sorghum: Albedo=0.26; Emissivity=0.96; R50=200; Gsmax=0.011
        ComponentData danthonia: Albedo=0.23; Emissivity=0.96; R50=200; Gsmax=0
        ComponentData nativepasture: Albedo=0.15; Emissivity=0.96; R50=200; Gsmax=0
        ComponentData raphanus_raphanistrum: Albedo=0.26; Emissivity=0.96; R50=200; Gsmax=0.011
        ComponentData canola: Albedo=0.26; Emissivity=0.96; R50=200; Gsmax=0.011
        ComponentData kale2: Albedo=0.26; Emissivity=0.96; R50=200; Gsmax=0.011
        ComponentData Carrots4: Albedo=0.26; Emissivity=0.96; R50=200; Gsmax=0.011
        ComponentData crop: Albedo=0.26; Emissivity=0.96; R50=200; Gsmax=0.011
        ComponentData broccoli: Albedo=0.26; Emissivity=0.96; R50=200; Gsmax=0.011
        ComponentData tree: Albedo=0.15; Emissivity=0.96; R50=200; Gsmax=0.005
        ComponentData grandis: Albedo=0.15; Emissivity=0.96; R50=200; Gsmax=0.005
        ComponentData oilpalm: Albedo=0.15; Emissivity=0.96; R50=200; Gsmax=0.005
        ComponentData oilmallee: Albedo=0.15; Emissivity=0.96; R50=200; Gsmax=0.005
        ComponentData globulus: Albedo=0.15; Emissivity=0.96; R50=200; Gsmax=0.005
        ComponentData camaldulensis: Albedo=0.15; Emissivity=0.96; R50=200; Gsmax=0.005
        ComponentData grass: Albedo=0.23; Emissivity=0.96; R50=200; Gsmax=0
        ComponentData wheat: Albedo=0.26; Emissivity=0.96; R50=200; Gsmax=0.011
        ComponentData barley: Albedo=0.26; Emissivity=0.96; R50=200; Gsmax=0.011
        ComponentData canola: Albedo=0.26; Emissivity=0.96; R50=200; Gsmax=0.011
        ComponentData raphanus_raphanistrum: Albedo=0.26; Emissivity=0.96; R50=200; Gsmax=0.011
        ComponentData lolium_rigidum: Albedo=0.26; Emissivity=0.96; R50=200; Gsmax=0.011
        ComponentData chickpea: Albedo=0.26; Emissivity=0.96; R50=200; Gsmax=0.011
        ComponentData weed: Albedo=0.26; Emissivity=0.96; R50=200; Gsmax=0.011
        ComponentData oats: Albedo=0.26; Emissivity=0.96; R50=200; Gsmax=0.011
        ComponentData chickpea: Albedo=0.26; Emissivity=0.96; R50=200; Gsmax=0.011
        ComponentData fieldpea: Albedo=0.26; Emissivity=0.96; R50=200; Gsmax=0.011
        ComponentData sugar: Albedo=0.26; Emissivity=0.96; R50=200; Gsmax=0.011
        ComponentData potato: Albedo=0.15; Emissivity=0.96; R50=200; Gsmax=0
        ComponentData frenchbean: Albedo=0.26; Emissivity=0.96; R50=200; Gsmax=0.011
        ComponentData bambatsi: Albedo=0.23; Emissivity=0.96; R50=150; Gsmax=0.015
        ComponentData lucerne: Albedo=0.26; Emissivity=0.96; R50=200; Gsmax=0.011
        ComponentData maize: Albedo=0.26; Emissivity=0.96; R50=200; Gsmax=0.011
        ComponentData banksia: Albedo=0.15; Emissivity=0.96; R50=200; Gsmax=0.005
        ComponentData understorey: Albedo=0.26; Emissivity=0.96; R50=200; Gsmax=0.011
        ComponentData ryegrass: Albedo=0.23; Emissivity=0.96; R50=200; Gsmax=0
        ComponentData vine: Albedo=0.26; Emissivity=0.96; R50=200; Gsmax=0.011
        ComponentData saltbush: Albedo=0.15; Emissivity=0.96; R50=200; Gsmax=0.005
        ComponentData sorghum: Albedo=0.26; Emissivity=0.96; R50=200; Gsmax=0.011
        ComponentData danthonia: Albedo=0.23; Emissivity=0.96; R50=200; Gsmax=0
        ComponentData nativepasture: Albedo=0.15; Emissivity=0.96; R50=200; Gsmax=0
        ComponentData raphanus_raphanistrum: Albedo=0.26; Emissivity=0.96; R50=200; Gsmax=0.011
        ComponentData canola: Albedo=0.26; Emissivity=0.96; R50=200; Gsmax=0.011
        ComponentData kale2: Albedo=0.26; Emissivity=0.96; R50=200; Gsmax=0.011
        ComponentData Carrots4: Albedo=0.26; Emissivity=0.96; R50=200; Gsmax=0.011
        ComponentData crop: Albedo=0.26; Emissivity=0.96; R50=200; Gsmax=0.011
        ComponentData broccoli: Albedo=0.26; Emissivity=0.96; R50=200; Gsmax=0.011
        ComponentData tree: Albedo=0.15; Emissivity=0.96; R50=200; Gsmax=0.005
        ComponentData grandis: Albedo=0.15; Emissivity=0.96; R50=200; Gsmax=0.005
        ComponentData oilpalm: Albedo=0.15; Emissivity=0.96; R50=200; Gsmax=0.005
        ComponentData oilmallee: Albedo=0.15; Emissivity=0.96; R50=200; Gsmax=0.005
        ComponentData globulus: Albedo=0.15; Emissivity=0.96; R50=200; Gsmax=0.005
        ComponentData camaldulensis: Albedo=0.15; Emissivity=0.96; R50=200; Gsmax=0.005
        ComponentData grass: Albedo=0.23; Emissivity=0.96; R50=200; Gsmax=0
        ComponentData wheat: Albedo=0.26; Emissivity=0.96; R50=200; Gsmax=0.011
        ComponentData barley: Albedo=0.26; Emissivity=0.96; R50=200; Gsmax=0.011
        ComponentData canola: Albedo=0.26; Emissivity=0.96; R50=200; Gsmax=0.011
        ComponentData raphanus_raphanistrum: Albedo=0.26; Emissivity=0.96; R50=200; Gsmax=0.011
        ComponentData lolium_rigidum: Albedo=0.26; Emissivity=0.96; R50=200; Gsmax=0.011
        ComponentData chickpea: Albedo=0.26; Emissivity=0.96; R50=200; Gsmax=0.011
        ComponentData weed: Albedo=0.26; Emissivity=0.96; R50=200; Gsmax=0.011
        ComponentData oats: Albedo=0.26; Emissivity=0.96; R50=200; Gsmax=0.011
        ComponentData chickpea: Albedo=0.26; Emissivity=0.96; R50=200; Gsmax=0.011
        ComponentData fieldpea: Albedo=0.26; Emissivity=0.96; R50=200; Gsmax=0.011
        ComponentData sugar: Albedo=0.26; Emissivity=0.96; R50=200; Gsmax=0.011
        ComponentData potato: Albedo=0.15; Emissivity=0.96; R50=200; Gsmax=0
        ComponentData frenchbean: Albedo=0.26; Emissivity=0.96; R50=200; Gsmax=0.011
        ComponentData bambatsi: Albedo=0.23; Emissivity=0.96; R50=150; Gsmax=0.015
        ComponentData lucerne: Albedo=0.26; Emissivity=0.96; R50=200; Gsmax=0.011
        ComponentData maize: Albedo=0.26; Emissivity=0.96; R50=200; Gsmax=0.011
        ComponentData banksia: Albedo=0.15; Emissivity=0.96; R50=200; Gsmax=0.005
        ComponentData understorey: Albedo=0.26; Emissivity=0.96; R50=200; Gsmax=0.011
        ComponentData ryegrass: Albedo=0.23; Emissivity=0.96; R50=200; Gsmax=0
        ComponentData vine: Albedo=0.26; Emissivity=0.96; R50=200; Gsmax=0.011
        ComponentData saltbush: Albedo=0.15; Emissivity=0.96; R50=200; Gsmax=0.005
        ComponentData sorghum: Albedo=0.26; Emissivity=0.96; R50=200; Gsmax=0.011
        ComponentData danthonia: Albedo=0.23; Emissivity=0.96; R50=200; Gsmax=0
        ComponentData nativepasture: Albedo=0.15; Emissivity=0.96; R50=200; Gsmax=0
        ComponentData raphanus_raphanistrum: Albedo=0.26; Emissivity=0.96; R50=200; Gsmax=0.011
        ComponentData canola: Albedo=0.26; Emissivity=0.96; R50=200; Gsmax=0.011
        ComponentData kale2: Albedo=0.26; Emissivity=0.96; R50=200; Gsmax=0.011
        ComponentData Carrots4: Albedo=0.26; Emissivity=0.96; R50=200; Gsmax=0.011
        ComponentData crop: Albedo=0.26; Emissivity=0.96; R50=200; Gsmax=0.011
        ComponentData broccoli: Albedo=0.26; Emissivity=0.96; R50=200; Gsmax=0.011
        ComponentData tree: Albedo=0.15; Emissivity=0.96; R50=200; Gsmax=0.005
        ComponentData grandis: Albedo=0.15; Emissivity=0.96; R50=200; Gsmax=0.005
        ComponentData oilpalm: Albedo=0.15; Emissivity=0.96; R50=200; Gsmax=0.005
        ComponentData oilmallee: Albedo=0.15; Emissivity=0.96; R50=200; Gsmax=0.005
        ComponentData globulus: Albedo=0.15; Emissivity=0.96; R50=200; Gsmax=0.005
        ComponentData camaldulensis: Albedo=0.15; Emissivity=0.96; R50=200; Gsmax=0.005
        ComponentData grass: Albedo=0.23; Emissivity=0.96; R50=200; Gsmax=0
        ComponentData wheat: Albedo=0.26; Emissivity=0.96; R50=200; Gsmax=0.011
        ComponentData barley: Albedo=0.26; Emissivity=0.96; R50=200; Gsmax=0.011
        ComponentData canola: Albedo=0.26; Emissivity=0.96; R50=200; Gsmax=0.011
        ComponentData raphanus_raphanistrum: Albedo=0.26; Emissivity=0.96; R50=200; Gsmax=0.011
        ComponentData lolium_rigidum: Albedo=0.26; Emissivity=0.96; R50=200; Gsmax=0.011
        ComponentData chickpea: Albedo=0.26; Emissivity=0.96; R50=200; Gsmax=0.011
        ComponentData weed: Albedo=0.26; Emissivity=0.96; R50=200; Gsmax=0.011
        ComponentData oats: Albedo=0.26; Emissivity=0.96; R50=200; Gsmax=0.011
        ComponentData chickpea: Albedo=0.26; Emissivity=0.96; R50=200; Gsmax=0.011
        ComponentData fieldpea: Albedo=0.26; Emissivity=0.96; R50=200; Gsmax=0.011
        ComponentData sugar: Albedo=0.26; Emissivity=0.96; R50=200; Gsmax=0.011
        ComponentData potato: Albedo=0.15; Emissivity=0.96; R50=200; Gsmax=0
        ComponentData frenchbean: Albedo=0.26; Emissivity=0.96; R50=200; Gsmax=0.011
        ComponentData bambatsi: Albedo=0.23; Emissivity=0.96; R50=150; Gsmax=0.015
        ComponentData lucerne: Albedo=0.26; Emissivity=0.96; R50=200; Gsmax=0.011
        ComponentData maize: Albedo=0.26; Emissivity=0.96; R50=200; Gsmax=0.011
        ComponentData banksia: Albedo=0.15; Emissivity=0.96; R50=200; Gsmax=0.005
        ComponentData understorey: Albedo=0.26; Emissivity=0.96; R50=200; Gsmax=0.011
        ComponentData ryegrass: Albedo=0.23; Emissivity=0.96; R50=200; Gsmax=0
        ComponentData vine: Albedo=0.26; Emissivity=0.96; R50=200; Gsmax=0.011
        ComponentData saltbush: Albedo=0.15; Emissivity=0.96; R50=200; Gsmax=0.005
        ComponentData sorghum: Albedo=0.26; Emissivity=0.96; R50=200; Gsmax=0.011
        ComponentData danthonia: Albedo=0.23; Emissivity=0.96; R50=200; Gsmax=0
        ComponentData nativepasture: Albedo=0.15; Emissivity=0.96; R50=200; Gsmax=0
        ComponentData raphanus_raphanistrum: Albedo=0.26; Emissivity=0.96; R50=200; Gsmax=0.011
        ComponentData canola: Albedo=0.26; Emissivity=0.96; R50=200; Gsmax=0.011
        ComponentData kale2: Albedo=0.26; Emissivity=0.96; R50=200; Gsmax=0.011
        ComponentData Carrots4: Albedo=0.26; Emissivity=0.96; R50=200; Gsmax=0.011
        ComponentData crop: Albedo=0.26; Emissivity=0.96; R50=200; Gsmax=0.011
        ComponentData broccoli: Albedo=0.26; Emissivity=0.96; R50=200; Gsmax=0.011
        ComponentData tree: Albedo=0.15; Emissivity=0.96; R50=200; Gsmax=0.005
        ComponentData grandis: Albedo=0.15; Emissivity=0.96; R50=200; Gsmax=0.005
        ComponentData oilpalm: Albedo=0.15; Emissivity=0.96; R50=200; Gsmax=0.005
        ComponentData oilmallee: Albedo=0.15; Emissivity=0.96; R50=200; Gsmax=0.005
        ComponentData globulus: Albedo=0.15; Emissivity=0.96; R50=200; Gsmax=0.005
        ComponentData camaldulensis: Albedo=0.15; Emissivity=0.96; R50=200; Gsmax=0.005
        ComponentData grass: Albedo=0.23; Emissivity=0.96; R50=200; Gsmax=0
        ComponentData wheat: Albedo=0.26; Emissivity=0.96; R50=200; Gsmax=0.011
        ComponentData barley: Albedo=0.26; Emissivity=0.96; R50=200; Gsmax=0.011
        ComponentData canola: Albedo=0.26; Emissivity=0.96; R50=200; Gsmax=0.011
        ComponentData raphanus_raphanistrum: Albedo=0.26; Emissivity=0.96; R50=200; Gsmax=0.011
        ComponentData lolium_rigidum: Albedo=0.26; Emissivity=0.96; R50=200; Gsmax=0.011
        ComponentData chickpea: Albedo=0.26; Emissivity=0.96; R50=200; Gsmax=0.011
        ComponentData weed: Albedo=0.26; Emissivity=0.96; R50=200; Gsmax=0.011
        ComponentData oats: Albedo=0.26; Emissivity=0.96; R50=200; Gsmax=0.011
        ComponentData chickpea: Albedo=0.26; Emissivity=0.96; R50=200; Gsmax=0.011
        ComponentData fieldpea: Albedo=0.26; Emissivity=0.96; R50=200; Gsmax=0.011
        ComponentData sugar: Albedo=0.26; Emissivity=0.96; R50=200; Gsmax=0.011
        ComponentData potato: Albedo=0.15; Emissivity=0.96; R50=200; Gsmax=0
        ComponentData frenchbean: Albedo=0.26; Emissivity=0.96; R50=200; Gsmax=0.011
        ComponentData bambatsi: Albedo=0.23; Emissivity=0.96; R50=150; Gsmax=0.015
        ComponentData lucerne: Albedo=0.26; Emissivity=0.96; R50=200; Gsmax=0.011
        ComponentData maize: Albedo=0.26; Emissivity=0.96; R50=200; Gsmax=0.011
        ComponentData banksia: Albedo=0.15; Emissivity=0.96; R50=200; Gsmax=0.005
        ComponentData understorey: Albedo=0.26; Emissivity=0.96; R50=200; Gsmax=0.011
        ComponentData ryegrass: Albedo=0.23; Emissivity=0.96; R50=200; Gsmax=0
        ComponentData vine: Albedo=0.26; Emissivity=0.96; R50=200; Gsmax=0.011
        ComponentData saltbush: Albedo=0.15; Emissivity=0.96; R50=200; Gsmax=0.005
        ComponentData sorghum: Albedo=0.26; Emissivity=0.96; R50=200; Gsmax=0.011
        ComponentData danthonia: Albedo=0.23; Emissivity=0.96; R50=200; Gsmax=0
        ComponentData nativepasture: Albedo=0.15; Emissivity=0.96; R50=200; Gsmax=0
        ComponentData raphanus_raphanistrum: Albedo=0.26; Emissivity=0.96; R50=200; Gsmax=0.011
        ComponentData canola: Albedo=0.26; Emissivity=0.96; R50=200; Gsmax=0.011
        ComponentData kale2: Albedo=0.26; Emissivity=0.96; R50=200; Gsmax=0.011
        ComponentData Carrots4: Albedo=0.26; Emissivity=0.96; R50=200; Gsmax=0.011
        ComponentData crop: Albedo=0.26; Emissivity=0.96; R50=200; Gsmax=0.011
        ComponentData broccoli: Albedo=0.26; Emissivity=0.96; R50=200; Gsmax=0.011
        ComponentData tree: Albedo=0.15; Emissivity=0.96; R50=200; Gsmax=0.005
        ComponentData grandis: Albedo=0.15; Emissivity=0.96; R50=200; Gsmax=0.005
        ComponentData oilpalm: Albedo=0.15; Emissivity=0.96; R50=200; Gsmax=0.005
        ComponentData oilmallee: Albedo=0.15; Emissivity=0.96; R50=200; Gsmax=0.005
        ComponentData globulus: Albedo=0.15; Emissivity=0.96; R50=200; Gsmax=0.005
        ComponentData camaldulensis: Albedo=0.15; Emissivity=0.96; R50=200; Gsmax=0.005
        ComponentData grass: Albedo=0.23; Emissivity=0.96; R50=200; Gsmax=0
        ComponentData wheat: Albedo=0.26; Emissivity=0.96; R50=200; Gsmax=0.011
        ComponentData barley: Albedo=0.26; Emissivity=0.96; R50=200; Gsmax=0.011
        ComponentData canola: Albedo=0.26; Emissivity=0.96; R50=200; Gsmax=0.011
        ComponentData raphanus_raphanistrum: Albedo=0.26; Emissivity=0.96; R50=200; Gsmax=0.011
        ComponentData lolium_rigidum: Albedo=0.26; Emissivity=0.96; R50=200; Gsmax=0.011
        ComponentData chickpea: Albedo=0.26; Emissivity=0.96; R50=200; Gsmax=0.011
        ComponentData weed: Albedo=0.26; Emissivity=0.96; R50=200; Gsmax=0.011
        ComponentData oats: Albedo=0.26; Emissivity=0.96; R50=200; Gsmax=0.011
        ComponentData chickpea: Albedo=0.26; Emissivity=0.96; R50=200; Gsmax=0.011
        ComponentData fieldpea: Albedo=0.26; Emissivity=0.96; R50=200; Gsmax=0.011
        ComponentData sugar: Albedo=0.26; Emissivity=0.96; R50=200; Gsmax=0.011
        ComponentData potato: Albedo=0.15; Emissivity=0.96; R50=200; Gsmax=0
        ComponentData frenchbean: Albedo=0.26; Emissivity=0.96; R50=200; Gsmax=0.011
        ComponentData bambatsi: Albedo=0.23; Emissivity=0.96; R50=150; Gsmax=0.015
        ComponentData lucerne: Albedo=0.26; Emissivity=0.96; R50=200; Gsmax=0.011
        ComponentData maize: Albedo=0.26; Emissivity=0.96; R50=200; Gsmax=0.011
        ComponentData banksia: Albedo=0.15; Emissivity=0.96; R50=200; Gsmax=0.005
        ComponentData understorey: Albedo=0.26; Emissivity=0.96; R50=200; Gsmax=0.011
        ComponentData ryegrass: Albedo=0.23; Emissivity=0.96; R50=200; Gsmax=0
        ComponentData vine: Albedo=0.26; Emissivity=0.96; R50=200; Gsmax=0.011
        ComponentData saltbush: Albedo=0.15; Emissivity=0.96; R50=200; Gsmax=0.005
        ComponentData sorghum: Albedo=0.26; Emissivity=0.96; R50=200; Gsmax=0.011
        ComponentData danthonia: Albedo=0.23; Emissivity=0.96; R50=200; Gsmax=0
        ComponentData nativepasture: Albedo=0.15; Emissivity=0.96; R50=200; Gsmax=0
        ComponentData raphanus_raphanistrum: Albedo=0.26; Emissivity=0.96; R50=200; Gsmax=0.011
        ComponentData canola: Albedo=0.26; Emissivity=0.96; R50=200; Gsmax=0.011
        ComponentData kale2: Albedo=0.26; Emissivity=0.96; R50=200; Gsmax=0.011
        ComponentData Carrots4: Albedo=0.26; Emissivity=0.96; R50=200; Gsmax=0.011
        ComponentData crop: Albedo=0.26; Emissivity=0.96; R50=200; Gsmax=0.011
        ComponentData broccoli: Albedo=0.26; Emissivity=0.96; R50=200; Gsmax=0.011
        ComponentData tree: Albedo=0.15; Emissivity=0.96; R50=200; Gsmax=0.005
        ComponentData grandis: Albedo=0.15; Emissivity=0.96; R50=200; Gsmax=0.005
        ComponentData oilpalm: Albedo=0.15; Emissivity=0.96; R50=200; Gsmax=0.005
        ComponentData oilmallee: Albedo=0.15; Emissivity=0.96; R50=200; Gsmax=0.005
        ComponentData globulus: Albedo=0.15; Emissivity=0.96; R50=200; Gsmax=0.005
        ComponentData camaldulensis: Albedo=0.15; Emissivity=0.96; R50=200; Gsmax=0.005
        ComponentData grass: Albedo=0.23; Emissivity=0.96; R50=200; Gsmax=0
        ComponentData wheat: Albedo=0.26; Emissivity=0.96; R50=200; Gsmax=0.011
        ComponentData barley: Albedo=0.26; Emissivity=0.96; R50=200; Gsmax=0.011
        ComponentData canola: Albedo=0.26; Emissivity=0.96; R50=200; Gsmax=0.011
        ComponentData raphanus_raphanistrum: Albedo=0.26; Emissivity=0.96; R50=200; Gsmax=0.011
        ComponentData lolium_rigidum: Albedo=0.26; Emissivity=0.96; R50=200; Gsmax=0.011
        ComponentData chickpea: Albedo=0.26; Emissivity=0.96; R50=200; Gsmax=0.011
        ComponentData weed: Albedo=0.26; Emissivity=0.96; R50=200; Gsmax=0.011
        ComponentData oats: Albedo=0.26; Emissivity=0.96; R50=200; Gsmax=0.011
        ComponentData chickpea: Albedo=0.26; Emissivity=0.96; R50=200; Gsmax=0.011
        ComponentData fieldpea: Albedo=0.26; Emissivity=0.96; R50=200; Gsmax=0.011
        ComponentData sugar: Albedo=0.26; Emissivity=0.96; R50=200; Gsmax=0.011
        ComponentData potato: Albedo=0.15; Emissivity=0.96; R50=200; Gsmax=0
        ComponentData frenchbean: Albedo=0.26; Emissivity=0.96; R50=200; Gsmax=0.011
        ComponentData bambatsi: Albedo=0.23; Emissivity=0.96; R50=150; Gsmax=0.015
        ComponentData lucerne: Albedo=0.26; Emissivity=0.96; R50=200; Gsmax=0.011
        ComponentData maize: Albedo=0.26; Emissivity=0.96; R50=200; Gsmax=0.011
        ComponentData banksia: Albedo=0.15; Emissivity=0.96; R50=200; Gsmax=0.005
        ComponentData understorey: Albedo=0.26; Emissivity=0.96; R50=200; Gsmax=0.011
        ComponentData ryegrass: Albedo=0.23; Emissivity=0.96; R50=200; Gsmax=0
        ComponentData vine: Albedo=0.26; Emissivity=0.96; R50=200; Gsmax=0.011
        ComponentData saltbush: Albedo=0.15; Emissivity=0.96; R50=200; Gsmax=0.005
        ComponentData sorghum: Albedo=0.26; Emissivity=0.96; R50=200; Gsmax=0.011
        ComponentData danthonia: Albedo=0.23; Emissivity=0.96; R50=200; Gsmax=0
        ComponentData nativepasture: Albedo=0.15; Emissivity=0.96; R50=200; Gsmax=0
        ComponentData raphanus_raphanistrum: Albedo=0.26; Emissivity=0.96; R50=200; Gsmax=0.011
        ComponentData canola: Albedo=0.26; Emissivity=0.96; R50=200; Gsmax=0.011
        ComponentData kale2: Albedo=0.26; Emissivity=0.96; R50=200; Gsmax=0.011
        ComponentData Carrots4: Albedo=0.26; Emissivity=0.96; R50=200; Gsmax=0.011
        ComponentData crop: Albedo=0.26; Emissivity=0.96; R50=200; Gsmax=0.011
        ComponentData broccoli: Albedo=0.26; Emissivity=0.96; R50=200; Gsmax=0.011
        ComponentData tree: Albedo=0.15; Emissivity=0.96; R50=200; Gsmax=0.005
        ComponentData grandis: Albedo=0.15; Emissivity=0.96; R50=200; Gsmax=0.005
        ComponentData oilpalm: Albedo=0.15; Emissivity=0.96; R50=200; Gsmax=0.005
        ComponentData oilmallee: Albedo=0.15; Emissivity=0.96; R50=200; Gsmax=0.005
        ComponentData globulus: Albedo=0.15; Emissivity=0.96; R50=200; Gsmax=0.005
        ComponentData camaldulensis: Albedo=0.15; Emissivity=0.96; R50=200; Gsmax=0.005
        ComponentData grass: Albedo=0.23; Emissivity=0.96; R50=200; Gsmax=0
        ComponentData wheat: Albedo=0.26; Emissivity=0.96; R50=200; Gsmax=0.011
        ComponentData barley: Albedo=0.26; Emissivity=0.96; R50=200; Gsmax=0.011
        ComponentData canola: Albedo=0.26; Emissivity=0.96; R50=200; Gsmax=0.011
        ComponentData raphanus_raphanistrum: Albedo=0.26; Emissivity=0.96; R50=200; Gsmax=0.011
        ComponentData lolium_rigidum: Albedo=0.26; Emissivity=0.96; R50=200; Gsmax=0.011
        ComponentData chickpea: Albedo=0.26; Emissivity=0.96; R50=200; Gsmax=0.011
        ComponentData weed: Albedo=0.26; Emissivity=0.96; R50=200; Gsmax=0.011
        ComponentData oats: Albedo=0.26; Emissivity=0.96; R50=200; Gsmax=0.011
        ComponentData chickpea: Albedo=0.26; Emissivity=0.96; R50=200; Gsmax=0.011
        ComponentData fieldpea: Albedo=0.26; Emissivity=0.96; R50=200; Gsmax=0.011
        ComponentData sugar: Albedo=0.26; Emissivity=0.96; R50=200; Gsmax=0.011
        ComponentData potato: Albedo=0.15; Emissivity=0.96; R50=200; Gsmax=0
        ComponentData frenchbean: Albedo=0.26; Emissivity=0.96; R50=200; Gsmax=0.011
        ComponentData bambatsi: Albedo=0.23; Emissivity=0.96; R50=150; Gsmax=0.015
        ComponentData lucerne: Albedo=0.26; Emissivity=0.96; R50=200; Gsmax=0.011
        ComponentData maize: Albedo=0.26; Emissivity=0.96; R50=200; Gsmax=0.011
        ComponentData banksia: Albedo=0.15; Emissivity=0.96; R50=200; Gsmax=0.005
        ComponentData understorey: Albedo=0.26; Emissivity=0.96; R50=200; Gsmax=0.011
        ComponentData ryegrass: Albedo=0.23; Emissivity=0.96; R50=200; Gsmax=0
        ComponentData vine: Albedo=0.26; Emissivity=0.96; R50=200; Gsmax=0.011
        ComponentData saltbush: Albedo=0.15; Emissivity=0.96; R50=200; Gsmax=0.005
        ComponentData sorghum: Albedo=0.26; Emissivity=0.96; R50=200; Gsmax=0.011
        ComponentData danthonia: Albedo=0.23; Emissivity=0.96; R50=200; Gsmax=0
        ComponentData nativepasture: Albedo=0.15; Emissivity=0.96; R50=200; Gsmax=0
        ComponentData raphanus_raphanistrum: Albedo=0.26; Emissivity=0.96; R50=200; Gsmax=0.011
        ComponentData canola: Albedo=0.26; Emissivity=0.96; R50=200; Gsmax=0.011
        ComponentData kale2: Albedo=0.26; Emissivity=0.96; R50=200; Gsmax=0.011
        ComponentData Carrots4: Albedo=0.26; Emissivity=0.96; R50=200; Gsmax=0.011
        ComponentData crop: Albedo=0.26; Emissivity=0.96; R50=200; Gsmax=0.011
        ComponentData broccoli: Albedo=0.26; Emissivity=0.96; R50=200; Gsmax=0.011
        ComponentData tree: Albedo=0.15; Emissivity=0.96; R50=200; Gsmax=0.005
        ComponentData grandis: Albedo=0.15; Emissivity=0.96; R50=200; Gsmax=0.005
        ComponentData oilpalm: Albedo=0.15; Emissivity=0.96; R50=200; Gsmax=0.005
        ComponentData oilmallee: Albedo=0.15; Emissivity=0.96; R50=200; Gsmax=0.005
        ComponentData globulus: Albedo=0.15; Emissivity=0.96; R50=200; Gsmax=0.005
        ComponentData camaldulensis: Albedo=0.15; Emissivity=0.96; R50=200; Gsmax=0.005
        ComponentData grass: Albedo=0.23; Emissivity=0.96; R50=200; Gsmax=0
        ComponentData wheat: Albedo=0.26; Emissivity=0.96; R50=200; Gsmax=0.011
        ComponentData barley: Albedo=0.26; Emissivity=0.96; R50=200; Gsmax=0.011
        ComponentData canola: Albedo=0.26; Emissivity=0.96; R50=200; Gsmax=0.011
        ComponentData raphanus_raphanistrum: Albedo=0.26; Emissivity=0.96; R50=200; Gsmax=0.011
        ComponentData lolium_rigidum: Albedo=0.26; Emissivity=0.96; R50=200; Gsmax=0.011
        ComponentData chickpea: Albedo=0.26; Emissivity=0.96; R50=200; Gsmax=0.011
        ComponentData weed: Albedo=0.26; Emissivity=0.96; R50=200; Gsmax=0.011
        ComponentData oats: Albedo=0.26; Emissivity=0.96; R50=200; Gsmax=0.011
        ComponentData chickpea: Albedo=0.26; Emissivity=0.96; R50=200; Gsmax=0.011
        ComponentData fieldpea: Albedo=0.26; Emissivity=0.96; R50=200; Gsmax=0.011
        ComponentData sugar: Albedo=0.26; Emissivity=0.96; R50=200; Gsmax=0.011
        ComponentData potato: Albedo=0.15; Emissivity=0.96; R50=200; Gsmax=0
        ComponentData frenchbean: Albedo=0.26; Emissivity=0.96; R50=200; Gsmax=0.011
        ComponentData bambatsi: Albedo=0.23; Emissivity=0.96; R50=150; Gsmax=0.015
        ComponentData lucerne: Albedo=0.26; Emissivity=0.96; R50=200; Gsmax=0.011
        ComponentData maize: Albedo=0.26; Emissivity=0.96; R50=200; Gsmax=0.011
        ComponentData banksia: Albedo=0.15; Emissivity=0.96; R50=200; Gsmax=0.005
        ComponentData understorey: Albedo=0.26; Emissivity=0.96; R50=200; Gsmax=0.011
        ComponentData ryegrass: Albedo=0.23; Emissivity=0.96; R50=200; Gsmax=0
        ComponentData vine: Albedo=0.26; Emissivity=0.96; R50=200; Gsmax=0.011
        ComponentData saltbush: Albedo=0.15; Emissivity=0.96; R50=200; Gsmax=0.005
        ComponentData sorghum: Albedo=0.26; Emissivity=0.96; R50=200; Gsmax=0.011
        ComponentData danthonia: Albedo=0.23; Emissivity=0.96; R50=200; Gsmax=0
        ComponentData nativepasture: Albedo=0.15; Emissivity=0.96; R50=200; Gsmax=0
        ComponentData raphanus_raphanistrum: Albedo=0.26; Emissivity=0.96; R50=200; Gsmax=0.011
        ComponentData canola: Albedo=0.26; Emissivity=0.96; R50=200; Gsmax=0.011
        ComponentData kale2: Albedo=0.26; Emissivity=0.96; R50=200; Gsmax=0.011
        ComponentData Carrots4: Albedo=0.26; Emissivity=0.96; R50=200; Gsmax=0.011
        ComponentData crop: Albedo=0.26; Emissivity=0.96; R50=200; Gsmax=0.011
        ComponentData broccoli: Albedo=0.26; Emissivity=0.96; R50=200; Gsmax=0.011
        ComponentData tree: Albedo=0.15; Emissivity=0.96; R50=200; Gsmax=0.005
        ComponentData grandis: Albedo=0.15; Emissivity=0.96; R50=200; Gsmax=0.005
        ComponentData oilpalm: Albedo=0.15; Emissivity=0.96; R50=200; Gsmax=0.005
        ComponentData oilmallee: Albedo=0.15; Emissivity=0.96; R50=200; Gsmax=0.005
        ComponentData globulus: Albedo=0.15; Emissivity=0.96; R50=200; Gsmax=0.005
        ComponentData camaldulensis: Albedo=0.15; Emissivity=0.96; R50=200; Gsmax=0.005
        ComponentData grass: Albedo=0.23; Emissivity=0.96; R50=200; Gsmax=0
        ComponentData wheat: Albedo=0.26; Emissivity=0.96; R50=200; Gsmax=0.011
        ComponentData barley: Albedo=0.26; Emissivity=0.96; R50=200; Gsmax=0.011
        ComponentData canola: Albedo=0.26; Emissivity=0.96; R50=200; Gsmax=0.011
        ComponentData raphanus_raphanistrum: Albedo=0.26; Emissivity=0.96; R50=200; Gsmax=0.011
        ComponentData lolium_rigidum: Albedo=0.26; Emissivity=0.96; R50=200; Gsmax=0.011
        ComponentData chickpea: Albedo=0.26; Emissivity=0.96; R50=200; Gsmax=0.011
        ComponentData weed: Albedo=0.26; Emissivity=0.96; R50=200; Gsmax=0.011
        ComponentData oats: Albedo=0.26; Emissivity=0.96; R50=200; Gsmax=0.011
        ComponentData chickpea: Albedo=0.26; Emissivity=0.96; R50=200; Gsmax=0.011
        ComponentData fieldpea: Albedo=0.26; Emissivity=0.96; R50=200; Gsmax=0.011
        ComponentData sugar: Albedo=0.26; Emissivity=0.96; R50=200; Gsmax=0.011
        ComponentData potato: Albedo=0.15; Emissivity=0.96; R50=200; Gsmax=0
        ComponentData frenchbean: Albedo=0.26; Emissivity=0.96; R50=200; Gsmax=0.011
        ComponentData bambatsi: Albedo=0.23; Emissivity=0.96; R50=150; Gsmax=0.015
        ComponentData lucerne: Albedo=0.26; Emissivity=0.96; R50=200; Gsmax=0.011
        ComponentData maize: Albedo=0.26; Emissivity=0.96; R50=200; Gsmax=0.011
        ComponentData banksia: Albedo=0.15; Emissivity=0.96; R50=200; Gsmax=0.005
        ComponentData understorey: Albedo=0.26; Emissivity=0.96; R50=200; Gsmax=0.011
        ComponentData ryegrass: Albedo=0.23; Emissivity=0.96; R50=200; Gsmax=0
        ComponentData vine: Albedo=0.26; Emissivity=0.96; R50=200; Gsmax=0.011
        ComponentData saltbush: Albedo=0.15; Emissivity=0.96; R50=200; Gsmax=0.005
        ComponentData sorghum: Albedo=0.26; Emissivity=0.96; R50=200; Gsmax=0.011
        ComponentData danthonia: Albedo=0.23; Emissivity=0.96; R50=200; Gsmax=0
        ComponentData nativepasture: Albedo=0.15; Emissivity=0.96; R50=200; Gsmax=0
        ComponentData raphanus_raphanistrum: Albedo=0.26; Emissivity=0.96; R50=200; Gsmax=0.011
        ComponentData canola: Albedo=0.26; Emissivity=0.96; R50=200; Gsmax=0.011
        ComponentData kale2: Albedo=0.26; Emissivity=0.96; R50=200; Gsmax=0.011
        ComponentData Carrots4: Albedo=0.26; Emissivity=0.96; R50=200; Gsmax=0.011
        ComponentData crop: Albedo=0.26; Emissivity=0.96; R50=200; Gsmax=0.011
        ComponentData broccoli: Albedo=0.26; Emissivity=0.96; R50=200; Gsmax=0.011
        ComponentData tree: Albedo=0.15; Emissivity=0.96; R50=200; Gsmax=0.005
        ComponentData grandis: Albedo=0.15; Emissivity=0.96; R50=200; Gsmax=0.005
        ComponentData oilpalm: Albedo=0.15; Emissivity=0.96; R50=200; Gsmax=0.005
        ComponentData oilmallee: Albedo=0.15; Emissivity=0.96; R50=200; Gsmax=0.005
        ComponentData globulus: Albedo=0.15; Emissivity=0.96; R50=200; Gsmax=0.005
        ComponentData camaldulensis: Albedo=0.15; Emissivity=0.96; R50=200; Gsmax=0.005
        ComponentData grass: Albedo=0.23; Emissivity=0.96; R50=200; Gsmax=0
        ComponentData wheat: Albedo=0.26; Emissivity=0.96; R50=200; Gsmax=0.011
        ComponentData barley: Albedo=0.26; Emissivity=0.96; R50=200; Gsmax=0.011
        ComponentData canola: Albedo=0.26; Emissivity=0.96; R50=200; Gsmax=0.011
        ComponentData raphanus_raphanistrum: Albedo=0.26; Emissivity=0.96; R50=200; Gsmax=0.011
        ComponentData lolium_rigidum: Albedo=0.26; Emissivity=0.96; R50=200; Gsmax=0.011
        ComponentData chickpea: Albedo=0.26; Emissivity=0.96; R50=200; Gsmax=0.011
        ComponentData weed: Albedo=0.26; Emissivity=0.96; R50=200; Gsmax=0.011
        ComponentData oats: Albedo=0.26; Emissivity=0.96; R50=200; Gsmax=0.011
        ComponentData chickpea: Albedo=0.26; Emissivity=0.96; R50=200; Gsmax=0.011
        ComponentData fieldpea: Albedo=0.26; Emissivity=0.96; R50=200; Gsmax=0.011
        ComponentData sugar: Albedo=0.26; Emissivity=0.96; R50=200; Gsmax=0.011
        ComponentData potato: Albedo=0.15; Emissivity=0.96; R50=200; Gsmax=0
        ComponentData frenchbean: Albedo=0.26; Emissivity=0.96; R50=200; Gsmax=0.011
        ComponentData bambatsi: Albedo=0.23; Emissivity=0.96; R50=150; Gsmax=0.015
        ComponentData lucerne: Albedo=0.26; Emissivity=0.96; R50=200; Gsmax=0.011
        ComponentData maize: Albedo=0.26; Emissivity=0.96; R50=200; Gsmax=0.011
        ComponentData banksia: Albedo=0.15; Emissivity=0.96; R50=200; Gsmax=0.005
        ComponentData understorey: Albedo=0.26; Emissivity=0.96; R50=200; Gsmax=0.011
        ComponentData ryegrass: Albedo=0.23; Emissivity=0.96; R50=200; Gsmax=0
        ComponentData vine: Albedo=0.26; Emissivity=0.96; R50=200; Gsmax=0.011
        ComponentData saltbush: Albedo=0.15; Emissivity=0.96; R50=200; Gsmax=0.005
        ComponentData sorghum: Albedo=0.26; Emissivity=0.96; R50=200; Gsmax=0.011
        ComponentData danthonia: Albedo=0.23; Emissivity=0.96; R50=200; Gsmax=0
        ComponentData nativepasture: Albedo=0.15; Emissivity=0.96; R50=200; Gsmax=0
        ComponentData raphanus_raphanistrum: Albedo=0.26; Emissivity=0.96; R50=200; Gsmax=0.011
        ComponentData canola: Albedo=0.26; Emissivity=0.96; R50=200; Gsmax=0.011
        ComponentData kale2: Albedo=0.26; Emissivity=0.96; R50=200; Gsmax=0.011
        ComponentData Carrots4: Albedo=0.26; Emissivity=0.96; R50=200; Gsmax=0.011
        ComponentData crop: Albedo=0.26; Emissivity=0.96; R50=200; Gsmax=0.011
        ComponentData broccoli: Albedo=0.26; Emissivity=0.96; R50=200; Gsmax=0.011
        ComponentData tree: Albedo=0.15; Emissivity=0.96; R50=200; Gsmax=0.005
        ComponentData grandis: Albedo=0.15; Emissivity=0.96; R50=200; Gsmax=0.005
        ComponentData oilpalm: Albedo=0.15; Emissivity=0.96; R50=200; Gsmax=0.005
        ComponentData oilmallee: Albedo=0.15; Emissivity=0.96; R50=200; Gsmax=0.005
        ComponentData globulus: Albedo=0.15; Emissivity=0.96; R50=200; Gsmax=0.005
        ComponentData camaldulensis: Albedo=0.15; Emissivity=0.96; R50=200; Gsmax=0.005
        ComponentData grass: Albedo=0.23; Emissivity=0.96; R50=200; Gsmax=0
        ComponentData wheat: Albedo=0.26; Emissivity=0.96; R50=200; Gsmax=0.011
        ComponentData barley: Albedo=0.26; Emissivity=0.96; R50=200; Gsmax=0.011
        ComponentData canola: Albedo=0.26; Emissivity=0.96; R50=200; Gsmax=0.011
        ComponentData raphanus_raphanistrum: Albedo=0.26; Emissivity=0.96; R50=200; Gsmax=0.011
        ComponentData lolium_rigidum: Albedo=0.26; Emissivity=0.96; R50=200; Gsmax=0.011
        ComponentData chickpea: Albedo=0.26; Emissivity=0.96; R50=200; Gsmax=0.011
        ComponentData weed: Albedo=0.26; Emissivity=0.96; R50=200; Gsmax=0.011
        ComponentData oats: Albedo=0.26; Emissivity=0.96; R50=200; Gsmax=0.011
        ComponentData chickpea: Albedo=0.26; Emissivity=0.96; R50=200; Gsmax=0.011
        ComponentData fieldpea: Albedo=0.26; Emissivity=0.96; R50=200; Gsmax=0.011
        ComponentData sugar: Albedo=0.26; Emissivity=0.96; R50=200; Gsmax=0.011
        ComponentData potato: Albedo=0.15; Emissivity=0.96; R50=200; Gsmax=0
        ComponentData frenchbean: Albedo=0.26; Emissivity=0.96; R50=200; Gsmax=0.011
        ComponentData bambatsi: Albedo=0.23; Emissivity=0.96; R50=150; Gsmax=0.015
        ComponentData lucerne: Albedo=0.26; Emissivity=0.96; R50=200; Gsmax=0.011
        ComponentData maize: Albedo=0.26; Emissivity=0.96; R50=200; Gsmax=0.011
        ComponentData banksia: Albedo=0.15; Emissivity=0.96; R50=200; Gsmax=0.005
        ComponentData understorey: Albedo=0.26; Emissivity=0.96; R50=200; Gsmax=0.011
        ComponentData ryegrass: Albedo=0.23; Emissivity=0.96; R50=200; Gsmax=0
        ComponentData vine: Albedo=0.26; Emissivity=0.96; R50=200; Gsmax=0.011
        ComponentData saltbush: Albedo=0.15; Emissivity=0.96; R50=200; Gsmax=0.005
        ComponentData sorghum: Albedo=0.26; Emissivity=0.96; R50=200; Gsmax=0.011
        ComponentData danthonia: Albedo=0.23; Emissivity=0.96; R50=200; Gsmax=0
        ComponentData nativepasture: Albedo=0.15; Emissivity=0.96; R50=200; Gsmax=0
        ComponentData raphanus_raphanistrum: Albedo=0.26; Emissivity=0.96; R50=200; Gsmax=0.011
        ComponentData canola: Albedo=0.26; Emissivity=0.96; R50=200; Gsmax=0.011
        ComponentData kale2: Albedo=0.26; Emissivity=0.96; R50=200; Gsmax=0.011
        ComponentData Carrots4: Albedo=0.26; Emissivity=0.96; R50=200; Gsmax=0.011
        ComponentData crop: Albedo=0.26; Emissivity=0.96; R50=200; Gsmax=0.011
        ComponentData broccoli: Albedo=0.26; Emissivity=0.96; R50=200; Gsmax=0.011
        ComponentData tree: Albedo=0.15; Emissivity=0.96; R50=200; Gsmax=0.005
        ComponentData grandis: Albedo=0.15; Emissivity=0.96; R50=200; Gsmax=0.005
        ComponentData oilpalm: Albedo=0.15; Emissivity=0.96; R50=200; Gsmax=0.005
        ComponentData oilmallee: Albedo=0.15; Emissivity=0.96; R50=200; Gsmax=0.005
        ComponentData globulus: Albedo=0.15; Emissivity=0.96; R50=200; Gsmax=0.005
        ComponentData camaldulensis: Albedo=0.15; Emissivity=0.96; R50=200; Gsmax=0.005
        ComponentData grass: Albedo=0.23; Emissivity=0.96; R50=200; Gsmax=0
        ComponentData wheat: Albedo=0.26; Emissivity=0.96; R50=200; Gsmax=0.011
        ComponentData barley: Albedo=0.26; Emissivity=0.96; R50=200; Gsmax=0.011
        ComponentData canola: Albedo=0.26; Emissivity=0.96; R50=200; Gsmax=0.011
        ComponentData raphanus_raphanistrum: Albedo=0.26; Emissivity=0.96; R50=200; Gsmax=0.011
        ComponentData lolium_rigidum: Albedo=0.26; Emissivity=0.96; R50=200; Gsmax=0.011
        ComponentData chickpea: Albedo=0.26; Emissivity=0.96; R50=200; Gsmax=0.011
        ComponentData weed: Albedo=0.26; Emissivity=0.96; R50=200; Gsmax=0.011
        ComponentData oats: Albedo=0.26; Emissivity=0.96; R50=200; Gsmax=0.011
        ComponentData chickpea: Albedo=0.26; Emissivity=0.96; R50=200; Gsmax=0.011
        ComponentData fieldpea: Albedo=0.26; Emissivity=0.96; R50=200; Gsmax=0.011
        ComponentData sugar: Albedo=0.26; Emissivity=0.96; R50=200; Gsmax=0.011
        ComponentData potato: Albedo=0.15; Emissivity=0.96; R50=200; Gsmax=0
        ComponentData frenchbean: Albedo=0.26; Emissivity=0.96; R50=200; Gsmax=0.011
        ComponentData bambatsi: Albedo=0.23; Emissivity=0.96; R50=150; Gsmax=0.015
        ComponentData lucerne: Albedo=0.26; Emissivity=0.96; R50=200; Gsmax=0.011
        ComponentData maize: Albedo=0.26; Emissivity=0.96; R50=200; Gsmax=0.011
        ComponentData banksia: Albedo=0.15; Emissivity=0.96; R50=200; Gsmax=0.005
        ComponentData understorey: Albedo=0.26; Emissivity=0.96; R50=200; Gsmax=0.011
        ComponentData ryegrass: Albedo=0.23; Emissivity=0.96; R50=200; Gsmax=0
        ComponentData vine: Albedo=0.26; Emissivity=0.96; R50=200; Gsmax=0.011
        ComponentData saltbush: Albedo=0.15; Emissivity=0.96; R50=200; Gsmax=0.005
        ComponentData sorghum: Albedo=0.26; Emissivity=0.96; R50=200; Gsmax=0.011
        ComponentData danthonia: Albedo=0.23; Emissivity=0.96; R50=200; Gsmax=0
        ComponentData nativepasture: Albedo=0.15; Emissivity=0.96; R50=200; Gsmax=0
        ComponentData raphanus_raphanistrum: Albedo=0.26; Emissivity=0.96; R50=200; Gsmax=0.011
        ComponentData canola: Albedo=0.26; Emissivity=0.96; R50=200; Gsmax=0.011
        ComponentData kale2: Albedo=0.26; Emissivity=0.96; R50=200; Gsmax=0.011
        ComponentData Carrots4: Albedo=0.26; Emissivity=0.96; R50=200; Gsmax=0.011
        ComponentData crop: Albedo=0.26; Emissivity=0.96; R50=200; Gsmax=0.011
        ComponentData broccoli: Albedo=0.26; Emissivity=0.96; R50=200; Gsmax=0.011
        ComponentData tree: Albedo=0.15; Emissivity=0.96; R50=200; Gsmax=0.005
        ComponentData grandis: Albedo=0.15; Emissivity=0.96; R50=200; Gsmax=0.005
        ComponentData oilpalm: Albedo=0.15; Emissivity=0.96; R50=200; Gsmax=0.005
        ComponentData oilmallee: Albedo=0.15; Emissivity=0.96; R50=200; Gsmax=0.005
        ComponentData globulus: Albedo=0.15; Emissivity=0.96; R50=200; Gsmax=0.005
        ComponentData camaldulensis: Albedo=0.15; Emissivity=0.96; R50=200; Gsmax=0.005
        ComponentData grass: Albedo=0.23; Emissivity=0.96; R50=200; Gsmax=0
        ComponentData wheat: Albedo=0.26; Emissivity=0.96; R50=200; Gsmax=0.011
        ComponentData barley: Albedo=0.26; Emissivity=0.96; R50=200; Gsmax=0.011
        ComponentData canola: Albedo=0.26; Emissivity=0.96; R50=200; Gsmax=0.011
        ComponentData raphanus_raphanistrum: Albedo=0.26; Emissivity=0.96; R50=200; Gsmax=0.011
        ComponentData lolium_rigidum: Albedo=0.26; Emissivity=0.96; R50=200; Gsmax=0.011
        ComponentData chickpea: Albedo=0.26; Emissivity=0.96; R50=200; Gsmax=0.011
        ComponentData weed: Albedo=0.26; Emissivity=0.96; R50=200; Gsmax=0.011
        ComponentData oats: Albedo=0.26; Emissivity=0.96; R50=200; Gsmax=0.011
        ComponentData chickpea: Albedo=0.26; Emissivity=0.96; R50=200; Gsmax=0.011
        ComponentData fieldpea: Albedo=0.26; Emissivity=0.96; R50=200; Gsmax=0.011
        ComponentData sugar: Albedo=0.26; Emissivity=0.96; R50=200; Gsmax=0.011
        ComponentData potato: Albedo=0.15; Emissivity=0.96; R50=200; Gsmax=0
        ComponentData frenchbean: Albedo=0.26; Emissivity=0.96; R50=200; Gsmax=0.011
        ComponentData bambatsi: Albedo=0.23; Emissivity=0.96; R50=150; Gsmax=0.015
        ComponentData lucerne: Albedo=0.26; Emissivity=0.96; R50=200; Gsmax=0.011
        ComponentData maize: Albedo=0.26; Emissivity=0.96; R50=200; Gsmax=0.011
        ComponentData banksia: Albedo=0.15; Emissivity=0.96; R50=200; Gsmax=0.005
        ComponentData understorey: Albedo=0.26; Emissivity=0.96; R50=200; Gsmax=0.011
        ComponentData ryegrass: Albedo=0.23; Emissivity=0.96; R50=200; Gsmax=0
        ComponentData vine: Albedo=0.26; Emissivity=0.96; R50=200; Gsmax=0.011
        ComponentData saltbush: Albedo=0.15; Emissivity=0.96; R50=200; Gsmax=0.005
        ComponentData sorghum: Albedo=0.26; Emissivity=0.96; R50=200; Gsmax=0.011
        ComponentData danthonia: Albedo=0.23; Emissivity=0.96; R50=200; Gsmax=0
        ComponentData nativepasture: Albedo=0.15; Emissivity=0.96; R50=200; Gsmax=0
        ComponentData raphanus_raphanistrum: Albedo=0.26; Emissivity=0.96; R50=200; Gsmax=0.011
        ComponentData canola: Albedo=0.26; Emissivity=0.96; R50=200; Gsmax=0.011
        ComponentData kale2: Albedo=0.26; Emissivity=0.96; R50=200; Gsmax=0.011
        ComponentData Carrots4: Albedo=0.26; Emissivity=0.96; R50=200; Gsmax=0.011
        ComponentData crop: Albedo=0.26; Emissivity=0.96; R50=200; Gsmax=0.011
        ComponentData broccoli: Albedo=0.26; Emissivity=0.96; R50=200; Gsmax=0.011
        ComponentData tree: Albedo=0.15; Emissivity=0.96; R50=200; Gsmax=0.005
        ComponentData grandis: Albedo=0.15; Emissivity=0.96; R50=200; Gsmax=0.005
        ComponentData oilpalm: Albedo=0.15; Emissivity=0.96; R50=200; Gsmax=0.005
        ComponentData oilmallee: Albedo=0.15; Emissivity=0.96; R50=200; Gsmax=0.005
        ComponentData globulus: Albedo=0.15; Emissivity=0.96; R50=200; Gsmax=0.005
        ComponentData camaldulensis: Albedo=0.15; Emissivity=0.96; R50=200; Gsmax=0.005
        ComponentData grass: Albedo=0.23; Emissivity=0.96; R50=200; Gsmax=0
        ComponentData wheat: Albedo=0.26; Emissivity=0.96; R50=200; Gsmax=0.011
        ComponentData barley: Albedo=0.26; Emissivity=0.96; R50=200; Gsmax=0.011
        ComponentData canola: Albedo=0.26; Emissivity=0.96; R50=200; Gsmax=0.011
        ComponentData raphanus_raphanistrum: Albedo=0.26; Emissivity=0.96; R50=200; Gsmax=0.011
        ComponentData lolium_rigidum: Albedo=0.26; Emissivity=0.96; R50=200; Gsmax=0.011
        ComponentData chickpea: Albedo=0.26; Emissivity=0.96; R50=200; Gsmax=0.011
        ComponentData weed: Albedo=0.26; Emissivity=0.96; R50=200; Gsmax=0.011
        ComponentData oats: Albedo=0.26; Emissivity=0.96; R50=200; Gsmax=0.011
        ComponentData chickpea: Albedo=0.26; Emissivity=0.96; R50=200; Gsmax=0.011
        ComponentData fieldpea: Albedo=0.26; Emissivity=0.96; R50=200; Gsmax=0.011
        ComponentData sugar: Albedo=0.26; Emissivity=0.96; R50=200; Gsmax=0.011
        ComponentData potato: Albedo=0.15; Emissivity=0.96; R50=200; Gsmax=0
        ComponentData frenchbean: Albedo=0.26; Emissivity=0.96; R50=200; Gsmax=0.011
        ComponentData bambatsi: Albedo=0.23; Emissivity=0.96; R50=150; Gsmax=0.015
        ComponentData lucerne: Albedo=0.26; Emissivity=0.96; R50=200; Gsmax=0.011
        ComponentData maize: Albedo=0.26; Emissivity=0.96; R50=200; Gsmax=0.011
        ComponentData banksia: Albedo=0.15; Emissivity=0.96; R50=200; Gsmax=0.005
        ComponentData understorey: Albedo=0.26; Emissivity=0.96; R50=200; Gsmax=0.011
        ComponentData ryegrass: Albedo=0.23; Emissivity=0.96; R50=200; Gsmax=0
        ComponentData vine: Albedo=0.26; Emissivity=0.96; R50=200; Gsmax=0.011
        ComponentData saltbush: Albedo=0.15; Emissivity=0.96; R50=200; Gsmax=0.005
        ComponentData sorghum: Albedo=0.26; Emissivity=0.96; R50=200; Gsmax=0.011
        ComponentData danthonia: Albedo=0.23; Emissivity=0.96; R50=200; Gsmax=0
        ComponentData nativepasture: Albedo=0.15; Emissivity=0.96; R50=200; Gsmax=0
        ComponentData raphanus_raphanistrum: Albedo=0.26; Emissivity=0.96; R50=200; Gsmax=0.011
        ComponentData canola: Albedo=0.26; Emissivity=0.96; R50=200; Gsmax=0.011
        ComponentData kale2: Albedo=0.26; Emissivity=0.96; R50=200; Gsmax=0.011
        ComponentData Carrots4: Albedo=0.26; Emissivity=0.96; R50=200; Gsmax=0.011
        ComponentData crop: Albedo=0.26; Emissivity=0.96; R50=200; Gsmax=0.011
        ComponentData broccoli: Albedo=0.26; Emissivity=0.96; R50=200; Gsmax=0.011
        ComponentData tree: Albedo=0.15; Emissivity=0.96; R50=200; Gsmax=0.005
        ComponentData grandis: Albedo=0.15; Emissivity=0.96; R50=200; Gsmax=0.005
        ComponentData oilpalm: Albedo=0.15; Emissivity=0.96; R50=200; Gsmax=0.005
        ComponentData oilmallee: Albedo=0.15; Emissivity=0.96; R50=200; Gsmax=0.005
        ComponentData globulus: Albedo=0.15; Emissivity=0.96; R50=200; Gsmax=0.005
        ComponentData camaldulensis: Albedo=0.15; Emissivity=0.96; R50=200; Gsmax=0.005
        ComponentData grass: Albedo=0.23; Emissivity=0.96; R50=200; Gsmax=0
        ComponentData wheat: Albedo=0.26; Emissivity=0.96; R50=200; Gsmax=0.011
        ComponentData barley: Albedo=0.26; Emissivity=0.96; R50=200; Gsmax=0.011
        ComponentData canola: Albedo=0.26; Emissivity=0.96; R50=200; Gsmax=0.011
        ComponentData raphanus_raphanistrum: Albedo=0.26; Emissivity=0.96; R50=200; Gsmax=0.011
        ComponentData lolium_rigidum: Albedo=0.26; Emissivity=0.96; R50=200; Gsmax=0.011
        ComponentData chickpea: Albedo=0.26; Emissivity=0.96; R50=200; Gsmax=0.011
        ComponentData weed: Albedo=0.26; Emissivity=0.96; R50=200; Gsmax=0.011
        ComponentData oats: Albedo=0.26; Emissivity=0.96; R50=200; Gsmax=0.011
        ComponentData chickpea: Albedo=0.26; Emissivity=0.96; R50=200; Gsmax=0.011
        ComponentData fieldpea: Albedo=0.26; Emissivity=0.96; R50=200; Gsmax=0.011
        ComponentData sugar: Albedo=0.26; Emissivity=0.96; R50=200; Gsmax=0.011
        ComponentData potato: Albedo=0.15; Emissivity=0.96; R50=200; Gsmax=0
        ComponentData frenchbean: Albedo=0.26; Emissivity=0.96; R50=200; Gsmax=0.011
        ComponentData bambatsi: Albedo=0.23; Emissivity=0.96; R50=150; Gsmax=0.015
        ComponentData lucerne: Albedo=0.26; Emissivity=0.96; R50=200; Gsmax=0.011
        ComponentData maize: Albedo=0.26; Emissivity=0.96; R50=200; Gsmax=0.011
        ComponentData banksia: Albedo=0.15; Emissivity=0.96; R50=200; Gsmax=0.005
        ComponentData understorey: Albedo=0.26; Emissivity=0.96; R50=200; Gsmax=0.011
        ComponentData ryegrass: Albedo=0.23; Emissivity=0.96; R50=200; Gsmax=0
        ComponentData vine: Albedo=0.26; Emissivity=0.96; R50=200; Gsmax=0.011
        ComponentData saltbush: Albedo=0.15; Emissivity=0.96; R50=200; Gsmax=0.005
        ComponentData sorghum: Albedo=0.26; Emissivity=0.96; R50=200; Gsmax=0.011
        ComponentData danthonia: Albedo=0.23; Emissivity=0.96; R50=200; Gsmax=0
        ComponentData nativepasture: Albedo=0.15; Emissivity=0.96; R50=200; Gsmax=0
        ComponentData raphanus_raphanistrum: Albedo=0.26; Emissivity=0.96; R50=200; Gsmax=0.011
        ComponentData canola: Albedo=0.26; Emissivity=0.96; R50=200; Gsmax=0.011
        ComponentData kale2: Albedo=0.26; Emissivity=0.96; R50=200; Gsmax=0.011
        ComponentData Carrots4: Albedo=0.26; Emissivity=0.96; R50=200; Gsmax=0.011
        ComponentData crop: Albedo=0.26; Emissivity=0.96; R50=200; Gsmax=0.011
        ComponentData broccoli: Albedo=0.26; Emissivity=0.96; R50=200; Gsmax=0.011
        ComponentData tree: Albedo=0.15; Emissivity=0.96; R50=200; Gsmax=0.005
        ComponentData grandis: Albedo=0.15; Emissivity=0.96; R50=200; Gsmax=0.005
        ComponentData oilpalm: Albedo=0.15; Emissivity=0.96; R50=200; Gsmax=0.005
        ComponentData oilmallee: Albedo=0.15; Emissivity=0.96; R50=200; Gsmax=0.005
        ComponentData globulus: Albedo=0.15; Emissivity=0.96; R50=200; Gsmax=0.005
        ComponentData camaldulensis: Albedo=0.15; Emissivity=0.96; R50=200; Gsmax=0.005
        ComponentData grass: Albedo=0.23; Emissivity=0.96; R50=200; Gsmax=0
        ComponentData wheat: Albedo=0.26; Emissivity=0.96; R50=200; Gsmax=0.011
        ComponentData barley: Albedo=0.26; Emissivity=0.96; R50=200; Gsmax=0.011
        ComponentData canola: Albedo=0.26; Emissivity=0.96; R50=200; Gsmax=0.011
        ComponentData raphanus_raphanistrum: Albedo=0.26; Emissivity=0.96; R50=200; Gsmax=0.011
        ComponentData lolium_rigidum: Albedo=0.26; Emissivity=0.96; R50=200; Gsmax=0.011
        ComponentData chickpea: Albedo=0.26; Emissivity=0.96; R50=200; Gsmax=0.011
        ComponentData weed: Albedo=0.26; Emissivity=0.96; R50=200; Gsmax=0.011
        ComponentData oats: Albedo=0.26; Emissivity=0.96; R50=200; Gsmax=0.011
        ComponentData chickpea: Albedo=0.26; Emissivity=0.96; R50=200; Gsmax=0.011
        ComponentData fieldpea: Albedo=0.26; Emissivity=0.96; R50=200; Gsmax=0.011
        ComponentData sugar: Albedo=0.26; Emissivity=0.96; R50=200; Gsmax=0.011
        ComponentData potato: Albedo=0.15; Emissivity=0.96; R50=200; Gsmax=0
        ComponentData frenchbean: Albedo=0.26; Emissivity=0.96; R50=200; Gsmax=0.011
        ComponentData bambatsi: Albedo=0.23; Emissivity=0.96; R50=150; Gsmax=0.015
        ComponentData lucerne: Albedo=0.26; Emissivity=0.96; R50=200; Gsmax=0.011
        ComponentData maize: Albedo=0.26; Emissivity=0.96; R50=200; Gsmax=0.011
        ComponentData banksia: Albedo=0.15; Emissivity=0.96; R50=200; Gsmax=0.005
        ComponentData understorey: Albedo=0.26; Emissivity=0.96; R50=200; Gsmax=0.011
        ComponentData ryegrass: Albedo=0.23; Emissivity=0.96; R50=200; Gsmax=0
        ComponentData vine: Albedo=0.26; Emissivity=0.96; R50=200; Gsmax=0.011
        ComponentData saltbush: Albedo=0.15; Emissivity=0.96; R50=200; Gsmax=0.005
        ComponentData sorghum: Albedo=0.26; Emissivity=0.96; R50=200; Gsmax=0.011
        ComponentData danthonia: Albedo=0.23; Emissivity=0.96; R50=200; Gsmax=0
        ComponentData nativepasture: Albedo=0.15; Emissivity=0.96; R50=200; Gsmax=0
        ComponentData raphanus_raphanistrum: Albedo=0.26; Emissivity=0.96; R50=200; Gsmax=0.011
        ComponentData canola: Albedo=0.26; Emissivity=0.96; R50=200; Gsmax=0.011
        ComponentData kale2: Albedo=0.26; Emissivity=0.96; R50=200; Gsmax=0.011
        ComponentData Carrots4: Albedo=0.26; Emissivity=0.96; R50=200; Gsmax=0.011
        ComponentData crop: Albedo=0.26; Emissivity=0.96; R50=200; Gsmax=0.011
        ComponentData broccoli: Albedo=0.26; Emissivity=0.96; R50=200; Gsmax=0.011
        ComponentData tree: Albedo=0.15; Emissivity=0.96; R50=200; Gsmax=0.005
        ComponentData grandis: Albedo=0.15; Emissivity=0.96; R50=200; Gsmax=0.005
        ComponentData oilpalm: Albedo=0.15; Emissivity=0.96; R50=200; Gsmax=0.005
        ComponentData oilmallee: Albedo=0.15; Emissivity=0.96; R50=200; Gsmax=0.005
        ComponentData globulus: Albedo=0.15; Emissivity=0.96; R50=200; Gsmax=0.005
        ComponentData camaldulensis: Albedo=0.15; Emissivity=0.96; R50=200; Gsmax=0.005
        ComponentData grass: Albedo=0.23; Emissivity=0.96; R50=200; Gsmax=0
        ComponentData wheat: Albedo=0.26; Emissivity=0.96; R50=200; Gsmax=0.011
        ComponentData barley: Albedo=0.26; Emissivity=0.96; R50=200; Gsmax=0.011
        ComponentData canola: Albedo=0.26; Emissivity=0.96; R50=200; Gsmax=0.011
        ComponentData raphanus_raphanistrum: Albedo=0.26; Emissivity=0.96; R50=200; Gsmax=0.011
        ComponentData lolium_rigidum: Albedo=0.26; Emissivity=0.96; R50=200; Gsmax=0.011
        ComponentData chickpea: Albedo=0.26; Emissivity=0.96; R50=200; Gsmax=0.011
        ComponentData weed: Albedo=0.26; Emissivity=0.96; R50=200; Gsmax=0.011
        ComponentData oats: Albedo=0.26; Emissivity=0.96; R50=200; Gsmax=0.011
        ComponentData chickpea: Albedo=0.26; Emissivity=0.96; R50=200; Gsmax=0.011
        ComponentData fieldpea: Albedo=0.26; Emissivity=0.96; R50=200; Gsmax=0.011
        ComponentData sugar: Albedo=0.26; Emissivity=0.96; R50=200; Gsmax=0.011
        ComponentData potato: Albedo=0.15; Emissivity=0.96; R50=200; Gsmax=0
        ComponentData frenchbean: Albedo=0.26; Emissivity=0.96; R50=200; Gsmax=0.011
        ComponentData bambatsi: Albedo=0.23; Emissivity=0.96; R50=150; Gsmax=0.015
        ComponentData lucerne: Albedo=0.26; Emissivity=0.96; R50=200; Gsmax=0.011
        ComponentData maize: Albedo=0.26; Emissivity=0.96; R50=200; Gsmax=0.011
        ComponentData banksia: Albedo=0.15; Emissivity=0.96; R50=200; Gsmax=0.005
        ComponentData understorey: Albedo=0.26; Emissivity=0.96; R50=200; Gsmax=0.011
        ComponentData ryegrass: Albedo=0.23; Emissivity=0.96; R50=200; Gsmax=0
        ComponentData vine: Albedo=0.26; Emissivity=0.96; R50=200; Gsmax=0.011
        ComponentData saltbush: Albedo=0.15; Emissivity=0.96; R50=200; Gsmax=0.005
        ComponentData sorghum: Albedo=0.26; Emissivity=0.96; R50=200; Gsmax=0.011
        ComponentData danthonia: Albedo=0.23; Emissivity=0.96; R50=200; Gsmax=0
        ComponentData nativepasture: Albedo=0.15; Emissivity=0.96; R50=200; Gsmax=0
        ComponentData raphanus_raphanistrum: Albedo=0.26; Emissivity=0.96; R50=200; Gsmax=0.011
        ComponentData canola: Albedo=0.26; Emissivity=0.96; R50=200; Gsmax=0.011
        ComponentData kale2: Albedo=0.26; Emissivity=0.96; R50=200; Gsmax=0.011
        ComponentData Carrots4: Albedo=0.26; Emissivity=0.96; R50=200; Gsmax=0.011
        ComponentData crop: Albedo=0.26; Emissivity=0.96; R50=200; Gsmax=0.011
        ComponentData broccoli: Albedo=0.26; Emissivity=0.96; R50=200; Gsmax=0.011
        ComponentData tree: Albedo=0.15; Emissivity=0.96; R50=200; Gsmax=0.005
        ComponentData grandis: Albedo=0.15; Emissivity=0.96; R50=200; Gsmax=0.005
        ComponentData oilpalm: Albedo=0.15; Emissivity=0.96; R50=200; Gsmax=0.005
        ComponentData oilmallee: Albedo=0.15; Emissivity=0.96; R50=200; Gsmax=0.005
        ComponentData globulus: Albedo=0.15; Emissivity=0.96; R50=200; Gsmax=0.005
        ComponentData camaldulensis: Albedo=0.15; Emissivity=0.96; R50=200; Gsmax=0.005
        ComponentData grass: Albedo=0.23; Emissivity=0.96; R50=200; Gsmax=0
        ComponentData wheat: Albedo=0.26; Emissivity=0.96; R50=200; Gsmax=0.011
        ComponentData barley: Albedo=0.26; Emissivity=0.96; R50=200; Gsmax=0.011
        ComponentData canola: Albedo=0.26; Emissivity=0.96; R50=200; Gsmax=0.011
        ComponentData raphanus_raphanistrum: Albedo=0.26; Emissivity=0.96; R50=200; Gsmax=0.011
        ComponentData lolium_rigidum: Albedo=0.26; Emissivity=0.96; R50=200; Gsmax=0.011
        ComponentData chickpea: Albedo=0.26; Emissivity=0.96; R50=200; Gsmax=0.011
        ComponentData weed: Albedo=0.26; Emissivity=0.96; R50=200; Gsmax=0.011
        ComponentData oats: Albedo=0.26; Emissivity=0.96; R50=200; Gsmax=0.011
        ComponentData chickpea: Albedo=0.26; Emissivity=0.96; R50=200; Gsmax=0.011
        ComponentData fieldpea: Albedo=0.26; Emissivity=0.96; R50=200; Gsmax=0.011
        ComponentData sugar: Albedo=0.26; Emissivity=0.96; R50=200; Gsmax=0.011
        ComponentData potato: Albedo=0.15; Emissivity=0.96; R50=200; Gsmax=0
        ComponentData frenchbean: Albedo=0.26; Emissivity=0.96; R50=200; Gsmax=0.011
        ComponentData bambatsi: Albedo=0.23; Emissivity=0.96; R50=150; Gsmax=0.015
        ComponentData lucerne: Albedo=0.26; Emissivity=0.96; R50=200; Gsmax=0.011
        ComponentData maize: Albedo=0.26; Emissivity=0.96; R50=200; Gsmax=0.011
        ComponentData banksia: Albedo=0.15; Emissivity=0.96; R50=200; Gsmax=0.005
        ComponentData understorey: Albedo=0.26; Emissivity=0.96; R50=200; Gsmax=0.011
        ComponentData ryegrass: Albedo=0.23; Emissivity=0.96; R50=200; Gsmax=0
        ComponentData vine: Albedo=0.26; Emissivity=0.96; R50=200; Gsmax=0.011
        ComponentData saltbush: Albedo=0.15; Emissivity=0.96; R50=200; Gsmax=0.005
        ComponentData sorghum: Albedo=0.26; Emissivity=0.96; R50=200; Gsmax=0.011
        ComponentData danthonia: Albedo=0.23; Emissivity=0.96; R50=200; Gsmax=0
        ComponentData nativepasture: Albedo=0.15; Emissivity=0.96; R50=200; Gsmax=0
        ComponentData raphanus_raphanistrum: Albedo=0.26; Emissivity=0.96; R50=200; Gsmax=0.011
        ComponentData canola: Albedo=0.26; Emissivity=0.96; R50=200; Gsmax=0.011
        ComponentData kale2: Albedo=0.26; Emissivity=0.96; R50=200; Gsmax=0.011
        ComponentData Carrots4: Albedo=0.26; Emissivity=0.96; R50=200; Gsmax=0.011
        ComponentData crop: Albedo=0.26; Emissivity=0.96; R50=200; Gsmax=0.011
        ComponentData broccoli: Albedo=0.26; Emissivity=0.96; R50=200; Gsmax=0.011
        ComponentData tree: Albedo=0.15; Emissivity=0.96; R50=200; Gsmax=0.005
        ComponentData grandis: Albedo=0.15; Emissivity=0.96; R50=200; Gsmax=0.005
        ComponentData oilpalm: Albedo=0.15; Emissivity=0.96; R50=200; Gsmax=0.005
        ComponentData oilmallee: Albedo=0.15; Emissivity=0.96; R50=200; Gsmax=0.005
        ComponentData globulus: Albedo=0.15; Emissivity=0.96; R50=200; Gsmax=0.005
        ComponentData camaldulensis: Albedo=0.15; Emissivity=0.96; R50=200; Gsmax=0.005
        ComponentData grass: Albedo=0.23; Emissivity=0.96; R50=200; Gsmax=0
        ComponentData wheat: Albedo=0.26; Emissivity=0.96; R50=200; Gsmax=0.011
        ComponentData barley: Albedo=0.26; Emissivity=0.96; R50=200; Gsmax=0.011
        ComponentData canola: Albedo=0.26; Emissivity=0.96; R50=200; Gsmax=0.011
        ComponentData raphanus_raphanistrum: Albedo=0.26; Emissivity=0.96; R50=200; Gsmax=0.011
        ComponentData lolium_rigidum: Albedo=0.26; Emissivity=0.96; R50=200; Gsmax=0.011
        ComponentData chickpea: Albedo=0.26; Emissivity=0.96; R50=200; Gsmax=0.011
        ComponentData weed: Albedo=0.26; Emissivity=0.96; R50=200; Gsmax=0.011
        ComponentData oats: Albedo=0.26; Emissivity=0.96; R50=200; Gsmax=0.011
        ComponentData chickpea: Albedo=0.26; Emissivity=0.96; R50=200; Gsmax=0.011
        ComponentData fieldpea: Albedo=0.26; Emissivity=0.96; R50=200; Gsmax=0.011
        ComponentData sugar: Albedo=0.26; Emissivity=0.96; R50=200; Gsmax=0.011
        ComponentData potato: Albedo=0.15; Emissivity=0.96; R50=200; Gsmax=0
        ComponentData frenchbean: Albedo=0.26; Emissivity=0.96; R50=200; Gsmax=0.011
        ComponentData bambatsi: Albedo=0.23; Emissivity=0.96; R50=150; Gsmax=0.015
        ComponentData lucerne: Albedo=0.26; Emissivity=0.96; R50=200; Gsmax=0.011
        ComponentData maize: Albedo=0.26; Emissivity=0.96; R50=200; Gsmax=0.011
        ComponentData banksia: Albedo=0.15; Emissivity=0.96; R50=200; Gsmax=0.005
        ComponentData understorey: Albedo=0.26; Emissivity=0.96; R50=200; Gsmax=0.011
        ComponentData ryegrass: Albedo=0.23; Emissivity=0.96; R50=200; Gsmax=0
        ComponentData vine: Albedo=0.26; Emissivity=0.96; R50=200; Gsmax=0.011
        ComponentData saltbush: Albedo=0.15; Emissivity=0.96; R50=200; Gsmax=0.005
        ComponentData sorghum: Albedo=0.26; Emissivity=0.96; R50=200; Gsmax=0.011
        ComponentData danthonia: Albedo=0.23; Emissivity=0.96; R50=200; Gsmax=0
        ComponentData nativepasture: Albedo=0.15; Emissivity=0.96; R50=200; Gsmax=0
        ComponentData raphanus_raphanistrum: Albedo=0.26; Emissivity=0.96; R50=200; Gsmax=0.011
        ComponentData canola: Albedo=0.26; Emissivity=0.96; R50=200; Gsmax=0.011
        ComponentData kale2: Albedo=0.26; Emissivity=0.96; R50=200; Gsmax=0.011
        ComponentData Carrots4: Albedo=0.26; Emissivity=0.96; R50=200; Gsmax=0.011
        ComponentData crop: Albedo=0.26; Emissivity=0.96; R50=200; Gsmax=0.011
        ComponentData broccoli: Albedo=0.26; Emissivity=0.96; R50=200; Gsmax=0.011
        ComponentData tree: Albedo=0.15; Emissivity=0.96; R50=200; Gsmax=0.005
        ComponentData grandis: Albedo=0.15; Emissivity=0.96; R50=200; Gsmax=0.005
        ComponentData oilpalm: Albedo=0.15; Emissivity=0.96; R50=200; Gsmax=0.005
        ComponentData oilmallee: Albedo=0.15; Emissivity=0.96; R50=200; Gsmax=0.005
        ComponentData globulus: Albedo=0.15; Emissivity=0.96; R50=200; Gsmax=0.005
        ComponentData camaldulensis: Albedo=0.15; Emissivity=0.96; R50=200; Gsmax=0.005
        ComponentData grass: Albedo=0.23; Emissivity=0.96; R50=200; Gsmax=0
        ComponentData wheat: Albedo=0.26; Emissivity=0.96; R50=200; Gsmax=0.011
        ComponentData barley: Albedo=0.26; Emissivity=0.96; R50=200; Gsmax=0.011
        ComponentData canola: Albedo=0.26; Emissivity=0.96; R50=200; Gsmax=0.011
        ComponentData raphanus_raphanistrum: Albedo=0.26; Emissivity=0.96; R50=200; Gsmax=0.011
        ComponentData lolium_rigidum: Albedo=0.26; Emissivity=0.96; R50=200; Gsmax=0.011
        ComponentData chickpea: Albedo=0.26; Emissivity=0.96; R50=200; Gsmax=0.011
        ComponentData weed: Albedo=0.26; Emissivity=0.96; R50=200; Gsmax=0.011
        ComponentData oats: Albedo=0.26; Emissivity=0.96; R50=200; Gsmax=0.011
        ComponentData chickpea: Albedo=0.26; Emissivity=0.96; R50=200; Gsmax=0.011
        ComponentData fieldpea: Albedo=0.26; Emissivity=0.96; R50=200; Gsmax=0.011
        ComponentData sugar: Albedo=0.26; Emissivity=0.96; R50=200; Gsmax=0.011
        ComponentData potato: Albedo=0.15; Emissivity=0.96; R50=200; Gsmax=0
        ComponentData frenchbean: Albedo=0.26; Emissivity=0.96; R50=200; Gsmax=0.011
        ComponentData bambatsi: Albedo=0.23; Emissivity=0.96; R50=150; Gsmax=0.015
        ComponentData lucerne: Albedo=0.26; Emissivity=0.96; R50=200; Gsmax=0.011
        ComponentData maize: Albedo=0.26; Emissivity=0.96; R50=200; Gsmax=0.011
        ComponentData banksia: Albedo=0.15; Emissivity=0.96; R50=200; Gsmax=0.005
        ComponentData understorey: Albedo=0.26; Emissivity=0.96; R50=200; Gsmax=0.011
        ComponentData ryegrass: Albedo=0.23; Emissivity=0.96; R50=200; Gsmax=0
        ComponentData vine: Albedo=0.26; Emissivity=0.96; R50=200; Gsmax=0.011
        ComponentData saltbush: Albedo=0.15; Emissivity=0.96; R50=200; Gsmax=0.005
        ComponentData sorghum: Albedo=0.26; Emissivity=0.96; R50=200; Gsmax=0.011
        ComponentData danthonia: Albedo=0.23; Emissivity=0.96; R50=200; Gsmax=0
        ComponentData nativepasture: Albedo=0.15; Emissivity=0.96; R50=200; Gsmax=0
        ComponentData raphanus_raphanistrum: Albedo=0.26; Emissivity=0.96; R50=200; Gsmax=0.011
        ComponentData canola: Albedo=0.26; Emissivity=0.96; R50=200; Gsmax=0.011
        ComponentData kale2: Albedo=0.26; Emissivity=0.96; R50=200; Gsmax=0.011
        ComponentData Carrots4: Albedo=0.26; Emissivity=0.96; R50=200; Gsmax=0.011
        ComponentData crop: Albedo=0.26; Emissivity=0.96; R50=200; Gsmax=0.011
        ComponentData broccoli: Albedo=0.26; Emissivity=0.96; R50=200; Gsmax=0.011
        ComponentData tree: Albedo=0.15; Emissivity=0.96; R50=200; Gsmax=0.005
        ComponentData grandis: Albedo=0.15; Emissivity=0.96; R50=200; Gsmax=0.005
        ComponentData oilpalm: Albedo=0.15; Emissivity=0.96; R50=200; Gsmax=0.005
        ComponentData oilmallee: Albedo=0.15; Emissivity=0.96; R50=200; Gsmax=0.005
        ComponentData globulus: Albedo=0.15; Emissivity=0.96; R50=200; Gsmax=0.005
        ComponentData camaldulensis: Albedo=0.15; Emissivity=0.96; R50=200; Gsmax=0.005
        ComponentData grass: Albedo=0.23; Emissivity=0.96; R50=200; Gsmax=0
        ComponentData wheat: Albedo=0.26; Emissivity=0.96; R50=200; Gsmax=0.011
        ComponentData barley: Albedo=0.26; Emissivity=0.96; R50=200; Gsmax=0.011
        ComponentData canola: Albedo=0.26; Emissivity=0.96; R50=200; Gsmax=0.011
        ComponentData raphanus_raphanistrum: Albedo=0.26; Emissivity=0.96; R50=200; Gsmax=0.011
        ComponentData lolium_rigidum: Albedo=0.26; Emissivity=0.96; R50=200; Gsmax=0.011
        ComponentData chickpea: Albedo=0.26; Emissivity=0.96; R50=200; Gsmax=0.011
        ComponentData weed: Albedo=0.26; Emissivity=0.96; R50=200; Gsmax=0.011
        ComponentData oats: Albedo=0.26; Emissivity=0.96; R50=200; Gsmax=0.011
        ComponentData chickpea: Albedo=0.26; Emissivity=0.96; R50=200; Gsmax=0.011
        ComponentData fieldpea: Albedo=0.26; Emissivity=0.96; R50=200; Gsmax=0.011
        ComponentData sugar: Albedo=0.26; Emissivity=0.96; R50=200; Gsmax=0.011
        ComponentData potato: Albedo=0.15; Emissivity=0.96; R50=200; Gsmax=0
        ComponentData frenchbean: Albedo=0.26; Emissivity=0.96; R50=200; Gsmax=0.011
        ComponentData bambatsi: Albedo=0.23; Emissivity=0.96; R50=150; Gsmax=0.015
        ComponentData lucerne: Albedo=0.26; Emissivity=0.96; R50=200; Gsmax=0.011
        ComponentData maize: Albedo=0.26; Emissivity=0.96; R50=200; Gsmax=0.011
        ComponentData banksia: Albedo=0.15; Emissivity=0.96; R50=200; Gsmax=0.005
        ComponentData understorey: Albedo=0.26; Emissivity=0.96; R50=200; Gsmax=0.011
        ComponentData ryegrass: Albedo=0.23; Emissivity=0.96; R50=200; Gsmax=0
        ComponentData vine: Albedo=0.26; Emissivity=0.96; R50=200; Gsmax=0.011
        ComponentData saltbush: Albedo=0.15; Emissivity=0.96; R50=200; Gsmax=0.005
        ComponentData sorghum: Albedo=0.26; Emissivity=0.96; R50=200; Gsmax=0.011
        ComponentData danthonia: Albedo=0.23; Emissivity=0.96; R50=200; Gsmax=0
        ComponentData nativepasture: Albedo=0.15; Emissivity=0.96; R50=200; Gsmax=0
        ComponentData raphanus_raphanistrum: Albedo=0.26; Emissivity=0.96; R50=200; Gsmax=0.011
        ComponentData canola: Albedo=0.26; Emissivity=0.96; R50=200; Gsmax=0.011
        ComponentData kale2: Albedo=0.26; Emissivity=0.96; R50=200; Gsmax=0.011
        ComponentData Carrots4: Albedo=0.26; Emissivity=0.96; R50=200; Gsmax=0.011
      Plant Eucalyptus: CropType=Eucalyptus
        Phenology
          StageBasedInterpolation StageCode: Stages=[Planting, EndJuvenile, Maturity, Old]; Codes=[1, 2, 3, 4]; Proportional=true
          Constant ThermalTime: Value=1
          GenericPhase Juvenile: Start=Planting; End=EndJuvenile
            Constant ThermalTime: Value=1
            Constant Target: Value=1095
          GenericPhase Mature: Start=EndJuvenile; End=Maturity
            Constant ThermalTime: Value=1
            Constant Target: Value=1095
          GenericPhase Declining: Start=Maturity; End=Old
            Constant ThermalTime: Value=1
            Constant Target: Value=27010
          EndPhase Old: Start=Old; End=Unused
            Constant ThermalTime: Value=1
        Arbitrator: NArbitrationOption=RelativeAllocation; DMArbitrationOption=RelativeAllocation
        Summariser
          CompositeBiomass AboveGround
            Propertys=[[TreeCanopy].Live, [TreeCanopy].Dead, [Stem].Live, [Stem].Dead]
          CompositeBiomass BelowGround: Propertys=[[Root].Live, [Root].Dead]
          CompositeBiomass Total
            Propertys=[[TreeCanopy].Live, [TreeCanopy].Dead, [Stem].Live, [Stem].Dead, [Root].Live, [Root].Dead]
          CompositeBiomass TotalLive: Propertys=[[TreeCanopy].Live, [Stem].Live, [Root].Live]
          CompositeBiomass TotalDead: Propertys=[[TreeCanopy].Dead, [Stem].Dead, [Root].Dead]
        TreeCanopy Leaf: _LAI=2; K=0.5; DeltaBiomass=16.5932; LAI=2
          zero: _Height, _LAIDead, _Frgr, KDead, BiomassYesterday, WaterAllocation, Frgr, LAIDead, Height
          Biomass Live
          Biomass Dead
          Constant NConc: Value=0.01
          Constant LAIFunction: Value=2
          PartitionFractionDemandFunction DMDemandFunction
            Constant PartitionFraction: Value=0.2
          RUEModel Photosynthesis
            Constant RUE: Value=1.2
            RUECO2Function FCO2: PhotosyntheticPathway=C3
            LinearInterpolationFunction FN: XProperty=[TreeCanopy].Fn
              XYPairs: X=[0, 1, 1.5]; Y=[1, 1, 1]
            WeightedTemperatureFunction FT: MaximumTemperatureWeighting=0.75
              XYPairs: X=[2, 12, 24, 34]; Y=[0, 1, 1, 0]
            LinearInterpolationFunction FW: XProperty=[TreeCanopy].Fw
              XYPairs: X=[0, 0.4, 1.5]; Y=[0, 1, 1]
            LinearInterpolationFunction FVPD: XProperty=[Photosynthesis].VPD
              XYPairs: X=[0, 10, 50]; Y=[1, 1, 1]
        Root: InitialDM=5; SpecificRootLength=100000; KNO3=0.02; KNH4=0
          CompositeBiomass Live: Propertys=[[Root].LayerLive]
          CompositeBiomass Dead: Propertys=[[Root].LayerDead]
          PhaseBasedSwitch NitrogenDemandSwitch: Start=Planting; End=Old
          AirTemperatureFunction TemperatureEffect
            Memo
              Assume no temperature effect on root front velocity.
            XYPairs: X=[0, 26, 35]; Y=[1, 1, 1]
          Constant RootFrontVelocity: Value=10
          Constant SenescenceRate: Value=0.005
          PhaseLookup PartitionFraction
            PhaseLookupValue: Start=Planting; End=Old
              Constant: Value=0.3
          Constant MaximumNConc: Value=0.0041
          Constant MaxDailyNUptake: Value=6
          Constant MinimumNConc: Value=0.004
          LinearInterpolationFunction KLModifier: XProperty=[TreeCanopy].LAI
            XYPairs: X=[0, 3]; Y=[1, 1]
        GenericAboveGroundOrgan Stem
          Constant NReallocationFactor: Value=0
          Constant NRetranslocationFactor: Value=0.05
          PhaseBasedSwitch NitrogenDemandSwitch: Start=Planting; End=Old
          Constant DMRetranslocationFactor: Value=0
          Constant StructuralFraction: Value=1
          PartitionFractionDemandFunction DMDemandFunction
            Constant PartitionFraction: Value=0.5
          Constant MaximumNConc: Value=0.0015
          Constant MinimumNConc: Value=0.0014
          Biomass Live
          Biomass Dead
      Manager TreeSowingRule
        RowSpace = 280
        RowWidth = 770
        CultivarName = RussetBurbank
        SowingDate = 1987-02-04
```csharp
        using System;
        using Models.Core;
        using Models.PMF;
        namespace Models
        {
           [Serializable] 
           [System.Xml.Serialization.XmlInclude(typeof(Model))]
            public class Script : Model
            {      
               [Link] Plant Plant;
               [Link] Clock Clock;

               [Description("Spacing (m) between plants within rows")]
               public double RowSpace { get; set; }
               [Description("Spacing (m) between rows")]
               public double RowWidth { get; set; }

               [Description("Cultivar")]
               public string CultivarName { get; set; }
               [Description("Sowing Date")]
               public DateTime SowingDate { get; set; }

               [EventSubscribe("StartOfDay")]
               private void OnStartOfDay(object sender, EventArgs e)
               {
				double PlantPopulation = 1/(RowWidth*RowSpace);

				if (Clock.Today.Date == SowingDate)
                    Plant.Sow(Population:PlantPopulation, Cultivar:CultivarName);
                //Plant.Sow(... Contains the following arguements:
                //Population  double  Required  Seeds sowing/m2
                //Cultivar    string  Required  "NameOfCultivar"
                //Depth       double  Optional  Depth (mm) seed sown.   Default is 100mm 
                //MaxCover    double  Optional  Proportion (0-1) of the ground row crop will cover.   Default is 1.0
                //BudNumber   double  Optional  Number of mainstems per seed sown.  Default is 1.0
                //RowSpacing  double  Optional  Spaceing (mm) between drill rows when crop is sown.  Default is 150mm
                //CropClass   string  Optional  Crop class to instantiate when crop is sown.  Default is "Plant"
			   }
            }
        }
```
      Operations FertiliserOperations
        1987-02-09  Fertiliser.Apply(192, Fertiliser.Types.UreaN, 0);
        1987-05-20  Fertiliser.Apply(192, Fertiliser.Types.UreaN, 0);
        1987-08-28  Fertiliser.Apply(96, Fertiliser.Types.UreaN, 0);
        1987-12-06  Fertiliser.Apply(256, Fertiliser.Types.UreaN, 0);
        1988-02-29  Fertiliser.Apply(256, Fertiliser.Types.UreaN, 0);
        1988-07-18  Fertiliser.Apply(128, Fertiliser.Types.UreaN, 0);
        1988-10-26  Fertiliser.Apply(192, Fertiliser.Types.UreaN, 0);
        1989-06-09  Fertiliser.Apply(128, Fertiliser.Types.UreaN, 0);
        1989-10-27  Fertiliser.Apply(96, Fertiliser.Types.UreaN, 0);
      Report: Events=[Clock].EndOfDay; AutoCreateCSV=false
        Variables:
          [Clock].Today
          [Plant].Phenology.CurrentPhaseName
          [Plant].Phenology.StageCode.Value
          [Plant].Root.NSupplyUptake
          [SoilWater].eo
          [SoilWater].es
          [SoilWater].drain
          [SoilWater].runoff
          [SoilWater].pond
          [Plant].Summariser.AboveGround.Wt
          [Plant].Summariser.BelowGround.Wt
          [Plant].Summariser.Total.Wt
          [Plant].Leaf.Dead.Wt
          [Plant].Leaf.Live.Wt
          [Plant].Stem.Dead.Wt
          [Plant].Stem.Live.Wt
          [Plant].Root.Dead.Wt
          [Plant].Root.Live.Wt
          [Plant].Summariser.AboveGround.N
          [Plant].Summariser.BelowGround.N
          [Plant].Summariser.Total.N
          [Plant].Summariser.TotalLive.N
          [Plant].Summariser.TotalDead.N
          [Plant].Leaf.Dead.N
          [Plant].Leaf.Live.N
          [Plant].Stem.Dead.N
          [Plant].Stem.Live.N
          [Plant].Root.Live.N
          [Plant].Root.Dead.N
          [Plant].Leaf.Live.NConc
          [Plant].Leaf.Dead.NConc
          [Plant].Stem.Live.NConc
          [Plant].Root.Live.NConc
          [Plant].Root.WaterSupply
          [Plant].Root.WaterUptake
          [Plant].Leaf.Transpiration
          [Plant].Leaf.WaterDemand
          [Plant].Root.Depth
          [Plant].Leaf.CoverGreen
          [Plant].Leaf.CoverTotal
          [Plant].Leaf.CoverDead
          [Plant].Leaf.LAI
          [Plant].Leaf.LAIDead
          [Plant].Leaf.Fn
          [Plant].Leaf.Fw
          [Plant].Leaf.Photosynthesis.FT.Value
          [Plant].Leaf.Photosynthesis.FVPD.Value
          [Plant].Stem.MinimumNConc.Value
          [Plant].Root.MinimumNConc.Value
          [Plant].Stem.MaximumNConc.Value
          [Plant].Root.MaximumNConc.Value
          [Plant].Summariser.TotalLive.Wt
          [Plant].Stem.Live.StructuralWt
          [Plant].Stem.Live.NonStructuralWt
          [Plant].Leaf.SpecificArea
          [Plant].Summariser.TotalDead.Wt
          [SoilWater].sw_dep
          [SoilNitrogen].no3
          [Plant].Arbitrator.NDemand
    Input
  DataStore
  Tests
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