folder simulations: version=36; creator=Apsim 7.7-r3632
  simulation Fathen_plant2
    clock
      start_date = 19/12/2013  # Enter the start date of the simulation
      end_date = 15/03/2014  # Enter the end date of the simulation
    summaryfile
    metfile met: filename=Fathen_MetData.met
    area weed
      Fathen2
      surfaceom Surface Organic Matter
        PoolName = wheat_stubble  # Organic Matter pool name
        type = wheat  # Organic Matter type
        mass = 0  # Initial surface residue (kg/ha)
        cnr = 80  # C:N ratio of initial residue
        standing_fraction = 0  # Fraction of residue standing
      fertiliser
      Soil Horotiu: LocalName=Horotiu Silt Loam; Latitude=0; Longitude=0; YearOfSampling=0
        DataSource:
          Soil profile desription generated by Val Snow in July 2013 from Landcare soils database (SB09944), published data (Vogeler, I., 2007. Hydraulic Conductivity Measurements in the Taupo Land Disposal Test Pits 1 and 2 (View Road). HortResearch Client Report No. 21332. HortResearch, Palmerston North, New Zealand, p. 31.) (Close, M.E., Magesan, G.N., Lee, R., Stewart, M.K., Hadfield, J.C., 2003. Field study of pesticide leaching in an allophanic soil in New Zealand. 1: Experimental results. Australian Journal of Soil Research 41 809–824.
          ) and pedotransfer functions (Vogeler, I., Cichota, R., Snow, V.O., Dutton, T., Daly, B., 2011. Pedotransfer functions for estimating ammonium adsorption in soils. Soil Sci. Soc. Amer. J. 75, 324–331.)
        InitialWater Initial water: FractionFull=1; PercentMethod=EvenlyDistributed; RelativeTo=ll15
        Water
          Thickness  BD     AirDry  LL15   DUL    SAT    KS
          60         0.865  0.077   0.231  0.565  0.58   216
          110        0.835  0.069   0.207  0.515  0.606  1000
          140        0.805  0.068   0.205  0.514  0.617  1000
          240        0.83   0.088   0.264  0.475  0.62   1000
          150        0.82   0.097   0.29   0.481  0.625  1000
          210        0.83   0.12    0.3    0.48   0.615  1000
          160        0.99   0.18    0.3    0.48   0.615  1000
          230        1.46   0.18    0.3    0.48   0.615  1000
          SoilCrop AgPasture: LL=[0.231, 0.207, 0.205, 0.264, 0.29, -, -, -]; KL=[0.1, 0.1, 0.1, 0.1, 0, -, -, -]; XF=[1, 1, 1, 1, 0, -, -, -]
          SoilCrop Maize: LL=[0.11, 0.14, 0.16, 0.17, 0.19, 0.2, 0.2, 0.2]; KL=[0.08, 0.08, 0.08, 0.08, 0.06, 0.04, 0.03, 0.02]; XF=[1, 1, 1, 1, 1, 1, 1, 1]
          SoilCrop Weed: LL=[0.11, 0.14, 0.16, 0.17, 0.19, 0.2, 0.2, 0.2]; KL=[0.07, 0.07, 0.07, 0.07, 0.04, 0.04, 0.04, 0.04]; XF=[1, 1, 1, 1, 1, 0.5, 0.5, 0]
          SoilCrop Fathen: LL=[0.11, 0.14, 0.16, 0.17, 0.19, 0.2, 0.2, 0.2]; KL=[0.07, 0.07, 0.07, 0.07, 0.04, 0.04, 0.04, 0.04]; XF=[1, 1, 1, 1, 1, 1, 1, 1]
          SoilCrop Fathen2: LL=[0.11, 0.14, 0.16, 0.17, 0.19, 0.2, 0.2, 0.2]; KL=[0.07, 0.07, 0.07, 0.07, 0.04, 0.04, 0.04, 0.04]; XF=[1, 1, 1, 1, 1, 1, 1, 1]
          SoilCrop Kale2: LL=[0.11, 0.14, 0.16, 0.17, 0.19, 0.2, 0.2, 0.2]; KL=[0.07, 0.07, 0.07, 0.07, 0.04, 0.04, 0.04, 0.04]; XF=[1, 1, 1, 1, 1, 1, 1, 1]
        SoilWater: SummerCona=2.5; SummerU=9; SummerDate=1-Nov; WinterCona=2.5; WinterU=9; WinterDate=1-Apr; DiffusConst=88; DiffusSlope=35.4; Salb=0.13; CN2Bare=75; CNRed=20; CNCov=0.8
          Thickness  SWCON  MWCON
          100        0.5    1
          100        0.5    1
          100        0.5    1
          200        0.5    1
          200        0.5    1
          200        0.5    1
          200        0.5    1
          200        0.5    1
          200        0.5    1
          200        0.5    1
        SoilOrganicMatter: RootCN=40; RootWt=200; SoilCN=12.5; EnrACoeff=7.4; EnrBCoeff=0.2; OCUnits=Total
          Thickness  OC   FBiom  FInert
          60         8.2  0.08   0.58
          110        5.5  0.02   0.7
          140        3.3  0.015  0.77
          240        1.7  0.01   0.9
          150        1.7  0.01   0.99
        Analysis: PHUnits=Water; BoronUnits=HotWater
          Thickness  PH   CEC   ParticleSizeSand  ParticleSizeSilt  ParticleSizeClay
          60         5.7  28.2  33.77             48.62             17.61
          110        5.3  21    33.91             49.73             16.36
          140        5.9  17.3  35.91             47.67             16.42
          240        6.6  12    46.26             24.71             29.03
          150        6.7  12.9  53.54             28.02             18.44
        Sample Initial nitrogen: NO3Units=ppm; NH4Units=ppm; SWUnits=Volumetric; OCUnits=Total; PHUnits=Water
          Thickness  NO3    NH4
          60         6.503  0.599004
          110        2.101  0.100001
          140        2.101  0.100001
          240        1.701  0.100001
          150        1.701  0.1
          210        1.701  0.1
          160        1      0.1
          230        1      0.1
        LayerStructure: Thickness=[10, 20, 30, 40, 50, 50, 50, 50, 100, 100, 50, 50, 50, 50]
      folder Manager folder
        manager Sow on a fixed date
          # Sowing criteria
          date = 20-dec  # Enter sowing date (dd-mmm)
          # Sowing parameters
          crop = Fathen2  # Enter name of crop to sow
          density = 1.07825  # Enter sowing density (plants/m2)
          depth = 5  # Enter sowing depth (mm)
          cultivar = Std  # Enter cultivar
          class = plant  # Enter crop growth class
          row_spacing = 500  # Enter row spacing (mm)
          on start_of_day:
```
        if (today = date('[date]') then
             [crop] sow population =[density], depth = [depth], cultivar = [cultivar], MaxCover = 1, BudNumber = 1, row_spacing = [row_spacing], crop_class = [class]
         endif
```
      outputfile: filename=Fathen_plant2 weed.out; title=Fathen_plant2 weed; events=My Variables Events
        variables My Variables
          variables: dd/mm/yyyy, DaysAfterSowing, DaysAfteremergence, height, green_biomass_wt, TotalWt, RootTotalWt, StemTotalWt, leafTotalWt, leaf_area_tot, lai, leaf_no, node_no, leaves_per_node, leaf_area(), RootTotalnconc, StemTotalnconc, leafTotalnconc, Totalnconc, esw, sw_supply, sw_deficit(), TT, StageName, StructurePlantTotalNodeNo, StructureHeightValue, LeafLAI, StemLiveWt, LeafLiveWt, RootLiveWt
        events Reporting Frequency
          events: harvesting, end_day
      micromet
        soilalbedo = 0.23
        a_interception = 0
        b_interception = 0
        c_interception = 0
        d_interception = 0
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