Simulations
  Simulation Fathen_plant2: Area=0; Slope=0
    Clock: StartDate=2013-12-19; EndDate=2014-03-15
    Summary summaryfile
    Weather: FileName=Fathen_MetData.met
    Zone weed: Area=1; Slope=0
      SurfaceOrganicMatter Surface Organic Matter: PoolName=wheat_stubble; type=wheat; mass=0; standing_fraction=0; cnr=80; CriticalResidueWeight=2000; OptimumDecompTemp=20; MaxCumulativeEOS=20; CNRatioDecompCoeff=0.277; CNRatioDecompThreshold=25; TotalLeachRain=25; MinRainToLeach=10; CriticalMinimumOrganicC=0.004; DefaultCPRatio=0; DefaultStandingFraction=0; StandingExtinctCoeff=0.5; FractionFaecesAdded=0.5
        Pools:
          {PoolName=wheat_stubble, ResidueType=wheat, Mass=0, CNRatio=80, StandingFraction=0}
        ResidueTypes ResidueTypesList: LoadFromResource=ResidueTypes
      Soil Horotiu: Latitude=0; Longitude=0
        DataSource:
          Soil profile desription generated by Val Snow in July 2013 from Landcare soils database (SB09944), published data (Vogeler, I., 2007. Hydraulic Conductivity Measurements in the Taupo Land Disposal Test Pits 1 and 2 (View Road). HortResearch Client Report No. 21332. HortResearch, Palmerston North, New Zealand, p. 31.) (Close, M.E., Magesan, G.N., Lee, R., Stewart, M.K., Hadfield, J.C., 2003. Field study of pesticide leaching in an allophanic soil in New Zealand. 1: Experimental results. Australian Journal of Soil Research 41 809–824.
          ) and pedotransfer functions (Vogeler, I., Cichota, R., Snow, V.O., Dutton, T., Daly, B., 2011. Pedotransfer functions for estimating ammonium adsorption in soils. Soil Sci. Soc. Amer. J. 75, 324–331.)
        InitialWater Initial water: PercentMethod=EvenlyDistributed; FractionFull=1
        Water
          Thickness  BD     AirDry  LL15   DUL    SAT
          60         0.865  0.077   0.231  0.565  0.58
          110        0.835  0.069   0.207  0.515  0.606
          140        0.805  0.068   0.205  0.514  0.617
          240        0.83   0.088   0.264  0.475  0.62
          150        0.82   0.097   0.29   0.481  0.625
          210        0.83   0.12    0.3    0.48   0.615
          160        0.99   0.18    0.3    0.48   0.615
          230        1.46   0.18    0.3    0.48   0.615
          SoilCrop AgPasture: LL=[0.231, 0.207, 0.205, 0.264, 0.29, -, -, -]; KL=[0.1, 0.1, 0.1, 0.1, 0, -, -, -]; XF=[1, 1, 1, 1, 0, -, -, -]
          SoilCrop Maize: LL=[0.11, 0.14, 0.16, 0.17, 0.19, 0.2, 0.2, 0.2]; KL=[0.08, 0.08, 0.08, 0.08, 0.06, 0.04, 0.03, 0.02]; XF=[1, 1, 1, 1, 1, 1, 1, 1]
          SoilCrop Weed: LL=[0.11, 0.14, 0.16, 0.17, 0.19, 0.2, 0.2, 0.2]; KL=[0.07, 0.07, 0.07, 0.07, 0.04, 0.04, 0.04, 0.04]; XF=[1, 1, 1, 1, 1, 0.5, 0.5, 0]
          SoilCrop Fathen: LL=[0.11, 0.14, 0.16, 0.17, 0.19, 0.2, 0.2, 0.2]; KL=[0.07, 0.07, 0.07, 0.07, 0.04, 0.04, 0.04, 0.04]; XF=[1, 1, 1, 1, 1, 1, 1, 1]
          SoilCrop Fathen2: LL=[0.11, 0.14, 0.16, 0.17, 0.19, 0.2, 0.2, 0.2]; KL=[0.07, 0.07, 0.07, 0.07, 0.04, 0.04, 0.04, 0.04]; XF=[1, 1, 1, 1, 1, 1, 1, 1]
          SoilCrop Kale2: LL=[0.11, 0.14, 0.16, 0.17, 0.19, 0.2, 0.2, 0.2]; KL=[0.07, 0.07, 0.07, 0.07, 0.04, 0.04, 0.04, 0.04]; XF=[1, 1, 1, 1, 1, 1, 1, 1]
        SoilWater: residueinterception=0; SummerDate=1-Nov; SummerU=9; SummerCona=2.5; WinterDate=1-Apr; WinterU=9; WinterCona=2.5; DiffusConst=88; DiffusSlope=35.4; Salb=0.13; CN2Bare=75; CNRed=20; CNCov=0.8; max_pond=0; Thickness=[100, 100, 100, 200, 200, 200, 200, 200, 200, 200]; SWCON=[0.5, 0.5, 0.5, 0.5, 0.5, 0.5, 0.5, 0.5, 0.5, 0.5]
        SoilNitrogen: fom_type=[default, manure, mucuna, lablab, shemp, stable]; fract_carb=[0.2, 0.3, 0.54, 0.57, 0.45, 0]; fract_cell=[0.7, 0.3, 0.37, 0.37, 0.47, 0.1]; fract_lign=[0.1, 0.4, 0.09, 0.06, 0.08, 0.9]; wfpsN2N2O_x=[22, 88]; wfpsN2N2O_y=[0.1, 1]
        SoilOrganicMatter: RootCN=40; RootWt=200; SoilCN=12.5; EnrACoeff=7.4; EnrBCoeff=0.2; OCUnits=Total
          Thickness  OC   FBiom  FInert
          60         8.2  0.08   0.58
          110        5.5  0.02   0.7
          140        3.3  0.015  0.77
          240        1.7  0.01   0.9
          150        1.7  0.01   0.99
        Analysis: Thickness=[60, 110, 140, 240, 150]; PH=[5.7, 5.3, 5.9, 6.6, 6.7]; PHUnits=Water; BoronUnits=HotWater
        Sample Initial nitrogen: NO3Units=ppm; NH4Units=ppm; SWUnits=Volumetric; OCUnits=Total; PHUnits=Water
          Thickness  NO3    NH4
          60         6.503  0.599004
          110        2.101  0.100001
          140        2.101  0.100001
          240        1.701  0.100001
          150        1.701  0.1
          210        1.701  0.1
          160        1      0.1
          230        1      0.1
        Plant Fathen: CropType=Fathen
      Folder Manager folder
        Manager Sow on a fixed date
```csharp
using System;
using Models.Core;
using Models.PMF;
using Models.PMF.OldPlant;
namespace Models
{
	[Serializable]
	[System.Xml.Serialization.XmlInclude(typeof(Model))]
	public class Script : Model
	{
		[Link] Clock Clock;
		[EventSubscribe("DoManagement")]
		private void OnDoManagement(object sender, EventArgs e)
		{
			/*
				
        if (today = date('[date]') then
             [crop] sow population =[density], depth = [depth], cultivar = [cultivar], MaxCover = 1, BudNumber = 1, row_spacing = [row_spacing], crop_class = [class]
         endif
               
			*/
		}
	}
}
```
      Report outputfile
        VariableNames:
          [Clock].Today
          DaysAfterSowing
          DaysAfteremergence
          height
          green_biomass_wt
          TotalWt
          RootTotalWt
          StemTotalWt
          leafTotalWt
          leaf_area_tot
          lai
          leaf_no
          node_no
          leaves_per_node
          leaf_area()
          RootTotalnconc
          StemTotalnconc
          leafTotalnconc
          Totalnconc
          esw
          sw_supply
          sw_deficit()
          TT
          StageName
          StructurePlantTotalNodeNo
          StructureHeightValue
          LeafLAI
          StemLiveWt
          LeafLiveWt
          RootLiveWt
        EventNames:
          [Clock].DoReport
          [Clock].DoReport
      MicroClimate Micromet: air_pressure=1010; soil_emissivity=0.96; sun_angle=15; soil_heat_flux_fraction=0.4; night_interception_fraction=0.5; windspeed_default=3; refheight=2; albedo=0.15; emissivity=0.96; gsmax=0.01; r50=200; a_interception=0; b_interception=0; c_interception=0; d_interception=0; soil_albedo=0.23
  DataStore
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