Simulations
  DataStore
    ExcelInput Observed: FileName=C:\ApsimX\Tests\Maize\Observations\obsDataMaize_DB.xlsx; SheetNames=[observed]
    ExcelInput LeafSize: SheetNames=[MaxLeafSize]
      FileName=%root%\Tests\Maize\Observations\IndLeafData_MaizeRainshelter.xlsx
    PredictedObserved LeafAreas: PredictedTableName=Report; ObservedTableName=MaxLeafSize; FieldNameUsedForMatch=ExtraVariables.Script.LeafExpandedPosition
    ExcelInput SoilWater: FileName=%root%\Tests\Maize\Observations\SoilWater.xlsx; SheetNames=[SoilWater]
  Experiment Lincoln2012
    Memo
      Description of Cultivar trial
    Factors
      Factor Nitrogen: Specifications=[Fert]
        Operations Nil
          2012-11-15  [Fertiliser].Apply(0, Fertiliser.Types.UreaN, 10);
          2012-12-20  [Fertiliser].Apply(0, Fertiliser.Types.UreaN, 10);
          2013-01-31  [Fertiliser].Apply(0, Fertiliser.Types.UreaN, 10);
        Operations Low
          2012-11-15  [Fertiliser].Apply(25, Fertiliser.Types.UreaN, 10);
          2012-12-20  [Fertiliser].Apply(50, Fertiliser.Types.UreaN, 10);
        Operations Med
          2012-11-15  [Fertiliser].Apply(50, Fertiliser.Types.UreaN, 10);
          2012-12-20  [Fertiliser].Apply(100, Fertiliser.Types.UreaN, 10);
          2013-01-31  [Fertiliser].Apply(100, Fertiliser.Types.UreaN, 10);
      Factor Irrigation: Specifications=[Irrig]
        Operations Full
          2012-10-24  [Irrigation].Apply(16);
          2012-10-26  [Irrigation].Apply(10);
          2012-11-03  [Irrigation].Apply(13);
          2012-11-11  [Irrigation].Apply(19.5);
          2012-11-15  [Irrigation].Apply(3.1);
          2012-11-23  [Irrigation].Apply(20);
          2012-11-29  [Irrigation].Apply(20);
          2012-11-30  [Irrigation].Apply(30);
          2012-12-13  [Irrigation].Apply(19);
          2012-12-20  [Irrigation].Apply(26);
          2012-12-20  [Irrigation].Apply(4);
          2012-12-27  [Irrigation].Apply(22);
          2013-01-03  [Irrigation].Apply(39.7);
          2013-01-10  [Irrigation].Apply(42.1);
          2013-01-17  [Irrigation].Apply(46.2);
          2013-01-24  [Irrigation].Apply(44.7);
          2013-01-31  [Irrigation].Apply(44.7);
          2013-01-31  [Irrigation].Apply(4.3);
          2013-02-07  [Irrigation].Apply(37);
          2013-02-14  [Irrigation].Apply(38);
          2013-02-21  [Irrigation].Apply(38);
          2013-02-28  [Irrigation].Apply(33.4);
          2013-03-07  [Irrigation].Apply(39.7);
          2013-03-14  [Irrigation].Apply(31.3);
          2013-03-21  [Irrigation].Apply(24);
          2013-03-28  [Irrigation].Apply(34);
          2013-04-04  [Irrigation].Apply(27.5);
        Operations Nil
          2012-10-24  [Irrigation].Apply(16);
          2012-10-26  [Irrigation].Apply(10);
          2012-11-03  [Irrigation].Apply(13);
          2012-11-11  [Irrigation].Apply(19.5);
          2012-11-15  [Irrigation].Apply(3.1);
          2012-11-23  [Irrigation].Apply(20);
          2012-11-29  [Irrigation].Apply(20);
          2012-12-20  [Irrigation].Apply(4);
          2013-01-31  [Irrigation].Apply(4.3);
    Simulation Lincoln2012: Area=0; Slope=0
      Memo
        <?xml version="1.0" encoding="UTF-8"?>
        <!DOCTYPE html PUBLIC "-//W3C//DTD XHTML 1.1//EN" "http://www.w3.org/TR/xhtml11/DTD/xhtml11.dtd">
      Weather: FileName=%root%\Tests\Maize\lincoln.met
      Clock: StartDate=2012-10-01; EndDate=2013-04-15
      Summary summaryfile
      Zone RainShelter: Area=1; Slope=0
        Soil paparoa_silt_loam: SoilType=lignin_FOM; Region=Generic soil types; State=Canterbury; Latitude=999999; Longitude=999999
          DataSource=Profile descriptions provided by Trevor Webb and data for functional horizions based on SWAMP project results
          InitialWater Initial water: PercentMethod=EvenlyDistributed; FractionFull=0.24
          Water
            Thickness  BD     AirDry  LL15   DUL    SAT
            200        1.311  0.077   0.154  0.374  0.456
            200        1.474  0.152   0.152  0.32   0.413
            200        1.601  0.162   0.162  0.325  0.376
            200        1.68   0.06    0.06   0.15   0.3
            200        1.68   0.06    0.06   0.15   0.3
            200        1.68   0.06    0.06   0.15   0.3
            200        1.68   0.06    0.06   0.15   0.3
            200        1.68   0.06    0.06   0.15   0.3
            SoilCrop MaizeSoil: LL=[0.154, 0.152, 0.162, 0.06, 0.06, 0.06, 0.06, 0.06]; KL=[0.075, 0.075, 0.06, 0.049, 0.049, 0.049, 0.049, 0.049]; XF=[1, 1, 0.51, 1, 1, 1, 1, 1]
          SoilWater: residueinterception=0; SummerDate=1-Nov; SummerU=9; SummerCona=4.4; WinterDate=1-Apr; WinterU=6; WinterCona=3; DiffusConst=88; DiffusSlope=35; Salb=0.13; CN2Bare=73; CNRed=20; CNCov=0.8; max_pond=0; Thickness=[200, 200, 200, 200, 200, 200, 200, 200]; SWCON=[0.5, 0.56, 0.31, 0.7, 0.7, 0.7]
          SoilNitrogen: fom_type=[default, manure, mucuna, lablab, shemp, stable]; fract_carb=[0.2, 0.3, 0.54, 0.57, 0.45, 0]; fract_cell=[0.7, 0.3, 0.37, 0.37, 0.47, 0.1]; fract_lign=[0.1, 0.4, 0.09, 0.06, 0.08, 0.9]; wfpsN2N2O_x=[22, 88]; wfpsN2N2O_y=[0.1, 1]
          SoilOrganicMatter: RootCN=16; RootWt=6000; SoilCN=11; EnrACoeff=7.4; EnrBCoeff=0.2; OCUnits=Total
            Thickness  OC    FBiom  FInert
            200        1.8   0.03   0.4
            200        0.97  0.02   0.6
            200        0.42  0.01   0.8
            300        0.23  0.01   0.9
            300        0.23  0.01   0.9
            300        0.23  0.01   0.9
          Analysis: Thickness=[200, 200, 200, 300, 300, 300]; PH=[6, 6, 6, 6, 6, 6]; PHUnits=Water; BoronUnits=HotWater
          Sample Initial nitrogen: NO3Units=kgha; NH4Units=kgha; SWUnits=Volumetric; OCUnits=Total; PHUnits=Water
            Thickness  NO3    NH4
            200        16.23  0.9
            200        10.76  2.92
            200        7.83   0.57
            300        6.85   0.98
            300        4.88   0.84
            300        1.74   0.54
        Plant Maize: CropType=Maize
        MicroClimate: air_pressure=1010; soil_emissivity=0.96; sun_angle=15; soil_heat_flux_fraction=0.4; night_interception_fraction=0.5; windspeed_default=3; refheight=2; albedo=0.15; emissivity=0.96; gsmax=0.01; r50=200; a_interception=0; b_interception=1; c_interception=0; d_interception=0; soil_albedo=0.23
        Irrigation
        Fertiliser
        SurfaceOrganicMatter: PoolName=wheat; type=wheat; mass=0; standing_fraction=0; cnr=80; CriticalResidueWeight=2000; OptimumDecompTemp=20; MaxCumulativeEOS=20; CNRatioDecompCoeff=0.277; CNRatioDecompThreshold=25; TotalLeachRain=25; MinRainToLeach=10; CriticalMinimumOrganicC=0.004; DefaultCPRatio=0; DefaultStandingFraction=0; StandingExtinctCoeff=0.5; FractionFaecesAdded=0.5
          Pools:
            {PoolName=wheat, ResidueType=wheat, Mass=0, CNRatio=80, StandingFraction=0}
          ResidueTypes ResidueTypesList: LoadFromResource=ResidueTypes
        Operations Irrig: same as Lincoln2012.Factors.Irrigation.Full
        Operations Fert
          2012-11-15  [Fertiliser].Apply(50, Fertiliser.Types.UreaN, 10);
          2012-12-20  [Fertiliser].Apply(100, Fertiliser.Types.UreaN, 10);
          2013-01-31  [Fertiliser].Apply(100, Fertiliser.Types.UreaN, 10);
        Operations Sow
          2012-10-15  [Maize].Sow(population:12, cultivar:"Pioneer_3153", depth:50, rowSpacing:710);
        Manager ExtraVariables
```csharp
using System;
using Models.Core;
using System.Collections.Generic;
using System.Text;
using Models.Soils;
using Models.PMF;
using Models;
using System.Xml.Serialization;
namespace Models
{
	[Serializable] 
	public class Script : Model
	{      
		[Link] Clock Clock;
		[Link] Soils.Soil Soil;
		[Link] Models.SurfaceOM.SurfaceOrganicMatter SOM;
		[Link] Weather Met;   
		[Link] Fertiliser Fert;
		[Link] Irrigation Irrig;  
		[Link] Plant Maize;          
		[Link] Zone zone;			
					
		[XmlIgnore] public bool InitialDay { get; set; }
		
		[XmlIgnore] public double AccumPlantN { get; set; }
		[XmlIgnore] public double AccumMineralisation { get; set; }
		[XmlIgnore] public double AccumDenit { get; set; }
		[XmlIgnore] public double AccumFert { get; set; }
		[XmlIgnore] public double AccumLeach { get; set; }
		[XmlIgnore] public double AccumDetach { get; set; }
		[XmlIgnore] public double DeltaSoilOMN { get; set; }
		[XmlIgnore] public double DeltaSurfaceOMN { get; set; }
		[XmlIgnore] public double DeltaSoilMineralN { get; set; }
		[XmlIgnore] public double SoilNitrogenContent { get; set; }
		
		[XmlIgnore] public double AccumEO { get; set; }
		[XmlIgnore] public double AccumEP { get; set; }
		[XmlIgnore] public double AccumES { get; set; }
		[XmlIgnore] public double AccumDrainage { get; set; }
		[XmlIgnore] public double AccumRunoff { get; set; }
		[XmlIgnore] public double AccumOutflowLat { get; set; }
		[XmlIgnore] public double AccumIrrigation { get; set; }
		[XmlIgnore] public double AccumRainfall { get; set; }
		[XmlIgnore] public double SoilWaterDeficit { get; set; }
	
		[XmlIgnore] public double  InitialSoilOMN { get; set; }
		[XmlIgnore] public double  InitialSurfaceOMN { get; set; }
		[XmlIgnore] public double  InitialMineralN { get; set; }
		
		[XmlIgnore] public double SWC { get; set; }
		[XmlIgnore] public double DUL { get; set; }
		[XmlIgnore] public double OutFlowLat { get; set; }

		[XmlIgnore] public double FomN { get; set; }
		[XmlIgnore] public double BiomN { get; set; }
		[XmlIgnore] public double HumN { get; set; }
		[XmlIgnore] public double OrganicN { get; set; }
		[XmlIgnore] public double NO3N { get; set; }
		[XmlIgnore] public double NH4N { get; set; }
		[XmlIgnore] public double UreaN { get; set; }
		[XmlIgnore] public double MineralN { get; set; }
		[XmlIgnore] public double DltNMinRes { get; set; }
		[XmlIgnore] public double DltNMinTot { get; set; }
		
		[XmlIgnore] public double LeafExpandedPosition {get; set;}
        [XmlIgnore] public double LeafAppearedPosition {get; set;}
        [XmlIgnore] public double ExpandedLeafNoYesterday {get; set;}
        [XmlIgnore] public double AppearedLeafNoYesterday {get; set;}
        [XmlIgnore] public double MostRecentlyExpandedLeafArea {get; set;}
        [XmlIgnore] public double MostRecentlyAppearedLeafMaxArea {get; set;}
        
        [EventSubscribe("Commencing")]
        private void OnSimulationCommencing(object sender, EventArgs e)
        {
			InitialDay = true;
			LeafExpandedPosition = 0;
			LeafAppearedPosition = 0;
			ExpandedLeafNoYesterday = 0;
			AppearedLeafNoYesterday = 0;
			MostRecentlyExpandedLeafArea = 0;
			MostRecentlyAppearedLeafMaxArea = 0;
		}	   
		
		[EventSubscribe("DoManagement")]
		private void OnDoManagement(object sender, EventArgs e)
		{
			//!!!!!! Nitrogen balance components !!!!!!
			//!!!!!!^^^^^^^^^^^^^^^^^^^^^^^^^^^^^!!!!!!
           	FomN = Utility.Math.Sum(Soil.SoilNitrogen.FOMN);
			HumN = Utility.Math.Sum(Soil.SoilNitrogen.HumicN);
		    BiomN = Utility.Math.Sum(Soil.SoilNitrogen.MicrobialN);
			OrganicN = FomN + HumN + BiomN;
			NO3N = Utility.Math.Sum(Soil.NO3N);
			NH4N = Utility.Math.Sum(Soil.NH4N);
			UreaN = Utility.Math.Sum(Soil.SoilNitrogen.urea);
			MineralN = NO3N + NH4N + UreaN; 
			DltNMinRes = Utility.Math.Sum(Soil.SoilNitrogen.dlt_n_min_res);
			DltNMinTot = Utility.Math.Sum(Soil.SoilNitrogen.MineralisedN);
            int layers = Soil.Thickness.Length;
			if (InitialDay == true)
			{
				InitialSurfaceOMN = SOM.N;
				InitialSoilOMN = OrganicN;
				InitialMineralN = MineralN;
				InitialDay = false;
			}
			AccumFert += Fert.NitrogenApplied;
			DeltaSurfaceOMN = SOM.N - InitialSurfaceOMN;
			AccumLeach = AccumLeach - Soil.SoilWater.LeachNH4 - Soil.SoilWater.LeachNO3 - Soil.SoilWater.LeachUrea; //Fails
            AccumMineralisation += Utility.Math.Sum(Soil.SoilNitrogen.MineralisedN);
            AccumDenit -= Utility.Math.Sum(Soil.SoilNitrogen.Denitrification);
			AccumPlantN -= (double)zone.Get("Maize.Root.NUptake");
			DeltaSoilOMN = OrganicN - InitialSoilOMN;
			DeltaSoilMineralN = MineralN - InitialMineralN;
			SoilNitrogenContent = MineralN;
			
			//!!!!!! Water balance components !!!!!!
			//!!!!!!^^^^^^^^^^^^^^^^^^^^^^^^^^!!!!!!

			AccumIrrigation += Irrig.IrrigationApplied;
			AccumRainfall += Met.Rain;
			//AccumEP -= (double)zone.Get("[Maize].Leaf.Transpiration");
            AccumEP -= (double)zone.Get("Maize.Root.WaterUptake");
			SoilWaterDeficit =  (SWC - DUL);
			double OutFlowLat = Utility.Math.Sum(Soil.SoilWater.outflow_lat);
			AccumOutflowLat -= OutFlowLat;
			
			//Leaf number variable
			ExpandedLeafNoYesterday = (double)zone.Get("Maize.Leaf.ExpandedCohortNo");
			AppearedLeafNoYesterday = (double)zone.Get("Maize.Leaf.AppearedCohortNo");
		}
		
		[EventSubscribe("DoManagementCalculations")]
		private void OnDoManagementCalculations(object sender, EventArgs e)
		{
			FomN = Utility.Math.Sum(Soil.SoilNitrogen.FOMN);
			HumN = Utility.Math.Sum(Soil.SoilNitrogen.HumicN);
		    BiomN = Utility.Math.Sum(Soil.SoilNitrogen.MicrobialN);
			
			
			AccumEO -= Soil.SoilWater.Eo;
			AccumES -= Soil.SoilWater.Es; 
			AccumDrainage -= Soil.SoilWater.Drainage;
			AccumRunoff -= Soil.SoilWater.Runoff;
			SWC = Utility.Math.Sum(Soil.SoilWater.SWmm);
			DUL = Utility.Math.Sum(Soil.SoilWater.DULmm);
			
			if ((double)zone.Get("Maize.Leaf.ExpandedCohortNo") > ExpandedLeafNoYesterday)
			{
			LeafExpandedPosition = (double)zone.Get("Maize.Leaf.ExpandedCohortNo");
			MostRecentlyExpandedLeafArea = (double)zone.Get("Maize.Leaf.CohortSize["+(int)LeafExpandedPosition+"]");
			}
			else
			LeafExpandedPosition = 0;
			
			if ((double)zone.Get("Maize.Leaf.AppearedCohortNo") > AppearedLeafNoYesterday) 
			{
			LeafAppearedPosition = (double)zone.Get("Maize.Leaf.AppearedCohortNo");
			MostRecentlyAppearedLeafMaxArea = (double)zone.Get("Maize.Leaf.InitialLeafValues.MaxArea.Value");
			}
			//else
			//LeafAppearedPosition = 0;
			
		}
	}
}
```
        Arbitrator: ArbitrationMethod=Old; NutrientUptakeMethod=2
        Report: EventNames=[Clock].DoReport
          VariableNames:
            [Clock].Today
            [ExtraVariables].Script.AccumPlantN
            [ExtraVariables].Script.AccumMineralisation
            [ExtraVariables].Script.AccumDenit
            [ExtraVariables].Script.AccumFert
            [ExtraVariables].Script.AccumLeach
            [ExtraVariables].Script.AccumDetach
            [ExtraVariables].Script.DeltaSoilOMN
            [ExtraVariables].Script.DeltaSurfaceOMN
            [ExtraVariables].Script.DeltaSoilMineralN
            [Maize].Root.NSupply
            [Soil].SoilWater.Eo
            [Soil].SoilWater.Es
            [ExtraVariables].Script.SWC
            [ExtraVariables].Script.DUL
            [Soil].SoilWater.Drainage
            [Soil].SoilWater.Runoff
            [ExtraVariables].Script.OutFlowLat
            [Soil].SoilWater.pond
            [ExtraVariables].Script.AccumEO
            [ExtraVariables].Script.AccumEP
            [ExtraVariables].Script.AccumES
            [ExtraVariables].Script.AccumDrainage
            [ExtraVariables].Script.AccumRunoff
            [ExtraVariables].Script.AccumRainfall
            [ExtraVariables].Script.AccumIrrigation
            [ExtraVariables].Script.AccumOutflowLat
            [ExtraVariables].Script.SoilWaterDeficit
            [Maize].Grain.Live.Wt
            [Maize].Stem.Live.Wt
            [Maize].Spike.Live.N
            [Maize].Spike.Live.Wt
            [Maize].Grain.Live.N
            [Maize].Stem.Live.N
            [Maize].Leaf.Live.Wt
            [Maize].Root.Live.Wt
            [Maize].Leaf.Live.N
            [Maize].Root.Live.N
            [Maize].Leaf.Live.NConc
            [Maize].Root.Live.NConc
            [Maize].Root.WaterSupply
            [Maize].Root.WaterUptake
            [Maize].Leaf.Transpiration
            [Maize].Leaf.WaterDemand
            [Maize].Root.Depth
            [Maize].Leaf.CoverTotal
            [Maize].Leaf.CoverDead
            [Maize].Leaf.LAI
            [Maize].Leaf.Height
            [Maize].Husk.Live.Wt
            sum([Soil].SoilWater.SWmm) as ProfileWater
            [Soil].NO3N
            [ExtraVariables].Script.SoilNitrogenContent
            [Maize].Arbitrator.NDemand
            [MicroClimate].net_radn
            [MicroClimate].peta
            [MicroClimate].petr
            [ExtraVariables].Script.FomN
            [ExtraVariables].Script.HumN
            [ExtraVariables].Script.BiomN
            [ExtraVariables].Script.DltNMinRes
            [ExtraVariables].Script.DltNMinTot
            [Maize].Leaf.Fw
            [Maize].Leaf.Fn
            [Maize].Phenology.CurrentPhaseName
            [Maize].Phenology.Stage
            [Maize].Summariser.AboveGroundLive.N
            [Maize].Summariser.AboveGroundLive.Wt
            [Maize].Summariser.Total.N
            [Maize].Summariser.Total.Wt
            [Maize].Phenology.Stage
            [Maize].Leaf.ExpandedCohortNo
            [Maize].Leaf.AppearedCohortNo
            [Maize].Leaf.CohortArea[1:30]
            [ExtraVariables].Script.LeafExpandedPosition
            [ExtraVariables].Script.MostRecentlyExpandedLeafArea
            [ExtraVariables].Script.variable
            [Soil].SoilWater.SW
            [Maize].Leaf.InitialLeafValues.MaxArea.Value
            [ExtraVariables].Script.LeafAppearedPosition
            [ExtraVariables].Script.MostRecentlyAppearedLeafMaxArea
  Experiment Lincoln2010
    Memo
      Description of Cultivar trial
    Factors
      Factor Nitrogen: Specifications=[Fert]
        Operations Med
          2010-10-22  [Fertiliser].Apply(47, Fertiliser.Types.UreaN, 10);
          2010-12-17  [Fertiliser].Apply(200, Fertiliser.Types.UreaN, 10);
        Operations Nil
          2010-10-22  [Fertiliser].Apply(0, Fertiliser.Types.UreaN, 10);
          2010-12-17  [Fertiliser].Apply(0, Fertiliser.Types.UreaN, 10);
    Simulation Lincoln2010: Area=0; Slope=0
      Weather: FileName=%root%\Tests\Maize\lincoln.met
      Clock: StartDate=2010-10-01; EndDate=2011-04-15
      Summary summaryfile
      Memo
        TODO:

        1) Parameterise phenology of hybrid P39V43
        2) Add initial soil nitrogen to soil

        Mikes notes:
        Applied 350kg Cropzeal 15p which has 13.5% N as a base fertiliser to whole trial area. http://www.ballance.co.nz/products/key+products/cropzeal  . For Manager folder>>fertil_applic I just kept this as urea_N
        SurfaceOrganicMatter - Changed to fieldpea and changed C:N ratio to 40 (slightly educated guess) http://panhandlenotill.org/index.php/brown-revolution-part-3/

        TREATMENTS:
        Nitrogen
        NilN = 0 kg/ha
        MedN = 200 kg/ha

        VARIABLES:
        Biomass
        - AboveDM
        - StemDM
        - LeafDM
        - RachisDM --> still need simulated data
        - HuskDM --> still need simulated data
        - GrainDM
        - SenesDM --> still need simulated data

        LAI

        LeafNo
        - LeafTips
        - LeafLigules

        Phenology
        - Emerge
        - Silk
        - Tassel

        LightInt --> still need simulated data

        EAH added observed data and filters for all treatment levels, and treatment/variable info into memo
      Zone Field: Area=1; Slope=0
        Soil paparoa_silt_loam: SoilType=lignin_FOM; Region=Generic soil types; State=Canterbury; Latitude=999999; Longitude=999999
          DataSource=Profile descriptions provided by Trevor Webb and data for functional horizions based on SWAMP project results
          InitialWater Initial water: PercentMethod=EvenlyDistributed; FractionFull=0.8
          Water
            Thickness  BD     AirDry  LL15   DUL    SAT
            200        1.311  0.077   0.154  0.374  0.456
            200        1.474  0.152   0.152  0.32   0.413
            200        1.601  0.162   0.162  0.325  0.376
            300        1.68   0.06    0.06   0.15   0.3
            300        1.68   0.06    0.06   0.15   0.3
            300        1.68   0.06    0.06   0.15   0.3
            SoilCrop Barley: LL=[0.154, 0.152, 0.162, 0.06, 0.06, 0.06]; KL=[0.088, 0.088, 0.07, 0.066, 0.066, 0.066]; XF=[1, 1, 1, 1, 1, 1]
            SoilCrop Canola: LL=[0.154, 0.152, 0.162, 0.06, 0.06, 0.06]; KL=[0.075, 0.075, 0.06, 0.049, 0.049, 0.049]; XF=[1, 1, 0.51, 1, 1, 1]
            SoilCrop Cloverseed: LL=[0.154, 0.152, 0.162, 0.06, 0.06, 0.06]; KL=[0.05, 0.05, 0.04, 0.016, 0.016, 0.016]; XF=[1, 1, 0.73, 1, 1, 1]
            SoilCrop Fieldpea: LL=[0.154, 0.152, 0.162, 0.06, 0.06, 0.06]; KL=[0.1, 0.1, 0.054, 0.009, 0.009, 0.009]; XF=[1, 1, 0.3, 1, 1, 1]
            SoilCrop Fababean: LL=[0.154, 0.152, 0.162, 0.06, 0.06, 0.06]; KL=[0.1, 0.1, 0.08, 0.1, 0.1, 0.1]; XF=[1, 1, 0.51, 1, 1, 1]
            SoilCrop Foragebrassica: LL=[0.154, 0.152, 0.162, 0.06, 0.06, 0.06]; KL=[0.075, 0.075, 0.06, 0.049, 0.049, 0.049]; XF=[1, 1, 0.51, 1, 1, 1]
            SoilCrop Itallian_ryegrass: LL=[0.154, 0.152, 0.162, 0.06, 0.06, 0.06]; KL=[0.075, 0.075, 0.06, 0.057, 0.057, 0.057]; XF=[1, 1, 0.51, 1, 1, 1]
            SoilCrop Lucerne: LL=[0.154, 0.152, 0.162, 0.06, 0.06, 0.06]; KL=[0.038, 0.038, 0.03, 0.019, 0.019, 0.019]; XF=[1, 1, 1, 1, 1, 1]
            SoilCrop MaizeSoil: LL=[0.154, 0.152, 0.162, 0.06, 0.06, 0.06]; KL=[0.075, 0.075, 0.06, 0.049, 0.049, 0.049]; XF=[1, 1, 0.51, 1, 1, 1]
            SoilCrop Oats: LL=[0.154, 0.152, 0.162, 0.06, 0.06, 0.06]; KL=[0.075, 0.075, 0.06, 0.049, 0.049, 0.049]; XF=[1, 1, 0.73, 1, 1, 1]
            SoilCrop Potato: LL=[0.154, 0.152, 0.162, 0.06, 0.06, 0.06]; KL=[0.1, 0.057, 0.023, 0.002, 0.002, 0.002]; XF=[1, 1, 0.3, 1, 1, 1]
            SoilCrop Grassseed: LL=[0.154, 0.152, 0.162, 0.06, 0.06, 0.06]; KL=[0.05, 0.05, 0.025, 0.003, 0.003, 0.003]; XF=[1, 1, 0.51, 1, 1, 1]
            SoilCrop Wheat: LL=[0.154, 0.152, 0.162, 0.06, 0.06, 0.06]; KL=[0.075, 0.075, 0.06, 0.049, 0.049, 0.049]; XF=[1, 1, 0.73, 1, 1, 1]
            SoilCrop ryegrass_whiteclover: LL=[0.154, 0.152, 0.162, 0.06, 0.06, 0.06]; KL=[0.05, 0.05, 0.025, 0.003, 0.003, 0.003]; XF=[1, 1, 0.51, 1, 1, 1]
            SoilCrop ryegrass: LL=[0.154, 0.152, 0.162, 0.06, 0.06, 0.06]; KL=[0.05, 0.05, 0.025, 0.003, 0.003, 0.003]; XF=[1, 1, 0.51, 1, 1, 1]
            SoilCrop whiteclover: LL=[0.154, 0.152, 0.162, 0.06, 0.06, 0.06]; KL=[0.1, 0.1, 0.054, 0.009, 0.009, 0.009]; XF=[1, 1, 0.3, 1, 1, 1]
            SoilCrop kale: LL=[0.154, 0.152, 0.162, 0.06, 0.06, 0.06]; KL=[0.06, 0.06, 0.06, 0.06, 0.06, 0.06]; XF=[1, 1, 1, 1, 1, 1]
            SoilCrop triticale: LL=[0.154, 0.152, 0.162, 0.06, 0.06, 0.06]; KL=[0.088, 0.088, 0.07, 0.05, 0.05, 0.05]; XF=[1, 1, 0.73, 1, 1, 1]
          SoilWater: residueinterception=0; SummerDate=1-Nov; SummerU=9; SummerCona=4.4; WinterDate=1-Apr; WinterU=6; WinterCona=3; DiffusConst=88; DiffusSlope=35; Salb=0.13; CN2Bare=73; CNRed=20; CNCov=0.8; max_pond=0; Thickness=[200, 200, 200, 300, 300, 300]; SWCON=[0.5, 0.56, 0.31, 0.7, 0.7, 0.7]
          SoilNitrogen: fom_type=[default, manure, mucuna, lablab, shemp, stable]; fract_carb=[0.2, 0.3, 0.54, 0.57, 0.45, 0]; fract_cell=[0.7, 0.3, 0.37, 0.37, 0.47, 0.1]; fract_lign=[0.1, 0.4, 0.09, 0.06, 0.08, 0.9]; wfpsN2N2O_x=[22, 88]; wfpsN2N2O_y=[0.1, 1]
          SoilOrganicMatter: same as Lincoln2012.Lincoln2012.RainShelter.paparoa_silt_loam.SoilOrganicMatter
          Analysis: Thickness=[200, 200, 200, 300, 300, 300]; PH=[6, 6, 6, 6, 6, 6]; PHUnits=Water; BoronUnits=HotWater
          Sample Initial nitrogen: NO3Units=kgha; NH4Units=ppm; SWUnits=Volumetric; OCUnits=Total; PHUnits=Water
            Thickness  NO3    NH4
            200        16.23  0.343249
            200        10.76  0.990502
            200        7.83   0.178014
            300        6.85   0.194444
            300        4.88   0.166667
            300        1.74   0.107143
        Irrigation
        SurfaceOrganicMatter: PoolName=fieldpea; type=fieldpea; mass=0; standing_fraction=0; cnr=40; CriticalResidueWeight=2000; OptimumDecompTemp=20; MaxCumulativeEOS=20; CNRatioDecompCoeff=0.277; CNRatioDecompThreshold=25; TotalLeachRain=25; MinRainToLeach=10; CriticalMinimumOrganicC=0.004; DefaultCPRatio=0; DefaultStandingFraction=0; StandingExtinctCoeff=0.5; FractionFaecesAdded=0.5
          Pools:
            {PoolName=fieldpea, ResidueType=fieldpea, Mass=0, CNRatio=40, StandingFraction=0}
          ResidueTypes ResidueTypesList: LoadFromResource=ResidueTypes
        Fertiliser
        Folder Manager folder
          Operations Sow
            2010-10-26  [Maize].Sow(population:12, cultivar:"Pioneer_3153", depth:50, rowSpacing:760);
          Operations Fert
            2010-10-22  [Fertiliser].Apply(47, Fertiliser.Types.UreaN, 10);
            2010-12-17  [Fertiliser].Apply(200, Fertiliser.Types.UreaN, 10);
          Operations Irrig
            2010-10-29  [Irrigation].Apply(14);
            2010-12-03  [Irrigation].Apply(10);
            2010-12-20  [Irrigation].Apply(20);
            2011-01-06  [Irrigation].Apply(30);
            2011-01-17  [Irrigation].Apply(30);
            2011-02-04  [Irrigation].Apply(30);
            2011-02-17  [Irrigation].Apply(30);
            2011-03-03  [Irrigation].Apply(30);
        Manager SimCode
```csharp
using System;
using Models.Core;
using Models.PMF;
using Models.PMF.OldPlant;
namespace Models
{
	[Serializable]
	[System.Xml.Serialization.XmlInclude(typeof(Model))]
	public class Script : Model
	{
		[Link] Clock Clock;
		[EventSubscribe("Commencing")]
		private void OnSimulationCommencing(object sender, EventArgs e)
		{
			/*
				ExpNo = 1
TreatNo = 2
			*/
		}
	}
}
```
        MicroClimate: same as Lincoln2012.Lincoln2012.RainShelter.MicroClimate
        Plant Maize: CropType=Maize
        Arbitrator: ArbitrationMethod=Old; NutrientUptakeMethod=2
        Report: EventNames=[Clock].DoReport
          VariableNames:
            [Clock].Today
            [ExtraVariables].Script.AccumPlantN
            [ExtraVariables].Script.AccumMineralisation
            [ExtraVariables].Script.AccumDenit
            [ExtraVariables].Script.AccumFert
            [ExtraVariables].Script.AccumLeach
            [ExtraVariables].Script.AccumDetach
            [ExtraVariables].Script.DeltaSoilOMN
            [ExtraVariables].Script.DeltaSurfaceOMN
            [ExtraVariables].Script.DeltaSoilMineralN
            [Maize].Root.NSupply
            [Soil].SoilWater.Eo
            [Soil].SoilWater.Es
            [ExtraVariables].Script.SWC
            [ExtraVariables].Script.DUL
            [Soil].SoilWater.Drainage
            [Soil].SoilWater.Runoff
            [ExtraVariables].Script.OutFlowLat
            [Soil].SoilWater.pond
            [ExtraVariables].Script.AccumEO
            [ExtraVariables].Script.AccumEP
            [ExtraVariables].Script.AccumES
            [ExtraVariables].Script.AccumDrainage
            [ExtraVariables].Script.AccumRunoff
            [ExtraVariables].Script.AccumRainfall
            [ExtraVariables].Script.AccumIrrigation
            [ExtraVariables].Script.AccumOutflowLat
            [ExtraVariables].Script.SoilWaterDeficit
            [Maize].Grain.Live.Wt
            [Maize].Stem.Live.Wt
            [Maize].Spike.Live.N
            [Maize].Spike.Live.Wt
            [Maize].Grain.Live.N
            [Maize].Stem.Live.N
            [Maize].Leaf.Live.Wt
            [Maize].Root.Live.Wt
            [Maize].Leaf.Live.N
            [Maize].Root.Live.N
            [Maize].Leaf.Live.NConc
            [Maize].Root.Live.NConc
            [Maize].Root.WaterSupply
            [Maize].Root.WaterUptake
            [Maize].Leaf.Transpiration
            [Maize].Leaf.WaterDemand
            [Maize].Root.Depth
            [Maize].Leaf.CoverTotal
            [Maize].Leaf.CoverDead
            [Maize].Leaf.LAI
            [Maize].Leaf.Height
            [Maize].Husk.Live.Wt
            [Soil].SoilWater.SWmm
            [Soil].NO3N
            [ExtraVariables].Script.SoilNitrogenContent
            [Maize].Arbitrator.NDemand
            [MicroClimate].net_radn
            [MicroClimate].peta
            [MicroClimate].petr
            [ExtraVariables].Script.FomN
            [ExtraVariables].Script.HumN
            [ExtraVariables].Script.BiomN
            [ExtraVariables].Script.DltNMinRes
            [ExtraVariables].Script.DltNMinTot
            [Maize].Leaf.Fw
            [Maize].Leaf.Fn
            [Maize].Phenology.CurrentPhaseName
            [Maize].Phenology.Stage
            [Maize].Summariser.AboveGroundLive.N
            [Maize].Summariser.AboveGroundLive.Wt
            [Maize].Summariser.Total.N
            [Maize].Summariser.Total.Wt
            [Maize].Phenology.Stage
        Manager ExtraVariables
```csharp
using System;
using Models.Core;
using System.Collections.Generic;
using System.Text;
using Models.Soils;
using Models.PMF;
using Models;
using System.Xml.Serialization;
namespace Models
{
	[Serializable] 
	public class Script : Model
	{      
		[Link] Clock Clock;
		[Link] Soils.Soil Soil;
		[Link] Models.SurfaceOM.SurfaceOrganicMatter SOM;
		[Link] Weather Met;   
		[Link] Fertiliser Fert;
		[Link] Irrigation Irrig;  
		[Link] Plant Maize;          
		[Link] Zone zone;			
					
		[XmlIgnore] public bool InitialDay { get; set; }
		
		[XmlIgnore] public double AccumPlantN { get; set; }
		[XmlIgnore] public double AccumMineralisation { get; set; }
		[XmlIgnore] public double AccumDenit { get; set; }
		[XmlIgnore] public double AccumFert { get; set; }
		[XmlIgnore] public double AccumLeach { get; set; }
		[XmlIgnore] public double AccumDetach { get; set; }
		[XmlIgnore] public double DeltaSoilOMN { get; set; }
		[XmlIgnore] public double DeltaSurfaceOMN { get; set; }
		[XmlIgnore] public double DeltaSoilMineralN { get; set; }
		[XmlIgnore] public double SoilNitrogenContent { get; set; }
		
		[XmlIgnore] public double AccumEO { get; set; }
		[XmlIgnore] public double AccumEP { get; set; }
		[XmlIgnore] public double AccumES { get; set; }
		[XmlIgnore] public double AccumDrainage { get; set; }
		[XmlIgnore] public double AccumRunoff { get; set; }
		[XmlIgnore] public double AccumOutflowLat { get; set; }
		[XmlIgnore] public double AccumIrrigation { get; set; }
		[XmlIgnore] public double AccumRainfall { get; set; }
		[XmlIgnore] public double SoilWaterDeficit { get; set; }
	
		[XmlIgnore] public double  InitialSoilOMN { get; set; }
		[XmlIgnore] public double  InitialSurfaceOMN { get; set; }
		[XmlIgnore] public double  InitialMineralN { get; set; }
		
		[XmlIgnore] public double SWC { get; set; }
		[XmlIgnore] public double DUL { get; set; }
		[XmlIgnore] public double OutFlowLat { get; set; }

		[XmlIgnore] public double FomN { get; set; }
		[XmlIgnore] public double BiomN { get; set; }
		[XmlIgnore] public double HumN { get; set; }
		[XmlIgnore] public double OrganicN { get; set; }
		[XmlIgnore] public double NO3N { get; set; }
		[XmlIgnore] public double NH4N { get; set; }
		[XmlIgnore] public double UreaN { get; set; }
		[XmlIgnore] public double MineralN { get; set; }
		[XmlIgnore] public double DltNMinRes { get; set; }
		[XmlIgnore] public double DltNMinTot { get; set; }
		
        [EventSubscribe("Commencing")]
        private void OnSimulationCommencing(object sender, EventArgs e)
        {
			InitialDay = true;
		}	   
		
		[EventSubscribe("DoManagement")]
		private void OnDoManagement(object sender, EventArgs e)
		{
			//!!!!!! Nitrogen balance components !!!!!!
			//!!!!!!^^^^^^^^^^^^^^^^^^^^^^^^^^^^^!!!!!!
           	FomN = Utility.Math.Sum(Soil.SoilNitrogen.FOMN);
			HumN = Utility.Math.Sum(Soil.SoilNitrogen.HumicN);
		    BiomN = Utility.Math.Sum(Soil.SoilNitrogen.MicrobialN);
			OrganicN = FomN + HumN + BiomN;
			NO3N = Utility.Math.Sum(Soil.NO3N);
			NH4N = Utility.Math.Sum(Soil.NH4N);
			UreaN = Utility.Math.Sum(Soil.SoilNitrogen.urea);
			MineralN = NO3N + NH4N + UreaN; 
			DltNMinRes = Utility.Math.Sum(Soil.SoilNitrogen.dlt_n_min_res);
			DltNMinTot = Utility.Math.Sum(Soil.SoilNitrogen.MineralisedN);
            int layers = Soil.Thickness.Length;
			if (InitialDay == true)
			{
				InitialSurfaceOMN = SOM.N;
				InitialSoilOMN = OrganicN;
				InitialMineralN = MineralN;
				InitialDay = false;
			}
			AccumFert += Fert.NitrogenApplied;
			DeltaSurfaceOMN = SOM.N - InitialSurfaceOMN;
			AccumLeach = AccumLeach - Soil.SoilWater.LeachNH4 - Soil.SoilWater.LeachNO3 - Soil.SoilWater.LeachUrea; //Fails
            AccumMineralisation += Utility.Math.Sum(Soil.SoilNitrogen.MineralisedN);
            AccumDenit -= Utility.Math.Sum(Soil.SoilNitrogen.Denitrification);
			AccumPlantN -= (double)zone.Get("Maize.Root.NUptake");
			DeltaSoilOMN = OrganicN - InitialSoilOMN;
			DeltaSoilMineralN = MineralN - InitialMineralN;
			SoilNitrogenContent = MineralN;
			
			//!!!!!! Water balance components !!!!!!
			//!!!!!!^^^^^^^^^^^^^^^^^^^^^^^^^^!!!!!!

			AccumIrrigation += Irrig.IrrigationApplied;
			AccumRainfall += Met.Rain;
			//AccumEP -= (double)zone.Get("[Maize].Leaf.Transpiration");
            AccumEP -= (double)zone.Get("Maize.Root.WaterUptake");
			SoilWaterDeficit =  (SWC - DUL);
			double OutFlowLat = Utility.Math.Sum(Soil.SoilWater.outflow_lat);
			AccumOutflowLat -= OutFlowLat;
		}
		
		[EventSubscribe("DoManagementCalculations")]
		private void OnDoManagementCalculations(object sender, EventArgs e)
		{
			FomN = Utility.Math.Sum(Soil.SoilNitrogen.FOMN);
			HumN = Utility.Math.Sum(Soil.SoilNitrogen.HumicN);
		    BiomN = Utility.Math.Sum(Soil.SoilNitrogen.MicrobialN);
			
			
			AccumEO -= Soil.SoilWater.Eo;
			AccumES -= Soil.SoilWater.Es; 
			AccumDrainage -= Soil.SoilWater.Drainage;
			AccumRunoff -= Soil.SoilWater.Runoff;
			SWC = Utility.Math.Sum(Soil.SoilWater.SWmm);
			DUL = Utility.Math.Sum(Soil.SoilWater.DULmm);
		}
	}
}
```
  Experiment Lincoln2008
    Factors
      Factor Sow: Specifications=[SowDate]
        Operations Late39G12
          2008-08-27  [Maize].Sow(population:10.52, cultivar:"Pioneer_3153", depth:50, rowSpacing:800);
        Operations Early39G12
          2008-09-17  [Maize].Sow(population:10.52, cultivar:"Pioneer_3153", depth:50, rowSpacing:800);
        Operations Late34K77
          2008-08-27  [Maize].Sow(population:10.52, cultivar:"Pioneer_3153", depth:50, rowSpacing:800);
        Operations Early34K77
          2008-09-17  [Maize].Sow(population:10.52, cultivar:"Pioneer_3153", depth:50, rowSpacing:800);
      Factor Cover: Specifications=[Fert]
        Operations Bare
          2008-09-16  [Fertiliser].Apply(140.5, Fertiliser.Types.UreaN, 10);
          2008-12-17  [Fertiliser].Apply(161, Fertiliser.Types.UreaN, 10);
        Operations Plastic
          2008-09-16  [Fertiliser].Apply(140.5, Fertiliser.Types.UreaN, 10);
          2008-12-17  [Fertiliser].Apply(161, Fertiliser.Types.UreaN, 10);
    Simulation Lincoln2008: Area=0; Slope=0
      Weather: FileName=%root%\Tests\Maize\lincoln.met
      Clock: StartDate=2008-06-01; EndDate=2009-06-15
      Summary summaryfile
      Zone Field: Area=1; Slope=0
        Soil paparoa_silt_loam: SoilType=lignin_FOM; Region=Generic soil types; State=Canterbury; Latitude=999999; Longitude=999999
          DataSource=Profile descriptions provided by Trevor Webb and data for functional horizions based on SWAMP project results
          InitialWater Initial water: PercentMethod=EvenlyDistributed; FractionFull=0.8
          Water: same as Lincoln2010.Lincoln2010.Field.paparoa_silt_loam.Water
          SoilWater: same as Lincoln2010.Lincoln2010.Field.paparoa_silt_loam.SoilWater
          SoilNitrogen: fom_type=[default, manure, mucuna, lablab, shemp, stable]; fract_carb=[0.2, 0.3, 0.54, 0.57, 0.45, 0]; fract_cell=[0.7, 0.3, 0.37, 0.37, 0.47, 0.1]; fract_lign=[0.1, 0.4, 0.09, 0.06, 0.08, 0.9]; wfpsN2N2O_x=[22, 88]; wfpsN2N2O_y=[0.1, 1]
          SoilOrganicMatter: same as Lincoln2012.Lincoln2012.RainShelter.paparoa_silt_loam.SoilOrganicMatter
          Analysis: Thickness=[200, 200, 200, 300, 300, 300]; PH=[6, 6, 6, 6, 6, 6]; PHUnits=Water; BoronUnits=HotWater
          Sample Initial nitrogen: NO3Units=ppm; NH4Units=ppm; SWUnits=Volumetric; OCUnits=Total; PHUnits=Water
            Thickness  NO3       NH4
            200        6.18993   0.343249
            200        3.64993   0.990502
            200        2.44535   0.178014
            300        1.35913   0.194444
            300        0.968254  0.166667
            300        0.345238  0.107143
        Irrigation
        SurfaceOrganicMatter: same as Lincoln2010.Lincoln2010.Field.SurfaceOrganicMatter
        Fertiliser
        MicroClimate: same as Lincoln2012.Lincoln2012.RainShelter.MicroClimate
        Report: same as Lincoln2010.Lincoln2010.Field.Report
        Manager ExtraVariables: same as Lincoln2010.Lincoln2010.Field.ExtraVariables
        Arbitrator: ArbitrationMethod=Old; NutrientUptakeMethod=2
        Plant Maize: CropType=Maize
        Operations Fert
          2008-09-16  [Fertiliser].Apply(140.5, Fertiliser.Types.UreaN, 10);
          2008-12-17  [Fertiliser].Apply(161, Fertiliser.Types.UreaN, 10);
        Operations Irrig
          2008-10-21  [Irrigation].Apply(15);
          2008-10-29  [Irrigation].Apply(10);
          2008-11-18  [Irrigation].Apply(10);
          2008-11-27  [Irrigation].Apply(30);
          2008-12-02  [Irrigation].Apply(25);
          2008-12-09  [Irrigation].Apply(25);
          2008-12-30  [Irrigation].Apply(30);
          2009-01-06  [Irrigation].Apply(25);
          2009-01-13  [Irrigation].Apply(10);
          2009-01-26  [Irrigation].Apply(25);
          2009-01-29  [Irrigation].Apply(25);
          2009-02-04  [Irrigation].Apply(20);
          2009-02-10  [Irrigation].Apply(25);
          2009-03-18  [Irrigation].Apply(30);
        Operations SowDate
          2008-09-17  [Maize].Sow(population:10.52, cultivar:"Pioneer_3153", depth:50, rowSpacing:800);
  Simulation Lincoln20121: Area=0; Slope=0
    Memo
      <?xml version="1.0" encoding="UTF-8"?>
      <!DOCTYPE html PUBLIC "-//W3C//DTD XHTML 1.1//EN" "http://www.w3.org/TR/xhtml11/DTD/xhtml11.dtd">
    Weather: FileName=%root%\Tests\Maize\lincoln.met
    Clock: StartDate=2012-10-01; EndDate=2013-04-15
    Summary summaryfile
    Zone RainShelter: Area=1; Slope=0
      Soil paparoa_silt_loam: SoilType=lignin_FOM; Region=Generic soil types; State=Canterbury; Latitude=999999; Longitude=999999
        DataSource=Profile descriptions provided by Trevor Webb and data for functional horizions based on SWAMP project results
        InitialWater Initial water: PercentMethod=EvenlyDistributed; FractionFull=0.24
        Water: same as Lincoln2010.Lincoln2010.Field.paparoa_silt_loam.Water
        SoilWater: same as Lincoln2010.Lincoln2010.Field.paparoa_silt_loam.SoilWater
        SoilNitrogen: fom_type=[default, manure, mucuna, lablab, shemp, stable]; fract_carb=[0.2, 0.3, 0.54, 0.57, 0.45, 0]; fract_cell=[0.7, 0.3, 0.37, 0.37, 0.47, 0.1]; fract_lign=[0.1, 0.4, 0.09, 0.06, 0.08, 0.9]; wfpsN2N2O_x=[22, 88]; wfpsN2N2O_y=[0.1, 1]
        SoilOrganicMatter: same as Lincoln2012.Lincoln2012.RainShelter.paparoa_silt_loam.SoilOrganicMatter
        Analysis: Thickness=[200, 200, 200, 300, 300, 300]; PH=[6, 6, 6, 6, 6, 6]; PHUnits=Water; BoronUnits=HotWater
        Sample Initial nitrogen: same as Lincoln2012.Lincoln2012.RainShelter.paparoa_silt_loam.Initial nitrogen
      Plant Maize: CropType=Maize
      MicroClimate: same as Lincoln2012.Lincoln2012.RainShelter.MicroClimate
      Irrigation
      Fertiliser
      SurfaceOrganicMatter: same as Lincoln2012.Lincoln2012.RainShelter.SurfaceOrganicMatter
      Operations Irrig: same as Lincoln2012.Factors.Irrigation.Full
      Operations Fert
        2012-11-15  [Fertiliser].Apply(50, Fertiliser.Types.UreaN, 10);
        2012-12-20  [Fertiliser].Apply(100, Fertiliser.Types.UreaN, 10);
        2013-01-31  [Fertiliser].Apply(100, Fertiliser.Types.UreaN, 10);
      Operations Sow
        2012-10-15  [Maize].Sow(population:12, cultivar:"Pioneer_3153", depth:50, rowSpacing:710);
      Manager ExtraVariables: same as Lincoln2010.Lincoln2010.Field.ExtraVariables
      Arbitrator: ArbitrationMethod=Old; NutrientUptakeMethod=2
      Report: EventNames=[Clock].DoReport
        VariableNames:
          [Clock].Today
          [ExtraVariables].Script.AccumPlantN
          [ExtraVariables].Script.AccumMineralisation
          [ExtraVariables].Script.AccumDenit
          [ExtraVariables].Script.AccumFert
          [ExtraVariables].Script.AccumLeach
          [ExtraVariables].Script.AccumDetach
          [ExtraVariables].Script.DeltaSoilOMN
          [ExtraVariables].Script.DeltaSurfaceOMN
          [ExtraVariables].Script.DeltaSoilMineralN
          [Maize].Root.NSupply
          [Soil].SoilWater.Eo
          [Soil].SoilWater.Es
          [ExtraVariables].Script.SWC
          [ExtraVariables].Script.DUL
          [Soil].SoilWater.Drainage
          [Soil].SoilWater.Runoff
          [ExtraVariables].Script.OutFlowLat
          [Soil].SoilWater.pond
          [ExtraVariables].Script.AccumEO
          [ExtraVariables].Script.AccumEP
          [ExtraVariables].Script.AccumES
          [ExtraVariables].Script.AccumDrainage
          [ExtraVariables].Script.AccumRunoff
          [ExtraVariables].Script.AccumRainfall
          [ExtraVariables].Script.AccumIrrigation
          [ExtraVariables].Script.AccumOutflowLat
          [ExtraVariables].Script.SoilWaterDeficit
          [Maize].Grain.Live.Wt
          [Maize].Stem.Live.Wt
          [Maize].Spike.Live.N
          [Maize].Spike.Live.Wt
          [Maize].Grain.Live.N
          [Maize].Stem.Live.N
          [Maize].Leaf.Live.Wt
          [Maize].Root.Live.Wt
          [Maize].Leaf.Live.N
          [Maize].Root.Live.N
          [Maize].Leaf.Live.NConc
          [Maize].Root.Live.NConc
          [Maize].Root.WaterSupply
          [Maize].Root.WaterUptake
          [Maize].Leaf.Transpiration
          [Maize].Leaf.WaterDemand
          [Maize].Root.Depth
          [Maize].Leaf.CoverTotal
          [Maize].Leaf.CoverDead
          [Maize].Leaf.LAI
          [Maize].Leaf.Height
          [Maize].Husk.Live.Wt
          [Soil].SoilWater.SWmm
          [Soil].NO3N
          [ExtraVariables].Script.SoilNitrogenContent
          [Maize].Arbitrator.NDemand
          [Maize].Arbitrator.DMSupply
          [Maize].Arbitrator.DMDemand
          [Maize].Arbitrator.DMAllocated
          [Maize].Arbitrator.DMSinkLimitation
          [Maize].Arbitrator.DMNutrientLimitation
          [MicroClimate].net_radn
          [MicroClimate].peta
          [MicroClimate].petr
          [ExtraVariables].Script.FomN
          [ExtraVariables].Script.HumN
          [ExtraVariables].Script.BiomN
          [ExtraVariables].Script.DltNMinRes
          [ExtraVariables].Script.DltNMinTot
          [Maize].Leaf.Fw
          [Maize].Leaf.Fn
          [Maize].Phenology.CurrentPhaseName
          [Maize].Phenology.Stage
          [Maize].Summariser.AboveGroundLive.N
          [Maize].Summariser.AboveGroundLive.Wt
          [Maize].Summariser.Total.N
          [Maize].Summariser.Total.Wt
          [Maize].Phenology.Stage
          [Maize].Leaf.ExpandedCohortNo
          [Maize].Leaf.AppearedCohortNo
          [Maize].Leaf.CohortArea[1:30]
          [Maize].Leaf.InitialLeafValues.GrowthDuration.Value
          [Maize].Leaf.InitialLeafValues.LagDuration.Value
          [Maize].Leaf.InitialLeafValues.SenescenceDuration.Value
          [Maize].Structure.MainStemNodeAppearanceRate.Value
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