Simulations: Area=0
  Simulation OilPalm: Area=0
    WeatherFile: FileName=..\Potato\lincoln.met; MaxT=12.2; MinT=9.4; Rain=0.6; Radn=3.3; vp=11.8; wind=2.8; CO2=350
    Clock: StartDate=2003-10-20; EndDate=2004-05-23
    Summary
    Zone Field: Area=0
      Report: Events=[Clock].EndOfDay; AutoCreateCSV=false
        Variables:
          [Clock].Today
          [WeatherFile].MaxT
          [Soil].SoilWater.sw_dep
          [Soil].SoilWater.sw
          [Soil].SoilNitrogen.no3
          [OilPalm].BunchMass
      Soil: SoilType=Black Vertosol; LocalName=Waco; Site=Jimbour; NearestTown=Jimbour, Q 4352; Region=South East Queensland; NaturalVegetation=Grassland, mainly Qld bluegrass; Latitude=0; Longitude=0
        Water
          Thickness  BD    AirDry  LL15  DUL   SAT
          150        1.02  0.15    0.29  0.54  0.59
          150        1.03  0.26    0.29  0.53  0.58
          300        1.02  0.29    0.29  0.54  0.59
          300        1.02  0.29    0.29  0.54  0.58
          300        1.06  0.3     0.3   0.52  0.57
          300        1.11  0.31    0.31  0.5   0.55
          300        1.12  0.32    0.32  0.5   0.55
          300        1.15  0.33    0.33  0.48  0.53
          300        1.18  0.34    0.34  0.47  0.52
          300        1.2   0.35    0.35  0.46  0.51
          300        1.25  0.36    0.36  0.44  0.49
          SoilCrop Wheat
            LL=[0.29, 0.29, 0.32, 0.38, 0.39, 0.39, 0.41, 0.48, 0.47, 0.46, 0.44]
            KL=[0.1, 0.1, 0.08, 0.06, 0.04, 0.02, 0.01, 0, 0, 0, 0]
            XF=[1, 1, 1, 1, 1, 1, 1, 0, 0, 0, 0]
          SoilCrop Barley
            LL=[0.29, 0.29, 0.36, 0.43, 0.51, 0.5, 0.5, 0.48, 0.47, 0.46, 0.44]
            KL=[0.1, 0.1, 0.08, 0.06, 0.04, 0.02, 0.01, 0, 0, 0, 0]
            XF=[1, 1, 1, 1, 1, 1, 1, 0, 0, 0, 0]
          SoilCrop OilPalm
            LL=[0.29, 0.29, 0.36, 0.43, 0.51, 0.5, 0.5, 0.48, 0.47, 0.46, 0.44]
            KL=[0.1, 0.1, 0.08, 0.06, 0.04, 0.02, 0.01, 0, 0, 0, 0]
            XF=[1, 1, 1, 1, 1, 1, 1, 0, 0, 0, 0]
        SoilWater: min_crit_temp=5; max_crit_temp=35; max_albedo=0.23; A_to_evap_fact=0.44; canopy_eos_coef=1.7; sw_top_crit=0.9; sumes1_max=100; sumes2_max=25; solute_flow_eff=[1]; solute_flux_eff=[1]; gravity_gradient=2E-05; specific_bd=2.65; hydrol_effective_depth=450; immobile_solutes=[nh4]; canopy_fact=[1, 1, 0, 0]; canopy_fact_height=[0, 600, 1800, 30000]; canopy_fact_default=0.5; act_evap_method=ritchie; irrigation_will_runoff=false; irrigation_layer=1; SummerCona=3; SummerU=6; SummerDate=1-Nov; WinterCona=3; WinterU=6; WinterDate=1-Apr; DiffusConst=40; DiffusSlope=16; Salb=0.13; slope=0; discharge_width=0; catchment_area=0; max_pond=0; CN2Bare=73; CNRed=20; CNCov=0.8
          Thickness  SWCON  KLAT
          150        0.3    0
          150        0.3    0
          300        0.3    0
          300        0.3    0
          300        0.3    0
          300        0.3    0
          300        0.3    0
          300        0.3    0
          300        0.3    0
          300        0.3    0
          300        0.3    0
          mobile_solutes=[no3, urea, cl, br, org_n, org_c_pool1, org_c_pool2, org_c_pool3]
        SoilNitrogen: fom_type=[default, manure, mucuna, lablab, shemp, stable]; fract_carb=[0.2, 0.3, 0.54, 0.57, 0.45, 0]; fract_cell=[0.7, 0.3, 0.37, 0.37, 0.47, 0.1]; fract_lign=[0.1, 0.4, 0.09, 0.06, 0.08, 0.9]
        SoilOrganicMatter: RootCN=40; RootWt=200; SoilCN=12.5; EnrACoeff=7.4; EnrBCoeff=0.2; OCUnits=Total
          Thickness  OC    FBiom  FInert
          150        1.04  0.025  0.4
          150        0.89  0.02   0.6
          300        0.89  0.015  0.8
          300        0.89  0.01   0.9
          300        0.77  0.01   0.95
          300        0.45  0.01   0.95
          300        0.27  0.01   0.95
          300        0.22  0.01   0.95
          300        0.16  0.01   0.95
          300        0.13  0.01   0.95
          300        0.12  0.01   0.95
        Analysis: PHUnits=Water; BoronUnits=HotWater
          Thickness  EC    PH
          150        0.2   8.4
          150        0.25  8.8
          300        0.31  9
          300        0.4   9.2
          300        0.59  9.2
          300        0.84  9.1
          300        0.93  9
          300        1.01  9
          300        1.06  8.9
          300        1.05  8.9
          300        1.01  8.9
        InitialWater Initial water: FractionFull=1; PercentMethod=FilledFromTop
        Sample: NO3Units=kgha; NH4Units=kgha; SWUnits=Volumetric; OCUnits=Total; PHUnits=Water
          Thickness  NO3   NH4
          100        40    0.1
          200        30    0.1
          300        14    0.1
          300        14    0.1
          300        1.38  0.1
          300        1.38  0.1
      SurfaceOrganicMatter: crit_residue_wt=2000; opt_temp=20; cum_eos_max=20; cnrf_coeff=0.277; cnrf_optcn=25; c_fract=0.4; leach_rain_tot=25; min_rain_to_leach=10; crit_min_surfom_orgC=0.004; default_cpr=0; default_standing_fraction=0; standing_extinct_coeff=0.5; fractionFaecesAdded=0.5; PoolName=OilPalm; type=OilPalm; mass=1000; standing_fraction=0; cnr=80
        ResidueTypes:
          Name         fom_type       fraction_C  po4ppm  nh4ppm  no3ppm  specific_area  cf_contrib  pot_decomp_rate  fr_c             fr_n             fr_p
          ResidueType  wheat          0.4         0       0       0       0.0005         1           0.1              [0.2, 0.7, 0.1]  [0.2, 0.7, 0.1]  [0.2, 0.7, 0.1]
          ResidueType  lucerne        0.4         0       0       0       0.0002         1           0.1              [0.2, 0.7, 0.1]  [0.2, 0.7, 0.1]  [0.2, 0.7, 0.1]
          ResidueType  barley         0.4         0       0       0       0.0005         1           0.1              [0.2, 0.7, 0.1]  [0.2, 0.7, 0.1]  [0.2, 0.7, 0.1]
          ResidueType  tithonia       0.4         0       0       0       0.0005         1           0.1              [0.2, 0.7, 0.1]  [0.2, 0.7, 0.1]  [0.2, 0.7, 0.1]
          ResidueType  bambatsi       0.4         0       0       0       0.0005         1           0.1              [0.2, 0.7, 0.1]  [0.2, 0.7, 0.1]  [0.2, 0.7, 0.1]
          ResidueType  barley         0.4         0       0       0       0.0005         1           0.1              [0.2, 0.7, 0.1]  [0.2, 0.7, 0.1]  [0.2, 0.7, 0.1]
          ResidueType  broccoli       0.4         0       0       0       0.0004         1           0.1              [0.2, 0.7, 0.1]  [0.2, 0.7, 0.1]  [0.2, 0.7, 0.1]
          ResidueType  butterflypea   0.4         0       0       0       0.0004         1           0.1              [0.2, 0.7, 0.1]  [0.2, 0.7, 0.1]  [0.2, 0.7, 0.1]
          ResidueType  camaldulensis  0.4         0       0       0       0.0002         1           0.1              [0.2, 0.7, 0.1]  [0.2, 0.7, 0.1]  [0.2, 0.7, 0.1]
          ResidueType  canola         0.4         0       0       0       0.0002         1           0.1              [0.2, 0.7, 0.1]  [0.2, 0.7, 0.1]  [0.2, 0.7, 0.1]
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        TillageTypes
      OilPalm: plant_status=out; InitialRootDepth=1; MaximumRootDepth=10000; UnderstoryFW=1; CarbonStress=1; Age=1.18904; Population=4.63822
        zero: height, cover_tot, UnderstoryCoverMax, UnderstoryLegumeFraction, InterceptionFraction, UnderstoryCoverGreen, UnderstoryRootDepth, UnderstoryPEP, UnderstoryEP, UnderstoryDltDM, UnderstoryNFixation, DefoliationFraction
        SowingData={Cultivar=RussetBurbank, Population=4.63822, Depth=120, RowSpacing=150, MaxCover=1, BudNumber=1, CropClass=Plant, SkipRow=0, SkipPlant=0}
        Fronds:
          Mass      N            Area        Age
          33.2039   0.381812     0.099667    81.3469
          32.5628   0.374266     0.0980203   76.0969
          29.6788   0.340052     0.0906541   70.8469
          23.7262   0.266392     0.0753757   65.5969
          17.9254   0.187168     0.059232    60.3469
          13.3256   0.12659      0.0452633   55.0468
          11.8683   0.106174     0.0401559   49.7924
          11.7172   0.0895958    0.0389745   44.4582
          14.881    0.0676282    0.0488803   38.8744
          15.2365   0.0377293    0.0504355   33.6205
          10.0683   0.0160844    0.0341094   28.1874
          37.9225   0.426855     0.113816    52.5822
          37.0004   0.408697     0.111292    47.3322
          32.8463   0.3254       0.0999761   42.0822
          24.1875   0.15658      0.0763008   36.8322
          15.2829   0.0490777    0.0502284   31.5822
          8.55887   0.012285     0.0292363   26.2821
          6.27018   0.00799411   0.0216277   21.0277
          5.01576   0.00617919   0.0170526   15.7488
          2.22612   0.0026176    0.00746939  10.3486
          0.420834  0.000478696  0.00140094  5.0397
        Bunches:
          Mass     N         Age  FemaleFraction
          44.8173  0.270248  0    0.8
          44.8173  0.270248  0    0.8
          44.8173  0.270248  0    0.8
          44.8173  0.270248  0    0.8
          44.8173  0.270248  0    0.8
          29.7898  0.179633  0    0.178694
          0        0         0    0.0430029
          0        0         0    0.00308776
          0        0         0    0.000143689
          0        0         0    3.12891e-06
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        Roots:
          Mass       N            Length
          22.5306    0.0209263    0
          14.6204    0.0190774    0
          26.8496    0.0294499    0
          27.5271    0.021583     0
          27.2218    0.0142747    0
          26.9074    0.0119275    0
          25.1737    0.0110291    0
          0.0804843  0.000313889  0
          0.0804843  0.000313889  0
          0.0804843  0.000313889  0
          0.0804843  0.000313889  0
          0          0            0
          0          0            0
          0          0            0
          0          0            0
          0          0            0
          0          0            0
          0          0            0
          0          0            0
          0          0            0
          0          0            0
          0          0            0
        Constant cover_tot: Value=0.9
        Constant height: Value=10000
        VariableReference UnderstoryCoverMax
        VariableReference UnderstoryLegumeFraction
        Constant InterceptionFraction: Value=0
        Constant InitialRootDepth: Value=300
        Constant MaximumRootDepth: Value=5000
        Constant KNO3: Value=0.02
        Constant RootFraction: Value=0.1
        Constant RootNConcentration: Value=0.39
        Constant RootSenescenceRate: Value=0.001
        Constant InitialFrondNumber: Value=5
        AirTemperatureFunction RelativeDevelopmentalRate
          XYPairs: X=[13, 32, 35, 46]; Y=[0, 1, 1, 0]
        LinearInterpolationFunction FrondAppRate: XProperty=[OilPalm].Age
          XYPairs: X=[0, 2, 5, 10, 15]; Y=[5.25, 5.25, 7.725, 10.1, 10.1]
        Constant ExpandingFronds: Value=5
        Constant FrondMaximumNConcentration: Value=1.15
        Constant FrondCriticalNConcentration: Value=1.1
        Constant FrondMinimumNConcentration: Value=0.5
        SplineInterpolationFunction FrondMaxArea: XProperty=[OilPalm].Age
          XYPairs: X=[0, 2, 4.5, 8.5, 14]; Y=[0.1, 1, 7, 12, 14]
        LinearInterpolationFunction BunchSizeMax: XProperty=[OilPalm].Age
          XYPairs: X=[0, 2, 6, 10, 14]; Y=[53, 265, 7000, 11600, 12750]
        LinearInterpolationFunction HarvestFrondNumber: XProperty=[OilPalm].Age
          XYPairs: X=[0, 6, 10]; Y=[50, 40, 33]
        LinearInterpolationFunction FemaleFlowerFraction: XProperty=[OilPalm].Age
          XYPairs: X=[0, 4, 6, 8, 10]; Y=[0.8, 0.8, 0.8, 0.8, 0.8]
        LinearInterpolationFunction FFFStressImpact: XProperty=[OilPalm].CarbonStress
          XYPairs: X=[0, 1]; Y=[0.06, 0]
        LinearInterpolationFunction StemToFrondFraction: XProperty=[OilPalm].Age
          XYPairs: X=[0, 4, 7, 12]; Y=[0, 0.15, 0.25, 0.25]
        LinearInterpolationFunction StemNConcentration: XProperty=[OilPalm].Age
          XYPairs: X=[0, 8.5]; Y=[1.37, 0.351]
        Constant BunchOilConversionFactor: Value=1.55
        Constant RipeBunchWaterContent: Value=0.47
        Constant BunchNConcentration: Value=0.603
        LinearInterpolationFunction SpecificLeafArea: XProperty=[OilPalm].Age
          XYPairs: X=[1, 5, 13]; Y=[0.003, 0.003, 0.003]
        LinearInterpolationFunction SpecificLeafAreaMax: XProperty=[OilPalm].Age
          XYPairs: X=[1, 5, 13]; Y=[0.0035, 0.0035, 0.0035]
        LinearInterpolationFunction FlowerAbortionFraction: XProperty=[OilPalm].CarbonStress
          XYPairs: X=[0, 1]; Y=[0.15, 0]
        LinearInterpolationFunction BunchFailureFraction: XProperty=[OilPalm].CarbonStress
          XYPairs: X=[0, 1]; Y=[0.15, 0]
        LinearInterpolationFunction DirectExtinctionCoeff: XProperty=[OilPalm].Population
          XYPairs: X=[0.0056, 0.0186]; Y=[0.175, 0.35]
        LinearInterpolationFunction DiffuseExtinctionCoeff: XProperty=[OilPalm].Population
          XYPairs: X=[0.0056, 0.0186]; Y=[0.225, 0.45]
        Constant RUE: Value=1.22
        Constant RootFrontVelocity: Value=30
      Manager OilPalmSowingRule
        RowSpace = 280
        RowWidth = 770
        PlantingDepth = 120
        StemNumberPerSeedTuber = 2.2
        CultivarName = RussetBurbank
        SowingDate = 2003-10-20
```csharp
        using System;
        using Models.Core;
		using Models.PMF.OilPalm;
        namespace Models
        {
           [Serializable] 
           [System.Xml.Serialization.XmlInclude(typeof(Model))]
            public class Script : Model
            {      
               [Link] Clock Clock;
               [Link] OilPalm oilPalm;
			   
               [Description("Spacing (mm) between plants within rows")]
               public double RowSpace { get; set; }
               [Description("Spacing (mm) between rows")]
               public double RowWidth { get; set; }
               [Description("Depth (mm) tubers are planted")]
               public double PlantingDepth { get; set; }
               [Description("Cultivar")]
               public string CultivarName { get; set; }
               [Description("Sowing Date")]
               public DateTime SowingDate { get; set; }

               [EventSubscribe("StartOfDay")]
               private void OnStartOfDay(object sender, EventArgs e)
               {
				double PlantPopulation = 1/((RowWidth/1000)*(RowSpace/1000));

				if (Clock.Today.Date == SowingDate)
                    oilPalm.Sow(Population:PlantPopulation, Cultivar:CultivarName, Depth:PlantingDepth);
                //Plant.Sow(... Contains the following arguements:
                //Population  double  Required  Seeds sowing/m2
                //Cultivar    string  Required  "NameOfCultivar"
                //Depth       double  Optional  Depth (mm) seed sown.   Default is 100mm 
                //MaxCover    double  Optional  Proportion (0-1) of the ground row crop will cover.   Default is 1.0
                //BudNumber   double  Optional  Number of mainstems per seed sown.  Default is 1.0
                //RowSpacing  double  Optional  Spaceing (mm) between drill rows when crop is sown.  Default is 150mm
                //CropClass   string  Optional  Crop class to instantiate when crop is sown.  Default is "Plant"
			   }
            }
        }
```
  DataStore
  Tests
    Test:
      SimulationName  TableName  Type       ColumnNames               Parameters
      OilPalm         Report     Tolerance  Soil.SoilWater.sw_dep(1)  1,1
      OilPalm         Report     Tolerance  Soil.SoilNitrogen.no3(1)  1,1
      OilPalm         Report     Tolerance  OilPalm.BunchMass         1,1
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