Simulations
  Simulation RainEvapTest: Area=0; Slope=0
    Weather: FileName=%root%\Tests\Pond\Ingham.met
    Clock: StartDate=1990-01-01; EndDate=2000-12-31
    Summary summaryfile
    Zone AquaFarm: Area=1; Slope=0
      Pond PrawnPond: SurfaceArea=10000; MaxPondDepth=1
      Report: EventNames=[Clock].DoReport
        VariableNames:
          [Clock].Today
          [Weather].Rain as Rain
          [Pond].PondEvap as PondEvap
          [Pond].PondDepth as PondDepth
  Simulation RainDiluteEvapConcenTest: Area=0; Slope=0
    Weather: FileName=Ingham.met
    Clock: StartDate=1990-01-01; EndDate=2000-12-31
    Summary summaryfile
    Zone AquaFarm: Area=1; Slope=0
      Pond PrawnPond: SurfaceArea=10000; MaxPondDepth=1
      Folder Manager folder
        Manager Add water on fixed date
          added_date = 01-jan
          volume = 10000
          temperature = 15
          salinity = 5
          ph = 2
          n = 3
          p = 4
          tss = 10
```csharp
using System;
using Models.Core;
using APSIM.Shared.Utilities;
using Models.Aqua;

namespace Models
{
	[Serializable]
	[System.Xml.Serialization.XmlInclude(typeof(Model))]
	public class Script : Model
	{

		[Link] Clock Clock;
		[Link] Summary Summary;
		[Link] Pond Pond;
		
		
	    [Description("Add Water on this date (dd-mmm)")]
		public string added_date {get; set;}
		
		[Description("Volume of Water Added (m^3)")]
		public double volume {get; set;}
		
		[Description("Temperature of Water Added (oC)")]
		public double temperature {get; set;}
		
		[Description("Salinity of Water Added (kg/m^3)")]
		public double salinity {get; set;}
		
		[Description("PH of Water Added")]
		public double ph {get; set;}
		
		[Description("Nitrogen of Water Added (kg/m^3)")]
		public double n {get; set;}
	
	    [Description("Phosphorus of Water Added (kg/m^3)")]
		public double p {get; set;}
		
		[Description("Total Suspended Solids of Water Added (kg/m^3)")]
		public double tss {get; set;}


        
       [EventSubscribe("StartOfSimulation")]
		private void OnStartOfSimulation(object sender, EventArgs e)
		{
		}
        
        
        
		[EventSubscribe("StartOfDay")]
		private void OnStartOfDay(object sender, EventArgs e)
		{

        if (DateUtilities.DatesEqual(added_date, Clock.Today))
			{
			WaterProperties addedProps = new WaterProperties(temperature, salinity, ph, n, p, tss);
			Pond.Fill(Volume: volume, WaterProperties: addedProps);
			}

		}
      
	}
}
```
      Report: EventNames=[Clock].DoReport
        VariableNames:
          [Clock].Today
          [Weather].Rain as Rain
          [Pond].PondEvap as PondEvap
          [Pond].PondDepth as PondDepth
          [Pond].PondTemp as PondTemp
          [Pond].Salinity as Salinity
          [Pond].PH as PH
          [Pond].N as N
          [Pond].P as P
          [Pond].TSS as TSS
  Simulation MixingTest: Area=0; Slope=0
    Weather: FileName=%root%\Tests\Pond\Ingham.met
    Clock: StartDate=1990-01-01; EndDate=2000-12-31
    Summary summaryfile
    Zone AquaFarm: Area=1; Slope=0
      Pond PrawnPond: SurfaceArea=10000; MaxPondDepth=1
      Pond SettlingPond: SurfaceArea=10000; MaxPondDepth=1
      Folder Manager folder
        Manager Add water to PrawnPond on fixed date
          added_date = 01-jan
          volume = 10000
          temperature = 15
          salinity = 5
          ph = 2
          n = 3
          p = 4
          tss = 10
```csharp
using System;
using Models.Core;
using APSIM.Shared.Utilities;
using Models.Aqua;

namespace Models
{
	[Serializable]
	[System.Xml.Serialization.XmlInclude(typeof(Model))]
	public class Script : Model
	{

		[Link] Clock Clock;
		[Link] Summary Summary;
		[Link] Pond PrawnPond;
		
		
	    [Description("Add Water on this date (dd-mmm)")]
		public string added_date {get; set;}
		
		[Description("Volume of Water Added (m^3)")]
		public double volume {get; set;}
		
		[Description("Temperature of Water Added (oC)")]
		public double temperature {get; set;}
		
		[Description("Salinity of Water Added (kg/m^3)")]
		public double salinity {get; set;}
		
		[Description("PH of Water Added")]
		public double ph {get; set;}
		
		[Description("Nitrogen of Water Added (kg/m^3)")]
		public double n {get; set;}
	
	    [Description("Phosphorus of Water Added (kg/m^3)")]
		public double p {get; set;}
		
		[Description("Total Suspended Solids of Water Added (kg/m^3)")]
		public double tss {get; set;}


        
       [EventSubscribe("StartOfSimulation")]
		private void OnStartOfSimulation(object sender, EventArgs e)
		{
		}
        
        
        
		[EventSubscribe("StartOfDay")]
		private void OnStartOfDay(object sender, EventArgs e)
		{

        if (DateUtilities.DatesEqual(added_date, Clock.Today))
			{
			WaterProperties addedProps = new WaterProperties(temperature, salinity, ph, n, p, tss);
			PrawnPond.Fill(Volume: volume, WaterProperties: addedProps);
			}

		}
      
	}
}
```
        Manager Add water on SettlingPond on fixed date
          added_date = 01-jan
          volume = 5000
          temperature = 10
          salinity = 0
          ph = 0
          n = 0
          p = 0
          tss = 0
```csharp
using System;
using Models.Core;
using APSIM.Shared.Utilities;
using Models.Aqua;

namespace Models
{
	[Serializable]
	[System.Xml.Serialization.XmlInclude(typeof(Model))]
	public class Script : Model
	{

		[Link] Clock Clock;
		[Link] Summary Summary;
		[Link] Pond SettlingPond;
		
		
	    [Description("Add Water on this date (dd-mmm)")]
		public string added_date {get; set;}
		
		[Description("Volume of Water Added (m^3)")]
		public double volume {get; set;}
		
		[Description("Temperature of Water Added (oC)")]
		public double temperature {get; set;}
		
		[Description("Salinity of Water Added (kg/m^3)")]
		public double salinity {get; set;}
		
		[Description("PH of Water Added")]
		public double ph {get; set;}
		
		[Description("Nitrogen of Water Added (kg/m^3)")]
		public double n {get; set;}
	
	    [Description("Phosphorus of Water Added (kg/m^3)")]
		public double p {get; set;}
		
		[Description("Total Suspended Solids of Water Added (kg/m^3)")]
		public double tss {get; set;}


        
       [EventSubscribe("StartOfSimulation")]
		private void OnStartOfSimulation(object sender, EventArgs e)
		{
		}
        
        
        
		[EventSubscribe("StartOfDay")]
		private void OnStartOfDay(object sender, EventArgs e)
		{

        if (DateUtilities.DatesEqual(added_date, Clock.Today))
			{
			WaterProperties addedProps = new WaterProperties(temperature, salinity, ph, n, p, tss);
			SettlingPond.Fill(Volume: volume, WaterProperties: addedProps);
			}

		}
      
	}
}
```
        Manager Transfer water from PrawnPond to SettlingPond
          added_date = 02-jan
          volume = 5000
```csharp
using System;
using Models.Core;
using APSIM.Shared.Utilities;
using Models.Aqua;

namespace Models
{
	[Serializable]
	[System.Xml.Serialization.XmlInclude(typeof(Model))]
	public class Script : Model
	{

		[Link] Clock Clock;
		[Link] Summary Summary;
		[Link] Pond PrawnPond;
		[Link] Pond SettlingPond;
		
		
	    [Description("Transfer Water on this date (dd-mmm)")]
		public string added_date {get; set;}
		
		[Description("Volume of Water Transfered (m^3)")]
		public double volume {get; set;}
		


        
       [EventSubscribe("StartOfSimulation")]
		private void OnStartOfSimulation(object sender, EventArgs e)
		{
		}
        
        
        
		[EventSubscribe("StartOfDay")]
		private void OnStartOfDay(object sender, EventArgs e)
		{

        if (DateUtilities.DatesEqual(added_date, Clock.Today))
			{
			
			PrawnPond.Empty(volume);
			SettlingPond.Fill(Volume: volume, WaterProperties: PrawnPond.PondProps);
			
			}

		}
      
	}
}
```
      Report: EventNames=[Clock].DoReport
        VariableNames:
          [Clock].Today
          [Weather].Rain as Rain
          PrawnPond.PondEvap as P_PondEvap
          PrawnPond.PondDepth as P_PondDepth
          PrawnPond.PondTemp as P_PondTemp
          PrawnPond.Salinity as P_Salinity
          PrawnPond.PH as P_PH
          PrawnPond.N as P_N
          PrawnPond.P as P_P
          PrawnPond.TSS as P_TSS
          SettlingPond.PondEvap as S_PondEvap
          SettlingPond.PondDepth as S_PondDepth
          SettlingPond.PondTemp as S_PondTemp
          SettlingPond.Salinity as S_Salinity
          SettlingPond.PH as S_PH
          SettlingPond.N as S_N
          SettlingPond.P as S_P
          SettlingPond.TSS as S_TSS
  Simulation EvapTest: Area=0; Slope=0
    Weather: FileName=%root%\Tests\Pond\Ingham.met
    Clock: StartDate=1990-01-01; EndDate=2000-12-31
    Summary summaryfile
    Zone AquaFarm: Area=1; Slope=0
      Pond PrawnPond: SurfaceArea=10000; MaxPondDepth=1
      MicroClimate: air_pressure=1010; soil_emissivity=0.96; sun_angle=15; soil_heat_flux_fraction=0.4; night_interception_fraction=0.5; windspeed_default=3; refheight=2; albedo=0.15; emissivity=0.96; gsmax=0.01; r50=200; a_interception=0; b_interception=1; c_interception=0; d_interception=0; soil_albedo=0.3
      Report: EventNames=[Clock].DoReport
        VariableNames:
          [Clock].Today
          [Weather].Rain as Rain
          [Pond].PondEvap as PondEvap
          [Pond].PondDepth as PondDepth
  DataStore
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