Simulations: Version=27
  Simulation Feedlot
    Clock: StartDate=1999-01-01; EndDate=2000-12-31
    Summary SummaryFile
    Weather: FileName=Dalby.met
    Zone Feedlot: Area=10; Slope=0
      Report: VariableNames=[Clock].Today
      Soil: ASCOrder=Vertosol; ASCSubOrder=Black; SoilType=Clay; Site=Norwin; NearestTown=Norwin; Region=Darling Downs and Granite Belt; State=Queensland; Country=Australia; NaturalVegetation=Qld. Bluegrass, possible Qld. Blue gum; ApsoilNumber=900; Latitude=-27.581836; Longitude=151.320206; LocationAccuracy=+/- 20m
        DataSource=CSIRO Sustainable Ecosystems, Toowoomba; Characteriesd as part of the GRDC funded project"Doing it better, doing it smarter, managing soil water in Australian agriculture' 2011
        Comments=OC, CLL for all crops estimated-based on Bongeen Mywybilla Soil No1
        Water
          Thickness  BD       AirDry    LL15      DUL       SAT       KS
          150        1.01056  0.13025   0.2605    0.521     0.588655  20
          150        1.07146  0.198689  0.248362  0.496723  0.565677  20
          300        1.09394  0.28      0.28      0.488438  0.557193  20
          300        1.15861  0.28      0.28      0.480297  0.532787  20
          300        1.17301  0.28      0.28      0.471584  0.527354  20
          300        1.16287  0.28      0.28      0.457071  0.53118   20
          300        1.1875   0.28      0.28      0.452332  0.521888  20
          SoilCrop WheatSoil: LL=[0.261, 0.248, 0.28, 0.306, 0.36, 0.392, 0.446]; KL=[0.06, 0.06, 0.06, 0.04, 0.04, 0.02, 0.01]; XF=[1, 1, 1, 1, 1, 1, 1]
        SoilWater: SummerDate=1-Nov; SummerU=5; SummerCona=5; WinterDate=1-Apr; WinterU=5; WinterCona=5; DiffusConst=40; DiffusSlope=16; Salb=0.12; CN2Bare=73; CNRed=20; CNCov=0.8; max_pond=0; Thickness=[150, 150, 300, 300, 300, 300, 300]; SWCON=[0.3, 0.3, 0.3, 0.3, 0.3, 0.3, 0.3]; residueinterception=0
        SoilNitrogen: fom_type=[default, manure, mucuna, lablab, shemp, stable]; fract_carb=[0.2, 0.3, 0.54, 0.57, 0.45, 0]; fract_cell=[0.7, 0.3, 0.37, 0.37, 0.47, 0.1]; fract_lign=[0.1, 0.4, 0.09, 0.06, 0.08, 0.9]
        SoilOrganicMatter: RootCN=40; RootWt=1000; SoilCN=12; EnrACoeff=7.4; EnrBCoeff=0.2; OCUnits=Total
          Thickness  OC    FBiom  FInert
          150        1.2   0.04   0.4
          150        0.96  0.02   0.6
          300        0.6   0.02   0.8
          300        0.3   0.02   1
          300        0.18  0.01   1
          300        0.12  0.01   1
          300        0.12  0.01   1
        Analysis: Thickness=[150, 150, 300, 300, 300, 300, 300]; PH=[8, 8, 8, 8, 8, 8, 8]; PHUnits=Water; BoronUnits=HotWater
        InitialWater: PercentMethod=EvenlyDistributed; FractionFull=1
        Sample InitialN: NO3Units=ppm; NH4Units=ppm; SWUnits=Volumetric; OCUnits=Total; PHUnits=Water
          Thickness  NO3  NH4
          150        1    0.1
          150        1    0.1
          300        1    0.1
          300        1    0.1
          300        1    0.1
          300        1    0.1
          300        1    0.1
        CERESSoilTemperature
      SurfaceOrganicMatter: PoolName=wheat_stubble; type=wheat; mass=0; standing_fraction=0; cnr=100; CriticalResidueWeight=2000; OptimumDecompTemp=20; MaxCumulativeEOS=20; CNRatioDecompCoeff=0.277; CNRatioDecompThreshold=25; TotalLeachRain=25; MinRainToLeach=10; CriticalMinimumOrganicC=0.004; DefaultCPRatio=0; DefaultStandingFraction=0; StandingExtinctCoeff=0.5; FractionFaecesAdded=0.5
        Pools:
          {PoolName=wheat_stubble, ResidueType=wheat, Mass=0, CNRatio=100, StandingFraction=0}
        ResidueTypes: LoadFromResource=ResidueTypes
      MicroClimate: a_interception=0; b_interception=1; c_interception=0; d_interception=0; soil_albedo=0.3; sun_angle=15; soil_heat_flux_fraction=0.4; night_interception_fraction=0.5; refheight=2; albedo=0.15; emissivity=0.96; RadIntTotal=0
      SoluteManager
    Supplement: SpoilageTime=0
      stores:
        IsRoughage  DMContent  DMD  MEContent  CPConc  ProtDg  PConc   SConc   EEConc  ADIP2CP  AshAlk  MaxPassage  Name            Stored
        true        0.85       0    0          0       0       0       0       0       0        0       0           fodder          0
        false       0.89       0.9  13.8       0.14    0.92    0.0038  0.0014  0.02    0.02     0.18    0           wheat, crushed  500000
    Stock: RandSeed=9999
      PaddockList:
        {Area=1, Slope=0}
    Manager ManageStock
```csharp
using System;
using Models.Core;
using Models.Utilities;
using Models.GrazPlan;
using APSIM.Shared.Utilities;

namespace Models
{
    [Serializable]
    public class Script : Model
    {
        [Link] Clock Calendar;
        [Link] Stock Animals;
        [Link] Supplement Feed;

        private double sale_age = 3.0;
        private int no_to_buy;
        private int group_count;
        private int g;
        
        [EventSubscribe("DoManagement")]
        private void OnDoManagement(object sender, EventArgs e)
        {
            // purchase animals annually
            if (DateUtilities.DatesEqual("01 JAN", Calendar.Today))
            {
                g = Animals.NoGroups + 1;
                no_to_buy = 500 - Animals.NumberAll;
                
                StockBuy purchase = new StockBuy();
                purchase.Genotype = "small merino";
                purchase.Number = no_to_buy;
                purchase.Sex = "wethers";
                purchase.Age = 12;
                purchase.Weight = 45.0;
                purchase.UseTag = g + 1;
                
                Animals.Buy(purchase);
                Animals.Move(g, "Feedlot");
            }

            // Shearing all animals
            if (DateUtilities.DatesEqual("15 Dec", Calendar.Today))
            {
                Animals.Shear(0, "");
            }
            
            // Sell cast for age animals
            if (DateUtilities.DatesEqual("20 Dec", Calendar.Today))
            {
                group_count = Animals.NoGroups;
                for (g = 1; g <= group_count; g++)
                {
                    StockSplit split = new StockSplit();
                    split.Group = g;
                    split.Type = "age";
                    split.Value = 365 * sale_age;
                    Animals.Split(split);                   // older animals into a new group
                }

                for (g = 1; g <= Animals.NoGroups; g++)
                {
                    if (Animals.Age[g - 1] >= 365 * sale_age)
                        Animals.Sell(g, Animals.Number[g - 1]);
                }
            }
            
            if (Animals.NumberAll > 0)
                Feed.Feed("wheat, crushed", 0.5 * Animals.NumberAll, "Feedlot");
        }
    }
}
```
    Report Report1: EventNames=[Clock].EndOfDay
      VariableNames:
        [Clock].Today
        [Stock].Number[1]
        [Stock].NumberAll
        [Stock].Weight[1]
        [Stock].WeightAll
        [Stock].CondScoreAll
        [Stock].CondScore[1]
        [Stock].FleeceWt[1]
        [Stock].FibreDiam[1]
        [Stock].DSEAll
        [Stock].Intake[1].weight
        [Stock].Intake[1].n
        [Stock].Intake[1].p
        [Stock].Intake[1].s
        [Stock].Intake[1].ash_alk
        [Stock].UrineN[1]
        [Stock].Methane[1]
        [Supplement].stores[2].Name
        [Supplement].stores[2].Stored
  DataStore
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