Simulations: Version=163
  DataStore
  Simulation BiomassRemoveHarvestTest
    Weather: FileName=%root%\Tests\WeatherFiles\lincoln.met
    Clock: Start=2010-10-01; End=2013-07-31
    Summary
    SoilArbitrator Soil Arbitrator
    Zone Field: Area=1; Slope=0; AspectAngle=0; Altitude=50
      Soil: Latitude=0; Longitude=0
        Chemical: Thickness=[100, 200, 300, 300, 300, 300]; PH=[6.6, 6.2, 5.7, 5.5, 5.5, 5.5]; PHUnits=Water
        Water: Thickness=[100, 200, 300, 300, 300, 300]; InitialValues=[0.33, 0.33, 0.31, 0.31, 0.31, 0.31]; InitialPAWmm=366; RelativeTo=LL15; FilledFromTop=false
        Physical
          Thickness  BD   AirDry  LL15  DUL   SAT
          100        1.2  0.08    0.13  0.33  0.5
          200        1.2  0.13    0.13  0.33  0.5
          300        1.2  0.1     0.1   0.31  0.44
          300        1.2  0.06    0.06  0.31  0.46
          300        1.2  0.04    0.04  0.31  0.44
          300        1.2  0.02    0.02  0.31  0.44
          SoilCrop SCRUMSoil: LL=[0.13, 0.13, 0.1, 0.08, 0.11, 0.11]; KL=[0.1, 0.1, 0.1, 0.1, 0.1, 0.1]; XF=[1, 1, 1, 1, 1, 1]
          SoilCrop PotatoSoil: LL=[0.13, 0.13, 0.27, 0.27, 0.3, 0.3]; KL=[0.1, 0.06, 0.03, 0.01, 0, 0]; XF=[1, 1, 0.1, 0, 0, 0]
        WaterBalance SoilWater: SummerDate=1-Nov; SummerU=9; SummerCona=4.4; WinterDate=1-Apr; WinterU=9; WinterCona=4.4; DiffusConst=88; DiffusSlope=35.4; Salb=0.18; CN2Bare=68; CNRed=20; CNCov=0.8; DischargeWidth=0; CatchmentArea=0; PSIDul=-100
          Thickness  SWCON  KLAT
          100        0.55   0
          200        0.55   0
          300        0.55   0
          300        0.55   0
          300        0.55   0
          300        0.55   0
        SoilNitrogen: fom_types=[default, manure, mucuna, lablab, shemp, stable]; fract_carb=[0.2, 0.3, 0.54, 0.57, 0.45, 0]; fract_cell=[0.7, 0.3, 0.37, 0.37, 0.47, 0.1]; fract_lign=[0.1, 0.4, 0.09, 0.06, 0.08, 0.9]; NPartitionApproach=0
        Organic: FOMCNRatio=30; CarbonUnits=Total
          Thickness  Carbon  SoilCNRatio  FBiom  FInert  FOM
          100        1.82    11.5         0.025  0.3     1243.93
          200        1.47    11.5         0.025  0.4     833.832
          300        1.2     11.5         0.015  0.75    457.617
          300        1.03    11.5         0.01   0.9     251.145
          300        0.47    11.5         0.01   0.96    137.831
          300        0.47    11.5         0.01   0.96    75.6435
        CERESSoilTemperature Temperature
        SoilNitrogenNO3 NO3: Thickness=[100, 200, 300, 300, 300, 300]; InitialValues=[225, 12.5, 1.38889, 1.38889, 0, 0]; InitialValuesUnits=ppm; WaterTableConcentration=0; D0=0; DepthConstant=0; MaxDepthSoluteAccessible=0; RunoffEffectivenessAtMovingSolute=0; MaxEffectiveRunoff=0
        SoilNitrogenNH4 NH4: Thickness=[100, 200, 300, 300, 300, 300]; InitialValues=[0, 0, 0, 0, 0, 0]; InitialValuesUnits=ppm; WaterTableConcentration=0; D0=0; DepthConstant=0; MaxDepthSoluteAccessible=0; RunoffEffectivenessAtMovingSolute=0; MaxEffectiveRunoff=0
        SoilNitrogenUrea Urea: Thickness=[100, 200, 300, 300, 300, 300]; InitialValues=[0, 0, 0, 0, 0, 0]; InitialValuesUnits=kg/ha; WaterTableConcentration=0; D0=0; DepthConstant=0; MaxDepthSoluteAccessible=0; RunoffEffectivenessAtMovingSolute=0; MaxEffectiveRunoff=0
      SurfaceOrganicMatter surface organic matter: InitialResidueName=wheat; InitialResidueType=wheat; InitialResidueMass=2000; InitialStandingFraction=0; InitialCPR=0; InitialCNR=80
      MicroClimate: a_interception=0; b_interception=1; c_interception=0; d_interception=0; SoilHeatFluxFraction=0.4; MinimumHeightDiffForNewLayer=0; NightInterceptionFraction=0.5; ReferenceHeight=2
      Plant SCRUM
      Irrigation
      Fertiliser
      Manager SowingAndHarvesting
        CultivarName = Green_Peas
        InitialRootDepth = 10
        SowingDate = 10/14/2010 00:00:00
        SowingDate2 = 09/14/2011 00:00:00
        SowingDate3 = 08/14/2012 00:00:00
        HarvestDate = 03/14/2011 00:00:00
        HarvestDate2 = 02/14/2012 00:00:00
        HarvestDate3 = 01/14/2013 00:00:00
        EndCropDate = 05/14/2011 00:00:00
        EndCropDate2 = 06/14/2012 00:00:00
        EndCropDate3 = 07/14/2013 00:00:00
```csharp
using Models.Soils;
using System.Xml.Serialization;
using Models.PMF.Interfaces;
using Models.PMF;
using Models.Core;
using System.Collections.Generic;
using System;
using Newtonsoft.Json;

namespace Models
{
    [Serializable] 
    [System.Xml.Serialization.XmlInclude(typeof(Model))]
    public class Script : Model
    {
        [Link] Plant MCSP;
        [Link] Clock Clock;

        [Description("Cultivar")]
        public string CultivarName { get; set; }
        [Description("Initial Root Depth")]
        public double InitialRootDepth { get; set; }
        [Description("Sowing Date")]
        public DateTime SowingDate { get; set; }
        [Description("Sowing Date2")]
        public DateTime SowingDate2 { get; set; }
        [Description("Sowing Date3")]
        public DateTime SowingDate3 { get; set; }
        [Description("Harvest Date")]
        public DateTime HarvestDate { get; set; }
        [Description("Harvest Date2")]
        public DateTime HarvestDate2 { get; set; }
        [Description("Harvest Date3")]
        public DateTime HarvestDate3 { get; set; }
        [Description("EndCrop Date")]
        public DateTime EndCropDate { get; set; }
        [Description("EndCrop Date2")]
        public DateTime EndCropDate2 { get; set; }
        [Description("EndCrop Date3")]
        public DateTime EndCropDate3 { get; set; }
        

        
        [EventSubscribe("StartOfSimulation")]
        private void OnSimulationCommencing(object sender, EventArgs e)
        {
           
        }
        
        [EventSubscribe("DoManagement")]
        private void OnDoManagement(object sender, EventArgs e)
        {
            var product = MCSP.FindChild<IHasDamageableBiomass>("Product");
            var stover = MCSP.FindChild<IHasDamageableBiomass>("Stover");

            //Set up  array of remove fractions to send with harvest method.  Each member in the array corresponds to an organ in the same order they are set up in.

            if (Clock.Today.Date == SowingDate)
                MCSP.Sow(cultivar: CultivarName, population: 1, depth: InitialRootDepth, rowSpacing: 150);
            else if (Clock.Today.Date == HarvestDate)
            {
                //Harvest without sending defoliation data to test defaults
                MCSP.Harvest();
            }
            else if (Clock.Today.Date == EndCropDate)
                MCSP.EndCrop();
            
            //Change fractions to remove
            if (Clock.Today.Date == SowingDate2)
                MCSP.Sow(cultivar: CultivarName, population: 1, depth: InitialRootDepth, rowSpacing: 150);
            else if (Clock.Today.Date == HarvestDate2)
            {
                //Harvest with manager specified removal fractions
            	product.RemoveBiomass(liveToRemove: 0.3, liveToResidue: 0.3);
            	stover.RemoveBiomass(liveToRemove: 0.1, liveToResidue: 0.7);
            	MCSP.Harvest(removeBiomassFromOrgans: false);
            }
            else if (Clock.Today.Date == EndCropDate2)
                MCSP.EndCrop();
            
            //Change fractions to remove
            if (Clock.Today.Date == SowingDate3)
                MCSP.Sow(cultivar: CultivarName, population: 1, depth: InitialRootDepth, rowSpacing: 150);
            else if (Clock.Today.Date == HarvestDate3)
            {
            	product.RemoveBiomass(liveToRemove: 0.5, liveToResidue: 0.3);
            	stover.RemoveBiomass(liveToRemove: 0.3, liveToResidue: 0.7);
            	MCSP.Harvest(removeBiomassFromOrgans: false);
            }
            else if (Clock.Today.Date == EndCropDate3)
                MCSP.EndCrop();
            //PMFCrop.Sow(... Contains the following arguements:
            //Population  double  Optional  Seeds sowing/m2.  Default is zero
            //Cultivar    string  Required  "NameOfCultivar"
            //Depth       double  Optional  Depth (mm) seed sown.   Default is 100mm 
            //MaxCover    double  Optional  Proportion (0-1) of the ground row crop will cover.   Default is 1.0
            //BudNumber   double  Optional  Number of mainstems per seed sown.  Default is 1.0
            //RowSpacing  double  Optional  Spaceing (mm) between drill rows when crop is sown.  Default is 150mm
            //CropClass   string  Optional  Crop class to instantiate when crop is sown.  Default is "Plant"
        }
    }
}
```
      Manager ExtraVariables
```csharp
using Newtonsoft.Json;
using Models.PMF.Organs;
using Models.Soils.Nutrients;
using Models.Interfaces;
using System;
using Models.Core;
using System.Collections.Generic;
using System.Text;
using Models.Soils;
using Models.PMF;
using Models;
using System.Xml.Serialization;
using APSIM.Shared.Utilities;
using Models.Climate;


namespace Models
{
    [Serializable] 
    public class Script : Model
    {
        [Link] private Clock Clock;
        [Link] private Weather Met;
        [Link] private Fertiliser Fert;
        [Link] private Irrigation Irrig;
        [Link] private Plant SCRUM;
        [Link] private Zone zone;
        [Link(ByName = true)]
        private ISolute Urea;
        [Link(ByName = true)]
        private ISolute NO3;
        [Link(ByName = true)]
        private ISolute NH4;
        [Link(ByName = true)]
        private SoilNitrogen SoilNitrogen;
        [Link] private Soils.Soil Soil;
        [Link] private Models.Surface.SurfaceOrganicMatter SOM;
        [Link(Type = LinkType.Path, Path = "[SCRUM].Root")]
        private Root root;
        [Link]
        private IPhysical soilPhysical;
        [Link]
        private ISoilWater waterBalance;
                    
        [JsonIgnore] public bool InitialDay { get; set; }
        
        [JsonIgnore] public double AccumPlantN { get; set; }
        [JsonIgnore] public double AccumMineralisation { get; set; }
        [JsonIgnore] public double AccumDenit { get; set; }
        [JsonIgnore] public double AccumFert { get; set; }
        [JsonIgnore] public double AccumLeach { get; set; }
        [JsonIgnore] public double AccumDetach { get; set; }
        [JsonIgnore] public double DeltaSoilOMN { get; set; }
        [JsonIgnore] public double DeltaSurfaceOMN { get; set; }
        [JsonIgnore] public double DeltaSoilMineralN { get; set; }
        [JsonIgnore] public double SoilNitrogenContent { get; set; }
        
        [JsonIgnore] public double AccumEO { get; set; }
        [JsonIgnore] public double AccumEP { get; set; }
        [JsonIgnore] public double AccumES { get; set; }
        [JsonIgnore] public double AccumDrainage { get; set; }
        [JsonIgnore] public double AccumRunoff { get; set; }
        [JsonIgnore] public double AccumOutflowLat { get; set; }
        [JsonIgnore] public double AccumIrrigation { get; set; }
        [JsonIgnore] public double AccumRainfall { get; set; }
        [JsonIgnore] public double SoilWaterDeficit { get; set; }
    
        [JsonIgnore] public double  InitialSoilOMN { get; set; }
        [JsonIgnore] public double  InitialSurfaceOMN { get; set; }
        [JsonIgnore] public double  InitialMineralN { get; set; }
        
        [JsonIgnore] public double SWC { get; set; }
        [JsonIgnore] public double DUL { get; set; }
        [JsonIgnore] public double OutFlowLat { get; set; }

        [JsonIgnore] public double FomN { get; set; }
        [JsonIgnore] public double BiomN { get; set; }
        [JsonIgnore] public double HumN { get; set; }
        [JsonIgnore] public double OrganicN { get; set; }
        [JsonIgnore] public double NO3N { get; set; }
        [JsonIgnore] public double NH4N { get; set; }
        [JsonIgnore] public double UreaN { get; set; }
        [JsonIgnore] public double MineralN { get; set; }
        [JsonIgnore] public double DltNMinRes { get; set; }
        [JsonIgnore] public double DltNMinTot { get; set; }
        
        [EventSubscribe("StartOfSimulation")]
        private void OnSimulationCommencing(object sender, EventArgs e)
        {
            InitialDay = true;
        }
        
        [EventSubscribe("DoManagement")]
        private void OnDoManagement(object sender, EventArgs e)
        {
            //!!!!!! Nitrogen balance components !!!!!!
            //!!!!!!^^^^^^^^^^^^^^^^^^^^^^^^^^^^^!!!!!!
            FomN = MathUtilities.Sum(SoilNitrogen.FOMN);
            HumN = MathUtilities.Sum(SoilNitrogen.HumicN);
            BiomN = MathUtilities.Sum(SoilNitrogen.MicrobialN);
            OrganicN = FomN + HumN + BiomN;
            NO3N = MathUtilities.Sum(NO3.kgha);
            NH4N = MathUtilities.Sum(NH4.kgha);
            UreaN = MathUtilities.Sum(Urea.kgha);
            MineralN = NO3N + NH4N + UreaN; 
            DltNMinRes = MathUtilities.Sum(SoilNitrogen.dlt_n_min_res);
            DltNMinTot = MathUtilities.Sum(SoilNitrogen.MineralisedN);
            int layers = soilPhysical.Thickness.Length;
            if (InitialDay == true)
            {
                InitialSurfaceOMN = SOM.N;
                InitialSoilOMN = OrganicN;
                InitialMineralN = MineralN;
                InitialDay = false;
            }
            DeltaSurfaceOMN = SOM.N - InitialSurfaceOMN;
            AccumLeach = AccumLeach - waterBalance.LeachNH4 - waterBalance.LeachNO3 - waterBalance.LeachUrea; //Fails
            AccumMineralisation += MathUtilities.Sum(SoilNitrogen.MineralisedN);
            AccumDenit -= MathUtilities.Sum(SoilNitrogen.Denitrification);
            //AccumPlantN -= (double)zone.Get("SCRUM.Root.NUptake");
            DeltaSoilOMN = OrganicN - InitialSoilOMN;
            DeltaSoilMineralN = MineralN - InitialMineralN;
            SoilNitrogenContent = MineralN;
            
            //!!!!!! Water balance components !!!!!!
            //!!!!!!^^^^^^^^^^^^^^^^^^^^^^^^^^!!!!!!

            AccumRainfall += Met.Rain;
            //AccumEP -= (double)zone.Get("[SCRUM].Stover.Transpiration");
            AccumEP -= (double)zone.Get("SCRUM.Root.WaterUptake");
            SoilWaterDeficit = (SWC - DUL);
            double OutFlowLat = MathUtilities.Sum(waterBalance.LateralOutflow);
            AccumOutflowLat -= OutFlowLat;
        }
        
        [EventSubscribe("DoManagementCalculations")]
        private void OnDoManagementCalculations(object sender, EventArgs e)
        {
            FomN = MathUtilities.Sum(SoilNitrogen.FOMN);
            HumN = MathUtilities.Sum(SoilNitrogen.HumicN);
            BiomN = MathUtilities.Sum(SoilNitrogen.MicrobialN);
            AccumFert += Fert.NitrogenApplied;
            AccumIrrigation += Irrig.IrrigationApplied;
            
            
            AccumEO -= waterBalance.Eo;
            AccumES -= waterBalance.Es; 
            AccumDrainage -= waterBalance.Drainage;
            AccumRunoff -= waterBalance.Runoff;
            SWC = MathUtilities.Sum(waterBalance.SWmm);
            DUL = MathUtilities.Sum(soilPhysical.DULmm);
        }
    }
}
```
      Report: EventNames=[Clock].DoReport
        VariableNames:
          [Clock].Today
          [ExtraVariables].Script.AccumPlantN
          [ExtraVariables].Script.AccumMineralisation
          [ExtraVariables].Script.AccumDenit
          [ExtraVariables].Script.AccumFert
          [ExtraVariables].Script.AccumLeach
          [ExtraVariables].Script.AccumDetach
          [ExtraVariables].Script.DeltaSoilOMN
          [ExtraVariables].Script.DeltaSurfaceOMN
          [ExtraVariables].Script.DeltaSoilMineralN
          [ExtraVariables].Script.SWC
          [ExtraVariables].Script.DUL
          [ExtraVariables].Script.OutFlowLat
          [ExtraVariables].Script.AccumEO
          [ExtraVariables].Script.AccumEP
          [ExtraVariables].Script.AccumES
          [ExtraVariables].Script.AccumDrainage
          [ExtraVariables].Script.AccumRunoff
          [ExtraVariables].Script.AccumRainfall
          [ExtraVariables].Script.AccumIrrigation
          [ExtraVariables].Script.AccumOutflowLat
          [ExtraVariables].Script.SoilWaterDeficit
          [ExtraVariables].Script.SoilNitrogenContent
          [ExtraVariables].Script.FomN
          [ExtraVariables].Script.HumN
          [ExtraVariables].Script.BiomN
          [ExtraVariables].Script.DltNMinRes
          [ExtraVariables].Script.DltNMinTot
          [Soil].SoilWater.Drainage
          [Soil].SoilWater.Runoff
          [Soil].SoilWater.Eo
          [Soil].SoilWater.Es
          [Soil].SoilWater.pond
          [Soil].Water.MM
          [Soil].NO3.kgha
          [SCRUM].Stover.Live.Wt
          [SCRUM].Root.Live.Wt
          [SCRUM].Product.Live.Wt
          [SCRUM].Stover.Live.N
          [SCRUM].Root.Live.N
          [SCRUM].Product.Live.N
          [SCRUM].Stover.Live.NConc
          [SCRUM].Root.Live.NConc
          [SCRUM].Product.Live.NConc
          [SCRUM].Root.WaterUptake
          [SCRUM].Stover.Transpiration
          [SCRUM].Stover.WaterDemand
          [SCRUM].Root.Depth
          [SCRUM].Stover.CoverTotal
          [SCRUM].Stover.CoverDead
          [SCRUM].Stover.LAI
          [SCRUM].Stover.Height
          [SCRUM].Arbitrator.N.TotalPlantDemand
          [SCRUM].Arbitrator.N.TotalPlantSupply
          [SCRUM].Stover.Fw
          [SCRUM].Stover.Fn
          [SCRUM].Total.Wt
          [SCRUM].Total.N
          [SCRUM].Arbitrator.DM.TotalFixationSupply
          [SCRUM].Arbitrator.DM.TotalPlantDemand
          [SCRUM].Arbitrator.DM.SinkLimitation
          [SCRUM].Arbitrator.DM.NutrientLimitation
          [SCRUM].Phenology.ThermalTime
          [SCRUM].Phenology.CurrentPhase.Name
          [SCRUM].Phenology.Stage
          [Irrigation].IrrigationApplied
          [Clock].Today
          [SCRUM].Arbitrator.FN
          [SurfaceOrganicMatter].wt
          sum([Soil].SoilNitrogen.FOMN)
  Simulation BiomassRemoveCutTest
    Weather: FileName=%root%\Tests\WeatherFiles\lincoln.met
    Clock: Start=2010-10-01; End=2013-07-31
    Summary
    SoilArbitrator Soil Arbitrator
    Zone Field: Area=1; Slope=0; AspectAngle=0; Altitude=50
      Soil: same as BiomassRemoveHarvestTest.Field.Soil
      SurfaceOrganicMatter surface organic matter: InitialResidueName=wheat; InitialResidueType=wheat; InitialResidueMass=2000; InitialStandingFraction=0; InitialCPR=0; InitialCNR=80
      MicroClimate: a_interception=0; b_interception=1; c_interception=0; d_interception=0; SoilHeatFluxFraction=0.4; MinimumHeightDiffForNewLayer=0; NightInterceptionFraction=0.5; ReferenceHeight=2
      Plant SCRUM
      Irrigation
      Fertiliser
      Manager SowingAndCutting
        CultivarName = Green_Peas
        InitialRootDepth = 10
        SowingDate = 10/14/2010 00:00:00
        SowingDate2 = 09/14/2011 00:00:00
        SowingDate3 = 08/14/2012 00:00:00
        CutDate = 03/14/2011 00:00:00
        CutDate2 = 02/14/2012 00:00:00
        CutDate3 = 01/14/2013 00:00:00
        EndCropDate = 05/14/2011 00:00:00
        EndCropDate2 = 06/14/2012 00:00:00
        EndCropDate3 = 07/14/2013 00:00:00
```csharp
using Models.PMF.Interfaces;
using Newtonsoft.Json;
using System;
using System.Collections.Generic;
using Models.Core;
using Models.PMF;
using Models.PMF.Interfaces;
using System.Xml.Serialization;
using Models.Soils;

namespace Models
{
    [Serializable] 
    [System.Xml.Serialization.XmlInclude(typeof(Model))]
    public class Script : Model
    {
        [Link] Plant MCSP;
        [Link] Clock Clock;

        [Description("Cultivar")]
        public string CultivarName { get; set; }
        [Description("Initial Root Depth")]
        public double InitialRootDepth { get; set; }
        [Description("Sowing Date")]
        public DateTime SowingDate { get; set; }
        [Description("Sowing Date2")]
        public DateTime SowingDate2 { get; set; }
        [Description("Sowing Date3")]
        public DateTime SowingDate3 { get; set; }
        [Description("Cut Date")]
        public DateTime CutDate { get; set; }
        [Description("Cut Date2")]
        public DateTime CutDate2 { get; set; }
        [Description("Cut Date3")]
        public DateTime CutDate3 { get; set; }
        [Description("EndCrop Date")]
        public DateTime EndCropDate { get; set; }
        [Description("EndCrop Date2")]
        public DateTime EndCropDate2 { get; set; }
        [Description("EndCrop Date3")]
        public DateTime EndCropDate3 { get; set; }
        

        
        [EventSubscribe("StartOfSimulation")]
        private void OnSimulationCommencing(object sender, EventArgs e)
        {
            
        }
        
        [EventSubscribe("DoManagement")]
        private void OnDoManagement(object sender, EventArgs e)
        {
            //Set up  array of remove fractions to send with Cut method.  Each member in the array corresponds to an organ in the same order they are set up in.

            if (Clock.Today.Date == SowingDate)
                MCSP.Sow(cultivar: CultivarName, population: 1, depth: InitialRootDepth, rowSpacing: 150);
            else if (Clock.Today.Date == CutDate)
            {
                //Cut without sending defoliation data to test defaults
                var Product = MCSP.FindChild<IHasDamageableBiomass>("Product");
                var Stover = MCSP.FindChild<IHasDamageableBiomass>("Stover");
                Product.RemoveBiomass(liveToRemove: 0.5, liveToResidue: 0.3);
                Stover.RemoveBiomass(liveToRemove: 0.3, liveToResidue: 0.7);

            }
            else if (Clock.Today.Date == EndCropDate)
                MCSP.EndCrop();
            
            //Change fractions to remove
            if (Clock.Today.Date == SowingDate2)
                MCSP.Sow(cultivar: CultivarName, population: 1, depth: InitialRootDepth, rowSpacing: 150);
            else if (Clock.Today.Date == CutDate2)
            {
                //Harvest with manager specified removal fractions
                var Product = MCSP.FindChild<IHasDamageableBiomass>("Product");
                var Stover = MCSP.FindChild<IHasDamageableBiomass>("Stover");
                var Root = MCSP.FindChild<IHasDamageableBiomass>("Root");
                Product.RemoveBiomass(liveToRemove: 0.8);
                Stover.RemoveBiomass(liveToRemove: 0.8);
                Root.RemoveBiomass(liveToResidue: 0.3);
            }
            else if (Clock.Today.Date == EndCropDate2)
                MCSP.EndCrop();
            
            //Change fractions to remove
            if (Clock.Today.Date == SowingDate3)
                MCSP.Sow(cultivar: CultivarName, population: 1, depth: InitialRootDepth, rowSpacing: 150);
            else if (Clock.Today.Date == CutDate3)
            {
                var Product = MCSP.FindChild<IHasDamageableBiomass>("Product");
                var Stover = MCSP.FindChild<IHasDamageableBiomass>("Stover");
                var Root = MCSP.FindChild<IHasDamageableBiomass>("Root");
                Product.RemoveBiomass(liveToRemove: 0.8);
                Stover.RemoveBiomass(liveToRemove: 0.8);
                Root.RemoveBiomass(liveToResidue: 0.3);
            }
            else if (Clock.Today.Date == EndCropDate3)
                MCSP.EndCrop();
            //PMFCrop.Sow(... Contains the following arguements:
            //Population  double  Optional  Seeds sowing/m2.  Default is zero
            //Cultivar    string  Required  "NameOfCultivar"
            //Depth       double  Optional  Depth (mm) seed sown.   Default is 100mm 
            //MaxCover    double  Optional  Proportion (0-1) of the ground row crop will cover.   Default is 1.0
            //BudNumber   double  Optional  Number of mainstems per seed sown.  Default is 1.0
            //RowSpacing  double  Optional  Spaceing (mm) between drill rows when crop is sown.  Default is 150mm
            //CropClass   string  Optional  Crop class to instantiate when crop is sown.  Default is "Plant"
        }
    }
}
```
      Manager ExtraVariables
```csharp
using Newtonsoft.Json;
using Models.PMF.Organs;
using Models.Soils.Nutrients;
using Models.Interfaces;
using System;
using Models.Core;
using System.Collections.Generic;
using System.Text;
using Models.Soils;
using Models.PMF;
using Models;
using System.Xml.Serialization;
using APSIM.Shared.Utilities;
using Models.Climate;


namespace Models
{
    [Serializable] 
    public class Script : Model
    {
        [Link] private Clock Clock;
        [Link] private Weather Met;
        [Link] private Fertiliser Fert;
        [Link] private Irrigation Irrig;
        [Link] private Plant SCRUM;
        [Link] private Zone zone;
        [Link(ByName = true)]
        private ISolute Urea;
        [Link(ByName = true)]
        private ISolute NO3;
        [Link(ByName = true)]
        private ISolute NH4;
        [Link(ByName = true)]
        private SoilNitrogen SoilNitrogen;
        [Link] private Soils.Soil Soil;
        [Link] private Models.Surface.SurfaceOrganicMatter SOM;
        [Link(Type = LinkType.Path, Path = "[SCRUM].Root")]
        private Root root;
        [Link]
        private IPhysical soilPhysical;
        [Link]
        private ISoilWater waterBalance;
                    
        [JsonIgnore] public bool InitialDay { get; set; }
        
        [JsonIgnore] public double AccumPlantN { get; set; }
        [JsonIgnore] public double AccumMineralisation { get; set; }
        [JsonIgnore] public double AccumDenit { get; set; }
        [JsonIgnore] public double AccumFert { get; set; }
        [JsonIgnore] public double AccumLeach { get; set; }
        [JsonIgnore] public double AccumDetach { get; set; }
        [JsonIgnore] public double DeltaSoilOMN { get; set; }
        [JsonIgnore] public double DeltaSurfaceOMN { get; set; }
        [JsonIgnore] public double DeltaSoilMineralN { get; set; }
        [JsonIgnore] public double SoilNitrogenContent { get; set; }
        
        [JsonIgnore] public double AccumEO { get; set; }
        [JsonIgnore] public double AccumEP { get; set; }
        [JsonIgnore] public double AccumES { get; set; }
        [JsonIgnore] public double AccumDrainage { get; set; }
        [JsonIgnore] public double AccumRunoff { get; set; }
        [JsonIgnore] public double AccumOutflowLat { get; set; }
        [JsonIgnore] public double AccumIrrigation { get; set; }
        [JsonIgnore] public double AccumRainfall { get; set; }
        [JsonIgnore] public double SoilWaterDeficit { get; set; }
    
        [JsonIgnore] public double  InitialSoilOMN { get; set; }
        [JsonIgnore] public double  InitialSurfaceOMN { get; set; }
        [JsonIgnore] public double  InitialMineralN { get; set; }
        
        [JsonIgnore] public double SWC { get; set; }
        [JsonIgnore] public double DUL { get; set; }
        [JsonIgnore] public double OutFlowLat { get; set; }

        [JsonIgnore] public double FomN { get; set; }
        [JsonIgnore] public double BiomN { get; set; }
        [JsonIgnore] public double HumN { get; set; }
        [JsonIgnore] public double OrganicN { get; set; }
        [JsonIgnore] public double NO3N { get; set; }
        [JsonIgnore] public double NH4N { get; set; }
        [JsonIgnore] public double UreaN { get; set; }
        [JsonIgnore] public double MineralN { get; set; }
        [JsonIgnore] public double DltNMinRes { get; set; }
        [JsonIgnore] public double DltNMinTot { get; set; }
        
        [EventSubscribe("StartOfSimulation")]
        private void OnSimulationCommencing(object sender, EventArgs e)
        {
            InitialDay = true;
        }
        
        [EventSubscribe("DoManagement")]
        private void OnDoManagement(object sender, EventArgs e)
        {
            //!!!!!! Nitrogen balance components !!!!!!
            //!!!!!!^^^^^^^^^^^^^^^^^^^^^^^^^^^^^!!!!!!
            FomN = MathUtilities.Sum(SoilNitrogen.FOMN);
            HumN = MathUtilities.Sum(SoilNitrogen.HumicN);
            BiomN = MathUtilities.Sum(SoilNitrogen.MicrobialN);
            OrganicN = FomN + HumN + BiomN;
            NO3N = MathUtilities.Sum(NO3.kgha);
            NH4N = MathUtilities.Sum(NH4.kgha);
            UreaN = MathUtilities.Sum(Urea.kgha);
            MineralN = NO3N + NH4N + UreaN; 
            DltNMinRes = MathUtilities.Sum(SoilNitrogen.dlt_n_min_res);
            DltNMinTot = MathUtilities.Sum(SoilNitrogen.MineralisedN);
            int layers = soilPhysical.Thickness.Length;
            if (InitialDay == true)
            {
                InitialSurfaceOMN = SOM.N;
                InitialSoilOMN = OrganicN;
                InitialMineralN = MineralN;
                InitialDay = false;
            }
            DeltaSurfaceOMN = SOM.N - InitialSurfaceOMN;
            AccumLeach = AccumLeach - waterBalance.LeachNH4 - waterBalance.LeachNO3 - waterBalance.LeachUrea; //Fails
            AccumMineralisation += MathUtilities.Sum(SoilNitrogen.MineralisedN);
            AccumDenit -= MathUtilities.Sum(SoilNitrogen.Denitrification);
            AccumPlantN -= (double)zone.Get("SCRUM.Root.NUptake");
            DeltaSoilOMN = OrganicN - InitialSoilOMN;
            DeltaSoilMineralN = MineralN - InitialMineralN;
            SoilNitrogenContent = MineralN;
            
            //!!!!!! Water balance components !!!!!!
            //!!!!!!^^^^^^^^^^^^^^^^^^^^^^^^^^!!!!!!

            AccumRainfall += Met.Rain;
            //AccumEP -= (double)zone.Get("[SCRUM].Stover.Transpiration");
            AccumEP -= (double)zone.Get("SCRUM.Root.WaterUptake");
            SoilWaterDeficit = (SWC - DUL);
            double OutFlowLat = MathUtilities.Sum(waterBalance.LateralOutflow);
            AccumOutflowLat -= OutFlowLat;
        }
        
        [EventSubscribe("DoManagementCalculations")]
        private void OnDoManagementCalculations(object sender, EventArgs e)
        {
            FomN = MathUtilities.Sum(SoilNitrogen.FOMN);
            HumN = MathUtilities.Sum(SoilNitrogen.HumicN);
            BiomN = MathUtilities.Sum(SoilNitrogen.MicrobialN);
            AccumFert += Fert.NitrogenApplied;
            AccumIrrigation += Irrig.IrrigationApplied;
            
            
            AccumEO -= waterBalance.Eo;
            AccumES -= waterBalance.Es; 
            AccumDrainage -= waterBalance.Drainage;
            AccumRunoff -= waterBalance.Runoff;
            SWC = MathUtilities.Sum(waterBalance.SWmm);
            DUL = MathUtilities.Sum(soilPhysical.DULmm);
        }
    }
}
```
      Report: same as BiomassRemoveHarvestTest.Field.Report
  Simulation BiomassRemovePrunTest
    Weather: FileName=%root%\Tests\WeatherFiles\lincoln.met
    Clock: Start=2010-10-01; End=2013-07-31
    Summary
    SoilArbitrator Soil Arbitrator
    Zone Field: Area=1; Slope=0; AspectAngle=0; Altitude=50
      Soil: same as BiomassRemoveHarvestTest.Field.Soil
      SurfaceOrganicMatter surface organic matter: InitialResidueName=wheat; InitialResidueType=wheat; InitialResidueMass=2000; InitialStandingFraction=0; InitialCPR=0; InitialCNR=80
      MicroClimate: a_interception=0; b_interception=1; c_interception=0; d_interception=0; SoilHeatFluxFraction=0.4; MinimumHeightDiffForNewLayer=0; NightInterceptionFraction=0.5; ReferenceHeight=2
      Plant SCRUM
      Irrigation
      Fertiliser
      Manager SowingAndPruning
        CultivarName = Green_Peas
        InitialRootDepth = 10
        SowingDate = 10/14/2010 00:00:00
        SowingDate2 = 09/14/2011 00:00:00
        SowingDate3 = 08/14/2012 00:00:00
        PruneDate = 03/14/2011 00:00:00
        PruneDate2 = 02/14/2012 00:00:00
        PruneDate3 = 01/14/2013 00:00:00
        EndCropDate = 05/14/2011 00:00:00
        EndCropDate2 = 06/14/2012 00:00:00
        EndCropDate3 = 07/14/2013 00:00:00
```csharp
using Models.PMF.Interfaces;
using Newtonsoft.Json;
using System;
using System.Collections.Generic;
using Models.Core;
using Models.PMF;
using Models.PMF.Interfaces;
using System.Xml.Serialization;
using Models.Soils;

namespace Models
{
    [Serializable] 
    [System.Xml.Serialization.XmlInclude(typeof(Model))]
    public class Script : Model
    {
        [Link] Plant MCSP;
        [Link] Clock Clock;

        [Description("Cultivar")]
        public string CultivarName { get; set; }
        [Description("Initial Root Depth")]
        public double InitialRootDepth { get; set; }
        [Description("Sowing Date")]
        public DateTime SowingDate { get; set; }
        [Description("Sowing Date2")]
        public DateTime SowingDate2 { get; set; }
        [Description("Sowing Date3")]
        public DateTime SowingDate3 { get; set; }
        [Description("Prune Date")]
        public DateTime PruneDate { get; set; }
        [Description("Prune Date2")]
        public DateTime PruneDate2 { get; set; }
        [Description("Prune Date3")]
        public DateTime PruneDate3 { get; set; }
        [Description("EndCrop Date")]
        public DateTime EndCropDate { get; set; }
        [Description("EndCrop Date2")]
        public DateTime EndCropDate2 { get; set; }
        [Description("EndCrop Date3")]
        public DateTime EndCropDate3 { get; set; }
        
		public event EventHandler Pruning;
        
        [EventSubscribe("StartOfSimulation")]
        private void OnSimulationCommencing(object sender, EventArgs e)
        {
            
        }
        
        [EventSubscribe("DoManagement")]
        private void OnDoManagement(object sender, EventArgs e)
        {
            //Set up  array of remove fractions to send with Prune method.  Each member in the array corresponds to an organ in the same order they are set up in.

            if (Clock.Today.Date == SowingDate)
                MCSP.Sow(cultivar: CultivarName, population: 1, depth: InitialRootDepth, rowSpacing: 150);
            else if (Clock.Today.Date == PruneDate)
            {
                //Prune without sending defoliation data to test defaults
                var Product = MCSP.FindChild<IHasDamageableBiomass>("Product");
                var Stover = MCSP.FindChild<IHasDamageableBiomass>("Stover");
                Product.RemoveBiomass(liveToRemove: 0.1, deadToRemove: 0.0, liveToResidue: 0.7, deadToResidue: 0.0);
                Stover.RemoveBiomass(liveToRemove: 0.3, deadToRemove: 0.0, liveToResidue: 0.3, deadToResidue: 0.0);

            }
            else if (Clock.Today.Date == EndCropDate)
                MCSP.EndCrop();
            
            //Change fractions to remove
            if (Clock.Today.Date == SowingDate2)
                MCSP.Sow(cultivar: CultivarName, population: 1, depth: InitialRootDepth, rowSpacing: 150);
            else if (Clock.Today.Date == PruneDate2)
            {
                //Harvest with manager specified removal fractions
                var Product = MCSP.FindChild<IHasDamageableBiomass>("Product");
                var Stover = MCSP.FindChild<IHasDamageableBiomass>("Stover");
                var Root = MCSP.FindChild<IHasDamageableBiomass>("Root");
                Product.RemoveBiomass(liveToResidue: 0.6);
                Stover.RemoveBiomass(liveToRemove: 0.6);
                Root.RemoveBiomass(liveToResidue: 0.1);
                Pruning?.Invoke(this, EventArgs.Empty);
            }
            else if (Clock.Today.Date == EndCropDate2)
                MCSP.EndCrop();
            
            //Change fractions to remove
            if (Clock.Today.Date == SowingDate3)
                MCSP.Sow(cultivar: CultivarName, population: 1, depth: InitialRootDepth, rowSpacing: 150);
            else if (Clock.Today.Date == PruneDate3)
            {
                var Product = MCSP.FindChild<IHasDamageableBiomass>("Product");
                var Stover = MCSP.FindChild<IHasDamageableBiomass>("Stover");
                var Root = MCSP.FindChild<IHasDamageableBiomass>("Root");
                Product.RemoveBiomass(liveToResidue: 0.6);
                Stover.RemoveBiomass(liveToRemove: 0.6);
                Root.RemoveBiomass(liveToResidue: 0.1);
                Pruning?.Invoke(this, EventArgs.Empty);
            }
            else if (Clock.Today.Date == EndCropDate3)
                MCSP.EndCrop();
            //PMFCrop.Sow(... Contains the following arguements:
            //Population  double  Optional  Seeds sowing/m2.  Default is zero
            //Cultivar    string  Required  "NameOfCultivar"
            //Depth       double  Optional  Depth (mm) seed sown.   Default is 100mm 
            //MaxCover    double  Optional  Proportion (0-1) of the ground row crop will cover.   Default is 1.0
            //BudNumber   double  Optional  Number of mainstems per seed sown.  Default is 1.0
            //RowSpacing  double  Optional  Spaceing (mm) between drill rows when crop is sown.  Default is 150mm
            //CropClass   string  Optional  Crop class to instantiate when crop is sown.  Default is "Plant"
        }
    }
}
```
      Manager ExtraVariables: same as BiomassRemoveCutTest.Field.ExtraVariables
      Report: same as BiomassRemoveHarvestTest.Field.Report
  Simulation BiomassRemoveGrazeTest
    Weather: FileName=%root%\Tests\WeatherFiles\lincoln.met
    Clock: Start=2010-10-01; End=2013-07-31
    Summary
    SoilArbitrator Soil Arbitrator
    Zone Field: Area=1; Slope=0; AspectAngle=0; Altitude=50
      Soil: same as BiomassRemoveHarvestTest.Field.Soil
      SurfaceOrganicMatter surface organic matter: InitialResidueName=wheat; InitialResidueType=wheat; InitialResidueMass=2000; InitialStandingFraction=0; InitialCPR=0; InitialCNR=80
      MicroClimate: a_interception=0; b_interception=1; c_interception=0; d_interception=0; SoilHeatFluxFraction=0.4; MinimumHeightDiffForNewLayer=0; NightInterceptionFraction=0.5; ReferenceHeight=2
      Plant SCRUM
      Irrigation
      Fertiliser
      Manager SowingAndGrazing
        CultivarName = Green_Peas
        InitialRootDepth = 10
        SowingDate = 10/14/2010 00:00:00
        SowingDate2 = 09/14/2011 00:00:00
        SowingDate3 = 08/14/2012 00:00:00
        GrazeDate = 03/14/2011 00:00:00
        GrazeDate2 = 02/14/2012 00:00:00
        GrazeDate3 = 01/14/2013 00:00:00
        EndCropDate = 05/14/2011 00:00:00
        EndCropDate2 = 06/14/2012 00:00:00
        EndCropDate3 = 07/14/2013 00:00:00
```csharp
using Models.PMF.Interfaces;
using Newtonsoft.Json;
using System;
using System.Collections.Generic;
using Models.Core;
using Models.PMF;
using Models.PMF.Interfaces;
using System.Xml.Serialization;
using Models.Soils;

namespace Models
{
    [Serializable] 
    [System.Xml.Serialization.XmlInclude(typeof(Model))]
    public class Script : Model
    {
        [Link] Plant MCSP;
        [Link] Clock Clock;

        [Description("Cultivar")]
        public string CultivarName { get; set; }
        [Description("Initial Root Depth")]
        public double InitialRootDepth { get; set; }
        [Description("Sowing Date")]
        public DateTime SowingDate { get; set; }
        [Description("Sowing Date2")]
        public DateTime SowingDate2 { get; set; }
        [Description("Sowing Date3")]
        public DateTime SowingDate3 { get; set; }
        [Description("Graze Date")]
        public DateTime GrazeDate { get; set; }
        [Description("Graze Date2")]
        public DateTime GrazeDate2 { get; set; }
        [Description("Graze Date3")]
        public DateTime GrazeDate3 { get; set; }
        [Description("EndCrop Date")]
        public DateTime EndCropDate { get; set; }
        [Description("EndCrop Date2")]
        public DateTime EndCropDate2 { get; set; }
        [Description("EndCrop Date3")]
        public DateTime EndCropDate3 { get; set; }
        

        
        [EventSubscribe("StartOfSimulation")]
        private void OnSimulationCommencing(object sender, EventArgs e)
        {
            
        }
        
        [EventSubscribe("DoManagement")]
        private void OnDoManagement(object sender, EventArgs e)
        {
            //Set up  array of remove fractions to send with Graze method.  Each member in the array corresponds to an organ in the same order they are set up in.

            if (Clock.Today.Date == SowingDate)
                MCSP.Sow(cultivar: CultivarName, population: 1, depth: InitialRootDepth, rowSpacing: 150);
            else if (Clock.Today.Date == GrazeDate)
            {
                //Graze without sending defoliation data to test defaults
                var Product = MCSP.FindChild<IHasDamageableBiomass>("Product");
                var Stover = MCSP.FindChild<IHasDamageableBiomass>("Stover");
                Product.RemoveBiomass(liveToRemove: 0.1, deadToRemove: 0.0, liveToResidue: 0.7, deadToResidue: 0.0);
                Stover.RemoveBiomass(liveToRemove: 0.3, deadToRemove: 0.0, liveToResidue: 0.3, deadToResidue: 0.0);

            }
            else if (Clock.Today.Date == EndCropDate)
                MCSP.EndCrop();
            
            //Change fractions to remove
            if (Clock.Today.Date == SowingDate2)
                MCSP.Sow(cultivar: CultivarName, population: 1, depth: InitialRootDepth, rowSpacing: 150);
            else if (Clock.Today.Date == GrazeDate2)
            {
                //Harvest with manager specified removal fractions
 				var Product = MCSP.FindChild<IHasDamageableBiomass>("Product");
                var Stover = MCSP.FindChild<IHasDamageableBiomass>("Stover");
                var Root = MCSP.FindChild<IHasDamageableBiomass>("Root");
                Product.RemoveBiomass(liveToRemove: 0.6, liveToResidue:0.2);
                Stover.RemoveBiomass(liveToRemove: 0.6, liveToResidue:0.2);
                Root.RemoveBiomass(liveToResidue: 0.15);
            }
            else if (Clock.Today.Date == EndCropDate2)
                MCSP.EndCrop();
            
            //Change fractions to remove
            if (Clock.Today.Date == SowingDate3)
                MCSP.Sow(cultivar: CultivarName, population: 1, depth: InitialRootDepth, rowSpacing: 150);
            else if (Clock.Today.Date == GrazeDate3)
            {
 				var Product = MCSP.FindChild<IHasDamageableBiomass>("Product");
                var Stover = MCSP.FindChild<IHasDamageableBiomass>("Stover");
                var Root = MCSP.FindChild<IHasDamageableBiomass>("Root");
                Product.RemoveBiomass(liveToRemove: 0.6, liveToResidue:0.2);
                Stover.RemoveBiomass(liveToRemove: 0.6, liveToResidue:0.2);
                Root.RemoveBiomass(liveToResidue: 0.15);
            }
            else if (Clock.Today.Date == EndCropDate3)
                MCSP.EndCrop();
            //PMFCrop.Sow(... Contains the following arguements:
            //Population  double  Optional  Seeds sowing/m2.  Default is zero
            //Cultivar    string  Required  "NameOfCultivar"
            //Depth       double  Optional  Depth (mm) seed sown.   Default is 100mm 
            //MaxCover    double  Optional  Proportion (0-1) of the ground row crop will cover.   Default is 1.0
            //BudNumber   double  Optional  Number of mainstems per seed sown.  Default is 1.0
            //RowSpacing  double  Optional  Spaceing (mm) between drill rows when crop is sown.  Default is 150mm
            //CropClass   string  Optional  Crop class to instantiate when crop is sown.  Default is "Plant"
        }
    }
}
```
      Manager ExtraVariables: same as BiomassRemoveCutTest.Field.ExtraVariables
      Report: same as BiomassRemoveHarvestTest.Field.Report
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