Simulations: Version=70
  DataStore
  Simulation PlantainGrazing
    Memo
      Is resowing every year - should make this more flexible

      Getting an error when hte no-grazing window is unchecked - have submitted an issue.  Follow up with Rogerio.
    Clock: Start=2010-09-01; End=2012-08-31
    Weather: FileName=%root%\Examples\WeatherFiles\lincoln.met
    Summary
    SoilArbitrator Soil Arbitrator
    Supplement: SpoilageTime=0
      Stores:
        Name    Stored  IsRoughage  DMContent  DMD   MEContent  CPConc  ProtDg  PConc   SConc   EEConc  ADIP2CP  AshAlk  MaxPassage
        fodder  0       true        0.85       0     0          0       0       0       0       0       0        0       0
        silage  0       true        1          0.75  12         0.18    0.8     0.0032  0.0024  0.02    0.06     0.6     0
    Stock: RandSeed=9999
      PaddockList:
        {Area=1, Slope=0}
    Manager GrazeForageCrop
      Genotype = Friesian
      Sex = Castrate
      Age = 36
      Weight = 500
      Pregnant = 0
      Lactating = 0
      YoungNumber = 0
      YoungWt = 0
      StockingRate = 25
      CurrentLocation = Away
      PreGrazingDM = 2800
      PostGrazingDM = 1900
      DoNoGrazingWindow = True
      NoGrazeStart = 1-apr
      NoGrazeEnd = 15-aug
      SupplementName = silage
      SupplementFirst = False
      SupplementEveryDay = 0
      SupplementOnPastureMass = 2
      TriggerPastureMass = 2100
      NumStock = 0
      GrazingSeasonIsOpen = False
```csharp
using System;
using Models;
using Models.Core;
using Models.Utilities;
using Models.GrazPlan;
using APSIM.Shared.Utilities;
using System.Xml.Serialization;
using Models.PMF;
using Models.Soils; 
using System.Collections;
using System.Collections.Generic;
using System.Linq;
using Models.AgPasture;
using System.Diagnostics;

namespace Models
{

    [Serializable]
    public class Script : Model
    {
        [Link] Clock clock;
        [Link] Stock stock;
        [Link] Supplement supplement;
        [Link] List<Zone> paddocks;
        [Link] ISummary summary;
        [Link] Simulation farm;

        private int CurrentGroupNum = 1;    // animal group number
        private int CurrentLocationNum { get; set; }

        public enum Genotypes
        {
            SmallMerino,
            Angus,
            Friesian
        }

        [Separator("Stock type info, the same type of stock are brought onto the paddock at each grazing")]

        [Description("Stock: genotype (e.g. Small Merino, Angus, Friesian):")] 
        public Genotypes Genotype { get; set; }

        [Description("Stock: sex (Female, Male, Castrate):")] 
        public ReproductiveType Sex { get; set; }

        [Description("Stock: age (months):")] 
        public double Age { get; set; }

        [Description("Stock: weight (kg liveweight /head):")] 
        public double Weight { get; set; }

        [Description("Stock: fertility status (0 if non-pregnant or days since conception):")] 
        public int Pregnant { get; set; }

        [Description("Stock: lactation status (0 if non-lactating or days since parturition):")]
        public int Lactating { get; set; }

        [Description("Stock: number of unweaned young:")]
        public int YoungNumber { get; set; }

        [Description("Stock: weight of unweaned young:")] 
        public double YoungWt { get; set; }

        [Separator("Grazing type info")]

        [Description("Paddock stocking rate (head/ha): ")] 
        public double StockingRate { get; set; }

        [Description("Initial location of the cows (give either the paddock name or 'Away'): ")] 
        public string CurrentLocation { get; set; }

        [Description("Standing biomass at which to bring the stock into the simulation (kg DM/ha): ")] 
        public double PreGrazingDM { get; set; }

        [Description("Standing biomass at which to exit  stock from the simulation (kg DM/ha): ")] 
        public double PostGrazingDM { get; set; }

        [Description("Implement a no-grazing window? (tick for yes): ")] 
        public bool DoNoGrazingWindow { get; set; }

        [Description("Start of the no-grazing window (dd-MMM)")] 
        public string NoGrazeStart { get; set; }

        [Description("End of the no-grazing window (dd-MMM)")] 
        public string NoGrazeEnd { get; set; }

        [Separator("Supplementary feeding")]

        [Description("Name of the supplement to feed: ")] 
        public string SupplementName { get; set; }

        [Description("Feed the supplement first (i.e. before the new forage is available to the stock)?: ")] 
        public bool SupplementFirst { get; set; }

        [Description("Amount of supplementary feeding offered every day (kg DM /head /day): ")] 
        public double SupplementEveryDay { get; set; }

        [Description("Additional amount of supplement offered when available biomass is low (kg DM /head /day): ")] 
        public double SupplementOnPastureMass { get; set; }

        [Description("Trigger biomass for above rule (kg DM /ha): ")] 
        public double TriggerPastureMass { get; set; }

        public int NumStock { get; set; }
        // number of cows on the whole farm
        public bool GrazingSeasonIsOpen { get; set; }


        [EventSubscribe("StartOfSimulation")]
        private void OnStartOfSimulation(object sender, EventArgs e)
        {

            //Debugger.Break();

            summary.WriteMessage(this, "Initialising the paddock information");

            NumStock = (int)(Math.Round(StockingRate * farm.Area, 0));

            if (CurrentLocation.ToLower() != "away")
            {
                BuyStock();
                stock.Move(CurrentGroupNum, CurrentLocation);
                summary.WriteMessage(this, " The Stock have been moved to " + CurrentLocation);
            }

            summary.WriteMessage(this, "     The number of animals has been rounded to " + NumStock + " from " + (StockingRate * farm.Area));
            summary.WriteMessage(this, "     The animals will begin in " + CurrentLocation + " which is paddock number " + CurrentLocationNum + " in the simulation");
            summary.WriteMessage(this, "     The area of the whole farm is " + farm.Area + " ha");

        }

        [EventSubscribe("DoManagement")]
        private void OnDoManagement(object sender, EventArgs e)
        {
            GrazingSeasonIsOpen = true;
            if (DoNoGrazingWindow)
                GrazingSeasonIsOpen = !DateUtilities.WithinDates(NoGrazeStart, clock.Today, NoGrazeEnd);

            bool sellSomeStock = false;
            if (!GrazingSeasonIsOpen)
                sellSomeStock = true;

            double harvestableBiomass = paddocks[0].Plants.Sum(plant => plant.AboveGround.Wt * 10);
            if (harvestableBiomass <= PostGrazingDM)
                sellSomeStock = true;

            if (CurrentLocation == "Away")
                sellSomeStock = false;

            if (CurrentLocation == "Away" && harvestableBiomass >= PreGrazingDM && GrazingSeasonIsOpen)
            {
                CurrentLocation = paddocks[0].Name;
                CurrentLocationNum = paddocks[0].Index;
                BuyStock();
                stock.Move(CurrentGroupNum, CurrentLocation);
                summary.WriteMessage(this, "     Buying stock ");
            }

            if (sellSomeStock)
            {
                CurrentLocation = "Away";
                CurrentLocationNum = -1;
                SellStock();
                summary.WriteMessage(this, "     Selling stock ");
            }

            if (CurrentLocation != "Away")
            {
                if (SupplementEveryDay > 0)
                {
                    double silageOnHand = supplement.Stores[2 - 1].Stored;
                    if (silageOnHand < SupplementEveryDay * stock.NumberAll)
                    {
                        supplement.Buy(SupplementEveryDay * 900.0 * stock.NumberAll, SupplementName);  // i.e. 6 months worth
                        summary.WriteMessage(this, "SupplementEveryDay: Buying " + SupplementName + " of total amount : " + (SupplementEveryDay * 90 * stock.NumberAll) + " kg DM");
                    }
                    supplement.Feed(SupplementName, SupplementEveryDay * stock.NumberAll, CurrentLocation, SupplementFirst);
                }

                if (SupplementOnPastureMass > 0 && harvestableBiomass <= TriggerPastureMass)
                {
                    double silageOnHand = supplement.Stores[2 - 1].Stored;
                    if (silageOnHand < SupplementOnPastureMass * stock.NumberAll)
                    {
                        supplement.Buy(SupplementOnPastureMass * 90.0 * stock.NumberAll, SupplementName);  // i.e. 6 months worth
                        summary.WriteMessage(this, "SupplementOnBiomass: Buying " + SupplementName + " of total amount : " + (SupplementOnPastureMass * 90 * stock.NumberAll) + " kg DM");
                    }
                    supplement.Feed(SupplementName, SupplementOnPastureMass * stock.NumberAll, CurrentLocation, SupplementFirst);
                }
            }
        }


        public void BuyStock()
        {
            CurrentGroupNum = stock.NoGroups + 1;
            StockBuy purchase = new StockBuy();
            purchase.Genotype = ReflectionUtilities.EnumToString(Genotype);
            purchase.Number = NumStock;
            purchase.Sex = Sex;
            purchase.Age = Age;       // age in months
            purchase.Weight = Weight;  // live weight in kg
            purchase.UseTag = CurrentGroupNum + 1;
            purchase.MatedTo = purchase.Genotype;
            purchase.Pregnant = Pregnant;  // days pregnant, 0 = non pregnant, 1 = pregnant
            purchase.Lactating = Lactating;  // 0 for dry, 1 for lactating
            purchase.NumYoung = YoungNumber;
            purchase.YoungWt = YoungWt;

            stock.Buy(purchase);
        }

        public void SellStock()
        {
            int NumGroups = stock.NoGroups;

            NumGroups = stock.NoGroups;
            for (int gg = 1; gg <= NumGroups; gg++)
            {
                stock.Sell(gg, stock.Number[gg - 1]);
            }
        }
    }
}
```
    Report: EventNames=[Clock].EndOfDay
      VariableNames:
        [Clock].Today
        [Stock].NumberAll as NumStock
        [Stock].IntakeAll.Weight as AveDMI
        [Stock].MEIntakeAll as AveMEIntake
        [Stock].WeightAll as AveBodyWeight
        [Stock].CondScoreAll as AveCS
        [Stock].MilkWtAll as AveMilkWeight
        [GrazeForageCrop].Script.CurrentLocationNum as CurrentLocationNum
        [GrazeForageCrop].Script.HarvestableBiomass as harvestableBiomass
        [Supplement].stores[2].Stored as SupplementRemaining
    Zone Field: Area=1; Slope=0; AspectAngle=0; Altitude=50
      Folder Management
        Manager SowingRule
          StartDate = 1-oct
          EndDate = 30-oct
          MinESW = 50
          MinRain = 30
          RainDays = 5
          mustSow = yes
          CultivarName = Tonic
          SowingDepth = 10
          RowSpacing = 150
          Population = 200
          Amount = 60
```csharp
using System;
using Models.Core;
using Models.PMF;
using Models.Soils;
using Models.Utilities;
using APSIM.Shared.Utilities;

namespace Models
{
    [Serializable]
    public class Script : Model
    {
        [Link] Clock Clock;
        [Link] Fertiliser Fertiliser;
        [Link] Summary Summary;
        [Link] Plant Plantain;
        [Link] Soil Soil; 
        Accumulator accumulatedRain;

        [Separator("======= Sowing conditions =======")]
        [Description("Start of sowing window (dd-mmm)")] public string StartDate { get; set;}
        [Description("End of sowing window (dd-mmm)")] public string EndDate { get; set;}
        [Description("Minimum extractable soil water for sowing (mm)")] public double MinESW { get; set;}
        [Description("Accumulated rainfall required for sowing (mm)")] public double MinRain { get; set;}
        [Description("Duration of rainfall accumulation (d)")] public int RainDays { get; set;}
        [Description("Must sow at the end of the window?")] public answerType mustSow { get; set; }

        [Separator("======= Sowing data =======")]
        [Description("Cultivar to be sown")] public string CultivarName { get; set;}
        [Description("Sowing depth (mm)")] public double SowingDepth { get; set;}        
        [Description("Row spacing (mm)")] public double RowSpacing { get; set;}    
        [Description("Plant population (/m2)")] public double Population { get; set;}    

        [Separator("======= Sowing fertiliser =======")]
        [Description("Amount of fertiliser to be applied (kg/ha)")] public double Amount { get; set;}

           public enum answerType
        {
            /// <summary>a positive answer</summary>
            yes,
            /// <summary>a negative answer</summary>
            no
        }

        
        [EventSubscribe("Commencing")]
        private void OnSimulationCommencing(object sender, EventArgs e)
        {
            accumulatedRain = new Accumulator(this, "[Weather].Rain", RainDays);
        }
        

        [EventSubscribe("DoManagement")]
        private void OnDoManagement(object sender, EventArgs e)
        {
            accumulatedRain.Update();
            //if (allowIrrigation == answerType.yes)

            bool doSowing = false;
            if (DateUtilities.WithinDates(StartDate,Clock.Today,EndDate) && !Plantain.IsAlive)
                doSowing = true;
            if ((MathUtilities.Sum(Soil.SoilWater.ESW) < MinESW) || (accumulatedRain.Sum < MinRain))
                doSowing = false;
            if ((mustSow == answerType.yes) && (DateUtilities.DatesEqual(EndDate, Clock.Today)))
                doSowing = true;
            
            if (doSowing)
            {
               Plantain.Sow(population:Population, cultivar:CultivarName, depth:SowingDepth, rowSpacing:RowSpacing);
               Fertiliser.Apply(Amount: Amount, Type: Fertiliser.Types.NO3N);    
            }
        
        }
        
    }
}
```
        Operations FertiliserSchedule
          2011-01-05  [Fertiliser].Apply(Amount: 20.0, Type: Fertiliser.Types.UreaN, Depth: 30)
          2011-02-20  [Fertiliser].Apply(Amount: 20.0, Type: Fertiliser.Types.UreaN, Depth: 30)
          2011-10-15  [Fertiliser].Apply(Amount: 20.0, Type: Fertiliser.Types.UreaN, Depth: 30)
          2011-11-15  [Fertiliser].Apply(Amount: 20.0, Type: Fertiliser.Types.UreaN, Depth: 30)
          2012-01-10  [Fertiliser].Apply(Amount: 20.0, Type: Fertiliser.Types.UreaN, Depth: 30)
          2012-02-25  [Fertiliser].Apply(Amount: 20.0, Type: Fertiliser.Types.UreaN, Depth: 30)
          2012-09-15  [Fertiliser].Apply(Amount: 20.0, Type: Fertiliser.Types.UreaN, Depth: 30)
          2012-10-25  [Fertiliser].Apply(Amount: 20.0, Type: Fertiliser.Types.UreaN, Depth: 30)
          2012-11-15  [Fertiliser].Apply(Amount: 20.0, Type: Fertiliser.Types.UreaN, Depth: 30)
        Manager AutomaticIrrigation
          allowIrrigation = yes
          seasonStart = 15-Sep
          seasonEnd = 30-Apr
          seasonsAllocation = 10000
          triggerDeficit = 75
          targetDeficit = 95
          returndays = 3
          maximumAmount = 15
          depthPAWC = 500
```csharp
using System;
using Models.Core;
using Models.PMF;
using Models.Soils;
using System.Xml.Serialization;
using Models.PMF;
using APSIM.Shared.Utilities;

        
namespace Models
{
    [Serializable] 
    [System.Xml.Serialization.XmlInclude(typeof(Model))]
    public class Script : Model
    {
        //Communication to other modules
        [Link] ISummary summary = null;
        [Link] Irrigation Irrigation;
        [Link] Clock Clock;
        [Link] Soil Soil;
        [Link(IsOptional = true)] Plant existingCrop;
       
        //User inputs from properties tab
        [Description("Turn irrigation on?")]
        public answerType allowIrrigation { get; set; }
        [Description("Start of irrigation season (dd-MMM)")]
        public string seasonStart { get; set; }
        [Description("End of irrigation season (dd-MMM)")]
        public string seasonEnd { get; set; }
        [Description("Season allocation (mm)")]
        public double seasonsAllocation { get; set; }
        [Description("Deficit to trigger irrigation (% PAWC)")]
        public double triggerDeficit { get; set; }
        [Description("Deficit to stop irrigaton (% PAWC)")]
        public double targetDeficit { get; set; }
        [Description("Minimum days for irrigation to return")]
        public double returndays { get; set; }
        [Description("Maximum irrigation application (mm/day)")]
        public double maximumAmount { get; set; }
        [Description("Depth to calculate PAWC (mm)")]
        public double depthPAWC { get; set; }
       
        public enum answerType
        {
            /// <summary>a positive answer</summary>
            yes,
            /// <summary>a negative answer</summary>
            no
        }

        //Class members
        [XmlIgnore] public double TopSWdeficit { get; set; }
        [XmlIgnore] public double TopSWC { get; set; }
        [XmlIgnore] public double DaysSinceIrrigation { get; set; }
        [XmlIgnore] public double AmountToApply { get; set; }
        [XmlIgnore] public double SeasonAppliedAmount { get; set; }
        
        private bool IrrigationIsAllowed { get; set; }
        private bool SeasonIsOpen { get; set; }
        private bool CropIsActive { get; set; }
        private bool IrrigatorIsAvailable { get; set; }
        private bool SoilIsDry { get; set; }

        private DateTime StartDate;
        private DateTime EndDate;
        private double TopDUL;
        private double TopLL;
        private int nLayers;
    
        //Calculate static soil variables
        [EventSubscribe("StartOfSimulation")]
        private void OnStartOfSimulation(object sender, EventArgs e)
        {   
            //Set the season dates
            StartDate = DateTime.Parse(seasonStart + "-" + Clock.Today.Year.ToString());
            EndDate = DateTime.Parse(seasonEnd + "-" + Clock.Today.Year.ToString());
            
            //Can we irrigate at all?
            IrrigationIsAllowed = false; 
            if (allowIrrigation == answerType.yes)
                IrrigationIsAllowed = true; 

            //Calculate soil water variables
            double depthFromSurface = 0.0;
            double fracLayer = 0.0;
            nLayers = Soil.Thickness.Length;
            for (int layer = 0; layer < nLayers; layer++)
            {
                fracLayer = Math.Min(1.0, (depthPAWC - depthFromSurface) / Soil.Thickness[layer]);
                TopLL += Soil.LL15mm[layer] * fracLayer;
                TopDUL += Soil.DULmm[layer] * fracLayer;
                depthFromSurface += Soil.Thickness[layer];
                if (depthFromSurface >= depthPAWC)
                    layer = nLayers;
            }
        }
             
        //Determine daily requirement for irrigation
        [EventSubscribe("StartOfDay")]
        private void OnStartOfDay(object sender, EventArgs e)
        {
            //Can we irrigate today?          
            SeasonIsOpen = isBetween(Clock.Today, StartDate, EndDate);

            //Is there a crop in the ground that needs irrigation?
            CropIsActive = false;
            if ((existingCrop != null) && (existingCrop.IsAlive))
                CropIsActive = true;
            //if ((existingCrop.Phenology.Stage >= 3.0) && (existingCrop.Phenology.Stage < 6.0))
          
            //Is the irrigator available?
            IrrigatorIsAvailable = false;
            DaysSinceIrrigation += 1;
            if (DaysSinceIrrigation >= returndays)
                IrrigatorIsAvailable = true;
          
            //Is the soil dry enough to require irrigation?
            SoilIsDry = false;
            double depthFromSurface = 0.0;
            double fracLayer = 0.0;
            TopSWC = 0.0;
            for (int layer = 0; layer < nLayers; layer++)
            {
                fracLayer = Math.Min(1.0, (depthPAWC - depthFromSurface) / Soil.Thickness[layer]);
                TopSWC += Soil.SoilWater.SWmm[layer] * fracLayer;
                depthFromSurface += Soil.Thickness[layer];
                if (depthFromSurface >= depthPAWC)
                    layer = nLayers;
            }
            
            TopSWdeficit = TopSWC - TopDUL;
            if (Math.Max(0.0, -TopSWdeficit) >= (TopDUL - TopLL) * (100 - triggerDeficit) / 100)
                SoilIsDry = true;
                
            //Are all the conditions ratifying irrigation
            if (IrrigationIsAllowed && SeasonIsOpen && CropIsActive && IrrigatorIsAvailable && SoilIsDry)
            {
                //Lets bloody well irrigate then!!!!
                AmountToApply = TopDUL * targetDeficit / 100 - TopSWC;
                //AmountToApply = Math.Max(0.0, Math.Min(AmountToApply, seasonsAllocation - SeasonAppliedAmount));
                AmountToApply = maximumAmount;
                Irrigation.Apply(AmountToApply);
                DaysSinceIrrigation = 0;
                SeasonAppliedAmount += AmountToApply;
            }
        }
        
        ///Checks whether theDate is between iniDate and endDate (non-year specific)
        private bool isBetween(DateTime theDay, DateTime iniDate, DateTime endDate)
        {
            bool result = false;
            if (iniDate.DayOfYear < endDate.DayOfYear)
            {
                // period is within one year, ex: summer in the northern hemisphere
                if ((theDay.DayOfYear >= iniDate.DayOfYear) && (theDay.DayOfYear <= endDate.DayOfYear))
                    result = true;
            }
            else
            {
                // period goes over the end of the year, ex: summer in the southern hemisphere
                if ((theDay.DayOfYear >= iniDate.DayOfYear) || (theDay.DayOfYear <= endDate.DayOfYear))
                    result = true;
            }
            
            return result;
        }
    }
}
```
      MicroClimate: a_interception=0; b_interception=1; c_interception=0; d_interception=0; soil_albedo=0.23; SoilHeatFluxFraction=0.4; NightInterceptionFraction=0.5; ReferenceHeight=2
      Irrigation
      Fertiliser
      SurfaceOrganicMatter: InitialResidueName=grass; InitialResidueType=grass; InitialResidueMass=500; InitialStandingFraction=0; InitialCPR=0; InitialCNR=40; FractionFaecesAdded=0.5
      Soil: SoilType=Generic medium texture; Region=Canterbury; Country=New Zealand; Latitude=0; Longitude=0
        Chemical
          Thickness  NO3N      NH4N       PH
          150        9.43396   0.377358   6
          150        6.59293   0.240729   6
          200        3.6821    0.113604   6
          250        2.19178   0.0547945  6
          250        2.19178   0.0547945  6
          500        0.740741  0.0296296  6
        Physical
          Thickness  ParticleSizeClay  BD    AirDry  LL15  DUL   SAT   KS
          150        20                1.3   0.05    0.15  0.36  0.45  4500
          150        20                1.4   0.17    0.17  0.34  0.42  2500
          200        20                1.5   0.19    0.19  0.33  0.38  200
          250        15                1.6   0.17    0.17  0.3   0.36  1500
          250        10                1.45  0.1     0.1   0.2   0.38  5000
          500        10                1.35  0.1     0.1   0.2   0.39  10000
          SoilCrop PlantainSoil: LL=[0.15, 0.17, 0.19, 0.17, 0.1, 0.1]; KL=[0.1, 0.08, 0.05, 0.02, 0.01, 0.01]; XF=[1, 1, 1, 1, 1, 0.5]
        SoilWater: SummerDate=21-Sep; SummerU=6; SummerCona=3.5; WinterDate=23-Mar; WinterU=6; WinterCona=2.5; DiffusConst=88; DiffusSlope=35; Salb=0.2; CN2Bare=0.7; CNRed=20; CNCov=0.8; max_pond=0; Thickness=[150, 150, 200, 250, 250, 500]; SWCON=[0.45, 0.35, 0.1, 0.15, 0.3, 0.2]; PrecipitationInterception=0
        SoilNitrogen: fom_types=[default, manure, mucuna, lablab, shemp, stable]; fract_carb=[0.2, 0.3, 0.54, 0.57, 0.45, 0]; fract_cell=[0.7, 0.3, 0.37, 0.37, 0.47, 0.1]; fract_lign=[0.1, 0.4, 0.09, 0.06, 0.08, 0.9]
          SoilNitrogenNO3 NO3
          SoilNitrogenNH4 NH4
          SoilNitrogenUrea Urea
          SoilNitrogenPlantAvailableNO3 PlantAvailableNO3
          SoilNitrogenPlantAvailableNH4 PlantAvailableNH4
        Organic: FOMCNRatio=40
          Thickness  Carbon  SoilCNRatio  FBiom  FInert  FOM
          150        2.5     12           0.04   0.4     358.617
          150        1.25    12           0.025  0.6     265.67
          200        0.5     12           0.015  0.8     178.084
          250        0.2     12           0.01   0.9     108.013
          250        0.15    12           0.008  0.95    65.5135
          500        0.1     12           0.008  0.98    24.1011
        InitialWater Initial water: PercentMethod=1; FractionFull=0.9
        Sample Initial nitrogen: Thickness=[200, 200, 600, 500]; SWUnits=Volumetric; OCUnits=Total; PHUnits=Water
        CERESSoilTemperature
      Plant Plantain: CropType=Plantain; IsEnding=false; DaysAfterEnding=0
      Report ReportInField: EventNames=[Clock].DoReport
        VariableNames:
          [Clock].Today as Date
          [Plantain].Population
          [Plantain].CropType
          [Plantain].Leaf.RadIntTot as InterceptedRadiation
          [Irrigation].IrrigationApplied as IrrigationApplied
          [Soil].SoilWater.Es as Evaporation
          [Plantain].Leaf.Transpiration as Transpiration
          [Soil].SoilWater.Drainage as Drainage
          [Soil].SoilWater.Runoff as Runoff
          sum([Soil].SoilWater.SWmm) as TotalSWC
          sum([Soil].DULmm) as TotalDUL
          sum([Soil].LL15mm) as TotalLL15
          [Fertiliser].NitrogenApplied as FertiliserN
          sum([Soil].SoilNitrogen.Denitrification) as DenitrifiedN
          ([Soil].SoilWater.LeachNH4 + [Soil].SoilWater.LeachNO3) as LeachedN
          (-1*[Plantain].Root.NUptake) as UptakeN
          (sum([Soil].SoilNitrogen.Urea.kgha) + sum([Soil].SoilNitrogen.NH4.kgha) + sum([Soil].SoilNitrogen.NO3.kgha)) as SoilNContent
          [Plantain].Total.Wt
          [Plantain].AboveGround.Wt
          [Plantain].BelowGround.Wt
          [Plantain].Leaf.Live.NConc
          [Plantain].Leaf.LAI
          [Plantain].Leaf.Live.Wt
          [Plantain].Stem.Live.Wt
          [Plantain].Inflorescence.Live.Wt
          [Plantain].Taproot.Live.Wt
          [Plantain].Root.Live.Wt
          ([Plantain].AboveGround.Wt * 10.0) as AboveGroundBiomass_kgDM/ha
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