Simulations: Version=37
  DataStore
  Simulation SinglePaddockForRV
    Clock: StartDate=2000-07-30; EndDate=2007-07-29
    Summary SummaryFile
    SoilArbitrator
    Weather: FileName=%root%\Examples\WeatherFiles\lincoln.met
    Operations
      1999-08-10  [BasicCowManagement].Script.SetNumbers(500, "OneBigPaddock")
      1999-11-15  [BasicCowManagement].Script.MateCows("KiwiCross", 42)
      2001-04-30  [BasicCowManagement].Script.DryOffAllCows();
    Stock: RandSeed=9999
      GenoTypes:
        {Conception=[0, 0.99, 0, 0], Name=FriesianTest, DamBreed=Friesian, Generation=0, SRW=550, DeathRate=0.02, RefFleeceWt=0, MaxFibreDiam=0, FleeceYield=0, PeakMilk=30, WnrDeathRate=0.02}
      PaddockList:
        {Area=1, Slope=0}
    Manager BasicCowManagement
      StockingRate = 4
      CurrentLocation = OneBigPaddock
      DateCowsBackToFarm = 30-jul
      DateCowsDriedOff = 28-apr
      DateCowsAwayFromFarm = 01-may
      OfferSilageTrigger = 1800
      OfferSilageAmount = 10
      CutPastureTrigger = 4000
      CutPastureResidual = 2500
      NumCows = 3
      FarmArea = 0
```csharp
using System;
using Models.Core;
using Models.Utilities;
using Models.GrazPlan;
using APSIM.Shared.Utilities;
using System.Xml.Serialization;
using Models.PMF;
using Models.Soils;
using System.Collections;
using System.Collections.Generic;
using Models.AgPasture;
using System.Diagnostics;

namespace Models
{

    [Serializable]
    public class Script : Model
    {
        [Link] Clock Clock;
        [Link] Stock Cows;
        [Link] Supplement Feed;
        [Link] Zone[] Paddocks;
        [Link] ISummary summary = null;

        [Serializable]
        public class PaddockInfo
        {
            public string paddockName;
            public double harvestableBiomass;
            public double totalBiomass;
            public int paddockNum;
            public double paddockArea;
        }

         //GrazingSeasonIsOpen = !DateUtilities.WithinDates(NoGrazeStart, Clock.Today, NoGrazeEnd);
        [Separator("With this component, the simulation should start when the cows are away from the farm (the day they come back is fine)")]

        [Description("Whole-farm stocking rate (head/ha): ")] public double StockingRate { get; set; }
        [Description("Initial location of the cows (paddock name): ")] public string CurrentLocation { get; set; }

        [Description("Date to bring cows back to the farm (dd-mmm): ")] public string DateCowsBackToFarm { get; set; }
        [Description("Date to dry the cows off (dd-mmm): ")] public string DateCowsDriedOff { get; set; }
        [Description("Date to send away from the farm (dd-mmm): ")] public string DateCowsAwayFromFarm { get; set; }

        [Description("Pasture biomass which to start feeding silage (kg DM /ha): ")] public double OfferSilageTrigger { get; set; }
        [Description("Amount of silage to be offered (kg DM /cow /day): ")] public double OfferSilageAmount { get; set; }

        [Description("Pasture biomass which to cut pasture (kg DM /ha): ")] public double CutPastureTrigger { get; set; }
        [Description("Post-cutting pasture residual biomass (kg DM /ha): ")] public double CutPastureResidual { get; set; }

        public int NumCows { get; set; } // number of cows on the whole farm
        public double FarmArea { get; set; }

        private int group_count; // how many groups are there in the simulation
        private int g = 1;      // index to the groups of animals
        private int CurrentLocationNum; 
        private int NumPaddocks = 1;

        private int DurationOfPastureAccum = 7;
        private double[] PastureAccum;
        private double PastureAccum7;
        private int ValidValues;
        private double BiomassCut;

        public event BiomassRemovedDelegate BiomassRemoved;
        List<PaddockInfo> listOfPaddockInfo = new List<PaddockInfo>();


        [EventSubscribe("StartOfSimulation")]
        private void OnStartOfSimulation(object sender, EventArgs e)
        {
            summary.WriteMessage(this, "Initialising the paddock information");

            GetFarmAreaAndOtherInfo();

            //NumCows = (int)(Math.Round(StockingRate * FarmArea, 0));
            NumCows = Cows.NumberAll;

            summary.WriteMessage(this, "     The area of the whole farm is " + FarmArea + " ha");

            PastureAccum = new double[DurationOfPastureAccum]; 
            for (int i = 0; i < DurationOfPastureAccum; i++)
            	PastureAccum[i] = -999.9;
        }

        [EventSubscribe("DoManagement")]
        private void OnDoManagement(object sender, EventArgs e)
        {
        	// see if it is time to bring stock into the simulation
        	if(DateUtilities.DatesEqual(DateCowsBackToFarm, Clock.Today))
        	{
	            SetInitialCowStuff();
    	        if (NumCows > 0)
        	    	Cows.Move(g, CurrentLocation);
        	    NumCows = Cows.NumberAll;
        		summary.WriteMessage(this, "     Time to bring the cows back to the farm ");
	            summary.WriteMessage(this, "     The number of cows has been rounded to " + NumCows + " from " + (StockingRate * FarmArea));
	            summary.WriteMessage(this, "     The cows will begin in " + CurrentLocation + " which is paddock number " + CurrentLocationNum + " in the simulation");
        	}

        	// see if it is time to dry the cows off
        	if(DateUtilities.DatesEqual(DateCowsDriedOff, Clock.Today))
        	{
	            DryOffAllCows();
	            NumCows = Cows.NumberAll;
	            summary.WriteMessage(this, "     The cows have been dried off");
        	}

        	// see if it is time to send the stock away
        	if(DateUtilities.DatesEqual(DateCowsAwayFromFarm, Clock.Today))
        	{
	            SetNumbers(0, CurrentLocation);
        	    	Cows.Move(g, CurrentLocation);
        	    NumCows = Cows.NumberAll;
        		summary.WriteMessage(this, "     The cows have been removed from the farm");
        	}


            if (Cows.NumberAll > 0)  // only manage stock if there are stock in the simulation!
            {
                UpdatePaddockInfo();

                // remove the calves at two days
                if (Cows.LactatingAll >= 2.0)
                	WeanAndSellCalves();

                // calculate average pasture biomass for the last 7 days
                // first shuffle the old data down the array (so start a 1 not 0) and then add in the new data to index 0
	        	for (int i = 1; i < DurationOfPastureAccum; i++)
    	    		PastureAccum[i] = PastureAccum[i-1];
        		PastureAccum[0] = listOfPaddockInfo[CurrentLocationNum].harvestableBiomass;
     	    	// figure out how many valid values there are on the way, accumulate the valid values
        		PastureAccum7 = 0.0;
        		ValidValues = 0;
	        	for (int i = 0; i < DurationOfPastureAccum; i++)
    	    	{
        			if (PastureAccum[i] > 0.0)
        			{
		        		PastureAccum7 += PastureAccum[i];
    		    		ValidValues += 1;
	        		}
    	    	}

                if ((PastureAccum7 / ValidValues) <= OfferSilageTrigger)
                	Feed.Feed("silage", OfferSilageAmount * Cows.NumberAll, CurrentLocation);
                else if ((PastureAccum7 / ValidValues) >= CutPastureTrigger)
                {
                	BiomassCut = 0.0;
                	CutThePasture(CutPastureResidual);
                	UpdatePaddockInfo();
                }

                                                //Cows.Sell(g, 0.1 * Cows.NumberAll);

        	}
        }


        public void SetInitialCowStuff()
        {
        	//if (NumCows > 0)
        	//{
            g = Cows.NoGroups + 1;

            StockBuy purchase = new StockBuy();
            purchase.Genotype = "FriesianTest";
            purchase.Number = (int)(Math.Round(StockingRate * FarmArea, 0));
            purchase.Sex = "cows";
            purchase.Age = 48;       // age in months
            purchase.Weight = 550.0;  // live weight in kg
            purchase.UseTag = g + 1;
            purchase.MatedTo = "FriesianTest";
            purchase.Pregnant = 282;  // days pregnant, 0 = non pregnant, 1 = pregnant; gestation is 284 days
            purchase.Lactating = 0;  // 0 for dry, 1 for lactating
            purchase.NumYoung = 0;
            //purchase.YoungWt = 45;

            Cows.Buy(purchase);

            NumCows += (int)(Math.Round(StockingRate * FarmArea, 0));
            //}
        }

        public void ChangeNumbers(int NumToChange, string MyPaddockName)
        {
        	if (NumToChange > 0)
        	{
	            int gg = Cows.NoGroups + 1;

	            StockBuy purchase = new StockBuy();
	            purchase.Genotype = "FriesianTest";
	            purchase.Number = NumToChange;
	            purchase.Sex = "cows";
	            purchase.Age = Cows.AgeAll;       // age in months
	            purchase.Weight = Cows.WeightAll;  // live weight in kg
	            purchase.UseTag = gg + 1;
	            purchase.MatedTo = "FriesianTest";
	            purchase.Pregnant = Convert.ToInt32(Cows.PregnantAll);  // days pregnant, 0 = non pregnant, 1 = pregnant
	            purchase.Lactating = Convert.ToInt32(Cows.LactatingAll);  // 0 for dry, 1 for lactating
	            purchase.NumYoung = 0;
	            //purchase.YoungWt = 45;

	            Cows.Buy(purchase);
	            Cows.Move(gg, MyPaddockName);

	            NumCows =+ NumToChange;

	            WeanAndSellCalves();
        	}
        	else if (NumToChange < 0)
        	{
        		Cows.Sell(0, NumToChange * -1);
        	}
        }

        public void SetNumbers(int NumToChange, string MyPaddockName)
        {
        	if ((NumToChange - Cows.NumberAll) > 0)
        	{
	            int gg = Cows.NoGroups + 1;

	            StockBuy purchase = new StockBuy();
	            purchase.Genotype = "FriesianTest";
	            purchase.Number = (NumToChange - Cows.NumberAll);
	            purchase.Sex = "cows";
	            purchase.Age = Cows.AgeAll;       // age in months
	            purchase.Weight = Cows.WeightAll;  // live weight in kg
	            purchase.UseTag = gg + 1;
	            purchase.MatedTo = "FriesianTest";
	            purchase.Pregnant = Convert.ToInt32(Cows.PregnantAll);  // days pregnant, 0 = non pregnant, 1 = pregnant
	            purchase.Lactating = Convert.ToInt32(Cows.LactatingAll);  // 0 for dry, 1 for lactating
	            purchase.NumYoung = 2;
	            //purchase.YoungWt = 45;

	            Cows.Buy(purchase);
	            Cows.Move(gg, MyPaddockName);

	            //NumCows = 

	            //WeanCalves();
        	}
        	else if ((NumToChange - Cows.NumberAll) < 0)
        	{
        		Cows.Sell(0, (NumToChange - Cows.NumberAll) * -1);
        	}
        }

        public void MateCows(string MateTo, int MatingDuration)
        {
	            MateTo = "Friesian";  // later on replace this with something sensible
	            Cows.Join(0, MateTo, MatingDuration);
        }

        public void WeanAndSellCalves()
        {
	            StockWean wean = new StockWean();

	            wean.Group = 0;
	            wean.Sex = "all";
	            wean.Number = Cows.NumberYngAll;

	            Cows.Wean(wean);
	            for (int ii = 1; ii <= Cows.NoGroups; ii++)
	            {
	            	if (Cows.Age[ii-1] < 300)
	            		Cows.Sell(ii, Cows.Number[ii-1]);
	            }


        }

        public void DryOffAllCows()
        {

	            Cows.DryOff(0, 999);
	            //Cows.DryOff(0, Cows.NumberAll);
	            summary.WriteMessage(this, "drying off");
	            //StockDryoff dryoff = new StockDryoff();

	            //dryoff.Group = 0;
	            //dryoff.Number = Cows.NumberAll;

	            //Cows.DryOff(dryoff);
        }

        public void GetFarmAreaAndOtherInfo()
        {
            NumPaddocks = 0;
            FarmArea = 0.0;
            CurrentLocationNum = 0;

            foreach (Zone paddock in Paddocks)
            {
                NumPaddocks += 1;

                PaddockInfo paddockInfo = new PaddockInfo();

                paddockInfo.paddockName = paddock.Name;
                paddockInfo.paddockNum = NumPaddocks - 1;
                paddockInfo.paddockArea = paddock.Area;

                paddockInfo.harvestableBiomass = 0.0;
                paddockInfo.totalBiomass = 0.0;
                foreach (PastureSpecies plant in Apsim.Children(paddock, typeof(PastureSpecies)))
                {
                	paddockInfo.harvestableBiomass += plant.HarvestableWt;
                	paddockInfo.totalBiomass += plant.AboveGroundWt;
                }
                    

                listOfPaddockInfo.Add(paddockInfo);

                FarmArea += paddock.Area;
                if (paddock.Name == CurrentLocation)
                    CurrentLocationNum = paddockInfo.paddockNum;

                summary.WriteMessage(this, "     Paddock " + NumPaddocks + " is called " + paddock.Name + ", has an area of " + paddock.Area + " ha and an initial harvestable biomass of " + paddockInfo.harvestableBiomass + " kg DM / ha");

            }

        }

        public void UpdatePaddockInfo()
        {
            int ii = -1;

            foreach (Zone paddock in Paddocks)
            {
                ii += 1;
                listOfPaddockInfo[ii].harvestableBiomass = 0.0;
                listOfPaddockInfo[ii].totalBiomass = 0.0;
                foreach (PastureSpecies plant in Apsim.Children(paddock, typeof(PastureSpecies)))
                {
                    listOfPaddockInfo[ii].harvestableBiomass += plant.HarvestableWt;
                    listOfPaddockInfo[ii].totalBiomass += plant.AboveGroundWt;
                }

            }

        }


        private void CutThePasture(double CuttingResidual)
        {
            // Remove a proportion of required DM from each species
            BiomassCut = 0.0;

            // get the proprtion of the biomass to remove
            int ii = -1;
            int NumSpecies = -1;
            foreach (Zone paddock in Paddocks)  // but noting that there is only one zone
            {
                ii += 1;
	            double PropBiomassToRemove = MathUtilities.Divide((listOfPaddockInfo[ii].totalBiomass - CuttingResidual), listOfPaddockInfo[ii].totalBiomass, 0.0);
	            foreach (PastureSpecies species in Apsim.Children(paddock, typeof(PastureSpecies)))
    	        {
        	        double amountToRemove = Math.Min(PropBiomassToRemove * species.AboveGroundWt, species.HarvestableWt);
            	    species.Graze(amount: amountToRemove, type: "SetRemoveAmount");
                	BiomassCut += species.HarvestedWt;
    	        }
            }
        }
    }
}
```
    Supplement: SpoilageTime=0
      Stores:
        IsRoughage  DMContent  DMD   MEContent  CPConc  ProtDg  PConc   SConc   EEConc  ADIP2CP  AshAlk  MaxPassage  Name    Stored
        true        0.85       0     0          0       0       0       0       0       0        0       0           fodder  0
        true        1          0.75  12         0.18    0.8     0.0032  0.0024  0.02    0.06     0.6     0           silage  20000000
    Report ReportRV: EventNames=[Clock].EndOfDay
      VariableNames:
        [Clock].Today
        [Stock].NumberYngAll
        [Stock].PregnantAll
        [Stock].LactatingAll
        [Stock].NumberAll as NumCows
        [Stock].IntakeAll.Weight as AveDMI
        [Stock].IntakeAll.Weight * [Stock].NumberAll  as HerdDMI
        [Stock].MEIntakeAll as AveMEIntake
        [Stock].WeightAll as AveBodyWeight
        [Stock].CondScoreAll as AveCS
        [Stock].MilkWtAll as AveMilkWeight
        sum([Supplement].PaddAmounts) as SuppsRemaining
        sum([Supplement].SuppToStock) as SuppsFed
        [Stock].Age
        [Stock].SuppIntakeAll.Weight as SuppIntake
        ([Stock].IntakeAll.Weight - [Stock].SuppIntakeAll.Weight) as PastureIntake
        [Stock].Paddock as StockInPaddockName
    Zone OneBigPaddock: Area=100; Slope=0
      Folder Managers
        Manager AutomaticFertiliser
          AllowFertiliser = yes
          Depth2SoilN = 500
          CriticalSoilN = 5
          FertNAmount = 25
          FertType = UreaN
          FertApplicationDepth = 1
          FertMinimumDays = 15
```csharp
using System;
using Models.Core;
using Models.PMF;
using Models.Soils;
using APSIM.Shared.Utilities;
using System.Xml.Serialization;

namespace Models
{
    [Serializable]
    public class Script : Model
    {
        [Link] Clock Clock;
        [Link] Fertiliser fertiliser;
        [Link] ISummary summary = null;
        [Link] Soil Soil;

        //User inputs from properties tab
        [Description("Turn ferliser applications on? ")]
        public yesnoType AllowFertiliser { get; set; }
        
        [Description("Depth to calculate available soil N (mm): ")]
        public double Depth2SoilN { get; set; }

        [Description("Minimum available N, triggers an application (kgN/ha): ")]
        public double CriticalSoilN { get; set; }

        [Description("Amount of N fertiliser for each application (kgN/ha): ")]
        public double FertNAmount { get; set; }

        [Description("Type of N fertiliser to apply: ")]
        public Fertiliser.Types FertType { get; set; }

        [Description("Depth at which to apply the fertiliser (mm): ")]
        public double FertApplicationDepth { get; set; }
       
        [Description("Minimum period between applications (days): ")]
        public double FertMinimumDays { get; set; }
       
        public enum yesnoType
        {
            /// <summary>a positive answer</summary>
            yes,
            /// <summary>a negative answer</summary>
            no
        }

        [XmlIgnore] public double TopMineralN { get; set; }
        
        private DateTime lastApplicationDate;
        private bool fertiliserIsAllowed;
        private int nLayers;

        [EventSubscribe("StartOfSimulation")]
        private void OnStartOfSimulation(object sender, EventArgs e)
        {
            fertiliserIsAllowed = (AllowFertiliser == yesnoType.yes);
            nLayers = Soil.Thickness.Length;
        }

        [EventSubscribe("DoManagement")]
        private void OnDoManagement(object sender, EventArgs e)
        {
            double daysSinceLastApplication = (Clock.Today - lastApplicationDate).TotalDays;
            
            // get the N stored in the soil
            double depthFromSurface = 0.0;
            double fracLayer = 0.0;
            TopMineralN = 0.0;
            for (int layer = 0; layer < nLayers; layer++)
            {
                fracLayer = Math.Min(1.0, (Depth2SoilN - depthFromSurface) / Soil.Thickness[layer]);
                TopMineralN += (Soil.SoilNitrogen.NO3[layer]
                + Soil.SoilNitrogen.NH4[layer]
                + Soil.SoilNitrogen.urea[layer])
                * fracLayer;
                depthFromSurface += Soil.Thickness[layer];
                if (depthFromSurface >= Depth2SoilN)
                    layer = nLayers;
            }

            if (fertiliserIsAllowed && (daysSinceLastApplication >= FertMinimumDays) && (TopMineralN <= CriticalSoilN))
            {
                fertiliser.Apply(FertNAmount, FertType, FertApplicationDepth);
                lastApplicationDate = Clock.Today;
            }
        }
    }
}
```
        Manager AutomaticIrrigation
          allowIrrigation = True
          seasonStart = 15-Aug
          seasonEnd = 30-May
          seasonsAllocation = 10000
          triggerDeficit = 75
          targetDeficit = 99
          returndays = 1
          maximumAmount = 30
          depthPAWC = 300
```csharp
using System;
using Models.Core;
using Models.PMF;
using Models.Soils;
using System.Xml.Serialization;
using Models.PMF;
using APSIM.Shared.Utilities;

        
namespace Models
{
    [Serializable] 
    [System.Xml.Serialization.XmlInclude(typeof(Model))]
    public class Script : Model
    {
        //Communication to other modules
        [Link] ISummary summary = null;
        [Link] Irrigation Irrigation;
        [Link] Clock Clock;
        [Link] Soil Soil;
        [Link(IsOptional = true)] IPlant existingCrop;
       
        //User inputs from properties tab
        [Description("Turn irrigation on?")]
        public bool allowIrrigation { get; set; }
        [Description("Start of irrigation season (dd-MMM)")]
        public string seasonStart { get; set; }
        [Description("End of irrigation season (dd-MMM)")]
        public string seasonEnd { get; set; }
        [Description("Season allocation (mm)")]
        public double seasonsAllocation { get; set; }
        [Description("Deficit to trigger irrigation (% PAWC)")]
        public double triggerDeficit { get; set; }
        [Description("Deficit to stop irrigaton (% PAWC)")]
        public double targetDeficit { get; set; }
        [Description("Minimum days for irrigation to return")]
        public double returndays { get; set; }
        [Description("Maximum irrigation application (mm/day)")]
        public double maximumAmount { get; set; }
        [Description("Depth to calculate PAWC (mm)")]
        public double depthPAWC { get; set; }

        //Class members
        [XmlIgnore] public double TopSWdeficit { get; set; }
        [XmlIgnore] public double TopSWC { get; set; }
        [XmlIgnore] public double DaysSinceIrrigation { get; set; }
        [XmlIgnore] public double AmountToApply { get; set; }
        [XmlIgnore] public double SeasonAppliedAmount { get; set; }
        
        private bool IrrigationIsAllowed { get; set; }
        private bool SeasonIsOpen { get; set; }
        private bool CropIsActive { get; set; }
        private bool IrrigatorIsAvailable { get; set; }
        private bool SoilIsDry { get; set; }

        private DateTime StartDate;
        private DateTime EndDate;
        private double TopDUL;
        private double TopLL;
        private int nLayers;
    
        //Calculate static soil variables
        [EventSubscribe("StartOfSimulation")]
        private void OnStartOfSimulation(object sender, EventArgs e)
        {   
            //Set the season dates
            StartDate = DateTime.Parse(seasonStart + "-" + Clock.Today.Year.ToString());
            EndDate = DateTime.Parse(seasonEnd + "-" + Clock.Today.Year.ToString());
            
            //Can we irrigate at all?
            IrrigationIsAllowed = false; 
            if (allowIrrigation)
                IrrigationIsAllowed = true; 

            //Calculate soil water variables
            double depthFromSurface = 0.0;
            double fracLayer = 0.0;
            nLayers = Soil.Thickness.Length;
            for (int layer = 0; layer < nLayers; layer++)
            {
                fracLayer = Math.Min(1.0, (depthPAWC - depthFromSurface) / Soil.Thickness[layer]);
                TopLL += Soil.LL15mm[layer] * fracLayer;
                TopDUL += Soil.DULmm[layer] * fracLayer;
                depthFromSurface += Soil.Thickness[layer];
                if (depthFromSurface >= depthPAWC)
                    layer = nLayers;
            }
        }
             
        //Determine daily requirement for irrigation
        [EventSubscribe("StartOfDay")]
        private void OnStartOfDay(object sender, EventArgs e)
        {
            //Can we irrigate today?          
            SeasonIsOpen = isBetween(Clock.Today, StartDate, EndDate);

            //Is there a crop in the ground that needs irrigation?
            CropIsActive = false;
            if ((existingCrop != null) && (existingCrop.IsAlive))
                CropIsActive = true;
            //if ((existingCrop.Phenology.Stage >= 3.0) && (existingCrop.Phenology.Stage < 6.0))
          
            //Is the irrigator available?
            IrrigatorIsAvailable = false;
            DaysSinceIrrigation += 1;
            if (DaysSinceIrrigation >= returndays)
                IrrigatorIsAvailable = true;
          
            //Is the soil dry enough to require irrigation?
            SoilIsDry = false;
            double depthFromSurface = 0.0;
            double fracLayer = 0.0;
            TopSWC = 0.0;
            for (int layer = 0; layer < nLayers; layer++)
            //for (int layer = 0; depthFromSurface < depthPAWC + Soil.Thickness[layer]; layer++)
            {
                fracLayer = Math.Min(1.0, (depthPAWC - depthFromSurface) / Soil.Thickness[layer]);
                TopSWC += Soil.SoilWater.SWmm[layer] * fracLayer;
                depthFromSurface += Soil.Thickness[layer];
                if (depthFromSurface >= depthPAWC)
                    layer = nLayers;
            }
            
            TopSWdeficit = TopSWC - TopDUL;
            if (Math.Max(0.0, -TopSWdeficit) >= (TopDUL - TopLL) * (100 - triggerDeficit) / 100)
                SoilIsDry = true;
                
            //Are all the conditions ratifying irrigation
            if (IrrigationIsAllowed && SeasonIsOpen && CropIsActive && IrrigatorIsAvailable && SoilIsDry)
            {
                //Lets bloody well irrigate then!!!!
                AmountToApply = TopDUL * targetDeficit / 100 - TopSWC;
                AmountToApply = Math.Max(0.0, Math.Min(AmountToApply, seasonsAllocation - SeasonAppliedAmount));
                Irrigation.Apply(AmountToApply);
                DaysSinceIrrigation = 0;
                SeasonAppliedAmount += AmountToApply;
            }
        }
        
        ///Checks whether theDate is between iniDate and endDate (non-year specific)
        private bool isBetween(DateTime theDay, DateTime iniDate, DateTime endDate)
        {
            bool result = false;
            if (iniDate.DayOfYear < endDate.DayOfYear)
            {
                // period is within one year, ex: summer in the northern hemisphere
                if ((theDay.DayOfYear >= iniDate.DayOfYear) && (theDay.DayOfYear <= endDate.DayOfYear))
                    result = true;
            }
            else
            {
                // period goes over the end of the year, ex: summer in the southern hemisphere
                if ((theDay.DayOfYear >= iniDate.DayOfYear) || (theDay.DayOfYear <= endDate.DayOfYear))
                    result = true;
            }
            
            return result;
        }
    }
}
```
      MicroClimate: a_interception=0; b_interception=0; c_interception=0; d_interception=0; soil_albedo=0.23; sun_angle=15; soil_heat_flux_fraction=0.4; night_interception_fraction=0.5; refheight=2; albedo=0.15; emissivity=0.96; RadIntTotal=0
      Irrigation
      Fertiliser
      SurfaceOrganicMatter: InitialResidueName=Sward; InitialResidueType=grass; InitialResidueMass=1000; InitialStandingFraction=0; InitialCPR=0; InitialCNR=15
      PastureSpecies Ryegrass: MaximumNUptake=10; Albedo=0.26; Gsmax=0.011; R50=200; SpeciesFamily=Grass; PhotosyntheticPathway=C3; InitialShootDM=2500; InitialRootDM=450; InitialRootDepth=750; ReferencePhotosyntheticRate=1; LightExtinctionCoefficient=0.5; GrowthTminimum=1; GrowthToptimum=20; GrowthTEffectExponent=1.7; UseHeatStressFactor=yes; HeatOnsetTemperature=28; HeatFullTemperature=35; HeatRecoverySumDD=30; HeatRecoveryTReference=25; UseColdStressFactor=yes; ColdOnsetTemperature=1; ColdFullTemperature=-5; ColdRecoverySumDD=25; ColdRecoveryTReference=0; MaintenanceRespirationCoefficient=0.03; GrowthRespirationCoefficient=0.25; RespirationTReference=20; RespirationExponent=1.5; NThresholdsForLeaves=[0.04, 0.012, 0.05]; NThresholdsForStems=[0.02, 0.006, 0.025]; NThresholdsForStolons=[0, 0, 0]; NThresholdsForRoots=[0.02, 0.006, 0.025]; DegreesDayForGermination=125; TargetShootRootRatio=4; MaxRootAllocation=0.25; ShootRootGlfFactor=0.5; UseReproSeasonFactor=yes; ReproSeasonReferenceLatitude=41; ReproSeasonTimingCoeff=0.14; ReproSeasonMaxAllocationIncrease=0.5; ReproSeasonAllocationCoeff=0.1; FractionLeafMaximum=0.7; FractionLeafMinimum=0.7; FractionLeafDMThreshold=500; FractionLeafDMFactor=2000; FractionLeafExponent=3; FractionToStolon=0; SpecificLeafArea=25; SpecificRootLength=100; StolonEffectOnLAI=0; ShootMaxEffectOnLAI=1000; MaxStemEffectOnLAI=1; LiveLeavesPerTiller=3; TissueTurnoverRateShoot=0.05; TissueTurnoverRateRoot=0.02; DetachmentRateShoot=0.08; TurnoverTemperatureMin=2; TurnoverTemperatureRef=20; TurnoverTemperatureExponent=1; TurnoverDroughtEffectMax=1; TurnoverDroughtThreshold=0.5; TurnoverDefoliationCoefficient=0.5; TurnoverDefoliationRootEffect=0.1; FractionNLuxuryRemobilisable=[0.1, 0.1, 0.1]; MinimumNFixation=0; MaximumNFixation=0; SoilSaturationEffectMax=0.1; MinimumWaterFreePorosity=-1; SoilSaturationRecoveryFactor=0.25; NDillutionCoefficient=0.25; GlfGeneric=1; GlfSoilFertility=1; PlantHeightMinimum=25; PlantHeightMaximum=600; PlantHeightMassForMax=10000; PlantHeightExponent=2.8; RootDepthMinimum=50; RootDepthMaximum=750; RootElongationRate=25; RootDistributionDepthParam=90; RootDistributionExponent=3.2; DigestibilitiesCellWall=[0.6, 0.6, 0.6, 0.2]; MinimumGreenWt=100; FractionStolonStanding=0; PreferenceForGreenOverDead=1; PreferenceForLeafOverStems=1; WaterAvailableMethod=DefaultAPSIM; NitrogenAvailableMethod=BasicAgPasture
        PastureAboveGroundOrgan Leaves
          GenericTissue LeafCohort1
          GenericTissue LeafCohort2
          GenericTissue LeafCohort3
          GenericTissue Dead
        PastureAboveGroundOrgan Stems
          GenericTissue LeafCohort1
          GenericTissue LeafCohort2
          GenericTissue LeafCohort3
          GenericTissue Dead
        PastureAboveGroundOrgan Stolons
          GenericTissue LeafCohort1
          GenericTissue LeafCohort2
          GenericTissue LeafCohort3
          GenericTissue Dead
      PastureSpecies WhiteClover: MaximumNUptake=10; Albedo=0.26; Gsmax=0.011; R50=200; SpeciesFamily=Legume; PhotosyntheticPathway=C3; InitialShootDM=500; InitialRootDM=150; InitialRootDepth=350; ReferencePhotosyntheticRate=1; LightExtinctionCoefficient=0.8; GrowthTminimum=2; GrowthToptimum=22; GrowthTEffectExponent=1.7; UseHeatStressFactor=yes; HeatOnsetTemperature=30; HeatFullTemperature=36; HeatRecoverySumDD=20; HeatRecoveryTReference=25; UseColdStressFactor=yes; ColdOnsetTemperature=2; ColdFullTemperature=-5; ColdRecoverySumDD=30; ColdRecoveryTReference=0; MaintenanceRespirationCoefficient=0.04; GrowthRespirationCoefficient=0.25; RespirationTReference=20; RespirationExponent=1.5; NThresholdsForLeaves=[0.045, 0.02, 0.055]; NThresholdsForStems=[0.0225, 0.01, 0.0275]; NThresholdsForStolons=[0.0225, 0.01, 0.0275]; NThresholdsForRoots=[0.0225, 0.01, 0.0275]; DegreesDayForGermination=125; TargetShootRootRatio=4; MaxRootAllocation=0.25; ShootRootGlfFactor=0.5; UseReproSeasonFactor=yes; ReproSeasonReferenceLatitude=41; ReproSeasonTimingCoeff=0.14; ReproSeasonMaxAllocationIncrease=0.5; ReproSeasonAllocationCoeff=0.1; FractionLeafMaximum=0.56; FractionLeafMinimum=0.28; FractionLeafDMThreshold=500; FractionLeafDMFactor=2000; FractionLeafExponent=3; FractionToStolon=0.2; SpecificLeafArea=30; SpecificRootLength=45; StolonEffectOnLAI=0.3; ShootMaxEffectOnLAI=500; MaxStemEffectOnLAI=0.5; LiveLeavesPerTiller=3; TissueTurnoverRateShoot=0.05; TissueTurnoverRateRoot=0.02; DetachmentRateShoot=0.11; TurnoverTemperatureMin=2; TurnoverTemperatureRef=20; TurnoverTemperatureExponent=1; TurnoverDroughtEffectMax=1; TurnoverDroughtThreshold=0.5; TurnoverDefoliationCoefficient=0.5; TurnoverDefoliationRootEffect=0.1; FractionNLuxuryRemobilisable=[0.1, 0.1, 0.1]; MinimumNFixation=0.2; MaximumNFixation=0.6; SoilSaturationEffectMax=0.1; MinimumWaterFreePorosity=-1; SoilSaturationRecoveryFactor=0.25; NDillutionCoefficient=1; GlfGeneric=1; GlfSoilFertility=1; PlantHeightMinimum=25; PlantHeightMaximum=350; PlantHeightMassForMax=7500; PlantHeightExponent=2.5; RootDepthMinimum=30; RootDepthMaximum=350; RootElongationRate=25; RootDistributionDepthParam=70; RootDistributionExponent=2.5; DigestibilitiesCellWall=[0.6, 0.6, 0.6, 0.2]; MinimumGreenWt=50; FractionStolonStanding=0; PreferenceForGreenOverDead=1; PreferenceForLeafOverStems=1; WaterAvailableMethod=DefaultAPSIM; NitrogenAvailableMethod=BasicAgPasture
        PastureAboveGroundOrgan Leaves
          GenericTissue LeafCohort1
          GenericTissue LeafCohort2
          GenericTissue LeafCohort3
          GenericTissue Dead
        PastureAboveGroundOrgan Stems
          GenericTissue LeafCohort1
          GenericTissue LeafCohort2
          GenericTissue LeafCohort3
          GenericTissue Dead
        PastureAboveGroundOrgan Stolons
          GenericTissue LeafCohort1
          GenericTissue LeafCohort2
          GenericTissue LeafCohort3
          GenericTissue Dead
      Soil LismoreSoil: SoilType=NZ_Sedimentary; LocalName=Lismore; Site=Winchmore; NearestTown=Ashburton; Region=Canterbury; Country=New Zealand; Latitude=-48.48; Longitude=0
        Analysis: PHUnits=Water; BoronUnits=HotWater
          Thickness  Rocks  PH  CEC   ParticleSizeSand  ParticleSizeSilt  ParticleSizeClay
          150        0      6   12.5  15                65                20
          150        0      6   10    20                65                15
          200        10     6   9     25                63                12
          150        40     6   5     35                57                8
          250        60     6   4     40                54                6
          300        70     6   4     40                55                5
          300        70     6   4     40                55                5
        Water
          Thickness  BD    AirDry  LL15   DUL    SAT   KS
          150        1.3   0.05    0.15   0.36   0.45  5000
          150        1.35  0.12    0.14   0.34   0.43  2500
          200        1     0.055   0.055  0.19   0.25  3000
          150        0.53  0.015   0.015  0.065  0.15  10000
          250        0.31  0.01    0.01   0.04   0.11  17500
          300        0.3   0.01    0.01   0.03   0.11  20000
          300        0.3   0.01    0.01   0.03   0.11  20000
          SoilCrop SwardSoil: LL=[0.15, 0.14, 0.06, 0.02, 0.01, 0.01, 0.01]; KL=[0.1, 0.1, 0.08, 0.04, 0.01, 0, 0]; XF=[1, 1, 1, 1, 1, 0, 0]
          SoilCrop RyegrassSoil: LL=[0.15, 0.14, 0.06, 0.02, 0.01, 0.01, 0.01]; KL=[0.1, 0.1, 0.08, 0.04, 0.01, 0, 0]; XF=[1, 1, 1, 1, 1, 0, 0]
          SoilCrop WhiteCloverSoil: LL=[0.15, 0.14, 0.06, 0.02, 0.01, 0.01, 0.01]; KL=[0.1, 0.1, 0.08, 0.04, 0.01, 0, 0]; XF=[1, 1, 1, 1, 1, 0, 0]
          SoilCrop Ryegrass1Soil: LL=[0.15, 0.14, 0.06, 0.02, 0.01, 0.01, 0.01]; KL=[0.1, 0.1, 0.08, 0.04, 0.01, 0, 0]; XF=[1, 1, 1, 1, 1, 0, 0]
        SoilWater: SummerDate=1-Nov; SummerU=6; SummerCona=3.5; WinterDate=1-apr; WinterU=2; WinterCona=2; DiffusConst=88; DiffusSlope=35; Salb=0.13; CN2Bare=73; CNRed=20; CNCov=0.8; slope=0; discharge_width=0; catchment_area=0; max_pond=0; ResidueInterception=0
          Thickness  SWCON  KLAT
          150        0.5    0
          150        0.52   0
          200        0.55   0
          150        0.6    0
          250        0.65   0
          300        0.65   0
          300        0.65   0
        SoilNitrogen: fom_type=[default, manure, mucuna, lablab, shemp, stable]; fract_carb=[0.2, 0.3, 0.54, 0.57, 0.45, 0]; fract_cell=[0.7, 0.3, 0.37, 0.37, 0.47, 0.1]; fract_lign=[0.1, 0.4, 0.09, 0.06, 0.08, 0.9]
        SoilOrganicMatter: RootCN=40; RootWt=1000; SoilCN=12; EnrACoeff=7.4; EnrBCoeff=0.2; OCUnits=Total
          Thickness  OC    FBiom  FInert
          150        3     0.04   0.5
          150        1     0.02   0.7
          200        0.6   0.02   0.83
          150        0.4   0.01   0.9
          250        0.25  0.01   0.95
          300        0.15  0      0.99
          300        0.1   0      0.99
        InitialWater Initial water: PercentMethod=EvenlyDistributed; FractionFull=0.95
        Sample Initial nitrogen: NO3Units=ppm; NH4Units=ppm; SWUnits=Volumetric; OCUnits=Total; PHUnits=Water
          Thickness  NO3   NH4
          150        5     0.1
          150        2.5   0.1
          200        1     0.1
          150        0.75  0.1
          250        0.5   0.1
          300        0.5   0.1
          300        0.5   0.1
        CERESSoilTemperature
      SoluteManager
      Report ReportPaddock: EventNames=[Clock].EndOfDay
        VariableNames:
          [Clock].Today
          [Ryegrass].AboveGroundWt + [WhiteClover].AboveGroundWt as AboveGroundWt
          [Ryegrass].HarvestableWt + [WhiteClover].HarvestableWt as HarvestableWt
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