Simulations: Version=216
  Memo Funding Acknowledgement
    The development of frost and heat damage functions was supported by the ‘Frost and Heat Management Analytics’ (FAHMA) project via funding from the Grains Research and Development Corporation (GRDC; Grant No. CSP2204-009RTX).
  Memo Data Ownership Acknowledgement
    Data description: https://doi.org/10.25919/j2af-ax46.

    Disclaimer: This dataset is provided “as is” without warranty of any kind, express or implied, including but not limited to its accuracy, completeness, or fitness for a particular purpose. The creators and contributors shall not be liable for any damages arising from its use.

    License: This dataset is released under [Creative Commons Attribution 4.0 International Licence](https://creativecommons.org/licenses/by/4.0/) in [CSIRO DAP](https://doi.org/10.25919/j2af-ax46).

    For further inquiries or permission requests, please contact Dr Julianne Lilley (julianne.lilley@csiro.au).

    When citing this dataset, please use the following reference: Lilley, Julianne; Kirkegaard, John; Whish, Jeremy; Beletse, Yacob; Berger, Jens; Seymour, Mark; Bucat, Jackie; Herrmann, Chris; Dunn, Mathew; Ware, Andrew; Brill, Rohan; & Zhang, Heping (2024): Canola Agronomy. v3. CSIRO. Data Collection. https://doi.org/10.25919/j2af-ax46.

    When using the damage functions, please use the following reference for more information: Hu, P., He, D., Zheng, B., Whish, J., Kirkegaard, J., Bell, L., Leske, B., Chen, S., Uppal, R., Biddulph, B., Trethowan, R., Beletse, Y., Lilley, J., 2026. Event-based frost and heat damage functions improve yield predictions of APSIM canola and wheat: formulation, calibration, and evaluation. Agricultural and Forest Meteorology 386, 111239. https://doi.org/10.1016/j.agrformet.2026.111239
  DataStore
    ExcelInput Observation: FileNames=[CanolaAgronomy_1_Obs.xlsx]; SheetNames=[Obs]
    PredictedObserved: PredictedTableName=HarvestReport; ObservedTableName=Obs; FieldNameUsedForMatch=SimulationID; AllColumns=true
    PredictedObserved DamageFunctionHarvestObsPred: PredictedTableName=DamageFunctionHarvestReport; ObservedTableName=Obs; FieldNameUsedForMatch=SimulationName; AllColumns=true
  Folder Replacements
    Folder CultivarFolder
      Cultivar Garnet
        Command:
          [Phenology].Vegetative.Target.XYPairs.X = 0,16
          [Phenology].Vegetative.Target.XYPairs.Y = 550,250
          [Leaf].Phyllochron.Base.FixedValue = 55
          //newplant
          [Leaf].DMDemands.Structural.DeltaLAIPotential.Vegetative.Delta.RelativeArea.RelativeAreaModified.HybridModifier.FixedValue = 1.5
          //plant
          //[Leaf].DMDemands.Structural.DeltaLAIPotential.Vegetative.Delta.RelativeArea.RelativeAreaModified.HybridModifier.FixedValue = 1
          //[Leaf].Area.Calculation.Initial.AreaPerPlant.FixedValue = 0.0001
          //[Leaf].AreaLargestLeaf.FixedValue = 0.015
          //[Leaf].Photosynthesis.RUE.TriazineToleranceModifier.FixedValue = 1
          //newplant
          //[Leaf].DMDemands.Structural.DeltaLAIPotential.Vegetative.Delta.RelativeArea.RelativeAreaModified.HybridModifier.FixedValue = 1.5
          //Hybrid
          //[Leaf].DMDemands.Structural.DeltaLAIPotential.Vegetative.Delta.RelativeArea.RelativeAreaModified.HybridModifier.FixedValue = 1.8
          //[Leaf].AreaLargestLeaf.FixedValue = 0.019
          //[Leaf].Area.Calculation.Initial.AreaPerPlant.FixedValue = 0.0002
          //TT
          //[Leaf].Photosynthesis.RUE.TriazineToleranceModifier.FixedValue = 0.78
          //[Leaf].AreaLargestLeaf.FixedValue = 0.01
          //[Leaf].Area.Calculation.Initial.AreaPerPlant.FixedValue = 0.00005
          //[Leaf].DMDemands.Structural.DeltaLAIPotential.Vegetative.Delta.RelativeArea.RelativeAreaModified.HybridModifier.FixedValue = 0.5
          //NewTT
          //[Leaf].AreaLargestLeaf.FixedValue = 0.005
          //[Leaf].Area.Calculation.Initial.AreaPerPlant.FixedValue = 0.00005
          //[Leaf].Photosynthesis.RUE.TriazineToleranceModifier.FixedValue = 0.78
          //[Leaf].DMDemands.Structural.DeltaLAIPotential.Vegetative.Delta.RelativeArea.RelativeAreaModified.HybridModifier.FixedValue = 1.5
          //[Stem].PotentialGrowth.PartitionFraction.StemGrowthPhase.StemFraction.XYPairs.Y = 0.1, 0.3, 0.6,0.6,0.6
          //[Shell].SpecificArea.FixedValue = 0.03
          //default [Phenology].Vegetative.Target.XYPairs.X = 0,16
          //[Phenology].Vegetative.Target.XYPairs.Y = 550,250
          //[Leaf].Phyllochron.Base.FixedValue = 55
          //maxBio[Phenology].Vegetative.Target.XYPairs.X = 0,8
          //[Phenology].Vegetative.Target.XYPairs.Y = 2550s2,100 //1450s1, 100//2300,150
          //[Leaf].Phyllochron.Base.FixedValue = 70/70/65
          //minBio[Phenology].Vegetative.Target.XYPairs.X = 0,26
          //[Phenology].Vegetative.Target.XYPairs.Y = 650,200, 700,100
          //[Leaf].Phyllochron.Base.FixedValue = 30
          //currentuse[Phenology].Vegetative.Target.XYPairs.X = 0,22
          //[Phenology].Vegetative.Target.XYPairs.Y = 700,100
          //[Leaf].Phyllochron.Base.FixedValue = 50
      Cultivar Rainbow
        Command:
          [Phenology].Vegetative.Target.XYPairs.X = 0,12
          [Phenology].Vegetative.Target.XYPairs.Y = 2800,100
          [Leaf].Phyllochron.Base.FixedValue = 50
      Cultivar 46Y78
        Command:
          [Phenology].Vegetative.Target.XYPairs.X = 0,14
          [Phenology].Vegetative.Target.XYPairs.Y = 600,450
          [Leaf].Phyllochron.Base.FixedValue = 50
          //Hybrid
          [Leaf].DMDemands.Structural.DeltaLAIPotential.Vegetative.Delta.RelativeArea.RelativeAreaModified.HybridModifier.FixedValue = 1.8
          [Leaf].AreaLargestLeaf.FixedValue = 0.019
          [Leaf].Area.Calculation.Initial.AreaPerPlant.FixedValue = 0.0002
      Cultivar Beacon
        Command:
          [Phenology].Vegetative.Target.XYPairs.X = 0,25
          [Phenology].Vegetative.Target.XYPairs.Y = 561,1
          [Leaf].Phyllochron.Base.FixedValue = 50
          //NewTT
          [Leaf].AreaLargestLeaf.FixedValue = 0.005
          [Leaf].Area.Calculation.Initial.AreaPerPlant.FixedValue = 0.00005
          [Leaf].Photosynthesis.RUE.TriazineToleranceModifier.FixedValue = 0.78
          [Leaf].DMDemands.Structural.DeltaLAIPotential.Vegetative.Delta.RelativeArea.RelativeAreaModified.HybridModifier.FixedValue = 1.5
      Cultivar Hyola75
        Command:
          [Phenology].Vegetative.Target.XYPairs.X = 0,18
          [Phenology].Vegetative.Target.XYPairs.Y = 850,150
          [Leaf].Phyllochron.Base.FixedValue = 50
          //Hybrid
          [Leaf].DMDemands.Structural.DeltaLAIPotential.Vegetative.Delta.RelativeArea.RelativeAreaModified.HybridModifier.FixedValue = 1.8
          [Leaf].AreaLargestLeaf.FixedValue = 0.019
          [Leaf].Area.Calculation.Initial.AreaPerPlant.FixedValue = 0.0002
      Cultivar Skipton
        Command:
          [Phenology].Vegetative.Target.XYPairs.X = 0,8
          [Phenology].Vegetative.Target.XYPairs.Y = 1950,100
          [Leaf].Phyllochron.Base.FixedValue = 64
          //[Phenology].Vegetative.Target.XYPairs.X = 0,14
          //[Phenology].Vegetative.Target.XYPairs.Y = 900,100
          //[Leaf].Phyllochron.Base.FixedValue = 50
          //newplant
          [Leaf].DMDemands.Structural.DeltaLAIPotential.Vegetative.Delta.RelativeArea.RelativeAreaModified.HybridModifier.FixedValue = 2
      Cultivar Dunkeld
        Command:
          [Phenology].Vegetative.Target.XYPairs.X = 0,12
          [Phenology].Vegetative.Target.XYPairs.Y = 2800,100
          [Leaf].Phyllochron.Base.FixedValue = 50
      Cultivar AgOutback
        Command:
          [Phenology].Vegetative.Target.XYPairs.X = 0,12
          [Phenology].Vegetative.Target.XYPairs.Y = 1000,150
          [Leaf].Phyllochron.Base.FixedValue = 50
          //[Phenology].Vegetative.Target.XYPairs.X = 0,6
          //[Phenology].Vegetative.Target.XYPairs.Y = 500,200
          //[Leaf].Phyllochron.Base.FixedValue = 50
      Cultivar Hyola42
        Command:
          //[Phenology].Vegetative.Target.XYPairs.X = 0,6
          //[Phenology].Vegetative.Target.XYPairs.Y = 2550,100
          //[Leaf].Phyllochron.Base.FixedValue = 70
          [Phenology].StemElongation.Target.PPResponse.Amount.FixedValue = 500
          [Phenology].StemElongation.Target.Base.FixedValue = 1
          [Phenology].StemElongation.Target.PPResponse.Shape.XYPairs.X = 10.8,16.3
          [Phenology].Vegetative.Target.XYPairs.X = 0,10
          [Phenology].Vegetative.Target.XYPairs.Y = 1500,1
          [Leaf].Phyllochron.Base.FixedValue = 50
      Cultivar Oscar
        Command:
          [Phenology].Vegetative.Target.XYPairs.X = 0,12
          [Phenology].Vegetative.Target.XYPairs.Y = 2800,100
          [Leaf].Phyllochron.Base.FixedValue = 50
      Cultivar 43Y85
        Command:
          [Phenology].Vegetative.Target.XYPairs.X = 0,10
          [Phenology].Vegetative.Target.XYPairs.Y = 1350,100
          [Leaf].Phyllochron.Base.FixedValue = 50
          //Hybrid
          [Leaf].DMDemands.Structural.DeltaLAIPotential.Vegetative.Delta.RelativeArea.RelativeAreaModified.HybridModifier.FixedValue = 1.8
          [Leaf].AreaLargestLeaf.FixedValue = 0.019
          [Leaf].Area.Calculation.Initial.AreaPerPlant.FixedValue = 0.0002
      Cultivar 44Y84
        Command:
          [Phenology].Vegetative.Target.XYPairs.X = 0,12
          [Phenology].Vegetative.Target.XYPairs.Y = 1550,100
          [Leaf].Phyllochron.Base.FixedValue = 50
          //[Phenology].Vegetative.Target.XYPairs.X = 0,20
          //[Phenology].Vegetative.Target.XYPairs.Y = 700,100
          //[Leaf].Phyllochron.Base.FixedValue = 50
          //Hybrid
          [Leaf].DMDemands.Structural.DeltaLAIPotential.Vegetative.Delta.RelativeArea.RelativeAreaModified.HybridModifier.FixedValue = 1.8
          [Leaf].AreaLargestLeaf.FixedValue = 0.019
          [Leaf].Area.Calculation.Initial.AreaPerPlant.FixedValue = 0.0002
      Cultivar Hyola555TT
        Command:
          [Phenology].Vegetative.Target.XYPairs.X = 0,12
          [Phenology].Vegetative.Target.XYPairs.Y = 1500,100
          [Leaf].Phyllochron.Base.FixedValue = 50
          [Leaf].Photosynthesis.RUE.TriazineToleranceModifier.FixedValue = 0.78
          //TT
          //[Leaf].Photosynthesis.RUE.TriazineToleranceModifier.FixedValue = 0.78
          [Leaf].AreaLargestLeaf.FixedValue = 0.01
          [Leaf].Area.Calculation.Initial.AreaPerPlant.FixedValue = 0.00005
          [Leaf].DMDemands.Structural.DeltaLAIPotential.Vegetative.Delta.RelativeArea.RelativeAreaModified.HybridModifier.FixedValue = 0.5
      Cultivar Hyola50
        Command:
          [Phenology].Vegetative.Target.XYPairs.X = 0,46
          [Phenology].Vegetative.Target.XYPairs.Y = 450,150
          [Leaf].Phyllochron.Base.FixedValue = 50
          //Hybrid
          [Leaf].DMDemands.Structural.DeltaLAIPotential.Vegetative.Delta.RelativeArea.RelativeAreaModified.HybridModifier.FixedValue = 1.8
          [Leaf].AreaLargestLeaf.FixedValue = 0.019
          [Leaf].Area.Calculation.Initial.AreaPerPlant.FixedValue = 0.0002
      Cultivar Surpass500
        Command:
          [Phenology].Vegetative.Target.XYPairs.X = 0,25
          [Phenology].Vegetative.Target.XYPairs.Y = 441,1
          [Leaf].Phyllochron.Base.FixedValue = 50
          //NewTT
          [Leaf].AreaLargestLeaf.FixedValue = 0.005
          [Leaf].Area.Calculation.Initial.AreaPerPlant.FixedValue = 0.00005
          [Leaf].Photosynthesis.RUE.TriazineToleranceModifier.FixedValue = 0.78
          [Leaf].DMDemands.Structural.DeltaLAIPotential.Vegetative.Delta.RelativeArea.RelativeAreaModified.HybridModifier.FixedValue = 1.5
      Cultivar Hyola575
        Command:
          [Phenology].Vegetative.Target.XYPairs.X = 0,8
          [Phenology].Vegetative.Target.XYPairs.Y = 1300,100
          [Leaf].Phyllochron.Base.FixedValue = 50
          //Hybrid
          [Leaf].DMDemands.Structural.DeltaLAIPotential.Vegetative.Delta.RelativeArea.RelativeAreaModified.HybridModifier.FixedValue = 1.8
          [Leaf].AreaLargestLeaf.FixedValue = 0.019
          [Leaf].Area.Calculation.Initial.AreaPerPlant.FixedValue = 0.0002
      Cultivar 43C80_CL
        Command:
          [Phenology].Vegetative.Target.XYPairs.X = 0,8
          [Phenology].Vegetative.Target.XYPairs.Y = 2800,100
          [Leaf].Phyllochron.Base.FixedValue = 50
          //Hybrid
          [Leaf].DMDemands.Structural.DeltaLAIPotential.Vegetative.Delta.RelativeArea.RelativeAreaModified.HybridModifier.FixedValue = 1.8
          [Leaf].AreaLargestLeaf.FixedValue = 0.019
          [Leaf].Area.Calculation.Initial.AreaPerPlant.FixedValue = 0.0002
      Cultivar 44C79
        Command:
          [Phenology].Vegetative.Target.XYPairs.X = 0,2
          [Phenology].Vegetative.Target.XYPairs.Y = 400,350
          [Leaf].Phyllochron.Base.FixedValue = 50
      Cultivar Tarcoola
        Command:
          [Phenology].Vegetative.Target.XYPairs.X = 0,6
          [Phenology].Vegetative.Target.XYPairs.Y = 500,200
          [Leaf].Phyllochron.Base.FixedValue = 50
      Cultivar ATR_Gem
        Command:
          [Phenology].Vegetative.Target.XYPairs.X = 0,12
          [Phenology].Vegetative.Target.XYPairs.Y = 1650,100
          [Leaf].Phyllochron.Base.FixedValue = 50
          [Leaf].Photosynthesis.RUE.TriazineToleranceModifier.FixedValue = 0.78
          //TT
          //[Leaf].Photosynthesis.RUE.TriazineToleranceModifier.FixedValue = 0.78
          [Leaf].AreaLargestLeaf.FixedValue = 0.01
          [Leaf].Area.Calculation.Initial.AreaPerPlant.FixedValue = 0.00005
          [Leaf].DMDemands.Structural.DeltaLAIPotential.Vegetative.Delta.RelativeArea.RelativeAreaModified.HybridModifier.FixedValue = 0.5
      Cultivar ATR_Stingray
        Command:
          [Phenology].Vegetative.Target.XYPairs.X = 0,2
          [Phenology].Vegetative.Target.XYPairs.Y = 150,100
          [Leaf].Phyllochron.Base.FixedValue = 70
          [Leaf].Photosynthesis.RUE.TriazineToleranceModifier.FixedValue = 0.78
          //TT
          //[Leaf].Photosynthesis.RUE.TriazineToleranceModifier.FixedValue = 0.78
          [Leaf].AreaLargestLeaf.FixedValue = 0.01
          [Leaf].Area.Calculation.Initial.AreaPerPlant.FixedValue = 0.00005
          [Leaf].DMDemands.Structural.DeltaLAIPotential.Vegetative.Delta.RelativeArea.RelativeAreaModified.HybridModifier.FixedValue = 0.5
      Cultivar Hyola559_TT
        Command:
          [Phenology].Vegetative.Target.XYPairs.X = 0,10
          [Phenology].Vegetative.Target.XYPairs.Y = 1850,100
          [Leaf].Phyllochron.Base.FixedValue = 50
          [Leaf].Photosynthesis.RUE.TriazineToleranceModifier.FixedValue = 0.78
          //TT
          //[Leaf].Photosynthesis.RUE.TriazineToleranceModifier.FixedValue = 0.78
          [Leaf].AreaLargestLeaf.FixedValue = 0.01
          [Leaf].Area.Calculation.Initial.AreaPerPlant.FixedValue = 0.00005
          [Leaf].DMDemands.Structural.DeltaLAIPotential.Vegetative.Delta.RelativeArea.RelativeAreaModified.HybridModifier.FixedValue = 0.5
    Plant Canola: PlantType=Canola
      OrganArbitrator Arbitrator
        BiomassTypeArbitrator DMArbitration
          Folder PotentialPartitioningMethods
            ReallocationMethod
            AllocateFixationMethod
            RetranslocationMethod
            SendPotentialDMAllocationsMethod
          Folder AllocationMethods
            NutrientConstrainedAllocationMethod
            DryMatterAllocationsMethod
          RelativeAllocation ArbitrationMethod
        BiomassTypeArbitrator NArbitration
          Folder PotentialPartitioningMethods
            ReallocationMethod
          Folder ActualPartitioningMethods
            AllocateFixationMethod
            RetranslocationMethod
          Folder AllocationMethods
            NitrogenAllocationsMethod
          RelativeAllocation ArbitrationMethod
          AllocateUptakesMethod
        WaterUptakeMethod
        NitrogenUptakeMethod
      Phenology
        SubDailyInterpolation ThermalTime: agregationMethod=0
          XYPairs Response: X=[2, 30, 35]; Y=[0, 28, 0]
          ThreeHourAirTemperature InterpolationMethod
        AccumulateFunction CumulativeThermalTime: StartStageName=Germination; EndStageName=FloralInitiation; FractionRemovedOnCut=0; FractionRemovedOnHarvest=0; FractionRemovedOnGraze=0; FractionRemovedOnPrune=0
          VariableReference DailyValue: VariableName=[Phenology].ThermalTime
        SubDailyInterpolation VernalTime: agregationMethod=0
          XYPairs Response: X=[0, 2, 8, 15]; Y=[0, 1, 0.5, 0]
          ThreeHourAirTemperature InterpolationMethod
        AccumulateFunction CumulativeVernalTime: StartStageName=Germination; EndStageName=FloralInitiation; FractionRemovedOnCut=0; FractionRemovedOnHarvest=0; FractionRemovedOnGraze=0; FractionRemovedOnPrune=0
          VariableReference DailyValue: VariableName=[Phenology].VernalTime
        PhotoperiodFunction Photoperiod: Twilight=-6; DayLength=0
        GerminatingPhase Germinating: Start=Sowing; End=Germination; IsEmerged=false
          Constant MinSoilTemperature: FixedValue=0
        EmergingPhase Emerging: Start=Germination; End=Emergence; IsEmerged=false; TTForTimeStep=0
          VariableReference ThermalTime: VariableName=[Phenology].ThermalTime
          AddFunction Target
            Constant ShootLag: FixedValue=15
            MultiplyFunction DepthxRate
              VariableReference SowingDepth: VariableName=[Plant].SowingData.Depth
              Constant ShootRate: FixedValue=5
        GenericPhase Vegetative: Start=Emergence; End=FloralInitiation; IsEmerged=true
          VariableReference Progression: VariableName=[Phenology].ThermalTime
          LinearInterpolationFunction Target
            XYPairs: X=[0, 25]; Y=[290, 1]
            VariableReference XValue: VariableName=[Phenology].CumulativeVernalTime
        SimpleLeafAppearancePhase BudDevelopment: Start=FloralInitiation; End=GreenBud; IsEmerged=true
          VariableReference TargetLeafNumber: VariableName=[Leaf].FinalLeafNumber
          VariableReference CurrentLeafNumber: VariableName=[Leaf].NodeNumber
        GenericPhase StemElongation: Start=GreenBud; End=StartFlowering; IsEmerged=true
          VariableReference Progression: VariableName=[Phenology].ThermalTime
          AddFunction Target
            Constant Base: FixedValue=250
            MultiplyFunction PPResponse
              Constant Amount: FixedValue=0
              LinearInterpolationFunction Shape
                XYPairs: X=[13, 14]; Y=[1, 0]
                VariableReference XValue: VariableName=[Phenology].Photoperiod
        GenericPhase EarlyFlowering: Start=StartFlowering; End=StartPodDevelopment; IsEmerged=true
          Memo
            The duration of the grain filling phase has been taken from the model of Robertson et al (2002).
          Constant Target: FixedValue=100
          VariableReference Progression: VariableName=[Phenology].ThermalTime
        GenericPhase EarlyPodDevelopment: Start=StartPodDevelopment; End=StartGrainFilling; IsEmerged=true
          Memo
            The duration of the grain filling phase has been taken from the model of Robertson et al (2002).
          Constant Target: FixedValue=140
          VariableReference Progression: VariableName=[Phenology].ThermalTime
          VariableReference Stress: VariableName=[Phenology].Vegetative.PhotoperiodEffect
        GenericPhase EarlyGrainFilling: Start=StartGrainFilling; End=EndFlowering; IsEmerged=true
          VariableReference Progression: VariableName=[Phenology].ThermalTime
          VariableReference Stress: VariableName=[Phenology].Vegetative.PhotoperiodEffect
          MultiplyFunction Target
            Constant FractionofGrainfilling: FixedValue=0.05
            VariableReference EntireGrainfilling
              VariableName=[Phenology].LateGrainFilling.Target.EntireGrainfillPeriod.FixedValue
        GenericPhase MidGrainFilling: Start=EndFlowering; End=EndPodDevelopment; IsEmerged=true
          VariableReference Progression: VariableName=[Phenology].ThermalTime
          VariableReference Stress: VariableName=[Phenology].Vegetative.PhotoperiodEffect
          MultiplyFunction Target
            Constant FractionofMidToLateGrainfilling: FixedValue=0.5
            SubtractFunction
              VariableReference EntireGrainfilling
                VariableName=[Phenology].LateGrainFilling.Target.EntireGrainfillPeriod.FixedValue
              VariableReference EarlyGrainfilling: VariableName=[Phenology].EarlyGrainFilling.Target
        GenericPhase LateGrainFilling: Start=EndPodDevelopment; End=EndGrainFill; IsEmerged=true
          SubtractFunction Target
            Constant EntireGrainfillPeriod: FixedValue=700
            VariableReference EarlyGrainFillingTarget: VariableName=[Phenology].EarlyGrainFilling.Target
            VariableReference MidGrainFillingTarget: VariableName=[Phenology].MidGrainFilling.Target
          VariableReference Progression: VariableName=[Phenology].ThermalTime
          VariableReference Stress: VariableName=[Phenology].Vegetative.PhotoperiodEffect
        GenericPhase Maturing: Start=EndGrainFill; End=Maturity; IsEmerged=true
          Constant Target: FixedValue=5
          VariableReference Progression: VariableName=[Phenology].ThermalTime
        GenericPhase Ripening: Start=Maturity; End=HarvestRipe; IsEmerged=true
          Constant Target: FixedValue=1
          VariableReference Progression: VariableName=[Phenology].ThermalTime
        EndPhase ReadyForHarvesting: Start=HarvestRipe; End=Unused; IsEmerged=true
          VariableReference ThermalTime: VariableName=[Phenology].ThermalTime
        OnEventFunction EmergenceDAS: SetEvent=Emergence; ReSetEvent=never
          Memo
            A function is used to provide maturity date as days after sowing(DAS).
          Constant PreEventValue: FixedValue=0
          VariableReference PostEventValue: VariableName=[Plant].DaysAfterSowing
        OnEventFunction FloralInitiationDAS: SetEvent=FloralInitiation; ReSetEvent=never
          Memo
            A function is used to provide flowering date as days after sowing(DAS).
          Constant PreEventValue: FixedValue=0
          VariableReference PostEventValue: VariableName=[Plant].DaysAfterSowing
        OnEventFunction GreenBudDAS: SetEvent=GreenBud; ReSetEvent=never
          Memo
            A function is used to provide flowering date as days after sowing(DAS).
          Constant PreEventValue: FixedValue=0
          VariableReference PostEventValue: VariableName=[Plant].DaysAfterSowing
        OnEventFunction StartFloweringDAS: SetEvent=StartFlowering; ReSetEvent=never
          Memo
            A function is used to provide flowering date as days after sowing(DAS).
          Constant PreEventValue: FixedValue=0
          VariableReference PostEventValue: VariableName=[Plant].DaysAfterSowing
        OnEventFunction MaturityDAS: SetEvent=Maturity; ReSetEvent=never
          Memo
            A function is used to provide maturity date as days after sowing(DAS).
          Constant PreEventValue: FixedValue=0
          VariableReference PostEventValue: VariableName=[Plant].DaysAfterSowing
      Root: GrowthRespiration=0; MaintenanceRespiration=0
        RootShapeCylinder RootShape
        LinearInterpolationFunction KLModifier
          XYPairs: X=[0, 3]; Y=[1, 1]
          VariableReference XValue: VariableName=[Leaf].LAI
        SubDailyInterpolation TemperatureEffect: agregationMethod=0
          XYPairs Response: X=[0, 20, 32]; Y=[0, 1, 0]
          ThreeHourAirTemperature InterpolationMethod
        Constant MaxDailyNUptake: FixedValue=6
        Constant SenescenceRate: FixedValue=0.005
        Constant MaximumRootDepth: FixedValue=1000000
        MultiplyFunction RootFrontVelocity
          PhaseLookup PotentialRate
            PhaseLookupValue PreEmergence: Start=Germination; End=Emergence
              Constant Function: FixedValue=5
            PhaseLookupValue early: Start=Emergence; End=StartGrainFilling
              Constant Function: FixedValue=44
            PhaseLookupValue late: Start=StartGrainFilling; End=Maturity
              Constant Function: FixedValue=0
          WeightedTemperatureFunction TemperatureFactor: MaximumTemperatureWeighting=0.5
            XYPairs: X=[0, 20, 32]; Y=[0, 1, 0]
        Constant MaximumNConc: FixedValue=0.01
        Constant MinimumNConc: FixedValue=0.005
        PhaseLookupValue NitrogenDemandSwitch: Start=Emergence; End=EndGrainFill
          Constant: FixedValue=1
        LinearInterpolationFunction KNO3
          XYPairs: X=[0, 0.003]; Y=[0.01, 0.01]
          VariableReference XValue: VariableName=[Root].LengthDensity
        LinearInterpolationFunction KNH4
          XYPairs: X=[0, 0.003]; Y=[0, 0]
          VariableReference XValue: VariableName=[Root].LengthDensity
        BiomassRemoval BiomassRemovalDefaults: HarvestFractionLiveToRemove=0; HarvestFractionDeadToRemove=0; HarvestFractionLiveToResidue=0.2; HarvestFractionDeadToResidue=0
        LinearInterpolationFunction NUptakeSWFactor
          XYPairs: X=[0, 1]; Y=[0, 1]
          VariableReference XValue: VariableName=[Root].RWC
        Constant SpecificRootLength: FixedValue=40; Units=m/g
        Constant DMConversionEfficiency: FixedValue=1
        Constant MaintenanceRespirationFunction: FixedValue=1
        Constant RemobilisationCost: FixedValue=0
        Constant CarbonConcentration: FixedValue=0.4
        NutrientDemandFunctions DMDemands
          MultiplyFunction Structural
            PartitionFractionDemandFunction DMDemandFunction
              PhaseLookup PartitionFraction
                PhaseLookupValue Early: Start=Emergence; End=StartFlowering
                  Constant Function: FixedValue=0.2
                PhaseLookupValue Middle: Start=StartFlowering; End=StartGrainFilling
                  Constant Function: FixedValue=0.1
                PhaseLookupValue Late: Start=StartGrainFilling; End=Maturity
                  Constant Function: FixedValue=0
            Constant StructuralFraction: FixedValue=1
          Constant Metabolic: FixedValue=0
          StorageDMDemandFunction Storage
            SubtractFunction StorageFraction
              Constant One: FixedValue=1
              VariableReference StructuralFraction: VariableName=[Root].DMDemands.Structural.StructuralFraction
          Constant QStructuralPriority: FixedValue=1
          Constant QMetabolicPriority: FixedValue=1
          Constant QStoragePriority: FixedValue=1
        NutrientDemandFunctions NDemands
          MultiplyFunction Structural
            VariableReference MinNconc: VariableName=[Root].minimumNconc
            VariableReference PotentialDMAllocation: VariableName=[Root].potentialDMAllocation.Structural
          MultiplyFunction Metabolic
            SubtractFunction MetabolicNconc
              VariableReference CritNconc: VariableName=[Root].criticalNConc
              VariableReference MinNconc: VariableName=[Root].minimumNconc
            VariableReference PotentialDMAllocation: VariableName=[Root].potentialDMAllocation.Structural
          StorageNDemandFunction Storage
            VariableReference NitrogenDemandSwitch: VariableName=[Root].nitrogenDemandSwitch
            VariableReference MaxNconc: VariableName=[Root].maximumNconc
          Constant QStructuralPriority: FixedValue=1
          Constant QMetabolicPriority: FixedValue=1
          Constant QStoragePriority: FixedValue=1
        VariableReference CriticalNConc: VariableName=[Root].MinimumNConc
        NutrientPoolFunctions InitialWt
          Constant Structural: FixedValue=0.2; Units=g/plant
          Constant Metabolic: FixedValue=0
          Constant Storage: FixedValue=0
        Constant RootDepthStressFactor: FixedValue=1
      SimpleLeaf Leaf: Albedo=0.25; Gsmax350=0.015; R50=150; LeafInitialisationStage=Emergence; Height=0; BaseHeight=0; Width=0; FRGR=0; PotentialEP=0; WaterDemand=0; KDead=0.3; LAIDead=0
        RUEModel Photosynthesis
          MultiplyFunction RUE
            Constant Potential: FixedValue=1.69
              Memo
                This approach is based upon the value used in [#robertson_simulation_2002] increased to account for partitioning to roots.
            Constant TriazineToleranceModifier: FixedValue=1
          WeightedTemperatureFunction FT: MaximumTemperatureWeighting=0.75
            Memo
              This approach is based upon that used in Bell, WRight and Hammer (1992) Crop Sci
            XYPairs: X=[0, 10, 22, 30]; Y=[0, 1, 1, 0]
          LinearInterpolationFunction FVPD
            XYPairs: X=[0, 10, 50]; Y=[1, 1, 1]
            VariableReference XValue: VariableName=[Leaf].Photosynthesis.VPD
          LinearInterpolationFunction FN
            XYPairs: X=[0, 1, 1.5]; Y=[0, 1, 1]
            VariableReference XValue: VariableName=[Leaf].Fn
          LinearInterpolationFunction FW
            XYPairs: X=[0, 1]; Y=[0, 1]
            VariableReference XValue: VariableName=[Leaf].Fw
          RUECO2Function FCO2: PhotosyntheticPathway=C3
          VariableReference RadnInt: VariableName=[Leaf].RadiationIntercepted
        StomatalConductanceCO2Modifier
          VariableReference PhotosynthesisCO2Modifier: VariableName=[Leaf].Photosynthesis.FCO2
        MaximumFunction Area
          AddFunction Calculation
            MultiplyFunction Initial
              Constant AreaPerPlant: FixedValue=0.0005
              VariableReference Population: VariableName=[Plant].SowingData.Population
            SubtractFunction Change
              AccumulateAtEvent AreaGrowth: StartStageName=Emergence; EndStageName=StartFlowering; AccumulateEventName=[Clock].DoActualPlantGrowth
                MultiplyFunction DeltaArea
                  VariableReference DeltaMass: VariableName=[Leaf].Allocated.StructuralWt
                  VariableReference SLA: VariableName=[Leaf].SpecificArea
              AccumulateAtEvent AreaSenesced: StartStageName=Emergence; EndStageName=HarvestRipe; AccumulateEventName=[Clock].DoActualPlantGrowth
                MultiplyFunction DeltaArea
                  VariableReference DeltaSenesced: VariableName=[Leaf].Senesced.StructuralWt
                  VariableReference SLA: VariableName=[Leaf].SpecificAreaCanopy
              AccumulateAtEvent AreaRemoved: StartStageName=Emergence; EndStageName=HarvestRipe; AccumulateEventName=[Clock].DoReportCalculations
                MultiplyFunction DeltaArea
                  VariableReference DeltaRemoved: VariableName=[Leaf].Removed.StructuralWt
                  VariableReference SLA: VariableName=[Leaf].SpecificAreaCanopy
          Constant Zero: FixedValue=0
        MinimumFunction FRGR
          VariableReference RUE_FT: VariableName=[Leaf].Photosynthesis.FT
          MinimumFunction Others
            VariableReference RUE_FN: VariableName=[Leaf].Photosynthesis.FN
            VariableReference RUE_FVPD: VariableName=[Leaf].Photosynthesis.FVPD
        Constant ExtinctionCoefficient: FixedValue=0.6
        LinearInterpolationFunction HeightFunction
          XYPairs: X=[1, 2, 3, 4, 5, 6, 9]; Y=[0, 0, 50, 400, 700, 900, 1000]
          VariableReference XValue: VariableName=[Phenology].Stage
        AddFunction NodeNumber
          Constant Initial: FixedValue=0
          AccumulateFunction Change: StartStageName=Emergence; EndStageName=GreenBud; FractionRemovedOnCut=1; FractionRemovedOnHarvest=1; FractionRemovedOnGraze=1; FractionRemovedOnPrune=0
            DivideFunction DeltaNode
              VariableReference ThermalTime: VariableName=[Phenology].ThermalTime
              VariableReference Phyllochron: VariableName=[Leaf].Phyllochron
        AddFunction BranchNumber
          Constant One: FixedValue=1
          AccumulateFunction CumulativeBranching: StartStageName=Emergence; EndStageName=GreenBud; FractionRemovedOnCut=1; FractionRemovedOnHarvest=1; FractionRemovedOnGraze=1; FractionRemovedOnPrune=0
            MultiplyFunction DeltaBranch
              VariableReference DeltaNode: VariableName=[Leaf].NodeNumber.Change.DeltaNode
              VariableReference BranchingRate: VariableName=[Leaf].BranchingRate
              MaximumFunction CoverFactor
                LinearInterpolationFunction Factor
                  XYPairs: X=[0, 0.3, 0.35, 1]; Y=[1, 1, 0, 0]
                  VariableReference XValue: VariableName=[Leaf].CoverTotal
                Constant Zero: FixedValue=0
              LinearInterpolationFunction WaterFactor
                XYPairs: X=[0.8, 1]; Y=[0, 1]
                VariableReference XValue: VariableName=[Leaf].Fw
              WeightedTemperatureFunction TemperatureFactor: MaximumTemperatureWeighting=0.5
                Memo
                  This approach is based upon that used in Bell, WRight and Hammer (1992) Crop Sci
                XYPairs: X=[0, 12, 22, 30]; Y=[0, 1, 1, 0]
        AccumulateFunction Number: StartStageName=Emergence; EndStageName=GreenBud; FractionRemovedOnCut=1; FractionRemovedOnHarvest=1; FractionRemovedOnGraze=1; FractionRemovedOnPrune=0
          MultiplyFunction DailyNumberIncrease
            VariableReference DeltaNode: VariableName=[Leaf].NodeNumber.Change.DeltaNode
            VariableReference BranchNumber: VariableName=[Leaf].BranchNumber
            VariableReference PlantNumber: VariableName=[Plant].SowingData.Population
        Constant NReallocationFactor: FixedValue=0.5
          Memo
            This model assumes that all metabolic and storage N is available for reallocation from senescing leaves.
        PhaseLookup SenescenceRate
          PhaseLookupValue Vegetative: Start=Emergence; End=StartFlowering
            MaximumFunction Rate
              MultiplyFunction AgeSenescence
                LinearInterpolationFunction Multiplier
                  XYPairs: X=[9, 10]; Y=[0, 1]
                  VariableReference XValue: VariableName=[Leaf].NodeNumber
                DivideFunction LeavesPerDay
                  VariableReference ThermalTime: VariableName=[Phenology].ThermalTime
                  VariableReference Phyllochron: VariableName=[Leaf].Phyllochron
                  VariableReference NodeNumber: VariableName=[Leaf].NodeNumber
                Constant: FixedValue=0
              LinearInterpolationFunction ShadeSenescence
                XYPairs: X=[1, 5, 8]; Y=[0, 0, 0.03]
                VariableReference XValue: VariableName=[Leaf].LAI
          PhaseLookupValue Reproductive: Start=StartFlowering; End=EndPodDevelopment
            Memo
              Leaf senescence rate is calculated to ensure that all leaves are senesced by crop maturity.
            BoundFunction Rate
              DivideFunction Fraction
                VariableReference TT: VariableName=[Phenology].ThermalTime
                SubtractFunction TTRemaining
                  ExpressionFunction TTRequired
                    Expression=[Phenology].EarlyFlowering.Target + [Phenology].EarlyPodDevelopment.Target + [Phenology].EarlyGrainFilling.Target+[Phenology].MidGrainFilling.Target
                  ExpressionFunction TTComplete
                    Expression=[Phenology].EarlyFlowering.ProgressThroughPhase + [Phenology].EarlyPodDevelopment.ProgressThroughPhase + [Phenology].EarlyGrainFilling.ProgressThroughPhase+[Phenology].MidGrainFilling.ProgressThroughPhase
                Constant Modifier: FixedValue=1
              Constant Lower: FixedValue=0
              Constant Upper: FixedValue=1
          PhaseLookupValue Senescent: Start=EndPodDevelopment; End=HarvestRipe
            Memo
              Leaf senescence rate is calculated to ensure that all leaves are senesced by crop maturity.
            Constant Rate: FixedValue=0.1
        Constant DetachmentRate: FixedValue=0.05; Units=/d
        DivideFunction InitialWt
          VariableReference InitialArea: VariableName=[Leaf].Area.Calculation.Initial
          VariableReference SLA: VariableName=[Leaf].SpecificArea
        MultiplyFunction LAIDead
          VariableReference SLA: VariableName=[Leaf].SpecificAreaCanopy
          VariableReference LeafDeadWt: VariableName=[Leaf].Dead.Wt
        LinearInterpolationFunction MaximumNConc
          XYPairs: X=[1, 3, 8]; Y=[0.06, 0.035, 0.03]
          VariableReference XValue: VariableName=[Leaf].NodeNumber
        VariableReference CriticalNConc: VariableName=[Leaf].MaximumNConc
        Constant MinimumNConc: FixedValue=0.02
        Constant MaintenanceRespiration: FixedValue=0; Units=0-1
        Constant DMConversionEfficiency: FixedValue=1; Units=0-1
        BiomassRemoval BiomassRemovalDefaults: HarvestFractionLiveToRemove=0; HarvestFractionDeadToRemove=0; HarvestFractionLiveToResidue=1; HarvestFractionDeadToResidue=1
        Constant NRetranslocationFactor: FixedValue=0.5
        Constant DMReallocationFactor: FixedValue=0
        Constant DMRetranslocationFactor: FixedValue=0.5
        Constant RemobilisationCost: FixedValue=0
        Constant CarbonConcentration: FixedValue=0.4
        NutrientDemandFunctions DMDemands
          DivideFunction Structural
            PhaseLookup DeltaLAIPotential
              PhaseLookupValue Vegetative: Start=Emergence; End=StartFlowering
                MultiplyFunction Delta
                  VariableReference AreaLargestLeaf: VariableName=[Leaf].AreaLargestLeaf
                  MinimumFunction RelativeArea
                    MultiplyFunction RelativeAreaModified
                      Constant HybridModifier: FixedValue=1
                      LinearInterpolationFunction RelativeAreaPotential
                        Memo
                          This approach is based upon that used in [#robertson_simulation_2002].
                        XYPairs: X=[1, 2, 3, 4, 8]; Y=[0.03, 0.06, 0.12, 0.25, 1]
                        VariableReference XValue: VariableName=[Leaf].NodeNumber
                    Constant: FixedValue=1
                  LinearInterpolationFunction StageFactor
                    Memo
                      This approach is based upon that used in [#robertson_simulation_2002].
                    XYPairs: X=[3, 4, 5, 5.2]; Y=[1, 1, 1, 0.1]
                    VariableReference XValue: VariableName=[Phenology].Stage
                  VariableReference PlantNumber: VariableName=[Plant].SowingData.Population
                  VariableReference BranchNumber: VariableName=[Leaf].BranchNumber
                  DivideFunction LAR
                    VariableReference TT: VariableName=[Phenology].ThermalTime
                    VariableReference Phyllochron: VariableName=[Leaf].Phyllochron
                  VariableReference NitrogenFactor: VariableName=[Leaf].FNmetabolic
                  WeightedTemperatureFunction TemperatureFactor: same as Replacements.Canola.Leaf.BranchNumber.CumulativeBranching.DeltaBranch.TemperatureFactor
              PhaseLookupValue Reproductive: Start=StartFlowering; End=Maturity
                Constant: FixedValue=0
            VariableReference SLA: VariableName=[Leaf].SpecificArea
            Memo
              Growth in leaf area is used to calculate the leaf dry matter demand.  Note that leaf biomass is assumed to consist of entirely structural dry matter.
          Constant Storage: FixedValue=0
          Constant Metabolic: FixedValue=0
          Constant QStructuralPriority: FixedValue=1
          Constant QMetabolicPriority: FixedValue=1
          Constant QStoragePriority: FixedValue=1
        NutrientDemandFunctions NDemands
          MultiplyFunction Structural
            VariableReference MinNconc: VariableName=[Leaf].minimumNconc
            VariableReference PotentialDMAllocation: VariableName=[Leaf].potentialDMAllocation.Structural
          MultiplyFunction Metabolic
            SubtractFunction MetabolicNconc
              VariableReference CritNconc: VariableName=[Leaf].criticalNConc
              VariableReference MinNconc: VariableName=[Leaf].minimumNconc
            VariableReference PotentialDMAllocation: VariableName=[Leaf].potentialDMAllocation.Structural
          StorageNDemandFunction Storage
            Constant NitrogenDemandSwitch: FixedValue=1
            VariableReference MaxNconc: VariableName=[Leaf].maximumNconc
          Constant QStructuralPriority: FixedValue=1
          Constant QMetabolicPriority: FixedValue=1
          Constant QStoragePriority: FixedValue=1
        LinearInterpolationFunction FrostFraction
          XYPairs: X=[-4, 4]; Y=[1, 1]
          VariableReference XValue: VariableName=[Weather].MinT
        Constant SpecificArea: FixedValue=0.025; Units=m^2/g
        Constant AreaLargestLeaf: FixedValue=0.015
        DivideFunction SpecificAreaCanopy
          VariableReference LAI: VariableName=[Leaf].Area
          VariableReference LeafWt: VariableName=[Leaf].Live.Wt
        LinearInterpolationFunction BranchingRate
          XYPairs: X=[0, 6.9, 7, 8, 9]; Y=[0, 0, 1, 1, 0]
          VariableReference XValue: VariableName=[Leaf].NodeNumber
        HoldFunction FinalLeafNumber: WhenToHold=FloralInitiation
          AddFunction FLN
            Constant PrimordiaAtEmergence: FixedValue=3
            AccumulateFunction InitiatedPrimordia: StartStageName=Germination; EndStageName=FloralInitiation; FractionRemovedOnCut=1; FractionRemovedOnHarvest=1; FractionRemovedOnGraze=1; FractionRemovedOnPrune=0
              DivideFunction DailyPrimordiaAppearance
                VariableReference TT: VariableName=[Phenology].ThermalTime
                VariableReference Plastochron: VariableName=[Leaf].Plastochron
        ExpressionFunction Plastochron: Expression=[Leaf].Phyllochron * [Leaf].Plastochron.Multiplier
          Constant Multiplier: FixedValue=0.8
        MultiplyFunction Phyllochron
          Constant Base: FixedValue=56
          LinearInterpolationFunction Multiplier
            XYPairs: X=[1, 7, 8, 9]; Y=[1, 1, 0.45, 0.45]
            VariableReference XValue: VariableName=[Leaf].NodeNumber
        ExpressionFunction TrueLeafNumber: Expression=[Leaf].NodeNumber - 1
      ReproductiveOrgan Grain: GrowthRespiration=0; MaintenanceRespiration=0
        Biomass Live
        Biomass Dead
        AddFunction FillingDuration
          VariableReference EarlyGrainFillingDuration: VariableName=[Phenology].EarlyGrainFilling.Target
          VariableReference MidGrainFillingDuration: VariableName=[Phenology].MidGrainFilling.Target
          VariableReference LateGrainFillingDuration: VariableName=[Phenology].LateGrainFilling.Target
        PhaseLookup DMDemandFunction
          PhaseLookupValue GrainFilling: Start=StartGrainFilling; End=EndGrainFill
            MultiplyFunction HIGrainDemand
              VariableReference AboveGroundWt: VariableName=[AboveGround].Wt
              DivideFunction HarvestIndexIncrease
                MaximumFunction OutstandingHarvestIndexIncrease
                  ExpressionFunction Increase: Expression=[Grain].PotentialHarvestIndex - [Grain].HarvestIndex
                  Constant Zero: FixedValue=0
                SubtractFunction TTRemaining
                  ExpressionFunction ReproductiveTT
                    Expression=[Phenology].EarlyGrainFilling.Target+[Phenology].MidGrainFilling.Target+[Phenology].LateGrainFilling.Target
                  ExpressionFunction ReproductiveTTComplete
                    Expression=[Phenology].EarlyGrainFilling.ProgressThroughPhase+[Phenology].MidGrainFilling.ProgressThroughPhase+[Phenology].LateGrainFilling.ProgressThroughPhase
              VariableReference ThermalTime: VariableName=[Phenology].ThermalTime
        Constant MinimumNConc: FixedValue=0.02
        Constant MaximumNConc: FixedValue=0.058
        Constant WaterContent: FixedValue=0.13
        MultiplyFunction NFillingRate
          VariableReference NConc: VariableName=[Grain].MaximumNConc
          VariableReference DMDemand: VariableName=[Grain].DMDemandFunction
          VariableReference DMConversionEfficiency: VariableName=[Grain].DMConversionEfficiency
        BiomassRemoval BiomassRemovalDefaults: HarvestFractionLiveToRemove=1; HarvestFractionDeadToRemove=1; HarvestFractionLiveToResidue=0; HarvestFractionDeadToResidue=0
        Constant DMConversionEfficiency: FixedValue=0.89
        Constant RemobilisationCost: FixedValue=0
        Constant CarbonConcentration: FixedValue=0.4
        DivideFunction HarvestIndex
          VariableReference GrainWt: VariableName=[Grain].Wt
          VariableReference AboveGroundWt: VariableName=[AboveGround].Wt
        Constant MaximumPotentialGrainSize: FixedValue=0.0038
          Memo
            This parameter is only used to provide a very approximate estimate of final grain number.  Grain growth is calculated from harvest index increase.
        MultiplyFunction PotentialHarvestIndex
          VariableReference PodHarvestIndex: VariableName=[Pod].PotentialHarvestIndex
          Constant GrainFraction: FixedValue=0.72; Units=0-1
        NutrientPoolFunctions DMDemandPriorityFactors
          Constant Structural: FixedValue=1
          Constant Metabolic: FixedValue=1
          Constant Storage: FixedValue=1
        NutrientPoolFunctions NDemandPriorityFactors: same as Replacements.Canola.Grain.DMDemandPriorityFactors
        DivideFunction NumberFunction
          Memo
            Grain number is simply estimated from grain mass and a constant potential grain size.
          VariableReference GrainMass: VariableName=[Grain].Wt
          VariableReference PotentialGrainSize: VariableName=[Grain].MaximumPotentialGrainSize
      GenericOrgan Stem: IsAboveGround=true
        Constant NReallocationFactor: FixedValue=1
        PhaseLookup NRetranslocationFactor
          PhaseLookupValue Vegetative: Start=Emergence; End=StartGrainFilling
            Constant RetranslocationFactor: FixedValue=0
          PhaseLookupValue GrainFilling: Start=StartGrainFilling; End=EndGrainFill
            Constant RetranslocationFactor: FixedValue=0.1
        PhaseLookup DMRetranslocationFactor
          PhaseLookupValue Vegetative: Start=Emergence; End=StartGrainFilling
            Constant RetranslocationFactor: FixedValue=0
          PhaseLookupValue GrainFilling: Start=StartGrainFilling; End=EndGrainFill
            Constant RetranslocationFactor: FixedValue=0.2
        LinearInterpolationFunction MaximumNConcX
          XYPairs: X=[3, 4, 5, 6]; Y=[4, 0.035, 0.025, 0.02]
          VariableReference XValue: VariableName=[Phenology].Stage
        VariableReference MaximumNConc: VariableName=[Leaf].MaximumNConc
        Constant MinimumNConc: FixedValue=0.005
        PhaseLookupValue NitrogenDemandSwitch: Start=Emergence; End=StartGrainFilling
          Constant: FixedValue=1
        BiomassRemoval BiomassRemovalDefaults: HarvestFractionLiveToRemove=0.5; HarvestFractionDeadToRemove=0; HarvestFractionLiveToResidue=0.1; HarvestFractionDeadToResidue=0
        PhaseLookup SenescenceRate
          PhaseLookupValue PostCanopyPhase: Start=EndPodDevelopment; End=Maturity
            MinimumFunction Rate
              DivideFunction Fraction
                VariableReference TT: VariableName=[Phenology].ThermalTime
                SubtractFunction TTRemaining
                  ExpressionFunction PostCanopyTT
                    Expression=[Phenology].LateGrainFilling.Target+[Phenology].Maturing.Target
                  ExpressionFunction PostCanopyTTComplete
                    Expression=[Phenology].LateGrainFilling.ProgressThroughPhase+[Phenology].Maturing.ProgressThroughPhase
              Constant One: FixedValue=1
        Constant DetachmentRateFunction: FixedValue=0; Units=/d
        Constant MaintenanceRespirationFunction: FixedValue=0; Units=0-1
        Constant DMConversionEfficiency: FixedValue=1; Units=0-1
        Constant DMReallocationFactor: FixedValue=1
        VariableReference CriticalNConc: VariableName=[Stem].MinimumNConc
        Constant RemobilisationCost: FixedValue=0
        Constant CarbonConcentration: FixedValue=0.4
        NutrientDemandFunctions NDemands
          MultiplyFunction Structural
            VariableReference MinNconc: VariableName=[Stem].minimumNconc
            VariableReference PotentialDMAllocation: VariableName=[Stem].potentialDMAllocation.Structural
          MultiplyFunction Metabolic
            SubtractFunction MetabolicNconc
              VariableReference CritNconc: VariableName=[Stem].criticalNConc
              VariableReference MinNconc: VariableName=[Stem].minimumNconc
            VariableReference PotentialDMAllocation: VariableName=[Stem].potentialDMAllocation.Structural
          StorageNDemandFunction Storage
            VariableReference NitrogenDemandSwitch: VariableName=[Stem].nitrogenDemandSwitch
            VariableReference MaxNconc: VariableName=[Stem].maximumNconc
          Constant QStructuralPriority: FixedValue=1
          Constant QMetabolicPriority: FixedValue=1
          Constant QStoragePriority: FixedValue=1
        RetranslocateNonStructural RetranslocateNitrogen
        NutrientPoolFunctions InitialWt
          Constant Structural: FixedValue=0; Units=g/m^2
          Constant Metabolic: FixedValue=0
          Constant Storage: FixedValue=0
        Constant Photosynthesis: FixedValue=0
        VariableReference initialNConcFunction: VariableName=[Stem].MinimumNConc
        PartitionFractionDemandFunction PotentialGrowth
          PhaseLookup PartitionFraction
            PhaseLookupValue StemGrowthPhase: Start=Emergence; End=EndFlowering
              LinearInterpolationFunction StemFraction
                XYPairs: X=[100, 101, 200, 201, 400]; Y=[0.5, 0.5, 0.5, 0.75, 0.75]
                VariableReference XValue: VariableName=[AboveGround].Wt
            PhaseLookupValue GrainFilling: Start=EndFlowering; End=EndGrainFill
              Constant StemFraction: FixedValue=0
        NutrientDemandFunctions DMDemands
          MultiplyFunction Structural
            PhaseLookup Fraction
              PhaseLookupValue EarlyStemGrowthPhase: Start=Emergence; End=StartFlowering
                Memo
                  This approach is based upon that used in [#robertson_simulation_2002].
                Constant Fraction: FixedValue=0.7
              PhaseLookupValue LateStemGrowthPhase: Start=StartFlowering; End=EndFlowering
                Memo
                  This approach is based upon that used in [#robertson_simulation_2002].
                Constant Fraction: FixedValue=0.8
              PhaseLookupValue PodAndGrainGrowth: Start=EndFlowering; End=EndGrainFill
                Constant Fraction: FixedValue=0
            VariableReference DMDemand: VariableName=[Stem].PotentialGrowth
          Constant Metabolic: FixedValue=0
          MultiplyFunction Storage
            VariableReference DMDemand: VariableName=[Stem].PotentialGrowth
            SubtractFunction StorageFraction
              Constant One: FixedValue=1
              VariableReference StructuralFraction: VariableName=[Stem].DMDemands.Structural.Fraction
          Constant QStructuralPriority: FixedValue=1
          Constant QMetabolicPriority: FixedValue=1
          Constant QStoragePriority: FixedValue=1
      GenericOrgan Shell: IsAboveGround=true
        Constant NReallocationFactor: FixedValue=1
        Constant NRetranslocationFactor: FixedValue=0.5
        Constant MaximumNConc: FixedValue=0.045
        VariableReference CriticalNConc: VariableName=[Shell].MinimumNConc
        Constant MinimumNConc: FixedValue=0.01
        Constant DMRetranslocationFactor: FixedValue=0.1
        PhaseLookupValue NitrogenDemandSwitch: Start=StartPodDevelopment; End=EndPodDevelopment
          Constant: FixedValue=1
        BiomassRemoval BiomassRemovalDefaults: HarvestFractionLiveToRemove=0; HarvestFractionDeadToRemove=0; HarvestFractionLiveToResidue=1; HarvestFractionDeadToResidue=1
        PhaseLookup SenescenceRate
          PhaseLookupValue ReproductivePhase: Start=EndPodDevelopment; End=Maturity
            MinimumFunction Rate
              DivideFunction Fraction
                VariableReference TT: VariableName=[Phenology].ThermalTime
                SubtractFunction TTRemaining
                  ExpressionFunction ReproductiveTT
                    Expression=[Phenology].LateGrainFilling.Target + [Phenology].Maturing.Target
                  ExpressionFunction ReproductiveTT1Complete
                    Expression=[Phenology].LateGrainFilling.ProgressThroughPhase + [Phenology].Maturing.ProgressThroughPhase
              Constant One: FixedValue=1
        Constant DetachmentRateFunction: FixedValue=0; Units=/d
        Constant MaintenanceRespirationFunction: FixedValue=0; Units=0-1
        Constant DMConversionEfficiency: FixedValue=1; Units=0-1
        Constant DMReallocationFactor: FixedValue=0
        Constant RemobilisationCost: FixedValue=0
        Constant CarbonConcentration: FixedValue=0.4
        AddFunction FillingDuration
          VariableReference EarlyPodDevelopmentDuration: VariableName=[Phenology].EarlyPodDevelopment.Target
          VariableReference EarlyGrainFillingDuration: VariableName=[Phenology].EarlyGrainFilling.Target
          VariableReference MidGrainFillingDuration: VariableName=[Phenology].MidGrainFilling.Target
        NutrientDemandFunctions DMDemands
          MultiplyFunction Structural
            PhaseLookup DMDemandFunction
              PhaseLookupValue PodDevelopment: Start=StartPodDevelopment; End=EndPodDevelopment
                MultiplyFunction HIPodDemand
                  VariableReference AboveGroundWt: VariableName=[AboveGround].Wt
                  DivideFunction HarvestIndexIncrease
                    MaximumFunction OutstandingHarvestIndexIncrease
                      ExpressionFunction Increase: Expression=[Shell].PotentialHarvestIndex - [Shell].HarvestIndex
                      Constant Zero: FixedValue=0
                    SubtractFunction TTRemaining
                      ExpressionFunction ShellGrowthTT
                        Expression=[Phenology].EarlyPodDevelopment.Target+[Phenology].EarlyGrainFilling.Target+[Phenology].MidGrainFilling.Target
                      ExpressionFunction ShellGrowthTTComplete
                        Expression=[Phenology].EarlyPodDevelopment.ProgressThroughPhase+[Phenology].EarlyGrainFilling.ProgressThroughPhase+[Phenology].MidGrainFilling.ProgressThroughPhase
                  VariableReference ThermalTime: VariableName=[Phenology].ThermalTime
            Constant StructuralFraction: FixedValue=1
          Constant Metabolic: FixedValue=0
          StorageDMDemandFunction Storage
            SubtractFunction StorageFraction
              Constant One: FixedValue=1
              VariableReference StructuralFraction: VariableName=[Shell].DMDemands.Structural.StructuralFraction
          Constant QStructuralPriority: FixedValue=1
          Constant QMetabolicPriority: FixedValue=1
          Constant QStoragePriority: FixedValue=1
        NutrientDemandFunctions NDemands
          MultiplyFunction Structural
            VariableReference MinNconc: VariableName=[Shell].minimumNconc
            VariableReference PotentialDMAllocation: VariableName=[Shell].potentialDMAllocation.Structural
          StorageNDemandFunction Storage
            VariableReference NitrogenDemandSwitch: VariableName=[Shell].nitrogenDemandSwitch
            VariableReference MaxNconc: VariableName=[Shell].maximumNconc
          Constant Metabolic: FixedValue=0
          Constant QStructuralPriority: FixedValue=1
          Constant QMetabolicPriority: FixedValue=1
          Constant QStoragePriority: FixedValue=1
        RetranslocateNonStructural RetranslocateNitrogen
        NutrientPoolFunctions InitialWt: same as Replacements.Canola.Stem.InitialWt
        MultiplyFunction PotentialHarvestIndex
          VariableReference PodHarvestIndex: VariableName=[Pod].PotentialHarvestIndex
          Constant ShellFraction: FixedValue=0.28; Units=0-1
        DivideFunction HarvestIndex
          VariableReference ShellWt: VariableName=[Shell].Wt
          VariableReference AboveGroundWt: VariableName=[AboveGround].Wt
        VariableReference initialNConcFunction: VariableName=[Shell].MinimumNConc
        ExpressionFunction Area: Expression=[Shell].Live.Wt*[Shell].SpecificArea
          VariableReference Index: VariableName=[Shell].Area
        Constant SpecificArea: FixedValue=0.01; Units=m^2/g
        EnergyBalance: Albedo=0.25; Gsmax350=0.015; R50=150; KDead=0; LAIDead=0
          MinimumFunction FRGRer
            VariableReference RUE_FT: VariableName=[Shell].Photosynthesis.FT
            MinimumFunction Others
              VariableReference RUE_FN: VariableName=[Shell].Photosynthesis.FN
              VariableReference RUE_FVPD: VariableName=[Shell].Photosynthesis.FVPD
          VariableReference Tallness: VariableName=[Leaf].Height
          VariableReference Deepness: VariableName=[Leaf].Height
          Constant DeadAreaIndex: FixedValue=1
          Constant GreenExtinctionCoefficient: FixedValue=0.8
          Constant Wideness: FixedValue=0
          Constant DeadExtinctionCoefficient: FixedValue=0
          StomatalConductanceCO2Modifier
            VariableReference PhotosynthesisCO2Modifier: VariableName=[Shell].Photosynthesis.FCO2
          VariableReference GreenAreaIndex: VariableName=[Shell].Area.Index
        RUEModel Photosynthesis
          VariableReference RUE: VariableName=[Leaf].Photosynthesis.RUE
          VariableReference FT: VariableName=[Leaf].Photosynthesis.FT
          VariableReference FVPD: VariableName=[Leaf].Photosynthesis.FVPD
          LinearInterpolationFunction FN
            XYPairs: X=[0, 1, 1.5]; Y=[1, 1, 1]
            VariableReference XValue: VariableName=[Leaf].Fn
          LinearInterpolationFunction FW
            XYPairs: X=[0, 1]; Y=[0, 1]
            VariableReference XValue: VariableName=[Leaf].Fw
          VariableReference RadnInt: VariableName=[Shell].EnergyBalance.RadiationIntercepted
          VariableReference FCO2: VariableName=[Leaf].Photosynthesis.FCO2
      CompositeBiomass Pod: OrganNames=[Shell, Grain]; IncludeLive=true; IncludeDead=true
        DivideFunction HarvestIndex
          VariableReference PodWt: VariableName=[Pod].Wt
          VariableReference AboveGroundWt: VariableName=[AboveGround].Wt
        Constant PotentialHarvestIndex: FixedValue=0.6
          Memo
            This approach is based upon that used in [#robertson_simulation_2002].
      Constant MortalityRate: FixedValue=0
      CompositeBiomass AboveGround: OrganNames=[Leaf, Stem, Grain, Shell]; IncludeLive=true; IncludeDead=true
      CompositeBiomass AboveGroundLive: OrganNames=[Leaf, Stem, Grain, Shell]; IncludeLive=true; IncludeDead=false
      CompositeBiomass BelowGround: OrganNames=[Root]; IncludeLive=true; IncludeDead=true
      CompositeBiomass Total: OrganNames=[Leaf, Stem, Grain, Shell, Root]; IncludeLive=true; IncludeDead=true
      CompositeBiomass TotalLive: OrganNames=[Leaf, Stem, Grain, Shell, Root]; IncludeLive=true; IncludeDead=false
      CompositeBiomass TotalDead: OrganNames=[Leaf, Stem, Grain, Shell, Root]; IncludeLive=false; IncludeDead=true
      Folder CultivarFolder
        Memo
          Cultivar names include several codes for several traits.
          * RR = Roundup Ready - These cultivars are developed to provide tolerance for Glyphosate herbicide.
          * CL = Clearfield - These cultivars as developed for the Clearfield Canola weed control system.
          * TT = Triazine Tolerant - These cultivars are developed to provide tolerance for triazine herbicide
          * RT = Triazine and Roundup - These cultivars are developed to provide tolerance to both triazine and glyphosate herbicides.
        Folder GenericCultivars
          Cultivar GenericWinter
            Command:
              [Phenology].Vegetative.Target.XYPairs.X = 0,30
              [Phenology].Vegetative.Target.XYPairs.Y = 2200,250
              [Leaf].Phyllochron.Base.FixedValue = 54
          Cultivar GenericEarly
            Command:
              [Phenology].Vegetative.Target.XYPairs.X = 0, 25
              [Phenology].Vegetative.Target.XYPairs.Y = 370,270
              [Leaf].Phyllochron.Base.FixedValue = 51
          Cultivar GenericLate
            Command:
              [Phenology].Vegetative.Target.XYPairs.X = 0, 20
              [Phenology].Vegetative.Target.XYPairs.Y = 500,250
              [Phenology].StemElongation.Target.PPResponse.Amount.FixedValue = 150
              // First leaf 2 Phyllochrons
              // last leaves at 0.55 Phyllochron
              [Leaf].Phyllochron.Base.FixedValue = 50
        Cultivar 43C80_CL
          Command:
            [Phenology].Vegetative.Target.XYPairs.X = 0,24
            [Phenology].Vegetative.Target.XYPairs.Y = 400,200
            [Leaf].Phyllochron.Base.FixedValue = 46
        Cultivar 44Y84_CL
          Command:
            [Phenology].Vegetative.Target.XYPairs.X = 0,20
            [Phenology].Vegetative.Target.XYPairs.Y = 300,200
            [Leaf].Phyllochron.Base.FixedValue = 48
        Cultivar 44Y87_CL
          Command:
            [Phenology].Vegetative.Target.XYPairs.X = 0,20
            [Phenology].Vegetative.Target.XYPairs.Y = 450,250
            [Leaf].Phyllochron.Base.FixedValue = 48
        Cultivar 44Y89_CL
          Command:
            [Phenology].Vegetative.Target.XYPairs.X = 0,20
            [Phenology].Vegetative.Target.XYPairs.Y = 380,280
            [Leaf].Phyllochron.Base.FixedValue = 48
        Cultivar 44Y90_CL
          Command:
            [Phenology].Vegetative.Target.XYPairs.X = 0,20
            [Phenology].Vegetative.Target.XYPairs.Y = 300,250
            [Leaf].Phyllochron.Base.FixedValue = 48
        Cultivar 45Y25_RR
          Command:
            [Phenology].Vegetative.Target.XYPairs.X = 0,20
            [Phenology].Vegetative.Target.XYPairs.Y = 300,200
            [Leaf].Phyllochron.Base.FixedValue = 50
        Cultivar 45Y86_CL
          Command:
            [Phenology].Vegetative.Target.XYPairs.X = 0,20
            [Phenology].Vegetative.Target.XYPairs.Y = 300,200
            [Leaf].Phyllochron.Base.FixedValue = 50
        Cultivar 45Y88_CL
          Command:
            [Phenology].Vegetative.Target.XYPairs.X = 0,20
            [Phenology].Vegetative.Target.XYPairs.Y = 380,250
            [Leaf].Phyllochron.Base.FixedValue = 50
        Cultivar 45Y91_CL
          Command:
            [Phenology].Vegetative.Target.XYPairs.X = 0,25
            [Phenology].Vegetative.Target.XYPairs.Y = 350,250
            [Leaf].Phyllochron.Base.FixedValue = 39
        Cultivar 46Y78
          Command:
            [Phenology].Vegetative.Target.XYPairs.X = 0,16
            [Phenology].Vegetative.Target.XYPairs.Y = 600,177.78
            [Leaf].Phyllochron.Base.FixedValue = 55
            [Leaf].Photosynthesis.RUE.TriazineToleranceModifier.FixedValue = 1.1
        Cultivar Arazzo
          Command:
            [Phenology].Vegetative.Target.XYPairs.X = 0,30
            [Phenology].Vegetative.Target.XYPairs.Y = 2200,250
            [Leaf].Phyllochron.Base.FixedValue = 55
        Cultivar Archer
          Command:
            [Phenology].Vegetative.Target.XYPairs.X = 0, 20
            [Phenology].Vegetative.Target.XYPairs.Y = 500,250
            [Phenology].StemElongation.Target.PPResponse.Amount.FixedValue = 150
            // First leaf 2 Phyllochrons
            // last leaves at 0.55 Phyllochron
            [Leaf].Phyllochron.Base.FixedValue = 50
        Cultivar ATR_Bonito
          Command:
            [Phenology].Vegetative.Target.XYPairs.X = 0,25
            [Phenology].Vegetative.Target.XYPairs.Y = 320,200
            [Leaf].Phyllochron.Base.FixedValue = 55
            [Leaf].Photosynthesis.RUE.TriazineToleranceModifier.FixedValue = 0.78
        Cultivar ATR_Gem
          Command:
            [Phenology].Vegetative.Target.XYPairs.X = 0,16
            [Phenology].Vegetative.Target.XYPairs.Y = 470,250
            [Leaf].Photosynthesis.RUE.TriazineToleranceModifier.FixedValue = 0.78
            [Leaf].Phyllochron.Base.FixedValue = 61
        Cultivar ATR_Marlin
          Command:
            [Phenology].Vegetative.Target.XYPairs.X = 0,16
            [Phenology].Vegetative.Target.XYPairs.Y = 550,250
            [Leaf].Phyllochron.Base.FixedValue = 55
            [Leaf].Photosynthesis.RUE.TriazineToleranceModifier.FixedValue = 0.78
        Cultivar ATR_Stingray
          Command:
            [Phenology].Vegetative.Target.XYPairs.X = 0,6
            [Phenology].Vegetative.Target.XYPairs.Y = 500,250
            [Phenology].StemElongation.Target.PPResponse.Amount.FixedValue = 200
            [Phenology].StemElongation.Target.Base.FixedValue = 50
            [Leaf].Photosynthesis.RUE.TriazineToleranceModifier.FixedValue = 0.78
            [Leaf].Phyllochron.Base.FixedValue = 54
        Cultivar ATR_Wahoo
          Command:
            [Phenology].Vegetative.Target.XYPairs.X = 0,13
            [Phenology].Vegetative.Target.XYPairs.Y = 500,200
            [Leaf].Phyllochron.Base.FixedValue = 57
            [Leaf].Photosynthesis.RUE.TriazineToleranceModifier.FixedValue = 0.78
        Cultivar Crusher_TT
          Command:
            [Phenology].Vegetative.Target.XYPairs.X = 0,20
            [Phenology].Vegetative.Target.XYPairs.Y = 300,200
            [Leaf].Photosynthesis.RUE.TriazineToleranceModifier.FixedValue = 0.78
            [Leaf].Phyllochron.Base.FixedValue = 50
        Cultivar AV_Garnet
          Command:
            [Phenology].Vegetative.Target.XYPairs.X = 0,16
            [Phenology].Vegetative.Target.XYPairs.Y = 550,250
            [Leaf].Phyllochron.Base.FixedValue = 55
        Cultivar AV_Zircon
          Command:
            [Phenology].Vegetative.Target.XYPairs.X = 0,25
            [Phenology].Vegetative.Target.XYPairs.Y = 450,200
            [Leaf].Phyllochron.Base.FixedValue = 55
        Cultivar CB_Taurus
          Command:
            [Phenology].Vegetative.Target.XYPairs.X = 17,18,30
            [Phenology].Vegetative.Target.XYPairs.Y = 2500,850,250
            [Leaf].Phyllochron.Base.FixedValue = 50
        Cultivar CB_Telfer
          Command:
            [Phenology].Vegetative.Target.XYPairs.X = 0,20
            [Phenology].Vegetative.Target.XYPairs.Y = 350,350
            [Phenology].StemElongation.Target.PPResponse.Amount.FixedValue = 50
            [Leaf].Photosynthesis.RUE.TriazineToleranceModifier.FixedValue = 0.78
            [Leaf].Phyllochron.Base.FixedValue = 65
            [Leaf].Plastochron.Multiplier.FixedValue=0.9
        Cultivar CBI_306
          Command:
            [Phenology].Vegetative.Target.XYPairs.X = 0,20
            [Phenology].Vegetative.Target.XYPairs.Y = 300,200
            [Leaf].Phyllochron.Base.FixedValue = 50
        Cultivar CSCH_01
          Command:
            [Phenology].Vegetative.Target.XYPairs.X = 0,20
            [Phenology].Vegetative.Target.XYPairs.Y = 310,250
            [Leaf].Phyllochron.Base.FixedValue = 50
        Cultivar CSCH_02
          Command:
            [Phenology].Vegetative.Target.XYPairs.X = 0,20
            [Phenology].Vegetative.Target.XYPairs.Y = 400,250
            [Leaf].Phyllochron.Base.FixedValue = 50
        Cultivar Drum_triazine
          Command:
            [Phenology].Vegetative.Target.XYPairs.X = 0,20
            [Phenology].Vegetative.Target.XYPairs.Y = 300,200
            [Leaf].Photosynthesis.RUE.TriazineToleranceModifier.FixedValue = 0.78
            [Leaf].Phyllochron.Base.FixedValue = 50
        Cultivar Dunkeld
          Command:
            [Phenology].Vegetative.Target.XYPairs.X = 0,20
            [Phenology].Vegetative.Target.XYPairs.Y = 300,200
            [Leaf].Phyllochron.Base.FixedValue = 50
        Cultivar Grouse
          Command:
            [Phenology].Vegetative.Target.XYPairs.X = 0,20
            [Phenology].Vegetative.Target.XYPairs.Y = 300,200
            [Leaf].Phyllochron.Base.FixedValue = 50
        Cultivar GT50_RR
          Command:
            [Phenology].Vegetative.Target.XYPairs.X = 0,20
            [Phenology].Vegetative.Target.XYPairs.Y = 300,200
            [Leaf].Phyllochron.Base.FixedValue = 50
        Cultivar Hyola42
          Command:
            [Phenology].Vegetative.Target.XYPairs.X = 0,20
            [Phenology].Vegetative.Target.XYPairs.Y = 300,200
            [Leaf].Phyllochron.Base.FixedValue = 50
        Cultivar Hyola450_TT
          Command:
            [Phenology].Vegetative.Target.XYPairs.X = 0,20
            [Phenology].Vegetative.Target.XYPairs.Y = 350,150
            [Phenology].StemElongation.Target.PPResponse.Amount.FixedValue = 200
            [Leaf].Photosynthesis.RUE.TriazineToleranceModifier.FixedValue = 0.78
            [Leaf].Phyllochron.Base.FixedValue = 54
            //built from Stingray
        Cultivar Hyola559_TT
          Command:
            [Phenology].Vegetative.Target.XYPairs.X = 0,16
            [Phenology].Vegetative.Target.XYPairs.Y = 500,270
            [Leaf].Photosynthesis.RUE.TriazineToleranceModifier.FixedValue = 0.78
            [Leaf].Phyllochron.Base.FixedValue = 51
        Cultivar Hyola575_CL
          Command:
            [Phenology].Vegetative.Target.XYPairs.X = 0,16
            [Phenology].Vegetative.Target.XYPairs.Y = 370,270
            [Leaf].Phyllochron.Base.FixedValue = 49
          Alias Hyola_575_CL_GT
        Cultivar Hyola575
          Command:
            [Phenology].Vegetative.Target.XYPairs.X = 0,10
            [Phenology].Vegetative.Target.XYPairs.Y = 300,1
            [Leaf].Phyllochron.Base.FixedValue = 60
            [Photosynthesis].RUE.Potential.FixedValue = 3.4
            [Phenology].EarlyFlowering.Target.FixedValue = 120
            [Phenology].LateGrainFilling.Target.EntireGrainfillPeriod.FixedValue = 500
            [Grain].PotentialHarvestIndex.GrainFraction.FixedValue = 0.6
        Cultivar Hyola577_CL
          Command:
            [Phenology].Vegetative.Target.XYPairs.X = 0,16
            [Phenology].Vegetative.Target.XYPairs.Y = 360,213.33
            [Leaf].Phyllochron.Base.FixedValue = 49
        Cultivar Hyola600_RR
          Command:
            [Phenology].Vegetative.Target.XYPairs.X = 0,5,8,20
            [Phenology].Vegetative.Target.XYPairs.Y = 500,400,200,150
            [Phenology].StemElongation.Target.PPResponse.Amount.FixedValue = 200
            [Leaf].Phyllochron.Base.FixedValue = 51
        Cultivar Hyola635_CL
          Command:
            [Phenology].Vegetative.Target.XYPairs.X = 0,20
            [Phenology].Vegetative.Target.XYPairs.Y = 550,280
            [Leaf].Phyllochron.Base.FixedValue = 51
        Cultivar Hyola650_TT
          Command:
            [Phenology].Vegetative.Target.XYPairs.X = 0,20
            [Phenology].Vegetative.Target.XYPairs.Y = 550,250
            [Leaf].Photosynthesis.RUE.TriazineToleranceModifier.FixedValue = 0.78
            [Leaf].Phyllochron.Base.FixedValue = 48
        Cultivar Hyola725_RT
          Command:
            [Phenology].Vegetative.Target.XYPairs.X = 0,20
            [Phenology].Vegetative.Target.XYPairs.Y = 550,250
            [Leaf].Photosynthesis.RUE.TriazineToleranceModifier.FixedValue = 0.78
            [Leaf].Phyllochron.Base.FixedValue = 48
        Cultivar Hyola750_TT
          Command:
            [Phenology].Vegetative.Target.XYPairs.X = 0,20
            [Phenology].Vegetative.Target.XYPairs.Y = 550,300
            [Leaf].Photosynthesis.RUE.TriazineToleranceModifier.FixedValue = 0.78
            [Leaf].Phyllochron.Base.FixedValue = 50
        Cultivar Hyola970_CL
          Command:
            [Phenology].Vegetative.Target.XYPairs.X = 0,30
            [Phenology].Vegetative.Target.XYPairs.Y = 2200,250
            [Leaf].Phyllochron.Base.FixedValue = 54
        Cultivar Hyola971_CL
          Command:
            [Phenology].Vegetative.Target.XYPairs.X = 0,30
            [Phenology].Vegetative.Target.XYPairs.Y = 2200,250
            [Leaf].Phyllochron.Base.FixedValue = 54
        Cultivar IH30_RR
          Command:
            [Phenology].Vegetative.Target.XYPairs.X = 0,16
            [Phenology].Vegetative.Target.XYPairs.Y = 342.22,220
            [Leaf].Phyllochron.Base.FixedValue = 51
        Cultivar IVT4510
          Command:
            [Phenology].Vegetative.Target.XYPairs.X = 0,20
            [Phenology].Vegetative.Target.XYPairs.Y = 300,200
            [Leaf].Phyllochron.Base.FixedValue = 48
        Cultivar K50055
          Command:
            [Phenology].Vegetative.Target.XYPairs.X = 0,25
            [Phenology].Vegetative.Target.XYPairs.Y = 500,400
            [Leaf].Phyllochron.Base.FixedValue = 56
        Cultivar K50058
          Command:
            [Phenology].Vegetative.Target.XYPairs.X = 0,25
            [Phenology].Vegetative.Target.XYPairs.Y = 500,450
            [Leaf].Phyllochron.Base.FixedValue = 66
        Cultivar Karoo_triazine
          Command:
            [Phenology].Vegetative.Target.XYPairs.X = 0,20
            [Phenology].Vegetative.Target.XYPairs.Y = 300,200
            [Leaf].Photosynthesis.RUE.TriazineToleranceModifier.FixedValue = 0.78
            [Leaf].Phyllochron.Base.FixedValue = 50
        Cultivar Monty
          Command:
            [Phenology].Vegetative.Target.XYPairs.X = 0,20
            [Phenology].Vegetative.Target.XYPairs.Y = 305,205
            [Leaf].Phyllochron.Base.FixedValue = 50
        Cultivar NS_Diamond
          Command:
            [Phenology].Vegetative.Target.XYPairs.X = 0, 25
            [Phenology].Vegetative.Target.XYPairs.Y = 370,270
            [Leaf].Phyllochron.Base.FixedValue = 51
        Cultivar NX953
          Command:
            [Phenology].Vegetative.Target.XYPairs.X = 0,20
            [Phenology].Vegetative.Target.XYPairs.Y = 160,160
            [Leaf].Phyllochron.Base.FixedValue = 50
        Cultivar Oscar
          Command:
            [Phenology].Vegetative.Target.XYPairs.X = 0,20
            [Phenology].Vegetative.Target.XYPairs.Y = 470,270
            [Leaf].Phyllochron.Base.FixedValue = 53
        Cultivar Pinnacle_triazine
          Command:
            [Phenology].Vegetative.Target.XYPairs.X = 0,20
            [Phenology].Vegetative.Target.XYPairs.Y = 300,200
            [Leaf].Photosynthesis.RUE.TriazineToleranceModifier.FixedValue = 0.78
            [Leaf].Phyllochron.Base.FixedValue = 55
          Alias Pinnacle
        Cultivar Range
          Command:
            [Phenology].Vegetative.Target.XYPairs.X = 0,20
            [Phenology].Vegetative.Target.XYPairs.Y = 300,200
            [Leaf].Phyllochron.Base.FixedValue = 50
        Cultivar Sensation
          Command:
            [Phenology].Vegetative.Target.XYPairs.X = 0,30
            [Phenology].Vegetative.Target.XYPairs.Y = 2200,250
            [Leaf].Phyllochron.Base.FixedValue = 54
        Cultivar SF_Brazzil
          Command:
            [Phenology].Vegetative.Target.XYPairs.X = 0,30
            [Phenology].Vegetative.Target.XYPairs.Y = 2200,250
            [Leaf].Phyllochron.Base.FixedValue = 50
        Cultivar SF_Edimax
          Command:
            [Phenology].Vegetative.Target.XYPairs.X = 0,30
            [Phenology].Vegetative.Target.XYPairs.Y = 2200,250
            [Leaf].Phyllochron.Base.FixedValue = 45
        Cultivar Victory_7001_CL
          Command:
            [Phenology].Vegetative.Target.XYPairs.X = 0,25
            [Phenology].Vegetative.Target.XYPairs.Y = 430,200
            [Leaf].Phyllochron.Base.FixedValue = 56
      Constant SeedMortalityRate: FixedValue=0
      FrostHeatDamageFunctions: CropType=2; FrostLowTT=-4.9; FrostMaxReductionRatio=0.13; FrostUpTT=0.1; FrostMinReductionRatio=0; FrostStartSensitiveGS=5.71; FrostStartMostSensitiveGS=7.56; FrostEndMostSensitiveGS=8.38; FrostEndSensitiveGS=9.01; HeatLowTT=29.1; HeatMinReductionRatio=0; HeatUpTT=39.8; HeatMaxReductionRatio=0.42; HeatStartSensitiveGS=5.75; HeatStartMostSensitiveGS=7.01; HeatEndMostSensitiveGS=8.31; HeatEndSensitiveGS=10.18
    Report HarvestReport: EventNames=[Canola].Harvesting
      VariableNames:
        [Clock].Today as Date
        [Canola].Phenology.Stage
        [Canola].Phenology.EmergenceDAS
        [Canola].Phenology.StartFloweringDAS
        [Canola].Phenology.MaturityDAS
        [Canola].AboveGround.Wt
        [Canola].Grain.Wt
    Report DamageFunctionHarvestReport: EventNames=[Canola].Harvesting
      VariableNames:
        [Clock].Today as Date
        [Canola].Phenology.Stage
        [Canola].Phenology.EmergenceDAS
        [Canola].Phenology.StartFloweringDAS
        [Canola].Phenology.MaturityDAS
        [Canola].AboveGround.Wt
        [FrostHeatDamageFunctions].FrostHeatYield as Canola.Grain.Wt
    Report SowingReport: EventNames=[Canola].Sowing
      VariableNames:
        [Clock].Today
        [Canola].SowingData.Cultivar
        [IWeather].Latitude
        [IWeather].Longitude
  Experiment Canberra
    Factors
      Permutation
        Factor Sowing
          CompositeFactor 1
            Specifications:
              [SowingFixedDate].Script.SowDate=21-Mar
              [IrrigationFixedDate1].Script.Amount=38
              [IrrigationFixedDate1].Script.IrrigateDates=8-sep,4-oct,18-oct
              [IrrigationFixedDate2].Script.Amount=22
              [IrrigationFixedDate2].Script.IrrigateDates=5-apr
              [IrrigationFixedDate3].Script.Amount=0
          CompositeFactor 2
            Specifications:
              [SowingFixedDate].Script.SowDate=5-apr
              [IrrigationFixedDate1].Script.Amount=38
              [IrrigationFixedDate1].Script.IrrigateDates=8-sep,4-oct,18-oct
              [IrrigationFixedDate2].Script.Amount=20
              [IrrigationFixedDate2].Script.IrrigateDates=2-apr
              [IrrigationFixedDate3].Script.Amount=7.5
              [IrrigationFixedDate3].Script.IrrigateDates=16-apr,20-apr
          CompositeFactor 3
            Specifications:
              [SowingFixedDate].Script.SowDate=5-May
              [SowingFixedDate].Script.Population=40
              [SowingFixedDate].Script.SowingDepth=20
              [IrrigationFixedDate1].Script.Amount=38
              [IrrigationFixedDate1].Script.IrrigateDates=8-sep,4-oct,18-oct
              [IrrigationFixedDate2].Script.Amount=7.5
              [IrrigationFixedDate2].Script.IrrigateDates=9-may
              [IrrigationFixedDate3].Script.Amount=0
              [FertiliseAtSowing].Script.Amount=30
        Factor Cultivar
          CompositeFactor Garnet: Specifications=[SowingFixedDate].Script.CultivarName=Garnet
          CompositeFactor Hyola75: Specifications=[SowingFixedDate].Script.CultivarName=Hyola75
          CompositeFactor Skipton: Specifications=[SowingFixedDate].Script.CultivarName=Skipton
    Simulation CanberraBase
      Clock: Start=2006-12-12; End=2007-12-30
      Summary SummaryFile
      Weather: FileName=./met/canberra_a.met
      SoilArbitrator Soil Arbitrator
      MicroClimate: a_interception=0; b_interception=0; c_interception=0; d_interception=0; SoilHeatFluxFraction=0.4; MinimumHeightDiffForNewLayer=0; NightInterceptionFraction=0.5; ReferenceHeight=2
      Zone: Area=1; Slope=0; AspectAngle=0; Altitude=50
        Soil GES: Latitude=0; Longitude=0
          Physical
            Thickness  BD    AirDry  LL15   DUL   SAT
            100        1.42  0.04    0.059  0.24  0.408
            100        1.42  0.04    0.064  0.25  0.408
            100        1.48  0.05    0.08   0.25  0.427
            100        1.48  0.05    0.09   0.25  0.427
            100        1.48  0.06    0.114  0.25  0.427
            200        1.48  0.08    0.13   0.25  0.427
            200        1.48  0.08    0.137  0.26  0.427
            200        1.48  0.09    0.141  0.26  0.427
            200        1.48  0.11    0.15   0.27  0.427
            200        1.48  0.11    0.161  0.27  0.427
            200        1.48  0.11    0.174  0.27  0.427
            200        1.48  0.11    0.174  0.27  0.427
            SoilCrop WheatSoil
              LL=[0.059, 0.064, 0.08, 0.09, 0.114, 0.13, 0.14, 0.15, 0.17, 0.18, 0.19, 0.19]
              KL=[0.08, 0.08, 0.06, 0.06, 0.05, 0.04, 0.03, 0.03, 0.02, 0.02, 0.01, 0.01]
              XF=[1, 1, 1, 1, 1, 1, 1, 1, 1, 0.7, 0.4, 0]
            SoilCrop CanolaSoil
              LL=[0.059, 0.064, 0.08, 0.09, 0.114, 0.13, 0.14, 0.15, 0.17, 0.18, 0.19, 0.19]
              KL=[0.08, 0.08, 0.06, 0.06, 0.05, 0.04, 0.03, 0.03, 0.02, 0.02, 0.01, 0.01]
              XF=[1, 1, 1, 1, 1, 1, 1, 1, 1, 0.7, 0.4, 0]
          WaterBalance SoilWater: SummerDate=1-nov; SummerU=6; SummerCona=2; WinterDate=1-apr; WinterU=2; WinterCona=2; DiffusConst=88; DiffusSlope=35.4; Salb=0.13; CN2Bare=72; CNRed=20; CNCov=0.8; PSIDul=-100
            Thickness=[100, 100, 100, 100, 100, 200, 200, 200, 200, 200, 200, 200]
            SWCON=[0.8, 0.8, 0.8, 0.8, 0.8, 0.8, 0.8, 0.8, 0.8, 0.6, 0.6, 0.6]
          Solute NO3: InitialValues=[50, 40, 35, 2, 2, 2, 1, 1, 1, 1, 1, 1]; InitialValuesUnits=kg/ha; WaterTableConcentration=0; D0=0; DepthConstant=0; MaxDepthSoluteAccessible=0; RunoffEffectivenessAtMovingSolute=0; MaxEffectiveRunoff=0
            Thickness=[100, 100, 100, 100, 100, 200, 200, 200, 200, 200, 200, 200]
          Solute NH4: InitialValuesUnits=kg/ha; WaterTableConcentration=0; D0=0; DepthConstant=0; MaxDepthSoluteAccessible=0; RunoffEffectivenessAtMovingSolute=0; MaxEffectiveRunoff=0
            Thickness=[100, 100, 100, 100, 100, 200, 200, 200, 200, 200, 200, 200]
            InitialValues=[0.142, 0.142, 0.148, 0.148, 0.148, 0.296, 0.296, 0.296, 0.296, 0.296, 0.296, 0.296]
          Solute UREA: InitialValues=[0, 0, 0, 0, 0, 0, 0, 0, 0, 0, 0, 0]; InitialValuesUnits=kg/ha; WaterTableConcentration=0; D0=0; DepthConstant=0; MaxDepthSoluteAccessible=0; RunoffEffectivenessAtMovingSolute=0; MaxEffectiveRunoff=0
            Thickness=[100, 100, 100, 100, 100, 200, 200, 200, 200, 200, 200, 200]
          Organic: FOMCNRatio=80; CarbonUnits=Total
            Thickness  Carbon  SoilCNRatio  FBiom  FInert  FOM
            100        1.53    10           0.06   0       598.495
            100        0.5     10           0.05   0       511.078
            100        0.3     10           0.03   0.3     436.43
            100        0.3     10           0.03   0.3     372.685
            100        0.2     10           0.02   0.4     318.25
            200        0.2     10           0.02   0.5     232.072
            200        0.15    10           0.01   0.6     169.23
            200        0.15    10           0.01   0.8     123.405
            200        0.1     10           0.01   0.9     89.988
            200        0.08    10           0.01   1       65.621
            200        0.06    10           0.01   1       47.851
            200        0.04    10           0.01   1       34.894
          Chemical: PH=[7, 7, 7, 7, 7, 7, 7, 7, 7, 7.4, 7.4, 7.4]; PHUnits=Water
            Thickness=[100, 100, 100, 100, 100, 200, 200, 200, 200, 200, 200, 200]
          Water: FilledFromTop=false
            Thickness=[100, 100, 100, 100, 100, 200, 200, 200, 200, 200, 200, 200]
            InitialValues=[0.11, 0.117, 0.118, 0.119, 0.122, 0.137, 0.145, 0.151, 0.168, 0.183, 0.202, 0.21]
          Nutrient
          SoilTemperature Temperature: InteractionsPerDay=8
        Plant Canola
        Irrigation
        Fertiliser
        SurfaceOrganicMatter: InitialResidueName=wheat_stubble; InitialResidueType=wheat; InitialResidueMass=4500; InitialStandingFraction=0.1; InitialCPR=400; InitialCNR=80
        Manager SowingFixedDate
          SowDate = 21-mar
          CultivarName = Garnet
          SowingDepth = 15
          RowSpacing = 200
          Population = 60
```csharp
using APSIM.Shared.Utilities;
using Models.Utilities;
using Models.Soils;
using Models.PMF;
using Models.Core;
using System;

namespace Models
{
    [Serializable]
    public class Script : Model
    {
        [Link] Clock Clock;
        [Link] Fertiliser Fertiliser;
        [Link] Summary Summary;
        [Link] Soil Soil;
        [Link] Plant Canola;
        Accumulator accumulatedRain;
        
        [Description("Sowing date (d-mmm)")]
        public string SowDate { get; set; }
        [Description("Cultivar to be sown")]
        public string CultivarName { get; set; }
        [Description("Sowing depth (mm)")]
        public double SowingDepth { get; set; }
        [Description("Row spacing (mm)")]
        public double RowSpacing { get; set; }
        [Description("Plant population (/m2)")]
        public double Population { get; set; }
        


        [EventSubscribe("DoManagement")]
        private void OnDoManagement(object sender, EventArgs e)
        {
            if (DateUtilities.WithinDates(SowDate, Clock.Today, SowDate))
            {
                Canola.Sow(population: Population, cultivar: CultivarName, depth: SowingDepth, rowSpacing: RowSpacing);    
            }
        
        }
        
    }
}
```
        Manager IrrigationFixedDate1
          IrrigateDates = 24-jan
          Amount = 0
          Depth = 0
          Efficiency = 1
          WillRunoff = False
```csharp
using Models.Soils;
using System;
using Models.Core;
using Models.PMF;
using APSIM.Shared.Utilities;
namespace Models
{
    [Serializable]
    public class Script : Model
    {
        [Link] Clock Clock;
        [Link] Irrigation Irrigation;
        
        [Separator("A component to apply irrigation on one or more dates on every year of the simulation")]

        [Description("Enter the irrigation dates as dd-mmm with comma separation (any year information entered will be ignored)")] 
        public string[] IrrigateDates { get; set; }
        
        [Description("Amount of irrigation to be applied (mm)")] 
        public double Amount { get; set; }
        
        [Description("Depth in the soil to apply the  irrigation (mm)")] 
        public double Depth { get; set; }
        
        [Description("Efficiency of irrigation (0-1)")] 
        public double Efficiency { get; set; }
        
        [Description("Will the irrigation runoff?")] 
        public bool WillRunoff { get; set; }
        
        [EventSubscribe("DoManagement")]
        private void OnDoManagement(object sender, EventArgs e)
        {
            foreach (string ddMMM in IrrigateDates)
            {
                if (DateUtilities.DatesEqual(ddMMM, Clock.Today))
                    Irrigation.Apply(amount: Amount, depth: Depth, efficiency: Efficiency, willRunoff: WillRunoff);
            }
        }
    }
}
```
        Manager IrrigationFixedDate2: same as Canberra.CanberraBase.Zone.IrrigationFixedDate1
        Manager IrrigationFixedDate3: same as Canberra.CanberraBase.Zone.IrrigationFixedDate1
        Manager FertiliseAtSowing
          Crop = [Canola]
          FertiliserType = NH4N
          Amount = 150
```csharp
using Models.Soils;
using System;
using Models.Core;
using Models.PMF;
namespace Models
{
    [Serializable]
    public class Script : Model
    {
        [Link] Clock Clock;
        [Link] Fertiliser Fertiliser;
        
        [Description("Crop to be fertilised")]
        public IPlant Crop { get; set; }

        [Description("Type of fertiliser to apply? ")] 
        [Display(Type = DisplayType.FertiliserType)]public string FertiliserType { get; set; }
    
        [Description("Amount of fertiliser to be applied (kg/ha)")]
        public double Amount { get; set; }
        
        [EventSubscribe("Sowing")]
        private void OnSowing(object sender, EventArgs e)
        {
            Model crop = sender as Model;
            if (Crop != null && crop.Name.ToLower() == (Crop as IModel).Name.ToLower())
                Fertiliser.Apply(amount: Amount, type: FertiliserType);
        }
    }
}
```
        Manager Harvesting
          Crop = [Canola]
```csharp
using APSIM.Shared.Utilities;
using Models.Utilities;
using Models.Soils;
using Models.PMF;
using Models.Core;
using System;

namespace Models
{
    [Serializable] 
    public class Script : Model
    {
        [Description("Crop")]
        public IPlant Crop { get; set; }
        
        [EventSubscribe("DoManagement")]
        private void OnDoManagement(object sender, EventArgs e)
        {
            if (Crop.IsReadyForHarvesting)
            {
                Crop.Harvest();
                Crop.EndCrop();
            }
        }
    }
}
```
        Report DailyReport: EventNames=[Clock].DoReport
          VariableNames:
            [Clock].Today
            [Clock].Today.Year as year
            [Clock].Today.DayOfYear as day
            [Canola].DaysAfterSowing as DaysAftersowing
            [Canola].Phenology.Stage as Stage
            [Canola].Phenology.AccumulatedTT
            [Canola].Phenology.CumulativeThermalTime
            [canola].Phenology.CurrentStageName as StageName
            [canola].Phenology.CurrentPhaseName as PhaseName
            [Canola].LAI as lai
            [Canola].Leaf.LAITotal as lai_sum
            [Canola].Shell.DMDemands.Structural.DMDemandFunction
            [Canola].Grain.DMDemandFunction
            [Canola].AboveGround.Wt
            [Canola].AboveGround.N
            [Canola].Leaf.Wt as leafTotalWt
            [Canola].Leaf.N as leafTotalN
            [Canola].Stem.Wt as StemTotalWt
            [Canola].Stem.N as StemTotalN
            [Canola].Root.Wt as RootTotalWt
            [Canola].Root.N as RootTotalN
            [Canola].Pod.Wt as PodTotalWt
            [Canola].Pod.N as PodTotalN
            [Canola].Shell.Wt as ShellTotalWt
            [Canola].Shell.N as SehllTotalN
            [Canola].Leaf.Allocated.Wt
            [Canola].Leaf.Allocated.StorageWt
            [Canola].Leaf.Allocated.StructuralWt
            [Canola].Leaf.Allocated.N
            [Canola].Leaf.Allocated.StorageN
            [Canola].Leaf.Allocated.StructuralN
            [Canola].Grain.Allocated.Wt
            [Canola].Grain.Allocated.N
            [Canola].Grain.Wt
            [Canola].Grain.N
            [Canola].Stem.Allocated.Wt
            [Canola].Stem.Allocated.N
            [Canola].Stem.Allocated.StorageWt
            [Canola].Stem.Allocated.StorageN
            [Canola].Stem.Allocated.StructuralWt
            [Canola].Stem.Allocated.StructuralN
            [Canola].Shell.Allocated.Wt
            [Canola].Shell.Allocated.N
            [Canola].Shell.Allocated.StorageWt
            [Canola].Shell.Allocated.StorageN
            [Canola].Shell.Allocated.StructuralWt
            [Canola].Shell.Allocated.StructuralN
            [Canola].AboveGround.Wt*10 as biomass
            [Canola].Grain.Wt*10 as grain_wt
            [Canola].Leaf.Detached.Wt
            Sum of [Canola].Leaf.Detached.Wt from [Canola].Sowing to [Clock].Today as DetachedLeafSum
            [Canola].Root.WaterUptake as water_uptake
            Sum of [Canola].Root.NUptake/-10 from [Canola].Sowing to [Clock].Today as n_uptake
            Sum([Soil].SoilWater.Water) as sw_dep
            [Soil].SoilWater.Es as es
            Sum([NO3].kgha) + Sum([NH4].kgha) as minn_tot
            Sum([Soil].SoilWater.PAWmm) as PAW
            [Fertiliser].NitrogenApplied as fertiliser
            [Irrigation].IrrigationApplied as irrigation
            [Canola].Leaf.Fn as n_stress
            [Canola].Leaf.Fw as sw_stress
            [Weather].Rain as rain
            [Canola].Shell.Area.Index as Pai
        Report HarvestReport: EventNames=[Canola].Harvesting
          VariableNames:
            [Clock].Today
            [Canola].Phenology.Stage
            [canola].Phenology.CurrentStageName
            [canola].Phenology.CurrentPhaseName
            [Canola].Phenology.StartFloweringDAS
            [Canola].Phenology.MaturityDAS
            [Canola].AboveGround.Wt*10 as Biomass_kgha
            [Canola].Grain.Wt*10 as Yield_kgha
            [Canola].Root.Wt
        Report DamageFunctionHarvestReport: same as Replacements.DamageFunctionHarvestReport
        Manager AutomaticIrrigation (disabled)
          allowIrrigation = True
          seasonStart = 1-jan
          seasonEnd = 30-dec
          seasonsAllocation = 10000
          triggerDeficit = 90
          targetDeficit = 95
          returndays = 3
          maximumAmount = 300
          depthPAWC = 1000
```csharp
using Newtonsoft.Json;
using APSIM.Shared.Utilities;
using System.Xml.Serialization;
using Models.Soils;
using Models.PMF;
using Models.Core;
using System;
using System.Linq;
using Models.Interfaces;



        
namespace Models
{
    [Serializable] 
    [System.Xml.Serialization.XmlInclude(typeof(Model))]
    public class Script : Model
    {
        [Link] private ISummary summary;
        [Link] private Irrigation Irrigation;
        [Link] private Clock Clock;
        [Link] private Soil Soil;
        [Link(IsOptional = true)] private IPlant existingCrop;
        private DateTime StartDate;
        private DateTime EndDate;
        private double TopDUL;
        private double TopLL;
        private int nLayers;
        [Link]
        private IPhysical soilPhysical;
        [Link]
        private ISoilWater waterBalance;
        //Communication to other modules
       
        //User inputs from properties tab
        [Description("Turn irrigation on?")]
        public bool allowIrrigation { get; set; }
        [Description("Start of irrigation season (dd-MMM)")]
        public string seasonStart { get; set; }
        [Description("End of irrigation season (dd-MMM)")]
        public string seasonEnd { get; set; }
        [Description("Season allocation (mm)")]
        public double seasonsAllocation { get; set; }
        [Description("Deficit to trigger irrigation (% PAWC)")]
        public double triggerDeficit { get; set; }
        [Description("Deficit to stop irrigaton (% PAWC)")]
        public double targetDeficit { get; set; }
        [Description("Minimum days for irrigation to return")]
        public double returndays { get; set; }
        [Description("Maximum irrigation application (mm/day)")]
        public double maximumAmount { get; set; }
        [Description("Depth to calculate PAWC (mm)")]
        public double depthPAWC { get; set; }

        //Class members
        [JsonIgnore] public double TopSWdeficit { get; set; }
        [JsonIgnore] public double TopSWC { get; set; }
        [JsonIgnore] public double DaysSinceIrrigation { get; set; }
        [JsonIgnore] public double AmountToApply { get; set; }
        [JsonIgnore] public double SeasonAppliedAmount { get; set; }
        
        private bool IrrigationIsAllowed { get; set; }
        private bool SeasonIsOpen { get; set; }
        private bool CropIsActive { get; set; }
        private bool IrrigatorIsAvailable { get; set; }
        private bool SoilIsDry { get; set; }

    
        //Calculate static soil variables
        [EventSubscribe("StartOfSimulation")]
        private void OnStartOfSimulation(object sender, EventArgs e)
        {   
            //Set the season dates
            StartDate = DateTime.Parse(seasonStart + "-" + Clock.Today.Year.ToString());
            EndDate = DateTime.Parse(seasonEnd + "-" + Clock.Today.Year.ToString());
            
            //Can we irrigate at all?
            IrrigationIsAllowed = false; 
            if (allowIrrigation)
                IrrigationIsAllowed = true; 

            //Calculate soil water variables
            double depthFromSurface = 0.0;
            double fracLayer = 0.0;
            nLayers = soilPhysical.Thickness.Length;
            for (int layer = 0; layer < nLayers; layer++)
            {
                fracLayer = Math.Min(1.0, (depthPAWC - depthFromSurface) / soilPhysical.Thickness[layer]);
                TopLL += soilPhysical.LL15mm[layer] * fracLayer;
                TopDUL += soilPhysical.DULmm[layer] * fracLayer;
                depthFromSurface += soilPhysical.Thickness[layer];
                if (depthFromSurface >= depthPAWC)
                    layer = nLayers;
            }
        }
             
        //Determine daily requirement for irrigation
        [EventSubscribe("StartOfDay")]
        private void OnStartOfDay(object sender, EventArgs e)
        {
            //Can we irrigate today?          
            SeasonIsOpen = isBetween(Clock.Today, StartDate, EndDate);
            if (!SeasonIsOpen)
                SeasonAppliedAmount = 0;

            //Is there a crop in the ground that needs irrigation?
            CropIsActive = false;
            if ((existingCrop != null) && (existingCrop.IsAlive))
                CropIsActive = true;
            //if ((existingCrop.Phenology.Stage >= 3.0) && (existingCrop.Phenology.Stage < 6.0))
          
            //Is the irrigator available?
            IrrigatorIsAvailable = false;
            DaysSinceIrrigation += 1;
            if (DaysSinceIrrigation >= returndays)
                IrrigatorIsAvailable = true;
          
            //Is the soil dry enough to require irrigation?
            SoilIsDry = false;
            double depthFromSurface = 0.0;
            double fracLayer = 0.0;
            TopSWC = 0.0;
            for (int layer = 0; layer < nLayers; layer++)
            //for (int layer = 0; depthFromSurface < depthPAWC + soilPhysical.Thickness[layer]; layer++)
            {
                fracLayer = Math.Min(1.0, (depthPAWC - depthFromSurface) / soilPhysical.Thickness[layer]);
                TopSWC += waterBalance.SWmm[layer] * fracLayer;
                depthFromSurface += soilPhysical.Thickness[layer];
                if (depthFromSurface >= depthPAWC)
                    layer = nLayers;
            }
            
            TopSWdeficit = TopSWC - TopDUL;
            if (Math.Max(0.0, -TopSWdeficit) >= (TopDUL - TopLL) * (100 - triggerDeficit) / 100)
                SoilIsDry = true;
                
            //Are all the conditions ratifying irrigation
            if (IrrigationIsAllowed && SeasonIsOpen && CropIsActive && IrrigatorIsAvailable && SoilIsDry)
            {
                //Lets bloody well irrigate then!!!!
                AmountToApply = TopDUL * targetDeficit / 100 - TopSWC;
                AmountToApply = Math.Max(0.0, Math.Min(AmountToApply, seasonsAllocation - SeasonAppliedAmount));
                AmountToApply = Math.Min(AmountToApply,maximumAmount);
                Irrigation.Apply(AmountToApply);
                DaysSinceIrrigation = 0;
                SeasonAppliedAmount += AmountToApply;
            }
        }
        
        ///Checks whether theDate is between iniDate and endDate (non-year specific)
        private bool isBetween(DateTime theDay, DateTime iniDate, DateTime endDate)
        {
            bool result = false;
            if (iniDate.DayOfYear < endDate.DayOfYear)
            {
                // period is within one year, ex: summer in the northern hemisphere
                if ((theDay.DayOfYear >= iniDate.DayOfYear) && (theDay.DayOfYear <= endDate.DayOfYear))
                    result = true;
            }
            else
            {
                // period goes over the end of the year, ex: summer in the southern hemisphere
                if ((theDay.DayOfYear >= iniDate.DayOfYear) || (theDay.DayOfYear <= endDate.DayOfYear))
                    result = true;
            }
            
            return result;
        }
    }
}
```
        Manager Fertilise topup (disabled)
          FertiliserType = NO3N
          Threshold = 200
```csharp
using APSIM.Numerics;
using Models.Soils.Nutrients;
using System.Linq;
using System;
using Models.Core;
using Models.PMF;
using Models.Soils.Nutrients;
using APSIM.Shared.Utilities;
using Models.Soils;
namespace Models
{
    [Serializable]
    public class Script : Model
    {
        [Link] Clock Clock;
        [Link] Fertiliser Fertiliser;
        [Link(ByName=true)] Solute NO3;

        [Description("Type of fertiliser to apply? ")] 
        [Display(Type = DisplayType.FertiliserType)]public string FertiliserType { get; set; }
    
        [Description("Threshold amount of NO3 to topup to (kg/ha)")]
        public double Threshold { get; set;}
        
        [EventSubscribe("DoManagement")]
        private void OnDoManagement(object sender, EventArgs e)
        {
            double Amount = Threshold - MathUtilities.Sum(NO3.kgha);
            Fertiliser.Apply(amount: Amount, type: FertiliserType);
        }
    }
}
```
        Report SowingReport: EventNames=[Canola].Sowing
          VariableNames:
            [Clock].Today
            [Canola].SowingData.Cultivar
            [IWeather].Latitude
            [IWeather].Longitude
  Experiment Wagga
    Factors
      Permutation
        Factor Sowing
          CompositeFactor 1
            Specifications:
              [SowingFixedDate].Script.SowDate=4-apr
              [SowingFixedDate].Script.Population=55
          CompositeFactor 2
            Specifications:
              [SowingFixedDate].Script.SowDate=18-apr
              [SowingFixedDate].Script.Population=70
              [IrrigationFixedDate2].Script.Amount=25
              [IrrigationFixedDate2].Script.IrrigateDates=19-apr
          CompositeFactor 3
            Specifications:
              [SowingFixedDate].Script.SowDate=3-May
              [SowingFixedDate].Script.Population=50
              [IrrigationFixedDate2].Script.Amount=0
        Factor Cultivar: same as Canberra.Factors.Permutation.Cultivar
    Simulation WaggaBase
      Clock: Start=2006-11-12; End=2007-12-30
      Summary SummaryFile
      Weather: FileName=./met/wagga5.met
      SoilArbitrator Soil Arbitrator
      MicroClimate: a_interception=0; b_interception=0; c_interception=0; d_interception=0; SoilHeatFluxFraction=0.4; MinimumHeightDiffForNewLayer=0; NightInterceptionFraction=0.5; ReferenceHeight=2
      Zone: Area=1; Slope=0; AspectAngle=0; Altitude=50
        Plant Canola
        Irrigation
        Fertiliser
        SurfaceOrganicMatter: InitialResidueName=wheat_stubble; InitialResidueType=wheat; InitialResidueMass=4500; InitialStandingFraction=0.1; InitialCPR=400; InitialCNR=80
        Soil csu_jeff: SoilType=sNSW; Site=CSU; NearestTown=Wagga Wagga; Region=Southern NSW; State=NSW; Latitude=0; Longitude=0; YearOfSampling=0; DataSource=Kirsten Verburg
          Physical
            Thickness  BD    AirDry  LL15  DUL   SAT
            100        1.48  0.03    0.11  0.28  0.34
            100        1.49  0.1     0.12  0.27  0.34
            100        1.41  0.13    0.14  0.25  0.32
            100        1.37  0.13    0.16  0.28  0.35
            100        1.41  0.13    0.18  0.28  0.35
            100        1.41  0.13    0.18  0.28  0.35
            100        1.52  0.13    0.21  0.3   0.34
            100        1.52  0.13    0.21  0.3   0.34
            100        1.62  0.13    0.24  0.31  0.33
            100        1.62  0.13    0.24  0.31  0.33
            100        1.66  0.13    0.26  0.31  0.34
            100        1.66  0.13    0.26  0.31  0.34
            100        1.62  0.13    0.27  0.32  0.34
            100        1.62  0.13    0.27  0.32  0.34
            100        1.62  0.13    0.28  0.33  0.36
            100        1.62  0.13    0.28  0.33  0.36
            100        1.62  0.13    0.28  0.33  0.36
            100        1.62  0.13    0.28  0.33  0.36
            100        1.62  0.13    0.28  0.33  0.36
            100        1.62  0.13    0.28  0.33  0.36
            SoilCrop wheatSoil
              LL=[0.11, 0.12, 0.14, 0.16, 0.18, 0.18, 0.21, 0.21, 0.24, 0.24, 0.26, 0.26, 0.27, 0.27, 0.28, 0.28, 0.28, 0.28, 0.28, 0.28]
              KL=[0.08, 0.08, 0.06, 0.06, 0.05, 0.04, 0.04, 0.04, 0.04, 0.04, 0.04, 0.03, 0.03, 0.02, 0.02, 0.01, 0.01, 0.01, 0.01, 0.01]
              XF=[1, 1, 1, 1, 1, 1, 1, 1, 1, 1, 1, 1, 1, 1, 1, 1, 0.8, 0.4, 0, 0]
            SoilCrop canolaSoil: same as Wagga.WaggaBase.Zone.csu_jeff.Physical.wheatSoil
          Nutrient
          WaterBalance SoilWater: SummerDate=1-nov; SummerU=6; SummerCona=2; WinterDate=1-apr; WinterU=2; WinterCona=2; DiffusConst=44; DiffusSlope=16; Salb=0.13; CN2Bare=72; CNRed=20; CNCov=0.8; PSIDul=-100
            Thickness=[100, 100, 100, 100, 100, 100, 100, 100, 100, 100, 100, 100, 100, 100, 100, 100, 100, 100, 100, 100]
            SWCON=[0.5, 0.5, 0.5, 0.89, 0.8, 0.8, 0.6, 0.6, 0.4, 0.4, 0.2, 0.2, 0.2, 0.2, 0.2, 0.2, 0.2, 0.2, 0.2, 0.2]
          Organic: FOMCNRatio=80; CarbonUnits=Total
            Thickness  Carbon  SoilCNRatio  FBiom  FInert  FOM
            100        0.83    8            0.06   0.01    293.181
            100        0.35    8            0.05   0.01    252.343
            100        0.33    8            0.04   0.31    217.194
            100        0.22    8            0.03   0.35    186.94
            100        0.22    8            0.02   0.4     160.901
            100        0.22    8            0.01   0.45    138.489
            100        0.19    8            0.01   0.5     119.198
            100        0.17    8            0.01   0.6     102.595
            100        0.15    8            0.01   0.7     88.304
            100        0.12    8            0.01   0.8     76.004
            100        0.11    8            0.01   0.9     65.417
            100        0.1     8            0.01   0.99    56.305
            100        0.1     8            0.01   0.99    48.462
            100        0.1     8            0.01   0.99    41.712
            100        0.1     8            0.01   0.99    35.902
            100        0.1     8            0.01   0.99    30.901
            100        0.08    8            0.01   0.99    26.597
            100        0.06    8            0.01   0.99    22.892
            100        0.05    8            0.01   0.99    19.703
            100        0.04    8            0.01   0.99    16.959
          Water: FilledFromTop=false
            Thickness=[100, 100, 100, 100, 100, 100, 100, 100, 100, 100, 100, 100, 100, 100, 100, 100, 100, 100, 100, 100]
            InitialValues=[0.127, 0.135, 0.151, 0.172, 0.19, 0.19, 0.219, 0.219, 0.247, 0.247, 0.265, 0.265, 0.275, 0.275, 0.285, 0.285, 0.285, 0.285, 0.285, 0.285]
          Chemical: PHUnits=Water
            Thickness=[100, 100, 100, 100, 100, 100, 100, 100, 100, 100, 100, 100, 100, 100, 100, 100, 100, 100, 100, 100]
            PH=[5.8, 5.9, 6.6, 6.8, 7, 7.1, 7.2, 7.3, 7.4, 7.4, 7.6, 7.8, 8, 8.2, 8.3, 8.4, 8.4, 8.5, 8.5, 8.5]
          Solute NO3: Thickness=[100, 100, 100, 100, 200, 200, 200, 200, 800]; InitialValues=[100, 30, 5.551, 2.228, 0.141, 0.152, 0.162, 0.166, 0.162]; InitialValuesUnits=kg/ha; WaterTableConcentration=0; D0=0; DepthConstant=0; MaxDepthSoluteAccessible=0; RunoffEffectivenessAtMovingSolute=0; MaxEffectiveRunoff=0
          Solute NH4: Thickness=[100, 100, 100, 100, 200, 200, 200, 200, 800]; InitialValuesUnits=kg/ha; WaterTableConcentration=0; D0=0; DepthConstant=0; MaxDepthSoluteAccessible=0; RunoffEffectivenessAtMovingSolute=0; MaxEffectiveRunoff=0
            InitialValues=[0.148, 0.149, 0.141, 0.137, 0.141, 0.152, 0.162, 0.166, 0.162]
          Solute Urea: Thickness=[100, 100, 100, 100, 200, 200, 200, 200, 800]; InitialValues=[0, 0, 0, 0, 0, 0, 0, 0, 0]; InitialValuesUnits=kg/ha; WaterTableConcentration=0; D0=0; DepthConstant=0; MaxDepthSoluteAccessible=0; RunoffEffectivenessAtMovingSolute=0; MaxEffectiveRunoff=0
          SoilTemperature Temperature: InteractionsPerDay=8
        Manager SowingFixedDate
          SowDate = 4-apr
          CultivarName = Garnet
          SowingDepth = 15
          RowSpacing = 180
          Population = 55
          script: same as in Canberra.CanberraBase.Zone.SowingFixedDate
        Manager FertiliseAtSowing
          Crop = [Canola]
          FertiliserType = NH4N
          Amount = 30
          script: same as in Canberra.CanberraBase.Zone.FertiliseAtSowing
        Manager IrrigationFixedDate1
          IrrigateDates = 8-sep, 4-oct, 18-oct
          Amount = 38
          Depth = 0
          Efficiency = 0.8
          WillRunoff = False
          script: same as in Canberra.CanberraBase.Zone.IrrigationFixedDate1
        Manager IrrigationFixedDate2
          IrrigateDates = 5-apr
          Amount = 22
          Depth = 0
          Efficiency = 1
          WillRunoff = False
          script: same as in Canberra.CanberraBase.Zone.IrrigationFixedDate1
        Manager IrrigationFixedDate3
          IrrigateDates = 31-mar
          Amount = 25
          Depth = 0
          Efficiency = 1
          WillRunoff = False
          script: same as in Canberra.CanberraBase.Zone.IrrigationFixedDate1
        Manager Harvesting: same as Canberra.CanberraBase.Zone.Harvesting
        Report DailyReport: EventNames=[Clock].DoReport
          VariableNames:
            [Clock].Today
            [Canola].Phenology.Stage
            [canola].Phenology.CurrentStageName
            [canola].Phenology.CurrentPhaseName
            [Canola].Phenology.StartFloweringDAS
            [Canola].Phenology.MaturityDAS
            [Canola].AboveGround.Wt*10 as Biomass_kgha
            [Canola].Grain.Wt*10 as Yield_kgha
        Report HarvestReport: same as Wagga.WaggaBase.Zone.DailyReport
        Manager FrostAndHeatSummary
          CropType = Canola
          CriticalStageStart = 6
          CriticalStageEnd = 13
          FrostDayThreshold = 0
          HeatDayThreshold = 30
```csharp
using APSIM.Core;
using Models.PMF.Organs;
using Models.PMF.Phen;
using System;
using Models.Climate;
using Models.Core;
using Models.PMF;
using Models.Soils;
using Models.Utilities;
using APSIM.Shared.Utilities;
namespace Models
{
    [Serializable] 
    public class Script : Model, IStructureDependency
    {
        [Link] private Weather Weather;
        [Link] private Zone zone;
        public IStructure Structure { private get; set; }

        
        [Description("Crop Type")]
        public string CropType {get; set;}
               
        //[Link(Type = LinkType.Path, Path = "[Canola].Phenology")]
        //private Phenology Phenology;
        
        [Description("Critital Stage Start")]
        public double CriticalStageStart {get; set;} 
        
        [Description("Critital Stage End")]
        public double CriticalStageEnd {get; set;}
        
        [Description("Frost day threshold")]
        public double FrostDayThreshold {get; set;}
        
        [Description("Heat daythreshold")]
        public double HeatDayThreshold {get; set;}  
       
        // Weather summary
        public double FrostDay {get; set;}
        public double HeatDay {get; set;}
        
        // Damage function
        public double CumTT {get; set;}
        public double FrostMultipler {get; set;}
        public double HeatMultipler {get; set;}
        public double FrostStageFactor {get; set;}
        public double HeatStageFactor {get; set;}
        public double FinalFrostMultipler {get; set;}
        public double FinalHeatMultipler {get; set;}
        public double DamageIndex {get; set;}
        public double CumDamageIndex {get; set;}
        
        // Yield calculation
        public double YieldFrostHeat {get; set;}

         

        

        [EventSubscribe("Sowing")]
        private void OnDoSowing(object sender, EventArgs e)
        {
            FrostDay = 0;
            HeatDay = 0;
            CumTT = 0;                             
        }
        
        [EventSubscribe("Commencing")]
        private void OnCommencing(object sender, EventArgs e)
        {
            CumDamageIndex = 1;
        }
        
        [EventSubscribe("DoManagement")]
        private void OnDoManagement(object sender, EventArgs e)
        {//damage factor reset everyday
            FrostMultipler = 1;
            HeatMultipler = 1;
            FrostStageFactor = 1;
            HeatStageFactor = 1;
            FinalFrostMultipler = 1;
            FinalHeatMultipler = 1;
            DamageIndex = 1;
        //link with the specific crop    
            Phenology phen = (Phenology)Structure.Get("[" + CropType +"].Phenology", relativeTo: zone);
            ReproductiveOrgan Organs = (ReproductiveOrgan)Structure.Get("[" + CropType +"].Grain", relativeTo: zone);
       
          if (phen.Stage >= CriticalStageStart && phen.Stage <= CriticalStageEnd) 
            {
                CumTT += phen.thermalTime.Value();
                //Frost Damage
                if (Weather.MinT < FrostDayThreshold) 
                {
                    FrostDay += 1;
                    FrostMultipler = 0.05 * Weather.MinT + 1;
                    if(FrostMultipler < 0.8){FrostMultipler = 0.8;}
                    if(FrostMultipler > 1){FrostMultipler = 1;}
                    if(CumTT <= 440)
                    {FrostStageFactor = (CumTT - 140)*1.5/300;}
                    if(CumTT > 440)
                    {FrostStageFactor = (CumTT - 140)*1.5/400;}
                    if(FrostStageFactor < 0){FrostStageFactor = 0;}
                    if(FrostStageFactor > 1){FrostStageFactor = 1;}
                    FinalFrostMultipler = 1 - ((1-FrostMultipler) * FrostStageFactor);
                }
                //Heat Damage
                if (Weather.MaxT >= HeatDayThreshold) 
                {
                    HeatDay += 1;
                    HeatMultipler = -0.075 * Weather.MaxT + 3.25;
                    if(HeatMultipler < 0.65){HeatMultipler = 0.65;}
                    if(HeatMultipler > 1){HeatMultipler = 1;}
                    if(CumTT <= 300)
                    {HeatStageFactor = CumTT * 1.5/300;}
                    if(CumTT > 300)
                    {HeatStageFactor = 3 - CumTT * 1.5/300;}
                    if(HeatStageFactor < 0){HeatStageFactor = 0;}
                    if(HeatStageFactor > 1){HeatStageFactor = 1;}
                    FinalHeatMultipler = 1 - ((1 - HeatMultipler) * HeatStageFactor);
                }
                //Yield multipler, accumulation and yield
                DamageIndex = FinalFrostMultipler * FinalHeatMultipler;
                CumDamageIndex = CumDamageIndex * DamageIndex;
                YieldFrostHeat = Organs.Wt * CumDamageIndex;
                }
                    
            }
           
        }
    }
```
        Report DamageFunctionHarvestReport: same as Replacements.DamageFunctionHarvestReport
        Report SowingReport: EventNames=[Canola].Sowing
          VariableNames:
            [Clock].Today
            [Canola].SowingData.Cultivar
            [IWeather].Latitude
            [IWeather].Longitude
  Experiment Young
    Factors
      Permutation
        Factor Sowing
          CompositeFactor 1: Specifications=[SowingFixedDate].Script.SowDate=16-apr
          CompositeFactor 2: Specifications=[SowingFixedDate].Script.SowDate=29-apr
        Factor Cultivar
          CompositeFactor 46Y78: Specifications=[SowingFixedDate].Script.CultivarName=46Y78
          CompositeFactor Hyola50: Specifications=[SowingFixedDate].Script.CultivarName=Hyola50
          CompositeFactor Garnet: Specifications=[SowingFixedDate].Script.CultivarName=Garnet
    Simulation YoungBase
      Clock: Start=2008-09-30; End=2009-12-30
      Summary SummaryFile
      Weather: FileName=./met/young_3oaks_2005-2010.met
      SoilArbitrator Soil Arbitrator
      MicroClimate: a_interception=0; b_interception=0; c_interception=0; d_interception=0; SoilHeatFluxFraction=0.4; MinimumHeightDiffForNewLayer=0; NightInterceptionFraction=0.5; ReferenceHeight=2
      Zone: Area=1; Slope=0; AspectAngle=0; Altitude=50
        Plant Canola
        Irrigation
        Fertiliser
        SurfaceOrganicMatter: InitialResidueName=wheat_stubble; InitialResidueType=wheat; InitialResidueMass=500; InitialStandingFraction=0.1; InitialCPR=400; InitialCNR=80
        Soil three_oaks_back: Site=Back paddock; NearestTown=Young; Region=Southern NSW; State=NSW; Latitude=0; Longitude=0; DataSource=Kirkegaard/Lilley; Comments=Red Kandosol
          Physical
            Thickness  BD    AirDry  LL15   DUL    SAT
            100        1.45  0.04    0.082  0.242  0.433
            100        1.5   0.04    0.107  0.211  0.414
            100        1.55  0.04    0.132  0.218  0.395
            100        1.5   0.053   0.155  0.232  0.414
            100        1.53  0.066   0.162  0.253  0.406
            100        1.55  0.079   0.184  0.294  0.395
            100        1.58  0.077   0.198  0.3    0.388
            100        1.6   0.075   0.198  0.304  0.376
            100        1.63  0.09    0.197  0.31   0.369
            100        1.65  0.1     0.188  0.297  0.369
            100        1.63  0.102   0.176  0.285  0.369
            100        1.6   0.102   0.171  0.272  0.376
            100        1.58  0.103   0.169  0.269  0.384
            100        1.55  0.102   0.166  0.256  0.395
            100        1.55  0.102   0.167  0.256  0.395
            100        1.55  0.095   0.167  0.264  0.395
            100        1.55  0.088   0.171  0.264  0.395
            100        1.55  0.081   0.171  0.264  0.395
            100        1.55  0.074   0.171  0.264  0.395
            100        1.55  0.068   0.171  0.264  0.395
            SoilCrop CanolaSoil
              LL=[0.082, 0.107, 0.132, 0.155, 0.162, 0.184, 0.198, 0.198, 0.197, 0.188, 0.176, 0.171, 0.169, 0.166, 0.167, 0.167, 0.171, 0.171, 0.171, 0.171]
              KL=[0.08, 0.08, 0.06, 0.06, 0.05, 0.04, 0.04, 0.04, 0.04, 0.04, 0.04, 0.03, 0.03, 0.02, 0.02, 0.01, 0.01, 0.01, 0.01, 0.01]
              XF=[1, 1, 1, 1, 1, 1, 1, 1, 1, 1, 1, 1, 1, 1, 1, 0.7, 0.5, 0.2, 0, 0]
          WaterBalance SoilWater: SummerDate=1-nov; SummerU=6; SummerCona=3.5; WinterDate=1-apr; WinterU=2; WinterCona=2; DiffusConst=44; DiffusSlope=16; Salb=0.13; CN2Bare=72; CNRed=20; CNCov=0.8; PSIDul=-100
            Thickness=[100, 100, 100, 100, 100, 100, 100, 100, 100, 100, 100, 100, 100, 100, 100, 100, 100, 100, 100, 100]
            SWCON=[0.8, 0.8, 0.8, 0.8, 0.8, 0.8, 0.8, 0.8, 0.8, 0.8, 0.8, 0.8, 0.8, 0.8, 0.8, 0.8, 0.6, 0.6, 0.6, 0.6]
          Solute NO3: InitialValuesUnits=kg/ha; WaterTableConcentration=0; D0=0; DepthConstant=0; MaxDepthSoluteAccessible=0; RunoffEffectivenessAtMovingSolute=0; MaxEffectiveRunoff=0
            Thickness=[100, 100, 100, 100, 100, 100, 100, 100, 100, 100, 100, 100, 100, 100, 100, 100, 100, 100, 100, 100]
            InitialValues=[63.1, 15.6, 7.3, 5, 3.7, 2.8, 2.8, 0.8, 0.8, 0.5, 0.5, 0.5, 0.5, 1.1, 1.1, 1.1, 1.4, 1.4, 0, 0]
          Solute NH4: InitialValuesUnits=kg/ha; WaterTableConcentration=0; D0=0; DepthConstant=0; MaxDepthSoluteAccessible=0; RunoffEffectivenessAtMovingSolute=0; MaxEffectiveRunoff=0
            Thickness=[100, 100, 100, 100, 100, 100, 100, 100, 100, 100, 100, 100, 100, 100, 100, 100, 100, 100, 100, 100]
            InitialValues=[26.5, 5.4, 0, 0, 0, 0, 0, 0, 0, 0, 0, 0, 0, 0, 0, 0, 0, 0, 0, 0]
          Solute UREA: InitialValuesUnits=kg/ha; WaterTableConcentration=0; D0=0; DepthConstant=0; MaxDepthSoluteAccessible=0; RunoffEffectivenessAtMovingSolute=0; MaxEffectiveRunoff=0
            Thickness=[100, 100, 100, 100, 100, 100, 100, 100, 100, 100, 100, 100, 100, 100, 100, 100, 100, 100, 100, 100]
            InitialValues=[0, 0, 0, 0, 0, 0, 0, 0, 0, 0, 0, 0, 0, 0, 0, 0, 0, 0, 0, 0]
          Organic: FOMCNRatio=60; CarbonUnits=Total
            Thickness  Carbon  SoilCNRatio  FBiom  FInert  FOM
            100        1.5     8            0.06   0.01    439.771
            100        1       8            0.05   0.01    378.514
            100        0.8     8            0.04   0.31    325.79
            100        0.2     8            0.03   0.35    280.41
            100        0.2     8            0.02   0.4     241.351
            100        0.2     8            0.01   0.45    207.733
            100        0.2     8            0.01   0.5     178.798
            100        0.15    8            0.01   0.6     153.892
            100        0.15    8            0.01   0.7     132.456
            100        0.1     8            0.01   0.8     114.006
            100        0.11    8            0.01   0.9     98.126
            100        0.1     8            0.01   0.99    84.458
            100        0.1     8            0.01   0.99    72.694
            100        0.1     8            0.01   0.99    62.568
            100        0.1     8            0.01   0.99    53.853
            100        0.1     8            0.01   0.99    46.352
            100        0.08    8            0.01   0.99    39.895
            100        0.06    8            0.01   0.99    34.338
            100        0.05    8            0.01   0.99    29.555
            100        0.04    8            0.01   0.99    25.438
          Chemical: same as Wagga.WaggaBase.Zone.csu_jeff.Chemical
          Water: FilledFromTop=false
            Thickness=[100, 100, 100, 100, 100, 100, 100, 100, 100, 100, 100, 100, 100, 100, 100, 100, 100, 100, 100, 100]
            InitialValues=[0.082, 0.107, 0.132, 0.155, 0.162, 0.184, 0.198, 0.198, 0.197, 0.188, 0.176, 0.171, 0.169, 0.166, 0.167, 0.167, 0.171, 0.171, 0.171, 0.171]
          Nutrient
          SoilTemperature Temperature: InteractionsPerDay=8
        Manager ResetSoilFixedDate
          ResetDate = 1-apr
          ResetWater = No
          ResetNutrients = Yes
          ResetSOM = No
```csharp
using Models.Soils.Nutrients;
using APSIM.Shared.Utilities;
using Models.Surface;
using Models.Utilities;
using Models.Soils.Nutrients;
using Models.Soils;
using Models.PMF;
using Models.Core;
using System;
using Models.Interfaces;

namespace Models
{
    [Serializable]
    public class Script : Model
    {
        [Link] private Clock Clock;
        [Link] private Plant Wheat;
        [Link] private ISoilWater SoilWater;
        [Link] private Nutrient nutrient;
        [Link] private SurfaceOrganicMatter SOM;
        [Link] private Summary Summary;

        [Description("Date to reset on:")]
        public string ResetDate {get;set;}

        [Description("Reset Water? (Yes or No)")]
        public string ResetWater {get;set;}

        [Description("Reset Soil Nutrients ? (Yes or No)")]
        public string ResetNutrients {get;set;}

        [Description("Reset Surface Organic Matter? (Yes or No)")]
        public string ResetSOM {get;set;}

        [EventSubscribe("DoManagement")]
        private void OnDoManagement(object sender, EventArgs e)
        {
            if (DateUtilities.WithinDates(ResetDate, Clock.Today, ResetDate))
            {
                if (ResetWater == "Yes")
                {
                    Summary.WriteMessage(this, "Reset Water", MessageType.Diagnostic);
                    SoilWater.Reset();
                }
                if (ResetNutrients == "Yes")
                {
                    Summary.WriteMessage(this, "Reset Nitrogen", MessageType.Diagnostic);
                    nutrient.Reset();
                }
                if (ResetSOM == "Yes")
                {
                    Summary.WriteMessage(this, "Reset Surface OM", MessageType.Diagnostic);
                    SOM.Reset();
                }
            }
        }
    }
}
```
        Manager SowingFixedDate
          SowDate = 16-apr
          CultivarName = 46Y78
          SowingDepth = 15
          RowSpacing = 180
          Population = 50
          script: same as in Canberra.CanberraBase.Zone.SowingFixedDate
        Manager FertiliseAtSowing
          Crop = [Canola]
          FertiliserType = NH4N
          Amount = 34.2
          script: same as in Canberra.CanberraBase.Zone.FertiliseAtSowing
        Manager Fertilise on fixed dates
          FertiliserType = UreaN
          FertiliserDates = 26-jun
          Amount = 100
          AmountType = False
```csharp
using Models.Soils;
using System;
using Models.Core;
using Models.PMF;
using APSIM.Shared.Utilities;
namespace Models
{
    [Serializable]
    public class Script : Model
    {
        [Link] Clock Clock;
        [Link] Fertiliser Fertiliser;
        
        [Separator("A component to apply fertiliser on one or more dates on every year of the simulation")]

        [Description("Type of fertiliser to apply? ")] 
        [Display(Type = DisplayType.FertiliserType)]public string FertiliserType { get; set; }

        [Description("Enter the fertilisation dates as dd-mmm with comma separation (any year information entered will be ignored): ")] 
        public string[] FertiliserDates { get; set; } 

        [Description("Amount of fertiliser to be applied (kg /ha)")] 
        public double Amount { get; set; }

        [Description("Is the above amount to be applied each time? (yes/ticked)? Or is it the total annual amount across all dates (no/unticked)")] 
        public bool AmountType { get; set; }
        
        [EventSubscribe("DoManagement")]
        private void OnDoManagement(object sender, EventArgs e)
        {
            foreach (string ddMMM in FertiliserDates)
            {
                if (DateUtilities.DatesEqual(ddMMM, Clock.Today))
                {
                    if (AmountType)
                        Fertiliser.Apply(amount: Amount, type: FertiliserType);
                    else
                        Fertiliser.Apply(amount: Amount / FertiliserDates.Length, type: FertiliserType);
                }
            }
        }
    }
}
```
        Manager Harvesting: same as Canberra.CanberraBase.Zone.Harvesting
        Report DailyReport: same as Wagga.WaggaBase.Zone.DailyReport
        Report HarvestReport: same as Wagga.WaggaBase.Zone.DailyReport
        Report DamageFunctionHarvestReport: same as Replacements.DamageFunctionHarvestReport
        Manager FrostAndHeatSummary: same as Wagga.WaggaBase.Zone.FrostAndHeatSummary
        Manager Fertilise topup (disabled): same as Canberra.CanberraBase.Zone.Fertilise topup
        Report SowingReport: EventNames=[Canola].Sowing
          VariableNames:
            [Clock].Today
            [Canola].SowingData.Cultivar
            [IWeather].Latitude
            [IWeather].Longitude
  Experiment Grenfell
    Factors
      Permutation
        Factor Sowing
          CompositeFactor 1: Specifications=[SowingFixedDate].Script.SowDate=17-apr
          CompositeFactor 2: Specifications=[SowingFixedDate].Script.SowDate=12-may
          CompositeFactor 3: Specifications=[SowingFixedDate].Script.SowDate=11-jun
        Factor Cultivar
          CompositeFactor Beacon: Specifications=[SowingFixedDate].Script.CultivarName=Beacon
          CompositeFactor Surpass500: Specifications=[SowingFixedDate].Script.CultivarName=Surpass500
    Simulation GrenfellBase
      Clock: Start=2002-09-30; End=2003-12-30
      Summary SummaryFile
      Weather: FileName=./met/grenfell.met
      SoilArbitrator Soil Arbitrator
      MicroClimate: a_interception=0; b_interception=0; c_interception=0; d_interception=0; SoilHeatFluxFraction=0.4; MinimumHeightDiffForNewLayer=0; NightInterceptionFraction=0.5; ReferenceHeight=2
      Zone: Area=1; Slope=0; AspectAngle=0; Altitude=50
        Plant Canola
        Irrigation
        Fertiliser
        SurfaceOrganicMatter: InitialResidueName=wheat_stubble; InitialResidueType=wheat; InitialResidueMass=6000; InitialStandingFraction=0.1; InitialCPR=400; InitialCNR=80
        Soil three_oaks_back: SoilType=sNSW; Site=Back paddock; NearestTown=Young; Region=Southern NSW; State=NSW; Latitude=0; Longitude=0; DataSource=Kirkegaard/Lilley; Comments=Red Kandosol
          Physical: same as Young.YoungBase.Zone.three_oaks_back.Physical
          WaterBalance SoilWater: same as Young.YoungBase.Zone.three_oaks_back.SoilWater
          Solute NO3: InitialValuesUnits=kg/ha; WaterTableConcentration=0; D0=0; DepthConstant=0; MaxDepthSoluteAccessible=0; RunoffEffectivenessAtMovingSolute=0; MaxEffectiveRunoff=0
            Thickness=[100, 100, 100, 100, 100, 100, 100, 100, 100, 100, 100, 100, 100, 100, 100, 100, 100, 100, 100, 100]
            InitialValues=[60, 40, 30, 16, 3.7, 2.8, 2.8, 0.8, 0.8, 0.5, 0.5, 0.5, 0.5, 1.1, 1.1, 1.1, 1.4, 1.4, 0, 0]
          Solute NH4: InitialValuesUnits=kg/ha; WaterTableConcentration=0; D0=0; DepthConstant=0; MaxDepthSoluteAccessible=0; RunoffEffectivenessAtMovingSolute=0; MaxEffectiveRunoff=0
            Thickness=[100, 100, 100, 100, 100, 100, 100, 100, 100, 100, 100, 100, 100, 100, 100, 100, 100, 100, 100, 100]
            InitialValues=[30, 10, 0, 0, 0, 0, 0, 0, 0, 0, 0, 0, 0, 0, 0, 0, 0, 0, 0, 0]
          Solute UREA: same as Young.YoungBase.Zone.three_oaks_back.UREA
          Organic: same as Young.YoungBase.Zone.three_oaks_back.Organic
          Chemical: same as Wagga.WaggaBase.Zone.csu_jeff.Chemical
          Water: FilledFromTop=false
            Thickness=[100, 100, 100, 100, 100, 100, 100, 100, 100, 100, 100, 100, 100, 100, 100, 100, 100, 100, 100, 100]
            InitialValues=[0.182, 0.187, 0.202, 0.205, 0.212, 0.234, 0.208, 0.198, 0.197, 0.188, 0.176, 0.171, 0.169, 0.166, 0.167, 0.167, 0.171, 0.171, 0.171, 0.171]
          Nutrient
          SoilTemperature Temperature: InteractionsPerDay=8
        Manager ResetSoilFixedDate
          ResetDate = 21-mar
          ResetWater = Yes
          ResetNutrients = Yes
          ResetSOM = No
          script: same as in Young.YoungBase.Zone.ResetSoilFixedDate
        Manager SowingFixedDate
          SowDate = 17-apr
          CultivarName = Beacon
          SowingDepth = 15
          RowSpacing = 230
          Population = 30
          script: same as in Canberra.CanberraBase.Zone.SowingFixedDate
        Manager FertiliseAtSowing
          Crop = [Canola]
          FertiliserType = NH4N
          Amount = 44
          script: same as in Canberra.CanberraBase.Zone.FertiliseAtSowing
        Manager Harvesting: same as Canberra.CanberraBase.Zone.Harvesting
        Report DailyReport: same as Wagga.WaggaBase.Zone.DailyReport
        Report HarvestReport: same as Wagga.WaggaBase.Zone.DailyReport
        Report DamageFunctionHarvestReport: same as Replacements.DamageFunctionHarvestReport
        Manager FrostAndHeatSummary (disabled)
          CropType = Canola
          CriticalStageStart = 6
          CriticalStageEnd = 13
          FrostDayThreshold = 0
          HeatDayThreshold = 30
          script: same as in Wagga.WaggaBase.Zone.FrostAndHeatSummary
        Report SowingReport: EventNames=[Canola].Sowing
          VariableNames:
            [Clock].Today
            [Canola].SowingData.Cultivar
            [IWeather].Latitude
            [IWeather].Longitude
  Experiment Tamworth
    Factors
      Permutation
        Factor Sowing
          CompositeFactor 1: Specifications=[SowingFixedDate].Script.SowDate=20-apr
          CompositeFactor 2: Specifications=[SowingFixedDate].Script.SowDate=16-may
          CompositeFactor 3: Specifications=[SowingFixedDate].Script.SowDate=12-jun
        Factor Cultivar
          CompositeFactor Garnet: Specifications=[SowingFixedDate].Script.CultivarName=Garnet
          CompositeFactor Hyola50: Specifications=[SowingFixedDate].Script.CultivarName=Hyola50
          CompositeFactor Hyola575CL: Specifications=[SowingFixedDate].Script.CultivarName=Hyola575
          CompositeFactor 43C80: Specifications=[SowingFixedDate].Script.CultivarName=43C80_CL
          CompositeFactor 43Y85 (disabled): Specifications=[SowingFixedDate].Script.CultivarName=43Y85
          CompositeFactor 44Y84: Specifications=[SowingFixedDate].Script.CultivarName=44Y84
          CompositeFactor ATR_GEM (disabled): Specifications=[SowingFixedDate].Script.CultivarName=ATR_Gem
          CompositeFactor ATR_Stingray (disabled): Specifications=[SowingFixedDate].Script.CultivarName=ATR_Stingray
          CompositeFactor Hyola555TT (disabled): Specifications=[SowingFixedDate].Script.CultivarName=Hyola555TT
          CompositeFactor Hyola559TT (disabled): Specifications=[SowingFixedDate].Script.CultivarName=Hyola559_TT
          CompositeFactor Midh: Specifications=[SowingFixedDate].Script.CultivarName=Hyola575
    Simulation TamworthBase
      Clock: Start=2011-11-12; End=2012-12-30
      Summary SummaryFile
      Weather: FileName=./met/tamworth_ARI2.met
      SoilArbitrator Soil Arbitrator
      MicroClimate: a_interception=0; b_interception=0; c_interception=0; d_interception=0; SoilHeatFluxFraction=0.4; MinimumHeightDiffForNewLayer=0; NightInterceptionFraction=0.5; ReferenceHeight=2
      Zone: Area=1; Slope=0; AspectAngle=0; Altitude=50
        Plant Canola
        Irrigation
        Fertiliser
        SurfaceOrganicMatter: InitialResidueName=wheat_stubble; InitialResidueType=wheat; InitialResidueMass=500; InitialStandingFraction=0.1; InitialCPR=400; InitialCNR=80
        Soil Grey-Black Vertosol (Spring Ridge No127): ASCOrder=Vertosol; SoilType=sNSW; Site=Spring Ridge; NearestTown=Spring Ridge, NSW 2343; Region=North West Slopes and Plains; State=New South Wales; Country=Australia; NaturalVegetation=Open grassland, Poplar Box; ApsoilNumber=127; Latitude=-31.349; Longitude=150.187; LocationAccuracy=+/- 20m; YearOfSampling=0; DataSource=CSIRO Plant Industry, Myall Vale (D Richards); Comments=Clay
          Physical
            Thickness  BD    AirDry  LL15  DUL   SAT
            150        1.07  0.12    0.24  0.51  0.56
            150        1.11  0.192   0.24  0.5   0.55
            300        1.12  0.24    0.24  0.5   0.55
            300        1.12  0.24    0.24  0.5   0.55
            300        1.12  0.24    0.24  0.5   0.55
            300        1.12  0.24    0.24  0.5   0.55
            300        1.14  0.24    0.24  0.48  0.53
            BD, DUL source: Field measured and checked for sensibility
            AirDry, LL15 source: Estimated based on local knowledge
            SAT source: Calculated from measured, estimated or calculated BD
            SoilCrop wheatSoil: LL=[0.24, 0.24, 0.27, 0.29, 0.34, 0.39, 0.45]; KL=[0.06, 0.06, 0.06, 0.04, 0.04, 0.02, 0.01]; XF=[1, 1, 1, 1, 1, 1, 1]
              LL source: Field measured and checked for sensibility
            SoilCrop barleySoil: LL=[0.24, 0.24, 0.27, 0.29, 0.34, 0.39, 0.45]; KL=[0.07, 0.07, 0.07, 0.05, 0.05, 0.03, 0.02]; XF=[1, 1, 1, 1, 1, 1, 1]
              LL source: Estimated based on local knowledge
            SoilCrop chickpeaSoil: LL=[0.24, 0.24, 0.31, 0.37, 0.41, 0.44, 0.48]; KL=[0.06, 0.06, 0.06, 0.06, 0.06, 0.06, 0.06]; XF=[1, 1, 1, 1, 1, 1, 1]
              LL source: Field measured and checked for sensibility
            SoilCrop cottonSoil: LL=[0.24, 0.24, 0.24, 0.27, 0.31, 0.36, 0.38]; KL=[0.1, 0.1, 0.1, 0.1, 0.09, 0.07, 0.05]; XF=[1, 1, 1, 1, 1, 1, 1]
              LL source: Field measured and checked for sensibility
            SoilCrop sorghumSoil: LL=[0.24, 0.24, 0.26, 0.29, 0.33, 0.37, 0.4]; KL=[0.07, 0.07, 0.07, 0.05, 0.05, 0.04, 0.03]; XF=[1, 1, 1, 1, 1, 1, 1]
              LL source: Field measured and checked for sensibility
            SoilCrop mungbeanSoil: LL=[0.24, 0.24, 0.33, 0.41, 0.42, 0.48, 0.48]; KL=[0.06, 0.06, 0.06, 0.04, 0.04, 0.01, 0.01]; XF=[1, 1, 1, 1, 1, 1, 1]
              LL source: Field measured and checked for sensibility
            SoilCrop canolaSoil: LL=[0.24, 0.24, 0.27, 0.29, 0.32, 0.35, 0.39]; KL=[0.1, 0.1, 0.1, 0.1, 0.09, 0.07, 0.05]; XF=[1, 1, 1, 1, 1, 1, 1]
          WaterBalance SoilWater: SummerDate=1-Nov; SummerU=6; SummerCona=3.5; WinterDate=1-Apr; WinterU=4; WinterCona=2.5; DiffusConst=40; DiffusSlope=16; Salb=0.12; CN2Bare=73; CNRed=20; CNCov=0.8; PSIDul=-100; Thickness=[150, 150, 300, 300, 300, 300, 300]; SWCON=[0.3, 0.3, 0.3, 0.3, 0.3, 0.3, 0.3]
          Organic: FOMCNRatio=40; CarbonUnits=Total
            Thickness  Carbon  SoilCNRatio  FBiom  FInert  FOM
            150        0.677   12           0.04   0.4     347.129
            150        0.585   12           0.02   0.6     270.344
            300        0.477   12           0.02   0.8     163.972
            300        0.246   12           0.02   1       99.454
            300        0.092   12           0.01   1       60.322
            300        0.077   12           0.01   1       36.587
            300        0.038   12           0.01   1       22.191
          Chemical: Thickness=[150, 150, 300, 300, 300, 300, 300]; PH=[8.9, 9.2, 9.3, 9, 8.8, 7.5, 8.4]; PHUnits=Water
            PH source: Estimated based on local knowledge
          Solute NO3: Thickness=[150, 150, 300, 300, 300, 300, 300]; InitialValues=[60, 40, 15, 5, 1, 1, 1]; InitialValuesUnits=kg/ha; WaterTableConcentration=0; D0=0; DepthConstant=0; MaxDepthSoluteAccessible=0; RunoffEffectivenessAtMovingSolute=0; MaxEffectiveRunoff=0
          Solute NH4: Thickness=[150, 150, 300, 300, 300, 300, 300]; InitialValues=[2, 0.1, 0.1, 0.1, 0.1, 0.1, 0.1]; InitialValuesUnits=kg/ha; WaterTableConcentration=0; D0=0; DepthConstant=0; MaxDepthSoluteAccessible=0; RunoffEffectivenessAtMovingSolute=0; MaxEffectiveRunoff=0
          Solute Urea: Thickness=[150, 150, 300, 300, 300, 300, 300]; InitialValues=[0, 0, 0, 0, 0, 0, 0]; InitialValuesUnits=kg/ha; WaterTableConcentration=0; D0=0; DepthConstant=0; MaxDepthSoluteAccessible=0; RunoffEffectivenessAtMovingSolute=0; MaxEffectiveRunoff=0
          Water: Thickness=[150, 150, 300, 300, 300, 300, 300]; InitialValues=[0.51, 0.5, 0.5, 0.5, 0.397, 0.24, 0.24]; FilledFromTop=true
          Nutrient
          SoilTemperature Temperature: InteractionsPerDay=8
        Manager ResetSoilFixedDate
          ResetDate = 18-apr
          ResetWater = Yes
          ResetNutrients = Yes
          ResetSOM = No
          script: same as in Young.YoungBase.Zone.ResetSoilFixedDate
        Manager SowingFixedDate
          SowDate = 13-apr
          CultivarName = Garnet
          SowingDepth = 15
          RowSpacing = 180
          Population = 12
          script: same as in Canberra.CanberraBase.Zone.SowingFixedDate
        Manager FertiliseAtSowing
          Crop = [Canola]
          FertiliserType = UreaN
          Amount = 75
          script: same as in Canberra.CanberraBase.Zone.FertiliseAtSowing
        Manager Fertilise on fixed dates
          FertiliserType = UreaN
          FertiliserDates = 10-jul
          Amount = 80
          AmountType = False
          script: same as in Young.YoungBase.Zone.Fertilise on fixed dates
        Manager Harvesting: same as Canberra.CanberraBase.Zone.Harvesting
        Report DailyReport: same as Wagga.WaggaBase.Zone.DailyReport
        Report HarvestReport: same as Wagga.WaggaBase.Zone.DailyReport
        Report DamageFunctionHarvestReport: same as Replacements.DamageFunctionHarvestReport
        Report SowingReport: EventNames=[Canola].Sowing
          VariableNames:
            [Clock].Today
            [Canola].SowingData.Cultivar
            [IWeather].Latitude
            [IWeather].Longitude
  Experiment Condobolin2002
    Factors
      Permutation
        Factor Sowing
          CompositeFactor 1
            Specifications:
              [SowingFixedDate].Script.SowDate=22-apr
              [FertiliseAtSowing].Script.Amount = 100
          CompositeFactor 2
            Specifications:
              [SowingFixedDate].Script.SowDate=17-may
              [FertiliseAtSowing].Script.Amount = 60
          CompositeFactor 3: Specifications=[SowingFixedDate].Script.SowDate=14-jun
        Factor Cultivar
          CompositeFactor Dunkeld: Specifications=[SowingFixedDate].Script.CultivarName=Dunkeld
          CompositeFactor AgOutback: Specifications=[SowingFixedDate].Script.CultivarName=AgOutback
          CompositeFactor Late: Specifications=[SowingFixedDate].Script.CultivarName=Dunkeld
          CompositeFactor Hyola42: Specifications=[SowingFixedDate].Script.CultivarName=Hyola42
          CompositeFactor Oscar: Specifications=[SowingFixedDate].Script.CultivarName=Oscar
          CompositeFactor Rainbow: Specifications=[SowingFixedDate].Script.CultivarName=Rainbow
    Simulation Condobolin2002Base
      Clock: Start=2001-12-15; End=2003-01-15
      Summary SummaryFile
      Weather: FileName=./met/condobolin_oa.met
      SoilArbitrator Soil Arbitrator
      MicroClimate: a_interception=0; b_interception=0; c_interception=0; d_interception=0; SoilHeatFluxFraction=0.4; MinimumHeightDiffForNewLayer=0; NightInterceptionFraction=0.5; ReferenceHeight=2
      Zone: Area=1; Slope=0; AspectAngle=0; Altitude=50
        Soil condobolin2002: Latitude=0; Longitude=0; DataSource=John Kirkegaard; Comments=Red Kandosol
          Chemical: PHUnits=Water
            Thickness=[100, 100, 100, 100, 100, 100, 100, 100, 100, 100, 100, 100, 100, 100, 100, 100]
            PH=[5.5, 6.2, 6.6, 6.8, 7, 7.1, 7.2, 7.3, 7.4, 7.4, 7.6, 7.8, 8, 8.2, 8.3, 8.4]
          Physical
            Thickness  BD     AirDry  LL15   DUL    SAT
            100        1.3    0.023   0.07   0.21   0.489
            100        1.45   0.018   0.094  0.27   0.433
            100        1.43   0.025   0.122  0.275  0.44
            100        1.39   0.041   0.209  0.28   0.455
            100        1.42   0.048   0.237  0.327  0.444
            100        1.45   0.055   0.261  0.364  0.433
            100        1.45   0.054   0.256  0.339  0.433
            100        1.45   0.053   0.245  0.315  0.433
            100        1.51   0.061   0.257  0.319  0.41
            100        1.57   0.069   0.268  0.322  0.388
            100        1.585  0.069   0.275  0.325  0.382
            100        1.6    0.07    0.28   0.328  0.376
            100        1.66   0.071   0.285  0.33   0.354
            100        1.72   0.071   0.29   0.332  0.333
            100        1.71   0.067   0.29   0.33   0.335
            100        1.7    0.064   0.293  0.328  0.338
            SoilCrop WheatSoil
              LL=[0.07, 0.094, 0.122, 0.209, 0.237, 0.261, 0.256, 0.245, 0.257, 0.268, 0.275, 0.28, 0.285, 0.29, 0.29, 0.293]
              KL=[0.08, 0.08, 0.08, 0.08, 0.08, 0.08, 0.08, 0.08, 0.08, 0.07, 0.05, 0.03, 0.02, 0.02, 0.02, 0.02]
              XF=[1, 1, 1, 1, 1, 1, 1, 1, 1, 0.7, 0.4, 0.3, 0.2, 0.2, 0.5, 0.5]
            SoilCrop CanolaSoil: same as Condobolin2002.Condobolin2002Base.Zone.condobolin2002.Physical.WheatSoil
          WaterBalance SoilWater: SummerDate=1-Nov; SummerU=6; SummerCona=3.5; WinterDate=1-Apr; WinterU=6; WinterCona=3.5; DiffusConst=88; DiffusSlope=35.4; Salb=0.13; CN2Bare=72; CNRed=20; CNCov=0.8; PSIDul=-100
            Thickness=[100, 100, 100, 100, 100, 100, 100, 100, 100, 100, 100, 100, 100, 100, 100, 100]
            SWCON=[0.6, 0.6, 0.6, 0.6, 0.6, 0.6, 0.6, 0.6, 0.6, 0.6, 0.6, 0.6, 0.6, 0.6, 0.6, 0.6]
          Solute NO3: InitialValuesUnits=kg/ha; WaterTableConcentration=0; D0=0; DepthConstant=0; MaxDepthSoluteAccessible=0; RunoffEffectivenessAtMovingSolute=0; MaxEffectiveRunoff=0
            Thickness=[100, 100, 100, 100, 100, 100, 100, 100, 100, 100, 100, 100, 100, 100, 100, 100]
            InitialValues=[20, 20, 10, 5, 5, 2.046, 1.422, 1.44, 0.945, 0.957, 0.75, 0.736, 0.743, 0.729, 0.868, 0.868]
          Solute NH4: InitialValues=[0, 0, 0, 0, 0, 0, 0, 0, 0, 0, 0, 0, 0, 0, 0, 0]; InitialValuesUnits=kg/ha; WaterTableConcentration=0; D0=0; DepthConstant=0; MaxDepthSoluteAccessible=0; RunoffEffectivenessAtMovingSolute=0; MaxEffectiveRunoff=0
            Thickness=[100, 100, 100, 100, 100, 100, 100, 100, 100, 100, 100, 100, 100, 100, 100, 100]
          Solute UREA: same as Condobolin2002.Condobolin2002Base.Zone.condobolin2002.NH4
          Organic: FOMCNRatio=0; CarbonUnits=Total
            Thickness  Carbon  SoilCNRatio  FBiom  FInert  FOM
            100        1.31    13.1         0.04   0.25    0
            100        1       13.1         0.02   0.28    0
            100        0.8     13.1         0.02   0.31    0
            100        0.2     13.1         0.02   0.75    0
            100        0.2     13.1         0.01   0.9     0
            100        0.2     13.1         0.01   0.95    0
            100        0.2     13.1         0.01   0.95    0
            100        0.15    13.1         0.01   0.95    0
            100        0.15    13.1         0.01   0.95    0
            100        0.1     13.1         0.01   0.95    0
            100        0.1     13.1         0.01   0.95    0
            100        0.1     13.1         0.01   0.99    0
            100        0.1     13.1         0.01   0.99    0
            100        0.1     13.1         0.01   0.99    0
            100        0.1     13.1         0.01   0.99    0
            100        0.1     13.1         0.01   0.99    0
          Water: FilledFromTop=false
            Thickness=[100, 100, 100, 100, 100, 100, 100, 100, 100, 100, 100, 100, 100, 100, 100, 100]
            InitialValues=[0.17, 0.17, 0.311, 0.311, 0.354, 0.354, 0.332, 0.332, 0.337, 0.337, 0.31, 0.31, 0.31, 0.31, 0.304, 0.304]
          Nutrient
          SoilTemperature Temperature: InteractionsPerDay=8
        Plant Canola
        Irrigation
        Fertiliser
        SurfaceOrganicMatter: InitialResidueName=maize_stubble; InitialResidueType=maize; InitialResidueMass=0; InitialStandingFraction=0; InitialCPR=400; InitialCNR=60
        Manager ResetSoilFixedDate1
          ResetDate = 13-apr
          ResetWater = No
          ResetNutrients = Yes
          ResetSOM = No
          script: same as in Young.YoungBase.Zone.ResetSoilFixedDate
        Manager ResetSoilFixedDate2
          ResetDate = 27-may
          ResetWater = Yes
          ResetNutrients = No
          ResetSOM = No
          script: same as in Young.YoungBase.Zone.ResetSoilFixedDate
        Manager SowingFixedDate
          SowDate = 21-mar
          CultivarName = Rainbow
          SowingDepth = 15
          RowSpacing = 180
          Population = 30
          script: same as in Canberra.CanberraBase.Zone.SowingFixedDate
        Manager IrrigationFixedDate1
          IrrigateDates = 15-apr
          Amount = 52
          Depth = 0
          Efficiency = 0.8
          WillRunoff = False
          script: same as in Canberra.CanberraBase.Zone.IrrigationFixedDate1
        Manager IrrigationFixedDate2
          IrrigateDates = 15-aug
          Amount = 22
          Depth = 0
          Efficiency = 0.7
          WillRunoff = False
          script: same as in Canberra.CanberraBase.Zone.IrrigationFixedDate1
        Manager FertiliseAtSowing
          Crop = [Canola]
          FertiliserType = NH4N
          Amount = 13
          script: same as in Canberra.CanberraBase.Zone.FertiliseAtSowing
        Manager Harvesting: same as Canberra.CanberraBase.Zone.Harvesting
        Report HarvestReport: same as Wagga.WaggaBase.Zone.DailyReport
        Report DailyReport: same as Wagga.WaggaBase.Zone.DailyReport
        Report DamageFunctionHarvestReport: same as Replacements.DamageFunctionHarvestReport
        Manager Fertilise topup (disabled): same as Canberra.CanberraBase.Zone.Fertilise topup
        Report SowingReport: EventNames=[Canola].Sowing
          VariableNames:
            [Clock].Today
            [Canola].SowingData.Cultivar
            [IWeather].Latitude
            [IWeather].Longitude
  Experiment Condobolin2003
    Factors
      Permutation
        Factor Sowing
          CompositeFactor 1
            Specifications:
              [SowingFixedDate].Script.SowDate=2-apr
              [SowingFixedDate].Script.Population=45
              [IrrigationFixedDate1].Script.Efficiency=1
              [FertiliseAtSowing].Script.Amount = 120
          CompositeFactor 2
            Specifications:
              [SowingFixedDate].Script.SowDate=22-apr
              [SowingFixedDate].Script.Population = 20
              [ResetSoilFixedDate].Script.ResetNutrients= Yes
              [IrrigationFixedDate1].Script.Efficiency=0.01
              [FertiliseAtSowing].Script.Amount = 120
          CompositeFactor 3
            Specifications:
              [SowingFixedDate].Script.SowDate=13-may
              [SowingFixedDate].Script.Population = 20
              [IrrigationFixedDate1].Script.Efficiency=0.01
              [FertiliseAtSowing].Script.Amount = 20
          CompositeFactor 4
            Specifications:
              [SowingFixedDate].Script.SowDate=6-jun
              [SowingFixedDate].Script.Population = 30
              [IrrigationFixedDate1].Script.Efficiency=0.01
        Factor Cultivar: same as Condobolin2002.Factors.Permutation.Cultivar
        Factor Irrigation
          CompositeFactor 30: Specifications=[IrrigationFixedDate2].Script.Amount=30
          CompositeFactor 0: Specifications=[IrrigationFixedDate2].Script.Amount=0.1
    Simulation Condobolin2003Base
      Clock: Start=2002-11-15; End=2004-01-15
      Summary SummaryFile
      Weather: FileName=./met/condobolin_oa.met
      SoilArbitrator Soil Arbitrator
      MicroClimate: a_interception=0; b_interception=0; c_interception=0; d_interception=0; SoilHeatFluxFraction=0.4; MinimumHeightDiffForNewLayer=0; NightInterceptionFraction=0.5; ReferenceHeight=2
      Zone: Area=1; Slope=0; AspectAngle=0; Altitude=50
        Plant Canola
        Soil condobolin2003: Latitude=0; Longitude=0; DataSource=John Kirkegaard; Comments=Red Kandosol
          Chemical: same as Condobolin2002.Condobolin2002Base.Zone.condobolin2002.Chemical
          Physical: same as Condobolin2002.Condobolin2002Base.Zone.condobolin2002.Physical
          WaterBalance SoilWater: same as Condobolin2002.Condobolin2002Base.Zone.condobolin2002.SoilWater
          Solute NO3: same as Condobolin2002.Condobolin2002Base.Zone.condobolin2002.NO3
          Solute NH4: same as Condobolin2002.Condobolin2002Base.Zone.condobolin2002.NH4
          Solute UREA: InitialValuesUnits=kg/ha; WaterTableConcentration=0; D0=0; DepthConstant=0; MaxDepthSoluteAccessible=0; RunoffEffectivenessAtMovingSolute=0; MaxEffectiveRunoff=0
            Thickness=[100, 100, 100, 100, 100, 100, 100, 100, 100, 100, 100, 100, 100, 100, 100, 100]
          Organic: same as Condobolin2002.Condobolin2002Base.Zone.condobolin2002.Organic
          Water: FilledFromTop=false
            Thickness=[100, 100, 100, 100, 100, 100, 100, 100, 100, 100, 100, 100, 100, 100, 100, 100]
            InitialValues=[0.182, 0.182, 0.26, 0.26, 0.281, 0.281, 0.271, 0.271, 0.269, 0.269, 0.267, 0.267, 0.253, 0.253, 0.228, 0.228]
          Nutrient
          SoilTemperature Temperature: InteractionsPerDay=8
        Irrigation
        Fertiliser
        SurfaceOrganicMatter: InitialResidueName=maize_stubble; InitialResidueType=maize; InitialResidueMass=0; InitialStandingFraction=0; InitialCPR=400; InitialCNR=60
        Manager ResetSoilFixedDate
          ResetDate = 7-apr
          ResetWater = Yes
          ResetNutrients = No
          ResetSOM = No
          script: same as in Young.YoungBase.Zone.ResetSoilFixedDate
        Manager Tillage on a fixed date
          TillageDate = 1-apr
          Fraction = 0.9
          Depth = 200
```csharp
using Models.Soils;
using System;
using Models.Core;
using Models.PMF;
using APSIM.Shared.Utilities;
using Models.Surface;

namespace Models
{
    [Serializable]
    public class Script : Model
    {
        [Link] Clock Clock;
        [Link] SurfaceOrganicMatter SOM;
        
        [Description("Tillage Date")]
        public string TillageDate { get; set; }
        
        [Description("Fraction of Residues To Incorporate (0-1)")]
        public double Fraction { get; set; }

        [Description("Depth of Tillage (mm)")]
        public double Depth { get; set; }

        [EventSubscribe("DoManagement")]
        private void OnDoManagement(object sender, EventArgs e)
        {
            if (DateUtilities.WithinDates(TillageDate, Clock.Today, TillageDate))
                SOM.Incorporate(Fraction, Depth);
        }
    }
}
```
        Manager SowingFixedDate
          SowDate = 21-mar
          CultivarName = Rainbow
          SowingDepth = 15
          RowSpacing = 230
          Population = 30
          script: same as in Canberra.CanberraBase.Zone.SowingFixedDate
        Manager IrrigationFixedDate1
          IrrigateDates = 1-apr
          Amount = 70
          Depth = 0
          Efficiency = 1
          WillRunoff = False
          script: same as in Canberra.CanberraBase.Zone.IrrigationFixedDate1
        Manager IrrigationFixedDate2
          IrrigateDates = 15-jul, 8-sep
          Amount = 30
          Depth = 0
          Efficiency = 1
          WillRunoff = False
          script: same as in Canberra.CanberraBase.Zone.IrrigationFixedDate1
        Manager FertiliseAtSowing: same as Condobolin2002.Condobolin2002Base.Zone.FertiliseAtSowing
        Manager Harvesting: same as Canberra.CanberraBase.Zone.Harvesting
        Report HarvestReport: same as Wagga.WaggaBase.Zone.DailyReport
        Report DailyReport: same as Wagga.WaggaBase.Zone.DailyReport
        Report DamageFunctionHarvestReport: same as Replacements.DamageFunctionHarvestReport
        Report SowingReport: EventNames=[Canola].Sowing
          VariableNames:
            [Clock].Today
            [Canola].SowingData.Cultivar
            [IWeather].Latitude
            [IWeather].Longitude
  Experiment Trangie2012
    Factors
      Permutation
        Factor Sowing
          CompositeFactor 1: Specifications=[SowingFixedDate].Script.SowDate=13-apr
          CompositeFactor 2: Specifications=[SowingFixedDate].Script.SowDate=26-apr
          CompositeFactor 3: Specifications=[SowingFixedDate].Script.SowDate=14-May
        Factor Cultivar
          CompositeFactor Garnet: Specifications=[SowingFixedDate].Script.CultivarName=Garnet
          CompositeFactor 43Y85: Specifications=[SowingFixedDate].Script.CultivarName=43Y85
          CompositeFactor 44Y84: Specifications=[SowingFixedDate].Script.CultivarName=44Y84
          CompositeFactor Hyola50: Specifications=[SowingFixedDate].Script.CultivarName=Hyola50
    Simulation Trangie2012Base
      Clock: Start=2011-11-12; End=2012-12-30
      Summary SummaryFile
      Weather: FileName=./met/trangie-fh.met
      SoilArbitrator Soil Arbitrator
      MicroClimate: a_interception=0; b_interception=0; c_interception=0; d_interception=0; SoilHeatFluxFraction=0.4; MinimumHeightDiffForNewLayer=0; NightInterceptionFraction=0.5; ReferenceHeight=2
      Zone: Area=1; Slope=0; AspectAngle=0; Altitude=50
        Plant Canola
        Irrigation
        Fertiliser
        SurfaceOrganicMatter: InitialResidueName=maize_stubble; InitialResidueType=maize; InitialResidueMass=0; InitialStandingFraction=0; InitialCPR=400; InitialCNR=60
        Soil Light over medium clay reverting to a sandy clay at depth (Trangie No684): SoilType=sNSW; Site=Trangie; NearestTown=Trangie; Region=Central West Slopes and Plains; State=New South Wales; Country=Australia; ApsoilNumber=684; Latitude=-31.97028; Longitude=147.94871; LocationAccuracy=+/- 20m; Comments=Classification based on partical size analysis. Clay
          DataSource=Data collected as part of the GRDC project ‘Training growers to manage soil water’ by CSIRO Sustainable Ecosystems in collaboration with farmers and NSW DPI Trangie
          Physical
            Thickness  ParticleSizeSand  ParticleSizeSilt  ParticleSizeClay  BD       AirDry    LL15      DUL       SAT
            150        42.3202           13.336            44.3438           1.29745  0.103649  0.207297  0.37      0.480397
            150        38.362216         13.2139           48.4238           1.37496  0.165349  0.206686  0.360797  0.451147
            300        36.8935           12.2346           50.8718           1.45167  0.210696  0.210696  0.371241  0.422198
            300        42.034216         10.0913088        47.8744752        1.47807  0.210696  0.210696  0.362238  0.412238
            300        44.482216         8.05131           47.4664752        1.46004  0.210696  0.210696  0.36904   0.41904
            300        48.8482           7.35736           43.7944752        1.53858  0.210696  0.210696  0.339404  0.389404
            300        49.5415           7.88802           42.5704752        1.63851  0.210696  0.210696  0.301694  0.351694
            SoilCrop WheatSoil: LL=[0.207, 0.207, 0.211, 0.251, 0.243, 0.262, 0.293]; KL=[0.06, 0.06, 0.06, 0.04, 0.04, 0.02, 0.01]; XF=[1, 1, 1, 1, 1, 1, 1]
            SoilCrop CanolaSoil: LL=[0.207, 0.207, 0.211, 0.251, 0.25, 0.262, 0.27]; KL=[0.06, 0.06, 0.05, 0.04, 0.03, 0.02, 0.01]; XF=[1, 1, 1, 1, 1, 1, 1]
          WaterBalance SoilWater: SummerDate=1-Nov; SummerU=6; SummerCona=3.5; WinterDate=1-Apr; WinterU=2; WinterCona=2; DiffusConst=40; DiffusSlope=16; Salb=0.12; CN2Bare=68; CNRed=20; CNCov=0.8; PSIDul=-100; Thickness=[150, 150, 300, 300, 300, 300, 300]; SWCON=[0.3, 0.3, 0.3, 0.3, 0.3, 0.3, 0.3]
          Solute NO3: Thickness=[150, 150, 300, 300, 300, 300, 300]; InitialValues=[62, 30, 10, 5, 1, 1, 1]; InitialValuesUnits=kg/ha; WaterTableConcentration=0; D0=0; DepthConstant=0; MaxDepthSoluteAccessible=0; RunoffEffectivenessAtMovingSolute=0; MaxEffectiveRunoff=0
          Solute NH4: Thickness=[150, 150, 300, 300, 300, 300, 300]; InitialValues=[1, 0.1, 0.1, 0.1, 0.1, 0.1, 0.1]; InitialValuesUnits=kg/ha; WaterTableConcentration=0; D0=0; DepthConstant=0; MaxDepthSoluteAccessible=0; RunoffEffectivenessAtMovingSolute=0; MaxEffectiveRunoff=0
          Solute UREA: same as Tamworth.TamworthBase.Zone.Grey-Black Vertosol (Spring Ridge No127).Urea
          Organic: FOMCNRatio=40; CarbonUnits=Total
            Thickness  Carbon  SoilCNRatio  FBiom  FInert  FOM
            150        0.677   12           0.04   0.4     347.129
            150        0.425   12           0.02   0.5     270.344
            300        0.32    12           0.02   0.7     163.972
            300        0.131   12           0.02   1       99.454
            300        0.068   12           0.01   1       60.322
            300        0.047   12           0.01   1       36.587
            300        0.047   12           0.01   1       22.191
          Chemical: PHUnits=Water
            Thickness  PH   EC     ESP
            150        7.8  0.137  2.869
            150        7.8  0.127  3.378
            300        7.8  0.162  6.452
            300        7.9  0.293  12.371
            300        8    0.36   15.832
            300        8.1  0.399  18.68
            300        8.1  0.39   18.282
            PH source: Unknown source or quality of data
          Water: Thickness=[150, 150, 300, 300, 300, 300, 300]; InitialValues=[0.34, 0.34, 0.35, 0.355, 0.369, 0.339, 0.302]; FilledFromTop=false
          Nutrient
          SoilTemperature Temperature: InteractionsPerDay=8
        Manager ResetSoilFixedDate
          ResetDate = 10-apr
          ResetWater = Yes
          ResetNutrients = Yes
          ResetSOM = No
          script: same as in Young.YoungBase.Zone.ResetSoilFixedDate
        Manager Tillage on a fixed date
          TillageDate = 5-apr
          Fraction = 0.9
          Depth = 0
          script: same as in Condobolin2003.Condobolin2003Base.Zone.Tillage on a fixed date
        Manager SowingFixedDate
          SowDate = 13-apr
          CultivarName = Garnet
          SowingDepth = 15
          RowSpacing = 180
          Population = 20
          script: same as in Canberra.CanberraBase.Zone.SowingFixedDate
        Manager FertiliseAtSowing
          Crop = [Canola]
          FertiliserType = UreaN
          Amount = 50
          script: same as in Canberra.CanberraBase.Zone.FertiliseAtSowing
        Manager Fertilise on fixed dates
          FertiliserType = UreaN
          FertiliserDates = 10-jun
          Amount = 50
          AmountType = False
          script: same as in Young.YoungBase.Zone.Fertilise on fixed dates
        Manager Harvesting: same as Canberra.CanberraBase.Zone.Harvesting
        Report DailyReport: same as Wagga.WaggaBase.Zone.DailyReport
        Report HarvestReport: same as Wagga.WaggaBase.Zone.DailyReport
        Report DamageFunctionHarvestReport: same as Replacements.DamageFunctionHarvestReport
        Report SowingReport: EventNames=[Canola].Sowing
          VariableNames:
            [Clock].Today
            [Canola].SowingData.Cultivar
            [IWeather].Latitude
            [IWeather].Longitude
  Experiment Trangie2009
    Factors
      Permutation
        Factor Sowing
          CompositeFactor 1: Specifications=[SowingFixedDate].Script.SowDate=21-apr
          CompositeFactor 2: Specifications=[SowingFixedDate].Script.SowDate=18-may
        Factor Cultivar
          CompositeFactor 44C79: Specifications=[SowingFixedDate].Script.CultivarName=44C79
          CompositeFactor Tarcoola: Specifications=[SowingFixedDate].Script.CultivarName=Tarcoola
          CompositeFactor Hyola50: Specifications=[SowingFixedDate].Script.CultivarName=Hyola50
          CompositeFactor Earlymid: Specifications=[SowingFixedDate].Script.CultivarName=Skipton
    Simulation Trangie2009Base
      Clock: Start=2008-11-12; End=2009-12-30
      Summary SummaryFile
      Weather: FileName=./met/trangie-fh.met
      SoilArbitrator Soil Arbitrator
      MicroClimate: a_interception=0; b_interception=0; c_interception=0; d_interception=0; SoilHeatFluxFraction=0.4; MinimumHeightDiffForNewLayer=0; NightInterceptionFraction=0.5; ReferenceHeight=2
      Zone: Area=1; Slope=0; AspectAngle=0; Altitude=50
        Plant Canola
        Irrigation
        Fertiliser
        SurfaceOrganicMatter: InitialResidueName=wheat_stubble; InitialResidueType=wheat; InitialResidueMass=2000; InitialStandingFraction=0.1; InitialCPR=400; InitialCNR=80
        Soil Light over medium clay reverting to a sandy clay at depth (Trangie No684): SoilType=sNSW; Site=Trangie; NearestTown=Trangie; Region=Central West Slopes and Plains; State=New South Wales; Country=Australia; ApsoilNumber=684; Latitude=-31.97028; Longitude=147.94871; LocationAccuracy=+/- 20m; Comments=Classification based on partical size analysis. Clay
          DataSource=Data collected as part of the GRDC project ‘Training growers to manage soil water’ by CSIRO Sustainable Ecosystems in collaboration with farmers and NSW DPI Trangie
          Physical
            Thickness  ParticleSizeSand  ParticleSizeSilt  ParticleSizeClay  BD     AirDry  LL15   DUL    SAT
            150        42.32             13.336            44.344            1.297  0.104   0.207  0.37   0.48
            150        38.362            13.214            48.424            1.375  0.165   0.207  0.361  0.451
            300        36.894            12.235            50.872            1.452  0.211   0.211  0.371  0.422
            300        42.034            10.091            47.874            1.478  0.211   0.211  0.362  0.412
            300        44.482            8.051             47.466            1.46   0.211   0.211  0.369  0.419
            300        48.848            7.357             43.794            1.539  0.211   0.211  0.339  0.389
            300        49.542            7.888             42.57             1.639  0.211   0.211  0.302  0.352
            SoilCrop WheatSoil: LL=[0.207, 0.207, 0.211, 0.251, 0.243, 0.262, 0.293]; KL=[0.06, 0.06, 0.06, 0.04, 0.04, 0.02, 0.01]; XF=[1, 1, 1, 1, 1, 1, 1]
            SoilCrop CanolaSoil: LL=[0.207, 0.207, 0.211, 0.251, 0.25, 0.262, 0.27]; KL=[0.06, 0.06, 0.05, 0.04, 0.03, 0.02, 0.01]; XF=[1, 1, 1, 1, 1, 1, 1]
          WaterBalance SoilWater: same as Trangie2012.Trangie2012Base.Zone.Light over medium clay reverting to a sandy clay at depth (Trangie No684).SoilWater
          Solute NO3: Thickness=[150, 150, 300, 300, 300, 300, 300]; InitialValues=[40, 40, 10, 5, 1, 1, 1]; InitialValuesUnits=kg/ha; WaterTableConcentration=0; D0=0; DepthConstant=0; MaxDepthSoluteAccessible=0; RunoffEffectivenessAtMovingSolute=0; MaxEffectiveRunoff=0
          Solute NH4: same as Trangie2012.Trangie2012Base.Zone.Light over medium clay reverting to a sandy clay at depth (Trangie No684).NH4
          Solute UREA: same as Tamworth.TamworthBase.Zone.Grey-Black Vertosol (Spring Ridge No127).Urea
          Organic: same as Trangie2012.Trangie2012Base.Zone.Light over medium clay reverting to a sandy clay at depth (Trangie No684).Organic
          Chemical: same as Trangie2012.Trangie2012Base.Zone.Light over medium clay reverting to a sandy clay at depth (Trangie No684).Chemical
          Water: Thickness=[150, 150, 300, 300, 300, 300, 300]; InitialValues=[0.25, 0.25, 0.25, 0.25, 0.25, 0.25, 0.25]; FilledFromTop=false
          Nutrient
          SoilTemperature Temperature: InteractionsPerDay=8
        Manager ResetSoilFixedDate: same as Trangie2012.Trangie2012Base.Zone.ResetSoilFixedDate
        Manager Tillage on a fixed date: same as Trangie2012.Trangie2012Base.Zone.Tillage on a fixed date
        Manager SowingFixedDate
          SowDate = 21-apr
          CultivarName = Garnet
          SowingDepth = 15
          RowSpacing = 180
          Population = 20
          script: same as in Canberra.CanberraBase.Zone.SowingFixedDate
        Manager FertiliseAtSowing: same as Trangie2012.Trangie2012Base.Zone.FertiliseAtSowing
        Manager Harvesting: same as Canberra.CanberraBase.Zone.Harvesting
        Report DailyReport: same as Wagga.WaggaBase.Zone.DailyReport
        Report HarvestReport: same as Wagga.WaggaBase.Zone.DailyReport
        Report DamageFunctionHarvestReport: same as Replacements.DamageFunctionHarvestReport
        Report SowingReport: EventNames=[Canola].Sowing
          VariableNames:
            [Clock].Today
            [Canola].SowingData.Cultivar
            [IWeather].Latitude
            [IWeather].Longitude
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