Simulations: Version=216
  Memo Funding Acknowledgement
    The development of frost and heat damage functions was supported by the ‘Frost and Heat Management Analytics’ (FAHMA) project via funding from the Grains Research and Development Corporation (GRDC; Grant No. CSP2204-009RTX).
  Memo Data Ownership Acknowledgement
    Data description: https://doi.org/10.25919/j2af-ax46.

    Disclaimer: This dataset is provided “as is” without warranty of any kind, express or implied, including but not limited to its accuracy, completeness, or fitness for a particular purpose. The creators and contributors shall not be liable for any damages arising from its use.

    License: This dataset is released under [Creative Commons Attribution 4.0 International Licence](https://creativecommons.org/licenses/by/4.0/) in [CSIRO DAP](https://doi.org/10.25919/j2af-ax46).

    For further inquiries or permission requests, please contact Dr Julianne Lilley (julianne.lilley@csiro.au).

    When citing this dataset, please use the following reference: Lilley, Julianne; Kirkegaard, John; Whish, Jeremy; Beletse, Yacob; Berger, Jens; Seymour, Mark; Bucat, Jackie; Herrmann, Chris; Dunn, Mathew; Ware, Andrew; Brill, Rohan; & Zhang, Heping (2024): Canola Agronomy. v3. CSIRO. Data Collection. https://doi.org/10.25919/j2af-ax46.

    When using the damage functions, please use the following reference for more information: Hu, P., He, D., Zheng, B., Whish, J., Kirkegaard, J., Bell, L., Leske, B., Chen, S., Uppal, R., Biddulph, B., Trethowan, R., Beletse, Y., Lilley, J., 2026. Event-based frost and heat damage functions improve yield predictions of APSIM canola and wheat: formulation, calibration, and evaluation. Agricultural and Forest Meteorology 386, 111239. https://doi.org/10.1016/j.agrformet.2026.111239
  DataStore
    ExcelInput: FileNames=[CanolaAgronomy_2_Obs.xlsx]; SheetNames=[Obs]
    PredictedObserved: PredictedTableName=HarvestReport; ObservedTableName=Obs; FieldNameUsedForMatch=SimulationName; AllColumns=true
    PredictedObserved DamageFunctionHarvestObsPred: PredictedTableName=DamageFunctionHarvestReport; ObservedTableName=Obs; FieldNameUsedForMatch=SimulationName; AllColumns=true
  Folder Replacements
    Report DailyReport: EventNames=[Clock].DoReport
      VariableNames:
        [Clock].Today as Date
        [Plant].SowingDate.Year as Year
        [Canola].Phenology.Stage as Stage
        [Canola].Phenology.Zadok as ZadokStage
        [Canola].Phenology.CurrentStageName as CurrentStageName
        [Canola].AboveGround.Wt*10 as AboveGroundWt
        [Canola].Grain.Total.Wt*10 as Yield
        [Canola].Grain.Size as GrainSize
        [Canola].Grain.Number as GrainNumber
        [Canola].LAI as LAI
        [Canola].Phenology.ThermalTime as TT
        [Canola].Phenology.AccumulatedTT as AccumulatedTT
        [Weather].MaxT as maxT
        [Weather].MinT as minT
        [Weather].Rain as Rain
        [Canola].Leaf.Fn as Fn
        [Canola].Leaf.Fw as Fw
    Report HarvestReport: EventNames=[Canola].Harvesting
      VariableNames:
        [Clock].Today
        [Canola].Phenology.CurrentPhaseName
        [Plant].SowingDate
        [Canola].Phenology.EmergenceDAS
        [Canola].Phenology.StartFloweringDAS
        [Canola].Phenology.MaturityDAS
        [Canola].AboveGround.Wt
        [Canola].Grain.Wt
        [FrostHeatDamageFunctions].FrostHeatYield
        [IWeather].Latitude
        [IWeather].Longitude
    Manager Harvesting
```csharp
using Models.PMF.Phen;
using System;
using Models.Core;
using System.Collections.Generic;
using System.Text;
using Models.Soils;
using Models.PMF;
using Models;
using System.Xml.Serialization;
using APSIM.Shared.Utilities;

namespace Models
{
    [Serializable] 
    public class Script : Model
    {
        [Link] private Plant Canola;
        [Link] private Clock Clock;
        [Link(Type = LinkType.Path, Path = "[Canola].Phenology")]
        private Phenology phenology;

        [EventSubscribe("DoManagement")]
        private void OnDoManagement(object sender, EventArgs e)
        {
            if ((phenology.CurrentPhase.Name == "ReadyForHarvesting")||(Canola.IsAlive&&DateUtilities.DatesEqual("31-Dec", Clock.Today)))
            {
                Canola.Harvest();
                Canola.EndCrop();
            }
        }
    }
}
```
    Report SowingReport: EventNames=[Canola].Sowing
      VariableNames:
        [Clock].Today
        [Canola].SowingData.Cultivar
        [IWeather].Latitude
        [IWeather].Longitude
    Report DamageFunctionHarvestReport: EventNames=[Canola].Harvesting
      VariableNames:
        [Clock].Today as Date
        [Canola].Phenology.Stage
        [Canola].Phenology.EmergenceDAS
        [Canola].Phenology.StartFloweringDAS
        [Canola].Phenology.MaturityDAS
        [Canola].AboveGround.Wt
        [FrostHeatDamageFunctions].FrostHeatYield as Canola.Grain.Wt
    Plant Canola: PlantType=Canola
      OrganArbitrator Arbitrator
        BiomassTypeArbitrator DMArbitration
          Folder PotentialPartitioningMethods
            ReallocationMethod
            AllocateFixationMethod
            RetranslocationMethod
            SendPotentialDMAllocationsMethod
          Folder AllocationMethods
            NutrientConstrainedAllocationMethod
            DryMatterAllocationsMethod
          RelativeAllocation ArbitrationMethod
        BiomassTypeArbitrator NArbitration
          Folder PotentialPartitioningMethods
            ReallocationMethod
          Folder ActualPartitioningMethods
            AllocateFixationMethod
            RetranslocationMethod
          Folder AllocationMethods
            NitrogenAllocationsMethod
          RelativeAllocation ArbitrationMethod
          AllocateUptakesMethod
        WaterUptakeMethod
        NitrogenUptakeMethod
      Phenology
        SubDailyInterpolation ThermalTime: agregationMethod=0
          XYPairs Response: X=[2, 30, 35]; Y=[0, 28, 0]
          ThreeHourAirTemperature InterpolationMethod
        AccumulateFunction CumulativeThermalTime: StartStageName=Germination; EndStageName=FloralInitiation; FractionRemovedOnCut=0; FractionRemovedOnHarvest=0; FractionRemovedOnGraze=0; FractionRemovedOnPrune=0
          VariableReference DailyValue: VariableName=[Phenology].ThermalTime
        SubDailyInterpolation VernalTime: agregationMethod=0
          XYPairs Response: X=[0, 2, 8, 15]; Y=[0, 1, 0.5, 0]
          ThreeHourAirTemperature InterpolationMethod
        AccumulateFunction CumulativeVernalTime: StartStageName=Germination; EndStageName=FloralInitiation; FractionRemovedOnCut=0; FractionRemovedOnHarvest=0; FractionRemovedOnGraze=0; FractionRemovedOnPrune=0
          VariableReference DailyValue: VariableName=[Phenology].VernalTime
        PhotoperiodFunction Photoperiod: Twilight=-6; DayLength=0
        GerminatingPhase Germinating: Start=Sowing; End=Germination; IsEmerged=false
          Constant MinSoilTemperature: FixedValue=0
        EmergingPhase Emerging: Start=Germination; End=Emergence; IsEmerged=false; TTForTimeStep=0
          VariableReference ThermalTime: VariableName=[Phenology].ThermalTime
          AddFunction Target
            Constant ShootLag: FixedValue=15
            MultiplyFunction DepthxRate
              VariableReference SowingDepth: VariableName=[Plant].SowingData.Depth
              Constant ShootRate: FixedValue=5
        GenericPhase Vegetative: Start=Emergence; End=FloralInitiation; IsEmerged=true
          VariableReference Progression: VariableName=[Phenology].ThermalTime
          LinearInterpolationFunction Target
            XYPairs: X=[0, 25]; Y=[290, 1]
            VariableReference XValue: VariableName=[Phenology].CumulativeVernalTime
        SimpleLeafAppearancePhase BudDevelopment: Start=FloralInitiation; End=GreenBud; IsEmerged=true
          VariableReference TargetLeafNumber: VariableName=[Leaf].FinalLeafNumber
          VariableReference CurrentLeafNumber: VariableName=[Leaf].NodeNumber
        GenericPhase StemElongation: Start=GreenBud; End=StartFlowering; IsEmerged=true
          VariableReference Progression: VariableName=[Phenology].ThermalTime
          AddFunction Target
            Constant Base: FixedValue=250
            MultiplyFunction PPResponse
              Constant Amount: FixedValue=0
              LinearInterpolationFunction Shape
                XYPairs: X=[13, 14]; Y=[1, 0]
                VariableReference XValue: VariableName=[Phenology].Photoperiod
        GenericPhase EarlyFlowering: Start=StartFlowering; End=StartPodDevelopment; IsEmerged=true
          Memo
            The duration of the grain filling phase has been taken from the model of Robertson et al (2002).
          Constant Target: FixedValue=100
          VariableReference Progression: VariableName=[Phenology].ThermalTime
        GenericPhase EarlyPodDevelopment: Start=StartPodDevelopment; End=StartGrainFilling; IsEmerged=true
          Memo
            The duration of the grain filling phase has been taken from the model of Robertson et al (2002).
          Constant Target: FixedValue=140
          VariableReference Progression: VariableName=[Phenology].ThermalTime
          VariableReference Stress: VariableName=[Phenology].Vegetative.PhotoperiodEffect
        GenericPhase EarlyGrainFilling: Start=StartGrainFilling; End=EndFlowering; IsEmerged=true
          VariableReference Progression: VariableName=[Phenology].ThermalTime
          VariableReference Stress: VariableName=[Phenology].Vegetative.PhotoperiodEffect
          MultiplyFunction Target
            Constant FractionofGrainfilling: FixedValue=0.05
            VariableReference EntireGrainfilling
              VariableName=[Phenology].LateGrainFilling.Target.EntireGrainfillPeriod.FixedValue
        GenericPhase MidGrainFilling: Start=EndFlowering; End=EndPodDevelopment; IsEmerged=true
          VariableReference Progression: VariableName=[Phenology].ThermalTime
          VariableReference Stress: VariableName=[Phenology].Vegetative.PhotoperiodEffect
          MultiplyFunction Target
            Constant FractionofMidToLateGrainfilling: FixedValue=0.5
            SubtractFunction
              VariableReference EntireGrainfilling
                VariableName=[Phenology].LateGrainFilling.Target.EntireGrainfillPeriod.FixedValue
              VariableReference EarlyGrainfilling: VariableName=[Phenology].EarlyGrainFilling.Target
        GenericPhase LateGrainFilling: Start=EndPodDevelopment; End=EndGrainFill; IsEmerged=true
          SubtractFunction Target
            Constant EntireGrainfillPeriod: FixedValue=700
            VariableReference EarlyGrainFillingTarget: VariableName=[Phenology].EarlyGrainFilling.Target
            VariableReference MidGrainFillingTarget: VariableName=[Phenology].MidGrainFilling.Target
          VariableReference Progression: VariableName=[Phenology].ThermalTime
          VariableReference Stress: VariableName=[Phenology].Vegetative.PhotoperiodEffect
        GenericPhase Maturing: Start=EndGrainFill; End=Maturity; IsEmerged=true
          Constant Target: FixedValue=5
          VariableReference Progression: VariableName=[Phenology].ThermalTime
        GenericPhase Ripening: Start=Maturity; End=HarvestRipe; IsEmerged=true
          Constant Target: FixedValue=1
          VariableReference Progression: VariableName=[Phenology].ThermalTime
        EndPhase ReadyForHarvesting: Start=HarvestRipe; End=Unused; IsEmerged=true
          VariableReference ThermalTime: VariableName=[Phenology].ThermalTime
        OnEventFunction EmergenceDAS: SetEvent=Emergence; ReSetEvent=never
          Memo
            A function is used to provide maturity date as days after sowing(DAS).
          Constant PreEventValue: FixedValue=0
          VariableReference PostEventValue: VariableName=[Plant].DaysAfterSowing
        OnEventFunction FloralInitiationDAS: SetEvent=FloralInitiation; ReSetEvent=never
          Memo
            A function is used to provide flowering date as days after sowing(DAS).
          Constant PreEventValue: FixedValue=0
          VariableReference PostEventValue: VariableName=[Plant].DaysAfterSowing
        OnEventFunction GreenBudDAS: SetEvent=GreenBud; ReSetEvent=never
          Memo
            A function is used to provide flowering date as days after sowing(DAS).
          Constant PreEventValue: FixedValue=0
          VariableReference PostEventValue: VariableName=[Plant].DaysAfterSowing
        OnEventFunction StartFloweringDAS: SetEvent=StartFlowering; ReSetEvent=never
          Memo
            A function is used to provide flowering date as days after sowing(DAS).
          Constant PreEventValue: FixedValue=0
          VariableReference PostEventValue: VariableName=[Plant].DaysAfterSowing
        OnEventFunction MaturityDAS: SetEvent=Maturity; ReSetEvent=never
          Memo
            A function is used to provide maturity date as days after sowing(DAS).
          Constant PreEventValue: FixedValue=0
          VariableReference PostEventValue: VariableName=[Plant].DaysAfterSowing
      Root: GrowthRespiration=0; MaintenanceRespiration=0
        RootShapeCylinder RootShape
        LinearInterpolationFunction KLModifier
          XYPairs: X=[0, 3]; Y=[1, 1]
          VariableReference XValue: VariableName=[Leaf].LAI
        SubDailyInterpolation TemperatureEffect: agregationMethod=0
          XYPairs Response: X=[0, 20, 32]; Y=[0, 1, 0]
          ThreeHourAirTemperature InterpolationMethod
        Constant MaxDailyNUptake: FixedValue=6
        Constant SenescenceRate: FixedValue=0.005
        Constant MaximumRootDepth: FixedValue=1000000
        MultiplyFunction RootFrontVelocity
          PhaseLookup PotentialRate
            PhaseLookupValue PreEmergence: Start=Germination; End=Emergence
              Constant Function: FixedValue=5
            PhaseLookupValue early: Start=Emergence; End=StartGrainFilling
              Constant Function: FixedValue=44
            PhaseLookupValue late: Start=StartGrainFilling; End=Maturity
              Constant Function: FixedValue=0
          WeightedTemperatureFunction TemperatureFactor: MaximumTemperatureWeighting=0.5
            XYPairs: X=[0, 20, 32]; Y=[0, 1, 0]
        Constant MaximumNConc: FixedValue=0.01
        Constant MinimumNConc: FixedValue=0.005
        PhaseLookupValue NitrogenDemandSwitch: Start=Emergence; End=EndGrainFill
          Constant: FixedValue=1
        LinearInterpolationFunction KNO3
          XYPairs: X=[0, 0.003]; Y=[0.01, 0.01]
          VariableReference XValue: VariableName=[Root].LengthDensity
        LinearInterpolationFunction KNH4
          XYPairs: X=[0, 0.003]; Y=[0, 0]
          VariableReference XValue: VariableName=[Root].LengthDensity
        BiomassRemoval BiomassRemovalDefaults: HarvestFractionLiveToRemove=0; HarvestFractionDeadToRemove=0; HarvestFractionLiveToResidue=0.2; HarvestFractionDeadToResidue=0
        LinearInterpolationFunction NUptakeSWFactor
          XYPairs: X=[0, 1]; Y=[0, 1]
          VariableReference XValue: VariableName=[Root].RWC
        Constant SpecificRootLength: FixedValue=40; Units=m/g
        Constant DMConversionEfficiency: FixedValue=1
        Constant MaintenanceRespirationFunction: FixedValue=1
        Constant RemobilisationCost: FixedValue=0
        Constant CarbonConcentration: FixedValue=0.4
        NutrientDemandFunctions DMDemands
          MultiplyFunction Structural
            PartitionFractionDemandFunction DMDemandFunction
              PhaseLookup PartitionFraction
                PhaseLookupValue Early: Start=Emergence; End=StartFlowering
                  Constant Function: FixedValue=0.2
                PhaseLookupValue Middle: Start=StartFlowering; End=StartGrainFilling
                  Constant Function: FixedValue=0.1
                PhaseLookupValue Late: Start=StartGrainFilling; End=Maturity
                  Constant Function: FixedValue=0
            Constant StructuralFraction: FixedValue=1
          Constant Metabolic: FixedValue=0
          StorageDMDemandFunction Storage
            SubtractFunction StorageFraction
              Constant One: FixedValue=1
              VariableReference StructuralFraction: VariableName=[Root].DMDemands.Structural.StructuralFraction
          Constant QStructuralPriority: FixedValue=1
          Constant QMetabolicPriority: FixedValue=1
          Constant QStoragePriority: FixedValue=1
        NutrientDemandFunctions NDemands
          MultiplyFunction Structural
            VariableReference MinNconc: VariableName=[Root].minimumNconc
            VariableReference PotentialDMAllocation: VariableName=[Root].potentialDMAllocation.Structural
          MultiplyFunction Metabolic
            SubtractFunction MetabolicNconc
              VariableReference CritNconc: VariableName=[Root].criticalNConc
              VariableReference MinNconc: VariableName=[Root].minimumNconc
            VariableReference PotentialDMAllocation: VariableName=[Root].potentialDMAllocation.Structural
          StorageNDemandFunction Storage
            VariableReference NitrogenDemandSwitch: VariableName=[Root].nitrogenDemandSwitch
            VariableReference MaxNconc: VariableName=[Root].maximumNconc
          Constant QStructuralPriority: FixedValue=1
          Constant QMetabolicPriority: FixedValue=1
          Constant QStoragePriority: FixedValue=1
        VariableReference CriticalNConc: VariableName=[Root].MinimumNConc
        NutrientPoolFunctions InitialWt
          Constant Structural: FixedValue=0.2; Units=g/plant
          Constant Metabolic: FixedValue=0
          Constant Storage: FixedValue=0
        Constant RootDepthStressFactor: FixedValue=1
      SimpleLeaf Leaf: Albedo=0.25; Gsmax350=0.015; R50=150; LeafInitialisationStage=Emergence; Height=0; BaseHeight=0; Width=0; FRGR=0; PotentialEP=0; WaterDemand=0; KDead=0.3; LAIDead=0
        RUEModel Photosynthesis
          MultiplyFunction RUE
            Constant Potential: FixedValue=1.69
              Memo
                This approach is based upon the value used in [#robertson_simulation_2002] increased to account for partitioning to roots.
            Constant TriazineToleranceModifier: FixedValue=1
          WeightedTemperatureFunction FT: MaximumTemperatureWeighting=0.75
            Memo
              This approach is based upon that used in Bell, WRight and Hammer (1992) Crop Sci
            XYPairs: X=[0, 10, 22, 30]; Y=[0, 1, 1, 0]
          LinearInterpolationFunction FVPD
            XYPairs: X=[0, 10, 50]; Y=[1, 1, 1]
            VariableReference XValue: VariableName=[Leaf].Photosynthesis.VPD
          LinearInterpolationFunction FN
            XYPairs: X=[0, 1, 1.5]; Y=[0, 1, 1]
            VariableReference XValue: VariableName=[Leaf].Fn
          LinearInterpolationFunction FW
            XYPairs: X=[0, 1]; Y=[0, 1]
            VariableReference XValue: VariableName=[Leaf].Fw
          RUECO2Function FCO2: PhotosyntheticPathway=C3
          VariableReference RadnInt: VariableName=[Leaf].RadiationIntercepted
        StomatalConductanceCO2Modifier
          VariableReference PhotosynthesisCO2Modifier: VariableName=[Leaf].Photosynthesis.FCO2
        MaximumFunction Area
          AddFunction Calculation
            MultiplyFunction Initial
              Constant AreaPerPlant: FixedValue=0.0005
              VariableReference Population: VariableName=[Plant].SowingData.Population
            SubtractFunction Change
              AccumulateAtEvent AreaGrowth: StartStageName=Emergence; EndStageName=StartFlowering; AccumulateEventName=[Clock].DoActualPlantGrowth
                MultiplyFunction DeltaArea
                  VariableReference DeltaMass: VariableName=[Leaf].Allocated.StructuralWt
                  VariableReference SLA: VariableName=[Leaf].SpecificArea
              AccumulateAtEvent AreaSenesced: StartStageName=Emergence; EndStageName=HarvestRipe; AccumulateEventName=[Clock].DoActualPlantGrowth
                MultiplyFunction DeltaArea
                  VariableReference DeltaSenesced: VariableName=[Leaf].Senesced.StructuralWt
                  VariableReference SLA: VariableName=[Leaf].SpecificAreaCanopy
              AccumulateAtEvent AreaRemoved: StartStageName=Emergence; EndStageName=HarvestRipe; AccumulateEventName=[Clock].DoReportCalculations
                MultiplyFunction DeltaArea
                  VariableReference DeltaRemoved: VariableName=[Leaf].Removed.StructuralWt
                  VariableReference SLA: VariableName=[Leaf].SpecificAreaCanopy
          Constant Zero: FixedValue=0
        MinimumFunction FRGR
          VariableReference RUE_FT: VariableName=[Leaf].Photosynthesis.FT
          MinimumFunction Others
            VariableReference RUE_FN: VariableName=[Leaf].Photosynthesis.FN
            VariableReference RUE_FVPD: VariableName=[Leaf].Photosynthesis.FVPD
        Constant ExtinctionCoefficient: FixedValue=0.6
        LinearInterpolationFunction HeightFunction
          XYPairs: X=[1, 2, 3, 4, 5, 6, 9]; Y=[0, 0, 50, 400, 700, 900, 1000]
          VariableReference XValue: VariableName=[Phenology].Stage
        AddFunction NodeNumber
          Constant Initial: FixedValue=0
          AccumulateFunction Change: StartStageName=Emergence; EndStageName=GreenBud; FractionRemovedOnCut=1; FractionRemovedOnHarvest=1; FractionRemovedOnGraze=1; FractionRemovedOnPrune=0
            DivideFunction DeltaNode
              VariableReference ThermalTime: VariableName=[Phenology].ThermalTime
              VariableReference Phyllochron: VariableName=[Leaf].Phyllochron
        AddFunction BranchNumber
          Constant One: FixedValue=1
          AccumulateFunction CumulativeBranching: StartStageName=Emergence; EndStageName=GreenBud; FractionRemovedOnCut=1; FractionRemovedOnHarvest=1; FractionRemovedOnGraze=1; FractionRemovedOnPrune=0
            MultiplyFunction DeltaBranch
              VariableReference DeltaNode: VariableName=[Leaf].NodeNumber.Change.DeltaNode
              VariableReference BranchingRate: VariableName=[Leaf].BranchingRate
              MaximumFunction CoverFactor
                LinearInterpolationFunction Factor
                  XYPairs: X=[0, 0.3, 0.35, 1]; Y=[1, 1, 0, 0]
                  VariableReference XValue: VariableName=[Leaf].CoverTotal
                Constant Zero: FixedValue=0
              LinearInterpolationFunction WaterFactor
                XYPairs: X=[0.8, 1]; Y=[0, 1]
                VariableReference XValue: VariableName=[Leaf].Fw
              WeightedTemperatureFunction TemperatureFactor: MaximumTemperatureWeighting=0.5
                Memo
                  This approach is based upon that used in Bell, WRight and Hammer (1992) Crop Sci
                XYPairs: X=[0, 12, 22, 30]; Y=[0, 1, 1, 0]
        AccumulateFunction Number: StartStageName=Emergence; EndStageName=GreenBud; FractionRemovedOnCut=1; FractionRemovedOnHarvest=1; FractionRemovedOnGraze=1; FractionRemovedOnPrune=0
          MultiplyFunction DailyNumberIncrease
            VariableReference DeltaNode: VariableName=[Leaf].NodeNumber.Change.DeltaNode
            VariableReference BranchNumber: VariableName=[Leaf].BranchNumber
            VariableReference PlantNumber: VariableName=[Plant].SowingData.Population
        Constant NReallocationFactor: FixedValue=0.5
          Memo
            This model assumes that all metabolic and storage N is available for reallocation from senescing leaves.
        PhaseLookup SenescenceRate
          PhaseLookupValue Vegetative: Start=Emergence; End=StartFlowering
            MaximumFunction Rate
              MultiplyFunction AgeSenescence
                LinearInterpolationFunction Multiplier
                  XYPairs: X=[9, 10]; Y=[0, 1]
                  VariableReference XValue: VariableName=[Leaf].NodeNumber
                DivideFunction LeavesPerDay
                  VariableReference ThermalTime: VariableName=[Phenology].ThermalTime
                  VariableReference Phyllochron: VariableName=[Leaf].Phyllochron
                  VariableReference NodeNumber: VariableName=[Leaf].NodeNumber
                Constant: FixedValue=0
              LinearInterpolationFunction ShadeSenescence
                XYPairs: X=[1, 5, 8]; Y=[0, 0, 0.03]
                VariableReference XValue: VariableName=[Leaf].LAI
          PhaseLookupValue Reproductive: Start=StartFlowering; End=EndPodDevelopment
            Memo
              Leaf senescence rate is calculated to ensure that all leaves are senesced by crop maturity.
            BoundFunction Rate
              DivideFunction Fraction
                VariableReference TT: VariableName=[Phenology].ThermalTime
                SubtractFunction TTRemaining
                  ExpressionFunction TTRequired
                    Expression=[Phenology].EarlyFlowering.Target + [Phenology].EarlyPodDevelopment.Target + [Phenology].EarlyGrainFilling.Target+[Phenology].MidGrainFilling.Target
                  ExpressionFunction TTComplete
                    Expression=[Phenology].EarlyFlowering.ProgressThroughPhase + [Phenology].EarlyPodDevelopment.ProgressThroughPhase + [Phenology].EarlyGrainFilling.ProgressThroughPhase+[Phenology].MidGrainFilling.ProgressThroughPhase
                Constant Modifier: FixedValue=1
              Constant Lower: FixedValue=0
              Constant Upper: FixedValue=1
          PhaseLookupValue Senescent: Start=EndPodDevelopment; End=HarvestRipe
            Memo
              Leaf senescence rate is calculated to ensure that all leaves are senesced by crop maturity.
            Constant Rate: FixedValue=0.1
        Constant DetachmentRate: FixedValue=0.05; Units=/d
        DivideFunction InitialWt
          VariableReference InitialArea: VariableName=[Leaf].Area.Calculation.Initial
          VariableReference SLA: VariableName=[Leaf].SpecificArea
        MultiplyFunction LAIDead
          VariableReference SLA: VariableName=[Leaf].SpecificAreaCanopy
          VariableReference LeafDeadWt: VariableName=[Leaf].Dead.Wt
        LinearInterpolationFunction MaximumNConc
          XYPairs: X=[1, 3, 8]; Y=[0.06, 0.035, 0.03]
          VariableReference XValue: VariableName=[Leaf].NodeNumber
        VariableReference CriticalNConc: VariableName=[Leaf].MaximumNConc
        Constant MinimumNConc: FixedValue=0.02
        Constant MaintenanceRespiration: FixedValue=0; Units=0-1
        Constant DMConversionEfficiency: FixedValue=1; Units=0-1
        BiomassRemoval BiomassRemovalDefaults: HarvestFractionLiveToRemove=0; HarvestFractionDeadToRemove=0; HarvestFractionLiveToResidue=1; HarvestFractionDeadToResidue=1
        Constant NRetranslocationFactor: FixedValue=0.5
        Constant DMReallocationFactor: FixedValue=0
        Constant DMRetranslocationFactor: FixedValue=0.5
        Constant RemobilisationCost: FixedValue=0
        Constant CarbonConcentration: FixedValue=0.4
        NutrientDemandFunctions DMDemands
          DivideFunction Structural
            PhaseLookup DeltaLAIPotential
              PhaseLookupValue Vegetative: Start=Emergence; End=StartFlowering
                MultiplyFunction Delta
                  VariableReference AreaLargestLeaf: VariableName=[Leaf].AreaLargestLeaf
                  LinearInterpolationFunction RelativeArea
                    Memo
                      This approach is based upon that used in [#robertson_simulation_2002].
                    XYPairs: X=[1, 2, 3, 4, 8]; Y=[0.03, 0.06, 0.12, 0.25, 1]
                    VariableReference XValue: VariableName=[Leaf].NodeNumber
                  LinearInterpolationFunction StageFactor
                    Memo
                      This approach is based upon that used in [#robertson_simulation_2002].
                    XYPairs: X=[3, 4, 5, 5.2]; Y=[1, 1, 1, 0.1]
                    VariableReference XValue: VariableName=[Phenology].Stage
                  VariableReference PlantNumber: VariableName=[Plant].SowingData.Population
                  VariableReference BranchNumber: VariableName=[Leaf].BranchNumber
                  DivideFunction LAR
                    VariableReference TT: VariableName=[Phenology].ThermalTime
                    VariableReference Phyllochron: VariableName=[Leaf].Phyllochron
                  VariableReference NitrogenFactor: VariableName=[Leaf].FNmetabolic
                  WeightedTemperatureFunction TemperatureFactor: same as Replacements.Canola.Leaf.BranchNumber.CumulativeBranching.DeltaBranch.TemperatureFactor
              PhaseLookupValue Reproductive: Start=StartFlowering; End=Maturity
                Constant: FixedValue=0
            VariableReference SLA: VariableName=[Leaf].SpecificArea
            Memo
              Growth in leaf area is used to calculate the leaf dry matter demand.  Note that leaf biomass is assumed to consist of entirely structural dry matter.
          Constant Storage: FixedValue=0
          Constant Metabolic: FixedValue=0
          Constant QStructuralPriority: FixedValue=1
          Constant QMetabolicPriority: FixedValue=1
          Constant QStoragePriority: FixedValue=1
        NutrientDemandFunctions NDemands
          MultiplyFunction Structural
            VariableReference MinNconc: VariableName=[Leaf].minimumNconc
            VariableReference PotentialDMAllocation: VariableName=[Leaf].potentialDMAllocation.Structural
          MultiplyFunction Metabolic
            SubtractFunction MetabolicNconc
              VariableReference CritNconc: VariableName=[Leaf].criticalNConc
              VariableReference MinNconc: VariableName=[Leaf].minimumNconc
            VariableReference PotentialDMAllocation: VariableName=[Leaf].potentialDMAllocation.Structural
          StorageNDemandFunction Storage
            Constant NitrogenDemandSwitch: FixedValue=1
            VariableReference MaxNconc: VariableName=[Leaf].maximumNconc
          Constant QStructuralPriority: FixedValue=1
          Constant QMetabolicPriority: FixedValue=1
          Constant QStoragePriority: FixedValue=1
        LinearInterpolationFunction FrostFraction
          XYPairs: X=[-4, 4]; Y=[1, 1]
          VariableReference XValue: VariableName=[Weather].MinT
        Constant SpecificArea: FixedValue=0.025; Units=m^2/g
        Constant AreaLargestLeaf: FixedValue=0.015
        DivideFunction SpecificAreaCanopy
          VariableReference LAI: VariableName=[Leaf].Area
          VariableReference LeafWt: VariableName=[Leaf].Live.Wt
        LinearInterpolationFunction BranchingRate
          XYPairs: X=[0, 6.9, 7, 8, 9]; Y=[0, 0, 1, 1, 0]
          VariableReference XValue: VariableName=[Leaf].NodeNumber
        HoldFunction FinalLeafNumber: WhenToHold=FloralInitiation
          AddFunction FLN
            Constant PrimordiaAtEmergence: FixedValue=3
            AccumulateFunction InitiatedPrimordia: StartStageName=Germination; EndStageName=FloralInitiation; FractionRemovedOnCut=1; FractionRemovedOnHarvest=1; FractionRemovedOnGraze=1; FractionRemovedOnPrune=0
              DivideFunction DailyPrimordiaAppearance
                VariableReference TT: VariableName=[Phenology].ThermalTime
                VariableReference Plastochron: VariableName=[Leaf].Plastochron
        ExpressionFunction Plastochron: Expression=[Leaf].Phyllochron * [Leaf].Plastochron.Multiplier
          Constant Multiplier: FixedValue=0.8
        MultiplyFunction Phyllochron
          Constant Base: FixedValue=56
          LinearInterpolationFunction Multiplier
            XYPairs: X=[1, 7, 8, 9]; Y=[1, 1, 0.45, 0.45]
            VariableReference XValue: VariableName=[Leaf].NodeNumber
        ExpressionFunction TrueLeafNumber: Expression=[Leaf].NodeNumber - 1
      ReproductiveOrgan Grain: GrowthRespiration=0; MaintenanceRespiration=0
        Biomass Live
        Biomass Dead
        AddFunction FillingDuration
          VariableReference EarlyGrainFillingDuration: VariableName=[Phenology].EarlyGrainFilling.Target
          VariableReference MidGrainFillingDuration: VariableName=[Phenology].MidGrainFilling.Target
          VariableReference LateGrainFillingDuration: VariableName=[Phenology].LateGrainFilling.Target
        PhaseLookup DMDemandFunction
          PhaseLookupValue GrainFilling: Start=StartGrainFilling; End=EndGrainFill
            MultiplyFunction HIGrainDemand
              VariableReference AboveGroundWt: VariableName=[AboveGround].Wt
              DivideFunction HarvestIndexIncrease
                MaximumFunction OutstandingHarvestIndexIncrease
                  ExpressionFunction Increase: Expression=[Grain].PotentialHarvestIndex - [Grain].HarvestIndex
                  Constant Zero: FixedValue=0
                SubtractFunction TTRemaining
                  ExpressionFunction ReproductiveTT
                    Expression=[Phenology].EarlyGrainFilling.Target+[Phenology].MidGrainFilling.Target+[Phenology].LateGrainFilling.Target
                  ExpressionFunction ReproductiveTTComplete
                    Expression=[Phenology].EarlyGrainFilling.ProgressThroughPhase+[Phenology].MidGrainFilling.ProgressThroughPhase+[Phenology].LateGrainFilling.ProgressThroughPhase
              VariableReference ThermalTime: VariableName=[Phenology].ThermalTime
        Constant MinimumNConc: FixedValue=0.02
        Constant MaximumNConc: FixedValue=0.058
        Constant WaterContent: FixedValue=0.13
        MultiplyFunction NFillingRate
          VariableReference NConc: VariableName=[Grain].MaximumNConc
          VariableReference DMDemand: VariableName=[Grain].DMDemandFunction
          VariableReference DMConversionEfficiency: VariableName=[Grain].DMConversionEfficiency
        BiomassRemoval BiomassRemovalDefaults: HarvestFractionLiveToRemove=1; HarvestFractionDeadToRemove=1; HarvestFractionLiveToResidue=0; HarvestFractionDeadToResidue=0
        Constant DMConversionEfficiency: FixedValue=0.89
        Constant RemobilisationCost: FixedValue=0
        Constant CarbonConcentration: FixedValue=0.4
        DivideFunction HarvestIndex
          VariableReference GrainWt: VariableName=[Grain].Wt
          VariableReference AboveGroundWt: VariableName=[AboveGround].Wt
        Constant MaximumPotentialGrainSize: FixedValue=0.0038
          Memo
            This parameter is only used to provide a very approximate estimate of final grain number.  Grain growth is calculated from harvest index increase.
        MultiplyFunction PotentialHarvestIndex
          VariableReference PodHarvestIndex: VariableName=[Pod].PotentialHarvestIndex
          Constant GrainFraction: FixedValue=0.72; Units=0-1
        NutrientPoolFunctions DMDemandPriorityFactors
          Constant Structural: FixedValue=1
          Constant Metabolic: FixedValue=1
          Constant Storage: FixedValue=1
        NutrientPoolFunctions NDemandPriorityFactors: same as Replacements.Canola.Grain.DMDemandPriorityFactors
        DivideFunction NumberFunction
          Memo
            Grain number is simply estimated from grain mass and a constant potential grain size.
          VariableReference GrainMass: VariableName=[Grain].Wt
          VariableReference PotentialGrainSize: VariableName=[Grain].MaximumPotentialGrainSize
      GenericOrgan Stem: IsAboveGround=true
        Constant NReallocationFactor: FixedValue=1
        PhaseLookup NRetranslocationFactor
          PhaseLookupValue Vegetative: Start=Emergence; End=StartGrainFilling
            Constant RetranslocationFactor: FixedValue=0
          PhaseLookupValue GrainFilling: Start=StartGrainFilling; End=EndGrainFill
            Constant RetranslocationFactor: FixedValue=0.1
        PhaseLookup DMRetranslocationFactor
          PhaseLookupValue Vegetative: Start=Emergence; End=StartGrainFilling
            Constant RetranslocationFactor: FixedValue=0
          PhaseLookupValue GrainFilling: Start=StartGrainFilling; End=EndGrainFill
            Constant RetranslocationFactor: FixedValue=0.2
        LinearInterpolationFunction MaximumNConcX
          XYPairs: X=[3, 4, 5, 6]; Y=[4, 0.035, 0.025, 0.02]
          VariableReference XValue: VariableName=[Phenology].Stage
        VariableReference MaximumNConc: VariableName=[Leaf].MaximumNConc
        Constant MinimumNConc: FixedValue=0.005
        PhaseLookupValue NitrogenDemandSwitch: Start=Emergence; End=StartGrainFilling
          Constant: FixedValue=1
        BiomassRemoval BiomassRemovalDefaults: HarvestFractionLiveToRemove=0.5; HarvestFractionDeadToRemove=0; HarvestFractionLiveToResidue=0.1; HarvestFractionDeadToResidue=0
        PhaseLookup SenescenceRate
          PhaseLookupValue PostCanopyPhase: Start=EndPodDevelopment; End=Maturity
            MinimumFunction Rate
              DivideFunction Fraction
                VariableReference TT: VariableName=[Phenology].ThermalTime
                SubtractFunction TTRemaining
                  ExpressionFunction PostCanopyTT
                    Expression=[Phenology].LateGrainFilling.Target+[Phenology].Maturing.Target
                  ExpressionFunction PostCanopyTTComplete
                    Expression=[Phenology].LateGrainFilling.ProgressThroughPhase+[Phenology].Maturing.ProgressThroughPhase
              Constant One: FixedValue=1
        Constant DetachmentRateFunction: FixedValue=0; Units=/d
        Constant MaintenanceRespirationFunction: FixedValue=0; Units=0-1
        Constant DMConversionEfficiency: FixedValue=1; Units=0-1
        Constant DMReallocationFactor: FixedValue=1
        VariableReference CriticalNConc: VariableName=[Stem].MinimumNConc
        Constant RemobilisationCost: FixedValue=0
        Constant CarbonConcentration: FixedValue=0.4
        NutrientDemandFunctions NDemands
          MultiplyFunction Structural
            VariableReference MinNconc: VariableName=[Stem].minimumNconc
            VariableReference PotentialDMAllocation: VariableName=[Stem].potentialDMAllocation.Structural
          MultiplyFunction Metabolic
            SubtractFunction MetabolicNconc
              VariableReference CritNconc: VariableName=[Stem].criticalNConc
              VariableReference MinNconc: VariableName=[Stem].minimumNconc
            VariableReference PotentialDMAllocation: VariableName=[Stem].potentialDMAllocation.Structural
          StorageNDemandFunction Storage
            VariableReference NitrogenDemandSwitch: VariableName=[Stem].nitrogenDemandSwitch
            VariableReference MaxNconc: VariableName=[Stem].maximumNconc
          Constant QStructuralPriority: FixedValue=1
          Constant QMetabolicPriority: FixedValue=1
          Constant QStoragePriority: FixedValue=1
        RetranslocateNonStructural RetranslocateNitrogen
        NutrientPoolFunctions InitialWt
          Constant Structural: FixedValue=0; Units=g/m^2
          Constant Metabolic: FixedValue=0
          Constant Storage: FixedValue=0
        Constant Photosynthesis: FixedValue=0
        VariableReference initialNConcFunction: VariableName=[Stem].MinimumNConc
        PartitionFractionDemandFunction PotentialGrowth
          PhaseLookup PartitionFraction
            PhaseLookupValue StemGrowthPhase: Start=Emergence; End=EndFlowering
              LinearInterpolationFunction StemFraction
                XYPairs: X=[100, 101, 200, 201, 400]; Y=[0.5, 0.5, 0.5, 0.75, 0.75]
                VariableReference XValue: VariableName=[AboveGround].Wt
            PhaseLookupValue GrainFilling: Start=EndFlowering; End=EndGrainFill
              Constant StemFraction: FixedValue=0
        NutrientDemandFunctions DMDemands
          MultiplyFunction Structural
            PhaseLookup Fraction
              PhaseLookupValue EarlyStemGrowthPhase: Start=Emergence; End=StartFlowering
                Memo
                  This approach is based upon that used in [#robertson_simulation_2002].
                Constant Fraction: FixedValue=0.7
              PhaseLookupValue LateStemGrowthPhase: Start=StartFlowering; End=EndFlowering
                Memo
                  This approach is based upon that used in [#robertson_simulation_2002].
                Constant Fraction: FixedValue=0.8
              PhaseLookupValue PodAndGrainGrowth: Start=EndFlowering; End=EndGrainFill
                Constant Fraction: FixedValue=0
            VariableReference DMDemand: VariableName=[Stem].PotentialGrowth
          Constant Metabolic: FixedValue=0
          MultiplyFunction Storage
            VariableReference DMDemand: VariableName=[Stem].PotentialGrowth
            SubtractFunction StorageFraction
              Constant One: FixedValue=1
              VariableReference StructuralFraction: VariableName=[Stem].DMDemands.Structural.Fraction
          Constant QStructuralPriority: FixedValue=1
          Constant QMetabolicPriority: FixedValue=1
          Constant QStoragePriority: FixedValue=1
      GenericOrgan Shell: IsAboveGround=true
        Constant NReallocationFactor: FixedValue=1
        Constant NRetranslocationFactor: FixedValue=0.5
        Constant MaximumNConc: FixedValue=0.045
        VariableReference CriticalNConc: VariableName=[Shell].MinimumNConc
        Constant MinimumNConc: FixedValue=0.01
        Constant DMRetranslocationFactor: FixedValue=0.1
        PhaseLookupValue NitrogenDemandSwitch: Start=StartPodDevelopment; End=EndPodDevelopment
          Constant: FixedValue=1
        BiomassRemoval BiomassRemovalDefaults: HarvestFractionLiveToRemove=0; HarvestFractionDeadToRemove=0; HarvestFractionLiveToResidue=1; HarvestFractionDeadToResidue=1
        PhaseLookup SenescenceRate
          PhaseLookupValue ReproductivePhase: Start=EndPodDevelopment; End=Maturity
            MinimumFunction Rate
              DivideFunction Fraction
                VariableReference TT: VariableName=[Phenology].ThermalTime
                SubtractFunction TTRemaining
                  ExpressionFunction ReproductiveTT
                    Expression=[Phenology].LateGrainFilling.Target + [Phenology].Maturing.Target
                  ExpressionFunction ReproductiveTT1Complete
                    Expression=[Phenology].LateGrainFilling.ProgressThroughPhase + [Phenology].Maturing.ProgressThroughPhase
              Constant One: FixedValue=1
        Constant DetachmentRateFunction: FixedValue=0; Units=/d
        Constant MaintenanceRespirationFunction: FixedValue=0; Units=0-1
        Constant DMConversionEfficiency: FixedValue=1; Units=0-1
        Constant DMReallocationFactor: FixedValue=0
        Constant RemobilisationCost: FixedValue=0
        Constant CarbonConcentration: FixedValue=0.4
        AddFunction FillingDuration
          VariableReference EarlyPodDevelopmentDuration: VariableName=[Phenology].EarlyPodDevelopment.Target
          VariableReference EarlyGrainFillingDuration: VariableName=[Phenology].EarlyGrainFilling.Target
          VariableReference MidGrainFillingDuration: VariableName=[Phenology].MidGrainFilling.Target
        NutrientDemandFunctions DMDemands
          MultiplyFunction Structural
            PhaseLookup DMDemandFunction
              PhaseLookupValue PodDevelopment: Start=StartPodDevelopment; End=EndPodDevelopment
                MultiplyFunction HIPodDemand
                  VariableReference AboveGroundWt: VariableName=[AboveGround].Wt
                  DivideFunction HarvestIndexIncrease
                    MaximumFunction OutstandingHarvestIndexIncrease
                      ExpressionFunction Increase: Expression=[Shell].PotentialHarvestIndex - [Shell].HarvestIndex
                      Constant Zero: FixedValue=0
                    SubtractFunction TTRemaining
                      ExpressionFunction ShellGrowthTT
                        Expression=[Phenology].EarlyPodDevelopment.Target+[Phenology].EarlyGrainFilling.Target+[Phenology].MidGrainFilling.Target
                      ExpressionFunction ShellGrowthTTComplete
                        Expression=[Phenology].EarlyPodDevelopment.ProgressThroughPhase+[Phenology].EarlyGrainFilling.ProgressThroughPhase+[Phenology].MidGrainFilling.ProgressThroughPhase
                  VariableReference ThermalTime: VariableName=[Phenology].ThermalTime
            Constant StructuralFraction: FixedValue=1
          Constant Metabolic: FixedValue=0
          StorageDMDemandFunction Storage
            SubtractFunction StorageFraction
              Constant One: FixedValue=1
              VariableReference StructuralFraction: VariableName=[Shell].DMDemands.Structural.StructuralFraction
          Constant QStructuralPriority: FixedValue=1
          Constant QMetabolicPriority: FixedValue=1
          Constant QStoragePriority: FixedValue=1
        NutrientDemandFunctions NDemands
          MultiplyFunction Structural
            VariableReference MinNconc: VariableName=[Shell].minimumNconc
            VariableReference PotentialDMAllocation: VariableName=[Shell].potentialDMAllocation.Structural
          StorageNDemandFunction Storage
            VariableReference NitrogenDemandSwitch: VariableName=[Shell].nitrogenDemandSwitch
            VariableReference MaxNconc: VariableName=[Shell].maximumNconc
          Constant Metabolic: FixedValue=0
          Constant QStructuralPriority: FixedValue=1
          Constant QMetabolicPriority: FixedValue=1
          Constant QStoragePriority: FixedValue=1
        RetranslocateNonStructural RetranslocateNitrogen
        NutrientPoolFunctions InitialWt: same as Replacements.Canola.Stem.InitialWt
        MultiplyFunction PotentialHarvestIndex
          VariableReference PodHarvestIndex: VariableName=[Pod].PotentialHarvestIndex
          Constant ShellFraction: FixedValue=0.28; Units=0-1
        DivideFunction HarvestIndex
          VariableReference ShellWt: VariableName=[Shell].Wt
          VariableReference AboveGroundWt: VariableName=[AboveGround].Wt
        VariableReference initialNConcFunction: VariableName=[Shell].MinimumNConc
        ExpressionFunction Area: Expression=[Shell].Live.Wt*[Shell].SpecificArea
          VariableReference Index: VariableName=[Shell].Area
        Constant SpecificArea: FixedValue=0.01; Units=m^2/g
        EnergyBalance: Albedo=0.25; Gsmax350=0.015; R50=150; KDead=0; LAIDead=0
          MinimumFunction FRGRer
            VariableReference RUE_FT: VariableName=[Shell].Photosynthesis.FT
            MinimumFunction Others
              VariableReference RUE_FN: VariableName=[Shell].Photosynthesis.FN
              VariableReference RUE_FVPD: VariableName=[Shell].Photosynthesis.FVPD
          VariableReference Tallness: VariableName=[Leaf].Height
          VariableReference Deepness: VariableName=[Leaf].Height
          Constant DeadAreaIndex: FixedValue=1
          Constant GreenExtinctionCoefficient: FixedValue=0.8
          Constant Wideness: FixedValue=0
          Constant DeadExtinctionCoefficient: FixedValue=0
          StomatalConductanceCO2Modifier
            VariableReference PhotosynthesisCO2Modifier: VariableName=[Shell].Photosynthesis.FCO2
          VariableReference GreenAreaIndex: VariableName=[Shell].Area.Index
        RUEModel Photosynthesis
          VariableReference RUE: VariableName=[Leaf].Photosynthesis.RUE
          VariableReference FT: VariableName=[Leaf].Photosynthesis.FT
          VariableReference FVPD: VariableName=[Leaf].Photosynthesis.FVPD
          LinearInterpolationFunction FN
            XYPairs: X=[0, 1, 1.5]; Y=[1, 1, 1]
            VariableReference XValue: VariableName=[Leaf].Fn
          LinearInterpolationFunction FW
            XYPairs: X=[0, 1]; Y=[0, 1]
            VariableReference XValue: VariableName=[Leaf].Fw
          VariableReference RadnInt: VariableName=[Shell].EnergyBalance.RadiationIntercepted
          VariableReference FCO2: VariableName=[Leaf].Photosynthesis.FCO2
      CompositeBiomass Pod: OrganNames=[Shell, Grain]; IncludeLive=true; IncludeDead=true
        DivideFunction HarvestIndex
          VariableReference PodWt: VariableName=[Pod].Wt
          VariableReference AboveGroundWt: VariableName=[AboveGround].Wt
        Constant PotentialHarvestIndex: FixedValue=0.6
          Memo
            This approach is based upon that used in [#robertson_simulation_2002].
      Constant MortalityRate: FixedValue=0
      CompositeBiomass AboveGround: OrganNames=[Leaf, Stem, Grain, Shell]; IncludeLive=true; IncludeDead=true
      CompositeBiomass AboveGroundLive: OrganNames=[Leaf, Stem, Grain, Shell]; IncludeLive=true; IncludeDead=false
      CompositeBiomass BelowGround: OrganNames=[Root]; IncludeLive=true; IncludeDead=true
      CompositeBiomass Total: OrganNames=[Leaf, Stem, Grain, Shell, Root]; IncludeLive=true; IncludeDead=true
      CompositeBiomass TotalLive: OrganNames=[Leaf, Stem, Grain, Shell, Root]; IncludeLive=true; IncludeDead=false
      CompositeBiomass TotalDead: OrganNames=[Leaf, Stem, Grain, Shell, Root]; IncludeLive=false; IncludeDead=true
      Folder CultivarFolder
        Memo
          Cultivar names include several codes for several traits.
          * RR = Roundup Ready - These cultivars are developed to provide tolerance for Glyphosate herbicide.
          * CL = Clearfield - These cultivars as developed for the Clearfield Canola weed control system.
          * TT = Triazine Tolerant - These cultivars are developed to provide tolerance for triazine herbicide
          * RT = Triazine and Roundup - These cultivars are developed to provide tolerance to both triazine and glyphosate herbicides.
        Folder GenericCultivars
          Cultivar GenericWinter
            Command:
              [Phenology].Vegetative.Target.XYPairs.X = 0,30
              [Phenology].Vegetative.Target.XYPairs.Y = 2200,250
              [Leaf].Phyllochron.Base.FixedValue = 54
          Cultivar GenericEarly
            Command:
              [Phenology].Vegetative.Target.XYPairs.X = 0, 25
              [Phenology].Vegetative.Target.XYPairs.Y = 370,270
              [Leaf].Phyllochron.Base.FixedValue = 51
          Cultivar GenericLate
            Command:
              [Phenology].Vegetative.Target.XYPairs.X = 0, 20
              [Phenology].Vegetative.Target.XYPairs.Y = 500,250
              [Phenology].StemElongation.Target.PPResponse.Amount.FixedValue = 150
              // First leaf 2 Phyllochrons
              // last leaves at 0.55 Phyllochron
              [Leaf].Phyllochron.Base.FixedValue = 50
        Cultivar 43C80_CL
          Command:
            [Phenology].Vegetative.Target.XYPairs.X = 0,24
            [Phenology].Vegetative.Target.XYPairs.Y = 400,200
            [Leaf].Phyllochron.Base.FixedValue = 46
        Cultivar 44Y84_CL
          Command:
            [Phenology].Vegetative.Target.XYPairs.X = 0,20
            [Phenology].Vegetative.Target.XYPairs.Y = 300,200
            [Leaf].Phyllochron.Base.FixedValue = 48
        Cultivar 44Y87_CL
          Command:
            [Phenology].Vegetative.Target.XYPairs.X = 0,20
            [Phenology].Vegetative.Target.XYPairs.Y = 450,250
            [Leaf].Phyllochron.Base.FixedValue = 48
        Cultivar 44Y89_CL
          Command:
            [Phenology].Vegetative.Target.XYPairs.X = 0,20
            [Phenology].Vegetative.Target.XYPairs.Y = 380,280
            [Leaf].Phyllochron.Base.FixedValue = 48
        Cultivar 44Y90_CL
          Command:
            [Phenology].Vegetative.Target.XYPairs.X = 0,20
            [Phenology].Vegetative.Target.XYPairs.Y = 300,250
            [Leaf].Phyllochron.Base.FixedValue = 48
        Cultivar 45Y25_RR
          Command:
            [Phenology].Vegetative.Target.XYPairs.X = 0,20
            [Phenology].Vegetative.Target.XYPairs.Y = 300,200
            [Leaf].Phyllochron.Base.FixedValue = 50
        Cultivar 45Y86_CL
          Command:
            [Phenology].Vegetative.Target.XYPairs.X = 0,20
            [Phenology].Vegetative.Target.XYPairs.Y = 300,200
            [Leaf].Phyllochron.Base.FixedValue = 50
        Cultivar 45Y88_CL
          Command:
            [Phenology].Vegetative.Target.XYPairs.X = 0,20
            [Phenology].Vegetative.Target.XYPairs.Y = 380,250
            [Leaf].Phyllochron.Base.FixedValue = 50
        Cultivar 45Y91_CL
          Command:
            [Phenology].Vegetative.Target.XYPairs.X = 0,25
            [Phenology].Vegetative.Target.XYPairs.Y = 350,250
            [Leaf].Phyllochron.Base.FixedValue = 39
        Cultivar 46Y78
          Command:
            [Phenology].Vegetative.Target.XYPairs.X = 0,16
            [Phenology].Vegetative.Target.XYPairs.Y = 600,177.78
            [Leaf].Phyllochron.Base.FixedValue = 55
            [Leaf].Photosynthesis.RUE.TriazineToleranceModifier.FixedValue = 1.1
        Cultivar Arazzo
          Command:
            [Phenology].Vegetative.Target.XYPairs.X = 0,30
            [Phenology].Vegetative.Target.XYPairs.Y = 2200,250
            [Leaf].Phyllochron.Base.FixedValue = 55
        Cultivar Archer
          Command:
            [Phenology].Vegetative.Target.XYPairs.X = 0, 20
            [Phenology].Vegetative.Target.XYPairs.Y = 500,250
            [Phenology].StemElongation.Target.PPResponse.Amount.FixedValue = 150
            // First leaf 2 Phyllochrons
            // last leaves at 0.55 Phyllochron
            [Leaf].Phyllochron.Base.FixedValue = 50
        Cultivar ATR_Bonito
          Command:
            [Phenology].Vegetative.Target.XYPairs.X = 0,25
            [Phenology].Vegetative.Target.XYPairs.Y = 320,200
            [Leaf].Phyllochron.Base.FixedValue = 55
            [Leaf].Photosynthesis.RUE.TriazineToleranceModifier.FixedValue = 0.78
        Cultivar ATR_Gem
          Command:
            [Phenology].Vegetative.Target.XYPairs.X = 0,16
            [Phenology].Vegetative.Target.XYPairs.Y = 470,250
            [Leaf].Photosynthesis.RUE.TriazineToleranceModifier.FixedValue = 0.78
            [Leaf].Phyllochron.Base.FixedValue = 61
        Cultivar ATR_Marlin
          Command:
            [Phenology].Vegetative.Target.XYPairs.X = 0,16
            [Phenology].Vegetative.Target.XYPairs.Y = 550,250
            [Leaf].Phyllochron.Base.FixedValue = 55
            [Leaf].Photosynthesis.RUE.TriazineToleranceModifier.FixedValue = 0.78
        Cultivar ATR_Stingray
          Command:
            [Phenology].Vegetative.Target.XYPairs.X = 0,6
            [Phenology].Vegetative.Target.XYPairs.Y = 500,250
            [Phenology].StemElongation.Target.PPResponse.Amount.FixedValue = 200
            [Phenology].StemElongation.Target.Base.FixedValue = 50
            [Leaf].Photosynthesis.RUE.TriazineToleranceModifier.FixedValue = 0.78
            [Leaf].Phyllochron.Base.FixedValue = 54
        Cultivar ATR_Wahoo
          Command:
            [Phenology].Vegetative.Target.XYPairs.X = 0,13
            [Phenology].Vegetative.Target.XYPairs.Y = 500,200
            [Leaf].Phyllochron.Base.FixedValue = 57
            [Leaf].Photosynthesis.RUE.TriazineToleranceModifier.FixedValue = 0.78
        Cultivar Crusher_TT
          Command:
            [Phenology].Vegetative.Target.XYPairs.X = 0,20
            [Phenology].Vegetative.Target.XYPairs.Y = 300,200
            [Leaf].Photosynthesis.RUE.TriazineToleranceModifier.FixedValue = 0.78
            [Leaf].Phyllochron.Base.FixedValue = 50
        Cultivar AV_Garnet
          Command:
            [Phenology].Vegetative.Target.XYPairs.X = 0,16
            [Phenology].Vegetative.Target.XYPairs.Y = 550,250
            [Leaf].Phyllochron.Base.FixedValue = 55
        Cultivar AV_Zircon
          Command:
            [Phenology].Vegetative.Target.XYPairs.X = 0,25
            [Phenology].Vegetative.Target.XYPairs.Y = 450,200
            [Leaf].Phyllochron.Base.FixedValue = 55
        Cultivar CB_Taurus
          Command:
            [Phenology].Vegetative.Target.XYPairs.X = 17,18,30
            [Phenology].Vegetative.Target.XYPairs.Y = 2500,850,250
            [Leaf].Phyllochron.Base.FixedValue = 50
        Cultivar CB_Telfer
          Command:
            [Phenology].Vegetative.Target.XYPairs.X = 0,20
            [Phenology].Vegetative.Target.XYPairs.Y = 350,350
            [Phenology].StemElongation.Target.PPResponse.Amount.FixedValue = 50
            [Leaf].Photosynthesis.RUE.TriazineToleranceModifier.FixedValue = 0.78
            [Leaf].Phyllochron.Base.FixedValue = 65
            [Leaf].Plastochron.Multiplier.FixedValue=0.9
        Cultivar CBI_306
          Command:
            [Phenology].Vegetative.Target.XYPairs.X = 0,20
            [Phenology].Vegetative.Target.XYPairs.Y = 300,200
            [Leaf].Phyllochron.Base.FixedValue = 50
        Cultivar CSCH_01
          Command:
            [Phenology].Vegetative.Target.XYPairs.X = 0,20
            [Phenology].Vegetative.Target.XYPairs.Y = 310,250
            [Leaf].Phyllochron.Base.FixedValue = 50
        Cultivar CSCH_02
          Command:
            [Phenology].Vegetative.Target.XYPairs.X = 0,20
            [Phenology].Vegetative.Target.XYPairs.Y = 400,250
            [Leaf].Phyllochron.Base.FixedValue = 50
        Cultivar Drum_triazine
          Command:
            [Phenology].Vegetative.Target.XYPairs.X = 0,20
            [Phenology].Vegetative.Target.XYPairs.Y = 300,200
            [Leaf].Photosynthesis.RUE.TriazineToleranceModifier.FixedValue = 0.78
            [Leaf].Phyllochron.Base.FixedValue = 50
        Cultivar Dunkeld
          Command:
            [Phenology].Vegetative.Target.XYPairs.X = 0,20
            [Phenology].Vegetative.Target.XYPairs.Y = 300,200
            [Leaf].Phyllochron.Base.FixedValue = 50
        Cultivar Grouse
          Command:
            [Phenology].Vegetative.Target.XYPairs.X = 0,20
            [Phenology].Vegetative.Target.XYPairs.Y = 300,200
            [Leaf].Phyllochron.Base.FixedValue = 50
        Cultivar GT50_RR
          Command:
            [Phenology].Vegetative.Target.XYPairs.X = 0,20
            [Phenology].Vegetative.Target.XYPairs.Y = 300,200
            [Leaf].Phyllochron.Base.FixedValue = 50
        Cultivar Hyola42
          Command:
            [Phenology].Vegetative.Target.XYPairs.X = 0,20
            [Phenology].Vegetative.Target.XYPairs.Y = 300,200
            [Leaf].Phyllochron.Base.FixedValue = 50
        Cultivar Hyola450_TT
          Command:
            [Phenology].Vegetative.Target.XYPairs.X = 0,20
            [Phenology].Vegetative.Target.XYPairs.Y = 350,150
            [Phenology].StemElongation.Target.PPResponse.Amount.FixedValue = 200
            [Leaf].Photosynthesis.RUE.TriazineToleranceModifier.FixedValue = 0.78
            [Leaf].Phyllochron.Base.FixedValue = 54
            //built from Stingray
        Cultivar Hyola559_TT
          Command:
            [Phenology].Vegetative.Target.XYPairs.X = 0,16
            [Phenology].Vegetative.Target.XYPairs.Y = 500,270
            [Leaf].Photosynthesis.RUE.TriazineToleranceModifier.FixedValue = 0.78
            [Leaf].Phyllochron.Base.FixedValue = 51
        Cultivar Hyola575_CL
          Command:
            [Phenology].Vegetative.Target.XYPairs.X = 0,16
            [Phenology].Vegetative.Target.XYPairs.Y = 370,270
            [Leaf].Phyllochron.Base.FixedValue = 49
          Alias Hyola_575_CL_GT
        Cultivar Hyola575
          Command:
            [Phenology].Vegetative.Target.XYPairs.X = 0,10
            [Phenology].Vegetative.Target.XYPairs.Y = 300,1
            [Leaf].Phyllochron.Base.FixedValue = 60
            [Photosynthesis].RUE.Potential.FixedValue = 3.4
            [Phenology].EarlyFlowering.Target.FixedValue = 120
            [Phenology].LateGrainFilling.Target.EntireGrainfillPeriod.FixedValue = 500
            [Grain].PotentialHarvestIndex.GrainFraction.FixedValue = 0.6
        Cultivar Hyola577_CL
          Command:
            [Phenology].Vegetative.Target.XYPairs.X = 0,16
            [Phenology].Vegetative.Target.XYPairs.Y = 360,213.33
            [Leaf].Phyllochron.Base.FixedValue = 49
        Cultivar Hyola600_RR
          Command:
            [Phenology].Vegetative.Target.XYPairs.X = 0,5,8,20
            [Phenology].Vegetative.Target.XYPairs.Y = 500,400,200,150
            [Phenology].StemElongation.Target.PPResponse.Amount.FixedValue = 200
            [Leaf].Phyllochron.Base.FixedValue = 51
        Cultivar Hyola635_CL
          Command:
            [Phenology].Vegetative.Target.XYPairs.X = 0,20
            [Phenology].Vegetative.Target.XYPairs.Y = 550,280
            [Leaf].Phyllochron.Base.FixedValue = 51
        Cultivar Hyola650_TT
          Command:
            [Phenology].Vegetative.Target.XYPairs.X = 0,20
            [Phenology].Vegetative.Target.XYPairs.Y = 550,250
            [Leaf].Photosynthesis.RUE.TriazineToleranceModifier.FixedValue = 0.78
            [Leaf].Phyllochron.Base.FixedValue = 48
        Cultivar Hyola725_RT
          Command:
            [Phenology].Vegetative.Target.XYPairs.X = 0,20
            [Phenology].Vegetative.Target.XYPairs.Y = 550,250
            [Leaf].Photosynthesis.RUE.TriazineToleranceModifier.FixedValue = 0.78
            [Leaf].Phyllochron.Base.FixedValue = 48
        Cultivar Hyola750_TT
          Command:
            [Phenology].Vegetative.Target.XYPairs.X = 0,20
            [Phenology].Vegetative.Target.XYPairs.Y = 550,300
            [Leaf].Photosynthesis.RUE.TriazineToleranceModifier.FixedValue = 0.78
            [Leaf].Phyllochron.Base.FixedValue = 50
        Cultivar Hyola970_CL
          Command:
            [Phenology].Vegetative.Target.XYPairs.X = 0,30
            [Phenology].Vegetative.Target.XYPairs.Y = 2200,250
            [Leaf].Phyllochron.Base.FixedValue = 54
        Cultivar Hyola971_CL
          Command:
            [Phenology].Vegetative.Target.XYPairs.X = 0,30
            [Phenology].Vegetative.Target.XYPairs.Y = 2200,250
            [Leaf].Phyllochron.Base.FixedValue = 54
        Cultivar IH30_RR
          Command:
            [Phenology].Vegetative.Target.XYPairs.X = 0,16
            [Phenology].Vegetative.Target.XYPairs.Y = 342.22,220
            [Leaf].Phyllochron.Base.FixedValue = 51
        Cultivar IVT4510
          Command:
            [Phenology].Vegetative.Target.XYPairs.X = 0,20
            [Phenology].Vegetative.Target.XYPairs.Y = 300,200
            [Leaf].Phyllochron.Base.FixedValue = 48
        Cultivar K50055
          Command:
            [Phenology].Vegetative.Target.XYPairs.X = 0,25
            [Phenology].Vegetative.Target.XYPairs.Y = 500,400
            [Leaf].Phyllochron.Base.FixedValue = 56
        Cultivar K50058
          Command:
            [Phenology].Vegetative.Target.XYPairs.X = 0,25
            [Phenology].Vegetative.Target.XYPairs.Y = 500,450
            [Leaf].Phyllochron.Base.FixedValue = 66
        Cultivar Karoo_triazine
          Command:
            [Phenology].Vegetative.Target.XYPairs.X = 0,20
            [Phenology].Vegetative.Target.XYPairs.Y = 300,200
            [Leaf].Photosynthesis.RUE.TriazineToleranceModifier.FixedValue = 0.78
            [Leaf].Phyllochron.Base.FixedValue = 50
        Cultivar Monty
          Command:
            [Phenology].Vegetative.Target.XYPairs.X = 0,20
            [Phenology].Vegetative.Target.XYPairs.Y = 305,205
            [Leaf].Phyllochron.Base.FixedValue = 50
        Cultivar NS_Diamond
          Command:
            [Phenology].Vegetative.Target.XYPairs.X = 0, 25
            [Phenology].Vegetative.Target.XYPairs.Y = 370,270
            [Leaf].Phyllochron.Base.FixedValue = 51
        Cultivar NX953
          Command:
            [Phenology].Vegetative.Target.XYPairs.X = 0,20
            [Phenology].Vegetative.Target.XYPairs.Y = 160,160
            [Leaf].Phyllochron.Base.FixedValue = 50
        Cultivar Oscar
          Command:
            [Phenology].Vegetative.Target.XYPairs.X = 0,20
            [Phenology].Vegetative.Target.XYPairs.Y = 470,270
            [Leaf].Phyllochron.Base.FixedValue = 53
        Cultivar Pinnacle_triazine
          Command:
            [Phenology].Vegetative.Target.XYPairs.X = 0,20
            [Phenology].Vegetative.Target.XYPairs.Y = 300,200
            [Leaf].Photosynthesis.RUE.TriazineToleranceModifier.FixedValue = 0.78
            [Leaf].Phyllochron.Base.FixedValue = 55
          Alias Pinnacle
        Cultivar Range
          Command:
            [Phenology].Vegetative.Target.XYPairs.X = 0,20
            [Phenology].Vegetative.Target.XYPairs.Y = 300,200
            [Leaf].Phyllochron.Base.FixedValue = 50
        Cultivar Sensation
          Command:
            [Phenology].Vegetative.Target.XYPairs.X = 0,30
            [Phenology].Vegetative.Target.XYPairs.Y = 2200,250
            [Leaf].Phyllochron.Base.FixedValue = 54
        Cultivar SF_Brazzil
          Command:
            [Phenology].Vegetative.Target.XYPairs.X = 0,30
            [Phenology].Vegetative.Target.XYPairs.Y = 2200,250
            [Leaf].Phyllochron.Base.FixedValue = 50
        Cultivar SF_Edimax
          Command:
            [Phenology].Vegetative.Target.XYPairs.X = 0,30
            [Phenology].Vegetative.Target.XYPairs.Y = 2200,250
            [Leaf].Phyllochron.Base.FixedValue = 45
        Cultivar Victory_7001_CL
          Command:
            [Phenology].Vegetative.Target.XYPairs.X = 0,25
            [Phenology].Vegetative.Target.XYPairs.Y = 430,200
            [Leaf].Phyllochron.Base.FixedValue = 56
      Constant SeedMortalityRate: FixedValue=0
      FrostHeatDamageFunctions: CropType=2; FrostLowTT=-4.9; FrostMaxReductionRatio=0.13; FrostUpTT=0.1; FrostMinReductionRatio=0; FrostStartSensitiveGS=5.71; FrostStartMostSensitiveGS=7.56; FrostEndMostSensitiveGS=8.38; FrostEndSensitiveGS=9.01; HeatLowTT=29.1; HeatMinReductionRatio=0; HeatUpTT=39.8; HeatMaxReductionRatio=0.42; HeatStartSensitiveGS=5.75; HeatStartMostSensitiveGS=7.01; HeatEndMostSensitiveGS=8.31; HeatEndSensitiveGS=10.18
  Folder Ganmain_2018_Ex1a
    Experiment Ganmain_2018_Ex1a
      Factors
        Permutation
          Factor TOS
            CompositeFactor 1
              Specifications:
                [Sowing].Script.SowDate = 5-Apr
                [Irrigate].Script.irrigDates = 5-Apr,17-Apr
                [Irrigate].Script.amount = 12
            CompositeFactor 2
              Specifications:
                [Sowing].Script.SowDate = 26-Apr
                [Irrigate].Script.irrigDates = 19-Apr
                [Irrigate].Script.amount = 14
          Factor Cv
            Specification=[Sowing].Script.CultivarName =44Y90_CL,45Y25_RR,45Y91_CL,Archer,ATR_Bonito,ATR_Stingray,ATR_Wahoo,NS_Diamond
          Factor Popn: Specification=[Sowing].Script.Population =  45
          Factor Fert
            CompositeFactor D3: Specifications=[Fertilise1].Script.Amount = 0
            CompositeFactor D9: Specifications=[Fertilise1].Script.Amount = 330
          Factor Irrig: Specification=[codes].Script.irrig_treat = nil
      Simulation Ganmain_OCP_2018
        Clock: Start=2017-11-15; End=2018-12-01
        Summary summaryfile
        Weather: FileName=./met/74202.met
        SoilArbitrator
        Zone paddock: Area=1; Slope=0; AspectAngle=0; Altitude=50
          Folder manager
            Manager Reset on date
              ResetDate = 21-Mar
              ResetWater = Yes
              ResetN = Yes
              ResetSOM = No
```csharp
using Models.Interfaces;
using System;
using Models.Core;
using Models.PMF;
using Models.Soils;
using Models.Soils.Nutrients;
using Models.Utilities;
using Models.Surface;
using APSIM.Shared.Utilities;

namespace Models
{
    [Serializable]
    public class Script : Model
    {
        [Link] private Clock Clock;
        [Link] private Plant Wheat;
        [Link] private ISoilWater SoilWater;
        [Link] private INutrient nutrient;
        [Link] private SurfaceOrganicMatter SOM;
        [Link] private Summary Summary;

        [Description("Date to reset on:")]
        public string ResetDate {get;set;}

        [Description("Reset Water?")]
        public string ResetWater {get;set;}

        [Description("Reset Nitrogen?")]
        public string ResetN {get;set;}

        [Description("Reset Surface Organic Matter?")]
        public string ResetSOM {get;set;}

        [EventSubscribe("DoManagement")]
        private void OnDoManagement(object sender, EventArgs e)
        {
            if (DateUtilities.WithinDates(ResetDate, Clock.Today, ResetDate))
            {
                if (ResetWater == "Yes")
                {
                    Summary.WriteMessage(this, "Reset Water", MessageType.Diagnostic);
                    SoilWater.Reset();
                }
                if (ResetN == "Yes")
                {
                    Summary.WriteMessage(this, "Reset Nitrogen", MessageType.Diagnostic);
                    nutrient.Reset();
                }
                if (ResetSOM == "Yes")
                {
                    Summary.WriteMessage(this, "Reset Surface OM", MessageType.Diagnostic);
                    SOM.Reset();
                }
            }
        }
    }
}
```
            Manager Sowing
              SowDate = 06-Apr
              CultivarName = Hyola575_CL
              SowingDepth = 20
              RowSpacing = 250
              Population = 45
```csharp
using APSIM.Shared.Utilities;
using Models.Utilities;
using Models.Soils;
using Models.PMF;
using Models.Core;
using System;

namespace Models
{
    [Serializable]
    public class Script : Model
    {
        [Link] Clock Clock;
        [Link] Fertiliser Fertiliser;
        [Link] Summary Summary;
        [Link] Plant Canola;
        [Link] Soil Soil;
        Accumulator accumulatedRain;
        
        [Description("Sowing date (d-mmm)")]
        public string SowDate { get; set; }
        [Description("Cultivar to be sown")]
        public string CultivarName { get; set; }
        [Description("Sowing depth (mm)")]
        public double SowingDepth { get; set; }
        [Description("Row spacing (mm)")]
        public double RowSpacing { get; set; }
        [Description("Plant population (/m2)")]
        public double Population { get; set; }
      
        


        [EventSubscribe("DoManagement")]
        private void OnDoManagement(object sender, EventArgs e)
        {
            if (DateUtilities.DatesAreEqual(SowDate, Clock.Today))
            {
                Canola.Sow(population: Population, cultivar: CultivarName, depth: SowingDepth, rowSpacing: RowSpacing);    
            }
        
        }
        
    }
}
```
            Manager Fertilise
              FertiliserType = UreaN
              FertiliserDates = 3_Apr
              fert_criteria = 1000
              Amount = 40
              FertiliserDepth = 0
```csharp
using APSIM.Shared.Utilities;
using Models.PMF;
using Models.Core;
using Models.Soils;
using Models.Soils.Nutrients;
using System;
namespace Models
{
    [Serializable]
    public class Script : Model
    {
        [Link] Clock Clock;
        [Link] Fertiliser Fertiliser;
        [Link] INutrient nutrient;
        [Link] Summary sum;
        
        [Separator("A component to apply fertiliser on one or more dates on every year of the simulation")]

        [Description("Type of fertiliser to apply? ")] 
        [Display(Type = DisplayType.FertiliserType)]public string FertiliserType { get; set; }

        [Description("Enter the fertilisation dates as dd-mmm with comma separation (any year information entered will be ignored): ")] 
        public string[] FertiliserDates { get; set; } 

        [Description("Don't add fertiliser if N in top 2 layers exceeds (kg/ha) : ")]
        public double fert_criteria { get; set; }

        [Description("Amount of fertiliser to be applied each time (kg /ha)")] 
        public double Amount { get; set; }

        [Description("Depth (mm)")] public double FertiliserDepth { get; set; }
        
        [EventSubscribe("DoManagement")]
        private void OnDoManagement(object sender, EventArgs e)
        {
            foreach (string ddMMM in FertiliserDates)
            {
                if (DateUtilities.DatesEqual(ddMMM, Clock.Today))
                {
                    double soil_N = nutrient.NH4.kgha[0] + nutrient.NO3.kgha[0] + nutrient.NH4.kgha[1] + nutrient.NO3.kgha[1];
                    if (soil_N <= fert_criteria) 
                         Fertiliser.Apply(amount: Amount, type: FertiliserType, depth: FertiliserDepth);
                    else
                        sum.WriteMessage(this, "No fertilising as top two layers have " + soil_N.ToString() + "kg/ha N", MessageType.Diagnostic);
                }
            }
        }
    }
}
```
            Manager Fertilise1
              FertiliserType = UreaN
              FertiliserDates = 7-sep
              fert_criteria = 1000
              Amount = 0
              FertiliserDepth = 0
              script: same as in Ganmain_2018_Ex1a.Ganmain_2018_Ex1a.Ganmain_OCP_2018.paddock.manager.Fertilise
            Manager codes
              location = Ganmain
              TOS = 1
              irrig_treat = nil
              trial_code = CSTB18GANM2
              fert_code = D3
```csharp
using Models.Soils;
using System;
using Models.Core;
using Models.PMF;
namespace Models
{
    [Serializable]
    [System.Xml.Serialization.XmlInclude(typeof(Model))]
    public class Script : Model
    {
        [Link] Clock Clock;

        [Description("location")]
        public string location { get; set; }

        [Description("Time of sowing")]
        public string TOS { get; set; }

        [Description("irrig_treat")]
        public string irrig_treat { get; set; }

        [Description("trial_code")]
        public string trial_code { get; set; }

        [Description("fert_code")]
        public string fert_code { get; set; }

        [EventSubscribe("StartOfSimulation")]
        private void OnSimulationCommencing(object sender, EventArgs e)
        {

        }
    }
}
```
            Manager Irrigate
              irrigDates =
              amount = 0
```csharp
using Models.Soils;
using System;
using Models.Core;
using APSIM.Shared.Utilities;
namespace Models
{
    [Serializable]
    [System.Xml.Serialization.XmlInclude(typeof(Model))]
    public class Script : Model
    {
        [Link] Clock clock;    
           [Link] Irrigation irrigation;

           [Description("Dates for irrigation")] 
        public string[] irrigDates { get; set; }

        [Description("Amount of irrigation (mm)")]
        public double amount {get; set; }

        [EventSubscribe("DoManagement")]
        private void OnDoManagement(object sender, EventArgs e)
        {
            foreach (string ddMMM in irrigDates)
            {
                if (DateUtilities.DatesEqual(ddMMM, clock.Today))
                    irrigation.Apply(amount: amount);
            }
        }
    }
}
```
            Manager HarvestAfterDate
              HarvestDate = 8-Nov
```csharp
using Models.Soils;
using System;
using Models.Core;
using System.Text;
using Models.PMF;
using Models;
using APSIM.Shared.Utilities;
using Models.PMF.Phen;

namespace Models
{
    [Serializable] 
    public class Script : Model
    {
        [Link] ISummary summary;
        [Link] private Plant canola;
        [Link(Type = LinkType.Path, Path = "[canola].Phenology")]
        private Phenology phenology;
                [Link] Clock Clock;

        private bool Harvestable = false;

        [Description("Harvest Date (d-mmm)")]
        public string HarvestDate { get; set; }   
      
        [EventSubscribe("DoManagement")]
        private void OnDoManagement(object sender, EventArgs e)
        {
           
            if (Harvestable && phenology.CurrentPhase.Name == "ReadyForHarvesting")
            {
                canola.Harvest();
                canola.EndCrop();                
            }
            
            if (DateUtilities.DatesAreEqual(HarvestDate, Clock.Today))
                Harvestable = true;

        }
    }
}
```
          Fertiliser
          Manager Fertilise at sowing
            Crop = [canola]
            FertiliserType = UreaN
            Amount = 179
```csharp
using Models.Soils;
using System;
using Models.Core;
using Models.PMF;
namespace Models
{
    [Serializable]
    public class Script : Model
    {
        [Link] Clock Clock;
        [Link] Fertiliser Fertiliser;
        [Link] Summary summary;

        [Description("Crop to be fertilised")]
        public IPlant Crop { get; set; }

        [Description("Type of fertiliser to apply? ")] 
        [Display(Type = DisplayType.FertiliserType)]public string FertiliserType { get; set; }

        [Description("Amount of fertiliser to be applied (kg/ha)")]
        public double Amount { get; set; }

        [EventSubscribe("Sowing")]
        public void OnSowing(object sender, EventArgs e)
        {
            Model crop = sender as Model;
            if (Crop != null && crop.Name.ToLower() == (Crop as IModel).Name.ToLower())
                Fertiliser.Apply(amount: Amount, type: FertiliserType);  //"NO3N"
        }

    }
}
```
          Manager Irrigate_extra
            irrigDates = 1-jun
            amount = 30
            script: same as in Ganmain_2018_Ex1a.Ganmain_2018_Ex1a.Ganmain_OCP_2018.paddock.manager.Irrigate
          Irrigation
          SurfaceOrganicMatter: InitialResidueName=barley; InitialResidueType=barley; InitialResidueMass=6000; InitialStandingFraction=0; InitialCPR=0; InitialCNR=80
          Plant canola: ResourceName=Canola
          Soil: SoilType=SNSW; Site=CSU; NearestTown=Wagga Wagga; Region=Southern NSW; State=NSW; Latitude=0; Longitude=0; DataSource=Kirsten Verburg
            Chemical: PHUnits=Water
              Thickness  PH      CEC
              100        5.9     10.7975
              100        6       8.975
              100        6       8.975
              100        6.2811  8.84
              100        6.4622  8.84
              100        6.5527  8.84
              100        6.6433  8.7725
              100        6.7338  8.7275
              100        6.8244  8.6825
              100        6.8244  8.615
              100        7.0054  8.5925
              100        7.1865  8.57
              100        7.3676  8.57
              100        7.5487  8.57
              100        7.6392  8.57
              100        7.7297  8.57
              100        7.7297  8.525
              100        7.8203  8.48
              100        7.8203  8.4575
              600        7.8203  8.435
              CEC source: Calculated
            WaterBalance SoilWater: SummerDate=1-nov; SummerU=6; SummerCona=2; WinterDate=1-apr; WinterU=2; WinterCona=2; DiffusConst=44; DiffusSlope=16; Salb=0.13; CN2Bare=72; CNRed=20; CNCov=0.8; PSIDul=-100
              Thickness=[100, 100, 100, 100, 100, 100, 100, 100, 100, 100, 100, 100, 100, 100, 100, 100, 100, 100, 100, 600]
              SWCON=[0.5, 0.5, 0.5, 0.89, 0.8, 0.8, 0.6, 0.6, 0.4, 0.4, 0.2, 0.2, 0.2, 0.2, 0.2, 0.2, 0.2, 0.2, 0.2, 0.2]
            Nutrient
            Organic: FOMCNRatio=80; CarbonUnits=Total
              Thickness  Carbon  SoilCNRatio  FBiom  FInert  FOM
              100        1.09    8            0.06   0.01    250.1585
              100        0.28    8            0.05   0.01    221.8706
              100        0.28    8            0.04   0.31    196.7816
              100        0.22    8            0.03   0.35    174.5296
              100        0.22    8            0.02   0.4     154.7939
              100        0.22    8            0.01   0.45    137.2899
              100        0.19    8            0.01   0.5     121.7652
              100        0.17    8            0.01   0.6     107.996
              100        0.15    8            0.01   0.7     95.7839
              100        0.12    8            0.01   0.8     84.9527
              100        0.11    8            0.01   0.9     75.3463
              100        0.1     8            0.01   0.99    66.8262
              100        0.1     8            0.01   0.99    59.2695
              100        0.1     8            0.01   0.99    52.5673
              100        0.1     8            0.01   0.99    46.623
              100        0.1     8            0.01   0.99    41.3509
              100        0.08    8            0.01   0.99    36.675
              100        0.06    8            0.01   0.99    32.5278
              100        0.05    8            0.01   0.99    28.8496
              600        0.04    8            0.01   0.99    14.0426
            Physical
              Thickness  ParticleSizeSand  ParticleSizeSilt  ParticleSizeClay  Rocks     BD    AirDry  LL15   DUL    SAT
              100        5                 65                30                0.171951  1.48  0.03    0.115  0.278  0.34
              100        5                 65                30                0.164813  1.49  0.1     0.127  0.307  0.34
              100        5                 65                30                0         1.41  0.1     0.16   0.307  0.4
              100        5                 65                30                0.109543  1.37  0.13    0.2    0.374  0.4
              100        5                 65                30                0         1.41  0.13    0.24   0.374  0.4
              100        5                 65                30                0         1.41  0.13    0.26   0.374  0.4
              100        5                 65                30                0         1.52  0.13    0.265  0.399  0.426
              100        5                 65                30                0         1.52  0.13    0.268  0.399  0.426
              100        5                 65                30                0         1.62  0.13    0.27   0.359  0.389
              100        5                 65                30                0         1.62  0.13    0.274  0.359  0.389
              100        5                 65                30                0         1.66  0.13    0.28   0.344  0.374
              100        5                 65                30                0         1.66  0.13    0.28   0.344  0.374
              100        5                 65                30                0         1.62  0.13    0.28   0.359  0.389
              100        5                 65                30                0         1.62  0.13    0.28   0.359  0.389
              100        5                 65                30                0         1.62  0.13    0.28   0.359  0.389
              100        5                 65                30                0         1.62  0.13    0.28   0.359  0.389
              100        5                 65                30                0         1.62  0.13    0.28   0.359  0.389
              100        5                 65                30                0         1.62  0.13    0.28   0.359  0.389
              100        5                 65                30                0         1.62  0.13    0.28   0.359  0.389
              100        5                 65                30                0         1.62  0.13    0.28   0.359  0.389
              500        5                 65                30                0         1.62  0.13    0.28   0.359  0.389
              Rocks, ParticleSizeSand, ParticleSizeSilt, ParticleSizeClay source: Calculated
              SoilCrop WheatSoil
                LL=[0.127, 0.156, 0.148, 0.253, 0.261, 0.261, 0.268, 0.268, 0.285, 0.274, 0.281, 0.281, 0.254, 0.254, 0.254, 0.256, 0.256, 0.256, 0.256, 0.256, 0.256]
                KL=[0.08, 0.08, 0.06, 0.06, 0.05, 0.04, 0.04, 0.04, 0.04, 0.04, 0.04, 0.03, 0.03, 0.02, 0.02, 0.01, 0.01, 0.01, 0.01, 0.01, 0.01]
                XF=[1, 1, 1, 1, 1, 1, 1, 1, 1, 1, 1, 1, 1, 1, 1, 1, 0.8, 0.4, 0, 0, 0]
              SoilCrop CanolaSoil
                LL=[0.115, 0.127, 0.16, 0.2, 0.24, 0.26, 0.265, 0.268, 0.27, 0.274, 0.28, 0.28, 0.28, 0.28, 0.28, 0.28, 0.28, 0.28, 0.28, 0.28, 0.28]
                KL=[0.08, 0.08, 0.06, 0.06, 0.05, 0.04, 0.04, 0.04, 0.04, 0.04, 0.04, 0.03, 0.03, 0.02, 0.02, 0.01, 0.01, 0.01, 0.01, 0.01, 0.01]
                XF=[1, 1, 1, 1, 1, 1, 1, 1, 1, 1, 1, 1, 1, 1, 0.7, 0.7, 0.7, 0.5, 0.5, 0.2, 0.2]
            Water: FilledFromTop=false
              Thickness=[100, 100, 100, 100, 100, 100, 100, 100, 100, 100, 100, 100, 100, 100, 100, 100, 100, 100, 100, 100, 500]
              InitialValues=[0.12315, 0.136, 0.16735, 0.2087, 0.2467, 0.2657, 0.2717, 0.27455, 0.27445, 0.27825, 0.2832, 0.2832, 0.28395, 0.28395, 0.28395, 0.28395, 0.28395, 0.28395, 0.28395, 0.28395, 0.28395]
            Solute NO3: InitialValuesUnits=ppm; WaterTableConcentration=0; D0=0; DepthConstant=0; MaxDepthSoluteAccessible=0; RunoffEffectivenessAtMovingSolute=0; MaxEffectiveRunoff=0
              Thickness=[100, 100, 100, 100, 100, 100, 100, 100, 100, 100, 100, 100, 100, 100, 100, 100, 100, 100, 100, 600]
              InitialValues=[51, 2, 2, 3, 3, 3, 1, 1, 1, 2, 2, 2, 3, 3, 3, 1, 1, 1, 1, 1]
            Solute NH4: InitialValuesUnits=ppm; WaterTableConcentration=0; D0=0; DepthConstant=0; MaxDepthSoluteAccessible=0; RunoffEffectivenessAtMovingSolute=0; MaxEffectiveRunoff=0
              Thickness=[100, 100, 100, 100, 100, 100, 100, 100, 100, 100, 100, 100, 100, 100, 100, 100, 100, 100, 100, 600]
              InitialValues=[5, 2, 2, 4, 4, 4, 3, 3, 3, 3, 3, 3, 4, 4, 4, 1, 1, 1, 1, 1]
            Solute Urea: InitialValuesUnits=kg/ha; WaterTableConcentration=0; D0=0; DepthConstant=0; MaxDepthSoluteAccessible=0; RunoffEffectivenessAtMovingSolute=0; MaxEffectiveRunoff=0
              Thickness=[100, 100, 100, 100, 100, 100, 100, 100, 100, 100, 100, 100, 100, 100, 100, 100, 100, 100, 100, 600]
              InitialValues=[0, 0, 0, 0, 0, 0, 0, 0, 0, 0, 0, 0, 0, 0, 0, 0, 0, 0, 0, 0]
            SoilTemperature Temperature: InteractionsPerDay=8
          MicroClimate: a_interception=0; b_interception=1; c_interception=0; d_interception=0; SoilHeatFluxFraction=0; MinimumHeightDiffForNewLayer=0; NightInterceptionFraction=0; ReferenceHeight=2
          Report DailyReport: EventNames=[Clock].DoReport
            VariableNames:
              [Clock].Today
              [Clock].Today.Year
              [Canola].DaysAfterSowing
              [Canola].Phenology.CurrentStageName
              [Canola].Leaf.TrueLeafNumber
              [Canola].SowingData.Cultivar
              [Canola].Phenology.CurrentStageName
              [Canola].Phenology.Stage
              [Canola].Phenology.Photoperiod
              [Canola].Phenology.StemElongation.Target.PPResponse
              [Weather].MeanT
              [Weather].MaxT
              [Weather].MinT
              sum([Soil].Water.MM) as ProfileWater
              sum([Soil].SoilWater.ESW) as ProfileESW
              sum([Soil].NO3.kgha) as TotalSoilNitrogen
              [Canola].AboveGround.Wt
              [Canola].AboveGroundLive.Wt
              [Canola].AboveGround.N
              [Canola].AboveGroundLive.N
              [Canola].Grain.Wt
              [Canola].Grain.Live.Wt
              [Canola].Grain.N
              [Canola].Grain.NConc
              [Canola].Grain.Number
              [Canola].CoverTotal
              [Canola].Leaf.CoverTotal
              [Canola].Leaf.LAI
              [Canola].Leaf.Live.Wt
              [Canola].Leaf.Wt
              [Canola].Leaf.Live.N
              [Canola].Leaf.Live.NConc
              [Canola].Leaf.Dead.Wt
              [Canola].Leaf.Dead.N
              [Canola].Leaf.Dead.N
              [Canola].Leaf.BranchNumber
              [Canola].Leaf.Fw
              [Canola].Leaf.Fn
              [Canola].Leaf.FNmetabolic
              [Canola].Pod.Wt
              [Canola].Pod.N
              [Canola].Pod.NConc
              [Canola].Root.Depth
              [Canola].Root.N
              [Canola].Root.Wt
              [Canola].Root.NConc
              [Canola].Root.WaterUptake
              [Canola].Stem.N
              [Canola].Stem.NConc
              [Canola].Stem.Wt
              [Canola].Stem.Live.StorageWt
              [Canola].Shell.Wt
              [Canola].Shell.N
              [Canola].Leaf.Height
              [SurfaceOrganicMatter].Wt
              [Canola].Arbitrator.DM.TotalPlantDemand
              [Canola].Phenology.CumulativeVernalTime
              [Canola].Leaf.FinalLeafNumber
              [Canola].Root.NUptake
              //[FrostHeatDamageFunctions].FrostHeatYield as DamagedYield
          Report HarvestReport
          Report DailyBiomass: EventNames=[Clock].DoReport
            VariableNames:
              [Clock].Today
              [canola].AboveGround.Wt
              [Canola].AboveGroundLive.Wt
              [canola].Population
              [canola].AboveGround.NConc
              [canola].Grain.Wt
              [canola].Grain.Size
              [canola].Grain.Total.Wt
              [canola].Grain.N
              [canola].Grain.NConc
              [canola].Grain.Number
              [Canola].LAI
              [canola].Stem.Live.Wt
              [canola].Leaf.Live.Wt
              [canola].Stem.Wt
              [canola].Leaf.Wt
              [canola].Phenology.CurrentStageName
              [canola].Phenology.Stage
          Report SowingReport: EventNames=[Canola].Sowing
            VariableNames:
              [Clock].Today
              [Canola].SowingData.Cultivar
              [IWeather].Latitude
              [IWeather].Longitude
          Report DamageFunctionHarvestReport: same as Replacements.DamageFunctionHarvestReport
  Folder Hart_2015_Ex1b
    Experiment Hart_2015_Ex1b
      Factors
        Permutation
          Factor TOS
            CompositeFactor 1
              Specifications:
                [Sowing].Script.SowDate = 14-Apr
                [Fertilise].Script.Amount = 100
                [Fertilise].Script.FertiliserDates = 14-Jun
                [Fertilise1].Script.Amount = 50
                [Fertilise1].Script.FertiliserDates = 8-Jul
            CompositeFactor 2
              Specifications:
                [Sowing].Script.SowDate = 30-Apr
                [Fertilise].Script.Amount = 100
                [Fertilise].Script.FertiliserDates = 19-Jun
                [Fertilise1].Script.Amount = 50
                [Fertilise1].Script.FertiliserDates = 11-Aug
            CompositeFactor 3
              Specifications:
                [Sowing].Script.SowDate = 15-May
                [Fertilise].Script.Amount = 100
                [Fertilise].Script.FertiliserDates = 8-Jul
                [Fertilise1].Script.Amount = 50
                [Fertilise1].Script.FertiliserDates = 1-Sep
          Factor Cv
            Specification=[Sowing].Script.CultivarName = 44Y89_CL,45Y88_CL,Archer,ATR_Gem,ATR_Stingray,AV_Garnet,Hyola559_TT,Hyola575_CL,Hyola750_TT
          Factor Popn: Specification=[Sowing].Script.Population =  45
          Factor Fert: Specification=[codes].Script.fert_treat = nil
          Factor Irrig: Specification=[codes].Script.irrig_treat = nil
      Simulation Hart_OCP_2015
        Clock: Start=2015-03-01; End=2015-12-01
        Summary summaryfile
        Weather: FileName=./met/Hart.met
        SoilArbitrator
        Zone paddock: Area=1; Slope=0; AspectAngle=0; Altitude=50
          Folder manager
            Manager Reset on date
              ResetDate = 12-Apr
              ResetWater = Yes
              ResetN = No
              ResetSOM = No
```csharp
using Models.Soils.Nutrients;
using APSIM.Shared.Utilities;
using Models.Surface;
using Models.Utilities;
using Models.Soils;
using Models.PMF;
using Models.Core;
using System;
using Models.Interfaces;

namespace Models
{
    [Serializable]
    public class Script : Model
    {
        [Link] private Clock Clock;
        [Link] private Plant Wheat;
        [Link] private ISoilWater SoilWater;
        [Link] private INutrient nutrient;
        [Link] private SurfaceOrganicMatter SOM;
        [Link] private Summary Summary;

        [Description("Date to reset on:")]
        public string ResetDate {get;set;}

        [Description("Reset Water?")]
        public string ResetWater {get;set;}

        [Description("Reset Nitrogen?")]
        public string ResetN {get;set;}

        [Description("Reset Surface Organic Matter?")]
        public string ResetSOM {get;set;}

        [EventSubscribe("DoManagement")]
        private void OnDoManagement(object sender, EventArgs e)
        {
            if (DateUtilities.WithinDates(ResetDate, Clock.Today, ResetDate))
            {
                if (ResetWater == "Yes")
                {
                    Summary.WriteMessage(this, "Reset Water", MessageType.Diagnostic);
                    SoilWater.Reset();
                }
                if (ResetN == "Yes")
                {
                    Summary.WriteMessage(this, "Reset Nitrogen", MessageType.Diagnostic);
                    nutrient.Reset();
                }
                if (ResetSOM == "Yes")
                {
                    Summary.WriteMessage(this, "Reset Surface OM", MessageType.Diagnostic);
                    SOM.Reset();
                }
            }
        }
    }
}
```
            Manager Sowing: same as Ganmain_2018_Ex1a.Ganmain_2018_Ex1a.Ganmain_OCP_2018.paddock.manager.Sowing
            Manager Fertilise
              FertiliserType = UreaN
              FertiliserDates = 14-Jun
              fert_criteria = 1000
              Amount = 100
              FertiliserDepth = 0
```csharp
using Models.Soils.Nutrients;
using System;
using Models.Soils;
using Models.Core;
using Models.PMF;
using APSIM.Shared.Utilities;
namespace Models
{
    [Serializable]
    public class Script : Model
    {
        [Link] Clock Clock;
        [Link] Fertiliser Fertiliser;
        [Link] INutrient nutrient;
        [Link] Summary sum;
        
        [Separator("A component to apply fertiliser on one or more dates on every year of the simulation")]

        [Description("Type of fertiliser to apply? ")] 
        [Display(Type = DisplayType.FertiliserType)]public string FertiliserType { get; set; }

        [Description("Enter the fertilisation dates as dd-mmm with comma separation (any year information entered will be ignored): ")] 
        public string[] FertiliserDates { get; set; } 

        [Description("Don't add fertiliser if N in top 2 layers exceeds (kg/ha) : ")]
        public double fert_criteria { get; set; }

        [Description("Amount of fertiliser to be applied each time (kg /ha)")] 
        public double Amount { get; set; }

        [Description("Depth (mm)")] public double FertiliserDepth { get; set; }
        
        [EventSubscribe("DoManagement")]
        private void OnDoManagement(object sender, EventArgs e)
        {
            foreach (string ddMMM in FertiliserDates)
            {
                if (DateUtilities.DatesEqual(ddMMM, Clock.Today))
                {
                    double soil_N = nutrient.NH4.kgha[0] + nutrient.NO3.kgha[0] + nutrient.NH4.kgha[1] + nutrient.NO3.kgha[1];
                    if (soil_N <= fert_criteria) 
                         Fertiliser.Apply(amount: Amount, type: FertiliserType, depth: FertiliserDepth);
                    else
                        sum.WriteMessage(this, "No fertilising as top two layers have " + soil_N.ToString() + "kg/ha N", MessageType.Diagnostic);
                }
            }
        }
    }
}
```
            Manager Fertilise1
              FertiliserType = UreaN
              FertiliserDates = 8-Jul
              fert_criteria = 1000
              Amount = 50
              FertiliserDepth = 0
              script: same as in Hart_2015_Ex1b.Hart_2015_Ex1b.Hart_OCP_2015.paddock.manager.Fertilise
            Manager codes
              location = Hart
              TOS = 1
              fert_treat =
              irrig_treat = nil
              trial_code = CTA15HAR1
```csharp
using Models.Soils;
using System;
using Models.Core;
using Models.PMF;
namespace Models
{
    [Serializable]
    [System.Xml.Serialization.XmlInclude(typeof(Model))]
    public class Script : Model
    {
        [Link] Clock Clock;

        [Description("location")]
        public string location { get; set; }

        [Description("Time of sowing")]
        public string TOS { get; set; }

        [Description("fert_treat")]
        public string fert_treat { get; set; }

        [Description("irrig_treat")]
        public string irrig_treat { get; set; }

        [Description("trial_code")]
        public string trial_code { get; set; }

        [EventSubscribe("StartOfSimulation")]
        private void OnSimulationCommencing(object sender, EventArgs e)
        {
            
        }
    }
}
```
            Manager HarvestAfterDate
              HarvestDate = 5-Nov
              script: same as in Ganmain_2018_Ex1a.Ganmain_2018_Ex1a.Ganmain_OCP_2018.paddock.manager.HarvestAfterDate
          Fertiliser
          Manager Fertilise at sowing
            Crop = [canola]
            FertiliserType = NH4N
            Amount = 18
            script: same as in Ganmain_2018_Ex1a.Ganmain_2018_Ex1a.Ganmain_OCP_2018.paddock.Fertilise at sowing
          Manager FertiliseExtra
            Crop = [canola]
            FertiliserType = NH4N
            Amount = 80
            script: same as in Ganmain_2018_Ex1a.Ganmain_2018_Ex1a.Ganmain_OCP_2018.paddock.Fertilise at sowing
          Irrigation
          SurfaceOrganicMatter: InitialResidueName=wheat; InitialResidueType=wheat; InitialResidueMass=6000; InitialStandingFraction=0; InitialCPR=0; InitialCNR=80
          Plant canola: ResourceName=Canola
          Soil soil1: ASCOrder=Calcarosol; ASCSubOrder=Hypercalcic; SoilType=SNSW; Site=Hart; NearestTown=Brinkworth; Region=Mid North; State=South Australia; Country=Australia; ApsoilNumber=284; Latitude=-33.671; Longitude=138.413; LocationAccuracy=+/- 20m
            DataSource=Hart Field Day Site-Characterisation during 2005 season by University of Adelaide, CSIRO Sustainable Ecosystems, Alan Mayfield Consulting and Agrilink. Measurement site located adjacent to site described by Soil and Land Information Group, Department of Water, Land and Biodiversity
            Comments=High CEC moderate-high clay gradational soil. Root growth may be impeded below about 60cm due to high ESP and Boron
            Physical
              Thickness  ParticleSizeSand  ParticleSizeSilt  ParticleSizeClay  Rocks  BD    AirDry  LL15   DUL   SAT
              150        47                10                43                0      1.36  0.095   0.157  0.35  0.46
              150        43.1              6.4               50.4              0      1.25  0.1     0.169  0.38  0.5
              300        42.2              6.7               51.1              0      1.31  0.1     0.179  0.41  0.48
              300        48.2              3.8               47.9              0      1.42  0.1     0.213  0.36  0.44
              300        42.7              5.5               51.7              0      1.46  0.1     0.225  0.36  0.42
              300        41.7              4.3               54                0      1.45  0.1     0.238  0.38  0.42
              Rocks source: Calculated
              SoilCrop WheatSoil: LL=[0.19, 0.2, 0.22, 0.25, 0.28, 0.32]; KL=[0.06, 0.06, 0.04, 0.04, 0.03, 0.02]; XF=[1, 1, 1, 1, 0.41, 0.22]
                LL source: Field measured and checked for sensibility
              SoilCrop BarleySoil: LL=[0.157, 0.169, 0.179, 0.213, 0.225, 0.238]; KL=[0.07, 0.07, 0.07, 0.05, 0.05, 0.05]; XF=[1, 1, 1, 1, 0.41, 0.22]
                LL source: Estimated based on local knowledge
              SoilCrop OatsSoil: LL=[0.19, 0.2, 0.22, 0.25, 0.28, 0.32]; KL=[0.06, 0.06, 0.04, 0.04, 0.03, 0.02]; XF=[1, 1, 1, 1, 0.41, 0.22]
                LL source: Estimated based on local knowledge
              SoilCrop CanolaSoil: LL=[0.157, 0.169, 0.179, 0.213, 0.225, 0.238]; KL=[0.06, 0.06, 0.04, 0.04, 0.03, 0.02]; XF=[1, 1, 1, 1, 0.4, 0.2]
            WaterBalance SoilWater: SummerDate=1-Nov; SummerU=6; SummerCona=3.5; WinterDate=1-Apr; WinterU=2; WinterCona=2; DiffusConst=88; DiffusSlope=35; Salb=0.13; CN2Bare=73; CNRed=20; CNCov=0.8; PSIDul=-100; Thickness=[150, 150, 300, 300, 300, 300]; SWCON=[0.5, 0.3, 0.3, 0.3, 0.1, 0.1]
            Organic: FOMCNRatio=45; CarbonUnits=Total
              Thickness  Carbon  SoilCNRatio  FBiom  FInert  FOM
              150        1.56    12.5         0.04   0.4     585.8963
              150        1.248   12.5         0.02   0.5     434.0427
              300        0.78    12.5         0.02   0.7     238.2077
              300        0.39    12.5         0.02   1       130.7311
              300        0.234   12.5         0.01   1       71.7468
              300        0.156   12.5         0.01   1       39.3755
            Chemical: PHUnits=Water
              Thickness  PH   EC   ESP      CEC
              150        8.1  0.2  2.8481   18.14
              150        8.7  0.2  9.915    19.1525
              300        8.9  0.4  18.8889  18.2261
              300        8.9  0.5  25.1479  16.8962
              300        8.9  0.9  30.8824  17.1913
              300        8.9  1.3  31.9277  17.5629
              EC, CL, PH source: Measured
              CEC source: Calculated
              ESP source: C
            Water: Thickness=[150, 150, 300, 300, 300, 300]; InitialValues=[0.1763, 0.1901, 0.2021, 0.2277, 0.2385, 0.2522]; FilledFromTop=false
            Nutrient
            Solute NO3: Thickness=[150, 150, 300, 300, 300, 300]; InitialValues=[11.7157, 6.3467, 2.5954, 3.2864, 2.3516, 0]; InitialValuesUnits=ppm; WaterTableConcentration=0; D0=0; DepthConstant=0; MaxDepthSoluteAccessible=0; RunoffEffectivenessAtMovingSolute=0; MaxEffectiveRunoff=0
            Solute NH4: Thickness=[150, 150, 300, 300, 300, 300]; InitialValues=[2.1, 1.4, 1.6, 0, 0, 0]; InitialValuesUnits=ppm; WaterTableConcentration=0; D0=0; DepthConstant=0; MaxDepthSoluteAccessible=0; RunoffEffectivenessAtMovingSolute=0; MaxEffectiveRunoff=0
            Solute Urea: Thickness=[150, 150, 300, 300, 300, 300]; InitialValues=[0, 0, 0, 0, 0, 0]; InitialValuesUnits=kg/ha; WaterTableConcentration=0; D0=0; DepthConstant=0; MaxDepthSoluteAccessible=0; RunoffEffectivenessAtMovingSolute=0; MaxEffectiveRunoff=0
            SoilTemperature Temperature: InteractionsPerDay=8
          MicroClimate: a_interception=0; b_interception=1; c_interception=0; d_interception=0; SoilHeatFluxFraction=0; MinimumHeightDiffForNewLayer=0; NightInterceptionFraction=0; ReferenceHeight=2
          Report DailyReport: EventNames=[Clock].DoReport
            VariableNames:
              [Clock].Today
              [Canola].SowingData.Cultivar
              [Canola].Phenology.CurrentStageName
              [Weather].MeanT
              [Soil].Water.Volumetric
              [Soil].Water.MM
              sum([Soil].Water.MM) as ProfileWater
              [Canola].AboveGround.N
              [Canola].AboveGround.Wt
              [Canola].AboveGroundLive.N
              [Canola].AboveGroundLive.N*10 as UptakeNKgHA
              [Canola].AboveGroundLive.Wt
              [Canola].Arbitrator.DM.TotalFixationSupply
              [Canola].Grain.N
              [Canola].Grain.NConc
              [Canola].Grain.Number
              [Canola].Grain.Size
              [Canola].Grain.Wt
              [Canola].Grain.Live.Wt
              [Canola].Leaf.AppearedCohortNo
              [Canola].Leaf.CoverDead
              [Canola].Leaf.CoverGreen
              [Canola].Leaf.CoverTotal
              [Canola].Leaf.Dead.N
              [Canola].Leaf.Dead.NConc
              [Canola].Leaf.Dead.Wt
              [Canola].Leaf.DeadCohortNo
              [Canola].Leaf.GreenCohortNo
              [Canola].Leaf.SenescingCohortNo
              [Canola].Leaf.ExpandedCohortNo
              [Canola].Leaf.Fn
              [Canola].Leaf.Fw
              [Canola].Leaf.Height
              [Canola].Leaf.InitialisedCohortNo
              [Canola].Leaf.LAI
              [Canola].Leaf.Live.N
              [Canola].Leaf.Live.NConc
              [Canola].Leaf.Live.Wt
              [Canola].Leaf.SpecificArea
              [Canola].Leaf.Transpiration
              [Canola].Phenology.CurrentPhase.Name
              [Canola].Phenology.CurrentStageName
              [Canola].Phenology.Photoperiod
              [Canola].Phenology.Stage
              [Canola].Phenology.ThermalTime
              [Canola].Phenology.ThermalTime
              [Canola].Root.Depth
              [Canola].Root.N
              [Canola].Root.Wt
              [Canola].Root.NConc
              [Canola].Root.WaterUptake
              [Canola].Stem.N
              [Canola].Stem.NConc
              [Canola].Stem.Wt
              [Canola].Stem.Live.StorageWt
              [Canola].SowingData.Cultivar
              [Canola].Structure.Height
              [Canola].Structure.LeafTipsAppeared
              [Canola].Structure.MainStemPopn
              [Canola].Structure.TotalStemPopn
              [SurfaceOrganicMatter].Wt
              sum([Soil].NO3.kgha) as TotalSoilNitrogen
              [Canola].Phenology.MaturityDAS
              [Canola].Phenology.PhotoPeriod
              [Canola].Phenology.Stage
              [Clock].Today.Year
          Report HarvestReport
          Report DailyBiomass: same as Ganmain_2018_Ex1a.Ganmain_2018_Ex1a.Ganmain_OCP_2018.paddock.DailyBiomass
          Report SowingReport: EventNames=[Canola].Sowing
            VariableNames:
              [Clock].Today
              [Canola].SowingData.Cultivar
              [IWeather].Latitude
              [IWeather].Longitude
          Report DamageFunctionHarvestReport: same as Replacements.DamageFunctionHarvestReport
  Folder Junee_2014_Ex1
    Experiment Junee_2014_Ex1
      Factors
        Permutation
          Factor TOS
            CompositeFactor 1
              Specifications:
                [Sowing].Script.SowDate = 15-Apr
                [Fertilise].Script.FertiliserDates = 9-Jul
                [Fertilise].Script.Amount = 200
            CompositeFactor 2
              Specifications:
                [Sowing].Script.SowDate = 28-Apr
                [Fertilise].Script.FertiliserDates = 9-Jul
                [Fertilise].Script.Amount = 200
            CompositeFactor 3
              Specifications:
                [Sowing].Script.SowDate = 21-May
                [Fertilise].Script.FertiliserDates = 6-Dec
                [Fertilise].Script.Amount = 0
          Factor Cv
            Specification=[Sowing].Script.CultivarName = 44Y87_CL,45Y88_CL,ATR_Gem,Hyola559_TT,Hyola575_CL,Hyola971_CL
          Factor Popn: Specification=[Sowing].Script.Population =  45
          Factor Fert: Specification=[codes].Script.fert_treat = nil
          Factor Irrig: Specification=[codes].Script.irrig_treat = nil
      Simulation Old_Junee_OCP_2014
        Clock: Start=2014-03-01; End=2015-01-31
        Summary summaryfile
        Weather: FileName=./met/73025_CombGSE.met
        SoilArbitrator
        Zone paddock: Area=1; Slope=0; AspectAngle=0; Altitude=50
          Folder manager
            Manager Reset on date
              ResetDate = 28-Mar
              ResetWater = Yes
              ResetN = No
              ResetSOM = No
              script: same as in Hart_2015_Ex1b.Hart_2015_Ex1b.Hart_OCP_2015.paddock.manager.Reset on date
            Manager Sowing
              SowDate = 25-Apr
              CultivarName = Hyola575
              SowingDepth = 20
              RowSpacing = 250
              Population = 45
```csharp
using APSIM.Shared.Utilities;
using Models.Utilities;
using Models.Soils;
using Models.PMF;
using Models.Core;
using System;

namespace Models
{
    [Serializable]
    public class Script : Model
    {
        [Link] Clock Clock;
        [Link] Fertiliser Fertiliser;
        [Link] Summary Summary;
        [Link] Plant Canola;
        [Link] Soil Soil;
        Accumulator accumulatedRain;
        
        [Description("Sowing date (d-mmm)")]
        public string SowDate { get; set; }
        [Description("Cultivar to be sown")]
        public string CultivarName { get; set; }
        [Description("Sowing depth (mm)")]
        public double SowingDepth { get; set; }
        [Description("Row spacing (mm)")]
        public double RowSpacing { get; set; }
        [Description("Plant population (/m2)")]
        public double Population { get; set; }
        
        


        [EventSubscribe("DoManagement")]
        private void OnDoManagement(object sender, EventArgs e)
        {
        
            
            if (DateUtilities.WithinDates(SowDate, Clock.Today, SowDate))
            {
                Canola.Sow(population: Population, cultivar: CultivarName, depth: SowingDepth, rowSpacing: RowSpacing);    
            }
        
        }
        
    }
}
```
            Manager Fertilise
              FertiliserType = UreaN
              FertiliserDates = 6-Dec
              fert_criteria = 1000
              Amount = 0
              FertiliserDepth = 0
              script: same as in Hart_2015_Ex1b.Hart_2015_Ex1b.Hart_OCP_2015.paddock.manager.Fertilise
            Manager codes
              location = Junee
              TOS = 1
              fert_treat =
              irrig_treat = nil
              trial_code = CSTA14OLDJ2
              script: same as in Hart_2015_Ex1b.Hart_2015_Ex1b.Hart_OCP_2015.paddock.manager.codes
            Manager HarvestAfterDate
              HarvestDate = 25-Nov
              script: same as in Ganmain_2018_Ex1a.Ganmain_2018_Ex1a.Ganmain_OCP_2018.paddock.manager.HarvestAfterDate
          Fertiliser
          Manager Fertilise at sowing
            Crop = [canola]
            FertiliserType = NH4N
            Amount = 21
            FertiliserDepth = 50
```csharp
using Models.Soils;
using System;
using Models.Core;
using Models.PMF;
namespace Models
{
    [Serializable]
    public class Script : Model
    {
        [Link] Clock Clock;
        [Link] Fertiliser Fertiliser;
        [Link] Summary summary;

        [Description("Crop to be fertilised")]
        public IPlant Crop { get; set; }

        [Description("Type of fertiliser to apply? ")] 
        [Display(Type = DisplayType.FertiliserType)]public string FertiliserType { get; set; }

        [Description("Amount of fertiliser to be applied (kg/ha)")]
        public double Amount { get; set; }

        [Description("Depth (mm)")]
        public double FertiliserDepth { get; set; }

        [EventSubscribe("Sowing")]
        public void OnSowing(object sender, EventArgs e)
        {
            Model crop = sender as Model;
            if (Crop != null && crop.Name.ToLower() == (Crop as IModel).Name.ToLower())
                Fertiliser.Apply(amount: Amount, type: FertiliserType, depth: FertiliserDepth);  //"NO3N"
        }

    }
}
```
          Manager FertiliseExtra
            Crop = [canola]
            FertiliserType = NH4N
            Amount = 50
            script: same as in Ganmain_2018_Ex1a.Ganmain_2018_Ex1a.Ganmain_OCP_2018.paddock.Fertilise at sowing
          Irrigation
          SurfaceOrganicMatter: InitialResidueName=lucerne; InitialResidueType=lucerne; InitialResidueMass=4000; InitialStandingFraction=0; InitialCPR=0; InitialCNR=40
          Plant canola: ResourceName=Canola
          Soil: SoilType=SNSW; Site=CSU; NearestTown=Wagga Wagga; Region=Southern NSW; State=NSW; Latitude=0; Longitude=0; DataSource=Kirsten Verburg
            Chemical: PHUnits=Water
              Thickness=[100, 100, 100, 100, 100, 100, 100, 100, 100, 100, 100, 100, 100, 100, 100, 100, 100, 100, 100, 100]
              PH=[5.8, 5.9, 6.6, 6.8, 7, 7.1, 7.2, 7.3, 7.4, 7.4, 7.6, 7.8, 8, 8.2, 8.3, 8.4, 8.4, 8.5, 8.5, 8.5]
            Physical
              Thickness  BD    AirDry  LL15  DUL   SAT
              100        1.48  0.03    0.11  0.28  0.34
              100        1.49  0.1     0.12  0.27  0.34
              100        1.41  0.13    0.14  0.25  0.32
              100        1.37  0.13    0.16  0.28  0.35
              100        1.41  0.13    0.18  0.28  0.35
              100        1.41  0.13    0.18  0.28  0.35
              100        1.52  0.13    0.21  0.3   0.34
              100        1.52  0.13    0.21  0.3   0.34
              100        1.62  0.13    0.24  0.31  0.33
              100        1.62  0.13    0.24  0.31  0.33
              100        1.66  0.13    0.26  0.31  0.34
              100        1.66  0.13    0.26  0.31  0.34
              100        1.62  0.13    0.27  0.32  0.34
              100        1.62  0.13    0.27  0.32  0.34
              100        1.62  0.13    0.28  0.33  0.36
              100        1.62  0.13    0.28  0.33  0.36
              100        1.62  0.13    0.28  0.33  0.36
              100        1.62  0.13    0.28  0.33  0.36
              100        1.62  0.13    0.28  0.33  0.36
              100        1.62  0.13    0.28  0.33  0.36
              SoilCrop WheatSoil
                LL=[0.11, 0.12, 0.14, 0.16, 0.18, 0.18, 0.21, 0.21, 0.24, 0.24, 0.26, 0.26, 0.27, 0.27, 0.28, 0.28, 0.28, 0.28, 0.28, 0.28]
                KL=[0.08, 0.08, 0.06, 0.06, 0.05, 0.04, 0.04, 0.04, 0.04, 0.04, 0.04, 0.03, 0.03, 0.02, 0.02, 0.01, 0.01, 0.01, 0.01, 0.01]
                XF=[1, 1, 1, 1, 1, 1, 1, 1, 1, 1, 1, 1, 1, 1, 1, 1, 0.8, 0.4, 0, 0]
              SoilCrop CanolaSoil: same as Junee_2014_Ex1.Junee_2014_Ex1.Old_Junee_OCP_2014.paddock.soil.Physical.WheatSoil
            WaterBalance SoilWater: SummerDate=1-nov; SummerU=6; SummerCona=2; WinterDate=1-apr; WinterU=2; WinterCona=2; DiffusConst=44; DiffusSlope=16; Salb=0.13; CN2Bare=72; CNRed=20; CNCov=0.8; PSIDul=-100
              Thickness=[100, 100, 100, 100, 100, 100, 100, 100, 100, 100, 100, 100, 100, 100, 100, 100, 100, 100, 100, 100]
              SWCON=[0.5, 0.5, 0.5, 0.89, 0.8, 0.8, 0.6, 0.6, 0.4, 0.4, 0.2, 0.2, 0.2, 0.2, 0.2, 0.2, 0.2, 0.2, 0.2, 0.2]
            Organic: FOMCNRatio=80; CarbonUnits=Total
              Thickness  Carbon  SoilCNRatio  FBiom  FInert  FOM
              100        0.83    8            0.06   0.01    293.1807
              100        0.35    8            0.05   0.01    252.3429
              100        0.33    8            0.04   0.31    217.1936
              100        0.22    8            0.03   0.35    186.9402
              100        0.22    8            0.02   0.4     160.901
              100        0.22    8            0.01   0.45    138.4887
              100        0.19    8            0.01   0.5     119.1984
              100        0.17    8            0.01   0.6     102.595
              100        0.15    8            0.01   0.7     88.3043
              100        0.12    8            0.01   0.8     76.0042
              100        0.11    8            0.01   0.9     65.4174
              100        0.1     8            0.01   0.99    56.3053
              100        0.1     8            0.01   0.99    48.4624
              100        0.1     8            0.01   0.99    41.712
              100        0.1     8            0.01   0.99    35.9019
              100        0.1     8            0.01   0.99    30.901
              100        0.08    8            0.01   0.99    26.5967
              100        0.06    8            0.01   0.99    22.892
              100        0.05    8            0.01   0.99    19.7034
              100        0.04    8            0.01   0.99    16.9588
            Water: Thickness=[100, 100, 200, 200, 200, 200, 200, 200, 200, 400]; FilledFromTop=false
              InitialValues=[0.177, 0.17, 0.182, 0.192, 0.151, 0.145, 0.161, 0.18, 0.221, 0.221]
            Nutrient
            Solute NO3: InitialValuesUnits=ppm; WaterTableConcentration=0; D0=0; DepthConstant=0; MaxDepthSoluteAccessible=0; RunoffEffectivenessAtMovingSolute=0; MaxEffectiveRunoff=0
              Thickness=[100, 100, 100, 100, 100, 100, 100, 100, 100, 100, 100, 100, 100, 100, 100, 100, 100, 100, 100, 100]
              InitialValues=[31.06, 24.74, 11.82, 11.82, 7.28, 7.28, 2.14, 2.14, 1.22, 1.22, 1.16, 1.16, 1.23, 1.23, 1.44, 1.44, 1, 1, 1, 1]
            Solute NH4: InitialValuesUnits=ppm; WaterTableConcentration=0; D0=0; DepthConstant=0; MaxDepthSoluteAccessible=0; RunoffEffectivenessAtMovingSolute=0; MaxEffectiveRunoff=0
              Thickness=[100, 100, 100, 100, 100, 100, 100, 100, 100, 100, 100, 100, 100, 100, 100, 100, 100, 100, 100, 100]
              InitialValues=[0.86, 0.13, 0.1, 0.1, 0.06, 0.06, 0, 0, 0.14, 0.14, 0.07, 0.07, 0, 0, 0, 0, 1, 1, 1, 1]
            Solute Urea: InitialValuesUnits=kg/ha; WaterTableConcentration=0; D0=0; DepthConstant=0; MaxDepthSoluteAccessible=0; RunoffEffectivenessAtMovingSolute=0; MaxEffectiveRunoff=0
              Thickness=[100, 100, 100, 100, 100, 100, 100, 100, 100, 100, 100, 100, 100, 100, 100, 100, 100, 100, 100, 100]
              InitialValues=[0, 0, 0, 0, 0, 0, 0, 0, 0, 0, 0, 0, 0, 0, 0, 0, 0, 0, 0, 0]
            SoilTemperature Temperature: InteractionsPerDay=8
          MicroClimate: a_interception=0; b_interception=1; c_interception=0; d_interception=0; SoilHeatFluxFraction=0; MinimumHeightDiffForNewLayer=0; NightInterceptionFraction=0; ReferenceHeight=2
          Report DailyReport: same as Hart_2015_Ex1b.Hart_2015_Ex1b.Hart_OCP_2015.paddock.DailyReport
          Report HarvestReport
          Report DailyBiomass: same as Ganmain_2018_Ex1a.Ganmain_2018_Ex1a.Ganmain_OCP_2018.paddock.DailyBiomass
          Report SowingReport: EventNames=[Canola].Sowing
            VariableNames:
              [Clock].Today
              [Canola].SowingData.Cultivar
              [IWeather].Latitude
              [IWeather].Longitude
          Report DamageFunctionHarvestReport: same as Replacements.DamageFunctionHarvestReport
  Folder Longerenong_2017_Ex1a
    Experiment Longerenong_2017_Ex1a
      Factors
        Permutation
          Factor TOS
            CompositeFactor 1: Specifications=[Sowing].Script.SowDate = 8-Apr
            CompositeFactor 2: Specifications=[Sowing].Script.SowDate = 28-Apr
          Factor Cv
            Specification=[Sowing].Script.CultivarName =44Y90_CL,45Y25_RR,Archer,ATR_Bonito,ATR_Stingray,ATR_Wahoo,Hyola600_RR,NS_Diamond
          Factor Popn: Specification=[Sowing].Script.Population =  45
          Factor Fert
            CompositeFactor D5
              Specifications:
                [Fertilise2].Script.FertiliserDates = 27-Apr
                [Fertilise2].Script.Amount = 34.5
            CompositeFactor D9
              Specifications:
                [Fertilise2].Script.FertiliserDates = 27-Apr
                [Fertilise2].Script.Amount = 69
          Factor Irrig: Specification=[codes].Script.irrig_treat = nil
      Simulation Longerenong_OCP_2016_Ex1b
        Clock: Start=2017-01-01; End=2017-12-31
        Summary summaryfile
        Weather: FileName=./met/79028_CombGSE.met
        SoilArbitrator
        Zone paddock: Area=1; Slope=0; AspectAngle=0; Altitude=50
          Folder manager
            Manager Reset on date
              ResetDate = 1-Jan
              ResetWater = Yes
              ResetN = Yes
              ResetSOM = No
              script: same as in Hart_2015_Ex1b.Hart_2015_Ex1b.Hart_OCP_2015.paddock.manager.Reset on date
            Manager Sowing: same as Junee_2014_Ex1.Junee_2014_Ex1.Old_Junee_OCP_2014.paddock.manager.Sowing
            Manager Fertilise
              FertiliserType = UreaN
              FertiliserDates = 23-Apr
              fert_criteria = 1000
              Amount = 39.1
              FertiliserDepth = 20
              script: same as in Hart_2015_Ex1b.Hart_2015_Ex1b.Hart_OCP_2015.paddock.manager.Fertilise
            Manager Fertilise1
              FertiliserType = NH4N
              FertiliserDates = 23-Apr
              fert_criteria = 1000
              Amount = 23.1
              FertiliserDepth = 20
              script: same as in Hart_2015_Ex1b.Hart_2015_Ex1b.Hart_OCP_2015.paddock.manager.Fertilise
            Manager Fertilise2
              FertiliserType = UreaN
              FertiliserDates = 15-Jun
              fert_criteria = 1000
              Amount = 46
              FertiliserDepth = 0
              script: same as in Hart_2015_Ex1b.Hart_2015_Ex1b.Hart_OCP_2015.paddock.manager.Fertilise
            Manager codes
              location = Longerenong
              TOS = 1
              irrig_treat = nil
              trial_code = CSTA16LONG3
              fert_code = nil
```csharp
using Models.Soils;
using System;
using Models.Core;
using Models.PMF;
namespace Models
{
    [Serializable]
    [System.Xml.Serialization.XmlInclude(typeof(Model))]
    public class Script : Model
    {
        [Link] Clock Clock;

        [Description("location")]
        public string location { get; set; }

        [Description("Time of sowing")]
        public string TOS { get; set; }

        [Description("irrig_treat")]
        public string irrig_treat { get; set; }

        [Description("trial_code")]
        public string trial_code { get; set; }

        [Description("fert_code")]
        public string fert_code { get; set; }

        [EventSubscribe("StartOfSimulation")]
        private void OnSimulationCommencing(object sender, EventArgs e)
        {
            /*
                location = '[location]' !'Condobolin'
irrig_treat = '[irrig_treat]' ! 'dry'
trial_code = '[trial_code]' ! 'CSTB16COND2'
minn_tot = 0
TOS = [TOS] !'1'
dens_trt = 45
exp = '1b'
fert_treat = '[fert_code]'
            */
        }
    }
}
```
            Manager HarvestAfterDate
              HarvestDate = 11-Nov
              script: same as in Ganmain_2018_Ex1a.Ganmain_2018_Ex1a.Ganmain_OCP_2018.paddock.manager.HarvestAfterDate
          Fertiliser
          Manager Fertilise at sowing
            Crop = [canola]
            FertiliserType = NH4N
            Amount = 6.6
            FertiliserDepth = 50
            script: same as in Junee_2014_Ex1.Junee_2014_Ex1.Old_Junee_OCP_2014.paddock.Fertilise at sowing
          Irrigation
          SurfaceOrganicMatter: InitialResidueName=lucerne; InitialResidueType=lucerne; InitialResidueMass=10000; InitialStandingFraction=0; InitialCPR=0; InitialCNR=40
          Plant canola: ResourceName=Canola
          Soil Grey Cracking Clay (Horsham No1008): ASCSubOrder=Grey; SoilType=SNSW; Site=Horsham Aerodrome; NearestTown=Horsham; Region=Wimmera; State=Victoria; Country=Australia; ApsoilNumber=1008; Latitude=-36.6809; Longitude=142.1683
            DataSource=Characterised by BCG as part of the the GRDC Southern Agribusiness Trial Network project.
            Physical
              Thickness  BD      AirDry  LL15    DUL     SAT
              100        1.2587  0.0824  0.1648  0.445   0.495
              150        1.2065  0.0946  0.1182  0.4647  0.5147
              150        1.3852  0.177   0.177   0.3973  0.4473
              150        1.3655  0.177   0.177   0.4047  0.4547
              150        1.3655  0.177   0.177   0.4047  0.4547
              300        1.2629  0.177   0.177   0.4434  0.4934
              300        1.2624  0.177   0.177   0.4436  0.4936
              200        1.262   0.177   0.177   0.444   0.494
              SoilCrop WheatSoil
                LL=[0.1648, 0.1182, 0.177, 0.2116, 0.241, 0.2703, 0.3435, 0.344]
                KL=[0.06, 0.06, 0.06, 0.06, 0.0467, 0.04, 0.0333, 0.03]
                XF=[1, 1, 1, 1, 1, 1, 1, 1]
                LL source: Field measured and checked for sensibility (layer 1, 2, 3, 4, 5, 6, 7)
              SoilCrop BarleySoil
                LL=[0.1648, 0.1182, 0.177, 0.2116, 0.241, 0.2703, 0.3435, 0.344]
                KL=[0.07, 0.07, 0.07, 0.07, 0.0567, 0.05, 0.0433, 0.04]
                XF=[1, 1, 1, 1, 1, 1, 1, 1]
                LL source: Estimated based on local knowledge (layer 1, 2, 3, 4, 5, 6, 7)
              SoilCrop CanolaSoil
                LL=[0.1648, 0.1182, 0.177, 0.2116, 0.241, 0.2703, 0.3435, 0.344]
                KL=[0.06, 0.06, 0.06, 0.06, 0.0467, 0.04, 0.0333, 0.03]
                XF=[1, 1, 1, 1, 1, 1, 1, 1]
                LL source: Estimated based on local knowledge (layer 1, 2, 3, 4, 5, 6, 7)
            WaterBalance SoilWater: SummerDate=1-Nov; SummerU=6; SummerCona=3.5; WinterDate=1-Apr; WinterU=2; WinterCona=2; DiffusConst=40; DiffusSlope=16; Salb=0.12; CN2Bare=84; CNRed=20; CNCov=0.8; PSIDul=-100; Thickness=[100, 150, 150, 150, 150, 300, 300, 200]; SWCON=[0.3, 0.3, 0.3, 0.3, 0.3, 0.3, 0.3, 0.3]
            Organic: FOMCNRatio=40; CarbonUnits=Total
              Thickness  Carbon  SoilCNRatio  FBiom  FInert  FOM
              100        1.34    7            0.1    0.2     3439.2023
              150        0.62    7            0.1    0.4     2547.8238
              150        0.65    7            0.08   0.5     1887.4743
              300        0.325   7            0.07   0.6     1035.8678
              300        0.195   7            0.06   0.7     568.4963
              300        0.13    7            0.05   0.9     311.9974
              200        0.13    7            0.04   0.9     209.1381
            Chemical: PHUnits=Water
              Thickness  PH   EC    ESP
              100        7    0.22  2
              150        6.9  0.21  6.4
              150        8    0.28  11.8
              300        8    0.43  16.8
              300        8    0.82  24.7
              300        8    1.14  28
              200        8    1.14  28
              EC, CL, PH source: Measured (layer 1, 2, 3, 4, 5, 6)
              ESP source: C (layer 1, 2, 3, 4, 5, 6)
            Water: Thickness=[100, 300, 300, 300, 300, 200]; InitialValues=[0.264, 0.351, 0.341, 0.341, 0.341, 0.341]; FilledFromTop=false
            Nutrient
            Solute NO3: Thickness=[100, 150, 150, 300, 300, 300, 200]; InitialValues=[24, 11, 11, 4, 3, 3, 3]; InitialValuesUnits=ppm; WaterTableConcentration=0; D0=0; DepthConstant=0; MaxDepthSoluteAccessible=0; RunoffEffectivenessAtMovingSolute=0; MaxEffectiveRunoff=0
            Solute NH4: Thickness=[100, 150, 150, 300, 300, 300, 200]; InitialValues=[3, 1, 1, 1, 1, 1, 1]; InitialValuesUnits=ppm; WaterTableConcentration=0; D0=0; DepthConstant=0; MaxDepthSoluteAccessible=0; RunoffEffectivenessAtMovingSolute=0; MaxEffectiveRunoff=0
            Solute Urea: Thickness=[100, 150, 150, 300, 300, 300, 200]; InitialValues=[0, 0, 0, 0, 0, 0, 0]; InitialValuesUnits=kg/ha; WaterTableConcentration=0; D0=0; DepthConstant=0; MaxDepthSoluteAccessible=0; RunoffEffectivenessAtMovingSolute=0; MaxEffectiveRunoff=0
            SoilTemperature Temperature: InteractionsPerDay=8
          MicroClimate: a_interception=0; b_interception=1; c_interception=0; d_interception=0; SoilHeatFluxFraction=0; MinimumHeightDiffForNewLayer=0; NightInterceptionFraction=0; ReferenceHeight=2
          Report DailyReport: same as Hart_2015_Ex1b.Hart_2015_Ex1b.Hart_OCP_2015.paddock.DailyReport
          Report HarvestReport
          Report DailyBiomass: same as Ganmain_2018_Ex1a.Ganmain_2018_Ex1a.Ganmain_OCP_2018.paddock.DailyBiomass
          Report SowingReport: EventNames=[Canola].Sowing
            VariableNames:
              [Clock].Today
              [Canola].SowingData.Cultivar
              [IWeather].Latitude
              [IWeather].Longitude
          Manager FertiliseExtra
            Crop = [canola]
            FertiliserType = NH4N
            Amount = 20
            script: same as in Ganmain_2018_Ex1a.Ganmain_2018_Ex1a.Ganmain_OCP_2018.paddock.Fertilise at sowing
          Report DamageFunctionHarvestReport: same as Replacements.DamageFunctionHarvestReport
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