Simulations: Version=216
  Memo Data Ownership Acknowledgement
    Data description: https://doi.org/10.25919/j2af-ax46.

    Disclaimer: This dataset is provided “as is” without warranty of any kind, express or implied, including but not limited to its accuracy, completeness, or fitness for a particular purpose. The creators and contributors shall not be liable for any damages arising from its use.

    License: This dataset is released under [Creative Commons Attribution 4.0 International Licence](https://creativecommons.org/licenses/by/4.0/) in [CSIRO DAP](https://doi.org/10.25919/j2af-ax46).

    For further inquiries or permission requests, please contact Dr Julianne Lilley (julianne.lilley@csiro.au).

    When citing this dataset, please use the following reference: Lilley, Julianne; Kirkegaard, John; Whish, Jeremy; Beletse, Yacob; Berger, Jens; Seymour, Mark; Bucat, Jackie; Herrmann, Chris; Dunn, Mathew; Ware, Andrew; Brill, Rohan; & Zhang, Heping (2024): Canola Agronomy. v3. CSIRO. Data Collection. https://doi.org/10.25919/j2af-ax46.

    When using the damage functions, please use the following reference for more information: Hu, P., He, D., Zheng, B., Whish, J., Kirkegaard, J., Bell, L., Leske, B., Chen, S., Uppal, R., Biddulph, B., Trethowan, R., Beletse, Y., Lilley, J., 2026. Event-based frost and heat damage functions improve yield predictions of APSIM canola and wheat: formulation, calibration, and evaluation. Agricultural and Forest Meteorology 386, 111239. https://doi.org/10.1016/j.agrformet.2026.111239
  DataStore
    ExcelInput: FileNames=[CanolaAgronomy_3_Obs.xlsx]; SheetNames=[Obs]
    Probability WaggaCDF: TableName=WaggaHarvestReport; Exceedence=false; FieldToSplitOn=SimulationName
    PredictedObserved: PredictedTableName=HarvestReport; ObservedTableName=Obs; FieldNameUsedForMatch=SimulationID; AllColumns=true
    PredictedObserved DamageFunctionHarvestObsPred: PredictedTableName=DamageFunctionHarvestReport; ObservedTableName=Obs; FieldNameUsedForMatch=SimulationName; AllColumns=true
  Folder Replacements
    Plant Canola
      FrostHeatDamageFunctions: CropType=2; FrostLowTT=-4.9; FrostMaxReductionRatio=0.13; FrostUpTT=0.1; FrostMinReductionRatio=0; FrostStartSensitiveGS=5.71; FrostStartMostSensitiveGS=7.56; FrostEndMostSensitiveGS=8.38; FrostEndSensitiveGS=9.01; HeatLowTT=29.1; HeatMinReductionRatio=0; HeatUpTT=39.8; HeatMaxReductionRatio=0.42; HeatStartSensitiveGS=5.75; HeatStartMostSensitiveGS=7.01; HeatEndMostSensitiveGS=8.31; HeatEndSensitiveGS=10.18
    Report DailyReport: EventNames=[Clock].DoReport
      VariableNames:
        [Clock].Today
        [Clock].Today.Year
        [Canola].DaysAfterSowing
        [Canola].Phenology.CurrentStageName
        [Canola].Leaf.TrueLeafNumber
        [Canola].SowingData.Cultivar
        [Canola].Phenology.CurrentStageName
        [Canola].Phenology.Stage
        [Canola].Phenology.Photoperiod
        [Canola].Phenology.StemElongation.Target.PPResponse
        [Weather].MeanT
        sum([Soil].Water.MM) as ProfileWater
        sum([Soil].SoilWater.ESW) as ProfileESW
        sum([Soil].NO3.kgha) as TotalSoilNitrogen
        [Canola].AboveGround.Wt
        [Canola].AboveGroundLive.Wt
        [Canola].AboveGround.N
        [Canola].AboveGroundLive.N
        [Canola].Grain.Wt
        [Canola].Grain.Live.Wt
        [Canola].Grain.N
        [Canola].Grain.NConc
        [Canola].Grain.Number
        [Canola].CoverTotal
        [Canola].Leaf.CoverTotal
        [Canola].Leaf.LAI
        [Canola].Leaf.Live.Wt
        [Canola].Leaf.Wt
        [Canola].Leaf.Live.N
        [Canola].Leaf.Live.NConc
        [Canola].Leaf.Dead.Wt
        [Canola].Leaf.Dead.N
        [Canola].Leaf.Dead.N
        [Canola].Leaf.BranchNumber
        [Canola].Leaf.Fw
        [Canola].Leaf.Fn
        [Canola].Leaf.FNmetabolic
        [Canola].Pod.Wt
        [Canola].Pod.N
        [Canola].Pod.NConc
        [Canola].Root.Depth
        [Canola].Root.N
        [Canola].Root.Wt
        [Canola].Root.NConc
        [Canola].Root.WaterUptake
        [Canola].Stem.N
        [Canola].Stem.NConc
        [Canola].Stem.Wt
        [Canola].Stem.Live.StorageWt
        [Canola].Shell.Wt
        [Canola].Shell.N
        [Canola].Leaf.Height
        [SurfaceOrganicMatter].Wt
        [Canola].Arbitrator.DM.TotalPlantDemand
        [Canola].Phenology.CumulativeVernalTime
        [Canola].Leaf.FinalLeafNumber
        [Canola].Root.NUptake
    Report HarvestReport: EventNames=[Canola].Harvesting
      VariableNames:
        [Clock].Today
        [Canola].SowingDate
        [Canola].SowingData.Cultivar
        [Canola].Phenology.CurrentStageName
        [Canola].Phenology.EmergenceDAS
        [Canola].Phenology.FloralInitiationDAS
        [Canola].Phenology.GreenBudDAS
        [Canola].Phenology.StartFloweringDAS
        [Canola].Phenology.CumulativeVernalTime
        [Canola].Grain.Wt
        [Canola].AboveGroundLive.Wt
        [Canola].AboveGround.Wt
        sum([Soil].Water.MM) as ProfileWater
        sum([Soil].NO3.kgha) as TotalSoilNitrogen
        [Canola].Phenology.MaturityDAS
        [Clock].Today.Year
        [Canola].DaysAfterSowing
    Manager Harvesting
```csharp
using Models.PMF.Phen;
using System;
using Models.Core;
using System.Collections.Generic;
using System.Text;
using Models.Soils;
using Models.PMF;
using Models;
using System.Xml.Serialization;
using APSIM.Shared.Utilities;

namespace Models
{
    [Serializable] 
    public class Script : Model
    {
        [Link] private Plant Canola;
        [Link] private Clock Clock;
        [Link(Type = LinkType.Path, Path = "[Canola].Phenology")]
        private Phenology phenology;

        [EventSubscribe("DoManagement")]
        private void OnDoManagement(object sender, EventArgs e)
        {
            if ((phenology.CurrentPhase.Name == "ReadyForHarvesting")||(Canola.IsAlive&&DateUtilities.DatesEqual("31-Dec", Clock.Today)))
            {
                Canola.Harvest();
                Canola.EndCrop();
            }
        }
    }
}
```
    Report SowingReport: EventNames=[Canola].Sowing
      VariableNames:
        [Clock].Today
        [Canola].SowingData.Cultivar
        [IWeather].Latitude
        [IWeather].Longitude
    Report DamageFunctionHarvestReport: EventNames=[Canola].Harvesting
      VariableNames:
        [Clock].Today as Date
        [Canola].Phenology.Stage
        [Canola].Phenology.EmergenceDAS
        [Canola].Phenology.StartFloweringDAS
        [Canola].Phenology.MaturityDAS
        [Canola].AboveGround.Wt
        [FrostHeatDamageFunctions].FrostHeatYield as Canola.Grain.Wt
  Folder Kojonup
    Experiment Kojonup2013
      Factors
        Permutation
          Factor Cv
            Specification=[SowingRule].Script.CultivarName=43C80_CL,ATR_Gem,ATR_Stingray,AV_Garnet,AV_Zircon,CB_Telfer,Crusher_TT,Hyola559_TT,Hyola575_CL
          Factor Fert
            CompositeFactor 0N
              Specifications:
                [Fertilise at sowing].Script.Amount = 0
                [Fertilise on fixed dates].Script.Amount = 0
            CompositeFactor 150N
              Specifications:
                [Fertilise at sowing].Script.Amount = 20
                [Fertilise on fixed dates].Script.Amount = 65
          Memo
            [#SowingRule].Script.CultivarName=ATR_Gem, ATR_Stingray

            Actual Full List
            [#SowingRule].Script.CultivarName=43C80_CL,43Y23_RR,43Y85_CL,45Y22_RR,45Y86_CL,ATR_Gem,ATR_Stingray,AV_Garnet,AV_Zipon,AV_Zircon,CB_Atomic,CB_Status_RR,CB_Telfer,Crusher_TT,GT_Cobra,Hyola404_RR,Hyola450_TT,Hyola50,Hyola505_RR,Hyola555_TT,Hyola559_TT,Hyola575_CL
            [#SowingRule].Script.CultivarName=43C80_CL,ATR_Gem,ATR_Stingray,AV_Garnet,AV_Zircon,CB_Telfer,Crusher_TT,Hyola559_TT,Hyola575_CL
      Simulation Kojonup2013Base
        Memo
          Need to sort out soil and check whether N rules are correct.

          soil sampling done on 9 May   - gravimetric
          Row Labels	Average of %H20 (g/g)
          0-10cm	0.1254
          10-20cm	0.0837
          20-40cm	0.0837
          40-60cm	0.1019
          60-80cm	0.1426
          80-100cm	0.1818
          100-120cm	0.1850

          N applied at sowing, 18/6/13 and topdressed at flowering (14/8/13)

          Also treatments with 0 or 150N and lots of biomass data.
        Clock: Start=2013-05-09; End=2013-12-31
        Summary summaryfile
        Weather: FileName=met/Kojonup.met
        SoilArbitrator
        Zone paddock: Area=1; Slope=0; AspectAngle=0; Altitude=50
          Plant canola: ResourceName=Canola
          MicroClimate: a_interception=0; b_interception=0; c_interception=0; d_interception=0; SoilHeatFluxFraction=0; MinimumHeightDiffForNewLayer=0; NightInterceptionFraction=0; ReferenceHeight=2
          SurfaceOrganicMatter SurfaceOM: InitialResidueName=wheat; InitialResidueType=wheat; InitialResidueMass=6000; InitialStandingFraction=0; InitialCPR=0; InitialCNR=80
          Fertiliser
          Report DailyReport: EventNames=[Clock].DoReport
            VariableNames:
              [Clock].Today
              [Canola].SowingData.Cultivar
              [Canola].Phenology.CurrentStageName
              [Weather].MeanT
              [Soil].Water.Volumetric
              [Soil].Water.MM
              sum([Soil].Water.MM) as ProfileWater
              [Canola].AboveGround.N
              [Canola].AboveGround.Wt
              [Canola].AboveGroundLive.N
              [Canola].AboveGroundLive.N*10 as UptakeNKgHA
              [Canola].AboveGroundLive.Wt
              [Canola].Arbitrator.DM.TotalFixationSupply
              [Canola].Grain.N
              [Canola].Grain.NConc
              [Canola].Grain.Number
              [Canola].Grain.Size
              [Canola].Grain.Wt
              [Canola].Grain.Live.Wt
              [Canola].Leaf.AppearedCohortNo
              [Canola].Leaf.CoverDead
              [Canola].Leaf.CoverGreen
              [Canola].Leaf.CoverTotal
              [Canola].Leaf.Dead.N
              [Canola].Leaf.Dead.NConc
              [Canola].Leaf.Dead.Wt
              [Canola].Leaf.DeadCohortNo
              [Canola].Leaf.GreenCohortNo
              [Canola].Leaf.SenescingCohortNo
              [Canola].Leaf.ExpandedCohortNo
              [Canola].Leaf.Fn
              [Canola].Leaf.Fw
              [Canola].Leaf.Height
              [Canola].Leaf.InitialisedCohortNo
              [Canola].Leaf.LAI
              [Canola].Leaf.Live.N
              [Canola].Leaf.Live.NConc
              [Canola].Leaf.Live.Wt
              [Canola].Leaf.SpecificArea
              [Canola].Leaf.Transpiration
              [Canola].Phenology.CurrentPhase.Name
              [Canola].Phenology.CurrentStageName
              [Canola].Phenology.Photoperiod
              [Canola].Phenology.Stage
              [Canola].Phenology.ThermalTime
              [Canola].Phenology.ThermalTime
              [Canola].Root.Depth
              [Canola].Root.N
              [Canola].Root.Wt
              [Canola].Root.NConc
              [Canola].Root.WaterUptake
              [Canola].Stem.N
              [Canola].Stem.NConc
              [Canola].Stem.Wt
              [Canola].Stem.Live.StorageWt
              [Canola].SowingData.Cultivar
              [Canola].Structure.Height
              [Canola].Structure.LeafTipsAppeared
              [Canola].Structure.MainStemPopn
              [Canola].Structure.TotalStemPopn
              [SurfaceOrganicMatter].Wt
              sum([Soil].NO3.kgha) as TotalSoilNitrogen
              [Canola].Phenology.MaturityDAS
              [Canola].Phenology.PhotoPeriod
              [Canola].Phenology.Stage
              [Clock].Today.Year
          Report HarvestReport: EventNames=[canola].Harvesting
            VariableNames:
              [Clock].Today
              [canola].SowingDate
              [canola].SowingData.Cultivar
              [canola].Phenology.CurrentStageName
              [canola].Phenology.EmergenceDAS
              [canola].Phenology.FloralInitiationDAS
              [canola].Phenology.GreenBudDAS
              [canola].Phenology.StartFloweringDAS
              [canola].Phenology.CumulativeVernalTime
              [canola].Grain.Wt
          Soil: ASCOrder=Deep sandy duplex (Kojonup C2 No1146); SoilType=sand; Site=Kojonup; NearestTown=Kojonup; Region=Southern Region; State=Western Australia; Country=Australia; ApsoilNumber=1146; Latitude=-34.157; Longitude=117.127; LocationAccuracy=+/- 20m; YearOfSampling=2015; DataSource=Rob Summers DAFWA
            Comments=C2 - SBDiff4 - Deep sandy duplex - clay @60cm  Modified by Julianne to match Kojonup measurments at sowing 2013  Deep sandy duplex (Kojonup C2 No1146)
            Physical
              Thickness  ParticleSizeSand  ParticleSizeSilt  ParticleSizeClay  BD      AirDry  LL15   DUL     SAT
              100        81.79             7.1               11.11             1.2     0.0219  0.04   0.2365  0.5395
              100        87.28             5.9               6.83              1.6176  0.0349  0.05   0.1461  0.3596
              100        87.28             5.9               6.83              1.6176  0.035   0.05   0.1461  0.3596
              100        89.23             3.93              6.84              1.6176  0.035   0.05   0.1461  0.34
              100        89.23             3.93              6.84              1.6176  0.035   0.07   0.188   0.3
              100        89.23             3.93              6.84              1.618   0.06    0.078  0.1878  0.3
              100        89.3              1.95              8.75              1.618   0.09    0.11   0.1878  0.3
              100        89.3              1.95              8.75              1.618   0.09    0.13   0.22    0.33
              400        89.3              1.95              8.75              1.618   0.09    0.19   0.3     0.36
              BD source: Measured
              AirDry, LL15 source: Estimated based on local knowledge
              DUL source: Field measured and checked for sensibility
              SAT source: c_bd
              SoilCrop CanolaSoil: LL=[0.027, 0.044, 0.042, 0.044, 0.048, 0.078, 0.11, 0.13, 0.2]; KL=[0.06, 0.06, 0.06, 0.06, 0.06, 0.06, 0.04, 0.04, 0.04]; XF=[1, 1, 1, 1, 1, 1, 1, 1, 1]
            WaterBalance SoilWater: SummerDate=1-Nov; SummerU=6; SummerCona=3.5; WinterDate=1-Apr; WinterU=2; WinterCona=2; DiffusConst=88; DiffusSlope=35; Salb=0.12; CN2Bare=73; CNRed=20; CNCov=0.8; PSIDul=-100; Thickness=[100, 100, 100, 100, 100, 100, 100, 100, 100, 100]; SWCON=[0.7, 0.7, 0.7, 0.7, 0.7, 0.5, 0.5, 0.5, 0.5, 0.5]
            Organic: FOMCNRatio=40; CarbonUnits=Total
              Thickness  Carbon  SoilCNRatio  FBiom  FInert  FOM
              100        3.029   12           0.035  0.4     543.7302
              200        0.923   12           0.02   0.5     298.4055
              300        0.364   12           0.02   0.7     121.3226
              400        0.26    12           0.015  0.7     36.5417
              200        0.26    12           0.015  0.7     12
            Chemical: PHUnits=Water
              Thickness  PH   EC     ESP
              100        5    0.144  0.0442
              100        4.9  0.049  0.0479
              200        5    0.047  0.0719
              200        5.4  0.041  0.075
              200        5.7  -      -
              200        5.6  -      -
              200        5.6  -      -
              EC, ESP, PH source: Measured
            Water: Thickness=[100, 100, 200, 200, 200, 200, 200]; InitialValues=[0.1504, 0.1354, 0.1354, 0.165, 0.2308, 0.2942, 0.2993]; FilledFromTop=false
            Nutrient
            Solute NO3: Thickness=[100, 100, 200, 200, 200, 200, 200]; InitialValues=[20, 10, 5, 2, 1, 1, 1]; InitialValuesUnits=ppm; WaterTableConcentration=0; D0=0; DepthConstant=0; MaxDepthSoluteAccessible=0; RunoffEffectivenessAtMovingSolute=0; MaxEffectiveRunoff=0
            Solute NH4: Thickness=[100, 100, 200, 200, 200, 200, 200]; InitialValues=[1, 1, 1, 1, 1, 1, 1]; InitialValuesUnits=ppm; WaterTableConcentration=0; D0=0; DepthConstant=0; MaxDepthSoluteAccessible=0; RunoffEffectivenessAtMovingSolute=0; MaxEffectiveRunoff=0
            Solute Urea: Thickness=[100, 100, 200, 200, 200, 200, 200]; InitialValues=[0, 0, 0, 0, 0, 0, 0]; InitialValuesUnits=kg/ha; WaterTableConcentration=0; D0=0; DepthConstant=0; MaxDepthSoluteAccessible=0; RunoffEffectivenessAtMovingSolute=0; MaxEffectiveRunoff=0
            SoilTemperature Temperature: InteractionsPerDay=8
          Manager Fertilise at sowing
            Crop = [canola]
            FertiliserType = NH4N
            Amount = 0
```csharp
using Models.Soils;
using System;
using Models.Core;
using Models.PMF;
namespace Models
{
    [Serializable]
    public class Script : Model
    {
        [Link] Clock Clock;
        [Link] Fertiliser Fertiliser;
        [Link] Summary summary;

        [Description("Crop to be fertilised")]
        public IPlant Crop { get; set; }

        [Description("Type of fertiliser to apply? ")] 
        [Display(Type = DisplayType.FertiliserType)]public string FertiliserType { get; set; }

        [Description("Amount of fertiliser to be applied (kg/ha)")]
        public double Amount { get; set; }

        [EventSubscribe("Sowing")]
        public void OnSowing(object sender, EventArgs e)
        {
            Model crop = sender as Model;
            if (Crop != null && crop.Name.ToLower() == (Crop as IModel).Name.ToLower())
                Fertiliser.Apply(amount: Amount, type: FertiliserType);  //"NO3N"
        }

    }
}
```
          Manager SowingRule
            SowDate = 10-May
            CultivarName = Hyola575_CL
            SowingDepth = 20
            RowSpacing = 250
            Population = 68
```csharp
using APSIM.Shared.Utilities;
using Models.Utilities;
using Models.Soils;
using Models.PMF;
using Models.Core;
using System;

namespace Models
{
    [Serializable]
    public class Script : Model
    {
        [Link] Clock Clock;
        [Link] Fertiliser Fertiliser;
        [Link] Summary Summary;
        [Link] Plant Canola;
        [Link] Soil Soil;
        Accumulator accumulatedRain;
        
        [Description("Sowing date (d-mmm)")]
        public string SowDate { get; set; }
        [Description("Cultivar to be sown")]
        public string CultivarName { get; set; }
        [Description("Sowing depth (mm)")]
        public double SowingDepth { get; set; }
        [Description("Row spacing (mm)")]
        public double RowSpacing { get; set; }
        [Description("Plant population (/m2)")]
        public double Population { get; set; }
      
        


        [EventSubscribe("DoManagement")]
        private void OnDoManagement(object sender, EventArgs e)
        {
            if (DateUtilities.DatesAreEqual(SowDate, Clock.Today))
            {
                Canola.Sow(population: Population, cultivar: CultivarName, depth: SowingDepth, rowSpacing: RowSpacing);    
            }
        
        }
        
    }
}
```
          Manager Reset on date
            ResetDate = 9-May
            ResetWater = Yes
            ResetN = Yes
            ResetSOM = No
```csharp
using Models.Interfaces;
using System;
using Models.Core;
using Models.PMF;
using Models.Soils;
using Models.Utilities;
using Models.Surface;
using APSIM.Shared.Utilities;
using Models.Soils.Nutrients;

namespace Models
{
    [Serializable]
    public class Script : Model
    {
        [Link] private Clock Clock;
        [Link] private Plant Wheat;
        [Link] private ISoilWater SoilWater;
        [Link] private INutrient SoilN;
        [Link] private SurfaceOrganicMatter SOM;
        [Link] private Summary summary;

        [Description("Date to reset on:")]
        public string ResetDate {get;set;}

        [Description("Reset Water?")]
        public string ResetWater {get;set;}

        [Description("Reset Nitrogen?")]
        public string ResetN {get;set;}

        [Description("Reset Surface Organic Matter?")]
        public string ResetSOM {get;set;}

        [EventSubscribe("DoManagement")]
        private void OnDoManagement(object sender, EventArgs e)
        {
            if (DateUtilities.WithinDates(ResetDate, Clock.Today, ResetDate))
            {
                if (ResetWater == "Yes")
                {
                    summary.WriteMessage(this, "Reset Water", MessageType.Diagnostic);
                    SoilWater.Reset();
                }
                if (ResetN == "Yes")
                {
                    summary.WriteMessage(this, "Reset Nitrogen", MessageType.Diagnostic);
                    SoilN.Reset();
                }
                if (ResetSOM == "Yes")
                {
                    summary.WriteMessage(this, "Reset Surface OM", MessageType.Diagnostic);
                    SOM.Reset();
                }
            }
        }
    }
}
```
          Manager Fertilise on fixed dates
            FertiliserType = UreaN
            FertiliserDates = 18-Jun, 14-Aug
            Amount = 0
            AmountType = True
```csharp
using Models.Soils;
using System;
using Models.Core;
using Models.PMF;
using APSIM.Shared.Utilities;
namespace Models
{
    [Serializable]
    public class Script : Model
    {
        [Link] Clock Clock;
        [Link] Fertiliser Fertiliser;
        
        [Separator("A component to apply fertiliser on one or more dates on every year of the simulation")]

        [Description("Type of fertiliser to apply? ")] [Display(Type = DisplayType.FertiliserType)]public string FertiliserType { get; set; }

        [Description("Enter the fertilisation dates as dd-mmm with comma separation (any year information entered will be ignored): ")] public string[] FertiliserDates { get; set; } 

        [Description("Amount of fertiliser to be applied (kg /ha)")] public double Amount { get; set; }

        [Description("Is the above amount to be applied each time? (yes/ticked)? Or is it the total annual amount across all dates (no/unticked)")] public bool AmountType { get; set; }
        
        [EventSubscribe("DoManagement")]
        private void OnDoManagement(object sender, EventArgs e)
        {
            foreach (string ddMMM in FertiliserDates)
            {
                if (DateUtilities.DatesEqual(ddMMM, Clock.Today))
                {
                    if (AmountType)
                        Fertiliser.Apply(amount: Amount, type: FertiliserType);
                    else
                        Fertiliser.Apply(amount: Amount / FertiliserDates.Length, type: FertiliserType);
                }
            }
        }
    }
}
```
          Manager HarvestAfterDate
            HarvestDate = 20-Nov
```csharp
using Models.Soils;
using System;
using Models.Core;
using System.Text;
using Models.PMF;
using Models;
using APSIM.Shared.Utilities;
using Models.PMF.Phen;

namespace Models
{
    [Serializable] 
    public class Script : Model
    {
        [Link] ISummary summary;
        [Link] private Plant canola;
        [Link(Type = LinkType.Path, Path = "[canola].Phenology")]
        private Phenology phenology;
                [Link] Clock Clock;

        private bool Harvestable = false;

        [Description("Harvest Date (d-mmm)")]
        public string HarvestDate { get; set; }   
      
        [EventSubscribe("DoManagement")]
        private void OnDoManagement(object sender, EventArgs e)
        {
           
            if (Harvestable && phenology.CurrentPhase.Name == "ReadyForHarvesting")
            {
                canola.Harvest();
                canola.EndCrop();                
            }
            
            if (DateUtilities.DatesAreEqual(HarvestDate, Clock.Today))
                Harvestable = true;

        }
    }
}
```
          Report SowingReport: EventNames=[Canola].Sowing
            VariableNames:
              [Clock].Today
              [Canola].SowingData.Cultivar
              [IWeather].Latitude
              [IWeather].Longitude
          Report DamageFunctionHarvestReport: same as Replacements.DamageFunctionHarvestReport
          Report HarvestReport1: same as Replacements.HarvestReport
  Folder Wagga
    Experiment Wagga2008
      Memo
        McCormick et al 2012. irrigated experiment,3 cultivars, 3 densities, grazed and ungrazed
      Factors
        Permutation
          Factor Cv: Specification=[SowingRule].Script.CultivarName=AV_Garnet,ATR_Marlin,46Y78
          Memo Memo1
            [#SowingRule].Script.CultivarName=AV_Garnet,ATR_Marlin,46Y78

            Next Gen needs parameters for all 3 - possibly not correct, but placeholders there
          Factor Treat
            CompositeFactor Low
              Specifications:
                [SowingRule].Script.SowDate=29-Apr
                [SowingRule].Script.Population =  27
            CompositeFactor Mid
              Specifications:
                [SowingRule].Script.SowDate=29-Apr
                [SowingRule].Script.Population =  48
            CompositeFactor High
              Specifications:
                [SowingRule].Script.SowDate=29-Apr
                [SowingRule].Script.Population =  67
            CompositeFactor Late
              Specifications:
                [SowingRule].Script.SowDate=8-May
                [SowingRule].Script.Population =  48
                [SowingRule].Script.SowingDepth =  35
      Simulation WaggaWagga2008
        Clock: Start=2007-11-12; End=2008-12-31
        Summary summaryfile
        Weather: FileName=met/wagga_-35.05_147.30.met
        SoilArbitrator
        MicroClimate: a_interception=0; b_interception=1; c_interception=0; d_interception=0; SoilHeatFluxFraction=0.4; MinimumHeightDiffForNewLayer=0; NightInterceptionFraction=0.5; ReferenceHeight=2
        Zone Paddock: Area=1; Slope=0; AspectAngle=0; Altitude=50
          Irrigation
          Fertiliser
          SurfaceOrganicMatter: InitialResidueName=wheat_stubble; InitialResidueType=wheat; InitialResidueMass=1000; InitialStandingFraction=0; InitialCPR=0; InitialCNR=80
          Plant Canola
          Manager
```csharp
using Models.Soils;
using System;
using Models.Core;
using Models.PMF;
namespace Models
{
    [Serializable]
    [System.Xml.Serialization.XmlInclude(typeof(Model))]
    public class Script : Model
    {
        [Link] Clock Clock;

        [EventSubscribe("StartOfSimulation")]
        private void OnSimulationCommencing(object sender, EventArgs e)
        {
            /*
                
                 dateset = 0
                 emer_date = 0
                 endjuv_date = 0
                 anth_date = 0
                 mat_date = 0
                 event = 0
                 cum_temp = 0
                 cum_swdef = 0
                 cum_days = 0
            
            */
        }
        [EventSubscribe("DoManagement")]
        private void OnDoManagement(object sender, EventArgs e)
        {
            /*
                
               if (daysaftersowing = 1) then
                  cum_temp = 0
                  cum_swdef = 0
                  cum_days = 0
               elseif (stagename = 'start_grain_fill' or
                             stagename = 'end_grain_fill' or
                             stagename = 'maturity' or
                             stagename = 'harvest_ripe') then
                  cum_temp = cum_temp + (maxt + mint) / 2
                  cum_swdef = cum_swdef + swdef_photo
                  cum_days = cum_days + 1
               endif
               ! calculate canola oil content
               if (cum_days > 0) then
                  avg_temp = cum_temp / cum_days
                  avg_swdef = cum_swdef / cum_days
                  if (avg_temp <= 14) then
                     oil_conc =  47
                  else
                     oil_conc = (47 - ((avg_temp - 14)*1.21)) - (1.91*(1 - avg_swdef^2))
                  endif
               else
                  oil_conc = 0
               endif
            if (canola.stagename = 'harvest_ripe' or canola.plant_status = 'dead') then
               canola harvest
               canola kill_crop
               canola end_crop
               dateset = 0
            endif
            
            */
        }
    }
}
```
          Manager SowingRule
            SowDate = 29-Apr
            CultivarName = AV_Garnet
            SowingDepth = 25
            RowSpacing = 180
            Population = 45
```csharp
using APSIM.Shared.Utilities;
using Models.Utilities;
using Models.Soils;
using Models.PMF;
using Models.Core;
using System;

namespace Models
{
    [Serializable]
    public class Script : Model
    {
        [Link] Clock Clock;
        [Link] Fertiliser Fertiliser;
        [Link] Summary Summary;
        [Link] Soil Soil;
        [Link] Plant Canola;
        Accumulator accumulatedRain;
        
        [Description("Sowing date (d-mmm)")]
        public string SowDate { get; set; }
        [Description("Cultivar to be sown")]
        public string CultivarName { get; set; }
        [Description("Sowing depth (mm)")]
        public double SowingDepth { get; set; }
        [Description("Row spacing (mm)")]
        public double RowSpacing { get; set; }
        [Description("Plant population (/m2)")]
        public double Population { get; set; }
        


        [EventSubscribe("DoManagement")]
        private void OnDoManagement(object sender, EventArgs e)
        {
            if (DateUtilities.WithinDates(SowDate, Clock.Today, SowDate))
            {
                Canola.Sow(population: Population, cultivar: CultivarName, depth: SowingDepth, rowSpacing: RowSpacing);    
            }
        
        }
        
    }
}
```
          Manager Fertilise at sowing
            Crop = [Canola]
            FertiliserType = NH4N
            Amount = 31
```csharp
using Models.Soils;
using System;
using Models.Core;
using Models.PMF;
namespace Models
{
    [Serializable]
    public class Script : Model
    {
        [Link] Clock Clock;
        [Link] Fertiliser Fertiliser;
        
        [Description("Crop to be fertilised")]
        public IPlant Crop { get; set; }

        [Description("Type of fertiliser to apply? ")] 
        [Display(Type = DisplayType.FertiliserType)]public string FertiliserType { get; set; }
    
        [Description("Amount of fertiliser to be applied (kg/ha)")]
        public double Amount { get; set; }
        
        [EventSubscribe("Sowing")]
        private void OnSowing(object sender, EventArgs e)
        {
            Model crop = sender as Model;
            if (Crop != null && crop.Name.ToLower() == (Crop as IModel).Name.ToLower())
                Fertiliser.Apply(amount: Amount, type: FertiliserType);
        }
    }
}
```
          Manager Irrigate
            irrigDates = 27-Apr, 3-jun, 18-sep
            amount = 50
```csharp
using Models.Soils;
using System;
using Models.Core;
using APSIM.Shared.Utilities;
namespace Models
{
    [Serializable]
    [System.Xml.Serialization.XmlInclude(typeof(Model))]
    public class Script : Model
    {
        [Link] Clock clock;    
           [Link] Irrigation irrigation;

           [Description("Dates for irrigation")] 
        public string[] irrigDates { get; set; }

        [Description("Amount of each irrigation (mm)")]
        public double amount {get; set; }

        [EventSubscribe("DoManagement")]
        private void OnDoManagement(object sender, EventArgs e)
        {
            foreach (string ddMMM in irrigDates)
            {
                if (DateUtilities.DatesEqual(ddMMM, clock.Today))
                    irrigation.Apply(amount: amount);
            }
        }
    }
}
```
          Soil: SoilType=sand; Site=CSU; NearestTown=Wagga Wagga; Region=Southern NSW; State=NSW; Latitude=0; Longitude=0; YearOfSampling=0; DataSource=Kirsten Verburg; Comments=Greenethorpe
            Chemical: PHUnits=Water
              Thickness=[100, 100, 100, 100, 100, 100, 100, 100, 100, 100, 100, 100, 100, 100, 100, 100, 100, 100, 100, 100]
              PH=[5.8, 5.9, 6.6, 6.8, 7, 7.1, 7.2, 7.3, 7.4, 7.4, 7.6, 7.8, 8, 8.2, 8.3, 8.4, 8.4, 8.5, 8.5, 8.5]
            Water: FilledFromTop=false
              Thickness=[100, 100, 100, 100, 100, 100, 100, 100, 100, 100, 100, 100, 100, 100, 100, 100, 100, 100, 100, 100]
              InitialValues=[0.127, 0.135, 0.151, 0.172, 0.19, 0.19, 0.219, 0.219, 0.247, 0.247, 0.265, 0.265, 0.275, 0.275, 0.285, 0.285, 0.285, 0.285, 0.285, 0.285]
            Physical
              Thickness  BD    AirDry  LL15  DUL   SAT
              100        1.48  0.03    0.11  0.28  0.34
              100        1.49  0.12    0.12  0.27  0.34
              100        1.41  0.14    0.14  0.25  0.32
              100        1.37  0.16    0.16  0.28  0.35
              100        1.41  0.18    0.18  0.28  0.35
              100        1.41  0.18    0.18  0.28  0.35
              100        1.52  0.21    0.21  0.3   0.34
              100        1.52  0.21    0.21  0.3   0.34
              100        1.62  0.24    0.24  0.31  0.33
              100        1.62  0.24    0.24  0.31  0.33
              100        1.66  0.26    0.26  0.31  0.34
              100        1.66  0.26    0.26  0.31  0.34
              100        1.62  0.27    0.27  0.32  0.34
              100        1.62  0.27    0.27  0.32  0.34
              100        1.62  0.28    0.28  0.33  0.36
              100        1.62  0.28    0.28  0.33  0.36
              100        1.62  0.28    0.28  0.33  0.36
              100        1.62  0.28    0.28  0.33  0.36
              100        1.62  0.28    0.28  0.33  0.36
              100        1.62  0.28    0.28  0.33  0.36
              SoilCrop CanolaSoil
                LL=[0.11, 0.12, 0.14, 0.16, 0.18, 0.18, 0.21, 0.21, 0.24, 0.24, 0.26, 0.26, 0.27, 0.27, 0.28, 0.28, 0.28, 0.28, 0.28, 0.28]
                KL=[0.06, 0.05, 0.05, 0.04, 0.04, 0.04, 0.04, 0.03, 0.03, 0.03, 0.03, 0.02, 0.02, 0.02, 0.01, 0.01, 0.01, 0.01, 0, 0]
                XF=[1, 1, 1, 1, 1, 1, 1, 1, 1, 1, 1, 1, 1, 1, 1, 1, 0.8, 0.4, 0, 0]
            WaterBalance SoilWater: SummerDate=1-nov; SummerU=6; SummerCona=3.5; WinterDate=1-apr; WinterU=2; WinterCona=2; DiffusConst=44; DiffusSlope=16; Salb=0.13; CN2Bare=72; CNRed=20; CNCov=0.8; DischargeWidth=5; CatchmentArea=10; PSIDul=-100
              Thickness=[100, 100, 100, 100, 100, 100, 100, 100, 100, 100, 100, 100, 100, 100, 100, 100, 100, 100, 100, 100]
              SWCON=[0.8, 0.8, 0.8, 0.8, 0.8, 0.8, 0.8, 0.8, 0.8, 0.8, 0.8, 0.8, 0.8, 0.8, 0.8, 0.8, 0.6, 0.6, 0.6, 0.6]
            Organic: FOMCNRatio=60; CarbonUnits=Total
              Thickness  Carbon  SoilCNRatio  FBiom  FInert  FOM
              100        0.83    8            0.06   0.01    439.771
              100        0.35    8            0.05   0.01    378.5144
              100        0.33    8            0.04   0.31    325.7904
              100        0.22    8            0.03   0.35    280.4104
              100        0.22    8            0.02   0.4     241.3514
              100        0.22    8            0.01   0.45    207.7331
              100        0.19    8            0.01   0.5     178.7975
              100        0.17    8            0.01   0.6     153.8925
              100        0.15    8            0.01   0.7     132.4565
              100        0.12    8            0.01   0.8     114.0063
              100        0.11    8            0.01   0.9     98.1262
              100        0.1     8            0.01   0.99    84.458
              100        0.1     8            0.01   0.99    72.6937
              100        0.1     8            0.01   0.99    62.568
              100        0.1     8            0.01   0.99    53.8528
              100        0.1     8            0.01   0.99    46.3515
              100        0.08    8            0.01   0.99    39.8951
              100        0.06    8            0.01   0.99    34.3381
              100        0.05    8            0.01   0.99    29.555
              100        0.04    8            0.01   0.99    25.4383
            Nutrient
            Solute NO3: InitialValuesUnits=ppm; WaterTableConcentration=0; D0=0; DepthConstant=0; MaxDepthSoluteAccessible=0; RunoffEffectivenessAtMovingSolute=0; MaxEffectiveRunoff=0
              Thickness=[100, 100, 100, 100, 100, 100, 100, 100, 100, 100, 100, 100, 100, 100, 100, 100, 100, 100, 100, 100]
              InitialValues=[20.1, 6.88, 2.8, 2.8, 1.32, 1.32, 0.9, 0.9, 0.58, 0.58, 0.46, 0.46, 0.47, 0.47, 0.56, 0.56, 0.79, 0.79, 0.95, 0.95]
            Solute NH4: InitialValuesUnits=ppm; WaterTableConcentration=0; D0=0; DepthConstant=0; MaxDepthSoluteAccessible=0; RunoffEffectivenessAtMovingSolute=0; MaxEffectiveRunoff=0
              Thickness=[100, 100, 100, 100, 100, 100, 100, 100, 100, 100, 100, 100, 100, 100, 100, 100, 100, 100, 100, 100]
              InitialValues=[1.65, 0.21, 0.14, 0.14, 0.1, 0.1, 0.1, 0.1, 0.12, 0.12, 0.13, 0.13, 0.14, 0.14, 0.14, 0.14, 0.09, 0.09, 0.14, 0.14]
            Solute Urea: InitialValuesUnits=kg/ha; WaterTableConcentration=0; D0=0; DepthConstant=0; MaxDepthSoluteAccessible=0; RunoffEffectivenessAtMovingSolute=0; MaxEffectiveRunoff=0
              Thickness=[100, 100, 100, 100, 100, 100, 100, 100, 100, 100, 100, 100, 100, 100, 100, 100, 100, 100, 100, 100]
              InitialValues=[0, 0, 0, 0, 0, 0, 0, 0, 0, 0, 0, 0, 0, 0, 0, 0, 0, 0, 0, 0]
            SoilTemperature Temperature: InteractionsPerDay=8
          Report DailyReport
          Report HarvestReport
          Report DailyBiomass: EventNames=[Clock].DoReport
            VariableNames:
              [Clock].Today
              [canola].AboveGround.Wt
              [Canola].AboveGroundLive.Wt
              [canola].Population
              [canola].AboveGround.NConc
              [canola].Grain.Wt
              [canola].Grain.Size
              [canola].Grain.Total.Wt
              [canola].Grain.N
              [canola].Grain.NConc
              [canola].Grain.Number
              [Canola].LAI
              [canola].Stem.Live.Wt
              [canola].Leaf.Live.Wt
              [canola].Stem.Wt
              [canola].Leaf.Wt
              [canola].Phenology.CurrentStageName
              [canola].Phenology.Stage
          Report SowingReport: EventNames=[Canola].Sowing
            VariableNames:
              [Clock].Today
              [Canola].SowingData.Cultivar
              [IWeather].Latitude
              [IWeather].Longitude
          Manager HarvestAfterDate
            HarvestDate = 11-Nov-2008
```csharp
using Models.Soils;
using System;
using Models.Core;
using System.Text;
using Models.PMF;
using Models;
using APSIM.Shared.Utilities;
using Models.PMF.Phen;

namespace Models
{
    [Serializable] 
    public class Script : Model
    {
        [Link] ISummary summary;
        [Link] private Plant canola;
        [Link(Type = LinkType.Path, Path = "[canola].Phenology")]
        private Phenology phenology;
                [Link] Clock Clock;

        private bool Harvestable = false;

        [Description("Harvest Date (d-mmm-yyyy)")]
        public string HarvestDate { get; set; }   
      
        [EventSubscribe("DoManagement")]
        private void OnDoManagement(object sender, EventArgs e)
        {
           
            if (Harvestable && phenology.CurrentPhase.Name == "ReadyForHarvesting")
            {
                canola.Harvest();
                canola.EndCrop();                
            }
            
            if (DateUtilities.DatesAreEqual(HarvestDate, Clock.Today))
                Harvestable = true;

        }
    }
}
```
          Report DamageFunctionHarvestReport: same as Replacements.DamageFunctionHarvestReport
  Folder Greenthorpe
    Experiment Greenethorpe2013_Ex1
      Factors
        Permutation
          Factor Cv: Specification=[SowingRule].Script.CultivarName=Hyola971_CL
          Memo
            [#SowingRule].Script.CultivarName=Archer,ATR_Wahoo,
            [#SowingRule].Script.CultivarName=44Y90_CL,45Y91_CL,Archer,Arazzo,ATR_Bonito,ATR_Stingray,ATR_Wahoo,AV_Zircon,Diamond,K50055,Sensation,Victory_7001_CL
      Simulation Greenethorpe2013_Ex1
        Clock: Start=2013-02-19; End=2013-12-31
        Summary summaryfile
        Weather: FileName=met/greenethorpe_min_adjusted_LT_new1.met
        SoilArbitrator
        MicroClimate: a_interception=0; b_interception=1; c_interception=0; d_interception=0; SoilHeatFluxFraction=0.4; MinimumHeightDiffForNewLayer=0; NightInterceptionFraction=0.5; ReferenceHeight=2
        Zone Paddock: Area=1; Slope=0; AspectAngle=0; Altitude=50
          Irrigation
          Fertiliser
          SurfaceOrganicMatter: InitialResidueName=wheat_stubble; InitialResidueType=wheat; InitialResidueMass=1000; InitialStandingFraction=0; InitialCPR=0; InitialCNR=80
          Plant Canola
          Manager: same as Wagga.Wagga2008.WaggaWagga2008.Paddock.manager
          Manager SowingRule
            SowDate = 25-Mar
            CultivarName = Hyola971_CL
            SowingDepth = 30
            RowSpacing = 230
            Population = 40
            script: same as in Wagga.Wagga2008.WaggaWagga2008.Paddock.SowingRule
          Manager Fertilise at sowing
            Crop = [Canola]
            FertiliserType = NH4N
            Amount = 35
            script: same as in Wagga.Wagga2008.WaggaWagga2008.Paddock.Fertilise at sowing
          Soil: SoilType=Greenethorpe; Site=Front paddock; NearestTown=Young; Region=Southern NSW; State=NSW; Latitude=0; Longitude=0; YearOfSampling=0; DataSource=Kirkegaard/Lilley
            Chemical: same as Wagga.Wagga2008.WaggaWagga2008.Paddock.Soil.Chemical
            Physical
              Thickness  BD    AirDry  LL15   DUL    SAT
              100        1.45  0.04    0.1    0.225  0.433
              100        1.5   0.04    0.138  0.237  0.414
              100        1.55  0.04    0.161  0.262  0.395
              100        1.5   0.053   0.161  0.286  0.414
              100        1.53  0.066   0.224  0.338  0.406
              100        1.55  0.079   0.227  0.358  0.395
              100        1.58  0.077   0.263  0.354  0.388
              100        1.6   0.075   0.264  0.34   0.376
              100        1.63  0.09    0.264  0.338  0.369
              100        1.65  0.106   0.264  0.346  0.357
              100        1.63  0.106   0.264  0.347  0.369
              100        1.6   0.106   0.266  0.353  0.376
              100        1.58  0.107   0.276  0.356  0.384
              100        1.55  0.109   0.271  0.351  0.395
              100        1.55  0.102   0.252  0.343  0.395
              100        1.55  0.095   0.252  0.339  0.395
              100        1.55  0.088   0.189  0.336  0.395
              100        1.55  0.081   0.189  0.324  0.395
              100        1.55  0.074   0.186  0.324  0.395
              100        1.55  0.068   0.186  0.324  0.395
              SoilCrop CanolaSoil
                LL=[0.1, 0.138, 0.161, 0.161, 0.224, 0.227, 0.263, 0.264, 0.264, 0.264, 0.264, 0.266, 0.276, 0.271, 0.252, 0.252, 0.189, 0.189, 0.186, 0.186]
                KL=[0.08, 0.08, 0.06, 0.06, 0.05, 0.04, 0.04, 0.04, 0.04, 0.04, 0.04, 0.03, 0.03, 0.02, 0.02, 0.01, 0.01, 0.01, 0.01, 0.01]
                XF=[1, 1, 1, 1, 1, 1, 1, 1, 1, 1, 1, 1, 1, 1, 1, 0.7, 0.5, 0.2, 0, 0]
            WaterBalance SoilWater: same as Wagga.Wagga2008.WaggaWagga2008.Paddock.Soil.SoilWater
            Organic: same as Wagga.Wagga2008.WaggaWagga2008.Paddock.Soil.Organic
            Nutrient
            Water: FilledFromTop=true
              Thickness=[100, 100, 100, 100, 100, 100, 100, 100, 100, 100, 100, 100, 100, 100, 100, 100, 100, 100, 100, 100]
              InitialValues=[0.225, 0.237, 0.262, 0.286, 0.338, 0.358, 0.354, 0.34, 0.338, 0.346, 0.347, 0.353, 0.356, 0.351, 0.277564, 0.252, 0.189, 0.189, 0.186, 0.186]
            Solute NO3: same as Wagga.Wagga2008.WaggaWagga2008.Paddock.Soil.NO3
            Solute NH4: same as Wagga.Wagga2008.WaggaWagga2008.Paddock.Soil.NH4
            Solute Urea: same as Wagga.Wagga2008.WaggaWagga2008.Paddock.Soil.Urea
            SoilTemperature Temperature: InteractionsPerDay=8
          Manager Fertilise on fixed dates
            FertiliserType = UreaN
            FertiliserDates = 30-mar
            Amount = 150
            AmountType = False
            script: same as in Kojonup.Kojonup2013.Kojonup2013Base.paddock.Fertilise on fixed dates
          Manager Fertilise on fixed dates1
            FertiliserType = UreaN
            FertiliserDates = 30-jul
            Amount = 100
            AmountType = False
            script: same as in Kojonup.Kojonup2013.Kojonup2013Base.paddock.Fertilise on fixed dates
          Report DailyReport
          Report HarvestReport
          Manager HarvestAfterDate
            HarvestDate = 4-Nov
            script: same as in Kojonup.Kojonup2013.Kojonup2013Base.paddock.HarvestAfterDate
          Report SowingReport: EventNames=[Canola].Sowing
            VariableNames:
              [Clock].Today
              [Canola].SowingData.Cultivar
              [IWeather].Latitude
              [IWeather].Longitude
          Manager codes
            location = Greenethorpe
            TOS = 1-Apr
```csharp
using Models.Soils;
using System;
using Models.Core;
using Models.PMF;
namespace Models
{
    [Serializable]
    [System.Xml.Serialization.XmlInclude(typeof(Model))]
    public class Script : Model
    {
        [Link] Clock Clock;

        [Description("location")]
        public string location { get; set; }

        [Description("Time of sowing")]
        public string TOS { get; set; }


        [EventSubscribe("StartOfSimulation")]
        private void OnSimulationCommencing(object sender, EventArgs e)
        {
          }
      

        }
    }
```
          Report DetailedReport: EventNames=[Clock].DoReport
            VariableNames:
              [Clock].Today
              [Canola].Phenology.CurrentStageName
              [Canola].Leaf.Wt
              [Canola].Leaf.N
              [Canola].Leaf.Total.StructuralWt
              [Canola].Leaf.Total.StructuralN
              [Canola].Leaf.Live.StructuralWt
              [Canola].Leaf.Live.StructuralN
              [Canola].Leaf.Live.Wt
              [Canola].Leaf.Live.StructuralWt
              [Canola].Leaf.Live.N
              [Canola].Leaf.Live.NConc
              [Canola].Leaf.NConc
              [Canola].Leaf.MinimumNConc
              [Canola].Leaf.CriticalNConc
              [Canola].Leaf.MaximumNConc
              [Canola].Leaf.Senesced.Wt
              [Canola].Leaf.LAI
              [Canola].Leaf.DMSupply.Fixation
              [Canola].Leaf.Transpiration
              [Canola].Stem.Wt
              [Canola].Stem.Live.Wt
              [Canola].Stem.Live.N
              [Canola].Stem.Total.StructuralWt
              [Canola].Stem.Total.StructuralN
              [Canola].Stem.Live.StructuralWt
              [Canola].Stem.Live.StructuralN
              [Canola].Stem.N
              [Canola].Stem.NConc
              [Canola].Stem.MinimumNConc
              [Canola].Stem.CriticalNConc
              [Canola].Stem.MaximumNConc
              [Canola].Shell.Wt
              [Canola].Shell.N
              [Canola].Shell.Total.StructuralWt
              [Canola].Shell.Total.StructuralN
              [Canola].Shell.Live.Wt
              [Canola].Shell.Live.N
              [Canola].Shell.Live.StructuralWt
              [Canola].Shell.Live.StructuralN
              [Canola].Shell.NConc
              [Canola].Shell.MinimumNConc
              [Canola].Shell.CriticalNConc
              [Canola].Shell.MaximumNConc
              [Canola].Shell.Area.Index
              [Canola].Shell.DMSupply.Fixation
              [Canola].Shell.EnergyBalance.Transpiration
              [Canola].Grain.Wt
              [Canola].Grain.N
              [Canola].Grain.NConc
              [Canola].Shell.Wt
              [Canola].Pod.Wt
              [Canola].Pod.N
              [Canola].Pod.NConc
              [Canola].Arbitrator.DM.TotalFixationSupply
              sum([Canola].Arbitrator.N.Fixation) as NFixed
              [Canola].Arbitrator.N.TotalPlantDemand
              [Canola].Arbitrator.N.TotalUptakeSupply
              [Canola].Arbitrator.DM.TotalPlantDemand
              [Canola].Leaf.DMDemand.Total
              [Canola].Stem.DMDemand.Total
              [Canola].Shell.DMDemand.Total
              [Canola].Grain.DMDemand.Total
              [Canola].Root.DMDemand.Total
              [Canola].Shell.EnergyBalance.CoverTotal
              [Canola].Leaf.CoverTotal
              [Canola].CoverTotal
          Report DamageFunctionHarvestReport: same as Replacements.DamageFunctionHarvestReport
    Experiment Greenethorpe2013_Ex2
      Factors
        Permutation
          Factor Cv: Specification=[SowingRule].Script.CultivarName=Hyola575_CL
          Memo
            [#SowingRule].Script.CultivarName=Archer,ATR_Wahoo,
            [#SowingRule].Script.CultivarName=44Y90_CL,45Y91_CL,Archer,Arazzo,ATR_Bonito,ATR_Stingray,ATR_Wahoo,AV_Zircon,Diamond,K50055,Sensation,Victory_7001_CL
      Simulation Greenethorpe2013_Ex2
        Clock: Start=2013-02-19; End=2013-12-31
        Summary summaryfile
        Weather: FileName=met/greenethorpe_min_adjusted_LT_new1.met
        SoilArbitrator
        MicroClimate: a_interception=0; b_interception=1; c_interception=0; d_interception=0; SoilHeatFluxFraction=0.4; MinimumHeightDiffForNewLayer=0; NightInterceptionFraction=0.5; ReferenceHeight=2
        Zone Paddock: Area=1; Slope=0; AspectAngle=0; Altitude=50
          Irrigation
          Fertiliser
          SurfaceOrganicMatter: InitialResidueName=wheat_stubble; InitialResidueType=wheat; InitialResidueMass=1000; InitialStandingFraction=0; InitialCPR=0; InitialCNR=80
          Plant Canola
          Manager: same as Wagga.Wagga2008.WaggaWagga2008.Paddock.manager
          Manager SowingRule
            SowDate = 23-Apr
            CultivarName = Hyola575_CL_GT
            SowingDepth = 30
            RowSpacing = 230
            Population = 35
            script: same as in Wagga.Wagga2008.WaggaWagga2008.Paddock.SowingRule
          Manager Fertilise at sowing: same as Greenthorpe.Greenethorpe2013_Ex1.Greenethorpe2013_Ex1.Paddock.Fertilise at sowing
          Soil: same as Greenthorpe.Greenethorpe2013_Ex1.Greenethorpe2013_Ex1.Paddock.Soil
          Manager Fertilise on fixed dates: same as Greenthorpe.Greenethorpe2013_Ex1.Greenethorpe2013_Ex1.Paddock.Fertilise on fixed dates
          Manager Fertilise on fixed dates1
            FertiliserType = UreaN
            FertiliserDates = 30-jul
            Amount = 50
            AmountType = False
            script: same as in Kojonup.Kojonup2013.Kojonup2013Base.paddock.Fertilise on fixed dates
          Report DailyReport: EventNames=[Clock].DoReport
            VariableNames:
              [Clock].Today
              [Canola].SowingData.Cultivar
              [Canola].Phenology.CurrentStageName
              [Weather].MeanT
              sum([Soil].Water.MM) as ProfileWater
              [Canola].AboveGround.Wt
              [Canola].AboveGroundLive.Wt
              [Canola].AboveGround.N
              [Canola].AboveGroundLive.N
              [Canola].AboveGroundLive.N*10 as UptakeNKgHA
              [canola].Grain.Wt
              [Canola].Grain.Live.Wt
              [Canola].Grain.N
              [Canola].Grain.NConc
              [Canola].Grain.Number
              [Canola].Grain.Size
              [Canola].Leaf.LAI
              [canola].Leaf.Live.Wt
              [canola].Leaf.Wt
              [canola].Leaf.SpecificArea
              [canola].Leaf.LiveNconc
              [canola].Leaf.Live.NConc
              [canola].Pod.NConc
              [Canola].Leaf.Dead.N
              [Canola].Leaf.Dead.NConc
              [Canola].Leaf.Dead.Wt
              [Canola].Leaf.Live.N
              [Canola].Leaf.Live.NConc
              [Canola].Root.Depth
              [Canola].Root.N
              [Canola].Root.Wt
              [Canola].Root.NConc
              [Canola].Root.WaterUptake
              [Canola].Stem.N
              [Canola].Stem.NConc
              [Canola].Stem.Wt
              [Canola].Stem.Live.StorageWt
              [Canola].Structure.Height
              [SurfaceOrganicMatter].Wt
              sum([Soil].NO3.kgha) as TotalSoilNitrogen
              [Canola].Phenology.Stage
              [Clock].Today.Year
              [Canola].Leaf.DeadCohortNo
              [Canola].Leaf.GreenCohortNo
              [Canola].Leaf.SenescingCohortNo
              [Canola].Leaf.ExpandedCohortNo
          Report HarvestReport: EventNames=[Canola].Harvesting
            VariableNames:
              [Clock].Today
              [Canola].SowingData.Cultivar
              [Canola].AboveGroundLive.Wt
              [Canola].Grain.Wt
              [Canola].Phenology.CurrentStageName
              [Soil].Water.Volumetric
              [Soil].Water.MM
              sum([Soil].Water.MM) as ProfileWater
              sum([Soil].NO3.kgha) as TotalSoilNitrogen
              [Canola].Phenology.MaturityDAS
              [Canola].Phenology.Stage
              [Clock].Today.Year
          Report SowingReport: EventNames=[Canola].Sowing
            VariableNames:
              [Clock].Today
              [Canola].SowingData.Cultivar
              [IWeather].Latitude
              [IWeather].Longitude
          Manager codes: same as Greenthorpe.Greenethorpe2013_Ex1.Greenethorpe2013_Ex1.Paddock.codes
          Manager HarvestAfterDate
            HarvestDate = 23-Oct
            script: same as in Kojonup.Kojonup2013.Kojonup2013Base.paddock.HarvestAfterDate
          Report DamageFunctionHarvestReport: same as Replacements.DamageFunctionHarvestReport
    Experiment Greenethorpe2014_Ex1
      Factors
        Permutation
          Factor Cv: Specification=[SowingRule].Script.CultivarName=Hyola971_CL
      Simulation Greenethorpe2014_Ex1
        Clock: Start=2014-03-10; End=2014-12-31
        Summary summaryfile
        Weather: FileName=met/greenethorpe_min_adjusted_LT_new1.met
        SoilArbitrator
        MicroClimate: a_interception=0; b_interception=1; c_interception=0; d_interception=0; SoilHeatFluxFraction=0.4; MinimumHeightDiffForNewLayer=0; NightInterceptionFraction=0.5; ReferenceHeight=2
        Zone Paddock: Area=1; Slope=0; AspectAngle=0; Altitude=50
          Irrigation
          Fertiliser
          SurfaceOrganicMatter: InitialResidueName=wheat_stubble; InitialResidueType=wheat; InitialResidueMass=1000; InitialStandingFraction=0; InitialCPR=0; InitialCNR=80
          Plant Canola
          Manager: same as Wagga.Wagga2008.WaggaWagga2008.Paddock.manager
          Manager Harvesting
```csharp
using Models.PMF.Phen;
using System;
using Models.Core;
using System.Collections.Generic;
using System.Text;
using Models.Soils;
using Models.PMF;
using Models;
using System.Xml.Serialization;
using APSIM.Shared.Utilities;

namespace Models
{
    [Serializable] 
    public class Script : Model
    {
        [Link] private Plant Canola;
        [Link(Type = LinkType.Path, Path = "[Canola].Phenology")]
        private Phenology phenology;
        [EventSubscribe("DoManagement")]
        private void OnDoManagement(object sender, EventArgs e)
        {
            if (phenology.CurrentPhase.Name == "Ripening")
            {
                Canola.Harvest();
                Canola.EndCrop();
            }
        }
    }
}
```
          Manager SowingRule
            SowDate = 15-mar
            CultivarName = Hyola971_CL
            SowingDepth = 30
            RowSpacing = 230
            Population = 40
            script: same as in Wagga.Wagga2008.WaggaWagga2008.Paddock.SowingRule
          Soil: SoilType=sand; LocalName=Greenethorpe; Site=Front paddock; NearestTown=Young; Region=Southern NSW; State=NSW; Latitude=0; Longitude=0; YearOfSampling=0; DataSource=Kirkegaard/Lilley
            Chemical: PHUnits=Water
              Thickness=[100, 100, 100, 100, 100, 100, 100, 100, 100, 100, 100, 100, 100, 100, 100, 100, 100, 100, 100, 1100]
              PH=[5.8, 5.9, 6.6, 6.8, 7, 7.1, 7.2, 7.3, 7.4, 7.4, 7.6, 7.8, 8, 8.2, 8.3, 8.4, 8.4, 8.5, 8.5, 8.5]
            Water: FilledFromTop=true
              Thickness=[100, 100, 100, 100, 100, 100, 100, 100, 100, 100, 100, 100, 100, 100, 100, 100, 100, 100, 100, 1100]
              InitialValues=[0.225, 0.237, 0.262, 0.286, 0.338, 0.358, 0.354, 0.34, 0.338, 0.346, 0.347, 0.353, 0.356, 0.351, 0.343, 0.339, 0.336, 0.324, 0.324, 0.216647]
            Physical
              Thickness  BD    AirDry  LL15   DUL    SAT
              100        1.45  0.04    0.1    0.225  0.433
              100        1.5   0.04    0.138  0.237  0.414
              100        1.55  0.04    0.161  0.262  0.395
              100        1.5   0.053   0.161  0.286  0.414
              100        1.53  0.066   0.224  0.338  0.406
              100        1.55  0.079   0.227  0.358  0.395
              100        1.58  0.077   0.263  0.354  0.388
              100        1.6   0.075   0.264  0.34   0.376
              100        1.63  0.09    0.264  0.338  0.369
              100        1.65  0.106   0.264  0.346  0.357
              100        1.63  0.106   0.264  0.347  0.369
              100        1.6   0.106   0.266  0.353  0.376
              100        1.58  0.107   0.276  0.356  0.384
              100        1.55  0.109   0.271  0.351  0.395
              100        1.55  0.102   0.252  0.343  0.395
              100        1.55  0.095   0.252  0.339  0.395
              100        1.55  0.088   0.189  0.336  0.395
              100        1.55  0.081   0.189  0.324  0.395
              100        1.55  0.074   0.186  0.324  0.395
              1100       1.55  0.068   0.186  0.324  0.395
              SoilCrop CanolaSoil
                LL=[0.1, 0.138, 0.161, 0.161, 0.224, 0.227, 0.263, 0.264, 0.264, 0.264, 0.264, 0.266, 0.276, 0.271, 0.252, 0.252, 0.189, 0.189, 0.186, 0.186]
                KL=[0.08, 0.08, 0.06, 0.06, 0.05, 0.04, 0.04, 0.04, 0.04, 0.04, 0.04, 0.03, 0.03, 0.02, 0.02, 0.01, 0.01, 0.01, 0.01, 0.01]
                XF=[1, 1, 1, 1, 1, 1, 1, 1, 1, 1, 1, 1, 1, 1, 1, 1, 1, 1, 1, 0.5]
            WaterBalance SoilWater: SummerDate=1-nov; SummerU=6; SummerCona=3.5; WinterDate=1-apr; WinterU=2; WinterCona=2; DiffusConst=44; DiffusSlope=16; Salb=0.13; CN2Bare=72; CNRed=20; CNCov=0.8; DischargeWidth=5; CatchmentArea=10; PSIDul=-100
              Thickness=[100, 100, 100, 100, 100, 100, 100, 100, 100, 100, 100, 100, 100, 100, 100, 100, 100, 100, 100, 1100]
              SWCON=[0.8, 0.8, 0.8, 0.8, 0.8, 0.8, 0.8, 0.8, 0.8, 0.8, 0.8, 0.8, 0.8, 0.8, 0.8, 0.8, 0.6, 0.6, 0.6, 0.6]
            Organic: FOMCNRatio=60; CarbonUnits=Total
              Thickness  Carbon  SoilCNRatio  FBiom  FInert  FOM
              100        0.83    8            0.06   0.01    439.771
              100        0.35    8            0.05   0.01    378.5144
              100        0.33    8            0.04   0.31    325.7904
              100        0.22    8            0.03   0.35    280.4104
              100        0.22    8            0.02   0.4     241.3514
              100        0.22    8            0.01   0.45    207.7331
              100        0.19    8            0.01   0.5     178.7975
              100        0.17    8            0.01   0.6     153.8925
              100        0.15    8            0.01   0.7     132.4565
              100        0.12    8            0.01   0.8     114.0063
              100        0.11    8            0.01   0.9     98.1262
              100        0.1     8            0.01   0.99    84.458
              100        0.1     8            0.01   0.99    72.6937
              100        0.1     8            0.01   0.99    62.568
              100        0.1     8            0.01   0.99    53.8528
              100        0.1     8            0.01   0.99    46.3515
              100        0.08    8            0.01   0.99    39.8951
              100        0.06    8            0.01   0.99    34.3381
              100        0.05    8            0.01   0.99    29.555
              1100       0.04    8            0.01   0.99    25.4383
            Nutrient
            Solute NO3: InitialValuesUnits=ppm; WaterTableConcentration=0; D0=0; DepthConstant=0; MaxDepthSoluteAccessible=0; RunoffEffectivenessAtMovingSolute=0; MaxEffectiveRunoff=0
              Thickness=[100, 100, 100, 100, 100, 100, 100, 100, 100, 100, 100, 100, 100, 100, 100, 100, 100, 100, 100, 1100]
              InitialValues=[43.333, 15.686, 4.487, 3.846, 3.896, 3.896, 3.896, 3.896, 1.875, 1.25, 1.235, 0.617, 0.585, 0.585, 0.592, 0.592, 0.565, 0.565, 0.552, 0.552]
            Solute NH4: InitialValuesUnits=ppm; WaterTableConcentration=0; D0=0; DepthConstant=0; MaxDepthSoluteAccessible=0; RunoffEffectivenessAtMovingSolute=0; MaxEffectiveRunoff=0
              Thickness=[100, 100, 100, 100, 100, 100, 100, 100, 100, 100, 100, 100, 100, 100, 100, 100, 100, 100, 100, 1100]
              InitialValues=[1.595, 0.206, 0.139, 0.135, 0.099, 0.101, 0.103, 0.104, 0.122, 0.124, 0.131, 0.128, 0.129, 0.127, 0.128, 0.128, 0.079, 0.079, 0.12, 0.12]
            Solute Urea: InitialValuesUnits=kg/ha; WaterTableConcentration=0; D0=0; DepthConstant=0; MaxDepthSoluteAccessible=0; RunoffEffectivenessAtMovingSolute=0; MaxEffectiveRunoff=0
              Thickness=[100, 100, 100, 100, 100, 100, 100, 100, 100, 100, 100, 100, 100, 100, 100, 100, 100, 100, 100, 1100]
              InitialValues=[0, 0, 0, 0, 0, 0, 0, 0, 0, 0, 0, 0, 0, 0, 0, 0, 0, 0, 0, 0]
            SoilTemperature Temperature: InteractionsPerDay=8
          Manager Fertilise at sowing
            Crop = [Canola]
            FertiliserType = NO3N
            Amount = 21
            script: same as in Wagga.Wagga2008.WaggaWagga2008.Paddock.Fertilise at sowing
          Manager Fertilise on fixed dates
            FertiliserType = UreaN
            FertiliserDates = 24-jul
            Amount = 50
            AmountType = True
            script: same as in Kojonup.Kojonup2013.Kojonup2013Base.paddock.Fertilise on fixed dates
          Report DailyReport: same as Greenthorpe.Greenethorpe2013_Ex2.Greenethorpe2013_Ex2.Paddock.DailyReport
          Report HarvestReport: same as Greenthorpe.Greenethorpe2013_Ex2.Greenethorpe2013_Ex2.Paddock.HarvestReport
          Report SowingReport: EventNames=[Canola].Sowing
            VariableNames:
              [Clock].Today
              [Canola].SowingData.Cultivar
              [IWeather].Latitude
              [IWeather].Longitude
          Manager codes: same as Greenthorpe.Greenethorpe2013_Ex1.Greenethorpe2013_Ex1.Paddock.codes
          Report DamageFunctionHarvestReport: same as Replacements.DamageFunctionHarvestReport
    Experiment Greenethorpe2014_Ex3
      Factors
        Permutation
          Factor Cv
            Specification=[SowingRule].Script.CultivarName=Hyola971_CL, ATR_Gem, 45Y88_CL, 44Y87_CL, Hyola559_TT, Hyola575_CL
          Memo
            [#SowingRule].Script.CultivarName=Archer,ATR_Wahoo,
            [#SowingRule].Script.CultivarName=44Y90_CL,45Y91_CL,Archer,Arazzo,ATR_Bonito,ATR_Stingray,ATR_Wahoo,AV_Zircon,Diamond,K50055,Sensation,Victory_7001_CL
          Factor TOS: Specification=[SowingRule].Script.SowDate=1-Apr,16-Apr,28-Apr,13-May
      Simulation Greenethorpe2014_Ex3
        Clock: Start=2014-03-17; End=2014-12-31
        Summary summaryfile
        Weather: FileName=met/greenethorpe_min_adjusted_LT_new1.met
        SoilArbitrator
        MicroClimate: a_interception=0; b_interception=1; c_interception=0; d_interception=0; SoilHeatFluxFraction=0.4; MinimumHeightDiffForNewLayer=0; NightInterceptionFraction=0.5; ReferenceHeight=2
        Zone Paddock: Area=1; Slope=0; AspectAngle=0; Altitude=50
          Irrigation
          Fertiliser
          SurfaceOrganicMatter: InitialResidueName=wheat_stubble; InitialResidueType=wheat; InitialResidueMass=1000; InitialStandingFraction=0; InitialCPR=0; InitialCNR=80
          Plant Canola
          Manager: same as Wagga.Wagga2008.WaggaWagga2008.Paddock.manager
          Manager SowingRule
            SowDate = 15-mar
            CultivarName = Hyola971_CL
            SowingDepth = 30
            RowSpacing = 230
            Population = 35
            script: same as in Wagga.Wagga2008.WaggaWagga2008.Paddock.SowingRule
          Manager Fertilise at sowing: same as Greenthorpe.Greenethorpe2014_Ex1.Greenethorpe2014_Ex1.Paddock.Fertilise at sowing
          Manager Fertilise on fixed dates: same as Greenthorpe.Greenethorpe2014_Ex1.Greenethorpe2014_Ex1.Paddock.Fertilise on fixed dates
          Report DailyReport: same as Greenthorpe.Greenethorpe2013_Ex2.Greenethorpe2013_Ex2.Paddock.DailyReport
          Report HarvestReport: same as Greenthorpe.Greenethorpe2013_Ex2.Greenethorpe2013_Ex2.Paddock.HarvestReport
          Report SowingReport: EventNames=[Canola].Sowing
            VariableNames:
              [Clock].Today
              [Canola].SowingData.Cultivar
              [IWeather].Latitude
              [IWeather].Longitude
          Manager HarvestAfterDate: same as Kojonup.Kojonup2013.Kojonup2013Base.paddock.HarvestAfterDate
          Soil: SoilType=sand; LocalName=Greenethorpe; Site=Front paddock; NearestTown=Young; Region=Southern NSW; State=NSW; Latitude=0; Longitude=0; YearOfSampling=0; DataSource=Kirkegaard/Lilley
            Chemical: same as Greenthorpe.Greenethorpe2014_Ex1.Greenethorpe2014_Ex1.Paddock.Soil.Chemical
            Water: same as Greenthorpe.Greenethorpe2014_Ex1.Greenethorpe2014_Ex1.Paddock.Soil.Water
            Physical: same as Greenthorpe.Greenethorpe2014_Ex1.Greenethorpe2014_Ex1.Paddock.Soil.Physical
            WaterBalance SoilWater: same as Greenthorpe.Greenethorpe2014_Ex1.Greenethorpe2014_Ex1.Paddock.Soil.SoilWater
            Organic: same as Greenthorpe.Greenethorpe2014_Ex1.Greenethorpe2014_Ex1.Paddock.Soil.Organic
            Nutrient
            Solute NO3: InitialValuesUnits=ppm; WaterTableConcentration=0; D0=0; DepthConstant=0; MaxDepthSoluteAccessible=0; RunoffEffectivenessAtMovingSolute=0; MaxEffectiveRunoff=0
              Thickness=[100, 100, 100, 100, 100, 100, 100, 100, 100, 100, 100, 100, 100, 100, 100, 100, 100, 100, 100, 1100]
              InitialValues=[43.333, 15.686, 5, 5, 5, 5, 5, 5, 5, 5, 5, 5, 5, 5, 5, 5, 5, 5, 5, 5]
            Solute NH4: same as Greenthorpe.Greenethorpe2014_Ex1.Greenethorpe2014_Ex1.Paddock.Soil.NH4
            Solute Urea: same as Greenthorpe.Greenethorpe2014_Ex1.Greenethorpe2014_Ex1.Paddock.Soil.Urea
            SoilTemperature Temperature: InteractionsPerDay=8
          Report DamageFunctionHarvestReport: same as Replacements.DamageFunctionHarvestReport
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