Simulations: Version=216
  Memo Funding Acknowledgement
    The development of frost and heat damage functions was supported by the ‘Frost and Heat Management Analytics’ (FAHMA) project via funding from the Grains Research and Development Corporation (GRDC; Grant No. CSP2204-009RTX).
  Memo Data Ownership Acknowledgement
    Acknowledgement: We would like to express our gratitude to Department of Primary Industries and Regional Development of Western Australia for providing dataset for setting up and validating Apsim damage functions of frost and heat event.

    Data description: The data was collected from field trials conducted in 2017 and 2018 for the Advancing Profitable Farming Systems - Frost Risk Management project (grant number: DAW00260).  It includes trial metadata encompassing the trial locations and soil types, field management practices (sowing date, cultivar name, irrigation, and fertilization), and field measurements of crop traits including phenology, maturity biomass, grain yield, and floret sterility.

    Disclaimer: The creators, contributors, and distributors of the dataset shall not be held liable for any direct, indirect, incidental, or consequential damages arising from the use of the dataset, including but not limited to, inaccuracies, errors, or omissions in the data.
    Unauthorized use or dissemination of this data is prohibited without explicit permission from the Department of the Primary Industries and Regional Development of Western Australia. For further inquiries or permission requests, please contact Dr Brenton Leske(Brenton.Leske@dpird.wa.gov.au).

    License: This dataset is released under [Creative Commons Attribution-NonCommercial-NoDerivatives 4.0 International Licence](https://creativecommons.org/licenses/by-nc-nd/4.0/).

    When citing this dataset, please use the following reference: Biddulph T.B. (Creator) (26 June 2023). GRDC/DPIRD Frost Agronomy Trials 2017 and 2018. The Department of Primary Industries and Regional Development Western Australia. [https://github.com/APSIMInitiative/ApsimX](https://github.com/APSIMInitiative/ApsimX)

    When using the damage functions, please use the following reference for more information: Hu, P., He, D., Zheng, B., Whish, J., Kirkegaard, J., Bell, L., Leske, B., Chen, S., Uppal, R., Biddulph, B., Trethowan, R., Beletse, Y., Lilley, J., 2026. Event-based frost and heat damage functions improve yield predictions of APSIM canola and wheat: formulation, calibration, and evaluation. Agricultural and Forest Meteorology 386, 111239. https://doi.org/10.1016/j.agrformet.2026.111239
  DataStore
    ExcelInput Observed: FileNames=[WFT_Obs.xlsx]; SheetNames=[Obs]
    PredictedObserved PredictedObserved_yield: PredictedTableName=ReportHarvest; ObservedTableName=Obs; FieldNameUsedForMatch=SimulationName; AllColumns=true
    PredictedObserved PredictedObserved_FHLyield: PredictedTableName=HarvestReportFHL; ObservedTableName=Obs; FieldNameUsedForMatch=SimulationName; AllColumns=true
  Folder Replacements
    Report ReportDaily: EventNames=[Clock].DoReport
      VariableNames:
        [Clock].Today as Date
        [Plant].SowingDate.Year as Year
        [Wheat].Phenology.Stage as Stage
        [Wheat].Phenology.Zadok.Stage as ZadokStage
        [Wheat].Phenology.CurrentStageName as CurrentStageName
        [Wheat].AboveGround.Wt as AboveGroundWt
        [Wheat].Grain.Total.Wt*10 as Yield
        [Wheat].Grain.Size as GrainSize
        [Wheat].Grain.Number as GrainNumber
        [Wheat].LAI as LAI
        [Wheat].Phenology.ThermalTime as TT
        [Wheat].Phenology.AccumulatedTT as AccumulatedTT
        [Weather].MaxT as maxT
        [Weather].MinT as minT
        [Weather].Rain as Rain
        //[Soil].SoilWater.SW
        //[Soil].Nutrient.MineralN
        [Wheat].Leaf.Fn as Fn
        [Wheat].Leaf.Fw as Fw
    Report ReportHarvest: EventNames=[Wheat].Harvesting
      VariableNames:
        [Clock].Today as Date
        [Plant].SowingDate.Year as Year
        [Plant].SowingDate as SowingDate
        [Plant].SowingData.Cultivar as Variety
        [Wheat].Phenology.Zadok.Stage as ZadokStage
        [Wheat].Phenology.CurrentStageName as CurrentStageName
        [Wheat].AboveGround.Wt as AboveGroundWt
        [Wheat].Grain.Total.Wt as Yield
        [Wheat].Grain.Size as GrainSize
        [Wheat].Grain.Number as GrainNumber
        [Wheat].Phenology.FloweringDAS as FloweringDAS
        [Wheat].Phenology.EmergenceDAS as EmergenceDAS
    Report HarvestReportFHL: EventNames=[Wheat].Harvesting
      VariableNames:
        [Clock].Today as Date
        [Plant].SowingDate.Year as Year
        [Plant].SowingDate as SowingDate
        [Plant].SowingData.Cultivar as Variety
        [Wheat].Phenology.Zadok.Stage as ZadokStage
        [Wheat].Phenology.CurrentStageName as CurrentStageName
        [Wheat].AboveGround.Wt as AboveGroundWt
        //[Wheat].Grain.Total.Wt*10 as Yield
        [Wheat].Grain.Size as GrainSize
        [Wheat].Grain.Number as GrainNumber
        [Wheat].Phenology.FloweringDAS as FloweringDAS
        [Wheat].Phenology.EmergenceDAS as EmergenceDAS
        [FrostHeatDamageFunctions].FrostHeatYield as Yield
    Folder Cultivars
      Cultivar Scepter
        Command:
          [Phenology].Phyllochron.BasePhyllochron.FixedValue = 100 // 107.602580952482
          [Phenology].PhyllochronPpSensitivity.FixedValue = 0.23032920462638
          [Phenology].CAMP.EnvData.VrnTreatTemp = 6
          [Phenology].CAMP.EnvData.VrnTreatDuration = 60
          [Phenology].CAMP.FLNparams.MinLN = 7
          [Phenology].CAMP.FLNparams.PpLN = 2
          [Phenology].CAMP.FLNparams.VrnLN = 2
          [Phenology].CAMP.FLNparams.VxPLN = -1
          [Phenology].HeadEmergenceLongDayBase.FixedValue = 170
          [Phenology].HeadEmergencePpSensitivity.FixedValue = 0
      Cultivar Cutlass
        Command:
          [Phenology].Phyllochron.BasePhyllochron.FixedValue = 105 // 95.8008034182983
          [Phenology].PhyllochronPpSensitivity.FixedValue = 0.352406544577556
          [Phenology].CAMP.FLNparams.MinLN = 7
          [Phenology].CAMP.FLNparams.PpLN = 5
          [Phenology].CAMP.FLNparams.VrnLN = 1
          [Phenology].CAMP.FLNparams.VxPLN = 2
          [Phenology].CAMP.EnvData.VrnTreatTemp = 5.8
          [Phenology].CAMP.EnvData.VrnTreatDuration = 60
          [Phenology].HeadEmergenceLongDayBase.FixedValue = 130
          [Phenology].HeadEmergencePpSensitivity.FixedValue = 2
      Cultivar Eaglehawk
        Command:
          [Phenology].Phyllochron.BasePhyllochron.FixedValue = 122.758992485634
          [Phenology].PhyllochronPpSensitivity.FixedValue = 0.119042603665788
          [Phenology].CAMP.FLNparams.MinLN = 6
          [Phenology].CAMP.FLNparams.PpLN = 3
          [Phenology].CAMP.FLNparams.VrnLN = 1
          [Phenology].CAMP.FLNparams.VxPLN = 3
          [Phenology].CAMP.EnvData.VrnTreatTemp = 5.8
          [Phenology].CAMP.EnvData.VrnTreatDuration = 60
          [Phenology].HeadEmergenceLongDayBase.FixedValue = 190
          [Phenology].HeadEmergencePpSensitivity.FixedValue = 4
      Cultivar Emu_Rock
        Command:
          [Phenology].Phyllochron.BasePhyllochron.FixedValue = 103 // 94.7698873180009
          [Phenology].PhyllochronPpSensitivity.FixedValue = 0.358007951256312
          [Phenology].CAMP.FLNparams.MinLN = 6
          [Phenology].CAMP.FLNparams.PpLN = 1
          [Phenology].CAMP.FLNparams.VrnLN = 1
          [Phenology].CAMP.FLNparams.VxPLN = -1
          [Phenology].CAMP.EnvData.VrnTreatTemp = 5.8
          [Phenology].CAMP.EnvData.VrnTreatDuration = 60
          [Phenology].HeadEmergenceLongDayBase.FixedValue = 183.0
          [Phenology].HeadEmergencePpSensitivity.FixedValue = 1.7962741039794823
      Cultivar Kittyhawk
        Command:
          [Phenology].Phyllochron.BasePhyllochron.FixedValue = 105 // 93.7220123291132
          [Phenology].PhyllochronPpSensitivity.FixedValue = 0.212225680614483
          [Phenology].CAMP.FLNparams.MinLN = 10
          [Phenology].CAMP.FLNparams.PpLN = 2
          [Phenology].CAMP.FLNparams.VrnLN = 8
          [Phenology].CAMP.FLNparams.VxPLN = -1
          [Phenology].CAMP.EnvData.VrnTreatTemp = 5.8
          [Phenology].CAMP.EnvData.VrnTreatDuration = 60
          [Phenology].HeadEmergenceLongDayBase.FixedValue = 50
          [Phenology].HeadEmergencePpSensitivity.FixedValue = 4
      Cultivar Forrest
        Command:
          [Phenology].Phyllochron.BasePhyllochron.FixedValue = 115 // 99.8910902837222
          [Phenology].PhyllochronPpSensitivity.FixedValue = 0.417874283738016
          [Phenology].CAMP.FLNparams.MinLN = 6
          [Phenology].CAMP.FLNparams.PpLN = 5
          [Phenology].CAMP.FLNparams.VrnLN = 2
          [Phenology].CAMP.FLNparams.VxPLN = 1
          [Phenology].CAMP.EnvData.VrnTreatTemp = 5.8
          [Phenology].CAMP.EnvData.VrnTreatDuration = 60
          [Phenology].HeadEmergenceLongDayBase.FixedValue = 370
          [Phenology].HeadEmergencePpSensitivity.FixedValue = 1
      Cultivar Wedgetail
        Command:
          [Phenology].Phyllochron.BasePhyllochron.FixedValue = 111.579556421375
          [Phenology].PhyllochronPpSensitivity.FixedValue = 0.217687425020179
          [Phenology].CAMP.EnvData.VrnTreatTemp = 5.8
          [Phenology].CAMP.EnvData.VrnTreatDuration = 60
          [Phenology].CAMP.FLNparams.MinLN = 7
          [Phenology].CAMP.FLNparams.PpLN = 1
          [Phenology].CAMP.FLNparams.VrnLN = 9
          [Phenology].CAMP.FLNparams.VxPLN = -1
          [Phenology].HeadEmergenceLongDayBase.FixedValue = 170
          [Phenology].HeadEmergencePpSensitivity.FixedValue = 2
      Cultivar Trojan
        Command:
          [Phenology].Phyllochron.BasePhyllochron.FixedValue = 112 // 99.1351271229079
          [Phenology].PhyllochronPpSensitivity.FixedValue = 0.35511766231399
          [Phenology].CAMP.EnvData.VrnTreatTemp = 6
          [Phenology].CAMP.EnvData.VrnTreatDuration = 60
          [Phenology].CAMP.FLNparams.MinLN = 7
          [Phenology].CAMP.FLNparams.PpLN = 5
          [Phenology].CAMP.FLNparams.VrnLN = 2
          [Phenology].CAMP.FLNparams.VxPLN = 1
          [Phenology].HeadEmergenceLongDayBase.FixedValue = 50
          [Phenology].HeadEmergencePpSensitivity.FixedValue = 4
      Cultivar EmuRock: same as Replacements.Cultivars.Emu_Rock
    Plant Wheat
      FrostHeatDamageFunctions: CropType=1; FrostLowTT=-6.1; FrostMaxReductionRatio=0.5; FrostUpTT=0.2; FrostMinReductionRatio=0; FrostStartSensitiveGS=5.56; FrostStartMostSensitiveGS=6.68; FrostEndMostSensitiveGS=8.43; FrostEndSensitiveGS=9; HeatLowTT=30.1; HeatMinReductionRatio=0; HeatUpTT=38.7; HeatMaxReductionRatio=0.56; HeatStartSensitiveGS=6.53; HeatStartMostSensitiveGS=7.84; HeatEndMostSensitiveGS=8.87; HeatEndSensitiveGS=9.2
  Experiment 2018BirchipVIC
    Memo TOS3 was less stressed with a mean sterility of less than 15 percent
      The paddock in 2017 was fallow, so one more year is simulated to get the estimation of soil water.

      The yield was not well simulated as the TOS3 was overestimated but its sterility was less than 15%, terminal drought?
    Factors
      Permutation TOSxCv
        Factor TOS
          CompositeFactor 1
            Specifications:
              [Sowing].Script.SowDate=19-may
              //[Sowing].Script.SowDate=03-may
              [Sowing].Script.Population=120
              [Sowing].Script.RowSpacing=305
              [Sowing].Script.SowingDepth=50
          CompositeFactor 2
            Specifications:
              [Sowing].Script.SowDate=30-may
              //[Sowing].Script.SowDate=17-may
              [Sowing].Script.Population=120
              [Sowing].Script.RowSpacing=305
              [Sowing].Script.SowingDepth=50
          CompositeFactor 3
            Specifications:
              [Sowing].Script.SowDate=18-jun
              //[Sowing].Script.SowDate=06-jun
              [Sowing].Script.Population=120
              [Sowing].Script.RowSpacing=305
              [Sowing].Script.SowingDepth=30
              [IrrigationEvents]
            Operations IrrigationEvents
        Factor Cv_0 (disabled)
          Specification=[Sowing].Script.CultivarName = Scepter,Cutlass,Kittyhawk,Eaglehawk,EmuRock,Trojan
        Factor Cv
          CompositeFactor Scepter
            Specifications:
              [Sowing].Script.CultivarName=Scepter
              [Scepter]
            Cultivar Scepter
              Command:
                [Phenology].Phyllochron.BasePhyllochron.FixedValue = 115 // 107.602580952482
                [Phenology].PhyllochronPpSensitivity.FixedValue = 0.23032920462638
                [Phenology].CAMP.EnvData.VrnTreatTemp = 6
                [Phenology].CAMP.EnvData.VrnTreatDuration = 60
                [Phenology].CAMP.FLNparams.MinLN = 7
                [Phenology].CAMP.FLNparams.PpLN = 2
                [Phenology].CAMP.FLNparams.VrnLN = 2
                [Phenology].CAMP.FLNparams.VxPLN = -1
                [Phenology].HeadEmergenceLongDayBase.FixedValue = 170
                [Phenology].HeadEmergencePpSensitivity.FixedValue = 0
          CompositeFactor Cutlass
            Specifications:
              [Sowing].Script.CultivarName=Cutlass
              [Cutlass]
            Cultivar Cutlass: same as Replacements.Cultivars.Cutlass
          CompositeFactor Kittyhawk
            Specifications:
              [Sowing].Script.CultivarName=Kittyhawk
              [Kittyhawk]
            Cultivar Kittyhawk: same as Replacements.Cultivars.Kittyhawk
          CompositeFactor Eaglehawk
            Specifications:
              [Sowing].Script.CultivarName=Eaglehawk
              [Eaglehawk]
            Cultivar Eaglehawk: same as Replacements.Cultivars.Eaglehawk
          CompositeFactor EmuRock
            Specifications:
              [Sowing].Script.CultivarName=Emu_Rock
              [Emu_Rock]
            Cultivar Emu_Rock
              Command:
                [Phenology].Phyllochron.BasePhyllochron.FixedValue = 108 // 103 // 94.7698873180009
                [Phenology].PhyllochronPpSensitivity.FixedValue = 0.358007951256312
                [Phenology].CAMP.FLNparams.MinLN = 6
                [Phenology].CAMP.FLNparams.PpLN = 1
                [Phenology].CAMP.FLNparams.VrnLN = 1
                [Phenology].CAMP.FLNparams.VxPLN = -1
                [Phenology].CAMP.EnvData.VrnTreatTemp = 5.8
                [Phenology].CAMP.EnvData.VrnTreatDuration = 60
                [Phenology].HeadEmergenceLongDayBase.FixedValue = 183.0
                [Phenology].HeadEmergencePpSensitivity.FixedValue = 1.7962741039794823
          CompositeFactor Trojan
            Specifications:
              [Sowing].Script.CultivarName=Trojan
              [Trojan]
            Cultivar Trojan: same as Replacements.Cultivars.Trojan
    Simulation 2018BirchipVIC
      Clock: Start=2018-05-03; End=2018-12-31
      Summary SummaryFile
      Weather: FileName=Met/Birchip_2018.met
      SoilArbitrator
      Zone Field: Area=1; Slope=0; AspectAngle=0; Altitude=50
        Soil Clay Loam (Jil Jil No728): SoilType=Clay loam; Site=Jil Jil; NearestTown=Jil Jil; Region=Mallee; State=Victoria; Country=Australia; ApsoilNumber=728; Latitude=-35.8822; Longitude=142.99226; LocationAccuracy=+/- 1000m; YearOfSampling=0
          DataSource=Based on Soil Characterisation undertaken by Birchip Cropping Group during 2005
          Comments=Clay loam - Medium SSC; GPS at paddock scale only; BCG systems trial
          Physical
            Thickness  ParticleSizeSand  ParticleSizeSilt  ParticleSizeClay  Rocks  BD     AirDry  LL15  DUL   SAT
            100        5                 65                30                0      1.33   0.085   0.17  0.36  0.43
            150        5                 65                30                0      1.36   0.168   0.21  0.37  0.44
            150        5                 65                30                0      1.39   0.2     0.2   0.4   0.45
            150        5                 65                30                0      1.415  0.2     0.2   0.41  0.45
            150        5                 65                30                0      1.437  0.2     0.2   0.41  0.45
            300        5                 65                30                0      1.428  0.2     0.2   0.44  0.46
            300        5                 65                30                0      1.41   0.2     0.2   0.46  0.467
            BD, DUL source: Field measured and checked for sensibility
            AirDry, LL15 source: Estimated based on local knowledge
            SAT source: Calculated from measured, estimated or calculated BD
            Rocks, ParticleSizeSand, ParticleSizeSilt, ParticleSizeClay source: Calculated
            SoilCrop wheatSoil: LL=[0.17, 0.21, 0.2, 0.2, 0.2, 0.2, 0.2]; KL=[0.06, 0.06, 0.04, 0.04, 0.04, 0.04, 0.02]; XF=[1, 1, 1, 1, 1, 0.16, 0]
            SoilCrop barleySoil: LL=[0.17, 0.21, 0.25, 0.26, 0.26, 0.44, 0.46]; KL=[0.07, 0.07, 0.07, 0.07, 0.05, 0.05, 0.03]; XF=[1, 0.5, 0.3, 0.2, 0.2, 0, 0]
              LL source: Estimated based on local knowledge
            SoilCrop oatsSoil: LL=[0.17, 0.21, 0.25, 0.26, 0.26, 0.44, 0.46]; KL=[0.06, 0.06, 0.04, 0.04, 0.04, 0.04, 0.02]; XF=[1, 0.5, 0.3, 0.2, 0.2, 0, 0]
              LL source: Estimated based on local knowledge
            SoilCrop canolaSoil: LL=[0.17, 0.21, 0.25, 0.36, 0.38, 0.44, 0.46]; KL=[0.06, 0.06, 0.04, 0.04, 0.04, 0.04, 0.02]; XF=[1, 0.5, 0.3, 0.2, 0.17, 0, 0]
              LL source: Estimated based on local knowledge
            SoilCrop fieldpeaSoil: LL=[0.19, 0.21, 0.28, 0.41, 0.41, 0.44, 0.46]; KL=[0.06, 0.06, 0.04, 0.04, 0.04, 0.04, 0.02]; XF=[1, 0.5, 0.3, 0, 0, 0, 0]
              LL source: Estimated based on local knowledge
            SoilCrop fababeanSoil: LL=[0.17, 0.21, 0.3, 0.41, 0.41, 0.44, 0.46]; KL=[0.02, 0.01, 0.01, 0.01, 0.01, 0.01, 0.01]; XF=[1, 0.1, 0.1, 0, 0, 0, 0]
              LL source: Estimated based on local knowledge
            SoilCrop pigeonpeaSoil: LL=[0.19, 0.21, 0.4, 0.41, 0.41, 0.44, 0.46]; KL=[0.06, 0.06, 0.04, 0.04, 0.04, 0.04, 0.02]; XF=[1, 0.5, 0.3, 0, 0, 0, 0]
              LL source: Estimated based on local knowledge
            SoilCrop weedSoil: LL=[0.17, 0.21, 0.2, 0.25, 0.3, 0.44, 0.46]; KL=[0.08, 0.08, 0.06, 0.04, 0.04, 0.04, 0.02]; XF=[1, 1, 1, 1, 1, 1, 0]
              LL source: Estimated based on local knowledge
            SoilCrop medicSoil: LL=[0.17, 0.21, 0.25, 0.26, 0.28, 0.34, 0.46]; KL=[0.08, 0.08, 0.06, 0.04, 0.04, 0.04, 0.02]; XF=[1, 1, 1, 1, 1, 1, 0]
              LL source: Estimated based on local knowledge
            SoilCrop lupinsSoil: LL=[0.17, 0.21, 0.38, 0.41, 0.41, 0.44, 0.46]; KL=[0.06, 0.06, 0.04, 0.04, 0.04, 0.04, 0.02]; XF=[1, 0.5, 0.3, 0, 0, 0, 0]
              LL source: Estimated based on local knowledge
            SoilCrop SCRUMSoil: LL=[0.17, 0.21, 0.25, 0.26, 0.28, 0.34, 0.46]; KL=[0.06, 0.06, 0.04, 0.04, 0.04, 0.04, 0.02]; XF=[1, 1, 0.28, 0.22, 0.17, 0.16, 0]
              LL source: Field measured and checked for sensibility
          SoilTemperature Temperature: InteractionsPerDay=8
          Water: Thickness=[100, 150, 150, 150, 150, 300, 300]; InitialValues=[0.36, 0.37, 0.4, 0.41, 0.41, 0.223333, 0.2]; FilledFromTop=true
          Solute NO3: Thickness=[100, 150, 150, 150, 150, 300, 300]; InitialValues=[80, 0, 0, 0, 0, 0, 0]; InitialValuesUnits=kg/ha; WaterTableConcentration=0; D0=0; DepthConstant=0; MaxDepthSoluteAccessible=0; RunoffEffectivenessAtMovingSolute=0; MaxEffectiveRunoff=0
          Solute NH4: Thickness=[100, 150, 150, 150, 150, 300, 300]; InitialValues=[0, 0, 0, 0, 0, 0, 0]; InitialValuesUnits=ppm; WaterTableConcentration=0; D0=0; DepthConstant=0; MaxDepthSoluteAccessible=0; RunoffEffectivenessAtMovingSolute=0; MaxEffectiveRunoff=0
          Solute Urea: same as 2018BirchipVIC.2018BirchipVIC.Field.Clay Loam (Jil Jil No728).NH4
          Nutrient
          Organic: FOMCNRatio=0; CarbonUnits=Total
            Thickness  Carbon  SoilCNRatio  FBiom  FInert  FOM
            100        0.2     12           0.2    0.8     100
            150        0.2     12           0.2    0.8     100
            150        0.2     12           0.2    0.8     100
            150        0.2     12           0.2    0.8     100
            150        0.2     12           0.2    0.8     100
            300        0.2     12           0.2    0.8     100
            300        0.2     12           0.2    0.8     100
          Chemical: PHUnits=Water
            Thickness  PH  CEC
            100        7   8.795
            150        7   8.795
            150        7   8.795
            150        7   8.795
            150        7   8.795
            300        7   8.795
            300        7   8.795
            CEC source: Calculated
          WaterBalance SoilWater: SummerDate=1-Nov; SummerU=6; SummerCona=3.5; WinterDate=1-Apr; WinterU=2; WinterCona=2; DiffusConst=40; DiffusSlope=16; Salb=0.12; CN2Bare=73; CNRed=20; CNCov=0.8; PSIDul=-100; Thickness=[150, 150, 300, 300, 300, 300]; SWCON=[0.4, 0.4, 0.4, 0.4, 0.4, 0.4]
        Plant Wheat
        Fertiliser
        Irrigation
        SurfaceOrganicMatter: InitialResidueName=wheat_stubble; InitialResidueType=canola; InitialResidueMass=500; InitialStandingFraction=0; InitialCPR=0; InitialCNR=100
        MicroClimate: a_interception=0; b_interception=1; c_interception=0; d_interception=0; SoilHeatFluxFraction=0.4; MinimumHeightDiffForNewLayer=0; NightInterceptionFraction=0.5; ReferenceHeight=2
        Manager Sowing
          Crop = [Wheat]
          SowDate = 24-Jul
          CultivarName = Cutlass
          SowingDepth = 50
          RowSpacing = 30
          Population = 150
```csharp
using Models.Soils.Nutrients;
using System;
using Models.Core;
using Models.PMF;
using Models.Soils;
using Models.Soils.Nutrients;
using Models.Utilities;
using APSIM.Shared.Utilities;

namespace Models
{
    [Serializable]
    public class Script : Model
    {
        [Link] Clock Clock;
        [Link] Fertiliser Fertiliser;
        [Link] Summary Summary;
        [Link] Soil Soil;
        Accumulator accumulatedRain;
        
        [Description("Crop")]
        public IPlant Crop { get; set; }
        [Description("Sowing date (d-mmm)")]
        public string SowDate { get; set; }
    [Display(Type = DisplayType.CultivarName, PlantName = "Wheat")]
        [Description("Cultivar to be sown")]
        public string CultivarName { get; set; }
        [Description("Sowing depth (mm)")]
        public double SowingDepth { get; set; }
        [Description("Row spacing (mm)")]
        public double RowSpacing { get; set; }
        [Description("Plant population (/m2)")]
        public double Population { get; set; }
        


        [EventSubscribe("DoManagement")]
        private void OnDoManagement(object sender, EventArgs e)
        {
            if (DateUtilities.WithinDates(SowDate, Clock.Today, SowDate))
            {
                Crop.Sow(population: Population, cultivar: CultivarName, depth: SowingDepth, rowSpacing: RowSpacing);    
            }
        
        }
        
    }
}
```
        Manager Irrigate on fixed dates
          IrrigateDates = 1-Sep
          Amount = 50
          Depth = 0
          Efficiency = 1
          WillRunoff = False
```csharp
using Models.Soils;
using System;
using System.Linq;
using Models.Core;
using Models.PMF;
using APSIM.Shared.Utilities;
namespace Models
{
    [Serializable]
    public class Script : Model
    {
        [Link] Clock Clock;
        [Link] Irrigation Irrigation;
        
        [Separator("A component to apply irrigation on one or more dates on every year of the simulation")]

        [Description("Enter the irrigation dates as dd-mmm with comma separation (any year information entered will be ignored)")] 
        public string[] IrrigateDates { get; set; }
        
        [Description("Amount of irrigation to be applied (mm)")] 
        public double Amount { get; set; }
        
        [Description("Depth in the soil to apply the  irrigation (mm)")] 
        public double Depth { get; set; }
        
        [Description("Efficiency of irrigation (0-1)")] 
        public double Efficiency { get; set; }
        
        [Description("Will the irrigation runoff?")] 
        public bool WillRunoff { get; set; }
        
        [EventSubscribe("DoManagement")]
        private void OnDoManagement(object sender, EventArgs e)
        {
            foreach (string ddMMM in IrrigateDates)
            {
                if (DateUtilities.DatesEqual(ddMMM, Clock.Today))
                    Irrigation.Apply(amount: Amount, depth: Depth, efficiency: Efficiency, willRunoff: WillRunoff);
            }
        }
    }
}
```
        Operations IrrigationEvents
          2017-06-15  [Irrigation].Apply(amount: 20, depth: 0, efficiency: 1)
        Manager FertiliseAtSowingGranulock
          Crop = [Wheat]
          FertiliserType = NO3N
          Amount = 6.6
```csharp
using Models.Soils;
using System;
using Models.Core;
using Models.PMF;
namespace Models
{
    [Serializable]
    public class Script : Model
    {
        [Link] Clock Clock;
        [Link] Fertiliser Fertiliser;
        
        [Description("Crop to be fertilised")]
        public IPlant Crop { get; set; }

        [Description("Type of fertiliser to apply? ")] 
        [Display(Type = DisplayType.FertiliserType)]public string FertiliserType { get; set; }
    
        [Description("Amount of fertiliser to be applied (kg/ha)")]
        public double Amount { get; set; }
        
        [EventSubscribe("Sowing")]
        private void OnSowing(object sender, EventArgs e)
        {
            Model crop = sender as Model;
            if (Crop != null && crop.Name.ToLower() == (Crop as IModel).Name.ToLower())
                Fertiliser.Apply(amount: Amount, type: FertiliserType);
        }
    }
}
```
        Manager FertiliseOnZ31Urea
          Stage = 31
          FertiliserType = UreaGranular
          Amount = 100
```csharp
using APSIM.Core;
using Models.PMF;
using Models.Core;
using System;
using Models.Soils;
namespace Models
{
    [Serializable] 
    public class Script : Model, IStructureDependency
    {
        [Link] private Clock Clock;
        [Link] private Fertiliser Fertiliser;
        [Link] private Summary Summary;
        [Link] private Plant Wheat;
        public IStructure Structure { private get; set; }
 
        private bool hasFertilised = false;

        [Description("Fertilise once crop reaches stage:")]
        public double Stage { get; set; }

        [Description("Type of fertiliser to apply? ")] 
        [Display(Type = DisplayType.FertiliserType)]public string FertiliserType { get; set; }

        [Description("Amount of fertiliser to be applied (kg/ha)")] 
        public double Amount { get; set; }
     

        

        [EventSubscribe("DoManagement")] 
        private void OnDoManagement(object sender, EventArgs e)
        { 
            double zadok = (double)Structure.GetObject("Phenology.Zadok.Stage", relativeTo: Wheat).Value; 
 
            if (zadok >= Stage && !hasFertilised)
            { 
                Summary.WriteMessage(this, "Fertilising!!", MessageType.Diagnostic); 
                Fertiliser.Apply(amount: Amount, type: FertiliserType);
                hasFertilised = true; 
            } 
        }

        [EventSubscribe("Sowing")]
        private void OnSowing(object sender, EventArgs e)
        {
            hasFertilised = false;
        }
    }
}
```
        Manager Harvest
```csharp
using Models.Soils.Nutrients;
using System;
using Models.Core;
using Models.PMF;
using Models.Soils;
using Models.Soils.Nutrients;
using Models.Utilities;
using APSIM.Shared.Utilities;

namespace Models
{
    [Serializable]
    public class Script : Model
    {
        [Link(ByName = true)] Plant Wheat;

        [EventSubscribe("DoManagement")]
        private void OnDoManagement(object sender, EventArgs e)
        {
            if (Wheat.IsReadyForHarvesting)
            {
               Wheat.Harvest();
               Wheat.EndCrop();    
            }
        
        }
        
    }
}
```
        Report ReportDaily: EventNames=[Clock].DoReport
          VariableNames:
            [Clock].Today as Date
            [Wheat].Phenology.Zadok.Stage as ZadokStage
            [Wheat].Phenology.CurrentStageName as CurrentStageName
            [Wheat].AboveGround.Wt as AboveGroundWt
            [Wheat].Grain.Total.Wt*10 as Yield
            [Wheat].Grain.Size as GrainSize
            [Wheat].Grain.Number as GrainNumber
            [Wheat].LAI as LAI
            [Wheat].Phenology.ThermalTime as TT
            [Wheat].Phenology.AccumulatedTT as AccumulatedTT
            [Weather].MaxT as maxT
            [Weather].MinT as minT
        Report ReportHarvest: EventNames=[Wheat].Harvesting
          VariableNames:
            [Clock].Today as Date
            [Wheat].Phenology.Zadok.Stage as ZadokStage
            [Wheat].Phenology.CurrentStageName as CurrentStageName
            [Wheat].AboveGround.Wt as AboveGroundWt
            [Wheat].Grain.Total.Wt*10 as Yield
            ([Wheat].AboveGround.Wt - [Wheat].Grain.Total.Wt) as VegetativeAboveGroundWt
            [Wheat].Grain.Size as GrainSize
            [Wheat].Grain.Number as GrainNumber
            [Wheat].Phenology.FloweringDAS as FloweringDAS
            [Wheat].Phenology.EmergenceDAS as EmergenceDAS
        Report HarvestReportFHL: EventNames=[Wheat].Harvesting
          VariableNames:
            [Clock].Today as Date
            [Plant].SowingDate.Year as Year
            [Plant].SowingDate as SowingDate
            [Plant].SowingData.Cultivar as Variety
            [Wheat].Phenology.Zadok.Stage as ZadokStage
            [Wheat].Phenology.CurrentStageName as CurrentStageName
            [Wheat].AboveGround.Wt as AboveGroundWt
            //[Wheat].Grain.Total.Wt*10 as Yield
            [Wheat].Grain.Size as GrainSize
            [Wheat].Grain.Number as GrainNumber
            [Wheat].Phenology.FloweringDAS as FloweringDAS
            [Wheat].Phenology.EmergenceDAS as EmergenceDAS
            [FrostHeatDamageFunctions].FrostHeatYield*10 as Yield
  Experiment 2017LoxtonSA
    Factors
      Permutation TOSxCv
        Factor TOS
          CompositeFactor 1
            Specifications:
              [Sowing].Script.SowDate=8-apr
              //[Sowing].Script.SowDate=19-apr
              [Sowing].Script.Population=150
              [Sowing].Script.RowSpacing=300
              [Sowing].Script.SowingDepth=50
              [FertilizationEvents]
              [IrrigationEvents]
            Operations FertilizationEvents
              2017-06-27  [Fertiliser].Apply(amount: 87, type: UreaN)
            Operations IrrigationEvents
          CompositeFactor 2
            Specifications:
              [Sowing].Script.SowDate=04-may
              [Sowing].Script.Population=150
              [Sowing].Script.RowSpacing=300
              [Sowing].Script.SowingDepth=50
              [FertilizationEvents]
              [IrrigationEvents]
            Operations FertilizationEvents
              2017-07-04  [Fertiliser].Apply(amount: 87, type: UreaN)
            Operations IrrigationEvents
          CompositeFactor 3
            Specifications:
              [Sowing].Script.SowDate=22-may
              [Sowing].Script.Population=150
              [Sowing].Script.RowSpacing=300
              [Sowing].Script.SowingDepth=50
              [FertilizationEvents]
              [IrrigationEvents]
            Operations FertilizationEvents
              2017-07-17  [Fertiliser].Apply(amount: 87, type: UreaN)
            Operations IrrigationEvents
        Factor Cv
          CompositeFactor Scepter
            Specifications:
              [Sowing].Script.CultivarName=Scepter
              [Scepter]
            Cultivar Scepter
              Command:
                [Phenology].Phyllochron.BasePhyllochron.FixedValue = 80 // 107.602580952482
                [Phenology].PhyllochronPpSensitivity.FixedValue = 0.23032920462638
                [Phenology].CAMP.EnvData.VrnTreatTemp = 6
                [Phenology].CAMP.EnvData.VrnTreatDuration = 60
                [Phenology].CAMP.FLNparams.MinLN = 7
                [Phenology].CAMP.FLNparams.PpLN = 2
                [Phenology].CAMP.FLNparams.VrnLN = 2
                [Phenology].CAMP.FLNparams.VxPLN = -1
                [Phenology].HeadEmergenceLongDayBase.FixedValue = 160 // 170
                [Phenology].HeadEmergencePpSensitivity.FixedValue = 3
                [Grain].MaximumPotentialGrainSize.FixedValue=0.08
                [Grain].NumberFunction.GrainNumber.GrainsPerGramOfStem.FixedValue=40
          CompositeFactor Cutlass
            Specifications:
              [Sowing].Script.CultivarName=Cutlass
              [Cutlass]
            Cultivar Cutlass
              Command:
                [Phenology].Phyllochron.BasePhyllochron.FixedValue = 95.8008034182983
                [Phenology].PhyllochronPpSensitivity.FixedValue = 0.352406544577556
                [Phenology].CAMP.FLNparams.MinLN = 7
                [Phenology].CAMP.FLNparams.PpLN = 5
                [Phenology].CAMP.FLNparams.VrnLN = 1
                [Phenology].CAMP.FLNparams.VxPLN = 2
                [Phenology].CAMP.EnvData.VrnTreatTemp = 5.8
                [Phenology].CAMP.EnvData.VrnTreatDuration = 60
                [Phenology].HeadEmergenceLongDayBase.FixedValue = 130
                [Phenology].HeadEmergencePpSensitivity.FixedValue = 2
                [Grain].MaximumPotentialGrainSize.FixedValue=0.08
                [Grain].NumberFunction.GrainNumber.GrainsPerGramOfStem.FixedValue=40
          CompositeFactor Kittyhawk
            Specifications:
              [Sowing].Script.CultivarName=Kittyhawk
              [Kittyhawk]
            Cultivar Kittyhawk
              Command:
                [Phenology].Phyllochron.BasePhyllochron.FixedValue = 102 // 93.7220123291132
                [Phenology].PhyllochronPpSensitivity.FixedValue = 0.212225680614483
                [Phenology].CAMP.FLNparams.MinLN = 10
                [Phenology].CAMP.FLNparams.PpLN = 2
                [Phenology].CAMP.FLNparams.VrnLN = 8
                [Phenology].CAMP.FLNparams.VxPLN = -1
                [Phenology].CAMP.EnvData.VrnTreatTemp = 5.8
                [Phenology].CAMP.EnvData.VrnTreatDuration = 60
                [Phenology].HeadEmergenceLongDayBase.FixedValue = 55 // 50
                [Phenology].HeadEmergencePpSensitivity.FixedValue = 4
                [Grain].MaximumPotentialGrainSize.FixedValue=0.08
                [Grain].NumberFunction.GrainNumber.GrainsPerGramOfStem.FixedValue=40
          CompositeFactor Forrest
            Specifications:
              [Sowing].Script.CultivarName=Forrest
              [Forrest]
            Cultivar Forrest
              Command:
                [Phenology].Phyllochron.BasePhyllochron.FixedValue = 99.8910902837222
                [Phenology].PhyllochronPpSensitivity.FixedValue = 0.417874283738016
                [Phenology].CAMP.FLNparams.MinLN = 6
                [Phenology].CAMP.FLNparams.PpLN = 5
                [Phenology].CAMP.FLNparams.VrnLN = 2
                [Phenology].CAMP.FLNparams.VxPLN = 1
                [Phenology].CAMP.EnvData.VrnTreatTemp = 5.8
                [Phenology].CAMP.EnvData.VrnTreatDuration = 60
                [Phenology].HeadEmergenceLongDayBase.FixedValue = 370
                [Phenology].HeadEmergencePpSensitivity.FixedValue = 1
                [Grain].MaximumPotentialGrainSize.FixedValue=0.08
                [Grain].NumberFunction.GrainNumber.GrainsPerGramOfStem.FixedValue=40
          CompositeFactor EmuRock
            Specifications:
              [Sowing].Script.CultivarName=Emu_Rock
              [Emu_Rock]
            Cultivar Emu_Rock
              Command:
                [Phenology].Phyllochron.BasePhyllochron.FixedValue = 94.7698873180009
                [Phenology].PhyllochronPpSensitivity.FixedValue = 0.358007951256312
                [Phenology].CAMP.FLNparams.MinLN = 6
                [Phenology].CAMP.FLNparams.PpLN = 1
                [Phenology].CAMP.FLNparams.VrnLN = 1
                [Phenology].CAMP.FLNparams.VxPLN = -1
                [Phenology].CAMP.EnvData.VrnTreatTemp = 5.8
                [Phenology].CAMP.EnvData.VrnTreatDuration = 60
                [Phenology].HeadEmergenceLongDayBase.FixedValue = 183.0
                [Phenology].HeadEmergencePpSensitivity.FixedValue = 1.7962741039794823
                [Grain].MaximumPotentialGrainSize.FixedValue=0.08
                [Grain].NumberFunction.GrainNumber.GrainsPerGramOfStem.FixedValue=40
          CompositeFactor Trojan
            Specifications:
              [Sowing].Script.CultivarName=Trojan
              [Trojan]
            Cultivar Trojan
              Command:
                [Phenology].Phyllochron.BasePhyllochron.FixedValue = 95 // 99.1351271229079
                [Phenology].PhyllochronPpSensitivity.FixedValue = 0.35511766231399
                [Phenology].CAMP.EnvData.VrnTreatTemp = 6
                [Phenology].CAMP.EnvData.VrnTreatDuration = 60
                [Phenology].CAMP.FLNparams.MinLN = 7
                [Phenology].CAMP.FLNparams.PpLN = 5
                [Phenology].CAMP.FLNparams.VrnLN = 2
                [Phenology].CAMP.FLNparams.VxPLN = 1
                [Phenology].HeadEmergenceLongDayBase.FixedValue = 50
                [Phenology].HeadEmergencePpSensitivity.FixedValue = 4
                [Grain].MaximumPotentialGrainSize.FixedValue=0.08
                [Grain].NumberFunction.GrainNumber.GrainsPerGramOfStem.FixedValue=40
    Simulation 2017LoxtonSA
      Clock: Start=2017-04-01; End=2017-12-31
      Summary SummaryFile
      Weather: FileName=Met/Loxton_2017.met
      SoilArbitrator
      Zone Field: Area=1; Slope=0; AspectAngle=0; Altitude=50
        Soil Mod Deep Sand over Sandy Clay Loam (Loxton No341): SoilType=Sandy clay; Site=Loxton; NearestTown=Loxton; Region=Riverland; State=South Australia; Country=Australia; NaturalVegetation=Mallee; ApsoilNumber=341; Latitude=-34.496; Longitude=140.573; LocationAccuracy=+/- 500m; YearOfSampling=0; Comments=Sand - Moderate constraints
          DataSource=Based on Soil Characterisation undertaken by Reaping Rewards project 2006 - Mod constraints
          Physical
            Thickness  ParticleSizeSand  ParticleSizeSilt  ParticleSizeClay  Rocks  BD   AirDry  LL15  DUL   SAT
            100        91                1.8               7.7               0      1.3  0.03    0.05  0.11  0.46
            100        91                1.8               7.7               0      1.3  0.03    0.05  0.11  0.46
            200        80                3.8               16.1              0      1.5  0.03    0.04  0.14  0.38
            200        67                2.4               21.3              0      1.5  0.05    0.05  0.15  0.38
            200        67                2                 22.4              0      1.5  0.06    0.06  0.15  0.38
            300        57                1.3               20                0      1.5  0.07    0.07  0.15  0.38
            300        57                1.3               20                0      1.5  0.07    0.07  0.15  0.38
            BD, AirDry, LL15, DUL, SAT source: Unknown source or quality of data
            Rocks source: Calculated
            SoilCrop WheatSoil: LL=[0.05, 0.05, 0.04, 0.05, 0.06, 0.07, 0.07]; KL=[0.06, 0.06, 0.06, 0.04, 0.04, 0.04, 0.04]; XF=[1, 1, 1, 1, 1, 1, 1]
              LL source: Estimated based on local knowledge
            SoilCrop canolaSoil: same as 2017LoxtonSA.2017LoxtonSA.Field.Mod Deep Sand over Sandy Clay Loam (Loxton No341).Physical.WheatSoil
          WaterBalance SoilWater: SummerDate=1-Nov; SummerU=6; SummerCona=3.5; WinterDate=1-Apr; WinterU=2; WinterCona=2; DiffusConst=88; DiffusSlope=35; Salb=0.13; CN2Bare=68; CNRed=20; CNCov=0.8; PSIDul=-100; Thickness=[100, 100, 200, 200, 200, 300, 300]; SWCON=[0.7, 0.7, 0.7, 0.5, 0.5, 0.5, 0.5]
          Organic: FOMCNRatio=40; CarbonUnits=Total
            Thickness  Carbon  SoilCNRatio  FBiom  FInert  FOM
            600        0.38    12           0.04   0.2     324.933
            200        0.2     12           0.02   0.3     170.846
            200        0.08    12           0.02   0.7     72.502
            400        0.01    12           0.01   1       20.043
          Chemical: PHUnits=Water
            Thickness  PH   EC   CEC
            100        7.6  0.1  9.0079
            100        7.6  0.1  9.0079
            200        8.1  0.1  10.5137
            200        8.1  0.1  11.0311
            200        8.3  0.1  10.9198
            300        8.5  0.2  9.2865
            300        8.5  0.2  9.1815
            EC, CL, PH source: Unknown source or quality of data
            CEC source: Calculated
          Nutrient
          Water: Thickness=[100, 100, 200, 200, 200, 300, 300]; InitialValues=[0.11, 0.11, 0.098, 0.05, 0.06, 0.07, 0.07]; FilledFromTop=true
          Solute NO3: Thickness=[600, 100, 200, 200, 200, 100]; InitialValues=[59.2, 50, 1, 1, 1, 1]; InitialValuesUnits=kg/ha; WaterTableConcentration=0; D0=0; DepthConstant=0; MaxDepthSoluteAccessible=0; RunoffEffectivenessAtMovingSolute=0; MaxEffectiveRunoff=0
          Solute NH4: Thickness=[100, 100, 200, 200, 200, 300, 300]; InitialValues=[0.1, 0.1, 0.1, 0.1, 0.1, 0.1, 0.1]; InitialValuesUnits=ppm; WaterTableConcentration=0; D0=0; DepthConstant=0; MaxDepthSoluteAccessible=0; RunoffEffectivenessAtMovingSolute=0; MaxEffectiveRunoff=0
          Solute Urea: Thickness=[100, 100, 200, 200, 200, 300, 300]; InitialValues=[0, 0, 0, 0, 0, 0, 0]; InitialValuesUnits=ppm; WaterTableConcentration=0; D0=0; DepthConstant=0; MaxDepthSoluteAccessible=0; RunoffEffectivenessAtMovingSolute=0; MaxEffectiveRunoff=0
          SoilTemperature CERESSoilTemperature: InteractionsPerDay=8
        Plant Wheat
        Fertiliser
        Irrigation
        SurfaceOrganicMatter: InitialResidueName=wheat_stubble; InitialResidueType=wheat; InitialResidueMass=5000; InitialStandingFraction=0; InitialCPR=0; InitialCNR=100
        MicroClimate: a_interception=0; b_interception=1; c_interception=0; d_interception=0; SoilHeatFluxFraction=0.4; MinimumHeightDiffForNewLayer=0; NightInterceptionFraction=0.5; ReferenceHeight=2
        Manager Sowing
          Crop = [Wheat]
          SowDate = 24-Jul
          CultivarName = Cutlass
          SowingDepth = 50
          RowSpacing = 300
          Population = 120
          script: same as in 2018BirchipVIC.2018BirchipVIC.Field.Sowing
        Manager IrrigateAtSowing
          Amount = 50
          Depth = 0
          Efficiency = 1
          WillRunoff = False
```csharp
using Models.Soils;
using System;
using System.Linq;
using Models.Core;
using Models.PMF;
using APSIM.Shared.Utilities;
namespace Models
{
    [Serializable]
    public class Script : Model
    {
        [Link] Clock Clock;
        [Link] Irrigation Irrigation;
        [Link] Water Water;
        
        [Description("Amount of irrigation to be applied (mm)")] 
        public double Amount { get; set; }
        
        [Description("Depth in the soil to apply the  irrigation (mm)")] 
        public double Depth { get; set; }
        
        [Description("Efficiency of irrigation (0-1)")] 
        public double Efficiency { get; set; }
        
        [Description("Will the irrigation runoff?")] 
        public bool WillRunoff { get; set; }

        [EventSubscribe("Sowing")]
        private void OnSowing(object sender, EventArgs e)
        {
            Irrigation.Apply(amount: Amount, depth: Depth, efficiency: Efficiency, willRunoff: WillRunoff);
        }
    }
}
```
        Manager FertiliseAtSowingDAP
          Crop = [Wheat]
          FertiliserType = NO3N
          Amount = 50
          script: same as in 2018BirchipVIC.2018BirchipVIC.Field.FertiliseAtSowingGranulock
        Manager FertiliseOnZ31
          Stage = 31
          FertiliserType = UreaN
          Amount = 40
          FertiliseDepth = 0
```csharp
using APSIM.Core;
using Models.PMF;
using Models.Core;
using System.Linq;
using System;
using Models.Soils;
namespace Models
{
    [Serializable] 
    public class Script : Model, IStructureDependency
    {
        [Link] private Clock Clock;
        [Link] private Fertiliser Fertiliser;
        [Link] private Summary Summary;
        [Link] private Plant Wheat;
        public IStructure Structure { private get; set; }
 
        private bool hasFertilised = false;

        [Description("Fertilise once crop reaches stage:")]
        public double Stage { get; set; }

        [Description("Type of fertiliser to apply? ")] 
        [Display(Type = DisplayType.FertiliserType)]public string FertiliserType { get; set; }

        [Description("Amount of fertiliser to be applied (kg/ha)")] 
        public double Amount { get; set; }
        
        [Description("Fertilise depth (mm)")]
        public double FertiliseDepth { get; set; }
     

        

        [EventSubscribe("DoManagement")] 
        private void OnDoManagement(object sender, EventArgs e)
        { 
            double zadok = (double)Structure.GetObject("Phenology.Zadok.Stage", relativeTo: Wheat).Value; 
 
            if (zadok >= Stage && !hasFertilised)
            { 
                Summary.WriteMessage(this, "Fertilising!!", MessageType.Diagnostic); 
                Fertiliser.Apply(amount: Amount, type: FertiliserType, depth: FertiliseDepth);
                hasFertilised = true; 
            } 
        }

        [EventSubscribe("Sowing")]
        private void OnSowing(object sender, EventArgs e)
        {
            hasFertilised = false;
        }
    }
}
```
        Operations FertilizationEvents
        Operations IrrigationEvents
        Manager Harvest: same as 2018BirchipVIC.2018BirchipVIC.Field.Harvest
        Report ReportDaily: same as 2018BirchipVIC.2018BirchipVIC.Field.ReportDaily
        Report ReportHarvest: EventNames=[Wheat].Harvesting
          VariableNames:
            [Clock].Today as Date
            [Wheat].Phenology.Zadok.Stage as ZadokStage
            [Wheat].Phenology.CurrentStageName as CurrentStageName
            [Wheat].AboveGround.Wt as AboveGroundWt
            [Wheat].Grain.Total.Wt*10 as Yield
            [Wheat].Grain.Size as GrainSize
            [Wheat].Grain.Number as GrainNumber
            [Wheat].Phenology.FloweringDAS as FloweringDAS
            [Wheat].Phenology.EmergenceDAS as EmergenceDAS
        Report HarvestReportFHL: same as 2018BirchipVIC.2018BirchipVIC.Field.HarvestReportFHL
  Experiment 2018LoxtonSA
    Factors
      Permutation TOSxCv
        Factor TOS
          CompositeFactor 1
            Specifications:
              [Sowing].Script.SowDate=18-apr
              [Sowing].Script.Population=150
              [Sowing].Script.RowSpacing=300
              [Sowing].Script.SowingDepth=50
              [IrrigationEvents]
            Operations IrrigationEvents
          CompositeFactor 2
            Specifications:
              [Sowing].Script.SowDate=07-may
              [Sowing].Script.Population=150
              [Sowing].Script.RowSpacing=300
              [Sowing].Script.SowingDepth=50
              [IrrigationEvents]
            Operations IrrigationEvents
          CompositeFactor 3
            Specifications:
              [Sowing].Script.SowDate=24-may
              [Sowing].Script.Population=150
              [Sowing].Script.RowSpacing=300
              [Sowing].Script.SowingDepth=50
              [IrrigationEvents]
            Operations IrrigationEvents
        Factor Cv
          CompositeFactor Scepter
            Specifications:
              [Sowing].Script.CultivarName=Scepter
              [Scepter]
            Cultivar Scepter
              Command:
                [Phenology].Phyllochron.BasePhyllochron.FixedValue = 90 // 107.602580952482
                [Phenology].PhyllochronPpSensitivity.FixedValue = 0.23032920462638
                [Phenology].CAMP.EnvData.VrnTreatTemp = 6
                [Phenology].CAMP.EnvData.VrnTreatDuration = 60
                [Phenology].CAMP.FLNparams.MinLN = 7
                [Phenology].CAMP.FLNparams.PpLN = 2
                [Phenology].CAMP.FLNparams.VrnLN = 2
                [Phenology].CAMP.FLNparams.VxPLN = -1
                [Phenology].HeadEmergenceLongDayBase.FixedValue = 170
                [Phenology].HeadEmergencePpSensitivity.FixedValue = 3
          CompositeFactor Cutlass
            Specifications:
              [Sowing].Script.CultivarName=Cutlass
              [Cutlass]
            Cultivar Cutlass
              Command:
                [Phenology].Phyllochron.BasePhyllochron.FixedValue = 95.8008034182983
                [Phenology].PhyllochronPpSensitivity.FixedValue = 0.352406544577556
                [Phenology].CAMP.FLNparams.MinLN = 7
                [Phenology].CAMP.FLNparams.PpLN = 5
                [Phenology].CAMP.FLNparams.VrnLN = 1
                [Phenology].CAMP.FLNparams.VxPLN = 2
                [Phenology].CAMP.EnvData.VrnTreatTemp = 5.8
                [Phenology].CAMP.EnvData.VrnTreatDuration = 60
                [Phenology].HeadEmergenceLongDayBase.FixedValue = 130
                [Phenology].HeadEmergencePpSensitivity.FixedValue = 2
          CompositeFactor Kittyhawk
            Specifications:
              [Sowing].Script.CultivarName=Kittyhawk
              [Kittyhawk]
            Cultivar Kittyhawk
              Command:
                [Phenology].Phyllochron.BasePhyllochron.FixedValue = 84 // 93.7220123291132
                [Phenology].PhyllochronPpSensitivity.FixedValue = 0.212225680614483
                [Phenology].CAMP.FLNparams.MinLN = 10
                [Phenology].CAMP.FLNparams.PpLN = 2
                [Phenology].CAMP.FLNparams.VrnLN = 8
                [Phenology].CAMP.FLNparams.VxPLN = -1
                [Phenology].CAMP.EnvData.VrnTreatTemp = 5.8
                [Phenology].CAMP.EnvData.VrnTreatDuration = 60
                [Phenology].HeadEmergenceLongDayBase.FixedValue = 50
                [Phenology].HeadEmergencePpSensitivity.FixedValue = 4
          CompositeFactor Forrest
            Specifications:
              [Sowing].Script.CultivarName=Forrest
              [Forrest]
            Cultivar Forrest
              Command:
                [Phenology].Phyllochron.BasePhyllochron.FixedValue = 99.8910902837222
                [Phenology].PhyllochronPpSensitivity.FixedValue = 0.417874283738016
                [Phenology].CAMP.FLNparams.MinLN = 6
                [Phenology].CAMP.FLNparams.PpLN = 5
                [Phenology].CAMP.FLNparams.VrnLN = 2
                [Phenology].CAMP.FLNparams.VxPLN = 1
                [Phenology].CAMP.EnvData.VrnTreatTemp = 5.8
                [Phenology].CAMP.EnvData.VrnTreatDuration = 60
                [Phenology].HeadEmergenceLongDayBase.FixedValue = 370
                [Phenology].HeadEmergencePpSensitivity.FixedValue = 1
          CompositeFactor EmuRock
            Specifications:
              [Sowing].Script.CultivarName=Emu_Rock
              [Emu_Rock]
            Cultivar Emu_Rock
              Command:
                [Phenology].Phyllochron.BasePhyllochron.FixedValue = 100 // 94.7698873180009
                [Phenology].PhyllochronPpSensitivity.FixedValue = 0.358007951256312
                [Phenology].CAMP.FLNparams.MinLN = 6
                [Phenology].CAMP.FLNparams.PpLN = 1
                [Phenology].CAMP.FLNparams.VrnLN = 1
                [Phenology].CAMP.FLNparams.VxPLN = -1
                [Phenology].CAMP.EnvData.VrnTreatTemp = 5.8
                [Phenology].CAMP.EnvData.VrnTreatDuration = 60
                [Phenology].HeadEmergenceLongDayBase.FixedValue = 200 // 183.0
                [Phenology].HeadEmergencePpSensitivity.FixedValue = 1.7962741039794823
          CompositeFactor Trojan
            Specifications:
              [Sowing].Script.CultivarName=Trojan
              [Trojan]
            Cultivar Trojan
              Command:
                [Phenology].Phyllochron.BasePhyllochron.FixedValue = 93 // 99.1351271229079
                [Phenology].PhyllochronPpSensitivity.FixedValue = 0.35511766231399
                [Phenology].CAMP.EnvData.VrnTreatTemp = 6
                [Phenology].CAMP.EnvData.VrnTreatDuration = 60
                [Phenology].CAMP.FLNparams.MinLN = 7
                [Phenology].CAMP.FLNparams.PpLN = 5
                [Phenology].CAMP.FLNparams.VrnLN = 2
                [Phenology].CAMP.FLNparams.VxPLN = 1
                [Phenology].HeadEmergenceLongDayBase.FixedValue = 50
                [Phenology].HeadEmergencePpSensitivity.FixedValue = 4
    Simulation 2018LoxtonSA
      Clock: Start=2018-04-18; End=2018-12-31
      Summary SummaryFile
      Weather: FileName=Met/Loxton_2018.met
      SoilArbitrator
      Zone Field: Area=1; Slope=0; AspectAngle=0; Altitude=50
        Soil Mod Deep Sand over Sandy Clay Loam (Loxton No341): SoilType=Sandy clay; Site=Loxton; NearestTown=Loxton; Region=Riverland; State=South Australia; Country=Australia; NaturalVegetation=Mallee; ApsoilNumber=341; Latitude=-34.496; Longitude=140.573; LocationAccuracy=+/- 500m; YearOfSampling=0; Comments=Sand - Moderate constraints
          DataSource=Based on Soil Characterisation undertaken by Reaping Rewards project 2006 - Mod constraints
          Physical
            Thickness  ParticleSizeSand  ParticleSizeSilt  ParticleSizeClay  Rocks  BD   AirDry  LL15  DUL   SAT
            100        91                1.8               7.7               0      1.3  0.03    0.05  0.11  0.46
            100        91                1.8               7.7               0      1.3  0.03    0.05  0.11  0.46
            200        80                3.8               16.1              0      1.5  0.03    0.04  0.14  0.38
            200        67                2.4               21.3              0      1.5  0.05    0.05  0.15  0.38
            200        67                2                 22.4              0      1.5  0.06    0.06  0.15  0.38
            300        57                1.3               20                0      1.5  0.07    0.07  0.15  0.38
            300        57                1.3               20                0      1.5  0.07    0.07  0.15  0.38
            BD, AirDry, LL15, DUL, SAT source: Unknown source or quality of data
            Rocks source: Calculated
            SoilCrop wheatSoil: LL=[0.05, 0.05, 0.04, 0.05, 0.06, 0.07, 0.07]; KL=[0.06, 0.06, 0.06, 0.04, 0.04, 0.04, 0.04]; XF=[1, 1, 1, 1, 1, 1, 1]
              LL source: Field measured and checked for sensibility
            SoilCrop WheatSoil: same as 2017LoxtonSA.2017LoxtonSA.Field.Mod Deep Sand over Sandy Clay Loam (Loxton No341).Physical.WheatSoil
            SoilCrop canolaSoil: same as 2017LoxtonSA.2017LoxtonSA.Field.Mod Deep Sand over Sandy Clay Loam (Loxton No341).Physical.WheatSoil
          WaterBalance SoilWater: same as 2017LoxtonSA.2017LoxtonSA.Field.Mod Deep Sand over Sandy Clay Loam (Loxton No341).SoilWater
          Organic: FOMCNRatio=40; CarbonUnits=Total
            Thickness  Carbon  SoilCNRatio  FBiom  FInert  FOM
            100        1.261   12           0.04   0.2     324.933
            100        1.027   12           0.04   0.3     262.259
            200        1.027   12           0.02   0.3     170.846
            200        0.78    12           0.02   0.4     111.296
            200        0.403   12           0.02   0.7     72.502
            300        0.299   12           0.01   1       38.121
            300        0.299   12           0.01   1       20.043
          Chemical: PHUnits=Water
            Thickness  PH   EC   CEC
            100        7.6  0.1  10.99015
            100        7.6  0.1  10.4637
            200        8.1  0.1  11.96945
            200        8.1  0.1  11.9311
            200        8.3  0.1  11.37655
            300        8.5  0.2  9.83175
            300        8.5  0.2  9.83175
            EC, CL, PH source: Unknown source or quality of data
            CEC source: Calculated
          Nutrient
          Water: Thickness=[100, 100, 200, 200, 200, 300, 300]; InitialValues=[0.11, 0.11, 0.14, 0.067, 0.06, 0.07, 0.07]; FilledFromTop=true
          Solute NO3: Thickness=[600, 100, 200, 200, 200, 300, 300]; InitialValues=[40, 10.1, 1, 1, 1, 1, 1]; InitialValuesUnits=kg/ha; WaterTableConcentration=0; D0=0; DepthConstant=0; MaxDepthSoluteAccessible=0; RunoffEffectivenessAtMovingSolute=0; MaxEffectiveRunoff=0
          Solute NH4: same as 2017LoxtonSA.2017LoxtonSA.Field.Mod Deep Sand over Sandy Clay Loam (Loxton No341).NH4
          Solute Urea: same as 2017LoxtonSA.2017LoxtonSA.Field.Mod Deep Sand over Sandy Clay Loam (Loxton No341).Urea
          SoilTemperature CERESSoilTemperature: InteractionsPerDay=8
        Plant Wheat
        Fertiliser
        Irrigation
        SurfaceOrganicMatter: InitialResidueName=wheat_stubble; InitialResidueType=wheat; InitialResidueMass=5000; InitialStandingFraction=0; InitialCPR=0; InitialCNR=100
        MicroClimate: a_interception=0; b_interception=1; c_interception=0; d_interception=0; SoilHeatFluxFraction=0.4; MinimumHeightDiffForNewLayer=0; NightInterceptionFraction=0.5; ReferenceHeight=2
        Manager Sowing
          Crop = [Wheat]
          SowDate = 24-Jul
          CultivarName = Scepter
          SowingDepth = 50
          RowSpacing = 300
          Population = 120
          script: same as in 2018BirchipVIC.2018BirchipVIC.Field.Sowing
        Manager IrrigateAtSowing: same as 2017LoxtonSA.2017LoxtonSA.Field.IrrigateAtSowing
        Manager FertiliseAtSowingDAP
          Crop = [Wheat]
          FertiliserType = DAP
          Amount = 50
          script: same as in 2018BirchipVIC.2018BirchipVIC.Field.FertiliseAtSowingGranulock
        Manager FertiliseOnZ31UreaN
          Stage = 31
          FertiliserType = UreaN
          Amount = 100
```csharp
using APSIM.Core;
using Models.PMF;
using Models.Core;
using System.Linq;
using System;
using Models.Soils;
namespace Models
{
    [Serializable] 
    public class Script : Model, IStructureDependency
    {
        [Link] private Clock Clock;
        [Link] private Fertiliser Fertiliser;
        [Link] private Summary Summary;
        [Link] private Plant Wheat;
        public IStructure Structure { private get; set; }
 
        private bool hasFertilised = false;

        [Description("Fertilise once crop reaches stage:")]
        public double Stage { get; set; }

        [Description("Type of fertiliser to apply? ")] 
        [Display(Type = DisplayType.FertiliserType)]public string FertiliserType { get; set; }

        [Description("Amount of fertiliser to be applied (kg/ha)")] 
        public double Amount { get; set; }
     

        

        [EventSubscribe("DoManagement")] 
        private void OnDoManagement(object sender, EventArgs e)
        { 
            double zadok = (double)Structure.GetObject("Phenology.Zadok.Stage", relativeTo: Wheat).Value; 
 
            if (zadok >= Stage && !hasFertilised)
            { 
                Summary.WriteMessage(this, "Fertilising!!", MessageType.Diagnostic); 
                Fertiliser.Apply(amount: Amount, type: FertiliserType);
                hasFertilised = true; 
            } 
        }

        [EventSubscribe("Sowing")]
        private void OnSowing(object sender, EventArgs e)
        {
            hasFertilised = false;
        }
    }
}
```
        Operations IrrigationEvents
        Manager IrrigatingAtJointing
          Stage = 31
          Amount = 10
```csharp
using APSIM.Core;
using Models.PMF;
using Models.Core;
using System.Linq;
using System;
using Models.Soils;
namespace Models
{
    [Serializable] 
    public class Script : Model, IStructureDependency
    {
        [Link] private Clock Clock;
        [Link] Irrigation Irrigation;
        [Link] private Summary Summary;
        [Link] private Plant Wheat;
        public IStructure Structure { private get; set; }
 
        private bool hasIrrigated = false;

        [Description("Fertilise once crop reaches Zadok stage:")]
        public double Stage { get; set; }

        [Description("Amount of water to be applied (mm)")] 
        public double Amount { get; set; }
     
        [EventSubscribe("DoManagement")] 
        private void OnDoManagement(object sender, EventArgs e)
        { 
            double zadok = (double)Structure.GetObject("Phenology.Zadok.Stage", relativeTo: Wheat).Value; 
 
            if (zadok >= Stage && !hasIrrigated)
            { 
                Summary.WriteMessage(this, "Irrigating!!", MessageType.Diagnostic); 
                Irrigation.Apply(amount: Amount, depth: 0, efficiency: 1);
                hasIrrigated = true; 
            } 
        }

        [EventSubscribe("Sowing")]
        private void OnSowing(object sender, EventArgs e)
        {
            hasIrrigated = false;
        }
    }
}
```
        Manager IrrigatingAtFlowering
          Stage = 60
          Amount = 20
```csharp
using APSIM.Core;
using Models.PMF;
using Models.Core;
using System.Linq;
using System;
using Models.Soils;
namespace Models
{
    [Serializable] 
    public class Script : Model, IStructureDependency
    {
        [Link] private Clock Clock;
        [Link] Irrigation Irrigation;
        [Link] private Summary Summary;
        [Link] private Plant Wheat;
        public IStructure Structure { private get; set; }
 
        private bool hasIrrigated = false;

        [Description("Fertilise once crop reaches stage:")]
        public double Stage { get; set; }

        [Description("Amount of water to be applied (mm)")] 
        public double Amount { get; set; }
     
        [EventSubscribe("DoManagement")] 
        private void OnDoManagement(object sender, EventArgs e)
        { 
            double zadok = (double)Structure.GetObject("Phenology.Zadok.Stage", relativeTo: Wheat).Value; 
 
            if (zadok >= Stage && !hasIrrigated)
            { 
                Summary.WriteMessage(this, "Irrigating!!", MessageType.Diagnostic); 
                Irrigation.Apply(amount: Amount, depth: 0, efficiency: 1);
                hasIrrigated = true; 
            } 
        }

        [EventSubscribe("Sowing")]
        private void OnSowing(object sender, EventArgs e)
        {
            hasIrrigated = false;
        }
    }
}
```
        Manager IrrigatingAtGrainFilling
          Stage = 75
          Amount = 20
          script: same as in 2018LoxtonSA.2018LoxtonSA.Field.IrrigatingAtFlowering
        Manager Harvest: same as 2018BirchipVIC.2018BirchipVIC.Field.Harvest
        Report ReportDaily: same as 2018BirchipVIC.2018BirchipVIC.Field.ReportDaily
        Report ReportHarvest: same as 2017LoxtonSA.2017LoxtonSA.Field.ReportHarvest
        Report HarvestReportFHL: same as 2018BirchipVIC.2018BirchipVIC.Field.HarvestReportFHL
  Experiment 2017DaleWA
    Factors
      Permutation TOSxCv
        Factor TOS
          CompositeFactor 1
            Specifications:
              [Sowing].Script.SowDate=13-apr
              [Sowing].Script.Population=120
              [Sowing].Script.RowSpacing=254
              [Sowing].Script.SowingDepth=50
              [IrrigationEvents]
            Operations IrrigationEvents
              2017-04-12  [Irrigation].Apply(amount: 40, depth: 0, efficiency: 1)
          CompositeFactor 2
            Specifications:
              [Sowing].Script.SowDate=27-apr
              [Sowing].Script.Population=120
              [Sowing].Script.RowSpacing=254
              [Sowing].Script.SowingDepth=50
              [IrrigationEvents]
            Operations IrrigationEvents
              2017-04-27  [Irrigation].Apply(amount: 40, depth: 0, efficiency: 1)
              2017-09-15  [Irrigation].Apply(amount: 30, depth: 0, efficiency: 1)
          CompositeFactor 3
            Specifications:
              [Sowing].Script.SowDate=12-may
              [Sowing].Script.Population=120
              [Sowing].Script.RowSpacing=254
              [Sowing].Script.SowingDepth=50
              [IrrigationEvents]
            Operations IrrigationEvents
              2017-05-12  [Irrigation].Apply(amount: 40, depth: 0, efficiency: 1)
              2017-09-01  [Irrigation].Apply(amount: 40, depth: 0, efficiency: 1)
          CompositeFactor 4
            Specifications:
              [Sowing].Script.SowDate=29-may
              [Sowing].Script.Population=120
              [Sowing].Script.RowSpacing=254
              [Sowing].Script.SowingDepth=50
              [IrrigationEvents]
            Operations IrrigationEvents
              2017-05-29  [Irrigation].Apply(amount: 40, depth: 0, efficiency: 1)
              2017-09-15  [Irrigation].Apply(amount: 30, depth: 0, efficiency: 1)
        Factor Cv
          CompositeFactor Scepter
            Specifications:
              [Sowing].Script.CultivarName=Scepter
              [Scepter]
            Cultivar Scepter
              Command:
                [Phenology].Phyllochron.BasePhyllochron.FixedValue = 123 // 107.602580952482
                [Phenology].PhyllochronPpSensitivity.FixedValue = 0.23032920462638
                [Phenology].CAMP.EnvData.VrnTreatTemp = 6
                [Phenology].CAMP.EnvData.VrnTreatDuration = 60
                [Phenology].CAMP.FLNparams.MinLN = 7
                [Phenology].CAMP.FLNparams.PpLN = 2
                [Phenology].CAMP.FLNparams.VrnLN = 2
                [Phenology].CAMP.FLNparams.VxPLN = -1
                [Phenology].HeadEmergenceLongDayBase.FixedValue = 170
                [Phenology].HeadEmergencePpSensitivity.FixedValue = 0
          CompositeFactor Cutlass
            Specifications:
              [Sowing].Script.CultivarName=Cutlass
              [Cutlass]
            Cultivar Cutlass
              Command:
                [Phenology].Phyllochron.BasePhyllochron.FixedValue = 100 // 105 // 95.8008034182983
                [Phenology].PhyllochronPpSensitivity.FixedValue = 0.352406544577556
                [Phenology].CAMP.FLNparams.MinLN = 7
                [Phenology].CAMP.FLNparams.PpLN = 5
                [Phenology].CAMP.FLNparams.VrnLN = 1
                [Phenology].CAMP.FLNparams.VxPLN = 2
                [Phenology].CAMP.EnvData.VrnTreatTemp = 5.8
                [Phenology].CAMP.EnvData.VrnTreatDuration = 60
                [Phenology].HeadEmergenceLongDayBase.FixedValue = 130
                [Phenology].HeadEmergencePpSensitivity.FixedValue = 2
          CompositeFactor Kittyhawk
            Specifications:
              [Sowing].Script.CultivarName=Kittyhawk
              [Kittyhawk]
            Cultivar Kittyhawk
              Command:
                [Phenology].Phyllochron.BasePhyllochron.FixedValue = 107 // 105 // 93.7220123291132
                [Phenology].PhyllochronPpSensitivity.FixedValue = 0.212225680614483
                [Phenology].CAMP.FLNparams.MinLN = 10
                [Phenology].CAMP.FLNparams.PpLN = 2
                [Phenology].CAMP.FLNparams.VrnLN = 8
                [Phenology].CAMP.FLNparams.VxPLN = -1
                [Phenology].CAMP.EnvData.VrnTreatTemp = 5.8
                [Phenology].CAMP.EnvData.VrnTreatDuration = 60
                [Phenology].HeadEmergenceLongDayBase.FixedValue = 50
                [Phenology].HeadEmergencePpSensitivity.FixedValue = 4
          CompositeFactor Forrest
            Specifications:
              [Sowing].Script.CultivarName=Forrest
              [Forrest]
            Cultivar Forrest: same as Replacements.Cultivars.Forrest
          CompositeFactor EmuRock
            Specifications:
              [Sowing].Script.CultivarName=Emu_Rock
              [Emu_Rock]
            Cultivar Emu_Rock: same as Replacements.Cultivars.Emu_Rock
          CompositeFactor Trojan: same as 2018BirchipVIC.Factors.TOSxCv.Cv.Trojan
    Simulation 2017DaleWA
      Clock: Start=2017-01-01; End=2017-12-31
      Summary SummaryFile
      Weather: FileName=Met/Dale.met
      SoilArbitrator
      Zone Field: Area=1; Slope=0; AspectAngle=0; Altitude=50
        Soil Deep sandy duplex (Neridup No459): SoilType=Sandy; LocalName=Deep sandy duplexes; Site=Neridup; NearestTown=Neridup; Region=Southern Region; State=Western Australia; Country=Australia; ApsoilNumber=459; Latitude=-33.644; Longitude=122.118; LocationAccuracy=+/- 20m; YearOfSampling=2006
          DataSource=DAFWA David Hall and CSIRO Yvette Oliver. GRDC subsoil constraints project
          Comments=Deep sandy duplex - Deep sandy duplex - grey sand over mottled red/grey clay; measured C_2006
          Physical
            Thickness  ParticleSizeSand  ParticleSizeSilt  ParticleSizeClay  Rocks  BD   AirDry  LL15  DUL   SAT
            100        5                 65                30                0      1.5  0.025   0.04  0.12  0.38
            100        5                 65                30                0      1.5  0.03    0.04  0.12  0.38
            200        5                 65                30                0      1.6  0.04    0.04  0.15  0.38
            200        5                 65                30                0      1.6  0.06    0.06  0.26  0.38
            200        5                 65                30                0      1.7  0.1     0.1   0.26  0.35
            200        5                 65                30                0      1.7  0.1     0.1   0.26  0.35
            200        5                 65                30                0      1.7  0.1     0.1   0.26  0.35
            200        5                 65                30                0      1.7  0.1     0.1   0.26  0.35
            200        5                 65                30                0      1.7  0.1     0.1   0.26  0.35
            200        5                 65                30                0      1.7  0.1     0.1   0.26  0.35
            BD, AirDry, LL15 source: Estimated based on local knowledge
            DUL source: Field measured and checked for sensibility
            SAT source: Calculated from measured, estimated or calculated BD
            Rocks, ParticleSizeSand, ParticleSizeSilt, ParticleSizeClay source: Calculated
            SoilCrop wheatSoil
              LL=[0.04, 0.04, 0.04, 0.06, 0.21, 0.26, 0.26, 0.26, 0.26, 0.26]
              KL=[0.06, 0.06, 0.06, 0.06, 0.06, 0.04, 0.04, 0.04, 0.04, 0.04]
              XF=[1, 1, 1, 1, 1, 1, 1, 1, 1, 1]
              LL source: Estimated based on local knowledge
            SoilCrop barleySoil
              LL=[0.04, 0.04, 0.04, 0.06, 0.21, 0.26, 0.26, 0.26, 0.26, 0.26]
              KL=[0.07, 0.07, 0.07, 0.07, 0.05, 0.05, 0.05, 0.03, 0.02, 0.01]
              XF=[1, 1, 1, 1, 1, 1, 1, 1, 1, 1]
              LL source: Unknown source or quality of data
            SoilCrop canolaSoil
              LL=[0.04, 0.04, 0.04, 0.06, 0.21, 0.26, 0.26, 0.26, 0.26, 0.26]
              KL=[0.06, 0.06, 0.06, 0.06, 0.06, 0.04, 0.04, 0.04, 0.04, 0.04]
              XF=[1, 1, 1, 1, 1, 1, 1, 1, 1, 1]
              LL source: Field measured and checked for sensibility
            SoilCrop SCRUMSoil: same as 2017DaleWA.2017DaleWA.Field.Deep sandy duplex (Neridup No459).Physical.wheatSoil
          WaterBalance: SummerDate=1-Nov; SummerU=5; SummerCona=2.5; WinterDate=1-Apr; WinterU=2; WinterCona=2; DiffusConst=40; DiffusSlope=16; Salb=0.12; CN2Bare=73; CNRed=20; CNCov=0.8; DischargeWidth=5; CatchmentArea=10; PSIDul=-100; Thickness=[100, 300, 300, 300, 300, 300]; SWCON=[0.3, 0.3, 0.3, 0.3, 0.3, 0.3]
            LateralFlowModel
            RunoffModel: TillageCnCumWater=0; TillageCnRed=0; CumWaterSinceTillage=0
              CNReductionForCover
                LinearInterpolationFunction EffectiveCoverMultiplier
                  XYPairs: X=[0, 600, 1800, 30000]; Y=[1, 1, 0, 0]
                  Constant XValue: FixedValue=0
              CNReductionForTillage: tillageCnCumWater=0; tillageCnRed=0
            EvaporationModel: t=0
            SaturatedFlowModel
            UnsaturatedFlowModel
            WaterTableModel
          SoilTemperature Temperature: InteractionsPerDay=8
          Water: Thickness=[100, 100, 200, 200, 200, 200, 200, 200, 200, 200]; InitialValues=[0.12, 0.12, 0.15, 0.26, 0.115, 0.1, 0.1, 0.1, 0.1, 0.1]; FilledFromTop=true
          Solute NO3: Thickness=[100, 100, 200, 200, 200, 200, 200, 200, 200, 200]; InitialValues=[50, 0, 0, 0, 0, 0, 0, 0, 0, 0]; InitialValuesUnits=kg/ha; WaterTableConcentration=0; D0=0; DepthConstant=0; MaxDepthSoluteAccessible=0; RunoffEffectivenessAtMovingSolute=0; MaxEffectiveRunoff=0
          Solute NH4: Thickness=[100, 100, 200, 200, 200, 200, 200, 200, 200, 200]; InitialValues=[1, 0, 0, 0, 0, 0, 0, 0, 0, 0]; InitialValuesUnits=kg/ha; WaterTableConcentration=0; D0=0; DepthConstant=0; MaxDepthSoluteAccessible=0; RunoffEffectivenessAtMovingSolute=0; MaxEffectiveRunoff=0
          Solute Urea: Thickness=[100, 100, 200, 200, 200, 200, 200, 200, 200, 200]; InitialValues=[0, 0, 0, 0, 0, 0, 0, 0, 0, 0]; InitialValuesUnits=ppm; WaterTableConcentration=0; D0=0; DepthConstant=0; MaxDepthSoluteAccessible=0; RunoffEffectivenessAtMovingSolute=0; MaxEffectiveRunoff=0
          Nutrient
          Organic: FOMCNRatio=0; CarbonUnits=Total
            Thickness  Carbon  SoilCNRatio  FBiom  FInert  FOM
            100        0.2     12           0.2    0.8     100
            100        0.2     12           0.2    0.8     100
            200        0.2     12           0.2    0.8     100
            200        0.2     12           0.2    0.8     100
            200        0.2     12           0.2    0.8     100
            200        0.2     12           0.2    0.8     100
            200        0.2     12           0.2    0.8     100
            200        0.2     12           0.2    0.8     100
            200        0.2     12           0.2    0.8     100
            200        0.2     12           0.2    0.8     100
          Chemical: PHUnits=Water
            Thickness  PH  CEC
            100        7   8.795
            100        7   8.795
            200        7   8.795
            200        7   8.795
            200        7   8.795
            200        7   8.795
            200        7   8.795
            200        7   8.795
            200        7   8.795
            200        7   8.795
            CEC source: Calculated
        Plant Wheat
        Fertiliser
        Irrigation
        SurfaceOrganicMatter: InitialResidueName=wheat_stubble; InitialResidueType=wheat; InitialResidueMass=500; InitialStandingFraction=0; InitialCPR=0; InitialCNR=100
        MicroClimate: a_interception=0; b_interception=1; c_interception=0; d_interception=0; SoilHeatFluxFraction=0.4; MinimumHeightDiffForNewLayer=0; NightInterceptionFraction=0.5; ReferenceHeight=2
        Manager Sowing
          Crop = [Wheat]
          SowDate = 24-Jul
          CultivarName = Trojan
          SowingDepth = 50
          RowSpacing = 254
          Population = 150
          script: same as in 2018BirchipVIC.2018BirchipVIC.Field.Sowing
        Operations IrrigationEvents
        Manager IrrigateOnSowing (disabled)
          Amount = 40
          Depth = 0
          Efficiency = 1
          WillRunoff = False
          script: same as in 2017LoxtonSA.2017LoxtonSA.Field.IrrigateAtSowing
        Manager FertiliseAtSowingGustoGoldN
          Crop = [Wheat]
          FertiliserType = NO3N
          Amount = 14.4
          script: same as in 2018BirchipVIC.2018BirchipVIC.Field.FertiliseAtSowingGranulock
        Manager FertiliseAtSowingUrea
          Crop = [Wheat]
          FertiliserType = UreaGranular
          Amount = 100
          script: same as in 2018BirchipVIC.2018BirchipVIC.Field.FertiliseAtSowingGranulock
        Manager FertiliseOnZ31UAN
          Stage = 21
          FertiliserType = UreaN
          Amount = 33
          script: same as in 2018BirchipVIC.2018BirchipVIC.Field.FertiliseOnZ31Urea
        Manager FertiliseOnZ33UAN
          Stage = 33
          FertiliserType = UreaN
          Amount = 13
          script: same as in 2018BirchipVIC.2018BirchipVIC.Field.FertiliseOnZ31Urea
        Manager Harvest: same as 2018BirchipVIC.2018BirchipVIC.Field.Harvest
        Report ReportDaily: EventNames=[Clock].DoReport
          VariableNames:
            [Clock].Today as Date
            [Wheat].Phenology.Zadok.Stage as ZadokStage
            [Wheat].Phenology.CurrentStageName as CurrentStageName
            [Wheat].AboveGround.Wt as AboveGroundWt
            [Wheat].Grain.Total.Wt*10 as Yield
            [Wheat].Grain.Size as GrainSize
            [Wheat].Grain.Number as GrainNumber
            [Wheat].LAI as LAI
            [Wheat].Phenology.ThermalTime as TT
            [Wheat].Phenology.AccumulatedTT as AccumulatedTT
            [Weather].MaxT as maxT
            [Weather].MinT as minT
            [Wheat].Leaf.Fn
            [Wheat].Leaf.Fw
        Report ReportHarvest: same as 2017LoxtonSA.2017LoxtonSA.Field.ReportHarvest
        Report HarvestReportFHL: EventNames=[Wheat].Harvesting
          VariableNames:
            [Clock].Today as Date
            [Plant].SowingDate.Year as Year
            [Plant].SowingDate as SowingDate
            [Plant].SowingData.Cultivar as Variety
            [Wheat].Phenology.Zadok.Stage as ZadokStage
            [Wheat].Phenology.CurrentStageName as CurrentStageName
            [Wheat].AboveGround.Wt as AboveGroundWt
            [Wheat].Grain.Size as GrainSize
            [Wheat].Grain.Number as GrainNumber
            [Wheat].Phenology.FloweringDAS as FloweringDAS
            [Wheat].Phenology.EmergenceDAS as EmergenceDAS
            [FrostHeatDamageFunctions].FrostHeatYield as Wheat.Grain.Wt
  Experiment 2017QuairadingWA
    Factors
      Permutation TOSxCv
        Factor TOS
          CompositeFactor 1
            Specifications:
              [Sowing].Script.SowDate=25-apr
              //[Sowing].Script.SowDate=12-apr
              [Sowing].Script.Population=120
              [Sowing].Script.RowSpacing=254
              [Sowing].Script.SowingDepth=50
              [IrrigationEvents]
            Operations IrrigationEvents
          CompositeFactor 2
            Specifications:
              [Sowing].Script.SowDate=02-may
              [Sowing].Script.Population=120
              [Sowing].Script.RowSpacing=254
              [Sowing].Script.SowingDepth=50
              [IrrigationEvents]
            Operations IrrigationEvents
          CompositeFactor 3
            Specifications:
              [Sowing].Script.SowDate=5-may
              //[Sowing].Script.SowDate=23-may
              [Sowing].Script.Population=120
              [Sowing].Script.RowSpacing=254
              [Sowing].Script.SowingDepth=50
              [IrrigationEvents]
            Operations IrrigationEvents
        Factor Cv
          CompositeFactor Scepter
            Specifications:
              [Sowing].Script.CultivarName=Scepter
              [Scepter]
            Cultivar Scepter
              Command:
                [Phenology].Phyllochron.BasePhyllochron.FixedValue = 97 // 107.602580952482
                [Phenology].PhyllochronPpSensitivity.FixedValue = 0.23032920462638
                [Phenology].CAMP.EnvData.VrnTreatTemp = 6
                [Phenology].CAMP.EnvData.VrnTreatDuration = 60
                [Phenology].CAMP.FLNparams.MinLN = 7
                [Phenology].CAMP.FLNparams.PpLN = 2
                [Phenology].CAMP.FLNparams.VrnLN = 2
                [Phenology].CAMP.FLNparams.VxPLN = -1
                [Phenology].HeadEmergenceLongDayBase.FixedValue = 170
                [Phenology].HeadEmergencePpSensitivity.FixedValue = 0.2
          CompositeFactor Cutlass
            Specifications:
              [Sowing].Script.CultivarName=Cutlass
              [Cutlass]
            Cultivar Cutlass
              Command:
                [Phenology].Phyllochron.BasePhyllochron.FixedValue = 88 // 95.8008034182983
                [Phenology].PhyllochronPpSensitivity.FixedValue = 0.352406544577556
                [Phenology].CAMP.FLNparams.MinLN = 7
                [Phenology].CAMP.FLNparams.PpLN = 5
                [Phenology].CAMP.FLNparams.VrnLN = 1
                [Phenology].CAMP.FLNparams.VxPLN = 2
                [Phenology].CAMP.EnvData.VrnTreatTemp = 5.8
                [Phenology].CAMP.EnvData.VrnTreatDuration = 60
                [Phenology].HeadEmergenceLongDayBase.FixedValue = 130
                [Phenology].HeadEmergencePpSensitivity.FixedValue = 2.85 // 2
          CompositeFactor Kittyhawk
            Specifications:
              [Sowing].Script.CultivarName=Kittyhawk
              [Kittyhawk]
            Cultivar Kittyhawk
              Command:
                [Phenology].Phyllochron.BasePhyllochron.FixedValue = 105 // 93.7220123291132
                [Phenology].PhyllochronPpSensitivity.FixedValue = 0.212225680614483
                [Phenology].CAMP.FLNparams.MinLN = 10
                [Phenology].CAMP.FLNparams.PpLN = 2
                [Phenology].CAMP.FLNparams.VrnLN = 8
                [Phenology].CAMP.FLNparams.VxPLN = -1
                [Phenology].CAMP.EnvData.VrnTreatTemp = 5.8
                [Phenology].CAMP.EnvData.VrnTreatDuration = 60
                [Phenology].HeadEmergenceLongDayBase.FixedValue = 50
                [Phenology].HeadEmergencePpSensitivity.FixedValue = 6 // 4
          CompositeFactor Forrest
            Specifications:
              [Sowing].Script.CultivarName=Forrest
              [Forrest]
            Cultivar Forrest
              Command:
                [Phenology].Phyllochron.BasePhyllochron.FixedValue =  110 // 99.8910902837222
                [Phenology].PhyllochronPpSensitivity.FixedValue = 0.417874283738016
                [Phenology].CAMP.FLNparams.MinLN = 6
                [Phenology].CAMP.FLNparams.PpLN = 5
                [Phenology].CAMP.FLNparams.VrnLN = 2
                [Phenology].CAMP.FLNparams.VxPLN = 1
                [Phenology].CAMP.EnvData.VrnTreatTemp = 5.8
                [Phenology].CAMP.EnvData.VrnTreatDuration = 60
                [Phenology].HeadEmergenceLongDayBase.FixedValue = 370
                [Phenology].HeadEmergencePpSensitivity.FixedValue = 1.2 // 1
          CompositeFactor EmuRock
            Specifications:
              [Sowing].Script.CultivarName=Emu_Rock
              [Emu_Rock]
            Cultivar Emu_Rock
              Command:
                [Phenology].Phyllochron.BasePhyllochron.FixedValue = 85 // 94.7698873180009
                [Phenology].PhyllochronPpSensitivity.FixedValue = 0.358007951256312
                [Phenology].CAMP.FLNparams.MinLN = 6
                [Phenology].CAMP.FLNparams.PpLN = 1
                [Phenology].CAMP.FLNparams.VrnLN = 1
                [Phenology].CAMP.FLNparams.VxPLN = -1
                [Phenology].CAMP.EnvData.VrnTreatTemp = 5.8
                [Phenology].CAMP.EnvData.VrnTreatDuration = 60
                [Phenology].HeadEmergenceLongDayBase.FixedValue = 183.0
                [Phenology].HeadEmergencePpSensitivity.FixedValue = 1.7962741039794823
          CompositeFactor Trojan
            Specifications:
              [Sowing].Script.CultivarName=Trojan
              [Trojan]
            Cultivar Trojan
              Command:
                [Phenology].Phyllochron.BasePhyllochron.FixedValue = 99.1351271229079
                [Phenology].PhyllochronPpSensitivity.FixedValue = 0.35511766231399
                [Phenology].CAMP.EnvData.VrnTreatTemp = 6
                [Phenology].CAMP.EnvData.VrnTreatDuration = 60
                [Phenology].CAMP.FLNparams.MinLN = 7
                [Phenology].CAMP.FLNparams.PpLN = 5
                [Phenology].CAMP.FLNparams.VrnLN = 2
                [Phenology].CAMP.FLNparams.VxPLN = 1
                [Phenology].HeadEmergenceLongDayBase.FixedValue = 50
                [Phenology].HeadEmergencePpSensitivity.FixedValue = 4
    Simulation 2017QuairadingWA
      Clock: Start=2017-01-01; End=2017-12-31
      Summary SummaryFile
      Weather: FileName=Met/Quairading_2017.met
      SoilArbitrator
      Zone Field: Area=1; Slope=0; AspectAngle=0; Altitude=50
        Soil Shallow Loamy Duplex (Kellerberrin No407): ASCOrder=Chromosol; ASCSubOrder=Brown; SoilType=Loamy duplex; LocalName=Clays & shallow loamy duplexes; Site=Kellerberrin; NearestTown=Kellerberrin; Region=Central Region; State=Western Australia; Country=Australia; ApsoilNumber=407; Latitude=-31.38; Longitude=117.777; LocationAccuracy=+/- 20m; YearOfSampling=2005
          DataSource=CSIRO Yvette Oliver - GRDC funded project Province Paddock Patch
          Comments=Shallow loamy duplex - Brown shallow loamy duplex 508; KG-M site
          Physical
            Thickness  ParticleSizeSand  ParticleSizeSilt  ParticleSizeClay  Rocks  BD   AirDry  LL15   DUL   SAT
            100        5                 65                30                0      1.6  0.02    0.04   0.16  0.37
            100        5                 65                30                0      1.6  0.04    0.05   0.13  0.37
            100        5                 65                30                0      1.6  0.05    0.05   0.13  0.37
            300        5                 65                30                0      1.6  0.127   0.127  0.22  0.37
            300        5                 65                30                0      1.6  0.127   0.127  0.18  0.37
            300        5                 65                30                0      1.5  0.127   0.127  0.18  0.37
            BD, AirDry, LL15, SAT source: Estimated based on local knowledge
            DUL source: Field measured and checked for sensibility
            Rocks, ParticleSizeSand, ParticleSizeSilt, ParticleSizeClay source: Calculated
            SoilCrop wheatSoil: LL=[0.04, 0.05, 0.05, 0.127, 0.161, 0.18]; KL=[0.06, 0.06, 0.06, 0.04, 0.04, 0.02]; XF=[1, 1, 1, 1, 1, 1]
              LL source: Field measured and checked for sensibility
            SoilCrop SCRUMSoil: same as 2017QuairadingWA.2017QuairadingWA.Field.Shallow Loamy Duplex (Kellerberrin No407).Physical.wheatSoil
          SoilTemperature Temperature: InteractionsPerDay=8
          Water: Thickness=[100, 100, 100, 300, 300, 300]; InitialValues=[0.16, 0.13, 0.1131, 0.127, 0.127, 0.127]; FilledFromTop=true
          Solute NO3: Thickness=[100, 100, 100, 300, 300, 300]; InitialValues=[10, 0, 0, 0, 0, 0]; InitialValuesUnits=kg/ha; WaterTableConcentration=0; D0=0; DepthConstant=0; MaxDepthSoluteAccessible=0; RunoffEffectivenessAtMovingSolute=0; MaxEffectiveRunoff=0
          Solute NH4: Thickness=[100, 100, 100, 300, 300, 300]; InitialValues=[0, 0, 0, 0, 0, 0]; InitialValuesUnits=ppm; WaterTableConcentration=0; D0=0; DepthConstant=0; MaxDepthSoluteAccessible=0; RunoffEffectivenessAtMovingSolute=0; MaxEffectiveRunoff=0
          Solute Urea: same as 2017QuairadingWA.2017QuairadingWA.Field.Shallow Loamy Duplex (Kellerberrin No407).NH4
          Nutrient
          WaterBalance: SummerDate=1-Nov; SummerU=5; SummerCona=5; WinterDate=1-Apr; WinterU=5; WinterCona=5; DiffusConst=40; DiffusSlope=16; Salb=0.12; CN2Bare=73; CNRed=20; CNCov=0.8; DischargeWidth=5; CatchmentArea=10; PSIDul=-100; Thickness=[100, 100, 100, 300, 300, 300]; SWCON=[0.3, 0.3, 0.3, 0.3, 0.3, 0.3]
          Organic: FOMCNRatio=0; CarbonUnits=Total
            Thickness  Carbon  SoilCNRatio  FBiom  FInert  FOM
            100        0.2     12           0.2    0.8     100
            100        0.2     12           0.2    0.8     100
            100        0.2     12           0.2    0.8     100
            300        0.2     12           0.2    0.8     100
            300        0.2     12           0.2    0.8     100
            300        0.2     12           0.2    0.8     100
          Chemical: PHUnits=Water
            Thickness  PH  CEC
            100        7   8.795
            100        7   8.795
            100        7   8.795
            300        7   8.795
            300        7   8.795
            300        7   8.795
            CEC source: Calculated
        Plant Wheat
        Fertiliser
        Irrigation
        SurfaceOrganicMatter: InitialResidueName=wheat_stubble; InitialResidueType=wheat; InitialResidueMass=500; InitialStandingFraction=0; InitialCPR=0; InitialCNR=100
        MicroClimate: a_interception=0; b_interception=1; c_interception=0; d_interception=0; SoilHeatFluxFraction=0.4; MinimumHeightDiffForNewLayer=0; NightInterceptionFraction=0.5; ReferenceHeight=2
        Manager Sowing
          Crop = [Wheat]
          SowDate = 24-Jul
          CultivarName = Cutlass
          SowingDepth = 50
          RowSpacing = 254
          Population = 150
          script: same as in 2018BirchipVIC.2018BirchipVIC.Field.Sowing
        Manager FertiliseAtSowingGustoGoldN
          Crop = [Wheat]
          FertiliserType = NO3N
          Amount = 10.2
          script: same as in 2018BirchipVIC.2018BirchipVIC.Field.FertiliseAtSowingGranulock
        Manager FertiliseAtSowingUreaN
          Crop = [Wheat]
          FertiliserType = UreaN
          Amount = 42
          script: same as in 2018BirchipVIC.2018BirchipVIC.Field.FertiliseAtSowingGranulock
        Manager FertiliseOnZ31UAN
          Stage = 31
          FertiliserType = UAN_N
          Amount = 19.8
          script: same as in 2018BirchipVIC.2018BirchipVIC.Field.FertiliseOnZ31Urea
        Manager Harvest: same as 2018BirchipVIC.2018BirchipVIC.Field.Harvest
        Report ReportDaily: same as 2018BirchipVIC.2018BirchipVIC.Field.ReportDaily
        Report ReportHarvest: EventNames=[Wheat].Harvesting
          VariableNames:
            [Clock].Today as Date
            [Wheat].Phenology.Zadok.Stage as ZadokStage
            [Wheat].Phenology.CurrentStageName as CurrentStageName
            [Wheat].AboveGround.Wt as AboveGroundWt
            [Wheat].Grain.Total.Wt*10 as Yield
            [Wheat].Grain.Size as GrainSize
            [Wheat].Grain.Number as GrainNumber
            [Wheat].Phenology.FloweringDAS as FloweringDAS
            [Wheat].Phenology.EmergenceDAS as EmergenceDAS
            [Model].Z49StageCalculator.Script.Z49DAS as Z49DAS
        Report HarvestReportFHL: same as 2018BirchipVIC.2018BirchipVIC.Field.HarvestReportFHL
  Experiment 2018WickepinWA
    Factors
      Permutation TOSxCv
        Factor TOS
          CompositeFactor 1
            Specifications:
              [Sowing].Script.SowDate=18-apr
              //[Sowing].Script.SowDate=13-apr
              [Sowing].Script.Population=120
              [Sowing].Script.RowSpacing=254
              [Sowing].Script.SowingDepth=50
              [IrrigationEvents]
            Operations IrrigationEvents
          CompositeFactor 2
            Specifications:
              [Sowing].Script.SowDate=2-may
              //[Sowing].Script.SowDate=4-may
              [Sowing].Script.Population=120
              [Sowing].Script.RowSpacing=254
              [Sowing].Script.SowingDepth=50
              [IrrigationEvents]
            Operations IrrigationEvents
          CompositeFactor 3
            Specifications:
              [Sowing].Script.SowDate=12-jun
              //[Sowing].Script.SowDate=1-jun
              [Sowing].Script.Population=120
              [Sowing].Script.RowSpacing=254
              [Sowing].Script.SowingDepth=50
              [IrrigationEvents]
            Operations IrrigationEvents
        Factor Cv
          CompositeFactor Scepter
            Specifications:
              [Sowing].Script.CultivarName=Scepter
              [Scepter]
            Cultivar Scepter
              Command:
                [Phenology].Phyllochron.BasePhyllochron.FixedValue = 107.602580952482
                [Phenology].PhyllochronPpSensitivity.FixedValue = 0.23032920462638
                [Phenology].CAMP.EnvData.VrnTreatTemp = 6
                [Phenology].CAMP.EnvData.VrnTreatDuration = 60
                [Phenology].CAMP.FLNparams.MinLN = 7
                [Phenology].CAMP.FLNparams.PpLN = 2
                [Phenology].CAMP.FLNparams.VrnLN = 2
                [Phenology].CAMP.FLNparams.VxPLN = -1
                [Phenology].HeadEmergenceLongDayBase.FixedValue = 170
                [Phenology].HeadEmergencePpSensitivity.FixedValue = 0.2
          CompositeFactor Cutlass
            Specifications:
              [Sowing].Script.CultivarName=Cutlass
              [Cutlass]
            Cultivar Cutlass
              Command:
                [Phenology].Phyllochron.BasePhyllochron.FixedValue = 90 // 95.8008034182983
                [Phenology].PhyllochronPpSensitivity.FixedValue = 0.352406544577556
                [Phenology].CAMP.FLNparams.MinLN = 7
                [Phenology].CAMP.FLNparams.PpLN = 5
                [Phenology].CAMP.FLNparams.VrnLN = 1
                [Phenology].CAMP.FLNparams.VxPLN = 2
                [Phenology].CAMP.EnvData.VrnTreatTemp = 5.8
                [Phenology].CAMP.EnvData.VrnTreatDuration = 60
                [Phenology].HeadEmergenceLongDayBase.FixedValue = 130
                [Phenology].HeadEmergencePpSensitivity.FixedValue = 2
          CompositeFactor Wedgetail
            Specifications:
              [Sowing].Script.CultivarName=Wedgetail
              [Wedgetail]
            Cultivar Wedgetail: same as Replacements.Cultivars.Wedgetail
          CompositeFactor Forrest
            Specifications:
              [Sowing].Script.CultivarName=Forrest
              [Forrest]
            Cultivar Forrest
              Command:
                [Phenology].Phyllochron.BasePhyllochron.FixedValue = 99.8910902837222
                [Phenology].PhyllochronPpSensitivity.FixedValue = 0.417874283738016
                [Phenology].CAMP.FLNparams.MinLN = 6
                [Phenology].CAMP.FLNparams.PpLN = 5
                [Phenology].CAMP.FLNparams.VrnLN = 2
                [Phenology].CAMP.FLNparams.VxPLN = 1
                [Phenology].CAMP.EnvData.VrnTreatTemp = 5.8
                [Phenology].CAMP.EnvData.VrnTreatDuration = 60
                [Phenology].HeadEmergenceLongDayBase.FixedValue = 370
                [Phenology].HeadEmergencePpSensitivity.FixedValue = 1.2 // 1
          CompositeFactor EmuRock
            Specifications:
              [Sowing].Script.CultivarName=Emu_Rock
              [Emu_Rock]
            Cultivar Emu_Rock
              Command:
                [Phenology].Phyllochron.BasePhyllochron.FixedValue = 105 // 94.7698873180009
                [Phenology].PhyllochronPpSensitivity.FixedValue = 0.358007951256312
                [Phenology].CAMP.FLNparams.MinLN = 6
                [Phenology].CAMP.FLNparams.PpLN = 1
                [Phenology].CAMP.FLNparams.VrnLN = 1
                [Phenology].CAMP.FLNparams.VxPLN = -1
                [Phenology].CAMP.EnvData.VrnTreatTemp = 5.8
                [Phenology].CAMP.EnvData.VrnTreatDuration = 60
                [Phenology].HeadEmergenceLongDayBase.FixedValue = 183.0
                [Phenology].HeadEmergencePpSensitivity.FixedValue = 2 // 1.7962741039794823
          CompositeFactor Trojan: same as 2017QuairadingWA.Factors.TOSxCv.Cv.Trojan
    Simulation 2018WickepinWA
      Clock: Start=2018-01-01; End=2018-12-31
      Summary SummaryFile
      Weather: FileName=Met/Wickepin_2018.met
      SoilArbitrator
      Zone Field: Area=1; Slope=0; AspectAngle=0; Altitude=50
        Soil Deep sandy duplex (Neridup No458): SoilType=Sandy; LocalName=Deep sandy duplexes; Site=Neridup; NearestTown=Neridup; Region=Southern Region; State=Western Australia; Country=Australia; ApsoilNumber=458; Latitude=-33.645976; Longitude=122.117768; LocationAccuracy=+/- 20m; YearOfSampling=2007; DataSource=DAFWA Jeremy Lemon
          Comments=Deep sandy duplex - Sand  over clay at 60-80cm, local name : Deep Fleming
          Physical
            Thickness  ParticleSizeSand  ParticleSizeSilt  ParticleSizeClay  Rocks  BD   AirDry  LL15  DUL   SAT
            100        5                 65                30                0      1.3  0.02    0.04  0.1   0.474
            100        5                 65                30                0      1.5  0.03    0.04  0.11  0.404
            200        5                 65                30                0      1.5  0.05    0.05  0.11  0.404
            200        5                 65                30                0      1.5  0.05    0.05  0.18  0.404
            200        5                 65                30                0      1.7  0.18    0.18  0.28  0.35
            200        5                 65                30                0      1.6  0.18    0.18  0.32  0.38
            BD, AirDry, LL15 source: Estimated based on local knowledge
            DUL source: Field measured and checked for sensibility
            SAT source: Calculated from measured, estimated or calculated BD
            Rocks, ParticleSizeSand, ParticleSizeSilt, ParticleSizeClay source: Calculated
            SoilCrop wheatSoil: LL=[0.04, 0.04, 0.05, 0.05, 0.18, 0.18]; KL=[0.06, 0.06, 0.06, 0.04, 0.04, 0.04]; XF=[1, 1, 1, 1, 1, 1]
            SoilCrop barleySoil: LL=[0.04, 0.04, 0.05, 0.05, 0.18, 0.25]; KL=[0.07, 0.07, 0.07, 0.05, 0.05, 0.05]; XF=[1, 1, 1, 1, 1, 1]
              LL source: Estimated based on local knowledge
            SoilCrop SCRUMSoil: LL=[0.04, 0.04, 0.05, 0.05, 0.18, 0.25]; KL=[0.06, 0.06, 0.06, 0.04, 0.04, 0.04]; XF=[1, 1, 1, 1, 1, 1]
              LL source: Field measured and checked for sensibility
          SoilTemperature Temperature: InteractionsPerDay=8
          Water: Thickness=[100, 100, 200, 200, 200, 200]; InitialValues=[0.1, 0.11, 0.11, 0.0735, 0.18, 0.18]; FilledFromTop=true
          Solute NO3: Thickness=[100, 100, 200, 200, 200, 200]; InitialValues=[20, 0, 0, 0, 0, 0]; InitialValuesUnits=kg/ha; WaterTableConcentration=0; D0=0; DepthConstant=0; MaxDepthSoluteAccessible=0; RunoffEffectivenessAtMovingSolute=0; MaxEffectiveRunoff=0
          Solute NH4: Thickness=[100, 100, 200, 200, 200, 200]; InitialValues=[0, 0, 0, 0, 0, 0]; InitialValuesUnits=ppm; WaterTableConcentration=0; D0=0; DepthConstant=0; MaxDepthSoluteAccessible=0; RunoffEffectivenessAtMovingSolute=0; MaxEffectiveRunoff=0
          Solute Urea: same as 2018WickepinWA.2018WickepinWA.Field.Deep sandy duplex (Neridup No458).NH4
          Nutrient
          WaterBalance: SummerDate=1-Nov; SummerU=6; SummerCona=2.5; WinterDate=1-Apr; WinterU=2; WinterCona=2; DiffusConst=40; DiffusSlope=16; Salb=0.12; CN2Bare=73; CNRed=20; CNCov=0.8; DischargeWidth=5; CatchmentArea=10; PSIDul=-100; Thickness=[100, 100, 200, 200, 200, 200]; SWCON=[0.3, 0.3, 0.3, 0.3, 0.3, 0.3]
          Organic: FOMCNRatio=0; CarbonUnits=Total
            Thickness  Carbon  SoilCNRatio  FBiom  FInert  FOM
            100        0.2     12           0.2    0.8     100
            100        0.2     12           0.2    0.8     100
            200        0.2     12           0.2    0.8     100
            200        0.2     12           0.2    0.8     100
            200        0.2     12           0.2    0.8     100
            200        0.2     12           0.2    0.8     100
          Chemical: PHUnits=Water
            Thickness  PH  CEC
            100        7   8.795
            100        7   8.795
            200        7   8.795
            200        7   8.795
            200        7   8.795
            200        7   8.795
            CEC source: Calculated
        Plant Wheat
        Fertiliser
        Irrigation
        SurfaceOrganicMatter: InitialResidueName=wheat_stubble; InitialResidueType=wheat; InitialResidueMass=500; InitialStandingFraction=0; InitialCPR=0; InitialCNR=100
        MicroClimate: a_interception=0; b_interception=1; c_interception=0; d_interception=0; SoilHeatFluxFraction=0.4; MinimumHeightDiffForNewLayer=0; NightInterceptionFraction=0.5; ReferenceHeight=2
        Manager Sowing
          Crop = [Wheat]
          SowDate = 24-Jul
          CultivarName = Urambie
          SowingDepth = 50
          RowSpacing = 254
          Population = 150
          script: same as in 2018BirchipVIC.2018BirchipVIC.Field.Sowing
        Manager IrrigateOnSowing
          Amount = 30
          Depth = 0
          Efficiency = 1
          WillRunoff = False
          script: same as in 2017LoxtonSA.2017LoxtonSA.Field.IrrigateAtSowing
        Operations IrrigationEvents
        Manager FertiliseAtSowingGustoGoldN
          Crop = [Wheat]
          FertiliserType = NO3N
          Amount = 12
          script: same as in 2018BirchipVIC.2018BirchipVIC.Field.FertiliseAtSowingGranulock
        Manager FertiliseAtSowingUrea: same as 2017DaleWA.2017DaleWA.Field.FertiliseAtSowingUrea
        Manager FertiliseOnZ31UAN
          Stage = 31
          FertiliserType = UAN_N
          Amount = 24
          script: same as in 2018BirchipVIC.2018BirchipVIC.Field.FertiliseOnZ31Urea
        Manager Harvest: same as 2018BirchipVIC.2018BirchipVIC.Field.Harvest
        Report ReportDaily: EventNames=[Clock].DoReport
          VariableNames:
            [Clock].Today as Date
            [Wheat].Phenology.Zadok.Stage as ZadokStage
            [Wheat].Phenology.CurrentStageName as CurrentStageName
            [Wheat].AboveGround.Wt as AboveGroundWt
            [Wheat].Grain.Total.Wt*10 as Yield
            [Wheat].Grain.Size as GrainSize
            [Wheat].Grain.Number as GrainNumber
            [Wheat].LAI as LAI
            [Wheat].Phenology.ThermalTime as TT
            [Wheat].Phenology.AccumulatedTT as AccumulatedTT
            [Weather].MaxT as maxT
            [Weather].MinT as minT
            [Wheat].Leaf.Fw
        Report ReportHarvest: same as 2017LoxtonSA.2017LoxtonSA.Field.ReportHarvest
        Report HarvestReportFHL: same as 2018BirchipVIC.2018BirchipVIC.Field.HarvestReportFHL
        Manager Automatic irrigation based on water deficit
          Crop = [Wheat]
          AutoIrrigationOn = True
          FASWThreshold = 0.8
          FASWDepth = 700
          weeks = 0
          afterSowing = 2
```csharp
using APSIM.Numerics;
using Models.Interfaces;
using APSIM.Shared.Utilities;
using System.Xml.Serialization;
using Models;
using Models.PMF;
using Models.Soils;
using System.Text;
using System.Collections.Generic;
using Models.Core;
using System.Linq;
using System;
using Models.Interfaces;
namespace Models
{
    [Serializable] 
    public class Script : Model
    {
        [Link] private Zone zone;
        [Link] private Irrigation irrigation;
        [Link] private ISoilWater waterBalance;
        [Link] private IPhysical soilPhysical;
        public double FASW { get; set; }
        public double WaterDeficit  { get; set; }
    


        [Description("Crop to irrigate")]
        public IPlant Crop { get; set; }
        
        [Description("Auto irrigation on?")]
        public bool AutoIrrigationOn { get; set; }

        [Description("Threshold fraction available water (0-1)")]
        public double FASWThreshold { get; set; }

        [Description("Soil depth (mm) to which fraction available water is calculated")]
        public double FASWDepth { get; set; }

        [Description("Minimum weeks between irrigations")]
        public double weeks { get; set; }

        [Description("Minimum days after sowing for first irrigation")]
        public int afterSowing { get; set; }

        private double irrigationGap = 0;    // gap between irrigations

        /// <summary>Called at start of simulation. Performs some basic error checking. </summary>
        [EventSubscribe("StartOfSimulation")]
        private void ErrorChecking(object sender, EventArgs args)
        {
            if (Crop == null)
                throw new Exception("No crop was specified in script " + Parent.Name);
        }

        [EventSubscribe("DoManagement")]
        private void OnDoManagement(object sender, EventArgs e)
        {
            if (AutoIrrigationOn && Crop.IsAlive)
            {
                   irrigationGap += 1;                // increment gap between irrigations
                CalculateFASW();                // calc FASW and WaterDeficit
                if ((FASW < FASWThreshold) && (irrigationGap >= weeks * 7))
                {
                    irrigation.Apply(WaterDeficit, depth: 0);
                    irrigationGap = 0;            // reset
                }
            }
            else
            {
                irrigationGap = weeks * 7 - afterSowing - 1;    // allow irrigation a number of days after it becomes alive/sown
            }
        }

        // Calculate the fraction of the potential available sw
        // Calculate the deficit amount from DUL
        private void CalculateFASW()
        {
            double[] LL15 = MathUtilities.Multiply(soilPhysical.LL15, soilPhysical.Thickness);
            double[] DUL = MathUtilities.Multiply(soilPhysical.DUL, soilPhysical.Thickness);
        
            int nlayr = GetLayerIndex(FASWDepth);
            nlayr = Math.Min(nlayr, soilPhysical.Thickness.Length-1);
            double cumdep = MathUtilities.Sum(soilPhysical.Thickness, 0, nlayr, 0.0);    // tricky function that sums up to before nlayr

            double part_layer = MathUtilities.Divide((FASWDepth - cumdep), soilPhysical.Thickness[nlayr], 0.0);

            // note that results may be strange if swdep < ll15
            double avail_sw = (MathUtilities.Sum(waterBalance.SWmm, 0, nlayr, 0.0) + part_layer * waterBalance.SWmm[nlayr])
                            - (MathUtilities.Sum(LL15, 0, nlayr, 0.0) + part_layer * LL15[nlayr]);

            double pot_avail_sw = (MathUtilities.Sum(DUL, 0, nlayr, 0.0) + part_layer * DUL[nlayr])
                                - (MathUtilities.Sum(LL15, 0, nlayr, 0.0) + part_layer * LL15[nlayr]);
            
            FASW = MathUtilities.Divide(avail_sw, pot_avail_sw, 0.0);
            WaterDeficit = MathUtilities.Constrain(pot_avail_sw - avail_sw, 0.0, 100000);
        }

        // Get index of the layer that has this depth in it 
        private int GetLayerIndex(double pointDepth)
        {
            double[] cumThickness = soilPhysical.ThicknessCumulative;
            int layerIdx = 0;
            while ((layerIdx < cumThickness.Length) && (pointDepth > cumThickness[layerIdx]))
            {
                layerIdx += 1;
            }

            return layerIdx;
        }
    }
}
```
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