Simulations: Version=216
  Memo Funding Acknowledgement
    The development of frost and heat damage functions was supported by the ‘Frost and Heat Management Analytics’ (FAHMA) project via funding from the Grains Research and Development Corporation (GRDC; Grant No. CSP2204-009RTX).
  Memo Data Ownership Acknowledgement
    Data description: Please refer to https://hdl.handle.net/2123/30252.

    Disclaimer: This dataset is provided “as is” without warranty of any kind, express or implied, including but not limited to its accuracy, completeness, or fitness for a particular purpose. The creators and contributors shall not be liable for any damages arising from its use.

    For further inquiries or permission requests, please contact Prof Richard Trethowan (richard.trethowan@sydney.edu.au).

    When citing this dataset, please use the following reference: Trethowan, R., Thistlethwaite, R., Hayden, M., 2023. Assessment of heat tolerance on  wheat. https://hdl.handle.net/2123/30252.

    When using the damage functions, please use the following reference for more information: Hu, P., He, D., Zheng, B., Whish, J., Kirkegaard, J., Bell, L., Leske, B., Chen, S., Uppal, R., Biddulph, B., Trethowan, R., Beletse, Y., Lilley, J., 2026. Event-based frost and heat damage functions improve yield predictions of APSIM canola and wheat: formulation, calibration, and evaluation. Agricultural and Forest Meteorology 386, 111239. https://doi.org/10.1016/j.agrformet.2026.111239
  DataStore
    ExcelInput Observed: FileNames=[WHT_Obs.xlsx]; SheetNames=[Obs]
    PredictedObserved PredictedObserved_yield: PredictedTableName=HarvestReport; ObservedTableName=Obs; FieldNameUsedForMatch=SimulationName; AllColumns=false
    PredictedObserved PredictedObserved_FHLyield: PredictedTableName=DamageFunctionHarvestReport; ObservedTableName=Obs; FieldNameUsedForMatch=SimulationName; AllColumns=true
  Folder Replacements
    Report ReportDaily: EventNames=[Clock].DoReport
      VariableNames:
        [Clock].Today as Date
        [Plant].SowingDate.Year as Year
        [Wheat].Phenology.Stage as Stage
        [Wheat].Phenology.Zadok.Stage as ZadokStage
        [Wheat].Phenology.CurrentStageName as CurrentStageName
        [Wheat].AboveGround.Wt as AboveGroundWt
        [Wheat].Grain.Total.Wt*10 as Yield
        [Wheat].Grain.Size as GrainSize
        [Wheat].Grain.Number as GrainNumber
        [Wheat].LAI as LAI
        [Wheat].Phenology.ThermalTime as TT
        [Wheat].Phenology.AccumulatedTT as AccumulatedTT
        [Weather].MaxT as maxT
        [Weather].MinT as minT
        [Weather].Rain as Rain
        [Wheat].Leaf.Fn as Fn
        [Wheat].Leaf.Fw as Fw
    Report HarvestReport: EventNames=[Wheat].Harvesting
      VariableNames:
        [Simulation].Name
        [Clock].Today
        [Wheat].SowingDate
        [Wheat].SowingData.Cultivar
        [Wheat].Phenology.EmergenceDAS
        [Wheat].Phenology.TerminalSpikeletDAS
        [Wheat].Phenology.FlagLeafDAS
        [Wheat].Phenology.HeadingDAS
        [Wheat].Phenology.FloweringDAS
        [Wheat].Phenology.MaturityDAS
        [Wheat].Grain.Wt
        [Wheat].AboveGround.Wt
    Report DamageFunctionHarvestReport: EventNames=[Wheat].Harvesting
      VariableNames:
        [Simulation].Name
        [Clock].Today
        [FrostHeatDamageFunctions].FrostHeatYield as Wheat.Grain.Wt
    Folder Cultivars
      Cultivar Condo
        Command:
          [Phenology].Phyllochron.BasePhyllochron.FixedValue = 94.4306598856844
          [Phenology].PhyllochronPpSensitivity.FixedValue = 0.179475706868039
          [Phenology].CAMP.FLNparams.MinLN = 7
          [Phenology].CAMP.FLNparams.PpLN = 2
          [Phenology].CAMP.FLNparams.VrnLN = 3
          [Phenology].CAMP.FLNparams.VxPLN = 0
          [Phenology].CAMP.EnvData.VrnTreatTemp = 5.8
          [Phenology].CAMP.EnvData.VrnTreatDuration = 60
          [Phenology].HeadEmergenceLongDayBase.FixedValue = 190
          [Phenology].HeadEmergencePpSensitivity.FixedValue = 0
      Cultivar Coolah
        Command:
          // from NPI2
          //[Phenology].Phyllochron.BasePhyllochron.FixedValue = 95.8008034182983
          //[Phenology].PhyllochronPpSensitivity.FixedValue = 0.352406544577556
          [Phenology].CAMP.FLNparams.MinLN = 9
          [Phenology].CAMP.FLNparams.PpLN = 1
          [Phenology].CAMP.FLNparams.VrnLN = 0
          [Phenology].CAMP.FLNparams.VxPLN = 2
          [Phenology].CAMP.EnvData.VrnTreatTemp = 5.8
          [Phenology].CAMP.EnvData.VrnTreatDuration = 60
          [Phenology].HeadEmergenceLongDayBase.FixedValue = 50
          [Phenology].HeadEmergencePpSensitivity.FixedValue = 0
      Cultivar Crusader
        Command:
          [Phenology].Phyllochron.BasePhyllochron.FixedValue = 100.832025052954
          [Phenology].PhyllochronPpSensitivity.FixedValue = 0.199967770650946
          [Phenology].CAMP.FLNparams.MinLN = 6
          [Phenology].CAMP.FLNparams.PpLN = 5
          [Phenology].CAMP.FLNparams.VrnLN = 3
          [Phenology].CAMP.FLNparams.VxPLN = 0
          [Phenology].CAMP.EnvData.VrnTreatTemp = 6
          [Phenology].CAMP.EnvData.VrnTreatDuration = 60
          [Phenology].HeadEmergenceLongDayBase.FixedValue = 230
          [Phenology].HeadEmergencePpSensitivity.FixedValue = 0
      Cultivar Cutlass
        Command:
          [Phenology].Phyllochron.BasePhyllochron.FixedValue = 95.8008034182983
          [Phenology].PhyllochronPpSensitivity.FixedValue = 0.352406544577556
          [Phenology].CAMP.FLNparams.MinLN = 7
          [Phenology].CAMP.FLNparams.PpLN = 5
          [Phenology].CAMP.FLNparams.VrnLN = 1
          [Phenology].CAMP.FLNparams.VxPLN = 2
          [Phenology].CAMP.EnvData.VrnTreatTemp = 5.8
          [Phenology].CAMP.EnvData.VrnTreatDuration = 60
          [Phenology].HeadEmergenceLongDayBase.FixedValue = 130
          [Phenology].HeadEmergencePpSensitivity.FixedValue = 2
      Cultivar Emu_Rock
        Command:
          [Phenology].Phyllochron.BasePhyllochron.FixedValue = 94.7698873180009
          [Phenology].PhyllochronPpSensitivity.FixedValue = 0.358007951256312
          [Phenology].CAMP.FLNparams.MinLN = 6
          [Phenology].CAMP.FLNparams.PpLN = 1
          [Phenology].CAMP.FLNparams.VrnLN = 1
          [Phenology].CAMP.FLNparams.VxPLN = -1
          [Phenology].CAMP.EnvData.VrnTreatTemp = 5.8
          [Phenology].CAMP.EnvData.VrnTreatDuration = 60
          [Phenology].HeadEmergenceLongDayBase.FixedValue = 183.0
          [Phenology].HeadEmergencePpSensitivity.FixedValue = 1.7962741039794823
      Cultivar Gregory
        Command:
          [Phenology].Phyllochron.BasePhyllochron.FixedValue = 96.2227321902995
          [Phenology].PhyllochronPpSensitivity.FixedValue = 0.199981872553676
          [Phenology].CAMP.FLNparams.MinLN = 8
          [Phenology].CAMP.FLNparams.PpLN = 2
          [Phenology].CAMP.FLNparams.VrnLN = 4
          [Phenology].CAMP.FLNparams.VxPLN = -3
          [Phenology].CAMP.EnvData.VrnTreatTemp = 6
          [Phenology].CAMP.EnvData.VrnTreatDuration = 60
          [Phenology].HeadEmergenceLongDayBase.FixedValue = 110
          [Phenology].HeadEmergencePpSensitivity.FixedValue = 1
          [Grain].MaximumPotentialGrainSize.FixedValue = 0.041
          [Grain].NumberFunction.GrainNumber.GrainsPerGramOfStem.FixedValue = 22
      Cultivar Janz
        Command:
          [Phenology].Phyllochron.BasePhyllochron.FixedValue = 91.4460925764448
          [Phenology].PhyllochronPpSensitivity.FixedValue = 0.235020437209909
          [Phenology].CAMP.FLNparams.MinLN = 8
          [Phenology].CAMP.FLNparams.PpLN = 3
          [Phenology].CAMP.FLNparams.VrnLN = 1
          [Phenology].CAMP.FLNparams.VxPLN = -1
          [Phenology].CAMP.EnvData.VrnTreatTemp = 5.8
          [Phenology].CAMP.EnvData.VrnTreatDuration = 60
          [Phenology].HeadEmergenceLongDayBase.FixedValue = 130
          [Phenology].HeadEmergencePpSensitivity.FixedValue = 1
      Cultivar Lancer
        Command:
          [Phenology].Phyllochron.BasePhyllochron.FixedValue = 85.6623042725763
          [Phenology].PhyllochronPpSensitivity.FixedValue = 0.324980109776406
          [Phenology].CAMP.FLNparams.MinLN = 8
          [Phenology].CAMP.FLNparams.PpLN = 4
          [Phenology].CAMP.FLNparams.VrnLN = 2
          [Phenology].CAMP.FLNparams.VxPLN = -2
          [Phenology].CAMP.EnvData.VrnTreatTemp = 5.8
          [Phenology].CAMP.EnvData.VrnTreatDuration = 60
          [Phenology].HeadEmergenceLongDayBase.FixedValue = 150
          [Phenology].HeadEmergencePpSensitivity.FixedValue = 1
      Cultivar Mace
        Command:
          [Phenology].Phyllochron.BasePhyllochron.FixedValue = 106.268453805677
          [Phenology].PhyllochronPpSensitivity.FixedValue = 0.137742329295879
          [Phenology].CAMP.EnvData.VrnTreatTemp = 6
          [Phenology].CAMP.EnvData.VrnTreatDuration = 60
          [Phenology].CAMP.FLNparams.MinLN = 7
          [Phenology].CAMP.FLNparams.PpLN = 2
          [Phenology].CAMP.FLNparams.VrnLN = 3
          [Phenology].CAMP.FLNparams.VxPLN = -3
          [Phenology].HeadEmergenceLongDayBase.FixedValue = 70
          [Phenology].HeadEmergencePpSensitivity.FixedValue = 1
      Cultivar Mitch
        Command:
          [Phenology].Phyllochron.BasePhyllochron.FixedValue = 90.7949886258521
          [Phenology].PhyllochronPpSensitivity.FixedValue = 0.313387918745248
          [Phenology].CAMP.EnvData.VrnTreatTemp = 5.8
          [Phenology].CAMP.EnvData.VrnTreatDuration = 60
          [Phenology].CAMP.FLNparams.MinLN = 8
          [Phenology].CAMP.FLNparams.PpLN = 2
          [Phenology].CAMP.FLNparams.VrnLN = 3
          [Phenology].CAMP.FLNparams.VxPLN = -2
          [Phenology].HeadEmergenceLongDayBase.FixedValue = 130
          [Phenology].HeadEmergencePpSensitivity.FixedValue = 1
      Cultivar Scepter
        Command:
          [Phenology].Phyllochron.BasePhyllochron.FixedValue = 107.602580952482
          [Phenology].PhyllochronPpSensitivity.FixedValue = 0.23032920462638
          [Phenology].CAMP.EnvData.VrnTreatTemp = 6
          [Phenology].CAMP.EnvData.VrnTreatDuration = 60
          [Phenology].CAMP.FLNparams.MinLN = 7
          [Phenology].CAMP.FLNparams.PpLN = 2
          [Phenology].CAMP.FLNparams.VrnLN = 2
          [Phenology].CAMP.FLNparams.VxPLN = -1
          [Phenology].HeadEmergenceLongDayBase.FixedValue = 170
          [Phenology].HeadEmergencePpSensitivity.FixedValue = 0
      Cultivar Scout
        Command:
          [Phenology].Phyllochron.BasePhyllochron.FixedValue = 102.794916048683
          [Phenology].PhyllochronPpSensitivity.FixedValue = 0.192036818570067
          [Phenology].CAMP.EnvData.VrnTreatTemp = 6
          [Phenology].CAMP.EnvData.VrnTreatDuration = 60
          [Phenology].CAMP.FLNparams.MinLN = 7
          [Phenology].CAMP.FLNparams.PpLN = 2
          [Phenology].CAMP.FLNparams.VrnLN = 4
          [Phenology].CAMP.FLNparams.VxPLN = -2
          [Phenology].HeadEmergenceLongDayBase.FixedValue = 170
          [Phenology].HeadEmergencePpSensitivity.FixedValue = 0
      Cultivar Spitfire
        Command:
          [Phenology].Phyllochron.BasePhyllochron.FixedValue = 87.8426291924597
          [Phenology].PhyllochronPpSensitivity.FixedValue = 0.226170449889058
          [Phenology].CAMP.EnvData.VrnTreatTemp = 5.8
          [Phenology].CAMP.EnvData.VrnTreatDuration = 60
          [Phenology].CAMP.FLNparams.MinLN = 8
          [Phenology].CAMP.FLNparams.PpLN = 1
          [Phenology].CAMP.FLNparams.VrnLN = 3
          [Phenology].CAMP.FLNparams.VxPLN = -3
          [Phenology].HeadEmergenceLongDayBase.FixedValue = 130
          [Phenology].HeadEmergencePpSensitivity.FixedValue = 1
        Alias Drysdale
      Cultivar Sunchaser
        Command:
          // from NPI2
          //[Phenology].Phyllochron.BasePhyllochron.FixedValue = 122.758992485634
          //[Phenology].PhyllochronPpSensitivity.FixedValue = 0.119042603665788
          [Phenology].CAMP.FLNparams.MinLN = 8
          [Phenology].CAMP.FLNparams.PpLN = 1
          [Phenology].CAMP.FLNparams.VrnLN = 0
          [Phenology].CAMP.FLNparams.VxPLN = -10
          [Phenology].CAMP.EnvData.VrnTreatTemp = 5.8
          [Phenology].CAMP.EnvData.VrnTreatDuration = 60
          [Phenology].HeadEmergenceLongDayBase.FixedValue = 90
          [Phenology].HeadEmergencePpSensitivity.FixedValue = 0
      Cultivar Sunco
        Command:
          [Phenology].HeadEmergencePpSensitivity.FixedValue = 1
          [Phenology].Phyllochron.BasePhyllochron.FixedValue = 100
          [Phenology].CAMP.FLNparams.MinLN = 6
          [Phenology].CAMP.FLNparams.PpLN = 11
          [Phenology].CAMP.FLNparams.VrnLN = 10
          [Phenology].CAMP.FLNparams.VxPLN = -9
          [Phenology].HeadEmergenceLongDayBase.FixedValue = 170
      Cultivar Sunmax
        Command:
          // from NPI2
          //[Phenology].Phyllochron.BasePhyllochron.FixedValue = 122.758992485634
          //[Phenology].PhyllochronPpSensitivity.FixedValue = 0.119042603665788
          [Phenology].CAMP.FLNparams.MinLN = 7
          [Phenology].CAMP.FLNparams.PpLN = 8
          [Phenology].CAMP.FLNparams.VrnLN = 0
          [Phenology].CAMP.FLNparams.VxPLN = 1
          [Phenology].CAMP.EnvData.VrnTreatTemp = 5.8
          [Phenology].CAMP.EnvData.VrnTreatDuration = 60
          [Phenology].HeadEmergenceLongDayBase.FixedValue = 50
          [Phenology].HeadEmergencePpSensitivity.FixedValue = 0
      Cultivar Sunprime
        Command:
          // from NPI2
          //[Phenology].Phyllochron.BasePhyllochron.FixedValue = 93.7220123291132
          //[Phenology].PhyllochronPpSensitivity.FixedValue = 0.212225680614483
          [Phenology].CAMP.FLNparams.MinLN = 7
          [Phenology].CAMP.FLNparams.PpLN = 4
          [Phenology].CAMP.FLNparams.VrnLN = 0
          [Phenology].CAMP.FLNparams.VxPLN = 1
          [Phenology].CAMP.EnvData.VrnTreatTemp = 5.8
          [Phenology].CAMP.EnvData.VrnTreatDuration = 60
          [Phenology].HeadEmergenceLongDayBase.FixedValue = 50
          [Phenology].HeadEmergencePpSensitivity.FixedValue = 0
      Cultivar Sunstate
        Command:
          [Phenology].Phyllochron.BasePhyllochron.FixedValue = 95.0758950229683
          [Phenology].PhyllochronPpSensitivity.FixedValue = 0.225986092694718
          [Phenology].CAMP.EnvData.VrnTreatTemp = 6
          [Phenology].CAMP.EnvData.VrnTreatDuration = 60
          [Phenology].CAMP.FLNparams.MinLN = 7
          [Phenology].CAMP.FLNparams.PpLN = 1
          [Phenology].CAMP.FLNparams.VrnLN = 4
          [Phenology].CAMP.FLNparams.VxPLN = -4
          [Phenology].HeadEmergenceLongDayBase.FixedValue = 190
          [Phenology].HeadEmergencePpSensitivity.FixedValue = 1
      Cultivar Suntop
        Command:
          [Phenology].Phyllochron.BasePhyllochron.FixedValue = 93.1036394598307
          [Phenology].PhyllochronPpSensitivity.FixedValue = 0.335203758711104
          [Phenology].CAMP.EnvData.VrnTreatTemp = 5.8
          [Phenology].CAMP.EnvData.VrnTreatDuration = 60
          [Phenology].CAMP.FLNparams.MinLN = 8
          [Phenology].CAMP.FLNparams.PpLN = 2
          [Phenology].CAMP.FLNparams.VrnLN = 0
          [Phenology].CAMP.FLNparams.VxPLN = 0
          [Phenology].HeadEmergenceLongDayBase.FixedValue = 210
          [Phenology].HeadEmergencePpSensitivity.FixedValue = 0
      Cultivar Trojan
        Command:
          [Phenology].Phyllochron.BasePhyllochron.FixedValue = 99.1351271229079
          [Phenology].PhyllochronPpSensitivity.FixedValue = 0.35511766231399
          [Phenology].CAMP.EnvData.VrnTreatTemp = 6
          [Phenology].CAMP.EnvData.VrnTreatDuration = 60
          [Phenology].CAMP.FLNparams.MinLN = 7
          [Phenology].CAMP.FLNparams.PpLN = 5
          [Phenology].CAMP.FLNparams.VrnLN = 2
          [Phenology].CAMP.FLNparams.VxPLN = 1
          [Phenology].HeadEmergenceLongDayBase.FixedValue = 50
          [Phenology].HeadEmergencePpSensitivity.FixedValue = 4
      Cultivar Vixen
        Command:
          // from NPI2
          //[Phenology].Phyllochron.BasePhyllochron.FixedValue = 99.8910902837222
          //[Phenology].PhyllochronPpSensitivity.FixedValue = 0.417874283738016
          [Phenology].CAMP.FLNparams.MinLN = 6
          [Phenology].CAMP.FLNparams.PpLN = 8
          [Phenology].CAMP.FLNparams.VrnLN = 2
          [Phenology].CAMP.FLNparams.VxPLN = -1
          [Phenology].CAMP.EnvData.VrnTreatTemp = 5.8
          [Phenology].CAMP.EnvData.VrnTreatDuration = 60
          [Phenology].HeadEmergenceLongDayBase.FixedValue = 50
          [Phenology].HeadEmergencePpSensitivity.FixedValue = 3
      Cultivar Zanzibar
        Command:
          [Phenology].Phyllochron.BasePhyllochron.FixedValue = 111.579556421375
          [Phenology].PhyllochronPpSensitivity.FixedValue = 0.217687425020179
          [Phenology].CAMP.EnvData.VrnTreatTemp = 5.8
          [Phenology].CAMP.EnvData.VrnTreatDuration = 60
          [Phenology].CAMP.FLNparams.MinLN = 9
          [Phenology].CAMP.FLNparams.PpLN = 1
          [Phenology].CAMP.FLNparams.VrnLN = 2
          [Phenology].CAMP.FLNparams.VxPLN = -9
          [Phenology].HeadEmergenceLongDayBase.FixedValue = 50
          [Phenology].HeadEmergencePpSensitivity.FixedValue = 0
      Cultivar Axe
        Command:
          [Phenology].HeadEmergencePpSensitivity.FixedValue = 1
          [Phenology].Phyllochron.BasePhyllochron.FixedValue = 92.9812317822162
          [Phenology].PhyllochronPpSensitivity.FixedValue = 0.268590208069814
          [Phenology].CAMP.FLNparams.MinLN = 7
          [Phenology].CAMP.FLNparams.PpLN = 2
          [Phenology].CAMP.FLNparams.VrnLN = 0
          [Phenology].CAMP.FLNparams.VxPLN = 0
          [Phenology].CAMP.EnvData.VrnTreatTemp = 5.8
          [Phenology].CAMP.EnvData.VrnTreatDuration = 60
          [Phenology].HeadEmergenceLongDayBase.FixedValue = 130
    Plant Wheat
      FrostHeatDamageFunctions: CropType=1; FrostLowTT=-6.1; FrostMaxReductionRatio=0.5; FrostUpTT=0.2; FrostMinReductionRatio=0; FrostStartSensitiveGS=5.56; FrostStartMostSensitiveGS=6.68; FrostEndMostSensitiveGS=8.43; FrostEndSensitiveGS=9; HeatLowTT=30.1; HeatMinReductionRatio=0; HeatUpTT=38.7; HeatMaxReductionRatio=0.56; HeatStartSensitiveGS=6.53; HeatStartMostSensitiveGS=7.84; HeatEndMostSensitiveGS=8.87; HeatEndSensitiveGS=9.2
  Experiment Horsham2019
    Factors
      Permutation TOSxCv
        Factor TOS
          CompositeFactor 1
            Specifications:
              [Sowing].Script.SowDate=6-may
              [Sowing].Script.RowSpacing=100
              [Sowing].Script.RowSpacing=235
              [Sowing].Script.SowingDepth=50
          CompositeFactor 2 (disabled)
            Specifications:
              [Sowing].Script.SowDate=5-jul
              [Sowing].Script.RowSpacing=100
              [Sowing].Script.RowSpacing=235
              [Sowing].Script.SowingDepth=50
        Factor Cv
          CompositeFactor Coolah
            Specifications:
              [Sowing].Script.CultivarName=Axe
              [Axe]
            Cultivar Axe
              Command:
                // from NPI2
                [Phenology].Phyllochron.BasePhyllochron.FixedValue = 115 // 95.8008034182983
                //[Phenology].PhyllochronPpSensitivity.FixedValue = 0.352406544577556
                [Phenology].CAMP.FLNparams.MinLN = 9
                [Phenology].CAMP.FLNparams.PpLN = 1
                [Phenology].CAMP.FLNparams.VrnLN = 0
                [Phenology].CAMP.FLNparams.VxPLN = 2
                [Phenology].CAMP.EnvData.VrnTreatTemp = 5.8
                [Phenology].CAMP.EnvData.VrnTreatDuration = 60
                [Phenology].HeadEmergenceLongDayBase.FixedValue = 50
                [Phenology].HeadEmergencePpSensitivity.FixedValue = 0
          CompositeFactor Cutlass
            Specifications:
              [Sowing].Script.CultivarName=Cutlass
              [Cutlass]
            Cultivar Cutlass
              Command:
                [Phenology].Phyllochron.BasePhyllochron.FixedValue = 95.8008034182983
                [Phenology].PhyllochronPpSensitivity.FixedValue = 0.352406544577556
                [Phenology].CAMP.FLNparams.MinLN = 7
                [Phenology].CAMP.FLNparams.PpLN = 5
                [Phenology].CAMP.FLNparams.VrnLN = 1
                [Phenology].CAMP.FLNparams.VxPLN = 2
                [Phenology].CAMP.EnvData.VrnTreatTemp = 5.8
                [Phenology].CAMP.EnvData.VrnTreatDuration = 60
                [Phenology].HeadEmergenceLongDayBase.FixedValue = 130
                [Phenology].HeadEmergencePpSensitivity.FixedValue = 3 // 2
          CompositeFactor Gregory
            Specifications:
              [Sowing].Script.CultivarName=Gregory
              [Gregory]
            Cultivar Gregory
              Command:
                [Phenology].Phyllochron.BasePhyllochron.FixedValue = 96.2227321902995
                [Phenology].PhyllochronPpSensitivity.FixedValue = 0.199981872553676
                [Phenology].CAMP.FLNparams.MinLN = 8
                [Phenology].CAMP.FLNparams.PpLN = 2
                [Phenology].CAMP.FLNparams.VrnLN = 4
                [Phenology].CAMP.FLNparams.VxPLN = -3
                [Phenology].CAMP.EnvData.VrnTreatTemp = 6
                [Phenology].CAMP.EnvData.VrnTreatDuration = 60
                [Phenology].HeadEmergenceLongDayBase.FixedValue = 180 // 110
                [Phenology].HeadEmergencePpSensitivity.FixedValue = 1
                [Grain].MaximumPotentialGrainSize.FixedValue = 0.041
                [Grain].NumberFunction.GrainNumber.GrainsPerGramOfStem.FixedValue = 22
          CompositeFactor Lancer
            Specifications:
              [Sowing].Script.CultivarName=Lancer
              [Lancer]
            Cultivar Lancer
              Command:
                [Phenology].Phyllochron.BasePhyllochron.FixedValue = 85.6623042725763
                [Phenology].PhyllochronPpSensitivity.FixedValue = 0.324980109776406
                [Phenology].CAMP.FLNparams.MinLN = 8
                [Phenology].CAMP.FLNparams.PpLN = 4
                [Phenology].CAMP.FLNparams.VrnLN = 2
                [Phenology].CAMP.FLNparams.VxPLN = -2
                [Phenology].CAMP.EnvData.VrnTreatTemp = 5.8
                [Phenology].CAMP.EnvData.VrnTreatDuration = 60
                [Phenology].HeadEmergenceLongDayBase.FixedValue = 215 // 150
                [Phenology].HeadEmergencePpSensitivity.FixedValue = 1
          CompositeFactor Mace
            Specifications:
              [Sowing].Script.CultivarName=Mace
              [Mace]
            Cultivar Mace
              Command:
                [Phenology].Phyllochron.BasePhyllochron.FixedValue = 106.268453805677
                [Phenology].PhyllochronPpSensitivity.FixedValue = 0.137742329295879
                [Phenology].CAMP.EnvData.VrnTreatTemp = 6
                [Phenology].CAMP.EnvData.VrnTreatDuration = 60
                [Phenology].CAMP.FLNparams.MinLN = 7
                [Phenology].CAMP.FLNparams.PpLN = 2
                [Phenology].CAMP.FLNparams.VrnLN = 3
                [Phenology].CAMP.FLNparams.VxPLN = -3
                [Phenology].HeadEmergenceLongDayBase.FixedValue = 180 // 70
                [Phenology].HeadEmergencePpSensitivity.FixedValue = 1
          CompositeFactor Scepter
            Specifications:
              [Sowing].Script.CultivarName=Scepter
              [Scepter]
            Cultivar Scepter
              Command:
                [Phenology].Phyllochron.BasePhyllochron.FixedValue = 107.602580952482
                [Phenology].PhyllochronPpSensitivity.FixedValue = 0.23032920462638
                [Phenology].CAMP.EnvData.VrnTreatTemp = 6
                [Phenology].CAMP.EnvData.VrnTreatDuration = 60
                [Phenology].CAMP.FLNparams.MinLN = 7
                [Phenology].CAMP.FLNparams.PpLN = 2
                [Phenology].CAMP.FLNparams.VrnLN = 2
                [Phenology].CAMP.FLNparams.VxPLN = -1
                [Phenology].HeadEmergenceLongDayBase.FixedValue = 220 // 170
                [Phenology].HeadEmergencePpSensitivity.FixedValue = 0
          CompositeFactor Scout
            Specifications:
              [Sowing].Script.CultivarName=Scout
              [Scout]
            Cultivar Scout
              Command:
                [Phenology].Phyllochron.BasePhyllochron.FixedValue = 102.794916048683
                [Phenology].PhyllochronPpSensitivity.FixedValue = 0.192036818570067
                [Phenology].CAMP.EnvData.VrnTreatTemp = 6
                [Phenology].CAMP.EnvData.VrnTreatDuration = 60
                [Phenology].CAMP.FLNparams.MinLN = 7
                [Phenology].CAMP.FLNparams.PpLN = 2
                [Phenology].CAMP.FLNparams.VrnLN = 4
                [Phenology].CAMP.FLNparams.VxPLN = -2
                [Phenology].HeadEmergenceLongDayBase.FixedValue = 170
                [Phenology].HeadEmergencePpSensitivity.FixedValue = 1 // 0
          CompositeFactor Sunco
            Specifications:
              [Sowing].Script.CultivarName=Sunco
              [Sunco]
            Cultivar Sunco
              Command:
                [Phenology].Phyllochron.BasePhyllochron.FixedValue = 105 // 100
                [Phenology].CAMP.FLNparams.MinLN = 6
                [Phenology].CAMP.FLNparams.PpLN = 11
                [Phenology].CAMP.FLNparams.VrnLN = 10
                [Phenology].CAMP.FLNparams.VxPLN = -9
                [Phenology].HeadEmergenceLongDayBase.FixedValue = 110 // 170
                [Phenology].HeadEmergencePpSensitivity.FixedValue = 1
          CompositeFactor Sunmax (disabled)
            Specifications:
              [Sowing].Script.CultivarName=Axe
              [Axe]
            Cultivar Axe
              Command:
                // from NPI2
                [Phenology].Phyllochron.BasePhyllochron.FixedValue = 110 // 122.758992485634
                //[Phenology].PhyllochronPpSensitivity.FixedValue = 0.119042603665788
                [Phenology].CAMP.FLNparams.MinLN = 7
                [Phenology].CAMP.FLNparams.PpLN = 6 // 8
                [Phenology].CAMP.FLNparams.VrnLN = 0
                [Phenology].CAMP.FLNparams.VxPLN = 1
                [Phenology].CAMP.EnvData.VrnTreatTemp = 5.8
                [Phenology].CAMP.EnvData.VrnTreatDuration = 60
                [Phenology].HeadEmergenceLongDayBase.FixedValue = 50
                [Phenology].HeadEmergencePpSensitivity.FixedValue = 0
          CompositeFactor Suntop
            Specifications:
              [Sowing].Script.CultivarName=Suntop
              [Suntop]
            Cultivar Suntop
              Command:
                [Phenology].Phyllochron.BasePhyllochron.FixedValue = 90 // 93.1036394598307
                [Phenology].PhyllochronPpSensitivity.FixedValue = 0.335203758711104
                [Phenology].CAMP.EnvData.VrnTreatTemp = 5.8
                [Phenology].CAMP.EnvData.VrnTreatDuration = 60
                [Phenology].CAMP.FLNparams.MinLN = 8
                [Phenology].CAMP.FLNparams.PpLN = 2
                [Phenology].CAMP.FLNparams.VrnLN = 0
                [Phenology].CAMP.FLNparams.VxPLN = 0
                [Phenology].HeadEmergenceLongDayBase.FixedValue = 175 // 210
                [Phenology].HeadEmergencePpSensitivity.FixedValue = 1.8  // 0
          CompositeFactor Trojan
            Specifications:
              [Sowing].Script.CultivarName=Trojan
              [Trojan]
            Cultivar Trojan
              Command:
                [Phenology].Phyllochron.BasePhyllochron.FixedValue = 99.1351271229079
                [Phenology].PhyllochronPpSensitivity.FixedValue = 0.35511766231399
                [Phenology].CAMP.EnvData.VrnTreatTemp = 6
                [Phenology].CAMP.EnvData.VrnTreatDuration = 60
                [Phenology].CAMP.FLNparams.MinLN = 7
                [Phenology].CAMP.FLNparams.PpLN = 5
                [Phenology].CAMP.FLNparams.VrnLN = 2
                [Phenology].CAMP.FLNparams.VxPLN = 1
                [Phenology].HeadEmergenceLongDayBase.FixedValue = 80 // 50
                [Phenology].HeadEmergencePpSensitivity.FixedValue = 4
    Simulation Horsham2019
      Clock: Start=2019-01-01; End=2019-12-31
      Summary SummaryFile
      Weather: FileName=./Met/Horsham_79082.met
      SoilArbitrator
      Zone Field: Area=1; Slope=0; AspectAngle=0; Altitude=50
        Soil Grey Cracking Clay (Horsham No1008): ASCSubOrder=Grey; SoilType=Clay; Site=Horsham Aerodrome; NearestTown=Horsham; Region=Wimmera; State=Victoria; Country=Australia; ApsoilNumber=1008; Latitude=-36.680908; Longitude=142.168314; YearOfSampling=2014; Comments=Clay -
          DataSource=Characterised by BCG as part of the the GRDC Southern Agribusiness Trial Network project.
          Physical
            Thickness  BD       AirDry     LL15      DUL       SAT
            100        1.25866  0.0824091  0.164818  0.445034  0.495034
            150        1.20652  0.094558   0.118197  0.464711  0.514711
            150        1.38521  0.177028   0.177028  0.397278  0.447278
            150        1.36547  0.177028   0.177028  0.404729  0.454729
            150        1.36547  0.177028   0.177028  0.404729  0.454729
            300        1.2629   0.177028   0.177028  0.443433  0.493433
            300        1.2624   0.177028   0.177028  0.443624  0.493624
            BD, DUL source: Field measured and checked for sensibility
            AirDry, LL15 source: Estimated based on local knowledge
            SAT source: Calculated from measured, estimated or calculated BD
            SoilCrop wheatSoil
              LL=[0.164818, 0.118197, 0.177028, 0.211637, 0.241016, 0.270312, 0.343528]
              KL=[0.06, 0.06, 0.06, 0.06, 0.0466666, 0.04, 0.0333333]
              XF=[1, 1, 1, 1, 1, 1, 1]
              LL source: Field measured and checked for sensibility
            SoilCrop barleySoil
              LL=[0.164818, 0.118197, 0.177028, 0.211637, 0.241016, 0.270312, 0.343528]
              KL=[0.07, 0.07, 0.07, 0.07, 0.056666, 0.05, 0.043333]
              XF=[1, 1, 1, 1, 1, 1, 1]
              LL source: Estimated based on local knowledge
            SoilCrop canolaSoil
              LL=[0.164818, 0.118197, 0.177028, 0.211637, 0.241016, 0.270312, 0.343528]
              KL=[0.06, 0.06, 0.06, 0.06, 0.0466666, 0.04, 0.0333333]
              XF=[1, 1, 1, 1, 1, 1, 1]
              LL source: Estimated based on local knowledge
            SoilCrop SCRUMSoil: same as Horsham2019.Horsham2019.Field.Grey Cracking Clay (Horsham No1008).Physical.wheatSoil
          SoilTemperature Temperature: InteractionsPerDay=8
          Water: Thickness=[100, 150, 150, 150, 150, 300, 300]; FilledFromTop=true
            InitialValues=[0.445034, 0.464711, 0.397278, 0.404729, 0.404729, 0.443433, 0.443624]
          Solute NO3: Thickness=[100, 150, 150, 150, 150, 300, 300]; InitialValues=[0, 0, 0, 0, 0, 0, 0]; InitialValuesUnits=ppm; WaterTableConcentration=0; D0=0; DepthConstant=0; MaxDepthSoluteAccessible=0; RunoffEffectivenessAtMovingSolute=0; MaxEffectiveRunoff=0
          Solute NH4: same as Horsham2019.Horsham2019.Field.Grey Cracking Clay (Horsham No1008).NO3
          Solute Urea: same as Horsham2019.Horsham2019.Field.Grey Cracking Clay (Horsham No1008).NO3
          Nutrient
          WaterBalance: SummerDate=1-Nov; SummerU=5; SummerCona=5; WinterDate=1-Apr; WinterU=5; WinterCona=5; DiffusConst=40; DiffusSlope=16; Salb=0.12; CN2Bare=73; CNRed=20; CNCov=0.8; DischargeWidth=5; CatchmentArea=10; PSIDul=-100; Thickness=[100, 150, 150, 150, 150, 300, 300]; SWCON=[0.3, 0.3, 0.3, 0.3, 0.3, 0.3, 0.3]
          Organic: FOMCNRatio=0; CarbonUnits=Total
            Thickness  Carbon  SoilCNRatio  FBiom  FInert  FOM
            100        0.2     12           0.2    0.8     100
            150        0.2     12           0.2    0.8     100
            150        0.2     12           0.2    0.8     100
            150        0.2     12           0.2    0.8     100
            150        0.2     12           0.2    0.8     100
            300        0.2     12           0.2    0.8     100
            300        0.2     12           0.2    0.8     100
          Chemical: Thickness=[100, 150, 150, 150, 150, 300, 300]; PH=[7, 7, 7, 7, 7, 7, 7]; PHUnits=Water
        Plant Wheat
        Fertiliser
        Irrigation
        SurfaceOrganicMatter: InitialResidueName=wheat_stubble; InitialResidueType=canola; InitialResidueMass=500; InitialStandingFraction=0; InitialCPR=0; InitialCNR=100
        MicroClimate: a_interception=0; b_interception=1; c_interception=0; d_interception=0; SoilHeatFluxFraction=0.4; MinimumHeightDiffForNewLayer=0; NightInterceptionFraction=0.5; ReferenceHeight=2
        Manager Sowing
          Crop = [Wheat]
          SowDate = 24-Jul
          CultivarName = Cutlass
          SowingDepth = 50
          RowSpacing = 30
          Population = 150
```csharp
using Models.Soils.Nutrients;
using System;
using Models.Core;
using Models.PMF;
using Models.Soils;
using Models.Soils.Nutrients;
using Models.Utilities;
using APSIM.Shared.Utilities;

namespace Models
{
    [Serializable]
    public class Script : Model
    {
        [Link] Clock Clock;
        [Link] Fertiliser Fertiliser;
        [Link] Summary Summary;
        [Link] Soil Soil;
        Accumulator accumulatedRain;
        
        [Description("Crop")]
        public IPlant Crop { get; set; }
        [Description("Sowing date (d-mmm)")]
        public string SowDate { get; set; }
    [Display(Type = DisplayType.CultivarName, PlantName = "Wheat")]
        [Description("Cultivar to be sown")]
        public string CultivarName { get; set; }
        [Description("Sowing depth (mm)")]
        public double SowingDepth { get; set; }
        [Description("Row spacing (mm)")]
        public double RowSpacing { get; set; }
        [Description("Plant population (/m2)")]
        public double Population { get; set; }
        


        [EventSubscribe("DoManagement")]
        private void OnDoManagement(object sender, EventArgs e)
        {
            if (DateUtilities.WithinDates(SowDate, Clock.Today, SowDate))
            {
                Crop.Sow(population: Population, cultivar: CultivarName, depth: SowingDepth, rowSpacing: RowSpacing);    
            }
        
        }
        
    }
}
```
        Manager FertiliseAtSowingCottonSustain
          Crop = [Wheat]
          FertiliserType = UreaN
          Amount = 4
```csharp
using Models.Soils;
using System;
using Models.Core;
using Models.PMF;
namespace Models
{
    [Serializable]
    public class Script : Model
    {
        [Link] Clock Clock;
        [Link] Fertiliser Fertiliser;
        
        [Description("Crop to be fertilised")]
        public IPlant Crop { get; set; }

        [Description("Type of fertiliser to apply? ")] 
        [Display(Type = DisplayType.FertiliserType)]public string FertiliserType { get; set; }
    
        [Description("Amount of fertiliser to be applied (kg/ha)")]
        public double Amount { get; set; }
        
        [EventSubscribe("Sowing")]
        private void OnSowing(object sender, EventArgs e)
        {
            Model crop = sender as Model;
            if (Crop != null && crop.Name.ToLower() == (Crop as IModel).Name.ToLower())
                Fertiliser.Apply(amount: Amount, type: FertiliserType);
        }
    }
}
```
        Manager FertiliseAtSowingUrea
          Crop = [Wheat]
          FertiliserType = UreaN
          Amount = 46
          script: same as in Horsham2019.Horsham2019.Field.FertiliseAtSowingCottonSustain
        Manager AutomaticIrrigation
          Crop = [Wheat]
          AutoIrrigationOn = True
          FASWThreshold = 1
          FASWDepth = 1600
          weeks = 0
          afterSowing = 0
```csharp
using APSIM.Numerics;
using Models.Interfaces;
using APSIM.Shared.Utilities;
using System.Xml.Serialization;
using Models;
using Models.PMF;
using Models.Soils;
using System.Text;
using System.Collections.Generic;
using Models.Core;
using System.Linq;
using System;
using Models.Interfaces;
namespace Models
{
    [Serializable] 
    public class Script : Model
    {
        [Link] private Zone zone;
        [Link] private Irrigation irrigation;
        [Link] private ISoilWater waterBalance;
        [Link] private IPhysical soilPhysical;
        public double FASW { get; set; }
        public double WaterDeficit  { get; set; }
    


        [Description("Crop to irrigate")]
        public IPlant Crop { get; set; }
        
        [Description("Auto irrigation on?")]
        public bool AutoIrrigationOn { get; set; }

        [Description("Threshold fraction available water (0-1)")]
        public double FASWThreshold { get; set; }

        [Description("Soil depth (mm) to which fraction available water is calculated")]
        public double FASWDepth { get; set; }

        [Description("Minimum weeks between irrigations")]
        public double weeks { get; set; }

        [Description("Minimum days after sowing for first irrigation")]
        public int afterSowing { get; set; }

        private double irrigationGap = 0;    // gap between irrigations

        /// <summary>Called at start of simulation. Performs some basic error checking. </summary>
        [EventSubscribe("StartOfSimulation")]
        private void ErrorChecking(object sender, EventArgs args)
        {
            if (Crop == null)
                throw new Exception("No crop was specified in script " + Parent.Name);
        }

        [EventSubscribe("DoManagement")]
        private void OnDoManagement(object sender, EventArgs e)
        {
            if (AutoIrrigationOn && Crop.IsAlive)
            {
                   irrigationGap += 1;                // increment gap between irrigations
                CalculateFASW();                // calc FASW and WaterDeficit
                if ((FASW < FASWThreshold) && (irrigationGap >= weeks * 7))
                {
                    irrigation.Apply(WaterDeficit, depth: 0);
                    irrigationGap = 0;            // reset
                }
            }
            else
            {
                irrigationGap = weeks * 7 - afterSowing - 1;    // allow irrigation a number of days after it becomes alive/sown
            }
        }

        // Calculate the fraction of the potential available sw
        // Calculate the deficit amount from DUL
        private void CalculateFASW()
        {
            double[] LL15 = MathUtilities.Multiply(soilPhysical.LL15, soilPhysical.Thickness);
            double[] DUL = MathUtilities.Multiply(soilPhysical.DUL, soilPhysical.Thickness);
        
            int nlayr = GetLayerIndex(FASWDepth);
            nlayr = Math.Min(nlayr, soilPhysical.Thickness.Length-1);
            double cumdep = MathUtilities.Sum(soilPhysical.Thickness, 0, nlayr, 0.0);    // tricky function that sums up to before nlayr

            double part_layer = MathUtilities.Divide((FASWDepth - cumdep), soilPhysical.Thickness[nlayr], 0.0);

            // note that results may be strange if swdep < ll15
            double avail_sw = (MathUtilities.Sum(waterBalance.SWmm, 0, nlayr, 0.0) + part_layer * waterBalance.SWmm[nlayr])
                            - (MathUtilities.Sum(LL15, 0, nlayr, 0.0) + part_layer * LL15[nlayr]);

            double pot_avail_sw = (MathUtilities.Sum(DUL, 0, nlayr, 0.0) + part_layer * DUL[nlayr])
                                - (MathUtilities.Sum(LL15, 0, nlayr, 0.0) + part_layer * LL15[nlayr]);
            
            FASW = MathUtilities.Divide(avail_sw, pot_avail_sw, 0.0);
            WaterDeficit = MathUtilities.Constrain(pot_avail_sw - avail_sw, 0.0, 100000);
        }

        // Get index of the layer that has this depth in it 
        private int GetLayerIndex(double pointDepth)
        {
            double[] cumThickness = soilPhysical.ThicknessCumulative;
            int layerIdx = 0;
            while ((layerIdx < cumThickness.Length) && (pointDepth > cumThickness[layerIdx]))
            {
                layerIdx += 1;
            }

            return layerIdx;
        }
    }
}
```
        Operations IrrigationEvents
        Manager Harvest
          HarvestDate = 31-dec
```csharp
using Models.Soils.Nutrients;
using System;
using Models.Core;
using Models.PMF;
using Models.Soils;
using Models.Soils.Nutrients;
using Models.Utilities;
using APSIM.Shared.Utilities;

namespace Models
{
    [Serializable]
    public class Script : Model
    {
        [Link(ByName = true)] Plant Wheat;
        [Link] Clock Clock;
        
        [Description("Must Harvest (d-mmm)")]
        public string HarvestDate { get; set; }

        [EventSubscribe("DoManagement")]
        private void OnDoManagement(object sender, EventArgs e)
        {
            if (Wheat.IsReadyForHarvesting)
            {
               Wheat.Harvest();
               Wheat.EndCrop();    
            }
            else if ((Wheat.IsAlive) && (DateUtilities.WithinDates(HarvestDate, Clock.Today, HarvestDate)))
                        {
               Wheat.Harvest();
               Wheat.EndCrop();    
            }
        
        }
        
    }
}
```
        Report ReportDaily: EventNames=[Clock].DoReport
          VariableNames:
            [Clock].Today as Date
            [Wheat].Phenology.Zadok.Stage as ZadokStage
            [Wheat].Phenology.CurrentStageName as CurrentStageName
            [Wheat].AboveGround.Wt as AboveGroundWt
            [Wheat].Grain.Total.Wt*10 as Yield
            [Wheat].Grain.Size as GrainSize
            [Wheat].Grain.Number as GrainNumber
            [Wheat].LAI as LAI
            [Wheat].Phenology.ThermalTime as TT
            [Wheat].Phenology.AccumulatedTT as AccumulatedTT
            [Weather].MaxT as maxT
            [Weather].MinT as minT
        Report HarvestReport: same as Replacements.HarvestReport
        Report DamageFunctionHarvestReport: EventNames=[Wheat].Harvesting
          VariableNames:
            [Simulation].Name
            [Clock].Today
            [FrostHeatDamageFunctions].FrostHeatYield as Wheat.Grain.Wt
  Experiment Merredin2019
    Factors
      Permutation TOSxCv
        Factor TOS
          CompositeFactor 1
            Specifications:
              [Sowing].Script.SowDate=8-may
              [Sowing].Script.RowSpacing=100
              [Sowing].Script.RowSpacing=235
              [Sowing].Script.SowingDepth=50
              [IrrigationEvents]
            Operations IrrigationEvents
          CompositeFactor 2
            Specifications:
              [Sowing].Script.SowDate=2-jul
              [Sowing].Script.RowSpacing=100
              [Sowing].Script.RowSpacing=235
              [Sowing].Script.SowingDepth=50
        Factor Cv
          Specification=[Sowing].Script.CultivarName = Coolah, Cutlass, Gregory, Lancer, Mace, Scepter, Scout, Sunco, Sunmax, Suntop, Trojan
    Simulation Merredin2019
      Clock: Start=2019-05-01; End=2019-12-31
      Summary SummaryFile
      Weather: FileName=./Met/Merredin_10092.met
      SoilArbitrator
      Zone Field: Area=1; Slope=0; AspectAngle=0; Altitude=50
        Soil Duplex sandy gravel (Merredin No475): SoilType=Sandy duplex; LocalName=Ironstone gravelly soils; Site=Merredin; NearestTown=Merredin; Region=Central Region; State=Western Australia; Country=Australia; ApsoilNumber=475; Latitude=-31.483; Longitude=118.277; LocationAccuracy=Regional Soil Type; YearOfSampling=1993; DataSource=DAFWA Jeff Russell
          Comments=Duplex sandy gravel  - Gravelly sand over gravel; Table 7 , Fig 7. Russell (2005) Major soils of the Eastern Wheabelt to characterise soil moisture availablity. Department of Agriculture Western Australia. Resource Management Technical Report 187.
          Physical
            Thickness  ParticleSizeSand  ParticleSizeSilt  ParticleSizeClay  Rocks     BD    AirDry  LL15  DUL   SAT
            100        5                 65                30                0.147272  1.3   0.02    0.04  0.17  0.404
            100        5                 65                30                0         1.55  0.03    0.05  0.17  0.404
            200        5                 65                30                0         1.5   0.05    0.05  0.2   0.368
            200        5                 65                30                0.292384  1.45  0.06    0.06  0.23  0.298
            200        5                 65                30                0.292384  1.45  0.08    0.08  0.23  0.298
            200        5                 65                30                0.287634  1.45  0.09    0.09  0.24  0.3
            200        5                 65                30                0.287634  1.45  0.09    0.09  0.24  0.3
            200        5                 65                30                0.287634  1.45  0.09    0.09  0.23  0.3
            200        5                 65                30                0.287634  1.45  0.09    0.09  0.23  0.3
            BD source: Unknown source or quality of data
            AirDry, LL15 source: Estimated based on local knowledge
            DUL source: Field measured and checked for sensibility, Estimated based on local knowledge
            SAT source: Calculated from measured, estimated or calculated BD, Estimated based on local knowledge
            Rocks, ParticleSizeSand, ParticleSizeSilt, ParticleSizeClay source: Calculated
            SoilCrop wheatSoil: LL=[0.07, 0.09, 0.12, 0.125, 0.17, 0.19, 0.24, 0.23, 0.23]; KL=[0.06, 0.06, 0.06, 0.04, 0.04, 0.04, 0.04, 0.02, 0.02]; XF=[1, 1, 1, 1, 1, 0, 0, 0, 0]
              LL source: Field measured and checked for sensibility, Estimated based on local knowledge
            SoilCrop barleySoil: LL=[0.07, 0.09, 0.12, 0.125, 0.17, 0.19, 0.24, 0.23, 0.23]; KL=[0.07, 0.07, 0.07, 0.05, 0.05, 0.05, 0.05, 0.03, 0.03]; XF=[1, 1, 1, 1, 1, 1, 0, 0, 0]
              LL source: Estimated based on local knowledge
            SoilCrop oatsSoil: LL=[0.07, 0.09, 0.12, 0.125, 0.17, 0.19, 0.24, 0.23, 0.23]; KL=[0.06, 0.06, 0.06, 0.04, 0.04, 0.04, 0.04, 0.02, 0.02]; XF=[1, 1, 1, 1, 1, 1, 0, 0, 0]
              LL source: Estimated based on local knowledge
            SoilCrop SCRUMSoil: LL=[0.07, 0.09, 0.12, 0.125, 0.17, 0.19, 0.24, 0.23, 0.23]; KL=[0.06, 0.06, 0.06, 0.04, 0.04, 0.04, 0.04, 0.02, 0.02]; XF=[1, 1, 1, 1, 1, 1, 0, 0, 0]
              LL source: Field measured and checked for sensibility, Estimated based on local knowledge
          SoilTemperature Temperature: InteractionsPerDay=8
          Water: Thickness=[100, 100, 200, 200, 200, 200, 200, 200, 200]; InitialValues=[0.17, 0.155, 0.05, 0.06, 0.08, 0.09, 0.09, 0.09, 0.09]; FilledFromTop=true
          Solute NO3: Thickness=[100, 100, 200, 200, 200, 200, 200, 200, 200]; InitialValues=[50, 50, 0, 0, 0, 0, 0, 0, 0]; InitialValuesUnits=kg/ha; WaterTableConcentration=0; D0=0; DepthConstant=0; MaxDepthSoluteAccessible=0; RunoffEffectivenessAtMovingSolute=0; MaxEffectiveRunoff=0
          Solute NH4: Thickness=[100, 100, 200, 200, 200, 200, 200, 200, 200]; InitialValues=[0, 0, 0, 0, 0, 0, 0, 0, 0]; InitialValuesUnits=ppm; WaterTableConcentration=0; D0=0; DepthConstant=0; MaxDepthSoluteAccessible=0; RunoffEffectivenessAtMovingSolute=0; MaxEffectiveRunoff=0
          Solute Urea: same as Merredin2019.Merredin2019.Field.Duplex sandy gravel (Merredin No475).NH4
          Nutrient
          WaterBalance: SummerDate=1-Nov; SummerU=5; SummerCona=5; WinterDate=1-Apr; WinterU=5; WinterCona=5; DiffusConst=40; DiffusSlope=16; Salb=0.12; CN2Bare=73; CNRed=20; CNCov=0.8; DischargeWidth=5; CatchmentArea=10; PSIDul=-100; Thickness=[100, 100, 200, 200, 200, 200, 200, 200, 200]; SWCON=[0.3, 0.3, 0.3, 0.3, 0.3, 0.3, 0.3, 0.3, 0.3]
          Organic: FOMCNRatio=0; CarbonUnits=Total
            Thickness  Carbon  SoilCNRatio  FBiom  FInert  FOM
            100        0.2     12           0.2    0.8     100
            100        0.2     12           0.2    0.8     100
            200        0.2     12           0.2    0.8     100
            200        0.2     12           0.2    0.8     100
            200        0.2     12           0.2    0.8     100
            200        0.2     12           0.2    0.8     100
            200        0.2     12           0.2    0.8     100
            200        0.2     12           0.2    0.8     100
            200        0.2     12           0.2    0.8     100
          Chemical: PHUnits=Water
            Thickness  PH  CEC
            100        7   8.795
            100        7   8.795
            200        7   8.795
            200        7   8.795
            200        7   8.795
            200        7   8.795
            200        7   8.795
            200        7   8.795
            200        7   8.795
            CEC source: Calculated
        Plant Wheat
        Fertiliser
        Irrigation
        SurfaceOrganicMatter: InitialResidueName=wheat_stubble; InitialResidueType=canola; InitialResidueMass=500; InitialStandingFraction=0; InitialCPR=0; InitialCNR=100
        MicroClimate: a_interception=0; b_interception=1; c_interception=0; d_interception=0; SoilHeatFluxFraction=0.4; MinimumHeightDiffForNewLayer=0; NightInterceptionFraction=0.5; ReferenceHeight=2
        Manager Sowing: same as Horsham2019.Horsham2019.Field.Sowing
        Manager FertiliseAtSowingUrea: same as Horsham2019.Horsham2019.Field.FertiliseAtSowingUrea
        Manager FertiliseAtSowingCottonSustain: same as Horsham2019.Horsham2019.Field.FertiliseAtSowingCottonSustain
        Manager AutomaticIrrigation: same as Horsham2019.Horsham2019.Field.AutomaticIrrigation
        Manager AutomaticFertiliseTopup
          FertiliserType = NO3N
          Threshold = 200
          FertiliseDepth = 0
```csharp
using APSIM.Numerics;
using Models.Soils.Nutrients;
using System.Linq;
using System;
using Models.Core;
using Models.PMF;
using Models.Soils.Nutrients;
using APSIM.Shared.Utilities;
using Models.Soils;
namespace Models
{
    [Serializable]
    public class Script : Model
    {
        [Link] Clock Clock;
        [Link] Fertiliser Fertiliser;
        [Link(ByName=true)] Solute NO3;

        [Description("Type of fertiliser to apply? ")] 
        [Display(Type = DisplayType.FertiliserType)]public string FertiliserType { get; set; }
    
        [Description("Threshold amount of NO3 to topup to (kg/ha)")]
        public double Threshold { get; set;}
        
        [Description("Fertilise depth (mm)")]
        public double FertiliseDepth { get; set; }
        
        [EventSubscribe("DoManagement")]
        private void OnDoManagement(object sender, EventArgs e)
        {
            double Amount = Threshold - MathUtilities.Sum(NO3.kgha);
            Fertiliser.Apply(amount: Amount, type: FertiliserType, depth: FertiliseDepth);
        }
    }
}
```
        Operations IrrigationEvents
        Manager Harvest: same as Horsham2019.Horsham2019.Field.Harvest
        Report ReportDaily: same as Horsham2019.Horsham2019.Field.ReportDaily
        Report DamageFunctionHarvestReport: EventNames=[Wheat].Harvesting
          VariableNames:
            [Simulation].Name
            [Clock].Today
            [FrostHeatDamageFunctions].FrostHeatYield as Wheat.Grain.Wt
        Report HarvestReport: same as Replacements.HarvestReport
  Experiment Narrabri2017
    Factors
      Permutation TOSxCv
        Factor TOS
          CompositeFactor 1
            Specifications:
              [Sowing].Script.SowDate=13-may
              //[Sowing].Script.SowDate=21-may
              [Sowing].Script.RowSpacing=100
              [Sowing].Script.RowSpacing=235
              [Sowing].Script.SowingDepth=50
          CompositeFactor 2
            Specifications:
              [Sowing].Script.SowDate=1-aug
              //[Sowing].Script.SowDate=27-jul
              [Sowing].Script.RowSpacing=100
              [Sowing].Script.RowSpacing=235
              [Sowing].Script.SowingDepth=50
        Factor Cv
          CompositeFactor Crusader
            Specifications:
              [Sowing].Script.CultivarName=Crusader
              [Crusader]
            Cultivar Crusader
              Command:
                // from NPI2
                [Phenology].Phyllochron.BasePhyllochron.FixedValue = 89 // 90
                //[Phenology].PhyllochronPpSensitivity.FixedValue = 0.352406544577556
                [Phenology].CAMP.FLNparams.MinLN = 8 // 9
                [Phenology].CAMP.FLNparams.PpLN = 1
                [Phenology].CAMP.FLNparams.VrnLN = 0
                [Phenology].CAMP.FLNparams.VxPLN = 2
                [Phenology].CAMP.EnvData.VrnTreatTemp = 5.8
                [Phenology].CAMP.EnvData.VrnTreatDuration = 60
                [Phenology].HeadEmergenceLongDayBase.FixedValue = 50
                [Phenology].HeadEmergencePpSensitivity.FixedValue = 2 // 0
          CompositeFactor Gregory
            Specifications:
              [Sowing].Script.CultivarName=Gregory
              [Gregory]
            Cultivar Gregory
              Command:
                [Phenology].Phyllochron.BasePhyllochron.FixedValue = 91 // 90 // 96.2227321902995
                [Phenology].PhyllochronPpSensitivity.FixedValue = 0.199981872553676
                [Phenology].CAMP.FLNparams.MinLN = 8
                [Phenology].CAMP.FLNparams.PpLN = 2
                [Phenology].CAMP.FLNparams.VrnLN = 4
                [Phenology].CAMP.FLNparams.VxPLN = -3
                [Phenology].CAMP.EnvData.VrnTreatTemp = 6
                [Phenology].CAMP.EnvData.VrnTreatDuration = 60
                [Phenology].HeadEmergenceLongDayBase.FixedValue = 130 // 110
                [Phenology].HeadEmergencePpSensitivity.FixedValue = 1
                [Grain].MaximumPotentialGrainSize.FixedValue = 0.041
                [Grain].NumberFunction.GrainNumber.GrainsPerGramOfStem.FixedValue = 22
          CompositeFactor Janz
            Specifications:
              [Sowing].Script.CultivarName=Janz
              [Janz]
            Cultivar Janz
              Command:
                [Phenology].Phyllochron.BasePhyllochron.FixedValue = 85 // 91.4460925764448
                [Phenology].PhyllochronPpSensitivity.FixedValue = 0.235020437209909
                [Phenology].CAMP.FLNparams.MinLN = 8
                [Phenology].CAMP.FLNparams.PpLN = 3
                [Phenology].CAMP.FLNparams.VrnLN = 1
                [Phenology].CAMP.FLNparams.VxPLN = -1
                [Phenology].CAMP.EnvData.VrnTreatTemp = 5.8
                [Phenology].CAMP.EnvData.VrnTreatDuration = 60
                [Phenology].HeadEmergenceLongDayBase.FixedValue = 140 // 130
                [Phenology].HeadEmergencePpSensitivity.FixedValue = 1
          CompositeFactor Lancer
            Specifications:
              [Sowing].Script.CultivarName=Lancer
              [Lancer]
            Cultivar Lancer
              Command:
                [Phenology].Phyllochron.BasePhyllochron.FixedValue = 85.6623042725763
                [Phenology].PhyllochronPpSensitivity.FixedValue = 0.324980109776406
                [Phenology].CAMP.FLNparams.MinLN = 8
                [Phenology].CAMP.FLNparams.PpLN = 4
                [Phenology].CAMP.FLNparams.VrnLN = 2
                [Phenology].CAMP.FLNparams.VxPLN = -2
                [Phenology].CAMP.EnvData.VrnTreatTemp = 5.8
                [Phenology].CAMP.EnvData.VrnTreatDuration = 60
                [Phenology].HeadEmergenceLongDayBase.FixedValue = 125 // 150
                [Phenology].HeadEmergencePpSensitivity.FixedValue = 1
          CompositeFactor Mace
            Specifications:
              [Sowing].Script.CultivarName=Mace
              [Mace]
            Cultivar Mace: same as Replacements.Cultivars.Mace
          CompositeFactor Mitch
            Specifications:
              [Sowing].Script.CultivarName=Mitch
              [Mitch]
            Cultivar Mitch
              Command:
                [Phenology].Phyllochron.BasePhyllochron.FixedValue = 107.602580952482
                [Phenology].PhyllochronPpSensitivity.FixedValue = 0.23032920462638
                [Phenology].CAMP.EnvData.VrnTreatTemp = 6
                [Phenology].CAMP.EnvData.VrnTreatDuration = 60
                [Phenology].CAMP.FLNparams.MinLN = 7
                [Phenology].CAMP.FLNparams.PpLN = 2
                [Phenology].CAMP.FLNparams.VrnLN = 2
                [Phenology].CAMP.FLNparams.VxPLN = -1
                [Phenology].HeadEmergenceLongDayBase.FixedValue = 190 // 170
                [Phenology].HeadEmergencePpSensitivity.FixedValue = 0
          CompositeFactor Scout
            Specifications:
              [Sowing].Script.CultivarName=Scout
              [Scout]
            Cultivar Scout: same as Replacements.Cultivars.Scout
          CompositeFactor Spitfire
            Specifications:
              [Sowing].Script.CultivarName=Spitfire
              [Spitfire]
            Cultivar Spitfire
              Command:
                [Phenology].Phyllochron.BasePhyllochron.FixedValue = 87.8426291924597
                [Phenology].PhyllochronPpSensitivity.FixedValue = 0.226170449889058
                [Phenology].CAMP.EnvData.VrnTreatTemp = 5.8
                [Phenology].CAMP.EnvData.VrnTreatDuration = 60
                [Phenology].CAMP.FLNparams.MinLN = 8
                [Phenology].CAMP.FLNparams.PpLN = 1
                [Phenology].CAMP.FLNparams.VrnLN = 3
                [Phenology].CAMP.FLNparams.VxPLN = -3
                [Phenology].HeadEmergenceLongDayBase.FixedValue = 165 // 130
                [Phenology].HeadEmergencePpSensitivity.FixedValue = 1
          CompositeFactor Sunco
            Specifications:
              [Sowing].Script.CultivarName=Sunco
              [Sunco]
            Cultivar Sunco
              Command:
                [Phenology].Phyllochron.BasePhyllochron.FixedValue = 90 // 100
                [Phenology].CAMP.FLNparams.MinLN = 7 // 6
                [Phenology].CAMP.FLNparams.PpLN = 11
                [Phenology].CAMP.FLNparams.VrnLN = 10
                [Phenology].CAMP.FLNparams.VxPLN = -9
                [Phenology].HeadEmergenceLongDayBase.FixedValue = 150 // 170
                [Phenology].HeadEmergencePpSensitivity.FixedValue = 0 // 1
          CompositeFactor Sunstate
            Specifications:
              [Sowing].Script.CultivarName=Sunstate
              [Sunstate]
            Cultivar Sunstate
              Command:
                [Phenology].Phyllochron.BasePhyllochron.FixedValue = 96 // 95.0758950229683
                [Phenology].PhyllochronPpSensitivity.FixedValue = 0.225986092694718
                [Phenology].CAMP.EnvData.VrnTreatTemp = 6
                [Phenology].CAMP.EnvData.VrnTreatDuration = 60
                [Phenology].CAMP.FLNparams.MinLN = 7
                [Phenology].CAMP.FLNparams.PpLN = 1
                [Phenology].CAMP.FLNparams.VrnLN = 4
                [Phenology].CAMP.FLNparams.VxPLN = -4
                [Phenology].HeadEmergenceLongDayBase.FixedValue = 200 // 190
                [Phenology].HeadEmergencePpSensitivity.FixedValue = 1
          CompositeFactor Suntop
            Specifications:
              [Sowing].Script.CultivarName=Suntop
              [Suntop]
            Cultivar Suntop
              Command:
                [Phenology].Phyllochron.BasePhyllochron.FixedValue = 95 // 93.1036394598307
                [Phenology].PhyllochronPpSensitivity.FixedValue = 0.335203758711104
                [Phenology].CAMP.EnvData.VrnTreatTemp = 5.8
                [Phenology].CAMP.EnvData.VrnTreatDuration = 60
                [Phenology].CAMP.FLNparams.MinLN = 7 // 8
                [Phenology].CAMP.FLNparams.PpLN = 2
                [Phenology].CAMP.FLNparams.VrnLN = 0
                [Phenology].CAMP.FLNparams.VxPLN = 0
                [Phenology].HeadEmergenceLongDayBase.FixedValue = 210
                [Phenology].HeadEmergencePpSensitivity.FixedValue = 1 // 0
    Simulation Narrabri2017
      Clock: Start=2017-05-01; End=2017-12-31
      Summary SummaryFile
      Weather: FileName=./Met/Narrabri_local.met
      SoilArbitrator
      Zone Field: Area=1; Slope=0; AspectAngle=0; Altitude=50
        Soil Clay Loam over Heavy Clay (Narrabri No614-YP): SoilType=Other; Site=Narrabri; NearestTown=Narrabri, NSW 2390; Region=North West Slopes and Plains; State=New South Wales; Country=Australia; NaturalVegetation=Grasslands, Poplar Box; ApsoilNumber=614-YP; Latitude=-30.28; Longitude=149.807; YearOfSampling=0; DataSource=YP. A Peake CSE Toowoomba; Comments=Clay loam - PBI Narrabri Clay over Heavy Clay.
          Physical
            Thickness  ParticleSizeSand  ParticleSizeSilt  ParticleSizeClay  Rocks  BD    AirDry  LL15  DUL    SAT
            150        5                 65                30                0      1.4   0.08    0.2   0.36   0.471
            150        5                 65                30                0      1.4   0.12    0.2   0.365  0.471
            300        5                 65                30                0      1.33  0.18    0.2   0.41   0.468
            300        5                 65                30                0      1.35  0.18    0.2   0.405  0.461
            300        5                 65                30                0      1.36  0.18    0.2   0.4    0.457
            300        5                 65                30                0      1.38  0.18    0.2   0.395  0.449
            300        5                 65                30                0      1.4   0.18    0.2   0.39   0.442
            BD, AirDry, LL15, DUL, SAT source: Unknown source or quality of data
            Rocks, ParticleSizeSand, ParticleSizeSilt, ParticleSizeClay source: Calculated
            SoilCrop wheatSoil: LL=[0.2, 0.21, 0.26, 0.27, 0.28, 0.29, 0.3]; KL=[0.06, 0.06, 0.06, 0.04, 0.04, 0.02, 0.02]; XF=[1, 1, 1, 1, 1, 1, 1]
              LL source: Unknown source or quality of data
            SoilCrop SCRUMSoil: same as Narrabri2017.Narrabri2017.Field.Clay Loam over Heavy Clay (Narrabri No614-YP).Physical.wheatSoil
          SoilTemperature Temperature: InteractionsPerDay=8
          Water: Thickness=[150, 150, 300, 300, 300, 300, 300]; InitialValues=[0.36, 0.2725, 0.2, 0.2, 0.2, 0.2, 0.2]; FilledFromTop=true
          Solute NO3: Thickness=[150, 150, 300, 300, 300, 300, 300]; InitialValues=[20, 50, 20, 0, 0, 0, 0]; InitialValuesUnits=kg/ha; WaterTableConcentration=0; D0=0; DepthConstant=0; MaxDepthSoluteAccessible=0; RunoffEffectivenessAtMovingSolute=0; MaxEffectiveRunoff=0
          Solute NH4: Thickness=[150, 150, 300, 300, 300, 300, 300]; InitialValues=[0, 0, 0, 0, 0, 0, 0]; InitialValuesUnits=ppm; WaterTableConcentration=0; D0=0; DepthConstant=0; MaxDepthSoluteAccessible=0; RunoffEffectivenessAtMovingSolute=0; MaxEffectiveRunoff=0
          Solute Urea: same as Narrabri2017.Narrabri2017.Field.Clay Loam over Heavy Clay (Narrabri No614-YP).NH4
          Nutrient
          WaterBalance: SummerDate=1-Nov; SummerU=5; SummerCona=5; WinterDate=1-Apr; WinterU=5; WinterCona=5; DiffusConst=40; DiffusSlope=16; Salb=0.12; CN2Bare=73; CNRed=20; CNCov=0.8; DischargeWidth=5; CatchmentArea=10; PSIDul=-100; Thickness=[150, 150, 300, 300, 300, 300, 300]; SWCON=[0.3, 0.3, 0.3, 0.3, 0.3, 0.3, 0.3]
          Organic: FOMCNRatio=0; CarbonUnits=Total
            Thickness  Carbon  SoilCNRatio  FBiom  FInert  FOM
            150        0.2     12           0.2    0.8     100
            150        0.2     12           0.2    0.8     100
            300        0.2     12           0.2    0.8     100
            300        0.2     12           0.2    0.8     100
            300        0.2     12           0.2    0.8     100
            300        0.2     12           0.2    0.8     100
            300        0.2     12           0.2    0.8     100
          Chemical: PHUnits=Water
            Thickness  PH  CEC
            150        7   8.795
            150        7   8.795
            300        7   8.795
            300        7   8.795
            300        7   8.795
            300        7   8.795
            300        7   8.795
            CEC source: Calculated
        Plant Wheat
        Fertiliser
        Irrigation
        SurfaceOrganicMatter: InitialResidueName=wheat_stubble; InitialResidueType=canola; InitialResidueMass=500; InitialStandingFraction=0; InitialCPR=0; InitialCNR=100
        MicroClimate: a_interception=0; b_interception=1; c_interception=0; d_interception=0; SoilHeatFluxFraction=0.4; MinimumHeightDiffForNewLayer=0; NightInterceptionFraction=0.5; ReferenceHeight=2
        Manager Sowing: same as Horsham2019.Horsham2019.Field.Sowing
        Manager AutomaticIrrigation: same as Horsham2019.Horsham2019.Field.AutomaticIrrigation
        Manager FertiliseAtSowingCottonSustain: same as Horsham2019.Horsham2019.Field.FertiliseAtSowingCottonSustain
        Manager FertiliseAtSowingUrea: same as Horsham2019.Horsham2019.Field.FertiliseAtSowingUrea
        Operations IrrigationEvents
        Manager Harvest: same as Horsham2019.Horsham2019.Field.Harvest
        Report ReportDaily: same as Horsham2019.Horsham2019.Field.ReportDaily
        Report HarvestReport: same as Replacements.HarvestReport
        Report DamageFunctionHarvestReport: EventNames=[Wheat].Harvesting
          VariableNames:
            [Simulation].Name
            [Clock].Today
            [FrostHeatDamageFunctions].FrostHeatYield as Wheat.Grain.Wt
  Experiment Narrabri2018
    Factors
      Permutation TOSxCv
        Factor TOS
          CompositeFactor 1
            Specifications:
              [Sowing].Script.SowDate=26-may
              //[Sowing].Script.SowDate=21-may
              [Sowing].Script.RowSpacing=100
              [Sowing].Script.RowSpacing=235
              [Sowing].Script.SowingDepth=50
          CompositeFactor 2
            Specifications:
              [Sowing].Script.SowDate=1-aug
              //[Sowing].Script.SowDate=27-jul
              [Sowing].Script.RowSpacing=100
              [Sowing].Script.RowSpacing=235
              [Sowing].Script.SowingDepth=50
        Factor Cv
          CompositeFactor Condo
            Specifications:
              [Sowing].Script.CultivarName=Condo
              [Condo]
            Cultivar Condo
              Command:
                [Phenology].Phyllochron.BasePhyllochron.FixedValue = 90 // 94.4306598856844
                [Phenology].PhyllochronPpSensitivity.FixedValue = 0.179475706868039
                [Phenology].CAMP.FLNparams.MinLN = 7
                [Phenology].CAMP.FLNparams.PpLN = 2
                [Phenology].CAMP.FLNparams.VrnLN = 3
                [Phenology].CAMP.FLNparams.VxPLN = 0
                [Phenology].CAMP.EnvData.VrnTreatTemp = 5.8
                [Phenology].CAMP.EnvData.VrnTreatDuration = 60
                [Phenology].HeadEmergenceLongDayBase.FixedValue = 160 // 190
                [Phenology].HeadEmergencePpSensitivity.FixedValue = 0
          CompositeFactor Coolah
            Specifications:
              [Sowing].Script.CultivarName=Axe
              [Axe]
            Cultivar Axe
              Command:
                // from NPI2
                [Phenology].Phyllochron.BasePhyllochron.FixedValue = 115 // 95.8008034182983
                //[Phenology].PhyllochronPpSensitivity.FixedValue = 0.352406544577556
                [Phenology].CAMP.FLNparams.MinLN = 8 // 9
                [Phenology].CAMP.FLNparams.PpLN = 1
                [Phenology].CAMP.FLNparams.VrnLN = 0
                [Phenology].CAMP.FLNparams.VxPLN = 2
                [Phenology].CAMP.EnvData.VrnTreatTemp = 5.8
                [Phenology].CAMP.EnvData.VrnTreatDuration = 60
                [Phenology].HeadEmergenceLongDayBase.FixedValue = 50
                [Phenology].HeadEmergencePpSensitivity.FixedValue = 0
          CompositeFactor Crusader: same as Narrabri2017.Factors.TOSxCv.Cv.Crusader
          CompositeFactor Cutlass
            Specifications:
              [Sowing].Script.CultivarName=Cutlass
              [Cutlass]
            Cultivar Cutlass
              Command:
                [Phenology].Phyllochron.BasePhyllochron.FixedValue = 90 // 95.8008034182983
                [Phenology].PhyllochronPpSensitivity.FixedValue = 0.352406544577556
                [Phenology].CAMP.FLNparams.MinLN = 7
                [Phenology].CAMP.FLNparams.PpLN = 5
                [Phenology].CAMP.FLNparams.VrnLN = 1
                [Phenology].CAMP.FLNparams.VxPLN = 2
                [Phenology].CAMP.EnvData.VrnTreatTemp = 5.8
                [Phenology].CAMP.EnvData.VrnTreatDuration = 60
                [Phenology].HeadEmergenceLongDayBase.FixedValue = 130
                [Phenology].HeadEmergencePpSensitivity.FixedValue = 1 // 2
          CompositeFactor Gregory
            Specifications:
              [Sowing].Script.CultivarName=Gregory
              [Gregory]
            Cultivar Gregory
              Command:
                [Phenology].Phyllochron.BasePhyllochron.FixedValue = 90 // 96.2227321902995
                [Phenology].PhyllochronPpSensitivity.FixedValue = 0.199981872553676
                [Phenology].CAMP.FLNparams.MinLN = 8
                [Phenology].CAMP.FLNparams.PpLN = 2
                [Phenology].CAMP.FLNparams.VrnLN = 4
                [Phenology].CAMP.FLNparams.VxPLN = -3
                [Phenology].CAMP.EnvData.VrnTreatTemp = 6
                [Phenology].CAMP.EnvData.VrnTreatDuration = 60
                [Phenology].HeadEmergenceLongDayBase.FixedValue = 130 // 110
                [Phenology].HeadEmergencePpSensitivity.FixedValue = 1
                [Grain].MaximumPotentialGrainSize.FixedValue = 0.041
                [Grain].NumberFunction.GrainNumber.GrainsPerGramOfStem.FixedValue = 22
          CompositeFactor Janz
            Specifications:
              [Sowing].Script.CultivarName=Janz
              [Janz]
            Cultivar Janz
              Command:
                [Phenology].Phyllochron.BasePhyllochron.FixedValue = 85 // 91.4460925764448
                [Phenology].PhyllochronPpSensitivity.FixedValue = 0.235020437209909
                [Phenology].CAMP.FLNparams.MinLN = 8
                [Phenology].CAMP.FLNparams.PpLN = 3
                [Phenology].CAMP.FLNparams.VrnLN = 1
                [Phenology].CAMP.FLNparams.VxPLN = -1
                [Phenology].CAMP.EnvData.VrnTreatTemp = 5.8
                [Phenology].CAMP.EnvData.VrnTreatDuration = 60
                [Phenology].HeadEmergenceLongDayBase.FixedValue = 130
                [Phenology].HeadEmergencePpSensitivity.FixedValue = 1
          CompositeFactor Lancer
            Specifications:
              [Sowing].Script.CultivarName=Lancer
              [Lancer]
            Cultivar Lancer: same as Replacements.Cultivars.Lancer
          CompositeFactor Mace
            Specifications:
              [Sowing].Script.CultivarName=Mace
              [Mace]
            Cultivar Mace
              Command:
                [Phenology].Phyllochron.BasePhyllochron.FixedValue = 106.268453805677
                [Phenology].PhyllochronPpSensitivity.FixedValue = 0.137742329295879
                [Phenology].CAMP.EnvData.VrnTreatTemp = 6
                [Phenology].CAMP.EnvData.VrnTreatDuration = 60
                [Phenology].CAMP.FLNparams.MinLN = 7
                [Phenology].CAMP.FLNparams.PpLN = 2
                [Phenology].CAMP.FLNparams.VrnLN = 3
                [Phenology].CAMP.FLNparams.VxPLN = -3
                [Phenology].HeadEmergenceLongDayBase.FixedValue = 70
                [Phenology].HeadEmergencePpSensitivity.FixedValue =  1
          CompositeFactor Mitch
            Specifications:
              [Sowing].Script.CultivarName=Mitch
              [Mitch]
            Cultivar Mitch
              Command:
                [Phenology].Phyllochron.BasePhyllochron.FixedValue = 107.602580952482
                [Phenology].PhyllochronPpSensitivity.FixedValue = 0.23032920462638
                [Phenology].CAMP.EnvData.VrnTreatTemp = 6
                [Phenology].CAMP.EnvData.VrnTreatDuration = 60
                [Phenology].CAMP.FLNparams.MinLN = 7
                [Phenology].CAMP.FLNparams.PpLN = 2
                [Phenology].CAMP.FLNparams.VrnLN = 2
                [Phenology].CAMP.FLNparams.VxPLN = -1
                [Phenology].HeadEmergenceLongDayBase.FixedValue = 200 // 170
                [Phenology].HeadEmergencePpSensitivity.FixedValue = 0
          CompositeFactor Scepter
            Specifications:
              [Sowing].Script.CultivarName=Scepter
              [Scepter]
            Cultivar Scepter: same as Replacements.Cultivars.Scepter
          CompositeFactor Scout: same as Narrabri2017.Factors.TOSxCv.Cv.Scout
          CompositeFactor Spitfire
            Specifications:
              [Sowing].Script.CultivarName=Spitfire
              [Spitfire]
            Cultivar Spitfire
              Command:
                [Phenology].Phyllochron.BasePhyllochron.FixedValue = 87.8426291924597
                [Phenology].PhyllochronPpSensitivity.FixedValue = 0.226170449889058
                [Phenology].CAMP.EnvData.VrnTreatTemp = 5.8
                [Phenology].CAMP.EnvData.VrnTreatDuration = 60
                [Phenology].CAMP.FLNparams.MinLN = 8
                [Phenology].CAMP.FLNparams.PpLN = 1
                [Phenology].CAMP.FLNparams.VrnLN = 3
                [Phenology].CAMP.FLNparams.VxPLN = -3
                [Phenology].HeadEmergenceLongDayBase.FixedValue = 130
                [Phenology].HeadEmergencePpSensitivity.FixedValue = 1
          CompositeFactor Sunco
            Specifications:
              [Sowing].Script.CultivarName=Sunco
              [Sunco]
            Cultivar Sunco
              Command:
                [Phenology].Phyllochron.BasePhyllochron.FixedValue = 100
                [Phenology].CAMP.FLNparams.MinLN = 6
                [Phenology].CAMP.FLNparams.PpLN = 11
                [Phenology].CAMP.FLNparams.VrnLN = 10
                [Phenology].CAMP.FLNparams.VxPLN = -9
                [Phenology].HeadEmergenceLongDayBase.FixedValue = 170
                [Phenology].HeadEmergencePpSensitivity.FixedValue = 1
          CompositeFactor Sunmax
            Specifications:
              [Sowing].Script.CultivarName=Axe
              [Axe]
            Cultivar Axe: same as Replacements.Cultivars.Sunmax
          CompositeFactor Suntop
            Specifications:
              [Sowing].Script.CultivarName=Suntop
              [Suntop]
            Cultivar Suntop
              Command:
                [Phenology].Phyllochron.BasePhyllochron.FixedValue = 85 // 93.1036394598307
                [Phenology].PhyllochronPpSensitivity.FixedValue = 0.335203758711104
                [Phenology].CAMP.EnvData.VrnTreatTemp = 5.8
                [Phenology].CAMP.EnvData.VrnTreatDuration = 60
                [Phenology].CAMP.FLNparams.MinLN = 8
                [Phenology].CAMP.FLNparams.PpLN = 2
                [Phenology].CAMP.FLNparams.VrnLN = 0
                [Phenology].CAMP.FLNparams.VxPLN = 0
                [Phenology].HeadEmergenceLongDayBase.FixedValue = 245 // 210
                [Phenology].HeadEmergencePpSensitivity.FixedValue = 0
          CompositeFactor Trojan
            Specifications:
              [Sowing].Script.CultivarName=Trojan
              [Trojan]
            Cultivar Trojan: same as Replacements.Cultivars.Trojan
    Simulation Narrabri2018
      Clock: Start=2018-05-01; End=2018-12-31
      Summary SummaryFile
      Weather: FileName=./Met/Narrabri_local.met
      SoilArbitrator
      Zone Field: Area=1; Slope=0; AspectAngle=0; Altitude=50
        Soil Clay Loam over Heavy Clay (Narrabri No614-YP): SoilType=Other; Site=Narrabri; NearestTown=Narrabri, NSW 2390; Region=North West Slopes and Plains; State=New South Wales; Country=Australia; NaturalVegetation=Grasslands, Poplar Box; ApsoilNumber=614-YP; Latitude=-30.28; Longitude=149.807; YearOfSampling=0; DataSource=YP. A Peake CSE Toowoomba; Comments=Clay loam - PBI Narrabri Clay over Heavy Clay.
          Physical: same as Narrabri2017.Narrabri2017.Field.Clay Loam over Heavy Clay (Narrabri No614-YP).Physical
          SoilTemperature Temperature: InteractionsPerDay=8
          Water: Thickness=[150, 150, 300, 300, 300, 300, 300]; InitialValues=[0.36, 0.2725, 0.2, 0.2, 0.2, 0.2, 0.2]; FilledFromTop=true
          Solute NO3: Thickness=[150, 150, 300, 300, 300, 300, 300]; InitialValues=[10, 0, 0, 0, 0, 0, 0]; InitialValuesUnits=kg/ha; WaterTableConcentration=0; D0=0; DepthConstant=0; MaxDepthSoluteAccessible=0; RunoffEffectivenessAtMovingSolute=0; MaxEffectiveRunoff=0
          Solute NH4: same as Narrabri2017.Narrabri2017.Field.Clay Loam over Heavy Clay (Narrabri No614-YP).NH4
          Solute Urea: same as Narrabri2017.Narrabri2017.Field.Clay Loam over Heavy Clay (Narrabri No614-YP).NH4
          Nutrient
          WaterBalance: same as Narrabri2017.Narrabri2017.Field.Clay Loam over Heavy Clay (Narrabri No614-YP).WaterBalance
          Organic: same as Narrabri2017.Narrabri2017.Field.Clay Loam over Heavy Clay (Narrabri No614-YP).Organic
          Chemical: same as Narrabri2017.Narrabri2017.Field.Clay Loam over Heavy Clay (Narrabri No614-YP).Chemical
        Plant Wheat
        Fertiliser
        Irrigation
        SurfaceOrganicMatter: InitialResidueName=wheat_stubble; InitialResidueType=canola; InitialResidueMass=500; InitialStandingFraction=0; InitialCPR=0; InitialCNR=100
        MicroClimate: a_interception=0; b_interception=1; c_interception=0; d_interception=0; SoilHeatFluxFraction=0.4; MinimumHeightDiffForNewLayer=0; NightInterceptionFraction=0.5; ReferenceHeight=2
        Manager Sowing: same as Horsham2019.Horsham2019.Field.Sowing
        Manager AutomaticIrrigation
          Crop = [Wheat]
          AutoIrrigationOn = True
          FASWThreshold = 1
          FASWDepth = 1200
          weeks = 0
          afterSowing = 3
          script: same as in Horsham2019.Horsham2019.Field.AutomaticIrrigation
        Manager FertiliseAtSowingUrea
          Crop = [Wheat]
          FertiliserType = UreaN
          Amount = 30
          script: same as in Horsham2019.Horsham2019.Field.FertiliseAtSowingCottonSustain
        Operations IrrigationEvents
          2017-06-15  [Irrigation].Apply(amount: 20, depth: 0, efficiency: 1)
        Manager Harvest: same as Horsham2019.Horsham2019.Field.Harvest
        Report ReportDaily: same as Horsham2019.Horsham2019.Field.ReportDaily
        Report DamageFunctionHarvestReport: EventNames=[Wheat].Harvesting
          VariableNames:
            [Simulation].Name
            [Clock].Today
            [FrostHeatDamageFunctions].FrostHeatYield as Wheat.Grain.Wt
        Report HarvestReport: same as Replacements.HarvestReport
  Experiment Narrabri2019
    Factors
      Permutation TOSxCv
        Factor TOS
          CompositeFactor 1
            Specifications:
              [Sowing].Script.SowDate=22-may
              [Sowing].Script.RowSpacing=100
              [Sowing].Script.RowSpacing=235
              [Sowing].Script.SowingDepth=50
          CompositeFactor 2
            Specifications:
              [Sowing].Script.SowDate=5-jul
              //[Sowing].Script.SowDate=16-jul
              [Sowing].Script.RowSpacing=100
              [Sowing].Script.RowSpacing=235
              [Sowing].Script.SowingDepth=50
        Factor Cv
          CompositeFactor Condo
            Specifications:
              [Sowing].Script.CultivarName=Condo
              [Condo]
            Cultivar Condo
              Command:
                [Phenology].Phyllochron.BasePhyllochron.FixedValue = 94 // 94.4306598856844
                [Phenology].PhyllochronPpSensitivity.FixedValue = 0.179475706868039
                [Phenology].CAMP.FLNparams.MinLN = 7
                [Phenology].CAMP.FLNparams.PpLN = 2
                [Phenology].CAMP.FLNparams.VrnLN = 3
                [Phenology].CAMP.FLNparams.VxPLN = 0
                [Phenology].CAMP.EnvData.VrnTreatTemp = 5.8
                [Phenology].CAMP.EnvData.VrnTreatDuration = 60
                [Phenology].HeadEmergenceLongDayBase.FixedValue = 190
                [Phenology].HeadEmergencePpSensitivity.FixedValue = 0
          CompositeFactor Coolah
            Specifications:
              [Sowing].Script.CultivarName=Axe
              [Axe]
            Cultivar Axe
              Command:
                // from NPI2
                [Phenology].Phyllochron.BasePhyllochron.FixedValue = 105
                //[Phenology].PhyllochronPpSensitivity.FixedValue = 0.352406544577556
                [Phenology].CAMP.FLNparams.MinLN = 8 // 9
                [Phenology].CAMP.FLNparams.PpLN = 1
                [Phenology].CAMP.FLNparams.VrnLN = 0
                [Phenology].CAMP.FLNparams.VxPLN = 2
                [Phenology].CAMP.EnvData.VrnTreatTemp = 5.8
                [Phenology].CAMP.EnvData.VrnTreatDuration = 60
                [Phenology].HeadEmergenceLongDayBase.FixedValue = 50
                [Phenology].HeadEmergencePpSensitivity.FixedValue = 1 // 0
          CompositeFactor Crusader
            Specifications:
              [Sowing].Script.CultivarName=Crusader
              [Crusader]
            Cultivar Crusader
              Command:
                // from NPI2
                [Phenology].Phyllochron.BasePhyllochron.FixedValue = 86 // 90
                //[Phenology].PhyllochronPpSensitivity.FixedValue = 0.352406544577556
                [Phenology].CAMP.FLNparams.MinLN = 9
                [Phenology].CAMP.FLNparams.PpLN = 1
                [Phenology].CAMP.FLNparams.VrnLN = 0
                [Phenology].CAMP.FLNparams.VxPLN = 2
                [Phenology].CAMP.EnvData.VrnTreatTemp = 5.8
                [Phenology].CAMP.EnvData.VrnTreatDuration = 60
                [Phenology].HeadEmergenceLongDayBase.FixedValue = 50
                [Phenology].HeadEmergencePpSensitivity.FixedValue =0
          CompositeFactor Cutlass
            Specifications:
              [Sowing].Script.CultivarName=Cutlass
              [Cutlass]
            Cultivar Cutlass: same as Replacements.Cultivars.Cutlass
          CompositeFactor Gregory
            Specifications:
              [Sowing].Script.CultivarName=Gregory
              [Gregory]
            Cultivar Gregory
              Command:
                [Phenology].Phyllochron.BasePhyllochron.FixedValue = 96.2227321902995
                [Phenology].PhyllochronPpSensitivity.FixedValue = 0.199981872553676
                [Phenology].CAMP.FLNparams.MinLN = 7 // 8
                [Phenology].CAMP.FLNparams.PpLN = 2
                [Phenology].CAMP.FLNparams.VrnLN = 4
                [Phenology].CAMP.FLNparams.VxPLN = -3
                [Phenology].CAMP.EnvData.VrnTreatTemp = 6
                [Phenology].CAMP.EnvData.VrnTreatDuration = 60
                [Phenology].HeadEmergenceLongDayBase.FixedValue = 160 // 110
                [Phenology].HeadEmergencePpSensitivity.FixedValue = 1
                [Grain].MaximumPotentialGrainSize.FixedValue = 0.041
                [Grain].NumberFunction.GrainNumber.GrainsPerGramOfStem.FixedValue = 22
          CompositeFactor Janz
            Specifications:
              [Sowing].Script.CultivarName=Janz
              [Janz]
            Cultivar Janz: same as Replacements.Cultivars.Janz
          CompositeFactor Lancer: same as Narrabri2018.Factors.TOSxCv.Cv.Lancer
          CompositeFactor Mace
            Specifications:
              [Sowing].Script.CultivarName=Mace
              [Mace]
            Cultivar Mace
              Command:
                [Phenology].Phyllochron.BasePhyllochron.FixedValue = 100 // 106.268453805677
                [Phenology].PhyllochronPpSensitivity.FixedValue = 0.137742329295879
                [Phenology].CAMP.EnvData.VrnTreatTemp = 6
                [Phenology].CAMP.EnvData.VrnTreatDuration = 60
                [Phenology].CAMP.FLNparams.MinLN = 7
                [Phenology].CAMP.FLNparams.PpLN = 2
                [Phenology].CAMP.FLNparams.VrnLN = 3
                [Phenology].CAMP.FLNparams.VxPLN = -3
                [Phenology].HeadEmergenceLongDayBase.FixedValue = 120 // 70
                [Phenology].HeadEmergencePpSensitivity.FixedValue = 1.5 // 1
          CompositeFactor Mitch
            Specifications:
              [Sowing].Script.CultivarName=Mitch
              [Mitch]
            Cultivar Mitch
              Command:
                [Phenology].Phyllochron.BasePhyllochron.FixedValue = 110 // 107.602580952482
                [Phenology].PhyllochronPpSensitivity.FixedValue = 0.23032920462638
                [Phenology].CAMP.EnvData.VrnTreatTemp = 6
                [Phenology].CAMP.EnvData.VrnTreatDuration = 60
                [Phenology].CAMP.FLNparams.MinLN = 7
                [Phenology].CAMP.FLNparams.PpLN = 2
                [Phenology].CAMP.FLNparams.VrnLN = 2
                [Phenology].CAMP.FLNparams.VxPLN = -1
                [Phenology].HeadEmergenceLongDayBase.FixedValue = 170
                [Phenology].HeadEmergencePpSensitivity.FixedValue = 0
          CompositeFactor Scepter
            Specifications:
              [Sowing].Script.CultivarName=Scepter
              [Scepter]
            Cultivar Scepter
              Command:
                [Phenology].Phyllochron.BasePhyllochron.FixedValue = 107 // 107.602580952482
                [Phenology].PhyllochronPpSensitivity.FixedValue = 0.23032920462638
                [Phenology].CAMP.EnvData.VrnTreatTemp = 6
                [Phenology].CAMP.EnvData.VrnTreatDuration = 60
                [Phenology].CAMP.FLNparams.MinLN = 7
                [Phenology].CAMP.FLNparams.PpLN = 2
                [Phenology].CAMP.FLNparams.VrnLN = 2
                [Phenology].CAMP.FLNparams.VxPLN = -1
                [Phenology].HeadEmergenceLongDayBase.FixedValue = 170
                [Phenology].HeadEmergencePpSensitivity.FixedValue = 0
          CompositeFactor Scout
            Specifications:
              [Sowing].Script.CultivarName=Scout
              [Scout]
            Cultivar Scout
              Command:
                [Phenology].Phyllochron.BasePhyllochron.FixedValue = 102 // 102.794916048683
                [Phenology].PhyllochronPpSensitivity.FixedValue = 0.192036818570067
                [Phenology].CAMP.EnvData.VrnTreatTemp = 6
                [Phenology].CAMP.EnvData.VrnTreatDuration = 60
                [Phenology].CAMP.FLNparams.MinLN = 7
                [Phenology].CAMP.FLNparams.PpLN = 2
                [Phenology].CAMP.FLNparams.VrnLN = 4
                [Phenology].CAMP.FLNparams.VxPLN = -2
                [Phenology].HeadEmergenceLongDayBase.FixedValue = 170
                [Phenology].HeadEmergencePpSensitivity.FixedValue = 0
          CompositeFactor Spitfire
            Specifications:
              [Sowing].Script.CultivarName=Spitfire
              [Spitfire]
            Cultivar Spitfire
              Command:
                [Phenology].Phyllochron.BasePhyllochron.FixedValue = 87.8426291924597
                [Phenology].PhyllochronPpSensitivity.FixedValue = 0.226170449889058
                [Phenology].CAMP.EnvData.VrnTreatTemp = 5.8
                [Phenology].CAMP.EnvData.VrnTreatDuration = 60
                [Phenology].CAMP.FLNparams.MinLN = 8
                [Phenology].CAMP.FLNparams.PpLN = 1
                [Phenology].CAMP.FLNparams.VrnLN = 3
                [Phenology].CAMP.FLNparams.VxPLN = -3
                [Phenology].HeadEmergenceLongDayBase.FixedValue = 150 // 130
                [Phenology].HeadEmergencePpSensitivity.FixedValue = 1
          CompositeFactor Sunco: same as Narrabri2018.Factors.TOSxCv.Cv.Sunco
          CompositeFactor Sunmax
            Specifications:
              [Sowing].Script.CultivarName=Axe
              [Axe]
            Cultivar Axe
              Command:
                // from NPI2
                [Phenology].Phyllochron.BasePhyllochron.FixedValue = 102
                //[Phenology].PhyllochronPpSensitivity.FixedValue = 0.119042603665788
                [Phenology].CAMP.FLNparams.MinLN = 7
                [Phenology].CAMP.FLNparams.PpLN = 8
                [Phenology].CAMP.FLNparams.VrnLN = 0
                [Phenology].CAMP.FLNparams.VxPLN = 1
                [Phenology].CAMP.EnvData.VrnTreatTemp = 5.8
                [Phenology].CAMP.EnvData.VrnTreatDuration = 60
                [Phenology].HeadEmergenceLongDayBase.FixedValue = 50
                [Phenology].HeadEmergencePpSensitivity.FixedValue = 2 // 0
          CompositeFactor Suntop
            Specifications:
              [Sowing].Script.CultivarName=Suntop
              [Suntop]
            Cultivar Suntop
              Command:
                [Phenology].Phyllochron.BasePhyllochron.FixedValue = 90 // 93.1036394598307
                [Phenology].PhyllochronPpSensitivity.FixedValue = 0.335203758711104
                [Phenology].CAMP.EnvData.VrnTreatTemp = 5.8
                [Phenology].CAMP.EnvData.VrnTreatDuration = 60
                [Phenology].CAMP.FLNparams.MinLN = 8
                [Phenology].CAMP.FLNparams.PpLN = 2
                [Phenology].CAMP.FLNparams.VrnLN = 0
                [Phenology].CAMP.FLNparams.VxPLN = 0
                [Phenology].HeadEmergenceLongDayBase.FixedValue = 190 // 150 // 210
                [Phenology].HeadEmergencePpSensitivity.FixedValue = 0
          CompositeFactor Trojan
            Specifications:
              [Sowing].Script.CultivarName=Trojan
              [Trojan]
            Cultivar Trojan
              Command:
                [Phenology].Phyllochron.BasePhyllochron.FixedValue = 99.1351271229079
                [Phenology].PhyllochronPpSensitivity.FixedValue = 0.35511766231399
                [Phenology].CAMP.EnvData.VrnTreatTemp = 6
                [Phenology].CAMP.EnvData.VrnTreatDuration = 60
                [Phenology].CAMP.FLNparams.MinLN = 7
                [Phenology].CAMP.FLNparams.PpLN = 5
                [Phenology].CAMP.FLNparams.VrnLN = 2
                [Phenology].CAMP.FLNparams.VxPLN = 1
                [Phenology].HeadEmergenceLongDayBase.FixedValue = 50
                [Phenology].HeadEmergencePpSensitivity.FixedValue = 3 // 4
          CompositeFactor Zanzibar
            Specifications:
              [Sowing].Script.CultivarName=Zanzibar
              [Zanzibar]
            Cultivar Zanzibar
              Command:
                [Phenology].Phyllochron.BasePhyllochron.FixedValue = 99.1351271229079
                [Phenology].PhyllochronPpSensitivity.FixedValue = 0.35511766231399
                [Phenology].CAMP.EnvData.VrnTreatTemp = 6
                [Phenology].CAMP.EnvData.VrnTreatDuration = 60
                [Phenology].CAMP.FLNparams.MinLN = 7
                [Phenology].CAMP.FLNparams.PpLN = 5
                [Phenology].CAMP.FLNparams.VrnLN = 2
                [Phenology].CAMP.FLNparams.VxPLN = 1
                [Phenology].HeadEmergenceLongDayBase.FixedValue = 50
                [Phenology].HeadEmergencePpSensitivity.FixedValue = 5.5 // 4
    Simulation Narrabri2019
      Clock: Start=2019-01-01; End=2019-12-31
      Summary SummaryFile
      Weather: FileName=./Met/Narrabri_local.met
      SoilArbitrator
      Zone Field: Area=1; Slope=0; AspectAngle=0; Altitude=50
        Soil Clay Loam over Heavy Clay Narrabri No614-YP: SoilType=Other; Site=Narrabri; NearestTown=Narrabri, NSW 2390; Region=North West Slopes and Plains; State=New South Wales; Country=Australia; NaturalVegetation=Grasslands, Poplar Box; ApsoilNumber=614-YP; Latitude=-30.28; Longitude=149.807; YearOfSampling=0; DataSource=YP. A Peake CSE Toowoomba; Comments=Clay loam - PBI Narrabri Clay over Heavy Clay.
          Physical: same as Narrabri2017.Narrabri2017.Field.Clay Loam over Heavy Clay (Narrabri No614-YP).Physical
          SoilTemperature Temperature (disabled): InteractionsPerDay=8
          CERESSoilTemperature
          Water: Thickness=[150, 150, 300, 300, 300, 300, 300]; InitialValues=[0.36, 0.2725, 0.2, 0.2, 0.2, 0.2, 0.2]; FilledFromTop=true
          Solute NO3: Thickness=[150, 150, 300, 300, 300, 300, 300]; InitialValues=[10, 2, 0, 0, 0, 0, 0]; InitialValuesUnits=kg/ha; WaterTableConcentration=0; D0=0; DepthConstant=0; MaxDepthSoluteAccessible=0; RunoffEffectivenessAtMovingSolute=0; MaxEffectiveRunoff=0
          Solute NH4: same as Narrabri2017.Narrabri2017.Field.Clay Loam over Heavy Clay (Narrabri No614-YP).NH4
          Solute Urea: same as Narrabri2017.Narrabri2017.Field.Clay Loam over Heavy Clay (Narrabri No614-YP).NH4
          Nutrient
          WaterBalance: same as Narrabri2017.Narrabri2017.Field.Clay Loam over Heavy Clay (Narrabri No614-YP).WaterBalance
          Organic: same as Narrabri2017.Narrabri2017.Field.Clay Loam over Heavy Clay (Narrabri No614-YP).Organic
          Chemical: same as Narrabri2017.Narrabri2017.Field.Clay Loam over Heavy Clay (Narrabri No614-YP).Chemical
        Plant Wheat
        Fertiliser
        Irrigation
        SurfaceOrganicMatter: InitialResidueName=wheat_stubble; InitialResidueType=canola; InitialResidueMass=500; InitialStandingFraction=0; InitialCPR=0; InitialCNR=100
        MicroClimate: a_interception=0; b_interception=1; c_interception=0; d_interception=0; SoilHeatFluxFraction=0.4; MinimumHeightDiffForNewLayer=0; NightInterceptionFraction=0.5; ReferenceHeight=2
        Manager Sowing: same as Horsham2019.Horsham2019.Field.Sowing
        Manager AutomaticIrrigation: same as Horsham2019.Horsham2019.Field.AutomaticIrrigation
        Manager FertiliseAtSowingCottonSustain: same as Horsham2019.Horsham2019.Field.FertiliseAtSowingCottonSustain
        Manager FertiliseAtSowingUrea: same as Horsham2019.Horsham2019.Field.FertiliseAtSowingUrea
        Operations IrrigationEvents
        Manager Harvest: same as Horsham2019.Horsham2019.Field.Harvest
        Report ReportDaily: same as Horsham2019.Horsham2019.Field.ReportDaily
        Report HarvestReport: same as Replacements.HarvestReport
        Report DamageFunctionHarvestReport: EventNames=[Wheat].Harvesting
          VariableNames:
            [Simulation].Name
            [Clock].Today
            [FrostHeatDamageFunctions].FrostHeatYield as Wheat.Grain.Wt
  Experiment Narrabri2020
    Factors
      Permutation TOSxCv
        Factor TOS
          CompositeFactor 1
            Specifications:
              [Sowing].Script.SowDate=17-may
              //[Sowing].Script.SowDate=21-may
              [Sowing].Script.RowSpacing=100
              [Sowing].Script.RowSpacing=235
              [Sowing].Script.SowingDepth=50
          CompositeFactor 2 (disabled)
            Specifications:
              [Sowing].Script.SowDate=30-jul
              //[Sowing].Script.SowDate=26-jul
              [Sowing].Script.RowSpacing=100
              [Sowing].Script.RowSpacing=235
              [Sowing].Script.SowingDepth=50
        Factor Cv
          CompositeFactor Condo
            Specifications:
              [Sowing].Script.CultivarName=Condo
              [Condo]
            Cultivar Condo
              Command:
                [Phenology].Phyllochron.BasePhyllochron.FixedValue = 80 // 94.4306598856844
                [Phenology].PhyllochronPpSensitivity.FixedValue = 0.179475706868039
                [Phenology].CAMP.FLNparams.MinLN = 7
                [Phenology].CAMP.FLNparams.PpLN = 1 // 2
                [Phenology].CAMP.FLNparams.VrnLN = 3
                [Phenology].CAMP.FLNparams.VxPLN = 0
                [Phenology].CAMP.EnvData.VrnTreatTemp = 5.8
                [Phenology].CAMP.EnvData.VrnTreatDuration = 60
                [Phenology].HeadEmergenceLongDayBase.FixedValue = 180 // 190
                [Phenology].HeadEmergencePpSensitivity.FixedValue = 0.9 // 0
          CompositeFactor Coolah
            Specifications:
              [Sowing].Script.CultivarName=Axe
              [Axe]
            Cultivar Axe
              Command:
                // from NPI2
                //[Phenology].Phyllochron.BasePhyllochron.FixedValue = 95 // 95.8008034182983
                //[Phenology].PhyllochronPpSensitivity.FixedValue = 0.352406544577556
                [Phenology].CAMP.FLNparams.MinLN = 8 // 9
                [Phenology].CAMP.FLNparams.PpLN = 1
                [Phenology].CAMP.FLNparams.VrnLN = 0
                [Phenology].CAMP.FLNparams.VxPLN = 2
                [Phenology].CAMP.EnvData.VrnTreatTemp = 5.8
                [Phenology].CAMP.EnvData.VrnTreatDuration = 60
                [Phenology].HeadEmergenceLongDayBase.FixedValue = 50
                [Phenology].HeadEmergencePpSensitivity.FixedValue = 1 // 0
          CompositeFactor Crusader
            Specifications:
              [Sowing].Script.CultivarName=Crusader
              [Crusader]
            Cultivar Crusader
              Command:
                // from NPI2
                [Phenology].Phyllochron.BasePhyllochron.FixedValue = 85 // 90
                //[Phenology].PhyllochronPpSensitivity.FixedValue = 0.352406544577556
                [Phenology].CAMP.FLNparams.MinLN = 9
                [Phenology].CAMP.FLNparams.PpLN = 1
                [Phenology].CAMP.FLNparams.VrnLN = 0
                [Phenology].CAMP.FLNparams.VxPLN = 2
                [Phenology].CAMP.EnvData.VrnTreatTemp = 5.8
                [Phenology].CAMP.EnvData.VrnTreatDuration = 60
                [Phenology].HeadEmergenceLongDayBase.FixedValue = 50
                [Phenology].HeadEmergencePpSensitivity.FixedValue =0
          CompositeFactor Cutlass
            Specifications:
              [Sowing].Script.CultivarName=Cutlass
              [Cutlass]
            Cultivar Cutlass
              Command:
                [Phenology].Phyllochron.BasePhyllochron.FixedValue = 97 // 95.8008034182983
                [Phenology].PhyllochronPpSensitivity.FixedValue = 0.352406544577556
                [Phenology].CAMP.FLNparams.MinLN = 7
                [Phenology].CAMP.FLNparams.PpLN = 5
                [Phenology].CAMP.FLNparams.VrnLN = 1
                [Phenology].CAMP.FLNparams.VxPLN = 2
                [Phenology].CAMP.EnvData.VrnTreatTemp = 5.8
                [Phenology].CAMP.EnvData.VrnTreatDuration = 60
                [Phenology].HeadEmergenceLongDayBase.FixedValue = 130
                [Phenology].HeadEmergencePpSensitivity.FixedValue = 2
          CompositeFactor Emu_Rock
            Specifications:
              [Sowing].Script.CultivarName=Emu_Rock
              [Emu_Rock]
            Cultivar Emu_Rock
              Command:
                [Phenology].Phyllochron.BasePhyllochron.FixedValue = 90 // 94.7698873180009
                [Phenology].PhyllochronPpSensitivity.FixedValue = 0.358007951256312
                [Phenology].CAMP.FLNparams.MinLN = 6
                [Phenology].CAMP.FLNparams.PpLN = 1
                [Phenology].CAMP.FLNparams.VrnLN = 1
                [Phenology].CAMP.FLNparams.VxPLN = -1
                [Phenology].CAMP.EnvData.VrnTreatTemp = 5.8
                [Phenology].CAMP.EnvData.VrnTreatDuration = 60
                [Phenology].HeadEmergenceLongDayBase.FixedValue = 183.0
                [Phenology].HeadEmergencePpSensitivity.FixedValue = 1.7962741039794823
          CompositeFactor Gregory
            Specifications:
              [Sowing].Script.CultivarName=Gregory
              [Gregory]
            Cultivar Gregory
              Command:
                [Phenology].Phyllochron.BasePhyllochron.FixedValue = 95 // 96.2227321902995
                [Phenology].PhyllochronPpSensitivity.FixedValue = 0.199981872553676
                [Phenology].CAMP.FLNparams.MinLN = 8
                [Phenology].CAMP.FLNparams.PpLN = 2
                [Phenology].CAMP.FLNparams.VrnLN = 4
                [Phenology].CAMP.FLNparams.VxPLN = -3
                [Phenology].CAMP.EnvData.VrnTreatTemp = 6
                [Phenology].CAMP.EnvData.VrnTreatDuration = 60
                [Phenology].HeadEmergenceLongDayBase.FixedValue = 110
                [Phenology].HeadEmergencePpSensitivity.FixedValue = 1
                [Grain].MaximumPotentialGrainSize.FixedValue = 0.041
                [Grain].NumberFunction.GrainNumber.GrainsPerGramOfStem.FixedValue = 22
          CompositeFactor Lancer
            Specifications:
              [Sowing].Script.CultivarName=Lancer
              [Lancer]
            Cultivar Lancer
              Command:
                [Phenology].Phyllochron.BasePhyllochron.FixedValue = 90 // 85.6623042725763
                [Phenology].PhyllochronPpSensitivity.FixedValue = 0.324980109776406
                [Phenology].CAMP.FLNparams.MinLN = 8
                [Phenology].CAMP.FLNparams.PpLN = 4
                [Phenology].CAMP.FLNparams.VrnLN = 2
                [Phenology].CAMP.FLNparams.VxPLN = -2
                [Phenology].CAMP.EnvData.VrnTreatTemp = 5.8
                [Phenology].CAMP.EnvData.VrnTreatDuration = 60
                [Phenology].HeadEmergenceLongDayBase.FixedValue = 150
                [Phenology].HeadEmergencePpSensitivity.FixedValue = 1
          CompositeFactor Mace
            Specifications:
              [Sowing].Script.CultivarName=Mace
              [Mace]
            Cultivar Mace
              Command:
                [Phenology].Phyllochron.BasePhyllochron.FixedValue = 108 // 106.268453805677
                [Phenology].PhyllochronPpSensitivity.FixedValue = 0.137742329295879
                [Phenology].CAMP.EnvData.VrnTreatTemp = 6
                [Phenology].CAMP.EnvData.VrnTreatDuration = 60
                [Phenology].CAMP.FLNparams.MinLN = 7
                [Phenology].CAMP.FLNparams.PpLN = 2
                [Phenology].CAMP.FLNparams.VrnLN = 3
                [Phenology].CAMP.FLNparams.VxPLN = -3
                [Phenology].HeadEmergenceLongDayBase.FixedValue = 75 // 70
                [Phenology].HeadEmergencePpSensitivity.FixedValue = 2.6 // 1
          CompositeFactor Mitch
            Specifications:
              [Sowing].Script.CultivarName=Mitch
              [Mitch]
            Cultivar Mitch
              Command:
                [Phenology].Phyllochron.BasePhyllochron.FixedValue = 107.602580952482
                [Phenology].PhyllochronPpSensitivity.FixedValue = 0.23032920462638
                [Phenology].CAMP.EnvData.VrnTreatTemp = 6
                [Phenology].CAMP.EnvData.VrnTreatDuration = 60
                [Phenology].CAMP.FLNparams.MinLN = 7
                [Phenology].CAMP.FLNparams.PpLN = 2
                [Phenology].CAMP.FLNparams.VrnLN = 2
                [Phenology].CAMP.FLNparams.VxPLN = -1
                [Phenology].HeadEmergenceLongDayBase.FixedValue = 170
                [Phenology].HeadEmergencePpSensitivity.FixedValue = 1 // 0
          CompositeFactor Scepter: same as Narrabri2018.Factors.TOSxCv.Cv.Scepter
          CompositeFactor Scout
            Specifications:
              [Sowing].Script.CultivarName=Scout
              [Scout]
            Cultivar Scout
              Command:
                [Phenology].Phyllochron.BasePhyllochron.FixedValue = 102.794916048683
                [Phenology].PhyllochronPpSensitivity.FixedValue = 0.192036818570067
                [Phenology].CAMP.EnvData.VrnTreatTemp = 6
                [Phenology].CAMP.EnvData.VrnTreatDuration = 60
                [Phenology].CAMP.FLNparams.MinLN = 7
                [Phenology].CAMP.FLNparams.PpLN = 2
                [Phenology].CAMP.FLNparams.VrnLN = 4
                [Phenology].CAMP.FLNparams.VxPLN = -2
                [Phenology].HeadEmergenceLongDayBase.FixedValue = 170
                [Phenology].HeadEmergencePpSensitivity.FixedValue = 0.5 // 0
          CompositeFactor Spitfire
            Specifications:
              [Sowing].Script.CultivarName=Spitfire
              [Spitfire]
            Cultivar Spitfire
              Command:
                [Phenology].Phyllochron.BasePhyllochron.FixedValue = 87.8426291924597
                [Phenology].PhyllochronPpSensitivity.FixedValue = 0.226170449889058
                [Phenology].CAMP.EnvData.VrnTreatTemp = 5.8
                [Phenology].CAMP.EnvData.VrnTreatDuration = 60
                [Phenology].CAMP.FLNparams.MinLN = 8
                [Phenology].CAMP.FLNparams.PpLN = 1
                [Phenology].CAMP.FLNparams.VrnLN = 3
                [Phenology].CAMP.FLNparams.VxPLN = -3
                [Phenology].HeadEmergenceLongDayBase.FixedValue = 130
                [Phenology].HeadEmergencePpSensitivity.FixedValue = 2 // 1
          CompositeFactor Sunchaser
            Specifications:
              [Sowing].Script.CultivarName=Axe
              [Axe]
            Cultivar Axe
              Command:
                // from NPI2
                //[Phenology].Phyllochron.BasePhyllochron.FixedValue = 122.758992485634
                //[Phenology].PhyllochronPpSensitivity.FixedValue = 0.119042603665788
                [Phenology].CAMP.FLNparams.MinLN = 7 // 8
                [Phenology].CAMP.FLNparams.PpLN = 1
                [Phenology].CAMP.FLNparams.VrnLN = 0
                [Phenology].CAMP.FLNparams.VxPLN = -10
                [Phenology].CAMP.EnvData.VrnTreatTemp = 5.8
                [Phenology].CAMP.EnvData.VrnTreatDuration = 60
                [Phenology].HeadEmergenceLongDayBase.FixedValue = 90
                [Phenology].HeadEmergencePpSensitivity.FixedValue = 1.5 // 0
          CompositeFactor Sunco
            Specifications:
              [Sowing].Script.CultivarName=Sunco
              [Sunco]
            Cultivar Sunco
              Command:
                [Phenology].Phyllochron.BasePhyllochron.FixedValue = 90 // 100
                [Phenology].CAMP.FLNparams.MinLN = 6
                [Phenology].CAMP.FLNparams.PpLN = 11
                [Phenology].CAMP.FLNparams.VrnLN = 10
                [Phenology].CAMP.FLNparams.VxPLN = -9
                [Phenology].HeadEmergenceLongDayBase.FixedValue = 170
                [Phenology].HeadEmergencePpSensitivity.FixedValue = 1.7 // 1
          CompositeFactor Sunmax
            Specifications:
              [Sowing].Script.CultivarName=Axe
              [Axe]
            Cultivar Axe
              Command:
                // from NPI2
                //[Phenology].Phyllochron.BasePhyllochron.FixedValue = 122.758992485634
                //[Phenology].PhyllochronPpSensitivity.FixedValue = 0.119042603665788
                [Phenology].CAMP.FLNparams.MinLN = 7
                [Phenology].CAMP.FLNparams.PpLN = 8
                [Phenology].CAMP.FLNparams.VrnLN = 0
                [Phenology].CAMP.FLNparams.VxPLN = 1
                [Phenology].CAMP.EnvData.VrnTreatTemp = 5.8
                [Phenology].CAMP.EnvData.VrnTreatDuration = 60
                [Phenology].HeadEmergenceLongDayBase.FixedValue = 50
                [Phenology].HeadEmergencePpSensitivity.FixedValue = 2 // 0
          CompositeFactor Sunprime
            Specifications:
              [Sowing].Script.CultivarName=Axe
              [Axe]
            Cultivar Axe
              Command:
                // from NPI2
                //[Phenology].Phyllochron.BasePhyllochron.FixedValue = 93.7220123291132
                //[Phenology].PhyllochronPpSensitivity.FixedValue = 0.212225680614483
                [Phenology].CAMP.FLNparams.MinLN = 6 // 7
                [Phenology].CAMP.FLNparams.PpLN = 4
                [Phenology].CAMP.FLNparams.VrnLN = 0
                [Phenology].CAMP.FLNparams.VxPLN = 1
                [Phenology].CAMP.EnvData.VrnTreatTemp = 5.8
                [Phenology].CAMP.EnvData.VrnTreatDuration = 60
                [Phenology].HeadEmergenceLongDayBase.FixedValue = 50
                [Phenology].HeadEmergencePpSensitivity.FixedValue = 2 //0
          CompositeFactor Suntop
            Specifications:
              [Sowing].Script.CultivarName=Suntop
              [Suntop]
            Cultivar Suntop
              Command:
                [Phenology].Phyllochron.BasePhyllochron.FixedValue = 89 // 93.1036394598307
                [Phenology].PhyllochronPpSensitivity.FixedValue = 0.335203758711104
                [Phenology].CAMP.EnvData.VrnTreatTemp = 5.8
                [Phenology].CAMP.EnvData.VrnTreatDuration = 60
                [Phenology].CAMP.FLNparams.MinLN = 8
                [Phenology].CAMP.FLNparams.PpLN = 2
                [Phenology].CAMP.FLNparams.VrnLN = 0
                [Phenology].CAMP.FLNparams.VxPLN = 0
                [Phenology].HeadEmergenceLongDayBase.FixedValue = 210
                [Phenology].HeadEmergencePpSensitivity.FixedValue = 0
          CompositeFactor Trojan
            Specifications:
              [Sowing].Script.CultivarName=Trojan
              [Trojan]
            Cultivar Trojan
              Command:
                [Phenology].Phyllochron.BasePhyllochron.FixedValue = 99.1351271229079
                [Phenology].PhyllochronPpSensitivity.FixedValue = 0.35511766231399
                [Phenology].CAMP.EnvData.VrnTreatTemp = 6
                [Phenology].CAMP.EnvData.VrnTreatDuration = 60
                [Phenology].CAMP.FLNparams.MinLN = 7
                [Phenology].CAMP.FLNparams.PpLN = 5
                [Phenology].CAMP.FLNparams.VrnLN = 2
                [Phenology].CAMP.FLNparams.VxPLN = 1
                [Phenology].HeadEmergenceLongDayBase.FixedValue = 50
                [Phenology].HeadEmergencePpSensitivity.FixedValue = 5 // 4
          CompositeFactor Vixen
            Specifications:
              [Sowing].Script.CultivarName=Axe
              [Axe]
            Cultivar Axe
              Command:
                // from NPI2
                //[Phenology].Phyllochron.BasePhyllochron.FixedValue = 90 // 99.8910902837222
                //[Phenology].PhyllochronPpSensitivity.FixedValue = 0.417874283738016
                [Phenology].CAMP.FLNparams.MinLN = 6
                [Phenology].CAMP.FLNparams.PpLN = 8
                [Phenology].CAMP.FLNparams.VrnLN = 2
                [Phenology].CAMP.FLNparams.VxPLN = -1
                [Phenology].CAMP.EnvData.VrnTreatTemp = 5.8
                [Phenology].CAMP.EnvData.VrnTreatDuration = 60
                [Phenology].HeadEmergenceLongDayBase.FixedValue = 50
                [Phenology].HeadEmergencePpSensitivity.FixedValue = 0 // 3
          CompositeFactor Zanzibar
            Specifications:
              [Sowing].Script.CultivarName=Zanzibar
              [Zanzibar]
            Cultivar Zanzibar
              Command:
                [Phenology].Phyllochron.BasePhyllochron.FixedValue = 99.1351271229079
                [Phenology].PhyllochronPpSensitivity.FixedValue = 0.35511766231399
                [Phenology].CAMP.EnvData.VrnTreatTemp = 6
                [Phenology].CAMP.EnvData.VrnTreatDuration = 60
                [Phenology].CAMP.FLNparams.MinLN = 7
                [Phenology].CAMP.FLNparams.PpLN = 5
                [Phenology].CAMP.FLNparams.VrnLN = 2
                [Phenology].CAMP.FLNparams.VxPLN = 1
                [Phenology].HeadEmergenceLongDayBase.FixedValue = 65 // 50
                [Phenology].HeadEmergencePpSensitivity.FixedValue = 6 // 4
    Simulation Narrabri2020
      Clock: Start=2020-05-15; End=2020-12-31
      Summary SummaryFile
      Weather: FileName=./Met/Narrabri_local.met
      SoilArbitrator
      Zone Field: Area=1; Slope=0; AspectAngle=0; Altitude=50
        Soil Clay Loam over Heavy Clay (Narrabri No614-YP): SoilType=Other; Site=Narrabri; NearestTown=Narrabri, NSW 2390; Region=North West Slopes and Plains; State=New South Wales; Country=Australia; NaturalVegetation=Grasslands, Poplar Box; ApsoilNumber=614-YP; Latitude=-30.28; Longitude=149.807; YearOfSampling=0; DataSource=YP. A Peake CSE Toowoomba; Comments=Clay loam - PBI Narrabri Clay over Heavy Clay.
          Physical: same as Narrabri2017.Narrabri2017.Field.Clay Loam over Heavy Clay (Narrabri No614-YP).Physical
          SoilTemperature Temperature: InteractionsPerDay=8
          Water: Thickness=[150, 150, 300, 300, 300, 300, 300]; InitialValues=[0.36, 0.365, 0.38625, 0.2, 0.2, 0.2, 0.2]; FilledFromTop=true
          Solute NO3: same as Narrabri2018.Narrabri2018.Field.Clay Loam over Heavy Clay (Narrabri No614-YP).NO3
          Solute NH4: same as Narrabri2017.Narrabri2017.Field.Clay Loam over Heavy Clay (Narrabri No614-YP).NH4
          Solute Urea: same as Narrabri2017.Narrabri2017.Field.Clay Loam over Heavy Clay (Narrabri No614-YP).NH4
          Nutrient
          WaterBalance: same as Narrabri2017.Narrabri2017.Field.Clay Loam over Heavy Clay (Narrabri No614-YP).WaterBalance
          Organic: same as Narrabri2017.Narrabri2017.Field.Clay Loam over Heavy Clay (Narrabri No614-YP).Organic
          Chemical: same as Narrabri2017.Narrabri2017.Field.Clay Loam over Heavy Clay (Narrabri No614-YP).Chemical
        Plant Wheat
        Fertiliser
        Irrigation
        SurfaceOrganicMatter: InitialResidueName=wheat_stubble; InitialResidueType=canola; InitialResidueMass=500; InitialStandingFraction=0; InitialCPR=0; InitialCNR=100
        MicroClimate: a_interception=0; b_interception=1; c_interception=0; d_interception=0; SoilHeatFluxFraction=0.4; MinimumHeightDiffForNewLayer=0; NightInterceptionFraction=0.5; ReferenceHeight=2
        Manager Sowing: same as Horsham2019.Horsham2019.Field.Sowing
        Manager AutomaticIrrigation
          Crop = [Wheat]
          AutoIrrigationOn = True
          FASWThreshold = 1
          FASWDepth = 1200
          weeks = 0
          afterSowing = 0
          script: same as in Horsham2019.Horsham2019.Field.AutomaticIrrigation
        Manager FertiliseAtSowingCottonSustain: same as Horsham2019.Horsham2019.Field.FertiliseAtSowingCottonSustain
        Manager FertiliseAtSowingUrea: same as Horsham2019.Horsham2019.Field.FertiliseAtSowingUrea
        Manager Harvest: same as Horsham2019.Horsham2019.Field.Harvest
        Operations IrrigationEvents
        Report ReportDaily: same as Horsham2019.Horsham2019.Field.ReportDaily
        Report DamageFunctionHarvestReport: EventNames=[Wheat].Harvesting
          VariableNames:
            [Simulation].Name
            [Clock].Today
            [FrostHeatDamageFunctions].FrostHeatYield as Wheat.Grain.Wt
        Report HarvestReport: same as Replacements.HarvestReport
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