Simulations: Version=130
  Replacements (disabled)
    Clock: Start=2020-01-02; End=2020-01-02
  Simulation Base
    Clock: Start=2020-01-01; End=2020-01-02
    Summary
    Report: VariableNames=[Clock].Today.DayOfYear as doy; EventNames=[Clock].DoReport
    Manager
```csharp
using APSIM.Shared.Utilities;
using Models.Core;
using Models.Storage;
using System;
using System.Data;

namespace Models
{
    /// <summary>
    /// The report is set up to report doy on start of simulation.
    /// The replacements node contains a clock which changes
    /// the start of simulation from 1-Jan to 2-Jan. However,
    /// the replacements node is disabled so the start date of
    /// the simulation should still be 1-Jan.
    ///
    /// This test will ensure that the start date of the simulation
    /// is 1-Jan.
    /// </summary>
    [Serializable]
    public class DisabledReplacementsTest : Model, ITest
    {
        public void Run()
        {
            int actualDoy = ReportedDoy();
            if (actualDoy != 1)
                throw new Exception("Clock.StartDate.DayOfYear is incorrect. Expected: 1, actual: " + actualDoy);
        }

        private int ReportedDoy()
        {
            IDataStore dataStore = this.FindInScope<IDataStore>() as IDataStore;
            DataTable report = dataStore.Reader.GetData("Report", "Current", new string[] { "Base" }, new string[] { "doy" }, null);
            return DataTableUtilities.GetColumnAsIntegers(report, "doy")[0];
        }
    }
}
```
  DataStore
