Simulations: Version=165
  Simulation Wheat Maize Rotation
    Clock: Start=1900-01-01; End=1910-01-01
    Summary SummaryFile
    Weather: FileName=%root%\Examples\WeatherFiles\Dalby.met
    SoilArbitrator
    Zone Field: Area=1; Slope=0; AspectAngle=0; Altitude=50
      Report: EventNames=[Clock].EndOfDay
        VariableNames:
          [Clock].Today
          [RotationManager].CurrentState
          [Wheat].Phenology.Zadok.Stage
          [Wheat].Phenology.CurrentStageName
          [Wheat].IsAlive
          [Wheat].IsReadyForHarvesting
          [Wheat].AboveGround.Wt
          [Wheat].AboveGround.N
          [Wheat].Grain.Total.Wt*10 as WheatYield
          [Maize].Grain.Total.Wt*10 as MaizeYield
          [Wheat].Grain.Protein
          [Wheat].Grain.Size
          [Wheat].Grain.Number
          [Wheat].Grain.Total.Wt
          [Wheat].Grain.Total.N
          [Wheat].Total.Wt
          Sum([Soil].SoilWater.ESW) as ESW
          [Soil].SoilWater.Es as ESoil
      Fertiliser
      Soil: ASCOrder=Vertosol; ASCSubOrder=Black; SoilType=Clay; Site=Norwin; NearestTown=Norwin; Region=Darling Downs and Granite Belt; State=Queensland; Country=Australia; NaturalVegetation=Qld. Bluegrass, possible Qld. Blue gum; ApsoilNumber=900; Latitude=-27.581836; Longitude=151.320206; LocationAccuracy=+/- 20m
        DataSource=CSIRO Sustainable Ecosystems, Toowoomba; Characteriesd as part of the GRDC funded project"Doing it better, doing it smarter, managing soil water in Australian agriculture' 2011
        Comments=OC, CLL for all crops estimated-based on Bongeen Mywybilla Soil No1
        Physical
          Thickness  BD       AirDry    LL15      DUL       SAT       KS
          150        1.01056  0.13025   0.2605    0.521     0.588655  20
          150        1.07146  0.198689  0.248362  0.496723  0.565677  20
          300        1.09394  0.28      0.28      0.488438  0.557193  20
          300        1.15861  0.28      0.28      0.480297  0.532787  20
          300        1.17301  0.28      0.28      0.471584  0.527354  20
          300        1.16287  0.28      0.28      0.457071  0.53118   20
          300        1.1875   0.28      0.28      0.452332  0.521888  20
          SoilCrop WheatSoil: LL=[0.261, 0.248, 0.28, 0.306, 0.36, 0.392, 0.446]; KL=[0.06, 0.06, 0.06, 0.04, 0.04, 0.02, 0.01]; XF=[1, 1, 1, 1, 1, 1, 1]
          SoilCrop MaizeSoil: LL=[0.261, 0.248, 0.28, 0.306, 0.36, 0.392, 0.446]; KL=[0.06, 0.06, 0.06, 0.04, 0.04, 0.02, 0.01]; XF=[1, 1, 1, 1, 1, 1, 1]
        WaterBalance SoilWater: SummerDate=1-Nov; SummerU=5; SummerCona=5; WinterDate=1-Apr; WinterU=5; WinterCona=5; DiffusConst=40; DiffusSlope=16; Salb=0.12; CN2Bare=73; CNRed=20; CNCov=0.8; PSIDul=-100; Thickness=[150, 150, 300, 300, 300, 300, 300]; SWCON=[0.3, 0.3, 0.3, 0.3, 0.3, 0.3, 0.3]
        Nutrient
        Organic: FOMCNRatio=40; CarbonUnits=Total
          Thickness  Carbon  SoilCNRatio  FBiom  FInert  FOM
          150        1.2     12           0.04   0.4     347.129
          150        0.96    12           0.02   0.6     270.344
          300        0.6     12           0.02   0.8     163.972
          300        0.3     12           0.02   1       99.4541
          300        0.18    12           0.01   1       60.322
          300        0.12    12           0.01   1       36.5871
          300        0.12    12           0.01   1       22.1912
        Chemical: Thickness=[150, 150, 300, 300, 300, 300, 300]; PH=[8, 8, 8, 8, 8, 8, 8]; PHUnits=Water
        Water: Thickness=[150, 150, 300, 300, 300, 300, 300]; InitialPAWmm=361.245; RelativeTo=LL15; FilledFromTop=false
          InitialValues=[0.521, 0.496723, 0.488438, 0.480297, 0.471584, 0.457071, 0.452332]
        CERESSoilTemperature Temperature
        Solute NO3: Thickness=[150, 150, 300, 300, 300, 300, 300]; InitialValues=[1, 1, 1, 1, 1, 1, 1]; InitialValuesUnits=ppm; WaterTableConcentration=0; D0=0; DepthConstant=0; MaxDepthSoluteAccessible=0; RunoffEffectivenessAtMovingSolute=0; MaxEffectiveRunoff=0
        Solute NH4: Thickness=[150, 150, 300, 300, 300, 300, 300]; InitialValues=[0.1, 0.1, 0.1, 0.1, 0.1, 0.1, 0.1]; InitialValuesUnits=ppm; WaterTableConcentration=0; D0=0; DepthConstant=0; MaxDepthSoluteAccessible=0; RunoffEffectivenessAtMovingSolute=0; MaxEffectiveRunoff=0
        Solute Urea: Thickness=[150, 150, 300, 300, 300, 300, 300]; InitialValues=[0, 0, 0, 0, 0, 0, 0]; InitialValuesUnits=kg/ha; WaterTableConcentration=0; D0=0; DepthConstant=0; MaxDepthSoluteAccessible=0; RunoffEffectivenessAtMovingSolute=0; MaxEffectiveRunoff=0
      SurfaceOrganicMatter: InitialResidueName=wheat_stubble; InitialResidueType=wheat; InitialResidueMass=500; InitialStandingFraction=0; InitialCPR=0; InitialCNR=100
      Plant Wheat
      Plant Maize
      MicroClimate: a_interception=0; b_interception=1; c_interception=0; d_interception=0; SoilHeatFluxFraction=0.4; MinimumHeightDiffForNewLayer=0; NightInterceptionFraction=0.5; ReferenceHeight=2
      Manager SowingFertiliser
        Amount = 160
        CropName = wheat
```csharp
using Models.Soils;
using System;
using Models.Core;
using Models.PMF;
namespace Models
{
    [Serializable]
    public class Script : Model
    {
        [Link] Clock Clock;
        [Link] Fertiliser Fertiliser;
        [Link] Summary Summary;
        
        
        [Description("Amount of fertiliser to be applied (kg/ha)")]
        public double Amount { get; set;}
        
        [Description("Crop to be fertilised")]
        public string CropName { get; set;}
        
        
        

        [EventSubscribe("Sowing")]
        private void OnSowing(object sender, EventArgs e)
        {
            Model crop = sender as Model;
            if (crop.Name.ToLower()==CropName.ToLower())
                Fertiliser.Apply(Amount: Amount, Type: Fertiliser.Types.NO3N);
        }
        
    }
}
```
      RotationManager: InitialState=initial; Verbose=true
        Nodes:
          Name           OutlineColour
          summer fallow  Black
          Maize          Black
          Wheat          Black
          initial        Black
        Arcs:
          {Conditions=[[MaizeManager].Script.CanHarvest], Actions=[[MaizeManager].Script.HarvestCrop();], SourceName=Maize, DestinationName=summer fallow, Name=Arc 1}
          {Conditions=[[WheatManager].Script.CanSow], Actions=[[WheatManager].Script.SowCrop()], SourceName=summer fallow, DestinationName=Wheat, Name=Arc 2}
          {Conditions=[[WheatManager].Script.CanHarvest], Actions=[[WheatManager].Script.HarvestCrop("glarble")], SourceName=Wheat, DestinationName=initial, Name=Arc 3}
          {Conditions=[[MaizeManager].Script.CanSow], Actions=[[MaizeManager].Script.SowCrop()], SourceName=initial, DestinationName=Maize, Name=Arc 4}
      Manager WheatManager
        Crop = [Wheat]
        Verbose = False
        StartDate = 1-may
        EndDate = 10-jul
        MinESW = 100
        MinRain = 25
        RainDays = 7
        MustSow = False
        CultivarName = Hartog
        SowingDepth = 30
        RowSpacing = 250
        Population = 120
```csharp
using Models.Interfaces;
using APSIM.Shared.Utilities;
using Models.Utilities;
using Models.Soils;
using Models.PMF;
using Models.Core;
using System;
using Models.Climate;

namespace Models
{
    [Serializable]
    public class Script : Model
    {
        [Link] private Clock Clock;
        [Link] private Summary Summary;
        [Link] private Soil Soil;
        private Accumulator accumulatedRain;
        [Link]
        private ISoilWater waterBalance;

        [Separator("Script Configuration")]
        [Description("Crop to manage")]
        public IPlant Crop { get; set; }
        [Description("Run script in verbose mode?")]
        [Tooltip("If enabled, the script will print a large number of diagnostics to the summary file, to aid debugging")]
        public bool Verbose { get; set; }

        [Separator("Sowing Conditions")]
        [Description("Start of sowing window (d-mmm)")]
        public string StartDate { get; set;}
        [Description("End of sowing window (d-mmm)")]
        public string EndDate { get; set;}
        [Description("Minimum extractable soil water for sowing (mm)")]
        public double MinESW { get; set;}
        [Description("Accumulated rainfall required for sowing (mm)")]
        public double MinRain { get; set;}
        [Description("Duration of rainfall accumulation (d)")]
        public int RainDays { get; set;}

        [Tooltip("If enabled, and if sowing conditions are not met, the crop will be sown on the final day of the sowing window.")]
        [Description("Must sow (yes/no)")]
        public bool MustSow { get; set;}
        [Separator("Sowing Properties")]
        [Description("Cultivar to be sown")]
        [Display(Type=DisplayType.CultivarName)]
        public string CultivarName { get; set;}
        [Description("Sowing depth (mm)")]
        public double SowingDepth { get; set;}        
        [Description("Row spacing (mm)")]
        public double RowSpacing { get; set;}    
        [Description("Plant population (/m2)")]
        public double Population { get; set;}    

        private bool afterInit = false;

        [EventSubscribe("StartOfSimulation")]
        private void OnSimulationCommencing(object sender, EventArgs e)
        {
            if (Crop == null) { throw new Exception("Crop must not be null in rotations"); }
            accumulatedRain = new Accumulator(this, "[Weather].Rain", RainDays);
            afterInit = true;
            Summary.WriteMessage(this, this.FullPath + " - Commence, crop=" + (Crop as Model).Name, MessageType.Diagnostic);
        }
        
        [EventSubscribe("DoManagement")]
        private void DoManagement(object sender, EventArgs e)
        {
            accumulatedRain.Update();
        }

        // Test whether we can sow a crop today
        // +ve number - yes
        // 0          - no
        // -ve number - no, out of scope (planting window)
        [Units("0-1")]
        public bool CanSow
        {
            get
            {
                if (!afterInit)
                    return false;
                bool isPossibleToday = false;
                bool inWindow = DateUtilities.WithinDates(StartDate, Clock.Today, EndDate);
                bool endOfWindow = DateUtilities.DatesEqual(EndDate, Clock.Today);
                if (! Crop.IsAlive && inWindow && accumulatedRain.Sum > MinRain && MathUtilities.Sum(waterBalance.ESW) > MinESW) 
                    isPossibleToday = true;

                   if (Verbose)
                {
                    if (isPossibleToday)
                        Summary.WriteMessage(this, "Sowing is possible today", MessageType.Diagnostic);
                    else if (!Crop.IsAlive && endOfWindow && MustSow)
                        Summary.WriteMessage(this, "Sowing is possible today, but conditions are not ideal. Only sowing because MustSow is set to yes", MessageType.Diagnostic);
                    else if (Crop.IsAlive)
                        Summary.WriteMessage(this, "Not sowing today because crop is already alive", MessageType.Diagnostic);
                    else if (!inWindow)
                        Summary.WriteMessage(this, string.Format("Not sowing today because current date ({0}) is not in sowing window ({1} - {2}).", Clock.Today.ToString("dd-MMM"), StartDate, EndDate), MessageType.Diagnostic);
                    else if (!(accumulatedRain.Sum > MinRain))
                        Summary.WriteMessage(this, string.Format("Not sowing today because accumulated rain ({0}) is less than min rain required for sowing ({1})", accumulatedRain.Sum, MinRain), MessageType.Diagnostic);
                    else if (!(MathUtilities.Sum(waterBalance.ESW) > MinESW))
                        Summary.WriteMessage(this, string.Format("Not sowing today because ESW ({0}) is less than min ESW required for sowing ({1})", MathUtilities.Sum(waterBalance.ESW), MinESW), MessageType.Diagnostic);
                }

               if (isPossibleToday)
                   return true;

               if (! Crop.IsAlive && endOfWindow && MustSow) 
                   return true;

               if (! Crop.IsAlive && !inWindow)
                   return false;

               return false;
            }
        }

        public void SowCrop()
        {
           Summary.WriteMessage(this, this.FullPath + " -  sowing " + (Crop as Model).Name, MessageType.Diagnostic);
           Crop.Sow(population:Population, cultivar:CultivarName, depth:SowingDepth, rowSpacing:RowSpacing);    
        }

        [Units("0-1")]
        public int CanHarvest
        {
           get
           {
             if (!afterInit)
                 return 0;
             return Crop.IsReadyForHarvesting ? 1 : 0;
           }
        }

        public void HarvestCrop(string msg)
        {
           Summary.WriteMessage(this, "Harvesting crop " + (Crop as IModel).Name + ". Message: " + msg, MessageType.Diagnostic);
           Crop.Harvest();
           Crop.EndCrop();
        }
    }
}
```
      Manager MaizeManager
        Crop = [Maize]
        Verbose = False
        StartDate = 10-oct
        EndDate = 10-nov
        MinESW = 100
        MinRain = 25
        RainDays = 7
        MustSow = False
        CultivarName = Katumani
        SowingDepth = 30
        RowSpacing = 500
        Population = 4
        accumulatedRain =
```csharp
using Models.Interfaces;
using APSIM.Shared.Utilities;
using Models.Utilities;
using Models.Soils;
using Models.PMF;
using Models.Core;
using System;
using Models.Climate;

namespace Models
{
    [Serializable]
    public class Script : Model
    {
        [Link] private Clock Clock;
        [Link] private Summary Summary;
        [Link] private Soil Soil;
        [Link]
        private ISoilWater waterBalance;
        //[Link] Simulation Simulation;

        [Separator("Script Configuration")]
        [Description("Crop to manage")]
        public IPlant Crop { get; set; }

        [Description("Run script in verbose mode?")]
        [Tooltip("If enabled, the script will print a large number of diagnostics to the summary file, to aid debugging")]
        public bool Verbose { get; set; }

        [Separator("Sowing Conditions")]
        [Description("Start of sowing window (d-mmm)")]
        public string StartDate { get; set; }
        [Description("End of sowing window (d-mmm)")]
        public string EndDate { get; set; }
        [Description("Minimum extractable soil water for sowing (mm)")]
        public double MinESW { get; set; }
        [Description("Accumulated rainfall required for sowing (mm)")]
        public double MinRain { get; set; }
        [Description("Duration of rainfall accumulation (d)")]
        public int RainDays { get; set; }
        [Tooltip("If enabled, and if sowing conditions are not met, the crop will be sown on the final day of the sowing window.")]
        [Description("Must sow (yes/no)")]
        public bool MustSow { get; set; }

        [Separator("Sowing Properties")]
        [Description("Cultivar to be sown")]
        [Display(Type = DisplayType.CultivarName)]
        public string CultivarName { get; set; }
        [Description("Sowing depth (mm)")]
        public double SowingDepth { get; set; }
        [Description("Row spacing (mm)")]
        public double RowSpacing { get; set; }
        [Description("Plant population (/m2)")]
        public double Population { get; set; }

        public Accumulator accumulatedRain { get; private set; }
        private bool afterInit = false;
                
        [EventSubscribe("StartOfSimulation")]
        private void OnSimulationCommencing(object sender, EventArgs e)
        {
            if (Crop == null)
                throw new Exception("Crop must not be null in rotations");
            accumulatedRain = new Accumulator(this, "[Weather].Rain", RainDays);
            Summary.WriteMessage(this, this.FullPath + " - Commence, crop=" + (Crop as Model).Name, MessageType.Diagnostic);
            afterInit = true;
        }
        
        [EventSubscribe("DoManagement")]
        private void DoManagement(object sender, EventArgs e)
        {
            accumulatedRain.Update();
        }

        // Test whether we can sow a crop today
        // +ve number - yes
        // 0          - no
        // -ve number - no, out of scope (planting window)
        [Units("0-1")]
        public int CanSow
        {
            get
            {
                if (!afterInit)
                    return 0;
                bool isPossibleToday = false;
                bool inWindow = DateUtilities.WithinDates(StartDate, Clock.Today, EndDate);
                bool endOfWindow = DateUtilities.DatesEqual(EndDate, Clock.Today);
                if (!Crop.IsAlive && inWindow && accumulatedRain.Sum > MinRain && MathUtilities.Sum(waterBalance.ESW) > MinESW)
                    isPossibleToday = true;

                if (isPossibleToday)
                    return 1;
         
                if (!Crop.IsAlive && endOfWindow && MustSow)
                    return 1;

                if (!Crop.IsAlive && !inWindow)
                    return -1;
                return 0;
            }
        }

        public void SowCrop()
        {
            Summary.WriteMessage(this, this.FullPath + " -  sowing " + (Crop as Model).Name, MessageType.Diagnostic);
            Crop.Sow(population: Population, cultivar: CultivarName, depth: SowingDepth, rowSpacing: RowSpacing);    
        }

        [Units("0-1")] 
        public int CanHarvest
        {
            get
            {
                if (!afterInit)
                    return (0);
                //Summary.WriteMessage(this, "canLeave:" + Crop.IsReadyForHarvesting, MessageType.Diagnostic);
                return Crop.IsReadyForHarvesting ? 1 : 0;
            }
        }

        public void HarvestCrop()
        {
            Crop.Harvest();
            Crop.EndCrop();
        }
    }
}
```
      Report TransitionReport: EventNames=[RotationManager].Transition
        VariableNames:
          [Clock].Today
          [Clock].Today.DayOfYear
          [RotationManager].CurrentState
  DataStore
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