Simulations: Version=172
  Memo
    A (not very useful by itself) test of the rotation manager's features.

    - Many arcs from one node
    - Many arcs to one node
    - Loopback arcs
    - Boolean conditions
    - Integer conditions (returning -1, 1, 2)
  Simulation rotation
    Clock: Start=1900-01-01; End=1910-01-01
    Summary SummaryFile
    RotationManager: TopLevel=true; InitialState=initial; Verbose=true
      Nodes:
        ID  Name
        1   A
        2   initial
        3   A1
        4   A2
        5   A3
        6   B
      Arcs:
        {SourceID=2, DestinationID=1, Conditions=[[RotationScript].Script.CanGoToA], BezierPoints=[70, 200, 71, 200, 73, 200, 75, 200, 76, 200, 78, 200, 80, 200, 81, 200, 83, 200, 84, 200, 86, 200, 88, 200, 89, 200, 91, 200, 92, 200, 94, 200, 95, 200, 97, 200, 99, 200, 100, 200, 102, 200, 103, 200, 105, 200, 106, 200, 108, 200, 109, 201, 111, 201, 112, 201, 113, 201, 115, 201, 116, 201, 118, 201, 119, 201, 121, 201, 122, 201, 123, 201, 125, 201, 126, 201, 127, 201, 129, 201, 130, 201, 131, 201, 133, 201, 134, 201, 135, 201, 137, 201, 138, 201, 139, 201, 141, 201, 142, 201, 143, 201, 145, 201, 146, 201, 147, 201, 148, 201, 150, 202, 151, 202, 152, 202, 153, 202, 154, 202, 156, 202, 157, 202, 158, 202, 159, 202, 160, 202, 162, 202, 163, 202, 164, 202, 165, 202, 166, 202, 167, 202, 168, 202, 170, 202, 171, 202, 172, 202, 173, 202, 174, 202, 175, 202, 176, 202, 177, 202, 178, 202, 179, 202, 180, 202, 182, 202, 183, 202, 184, 202, 185, 202, 186, 202, 187, 202, 188, 202, 189, 202, 190, 203, 191, 203, 192, 203, 193, 203, 194, 203, 195, 203, 196, 203, 197, 203, 198, 203, 199, 203, 200, 203, 201, 203, 202, 203, 203, 203, 203, 203, 204, 203, 205, 203, 206, 203, 207, 203, 208, 203, 209, 203, 210, 203, 211, 203, 212, 203, 213, 203, 214, 203, 215, 203, 215, 203, 216, 203, 217, 203, 218, 203, 219, 203, 220, 203, 221, 203, 222, 203, 222, 203, 223, 203, 224, 203, 225, 203, 226, 203, 227, 203, 228, 203, 228, 203, 229, 203, 230, 203, 231, 203, 232, 203, 232, 203, 233, 203, 234, 204, 235, 204, 236, 204, 237, 204, 237, 204, 238, 204, 239, 204, 240, 204, 241, 204, 241, 204, 242, 204, 243, 204, 244, 204, 245, 204, 245, 204, 246, 204, 247, 204, 248, 204, 248, 204, 249, 204, 250, 204, 251, 204, 252, 204, 252, 204, 253, 204, 254, 204, 255, 204, 255, 204, 256, 204, 257, 204, 258, 204, 258, 204, 259, 204, 260, 204, 261, 204, 261, 204, 262, 204, 263, 204, 264, 204, 264, 204, 265, 204, 266, 204, 267, 204, 267, 204, 268, 204, 269, 204, 270, 204, 270, 204, 271, 204, 272, 204, 273, 204, 273, 204, 274, 204, 275, 204, 275, 204, 276, 204, 277, 204, 278, 204, 278, 204, 279, 204, 280, 204, 281, 204, 281, 204, 282, 204, 283, 204, 284, 204, 284, 204, 285, 204, 286, 204, 287, 204, 287, 204, 288, 204, 289, 204, 290, 204, 290, 204, 291, 204, 292, 204, 293, 204, 293, 204, 294, 205, 295, 205, 296, 205, 296, 205, 297, 205, 298, 205, 299, 205, 299, 205, 300, 205, 301, 205, 302, 205, 302, 205, 303, 205, 304, 205, 305, 205, 306, 205, 306, 205, 307, 205, 308, 205, 309, 205, 309, 205, 310, 205, 311, 205, 312, 205, 313, 205, 313, 205, 314, 205, 315, 205, 316, 205, 317, 205, 317, 205, 318, 205, 319, 205, 320, 205, 321, 205, 322, 205, 322, 205, 323, 205, 324, 205, 325, 205, 326, 205, 327, 205, 327, 205, 328, 205, 329, 205, 330, 205, 331, 205, 332, 205, 333, 205, 333, 205, 334, 205, 335, 205, 336, 205, 337, 205, 338, 205, 339, 205, 340, 205, 341, 205, 341, 205, 342, 205, 343, 205, 344, 205, 345, 205, 346, 205, 347, 205, 348, 205, 349, 205, 350, 205, 351, 205, 352, 205, 353, 205, 354, 205, 355, 205, 356, 205, 356, 205, 357, 205, 358, 205, 359, 205, 360, 205, 361, 205, 362, 205, 363, 205, 364, 205, 366, 205, 367, 205, 368, 205, 369, 205, 370, 205, 371, 205, 372, 205, 373, 205, 374, 205, 375, 205, 376, 205, 377, 205, 378, 205, 379, 205, 380, 205, 382, 205, 383, 205, 384, 205, 385, 205, 386, 205, 387, 205, 388, 205, 389, 205, 391, 205, 392, 205, 393, 205, 394, 205, 395, 205, 396, 205, 398, 205, 399, 205, 400, 205, 401, 205, 403, 205, 404, 205, 405, 205, 406, 205, 408, 205, 409, 205, 410, 205, 411, 205, 413, 205, 414, 205, 415, 205], Source={ID=2, Name=initial}, Destination={ID=1, Name=A}, ID=7, Name=Arc 4}
        {SourceID=1, DestinationID=3, Conditions=[[RotationScript].Script.CanGoToA1], BezierPoints=[417, 206, 418, 205, 419, 205, 420, 204, 421, 204, 423, 203, 424, 203, 425, 202, 426, 202, 427, 201, 428, 201, 430, 200, 431, 200, 432, 200, 433, 199, 434, 199, 435, 198, 436, 198, 437, 197, 438, 197, 440, 197, 441, 196, 442, 196, 443, 195, 444, 195, 445, 195, 446, 194, 447, 194, 448, 193, 449, 193, 450, 193, 451, 192, 452, 192, 453, 191, 454, 191, 455, 191, 456, 190, 457, 190, 458, 190, 459, 189, 460, 189, 461, 188, 462, 188, 463, 188, 464, 187, 464, 187, 465, 187, 466, 186, 467, 186, 468, 186, 469, 185, 470, 185, 471, 185, 472, 184, 473, 184, 473, 184, 474, 183, 475, 183, 476, 183, 477, 182, 478, 182, 479, 182, 479, 181, 480, 181, 481, 181, 482, 180, 483, 180, 484, 180, 484, 179, 485, 179, 486, 179, 487, 178, 488, 178, 488, 178, 489, 178, 490, 177, 491, 177, 492, 177, 492, 176, 493, 176, 494, 176, 495, 175, 495, 175, 496, 175, 497, 175, 498, 174, 499, 174, 499, 174, 500, 173, 501, 173, 502, 173, 502, 172, 503, 172, 504, 172, 505, 172, 505, 171, 506, 171, 507, 171, 508, 170, 508, 170, 509, 170, 510, 170, 510, 169, 511, 169, 512, 169, 513, 168, 513, 168, 514, 168, 515, 168, 516, 167, 516, 167, 517, 167, 518, 166, 519, 166, 519, 166, 520, 166, 521, 165, 521, 165, 522, 165, 523, 164, 524, 164, 524, 164, 525, 164, 526, 163, 527, 163, 527, 163, 528, 162, 529, 162, 529, 162, 530, 162, 531, 161, 532, 161, 532, 161, 533, 160, 534, 160, 535, 160, 535, 160, 536, 159, 537, 159, 538, 159, 538, 158, 539, 158, 540, 158, 541, 158, 541, 157, 542, 157, 543, 157, 544, 156, 544, 156, 545, 156, 546, 156, 547, 155, 548, 155, 548, 155, 549, 154, 550, 154, 551, 154, 551, 153, 552, 153, 553, 153, 554, 152, 555, 152, 555, 152, 556, 152, 557, 151, 558, 151, 559, 151, 559, 150, 560, 150, 561, 150, 562, 149, 563, 149, 564, 149, 564, 148, 565, 148, 566, 148, 567, 147, 568, 147, 569, 147, 570, 146, 571, 146, 571, 146, 572, 145, 573, 145, 574, 145, 575, 144, 576, 144, 577, 143, 578, 143, 579, 143, 580, 142, 580, 142, 581, 142, 582, 141, 583, 141, 584, 141, 585, 140, 586, 140, 587, 139, 588, 139, 589, 139, 590, 138, 591, 138, 592, 137, 593, 137, 594, 137, 595, 136, 596, 136, 597, 135, 598, 135, 599, 135, 600, 134, 601, 134, 603, 133, 604, 133, 605, 133, 606, 132, 607, 132, 608, 131, 609, 131, 610, 130, 611, 130, 613, 129, 614, 129, 615, 129, 616, 128, 617, 128, 618, 127, 620, 127, 621, 126, 622, 126, 623, 125, 624, 125, 626, 124, 627, 124, 628, 123, 629, 123, 631, 122, 632, 122, 633, 121, 634, 121, 636, 120, 637, 120, 638, 119, 640, 119, 641, 118, 642, 118, 644, 117, 645, 117, 647, 116, 648, 116, 649, 115, 651, 114, 652, 114, 654, 113, 655, 113, 656, 112, 658, 112, 659, 111, 661, 110, 662, 110, 664, 109, 665, 109, 667, 108, 668, 108, 670, 107, 672, 106, 673, 106, 675, 105, 676, 104, 678, 104, 679, 103, 681, 103, 683, 102, 684, 101, 686, 101, 688, 100, 689, 99, 691, 99, 693, 98, 695, 97, 696, 97, 698, 96, 700, 95], Source={ID=1, Name=A}, Destination={ID=3, Name=A1}, ID=8, Name=Arc 1}
        {SourceID=1, DestinationID=4, Conditions=[[RotationScript].Script.CanGoFromAToA2], BezierPoints=[417, 206, 418, 206, 419, 206, 421, 207, 422, 207, 423, 208, 425, 208, 426, 209, 427, 209, 429, 210, 430, 210, 431, 211, 433, 211, 434, 212, 435, 212, 437, 213, 438, 213, 439, 213, 440, 214, 442, 214, 443, 215, 444, 215, 445, 216, 447, 216, 448, 216, 449, 217, 450, 217, 451, 218, 452, 218, 454, 218, 455, 219, 456, 219, 457, 220, 458, 220, 459, 220, 460, 221, 461, 221, 463, 221, 464, 222, 465, 222, 466, 223, 467, 223, 468, 223, 469, 224, 470, 224, 471, 224, 472, 225, 473, 225, 474, 225, 475, 226, 476, 226, 477, 226, 478, 227, 479, 227, 480, 227, 481, 228, 482, 228, 483, 228, 484, 229, 485, 229, 486, 229, 487, 230, 488, 230, 489, 230, 490, 231, 491, 231, 492, 231, 492, 231, 493, 232, 494, 232, 495, 232, 496, 233, 497, 233, 498, 233, 499, 233, 500, 234, 500, 234, 501, 234, 502, 234, 503, 235, 504, 235, 505, 235, 506, 236, 506, 236, 507, 236, 508, 236, 509, 237, 510, 237, 511, 237, 511, 237, 512, 238, 513, 238, 514, 238, 515, 238, 515, 238, 516, 239, 517, 239, 518, 239, 519, 239, 519, 240, 520, 240, 521, 240, 522, 240, 523, 240, 523, 241, 524, 241, 525, 241, 526, 241, 526, 242, 527, 242, 528, 242, 529, 242, 530, 242, 530, 243, 531, 243, 532, 243, 533, 243, 533, 243, 534, 243, 535, 244, 536, 244, 536, 244, 537, 244, 538, 244, 539, 245, 539, 245, 540, 245, 541, 245, 542, 245, 542, 245, 543, 246, 544, 246, 545, 246, 545, 246, 546, 246, 547, 246, 548, 247, 548, 247, 549, 247, 550, 247, 551, 247, 551, 247, 552, 248, 553, 248, 554, 248, 554, 248, 555, 248, 556, 248, 557, 248, 557, 249, 558, 249, 559, 249, 560, 249, 560, 249, 561, 249, 562, 249, 563, 250, 564, 250, 564, 250, 565, 250, 566, 250, 567, 250, 567, 250, 568, 251, 569, 251, 570, 251, 571, 251, 571, 251, 572, 251, 573, 251, 574, 251, 575, 252, 575, 252, 576, 252, 577, 252, 578, 252, 579, 252, 580, 252, 580, 252, 581, 252, 582, 253, 583, 253, 584, 253, 585, 253, 585, 253, 586, 253, 587, 253, 588, 253, 589, 254, 590, 254, 591, 254, 592, 254, 592, 254, 593, 254, 594, 254, 595, 254, 596, 254, 597, 254, 598, 255, 599, 255, 600, 255, 601, 255, 602, 255, 603, 255, 603, 255, 604, 255, 605, 255, 606, 256, 607, 256, 608, 256, 609, 256, 610, 256, 611, 256, 612, 256, 613, 256, 614, 256, 615, 256, 616, 257, 617, 257, 618, 257, 619, 257, 621, 257, 622, 257, 623, 257, 624, 257, 625, 257, 626, 257, 627, 258, 628, 258, 629, 258, 630, 258, 631, 258, 633, 258, 634, 258, 635, 258, 636, 258, 637, 259, 638, 259, 640, 259, 641, 259, 642, 259, 643, 259, 644, 259, 646, 259, 647, 259, 648, 259, 649, 260, 651, 260, 652, 260, 653, 260, 654, 260, 656, 260, 657, 260, 658, 260, 660, 260, 661, 261, 662, 261, 664, 261, 665, 261, 666, 261, 668, 261, 669, 261, 671, 261, 672, 261, 673, 262, 675, 262, 676, 262, 678, 262, 679, 262, 681, 262, 682, 262, 684, 262, 685, 262, 687, 263, 688, 263, 690, 263, 691, 263, 693, 263, 694, 263, 696, 263], Source={ID=1, Name=A}, Destination={ID=4, Name=A2}, ID=9, Name=Arc 2}
        {SourceID=1, DestinationID=5, Conditions=[[RotationScript].Script.CanGoFromAToA3], BezierPoints=[417, 206, 418, 207, 420, 209, 421, 210, 423, 212, 425, 213, 426, 215, 428, 216, 429, 218, 431, 219, 432, 220, 434, 222, 435, 223, 437, 225, 438, 226, 440, 228, 441, 229, 443, 230, 444, 232, 446, 233, 447, 234, 448, 236, 450, 237, 451, 238, 453, 240, 454, 241, 455, 242, 457, 243, 458, 245, 459, 246, 461, 247, 462, 248, 463, 250, 464, 251, 466, 252, 467, 253, 468, 254, 470, 256, 471, 257, 472, 258, 473, 259, 474, 260, 476, 261, 477, 263, 478, 264, 479, 265, 480, 266, 482, 267, 483, 268, 484, 269, 485, 270, 486, 271, 487, 272, 488, 273, 489, 274, 491, 275, 492, 276, 493, 277, 494, 278, 495, 279, 496, 280, 497, 281, 498, 282, 499, 283, 500, 284, 501, 285, 502, 286, 503, 287, 504, 288, 505, 289, 506, 290, 507, 291, 508, 292, 509, 293, 510, 294, 511, 295, 512, 295, 513, 296, 514, 297, 515, 298, 516, 299, 517, 300, 518, 301, 519, 302, 520, 302, 520, 303, 521, 304, 522, 305, 523, 306, 524, 307, 525, 307, 526, 308, 527, 309, 528, 310, 528, 311, 529, 311, 530, 312, 531, 313, 532, 314, 533, 314, 534, 315, 534, 316, 535, 317, 536, 317, 537, 318, 538, 319, 539, 320, 539, 320, 540, 321, 541, 322, 542, 323, 543, 323, 543, 324, 544, 325, 545, 325, 546, 326, 547, 327, 547, 328, 548, 328, 549, 329, 550, 330, 550, 330, 551, 331, 552, 332, 553, 332, 554, 333, 554, 334, 555, 334, 556, 335, 557, 336, 557, 336, 558, 337, 559, 338, 560, 338, 560, 339, 561, 340, 562, 340, 563, 341, 563, 342, 564, 342, 565, 343, 566, 344, 566, 344, 567, 345, 568, 346, 569, 346, 569, 347, 570, 348, 571, 348, 572, 349, 572, 349, 573, 350, 574, 351, 575, 351, 575, 352, 576, 353, 577, 353, 578, 354, 578, 355, 579, 355, 580, 356, 581, 356, 581, 357, 582, 358, 583, 358, 584, 359, 584, 360, 585, 360, 586, 361, 587, 362, 587, 362, 588, 363, 589, 363, 590, 364, 591, 365, 591, 365, 592, 366, 593, 367, 594, 367, 594, 368, 595, 369, 596, 369, 597, 370, 598, 371, 598, 371, 599, 372, 600, 373, 601, 373, 602, 374, 602, 375, 603, 375, 604, 376, 605, 377, 606, 377, 607, 378, 607, 379, 608, 379, 609, 380, 610, 381, 611, 381, 612, 382, 613, 383, 613, 383, 614, 384, 615, 385, 616, 385, 617, 386, 618, 387, 619, 388, 620, 388, 621, 389, 621, 390, 622, 390, 623, 391, 624, 392, 625, 393, 626, 393, 627, 394, 628, 395, 629, 396, 630, 396, 631, 397, 632, 398, 633, 399, 634, 400, 635, 400, 636, 401, 637, 402, 638, 403, 639, 404, 640, 404, 641, 405, 642, 406, 643, 407, 644, 408, 645, 408, 646, 409, 647, 410, 648, 411, 649, 412, 650, 413, 652, 414, 653, 414, 654, 415, 655, 416, 656, 417, 657, 418, 658, 419, 659, 420, 661, 421, 662, 422, 663, 423, 664, 423, 665, 424, 667, 425, 668, 426, 669, 427, 670, 428, 671, 429, 673, 430, 674, 431, 675, 432, 677, 433, 678, 434, 679, 435, 680, 436, 682, 437, 683, 438, 684, 439, 686, 440, 687, 441], Source={ID=1, Name=A}, Destination={ID=5, Name=A3}, ID=10, Name=Arc 3}
        {SourceID=3, DestinationID=3, Conditions=[[RotationScript].Script.A1CanLoopback], Actions=[[RotationScript].Script.A1Loopback()], BezierPoints=[702, 66, 709, 67, 716, 69, 723, 70, 729, 72, 736, 73, 742, 74, 747, 76, 753, 77, 758, 78, 763, 79, 768, 80, 772, 81, 776, 83, 780, 84, 784, 85, 788, 86, 791, 87, 794, 87, 796, 88, 799, 89, 801, 90, 802, 91, 804, 92, 805, 92, 806, 93, 807, 94, 808, 95, 808, 96, 808, 96, 808, 97, 807, 98, 806, 99, 805, 99, 804, 100, 802, 101, 801, 102, 799, 103, 796, 103, 794, 104, 791, 105, 788, 106, 784, 107, 780, 108, 776, 109, 772, 109, 768, 110, 763, 111, 758, 113, 753, 114, 747, 115, 742, 116, 736, 117, 729, 118, 723, 119, 716, 121, 709, 122], Source={ID=3, Name=A1}, Destination={ID=3, Name=A1}, ID=11, Name=Arc 5}
        {SourceID=3, DestinationID=4, Conditions=[[RotationScript].Script.CanGoFromA1ToA2], BezierPoints=[702, 95, 702, 96, 702, 97, 702, 99, 702, 100, 702, 102, 702, 103, 702, 104, 702, 106, 702, 107, 702, 108, 702, 109, 702, 111, 702, 112, 702, 113, 702, 114, 702, 116, 702, 117, 702, 118, 702, 119, 702, 120, 702, 121, 702, 123, 702, 124, 702, 125, 702, 126, 702, 127, 702, 128, 702, 129, 702, 130, 702, 131, 702, 132, 702, 133, 702, 134, 702, 135, 702, 136, 702, 137, 702, 138, 702, 139, 702, 140, 702, 141, 702, 142, 702, 143, 702, 144, 702, 145, 702, 145, 702, 146, 702, 147, 702, 148, 702, 149, 702, 150, 702, 151, 702, 151, 702, 152, 702, 153, 702, 154, 702, 155, 702, 156, 702, 156, 702, 157, 702, 158, 702, 159, 702, 160, 702, 160, 702, 161, 702, 162, 702, 163, 702, 163, 702, 164, 702, 165, 702, 166, 702, 167, 702, 167, 702, 168, 702, 169, 702, 170, 702, 170, 702, 171, 702, 172, 702, 173, 702, 173, 702, 174, 702, 175, 702, 176, 702, 176, 702, 177, 702, 178, 702, 179, 702, 179, 702, 180, 702, 181, 702, 182, 702, 182, 702, 183, 702, 184, 702, 185, 701, 186, 701, 186, 701, 187, 701, 188, 701, 189, 701, 189, 701, 190, 701, 191, 701, 192, 701, 193, 701, 194, 701, 194, 701, 195, 701, 196, 701, 197, 701, 198, 701, 199, 701, 199, 701, 200, 701, 201, 701, 202, 701, 203, 701, 204, 701, 205, 701, 206, 701, 207, 701, 208, 701, 208, 700, 209, 700, 210, 700, 211, 700, 212, 700, 213, 700, 214, 700, 215, 700, 216, 700, 217, 700, 218, 700, 219, 700, 221, 700, 222, 700, 223, 700, 224, 700, 225, 700, 226, 700, 227, 699, 228, 699, 230, 699, 231, 699, 232, 699, 233, 699, 234, 699, 236, 699, 237, 699, 238, 699, 239, 699, 241, 699, 242, 699, 243, 699, 245, 698, 246, 698, 247, 698, 249, 698, 250, 698, 252, 698, 253, 698, 254, 698, 256, 698, 257, 698, 259, 698, 260, 698, 262], Source={ID=3, Name=A1}, Destination={ID=4, Name=A2}, ID=12, Name=Arc 6}
        {SourceID=4, DestinationID=6, Conditions=[[RotationScript].Script.CanGoFromA2ToB], BezierPoints=[698, 264, 699, 264, 700, 265, 701, 265, 703, 266, 704, 266, 705, 267, 707, 267, 708, 268, 709, 268, 710, 269, 711, 269, 713, 270, 714, 270, 715, 271, 716, 271, 717, 272, 719, 272, 720, 273, 721, 273, 722, 274, 723, 274, 724, 275, 725, 275, 726, 276, 728, 276, 729, 276, 730, 277, 731, 277, 732, 278, 733, 278, 734, 279, 735, 279, 736, 279, 737, 280, 738, 280, 739, 281, 740, 281, 741, 282, 742, 282, 743, 282, 744, 283, 745, 283, 746, 284, 747, 284, 748, 284, 749, 285, 750, 285, 750, 285, 751, 286, 752, 286, 753, 287, 754, 287, 755, 287, 756, 288, 757, 288, 758, 288, 759, 289, 759, 289, 760, 290, 761, 290, 762, 290, 763, 291, 764, 291, 764, 291, 765, 292, 766, 292, 767, 292, 768, 293, 769, 293, 769, 293, 770, 294, 771, 294, 772, 294, 773, 295, 773, 295, 774, 295, 775, 296, 776, 296, 777, 296, 777, 297, 778, 297, 779, 297, 780, 298, 780, 298, 781, 298, 782, 299, 783, 299, 783, 299, 784, 300, 785, 300, 786, 300, 786, 300, 787, 301, 788, 301, 789, 301, 789, 302, 790, 302, 791, 302, 792, 303, 792, 303, 793, 303, 794, 304, 795, 304, 795, 304, 796, 304, 797, 305, 798, 305, 798, 305, 799, 306, 800, 306, 801, 306, 801, 307, 802, 307, 803, 307, 804, 308, 804, 308, 805, 308, 806, 309, 807, 309, 807, 309, 808, 309, 809, 310, 810, 310, 810, 310, 811, 311, 812, 311, 813, 311, 813, 312, 814, 312, 815, 312, 816, 313, 817, 313, 817, 313, 818, 314, 819, 314, 820, 314, 820, 315, 821, 315, 822, 315, 823, 316, 824, 316, 825, 316, 825, 317, 826, 317, 827, 317, 828, 318, 829, 318, 829, 318, 830, 319, 831, 319, 832, 319, 833, 320, 834, 320, 835, 321, 835, 321, 836, 321, 837, 322, 838, 322, 839, 322, 840, 323, 841, 323, 842, 323, 843, 324, 844, 324, 844, 325, 845, 325, 846, 325, 847, 326, 848, 326, 849, 327, 850, 327, 851, 327, 852, 328, 853, 328, 854, 329, 855, 329, 856, 329, 857, 330, 858, 330, 859, 331, 860, 331, 861, 332, 862, 332, 863, 333, 864, 333, 866, 333, 867, 334, 868, 334, 869, 335, 870, 335, 871, 336, 872, 336, 873, 337, 874, 337, 876, 338, 877, 338, 878, 339, 879, 339, 880, 340, 882, 340, 883, 341, 884, 341, 885, 342, 886, 342, 888, 343, 889, 343, 890, 344, 892, 344, 893, 345, 894, 345, 896, 346, 897, 347, 898, 347, 900, 348, 901, 348, 902, 349, 904, 349, 905, 350, 907, 351, 908, 351, 909, 352, 911, 352, 912, 353, 914, 354, 915, 354, 917, 355, 918, 355, 920, 356, 921, 357, 923, 357, 924, 358, 926, 359, 928, 359, 929, 360, 931, 361, 933, 361, 934, 362, 936, 363], Source={ID=4, Name=A2}, Destination={ID=6, Name=B}, ID=13, Name=Arc 7}
        {SourceID=5, DestinationID=6, Conditions=[[RotationScript].Script.CanGoFromA3ToB], BezierPoints=[689, 443, 690, 442, 692, 442, 694, 441, 695, 441, 697, 440, 699, 440, 700, 440, 702, 439, 704, 439, 705, 438, 707, 438, 709, 438, 710, 437, 712, 437, 713, 437, 715, 436, 716, 436, 718, 435, 719, 435, 721, 435, 722, 434, 724, 434, 725, 434, 727, 433, 728, 433, 730, 433, 731, 432, 732, 432, 734, 432, 735, 431, 737, 431, 738, 431, 739, 430, 741, 430, 742, 430, 743, 429, 745, 429, 746, 429, 747, 428, 748, 428, 750, 428, 751, 427, 752, 427, 753, 427, 755, 426, 756, 426, 757, 426, 758, 426, 759, 425, 761, 425, 762, 425, 763, 424, 764, 424, 765, 424, 766, 424, 767, 423, 769, 423, 770, 423, 771, 422, 772, 422, 773, 422, 774, 422, 775, 421, 776, 421, 777, 421, 778, 421, 779, 420, 780, 420, 781, 420, 782, 419, 783, 419, 784, 419, 785, 419, 786, 418, 787, 418, 788, 418, 789, 418, 790, 417, 791, 417, 792, 417, 793, 417, 794, 416, 795, 416, 796, 416, 797, 416, 797, 415, 798, 415, 799, 415, 800, 415, 801, 414, 802, 414, 803, 414, 804, 414, 804, 413, 805, 413, 806, 413, 807, 413, 808, 413, 809, 412, 810, 412, 810, 412, 811, 412, 812, 411, 813, 411, 814, 411, 814, 411, 815, 410, 816, 410, 817, 410, 818, 410, 818, 409, 819, 409, 820, 409, 821, 409, 822, 409, 822, 408, 823, 408, 824, 408, 825, 408, 825, 407, 826, 407, 827, 407, 828, 407, 828, 406, 829, 406, 830, 406, 831, 406, 831, 405, 832, 405, 833, 405, 834, 405, 834, 404, 835, 404, 836, 404, 837, 404, 837, 403, 838, 403, 839, 403, 840, 403, 840, 402, 841, 402, 842, 402, 842, 402, 843, 401, 844, 401, 845, 401, 845, 401, 846, 400, 847, 400, 848, 400, 848, 400, 849, 399, 850, 399, 851, 399, 851, 399, 852, 398, 853, 398, 853, 398, 854, 398, 855, 397, 856, 397, 856, 397, 857, 396, 858, 396, 859, 396, 859, 396, 860, 395, 861, 395, 862, 395, 862, 394, 863, 394, 864, 394, 865, 394, 866, 393, 866, 393, 867, 393, 868, 392, 869, 392, 869, 392, 870, 391, 871, 391, 872, 391, 873, 390, 873, 390, 874, 390, 875, 389, 876, 389, 877, 389, 878, 388, 878, 388, 879, 388, 880, 387, 881, 387, 882, 387, 883, 386, 884, 386, 884, 386, 885, 385, 886, 385, 887, 385, 888, 384, 889, 384, 890, 384, 891, 383, 891, 383, 892, 382, 893, 382, 894, 382, 895, 381, 896, 381, 897, 381, 898, 380, 899, 380, 900, 379, 901, 379, 902, 379, 903, 378, 904, 378, 905, 377, 906, 377, 907, 376, 908, 376, 909, 376, 910, 375, 911, 375, 912, 374, 913, 374, 914, 373, 915, 373, 916, 372, 917, 372, 919, 371, 920, 371, 921, 371, 922, 370, 923, 370, 924, 369, 925, 369, 927, 368, 928, 368, 929, 367, 930, 367, 931, 366, 933, 366, 934, 365, 935, 365, 936, 364], Source={ID=5, Name=A3}, Destination={ID=6, Name=B}, ID=14, Name=Arc 8}
        {SourceID=6, DestinationID=1, Conditions=[[RotationScript].Script.CanGoFromBToA], BezierPoints=[938, 364, 936, 365, 935, 367, 933, 369, 932, 370, 930, 372, 929, 374, 927, 375, 926, 377, 924, 379, 923, 380, 922, 382, 920, 384, 919, 385, 917, 387, 916, 388, 915, 390, 913, 392, 912, 393, 910, 395, 909, 396, 908, 398, 906, 400, 905, 401, 904, 403, 902, 404, 901, 406, 900, 407, 898, 409, 897, 410, 896, 412, 894, 413, 893, 415, 892, 416, 890, 418, 889, 419, 888, 421, 887, 422, 885, 424, 884, 425, 883, 427, 881, 428, 880, 430, 879, 431, 878, 432, 876, 434, 875, 435, 874, 437, 873, 438, 872, 439, 870, 441, 869, 442, 868, 444, 867, 445, 865, 446, 864, 448, 863, 449, 862, 450, 861, 452, 859, 453, 858, 454, 857, 456, 856, 457, 855, 458, 854, 459, 852, 461, 851, 462, 850, 463, 849, 464, 848, 466, 847, 467, 846, 468, 845, 469, 843, 471, 842, 472, 841, 473, 840, 474, 839, 475, 838, 477, 837, 478, 836, 479, 835, 480, 833, 481, 832, 482, 831, 484, 830, 485, 829, 486, 828, 487, 827, 488, 826, 489, 825, 490, 824, 491, 823, 492, 822, 493, 821, 495, 820, 496, 819, 497, 818, 498, 817, 499, 816, 500, 815, 501, 813, 502, 812, 503, 811, 504, 810, 505, 809, 506, 808, 507, 807, 508, 806, 509, 805, 510, 804, 511, 803, 512, 803, 512, 802, 513, 801, 514, 800, 515, 799, 516, 798, 517, 797, 518, 796, 519, 795, 520, 794, 521, 793, 521, 792, 522, 791, 523, 790, 524, 789, 525, 788, 526, 787, 526, 786, 527, 785, 528, 784, 529, 784, 530, 783, 530, 782, 531, 781, 532, 780, 533, 779, 534, 778, 534, 777, 535, 776, 536, 775, 536, 774, 537, 774, 538, 773, 539, 772, 539, 771, 540, 770, 541, 769, 541, 768, 542, 767, 543, 766, 543, 766, 544, 765, 544, 764, 545, 763, 546, 762, 546, 761, 547, 760, 548, 760, 548, 759, 549, 758, 549, 757, 550, 756, 550, 755, 551, 754, 551, 754, 552, 753, 553, 752, 553, 751, 554, 750, 554, 749, 555, 749, 555, 748, 555, 747, 556, 746, 556, 745, 557, 745, 557, 744, 558, 743, 558, 742, 559, 741, 559, 740, 559, 740, 560, 739, 560, 738, 561, 737, 561, 736, 561, 736, 562, 735, 562, 734, 562, 733, 563, 732, 563, 732, 563, 731, 564, 730, 564, 729, 564, 728, 565, 728, 565, 727, 565, 726, 565, 725, 566, 725, 566, 724, 566, 723, 566, 722, 567, 721, 567, 721, 567, 720, 567, 719, 567, 718, 568, 718, 568, 717, 568, 716, 568, 715, 568, 714, 568, 714, 569, 713, 569, 712, 569, 711, 569, 711, 569, 710, 569, 709, 569, 708, 569, 708, 569, 707, 569, 706, 569, 705, 570, 704, 570, 704, 570, 703, 570, 702, 570, 701, 570, 701, 570, 700, 570, 699, 570, 698, 570, 698, 570, 697, 570, 696, 569, 695, 569, 695, 569, 694, 569, 693, 569, 692, 569, 692, 569, 691, 569, 690, 569, 689, 569, 689, 569, 688, 568, 687, 568, 686, 568, 686, 568, 685, 568, 684, 568, 683, 567, 683, 567, 682, 567, 681, 567, 680, 567, 680, 566, 679, 566, 678, 566, 677, 566, 677, 565, 676, 565, 675, 565, 674, 564, 674, 564, 673, 564, 672, 563, 671, 563, 671, 563, 670, 562, 669, 562, 668, 562, 668, 561, 667, 561, 666, 561, 665, 560, 665, 560, 664, 559, 663, 559, 662, 559, 661, 558, 661, 558, 660, 557, 659, 557, 658, 556, 658, 556, 657, 555, 656, 555, 655, 554, 655, 554, 654, 553, 653, 553, 652, 552, 652, 552, 651, 551, 650, 551, 649, 550, 648, 549, 648, 549, 647, 548, 646, 548, 645, 547, 645, 546, 644, 546, 643, 545, 642, 545, 641, 544, 641, 543, 640, 543, 639, 542, 638, 541, 637, 540, 637, 540, 636, 539, 635, 538, 634, 538, 634, 537, 633, 536, 632, 535, 631, 535, 630, 534, 629, 533, 629, 532, 628, 531, 627, 531, 626, 530, 625, 529, 625, 528, 624, 527, 623, 526, 622, 525, 621, 525, 621, 524, 620, 523, 619, 522, 618, 521, 617, 520, 616, 519, 616, 518, 615, 517, 614, 516, 613, 515, 612, 514, 611, 513, 610, 512, 610, 511, 609, 510, 608, 509, 607, 508, 606, 507, 605, 506, 604, 505, 604, 504, 603, 503, 602, 502, 601, 501, 600, 500, 599, 499, 598, 498, 598, 496, 597, 495, 596, 494, 595, 493, 594, 492, 593, 491, 592, 489, 591, 488, 590, 487, 589, 486, 589, 485, 588, 483, 587, 482, 586, 481, 585, 480, 584, 478, 583, 477, 582, 476, 581, 475, 580, 473, 579, 472, 578, 471, 577, 469, 577, 468, 576, 467, 575, 465, 574, 464, 573, 463, 572, 461, 571, 460, 570, 458, 569, 457, 568, 456, 567, 454, 566, 453, 565, 451, 564, 450, 563, 448, 562, 447, 561, 445, 560, 444, 559, 442, 558, 441, 557, 439, 556, 438, 555, 436, 554, 435, 553, 433, 552, 432, 551, 430, 550, 428, 549, 427, 548, 425, 547, 424, 546, 422, 545, 420, 544, 419, 543, 417, 542, 415, 541, 414, 539, 412, 538, 410, 537, 409, 536, 407, 535, 405, 534, 403, 533, 402, 532, 400, 531, 398, 530, 396, 529, 395, 527, 393, 526, 391, 525, 389, 524, 387, 523, 386, 522, 384, 521, 382, 520, 380, 518, 378, 517, 376, 516, 374, 515, 373, 514, 371, 513, 369, 512, 367, 510, 365, 509, 363, 508, 361, 507, 359, 506, 357, 504, 355, 503, 353, 502, 351, 501, 349, 500, 347, 498, 345, 497, 343, 496, 341, 495, 339, 494, 337, 492, 335, 491, 333, 490, 331, 489, 329, 487, 326, 486, 324, 485, 322, 484, 320, 482, 318, 481, 316, 480, 314, 478, 311, 477, 309, 476, 307, 474, 305, 473, 302, 472, 300, 471, 298, 469, 296, 468, 294, 467, 291, 465, 289, 464, 287, 463, 284, 461, 282, 460, 280, 458, 277, 457, 275, 456, 273, 454, 270, 453, 268, 452, 266, 450, 263, 449, 261, 447, 258, 446, 256, 445, 254, 443, 251, 442, 249, 440, 246, 439, 244, 437, 241, 436, 239, 434, 236, 433, 234, 431, 231, 430, 229, 429, 226, 427, 224, 426, 221, 424, 218, 423, 216, 421, 213, 420, 211, 418, 208], Source={ID=6, Name=B}, Destination={ID=1, Name=A}, ID=15, Name=Arc 9}
    Report TransitionReport: EventNames=[RotationManager].Transition
      VariableNames:
        [Clock].Today
        [Clock].Today.DayOfYear as doy
        [RotationManager].CurrentStateName as state
    Manager RotationScript
```csharp
using Models.Soils;
using APSIM.Shared.Utilities;
using System.Data;
using Models.Storage;
using Models.Core;
using System;

namespace Models
{
    [Serializable]
    public class Script : Model
    {
        [Link] private Clock clock;
        private int a1LoopbackCounter;

        [EventSubscribe("StartOfSimulation")]
        private void StartOfSim(object sender, EventArgs args)
        {
            a1LoopbackCounter = 0;
        }

        // Can go to A only on even-numbered days.
        public bool CanGoToA
        {
            get
            {
                return clock.Today.DayOfYear % 2 == 0;
            }
        }

        // Can go to A1 only in even years.
        public bool CanGoToA1
        {
            get
            {
                return clock.Today.Year % 2 == 0;
            }
        }

        // A1 can always loopback.
        public bool A1CanLoopback
        {
            get
            {
                return true;
            }
        }

        // Count the number of times we've looped back inside A1
        public void A1Loopback()
        {
            a1LoopbackCounter++;
        }

        // Can go from A1 to A2 only after looping back 5 times.
        public int CanGoFromA1ToA2
        {
            get
            {
                if (a1LoopbackCounter < 5)
                    return 0;
                if (a1LoopbackCounter == 5)
                    return 1;
                return 2;
            }
        }

        // Can go to A2 with normal priority if year >= 1901.
        // Can go to A2 with high priority if year == 1901.
        public int CanGoFromAToA2
        {
            get
            {
                if (clock.Today.Year == 1901)
                    return 2;
                if (clock.Today.Year > 1901)
                    return 1;
                return 0;
            }
        }

        // Can never go to A3 before 1905.
        // Can go to A3 with normal priority in even years.
        // Gan go to A3 with high priority in odd years.
        public int CanGoFromAToA3
        {
            get
            {
                if (clock.Today.Year < 1905)
                    return -1;
                if (clock.Today.Year % 2 == 0)
                    return 1;
                return 2;
            }
        }

        // Can go from A2 to B in December only.
        public bool CanGoFromA2ToB
        {
            get
            {
                return clock.Today.Month == 12;
            }
        }

        // Can go from A3 to B in July.
        public bool CanGoFromA3ToB
        {
            get
            {
                return clock.Today.Month == 7;
            }
        }

        // Can go from B to A only on January 1.
        public bool CanGoFromBToA
        {
            get
            {
                return clock.Today.DayOfYear == 1;
            }
        }
    }
}
```
    Manager ResultsValidator
```csharp
using Models.Soils;
using APSIM.Shared.Utilities;
using System.Data;
using Models.Storage;
using Models.Core;
using System;
using System.Globalization;

namespace Models
{
    [Serializable]
    public class Script : Model, ITest
    {
        public void Run()
        {
            IStorageReader storage = this.FindInScope<IDataStore>().Reader;
            DataTable data = storage.GetData("TransitionReport", "Current", new string[] { "rotation" }, new[] { "doy", "state" });
            int[] dates = DataTableUtilities.GetColumnAsIntegers(data, "doy");
            string[] states = DataTableUtilities.GetColumnAsStrings(data, "state", CultureInfo.InvariantCulture);

            if (dates.Length != expectedDates.Length)
                throw new Exception(string.Format("Incorrect number of dates. Expected: {0} but was: {1}", expectedDates.Length, dates.Length));
            for (int i = 0; i < dates.Length; i++)
                if (dates[i] != expectedDates[i])
                    throw new Exception(string.Format("Incorrect date. Expected: {0} but was {1}", expectedDates[i], dates[i]));
            for (int i = 0; i < states.Length; i++)
                if (states[i] != expectedStates[i])
                    throw new Exception(string.Format("Incorrect date. Expected: {0} but was {1}", expectedStates[i], states[i]));
            if (states.Length != expectedStates.Length)
                throw new Exception(string.Format("Incorrect number of dates. Expected: {0} but was: {1}", expectedStates.Length, states.Length));
        }

        private static readonly int[] expectedDates = new int[]
        {
            2,
            2,
            2,
            2,
            2,
            2,
            2,
            2,
            2,
            335,
            1,
            1,
            335,
            1,
            1,
            1,
            335,
            1,
            1,
            335,
            1,
            1,
            1,
            336,
            1,
            1,
            182,
            1,
            1,
            1,
            335,
            1,
            1,
            182,
            1,
            1,
            1,
            336,
            1,
            1,
            182,
            1,
            1,
            1
        };

        private static readonly string[] expectedStates = new string[]
        {
            "initial",
            "A",
            "A1",
            "A1",
            "A1",
            "A1",
            "A1",
            "A1",
            "A1",
            "A2",
            "B",
            "A",
            "A2",
            "B",
            "A",
            "A1",
            "A2",
            "B",
            "A",
            "A2",
            "B",
            "A",
            "A1",
            "A2",
            "B",
            "A",
            "A3",
            "B",
            "A",
            "A1",
            "A2",
            "B",
            "A",
            "A3",
            "B",
            "A",
            "A1",
            "A2",
            "B",
            "A",
            "A3",
            "B",
            "A",
            "A1"
        };
    }
}
```
  DataStore
