Simulations: Version=190
  Memo TitlePage
    # The APSIM Wheat Model

    _Brown, H.E., Huth, N.I. and Holzworth, D.P._
  Memo Introduction
    The APSIM wheat model has been developed using the Plant Modelling Framework (PMF) of [brown_plant_2014]. This new framework provides a library of plant organ and process submodels that can be coupled, at runtime, to construct a model in much the same way that models can be coupled to construct a simulation. This means that dynamic composition of lower level process and organ classes (e.g. photosynthesis, leaf) into larger constructions (e.g. maize, wheat, sorghum) can be achieved by the model developer without additional coding.

    The wheat model consists of:

    * a phenology model to simulate development through sequential developmental phases
    * a structure model to simulate plant morphology
    * a collection of organs to simulate the various plant parts
    * an arbitrator to allocate resources (N, biomass) to the various plant organs

    This work builds upon earlier APSIM Wheat models such as NWheat ([Asseng200225], [KeatingNWheat]), NWheatS ([Asseng1998163]), Cropmod-Wheat ([Wang2002GenericCropModel]), and the earlier versions developed in Plant (<a href=\"http://www.apsim.info/Documentation/Model,CropandSoil/CropModuleDocumentation/Wheat.aspx">APSIM Wheat 7.5</a>") and then within the Plant Modelling Framework ([brown_plant_2014]).
  DataStore
  Experiment WheatTest
    DisabledSimNames=[DookieWWHI2024CvMowhawkSow14-May, DookieWWHI2024CvIllaboSow14-May, DookieWWHI2024CvKittyhawkSow14-May, DookieWWHI2024CvWedgetailSow14-May, DookieWWHI2024CvWylahSow14-May, DookieWWHI2024CvWhistlerSow14-May, DookieWWHI2024CvRosellaSow14-May, DookieWWHI2024CvOspreySow14-May, DookieWWHI2024CvSunmasterSow17-Apr, DookieWWHI2024CvScepterSow17-Apr, DookieWWHI2024CvMaceSow17-Apr, DookieWWHI2024CvGregorySow17-Apr, DookieWWHI2024CvWyalkatchemSow17-Apr, DookieWWHI2024CvYitpiSow17-Apr, DookieWWHI2024CvJanzSow17-Apr, DookieWWHI2024CvMeeringSow17-Apr]
    Factors
      Permutation
        Factor Cv
          CompositeFactor Gregory
            Specifications:
              [Sowing].Script.CultivarName = Gregory
              [Sowing].Script.Population = 123
          CompositeFactor Mace
            Specifications:
              [Sowing].Script.CultivarName = Mace
              [Sowing].Script.Population = 140
          CompositeFactor Scepter
            Specifications:
              [Sowing].Script.CultivarName = Scepter
              [Sowing].Script.Population = 146
        Factor Sow: Specification=[Sowing].Script.SowDate = 17-Apr,14-May
    Simulation McPoyles
      Weather: FileName=%root%\Examples\WeatherFiles\AU_WaggaWagga.met; Latitude=-35; Tav=16.25; Amp=17.5
      Clock: Start=1992-04-01; End=1993-04-01
      Summary
      SoilArbitrator
      MicroClimate: a_interception=0; b_interception=1; c_interception=0; d_interception=0; SoilHeatFluxFraction=0.4; MinimumHeightDiffForNewLayer=0; NightInterceptionFraction=0.5; ReferenceHeight=2
      Manager LocationInfo
        Country = Australia
        State = Western Australia
        Region = South West
```csharp
using Models.Soils;
using System;
using Models.Core;
using Models.PMF;
using APSIM.Shared.Utilities;

namespace Models
{
    [Serializable]
    public class Script : Model
    {
        [Link] Clock Clock;
        [Link] Fertiliser Fertiliser;
        [Link] Summary Summary;
        
        [Description("Country")]
        public string Country { get; set; }

        [Description("State")]
        public string State { get; set; }

        [Description("Region")]
        public string Region { get; set; }

    }
}
```
      Zone Field: Area=1; Slope=0; AspectAngle=0; Altitude=0
        Soil Soil 1150: SoilType=Sandy duplex; LocalName=Ironstone gravelly soils; Site=Tenterden; NearestTown=Tenterden; Region=Southern Region; State=Western Australia; Country=Australia; ApsoilNumber=1150; Latitude=-34.442704; Longitude=117.394537; LocationAccuracy=+/- 20m; YearOfSampling=2015; DataSource=Rob Summers DAFWA
          Comments=gravel - Wa2 - Sb diff 6 - gravelly sandy earth light clay at depth
          Physical
            Thickness  ParticleSizeSand  ParticleSizeSilt  ParticleSizeClay  Rocks  BD     AirDry  LL15   DUL    SAT
            100        87.81             6.15              6.05              0      1.294  0.082   0.18   0.31   0.341
            100        86.18             4.95              8.86              0      1.443  0.11    0.11   0.19   0.209
            200        86.18             4.95              8.86              0      1.513  0.27    0.27   0.371  0.408
            200        88.29             3.92              7.79              0      1.2    0.27    0.27   0.465  0.511
            200        88.29             3.92              7.79              0      1.4    0.274   0.274  0.413  0.455
            200        88.29             3.92              7.79              0      1.519  0.297   0.297  0.332  0.365
            200        84.27             2.96              12.77             0      1.417  0.275   0.275  0.328  0.361
            200        84.27             2.96              12.77             0      1.669  0.258   0.258  0.315  0.346
            200        84.27             2.96              12.77             0      1.56   0.193   0.193  0.334  0.367
            200        84.27             2.96              12.77             0      1.68   0.252   0.252  0.31   0.342
            SoilCrop wheatSoil
              LL=[0.18, 0.11, 0.27, 0.27, 0.274, 0.297, 0.275, 0.258, 0.193, 0.252]
              KL=[0.06, 0.06, 0.06, 0.06, 0.04, 0.04, 0.04, 0.02, 0.02, 0.01]
              XF=[1, 1, 1, 1, 1, 1, 1, 1, 1, 1]
          WaterBalance SoilWater: SummerDate=1-Nov; SummerU=6; SummerCona=3.5; WinterDate=1-Apr; WinterU=2; WinterCona=2; DiffusConst=88; DiffusSlope=35; Salb=0.12; CN2Bare=73; CNRed=20; CNCov=0.8; PSIDul=-100; Thickness=[100, 100, 100, 100, 100, 100, 100]; SWCON=[0.5, 0.5, 0.5, 0.5, 0.3, 0.3, -]
          Organic: FOMCNRatio=40; CarbonUnits=Total
            Thickness  Carbon  SoilCNRatio  FBiom  FInert  FOM
            100        1.48    12           0.035  0.4     315.5
            100        0.64    12           0.02   0.5     127.3
            200        0.4     12           0.02   0.5     127.3
            200        0.35    12           0.02   0.7     61.6
            200        0.25    12           0.02   0.7     61.6
            200        0.21    12           0.02   0.7     61.6
            200        0.1     12           0.015  0.7     60.5
            200        0.1     12           0.015  0.7     60.1
            200        0.1     12           0.015  0.867   58.2
            200        0.1     12           0.015  0.95    42.2
          Chemical: PHUnits=Water
            Thickness  PH   EC     ESP    CEC
            100        5.1  0.132  0.026  7.003
            100        5.2  0.085  0.052  4.205
            200        6.3  0.085  0.052  4.205
            200        7.2  0.065  0.064  3.411
            200        7.6  0.065  0.064  3.411
            200        7.9  0.065  0.064  3.411
            200        7.9  0.064  0.083  3.514
            200        7.9  0.064  0.083  3.514
            200        8    0.087  0.125  4.193
            200        8.1  0.098  0.146  4.533
          Nutrient
          Solute NO3: Thickness=[100, 100, 200, 200, 200, 200, 200, 200, 200, 200]; InitialValues=[25, 5.5, 3.1, 1.8, 1.4, 2.2, 3.4, 4.2, 4.1, 4.4]; InitialValuesUnits=ppm; WaterTableConcentration=0; D0=0; DepthConstant=0; MaxDepthSoluteAccessible=0; RunoffEffectivenessAtMovingSolute=0; MaxEffectiveRunoff=0
          Solute NH4: Thickness=[100, 100, 200, 200, 200, 200, 200, 200, 200, 200]; InitialValues=[1.3, 1, 1.2, 0.9, 0.9, 0.7, 0.7, 0.7, 0.5, 1.6]; InitialValuesUnits=ppm; WaterTableConcentration=0; D0=0; DepthConstant=0; MaxDepthSoluteAccessible=0; RunoffEffectivenessAtMovingSolute=0; MaxEffectiveRunoff=0
          Solute Urea: Thickness=[100, 100, 200, 200, 200, 200, 200, 200, 200, 200]; InitialValues=[0, 0, 0, 0, 0, 0, 0, 0, 0, 0]; InitialValuesUnits=kg/ha; WaterTableConcentration=0; D0=0; DepthConstant=0; MaxDepthSoluteAccessible=0; RunoffEffectivenessAtMovingSolute=0; MaxEffectiveRunoff=0
          Water: Thickness=[100, 100, 200, 200, 200, 200, 200, 200, 200, 200]; InitialPAWmm=147.5; RelativeTo=LL15; FilledFromTop=true
            InitialValues=[0.103, 0.14, 0.37, 0.46, 0.41, 0.33, 0.33, 0.31, 0.33, 0.31]
          SoilTemperature CERESSoilTemperature
        Fertiliser
        Irrigation
        SurfaceOrganicMatter: InitialResidueName=Canola stubble; InitialResidueType=canola; InitialResidueMass=3000; InitialStandingFraction=0.7; InitialCPR=0; InitialCNR=70
        Plant Wheat
          Cultivar Mowhawk
            Command:
              [Phenology].Phyllochron.BasePhyllochron.FixedValue = 90
              [Phenology].PhyllochronPpSensitivity.FixedValue = 0.212225680614483
              [Phenology].CAMP.FLNparams.MinLN = 8
              [Phenology].CAMP.FLNparams.PpLN = 3.0
              [Phenology].CAMP.FLNparams.VrnLN = 6.0
              [Phenology].CAMP.FLNparams.VxPLN = 1.0
              [Phenology].CAMP.EnvData.VrnTreatTemp = 5.8
              [Phenology].CAMP.EnvData.VrnTreatDuration = 60
              [Phenology].HeadEmergenceLongDayBase.FixedValue = 170
              [Phenology].HeadEmergencePpSensitivity.FixedValue = 0.0
            Memo
              Placeholder cultivar Mowhawk based on DefaultCv.
          Cultivar Osprey: same as WheatTest.McPoyles.Field.Wheat.Mowhawk
          Cultivar Wylah: same as WheatTest.McPoyles.Field.Wheat.Mowhawk
          Cultivar Meering: same as WheatTest.McPoyles.Field.Wheat.Mowhawk
          Cultivar Sunmaster: same as WheatTest.McPoyles.Field.Wheat.Mowhawk
        Manager Sowing
          SowDate = 1-may
          Treat =
          CultivarName =
          SowingDepth = 30
          RowSpacing = 225
          Population = 180
          EmergeDate =
```csharp
using Newtonsoft.Json;
using System.Data;
using System.Xml.Serialization;
using Models;
using System.Text;
using System.Collections.Generic;
using Models.Interfaces;
using System;
using Models.Core;
using Models.PMF;
using Models.Soils;
using Models.Utilities;
using APSIM.Shared.Utilities;

namespace Models
{
    [Serializable]
    public class Script : Model
    {
        [Link] Clock Clock;
        [Link] Fertiliser Fertiliser;
        [Link] Summary Summary;
        [Link] Soil Soil;
        [Link(ByName = true)] Plant Wheat;
        [Link] Simulation Simulation;
        Accumulator accumulatedRain;
        
        [Description("Sowing date (d-mmm)")]
        public string SowDate { get; set; }
        [Description("Treatment Name")]
        public string Treat { get; set; }
        [Display(Type = DisplayType.CultivarName)]
        [Description("Cultivar to be sown")]
        public string CultivarName { get; set; }
        [Description("Sowing depth (mm)")]
        public double SowingDepth { get; set; }
        [Description("Row spacing (mm)")]
        public double RowSpacing { get; set; }
        [Description("Plant population (/m2)")]
        public double Population { get; set; }
        [Description("Emergence Date (d-MMM)")]
        public string EmergeDate {get; set;}



        [EventSubscribe("DoManagement")]
        private void OnDoManagement(object sender, EventArgs e)
        {

            if (DateUtilities.WithinDates(SowDate, Clock.Today, SowDate))
            {
               Wheat.Sow(population: Population, cultivar: CultivarName, depth: SowingDepth, rowSpacing: RowSpacing);   
               Wheat.Phenology.SetEmergenceDate(EmergeDate); 
            }            
        
        }
        
    }
}
```
        Manager Fertilize
          FertiliserType = UreaN
          FertiliserDates = 26-jul, 26-aug
          FertiliseDepth = 0
          Amount = 70.5
          AmountType = True
```csharp
using Models.Soils;
using System;
using System.Linq;
using Models.Core;
using Models.PMF;
using APSIM.Shared.Utilities;
namespace Models
{
    [Serializable]
    public class Script : Model
    {
        [Link] Clock Clock;
        [Link] Fertiliser Fertiliser;
        
        [Separator("A component to apply fertiliser on one or more dates on every year of the simulation")]

        [Description("Type of fertiliser to apply? ")] 
        [Display(Type = DisplayType.FertiliserType)]public string FertiliserType { get; set; }

        [Description("Enter the fertilisation dates as dd-mmm with comma separation (any year information entered will be ignored): ")] 
        public string[] FertiliserDates { get; set; } 
        
        [Description("Fertilise depth (mm)")]
        public double FertiliseDepth { get; set; }

        [Description("Amount of fertiliser to be applied (kg /ha)")] 
        public double Amount { get; set; }

        [Description("Is the above amount to be applied each time? (yes/ticked)? Or is it the total annual amount across all dates (no/unticked)")] 
        public bool AmountType { get; set; }

        
        [EventSubscribe("DoManagement")]
        private void OnDoManagement(object sender, EventArgs e)
        {
            foreach (string ddMMM in FertiliserDates)
            {
                if (DateUtilities.DatesEqual(ddMMM, Clock.Today))
                {
                    if (AmountType)
                        Fertiliser.Apply(amount: Amount, type: FertiliserType);
                    else
                        Fertiliser.Apply(amount: Amount / FertiliserDates.Length, type: FertiliserType, depth: FertiliseDepth);
                }
            }
        }
    }
}
```
        Manager Harvest
          NoHarvestBefore = 17-Nov
```csharp
using Models.PMF.Phen;
using APSIM.Shared.Utilities;
using System.Xml.Serialization;
using Models;
using Models.PMF;
using Models.Soils;
using System.Text;
using System.Collections.Generic;
using Models.Core;
using System;
using Models.Soils.Nutrients;

namespace Models
{
	[Serializable]
	public class Script : Model
	{
		[Link(ByName = true)] Plant Wheat;
		[Link] private Simulation sim;
		[Link] private Clock clock;
		[Link] private Summary summary;
		
		[Description("Prevent harvesting before: ")]
		public string NoHarvestBefore {get; set;}
		
		[EventSubscribe("DoManagement")]
		private void OnDoManagement(object sender, EventArgs e)
		{
			if (Wheat.IsReadyForHarvesting && DateUtilities.CompareDates(NoHarvestBefore, clock.Today) >= 0)
			{
				Wheat.Harvest();
				Wheat.EndCrop();
			}
		}
		
		[EventSubscribe("EndOfDay")]
		private void OnEndOfDay(object sender, EventArgs e)
		{
			if ((clock.Today.Equals(clock.EndDate))&&(Wheat.IsAlive))
			{
				Wheat.Harvest();
				Wheat.EndCrop();
				sim.Set("Clock.EndDate", clock.Today);
			}
		}
	}
}
```
        Manager Irrigate
          IrrigateDates = 18-Apr
          Amount = 5
          Depth = 0
          Efficiency = 1
          WillRunoff = False
```csharp
using Models.Soils;
using System;
using System.Linq;
using Models.Core;
using Models.PMF;
using APSIM.Shared.Utilities;
namespace Models
{
    [Serializable]
    public class Script : Model
    {
        [Link] Clock Clock;
        [Link] Irrigation Irrigation;
        
        [Separator("A component to apply irrigation on one or more dates on every year of the simulation")]

        [Description("Enter the irrigation dates as dd-mmm with comma separation (any year information entered will be ignored)")] 
        public string[] IrrigateDates { get; set; }
        
        [Description("Amount of irrigation to be applied (mm)")] 
        public double Amount { get; set; }
        
        [Description("Depth in the soil to apply the  irrigation (mm)")] 
        public double Depth { get; set; }
        
        [Description("Efficiency of irrigation (0-1)")] 
        public double Efficiency { get; set; }
        
        [Description("Will the irrigation runoff?")] 
        public bool WillRunoff { get; set; }
        
        [EventSubscribe("DoManagement")]
        private void OnDoManagement(object sender, EventArgs e)
        {
            foreach (string ddMMM in IrrigateDates)
            {
                if (DateUtilities.DatesEqual(ddMMM, Clock.Today))
                    Irrigation.Apply(amount: Amount, depth: Depth, efficiency: Efficiency, willRunoff: WillRunoff);
            }
        }
    }
}
```
        Report DailyReport: EventNames=[Clock].DoReport
          VariableNames:
            [Clock].Today
            [IWeather].MeanT
            [IWeather].MeanT
            [IWeather].Radn
            [Simulation].Name
            [Soil].Water.Volumetric
            [Wheat].AboveGround.N
            [Wheat].AboveGround.Wt
            [Wheat].AboveGroundDead.N
            [Wheat].AboveGroundDead.Wt
            [Wheat].AboveGroundLive.N
            [Wheat].AboveGroundLive.Wt
            [Wheat].Ear.N
            [Wheat].Ear.NConc
            [Wheat].Ear.Wt
            [Wheat].Grain.N
            [Wheat].Grain.NConc
            [Wheat].Grain.NperKernal
            [Wheat].Grain.Number
            [Wheat].Grain.Size
            [Wheat].Grain.Wt
            [Wheat].Leaf.CoverGreen
            [Wheat].Leaf.CoverTotal
            [Wheat].Leaf.Dead.N
            [Wheat].Leaf.Dead.NConc
            [Wheat].Leaf.Dead.Wt
            [Wheat].Leaf.FinalLeafNumber
            [Wheat].Leaf.Fn
            [Wheat].Leaf.Fw
            [Wheat].Leaf.Height
            [Wheat].Leaf.LAI
            [Wheat].Leaf.Ligules
            [Wheat].Leaf.Live.N
            [Wheat].Leaf.Live.NConc
            [Wheat].Leaf.Live.Wt
            [Wheat].Leaf.MainStemPopulation
            [Wheat].Leaf.Photosynthesis.FT
            [Wheat].Leaf.SpecificArea
            [Wheat].Leaf.SpecificAreaCanopy
            [Wheat].Leaf.SpecificNitrogen
            [Wheat].Leaf.StemNumberPerPlant
            [Wheat].Leaf.StemPopulation
            [Wheat].Leaf.Tips
            [Wheat].Leaf.Tips
            [Wheat].Leaf.Transpiration
            [Wheat].Phenology.AccumulatedTT
            [Wheat].Phenology.CurrentPhase.Name
            [Wheat].Phenology.CurrentStageName
            [Wheat].Phenology.EmergenceDAS
            [Wheat].Phenology.HaunStage
            [Wheat].Phenology.Photoperiod
            [Wheat].Phenology.Phyllochron
            [Wheat].Phenology.PTQ
            [Wheat].Phenology.Stage
            [Wheat].Phenology.ThermalTime
            [Wheat].Phenology.Zadok.Stage
            [Wheat].Root.Depth
            [Wheat].Root.N
            [Wheat].Root.NConc
            [Wheat].Root.Wt
            [Wheat].SowingData.Cultivar
            [Wheat].Spike.N
            [Wheat].Spike.NConc
            [Wheat].Spike.Wt
            [Wheat].Stem.N
            [Wheat].Stem.NConc
            [Wheat].Stem.Wt
            [Wheat].StemPlusSpike.N
            [Wheat].StemPlusSpike.Wt
            [Wheat].Total.N
            [Wheat].Total.Wt
            sum([Soil].NO3.kgha)
            sum([Soil].Water.MM)
            ([Wheat].Leaf.Transpiration + [ISoilWater].Es + [MicroClimate].PrecipitationInterception)
        SetModelParamsBySimulation SetPhenologyParams: SetEventName=[Plant].Sowing
          ParameterFile=C:\GitHubRepos\ApsimX\Tests\Simulation\Infrastructure\SetSimulationParametersFromFile\SimulationParameterOverWrites.csv
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