Simulations: Version=170
  DataStore
  Simulation Farm
    Clock: Start=1990-01-01; End=1995-04-30
    Summary SummaryFile
    Weather: FileName=%root%/Examples/WeatherFiles/Dalby.met
    SoilArbitrator Soil Arbitrator
    Zone Field 1: Area=1; Slope=0; AspectAngle=0; Altitude=50
      Soil Black Vertosol-Bongeen (Dalby No027): ASCOrder=Vertosol; ASCSubOrder=Black; SoilType=Clay; Site=Dalby; NearestTown=Dalby, Q 4405; Region=Darling Downs and Granite Belt; State=Queensland; Country=Australia; ApsoilNumber=27; Latitude=-27.123; Longitude=151.305; LocationAccuracy=+/- 20m; YearOfSampling=0; DataSource=CSIRO Sustainable Ecosystems, Toowoomba
        Comments=Clay - Toowoomba - Wheat ll,xf copied from sorghum. Wheat kl is just default apsim kl values for wheat.
        Physical
          Thickness  BD    AirDry  LL15  DUL   SAT
          150        1.25  0.115   0.23  0.45  0.5
          150        1.31  0.184   0.23  0.43  0.48
          300        1.23  0.23    0.23  0.46  0.51
          300        1.24  0.23    0.23  0.45  0.5
          300        1.25  0.23    0.23  0.45  0.5
          300        1.26  0.23    0.23  0.44  0.49
          300        1.29  0.23    0.23  0.43  0.48
          BD, DUL source: Field measured and checked for sensibility
          AirDry, LL15 source: Estimated based on local knowledge
          SAT source: Calculated from measured, estimated or calculated BD
          SoilCrop wheatSoil: LL=[0.23, 0.24, 0.29, 0.34, 0.37, 0.38, 0.39]; KL=[0.06, 0.06, 0.06, 0.04, 0.04, 0.02, 0.01]; XF=[1, 1, 1, 1, 1, 1, 1]
            LL source: Estimated based on local knowledge
          SoilCrop cottonSoil: LL=[0.23, 0.23, 0.23, 0.26, 0.3, 0.33, 0.37]; KL=[0.1, 0.1, 0.1, 0.1, 0.09, 0.07, 0.05]; XF=[1, 1, 1, 1, 1, 1, 1]
            LL source: Field measured and checked for sensibility
          SoilCrop sorghumSoil: LL=[0.23, 0.24, 0.29, 0.34, 0.37, 0.38, 0.39]; KL=[0.07, 0.07, 0.07, 0.05, 0.05, 0.04, 0.03]; XF=[1, 1, 1, 1, 1, 1, 1]
            LL source: Field measured and checked for sensibility
          SoilCrop SCRUMSoil: same as Farm.Field 1.Black Vertosol-Bongeen (Dalby No027).Physical.wheatSoil
          SoilCrop MaizeSoil: same as Farm.Field 1.Black Vertosol-Bongeen (Dalby No027).Physical.sorghumSoil
        WaterBalance SoilWater: SummerDate=1-Nov; SummerU=6; SummerCona=3.5; WinterDate=1-Apr; WinterU=4; WinterCona=2.5; DiffusConst=40; DiffusSlope=16; Salb=0.12; CN2Bare=73; CNRed=20; CNCov=0.8; PSIDul=-100; Thickness=[150, 150, 300, 300, 300, 300, 300]; SWCON=[0.3, 0.3, 0.3, 0.3, 0.3, 0.3, 0.3]
        Organic: FOMCNRatio=40; CarbonUnits=WalkleyBlack
          Thickness  Carbon    SoilCNRatio  FBiom  FInert  FOM
          150        0.915385  12           0.04   0.4     347.129
          150        0.776923  12           0.02   0.6     270.344
          300        0.346154  12           0.02   0.8     163.972
          300        0.230769  12           0.02   1       99.4541
          300        0.153846  12           0.01   1       60.322
          300        0.123077  12           0.01   1       36.5871
          300        0.130769  12           0.01   1       22.1912
        Chemical: Thickness=[150, 150, 300, 300, 300, 300, 300]; PH=[8.2, 8.5, 8.6, 8.6, 7.4, 5.3, 5.3]; PHUnits=Water
          PH source: Estimated based on local knowledge
        Nutrient
        Solute NO3: InitialValuesUnits=ppm; WaterTableConcentration=0; D0=0; DepthConstant=0; MaxDepthSoluteAccessible=0; RunoffEffectivenessAtMovingSolute=0; MaxEffectiveRunoff=0
        Solute NH4: InitialValuesUnits=ppm; WaterTableConcentration=0; D0=0; DepthConstant=0; MaxDepthSoluteAccessible=0; RunoffEffectivenessAtMovingSolute=0; MaxEffectiveRunoff=0
        Solute Urea: Thickness=[150, 150, 300, 300, 300, 300, 300]; InitialValues=[0, 0, 0, 0, 0, 0, 0]; InitialValuesUnits=kg/ha; WaterTableConcentration=0; D0=0; DepthConstant=0; MaxDepthSoluteAccessible=0; RunoffEffectivenessAtMovingSolute=0; MaxEffectiveRunoff=0
        Water: Thickness=[150, 150, 300, 300, 300, 300, 300]; InitialValues=[0.406, 0.39, 0.414, 0.406, 0.406, 0.398, 0.39]; InitialPAWmm=309.6; RelativeTo=LL15; FilledFromTop=true
        CERESSoilTemperature
      Fertiliser
      SurfaceOrganicMatter: InitialResidueName=wheat_stubble; InitialResidueType=wheat; InitialResidueMass=500; InitialStandingFraction=0; InitialCPR=0; InitialCNR=100
      MicroClimate: a_interception=0; b_interception=1; c_interception=0; d_interception=0; SoilHeatFluxFraction=0.4; MinimumHeightDiffForNewLayer=0; NightInterceptionFraction=0.5; ReferenceHeight=2
      Plant Maize
      Plant Wheat
      Manager SowingFertiliserMaize
        Amount = 160
        CropName = maize
```csharp
using Models.Soils;
using System.Linq;
using System;
using Models.Core;
using Models.PMF;
namespace Models
{
    [Serializable]
    public class Script : Model
    {
        [Link] Clock Clock;
        [Link] Fertiliser Fertiliser;
        [Link] Summary Summary;
        
        
        [Description("Amount of fertiliser to be applied (kg/ha)")]
        public double Amount { get; set;}
        
        [Description("Crop to be fertilised")]
        public string CropName { get; set;}
        
        
        

        [EventSubscribe("Sowing")]
        private void OnSowing(object sender, EventArgs e)
        {
            Model crop = sender as Model;
            if (crop.Name.ToLower()==CropName.ToLower())
                Fertiliser.Apply(Amount: Amount, Type: Fertiliser.Types.NO3N);
        }
        
    }
}
```
      Manager SowingFertiliserWheat
        Amount = 160
        CropName = wheat
        script: same as in Farm.Field 1.SowingFertiliserMaize
      Report: EventNames=[Clock].EndOfDay
        VariableNames:
          [Clock].Today
          [Manager].Script.CurrentStateCSV as CurrentState
          [Wheat].Phenology.Zadok.Stage
          [Wheat].Phenology.CurrentStageName
          [Wheat].IsAlive
          [Wheat].IsReadyForHarvesting
          [Wheat].AboveGround.Wt
          [Wheat].AboveGround.N
          [Wheat].Grain.Total.Wt*10 as WheatYield
          [Maize].Grain.Total.Wt*10 as MaizeYield
          [Wheat].Grain.Protein
          [Wheat].Grain.Size
          [Wheat].Grain.Number
          [Wheat].Grain.Total.Wt
          [Wheat].Grain.Total.N
          [Wheat].Total.Wt
          Sum([Soil].SoilWater.ESW) as ESW
          [Soil].SoilWater.Es as ESoil
    Zone Field 2: same as Farm.Field 1
    Manager Economics
```csharp
using System;
using System.Linq;
using System.Collections.Generic;
using Models.Core;
using Models.Interfaces;
using Models.Management;
using Models.Utilities;
using APSIM.Shared.Utilities;

// Work in progress. 
// - explore event classes for income/ expenditure
// - create state variables for reporting [event|end_year|end_simulation]
// - presentation

namespace Models
{
    [Serializable]
    public class Economics : Model
    {
         // Keeps a balance, writes a log.

         //   income {amount 64000.0} {comment "description here"}
         //   income {category cropprice} {name wheat} {yield 4000} {protein 12.3} {comment "description here"}
         //   income {category cropprice} {name sorghum} {yield 6000} {comment "description here"}
         //   expenditure {cost 42.0} {comment "description here"}
         //   expenditure {category seed} {name wheat} {rate 120} {comment "description here"}
    
        [Link] private Summary Summary;
        
        private bool afterInit = false;
        [EventSubscribe("StartOfSimulation")]
        private void OnSimulationCommencing(object sender, EventArgs e)
        {
            afterInit = true;
        }

        [EventSubscribe("StartOfDay")]
        private void DoStartOfDay(object sender, EventArgs e) 
        {
        }
        
        [EventSubscribe("EndOfDay")]
        private void DoEndOfDay(object sender, EventArgs e) 
        {
        }

        [EventSubscribe("DoManagement")]
        private void DoManagement(object sender, EventArgs e)
        {
        }
        
        [EventSubscribe("DoIncome")]
        private void OnIncome(object sender, IncomeArgs e)
        {
           Summary.WriteMessage(this, $"Caught Income {e.Description}", MessageType.Diagnostic);
           Summary.WriteMessage(this, $"Yield = {e.Yield}", MessageType.Diagnostic);
        }
        [EventSubscribe("DoExpenditure")]
        private void DoExpenditure(object sender, ExpenditureArgs e)
        {
           Summary.WriteMessage(this, $"Caught Expenditure {e.Description}", MessageType.Diagnostic);
           Summary.WriteMessage(this, $"Cost = {e.Cost}", MessageType.Diagnostic);
        }

        public class ExpenditureArgs : EventArgs
        {
           public string Description { get; set; }
           public string Category { get; set; }
           public double Cost  { get; set; } // whole $/farm
           public string Name { get; set; }
           public double Rate { get; set; }
           public double Area { get; set; } 
        }        
        public class IncomeArgs : EventArgs
        {
           public string Description { get; set; }
           public string Category { get; set; }
           public double Amount  { get; set; } // whole $/farm
           public string Name { get; set; }
           public double Yield  { get; set; }
           public double Protein { get; set; }
           public double Area { get; set; }
        }
   }
}
```
    Manager
```csharp
using System;
using System.Linq;
using System.Collections.Generic;
using Models.Core;
using Models.Interfaces;
using Models.Functions;
using Models.PMF;
using Models.Soils;
using Models.WaterModel;
using Models.Soils.Nutrients;
using Models.Management;
using Models.Utilities;
using Models.Climate;
using APSIM.Shared.Utilities;

namespace Models
{
    [Serializable]
    public class Script : Model
    {
        // The paddocks and initial states of each
        public List<string> myPaddockNames = new List<string> { "Field 1", "Field 2" };
        public Dictionary<string, string> initialStates = new Dictionary<string, string> { {"Field 1", "initial"}, {"Field 2","summer fallow"}};
        public Dictionary<string, int> initialDays = new Dictionary<string, int> { {"Field 1", 30}, {"Field 2",  180}};
 
        // Default parameters for crops we manage.
        //    **needs a better presentation** 
        // Crop aliases: "Early Wheat" and "Late Wheat" both mean "Wheat", but different parameters 
        [NonSerialized]
        private static readonly Dictionary<string, cropDefault> cropDefaults = new Dictionary<string, cropDefault> { 
           {"Early Wheat", new cropDefault {RealName = "Wheat", 
                                      StartDate = "1-apr", EndDate = "1-may", RainDays = 7, MinRain = 30, MinESW = 80, MustSow = true,  
                                      CultivarName = "hartog", Population = 50, SowingDepth = 30, RowSpacing = 250,
                                      maxArea = 0.5 }},
           {"Wheat", new cropDefault {RealName = "Wheat", 
                                      StartDate = "1-may", EndDate = "10-jun", RainDays = 7, MinRain = 10, MinESW = 50, MustSow = true,  
                                      CultivarName = "hartog", Population = 50, SowingDepth = 30, RowSpacing = 250,
                                      maxArea = 0.5 }},
           {"Maize", new cropDefault {RealName = "Maize", 
                                      StartDate = "1-nov", EndDate = "30-dec", RainDays = 7, MinRain = 20, MinESW = 80, MustSow = true,
                                      CultivarName = "sc501", Population =  6, SowingDepth = 50, RowSpacing = 1000,
                                      maxArea = 0.5 }}
        };
        
        // Helpers for rotation arc rules
        public double CanSowEarlyWheat {get { return(canSow("Early Wheat")); } set {} }
        public double CanSowWheat {get { return(canSow("Wheat")); } set {} }
        public double CanSowMaize {get { return(canSow("Maize")); } set {} }
         
        public double CanHarvestEarlyWheat {get { return(canHarvest("Early Wheat")); } set {} }
        public double CanHarvestWheat {get { return(canHarvest("Wheat")); } set {} }
        public double CanHarvestMaize {get { return(canHarvest("Maize")); } set {} }
        

        [Link] private Clock Clock;
        [Link] private Summary Summary;
        [Link] private RotationManager RotationManager;
        //[Link] private Economics economics;

        [NonSerialized] private Events myEvents;
        
        // This is set during the management phase to the current paddock being managed.        
        public string _currentPaddock ;       
        public string currentPaddock {get => _currentPaddock; set => _currentPaddock = value; }
        
        // Keep these around as they're tedious to find 
        private Dictionary<string, Accumulator> accumulatedRain;
        private Dictionary<string, Zone> myPaddockZones;
        private Dictionary<string, WaterBalance> myWaterBalances;
        
        // The current state of each paddock
        private Dictionary<string, string> currentState;
        public string[] CurrentState {get { return currentState.Values.ToArray();} set {}}
        public string CurrentStateCSV {get { return string.Join(",", currentState.Values);} set {}}

        private Dictionary<string, int> daysSinceLastHarvests;
           
        private bool afterInit = false;
        [EventSubscribe("StartOfSimulation")]
        private void OnSimulationCommencing(object sender, EventArgs e)
        {
            afterInit = true;
            accumulatedRain = new Dictionary<string, Accumulator>();
            foreach (var crop in cropDefaults.Keys) {
               accumulatedRain.Add(crop, new Accumulator(this, "[Weather].Rain", cropDefaults[crop].RainDays));
            }
            myEvents = new Events(this);
            
            myPaddockZones = new Dictionary<string, Zone>();
            myWaterBalances = new Dictionary<string, WaterBalance>();
            currentState = new Dictionary<string, string>();
            daysSinceLastHarvests = new Dictionary<string, int>();
            foreach (var paddock in myPaddockNames) {
                myPaddockZones[ paddock ] = FindInScope(paddock) as Zone; 
                if (myPaddockZones[ paddock ]  == null) { throw new Exception("Can't find a paddock called '" + paddock + "'");}
 
                myWaterBalances[ paddock ] = myPaddockZones[ paddock ].FindInScope("SoilWater") as WaterBalance;
                if (myWaterBalances[ paddock ] == null) { throw new Exception("Can't find a waterbalance in '" + paddock + "'");}
                
                currentState[paddock] = initialStates[paddock];
                daysSinceLastHarvests[paddock] = initialDays[paddock];
            }
        }

        [EventSubscribe("StartOfDay")]
        private void DoStartOfDay(object sender, EventArgs e) 
        {
        }
        
        [EventSubscribe("EndOfDay")]
        private void DoEndOfDay(object sender, EventArgs e) 
        {
            foreach (var paddock in myPaddockNames) {
               var cropIn = false;
               var cropModules = cropDefaults.Values.Select(c => c.RealName).Distinct();
               foreach (var crop in cropModules) {
                  IPlant Crop = myPaddockZones[paddock].FindInScope(crop) as IPlant;
                  if (Crop.IsAlive)
                     cropIn = true;
               }
               if (!cropIn) 
                  daysSinceLastHarvests[paddock]++;
            }
        }

        [EventSubscribe("DoManagement")]
        private void DoManagement(object sender, EventArgs e)
        {
            foreach (var crop in cropDefaults.Keys) {
               accumulatedRain[crop].Update();
            }
            bool moreToDo = true;
            while (moreToDo) {
               foreach (var paddock in myPaddockNames) {
                  currentPaddock = paddock;
                  RotationManager.CurrentState = currentState[paddock];
                  //Summary.WriteMessage(this, $"Calling DoManagement for {currentPaddock}", MessageType.Diagnostic);
                  moreToDo = RotationManager.DoManagement();
                  currentState[paddock] = RotationManager.CurrentState;
               }
            }
            currentPaddock = "";
        }

        // Rotation arc rules & actions. These depend on currentPaddock being set 
        private double canSow (string crop) {
            //Summary.WriteMessage(this, $"Being asked for crop {crop} in {currentPaddock}", MessageType.Diagnostic);
            var Crop = findMyCrop(cropDefaults[crop].RealName);

            if ((DateUtilities.WithinDates(cropDefaults[crop].StartDate, Clock.Today, cropDefaults[crop].EndDate) &&
                 !Crop.IsAlive &&
                 MathUtilities.Sum(myWaterBalances[currentPaddock].ESW) > cropDefaults[crop].MinESW &&
                 accumulatedRain[crop].Sum > cropDefaults[crop].MinRain) ||
                (!Crop.IsAlive && DateUtilities.DatesAreEqual(cropDefaults[crop].EndDate, Clock.Today) && 
                 cropDefaults[crop].MustSow)) 
                return 1; 
            return 0; 
        }
               
        private double canHarvest (string crop) {
            var Crop = findMyCrop(cropDefaults[crop].RealName);
            if (Crop.IsReadyForHarvesting) {
               return(1);
            }
            return(0);   
        }
               
        public void SowCrop(string crop) 
        {   
            crop = crop.Replace("\"", ""); //NFI why the quotes are added in??
            var myPaddock = FindInScope(currentPaddock) as Zone; 
            if (myPaddock == null) { throw new Exception("Can't find a paddock called '" + currentPaddock + "'");}
            
            Plant Crop = myPaddock.FindInScope(cropDefaults[crop].RealName) as Plant;
            if (Crop == null) { throw new Exception("Can't find crop called '" + currentPaddock + "." + crop + "'");}

            Summary.WriteMessage(this, this.FullPath + " -  sowing " + Crop.FullPath, MessageType.Diagnostic);
            Crop.Sow(population: cropDefaults[crop].Population, cultivar: cropDefaults[crop].CultivarName, 
                     depth: cropDefaults[crop].SowingDepth, rowSpacing: cropDefaults[crop].RowSpacing);
            myEvents.Publish("DoExpenditure",  new object[] { this, 
                  new Economics.ExpenditureArgs{Description = $"{crop} Sowing",
                                                Category = "Sowing", 
                                                Name = Crop.Name, 
                                                Cost = 0,
                                                Rate = 0}}); 
 
        }
        
        public void HarvestCrop(string crop)
        {
            crop = crop.Replace("\"", "");
            var myPaddock = FindInScope(currentPaddock) as Zone; 
            Plant Crop = myPaddock.FindInScope(cropDefaults[crop].RealName) as Plant;

            Summary.WriteMessage(this, this.FullPath + " -  harvesting " + Crop.FullPath, MessageType.Diagnostic);
            myEvents.Publish("DoIncome",  new object[] { this, 
                  new Economics.IncomeArgs{Description = $"{crop} Harvest",
                                           Name = Crop.Name, 
                                           Yield = GetValuebyName(myPaddock.Get($"[{Crop.Name}].Grain.Total.Wt")) * 10,  // g/m2 -> kg/ha
                                           Protein = GetValuebyName(myPaddock.Get($"[{Crop.Name}].Grain.Protein")) ,
                                           Area = myPaddockZones [ currentPaddock ].Area}});   
            Crop.Harvest();
            Crop.EndCrop();
            daysSinceLastHarvests[currentPaddock] = 0;
        }

        private Plant findMyCrop(string crop) {
            var myPaddock = FindInScope(currentPaddock) as Zone; 
            if (myPaddock == null) { throw new Exception("Can't find a paddock called '" + currentPaddock + "'");}
            
            Plant Crop = myPaddock.FindInScope(cropDefaults[crop].RealName) as Plant;
            if (Crop == null) { throw new Exception("Can't find crop called '" + currentPaddock + "." + crop + "'");}
            return (Crop);        
        }
        
        private double GetValuebyName(object value) 
        {
            double result;
            if (value is IFunction function)
                value = function.Value();
            else 
                return(-1);
                
            result = (double) Convert.ChangeType(value, typeof(double));
            return(result);
        }

        // More helpers for rotation arc rules. These rules also depend on currentPaddock being set 
        // earlier (ie we're calling the rotation graph, and in turn, it's asking us for something)

        // See if the potential area planted for this crop is less or equal to the total area allowed         
        public int AreaPlantedOk (string crop) {
           double areaCrop = 0;
           double areaTot = 0;
           foreach (var paddockZone in myPaddockZones.Values) {
               IPlant Crop = paddockZone.FindInScope(cropDefaults[crop].RealName) as IPlant;
               if (Crop == null) { throw new Exception($"Can't find crop {crop} in '{paddockZone.Name}'");}
               if (Crop.IsAlive) 
                  areaCrop  += paddockZone.Area;
               areaTot += paddockZone.Area;
           }
           var thisPaddockArea = myPaddockZones [ currentPaddock ].Area;
           var areaFrac = (thisPaddockArea + areaCrop) / areaTot ; 
           int result = areaFrac <= cropDefaults[crop].maxArea ? 1 : 0;
           //Summary.WriteMessage(this, $"area rule for crop {crop} is {result}: this = {thisPaddockArea}, pot= {(areaCrop + thisPaddockArea)}, tot={areaTot}", MessageType.Diagnostic);
           return(result);        
        }
        
        // The number of days since the last crop was harvested
        public int daysSinceLastHarvest {
           get { 
             return(daysSinceLastHarvests[currentPaddock]);
           }
           set {}
        }
        
        public int daysSinceLastHarvest_gt_30 {get {return (daysSinceLastHarvest > 30 ? 1 : 0); } set {}}
        public int daysSinceLastHarvest_gt_180 {get {return (daysSinceLastHarvest > 180 ? 1 : 0); } set {}}
        
        private class cropDefault {
           public string RealName;
           public int RainDays;
           public string StartDate;
           public string EndDate;
           public double MinRain;
           public double MinESW;
           public bool MustSow;
           public double Population;
           public string CultivarName;
           public double SowingDepth;
           public double RowSpacing;
           public double maxArea;
        }
   }
}
```
    RotationManager: TopLevel=false; InitialState=initial; Verbose=false
      Nodes:
        Name           OutlineColour
        summer fallow  Black
        Wheat          Black
        Maize          Black
        initial        Black
        Early Wheat    Black
      Arcs:
        {Conditions=[[Manager].Script.CanHarvestWheat], Actions=[[Manager].Script.HarvestCrop("Wheat");], SourceName=Wheat, DestinationName=summer fallow, Name=Arc 1}
        {Conditions=[[Manager].Script.CanSowMaize, [Manager].Script.daysSinceLastHarvest_gt_180], Actions=[[Manager].Script.SowCrop("Maize");], SourceName=summer fallow, DestinationName=Maize, Name=Arc 2}
        {Conditions=[[Manager].Script.CanHarvestMaize], Actions=[[Manager].Script.HarvestCrop("Maize");], SourceName=Maize, DestinationName=initial, Name=Arc 3}
        {Conditions=[[Manager].Script.CanSowWheat, [Manager].Script.AreaPlantedOk("Wheat")], Actions=[[Manager].Script.SowCrop("Wheat");], SourceName=initial, DestinationName=Wheat, Name=Arc 4}
        {Conditions=[[Manager].Script.CanSowEarlyWheat, [Manager].Script.AreaPlantedOk("Early Wheat")], Actions=[[Manager].Script.SowCrop("Early Wheat");], SourceName=initial, DestinationName=Early Wheat, Name=Arc 5}
        {Conditions=[[Manager].Script.CanHarvestEarlyWheat], Actions=[[Manager].Script.HarvestCrop("Early Wheat");], SourceName=Early Wheat, DestinationName=summer fallow, Name=Arc 6}
      RotationRugplot: CurrentPaddockString=[Manager].Script.currentPaddock
    Report TransitionReport: EventNames=[RotationManager].Transition
      VariableNames:
        [Clock].Today
        [Clock].Today.DayOfYear
        [Manager].Script.CurrentState as CurrentState
