Simulations: Version=159
  DataStore
  Simulation Base
    Clock: Start=1972-01-01; End=1974-12-31
    Weather: FileName=%root%\Tests\WeatherFiles\Ruakura.met
    SoilArbitrator Soil Arbitrator
    Summary
    Manager ManageGriddedPaddock
      Verbose = False
      StockingRate = 2.25
      Num1HaPaddocks = 25
      SilageNConc = 2.75
      SilageMEConc = 11
      ForageType = P025
      UrinationsPerHead = 11
      AdjustVolme = False
      patchMargin = 0.1
      UrineReturnPattern = PseudoRandom
      NumPatches = 3
      SuppressPatchCreationMessages = True
      GeneralFertAmt = 100
      GeneralFertType = NoWinter
      SendPatchesToSummary = True
      ListOfPatches =
      ListOfDepths =
      ListOfAmounts =
      DepositionsPerGrid =
      NumPatchesForUrine = 0
      AreaUrinePatchesToday = 0
      AmountUrineNReturned = 0
      StockingDensity = 0
      LoadAdjustmentPropOverall = 0
      LoadAdjustmentGrammesIndividual = 0
      AverageUrineDepth = 0
      UrineNReturned = 0
      SilageMade = 0
      SilageFed = 0
      SilageNFed = 0
      SilageMEFed = 0
      HerdMEDemand = 0
      CowMEDemand = 0
      CowDMIntake = 0
      CowState =
```csharp
using System.Linq;
using Models.Soils.NutrientPatching;
using System.Diagnostics;
using APSIM.Shared.Utilities;
using Models;
using Models.AgPasture;
using Models.Surface;
using Models.WaterModel;
using Models.Soils;
using Models.Interfaces;
using System;
using System.Collections.Generic;
using Models.Core;

namespace Models
{
    [Serializable]
    [System.Xml.Serialization.XmlInclude(typeof(Model))]
    public class ManageGriddedPaddockScript : Model
    {
        [Link] Simulation simulation;
        [Link] Clock clock;
        [Link] Fertiliser fertiliser;
        [Link] WaterBalance soilWater;
        [Link] SurfaceOrganicMatter surfaceOrganicMatter;
        [Link] INutrientPatchManager patchManager;

        // --------------- Privates ---------------------------------

        private double CowBodyWeight = 450.0;
        // kg
        private string CowDateCalving = "1-aug";
        private string CowDateInCalf = "1-nov";
        private string CowDateDryOff = "30-apr";
        private double CowMSPerDay = 0.0;
        // kgMS/day/head
        private double CowMSEnergyPerKg = 77.0;
        // MJME/kg MS (trying 77 c.f. 80)
        private double CowWalkingDist = 3.0;
        private double CowWalkingEnergyPerKm = 2.0;
        // MJME/km
        private double[] CowN2BodyPerc = { 30.0, 10.0 };
        // Percent N in intake to body and product for milking and dry
        private double[] CowN2UrinePerc = { 42.0, 54.0 };
        // Percent N in intake to uriney and product for milking and dry
        private double[] CowN2DungPerc = { 28.0, 36.0 };
        // Percent N in intake to dung and product for milking and dry
        private double[] LactationCurveParam = { 20.0, 0.2, -0.04, 0.092 };
        // Parameters for the lactation curve, last parm 0.113 will give 500 kg MS, 0.092 will give 406 kg MS
        private double WeeksBeforeCalving = 0.0;
        private double LactationWeek = 0.0;
        private double UrineDepth = 0;
                

        //private double[] CowPregnancyParam = {54.59, -0.135}; // multiplier and exponential parameters for pregnancy energy (25 kg calf), time in weeks before
        //private double[] CowPregnancyParam = {63.931, -0.139}; // multiplier and exponential parameters for pregnancy energy (30 kg calf), time in weeks before
        private double[] CowPregnancyParam = { 72.154, -0.143 };

        // multiplier and exponential parameters for pregnancy energy (35 kg calf), time in weeks before
        //private double[] CowPregnancyParam = {76.208, -0.142}; // multiplier and exponential parameters for pregnancy energy (40 kg calf), time in weeks before
   
        private double CowMaintME = 54.0;
        // MJME/day https://www.dairynz.co.nz/media/5789573/facts_and_figures_web_chapter4_cow_feed_requirements.pdf page 4 450- kg cow

        private int PatchNumForUrine = -1;
        private double AmountDungCReturned = 0.0;
        private double iniOrgC;
        private double iniOrgN;
        private double[] UrineDepthPlacement;
        private double myResidual;
        bool GrazeNow = false;

	    [NonSerialized]
        Random rndConstSeed = new Random((int)666);
        // constand-seed random number for the pseudo-random return pattern
	    [NonSerialized]
        Random rndRandom = new Random();
        // random-seed random number generator for the random return pattern

        double[] ArrayLoad;
        double[] ArrayArea;
   
        double[] ArrayDepth;
        double[] ArrayVol;
        double slopeVolWithLoad;
        double incrWaterContent = 0.05;
        // increase in volumetric water content - used ot calculate depth


        // --------------- Enumerated types ---------------------------------

        public enum ForageTypeEnum
        {
            P000,
            P025,
            P050,
            P075,
            P100
        }

        public enum UrineReturnEnum
        {
            UniformAcrossAllPatches,
            RotatingInOrder,
            Random,
            PseudoRandom
        }

        public enum GeneralFertTypeEnum
        {
            AllYear,
            NoWinter,
            Monthly
        }

        // --------------- Parameters --------------------------------------

        [Description("Verbose output?")]
        public bool Verbose { get; set; }

        [Separator("Herd and ME demand information")]

        // excreta return parameters
        [Description("Stocking rate (animals/ha)")]
        [Units("cows/ha")]
        public double StockingRate { get; set; }

        [Description("Number of paddocks on the farm")]
        [Units("days")]
        public int Num1HaPaddocks { get; set; }

        [Description("N concentration of the silage fed out (% N in DM)")]
        [Units("kgN/kgDM")]
        public double SilageNConc { get; set; }

        [Description("ME concentration of the silage fed out (MJ ME / kg DM)")]
        [Units("MJME/kgDM")]
        public double SilageMEConc { get; set; }

        [Separator("Excreta return parameters")]

        [Description("Is the forage WithPlantain or NoPlantain?")]
        public ForageTypeEnum ForageType { get; set; }

        [Description("Number of urinations per animal per day")]
        public double UrinationsPerHead { get; set; }

        [Description("Adjust the urine volume and depth with N load scaling?")]
        public bool AdjustVolme { get; set; }

        [Description("Size of the edge effect (m)")]
        [Units("m")]
        public double patchMargin { get; set; }

        [Separator("Patch characteristics")]

        [Description("Pattern for urine N return (PseudoRandom uses a constant seed to all for repeatable simulations)")]
        public UrineReturnEnum UrineReturnPattern { get; set; }

        // how the urine is returned to the soil
        [Description("How many patches should there be in the grid?")]
        public int NumPatches { get; set; }

        [Description("Suppress the intial patch creation messages to the summary file? yes is reccomended for large numbers of patches")]
        public bool SuppressPatchCreationMessages { get; set; }

        [Separator("Fertiliser management")]

        [Description("Annual amount of urea-N fertiliser to apply (kg N /ha) - application on the 1st of the month")]
        [Units("kgN/ha/yr")]
        public double GeneralFertAmt { get; set; }

        [Description("Apply fertiliser all year or not in winter (May, June, July)?")]
        public GeneralFertTypeEnum GeneralFertType { get; set; }

        [Description("Send the list of patches to the summary file?")]
        public bool SendPatchesToSummary { get; set; }
   
        // --------------------------- Outputs -------------------------------------------

        ///<summary>A list (string) of patch numbers that the urine is returned to today using "|" as a seperator</summary>
        public string ListOfPatches { get; set; }

        public string ListOfDepths { get; set; }
        public string ListOfAmounts { get; set; }
        public string DepositionsPerGrid { get; set; }
        public int NumPatchesForUrine { get; set; }

        [Units("m2")]
        public double AreaUrinePatchesToday { get; set; }

        [Units("kgN/ha")]
        public double AmountUrineNReturned { get; set; }

        [Units("head/ha")]
        public double StockingDensity { get; set; }

        public double LoadAdjustmentPropOverall { get; set; }

        public double LoadAdjustmentGrammesIndividual { get; set; }

        [Units("mm")]
        public double AverageUrineDepth { get; set; }
   
        [Units("kgN/ha")]
        public double UrineNReturned { get; set; }

        public double SilageMade { get; set; }
        public double SilageFed { get; set; }
        public double SilageNFed { get; set; }
        public double SilageMEFed { get; set; }
        public double HerdMEDemand { get; set; }
        public double CowMEDemand { get; set; }
        public double CowDMIntake { get; set; }
        public string CowState { get; set; }


        // --------------------------- Methods -------------------------------------------
    
        /// <summary>Invoked when simulation starts.</summary>
        /// <param name="sender">The sender of the event.</param>
        /// <param name="e">The event arguments.</param>
        [EventSubscribe("StartOfSimulation")]
        private void OnStartOfSimulation(object sender, EventArgs e)
        {
            //Debugger.Break();
            rndRandom = new Random();
            rndConstSeed = new Random(666);
            CowState = "Dry-Pregnant";
            if (Verbose)
                Console.WriteLine("Initialising the Manager for grazing, urine return and reporting");
      
            if (ForageType == ForageTypeEnum.P000)
            {
                ArrayLoad = new double[] { 5.4, 5.413, 5.53, 5.593, 5.598, 5.608, 5.644, 5.649, 5.654, 5.664, 5.676, 5.685, 5.692, 5.702, 5.706, 5.717, 5.731, 5.732, 5.744, 5.754, 5.763, 5.783, 5.818, 5.82, 5.827, 5.843, 5.851, 5.852, 5.875, 5.89, 5.894, 5.912, 5.936, 5.938, 5.943, 5.947, 5.953, 5.9
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                ArrayVol = new double[] { 1.258, 1.216, 1.165, 1.293, 1.371, 1.127, 1.204, 1.168, 1.154, 1.128, 1.172, 1.247, 1.227, 1.114, 1.402, 1.464, 1.159, 1.165, 1.213, 1.215, 1.152, 1.337, 1.463, 1.211, 1.226, 1.335, 1.364, 1.23, 1.543, 1.124, 1.591, 1.519, 1.127, 1.522, 1.233, 1.381, 1.262, 
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                if (AdjustVolme)
                    slopeVolWithLoad = 0.119;
                else
                    slopeVolWithLoad = 0.0;
            }
            else if (ForageType == ForageTypeEnum.P025)
            {
                ArrayLoad = new double[] { 3.319, 3.393, 3.466, 3.592, 3.619, 3.679, 3.713, 3.722, 3.745, 3.801, 3.83, 3.881, 3.911, 3.936, 3.953, 3.98, 4.003, 4.031, 4.062, 4.083, 4.11, 4.121, 4.137, 4.143, 4.16, 4.228, 4.235, 4.251, 4.276, 4.313, 4.34, 4.358, 4.368, 4.384, 4.388, 4.411, 4.428, 4.4
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                ArrayVol = new double[] { 1.354, 1.457, 1.184, 1.444, 1.222, 1.11, 1.213, 1.132, 1.202, 1.387, 1.151, 1.122, 1.394, 1.836, 1.85, 1.401, 1.31, 1.161, 1.335, 1.245, 1.351, 1.551, 1.329, 1.484, 1.159, 1.191, 1.561, 1.727, 1.52, 1.367, 1.421, 1.923, 1.43, 1.811, 2.043, 1.73, 1.656, 1.581
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                if (AdjustVolme)
                    slopeVolWithLoad = 0.116;
                else
                    slopeVolWithLoad = 0.0;
            }
            else if (ForageType == ForageTypeEnum.P050)
            {
                ArrayLoad = new double[] { 3.261, 3.319, 3.358, 3.393, 3.451, 3.466, 3.552, 3.592, 3.595, 3.619, 3.671, 3.679, 3.69, 3.713, 3.716, 3.722, 3.727, 3.745, 3.77, 3.801, 3.825, 3.83, 3.847, 3.881, 3.894, 3.911, 3.921, 3.936, 3.943, 3.953, 3.959, 3.98, 3.988, 4.003, 4.018, 4.031, 4.041, 4.
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                ArrayVol = new double[] { 1.319, 1.354, 1.429, 1.457, 1.292, 1.184, 1.125, 1.444, 1.254, 1.222, 1.134, 1.11, 1.677, 1.213, 1.327, 1.132, 1.107, 1.202, 1.375, 1.387, 1.672, 1.151, 1.423, 1.122, 1.485, 1.394, 1.248, 1.836, 1.422, 1.85, 1.521, 1.401, 1.32, 1.31, 1.876, 1.161, 1.371, 1.3
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                if (AdjustVolme)
                    slopeVolWithLoad = 0.128;
                else
                    slopeVolWithLoad = 0.0;
            }
            else if (ForageType == ForageTypeEnum.P075)
            {
                ArrayLoad = new double[] { 3.261, 3.295, 3.319, 3.358, 3.376, 3.393, 3.451, 3.457, 3.466, 3.552, 3.583, 3.592, 3.595, 3.603, 3.619, 3.671, 3.675, 3.679, 3.69, 3.702, 3.713, 3.716, 3.722, 3.722, 3.727, 3.743, 3.745, 3.77, 3.791, 3.801, 3.825, 3.826, 3.83, 3.847, 3.868, 3.881, 3.894, 3
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                ArrayVol = new double[] { 1.319, 1.272, 1.354, 1.429, 1.119, 1.457, 1.292, 1.185, 1.184, 1.125, 1.61, 1.444, 1.254, 1.623, 1.222, 1.134, 1.62, 1.11, 1.677, 1.373, 1.213, 1.327, 1.413, 1.132, 1.107, 1.497, 1.202, 1.375, 1.233, 1.387, 1.672, 1.367, 1.151, 1.423, 1.731, 1.122, 1.485, 1.
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                if (AdjustVolme)
                    slopeVolWithLoad = 0.158;
                else
                    slopeVolWithLoad = 0.0;
            }
            else if (ForageType == ForageTypeEnum.P100)
            {
                ArrayLoad = new double[] { 3.241, 3.261, 3.295, 3.319, 3.353, 3.358, 3.376, 3.393, 3.45, 3.451, 3.457, 3.466, 3.543, 3.552, 3.583, 3.592, 3.592, 3.595, 3.603, 3.619, 3.634, 3.671, 3.675, 3.679, 3.683, 3.69, 3.702, 3.713, 3.716, 3.716, 3.722, 3.722, 3.723, 3.727, 3.743, 3.745, 3.752, 
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                ArrayVol = new double[] { 1.232, 1.319, 1.272, 1.354, 1.183, 1.429, 1.119, 1.457, 1.141, 1.292, 1.185, 1.184, 1.401, 1.125, 1.61, 1.444, 1.152, 1.254, 1.623, 1.222, 1.354, 1.134, 1.62, 1.11, 1.095, 1.677, 1.373, 1.213, 1.375, 1.327, 1.413, 1.132, 1.653, 1.107, 1.497, 1.202, 1.568, 1.
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                if (AdjustVolme)
                    slopeVolWithLoad = 0.224;
                else
                    slopeVolWithLoad = 0.0;
            }
            else
                throw new Exception("Invalid forage type");
      
            if (Verbose)
                Console.WriteLine("Finished initialising the Manager for grazing, urine return and reporting");
        }

        /// <summary>Invoked by clock to do management actions.</summary>
        /// <param name="sender">The sender of the event.</param>
        /// <param name="e">The event arguments.</param>
        [EventSubscribe("DoManagement")]
        private void OnDoManagement(object sender, EventArgs e)
        {
            // if this is the start of the simulation then sort out the depth for the urine placement, can't do this in initialisation because of the module order
            if (clock.Today == clock.StartDate)
            {
                CalcUrinePlacementDepth();   // calculate the layer weighting for the urine depth deposition
                patchManager.MaximumNitrogenAvailableToPlants = 3.0;  // user can change this but this value reccomneded after testing
                patchManager.NPartitionApproach = PartitionApproachEnum.BasedOnConcentrationAndDelta;

                // in a gridded patchy paddock the patches are created at the start of the simulation and stay there throughout - no amalgamation
                patchManager.AutoAmalgamationApproach = AutoAmalgamationApproachEnum.None;

                patchManager.basePatchApproach = BaseApproachEnum.IDBased;
        
                patchManager.AllowPatchAmalgamationByAge = false;   // in a gridded patchy paddock the patches are created at the start of the simulation and stay there throughout - no amalgamation
                patchManager.PatchAgeForForcedMerge = 3.0;
                //patchManager.allowNewPools = true;               // this changes the calculation of soluble carbon for denitrification to use only the active pools (sometimes needed to prevent excessive denitrifciation when N from urine patches gets deep in the soil where all the carbon is inactive)
  
                int[] PatchToAddTo = new int[1];  //need an array variable for this
                string[] PatchNmToAddTo = new string[1];
                int nPatchesAdded = 0;
                double NewArea = 1.0 / NumPatches;

                while (nPatchesAdded < NumPatches - 1)
                {
                    AddSoilCNPatchType NewPatch = new AddSoilCNPatchType();
                    NewPatch.DepositionType = DepositionTypeEnum.ToNewPatch;
                    NewPatch.AreaFraction = NewArea;
                    PatchToAddTo[0] = 0;
                    PatchNmToAddTo[0] = "0";
                    NewPatch.AffectedPatches_id = PatchToAddTo;
                    NewPatch.AffectedPatches_nm = PatchNmToAddTo;
                    NewPatch.SuppressMessages = SuppressPatchCreationMessages;
                    patchManager.Add(NewPatch);
                    nPatchesAdded += 1;
                }
            }
         
            SilageMade = 0.0;
            SilageFed = 0.0;
            SilageNFed = 0.0;
            SilageMEFed = 0.0;
      
            UrineNReturned = 0.0;
            ListOfPatches = "|";
            ListOfDepths = "|";
            ListOfAmounts = "|";
            DepositionsPerGrid = "|";
            AreaUrinePatchesToday = 0.0;
            NumPatchesForUrine = 0;
            //UrinePatchLoad = 0.0;
            StockingDensity = /*DaysPerGrazeArray[Clock.month - 1] * */ Num1HaPaddocks * StockingRate;

            DoCowStuff();

            if ((GeneralFertAmt > 0.0) && (clock.Today.Day == 1))
            {
                DoFertiliser();
            }

        }

        /// <summary>Invoked when a graze occurs.</summary>
        /// <param name="sender">The sender of the event.</param>
        /// <param name="e">The event arguments.</param>
        [EventSubscribe("DoUrineReturn")]
        private void OnDoUrineReturn(object sender, SimpleGrazing.UrineReturnType urineReturn)
        {
            CowDMIntake = urineReturn.GrazedDM / StockingDensity;
            // calculate the number of patches based on the patch size and the /cow pasture amount of 15 kg DM /cow /day and 12 urine patchs per cow per day * 0.25 m2 /patch
         
         
            int NumUrinations = Convert.ToInt32(UrinationsPerHead * StockingDensity);  // this gives the number of samples from the array
            int[] MySamples = new int[NumUrinations];  // this will hold the indicies of the samples
            double randomSampleSumLoad = 0.0;
            for (int i = 0; i < NumUrinations; i++)
            {
                MySamples[i] = rndConstSeed.Next(0, 3333);  // supplied 3334 samples from the distribution
                //MySamples[i] = rndRandom.Next(0, 3333);  // supplied 3334 samples from the distribution
                randomSampleSumLoad += ArrayLoad[MySamples[i]] / 1000;  // to put this into kg
            }
            Array.Sort(MySamples);  // sort MySamples into increasing order - that will also cause a sort for increasing Load
            ListOfPatches = "|";
            ListOfDepths = "|";
            ListOfAmounts = "|";
            DepositionsPerGrid = "|";
            AmountUrineNReturned = urineReturn.Amount;
            LoadAdjustmentPropOverall = AmountUrineNReturned / randomSampleSumLoad;
            AverageUrineDepth = 0.0;
         
            bool testMoreUrineToApply = true;
            int indexMySamples = -1;

            while (testMoreUrineToApply)
            {
                bool testAggregation = true;  // jump out of the aggregation (i.e. go to the next grid
                double tmpLoad = 0.0;
                double tmpArea = 0.0;
                double tmpDepth = 0.0;
                int tempNum2Agg = 0;

                PatchNumForUrine = rndConstSeed.Next(0, NumPatches);  //gets the value for PatchNumForUrine
                ListOfPatches += (PatchNumForUrine + 1) + "|";  // add 1 here because the output component uses 1-based rather than 0-based arrays
        
                int[] PatchToAddTo = new int[1];  //need an array variable for this
                string[] PatchNameToAddTo = new string[1];
                double[] UreaToAdd = new double[soilWater.Thickness.Length];  

                //Console.WriteLine(Clock.Today + " up to 2");
                while (testAggregation)
                {
                    indexMySamples += 1;  // index of the individual samples
                    tempNum2Agg += 1;

                    //Console.WriteLine(Clock.Today + " up to 3 " + indexMySamples + " " + NumUrinations + " " + MySamples.Length);
                    //Console.WriteLine(Clock.Today + " up to 3 " + indexMySamples + " " + MySamples[indexMySamples]);
                    //Console.WriteLine(Clock.Today + " up to 3 " + indexMySamples + " " + MySamples[indexMySamples] + " " + ArrayDepth[MySamples[indexMySamples]]);

                    double thisPatchLoad = (ArrayLoad[MySamples[indexMySamples]]);  // result is in g N
                    double LoadAdjustmentGrammesIndividual = (thisPatchLoad * LoadAdjustmentPropOverall - thisPatchLoad) * slopeVolWithLoad; // result is in L and is the additional L in volume

                    double thisPatchVolumeAdjusted = Math.Max(1.0, (ArrayVol[MySamples[indexMySamples]] + LoadAdjustmentGrammesIndividual));
                    double WettedAreaCm2 = 1349.8 * Math.Log(thisPatchVolumeAdjusted) + 1034.8;
                    //Console.WriteLine("thisPatchVolumeAdjusted " + thisPatchVolumeAdjusted + " Math.Log(thisPatchVolumeAdjusted) " + Math.Log(thisPatchVolumeAdjusted));

                    double WettedRadiusM = Math.Sqrt(WettedAreaCm2 / Math.PI) / 100;
                    double AffectedAreaM2 = (WettedRadiusM + patchMargin) * (WettedRadiusM + patchMargin) * Math.PI;
           
                    //Console.WriteLine("incrWaterContent " + incrWaterContent +  "WettedRadiusM " + WettedRadiusM );
           
                    UrineDepth = (thisPatchVolumeAdjusted / 1000 / incrWaterContent) / (WettedRadiusM * WettedRadiusM * Math.PI) * 1000; // now in mm
                    AverageUrineDepth += UrineDepth / NumUrinations;

                    //Console.WriteLine("UrineDepth " + UrineDepth + " thisPatchVolumeAdjusted " + thisPatchVolumeAdjusted + " thisPatchLoad " + thisPatchLoad + " thisPatchLoadAdjusted " + (thisPatchLoad * LoadAdjustmentPropOverall));
                    //UrineDepth = ArrayDepth[MySamples[indexMySamples]];
                    CalcUrinePlacementDepth();
           
                    for (int ii = 0; ii <= (soilWater.Thickness.Length - 1); ii++)
                        UreaToAdd[ii] += UrineDepthPlacement[ii] * ((ArrayLoad[MySamples[indexMySamples]] / 1000 * (AmountUrineNReturned / randomSampleSumLoad)) / (10000.0 / NumPatches) * 10000);   // the first /1000 is to convert g load to kg// need ot make depth dynamic
                    UrineNReturned += (ArrayLoad[MySamples[indexMySamples]] / 1000) * LoadAdjustmentPropOverall;

                    //Console.WriteLine(Clock.Today + " up to 4");

                    /*AddSoilCNPatchType CurrentPatch = new AddSoilCNPatchType();
                    CurrentPatch.Sender = "manager";
                    CurrentPatch.DepositionType = "ToSpecificPatch";
                    PatchToAddTo[0] = PatchNumForUrine;
                    CurrentPatch.AffectedPatches_id = PatchToAddTo;
                    CurrentPatch.Urea = UreaToAdd;
                    AddSoilCNPatch.Invoke(CurrentPatch); */

                    if (Verbose)
                        Console.WriteLine("For sample " + indexMySamples + " returned " + (ArrayLoad[MySamples[indexMySamples]] / 1000) + " kg urine N to patch " + PatchNumForUrine);
           
                    tmpArea += AffectedAreaM2;
                    double testArea = 0.0;
                    //Console.WriteLine(Clock.Today + " up to 5c");

                    if (indexMySamples >= (NumUrinations - 1))
                        testArea = 20000.0; // a large area to force a final deposition
                    else
                    {
                        //Console.WriteLine(Clock.Today + " up to 5c "  + " tmpArea " + tmpArea + " NumUrinations -1  " + (NumUrinations -1)  );
              
                        //testArea = (tmpArea + tmpArea + ArrayArea[MySamples[indexMySamples + 1]]) / 2.0; 
                        testArea = (tmpArea + (tmpArea + AffectedAreaM2)) / 2.0; 
                    }
                    //Console.WriteLine(Clock.Today + " up to 6");

                    if (testArea > (10000.0 / NumPatches))  // i.e. stop this aggregation and move to a new grid
                    {
                        NumPatchesForUrine += 1;
                        testAggregation = false; // so jump out of this loop
                    }
           
                    //Console.WriteLine(Clock.Today + " up to 7");

                } // end of the while (testAggregation)
        
                //Console.WriteLine(Clock.Today + "8 existed aggregation loop and about add up UreaToAdd");
                double tempNReturned = 0.0;
                for (int ii = 0; ii <= (soilWater.Thickness.Length - 1); ii++)
                    tempNReturned += UreaToAdd[ii];

                //Console.WriteLine(Clock.Today + "9 adding to list of amounts, tempNReturned and UrineDepth are " + tempNReturned + " and " + UrineDepth);
                ListOfAmounts += Convert.ToInt32(tempNReturned) + "|";
                //Console.WriteLine(Clock.Today + "10");
                ListOfDepths += Convert.ToInt32(UrineDepth) + "|"; //mmm
                //Console.WriteLine(Clock.Today + "11");
                DepositionsPerGrid += tempNum2Agg + "|"; //mmm
                //Console.WriteLine(Clock.Today + "12");
        

        
                AddSoilCNPatchType CurrentPatch = new AddSoilCNPatchType();
                CurrentPatch.Sender = "manager";
                CurrentPatch.DepositionType = DepositionTypeEnum.ToSpecificPatch;
                PatchToAddTo[0] = PatchNumForUrine;
                PatchNameToAddTo[0] = PatchNumForUrine.ToString();
                CurrentPatch.AffectedPatches_id = PatchToAddTo;
                CurrentPatch.AffectedPatches_nm = PatchNameToAddTo;
                CurrentPatch.Urea = UreaToAdd;
                patchManager.Add(CurrentPatch);

                if (indexMySamples >= (NumUrinations - 1))
                {
                    testMoreUrineToApply = false;
                }
            } // end of the while (testMoreUrineToApply)
         
            //AreaUrinePatchesToday = UrinationsPerHead * SingleUrinePatchArea * StockingDensity;
            //double AreaSingleGPPatch = 10000.0 / NumPatches; // units are m2
            //NumPatchesForUrine = Math.Max(1, Convert.ToInt32(AreaUrinePatchesToday / AreaSingleGPPatch));
            //double UrineNPerPatch = AmountUrineNReturned / NumPatchesForUrine; // units are kg N /patch
            //UrinePatchLoad = (UrineNReturned / AreaSingleGPPatch * 10000);

            if (Verbose)  // this needs updating
            {
                Console.WriteLine("Grazing urine return summary:");
                //Console.WriteLine("    Pasture Grazed          :   " + Grazed);
                //Console.WriteLine("    Number of cows          :   " + (Grazed / 15.0));
                //Console.WriteLine("    Number of urine patches :   " + (Grazed / 15.0 * 12.0));
                //Console.WriteLine("    Number of GP patches    :   " + NumPatchesForUrine);
                //Console.WriteLine("    Urine N per patch       :   " + UrineNPerPatch + " in kg N / patch");
                //Console.WriteLine("    Urine N per patch       :   " + (UrineNPerPatch / AreaSingleGPPatch * 10000) + " in kg N / ha within patch");
                Console.WriteLine("");
                Console.WriteLine("The amount of urine N to be returned to the whole paddock is " + AmountUrineNReturned);
            }            
            if (SendPatchesToSummary)
            {
                Console.WriteLine(clock.Today + ", ListOfPatches, returned urine to " + NumPatchesForUrine + " patches, these being: " + ListOfPatches);
                Console.WriteLine(clock.Today + ", ListOfDepths, for the above " + NumPatchesForUrine + " patches, was : " + ListOfDepths);
                Console.WriteLine(clock.Today + ", ListOfAmounts, for the above " + NumPatchesForUrine + " patches, was : " + ListOfAmounts);
                Console.WriteLine(clock.Today + ", DepositionsPerGrid, for the above " + NumPatchesForUrine + " patches, was : " + DepositionsPerGrid);
            }
    
            //DoUrineReturnGP();  // all this is above now

            if (Verbose)
                Console.WriteLine("Finished grazing");

        }


        private void CalcUrinePlacementDepth()
        {
            // calculates what proportion of the urinary N to put in each layer of the soil
      
            foreach (Zone Paddock in simulation.FindAllChildren<Zone>().OfType<IModel>().ToList())
            {
                var SoilWater = (WaterBalance)Paddock.FindInScope<WaterBalance>();
                double tempDepth = 0.0;
                UrineDepthPlacement = new double[SoilWater.Thickness.Length];
                for (int i = 0; i <= (SoilWater.Thickness.Length - 1); i++)
                {
                    tempDepth += SoilWater.Thickness[i];
                    if (tempDepth <= UrineDepth)
                    {
                        UrineDepthPlacement[i] = SoilWater.Thickness[i] / UrineDepth;
                    }
                    else
                    {
                        UrineDepthPlacement[i] = (UrineDepth - (tempDepth - SoilWater.Thickness[i])) / (tempDepth - (tempDepth - SoilWater.Thickness[i])) * SoilWater.Thickness[i] / UrineDepth;
                        UrineDepthPlacement[i] = Math.Max(0.0, Math.Min(1.0, UrineDepthPlacement[i]));
                    }
                    if (Verbose)
                        Console.WriteLine("The proportion of urinary-N deposited into the " + i + "th layer will be " + UrineDepthPlacement[i]);
                }
            }

        }
        // this is the end of CalcUrinePlacementDepth

        private void GetPatchForUrineReturn()
        {
            if (UrineReturnPattern == UrineReturnEnum.UniformAcrossAllPatches)
                PatchNumForUrine = 0;
            else if (UrineReturnPattern == UrineReturnEnum.RotatingInOrder)
            {
                PatchNumForUrine += 1;  //increment the patch number
                if (PatchNumForUrine >= NumPatches)
                    PatchNumForUrine = 0;  // but reset back to the first patch if needed
                if (Verbose)
                    Console.WriteLine("The patch for urine return is " + PatchNumForUrine);
            }
            if (UrineReturnPattern == UrineReturnEnum.Random)
            {
                PatchNumForUrine = rndRandom.Next(0, NumPatches);
                if (Verbose)
                    Console.WriteLine("The next random number patch for urine return is " + PatchNumForUrine);
            }
            else if (UrineReturnPattern == UrineReturnEnum.PseudoRandom)
            {
                PatchNumForUrine = rndConstSeed.Next(0, NumPatches);
                if (Verbose)
                    Console.WriteLine("The next pseudo-random number patch for urine return is " + PatchNumForUrine);
            }
        }


        private void DoUrineReturnGP()
        {
            ListOfPatches = "|";
            ListOfDepths = "|";
            ListOfAmounts = "|";
            DepositionsPerGrid = "|";
            double UrineNPerPatch = AmountUrineNReturned / NumPatchesForUrine; // units are kg N /patch
         
            for (int j = 0; j < NumPatchesForUrine; j++)
            {
                GetPatchForUrineReturn();  //gets the value for PatchNumForUrine
                ListOfPatches += (PatchNumForUrine + 1) + "|";  // add 1 here because the output component uses 1-based rather than 0-based arrays
            
                int[] PatchToAddTo = new int[1];  //need an array variable for this
                double[] UreaToAdd = new double[soilWater.Thickness.Length];  

                for (int ii = 0; ii <= (soilWater.Thickness.Length - 1); ii++)
                    UreaToAdd[ii] = UrineDepthPlacement[ii] * (UrineNPerPatch / (10000.0 / NumPatches) * 10000);

                UrineNReturned += AmountUrineNReturned / NumPatchesForUrine;
         
                AddSoilCNPatchType CurrentPatch = new AddSoilCNPatchType();
                CurrentPatch.Sender = "manager";
                CurrentPatch.DepositionType = DepositionTypeEnum.ToSpecificPatch;
                PatchToAddTo[0] = PatchNumForUrine;
                CurrentPatch.AffectedPatches_id = PatchToAddTo;
                CurrentPatch.Urea = UreaToAdd;
      
                patchManager.Add(CurrentPatch);
            }
            // decided to leave the trailing "|" on the string because a single patch would be treated as a double by the output component
            // ListOfPatches = ListOfPatches.Substring(0, (ListOfPatches.Length - 1)); 
            if (Verbose)
                Console.WriteLine("Returned urine to " + NumPatchesForUrine + " patches, these being: " + ListOfPatches);     
        }

   
        private void DoFertiliser()
        {
            bool ApplyFert = false; // the test for first day of the month has already been done, this will only test to make sure no fertiliser in winter etc
            double NumMonths;
      
            if (GeneralFertType == GeneralFertTypeEnum.Monthly)
            {
                NumMonths = 12;
                ApplyFert = true;
            }
            else if (GeneralFertType == GeneralFertTypeEnum.NoWinter)
            {
                NumMonths = 9;
                if ((clock.Today.Month < 5) || (clock.Today.Month > 7))
                    ApplyFert = true;
                else
                    ApplyFert = false;
            }
            else
                throw new Exception("Wrong fertiliser setting");

            if (ApplyFert)
            {
                foreach (Zone Paddock in simulation.FindAllChildren<Zone>().OfType<IModel>().ToList())
                {
                    var fertiliser = (Fertiliser)Paddock.FindInScope<Fertiliser>();
                    fertiliser.Apply(GeneralFertAmt / NumMonths, Fertiliser.Types.UreaN);
                    if (Verbose)
                        Console.WriteLine("Applying " + (GeneralFertAmt / NumMonths) + " kg of fertiliser to the whole paddock");
                }
            }
        }
        private void DoCowStuff()
        {
            if (DateUtilities.CompareDates(CowDateCalving, clock.Today) > 0)
                WeeksBeforeCalving = (DateUtilities.GetDate(CowDateCalving, (clock.Today.Year + 1)) - clock.Today).TotalDays / 7.0;
            else
                WeeksBeforeCalving = (DateUtilities.GetDate(CowDateCalving, clock.Today.Year) - clock.Today).TotalDays / 7.0;


            if (DateUtilities.CompareDates(CowDateCalving, clock.Today) <= 0)
                LactationWeek = (clock.Today - DateUtilities.GetDate(CowDateCalving, (clock.Today.Year - 1))).TotalDays / 7.0;
            else
                LactationWeek = (clock.Today - DateUtilities.GetDate(CowDateCalving, (clock.Today.Year))).TotalDays / 7.0;


            // find state
            if (DateUtilities.WithinDates(CowDateCalving, clock.Today, CowDateInCalf))
            {
                CowState = "Milking-Notpreg";
                CowMSPerDay = LactationCurveParam[0] * Math.Pow(LactationWeek, LactationCurveParam[1]) * Math.Exp(LactationCurveParam[2] * LactationWeek) * LactationCurveParam[3];
                //CowMEDemand = 0.0 + 0.0 + CowWalkingDist * CowWalkingEnergyPerKm + CowMSPerDay * CowMSEnergyPerKg;
                CowMEDemand = CowMaintME + 0.0 + CowWalkingDist * CowWalkingEnergyPerKm + CowMSPerDay * CowMSEnergyPerKg;
            }
            else if (DateUtilities.WithinDates(CowDateInCalf, clock.Today, CowDateDryOff))
            {
                CowState = "Milking-Pregnant";
                CowMSPerDay = LactationCurveParam[0] * Math.Pow(LactationWeek, LactationCurveParam[1]) * Math.Exp(LactationCurveParam[2] * LactationWeek) * LactationCurveParam[3];
                //CowMEDemand = 0.0 + (CowPregnancyParam[0] * Math.Exp(CowPregnancyParam[1] * WeeksBeforeCalving)) + CowWalkingDist * CowWalkingEnergyPerKm + CowMSPerDay * CowMSEnergyPerKg;  //=72.154*EXP(-0.143*L3)
                CowMEDemand = CowMaintME + (CowPregnancyParam[0] * Math.Exp(CowPregnancyParam[1] * WeeksBeforeCalving)) + CowWalkingDist * CowWalkingEnergyPerKm + CowMSPerDay * CowMSEnergyPerKg;  //=72.154*EXP(-0.143*L3)
            }
            else if (DateUtilities.WithinDates(CowDateDryOff, clock.Today, CowDateCalving))
            {
                CowState = "Dry-Pregnant";
                CowMSPerDay = 0.0;
                CowMEDemand = CowMaintME + (CowPregnancyParam[0] * Math.Exp(CowPregnancyParam[1] * WeeksBeforeCalving)) + CowWalkingDist * CowWalkingEnergyPerKm + 0.0;  //=72.154*EXP(-0.143*L3)
            }
            else
                throw new Exception("Error in calculating CowState");  

            HerdMEDemand = CowMEDemand * StockingDensity;
            //Console.WriteLine(Clock.Today + " CowState " + CowState + " CowMSPerDay " + CowMSPerDay + " CowMEDemand " + CowMEDemand);

      
        }
    }
}
```
    Manager ReportingWithPatches
      Verbose = False
      OutputModule = [WholePaddock]
      ReportingFreq = OnGrazing
      Site = Ruakura
      SoilName = HE
      Regrowth = 1low
      Sorter = S0
      LocSoilFert = RuaHE100
      DaysSinceReport = 0
      NHA = 0
      PGR = 0
      HerbageGrazed = 0
      HerbageGrazedN = 0
      HerbageGrazedMEConc = 0
      UreaReturned = 0
      Fixation = 0
      LeachN = 0
      Denit = 0
      DenitN2O = 0
      OrgC = 0
      OrgN = 0
      dltOrgC = 0
      dltOrgN = 0
      MinN = 0
      UreaN = 0
      NH4N = 0
      NO3N = 0
      UreaAddedInGrazing = 0
      Drainage600 = 0
      NetSilageImported = 0
      SumSilageMade = 0
      SumSilageFed = 0
      UrinePatchLoad = 0
      Events = 0
      SiteSoil =
      AboveGroundDM = 0
      PatchCount = 0
      z600 = 0
      z300 = 0
```csharp
using System;
using Models.Core;
using Models.Interfaces;
using Models.Soils;
using Models.WaterModel;
using Models.AgPasture;
using System.Linq;
using System.Diagnostics;
using APSIM.Shared.Utilities;
using Models.Soils.Nutrients;
namespace Models
{
    [Serializable]
    [System.Xml.Serialization.XmlInclude(typeof(Model))]
    public class ReportingWithPatchesScript : Model
    {
        [Link] private Simulation simulation;
        [Link] private Clock clock;
        [Link] private ManageGriddedPaddockScript manageGriddedPaddock;
        [Link] private SimpleGrazing simpleGrazing;
        [Link(ByName=true)] private ISolute urea;
        [Link(ByName=true)] private ISolute no3;
        [Link(ByName=true)] private ISolute nh4;


        // --------------- Privates ---------------------------------

        private double iniOrgC;
        private double iniOrgN;
           [NonSerialized] private CNPatchVariableType myPatchNO3 = new CNPatchVariableType();
           [NonSerialized] private CNPatchVariableType myPatchNH4 = new CNPatchVariableType();
        private bool ReportToday = false;

        // --------------- Enumerated types ---------------------------------

        public enum ReportingFrequencyEnum
        {
            Daily,
            TenDaily,
            Monthly,
            Annual,
            OnGrazing
        }

        // --------------- Parameters ---------------------------------

        [Description("Verbose output?")]
        public bool Verbose { get; set; }

        [Description("Name of output component for reporting")]
        [Display(Type = DisplayType.Model, ModelType=typeof(Report))]
        public Report OutputModule { get; set; }

        [Description("Frequency of reporting")]
        public ReportingFrequencyEnum ReportingFreq { get; set; }

        [Description("Location for reporting")]
        public string Site { get; set; }

        [Description("Soil name for reporting")]
        public string SoilName { get; set; }

        [Description("Low (2800) or high (3500) pasture biomasses for grazing")]
        public string Regrowth { get; set; }

        [Description("To make analysing the output easier")]
        public string Sorter { get; set; }

        [Description("For outputing")]
        public string LocSoilFert { get; set; }

        // --------------- Outputs ---------------------------------

        public int DaysSinceReport { get; set; }
        public double NHA { get; set; }
        public double PGR { get; set; }
        public double HerbageGrazed { get; set; }
        public double HerbageGrazedN { get; set; }
        public double HerbageGrazedMEConc { get; set; }
        public double UreaReturned { get; set; }
        public double Fixation { get; set; }
        public double LeachN { get; set; }
        public double Denit { get; set; }
        public double DenitN2O { get; set; }
        public double OrgC { get; set; }
        public double OrgN { get; set; }
        public double dltOrgC { get; set; }
        public double dltOrgN { get; set; }
        public double MinN { get; set; }
        public double UreaN { get; set; }
        public double NH4N { get; set; }
        public double NO3N { get; set; }
        public double UreaAddedInGrazing { get; set; }
        [Units("mm")] public double Drainage600 { get; set; }
        public double NetSilageImported { get; set; }
        public double SumSilageMade { get; set; }
        public double SumSilageFed { get; set; }
        public double UrinePatchLoad { get; set; }
        public int Events { get; set; }
        public string SiteSoil { get; set; }
        public double AboveGroundDM { get; set; }
        public int PatchCount { get; set; }
        public int z600 { get; set; }
        public int z300 { get; set; }
   
      
        /// <summary>Invoked when simulation starts.</summary>
        /// <param name="sender">The sender of the event.</param>
        /// <param name="e">The event arguments.</param>
        [EventSubscribe("StartOfSimulation")]
        private void OnStartOfSimulation(object sender, EventArgs e)
        {
            //Debugger.Break();
              if (Verbose)
                 Console.WriteLine("Initialising the Manager for grazing, urine return and reporting");
      
            DaysSinceReport = 0;

            SiteSoil = Site + SoilName;
            Events = 1;

            if (Verbose)
                Console.WriteLine("Finished initialising the Manager for grazing, urine return and reporting");
        }


        // <summary>Invoked by clock to let us do some calculations.</summary>
        [EventSubscribe("DoManagementCalculations")]
        private void OnDoManagementCalculations(object sender, EventArgs e)
        {
            if (Verbose)
                 Console.WriteLine("In Prepare for the Reporting Manager on " + clock.Today);

            // if this is the start of the simulation then sort out the depth for the urine placement, can't do this in initialisation because of the module order
            if (clock.Today == clock.StartDate)
            {
                iniOrgC = 0.0; 
                iniOrgN = 0.0;
                z300 = 0;
                z600 = 0;

                foreach (Zone paddock in simulation.FindAllChildren<Zone>().OfType<IModel>().ToList())
                {
                    var soilNitrogen = (Nutrient) paddock.FindInScope<Nutrient>();
                    var soilWater = (WaterBalance) paddock.FindInScope<WaterBalance>();

                    double tempDepth = 0.0;

                    for (int ii = 0; ii < soilWater.Thickness.Length; ii++)
                    {
                       iniOrgC += soilNitrogen.TotalC[ii]; 
                       iniOrgN += soilNitrogen.TotalN[ii];
                       tempDepth += soilWater.Thickness[ii];
                       if (tempDepth <= 300)
                          z300 = ii;
                       if (tempDepth <= 600)
                          z600 = ii;
                    }
                }
        }


        if (Verbose)
            Console.WriteLine("Finished Prepare for the Reporting Manager on " + clock.Today);
        }


        // <summary>Invoked by clock to let us do report calculations.</summary>
        [EventSubscribe("DoReportCalculations")]
        private void OnDoReportCalculations(object sender, EventArgs e)
        {
            if (Verbose)
                 Console.WriteLine("In Post for the Reporting Manager on " + clock.Today);

            // should reporting be done today?  
            if (ReportingFreq == ReportingFrequencyEnum.Daily)
                ReportToday = true;
            else if ((ReportingFreq == ReportingFrequencyEnum.TenDaily) && ((clock.Today.Day == 10) || (clock.Today.Day == 20) || (DateUtilities.IsEndOfMonth(clock.Today))))
                ReportToday = true;
            else if ((ReportingFreq == ReportingFrequencyEnum.Monthly) && (DateUtilities.IsEndOfMonth(clock.Today)))
                ReportToday = true;
            else if ((ReportingFreq == ReportingFrequencyEnum.Annual) && (DateUtilities.IsEndOfYear(clock.Today)))
                ReportToday = true;
            else if ((ReportingFreq == ReportingFrequencyEnum.OnGrazing) && (simpleGrazing.GrazedToday))
                ReportToday = true;
            else
                ReportToday = false;

            DaysSinceReport += 1;

            // each day gather data for the accumulations
            foreach (Zone paddock in simulation.FindAllChildren<Zone>().OfType<IModel>().ToList())
            {
                 var sward = paddock.FindAllInScope<PastureSpecies>().OfType<IModel>().ToList().Cast<PastureSpecies>();
                var soilWater = (WaterBalance) paddock.FindInScope<WaterBalance>();
                var nutrient = (Nutrient) paddock.FindInScope<Nutrient>();
                var denitrificationModel = (NFlow) nutrient.FindInScope<NFlow>();

                AboveGroundDM = sward.Sum(species => species.AboveGroundWt);
                NHA += sward.Sum(species => species.HerbageGrowthWt);
                PGR = NHA;  // divide this by the number of days just before reporting
                Fixation += sward.Sum(species => species.FixedN);

                double[] tempArray = soilWater.FlowNO3;
                LeachN += tempArray[soilWater.Thickness.Length - 1];  // only take the deepest element

                tempArray = soilWater.Flux;      
                Drainage600 += tempArray[z600];  //mmm

                for (int ii = 0; ii <= z300; ii++)
                {
                    Denit += denitrificationModel.Value[ii];
                    DenitN2O += nutrient.N2Oatm[ii];
                }
            }  

            // Things that come from other Managers or modules at the current level
            HerbageGrazed += simpleGrazing.GrazedDM;
            HerbageGrazedN += simpleGrazing.GrazedN;
            UreaReturned += manageGriddedPaddock.UrineNReturned;
            if ((manageGriddedPaddock.NumPatchesForUrine * manageGriddedPaddock.NumPatches) > 0)
                UrinePatchLoad = UreaReturned / (double)manageGriddedPaddock.NumPatchesForUrine / (double)manageGriddedPaddock.NumPatches;
            else
                UrinePatchLoad = 0.0;

            SumSilageMade += manageGriddedPaddock.SilageMade;
            SumSilageFed += manageGriddedPaddock.SilageFed;
            NetSilageImported = SumSilageFed - SumSilageMade;

            if (ReportToday)
            {
                OrgC = 0.0;
                OrgN = 0.0;
                UreaN = 0.0;
                NH4N = 0.0;
                NO3N = 0.0;
                MinN = 0.0;

                foreach (Zone paddock in simulation.FindAllChildren<Zone>().OfType<IModel>().ToList())
                {
                     var sward = paddock.FindAllInScope<PastureSpecies>().OfType<IModel>().ToList().Cast<PastureSpecies>();
                    var soilWater = (WaterBalance) paddock.FindInScope<WaterBalance>();
                    var soilNitrogen = (Nutrient) paddock.FindInScope<Nutrient>();

                    for (int ii = 0; ii <= (soilWater.Thickness.Length - 1); ii++)
                    {
                       OrgC += soilNitrogen.TotalC[ii]; 
                       OrgN += soilNitrogen.TotalN[ii];
                       UreaN += urea.kgha[ii];
                       NH4N += nh4.ppm[ii];
                       NO3N += no3.ppm[ii];
                       MinN = UreaN + NH4N + NO3N;
                    }
                    dltOrgC = OrgC - iniOrgC; 
                    dltOrgN = OrgN - iniOrgN;
                    iniOrgC = OrgC; // ready for the next calculation of change in pools
                    iniOrgN = OrgN;
                }

                PGR = NHA / DaysSinceReport;  

                // do the patch outputs here
                OutputModule.DoOutput();

                // now zero the reported variables
                DaysSinceReport = 0;
                HerbageGrazed = 0.0;
                HerbageGrazedN = 0.0;
                DaysSinceReport = 0;
                NHA = 0;
                PGR = 0;
                UreaReturned = 0;
                Fixation = 0;
                LeachN = 0;
                Denit = 0;
                DenitN2O = 0;
                OrgC = 0;
                OrgN = 0;
                MinN = 0;
                UreaN = 0;
                NH4N = 0;
                NO3N = 0;
                Drainage600 = 0.0;
                NetSilageImported = 0.0;
                SumSilageMade = 0.0;
                SumSilageFed = 0.0;
            }
        }
    }
}
```
    Report WholePaddock
      VariableNames:
        [Clock].Today
        [ManageGriddedPaddock].ManageGriddedPaddockScript.NumPatches
        [ReportingWithPatches].ReportingWithPatchesScript.LocSoilFert as LocSoil
        [ManageGriddedPaddock].ManageGriddedPaddockScript.UrinationsPerHead
        [ManageGriddedPaddock].ManageGriddedPaddockScript.ForageType
        [ManageGriddedPaddock].ManageGriddedPaddockScript.patchMargin
        [ManageGriddedPaddock].ManageGriddedPaddockScript.StockingRate
        [ManageGriddedPaddock].ManageGriddedPaddockScript.GeneralFertAmt
        [SimpleGrazing].GrazingInterval
        [SimpleGrazing].PreGrazeDM as PreGrazeDM
        [SimpleGrazing].PostGrazeDM
        [ManageGriddedPaddock].ManageGriddedPaddockScript.HerdMEDemand
        [ManageGriddedPaddock].ManageGriddedPaddockScript.LoadAdjustmentPropOverall as LoadAdjustment
        [ManageGriddedPaddock].ManageGriddedPaddockScript.AverageUrineDepth
        [ReportingWithPatches].ReportingWithPatchesScript.Events
        [ReportingWithPatches].ReportingWithPatchesScript.UreaReturned as UrineNReturned
        [ManageGriddedPaddock].ManageGriddedPaddockScript.NumPatchesForUrine as GridsUsed
        [ReportingWithPatches].ReportingWithPatchesScript.UrinePatchLoad
        [SimpleGrazing].GrazedDM
        [SimpleGrazing].GrazedN
        [ReportingWithPatches].ReportingWithPatchesScript.LeachN
        [ReportingWithPatches].ReportingWithPatchesScript.Denit
        [ReportingWithPatches].ReportingWithPatchesScript.DenitN2O
        [ReportingWithPatches].ReportingWithPatchesScript.Fixation
        [ReportingWithPatches].ReportingWithPatchesScript.MinN
        [ReportingWithPatches].ReportingWithPatchesScript.dltOrgN
        [ReportingWithPatches].ReportingWithPatchesScript.Drainage600
        [ManageGriddedPaddock].ManageGriddedPaddockScript.CowDMIntake
        [ReportingWithPatches].ReportingWithPatchesScript.NHA
        [ReportingWithPatches].ReportingWithPatchesScript.PGR
        [ReportingWithPatches].ReportingWithPatchesScript.NetSilageImported
        [ReportingWithPatches].ReportingWithPatchesScript.SumSilageMade as SilageMade
        [ReportingWithPatches].ReportingWithPatchesScript.SumSilageFed as SilageFed
        [ManageGriddedPaddock].ManageGriddedPaddockScript.StockingDensity
        [ManageGriddedPaddock].ManageGriddedPaddockScript.CowState
        [ManageGriddedPaddock].ManageGriddedPaddockScript.ListOfPatches
    Zone Paddock: Area=1; Slope=0; AspectAngle=0; Altitude=50
      Folder Manager folder
        Manager CentrePivot
      SimpleGrazing: GrazingRotationType=1; SimpleGrazingFrequencyString=0; SimpleMinGrazable=0; SimpleGrazingResidual=1000; FlexibleGrazePostDM=0; MaximumRotationLengthArray=[50, 50, 50, 50, 60, 60, 90, 70, 50, 50, 50, 50]; MinimumRotationLengthArray=[1, 1, 1, 1, 3, 3, 3, 1, 1, 1, 1, 1]; FractionDefoliatedNToSoil=[0.75]; FractionExcretedNToDung=[0.4]; CNRatioDung=0; DepthUrineIsAdded=250; FractionPopulationDecline=0; TramplingOn=false; MaximumPropLitterMovedToSoil=0.1; PastureConsumedAtMaximumRateOfLitterRemoval=1200
        PreGrazeDMArray=[2800, 2800, 2800, 2800, 2800, 2800, 2800, 2800, 2800, 2800, 2800, 2800]
        PostGrazeDMArray=[1500, 1500, 1500, 1500, 1250, 1250, 1250, 1250, 1500, 1500, 1500, 1500]
      SurfaceOrganicMatter: InitialResidueName=grass; InitialResidueType=grass; InitialResidueMass=500; InitialStandingFraction=0; InitialCPR=0; InitialCNR=10
      MicroClimate: a_interception=0; b_interception=0; c_interception=0; d_interception=0; SoilHeatFluxFraction=0; MinimumHeightDiffForNewLayer=0; NightInterceptionFraction=0; ReferenceHeight=2
      Fertiliser
      PastureSpecies AGPRyegrass: doyGermination=275; daysEmergenceToAnthesis=120; daysAnthesisToMaturity=85; degreesDayForAnthesis=1100; degreesDayForMaturity=900; daysAnnualsFactor=45; InitialShootDM=1500; InitialRootDM=450; InitialRootDepth=750; initialDMFractionsGrasses=[0.15, 0.25, 0.25, 0.05, 0.05, 0.1, 0.1, 0.05, 0, 0, 0]; initialDMFractionsForbs=[0.2, 0.2, 0.15, 0.05, 0.1, 0.15, 0.1, 0.05, 0, 0, 0]; PhotosyntheticEfficiency=0.01; PhotosynthesisCurveFactor=0.8; FractionPAR=0.5; ReferenceCO2=380; CO2EffectScaleFactor=700; CO2EffectOffsetFactor=600; CO2EffectMinimum=0.7; CO2EffectExponent=2; ReproSeasonDurationCoeff=2; ReproSeasonShouldersLengthFactor=1; ReproSeasonOnsetDurationFactor=0.6; RelativeTurnoverEmerging=2; DetachmentDroughtCoefficient=3; DetachmentDroughtEffectMin=0.1; TurnoverStockFactor=0.01; TurnoverDefoliationEffectMin=0.025; MinimumGreenLeafProp=0.8; MinimumGreenRootProp=0.5
        initialDMFractionsLegumes=[0.16, 0.23, 0.22, 0.05, 0.03, 0.05, 0.05, 0.01, 0.04, 0.08, 0.08]
        LinearInterpolationFunction FVPDFunction
      PastureSpecies AGPWhiteClover: doyGermination=275; daysEmergenceToAnthesis=120; daysAnthesisToMaturity=85; degreesDayForAnthesis=1100; degreesDayForMaturity=900; daysAnnualsFactor=45; InitialShootDM=500; InitialRootDM=150; InitialRootDepth=350; initialDMFractionsGrasses=[0.15, 0.25, 0.25, 0.05, 0.05, 0.1, 0.1, 0.05, 0, 0, 0]; initialDMFractionsForbs=[0.2, 0.2, 0.15, 0.05, 0.1, 0.15, 0.1, 0.05, 0, 0, 0]; PhotosyntheticEfficiency=0.01; PhotosynthesisCurveFactor=0.8; FractionPAR=0.5; ReferenceCO2=380; CO2EffectScaleFactor=700; CO2EffectOffsetFactor=600; CO2EffectMinimum=0.7; CO2EffectExponent=2; ReproSeasonDurationCoeff=2; ReproSeasonShouldersLengthFactor=1; ReproSeasonOnsetDurationFactor=0.6; RelativeTurnoverEmerging=2; DetachmentDroughtCoefficient=3; DetachmentDroughtEffectMin=0.1; TurnoverStockFactor=0.01; TurnoverDefoliationEffectMin=0.025; MinimumGreenLeafProp=0.8; MinimumGreenRootProp=0.5
        initialDMFractionsLegumes=[0.16, 0.23, 0.22, 0.05, 0.03, 0.05, 0.05, 0.01, 0.04, 0.08, 0.08]
        LinearInterpolationFunction FVPDFunction
      Soil HE_140mm: SoilType=MergeAge40; Region=Plains; State=Canterbury; Country=New Zealand; Latitude=0; Longitude=0
        DataSource=Generic profile descriptions provided by Trevor Webb and data for functional horizions based on SWAMP project results
        Comments=Bulk density values were measured on the fine earth fraction so values entered into apsim soil are adjusted down to account for stone content (assuming stones are inert from all soil process so their mass and volume is removed from model paramaters).  SAT, DUL, LL15 and Air dry have been adjusted down to account for stone content.  OC has not been adjusted so the model will get the correct carbon and N amounts using the adjusted BD.
        Physical
          Thickness  ParticleSizeClay  ParticleSizeSand  ParticleSizeSilt  BD      AirDry   LL15    DUL     SAT
          200        20                14.5              65.5              1.3105  0.07675  0.1535  0.3735  0.456165
          150        24                18                58                1.524   0.201    0.201   0.332   0.39432
          200        39                13                48                1.42    0.2985   0.2985  0.426   0.441525
          350        44                1                 55                1.424   0.308    0.308   0.446   0.4557
          150        44                1                 55                1.424   0.308    0.308   0.446   0.456
          150        19                15                66                1.601   0.162    0.162   0.325   0.376
          300        19                15                66                1.601   0.162    0.162   0.325   0.376
          SoilCrop AGPRyegrassSoil: LL=[0.154, 0.201, 0.299, 0.308, 0.308, 0.162, 0.162]; KL=[0.1, 0.1, 0.1, 0.05, 0.05, 0.05, 0.05]; XF=[1, 0.8, 0.8, 0.3, 0, 0, 0]
          SoilCrop AGPWhiteCloverSoil: LL=[0.154, 0.201, 0.299, 0.308, 0.308, 0.162, 0.162]; KL=[0.1, 0.1, 0.1, 0.05, 0.05, 0.05, 0.05]; XF=[1, 0.8, 0.8, 0.3, 0, 0, 0]
        Organic: FOMCNRatio=40; CarbonUnits=Total
          Thickness  Carbon  SoilCNRatio  FBiom   FInert  FOM
          200        4.502   11           0.048   0.382   347.67
          150        1.91    11           0.027   0.634   257.56
          200        0.772   11           0.0195  0.784   172.648
          350        0.422   11           0.015   0.924   85.7343
          150        0.422   11           0.015   0.924   63.5135
          150        0.402   11           0.015   0.971   47.052
          300        0.4     11           0.015   0.985   25.8227
        Chemical: Thickness=[200, 150, 200, 350, 150, 150, 300]; PH=[6, 6, 6, 6, 6, 6, 6]; PHUnits=Water
        Water: Thickness=[200, 150, 200, 350, 150, 150, 300]; InitialValues=[0.3735, 0.332, 0.426, 0.446, 0.446, 0.325, 0.325]; FilledFromTop=true
        CERESSoilTemperature Temperature
        WaterBalance: SummerDate=1-Nov; SummerU=6; SummerCona=3.5; WinterDate=1-Apr; WinterU=6; WinterCona=2.5; DiffusConst=0; DiffusSlope=0; Salb=0; CN2Bare=0; CNRed=20; CNCov=0.8; DischargeWidth=5; CatchmentArea=10; PSIDul=-100
        Nutrient
        SolutePatch NO3: Thickness=[200, 150, 200, 350, 150, 150, 300]; InitialValues=[18.9803, 4.62458, 1.04681, 1.04681, 1.03121, 1, 1]; InitialValuesUnits=ppm; WaterTableConcentration=0; D0=0; DepthConstant=0; MaxDepthSoluteAccessible=0; RunoffEffectivenessAtMovingSolute=0; MaxEffectiveRunoff=0
        SolutePatch NH4: Thickness=[200, 150, 200, 350, 150, 150, 300]; InitialValuesUnits=ppm; WaterTableConcentration=0; D0=0; DepthConstant=0; MaxDepthSoluteAccessible=0; RunoffEffectivenessAtMovingSolute=0; MaxEffectiveRunoff=0
          InitialValues=[0.883818, 0.312958, 0.104681, 0.104681, 0.136454, 0.2, 0.2]
        SolutePatch Urea: Thickness=[200, 150, 200, 350, 150, 150, 300]; InitialValues=[0, 0, 0, 0, 0, 0, 0]; InitialValuesUnits=kg/ha; WaterTableConcentration=0; D0=0; DepthConstant=0; MaxDepthSoluteAccessible=0; RunoffEffectivenessAtMovingSolute=0; MaxEffectiveRunoff=0
        NutrientPatchManager: MaximumNitrogenAvailableToPlants=0; NPartitionApproach=0; AutoAmalgamationApproach=0; basePatchApproach=0; AllowPatchAmalgamationByAge=false; PatchAgeForForcedMerge=0; LayerForNPartition=-99
      Report: EventNames=[Clock].EndOfDay
        VariableNames:
          [Clock].Today
          [Decomposition].MineralisedN
          [Nutrient].MineralisedN
          [NO3].kgha
          [NH4].kgha
          [Urea].kgha
    Forages
