Simulations: Version=201
  DataStore
  Experiment TestPatches
    Factors
      Permutation
        Factor Num
          CompositeFactor WithPatches001
            Specifications:
              [SimpleGrazing].UsePatching = true
              [SimpleGrazing].ZoneCount = 1
          CompositeFactor WithPatches005
            Specifications:
              [SimpleGrazing].UsePatching = true
              [SimpleGrazing].ZoneCount = 5
          CompositeFactor WithPatches010 (disabled)
            Specifications:
              [SimpleGrazing].UsePatching = true
              [SimpleGrazing].ZoneCount = 10
          CompositeFactor WithPatches025 (disabled)
            Specifications:
              [SimpleGrazing].UsePatching = true
              [SimpleGrazing].ZoneCount = 25
          CompositeFactor WithPatches100 (disabled)
            Specifications:
              [SimpleGrazing].UsePatching = true
              [SimpleGrazing].ZoneCount = 100
          CompositeFactor WithPatches250 (disabled)
            Specifications:
              [SimpleGrazing].UsePatching = true
              [SimpleGrazing].ZoneCount = 250
          CompositeFactor WithoutPatches001 (disabled)
            Specifications:
              [SimpleGrazing].UsePatching = false
              [SimpleGrazing].ZoneCount = 1
        Factor Type
          CompositeFactor Explicit: Specifications=[SimpleGrazing].PseudoPatches = false
          CompositeFactor Pseudo: Specifications=[SimpleGrazing].PseudoPatches = true
        Factor System
          CompositeFactor A (disabled)
            Specifications:
              [Weather].FileName = VCS_Ruakura.met
              [Soil]
              [CentrePivot].Script.allowIrrigation = false
              [Fertilisation].Script.Amount = 0
              [KillClover].Script.Enable = false
            Soil HE: SoilType=NZ_sedementary; Region=Plains; State=Canterbury; Country=New Zealand; Latitude=0; Longitude=0
              DataSource=Generic profile descriptions provided by Trevor Webb and data for functional horizions based on SWAMP project results
              Comments=Bulk density values were measured on the fine earth fraction so values entered into apsim soil are adjusted down to account for stone content (assuming stones are inert from all soil process so their mass and volume is removed from model paramaters).  SAT, DUL, LL15 and Air dry have been adjusted down to account for stone content.  OC has not been adjusted so the model will get the correct carbon and N amounts using the adjusted BD.
              Physical
                Thickness  ParticleSizeSand  ParticleSizeSilt  ParticleSizeClay  Rocks  BD     AirDry  LL15   DUL    SAT    KS
                200        14.5              65.5              20                0      1.31   0.077   0.153  0.373  0.456  4832.039
                150        18                58                24                0      1.524  0.201   0.201  0.332  0.394  389.229
                200        13                48                39                0      1.42   0.298   0.298  0.426  0.442  21.6
                350        1                 55                44                0      1.424  0.308   0.308  0.446  0.456  19.051
                150        1                 55                44                0      1.424  0.308   0.308  0.446  0.456  19.051
                150        15                66                19                0      1.601  0.162   0.162  0.325  0.376  97.995
                300        15                66                19                0      1.601  0.162   0.162  0.325  0.376  97.995
                Rocks source: Calculated
                SoilCrop AGPRyegrassSoil: LL=[0.154, 0.201, 0.299, 0.308, 0.308, 0.162, 0.162]; KL=[0.1, 0.1, 0.1, 0.05, 0.05, 0.05, 0.05]; XF=[1, 0.8, 0.8, 0.3, 0, 0, 0]
                SoilCrop AGPWhiteCloverSoil: LL=[0.154, 0.201, 0.299, 0.308, 0.308, 0.162, 0.162]; KL=[0.1, 0.1, 0.1, 0.05, 0.05, 0.05, 0.05]; XF=[1, 0.8, 0.8, 0.3, 0, 0, 0]
              Organic: FOMCNRatio=40; CarbonUnits=Total
                Thickness  Carbon  SoilCNRatio  FBiom  FInert  FOM
                200        4.502   11           0.048  0.382   347.67
                150        1.91    11           0.027  0.634   257.56
                200        0.772   11           0.019  0.784   172.648
                350        0.422   11           0.015  0.924   85.734
                150        0.422   11           0.015  0.924   63.514
                150        0.402   11           0.015  0.971   47.052
                300        0.4     11           0.015  0.985   25.823
              Chemical: PHUnits=Water
                Thickness  PH  CEC
                200        6   16.441
                150        6   11.9115
                200        6   13.021
                350        6   12.7645
                150        6   12.7645
                150        6   6.9825
                300        6   6.978
                CEC source: Calculated
              WaterBalance SoilWater: SummerDate=1-Oct; SummerU=9; SummerCona=4.4; WinterDate=1-Apr; WinterU=6; WinterCona=3; DiffusConst=88; DiffusSlope=35; Salb=0.13; CN2Bare=73; CNRed=20; CNCov=0.8; PSIDul=-100; Thickness=[200, 150, 200, 350, 150, 150, 300]; SWCON=[0.496, 0.366, 0.374, 0.076, 0.076, 0.306, 0.306]
              Water: Thickness=[200, 150, 200, 350, 150, 150, 300]; InitialValues=[0.373, 0.332, 0.426, 0.446, 0.446, 0.325, 0.325]; FilledFromTop=true
              SolutePatch NO3: InitialValuesUnits=kg/ha; WaterTableConcentration=0; D0=0; DepthConstant=0; MaxDepthSoluteAccessible=0; RunoffEffectivenessAtMovingSolute=0; MaxEffectiveRunoff=0
                Thickness  InitialValues  Exco  FIP
                200        18             0     1
                150        5              0     1
                200        4              0     1
                350        2              0     1
                150        1              0     1
                150        1              0     1
                300        1              0     1
              SolutePatch NH4: InitialValuesUnits=kg/ha; WaterTableConcentration=0; D0=0; DepthConstant=0; MaxDepthSoluteAccessible=0; RunoffEffectivenessAtMovingSolute=0; MaxEffectiveRunoff=0
                Thickness  InitialValues  Exco  FIP
                200        0              1     1
                150        0              1     1
                200        0              1     1
                350        0              1     1
                150        0              1     1
                150        0              1     1
                300        0              1     1
              SolutePatch Urea: InitialValuesUnits=kg/ha; WaterTableConcentration=0; D0=0; DepthConstant=0; MaxDepthSoluteAccessible=0; RunoffEffectivenessAtMovingSolute=0; MaxEffectiveRunoff=0
                Thickness  InitialValues  Exco  FIP
                200        0              0     1
                150        0              0     1
                200        0              0     1
                350        0              0     1
                150        0              0     1
                150        0              0     1
                300        0              0     1
              SoilTemperature Temperature
              NutrientPatchManager: NPartitionApproach=0; AutoAmalgamationApproach=0; basePatchApproach=0; AllowPatchAmalgamationByAge=false; PatchAgeForForcedMerge=0; LayerForNPartition=-99
          CompositeFactor B (disabled)
            Specifications:
              [Weather].FileName = VCS_Ruakura.met
              [Soil]
              [CentrePivot].Script.allowIrrigation = false
              [Fertilisation].Script.Amount = 150
              [KillClover].Script.Enable = false
            Soil HE: same as TestPatches.Factors.Permutation.System.A.HE
          CompositeFactor C (disabled)
            Specifications:
              [Weather].FileName = VCS_Lincoln.met
              [Soil]
              [CentrePivot].Script.allowIrrigation = true
              [Fertilisation].Script.Amount = 0
              [KillClover].Script.Enable = false
            Soil VL: SoilType=NZ_Sedimentary; LocalName=Lismore; Site=Winchmore; NearestTown=Ashburton; Region=Canterbury; Country=New Zealand; Latitude=-48.48; Longitude=0
              Chemical: Thickness=[150, 150, 200, 150, 250, 300, 300]; PH=[6, 6, 6, 6, 6, 6, 6]; PHUnits=Water
              Physical
                Thickness  ParticleSizeSand  ParticleSizeSilt  ParticleSizeClay  Rocks  BD    AirDry  LL15   DUL   SAT   KS
                150        15                65                20                0      1.3   0.05    0.15   0.25  0.45  5000
                150        20                65                15                0      1.35  0.12    0.14   0.22  0.43  2500
                200        25                63                12                0.568  1     0.055   0.055  0.15  0.25  3000
                150        35                57                8                 0.798  0.53  0.015   0.015  0.05  0.15  10000
                250        40                54                6                 0.866  0.31  0.01    0.01   0.03  0.11  17500
                300        40                55                5                 0.867  0.3   0.01    0.01   0.03  0.11  20000
                300        40                55                5                 0.867  0.3   0.01    0.01   0.03  0.11  20000
                Rocks source: Calculated
                SoilCrop AGPRyegrassSoil: LL=[0.15, 0.14, 0.06, 0.02, 0.01, 0.01, 0.01]; KL=[0.1, 0.1, 0.08, 0.04, 0.01, 0, 0]; XF=[1, 1, 1, 1, 1, 0, 0]
                SoilCrop AGPWhiteCloverSoil: LL=[0.15, 0.14, 0.06, 0.02, 0.01, 0.01, 0.01]; KL=[0.1, 0.1, 0.08, 0.04, 0.01, 0, 0]; XF=[1, 1, 1, 1, 1, 0, 0]
                SoilCrop Slurp1Soil: LL=[0.15, 0.14, 0.06, 0.02, 0.01, 0.01, 0.01]; KL=[0.1, 0.1, 0.08, 0.04, 0.01, 0, 0]; XF=[1, 1, 1, 1, 1, 0, 0]
                SoilCrop Slurp2Soil: LL=[0.15, 0.14, 0.06, 0.02, 0.01, 0.01, 0.01]; KL=[0.1, 0.1, 0.08, 0.04, 0.01, 0, 0]; XF=[1, 1, 1, 1, 1, 0, 0]
                SoilCrop Rye1Soil: LL=[0.15, 0.14, 0.06, 0.02, 0.01, 0.01, 0.01]; KL=[0.1, 0.1, 0.08, 0.04, 0.01, 0, 0]; XF=[1, 1, 1, 1, 1, 0, 0]
                SoilCrop Rye2Soil: LL=[0.15, 0.14, 0.06, 0.02, 0.01, 0.01, 0.01]; KL=[0.1, 0.1, 0.08, 0.04, 0.01, 0, 0]; XF=[1, 1, 1, 1, 1, 0, 0]
              WaterBalance SoilWater: SummerDate=1-Nov; SummerU=6; SummerCona=3.5; WinterDate=1-apr; WinterU=2; WinterCona=2; DiffusConst=88; DiffusSlope=35; Salb=0.13; CN2Bare=73; CNRed=20; CNCov=0.8; DischargeWidth=0; CatchmentArea=0; PSIDul=-100
                Thickness  SWCON  KLAT
                150        0.5    0
                150        0.52   0
                200        0.55   0
                150        0.6    0
                250        0.65   0
                300        0.65   0
                300        0.65   0
              Organic: FOMCNRatio=40; CarbonUnits=Total
                Thickness  Carbon  SoilCNRatio  FBiom  FInert  FOM
                150        3       12           0.04   0.5     331.337
                150        1       12           0.02   0.7     245.461
                200        0.6     12           0.02   0.83    164.537
                150        0.4     12           0.01   0.9     121.892
                250        0.25    12           0.01   0.95    73.931
                300        0.15    12           0      0.99    40.574
                300        0.1     12           0      0.99    22.268
              Water: Thickness=[150, 150, 200, 150, 250, 300, 300]; InitialValues=[0.245, 0.216, 0.145, 0.048, 0.029, 0.029, 0.029]; FilledFromTop=false
              SolutePatch NO3: same as TestPatches.Factors.Permutation.System.A.HE.NO3
              SolutePatch NH4: same as TestPatches.Factors.Permutation.System.A.HE.NH4
              SolutePatch Urea: same as TestPatches.Factors.Permutation.System.A.HE.Urea
              SoilTemperature Temperature
              NutrientPatchManager: NPartitionApproach=0; AutoAmalgamationApproach=0; basePatchApproach=0; AllowPatchAmalgamationByAge=false; PatchAgeForForcedMerge=0; LayerForNPartition=-99
          CompositeFactor D
            Specifications:
              [Weather].FileName = VCS_Lincoln.met
              [Soil]
              [CentrePivot].Script.allowIrrigation = true
              [Fertilisation].Script.Amount = 250
              [KillClover].Script.Enable = false
            Soil VL: SoilType=NZ_Sedimentary; LocalName=Lismore; Site=Winchmore; NearestTown=Ashburton; Region=Canterbury; Country=New Zealand; Latitude=-48.48; Longitude=0
              Chemical: PHUnits=Water
                Thickness  PH  CEC
                150        6   13.095
                150        6   7.595
                200        6   6.229
                150        6   5.381
                250        6   4.8445
                300        6   4.3525
                300        6   4.24
                CEC source: Calculated
              Physical
                Thickness  ParticleSizeSand  ParticleSizeSilt  ParticleSizeClay  Rocks     BD    AirDry  LL15   DUL   SAT   KS
                150        15                65                20                0         1.3   0.05    0.15   0.25  0.45  5000
                150        20                65                15                0         1.35  0.12    0.14   0.22  0.43  2500
                200        25                63                12                0.568263  1     0.055   0.055  0.15  0.25  3000
                150        35                57                8                 0.798387  0.53  0.015   0.015  0.05  0.15  10000
                250        40                54                6                 0.866051  0.31  0.01    0.01   0.03  0.11  17500
                300        40                55                5                 0.866621  0.3   0.01    0.01   0.03  0.11  20000
                300        40                55                5                 0.866621  0.3   0.01    0.01   0.03  0.11  20000
                Rocks source: Calculated
                SoilCrop AGPRyegrassSoil: LL=[0.15, 0.14, 0.06, 0.02, 0.01, 0.01, 0.01]; KL=[0.1, 0.1, 0.08, 0.04, 0.01, 0, 0]; XF=[1, 1, 1, 1, 1, 0, 0]
                SoilCrop AGPWhiteCloverSoil: LL=[0.15, 0.14, 0.06, 0.02, 0.01, 0.01, 0.01]; KL=[0.1, 0.1, 0.08, 0.04, 0.01, 0, 0]; XF=[1, 1, 1, 1, 1, 0, 0]
                SoilCrop Slurp1Soil: LL=[0.15, 0.14, 0.06, 0.02, 0.01, 0.01, 0.01]; KL=[0.1, 0.1, 0.08, 0.04, 0.01, 0, 0]; XF=[1, 1, 1, 1, 1, 0, 0]
                SoilCrop Slurp2Soil: LL=[0.15, 0.14, 0.06, 0.02, 0.01, 0.01, 0.01]; KL=[0.1, 0.1, 0.08, 0.04, 0.01, 0, 0]; XF=[1, 1, 1, 1, 1, 0, 0]
                SoilCrop Rye1Soil: LL=[0.15, 0.14, 0.06, 0.02, 0.01, 0.01, 0.01]; KL=[0.1, 0.1, 0.08, 0.04, 0.01, 0, 0]; XF=[1, 1, 1, 1, 1, 0, 0]
                SoilCrop Rye2Soil: LL=[0.15, 0.14, 0.06, 0.02, 0.01, 0.01, 0.01]; KL=[0.1, 0.1, 0.08, 0.04, 0.01, 0, 0]; XF=[1, 1, 1, 1, 1, 0, 0]
              WaterBalance SoilWater: SummerDate=1-Nov; SummerU=6; SummerCona=3.5; WinterDate=1-apr; WinterU=2; WinterCona=2; DiffusConst=88; DiffusSlope=35; Salb=0.13; CN2Bare=73; CNRed=20; CNCov=0.8; DischargeWidth=0; CatchmentArea=0; PSIDul=-100
                Thickness  SWCON  KLAT
                150        0.5    0
                150        0.52   0
                200        0.55   0
                150        0.6    0
                250        0.65   0
                300        0.65   0
                300        0.65   0
              Organic: FOMCNRatio=40; CarbonUnits=Total
                Thickness  Carbon  SoilCNRatio  FBiom  FInert  FOM
                150        3       12           0.04   0.5     331.337
                150        1       12           0.02   0.7     245.461
                200        0.6     12           0.02   0.83    164.537
                150        0.4     12           0.01   0.9     121.892
                250        0.25    12           0.01   0.95    73.931
                300        0.15    12           0      0.99    40.574
                300        0.1     12           0      0.99    22.268
              Water: Thickness=[150, 150, 200, 150, 250, 300, 300]; InitialValues=[0.245, 0.216, 0.145, 0.048, 0.029, 0.029, 0.029]; FilledFromTop=false
              SolutePatch NO3: InitialValuesUnits=kg/ha; WaterTableConcentration=0; D0=0; DepthConstant=0; MaxDepthSoluteAccessible=0; RunoffEffectivenessAtMovingSolute=0; MaxEffectiveRunoff=0
                Thickness  InitialValues  Exco  FIP
                200        18             0     1
                150        5              0     1
                200        4              0     1
                350        2              0     1
                150        1              0     1
                150        1              0     1
                300        1              0     1
              SolutePatch NH4: InitialValuesUnits=kg/ha; WaterTableConcentration=0; D0=0; DepthConstant=0; MaxDepthSoluteAccessible=0; RunoffEffectivenessAtMovingSolute=0; MaxEffectiveRunoff=0
                Thickness  InitialValues  Exco  FIP
                200        0              1     1
                150        0              1     1
                200        0              1     1
                350        0              1     1
                150        0              1     1
                150        0              1     1
                300        0              1     1
              SolutePatch Urea: InitialValuesUnits=kg/ha; WaterTableConcentration=0; D0=0; DepthConstant=0; MaxDepthSoluteAccessible=0; RunoffEffectivenessAtMovingSolute=0; MaxEffectiveRunoff=0
                Thickness  InitialValues  Exco  FIP
                200        0              0     1
                150        0              0     1
                200        0              0     1
                350        0              0     1
                150        0              0     1
                150        0              0     1
                300        0              0     1
              SoilTemperature Temperature
              NutrientPatchManager: NPartitionApproach=0; AutoAmalgamationApproach=0; basePatchApproach=0; AllowPatchAmalgamationByAge=false; PatchAgeForForcedMerge=0; LayerForNPartition=-99
          CompositeFactor E (disabled)
            Specifications:
              [Weather].FileName = VCS_Lincoln.met
              [Soil]
              [CentrePivot].Script.allowIrrigation = true
              [Fertilisation].Script.Amount = 400
              [KillClover].Script.Enable = true
            Soil VL: SoilType=NZ_Sedimentary; LocalName=Lismore; Site=Winchmore; NearestTown=Ashburton; Region=Canterbury; Country=New Zealand; Latitude=-48.48; Longitude=0
              Chemical: Thickness=[150, 150, 200, 150, 250, 300, 300]; PH=[6, 6, 6, 6, 6, 6, 6]; PHUnits=Water
              Physical
                Thickness  ParticleSizeSand  ParticleSizeSilt  ParticleSizeClay  Rocks     BD    AirDry  LL15   DUL   SAT   KS
                150        15                65                20                0         1.3   0.05    0.15   0.25  0.45  5000
                150        20                65                15                0         1.35  0.12    0.14   0.22  0.43  2500
                200        25                63                12                0.568263  1     0.055   0.055  0.15  0.25  3000
                150        35                57                8                 0.798387  0.53  0.015   0.015  0.05  0.15  10000
                250        40                54                6                 0.866051  0.31  0.01    0.01   0.03  0.11  17500
                300        40                55                5                 0.866621  0.3   0.01    0.01   0.03  0.11  20000
                300        40                55                5                 0.866621  0.3   0.01    0.01   0.03  0.11  20000
                Rocks source: Calculated
                SoilCrop AGPRyegrassSoil: LL=[0.15, 0.14, 0.06, 0.02, 0.01, 0.01, 0.01]; KL=[0.1, 0.1, 0.08, 0.04, 0.01, 0, 0]; XF=[1, 1, 1, 1, 1, 0, 0]
                SoilCrop AGPWhiteCloverSoil: LL=[0.15, 0.14, 0.06, 0.02, 0.01, 0.01, 0.01]; KL=[0.1, 0.1, 0.08, 0.04, 0.01, 0, 0]; XF=[1, 1, 1, 1, 1, 0, 0]
                SoilCrop Slurp1Soil: LL=[0.15, 0.14, 0.06, 0.02, 0.01, 0.01, 0.01]; KL=[0.1, 0.1, 0.08, 0.04, 0.01, 0, 0]; XF=[1, 1, 1, 1, 1, 0, 0]
                SoilCrop Slurp2Soil: LL=[0.15, 0.14, 0.06, 0.02, 0.01, 0.01, 0.01]; KL=[0.1, 0.1, 0.08, 0.04, 0.01, 0, 0]; XF=[1, 1, 1, 1, 1, 0, 0]
                SoilCrop Rye1Soil: LL=[0.15, 0.14, 0.06, 0.02, 0.01, 0.01, 0.01]; KL=[0.1, 0.1, 0.08, 0.04, 0.01, 0, 0]; XF=[1, 1, 1, 1, 1, 0, 0]
                SoilCrop Rye2Soil: LL=[0.15, 0.14, 0.06, 0.02, 0.01, 0.01, 0.01]; KL=[0.1, 0.1, 0.08, 0.04, 0.01, 0, 0]; XF=[1, 1, 1, 1, 1, 0, 0]
              WaterBalance SoilWater: same as TestPatches.Factors.Permutation.System.C.VL.SoilWater
              Organic: same as TestPatches.Factors.Permutation.System.C.VL.Organic
              Water: Thickness=[150, 150, 200, 150, 250, 300, 300]; InitialValues=[0.245, 0.216, 0.145, 0.048, 0.029, 0.029, 0.029]; FilledFromTop=false
              SolutePatch NO3: same as TestPatches.Factors.Permutation.System.A.HE.NO3
              SolutePatch NH4: same as TestPatches.Factors.Permutation.System.A.HE.NH4
              SolutePatch Urea: same as TestPatches.Factors.Permutation.System.A.HE.Urea
              SoilTemperature Temperature
              NutrientPatchManager: NPartitionApproach=0; AutoAmalgamationApproach=0; basePatchApproach=0; AllowPatchAmalgamationByAge=false; PatchAgeForForcedMerge=0; LayerForNPartition=-99
          CompositeFactor F (disabled)
            Specifications:
              [Weather].FileName = VCS_Lincoln.met
              [Soil]
              [CentrePivot].Script.allowIrrigation = false
              [Fertilisation].Script.Amount = 0
              [KillClover].Script.Enable = false
            Soil VL: same as TestPatches.Factors.Permutation.System.E.VL
        Factor StockingRate: Specification=[SimpleCow].StockingRate = 3
    Simulation TestPatches
      Clock: Start=1972-01-01; End=1981-12-31
      Weather: FileName=%root%/Examples/WeatherFiles/NZ_Lincoln.met
      MicroClimate: a_interception=0; b_interception=1; c_interception=0; d_interception=0; SoilHeatFluxFraction=0.4; MinimumHeightDiffForNewLayer=0; NightInterceptionFraction=0.5; ReferenceHeight=2
      SoilArbitrator
      Forages
        Parameters:
          Name                          LiveDigestibility  DeadDigestibility  LiveFractionConsumable  DeadFractionConsumable  LiveMinimumBiomass  DeadMinimumBiomass
          SurfaceOrganicMatter.Residue  0.7                0.3                0                       0                       0                   0
          AGPRyegrass.Leaf              FromModel          FromModel          1                       1                       25                  0
          AGPRyegrass.Stem              FromModel          FromModel          1                       1                       10                  0
          AGPRyegrass.Stolon            FromModel          FromModel          0                       0                       0                   0
          AGPWhiteClover.Leaf           FromModel          FromModel          1                       1                       15                  0
          AGPWhiteClover.Stem           FromModel          FromModel          1                       1                       5                   0
          AGPWhiteClover.Stolon         FromModel          FromModel          1                       1                       5                   0
      SimpleCow: StockingRate=1; Num1HaPaddocks=25; DaysPerGrazeWhenMilking=1; DaysPerGrazeWhenDry=3; SilageNConc=2.5; SilageMEConc=12; CowBodyWeight=450; CalfBirthWeightPercent=7; MilkSolidsAsPercentOfCowBodyWeight=92; CowDateCalving=1-aug; DaysFromCalvingToInCalf=63; LactationDuration=280; CowWalkingDist=4; CowNumUrinations=11
      SimpleGrazing: GrazingRotationType=0; SimpleGrazingFrequencyString=21; SimpleMinGrazable=0; SimpleGrazingResidual=1500; FlexibleGrazePostDM=0; MaximumRotationLengthArray=[50, 50, 50, 50, 60, 60, 90, 70, 50, 50, 50, 50]; MinimumRotationLengthArray=[21, 21, 21, 21, 21, 21, 21, 21, 21, 21, 21, 21]; NoGrazingStartString=13-may; NoGrazingEndString=25-jul; IsCutAndCarry=false; FractionClippingsReturned=0; FractionIntakeNToAnimal=[0]; DungNConc=2.6; FractionOfDungUrineOffPaddock=[0]; DepthUrineIsAdded=250; ShowAdvancedExcretaOptions=false; SendDungElsewhere=0; SendUrineElsewhere=0; UsePatching=true; PseudoPatches=false; ZoneCount=1; UrineReturnPattern=0; PseudoRandomSeed=666; MaxEffectiveNConcentration=3.5; FractionPopulationDecline=0; TramplingOn=false; MaximumPropLitterMovedToSoil=0.1; PastureConsumedAtMaximumRateOfLitterRemoval=1200
        PreGrazeDMArray=[2700, 2700, 2700, 2700, 2700, 2700, 2700, 2700, 2700, 2700, 2700, 2700]
        PostGrazeDMArray=[1500, 1500, 1500, 1500, 1250, 1250, 1250, 1250, 1500, 1500, 1500, 1500]
      Report ReportingWithPatchesPaddock
        VariableNames:
          [Clock].Today as Date
          [Clock].Today.Year as Year
          [SimpleGrazing].PseudoPatches as PseudoPatches
          [SimpleGrazing].ZoneCount as ZoneCount
          // whole soil and pasture states and fluxes (i.e., aggregated across patches or zones)
          Sum of [ReportingWithZonesHelper].ScriptReporting.DenitPdk from [ReportingWithPatchesPaddock].DayAfterLastOutput to [Clock].Today as Denit
          Sum of [ReportingWithZonesHelper].ScriptReporting.DenitN2OPdk from [ReportingWithPatchesPaddock].DayAfterLastOutput to [Clock].Today as DenitN2O
          Sum of [ReportingWithZonesHelper].ScriptReporting.LeachedNPdk from [ReportingWithPatchesPaddock].DayAfterLastOutput to [Clock].Today as LeachN
          //Last of [ReportingWithZonesHelper].ScriptReporting.UreaPdk from [ReportingWithPatchesPaddock].DayAfterLastOutput to [Clock].Today as UreaN
          //Last of [ReportingWithZonesHelper].ScriptReporting.NH4Pdk from [ReportingWithPatchesPaddock].DayAfterLastOutput to [Clock].Today as NH4N
          //Last of [ReportingWithZonesHelper].ScriptReporting.NO3Pdk from [ReportingWithPatchesPaddock].DayAfterLastOutput to [Clock].Today as NO3N
          Last of [ReportingWithZonesHelper].ScriptReporting.MinNPdk from [ReportingWithPatchesPaddock].DayAfterLastOutput to [Clock].Today as MinN
          //Last of [ReportingWithZonesHelper].ScriptReporting.TotalCPdk from [ReportingWithPatchesPaddock].DayAfterLastOutput to [Clock].Today as TotalC
          //Last of [ReportingWithZonesHelper].ScriptReporting.TotalNPdk from [ReportingWithPatchesPaddock].DayAfterLastOutput to [Clock].Today as TotalN
          //Mean of [ReportingWithZonesHelper].ScriptReporting.HerbageWtPdk from [ReportingWithPatchesPaddock].DayAfterLastOutput to [Clock].Today as HerbageWt
          //Mean of [ReportingWithZonesHelper].ScriptReporting.HerbageNPdk from [ReportingWithPatchesPaddock].DayAfterLastOutput to [Clock].Today as HerbageN
          //Mean of [ReportingWithZonesHelper].ScriptReporting.PastureCompositionPdk from [ReportingWithPatchesPaddock].DayAfterLastOutput to [Clock].Today as Composition
          Sum of [ReportingWithZonesHelper].ScriptReporting.HarvestedWtPdk from [ReportingWithPatchesPaddock].DayAfterLastOutput to [Clock].Today as HarvestedWt
          Sum of [ReportingWithZonesHelper].ScriptReporting.HarvestedNPdk from [ReportingWithPatchesPaddock].DayAfterLastOutput to [Clock].Today as HarvestedN
          Sum of [ReportingWithZonesHelper].ScriptReporting.FixedNPdk from [ReportingWithPatchesPaddock].DayAfterLastOutput to [Clock].Today as FixedN
          Sum of [ReportingWithZonesHelper].ScriptReporting.UptakeNPdk from [ReportingWithPatchesPaddock].DayAfterLastOutput to [Clock].Today as UptakeN
          Sum of [SimpleCow].HerdUrineNReturned from [ReportingWithPatchesPaddock].DayAfterLastOutput to [Clock].Today as UrineNReturned
          Sum of [SimpleCow].SilageFed from [ReportingWithPatchesPaddock].DayAfterLastOutput to [Clock].Today as SupplementsFed
          Sum of [SimpleCow].SilageMade from [ReportingWithPatchesPaddock].DayAfterLastOutput to [Clock].Today as SupplementsMade
          Sum of [SimpleCow].HerdDMIntake from [ReportingWithPatchesPaddock].DayAfterLastOutput to [Clock].Today as HerdDMIntake
          Sum of [SimpleCow].HerdMEDemand from [ReportingWithPatchesPaddock].DayAfterLastOutput to [Clock].Today as HerdMEDemand
          Sum of ([SimpleCow].SilageFed - [SimpleCow].SilageMade) from [ReportingWithPatchesPaddock].DayAfterLastOutput to [Clock].Today as NetSupplementsFed
          //[ReportingWithZonesHelper].ScriptReporting.SysTime as SysTime
          // states in the individual zones or patches
          //[ReportingWithZonesHelper].ScriptReporting.UreaByPatch as UreaByPatch
          //[ReportingWithZonesHelper].ScriptReporting.NH4ByPatch as NH4ByPatch
          //[ReportingWithZonesHelper].ScriptReporting.NO3ByPatch as NO3ByPatch
          //[ReportingWithZonesHelper].ScriptReporting.MinNByPatch as MinNByPatch
          //[ReportingWithZonesHelper].ScriptReporting.TotalCByPatch as TotalCByPatch
          //[ReportingWithZonesHelper].ScriptReporting.TotalNByPatch as TotalNByPatch
          //[NutrientPatchManager].NO3EachPatch
          //sum([NO3].kgha)
        EventNames:
          //Clock.Today >= new DateTime(1970, 1, 1) && Clock.Today.Month == 12 && Clock.Today.Day == 31
          [Clock].EndOfYear
          //[Clock].EndOfDay
      Manager ReportingWithZonesHelper
```csharp
using APSIM.Core;
using Models.Soils.NutrientPatching;
using Models.Soils.Nutrients;
using Models.Interfaces;
using System.Diagnostics;
using System;
using Models.Core;
using Models.Soils;
using Models.PMF;
using Models.Zones;
using Models.AgPasture;
using System.Xml.Serialization;
using System.IO;
using APSIM.Shared.Utilities;
using System.Collections.Generic;
using System.Linq;
using Newtonsoft.Json;

namespace Models
{
    [Serializable]
    [System.Xml.Serialization.XmlInclude(typeof(Model))]
    public class ScriptReporting : Model, IStructureDependency
    {
        [Link] private Clock Clock;
        [Link] private Soil soil;
        [Link] private ISummary summary;
        //[Link] private PatchScript patchAndZoneManager;    // need to get rid of this
        [Link] private NutrientPatchManager nutrientPatchManager;
        [field:NonSerialized]
        public IStructure Structure { private get; set; }
        [Link] private SimpleGrazing simpleGrazing;

        
        
        [Link] private Zone[] zones;
        

        [JsonIgnore] public int ZoneCount  { get; set; }
        [JsonIgnore] public int PatchCount  { get; set; }
        [JsonIgnore] public int ArrayLength  { get; set; }

        [JsonIgnore] public string SysTime  { get; set; }

// Whole paddock states and fluxes
        [JsonIgnore] public double DenitPdk { get; set; }
        [JsonIgnore] public double DenitN2OPdk { get; set; }
        [JsonIgnore] public double LeachedNPdk  { get; set; }
        [JsonIgnore] public double UreaPdk { get; set; }
        [JsonIgnore] public double NH4Pdk { get; set; }
        [JsonIgnore] public double NO3Pdk { get; set; }
        [JsonIgnore] public double MinNPdk  { get; set; }
        [JsonIgnore] public double TotalCPdk  { get; set; }
        [JsonIgnore] public double TotalNPdk  { get; set; }

        [JsonIgnore] public double HerbageWtPdk { get; set; }
        [JsonIgnore] public double HerbageNPdk { get; set; }
        [JsonIgnore] public double HarvestedWtPdk { get; set; }
        [JsonIgnore] public double HarvestedNPdk { get; set; }
        [JsonIgnore] public double FixedNPdk { get; set; }
        [JsonIgnore] public double UptakeNPdk { get; set; }
        [JsonIgnore] public double PastureCompositionPdk { get; set; }

// nitrogen stuff - the array dimension is the number of patches - patches might be either explicit zones or pseudopatches
        [JsonIgnore] public double[] DenitByPatch { get; set; }
        [JsonIgnore] public double[] DenitN2OByPatch { get; set; }
        [JsonIgnore] public double[] LeachedNByPatch  { get; set; }
        [JsonIgnore] public double[] UreaByPatch { get; set; }
        [JsonIgnore] public double[] NH4ByPatch { get; set; }
        [JsonIgnore] public double[] NO3ByPatch { get; set; }
        [JsonIgnore] public double[] MinNByPatch  { get; set; }
        
// carbon stuff - the array dimension is the number of patches - patches might be either explicit zones or pseudopatches
        [JsonIgnore] public double[] TotalCByPatch { get; set; }
        [JsonIgnore] public double[] TotalNByPatch { get; set; }

// pasture stuff - is using explict patches (zones) then the array dimension is the number of zones - otherwise is 1
        [JsonIgnore] public double[] HerbageWtByPatch { get; set; }
        [JsonIgnore] public double[] HerbageNByPatch { get; set; }
        [JsonIgnore] public double[] HarvestedWtByPatch { get; set; }
        [JsonIgnore] public double[] HarvestedNByPatch { get; set; }
        [JsonIgnore] public double[] FixedNByPatch { get; set; }
        [JsonIgnore] public double[] UptakeNByPatch { get; set; }
        [JsonIgnore] public double[] PastureCompositionByPatch { get; set; }

        [EventSubscribe("StartOfSimulation")]
        private void OnSimulationCommencing(object sender, EventArgs e)
        {    
            //Debugger.Break();
            
// first deal with the Nutrient things. These will always have multiple values - patches or zones            
            if (simpleGrazing.PseudoPatches == true)
                ArrayLength = simpleGrazing.ZoneCount;  // was                 ArrayLength = nutrientPatchManager.NumPatches;    //the number of patches - which is fixed in this simulation but could be dangerous elsewhere
            else
                ArrayLength = zones.Length;                       // the number of paddocks/zones

            DenitByPatch = new double[ArrayLength];
            DenitN2OByPatch = new double[ArrayLength];
            LeachedNByPatch = new double[ArrayLength];
            UreaByPatch = new double[ArrayLength];
            NH4ByPatch = new double[ArrayLength];
            NO3ByPatch = new double[ArrayLength];
            MinNByPatch = new double[ArrayLength];
            TotalCByPatch = new double[ArrayLength];
            TotalNByPatch = new double[ArrayLength];

            HerbageWtByPatch = new double[ArrayLength];
            HerbageNByPatch = new double[ArrayLength];
            HarvestedWtByPatch = new double[ArrayLength];
            HarvestedNByPatch = new double[ArrayLength];
            FixedNByPatch = new double[ArrayLength];
            UptakeNByPatch = new double[ArrayLength];
            PastureCompositionByPatch = new double[ArrayLength];

        }

        [EventSubscribe("EndOfDay")]
        private void OnEndOfDay(object sender, EventArgs e)
        {
            SysTime = DateTime.Now.ToString();
        
            if (simpleGrazing.PseudoPatches == false)  // explicit zones
            {
                for (int x = 0; x < zones.Length; x++)
                {
                    // start with the patchy stuff first
                    var soil = Structure.FindChild<Soil>(relativeTo: (INodeModel)zones[x]);  
                    var patchManager = Structure.FindChild<NutrientPatchManager>(relativeTo: (INodeModel)soil);  
                    var waterBalance = Structure.FindChild<ISoilWater>(relativeTo: (INodeModel)soil);                                
                    var Urea = Structure.FindChild<ISolute>("Urea", relativeTo: (INodeModel)soil);                                
                    var NH4 = Structure.FindChild<ISolute>("NH4", relativeTo: (INodeModel)soil);                                
                    var NO3 = Structure.FindChild<ISolute>("NO3", relativeTo: (INodeModel)soil);    

                    DenitByPatch[x] = patchManager.DenitrifiedN.Sum();
                    DenitN2OByPatch[x] = patchManager.N2Oatm300mm.Sum();  // only in the top 30 cm (2 layers)
                    //DenitN2OByPatch[x] = patchManager.N2Oatm.Sum();  // for all depths
                    
                    LeachedNByPatch[x] = waterBalance.LeachNO3 + waterBalance.LeachNH4 + waterBalance.LeachUrea;
                    UreaByPatch[x] = patchManager.Urea.kgha.Sum();
                    NH4ByPatch[x] = patchManager.NH4.kgha.Sum();
                    NO3ByPatch[x] = patchManager.NO3.kgha.Sum();
                    MinNByPatch[x] = patchManager.MineralN.Sum();
                    TotalCByPatch[x] = patchManager.TotalC.Sum();
                    TotalNByPatch[x] = patchManager.TotalN.Sum();

                    var sward =  Structure.FindAll<PastureSpecies>(relativeTo: (INodeModel)zones[x]);                                
                    var Clover =   Structure.FindChild<PastureSpecies>("AGPWhiteClover", relativeTo: (INodeModel)zones[x]);                                

                    HerbageWtByPatch[x] = sward.Sum(species => species.AboveGroundWt); 
                    HerbageNByPatch[x] = sward.Sum(species => species.AboveGroundN);   
                    HarvestedWtByPatch[x] = sward.Sum(species => species.HarvestedWt); 
                    HarvestedNByPatch[x] = sward.Sum(species => species.HarvestedN); 
                    FixedNByPatch[x] = sward.Sum(species => species.FixedN);
                    UptakeNByPatch[x] = sward.Sum(species => species.SoilUptakeN);
                    PastureCompositionByPatch[x] = Clover.AboveGroundWt / (HerbageWtByPatch[x] + 0.1);
                    
                }
                 
                // now do the whole-paddock stuff
                DenitPdk = DenitByPatch.Sum() / zones.Length;
                DenitN2OPdk = DenitN2OByPatch.Sum() / zones.Length;
                LeachedNPdk = LeachedNByPatch.Sum() / zones.Length;
                UreaPdk = UreaByPatch.Sum() / zones.Length;
                NH4Pdk = NH4ByPatch.Sum() / zones.Length;
                NO3Pdk = NO3ByPatch.Sum() / zones.Length;
                MinNPdk = MinNByPatch.Sum() / zones.Length;
                TotalCPdk = TotalCByPatch.Sum() / zones.Length;
                TotalNPdk = TotalNByPatch.Sum() / zones.Length;
                
                HerbageWtPdk = HerbageWtByPatch.Sum() / zones.Length;
                HerbageNPdk = HerbageNByPatch.Sum() / zones.Length;
                HarvestedWtPdk = HarvestedWtByPatch.Sum() / zones.Length;
                HarvestedNPdk = HarvestedNByPatch.Sum() / zones.Length;
                FixedNPdk = FixedNByPatch.Sum() / zones.Length;
                UptakeNPdk = UptakeNByPatch.Sum() / zones.Length;
                PastureCompositionPdk = PastureCompositionByPatch.Sum() / zones.Length;

            }
            else  // PseudoPatches and there will only be one zone
            {
                for (int x = 0; x < zones.Length; x++)  // there is only one however still need this to access the zone for the components
                {
                    var soil =   Structure.FindChild<Soil>(relativeTo: (INodeModel)zones[x]);  
                    var patchManager =   Structure.FindChild<NutrientPatchManager>(relativeTo: (INodeModel)soil);  
                    var waterBalance =   Structure.FindChild<ISoilWater>(relativeTo: (INodeModel)soil);                                
                    var Urea =   Structure.FindChild<ISolute>("Urea", relativeTo: (INodeModel)soil);                                
                    var NH4 =   Structure.FindChild<ISolute>("NH4", relativeTo: (INodeModel)soil);                                
                    var NO3 =   Structure.FindChild<ISolute>("NO3", relativeTo: (INodeModel)soil);                                

                    DenitByPatch = patchManager.DenitrifiedNEachPatch;
                    DenitN2OByPatch = patchManager.N2Oatm300mmEachPatch;   // note that until get a new output variable, this is for the whole profile
                    UreaByPatch = patchManager.UreaEachPatch;
                    NH4ByPatch = patchManager.NH4EachPatch;
                    NO3ByPatch = patchManager.NO3EachPatch;
                    MinNByPatch = patchManager.MineralNEachPatch;
                    TotalCByPatch = patchManager.TotalCEachPatch;
                    TotalNByPatch = patchManager.TotalNEachPatch;

                    var sward =  Structure.FindAll<PastureSpecies>(relativeTo: (INodeModel)zones[x]);                                
                    var Clover =   Structure.FindChild<PastureSpecies>("AGPWhiteClover", relativeTo: (INodeModel)zones[x]);                                

                    LeachedNByPatch[x] = waterBalance.LeachNO3 + waterBalance.LeachNH4 + waterBalance.LeachUrea; 
                    HerbageWtByPatch[x] = sward.Sum(species => species.AboveGroundWt); 
                    HerbageNByPatch[x] = sward.Sum(species => species.AboveGroundN);   
                    HarvestedWtByPatch[x] = sward.Sum(species => species.HarvestedWt); 
                    HarvestedNByPatch[x] = sward.Sum(species => species.HarvestedN); 
                    FixedNByPatch[x] = sward.Sum(species => species.FixedN);
                    UptakeNByPatch[x] = sward.Sum(species => species.SoilUptakeN);
                    PastureCompositionByPatch[x] = Clover.AboveGroundWt / (HerbageWtByPatch[x] + 0.1);
                 }
                 
                    // now do the whole-paddock stuff
                    
                    DenitPdk = DenitByPatch.Sum() / nutrientPatchManager.NumPatches;
                    DenitN2OPdk = DenitN2OByPatch.Sum() / nutrientPatchManager.NumPatches;
                    LeachedNPdk = LeachedNByPatch.Sum();                                        // not part of the patching so do not divide  / nutrientPatchManager.NumPatches;
                    UreaPdk = UreaByPatch.Sum() / nutrientPatchManager.NumPatches;
                    NH4Pdk = NH4ByPatch.Sum() / nutrientPatchManager.NumPatches;
                    NO3Pdk = NO3ByPatch.Sum() / nutrientPatchManager.NumPatches;
                    MinNPdk = MinNByPatch.Sum() / nutrientPatchManager.NumPatches;
                    TotalCPdk = TotalCByPatch.Sum() / nutrientPatchManager.NumPatches;
                    TotalNPdk = TotalNByPatch.Sum() / nutrientPatchManager.NumPatches;
                    
                    HerbageWtPdk = HerbageWtByPatch.Sum();
                    HerbageNPdk = HerbageNByPatch.Sum();
                    HarvestedWtPdk = HarvestedWtByPatch.Sum();
                    HarvestedNPdk = HarvestedNByPatch.Sum();
                    FixedNPdk = FixedNByPatch.Sum();
                    UptakeNPdk = UptakeNByPatch.Sum();
                    PastureCompositionPdk = PastureCompositionByPatch.Sum();


                }
                

            }


        }

}
```
      Report DailyReport (disabled)
        VariableNames:
          [Clock].Today as Date
          [Clock].Today.Year as Year
          [SimpleGrazing].PseudoPatches as PseudoPatches
          [SimpleGrazing].ZoneCount as ZoneCount
          // whole soil and pasture states and fluxes (i.e., aggregated across patches or zones)
          Sum of [ReportingWithZonesHelper].ScriptReporting.DenitPdk from [ReportingWithPatchesPaddock].DayAfterLastOutput to [Clock].Today as Denit
          Sum of [ReportingWithZonesHelper].ScriptReporting.DenitN2OPdk from [ReportingWithPatchesPaddock].DayAfterLastOutput to [Clock].Today as DenitN2O
          Sum of [ReportingWithZonesHelper].ScriptReporting.LeachedNPdk from [ReportingWithPatchesPaddock].DayAfterLastOutput to [Clock].Today as LeachN
          //Last of [ReportingWithZonesHelper].ScriptReporting.UreaPdk from [ReportingWithPatchesPaddock].DayAfterLastOutput to [Clock].Today as UreaN
          //Last of [ReportingWithZonesHelper].ScriptReporting.NH4Pdk from [ReportingWithPatchesPaddock].DayAfterLastOutput to [Clock].Today as NH4N
          //Last of [ReportingWithZonesHelper].ScriptReporting.NO3Pdk from [ReportingWithPatchesPaddock].DayAfterLastOutput to [Clock].Today as NO3N
          Last of [ReportingWithZonesHelper].ScriptReporting.MinNPdk from [ReportingWithPatchesPaddock].DayAfterLastOutput to [Clock].Today as MinN
          //Last of [ReportingWithZonesHelper].ScriptReporting.TotalCPdk from [ReportingWithPatchesPaddock].DayAfterLastOutput to [Clock].Today as TotalC
          //Last of [ReportingWithZonesHelper].ScriptReporting.TotalNPdk from [ReportingWithPatchesPaddock].DayAfterLastOutput to [Clock].Today as TotalN
          //Mean of [ReportingWithZonesHelper].ScriptReporting.HerbageWtPdk from [ReportingWithPatchesPaddock].DayAfterLastOutput to [Clock].Today as HerbageWt
          //Mean of [ReportingWithZonesHelper].ScriptReporting.HerbageNPdk from [ReportingWithPatchesPaddock].DayAfterLastOutput to [Clock].Today as HerbageN
          //Mean of [ReportingWithZonesHelper].ScriptReporting.PastureCompositionPdk from [ReportingWithPatchesPaddock].DayAfterLastOutput to [Clock].Today as Composition
          Sum of [ReportingWithZonesHelper].ScriptReporting.HarvestedWtPdk from [ReportingWithPatchesPaddock].DayAfterLastOutput to [Clock].Today as HarvestedWt
          Sum of [ReportingWithZonesHelper].ScriptReporting.HarvestedNPdk from [ReportingWithPatchesPaddock].DayAfterLastOutput to [Clock].Today as HarvestedN
          Sum of [ReportingWithZonesHelper].ScriptReporting.FixedNPdk from [ReportingWithPatchesPaddock].DayAfterLastOutput to [Clock].Today as FixedN
          Sum of [ReportingWithZonesHelper].ScriptReporting.UptakeNPdk from [ReportingWithPatchesPaddock].DayAfterLastOutput to [Clock].Today as UptakeN
          Sum of [SimpleCow].HerdUrineNReturned from [ReportingWithPatchesPaddock].DayAfterLastOutput to [Clock].Today as UrineNReturned
          Sum of [SimpleCow].SilageFed from [ReportingWithPatchesPaddock].DayAfterLastOutput to [Clock].Today as SupplementsFed
          Sum of [SimpleCow].SilageMade from [ReportingWithPatchesPaddock].DayAfterLastOutput to [Clock].Today as SupplementsMade
          Sum of [SimpleCow].HerdDMIntake from [ReportingWithPatchesPaddock].DayAfterLastOutput to [Clock].Today as HerdDMIntake
          Sum of [SimpleCow].HerdMEDemand from [ReportingWithPatchesPaddock].DayAfterLastOutput to [Clock].Today as HerdMEDemand
          //[ReportingWithZonesHelper].ScriptReporting.SysTime as SysTime
          // states in the individual zones or patches
          //[ReportingWithZonesHelper].ScriptReporting.UreaByPatch as UreaByPatch
          //[ReportingWithZonesHelper].ScriptReporting.NH4ByPatch as NH4ByPatch
          //[ReportingWithZonesHelper].ScriptReporting.NO3ByPatch as NO3ByPatch
          //[ReportingWithZonesHelper].ScriptReporting.MinNByPatch as MinNByPatch
          //[ReportingWithZonesHelper].ScriptReporting.TotalCByPatch as TotalCByPatch
          //[ReportingWithZonesHelper].ScriptReporting.TotalNByPatch as TotalNByPatch
          //[NutrientPatchManager].NO3EachPatch
          //sum([NO3].kgha)
        EventNames:
          //Clock.Today >= new DateTime(1970, 1, 1) && Clock.Today.Month == 12 && Clock.Today.Day == 31
          [Clock].EndOfDay
      Summary
      Zone Field: Area=1; Slope=0; AspectAngle=0; Altitude=50
        Manager FertiliseFixedDates (disabled)
          EachYear = True
          Dates = 5-jan, 5-feb, 5-mar, 5-apr, 5-aug, 5-sep, 5-oct, 5-nov, 5-dec
          UseCritNThreshold = False
          CritNThreshold = 50
          CritNDepth = 75
          Depth = 50
          Amount = 15
          FertiliserType = UreaN
```csharp
using APSIM.Core;
using System;
using Models.Core;
using Models.Soils.Nutrients;
using Models.Soils;
using Models.PMF;
using APSIM.Shared.Utilities;
using System.Linq;
using Models.Interfaces;

namespace Models
{
    [Serializable]
    public class Script : Model, IStructureDependency
    {
        [Link] private Clock clock;
        [Link] private Fertiliser fertiliser;
        [Link] private ISummary summary;
        [Link] private Soil soil;
        private Nutrient nutrient;
        private Nutrient soilN;
        [Link]
        private IPhysical soilPhysical;
        [Link]
        private Nutrient Nutrient;
        [Link(Path="[SurfaceOrganicMatter].SurfaceResidue.Decomposition")]
        private OrganicFlow ResidueDecomposition;
        public IStructure Structure { private get; set; }
        
        


        [Separator("Fertiliser will be applied on the date(s) below")]
        [Description("Apply fertiliser on the same day(s) each year? If no, then must include the year of application below")]
        public bool EachYear { get; set; }

        [Description("Dates for one or more fertiliser applications (dd-mmm or dd-mmm-yyyy) as a list with a comma between dates")]
        public string[] Dates { get; set; }

        [Separator("Test for the mineral N in the soil and don't apply the fertiliser if greater than X kgN/ha is stored in the soil above a depth of Y mm")]
        [Description("Use a critical soil mineral N to prevent application above a threshold?")]
        public bool UseCritNThreshold { get; set; }

        [Description("Don't add fertiliser if N in the soil to the depth below exceeds (kg/ha)")]
        public double CritNThreshold { get; set; }

        [Description("Depth to which the amount of N in the soil should be calculated (mm)")]
        public double CritNDepth { get; set; }

        [Separator("Fertiliser application details")]
        [Description("Depth at which to apply the fertiliser (mm)")]
        public double Depth { get; set; }

        [Description("Amount of fertiliser to apply (kg N /ha) per application")]
        public double Amount { get; set; }

        [Description("Fertiliser type - select from the list")]
        [Display(Type = DisplayType.FertiliserType)]public string FertiliserType { get; set; }


        [EventSubscribe("StartOfSimulation")]
        private void FindSoilNOrNutrient(object sender, EventArgs e)
        {
            nutrient =  Structure.Find<Nutrient>() as Nutrient;
            soilN =  Structure.Find<Nutrient>() as Nutrient;

            if (nutrient == null && soilN == null)
                throw new Exception(string.Format("Error in script {0}: Unable to find nutrient or soilN.", Name));
        }

        [EventSubscribe("DoManagement")]
        private void OnDoManagement(object sender, EventArgs e)
        {
            if (OnApplicationDate())
            {
                if (NContentBelowThreshold())
                    fertiliser.Apply(Amount, FertiliserType, Depth);
                else
                    summary.WriteMessage(this, "Skipping fertiliser application due to soil mineral N content being above critical threshold.", MessageType.Diagnostic);
            }
        }

        /// <summary>Checks if today's date is one of the specified fertiliser application dates.</summary>
        private bool OnApplicationDate()
        {
            if (EachYear)
                return Dates.Any(d => DateUtilities.DatesEqual(d, clock.Today));
            
            DateTime[] dates = Dates.Select(d => DateTime.ParseExact(d, "d-MMM-yyyy", null)).ToArray();
            return dates.Any(d => SameDate(d, clock.Today));
        }

        /// <summary>Checks if N content in soil is below critical threshold.</summary>
        private bool NContentBelowThreshold()
        {
            if (!UseCritNThreshold)
                return true;
            
            double[] weights = GetLayerWeights();
            double cumSoilN = 0;

            for (int i = 0; i < soilPhysical.Thickness.Length; i++)
            {
                if (nutrient != null)
                    cumSoilN += weights[i] * nutrient.MineralN[i];
                else if (soilN != null)
                    cumSoilN += weights[i] * soilN.MineralN[i];
            }

            return cumSoilN <= CritNThreshold;
        }

        private double[] GetLayerWeights()
        {
            double[] weights = new double[soilPhysical.Thickness.Length];
            double cumDepth = 0;

            for (int i = 0; i < soilPhysical.Thickness.Length; i++)
            {
                cumDepth += soilPhysical.Thickness[i];
                if (cumDepth < CritNDepth)
                    weights[i] = 1;
                else if (cumDepth - soilPhysical.Thickness[i] <= CritNDepth)
                    weights[i] = (CritNDepth - (cumDepth - soilPhysical.Thickness[i])) / soilPhysical.Thickness[i];
                else
                    weights[i] = 0;
            }

            return weights;
        }

        private bool SameDate(DateTime d1, DateTime d2)
        {
            return d1.Year == d2.Year && d1.DayOfYear == d2.DayOfYear;
        }
    }
}
```
        Manager Fertilisation
          FertiliserType = UreaN
          FertiliserDates = 15-jan, 15-feb, 15-mar, 15-apr, 15-aug, 15-sep, 15-oct, 15-nov, 15-dec
          Amount = 190
          AmountType = False
```csharp
using Models.Soils;
using System;
using System.Linq;
using Models.Core;
using Models.PMF;
using APSIM.Shared.Utilities;
namespace Models
{
    [Serializable]
    public class Script : Model
    {
        [Link] Clock Clock;
        [Link] Fertiliser Fertiliser;
        
        [Separator("A component to apply fertiliser on one or more dates on every year of the simulation")]

        [Description("Type of fertiliser to apply? ")] 
        [Display(Type = DisplayType.FertiliserType)]public string FertiliserType { get; set; }

        [Description("Enter the fertilisation dates as dd-mmm with comma separation (any year information entered will be ignored): ")] 
        public string[] FertiliserDates { get; set; } 

        [Description("Amount of fertiliser to be applied (kg /ha)")] 
        public double Amount { get; set; }

        [Description("Is the above amount to be applied each time? (yes/ticked)? Or is it the total annual amount across all dates (no/unticked)")] 
        public bool AmountType { get; set; }
        
        [EventSubscribe("DoManagement")]
        private void OnDoManagement(object sender, EventArgs e)
        {
            foreach (string ddMMM in FertiliserDates)
            {
                if (DateUtilities.DatesEqual(ddMMM, Clock.Today))
                {
                    if (AmountType)
                        Fertiliser.Apply(amount: Amount, type: FertiliserType);
                    else
                        Fertiliser.Apply(amount: Amount / FertiliserDates.Length, type: FertiliserType);
                }
            }
        }
    }
}
```
        Manager CentrePivot
          allowIrrigation = True
          IrrigStart = 1-sep
          IrrigEnd = 30-apr
          SoilDepth = 500
          CritPAWForShallow = 60
          CritRainToPause = 30
          DaysToPauseOnCritRain = 3
          IrrigReturnShallow = 2
          IrrigAmtShallow = 10
          PercPAWIrrigDeficitShallow = 0
          IrrigEffShallow = 100
          IrrigReturnDeep = 4
          IrrigAmtDeep = 20
          IrrigDeficitDeep = 25
          IrrigEffDeep = 100
```csharp
using Models.Soils;
using System;
using System.Linq;
using System.Diagnostics;
using Models.Core;
using Models.Interfaces;
using APSIM.Shared.Utilities;

namespace Models
{
    [Serializable]
    public class Script : Model
    {
        [Link] Clock clock;
        [Link] IWeather weather;
        [Link] Irrigation irrigation;
        [Link] ISummary summary;
        [Link] Physical physical;
        [Link] Water water;

        [Description("Allow this mananger to control irrigation?")]
        public bool allowIrrigation { get; set; } = true;

        [Separator("All soils")]

        [Description("Start of irrigation season (dd-mmm)")] 
        public string IrrigStart { get; set; }

        [Description("End of irrigation season (dd-mmm)")] 
        public string IrrigEnd { get; set; }

        [Description("Enter the depth to which water deficit is computed (mm)")] 
        public double SoilDepth { get; set; }
        
        [Description("PAW below which soil is considered 'shallow' (mm)")] 
        public double CritPAWForShallow { get; set; }

        [Description("Amount of rainfall over the last 3 days to cause pause to irrigator (mm)")] 
        public double CritRainToPause { get; set; }

        [Description("Number of days to pause irrigator after critical delay (days)")] 
        public double DaysToPauseOnCritRain { get; set; }
        
        [Separator("Shallow soils")]
        
        [Description("Irrigation return period for shallow soils (days)")] 
        public double IrrigReturnShallow { get; set; }

        [Description("Effective irrigation amount for shallow soils (mm)")] 
        public double IrrigAmtShallow { get; set; }

        [Description("Percentage of PAW at which to irrigate shallow soils (%)")] 
        public double PercPAWIrrigDeficitShallow { get; set; }

        [Description("Irrigation efficiency for shallow soils (%)")] 
        public double IrrigEffShallow { get; set; }

        [Separator("Deep soils")]
        
        [Description("Irrigation return period for deep soils (days)")] 
        public double IrrigReturnDeep { get; set; }

        [Description("Effective irrigation amount for deep soils (mm)")] 
        public double IrrigAmtDeep { get; set; }

        [Description("Percentage of PAW at which to irrigate deep soils (%)")] 
        public double IrrigDeficitDeep { get; set; }

        [Description("Irrigation efficiency for deep soils (%)")] 
        public double IrrigEffDeep { get; set; }


        // Output variables
        [Units("mm")]
        public double TodayDeficit {get; set; }
         
        [Units("mm")]
        public double TodayDeficit_nve {get; set; }
         
        [Units("")]
        public double IrrigDay {get; set; }
         
        [Units("")]
        public double SoilPAW {get; set; }
         
        [Units("")]
        public double IrrigDeficit {get; set; }
        
        [Units("")]
        public double IrrigReturn {get; set; }
        
        [Units("")]
        public double IrrigAmt {get; set; }
        
        [Units("")]
        public double IrrigEff {get; set; }
        
        [Units("mm")]
        public double Rain3 {get; set; }
        
        [Units("mm")]
        public double[] Rain_3 {get; set; } = new double[3];
        
        [Units("")]
        public double Days2Pause {get; set; }

         // private variables
        private double irrigDeficitShallow {get; set; }

        
        [EventSubscribe("StartOfSimulation")]
        private void OnStartOfSimulation(object sender, EventArgs e)
        {
            if (allowIrrigation)
            {
            
                IrrigDay = 5000;  // so will reset to 1 on first day

                Rain3 = 0.0;
                Rain_3[0] = 0.0; Rain_3[1] = 0.0; Rain_3[2] = 0.0;

                SoilPAW = 0.0;
                double mySoilDepth = 0;
                for (int z = 0; z <= physical.Thickness.Length - 1; z++)
                {
                    mySoilDepth = mySoilDepth + physical.Thickness[z];
                    if (mySoilDepth <= SoilDepth)
                        SoilPAW = SoilPAW + physical.DULmm[z] - physical.LL15mm[z];
                }
                if (SoilPAW <= CritPAWForShallow)
                {
                    IrrigDeficit = PercPAWIrrigDeficitShallow / (double)100 * SoilPAW;
                    IrrigReturn = IrrigReturnShallow;
                    IrrigAmt = IrrigAmtShallow;
                    IrrigEff = IrrigEffShallow;
                    summary.WriteMessage(this, "Soil is considered to be shallow " + CritPAWForShallow + " " + SoilPAW, MessageType.Information);
                }
                else
                {
                    IrrigDeficit = IrrigDeficitDeep;
                    IrrigReturn = IrrigReturnDeep;
                    IrrigAmt = IrrigAmtDeep;
                    IrrigEff = IrrigEffDeep;
                    summary.WriteMessage(this, "Soil is considered to be deep", MessageType.Information);
                }

                summary.WriteMessage(this, $"Irrigation critical deficit (mm): {IrrigDeficit}", MessageType.Information);
                summary.WriteMessage(this, $"        Irrigation return (days): {IrrigReturn}", MessageType.Information);
                summary.WriteMessage(this, $"   Irrigation pumped amount (mm): {IrrigAmt}", MessageType.Information);
                summary.WriteMessage(this, $"       Irrigation efficiency (%): {IrrigEff}", MessageType.Information);
            }
        }
        
        
        [EventSubscribe("DoManagement")]
        private void OnDoManagement(object sender, EventArgs e)
        {
            if (allowIrrigation)
            {
                Rain_3[2] = Rain_3[1];
                Rain_3[1] = Rain_3[0];
                Rain_3[0] = weather.Rain;
                Rain3 = Rain_3[0] + Rain_3[1] + Rain_3[2];
                if (Rain3 >= CritRainToPause)
                    Days2Pause = DaysToPauseOnCritRain;
                else
                    Days2Pause = Days2Pause - 1;

                TodayDeficit = 0.0;
                SoilPAW = 0.0;
                double mySoilDepth = 0;

                for (int z = 0; z <= physical.Thickness.Length - 1; z++)
                {
                    mySoilDepth = mySoilDepth + physical.Thickness[z];
                    if (mySoilDepth <= SoilDepth)
                    {
                        SoilPAW = SoilPAW + physical.DULmm[z] - physical.LL15mm[z];
                        TodayDeficit = TodayDeficit + physical.DULmm[z] - Math.Min(physical.DULmm[z], water.MM[z]);
                    }
                }
                TodayDeficit_nve = -1 * TodayDeficit;

                if (DateUtilities.WithinDates(IrrigStart, clock.Today, IrrigEnd))
                {
                    if (SoilPAW <= CritPAWForShallow)
                    {
                        IrrigDeficit = PercPAWIrrigDeficitShallow / 100 * SoilPAW;
                        IrrigReturn = IrrigReturnShallow;
                        IrrigAmt = IrrigAmtShallow;
                        IrrigEff = IrrigEffShallow;
                    }
                    else
                    {
                        IrrigDeficit = IrrigDeficitDeep;
                        IrrigReturn = IrrigReturnDeep;
                        IrrigAmt = IrrigAmtDeep;
                        IrrigEff = IrrigEffDeep;
                    }

                    if (Days2Pause < 0.5)
                    {
                        IrrigDay = IrrigDay + 1;
                        if (IrrigDay > IrrigReturn)
                            IrrigDay = 1;// and day = 1 is when the irrigation happens

                        if (TodayDeficit >= IrrigDeficit)
                        {
                            if (IrrigDay == 1)
                                irrigation.Apply(amount: IrrigAmt / (IrrigEff / 100.0));
                        }
                    }
                }
            }
        }    
    }
}
```
        Irrigation
        Fertiliser
        PastureSpecies AGPRyegrass: doyGermination=275; daysEmergenceToAnthesis=120; daysAnthesisToMaturity=85; degreesDayForAnthesis=1100; degreesDayForMaturity=900; daysAnnualsFactor=45; CanopyType=PastureSpecies; InitialShootDM=1500; InitialRootDM=450; InitialRootDepth=750; initialDMFractionsGrasses=[0.15, 0.25, 0.25, 0.05, 0.05, 0.1, 0.1, 0.05, 0, 0, 0]; initialDMFractionsForbs=[0.2, 0.2, 0.15, 0.05, 0.1, 0.15, 0.1, 0.05, 0, 0, 0]; PhotosyntheticEfficiency=0.01; PhotosynthesisCurveFactor=0.8; FractionPAR=0.5; ReferenceCO2=380; CO2EffectScaleFactor=700; CO2EffectOffsetFactor=600; CO2EffectMinimum=0.7; CO2EffectExponent=2; ReproSeasonDurationCoeff=2; ReproSeasonShouldersLengthFactor=1; ReproSeasonOnsetDurationFactor=0.6; RelativeTurnoverEmerging=2; DetachmentDroughtCoefficient=3; DetachmentDroughtEffectMin=0.1; TurnoverStockFactor=0.01; TurnoverDefoliationEffectMin=0.025; MinimumGreenLeafProp=0.8; MinimumGreenRootProp=0.5
          initialDMFractionsLegumes=[0.16, 0.23, 0.22, 0.05, 0.03, 0.05, 0.05, 0.01, 0.04, 0.08, 0.08]
          LinearInterpolationFunction FVPDFunction
        PastureSpecies AGPWhiteClover: doyGermination=275; daysEmergenceToAnthesis=120; daysAnthesisToMaturity=85; degreesDayForAnthesis=1100; degreesDayForMaturity=900; daysAnnualsFactor=45; CanopyType=PastureSpecies; InitialShootDM=250; InitialRootDM=150; InitialRootDepth=350; initialDMFractionsGrasses=[0.15, 0.25, 0.25, 0.05, 0.05, 0.1, 0.1, 0.05, 0, 0, 0]; initialDMFractionsForbs=[0.2, 0.2, 0.15, 0.05, 0.1, 0.15, 0.1, 0.05, 0, 0, 0]; PhotosyntheticEfficiency=0.01; PhotosynthesisCurveFactor=0.8; FractionPAR=0.5; ReferenceCO2=380; CO2EffectScaleFactor=700; CO2EffectOffsetFactor=600; CO2EffectMinimum=0.7; CO2EffectExponent=2; ReproSeasonDurationCoeff=2; ReproSeasonShouldersLengthFactor=1; ReproSeasonOnsetDurationFactor=0.6; RelativeTurnoverEmerging=2; DetachmentDroughtCoefficient=3; DetachmentDroughtEffectMin=0.1; TurnoverStockFactor=0.01; TurnoverDefoliationEffectMin=0.025; MinimumGreenLeafProp=0.8; MinimumGreenRootProp=0.5
          initialDMFractionsLegumes=[0.16, 0.23, 0.22, 0.05, 0.03, 0.05, 0.05, 0.01, 0.04, 0.08, 0.08]
          LinearInterpolationFunction FVPDFunction
        SurfaceOrganicMatter: InitialResidueName=Sward; InitialResidueType=grass; InitialResidueMass=1000; InitialStandingFraction=0; InitialCPR=0; InitialCNR=15
        Soil: SoilType=NZ_sedementary; Region=Plains; State=Canterbury; Country=New Zealand; Latitude=0; Longitude=0
          DataSource=Generic profile descriptions provided by Trevor Webb and data for functional horizions based on SWAMP project results
          Comments=Bulk density values were measured on the fine earth fraction so values entered into apsim soil are adjusted down to account for stone content (assuming stones are inert from all soil process so their mass and volume is removed from model paramaters).  SAT, DUL, LL15 and Air dry have been adjusted down to account for stone content.  OC has not been adjusted so the model will get the correct carbon and N amounts using the adjusted BD.
          Physical
            Thickness  ParticleSizeSand  ParticleSizeSilt  ParticleSizeClay  Rocks  BD     AirDry  LL15   DUL    SAT    KS
            200        14.5              65.5              20                0      1.31   0.077   0.153  0.373  0.456  4832.039
            150        18                58                24                0      1.524  0.201   0.201  0.332  0.394  389.229
            200        13                48                39                0      1.42   0.298   0.298  0.426  0.442  21.6
            350        1                 55                44                0      1.424  0.308   0.308  0.446  0.456  19.051
            150        1                 55                44                0      1.424  0.308   0.308  0.446  0.456  19.051
            150        15                66                19                0      1.601  0.162   0.162  0.325  0.376  97.995
            300        15                66                19                0      1.601  0.162   0.162  0.325  0.376  97.995
            Rocks source: Calculated
            SoilCrop AGPRyegrassSoil: LL=[0.154, 0.201, 0.299, 0.308, 0.308, 0.162, 0.162]; KL=[0.1, 0.1, 0.1, 0.05, 0.05, 0.05, 0.05]; XF=[1, 0.8, 0.8, 0.3, 0, 0, 0]
            SoilCrop AGPWhiteCloverSoil: LL=[0.154, 0.201, 0.299, 0.308, 0.308, 0.162, 0.162]; KL=[0.1, 0.1, 0.1, 0.05, 0.05, 0.05, 0.05]; XF=[1, 0.8, 0.8, 0.3, 0, 0, 0]
          Organic: FOMCNRatio=40; CarbonUnits=Total
            Thickness  Carbon  SoilCNRatio  FBiom  FInert  FOM
            200        4.502   11           0.048  0.382   347.67
            150        1.91    11           0.027  0.634   257.56
            200        0.772   11           0.019  0.784   172.648
            350        0.422   11           0.015  0.924   85.734
            150        0.422   11           0.015  0.924   63.514
            150        0.402   11           0.015  0.971   47.052
            300        0.4     11           0.015  0.985   25.823
          Chemical: PHUnits=Water
            Thickness  PH  CEC
            200        6   16.441
            150        6   11.9115
            200        6   13.021
            350        6   12.7645
            150        6   12.7645
            150        6   6.9825
            300        6   6.978
            CEC source: Calculated
          WaterBalance SoilWater: SummerDate=1-Oct; SummerU=9; SummerCona=4.4; WinterDate=1-Apr; WinterU=6; WinterCona=3; DiffusConst=88; DiffusSlope=35; Salb=0.13; CN2Bare=73; CNRed=20; CNCov=0.8; PSIDul=-100; Thickness=[200, 150, 200, 350, 150, 150, 300]; SWCON=[0.496, 0.366, 0.374, 0.076, 0.076, 0.306, 0.306]
          Water: Thickness=[200, 150, 200, 350, 150, 150, 300]; InitialValues=[0.373, 0.332, 0.426, 0.446, 0.446, 0.325, 0.325]; FilledFromTop=true
          SolutePatch NO3: same as TestPatches.Factors.Permutation.System.D.VL.NO3
          SolutePatch NH4: same as TestPatches.Factors.Permutation.System.D.VL.NH4
          SolutePatch Urea: same as TestPatches.Factors.Permutation.System.D.VL.Urea
          SoilTemperature Temperature
          NutrientPatchManager: NPartitionApproach=0; AutoAmalgamationApproach=0; basePatchApproach=0; AllowPatchAmalgamationByAge=false; PatchAgeForForcedMerge=0; LayerForNPartition=-99
        Report Paddock (disabled): EventNames=[Clock].EndOfDay
          VariableNames:
            [Clock].Today as Date
            Sum of [ISoilWater].LeachNO3 from 1-Jul to [Clock].Today as Leaching
            sum([Soil].NO3.kgha + [Soil].NH4.kgha + [Soil].Urea.kgha) as MineralN
            [AGPRyegrass].HarvestedWt + [AGPWhiteClover].HarvestedWt from 1-Jul to [Clock].Today as cumHarvestedWt   //the amount harvested (kg DM /ha)
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