Simulations: Version=159
  DataStore
  Simulation Base
    Clock: Start=1972-01-01; End=1972-12-31
    Weather: FileName=%root%\Tests\WeatherFiles\Ruakura.met
    Summary
    SoilArbitrator Soil Arbitrator
    Forages
      Parameters:
        Name                          IsLive  DigestibilityString  FractionConsumable  MinimumAmount  UseDigestibilityFromModel
        SurfaceOrganicMatter.Residue  true    0.7                  1                   100            false
        SurfaceOrganicMatter.Residue  false   0.3                  1                   0              false
        AGPRyegrass.Leaf              true    0.7                  1                   100            false
        AGPRyegrass.Leaf              false   0.3                  1                   0              false
        AGPRyegrass.Stem              true    0.7                  1                   100            false
        AGPRyegrass.Stem              false   0.3                  1                   0              false
        AGPRyegrass.Stolon            true    0.7                  1                   100            false
        AGPRyegrass.Stolon            false   0.3                  1                   0              false
        AGPWhiteClover.Leaf           true    0.7                  1                   100            false
        AGPWhiteClover.Leaf           false   0.3                  1                   0              false
        AGPWhiteClover.Stem           true    0.7                  1                   100            false
        AGPWhiteClover.Stem           false   0.3                  1                   0              false
        AGPWhiteClover.Stolon         true    0.7                  1                   100            false
        AGPWhiteClover.Stolon         false   0.3                  1                   0              false
    MicroClimate: a_interception=0; b_interception=0; c_interception=0; d_interception=0; SoilHeatFluxFraction=0; MinimumHeightDiffForNewLayer=0; NightInterceptionFraction=0; ReferenceHeight=2
    Manager SimpleCow
      Verbose = False
      CowBodyWeight = 450
      CowDateCalving = 1-aug
      CowDateInCalf = 1-nov
      CowDateDryOff = 10-may
      LactationCurveParam = 20, 0.2, -0.04, 0.092
      StockingRate = 2.25
      Num1HaPaddocks = 25
      SilageNConc = 2.75
      SilageMEConc = 11
      UrinationsPerHead = 11
      patchMargin = 0.1
      AdjustVolme = False
```csharp
using Models.Climate;
using System;
using System.Linq;
using Models.Core;
using Models.PMF;
using Models.Zones;
using Models.AgPasture;
using System.Xml.Serialization;
using Models.WaterModel;
using Models.Surface;
using Models.Soils;
using APSIM.Shared.Utilities;
using System.Collections.Generic;
using Models.Interfaces;
using Models.Soils.Nutrients;
using Models.Soils.NutrientPatching;
using MathNet.Numerics.Distributions;
using MathNet.Numerics.LinearAlgebra;
using System.Diagnostics;
using Newtonsoft.Json;
using Models.Core.ApsimFile;




namespace Models
{
    [Serializable]
    [System.Xml.Serialization.XmlInclude(typeof(Model))]
    public class SimpleCowScript : Model
    {
		[Link] Simulation simulation;
        [Link] Clock clock;
        [Link] Fertiliser fertiliser;
        [Link] WaterBalance waterBalance;
        [Link] SurfaceOrganicMatter surfaceOrganicMatter;
        [Link] INutrientPatchManager patchManager;
        [Link] ISummary summary;
    
        [Link] private Soil soil;
        [Link] private Weather weather;
        [Link] private Zone zone;
        [Link] private IPhysical soilPhysical;
        [Link] private List<NutrientPatchManager> patchManagers;




		/// <summary>class for encapsulating a urine return.</summary>
		public class DoUrineReturnEventData : EventArgs
		{
    		/// <summary>Amount of urine to return (kg)</summary>
	    	public double Amount { get; set;  }

	   		/// <summary>Depth (mm) of soil to return urine into.</summary>
    		public double Depth { get; set;  }

	   		/// <summary>Grazed dry matter.</summary>
		    public double GrazedDM { get; set; }
		}

		/// below is the definition of the event
		public event EventHandler<DoUrineReturnEventData> DoCowUrineReturn;


        // --------------- Privates ---------------------------------

        //private double CowBodyWeight = 450.0;      // kg put on UI
        //private string CowDateCalving = "1-aug";   // put on UI
        //private string CowDateInCalf = "1-nov";    //  3 months after calving
        //private string CowDateDryOff = "30-apr";   // put on UI
        private double CowMSPerDay = 0.0;         // kgMS/day/head - calculated, initialising here
        private double CowMSEnergyPerKg = 77.0;         // MJME/kg MS (trying 77 c.f. 80)
        private double CowWalkingDist = 3.0;            // km
        private double CowWalkingEnergyPerKm = 2.0;         // MJME/km
        private double[] CowN2BodyPerc = { 30.0, 10.0 };         // Percent N in intake to body and product for milking and dry
        private double[] CowN2UrinePerc = { 42.0, 54.0 };         // Percent N in intake to uriney and product for milking and dry
        private double[] CowN2DungPerc = { 28.0, 36.0 };         // Percent N in intake to dung and product for milking and dry
        //private double[] LactationCurveParam = { 20.0, 0.2, -0.04, 0.092 };         // put on UI Parameters for the lactation curve, last parm 0.113 will give 500 kg MS, 0.092 will give 406 kg MS
        private double WeeksBeforeCalving = 0.0;     // cannot this be calculated?
        private double LactationWeek = 0.0;          // and this?
        private double UrineDepth = 0;               // wot?
                
		// perhaps should relate this to cow body weight
        //private double[] CowPregnancyParam = {54.59, -0.135}; // multiplier and exponential parameters for pregnancy energy (25 kg calf), time in weeks before
        //private double[] CowPregnancyParam = {63.931, -0.139}; // multiplier and exponential parameters for pregnancy energy (30 kg calf), time in weeks before
        private double[] CowPregnancyParam = { 72.154, -0.143 }; // multiplier and exponential parameters for pregnancy energy (35 kg calf), time in weeks before
        //private double[] CowPregnancyParam = {76.208, -0.142}; // multiplier and exponential parameters for pregnancy energy (40 kg calf), time in weeks before
   
        private double CowMaintME = 54; //But will be overridden in StartSimulation  
        // MJME/day https://www.dairynz.co.nz/media/5789573/facts_and_figures_web_chapter4_cow_feed_requirements.pdf page 4 and Excel regression on table "Maintenance MJ ME/day"

        private double AmountDungCReturned = 0.0;
        private double myResidual;
        bool GrazeNow = false;


        // --------------- Parameters --------------------------------------

        [Description("Verbose output?")] public bool Verbose { get; set; } 

        [Separator("Cow characteristics")]
        
        [Description("Cow mature live weight (kg) - only use 450 until make some of the other parameters dynamic")]
        [Units("kg")]
        public double CowBodyWeight { get; set; } // = 450.0;
       
        [Description("Calving date (dd-mmm)")]
        [Units("dd-mmm")]
        public string CowDateCalving{ get; set; }
       
        [Description("If-calf date (dd-mmm)")]
        [Units("dd-mmm")]
        public string CowDateInCalf{ get; set; }
       
        [Description("Dry-off date (dd-mmm)")]
        [Units("dd-mmm")]
        public string CowDateDryOff{ get; set; }

        [Separator("          Woods equation lactation curve - 20.0, 0.2, -0.04, 0.092 for 406 kg MS in the seasoon. Last param at 0.113 will give 500")]

        [Description("Lactation curve parameters - try 20.0, 0.2, -0.04, 0.092 for 406 kg MS in the seasoon ")]
        [Units("various")]
        public double[] LactationCurveParam { get; set; }
       
        /*[Description("")]
        [Units("")]
        public double X { get; set; }
       
        [Description("")]
        [Units("")]
        public double X { get; set; }
       
        [Description("")]
        [Units("")]
        public double X { get; set; }
       
        [Description("")]
        [Units("")]
        public double X { get; set; }*/
       
        

        [Separator("Herd and ME demand information")]


        [Description("Stocking rate (cows/ha)")]
        [Units("cows/ha")]
        public double StockingRate { get; set; }

        [Description("Number of paddocks on the farm")]
        [Units("days")]
        public int Num1HaPaddocks { get; set; }

        [Description("N concentration of the silage fed out (% N in DM)")]
        [Units("kgN/kgDM")]
        public double SilageNConc { get; set; }

        [Description("ME concentration of the silage fed out (MJ ME / kg DM)")]
        [Units("MJME/kgDM")]
        public double SilageMEConc { get; set; }

        [Separator("Excreta return parameters")]

        [Description("Number of urinations per animal per day")]
        public double UrinationsPerHead { get; set; }


        [Description("Size of the edge effect (m)")]
        [Units("m")]
        public double patchMargin { get; set; }
        
        [Description("Adjust the urine volume and depth with N load scaling?")]
        public bool AdjustVolme { get; set; }


        [Separator("Patch characteristics")]

   
        // --------------------------- Outputs -------------------------------------------
      

        [Units("m2")]
        public double AreaUrinePatchesToday { get; set; }

        [Units("kgN/ha")]
        public double AmountUrineNReturned { get; set; }

        [Units("head/ha")]
        public double StockingDensity { get; set; }

        public double LoadAdjustmentPropOverall { get; set; }

        public double LoadAdjustmentGrammesIndividual { get; set; }

        [Units("mm")]
        public double AverageUrineDepth { get; set; }
   
        [Units("kgN/ha")]
        public double UrineNReturned { get; set; }

        public double SilageMade { get; set; }
        public double SilageFed { get; set; }
        public double SilageNFed { get; set; }
        public double SilageMEFed { get; set; }
        public double HerdMEDemand { get; set; }
        public double CowMEDemand { get; set; }
        public double CowDMIntake { get; set; }
        public string CowState { get; set; }


        // --------------------------- Methods -------------------------------------------
    
        /// <summary>Invoked when simulation starts.</summary>
        /// <param name="sender">The sender of the event.</param>
        /// <param name="e">The event arguments.</param>
        [EventSubscribe("StartOfSimulation")]
        private void OnStartOfSimulation(object sender, EventArgs e)
        {
        	//Debugger.Break();
        	
			CowMaintME = CowBodyWeight * 0.0942 + 11.507;   
        	// MJME/day https://www.dairynz.co.nz/media/5789573/facts_and_figures_web_chapter4_cow_feed_requirements.pdf page 4 and Excel regression on table "Maintenance MJ ME/day"

        }

        
        /// <summary>Invoked by clock to do management actions.</summary>
        /// <param name="sender">The sender of the event.</param>
        /// <param name="e">The event arguments.</param>
        [EventSubscribe("DoManagement")]
        private void OnDoManagement(object sender, EventArgs e)
        {
            CowPhysiologicalState();

            SilageMade = 0.0;
            SilageFed = 0.0;
            SilageNFed = 0.0;
            SilageMEFed = 0.0;
      
            UrineNReturned = 0.0;
            
            //TODO these grazing parameters need to go back into the manager!
            StockingDensity = /*DaysPerGrazeArray[Clock.month - 1] * */ Num1HaPaddocks * StockingRate;



        }
        
        
        /// <summary>Invoked when a graze occurs.</summary>
        /// <param name="sender">The sender of the event.</param>
        /// <param name="e">The event arguments.</param>
        [EventSubscribe("DoUrineReturn")]
        private void OnDoUrineReturn(object sender, SimpleGrazing.UrineReturnType urineReturn)
        {
        
			DoCowUrineReturn.Invoke(this,
	            new DoUrineReturnEventData()
    	        {
    	        	Amount = 24, //AmountUrineNReturned,
    	            Depth = 200, //DepthUrineIsAdded,
    	            GrazedDM = 1200 //GrazedDM
    	        });
        
        }

        
        
        private void CowPhysiologicalState()
        {
            if (DateUtilities.CompareDates(CowDateCalving, clock.Today) > 0)
                WeeksBeforeCalving = (DateUtilities.GetDate(CowDateCalving, (clock.Today.Year + 1)) - clock.Today).TotalDays / 7.0;
            else
                WeeksBeforeCalving = (DateUtilities.GetDate(CowDateCalving, clock.Today.Year) - clock.Today).TotalDays / 7.0;


            if (DateUtilities.CompareDates(CowDateCalving, clock.Today) <= 0)
                LactationWeek = (clock.Today - DateUtilities.GetDate(CowDateCalving, (clock.Today.Year - 1))).TotalDays / 7.0;
            else
                LactationWeek = (clock.Today - DateUtilities.GetDate(CowDateCalving, (clock.Today.Year))).TotalDays / 7.0;


            // find state
            if (DateUtilities.WithinDates(CowDateCalving, clock.Today, CowDateInCalf))
            {
                CowState = "Milking-Notpreg";
                CowMSPerDay = LactationCurveParam[0] * Math.Pow(LactationWeek, LactationCurveParam[1]) * Math.Exp(LactationCurveParam[2] * LactationWeek) * LactationCurveParam[3];
                //CowMEDemand = 0.0 + 0.0 + CowWalkingDist * CowWalkingEnergyPerKm + CowMSPerDay * CowMSEnergyPerKg;
                CowMEDemand = CowMaintME + 0.0 + CowWalkingDist * CowWalkingEnergyPerKm + CowMSPerDay * CowMSEnergyPerKg;
            }
            else if (DateUtilities.WithinDates(CowDateInCalf, clock.Today, CowDateDryOff))
            {
                CowState = "Milking-Pregnant";
                CowMSPerDay = LactationCurveParam[0] * Math.Pow(LactationWeek, LactationCurveParam[1]) * Math.Exp(LactationCurveParam[2] * LactationWeek) * LactationCurveParam[3];
                //CowMEDemand = 0.0 + (CowPregnancyParam[0] * Math.Exp(CowPregnancyParam[1] * WeeksBeforeCalving)) + CowWalkingDist * CowWalkingEnergyPerKm + CowMSPerDay * CowMSEnergyPerKg;  //=72.154*EXP(-0.143*L3)
                CowMEDemand = CowMaintME + (CowPregnancyParam[0] * Math.Exp(CowPregnancyParam[1] * WeeksBeforeCalving)) + CowWalkingDist * CowWalkingEnergyPerKm + CowMSPerDay * CowMSEnergyPerKg;  //=72.154*EXP(-0.143*L3)
            }
            else if (DateUtilities.WithinDates(CowDateDryOff, clock.Today, CowDateCalving))
            {
                CowState = "Dry-Pregnant";
                CowMSPerDay = 0.0;
                CowMEDemand = CowMaintME + (CowPregnancyParam[0] * Math.Exp(CowPregnancyParam[1] * WeeksBeforeCalving)) + CowWalkingDist * CowWalkingEnergyPerKm + 0.0;  //=72.154*EXP(-0.143*L3)
            }
            else
                throw new Exception("Error in calculating CowState");  

            HerdMEDemand = CowMEDemand * StockingDensity;
            //summary.WriteMessage(this, Clock.Today + " CowState " + CowState + " CowMSPerDay " + CowMSPerDay + " CowMEDemand " + CowMEDemand, MessageType.Diagnostic);

      
        }
        
        
    }
}
```
    Manager PatchZoneManagerForSimpleCow
      Verbose = False
      PseudoPatches = False
      ZoneCount = 10
      UrineReturnType = FromElsewhere
      UrineReturnPattern = RotatingInOrder
      UrineDepthPenetration = 200
```csharp
using Newtonsoft.Json;
using Models.Soils.Nutrients;
using Models.Soils.NutrientPatching;
using Models.Interfaces;
using System.Diagnostics;
using System.Collections.Generic;
using APSIM.Shared.Utilities;
using Models.Surface;
using Models.Soils;
using System.Xml.Serialization;
using Models.AgPasture;
using Models.Zones;
using Models.PMF;
using Models.Core;
using Models.Core.ApsimFile;
using System;
using System.Linq;
using Models.Climate;

namespace Models
{
    [Serializable]
    [System.Xml.Serialization.XmlInclude(typeof(Model))]
    public class Script : Model
    {
        [Link] private Clock clock;
        [Link] private Soil soil;
        [Link] private ISummary summary;
        [Link] private Weather weather;
        [Link] private Zone zone;
        [Link] private IPhysical soilPhysical;
        [Link] private List<NutrientPatchManager> patchManagers;

        private Sward sward;
      
        [Description("Verbose reporting to the summary file?")]
        public bool Verbose { get; set; }
        
        [Description("Should this simulation create Patches? If not then explict Zones will be created")]
        public bool PseudoPatches { get; set; }
        
        [Description("How many patches or zones should be created?")]
        public int ZoneCount { get; set; }
        
        [Description("Nature of nutrient return")]
        public UrineReturnTypes UrineReturnType { get; set; }

        [Description("Pattern (spatial) of nutrient return")]
        public UrineReturnPatterns UrineReturnPattern { get; set; }

        [Description("Depth of urine penetration (mm)")]
        public double UrineDepthPenetration { get; set; }

        public int ZoneNumForUrine { get; set; }    // zone or patch that urine will be applied to
        public int NumZonesForUrine { get; set; }   // not enabled yet but for applying urine across more than one zone or patch
        public double DivisorForReporting { get; set; }   // 
        
        public double HarvestedWt { get; set; }     // from the whole paddock
        public double HarvestedN { get; set; }      // from the whole paddock
        public double AmountUrineNReturned { get; set; }   // to the whole paddock
        public double AmountDungNReturned { get; set; }    // to the whole paddock
        public double AmountDungCReturned { get; set; }    // to the whole paddock
        
        private double[] MonthlyUrineNAmt;                 // breaks the N balance but useful for testing
        private bool GrazeToday;
		private double[] UrineDepthPenetrationArray;

		[NonSerialized]
		Random pseudoRandom; // = new Random(666);  // sets a constant seed value


        public enum UrineReturnPatterns
        {
            // <summary>Not enabled Uniform</summary>
            //UniformAcrossAllPatches,
            /// <summary>Rotating in order</summary>
            RotatingInOrder,
            /// <summary>Not enabled Random</summary>
            Random,
            /// <summary>Not enabled Pseudo-random</summary>
            PseudoRandom
        }
        
        public enum UrineReturnTypes
        {
            /// <summary>FromHarvest</summary>
            FromHarvest,
            /// <summary>SetMonthly</summary>
            SetMonthly,
            /// <summary>From SimpleCow</summary>
            FromElsewhere
        }


        public override void OnPreLink()
        {
            var simulation = Parent.Parent as Simulation;
            var zone = simulation.FindChild<Zone>();
                
			// Set the maximum N uptake for all species
			foreach (var species in zone.FindAllDescendants<PastureSpecies>())
			{
				var root = species.FindChild<PastureBelowGroundOrgan>();
				root.MaximumNUptake = 3.0;
			}
				
            if (!PseudoPatches)
            {
	            zone.Area = 1.0 / ZoneCount;  // and then this will apply to all the new zones  
	            for (int i = 0; i < ZoneCount-1; i++)
	            {
	                var newZone = Apsim.Clone(zone);
	                Structure.Add(newZone, simulation);
	            }
	         }
        }

        [EventSubscribe("StartOfSimulation")] private void OnStartOfSimulation(object sender, EventArgs e)
        {
            if (Verbose && !PseudoPatches)
            	summary.WriteMessage(this, "Created " + ZoneCount + " identical zones, each of area " + (1.0 / ZoneCount) + " ha", MessageType.Diagnostic);

            if (Verbose)
            	summary.WriteMessage(this, "Initialising the ZoneManager for grazing, urine return and reporting", MessageType.Diagnostic);

            sward = new Sward(zone); 
			pseudoRandom = new Random(666);  // sets a constant seed value
			
			if (PseudoPatches)
				DivisorForReporting = 1.0;
			else
				DivisorForReporting = ZoneCount;
			
			GrazeToday = false;

            MonthlyUrineNAmt = new double[] { 24, 19, 17, 12, 8, 5, 5, 10, 16, 19, 23, 25 }; //This is to get a pattern of return that varies with month but removes the variation that might be caused by small changes in herbage growth
            //MonthlyUrineNAmt = new double[] { 100, 100, 100, 12, 8, 5, 5, 10, 16, 19, 23, 25 }; //This is to get a pattern of return that varies with month but removes the variation that might be caused by small changes in herbage growth

            if (PseudoPatches)
            {
                foreach (var patchManager in patchManagers)
                {
                    //patchManager.MaximumNitrogenAvailableToPlants = 0.45; This is now set in pre start
                    patchManager.NPartitionApproach = PartitionApproachEnum.BasedOnConcentrationAndDelta;
                    patchManager.AutoAmalgamationApproach = AutoAmalgamationApproachEnum.None;
                    patchManager.basePatchApproach = BaseApproachEnum.IDBased;
                    patchManager.AllowPatchAmalgamationByAge = false;
                    patchManager.PatchAgeForForcedMerge = 1000000.0;  // ie don't merge                                
                }

                int[] PatchToAddTo = new int[1];  //need an array variable for this
                string[] PatchNmToAddTo = new string[1];  
                int nPatchesAdded = 0;
                double NewArea = 1.0 / ZoneCount;
				
                while (nPatchesAdded < ZoneCount - 1)
                {
                    AddSoilCNPatchType NewPatch = new AddSoilCNPatchType();
                    NewPatch.DepositionType = DepositionTypeEnum.ToNewPatch;
                    NewPatch.AreaFraction = NewArea;
                    PatchToAddTo[0] = 0;
                    PatchNmToAddTo[0] = "0";
                    NewPatch.AffectedPatches_id = PatchToAddTo;
                    NewPatch.AffectedPatches_nm = PatchNmToAddTo;
                    NewPatch.SuppressMessages = Verbose;

                    foreach (var patchManager in patchManagers)
                        patchManager.Add(NewPatch);
                    nPatchesAdded += 1;
                }                

                if (Verbose)
                	summary.WriteMessage(this, patchManagers[0].NumPatches.ToString() + " pseudopatches have been created", MessageType.Diagnostic); 
            }

            if (Verbose)
            	summary.WriteMessage(this, "Finished initialising the Manager for grazing, urine return and reporting", MessageType.Diagnostic);

            NumZonesForUrine = 1;  // in the future this might be > 1
            ZoneNumForUrine = -1;  // this will be incremented to 0 (first zone) below 
        }

        [EventSubscribe("DoManagement")]
        private void OnDoManagement(object sender, EventArgs e)
        {    

            // if this is the start of the simulation then sort out the depth for the urine penetration. Can't do this in initialisation because of the module order
            if (clock.Today == clock.StartDate)
                UrinePenetration();

            GrazeToday = false;
			if (clock.Today.AddDays(1).Day == 1)    // why separate this from the if below?  - to allow for multiple options in the future
                GrazeToday = true;

            if (GrazeToday)
            {
                if (Verbose)
                	summary.WriteMessage(this, "Doing grazing", MessageType.Diagnostic);

                // do the herbage removal part of the grazing
                int i = -1;  // to use as a zone counter
                HarvestedWt = 0.0;
                HarvestedN = 0.0;
                foreach (Zone zone in this.Parent.FindAllInScope<Zone>())   // NOTE - this is a zone regardless of pseudopatches 
                {
                    i += 1;
                    var sward = new Sward(zone);
                    sward.Graze(amount: 1000.0, type: "SetResidueAmount", Verbose);   // note that I have hardcoded the grazing residual for now
                    HarvestedWt += sward.HarvestedWt * zone.Area;
                    HarvestedN += sward.HarvestedN * zone.Area;
                    if (Verbose)
                    	summary.WriteMessage(this, "Just harvested " + HarvestedWt + " from Zone " + zone, MessageType.Diagnostic);
                }

                if (UrineReturnType == UrineReturnTypes.FromHarvest)
                {
                    AmountUrineNReturned = HarvestedN * 0.50;  // 
                    AmountDungNReturned = HarvestedN * 0.35;  // 
                    AmountDungCReturned = AmountDungNReturned * 20;
                }
                else if (UrineReturnType == UrineReturnTypes.SetMonthly)
                {
                	AmountUrineNReturned = MonthlyUrineNAmt[clock.Today.Month - 1];   //  hardcoded as an input
                	AmountDungNReturned = AmountUrineNReturned * (0.35 / 0.50);  // 
                	AmountDungCReturned = AmountDungNReturned * 20;
                }
                if (Verbose)
                	summary.WriteMessage(this, "The amount of urine N to be returned to the whole paddock is " + AmountUrineNReturned, MessageType.Diagnostic);

                DoUrineReturn();

                DoTramplingAndDungReturn();

                if (Verbose)
                	summary.WriteMessage(this, "Finished Grazing", MessageType.Diagnostic);

            }
        }
        
        [EventSubscribe("DoCowUrineReturn")]
        private void OnDoCowUrineReturn(object sender, SimpleCowScript.DoUrineReturnEventData myEventData)
        {    
        		var junk = myEventData.Amount;
		}        
        
        

        public void DoTramplingAndDungReturn()
        {
 			// Note that dung is assumed to be spread uniformly over the paddock (patches or sones).
 			// There is no need to bring zone area into the calculations here but zone area must be included for variables reported FROM the zone to the upper level
 			           
            int i = -1;  // patch or paddock counter
            foreach (Zone zone in this.Parent.FindAllInScope<Zone>())
            {
                i += 1;
                SurfaceOrganicMatter surfaceOM = zone.FindInScope<SurfaceOrganicMatter>() as SurfaceOrganicMatter; 

                // do some trampling of litter
                // accelerate the movement of surface litter into the soil - do this before the dung is added
                double temp = surfaceOM.Wt * 0.1;

                TillageType trampling = new TillageType();
                surfaceOM.Incorporate(fraction: (double) 0.1, depth: (double)100.0, Verbose);

                if (Verbose)
                	summary.WriteMessage(this, "For patch " + i + " the amount of litter trampled was " + temp + " and the remaining litter is " + (surfaceOM.Wt), MessageType.Diagnostic);

                // move the dung to litter  
                AddFaecesType dung = new AddFaecesType();
                dung.OMWeight = AmountDungCReturned / 0.4;  //assume dung C is 40% of OM  
                dung.OMN = AmountDungNReturned;
                surfaceOM.AddFaeces(dung);
                if (Verbose)
                	summary.WriteMessage(this, "For patch " + i + " the amount of dung DM added to the litter was " + (AmountDungCReturned / 0.4) + " and the amount of N added in the dung was " + (AmountDungNReturned), MessageType.Diagnostic);

            } 
        }

        public void DoUrineReturn()
        {
            GetZoneForUrineReturn();  

      		if (Verbose)
      			summary.WriteMessage(this, "The Zone for urine return is " + ZoneNumForUrine, MessageType.Diagnostic);

            if (!PseudoPatches)
            {
            	int i = -1; //to count the zones
	            foreach (Zone zone in this.Parent.FindAllInScope<Zone>())
    	        {
    	            i += 1;
    	            if (i == ZoneNumForUrine)
    	            {
    	                Fertiliser thisFert = zone.FindInScope<Fertiliser>() as Fertiliser;

  	                    thisFert.Apply(amount: AmountUrineNReturned / zone.Area, 
  	                    		type: Fertiliser.Types.UreaN, 
  	                    		depthTop: 0.0, 
  	                    		depthBottom: UrineDepthPenetration, 
  	                    		doOutput: Verbose);
                                        
    	         		if (Verbose)
    	         			summary.WriteMessage(this, AmountUrineNReturned + " urine N added to Zone " + i + ", the local load was " + AmountUrineNReturned / zone.Area + " kg N /ha", MessageType.Diagnostic);
    	             }
             	}
        	}
        	else // PseudoPatches
        	{
		                int[] PatchToAddTo = new int[1];  //because need an array variable for this
        		        string[] PatchNmToAddTo = new string[0];  //need an array variable for this
        		        //List<IModel> zones = this.FindAllInScope<Zone>().OfType<IModel>().ToList();   //TODO ask Dean - is all this needed?
        		        double[] UreaToAdd = new double[soilPhysical.Thickness.Length];  

        		        for (int ii = 0; ii <= (soilPhysical.Thickness.Length - 1); ii++)
        		            UreaToAdd[ii] = UrineDepthPenetrationArray[ii]  * AmountUrineNReturned * ZoneCount;

        		        // needed??   UreaReturned += AmountFertNReturned;

        		        AddSoilCNPatchType CurrentPatch = new AddSoilCNPatchType();
        		        CurrentPatch.Sender = "manager";
        		        CurrentPatch.DepositionType = DepositionTypeEnum.ToSpecificPatch;
        		        PatchToAddTo[0] = ZoneNumForUrine;
        		        CurrentPatch.AffectedPatches_id = PatchToAddTo;
        		        CurrentPatch.AffectedPatches_nm = PatchNmToAddTo;
        		        CurrentPatch.Urea = UreaToAdd;

        		        var patchManager = soil.FindChild<NutrientPatchManager>(); 

    	         		if (Verbose)
	        		        summary.WriteMessage(this, "Patch MinN prior to urine return: " + patchManager.MineralNEachPatch[ZoneNumForUrine], MessageType.Diagnostic);
        		        patchManager.Add(CurrentPatch); 
    	         		if (Verbose)
	        		        summary.WriteMessage(this, "Patch MinN after urine return: " + patchManager.MineralNEachPatch[ZoneNumForUrine], MessageType.Diagnostic);
        	} 
        }

        public void GetZoneForUrineReturn()
        {
            if (UrineReturnPattern == UrineReturnPatterns.RotatingInOrder) 
            {
	            ZoneNumForUrine += 1;  //increment the zone number - it was initialised at -1. NOTE, ZoneNumForUrine is used for both zones and patches
	            if (ZoneNumForUrine >= ZoneCount)
	                ZoneNumForUrine = 0;  // but reset back to the first patch if needed
            }
            else if (UrineReturnPattern == UrineReturnPatterns.Random)
            {
	            Random rnd = new Random();
	            ZoneNumForUrine = rnd.Next(0, ZoneCount); // in C# the maximum value (ZoneCount) will not be selected
            }
            else if (UrineReturnPattern == UrineReturnPatterns.PseudoRandom)
            {
	            ZoneNumForUrine = pseudoRandom.Next(0, ZoneCount); // in C# the maximum value (ZoneCount) will not be selected
            }
			else
				throw new Exception("UrineResturnPattern not recognised");

			if (Verbose)
            	summary.WriteMessage(this, "The next zone/patch for urine return is " + ZoneNumForUrine, MessageType.Diagnostic);
        }


        public void UrinePenetration()
        {
            // note that this only looks at the first paddock and assumes that all the paddocks are the same
            int iii = -1;  // to use as a patch counter
            foreach (Zone zone in this.Parent.FindAllInScope<Zone>().OfType<IModel>().ToList())
            {
                iii += 1;
                if (iii == 0)
                {
                    Soil soil = zone.FindInScope<Soil>() as Soil;
                    double tempDepth = 0.0;
                    UrineDepthPenetrationArray = new double[soilPhysical.Thickness.Length];
                    for (int i = 0; i <= (soilPhysical.Thickness.Length - 1); i++)
                    {
                        tempDepth += soilPhysical.Thickness[i];
                        if (tempDepth <= UrineDepthPenetration)
                        {
                            UrineDepthPenetrationArray[i] = soilPhysical.Thickness[i] / UrineDepthPenetration;
                        }
                        else
                        {
                            UrineDepthPenetrationArray[i] = (UrineDepthPenetration - (tempDepth - soilPhysical.Thickness[i])) / (tempDepth - (tempDepth - soilPhysical.Thickness[i])) * soilPhysical.Thickness[i] / UrineDepthPenetration;
                            UrineDepthPenetrationArray[i] = Math.Max(0.0, Math.Min(1.0, UrineDepthPenetrationArray[i]));
                        }
                        if (Verbose)
                        	summary.WriteMessage(this, "The proportion of urine applied to the " + i + "th layer will be " + UrineDepthPenetrationArray[i], MessageType.Diagnostic);
                    }
                }
            }

        } 


        
   
    // A class for aggregating a pasture species mix.  ??????????????? is this needed now?
    [Serializable]
    class Sward
    {
     	private const double Epsilon = 0.000000001;
        private double amountRequired;

        public Sward(Zone zone)
        {
            Species = zone.FindAllDescendants<PastureSpecies>().OfType<IModel>().ToList().Cast<PastureSpecies>().ToList();
		}
		
        public List<PastureSpecies> Species { get; private set; }

        public double HarvestableWt { get { return Species.Sum(sp => sp.Harvestable.Wt); } }

        public double HarvestedWt { get { return Species.Sum(sp => sp.HarvestedWt); } }

        public double HarvestedN { get { return Species.Sum(sp => sp.HarvestedN); } }

        public double StandingHerbageWt { get { return Species.Sum(sp => sp.Standing.Wt); } }

        public double AboveGroundWt { get { return Species.Sum(sp => sp.AboveGroundWt); } }

        public bool IsAlive
        {
            get
            {
                bool alive = true;
                Species.ForEach(sp => alive = alive && sp.PlantStatus == "alive");
                return alive;
            }
         }
     

        /// <summary>Removes plant material simulating a graze event.</summary>
        /// <param name="amount">The DM amount (kg/ha)</param>
        /// <param name="type">How the amount is interpreted (SetResidueAmount or SetRemoveAmount)</param>
        public void Graze(double amount, string type, bool Verbose)
        {
            double amountAvailable = HarvestableWt;
            if (IsAlive || (amountAvailable > Epsilon))
            {
                // Get the amount required to remove
                if (type.ToLower() == "setresidueamount")
                {
                    // Remove all DM above given residual amount
                    amountRequired = Math.Max(0.0, AboveGroundWt - amount);
                }
                else if (type.ToLower() == "setremoveamount")
                {
                    // Remove a given amount
                    amountRequired = Math.Max(0.0, amount);
                }
                else
                {
                    throw new Exception("Type of amount to remove on graze not recognized (use \'SetResidueAmount\' or \'SetRemoveAmount\'");
                }
                // Get the actual amount to remove
                double amountToRemove = Math.Max(0.0, Math.Min(amountRequired, amountAvailable));

                // Get the amounts to remove by mySpecies:
                if (amountToRemove > Epsilon)
                {
                    double[] fractionToRemove = new double[Species.Count];
                    for (int s = 0; s < Species.Count; s++)
                    {
                        // get the fraction to required for each mySpecies, partition according to available DM to harvest
                        fractionToRemove[s] = Species[s].Harvestable.Wt / amountAvailable;

                        // remove DM and N for each mySpecies (digestibility is also evaluated)
                        Species[s].RemoveBiomass(amountToRemove * fractionToRemove[s], Verbose);
                    }
                }
            }
        }
	}
    }
}
```
    Manager ReportingWithPatches (disabled)
      Verbose = False
      OutputModule = [WholePaddock]
      ReportingFreq = Daily
      Site = Ruakura
      SoilName = HE
      Regrowth = 1low
      Sorter = S0
      LocSoilFert = RuaHE100
```csharp
using System;
using Models.Core;
using Models.Interfaces;
using Models.Soils;
using Models.WaterModel;
using Models.AgPasture;
using System.Linq;
using System.Diagnostics;
using APSIM.Shared.Utilities;
using Models.Soils.Nutrients;
namespace Models
{
    [Serializable]
    [System.Xml.Serialization.XmlInclude(typeof(Model))]
    public class ReportingWithPatchesScript : Model
    {
        [Link] private Simulation simulation;
        [Link] private Clock clock;
        [Link] private SimpleCowScript simpleCow;
        [Link] private SimpleGrazing simpleGrazing;
        [Link(ByName=true)] private ISolute urea;
        [Link(ByName=true)] private ISolute no3;
        [Link(ByName=true)] private ISolute nh4;


        // --------------- Privates ---------------------------------

        private double iniOrgC;
        private double iniOrgN;
       [NonSerialized] private CNPatchVariableType myPatchNO3 = new CNPatchVariableType();
       [NonSerialized] private CNPatchVariableType myPatchNH4 = new CNPatchVariableType();
        private bool ReportToday = false;

        // --------------- Enumerated types ---------------------------------

        public enum ReportingFrequencyEnum
        {
            Daily,
            TenDaily,
            Monthly,
            Annual,
            OnGrazing
        }

        // --------------- Parameters ---------------------------------

        [Description("Verbose output?")]
        public bool Verbose { get; set; }

        [Description("Name of output component for reporting")]
        [Display(Type = DisplayType.Model, ModelType=typeof(Report))]
        public Report OutputModule { get; set; }

        [Description("Frequency of reporting")]
        public ReportingFrequencyEnum ReportingFreq { get; set; }

        [Description("Location for reporting")]
        public string Site { get; set; }

        [Description("Soil name for reporting")]
        public string SoilName { get; set; }

        [Description("Low (2800) or high (3500) pasture biomasses for grazing")]
        public string Regrowth { get; set; }

        [Description("To make analysing the output easier")]
        public string Sorter { get; set; }

        [Description("For outputing")]
        public string LocSoilFert { get; set; }

        // --------------- Outputs ---------------------------------

        public int DaysSinceReport { get; set; }
        public double NHA { get; set; }
        public double PGR { get; set; }
        public double HerbageGrazed { get; set; }
        public double HerbageGrazedN { get; set; }
        public double HerbageGrazedMEConc { get; set; }
        public double UreaReturned { get; set; }
        public double Fixation { get; set; }
        public double LeachN { get; set; }
        public double Denit { get; set; }
        public double DenitN2O { get; set; }
        public double OrgC { get; set; }
        public double OrgN { get; set; }
        public double dltOrgC { get; set; }
        public double dltOrgN { get; set; }
        public double MinN { get; set; }
        public double UreaN { get; set; }
        public double NH4N { get; set; }
        public double NO3N { get; set; }
        public double UreaAddedInGrazing { get; set; }
        [Units("mm")] public double Drainage600 { get; set; }
        public double NetSilageImported { get; set; }
        public double SumSilageMade { get; set; }
        public double SumSilageFed { get; set; }
        public double UrinePatchLoad { get; set; }
        public int Events { get; set; }
        public string SiteSoil { get; set; }
        public double AboveGroundDM { get; set; }
        public int PatchCount { get; set; }
        public int z600 { get; set; }
        public int z300 { get; set; }
   
      
        /// <summary>Invoked when simulation starts.</summary>
        /// <param name="sender">The sender of the event.</param>
        /// <param name="e">The event arguments.</param>
        [EventSubscribe("StartOfSimulation")]
        private void OnStartOfSimulation(object sender, EventArgs e)
        {
            //Debugger.Break();
              if (Verbose)
                 Console.WriteLine("Initialising the Manager for grazing, urine return and reporting");
      
            DaysSinceReport = 0;

            SiteSoil = Site + SoilName;
            Events = 1;

            if (Verbose)
                Console.WriteLine("Finished initialising the Manager for grazing, urine return and reporting");
        }


        // <summary>Invoked by clock to let us do some calculations.</summary>
        [EventSubscribe("DoManagementCalculations")]
        private void OnDoManagementCalculations(object sender, EventArgs e)
        {
            if (Verbose)
                 Console.WriteLine("In Prepare for the Reporting Manager on " + clock.Today);

            // if this is the start of the simulation then sort out the depth for the urine placement, can't do this in initialisation because of the module order
            if (clock.Today == clock.StartDate)
            {
                iniOrgC = 0.0; 
                iniOrgN = 0.0;
                z300 = 0;
                z600 = 0;

                foreach (Zone paddock in simulation.FindAllChildren<Zone>())
                {
                    var soilNitrogen = paddock.FindInScope<Nutrient>();
                    var soilWater = paddock.FindInScope<WaterBalance>();

                    double tempDepth = 0.0;

                    for (int ii = 0; ii < soilWater.Thickness.Length; ii++)
                    {
                       iniOrgC += soilNitrogen.TotalC[ii]; 
                       iniOrgN += soilNitrogen.TotalN[ii];
                       tempDepth += soilWater.Thickness[ii];
                       if (tempDepth <= 300)
                          z300 = ii;
                       if (tempDepth <= 600)
                          z600 = ii;
                    }
                }
        }


        if (Verbose)
            Console.WriteLine("Finished Prepare for the Reporting Manager on " + clock.Today);
        }


        // <summary>Invoked by clock to let us do report calculations.</summary>
        [EventSubscribe("DoReportCalculations")]
        private void OnDoReportCalculations(object sender, EventArgs e)
        {
            if (Verbose)
                 Console.WriteLine("In Post for the Reporting Manager on " + clock.Today);

            // should reporting be done today?  
            if (ReportingFreq == ReportingFrequencyEnum.Daily)
                ReportToday = true;
            else if ((ReportingFreq == ReportingFrequencyEnum.TenDaily) && ((clock.Today.Day == 10) || (clock.Today.Day == 20) || (DateUtilities.IsEndOfMonth(clock.Today))))
                ReportToday = true;
            else if ((ReportingFreq == ReportingFrequencyEnum.Monthly) && (DateUtilities.IsEndOfMonth(clock.Today)))
                ReportToday = true;
            else if ((ReportingFreq == ReportingFrequencyEnum.Annual) && (DateUtilities.IsEndOfYear(clock.Today)))
                ReportToday = true;
            else if ((ReportingFreq == ReportingFrequencyEnum.OnGrazing) && (simpleGrazing.GrazedToday))
                ReportToday = true;
            else
                ReportToday = false;

            DaysSinceReport += 1;

            // each day gather data for the accumulations
            foreach (Zone paddock in simulation.FindAllChildren<Zone>())
            {
                var sward = paddock.FindAllInScope<PastureSpecies>();
                var soilWater = paddock.FindInScope<WaterBalance>();
                var nutrient = paddock.FindInScope<Nutrient>();
                var denitrificationModel = nutrient.FindInScope<NFlow>();

                AboveGroundDM = sward.Sum(species => species.AboveGroundWt);
                NHA += sward.Sum(species => species.HerbageGrowthWt);
                PGR = NHA;  // divide this by the number of days just before reporting
                Fixation += sward.Sum(species => species.FixedN);

                double[] tempArray = soilWater.FlowNO3;
                LeachN += tempArray[soilWater.Thickness.Length - 1];  // only take the deepest element

                tempArray = soilWater.Flux;      
                Drainage600 += tempArray[z600];  //mmm

                for (int ii = 0; ii <= z300; ii++)
                {
                    Denit += denitrificationModel.Value[ii];
                    DenitN2O += nutrient.N2Oatm[ii];
                }
            }  

            // Things that come from other Managers or modules at the current level
            HerbageGrazed += simpleGrazing.GrazedDM;
            HerbageGrazedN += simpleGrazing.GrazedN;
            UreaReturned += simpleCow.UrineNReturned;
            if ((simpleCow.NumPatchesForUrine * simpleCow.NumPatches) > 0)
                UrinePatchLoad = UreaReturned / (double)simpleCow.NumPatchesForUrine / (double)simpleCow.NumPatches;
            else
                UrinePatchLoad = 0.0;

            SumSilageMade += simpleCow.SilageMade;
            SumSilageFed += simpleCow.SilageFed;
            NetSilageImported = SumSilageFed - SumSilageMade;

            if (ReportToday)
            {
                OrgC = 0.0;
                OrgN = 0.0;
                UreaN = 0.0;
                NH4N = 0.0;
                NO3N = 0.0;
                MinN = 0.0;

                foreach (Zone paddock in simulation.FindAllChildren<Zone>())
                {
                    var sward = paddock.FindAllInScope<PastureSpecies>();
                    var soilWater = paddock.FindInScope<WaterBalance>();
                    var soilNitrogen = paddock.FindInScope<Nutrient>();

                    for (int ii = 0; ii <= (soilWater.Thickness.Length - 1); ii++)
                    {
                       OrgC += soilNitrogen.TotalC[ii]; 
                       OrgN += soilNitrogen.TotalN[ii];
                       UreaN += urea.kgha[ii];
                       NH4N += nh4.ppm[ii];
                       NO3N += no3.ppm[ii];
                       MinN = UreaN + NH4N + NO3N;
                    }
                    dltOrgC = OrgC - iniOrgC; 
                    dltOrgN = OrgN - iniOrgN;
                    iniOrgC = OrgC; // ready for the next calculation of change in pools
                    iniOrgN = OrgN;
                }

                PGR = NHA / DaysSinceReport;  

                // do the patch outputs here
                OutputModule.DoOutput();

                // now zero the reported variables
                DaysSinceReport = 0;
                HerbageGrazed = 0.0;
                HerbageGrazedN = 0.0;
                DaysSinceReport = 0;
                NHA = 0;
                PGR = 0;
                UreaReturned = 0;
                Fixation = 0;
                LeachN = 0;
                Denit = 0;
                DenitN2O = 0;
                OrgC = 0;
                OrgN = 0;
                MinN = 0;
                UreaN = 0;
                NH4N = 0;
                NO3N = 0;
                Drainage600 = 0.0;
                NetSilageImported = 0.0;
                SumSilageMade = 0.0;
                SumSilageFed = 0.0;
            }
        }
    }
}
```
    Report WholePaddock: EventNames=[Clock].EndOfDay
      VariableNames:
        [Clock].Today
        //[SimpleCow].SimpleCowScript.NumPatches
    Zone Paddock: Area=1; Slope=0; AspectAngle=0; Altitude=50
      Manager AutomaticIrrigation
        allowIrrigation = True
        allowReporting = False
        seasonStart = 1-sep
        seasonEnd = 30-mar
        seasonsAllocation = 10000
        triggerDeficit = 80
        targetDeficit = 95
        returndays = 3
        maximumAmount = 30
        depthPAWC = 300
```csharp
using Newtonsoft.Json;
using APSIM.Shared.Utilities;
using System.Xml.Serialization;
using Models.Soils;
using Models.PMF;
using Models.Core;
using System;
using Models.Interfaces;



        
namespace Models
{
    [Serializable] 
    [System.Xml.Serialization.XmlInclude(typeof(Model))]
    public class Script : Model
    {
        [Link] private ISummary summary;
        [Link] private Irrigation Irrigation;
        [Link] private Clock Clock;
        [Link] private Soil Soil;
        [Link(IsOptional = true)] private IPlant existingCrop;
        private DateTime StartDate;
        private DateTime EndDate;
        private double TopDUL;
        private double TopLL;
        private int nLayers;
        [Link]
        private IPhysical soilPhysical;
        [Link]
        private ISoilWater waterBalance;
        //Communication to other modules
       
        //User inputs from properties tab
        [Description("Turn irrigation on?")]
        public bool allowIrrigation { get; set; } = true;

        [Description("Allow reporting to the summary file?")]
        public bool allowReporting { get; set; }


        [Description("Start of irrigation season (dd-MMM)")]
        public string seasonStart { get; set; }


        [Description("End of irrigation season (dd-MMM)")]
        public string seasonEnd { get; set; }


        [Description("Season allocation (mm)")]
        public double seasonsAllocation { get; set; }


        [Description("Deficit to trigger irrigation (% PAWC)")]
        public double triggerDeficit { get; set; }


        [Description("Deficit to stop irrigaton (% PAWC)")]
        public double targetDeficit { get; set; }


        [Description("Minimum days for irrigation to return")]
        public double returndays { get; set; }

        [Description("Maximum irrigation application (mm/day)")]
        public double maximumAmount { get; set; }

        [Description("Depth to calculate PAWC (mm)")]
        public double depthPAWC { get; set; }

        //Class members
        [JsonIgnore] public double TopSWdeficit { get; set; }
        [JsonIgnore] public double TopSWC { get; set; }
        [JsonIgnore] public double DaysSinceIrrigation { get; set; }
        [JsonIgnore] public double AmountToApply { get; set; }
        [JsonIgnore] public double SeasonAppliedAmount { get; set; }
        
        private bool IrrigationIsAllowed { get; set; }
        private bool SeasonIsOpen { get; set; }
        private bool CropIsActive { get; set; }
        private bool IrrigatorIsAvailable { get; set; }
        private bool SoilIsDry { get; set; }

    
        //Calculate static soil variables
        [EventSubscribe("StartOfSimulation")]
        private void OnStartOfSimulation(object sender, EventArgs e)
        {   
            //Set the season dates
            StartDate = DateTime.Parse(seasonStart + "-" + Clock.Today.Year.ToString());
            EndDate = DateTime.Parse(seasonEnd + "-" + Clock.Today.Year.ToString());
            
           
            //Can we irrigate at all?
            IrrigationIsAllowed = false; 
            if (allowIrrigation)
                IrrigationIsAllowed = true; 

            //Calculate soil water variables
            double depthFromSurface = 0.0;
            double fracLayer = 0.0;
            nLayers = soilPhysical.Thickness.Length;
            for (int layer = 0; layer < nLayers; layer++)
            {
                fracLayer = Math.Min(1.0, (depthPAWC - depthFromSurface) / soilPhysical.Thickness[layer]);
                TopLL += soilPhysical.LL15mm[layer] * fracLayer;
                TopDUL += soilPhysical.DULmm[layer] * fracLayer;
                depthFromSurface += soilPhysical.Thickness[layer];
                if (depthFromSurface >= depthPAWC)
                    layer = nLayers;
            }
        }
             
        //Determine daily requirement for irrigation
        [EventSubscribe("StartOfDay")]
        private void OnStartOfDay(object sender, EventArgs e)
        {
            //Can we irrigate today?          
            SeasonIsOpen = isBetween(Clock.Today, StartDate, EndDate);
            if (!SeasonIsOpen)
                SeasonAppliedAmount = 0;

            //Is there a crop in the ground that needs irrigation?
            CropIsActive = false;
            if ((existingCrop != null) && (existingCrop.IsAlive))
                CropIsActive = true;
            //if ((existingCrop.Phenology.Stage >= 3.0) && (existingCrop.Phenology.Stage < 6.0))
          
            //Is the irrigator available?
            IrrigatorIsAvailable = false;
            DaysSinceIrrigation += 1;
            if (DaysSinceIrrigation >= returndays)
                IrrigatorIsAvailable = true;
          
            //Is the soil dry enough to require irrigation?
            SoilIsDry = false;
            double depthFromSurface = 0.0;
            double fracLayer = 0.0;
            TopSWC = 0.0;
            for (int layer = 0; layer < nLayers; layer++)
            //for (int layer = 0; depthFromSurface < depthPAWC + soilPhysical.Thickness[layer]; layer++)
            {
                fracLayer = Math.Min(1.0, (depthPAWC - depthFromSurface) / soilPhysical.Thickness[layer]);
                TopSWC += waterBalance.SWmm[layer] * fracLayer;
                depthFromSurface += soilPhysical.Thickness[layer];
                if (depthFromSurface >= depthPAWC)
                    layer = nLayers;
            }
            
            TopSWdeficit = TopSWC - TopDUL;
            if (Math.Max(0.0, -TopSWdeficit) >= (TopDUL - TopLL) * (100 - triggerDeficit) / 100)
                SoilIsDry = true;
                
            //Are all the conditions ratifying irrigation
            if (IrrigationIsAllowed && SeasonIsOpen && CropIsActive && IrrigatorIsAvailable && SoilIsDry)
            {
                //Lets bloody well irrigate then!!!!
                AmountToApply = TopDUL * targetDeficit / 100 - TopSWC;
                AmountToApply = Math.Max(0.0, Math.Min(AmountToApply, seasonsAllocation - SeasonAppliedAmount));
                AmountToApply = Math.Min(AmountToApply,maximumAmount);
                
                Irrigation.Apply(AmountToApply, doOutput:  allowReporting);
                
                DaysSinceIrrigation = 0;
                SeasonAppliedAmount += AmountToApply;
            }
        }
        
        ///Checks whether theDate is between iniDate and endDate (non-year specific)
        private bool isBetween(DateTime theDay, DateTime iniDate, DateTime endDate)
        {
            bool result = false;
            if (iniDate.DayOfYear < endDate.DayOfYear)
            {
                // period is within one year, ex: summer in the northern hemisphere
                if ((theDay.DayOfYear >= iniDate.DayOfYear) && (theDay.DayOfYear <= endDate.DayOfYear))
                    result = true;
            }
            else
            {
                // period goes over the end of the year, ex: summer in the southern hemisphere
                if ((theDay.DayOfYear >= iniDate.DayOfYear) || (theDay.DayOfYear <= endDate.DayOfYear))
                    result = true;
            }
            
            return result;
        }
    }
}
```
      SimpleGrazing: GrazingRotationType=1; SimpleGrazingFrequencyString=0; SimpleMinGrazable=0; SimpleGrazingResidual=1000; FlexibleGrazePostDM=0; MaximumRotationLengthArray=[50, 50, 50, 50, 60, 60, 90, 70, 50, 50, 50, 50]; MinimumRotationLengthArray=[1, 1, 1, 1, 3, 3, 3, 1, 1, 1, 1, 1]; FractionDefoliatedNToSoil=[0.75]; FractionExcretedNToDung=[0.4]; CNRatioDung=0; DepthUrineIsAdded=250; FractionPopulationDecline=0; TramplingOn=false; MaximumPropLitterMovedToSoil=0.1; PastureConsumedAtMaximumRateOfLitterRemoval=1200
        PreGrazeDMArray=[2800, 2800, 2800, 2800, 2800, 2800, 2800, 2800, 2800, 2800, 2800, 2800]
        PostGrazeDMArray=[1500, 1500, 1500, 1500, 1250, 1250, 1250, 1250, 1500, 1500, 1500, 1500]
      SurfaceOrganicMatter: InitialResidueName=grass; InitialResidueType=grass; InitialResidueMass=500; InitialStandingFraction=0; InitialCPR=0; InitialCNR=10
      Fertiliser
      Irrigation
      Soil HE_140mm: SoilType=MergeAge40; Region=Plains; State=Canterbury; Country=New Zealand; Latitude=0; Longitude=0
        DataSource=Generic profile descriptions provided by Trevor Webb and data for functional horizions based on SWAMP project results
        Comments=Bulk density values were measured on the fine earth fraction so values entered into apsim soil are adjusted down to account for stone content (assuming stones are inert from all soil process so their mass and volume is removed from model paramaters).  SAT, DUL, LL15 and Air dry have been adjusted down to account for stone content.  OC has not been adjusted so the model will get the correct carbon and N amounts using the adjusted BD.
        Physical
          Thickness  ParticleSizeClay  ParticleSizeSand  ParticleSizeSilt  BD      AirDry   LL15    DUL     SAT
          200        20                14.5              65.5              1.3105  0.07675  0.1535  0.3735  0.456165
          150        24                18                58                1.524   0.201    0.201   0.332   0.39432
          200        39                13                48                1.42    0.2985   0.2985  0.426   0.441525
          350        44                1                 55                1.424   0.308    0.308   0.446   0.4557
          150        44                1                 55                1.424   0.308    0.308   0.446   0.456
          150        19                15                66                1.601   0.162    0.162   0.325   0.376
          300        19                15                66                1.601   0.162    0.162   0.325   0.376
          SoilCrop AGPRyegrassSoil: LL=[0.154, 0.201, 0.299, 0.308, 0.308, 0.162, 0.162]; KL=[0.1, 0.1, 0.1, 0.05, 0.05, 0.05, 0.05]; XF=[1, 0.8, 0.8, 0.3, 0, 0, 0]
          SoilCrop AGPWhiteCloverSoil: LL=[0.154, 0.201, 0.299, 0.308, 0.308, 0.162, 0.162]; KL=[0.1, 0.1, 0.1, 0.05, 0.05, 0.05, 0.05]; XF=[1, 0.8, 0.8, 0.3, 0, 0, 0]
        Organic: FOMCNRatio=40; CarbonUnits=Total
          Thickness  Carbon  SoilCNRatio  FBiom  FInert  FOM
          200        4.502   11           0.048  0.382   347.67
          150        1.91    11           0.027  0.634   257.56
          200        0.772   11           0.019  0.784   172.648
          350        0.422   11           0.015  0.924   85.734
          150        0.422   11           0.015  0.924   63.514
          150        0.402   11           0.015  0.971   47.052
          300        0.4     11           0.015  0.985   25.823
        Chemical: Thickness=[200, 150, 200, 350, 150, 150, 300]; PH=[6, 6, 6, 6, 6, 6, 6]; PHUnits=Water
        Water: Thickness=[200, 150, 200, 350, 150, 150, 300]; InitialValues=[0.373, 0.332, 0.426, 0.446, 0.446, 0.325, 0.325]; RelativeTo=LL15; FilledFromTop=true
        CERESSoilTemperature Temperature
        WaterBalance: SummerDate=1-Nov; SummerU=6; SummerCona=3.5; WinterDate=1-Apr; WinterU=6; WinterCona=2.5; DiffusConst=0; DiffusSlope=0; Salb=0; CN2Bare=0; CNRed=20; CNCov=0.8; DischargeWidth=5; CatchmentArea=10; PSIDul=-100
        Nutrient
        SolutePatch NO3: Thickness=[200, 150, 200, 350, 150, 150, 300]; InitialValuesUnits=ppm; WaterTableConcentration=0; D0=0; DepthConstant=0; MaxDepthSoluteAccessible=0; RunoffEffectivenessAtMovingSolute=0; MaxEffectiveRunoff=0
        SolutePatch NH4: Thickness=[200, 150, 200, 350, 150, 150, 300]; InitialValuesUnits=ppm; WaterTableConcentration=0; D0=0; DepthConstant=0; MaxDepthSoluteAccessible=0; RunoffEffectivenessAtMovingSolute=0; MaxEffectiveRunoff=0
        SolutePatch Urea: Thickness=[200, 150, 200, 350, 150, 150, 300]; InitialValuesUnits=kg/ha; WaterTableConcentration=0; D0=0; DepthConstant=0; MaxDepthSoluteAccessible=0; RunoffEffectivenessAtMovingSolute=0; MaxEffectiveRunoff=0
        NutrientPatchManager: MaximumNitrogenAvailableToPlants=0; NPartitionApproach=0; AutoAmalgamationApproach=0; basePatchApproach=0; AllowPatchAmalgamationByAge=false; PatchAgeForForcedMerge=0; LayerForNPartition=-99
      PastureSpecies AGPRyegrass: doyGermination=275; daysEmergenceToAnthesis=120; daysAnthesisToMaturity=85; degreesDayForAnthesis=1100; degreesDayForMaturity=900; daysAnnualsFactor=45; InitialShootDM=1500; InitialRootDM=450; InitialRootDepth=750; initialDMFractionsGrasses=[0.15, 0.25, 0.25, 0.05, 0.05, 0.1, 0.1, 0.05, 0, 0, 0]; initialDMFractionsForbs=[0.2, 0.2, 0.15, 0.05, 0.1, 0.15, 0.1, 0.05, 0, 0, 0]; PhotosyntheticEfficiency=0.01; PhotosynthesisCurveFactor=0.8; FractionPAR=0.5; ReferenceCO2=380; CO2EffectScaleFactor=700; CO2EffectOffsetFactor=600; CO2EffectMinimum=0.7; CO2EffectExponent=2; ReproSeasonDurationCoeff=2; ReproSeasonShouldersLengthFactor=1; ReproSeasonOnsetDurationFactor=0.6; RelativeTurnoverEmerging=2; DetachmentDroughtCoefficient=3; DetachmentDroughtEffectMin=0.1; TurnoverStockFactor=0.01; TurnoverDefoliationEffectMin=0.025; MinimumGreenLeafProp=0.8; MinimumGreenRootProp=0.5
        initialDMFractionsLegumes=[0.16, 0.23, 0.22, 0.05, 0.03, 0.05, 0.05, 0.01, 0.04, 0.08, 0.08]
        LinearInterpolationFunction FVPDFunction
      PastureSpecies AGPWhiteClover: doyGermination=275; daysEmergenceToAnthesis=120; daysAnthesisToMaturity=85; degreesDayForAnthesis=1100; degreesDayForMaturity=900; daysAnnualsFactor=45; InitialShootDM=500; InitialRootDM=150; InitialRootDepth=350; initialDMFractionsGrasses=[0.15, 0.25, 0.25, 0.05, 0.05, 0.1, 0.1, 0.05, 0, 0, 0]; initialDMFractionsForbs=[0.2, 0.2, 0.15, 0.05, 0.1, 0.15, 0.1, 0.05, 0, 0, 0]; PhotosyntheticEfficiency=0.01; PhotosynthesisCurveFactor=0.8; FractionPAR=0.5; ReferenceCO2=380; CO2EffectScaleFactor=700; CO2EffectOffsetFactor=600; CO2EffectMinimum=0.7; CO2EffectExponent=2; ReproSeasonDurationCoeff=2; ReproSeasonShouldersLengthFactor=1; ReproSeasonOnsetDurationFactor=0.6; RelativeTurnoverEmerging=2; DetachmentDroughtCoefficient=3; DetachmentDroughtEffectMin=0.1; TurnoverStockFactor=0.01; TurnoverDefoliationEffectMin=0.025; MinimumGreenLeafProp=0.8; MinimumGreenRootProp=0.5
        initialDMFractionsLegumes=[0.16, 0.23, 0.22, 0.05, 0.03, 0.05, 0.05, 0.01, 0.04, 0.08, 0.08]
        LinearInterpolationFunction FVPDFunction
      Report: EventNames=[Clock].EndOfDay
        VariableNames:
          [Clock].Today
          [Decomposition].MineralisedN
          [Nutrient].MineralisedN
          [NO3].kgha
          [NH4].kgha
          [Urea].kgha
  Report WholePaddockOriginal (disabled): EventNames=[Clock].EndOfDay
    VariableNames:
      [Clock].Today
      [SimpleCow].SimpleCowScript.NumPatches
      [ReportingWithPatches].ReportingWithPatchesScript.LocSoilFert as LocSoil
      [SimpleCow].SimpleCowScript.UrinationsPerHead
      [SimpleCow].SimpleCowScript.ForageType
      [SimpleCow].SimpleCowScript.patchMargin
      [SimpleCow].SimpleCowScript.StockingRate
      [SimpleCow].SimpleCowScript.GeneralFertAmt
      [SimpleGrazing].GrazingInterval
      [SimpleGrazing].PreGrazeDM as PreGrazeDM
      [SimpleGrazing].PostGrazeDM
      [SimpleCow].SimpleCowScript.HerdMEDemand
      [SimpleCow].SimpleCowScript.LoadAdjustmentPropOverall as LoadAdjustment
      [SimpleCow].SimpleCowScript.AverageUrineDepth
      [ReportingWithPatches].ReportingWithPatchesScript.Events
      [ReportingWithPatches].ReportingWithPatchesScript.UreaReturned as UrineNReturned
      [SimpleCow].SimpleCowScript.NumPatchesForUrine as GridsUsed
      [ReportingWithPatches].ReportingWithPatchesScript.UrinePatchLoad
      [SimpleGrazing].GrazedDM
      [SimpleGrazing].GrazedN
      [ReportingWithPatches].ReportingWithPatchesScript.LeachN
      [ReportingWithPatches].ReportingWithPatchesScript.Denit
      [ReportingWithPatches].ReportingWithPatchesScript.DenitN2O
      [ReportingWithPatches].ReportingWithPatchesScript.Fixation
      [ReportingWithPatches].ReportingWithPatchesScript.MinN
      [ReportingWithPatches].ReportingWithPatchesScript.dltOrgN
      [ReportingWithPatches].ReportingWithPatchesScript.Drainage600
      [SimpleCow].SimpleCowScript.CowDMIntake
      [ReportingWithPatches].ReportingWithPatchesScript.NHA
      [ReportingWithPatches].ReportingWithPatchesScript.PGR
      [ReportingWithPatches].ReportingWithPatchesScript.NetSilageImported
      [ReportingWithPatches].ReportingWithPatchesScript.SumSilageMade as SilageMade
      [ReportingWithPatches].ReportingWithPatchesScript.SumSilageFed as SilageFed
      [SimpleCow].SimpleCowScript.StockingDensity
      [SimpleCow].SimpleCowScript.CowState
      [SimpleCow].SimpleCowScript.ListOfPatches
