Simulations: Version=159
  Memo
    The intent of this simulation is to replicate the testing in

    Snow, V.O., Cichota, R., McAuliffe, R.J., Hutchings, N.J., Vejlin, J., 2017. Increasing the spatial scale of process-based agricultural systems models by representing heterogeneity: The case of urine patches in grazed pastures. Environmental Modelling & Software 90 89-106.

    http://dx.doi.org/10.1016/j.envsoft.2017.01.005

    Basically it compares explicit patches to pseudo-patches under a range of conditions/intensity. Ideally there should be no or little difference between the two types of patches. Note that the grazing schedual (and the returns?? - check) should be imposed and the results compared on an annual basis.

    Current state is ....
  DataStore
    ExcelInput: FileNames=[PatchyMcPatchFace.xlsx]; SheetNames=[Sheet1]
    PredictedObserved (disabled): PredictedTableName=ReportingWithPatches; ObservedTableName=ReportingWithPatches; FieldNameUsedForMatch=SimulationName; FieldName2UsedForMatch=Date; AllColumns=false
      Tests: POName=PredictedObserved
        AcceptedStats:
          Name                   n     RMSE  ME  MAE  Slope  Intercept  SEslope  SEintercept  R2  NSE  RSR
          AreaUrinePatchesToday  1098  0     0   0    -      -          -        -            -   -    -
          Denit                  1098  0     0   0    1      0          0        0            1   1    0
          dltOrgC                1098  0     0   0    1      0          0        0            1   1    0
          dltOrgN                1098  0     0   0    1      0          0        0            1   1    0
          Fixation               1098  0     0   0    1      0          0        0            1   1    0
          HerbageGrazed          1098  0     0   0    1      0          0        0            1   1    0
          HerbageGrazedN         1098  0     0   0    1      0          0        0            1   1    0
          LeachN                 1098  0     0   0    1      0          0        0            1   1    0
          MinN                   1098  0     0   0    1      0          0        0            1   1    0
          Month                  1098  0     0   0    1      0          0        0            1   1    0
          NH4N                   1098  0     0   0    1      0          0        0            1   1    0
          NHA                    1098  0     0   0    1      0          0        0            1   1    0
          NO3N                   1098  0     0   0    1      0          0        0            1   1    0
          NumPatches             1098  0     0   0    1      0          0        0            1   1    0
          UreaN                  1098  0     0   0    1      0          0        0            1   1    0
          UrineNReturned         1098  0     0   0    1      0          0        0            1   1    0
          Year                   1098  0     0   0    1      0          0        0            1   1    0
        AcceptedStatsName=Name n Slope Intercept SEslope SEintercept R2 RMSE NSE ME MAE RSR
  Experiment Patch (disabled)
    Factors
      CompositeFactor Explicit
        Specifications:
          [PatchManager].Script.PatchType = EP
          [PatchManager].Script.SystemID = A
          [PatchManager].Script.NumPatches = 10
      CompositeFactor Gridded
        Specifications:
          [PatchManager].Script.PatchType = GP
          [PatchManager].Script.SystemID = A
          [PatchManager].Script.NumPatches = 10
      CompositeFactor Uniform
        Specifications:
          [PatchManager].Script.PatchType = UP
          [PatchManager].Script.SystemID = A
          [PatchManager].Script.NumPatches = 1
    Simulation Base
      Clock: Start=1972-08-01; End=1976-07-31
      Summary SummaryFile
      Weather: FileName=%root%\Tests\WeatherFiles\Ruakura.met
      SoilArbitrator Soil Arbitrator
      Manager PatchManager
        PatchType = UP
        SystemID = A
        NumPatches = 0
        CuttingFrequency = 0
        CuttingResidual = 1000
        NutrientReturnType = FromHarvest
        AmountFertNReturned = 15
        AmountDungNReturned = 0
        FertiliserDepth = 200
        FertiliserReturnPattern = RotatingInOrder
        ReportingFreq = OnGrazing
```csharp
using Newtonsoft.Json;
using Models.Soils.Nutrients;
using Models.Soils.NutrientPatching;
using Models.Interfaces;
using System.Diagnostics;
using System.Collections.Generic;
using APSIM.Shared.Utilities;
using Models.Surface;
using Models.Soils;
using System.Xml.Serialization;
using Models.AgPasture;
using Models.Zones;
using Models.PMF;
using Models.Core;
using Models.Core.ApsimFile;
using System;
using System.Linq;
using Models.Climate;

namespace Models
{
    [Serializable]
    [System.Xml.Serialization.XmlInclude(typeof(Model))]
    public class Script : Model
    {
        [Link] private Clock Clock;
        [Link] private Soil soil;
        [Link] private ISummary summary;
        [Link] private Weather Weather;
        [Link] private Zone myZone;
        public string SoilType;
        public string SimLocation;
        public string SetIrrigation;
        public string GeneralFertType;
        public double GeneralFertAmt;
        public string PastureType;
        public int PatchCount;
        private double iniOrgC;
        private double iniOrgN;
        private double NewArea;
        private Sward sward;
        [Link]
        private IPhysical soilPhysical;

        [Link]
        private List<NutrientPatchManager> patchManagers;


        public int DaysSinceCut = 0;
        public int PatchNumForFert = -1;

        private int NumPaddocks = 0;
        // NumPaddocks is the number of AgPastures and SoilWats etc
        private int NumPatchesForFertiliser = 1;
        private double[] MonthlyFertAmt;
        private double[] FertDepthPlacement;
        private int[] PseudoRandomSeq;
        private int GrazingNumber = -1;
        private bool CutNow = false;

        private double AmountDungCReturned = 0.0;
        private int nPatchesAdded = 0;
        private int[] PatchToAddTo;
        private string[] PatchNmToAddTo = new string[1];


        [JsonIgnore] public bool grazedToday { get; set; }
        [JsonIgnore] public double Harvested { get; set; }
        [JsonIgnore] public double HarvestedN { get; set; }
        [JsonIgnore] public double UreaReturned  { get; set; }

        [Description("Frequency of cutting (days) (0 will be interpreted as the end of each month)")]
        public int CuttingFrequency { get; set; }

        [Description("Residual pasture mass after cutting (kg DM /ha)")]
        public int CuttingResidual { get; set; }

        [Description("Type of nutrient return - calculated from the amount of herbage harvested or constant")]
        public NutrientReturnTypes NutrientReturnType { get; set; }

        [Description("Amount of fertiliser N to apply to simulation after each cutting (pretend urine) (kgN/ha) (ignored if nutrient return is FromHarvest)")]
        public double AmountFertNReturned { get; set; }

        [Description("Amount of dung N to apply to simulation after each cutting (kgN/ha) (ignored if nutrient return is FromHarvest)")]
        public double AmountDungNReturned { get; set; }

        [Description("Depth band (0 mm to X mm) for fertiliser placement (mm)")]
        public int FertiliserDepth { get; set; }
                        
        [Description("Pattern for fertiliser return")]
        public urineReturnTypes FertiliserReturnPattern { get; set; }

        [Description("Frequency of reporting")]
        public reportingFrequencyTypes ReportingFreq { get; set; }

        [Description("Patch type")]
        public patchTypes PatchType { get; set; }

        [Description("How many patches should there be in the grid? (used to create the grid for EP & GP and the size of the patches for PP)")]
        public int NumPatches { get; set; }

        [Description("System identifier")]
        public systemTypes SystemID { get; set; }

        public enum systemTypes
        {
            /// <summary>A</summary>
            A,
            /// <summary>B</summary>
            B,
            /// <summary>C</summary>
            C,
            /// <summary>D</summary>
            D,
            /// <summary>E</summary>
            E,
            /// <summary>F</summary>
            F
        }

        public enum patchTypes
        {
            /// <summary>EP</summary>
            EP,
            /// <summary>EP</summary>
            GP,
            /// <summary>EP</summary>
            PP,
            /// <summary>EP</summary>
            UP
        }

        public enum reportingFrequencyTypes
        {
            /// <summary>Daily</summary>
            Daily,
            /// <summary>Every 10 days</summary>
            TenDaily,
            /// <summary>Monthly</summary>
            Monthly,
            /// <summary>Annual</summary>
            Annual,
            /// <summary>On grazing</summary>
            OnGrazing
        }

        public enum urineReturnTypes
        {
            /// <summary>Uniform</summary>
            UniformAcrossAllPatches,
            /// <summary>Rotating in order</summary>
            RotatingInOrder,
            /// <summary>Random</summary>
            Random,
            /// <summary>Pseudo-random</summary>
            PseudoRandom
        }

        public enum NutrientReturnTypes
        {
            /// <summary>Constant</summary>
            Constant,
            /// <summary>FromHarvest</summary>
            FromHarvest,
            /// <summary>SetMonthly</summary>
            SetMonthly
        }

        // Called just before a simulation is run.
        public override void OnPreLink()
        {
            if (PatchType == patchTypes.EP)
            {
                // Create the required number of paddocks.
                var simulation = Parent.Parent as Simulation;
                var paddock = simulation.FindChild<Zone>();
                for (int i = 0; i < NumPatches-1; i++)
                {
                    var newPaddock = Apsim.Clone(paddock);
                    Structure.Add(newPaddock, simulation);
                }
            }
        }

        // Called at beginning of a simulation run.
        [EventSubscribe("StartOfSimulation")]
        private void OnStartOfSimulation(object sender, EventArgs e)
        {
            summary.WriteMessage(this, "Initialising the Manager for grazing, urine return and reporting", MessageType.Diagnostic);

            grazedToday = false;
            foreach (var patchManager in patchManagers)
                patchManager.MaximumNitrogenAvailableToPlants = 200.0;

            // count the paddocks in the simulation
            NumPaddocks = 0;   
            foreach (Zone zone in this.Parent.FindAllInScope<Zone>().OfType<IModel>().ToList())
                NumPaddocks += 1;   
            summary.WriteMessage(this, "There are " + NumPaddocks + " in the simulation", MessageType.Diagnostic);

            MonthlyFertAmt = new double[] { 24, 19, 17, 12, 8, 5, 5, 10, 16, 19, 23, 25 };

            summary.WriteMessage(this, "Finished initialising the Manager for grazing, urine return and reporting", MessageType.Diagnostic);

            SetSystemParams();

            sward = new Sward(myZone);

            if ((PatchType == patchTypes.GP) && (NumPaddocks > 1))
                throw new Exception("Patch type GP may only have one paddock/zone");
            if ((PatchType == patchTypes.PP) && (NumPaddocks > 1))
                throw new Exception("Patch type PP may only have one paddock/zone");

            NumPatchesForFertiliser = 1;  // in the future this might be > 1
            if (FertiliserReturnPattern == urineReturnTypes.PseudoRandom)  // generate a return pattern up front
            {
                int MaxNumGrazings = (Clock.EndDate.Year - Clock.StartDate.Year + 1) * 52; //allow for a maximum of 1 per week

                PseudoRandomSeq = new int[MaxNumGrazings * NumPatchesForFertiliser];
                Random rndConstSeed = new Random((int)666);
                string MyString = "";
                for (int i = 0; i < (MaxNumGrazings * NumPatchesForFertiliser); i++)
                {
                    PseudoRandomSeq[i] = rndConstSeed.Next(0, NumPatches);  // will never select NumPatches 
                    MyString += Convert.ToString(PseudoRandomSeq[i]) + " ";
                }

                summary.WriteMessage(this, "The order of patch return will be: " + MyString, MessageType.Diagnostic);
            }

            // Add patches
            if (PatchType == patchTypes.GP)
            {
                foreach (var patchManager in patchManagers)
                {
                    //patchManager.MaximumNitrogenAvailableToPlants = 0.45;
                    patchManager.NPartitionApproach = PartitionApproachEnum.BasedOnConcentrationAndDelta;
                    patchManager.AutoAmalgamationApproach = AutoAmalgamationApproachEnum.None;
                    patchManager.basePatchApproach = BaseApproachEnum.IDBased;
                    patchManager.AllowPatchAmalgamationByAge = false;
                    patchManager.PatchAgeForForcedMerge = 3.0;                                
                }

                int[] PatchToAddTo = new int[1];  //need an array variable for this
                string[] PatchNmToAddTo = new string[1];  
                int nPatchesAdded = 0;
                double NewArea = 1.0 / NumPatches;

                while (nPatchesAdded < NumPatches - 1)
                {
                    AddSoilCNPatchType NewPatch = new AddSoilCNPatchType();
                    NewPatch.DepositionType = DepositionTypeEnum.ToNewPatch;
                    NewPatch.AreaFraction = NewArea;
                    PatchToAddTo[0] = 0;
                    PatchNmToAddTo[0] = "0";
                    NewPatch.AffectedPatches_id = PatchToAddTo;
                    NewPatch.AffectedPatches_nm = PatchNmToAddTo;
                    NewPatch.SuppressMessages = false;

                    foreach (var patchManager in patchManagers)
                        patchManager.Add(NewPatch);
                    nPatchesAdded += 1;
                }                

                summary.WriteMessage(this, "NumPatches at end of initialisation (GP):" + patchManagers[0].NumPatches.ToString(), MessageType.Diagnostic);
            }
        }

        [EventSubscribe("DoManagement")]
        private void OnDoManagement(object sender, EventArgs e)
        {    

            // if this is the start of the simulation then sort out the depth for the fertiliser (aka urine) placement
            // can't do this in initialisation because of the module order
            if (Clock.Today == Clock.StartDate)
            {
                FertPlacementDepth();
                int i = -1;  // to use as a patch counter

                iniOrgC = 0.0; 
                iniOrgN = 0.0;
                foreach (Zone zone in this.Parent.FindAllInScope<Zone>().OfType<IModel>().ToList())
                {
                    Soil soil = zone.FindInScope<Soil>() as Soil;
                    i += 1;

                    var patchManager = soil.FindChild<NutrientPatchManager>();
                    PatchCount = patchManager.NumPatches;

                    for (int ii = 0; ii <= (soilPhysical.Thickness.Length - 1); ii++)
                    {
                        iniOrgC += patchManager.TotalC[ii] / NumPaddocks; 
                        iniOrgN += patchManager.Organic.N[ii] / NumPaddocks;
                    }
                }
            }

            DaysSinceCut += 1;
            Harvested = 0.0;
            HarvestedN = 0.0;
            UreaReturned = 0.0;

            bool isEndOfMonth = false;
            if (Clock.Today.AddDays(1).Day == 1)
                isEndOfMonth = true;

            bool isEndOfYear = false;
            if (Clock.Today.AddDays(1).DayOfYear == 1)
                isEndOfYear = true;

            CutNow = false;
            grazedToday = false;
            if ((CuttingFrequency == 0) && (isEndOfMonth))
                CutNow = true;
            else if ((DaysSinceCut >= CuttingFrequency) && (CuttingFrequency > 0))
                CutNow = true;

            if (CutNow)
            {
                grazedToday = true;
                summary.WriteMessage(this, "Doing Cutting", MessageType.Diagnostic);
                DaysSinceCut = 0;
                GrazingNumber += 1;  //was initialsed as -1 - this is used to pick the pseudo-random patch return number
                // GetPatchForUrineReturn();  now called in the deposition routine

                // do the cutting=grazing - it doesn't matter if there one (GP) or many (EP) physical paddocks in the simulation at this point
                int i = -1;  // to use as a patch counter
                Harvested = 0.0;
                HarvestedN = 0.0;
                foreach (Zone zone in this.Parent.FindAllInScope<Zone>().OfType<IModel>().ToList())
                {
                    i += 1;
                    var sward = new Sward(zone);
                    sward.Graze(amount: CuttingResidual, type: "SetResidueAmount");
                    Harvested += sward.HarvestedWt / NumPaddocks;
                    HarvestedN += sward.HarvestedN / NumPaddocks;
                }

                if (NutrientReturnType == NutrientReturnTypes.FromHarvest)
                {
                    AmountFertNReturned = HarvestedN * 0.50;  // TODO yikes - probably should not have hard-coded this, if it is not FromHarvest then the value has been set in the manager parameters
                    AmountDungNReturned = HarvestedN * 0.35;  // 
                    AmountDungCReturned = AmountDungNReturned * 20;
                }
                else if (NutrientReturnType == NutrientReturnTypes.SetMonthly)
                {
                    AmountFertNReturned = MonthlyFertAmt[Clock.Today.Month - 1];
                    AmountDungNReturned = AmountFertNReturned * (0.35 / 0.50);  // 
                    AmountDungCReturned = AmountDungNReturned * 20;
                }
                else
                {
                    // urine and dung are set from the parameters
                    AmountDungCReturned = AmountDungNReturned * 20;
                }


                summary.WriteMessage(this, "The amount of urea fertiliser to be returned to the whole paddock is " + AmountFertNReturned, MessageType.Diagnostic);

                DoUrineReturn();

                DoTramplingAndDungReturn();

                summary.WriteMessage(this, "Finished Cutting", MessageType.Diagnostic);

            } // this is the end of the CutNow section

            if ((GeneralFertAmt > 0.0) && (Clock.Today.AddDays(1).Day == 1))
                DoFertiliser();
        }

        public void DoTramplingAndDungReturn()
        {
            int i = -1;  // patch or paddock counter
            foreach (Zone zone in this.Parent.FindAllInScope<Zone>().OfType<IModel>().ToList())
            {
                i += 1;
                SurfaceOrganicMatter surfaceOM = zone.FindInScope<SurfaceOrganicMatter>() as SurfaceOrganicMatter; 

                // do some trampling of litter
                // accelerate the movement of surface litter into the soil - do this before the dung is added
                double temp = surfaceOM.Wt * 0.1;

                TillageType trampling = new TillageType();
                surfaceOM.Incorporate(fraction: (double)0.1, depth: (double)100.0);

                summary.WriteMessage(this, "For patch " + i + " the amount of litter trampled was " + temp + " and the remaining litter is " + (surfaceOM.Wt), MessageType.Diagnostic);

                // move the dung to litter - assume dung is 40% of that harvested and a C:N ratio of 
                AddFaecesType dung = new AddFaecesType();
                dung.OMWeight = AmountDungCReturned / 0.4;
                dung.OMN = AmountDungNReturned;
                surfaceOM.AddFaeces(dung);
                summary.WriteMessage(this, "For patch " + i + " the amount of dung DM added to the litter was " + (AmountDungCReturned / 0.4) + " and the amount of N added in the dung was " + (AmountDungNReturned), MessageType.Diagnostic);

            } 
        }
        // this is the end of the trampling and dung patch/paddock section

        public void DoUrineReturn()
        {
            if (PatchType == patchTypes.EP)
            {                

                GetPatchForUrineReturn();  //sets the value for PatchNumForFert
                int i = -1; //to count the paddocks
                foreach (Zone zone in this.Parent.FindAllInScope<Zone>().OfType<IModel>().ToList())
                {
                    i += 1;
                    if (i == PatchNumForFert)
                    {
                        Fertiliser thisFert = zone.FindInScope<Fertiliser>() as Fertiliser;
                        Soil soil = zone.FindInScope<Soil>() as Soil;

                        double tempDepth = 0.0;
                        for (int ii = 0; ii <= (soilPhysical.Thickness.Length - 1); ii++)
                        {
                            tempDepth += soilPhysical.Thickness[ii];
                            thisFert.Apply(Amount: (double)(FertDepthPlacement[ii] * NumPatches * AmountFertNReturned), Type: Fertiliser.Types.UreaN, Depth: (tempDepth - soilPhysical.Thickness[ii] / 2));
                        }
                        UreaReturned += AmountFertNReturned * NumPatches;
                    }
                } 

            }
            else if (PatchType == patchTypes.GP)
            {
                GetPatchForUrineReturn();  //sets the value for PatchNumForFert
                int[] PatchToAddTo = new int[1];  //because need an array variable for this
                string[] PatchNmToAddTo = new string[0];  //need an array variable for this
                List<IModel> zones = this.FindAllInScope<Zone>().OfType<IModel>().ToList();
                Soil soil = zones[0].FindInScope<Soil>() as Soil; // Only one zone allowed for GP so use the first
                double[] UreaToAdd = new double[soilPhysical.Thickness.Length];  

                for (int ii = 0; ii <= (soilPhysical.Thickness.Length - 1); ii++)
                    UreaToAdd[ii] = FertDepthPlacement[ii] * NumPatches * AmountFertNReturned;

                UreaReturned += AmountFertNReturned;


                AddSoilCNPatchType CurrentPatch = new AddSoilCNPatchType();
                CurrentPatch.Sender = "manager";
                CurrentPatch.DepositionType = DepositionTypeEnum.ToSpecificPatch;
                PatchToAddTo[0] = PatchNumForFert;
                CurrentPatch.AffectedPatches_id = PatchToAddTo;
                CurrentPatch.AffectedPatches_nm = PatchNmToAddTo;
                CurrentPatch.Urea = UreaToAdd;


                summary.WriteMessage(this, "Patch MinN prior to urine return:", MessageType.Diagnostic);

                var patchManager = soil.FindChild<INutrientPatchManager>(); 
                patchManager.Add(CurrentPatch); 
                summary.WriteMessage(this, "Patch MinN after urine return:", MessageType.Diagnostic);
            }
            else if (PatchType == patchTypes.PP)
            {
                // create a new patch from base of area 1/NumPatches
                // add the fertiliser to that patch
                // set amalgamation autmomatic
                List<IModel> zones = this.FindAllInScope<Zone>().OfType<IModel>().ToList();
                Soil soil = zones[0].FindInScope<Soil>() as Soil; // Only one zone allowed for GP so use the first

                double[] UreaToAdd = new double[soilPhysical.Thickness.Length];  

                for (int ii = 0; ii <= (soilPhysical.Thickness.Length - 1); ii++)
                    UreaToAdd[ii] = FertDepthPlacement[ii] * NumPatches * AmountFertNReturned;

                int[] PatchToAddTo = new int[1];
                string[] PatchNmToAddTo = new string[0];  //need an array variable for this

                UreaReturned += AmountFertNReturned;

                AddSoilCNPatchType NewPatch = new AddSoilCNPatchType();
                NewPatch.DepositionType = DepositionTypeEnum.ToNewPatch;
                NewPatch.AreaFraction = 1.0 / NumPatches;
                PatchToAddTo[0] = 0;
                NewPatch.AffectedPatches_id = PatchToAddTo;
                NewPatch.AffectedPatches_nm = PatchNmToAddTo;
                NewPatch.Urea = UreaToAdd;

                summary.WriteMessage(this, "UreaToAdd " + UreaToAdd[0] + " " + UreaToAdd[1] + " " + UreaToAdd[2] + " " + UreaToAdd[3] + " " + UreaToAdd[4], MessageType.Diagnostic);

                var patchManager = soil.FindChild<INutrientPatchManager>(); 
                patchManager.Add(NewPatch);

                //throw new Exception("Have not set up the PP for DoUrineReturn yet");
            }
            else if (PatchType == patchTypes.UP)
            {
                int i = -1;  // patch or paddock counter
                foreach (Zone zone in this.Parent.FindAllInScope<Zone>().OfType<IModel>().ToList())
                {
                    i += 1;

                    Fertiliser thisFert = zone.FindInScope<Fertiliser>() as Fertiliser;
                    Soil soil = zone.FindInScope<Soil>() as Soil;

                    double tempDepth = 0.0;
                    for (int ii = 0; ii <= (soilPhysical.Thickness.Length - 1); ii++)
                    {
                        tempDepth += soilPhysical.Thickness[ii];
                        thisFert.Apply(Amount: (double)(FertDepthPlacement[ii] * AmountFertNReturned), Type: Fertiliser.Types.UreaN, Depth: (tempDepth - soilPhysical.Thickness[ii] / 2));
                    } 
                    UreaReturned += AmountFertNReturned;
                }
            }
            else
                throw new Exception("Patch type not catered for");



        }
        // end of DoUrineReturn

        public void GetPatchForUrineReturn()
        {
            
            if (FertiliserReturnPattern == urineReturnTypes.UniformAcrossAllPatches)
                PatchNumForFert = 0;  // but will not be used
            else if (FertiliserReturnPattern == urineReturnTypes.RotatingInOrder)
            {
                PatchNumForFert += 1;  //increment the patch number
                if (PatchNumForFert >= NumPatches)
                    PatchNumForFert = 0;  // but reset back to the first patch if needed
                //summary.WriteMessage(this, "The patch for fertiliser return is " + PatchNumForFert, MessageType.Diagnostic);
            }
            else if (FertiliserReturnPattern == urineReturnTypes.Random)
            {
                Random rnd = new Random();
                PatchNumForFert = rnd.Next(0, NumPatches);
                //summary.WriteMessage(this, "The next random number patch for fertiliser return is " + PatchNumForFert, MessageType.Diagnostic);
            }
            else if (FertiliserReturnPattern == urineReturnTypes.PseudoRandom)
            {
                PatchNumForFert = PseudoRandomSeq[GrazingNumber];
                //summary.WriteMessage(this, "The next pseudo-random number patch for fertiliser return is " + PatchNumForFert, MessageType.Diagnostic);
            }
        }
        // this is the end of GetPatchForUrineReturn


        public void FertPlacementDepth()
        {
            // note that this only looks at the first paddock and assumes that all the paddocks are the same
            int iii = -1;  // to use as a patch counter
            foreach (Zone zone in this.Parent.FindAllInScope<Zone>().OfType<IModel>().ToList())
            {
                iii += 1;
                if (iii == 0)
                {
                    Soil soil = zone.FindInScope<Soil>() as Soil;
                    double tempDepth = 0.0;
                    FertDepthPlacement = new double[soilPhysical.Thickness.Length];
                    for (int i = 0; i <= (soilPhysical.Thickness.Length - 1); i++)
                    {
                        tempDepth += soilPhysical.Thickness[i];
                        if (tempDepth <= FertiliserDepth)
                        {
                            FertDepthPlacement[i] = soilPhysical.Thickness[i] / FertiliserDepth;
                        }
                        else
                        {
                            FertDepthPlacement[i] = (FertiliserDepth - (tempDepth - soilPhysical.Thickness[i])) / (tempDepth - (tempDepth - soilPhysical.Thickness[i])) * soilPhysical.Thickness[i] / FertiliserDepth;
                            FertDepthPlacement[i] = Math.Max(0.0, Math.Min(1.0, FertDepthPlacement[i]));
                        }
                        //if (FertiliserReturnPattern == "UniformAcrossAllPatches")
                        //   summary.WriteMessage(this, "The proportion of fertiliser applied to the " + i + "th layer will be " + FertDepthPlacement[i], MessageType.Diagnostic);
                        //else
                        summary.WriteMessage(this, "The proportion of fertiliser (* NumPatches) applied to the " + i + "th layer will be " + FertDepthPlacement[i], MessageType.Diagnostic);
                    }
                }
            }

        }
        // this is the end of FertPlacementDepth


        public void DoFertiliser()
        {
            bool ApplyFert = true; // the test for first day of the month has already been done
            double NumMonths = 0;

            if (GeneralFertType == "Monthly")
                NumMonths = 12;
            else if (GeneralFertType == "NoWinter")
            {
                if ((Clock.Today.Month < 5) || (Clock.Today.Month > 7))
                {
                    ApplyFert = true;
                    NumMonths = 9;
                }
                else
                    ApplyFert = false;
            }
            else
                throw new Exception("Wrong general fertiliser setting");

            if (ApplyFert)
            {
                foreach (Zone zone in this.Parent.FindAllInScope<Zone>().OfType<IModel>().ToList())  // but actually there will only be a single paddock
                {
                    Fertiliser thisFert = zone.FindInScope<Fertiliser>() as Fertiliser;

                    //thisFert.Apply((float)(GeneralFertAmt / NumMonths), (float) (0.0), "urea_n");
                    thisFert.Apply(Amount: (double)(GeneralFertAmt / NumMonths), Type: Fertiliser.Types.UreaN, Depth: FertiliserDepth);
                    summary.WriteMessage(this, "Applying " + (GeneralFertAmt / NumMonths) + " kg of general fertiliser", MessageType.Diagnostic);
                }

            }
        }

        // Definition of all systems
        private void SetSystemParams()
        {
            if (SystemID == systemTypes.A)
            {
                SoilType = "HE";
                SimLocation = "Rua";
                SetIrrigation = "no";
                GeneralFertType = "NoWinter";
                GeneralFertAmt = 0.0;
                PastureType = "RyeWhite";
            }
            else if (SystemID == systemTypes.B)
            {
                SoilType = "HE";
                SimLocation = "Rua";
                SetIrrigation = "no";
                GeneralFertType = "NoWinter";
                GeneralFertAmt = 150.0;
                PastureType = "RyeWhite";
            }
            else if (SystemID == systemTypes.C)
            {
                SoilType = "VL";
                SimLocation = "Lin";
                SetIrrigation = "yes";
                GeneralFertType = "NoWinter";
                GeneralFertAmt = 0.0;
                PastureType = "RyeWhite";
            }
            else if (SystemID == systemTypes.D)
            {
                SoilType = "VL";
                SimLocation = "Lin";
                SetIrrigation = "yes";
                GeneralFertType = "NoWinter";
                GeneralFertAmt = 250.0;
                PastureType = "RyeWhite";
            }
            else if (SystemID == systemTypes.E)
            {
                SoilType = "VL";
                SimLocation = "Lin";
                SetIrrigation = "yes";
                GeneralFertType = "NoWinter";
                GeneralFertAmt = 400.0;
                PastureType = "GrassOnly";
            }
            else if (SystemID == systemTypes.F)
            {
                SoilType = "VL";
                SimLocation = "Lin";
                SetIrrigation = "no";
                GeneralFertType = "NoWinter";
                GeneralFertAmt = 0.0;
                PastureType = "RyeWhite";
            }
        }
    }

    // A class for aggregating a pasture species mix.
    [Serializable]
    class Sward
    {
        private const double Epsilon = 0.000000001;
        private List<PastureSpecies> species;
        private double amountRequired;

        public Sward(Zone zone)
        {
            species = zone.FindAllDescendants<PastureSpecies>().OfType<IModel>().ToList().Cast<PastureSpecies>().ToList();
        }

        public double HarvestableWt { get { return species.Sum(sp => sp.Harvestable.Wt); } }

        public double HarvestedWt { get { return species.Sum(sp => sp.HarvestedWt); } }

        public double HarvestedN { get { return species.Sum(sp => sp.HarvestedN); } }

        public double StandingHerbageWt { get { return species.Sum(sp => sp.Standing.Wt); } }

        public double AboveGroundWt { get { return species.Sum(sp => sp.AboveGroundWt); } }

        public bool IsAlive
        {
            get
            {
                bool alive = true;
                species.ForEach(sp => alive = alive && sp.PlantStatus == "alive");
                return alive;
            }
        }

        /// <summary>Removes plant material simulating a graze event.</summary>
        /// <param name="amount">The DM amount (kg/ha)</param>
        /// <param name="type">How the amount is interpreted (SetResidueAmount or SetRemoveAmount)</param>
        public void Graze(double amount, string type)
        {
            double amountAvailable = HarvestableWt;
            if (IsAlive || (amountAvailable > Epsilon))
            {
                // Get the amount required to remove
                if (type.ToLower() == "setresidueamount")
                {
                    // Remove all DM above given residual amount
                    amountRequired = Math.Max(0.0, AboveGroundWt - amount);
                }
                else if (type.ToLower() == "setremoveamount")
                {
                    // Remove a given amount
                    amountRequired = Math.Max(0.0, amount);
                }
                else
                {
                    throw new Exception("Type of amount to remove on graze not recognized (use \'SetResidueAmount\' or \'SetRemoveAmount\'");
                }
                // Get the actual amount to remove
                double amountToRemove = Math.Max(0.0, Math.Min(amountRequired, amountAvailable));

                // Get the amounts to remove by mySpecies:
                if (amountToRemove > Epsilon)
                {
                    double[] fractionToRemove = new double[species.Count];
                    for (int s = 0; s < species.Count; s++)
                    {
                        // get the fraction to required for each mySpecies, partition according to available DM to harvest
                        fractionToRemove[s] = species[s].Harvestable.Wt / amountAvailable;

                        // remove DM and N for each mySpecies (digestibility is also evaluated)
                        species[s].RemoveBiomass(amountToRemove * fractionToRemove[s]);
                    }
                }
            }
        }
    }
}
```
      Manager ReportingWithPatchesVariables
        verbose = False
        InputModule = PatchManager
        OutputModule = ReportingWithPatches
        ReportingFreq = Daily
        DaysSinceReport = 0
        NHA = 0
        PGR = 0
        HerbageGrazed = 0
        HerbageGrazedN = 0
        AreaUrinePatchesToday = 0
        UreaReturned = 0
        Fixation = 0
        LeachN = 0
        Denit = 0
        DenitN2O = 0
        OrgC = 0
        OrgN = 0
        dltOrgC = 0
        dltOrgN = 0
        MinN = 0
        UreaN = 0
        NH4N = 0
        NO3N = 0
        UreaAddedInGrazing = 0
        MinNPatch =
```csharp
using Newtonsoft.Json;
using Models.Soils.Nutrients;
using Models.Interfaces;
using System;
using Models.Core;
using Models.Soils;
using Models.PMF;
using Models.Zones;
using Models.AgPasture;
using System.Xml.Serialization;
using Models.Surface;
using APSIM.Shared.Utilities;
using System.Collections.Generic;
using System.Diagnostics;
using System.Linq;
using Models.Soils.NutrientPatching;
using Models.Climate;


namespace Models
{
    [Serializable]
    [System.Xml.Serialization.XmlInclude(typeof(Model))]
    public class Script : Model
    {
        [Link] private Clock Clock;
        [Link] private Simulation Simulation;
        [Link] private Soil soil;
        [Link] private ISummary summary;
        [Link] private Weather Weather;
        [Link] private Zone zone;
        public int PatchCount;
        public int PaddockCount;
        public double Grazed;
        public double GrazedN;
        public double UrineNReturned;
        private double iniOrgC;
        private double iniOrgN;
        private double myVariable;
        [Link(ByName = true)]
        private ISolute NO3;
        [Link(ByName = true)]
        private ISolute NH4;
        [Link(ByName = true)]
        private ISolute Urea;
        [Link]
        private NutrientPatchManager patchManager;
        private Models.Report ReportingWithPatches;
        [Link]
        private IPhysical soilPhysical;

        private Zone[] Zones { get; set; }


        [Description("Verbose reporting mode (True/False)")]
        public bool verbose { get; set; }

        [Description("Name of the patch manager for input")]
        public string InputModule { get; set; }

        [Description("Name of the report for output")]
        public string OutputModule { get; set; }

        [Description("Frequency of reporting")]
        public reportingFrequencyTypes ReportingFreq { get; set; }

        [JsonIgnore] public int DaysSinceReport { get; set; }
        [JsonIgnore] public double NHA { get; set; }
        [JsonIgnore] public double PGR { get; set; }
        [JsonIgnore] public double HerbageGrazed { get; set; }
        [JsonIgnore] public double HerbageGrazedN { get; set; }
        [JsonIgnore] public double AreaUrinePatchesToday { get; set; }
        [JsonIgnore] public double UreaReturned { get; set; }
        [JsonIgnore] public double Fixation { get; set; }
        [JsonIgnore] public double LeachN { get; set; }
        [JsonIgnore] public double Denit { get; set; }
        [JsonIgnore] public double DenitN2O { get; set; }
        [JsonIgnore] public double OrgC { get; set; }
        [JsonIgnore] public double OrgN { get; set; }
        [JsonIgnore] public double dltOrgC { get; set; }
        [JsonIgnore] public double dltOrgN { get; set; }
        [JsonIgnore] public double MinN { get; set; }
        [JsonIgnore] public double UreaN { get; set; }
        [JsonIgnore] public double NH4N { get; set; }
        [JsonIgnore] public double NO3N { get; set; }
        [JsonIgnore] public double UreaAddedInGrazing { get; set; }

        [JsonIgnore] public double[] MinNPatch { get; set; }




        private bool ReportToday = false;

        public enum reportingFrequencyTypes
        {
            /// <summary>Daily</summary>
            Daily,
            /// <summary>Every 10 days</summary>
            TenDaily,
            /// <summary>Monthly</summary>
            Monthly,
            /// <summary>Annual</summary>
            Annual,
            /// <summary>On grazing</summary>
            OnGrazing
        }

    

        [EventSubscribe("StartOfSimulation")]
        private void OnStartOfSimulation(object sender, EventArgs e)
        {

            if (verbose)
                summary.WriteMessage(this, "Initialising the Manager for grazing, urine return and reporting", MessageType.Diagnostic);
            DaysSinceReport = 0;
            PatchCount = patchManager.NumPatches;
            PaddockCount = 0;



            // Get list of zones in the simulation
            List<Zone> zones = new List<Zone>();

            foreach (Zone zone in this.Parent.FindAllInScope<Zone>().OfType<IModel>().ToList())
            {
                zones.Add(zone as Zone);
                ReportingWithPatches = (Models.Report)zone.Get("[" + OutputModule + "]");
                PaddockCount++;
            }
            Zones = zones.ToArray();


            //myVariable = (double)ManageGriddedPaddock.Get("Script.Var1");
            //double grazedN = ManageGriddedPaddock.Get("Script.grazedN");

            if (verbose)
                summary.WriteMessage(this, "Finished initialising the Manager for grazing, urine return and reporting", MessageType.Diagnostic);
        }


        [EventSubscribe("DoDailyInitialisation")]
        private void OnDoDailyInitialisation(object sender, EventArgs e)
        {    
                    
            if (verbose)
                summary.WriteMessage(this, "In Daily Initialisation for the Reporting Manager on " + Clock.Today, MessageType.Diagnostic);
            if (Clock.Today == Clock.StartDate)
            {

                iniOrgC = 0.0; 
                iniOrgN = 0.0;            

                foreach (Zone zone in Zones)
                {
                    var patchManager = zone.FindInScope<NutrientPatchManager>() as NutrientPatchManager;
                    for (int ii = 0; ii < soilPhysical.Thickness.Length; ii++)
                    {
                        iniOrgC += patchManager.TotalC[ii]; // TODO RJM Check this is right!
                        iniOrgN += patchManager.Organic.N[ii];
                    }
                }
            }        


        }

            
        [EventSubscribe("DoManagement")]
        private void DoManagement(object sender, EventArgs e)
        {
            bool isEndOfMonth = false;
            if (Clock.Today.AddDays(1).Day == 1)
                isEndOfMonth = true;
            

            bool isEndOfYear = false;
            if (Clock.Today.Day == 31 && Clock.Today.Month == 12)
                isEndOfYear = true;


            bool GrazedToday = (bool)Simulation.FindByPath(InputModule + ".Script.grazedToday").Value; 

            // should reporting be done today?  
            if (ReportingFreq == reportingFrequencyTypes.Daily)
                ReportToday = true;
            else if ((ReportingFreq == reportingFrequencyTypes.TenDaily) && ((Clock.Today.Day == 10) || (Clock.Today.Day == 20) || (isEndOfMonth)))
                ReportToday = true;
            else if ((ReportingFreq == reportingFrequencyTypes.Monthly) && (isEndOfMonth))
                ReportToday = true;
            else if ((ReportingFreq == reportingFrequencyTypes.Annual) && (isEndOfYear))
                ReportToday = true;
            else if ((ReportingFreq == reportingFrequencyTypes.OnGrazing) && (GrazedToday))
                ReportToday = true;
            else
                ReportToday = false;
            if (verbose)
                summary.WriteMessage(this, "Finished Prepare for the Reporting Manager on " + Clock.Today, MessageType.Diagnostic);
        }

        [EventSubscribe("EndOfDay")]
        private void OnEndOfDay(object sender, EventArgs e)
        {
            if (verbose)
                summary.WriteMessage(this, "In EndOfDay for the Reporting Manager on  " + Clock.Today, MessageType.Diagnostic);

            DaysSinceReport += 1;



            foreach (Zone zone in Zones)
            {
                var sward = zone.FindAllChildren<PastureSpecies>().OfType<IModel>().ToList().Cast<PastureSpecies>().ToList();
                NHA += sward.Sum(species => species.HerbageGrowthWt) / PaddockCount;
                PGR = NHA;  // divide this by the number of days just before reporting
                Fixation += sward.Sum(species => species.FixedN) / PaddockCount;

                var waterBalance = zone.FindInScope<ISoilWater>();
                LeachN += waterBalance.FlowNO3[waterBalance.FlowNO3.Length - 1] / PaddockCount;  // only take the deepest element

                for (int ii = 0; ii <= (soilPhysical.Thickness.Length - 1); ii++)
                {
                    Denit += patchManager.DenitrifiedN[ii] / PaddockCount;
                    DenitN2O += patchManager.N2Oatm[ii] / PaddockCount;
                }


                Grazed = (double)zone.Get("[" + InputModule + "].Script.Harvested") / PaddockCount;
                GrazedN = (double)zone.Get("[" + InputModule + "].Script.HarvestedN") / PaddockCount;
                UrineNReturned = (double)zone.Get("[" + InputModule + "].Script.UreaReturned") / PaddockCount;
                //AreaUrinePatchesToday = (double)zone.Get("[" + InputModule + "].Script.areaUrinePatchesToday");
            } 

            HerbageGrazed += Grazed;
            HerbageGrazedN += GrazedN;
            UreaReturned += UrineNReturned;

            if (ReportToday)
            {

                OrgC = 0.0;
                OrgN = 0.0;
                UreaN = 0.0;
                NH4N = 0.0;
                NO3N = 0.0;
                MinN = 0.0;


                Soil soil1 = Zones[0].FindInScope<Soil>() as Soil;

                if (PaddockCount > 1)
                    MinNPatch = new double[PaddockCount];
                else
                    MinNPatch = new double[patchManager.NumPatches];


                int currentZoneNum = 0;
                foreach (Zone zone in Zones)
                {
                    Soil soil = zone.FindInScope<Soil>() as Soil;

                    double minNPatch = 0;

                    for (int ii = 0; ii <= (soilPhysical.Thickness.Length - 1); ii++)
                    {
                        OrgC += patchManager.TotalC[ii] / PaddockCount;  
                        OrgN += patchManager.Organic.N[ii] / PaddockCount;
                        UreaN += Urea.kgha[ii] / PaddockCount;
                        NH4N += NH4.kgha[ii] / PaddockCount;
                        NO3N += NO3.kgha[ii] / PaddockCount;
                        MinN = UreaN + NH4N + NO3N;                    
                        minNPatch += Urea.kgha[ii] + NH4.kgha[ii] + NO3.kgha[ii];
                    }


                    //MinN = (UreaN*PaddockCount + NH4N*PaddockCount + NO3N*PaddockCount);
                    if (PaddockCount > 1)
                        MinNPatch[currentZoneNum] = minNPatch;

                    dltOrgC = OrgC - iniOrgC; 
                    dltOrgN = OrgN - iniOrgN;
                    iniOrgC = OrgC; // ready for the next calculation of change in pools
                    iniOrgN = OrgN;
                    currentZoneNum++;
                }

                if (patchManager.NumPatches > 1)
                {  // TODO will break if there is more than one paddock/zone AND more than one patch                    

                    for (int ii = 0; ii < (patchManager.NumPatches); ii++)
                    {
                        MinNPatch[ii] = patchManager.UreaForEachPatch[ii] + patchManager.NH4ForEachPatch[ii] + patchManager.NO3ForEachPatch[ii];
                    }
                }

                PGR = NHA / DaysSinceReport; 

                ReportingWithPatches.DoOutput();

                // now zero the reported variables
                DaysSinceReport = 0;
                HerbageGrazed = 0.0;
                HerbageGrazedN = 0.0;
                DaysSinceReport = 0;
                NHA = 0;
                PGR = 0;
                UreaReturned = 0;
                Fixation = 0;
                LeachN = 0;
                Denit = 0;
                DenitN2O = 0;
                OrgC = 0;
                OrgN = 0;
                MinN = 0;
                UreaN = 0;
                NH4N = 0;
                NO3N = 0;
            }
        }
    }
}
```
      Report ReportingWithPatches
        VariableNames:
          Parent.Name as Zone
          [Clock].Today as Date
          [Clock].Today.Month as Month
          [Clock].Today.Month as Year
          [ReportingWithPatchesVariables].Script.UreaReturned as UrineNReturned
          [ReportingWithPatchesVariables].Script.NHA as NHA
          [PatchManager].Script.NumPatches as NumPatches
          [ReportingWithPatchesVariables].Script.AreaUrinePatchesToday as AreaUrinePatchesToday
          [ReportingWithPatchesVariables].Script.HerbageGrazed as HerbageGrazed
          [ReportingWithPatchesVariables].Script.HerbageGrazedN as HerbageGrazedN
          [ReportingWithPatchesVariables].Script.LeachN as LeachN
          [ReportingWithPatchesVariables].Script.Denit as Denit
          [ReportingWithPatchesVariables].Script.Fixation as Fixation
          [ReportingWithPatchesVariables].Script.MinN as MinN
          [ReportingWithPatchesVariables].Script.UreaN as UreaN
          [ReportingWithPatchesVariables].Script.NH4N as NH4N
          [ReportingWithPatchesVariables].Script.NO3N as NO3N
          [ReportingWithPatchesVariables].Script.dltOrgC as dltOrgC
          [ReportingWithPatchesVariables].Script.dltOrgN as dltOrgN
      Zone P: Area=1; Slope=0; AspectAngle=0; Altitude=50
        Manager CentrePivot
          allowIrrigation = yes
          IrrigStart = 1-sep
          IrrigEnd = 30-apr
          SoilDepth = 500
          CritPAWForShallow = 60
          CritRainToPause = 30
          DaysToPauseOnCritRain = 3
          IrrigReturnShallow = 2
          IrrigAmtShallow = 10
          PercPAWIrrigDeficitShallow = 30
          IrrigEffShallow = 100
          IrrigReturnDeep = 4
          IrrigAmtDeep = 20
          PercPAWIrrigDeficitDeep = 25
          IrrigEffDeep = 100
          TodayDeficit = 123.894
          TodayDeficit_nve = -123.894
          IrrigDay = 3
          SoilPAW = 63.65
          IrrigDeficit = 25
          IrrigReturn = 4
          IrrigAmt = 20
          IrrigEff = 100
          Rain3 = 0
          Days2Pause = -80
```csharp
using Models.Climate;
using System;
using Models.Core;
using Models.PMF;
using Models.Soils;
using System.Xml.Serialization;
using APSIM.Shared.Utilities;
using System.Diagnostics;
        
namespace Models
{
    [Serializable] 
    [System.Xml.Serialization.XmlInclude(typeof(Model))]
    public class Script : Model
    {
        [Link] private ISummary summary;
        [Link] private Irrigation irrigation;
        [Link] private Clock Clock;
        [Link] private Soil soil;
        [Link] private Weather Met;
        [Link(IsOptional = true)] private IPlant existingCrop;
        private DateTime StartDate;
        private DateTime EndDate;
        [Link]
        private IPhysical soilPhysical;
        //Communication to other modules
       
        //User inputs from properties tab
        [Description("Turn irrigation on?")]
        public answerTypes allowIrrigation { get; set; }
        [Description("Start of irrigation season (dd-MMM)")]
        public string IrrigStart { get; set; }
        [Description("End of irrigation season (dd-MMM)")]
        public string IrrigEnd { get; set; }
        [Description("Enter the depth to which water deficit is computed (mm)")]
        public double SoilDepth { get; set; }
        [Description("PAW below which soil is considered 'shallow' (mm)")]
        public double CritPAWForShallow { get; set; }
        [Description("Amount of rainfall over the last 3 days to cause pause to irrigator (mm)")]
        public double CritRainToPause { get; set; }
        [Description("Number of days to pause irrigator after critical rainfall (days)")]
        public double DaysToPauseOnCritRain { get; set; }

        [Description("Shallow Soils: Irrigation return period (days)")]
        public double IrrigReturnShallow { get; set; }
        [Description("Shallow Soils: Effective irrigation amount (mm)")]
        public double IrrigAmtShallow { get; set; }
        [Description("Shallow Soils: Percentage of PAW at which to irrigate (%)")]
        public double PercPAWIrrigDeficitShallow { get; set; }
        [Description("Shallow Soils: Irrigation efficiency (%)")]
        public double IrrigEffShallow { get; set; }

        [Description("Deep Soils: Irrigation return period (days)")]
        public double IrrigReturnDeep { get; set; }
        [Description("Deep Soils: Effective irrigation amount (mm)")]
        public double IrrigAmtDeep { get; set; }
        [Description("Deep Soils: Percentage of PAW at which to irrigate (%)")]
        public double PercPAWIrrigDeficitDeep { get; set; }
        [Description("Deep Soils: Irrigation efficiency (%)")]
        public double IrrigEffDeep { get; set; }

        // Outputs
        public double TodayDeficit { get; set; }
        public double TodayDeficit_nve { get; set; }
        public double IrrigDay { get; set; }
        public double SoilPAW { get; set; }
        public double IrrigDeficit { get; set; }
        public double IrrigReturn { get; set; }
        public double IrrigAmt { get; set; }
        public double IrrigEff { get; set; }
        public double Rain3 { get; set; }

        public double Days2Pause { get; set; }

        // internal use
        //The date when irrigation start (in date format)
        //The date when irrigation finish (in date format)
        private double RainToday = 0;
        public double[] Rain_3;

        public enum answerTypes
        {
            /// <summary>a positive answer</summary>
            yes,
            /// <summary>a negative answer</summary>
            no
        }


        [EventSubscribe("StartOfSimulation")]
        private void OnStartOfSimulation(object sender, EventArgs e)
        {
            summary.WriteMessage(this, "==================================================", MessageType.Diagnostic);
            summary.WriteMessage(this, "                CentrePivot initialising          ", MessageType.Diagnostic);
            summary.WriteMessage(this, "", MessageType.Diagnostic);

            IrrigDay = 5000;  //so will reset to 1 on first day
            StartDate = DateTime.Parse(IrrigStart);
            EndDate = DateTime.Parse(IrrigEnd);

            Rain3 = 0;
            Rain_3 = new double[4];
            Rain_3[0] = 0;
            Rain_3[1] = 0;
            Rain_3[2] = 0;

            SoilPAW = 0.0;

            double[] sw_dul = soilPhysical.DULmm;
            double[] sw_15 = soilPhysical.LL15mm;  
            double MySoilDepth = 0;
            for (int z = 0; z < soilPhysical.Thickness.Length; z++)
            {
                MySoilDepth += soilPhysical.Thickness[z];
                if (MySoilDepth <= SoilDepth)
                    SoilPAW += sw_dul[z] - sw_15[z];    
            }

            if (SoilPAW <= CritPAWForShallow)
            {      
                IrrigDeficit = PercPAWIrrigDeficitShallow / 100 * SoilPAW;
                IrrigReturn = IrrigReturnShallow;
                IrrigAmt = IrrigAmtShallow;
                IrrigEff = IrrigEffShallow;           
                summary.WriteMessage(this, "  Soil is considered to be shallow " + CritPAWForShallow + " " + SoilPAW, MessageType.Diagnostic);
            }
            else
            {
                IrrigDeficit = PercPAWIrrigDeficitDeep;
                IrrigReturn = IrrigReturnDeep;
                IrrigAmt = IrrigAmtDeep;
                IrrigEff = IrrigEffDeep;
                summary.WriteMessage(this, "  Soil is considered to be deep", MessageType.Diagnostic);
            }

            summary.WriteMessage(this, "  Irrigation critical deficit (mm): " + IrrigDeficit, MessageType.Diagnostic);
            summary.WriteMessage(this, "          Irrigation return (days): " + IrrigReturn, MessageType.Diagnostic);
            summary.WriteMessage(this, "     Irrigation pumped amount (mm): " + IrrigAmt, MessageType.Diagnostic);
            summary.WriteMessage(this, "         Irrigation efficiency (%): " + IrrigEff, MessageType.Diagnostic);
            summary.WriteMessage(this, "", MessageType.Diagnostic);
            summary.WriteMessage(this, "                CentrePivot initialised", MessageType.Diagnostic);
            summary.WriteMessage(this, "==================================================", MessageType.Diagnostic);
            
        }

        [EventSubscribe("StartOfSimulation")]
        private void OnSimulationCommencing(object sender, EventArgs e)
        {
        }

        [EventSubscribe("PreparingNewWeatherData")]
        private void OnPreparingNewWeatherData(object sender, EventArgs e)
        {
            RainToday = Met.Rain; //takes note of how much rain was due to fall today        
        }

        [EventSubscribe("StartOfDay")]
        private void OnStartOfDay(object sender, EventArgs e)
        {
            int rain = 0;

            Rain_3[2] = Rain_3[1];
            Rain_3[1] = Rain_3[0];
            Rain_3[0] = RainToday;
            Rain3 = Rain_3[0] + Rain_3[1] + Rain_3[2]; //sums the rain in the last 3 days
            if (Rain3 >= CritRainToPause)
                Days2Pause = DaysToPauseOnCritRain;
            else
                Days2Pause = Days2Pause - 1;

            double[] sw_dul = soilPhysical.DULmm;
            double[] sw_sw = soil.Water; 
            double[] sw_15 = soilPhysical.LL15mm;  
            double MySoilDepth = 0;

            TodayDeficit = 0.0;
            SoilPAW = 0.0;

            for (int z = 0; z < soilPhysical.Thickness.Length; z++)
            {
                MySoilDepth += soilPhysical.Thickness[z];
                if (MySoilDepth <= SoilDepth)
                {
                    SoilPAW += sw_dul[z] - sw_15[z];    
                    TodayDeficit += sw_dul[z] - Math.Min(sw_dul[z], sw_sw[z]);
                }
            }
            TodayDeficit_nve = -1 * TodayDeficit;

            if (isBetween(Clock.Today, StartDate, EndDate))
            {
                if (SoilPAW <= CritPAWForShallow)
                {      
                    IrrigDeficit = PercPAWIrrigDeficitShallow / 100 * SoilPAW;
                    IrrigReturn = IrrigReturnShallow;
                    IrrigAmt = IrrigAmtShallow;
                    IrrigEff = IrrigEffShallow;           
                }
                else
                {
                    IrrigDeficit = PercPAWIrrigDeficitDeep;
                    IrrigReturn = IrrigReturnDeep;
                    IrrigAmt = IrrigAmtDeep;
                    IrrigEff = IrrigEffDeep;
                }

                if (Days2Pause < 0.5)
                {
                    IrrigDay = IrrigDay + 1;
                    if (IrrigDay > IrrigReturn)
                        IrrigDay = 1;  // and day = 1 is when the irrigation happens                    

                    if ((TodayDeficit >= IrrigDeficit) && (allowIrrigation == answerTypes.yes))
                    {
                        if (IrrigDay == 1)
                        {
                            double AmountToApply = (IrrigAmt / (IrrigEff / 100.0));
                            irrigation.Apply(AmountToApply);

                        }
                    }
                }
            }
        }

        ///Checks whether theDate is between iniDate and endDate (non-year specific)
        private bool isBetween(DateTime theDay, DateTime iniDate, DateTime endDate)
        {
            bool result = false;
            if (iniDate.DayOfYear < endDate.DayOfYear)
            {
                // period is within one year, ex: summer in the northern hemisphere
                if ((theDay.DayOfYear >= iniDate.DayOfYear) && (theDay.DayOfYear <= endDate.DayOfYear))
                    result = true;
            }
            else
            {
                // period goes over the end of the year, ex: summer in the southern hemisphere
                if ((theDay.DayOfYear >= iniDate.DayOfYear) || (theDay.DayOfYear <= endDate.DayOfYear))
                    result = true;
            }
            
            return result;
        }

    }
}
```
        SurfaceOrganicMatter: InitialResidueName=grass; InitialResidueType=grass; InitialResidueMass=500; InitialStandingFraction=0; InitialCPR=0; InitialCNR=15
        MicroClimate: a_interception=0; b_interception=1; c_interception=0; d_interception=0; SoilHeatFluxFraction=0.4; MinimumHeightDiffForNewLayer=0; NightInterceptionFraction=0.5; ReferenceHeight=2
        Irrigation
        Fertiliser
        Report DailyReport: EventNames=[Clock].EndOfDay
          VariableNames:
            [Clock].Today as Date
            [Zone].Name as PaddockName
            [Weather].Rain
            (sum([NutrientPatchManager].Urea.kgha) + sum([NutrientPatchManager].NH4.kgha) + sum([NutrientPatchManager].NO3.kgha)) as minNPaddock
            sum([NutrientPatchManager].Urea.kgha) as Urea
            sum([NutrientPatchManager].NO3.kgha) as NO3
            sum([NutrientPatchManager].NH4.kgha) as NH4
            [NutrientPatchManager].MineralNEachPatch as MineralNEachPatch
            [Fertiliser].NitrogenApplied as Fertiliser
            [Irrigation].IrrigationApplied as IrrigationApplied
            sum([HE_140mm].SoilWater.PAWmm) as PAW
            [AGPRyegrass].AboveGroundWt + [AGPWhiteClover].AboveGroundWt as AboveGroundWt
            [AGPRyegrass].SoilUptakeN + [AGPWhiteClover].SoilUptakeN as UptakeN
            [AGPRyegrass].AboveGroundWt
            [AGPWhiteClover].AboveGroundWt
        Soil HE_140mm: SoilType=NZ_sedementary; Region=Plains; State=Canterbury; Country=New Zealand; Latitude=0; Longitude=0
          DataSource=Generic profile descriptions provided by Trevor Webb and data for functional horizions based on SWAMP project results
          Comments=Bulk density values were measured on the fine earth fraction so values entered into apsim soil are adjusted down to account for stone content (assuming stones are inert from all soil process so their mass and volume is removed from model paramaters).  SAT, DUL, LL15 and Air dry have been adjusted down to account for stone content.  OC has not been adjusted so the model will get the correct carbon and N amounts using the adjusted BD.
          Physical
            Thickness  ParticleSizeClay  ParticleSizeSand  ParticleSizeSilt  BD      AirDry   LL15    DUL     SAT       KS
            200        20                14.5              65.5              1.3105  0.07675  0.1535  0.3735  0.456165  4832.04
            150        24                18                58                1.524   0.201    0.201   0.332   0.39432   389.229
            200        39                13                48                1.42    0.2985   0.2985  0.426   0.441525  21.6
            350        44                1                 55                1.424   0.308    0.308   0.446   0.4557    19.0512
            150        44                1                 55                1.424   0.308    0.308   0.446   0.456     19.051
            150        19                15                66                1.601   0.162    0.162   0.325   0.376     97.995
            300        19                15                66                1.601   0.162    0.162   0.325   0.376     97.995
            SoilCrop AGPRyegrassSoil: LL=[0.154, 0.201, 0.299, 0.308, 0.308, 0.162, 0.162]; KL=[0.1, 0.1, 0.1, 0.05, 0.05, 0.05, 0.05]; XF=[1, 0.8, 0.8, 0.3, 0, 0, 0]
            SoilCrop AGPWhiteCloverSoil: LL=[0.154, 0.201, 0.299, 0.308, 0.308, 0.162, 0.162]; KL=[0.1, 0.1, 0.1, 0.05, 0.05, 0.05, 0.05]; XF=[1, 0.8, 0.8, 0.3, 0, 0, 0]
          Organic: FOMCNRatio=40; CarbonUnits=Total
            Thickness  Carbon  SoilCNRatio  FBiom   FInert  FOM
            200        4.502   11           0.048   0.382   347.67
            150        1.91    11           0.027   0.634   257.56
            200        0.772   11           0.0195  0.784   172.648
            350        0.422   11           0.015   0.924   85.7343
            150        0.422   11           0.015   0.924   63.5135
            150        0.402   11           0.015   0.971   47.052
            300        0.4     11           0.015   0.985   25.8227
          Chemical: Thickness=[200, 150, 200, 350, 150, 150, 300]; PH=[6, 6, 6, 6, 6, 6, 6]; PHUnits=Water
          WaterBalance SoilWater: SummerDate=1-Oct; SummerU=9; SummerCona=4.4; WinterDate=1-Apr; WinterU=6; WinterCona=3; DiffusConst=88; DiffusSlope=35; Salb=0.13; CN2Bare=73; CNRed=20; CNCov=0.8; PSIDul=-100; Thickness=[200, 150, 200, 350, 150, 150, 300]
            SWCON=[0.496442, 0.365575, 0.373877, 0.0758548, 0.076, 0.306, 0.306]
          Water: Thickness=[200, 150, 200, 350, 150, 150, 300]; InitialValues=[0.3735, 0.332, 0.426, 0.446, 0.446, 0.325, 0.325]; FilledFromTop=true
          NutrientPatchManager: MaximumNitrogenAvailableToPlants=3; NPartitionApproach=0; AutoAmalgamationApproach=0; basePatchApproach=0; AllowPatchAmalgamationByAge=false; PatchAgeForForcedMerge=0; LayerForNPartition=-99
          CERESSoilTemperature Temperature
          SolutePatch NO3: Thickness=[200, 150, 200, 350, 150, 150, 300]; InitialValues=[18.98, 4.625, 1.047, 1.047, 1.031, 1, 1]; InitialValuesUnits=ppm; WaterTableConcentration=0; D0=0; DepthConstant=0; MaxDepthSoluteAccessible=0; RunoffEffectivenessAtMovingSolute=0; MaxEffectiveRunoff=0
          SolutePatch NH4: Thickness=[200, 150, 200, 350, 150, 150, 300]; InitialValuesUnits=ppm; WaterTableConcentration=0; D0=0; DepthConstant=0; MaxDepthSoluteAccessible=0; RunoffEffectivenessAtMovingSolute=0; MaxEffectiveRunoff=0
            InitialValues=[0.883818, 0.312958, 0.104681, 0.104681, 0.136454, 0.2, 0.2]
          SolutePatch PlantAvailableNO3: InitialValuesUnits=ppm; WaterTableConcentration=0; D0=0; DepthConstant=0; MaxDepthSoluteAccessible=0; RunoffEffectivenessAtMovingSolute=0; MaxEffectiveRunoff=0
          SolutePatch PlantAvailableNH4: InitialValuesUnits=ppm; WaterTableConcentration=0; D0=0; DepthConstant=0; MaxDepthSoluteAccessible=0; RunoffEffectivenessAtMovingSolute=0; MaxEffectiveRunoff=0
          SolutePatch Urea: Thickness=[200, 150, 200, 350, 150, 150, 300]; InitialValues=[0, 0, 0, 0, 0, 0, 0]; InitialValuesUnits=kg/ha; WaterTableConcentration=0; D0=0; DepthConstant=0; MaxDepthSoluteAccessible=0; RunoffEffectivenessAtMovingSolute=0; MaxEffectiveRunoff=0
        PastureSpecies AGPRyegrass: doyGermination=275; daysEmergenceToAnthesis=120; daysAnthesisToMaturity=85; degreesDayForAnthesis=1100; degreesDayForMaturity=900; daysAnnualsFactor=45; InitialShootDM=1500; InitialRootDM=450; InitialRootDepth=750; initialDMFractionsGrasses=[0.15, 0.25, 0.25, 0.05, 0.05, 0.1, 0.1, 0.05, 0, 0, 0]; initialDMFractionsForbs=[0.2, 0.2, 0.15, 0.05, 0.1, 0.15, 0.1, 0.05, 0, 0, 0]; PhotosyntheticEfficiency=0.01; PhotosynthesisCurveFactor=0.8; FractionPAR=0.5; ReferenceCO2=380; CO2EffectScaleFactor=700; CO2EffectOffsetFactor=600; CO2EffectMinimum=0.7; CO2EffectExponent=2; ReproSeasonDurationCoeff=2; ReproSeasonShouldersLengthFactor=1; ReproSeasonOnsetDurationFactor=0.6; RelativeTurnoverEmerging=2; DetachmentDroughtCoefficient=3; DetachmentDroughtEffectMin=0.1; TurnoverStockFactor=0.01; TurnoverDefoliationEffectMin=0.025; MinimumGreenLeafProp=0.8; MinimumGreenRootProp=0.5
          initialDMFractionsLegumes=[0.16, 0.23, 0.22, 0.05, 0.03, 0.05, 0.05, 0.01, 0.04, 0.08, 0.08]
          LinearInterpolationFunction FVPDFunction
        PastureSpecies AGPWhiteClover: doyGermination=275; daysEmergenceToAnthesis=120; daysAnthesisToMaturity=85; degreesDayForAnthesis=1100; degreesDayForMaturity=900; daysAnnualsFactor=45; InitialShootDM=500; InitialRootDM=150; InitialRootDepth=350; initialDMFractionsGrasses=[0.15, 0.25, 0.25, 0.05, 0.05, 0.1, 0.1, 0.05, 0, 0, 0]; initialDMFractionsForbs=[0.2, 0.2, 0.15, 0.05, 0.1, 0.15, 0.1, 0.05, 0, 0, 0]; PhotosyntheticEfficiency=0.01; PhotosynthesisCurveFactor=0.8; FractionPAR=0.5; ReferenceCO2=380; CO2EffectScaleFactor=700; CO2EffectOffsetFactor=600; CO2EffectMinimum=0.7; CO2EffectExponent=2; ReproSeasonDurationCoeff=2; ReproSeasonShouldersLengthFactor=1; ReproSeasonOnsetDurationFactor=0.6; RelativeTurnoverEmerging=2; DetachmentDroughtCoefficient=3; DetachmentDroughtEffectMin=0.1; TurnoverStockFactor=0.01; TurnoverDefoliationEffectMin=0.025; MinimumGreenLeafProp=0.8; MinimumGreenRootProp=0.5
          initialDMFractionsLegumes=[0.16, 0.23, 0.22, 0.05, 0.03, 0.05, 0.05, 0.01, 0.04, 0.08, 0.08]
          LinearInterpolationFunction FVPDFunction
  Experiment ExpRange
    Factors
      Permutation (disabled)
        Factor ZoneCount: Specification=[PatchAndZoneManager].Script.ZoneCount = 1, 2, 5, 10, 20
        Factor Type: Specification=[PatchAndZoneManager].Script.PseudoPatches=true,false
      CompositeFactor Patches
        Specifications:
          [PatchAndZoneManager].Script.ZoneCount = 5
          [PatchAndZoneManager].Script.PseudoPatches = true
      CompositeFactor Zones
        Specifications:
          [PatchAndZoneManager].Script.ZoneCount = 5
          [PatchAndZoneManager].Script.PseudoPatches = false
    Simulation ExpBase
      Clock: Start=1972-01-01; End=1972-07-04
      Summary SummaryFile
      Weather: FileName=%root%\Tests\WeatherFiles\Ruakura.met
      SoilArbitrator Soil Arbitrator
      MicroClimate: a_interception=0; b_interception=1; c_interception=0; d_interception=0; SoilHeatFluxFraction=0.4; MinimumHeightDiffForNewLayer=0; NightInterceptionFraction=0.5; ReferenceHeight=2
      Manager PatchAndZoneManager
        Verbose = False
        PseudoPatches = True
        ZoneCount = 5
        UrineReturnType = SetMonthly
        UrineReturnPattern = RotatingInOrder
        UrineDepthPenetration = 200
```csharp
using Newtonsoft.Json;
using Models.Soils.Nutrients;
using Models.Soils.NutrientPatching;
using Models.Interfaces;
using System.Diagnostics;
using System.Collections.Generic;
using APSIM.Shared.Utilities;
using Models.Surface;
using Models.Soils;
using System.Xml.Serialization;
using Models.AgPasture;
using Models.Zones;
using Models.PMF;
using Models.Core;
using Models.Core.ApsimFile;
using System;
using System.Linq;
using Models.Climate;

namespace Models
{
    [Serializable]
    [System.Xml.Serialization.XmlInclude(typeof(Model))]
    public class Script : Model
    {
        [Link] private Clock clock;
        [Link] private Soil soil;
        [Link] private ISummary summary;
        [Link] private Weather weather;
        [Link] private Zone zone;
        [Link] private IPhysical soilPhysical;
        [Link] private List<NutrientPatchManager> patchManagers;

        private Sward sward;
      
        [Description("Verbose reporting to the summary file?")]
        public bool Verbose { get; set; }
        
        [Description("Should this simulation create Patches? If not then explict Zones will be created")]
        public bool PseudoPatches { get; set; }
        
        [Description("How many patches or zones should be created?")]
        public int ZoneCount { get; set; }
        
        [Description("Nature of nutrient return")]
        public UrineReturnTypes UrineReturnType { get; set; }

        [Description("Pattern (spatial) of nutrient return")]
        public UrineReturnPatterns UrineReturnPattern { get; set; }

        [Description("Depth of urine penetration (mm)")]
        public double UrineDepthPenetration { get; set; }

        
        public int ZoneNumForUrine { get; set; }    // zone or patch that urine will be applied to
        public int NumZonesForUrine { get; set; }   // not enabled yet but for applying urine across more than one zone or patch
        public double DivisorForReporting { get; set; }   // 
        
        public double HarvestedWt { get; set; }     // from the whole paddock
        public double HarvestedN { get; set; }      // from the whole paddock
        public double AmountUrineNReturned { get; set; }   // to the whole paddock
        public double AmountDungNReturned { get; set; }    // to the whole paddock
        public double AmountDungCReturned { get; set; }    // to the whole paddock
        
        private double[] MonthlyUrineNAmt;                 // breaks the N balance but useful for testing
        private bool GrazeToday;
		private double[] UrineDepthPenetrationArray;

		[NonSerialized]
		Random pseudoRandom; // = new Random(666);  // sets a constant seed value


        public enum UrineReturnPatterns
        {
            // <summary>Not enabled Uniform</summary>
            //UniformAcrossAllPatches,
            /// <summary>Rotating in order</summary>
            RotatingInOrder,
            /// <summary>Not enabled Random</summary>
            Random,
            /// <summary>Not enabled Pseudo-random</summary>
            PseudoRandom
        }
        
        public enum UrineReturnTypes
        {
            /// <summary>FromHarvest</summary>
            FromHarvest,
            /// <summary>SetMonthly</summary>
            SetMonthly
        }


        public override void OnPreLink()
        {
            var simulation = Parent.Parent as Simulation;
            var zone = simulation.FindChild<Zone>();
                
			// Set the maximum N uptake for all species
			foreach (var species in zone.FindAllDescendants<PastureSpecies>())
			{
				var root = species.FindChild<PastureBelowGroundOrgan>();
				root.MaximumNUptake = 1.5;
			}
				
            if (!PseudoPatches)  // so now this is zones - possibly multiple zones
            {
	            zone.Area = 1.0 / ZoneCount;  // and then this will apply to all the new zones
       			foreach (var species in zone.FindAllDescendants<PastureSpecies>())
				{
					var root = species.FindChild<PastureBelowGroundOrgan>();
					root.MaximumNUptake = 3.0;
				
				}
				for (int i = 0; i < ZoneCount-1; i++)
	            {
	                var newZone = Apsim.Clone(zone);
	                Structure.Add(newZone, simulation);
	            }
        	}
        }

        [EventSubscribe("StartOfSimulation")] private void OnStartOfSimulation(object sender, EventArgs e)
        {
        //Debugger.Break();
            if (Verbose && !PseudoPatches)
            	summary.WriteMessage(this, "Created " + ZoneCount + " identical zones, each of area " + (1.0 / ZoneCount) + " ha", MessageType.Diagnostic);

            if (Verbose)
            	summary.WriteMessage(this, "Initialising the ZoneManager for grazing, urine return and reporting", MessageType.Diagnostic);

            sward = new Sward(zone); 
			pseudoRandom = new Random(666);  // sets a constant seed value
			
			if (PseudoPatches)
				DivisorForReporting = 1.0;
			else
				DivisorForReporting = ZoneCount;

            MonthlyUrineNAmt = new double[] { 24, 19, 17, 12, 8, 5, 5, 10, 16, 19, 23, 25 }; //This is to get a pattern of return that varies with month but removes the variation that might be caused by small changes in herbage growth
            //MonthlyUrineNAmt = new double[] { 100, 100, 100, 12, 8, 5, 5, 10, 16, 19, 23, 25 }; //This is to get a pattern of return that varies with month but removes the variation that might be caused by small changes in herbage growth

            if (PseudoPatches)
            {
                foreach (var patchManager in patchManagers)
                {
                    //patchManager.MaximumNitrogenAvailableToPlants = 0.45; This is now set in pre start
                    patchManager.NPartitionApproach = PartitionApproachEnum.BasedOnConcentrationAndDelta;
                    patchManager.AutoAmalgamationApproach = AutoAmalgamationApproachEnum.None;
                    patchManager.basePatchApproach = BaseApproachEnum.IDBased;
                    patchManager.AllowPatchAmalgamationByAge = false;
                    patchManager.PatchAgeForForcedMerge = 1000000.0;  // ie don't merge                                
                }

                int[] PatchToAddTo = new int[1];  //need an array variable for this
                string[] PatchNmToAddTo = new string[1];  
                int nPatchesAdded = 0;
                double NewArea = 1.0 / ZoneCount;
				
                while (nPatchesAdded < ZoneCount - 1)
                {
                    AddSoilCNPatchType NewPatch = new AddSoilCNPatchType();
                    NewPatch.DepositionType = DepositionTypeEnum.ToNewPatch;
                    NewPatch.AreaFraction = NewArea;
                    PatchToAddTo[0] = 0;
                    PatchNmToAddTo[0] = "0";
                    NewPatch.AffectedPatches_id = PatchToAddTo;
                    NewPatch.AffectedPatches_nm = PatchNmToAddTo;
                    NewPatch.SuppressMessages = Verbose;

                    foreach (var patchManager in patchManagers)
                        patchManager.Add(NewPatch);
                    nPatchesAdded += 1;
                }                

                if (Verbose)
                	summary.WriteMessage(this, patchManagers[0].NumPatches.ToString() + " pseudopatches have been created", MessageType.Diagnostic);
            }

            if (Verbose)
            	summary.WriteMessage(this, "Finished initialising the Manager for grazing, urine return and reporting", MessageType.Diagnostic);

            NumZonesForUrine = 1;  // in the future this might be > 1
            ZoneNumForUrine = -1;  // this will be incremented to 0 (first zone) below 
        }

        [EventSubscribe("DoManagement")]
        private void OnDoManagement(object sender, EventArgs e)
        {    

            // if this is the start of the simulation then sort out the depth for the urine penetration. Can't do this in initialisation because of the module order
            if (clock.Today == clock.StartDate)
                UrinePenetration();

            GrazeToday = false;
			if (clock.Today.AddDays(1).Day == 1)    // why separate this from the if below?  - to allow for multiple options in the future
                GrazeToday = true;

            if (GrazeToday)
            {
                if (Verbose)
                	summary.WriteMessage(this, "Doing grazing", MessageType.Diagnostic);

                // do the herbage removal part of the grazing
                int i = -1;  // to use as a zone counter
                HarvestedWt = 0.0;
                HarvestedN = 0.0;
                foreach (Zone zone in this.Parent.FindAllInScope<Zone>())   // NOTE - this is a zone regardless of pseudopatches 
                {
                    i += 1;
                    var sward = new Sward(zone);
                    sward.Graze(amount: 1000.0, type: "SetResidueAmount", Verbose);   // note that I have hardcoded the grazing residual for now
                    HarvestedWt += sward.HarvestedWt * zone.Area;
                    HarvestedN += sward.HarvestedN * zone.Area;
                    if (Verbose)
                    	summary.WriteMessage(this, "Just harvested " + HarvestedWt + " from Zone " + zone.Name, MessageType.Diagnostic);
                }

                if (UrineReturnType == UrineReturnTypes.FromHarvest)
                {
                    AmountUrineNReturned = HarvestedN * 0.50;  // 
                    AmountDungNReturned = HarvestedN * 0.35;  // 
                    AmountDungCReturned = AmountDungNReturned * 20;
                }
                else if (UrineReturnType == UrineReturnTypes.SetMonthly)
                {
                	AmountUrineNReturned = MonthlyUrineNAmt[clock.Today.Month - 1];   //  hardcoded as an input
                	AmountDungNReturned = AmountUrineNReturned * (0.35 / 0.50);  // 
                	AmountDungCReturned = AmountDungNReturned * 20;
                }
                if (Verbose)
                	summary.WriteMessage(this, "The amount of urine N to be returned to the whole paddock is " + AmountUrineNReturned, MessageType.Diagnostic);

                DoUrineReturn();

                DoTramplingAndDungReturn();

                if (Verbose)
                	summary.WriteMessage(this, "Finished Grazing", MessageType.Diagnostic);

            }
        }

        public void DoTramplingAndDungReturn()
        {
 			// Note that dung is assumed to be spread uniformly over the paddock (patches or sones).
 			// There is no need to bring zone area into the calculations here but zone area must be included for variables reported FROM the zone to the upper level
 			           
            int i = -1;  // patch or paddock counter
            foreach (Zone zone in this.Parent.FindAllInScope<Zone>())
            {
                i += 1;
                SurfaceOrganicMatter surfaceOM = zone.FindInScope<SurfaceOrganicMatter>() as SurfaceOrganicMatter; 

                // do some trampling of litter
                // accelerate the movement of surface litter into the soil - do this before the dung is added
                double temp = surfaceOM.Wt * 0.1;

                TillageType trampling = new TillageType();
                surfaceOM.Incorporate(fraction: (double) 0.1, depth: (double)100.0, Verbose);

                if (Verbose)
                	summary.WriteMessage(this, "For patch " + i + " the amount of litter trampled was " + temp + " and the remaining litter is " + (surfaceOM.Wt), MessageType.Diagnostic);

                // move the dung to litter  
                AddFaecesType dung = new AddFaecesType();
                dung.OMWeight = AmountDungCReturned / 0.4;  //assume dung C is 40% of OM  
                dung.OMN = AmountDungNReturned;
                surfaceOM.AddFaeces(dung);
                if (Verbose)
                	summary.WriteMessage(this, "For patch " + i + " the amount of dung DM added to the litter was " + (AmountDungCReturned / 0.4) + " and the amount of N added in the dung was " + (AmountDungNReturned), MessageType.Diagnostic);

            } 
        }

        public void DoUrineReturn()
        {
            GetZoneForUrineReturn();  

      		if (Verbose)
      			summary.WriteMessage(this, "The Zone for urine return is " + ZoneNumForUrine, MessageType.Diagnostic);

            if (!PseudoPatches)
            {
            	int i = -1; //to count the zones
	            foreach (Zone zone in this.Parent.FindAllInScope<Zone>())
    	        {
    	            i += 1;
    	            if (i == ZoneNumForUrine)
    	            {
    	                Fertiliser thisFert = zone.FindInScope<Fertiliser>() as Fertiliser;

  	                    thisFert.Apply(amount: AmountUrineNReturned / zone.Area, 
  	                    		type: Fertiliser.Types.UreaN, 
  	                    		depthTop: 0.0, 
  	                    		depthBottom: UrineDepthPenetration, 
  	                    		doOutput: Verbose);
                                        
    	         		if (Verbose)
    	         			summary.WriteMessage(this, AmountUrineNReturned + " urine N added to Zone " + i + ", the local load was " + AmountUrineNReturned / zone.Area + " kg N /ha", MessageType.Diagnostic);
    	             }
             	}
        	}
        	else // PseudoPatches
        	{
		                int[] PatchToAddTo = new int[1];  //because need an array variable for this
        		        string[] PatchNmToAddTo = new string[0];  //need an array variable for this
        		        //List<IModel> zones = this.FindAllInScope<Zone>().OfType<IModel>().ToList();   //TODO ask Dean - is all this needed?
        		        double[] UreaToAdd = new double[soilPhysical.Thickness.Length];  

        		        for (int ii = 0; ii <= (soilPhysical.Thickness.Length - 1); ii++)
        		            UreaToAdd[ii] = UrineDepthPenetrationArray[ii]  * AmountUrineNReturned * ZoneCount;

        		        // needed??   UreaReturned += AmountFertNReturned;

        		        AddSoilCNPatchType CurrentPatch = new AddSoilCNPatchType();
        		        CurrentPatch.Sender = "manager";
        		        CurrentPatch.DepositionType = DepositionTypeEnum.ToSpecificPatch;
        		        PatchToAddTo[0] = ZoneNumForUrine;
        		        CurrentPatch.AffectedPatches_id = PatchToAddTo;
        		        CurrentPatch.AffectedPatches_nm = PatchNmToAddTo;
        		        CurrentPatch.Urea = UreaToAdd;

        		        var patchManager = soil.FindChild<NutrientPatchManager>(); 

    	         		if (Verbose)
	        		        summary.WriteMessage(this, "Patch MinN prior to urine return: " + patchManager.MineralNEachPatch[ZoneNumForUrine], MessageType.Diagnostic);
        		        patchManager.Add(CurrentPatch); 
    	         		if (Verbose)
	        		        summary.WriteMessage(this, "Patch MinN after urine return: " + patchManager.MineralNEachPatch[ZoneNumForUrine], MessageType.Diagnostic);
        	} 
        }

        public void GetZoneForUrineReturn()
        {
            if (UrineReturnPattern == UrineReturnPatterns.RotatingInOrder) 
            {
	            ZoneNumForUrine += 1;  //increment the zone number - it was initialised at -1. NOTE, ZoneNumForUrine is used for both zones and patches
	            if (ZoneNumForUrine >= ZoneCount)
	                ZoneNumForUrine = 0;  // but reset back to the first patch if needed
            }
            else if (UrineReturnPattern == UrineReturnPatterns.Random)
            {
	            Random rnd = new Random();
	            ZoneNumForUrine = rnd.Next(0, ZoneCount); // in C# the maximum value (ZoneCount) will not be selected
            }
            else if (UrineReturnPattern == UrineReturnPatterns.PseudoRandom)
            {
	            ZoneNumForUrine = pseudoRandom.Next(0, ZoneCount); // in C# the maximum value (ZoneCount) will not be selected
            }
			else
				throw new Exception("UrineResturnPattern not recognised");

			if (Verbose)
            	summary.WriteMessage(this, "The next zone/patch for urine return is " + ZoneNumForUrine, MessageType.Diagnostic);
        }


        public void UrinePenetration()
        {
            // note that this only looks at the first paddock and assumes that all the paddocks are the same
            int iii = -1;  // to use as a patch counter
            foreach (Zone zone in this.Parent.FindAllInScope<Zone>().OfType<IModel>().ToList())
            {
                iii += 1;
                if (iii == 0)
                {
                    Soil soil = zone.FindInScope<Soil>() as Soil;
                    double tempDepth = 0.0;
                    UrineDepthPenetrationArray = new double[soilPhysical.Thickness.Length];
                    for (int i = 0; i <= (soilPhysical.Thickness.Length - 1); i++)
                    {
                        tempDepth += soilPhysical.Thickness[i];
                        if (tempDepth <= UrineDepthPenetration)
                        {
                            UrineDepthPenetrationArray[i] = soilPhysical.Thickness[i] / UrineDepthPenetration;
                        }
                        else
                        {
                            UrineDepthPenetrationArray[i] = (UrineDepthPenetration - (tempDepth - soilPhysical.Thickness[i])) / (tempDepth - (tempDepth - soilPhysical.Thickness[i])) * soilPhysical.Thickness[i] / UrineDepthPenetration;
                            UrineDepthPenetrationArray[i] = Math.Max(0.0, Math.Min(1.0, UrineDepthPenetrationArray[i]));
                        }
                        if (Verbose)
                        	summary.WriteMessage(this, "The proportion of urine applied to the " + i + "th layer will be " + UrineDepthPenetrationArray[i], MessageType.Diagnostic);
                    }
                }
            }

        } 


        
   
    // A class for aggregating a pasture species mix.  ??????????????? is this needed now?
    [Serializable]
    class Sward
    {
     	private const double Epsilon = 0.000000001;
        private double amountRequired;

        public Sward(Zone zone)
        {
            Species = zone.FindAllDescendants<PastureSpecies>().OfType<IModel>().ToList().Cast<PastureSpecies>().ToList();
		}
		
        public List<PastureSpecies> Species { get; private set; }

        public double HarvestableWt { get { return Species.Sum(sp => sp.Harvestable.Wt); } }

        public double HarvestedWt { get { return Species.Sum(sp => sp.HarvestedWt); } }

        public double HarvestedN { get { return Species.Sum(sp => sp.HarvestedN); } }

        public double StandingHerbageWt { get { return Species.Sum(sp => sp.Standing.Wt); } }

        public double AboveGroundWt { get { return Species.Sum(sp => sp.AboveGroundWt); } }

        public bool IsAlive
        {
            get
            {
                bool alive = true;
                Species.ForEach(sp => alive = alive && sp.PlantStatus == "alive");
                return alive;
            }
         }
     

        /// <summary>Removes plant material simulating a graze event.</summary>
        /// <param name="amount">The DM amount (kg/ha)</param>
        /// <param name="type">How the amount is interpreted (SetResidueAmount or SetRemoveAmount)</param>
        public void Graze(double amount, string type, bool Verbose)
        {
            double amountAvailable = HarvestableWt;
            if (IsAlive || (amountAvailable > Epsilon))
            {
                // Get the amount required to remove
                if (type.ToLower() == "setresidueamount")
                {
                    // Remove all DM above given residual amount
                    amountRequired = Math.Max(0.0, AboveGroundWt - amount);
                }
                else if (type.ToLower() == "setremoveamount")
                {
                    // Remove a given amount
                    amountRequired = Math.Max(0.0, amount);
                }
                else
                {
                    throw new Exception("Type of amount to remove on graze not recognized (use \'SetResidueAmount\' or \'SetRemoveAmount\'");
                }
                // Get the actual amount to remove
                double amountToRemove = Math.Max(0.0, Math.Min(amountRequired, amountAvailable));

                // Get the amounts to remove by mySpecies:
                if (amountToRemove > Epsilon)
                {
                    double[] fractionToRemove = new double[Species.Count];
                    for (int s = 0; s < Species.Count; s++)
                    {
                        // get the fraction to required for each mySpecies, partition according to available DM to harvest
                        fractionToRemove[s] = Species[s].Harvestable.Wt / amountAvailable;

                        // remove DM and N for each mySpecies (digestibility is also evaluated)
                        Species[s].RemoveBiomass(amountToRemove * fractionToRemove[s], Verbose);
                    }
                }
            }
        }
	}
    }
}
```
      Manager ReportingWithZonesHelper
```csharp
using Newtonsoft.Json;
using System.Linq;
using System.Collections.Generic;
using APSIM.Shared.Utilities;
using System.IO;
using System.Xml.Serialization;
using Models.AgPasture;
using Models.Zones;
using Models.PMF;
using Models.Soils;
using Models.Core;
using System;
using System.Diagnostics;
using Models.Interfaces;
using Models.Soils.Nutrients;
using Models.Soils.NutrientPatching;

namespace Models
{
    [Serializable]
    [System.Xml.Serialization.XmlInclude(typeof(Model))]
    public class ScriptReporting : Model
    {
        [Link] private Clock Clock;
        [Link] private Soil soil;
        [Link] private Zone[] zones;
        [Link] private ISummary summary;
        [Link] private Script patchAndZoneManager;
        [Link] private NutrientPatchManager nutrientPatchManager;
        

// nitrogen stuff - the array dimension is the number of paddocks
        [JsonIgnore] public double[] DenitByZone { get; set; }
        [JsonIgnore] public double[] DenitN2OByZone { get; set; }
        [JsonIgnore] public double[] LeachedNByZone  { get; set; }
        [JsonIgnore] public double[] UreaByZone { get; set; }
        [JsonIgnore] public double[] NH4ByZone { get; set; }
        [JsonIgnore] public double[] NO3ByZone { get; set; }
        [JsonIgnore] public double[] MinNByZone  { get; set; }
        [JsonIgnore] public int ZoneCount  { get; set; }

// pasture stuff - the array dimension is the number of paddocks
        [JsonIgnore] public double[] HerbageWtByZone { get; set; }
        [JsonIgnore] public double[] HerbageNByZone { get; set; }
        [JsonIgnore] public double[] HarvestedWtByZone { get; set; }
        [JsonIgnore] public double[] HarvestedNByZone { get; set; }
        [JsonIgnore] public double[] FixedNByZone { get; set; }
        [JsonIgnore] public double[] UptakeNByZone { get; set; }

        [JsonIgnore] public double[] PastureCompByZone { get; set; }


        [EventSubscribe("StartOfSimulation")]
        private void OnSimulationCommencing(object sender, EventArgs e)
        {    
            //Debugger.Break();
            
            DenitByZone = new double[zones.Length];
            DenitN2OByZone = new double[zones.Length];
            LeachedNByZone = new double[zones.Length];
            UreaByZone = new double[zones.Length];
            NH4ByZone = new double[zones.Length];
            NO3ByZone = new double[zones.Length];
            MinNByZone = new double[zones.Length];
            HerbageWtByZone = new double[zones.Length];
            HerbageNByZone = new double[zones.Length];
            HarvestedWtByZone = new double[zones.Length];
            HarvestedNByZone = new double[zones.Length];
            FixedNByZone = new double[zones.Length];
            UptakeNByZone = new double[zones.Length];
            PastureCompByZone = new double[zones.Length];

            ZoneCount = zones.Length;
        }

        [EventSubscribe("EndOfDay")]
        private void OnEndOfDay(object sender, EventArgs e)
        {
            //zones = this.FindAllInScope<Zone>().OfType<IModel>().ToList();    

			if (patchAndZoneManager.PseudoPatches == false)
			{
		        for (int x = 0; x < zones.Length; x++)
		        {
			        var soil = zones[x].FindChild<Soil>();  
		            
		            var patchManager = soil.FindChild<NutrientPatchManager>();  
		            var waterBalance = soil.FindChild<ISoilWater>();                                
		            var Urea = soil.FindChild<ISolute>("Urea");                                
		            var NH4 = soil.FindChild<ISolute>("NH4");                                
		            var NO3 = soil.FindChild<ISolute>("NO3");                                

		            DenitByZone[x] = patchManager.DenitrifiedN.Sum();
		            DenitN2OByZone[x] = patchManager.N2Oatm.Sum();
		            LeachedNByZone[x] = waterBalance.LeachNO3;
		            UreaByZone[x] = Urea.kgha.Sum();
		            NH4ByZone[x] = NH4.kgha.Sum();
		            NO3ByZone[x] = NO3.kgha.Sum();
		            //MinNByZone[x] = UreaByZone[x] + NH4ByZone[x] + NO3ByZone[x];  I wonder why I commented this out?
		            MinNByZone[x] = patchManager.MineralN.Sum();
		            
		            var sward = zones[x].FindAllInScope<PastureSpecies>();                                
		            HerbageWtByZone[x] = sward.Sum(species => species.AboveGroundWt); 
		            HerbageNByZone[x] = sward.Sum(species => species.AboveGroundN);   
		            HarvestedWtByZone[x] = sward.Sum(species => species.HarvestedWt); 
		            HarvestedNByZone[x] = sward.Sum(species => species.HarvestedN); 
		            FixedNByZone[x] = sward.Sum(species => species.FixedN);
		            UptakeNByZone[x] = sward.Sum(species => species.SoilUptakeN);
		            
		            //PastureCompByZone

		        } 
	        }
	        else
	        {
	        	DenitByZone = nutrientPatchManager.DenitrifiedN;
	            DenitN2OByZone = nutrientPatchManager.N2Oatm;
	        	NO3ByZone = nutrientPatchManager.NO3EachPatch;
	        	UreaByZone = nutrientPatchManager.UreaEachPatch;
	        	NH4ByZone = nutrientPatchManager.NH4EachPatch;
	        	MinNByZone = nutrientPatchManager.MineralNEachPatch;
	        }
        }

    }
}
```
      Report ReportingWithPatchesPaddock: EventNames=[Clock].EndOfDay
        VariableNames:
          [Clock].Today as Date
          [PatchAndZoneManager].Script.PseudoPatches as PseudoPatches
          [PatchAndZoneManager].Script.ZoneCount as ZoneCount
          [PatchAndZoneManager].Script.DivisorForReporting as Divisor
          Sum of (sum([ReportingWithZonesHelper].ScriptReporting.DenitByZone) / Divisor) from [ReportingWithPatchesPaddock].DayAfterLastOutput to [Clock].Today as Denit
          Sum of (sum([ReportingWithZonesHelper].ScriptReporting.DenitN2OByZone) / Divisor) from [ReportingWithPatchesPaddock].DayAfterLastOutput to [Clock].Today as DenitN2O
          Sum of (sum([ReportingWithZonesHelper].ScriptReporting.LeachedNByZone) / Divisor) from [ReportingWithPatchesPaddock].DayAfterLastOutput to [Clock].Today as LeachN
          Sum of (sum([ReportingWithZonesHelper].ScriptReporting.HarvestedWtByZone) / Divisor) from [ReportingWithPatchesPaddock].DayAfterLastOutput to [Clock].Today as HarvestedWt
          Sum of (sum([ReportingWithZonesHelper].ScriptReporting.HarvestedNByZone) / Divisor) from [ReportingWithPatchesPaddock].DayAfterLastOutput to [Clock].Today as HarvestedN
          Sum of (sum([ReportingWithZonesHelper].ScriptReporting.FixedNByZone) / Divisor) from [ReportingWithPatchesPaddock].DayAfterLastOutput to [Clock].Today as FixedN
          Sum of (sum([ReportingWithZonesHelper].ScriptReporting.MinNByZone) / Divisor) from [ReportingWithPatchesPaddock].DayAfterLastOutput to [Clock].Today  as MineralN
          (sum([ReportingWithZonesHelper].ScriptReporting.NO3ByZone) / Divisor) as NO3N
          (sum([ReportingWithZonesHelper].ScriptReporting.NH4ByZone) / Divisor) as NH4N
          (sum([ReportingWithZonesHelper].ScriptReporting.UreaByZone) / Divisor) as UreaN
          Sum of [PatchAndZoneManager].Script.AmountUrineNReturned from [ReportingWithPatchesPaddock].DayAfterLastOutput to [Clock].Today as UrineNReturned
          Sum of (sum([ReportingWithZonesHelper].ScriptReporting.UptakeNByZone) / Divisor) from [ReportingWithPatchesPaddock].DayAfterLastOutput to [Clock].Today  as UptakeN
          [ReportingWithZonesHelper].ScriptReporting.UreaByZone as UreaByZone
          [ReportingWithZonesHelper].ScriptReporting.NH4ByZone as NH4ByZone
          [ReportingWithZonesHelper].ScriptReporting.NO3ByZone as NO3ByZone
      Zone P: Area=0.1; Slope=0; AspectAngle=0; Altitude=50
        Manager AutomaticIrrigation
          allowIrrigation = False
          allowReporting = False
          seasonStart = 1-sep
          seasonEnd = 30-mar
          seasonsAllocation = 10000
          triggerDeficit = 80
          targetDeficit = 95
          returndays = 3
          maximumAmount = 30
          depthPAWC = 300
```csharp
using Newtonsoft.Json;
using APSIM.Shared.Utilities;
using System.Xml.Serialization;
using Models.Soils;
using Models.PMF;
using Models.Core;
using System;
using Models.Interfaces;



        
namespace Models
{
    [Serializable] 
    [System.Xml.Serialization.XmlInclude(typeof(Model))]
    public class Script : Model
    {
        [Link] private ISummary summary;
        [Link] private Irrigation Irrigation;
        [Link] private Clock Clock;
        [Link] private Soil Soil;
        [Link(IsOptional = true)] private IPlant existingCrop;
        private DateTime StartDate;
        private DateTime EndDate;
        private double TopDUL;
        private double TopLL;
        private int nLayers;
        [Link]
        private IPhysical soilPhysical;
        [Link]
        private ISoilWater waterBalance;
        //Communication to other modules
       
        //User inputs from properties tab
        [Description("Turn irrigation on?")]
        public bool allowIrrigation { get; set; } = true;

        [Description("Allow reporting to the summary file?")]
        public bool allowReporting { get; set; }


        [Description("Start of irrigation season (dd-MMM)")]
        public string seasonStart { get; set; }


        [Description("End of irrigation season (dd-MMM)")]
        public string seasonEnd { get; set; }


        [Description("Season allocation (mm)")]
        public double seasonsAllocation { get; set; }


        [Description("Deficit to trigger irrigation (% PAWC)")]
        public double triggerDeficit { get; set; }


        [Description("Deficit to stop irrigaton (% PAWC)")]
        public double targetDeficit { get; set; }


        [Description("Minimum days for irrigation to return")]
        public double returndays { get; set; }

        [Description("Maximum irrigation application (mm/day)")]
        public double maximumAmount { get; set; }

        [Description("Depth to calculate PAWC (mm)")]
        public double depthPAWC { get; set; }

        //Class members
        [JsonIgnore] public double TopSWdeficit { get; set; }
        [JsonIgnore] public double TopSWC { get; set; }
        [JsonIgnore] public double DaysSinceIrrigation { get; set; }
        [JsonIgnore] public double AmountToApply { get; set; }
        [JsonIgnore] public double SeasonAppliedAmount { get; set; }
        
        private bool IrrigationIsAllowed { get; set; }
        private bool SeasonIsOpen { get; set; }
        private bool CropIsActive { get; set; }
        private bool IrrigatorIsAvailable { get; set; }
        private bool SoilIsDry { get; set; }

    
        //Calculate static soil variables
        [EventSubscribe("StartOfSimulation")]
        private void OnStartOfSimulation(object sender, EventArgs e)
        {   
            //Set the season dates
            StartDate = DateTime.Parse(seasonStart + "-" + Clock.Today.Year.ToString());
            EndDate = DateTime.Parse(seasonEnd + "-" + Clock.Today.Year.ToString());
            
           
            //Can we irrigate at all?
            IrrigationIsAllowed = false; 
            if (allowIrrigation)
                IrrigationIsAllowed = true; 

            //Calculate soil water variables
            double depthFromSurface = 0.0;
            double fracLayer = 0.0;
            nLayers = soilPhysical.Thickness.Length;
            for (int layer = 0; layer < nLayers; layer++)
            {
                fracLayer = Math.Min(1.0, (depthPAWC - depthFromSurface) / soilPhysical.Thickness[layer]);
                TopLL += soilPhysical.LL15mm[layer] * fracLayer;
                TopDUL += soilPhysical.DULmm[layer] * fracLayer;
                depthFromSurface += soilPhysical.Thickness[layer];
                if (depthFromSurface >= depthPAWC)
                    layer = nLayers;
            }
        }
             
        //Determine daily requirement for irrigation
        [EventSubscribe("StartOfDay")]
        private void OnStartOfDay(object sender, EventArgs e)
        {
            //Can we irrigate today?          
            SeasonIsOpen = isBetween(Clock.Today, StartDate, EndDate);
            if (!SeasonIsOpen)
                SeasonAppliedAmount = 0;

            //Is there a crop in the ground that needs irrigation?
            CropIsActive = false;
            if ((existingCrop != null) && (existingCrop.IsAlive))
                CropIsActive = true;
            //if ((existingCrop.Phenology.Stage >= 3.0) && (existingCrop.Phenology.Stage < 6.0))
          
            //Is the irrigator available?
            IrrigatorIsAvailable = false;
            DaysSinceIrrigation += 1;
            if (DaysSinceIrrigation >= returndays)
                IrrigatorIsAvailable = true;
          
            //Is the soil dry enough to require irrigation?
            SoilIsDry = false;
            double depthFromSurface = 0.0;
            double fracLayer = 0.0;
            TopSWC = 0.0;
            for (int layer = 0; layer < nLayers; layer++)
            //for (int layer = 0; depthFromSurface < depthPAWC + soilPhysical.Thickness[layer]; layer++)
            {
                fracLayer = Math.Min(1.0, (depthPAWC - depthFromSurface) / soilPhysical.Thickness[layer]);
                TopSWC += waterBalance.SWmm[layer] * fracLayer;
                depthFromSurface += soilPhysical.Thickness[layer];
                if (depthFromSurface >= depthPAWC)
                    layer = nLayers;
            }
            
            TopSWdeficit = TopSWC - TopDUL;
            if (Math.Max(0.0, -TopSWdeficit) >= (TopDUL - TopLL) * (100 - triggerDeficit) / 100)
                SoilIsDry = true;
                
            //Are all the conditions ratifying irrigation
            if (IrrigationIsAllowed && SeasonIsOpen && CropIsActive && IrrigatorIsAvailable && SoilIsDry)
            {
                //Lets bloody well irrigate then!!!!
                AmountToApply = TopDUL * targetDeficit / 100 - TopSWC;
                AmountToApply = Math.Max(0.0, Math.Min(AmountToApply, seasonsAllocation - SeasonAppliedAmount));
                AmountToApply = Math.Min(AmountToApply,maximumAmount);
                
                Irrigation.Apply(AmountToApply, doOutput:  allowReporting);
                
                DaysSinceIrrigation = 0;
                SeasonAppliedAmount += AmountToApply;
            }
        }
        
        ///Checks whether theDate is between iniDate and endDate (non-year specific)
        private bool isBetween(DateTime theDay, DateTime iniDate, DateTime endDate)
        {
            bool result = false;
            if (iniDate.DayOfYear < endDate.DayOfYear)
            {
                // period is within one year, ex: summer in the northern hemisphere
                if ((theDay.DayOfYear >= iniDate.DayOfYear) && (theDay.DayOfYear <= endDate.DayOfYear))
                    result = true;
            }
            else
            {
                // period goes over the end of the year, ex: summer in the southern hemisphere
                if ((theDay.DayOfYear >= iniDate.DayOfYear) || (theDay.DayOfYear <= endDate.DayOfYear))
                    result = true;
            }
            
            return result;
        }
    }
}
```
        SurfaceOrganicMatter: InitialResidueName=grass; InitialResidueType=grass; InitialResidueMass=500; InitialStandingFraction=0; InitialCPR=0; InitialCNR=15
        Irrigation
        Fertiliser
        Soil HE_140mm: SoilType=NZ_sedementary; Region=Plains; State=Canterbury; Country=New Zealand; Latitude=0; Longitude=0
          DataSource=Generic profile descriptions provided by Trevor Webb and data for functional horizions based on SWAMP project results
          Comments=Bulk density values were measured on the fine earth fraction so values entered into apsim soil are adjusted down to account for stone content (assuming stones are inert from all soil process so their mass and volume is removed from model paramaters).  SAT, DUL, LL15 and Air dry have been adjusted down to account for stone content.  OC has not been adjusted so the model will get the correct carbon and N amounts using the adjusted BD.
          Physical
            Thickness  ParticleSizeClay  ParticleSizeSand  ParticleSizeSilt  BD     AirDry  LL15   DUL    SAT    KS
            200        20                14.5              65.5              1.31   0.077   0.153  0.373  0.456  4832.039
            150        24                18                58                1.524  0.201   0.201  0.332  0.394  389.229
            200        39                13                48                1.42   0.298   0.298  0.426  0.442  21.6
            350        44                1                 55                1.424  0.308   0.308  0.446  0.456  19.051
            150        44                1                 55                1.424  0.308   0.308  0.446  0.456  19.051
            150        19                15                66                1.601  0.162   0.162  0.325  0.376  97.995
            300        19                15                66                1.601  0.162   0.162  0.325  0.376  97.995
            SoilCrop AGPRyegrassSoil: LL=[0.154, 0.201, 0.299, 0.308, 0.308, 0.162, 0.162]; KL=[0.1, 0.1, 0.1, 0.05, 0.05, 0.05, 0.05]; XF=[1, 0.8, 0.8, 0.3, 0, 0, 0]
            SoilCrop AGPWhiteCloverSoil: LL=[0.154, 0.201, 0.299, 0.308, 0.308, 0.162, 0.162]; KL=[0.1, 0.1, 0.1, 0.05, 0.05, 0.05, 0.05]; XF=[1, 0.8, 0.8, 0.3, 0, 0, 0]
          Organic: FOMCNRatio=40; CarbonUnits=Total
            Thickness  Carbon  SoilCNRatio  FBiom  FInert  FOM
            200        4.502   11           0.048  0.382   347.67
            150        1.91    11           0.027  0.634   257.56
            200        0.772   11           0.019  0.784   172.648
            350        0.422   11           0.015  0.924   85.734
            150        0.422   11           0.015  0.924   63.514
            150        0.402   11           0.015  0.971   47.052
            300        0.4     11           0.015  0.985   25.823
          Chemical: Thickness=[200, 150, 200, 350, 150, 150, 300]; PH=[6, 6, 6, 6, 6, 6, 6]; PHUnits=Water
          WaterBalance SoilWater: SummerDate=1-Oct; SummerU=9; SummerCona=4.4; WinterDate=1-Apr; WinterU=6; WinterCona=3; DiffusConst=88; DiffusSlope=35; Salb=0.13; CN2Bare=73; CNRed=20; CNCov=0.8; PSIDul=-100; Thickness=[200, 150, 200, 350, 150, 150, 300]; SWCON=[0.496, 0.366, 0.374, 0.076, 0.076, 0.306, 0.306]
          Swim3 (disabled): Salb=0.13; CN2Bare=0; CNRed=0; CNCov=0.8; KDul=1; PSIDul=-100; VC=true; DTMin=0; DTMax=30; MaxWaterIncrement=5; SpaceWeightingFactor=0; SoluteSpaceWeightingFactor=1; Dis=0; Disp=1; A=2; DTHC=0.1; DTHP=2; Diagnostics=false
          Water: Thickness=[200, 150, 200, 350, 150, 150, 300]; InitialValues=[0.373, 0.332, 0.426, 0.446, 0.446, 0.325, 0.325]; RelativeTo=LL15; FilledFromTop=true
          CERESSoilTemperature Temperature
          SolutePatch NO3: InitialValuesUnits=kg/ha; WaterTableConcentration=0; D0=0; DepthConstant=0; MaxDepthSoluteAccessible=0; RunoffEffectivenessAtMovingSolute=0; MaxEffectiveRunoff=0
            Thickness  InitialValues  Exco  FIP
            200        18             0     1
            150        5              0     1
            200        4              0     1
            350        2              0     1
            150        1              0     1
            150        1              0     1
            300        1              0     1
          SolutePatch NH4: InitialValuesUnits=kg/ha; WaterTableConcentration=0; D0=0; DepthConstant=0; MaxDepthSoluteAccessible=0; RunoffEffectivenessAtMovingSolute=0; MaxEffectiveRunoff=0
            Thickness  InitialValues  Exco  FIP
            200        0              1     1
            150        0              1     1
            200        0              1     1
            350        0              1     1
            150        0              1     1
            150        0              1     1
            300        0              1     1
          SolutePatch Urea: InitialValuesUnits=kg/ha; WaterTableConcentration=0; D0=0; DepthConstant=0; MaxDepthSoluteAccessible=0; RunoffEffectivenessAtMovingSolute=0; MaxEffectiveRunoff=0
            Thickness  InitialValues  Exco  FIP
            200        0              0     1
            150        0              0     1
            200        0              0     1
            350        0              0     1
            150        0              0     1
            150        0              0     1
            300        0              0     1
          NutrientPatchManager: MaximumNitrogenAvailableToPlants=3; NPartitionApproach=0; AutoAmalgamationApproach=0; basePatchApproach=0; AllowPatchAmalgamationByAge=false; PatchAgeForForcedMerge=0; LayerForNPartition=-99
        PastureSpecies AGPRyegrass: doyGermination=275; daysEmergenceToAnthesis=120; daysAnthesisToMaturity=85; degreesDayForAnthesis=1100; degreesDayForMaturity=900; daysAnnualsFactor=45; InitialShootDM=1500; InitialRootDM=450; InitialRootDepth=750; initialDMFractionsGrasses=[0.15, 0.25, 0.25, 0.05, 0.05, 0.1, 0.1, 0.05, 0, 0, 0]; initialDMFractionsForbs=[0.2, 0.2, 0.15, 0.05, 0.1, 0.15, 0.1, 0.05, 0, 0, 0]; PhotosyntheticEfficiency=0.01; PhotosynthesisCurveFactor=0.8; FractionPAR=0.5; ReferenceCO2=380; CO2EffectScaleFactor=700; CO2EffectOffsetFactor=600; CO2EffectMinimum=0.7; CO2EffectExponent=2; ReproSeasonDurationCoeff=2; ReproSeasonShouldersLengthFactor=1; ReproSeasonOnsetDurationFactor=0.6; RelativeTurnoverEmerging=2; DetachmentDroughtCoefficient=3; DetachmentDroughtEffectMin=0.1; TurnoverStockFactor=0.01; TurnoverDefoliationEffectMin=0.025; MinimumGreenLeafProp=0.8; MinimumGreenRootProp=0.5
          initialDMFractionsLegumes=[0.16, 0.23, 0.22, 0.05, 0.03, 0.05, 0.05, 0.01, 0.04, 0.08, 0.08]
          LinearInterpolationFunction FVPDFunction
        PastureSpecies AGPWhiteClover: doyGermination=275; daysEmergenceToAnthesis=120; daysAnthesisToMaturity=85; degreesDayForAnthesis=1100; degreesDayForMaturity=900; daysAnnualsFactor=45; InitialShootDM=500; InitialRootDM=150; InitialRootDepth=350; initialDMFractionsGrasses=[0.15, 0.25, 0.25, 0.05, 0.05, 0.1, 0.1, 0.05, 0, 0, 0]; initialDMFractionsForbs=[0.2, 0.2, 0.15, 0.05, 0.1, 0.15, 0.1, 0.05, 0, 0, 0]; PhotosyntheticEfficiency=0.01; PhotosynthesisCurveFactor=0.8; FractionPAR=0.5; ReferenceCO2=380; CO2EffectScaleFactor=700; CO2EffectOffsetFactor=600; CO2EffectMinimum=0.7; CO2EffectExponent=2; ReproSeasonDurationCoeff=2; ReproSeasonShouldersLengthFactor=1; ReproSeasonOnsetDurationFactor=0.6; RelativeTurnoverEmerging=2; DetachmentDroughtCoefficient=3; DetachmentDroughtEffectMin=0.1; TurnoverStockFactor=0.01; TurnoverDefoliationEffectMin=0.025; MinimumGreenLeafProp=0.8; MinimumGreenRootProp=0.5
          initialDMFractionsLegumes=[0.16, 0.23, 0.22, 0.05, 0.03, 0.05, 0.05, 0.01, 0.04, 0.08, 0.08]
          LinearInterpolationFunction FVPDFunction
  Folder (disabled)
    Manager ReportingWithZonesManager
      verbose = False
      InputModule = ZoneManager
      OutputModule = ReportingWithZones
      ReportingFreq = Daily
```csharp
using Newtonsoft.Json;
using Models.Soils.Nutrients;
using Models.Interfaces;
using System;
using Models.Core;
using Models.Soils;
using Models.PMF;
using Models.Zones;
using Models.AgPasture;
using System.Xml.Serialization;
using Models.Surface;
using APSIM.Shared.Utilities;
using System.Collections.Generic;
using System.Diagnostics;
using System.Linq;
using Models.Soils.NutrientPatching;
using Models.Climate;


namespace Models
{
    [Serializable]
    [System.Xml.Serialization.XmlInclude(typeof(Model))]
    public class Script : Model
    {
        [Link] private Clock Clock;
        [Link] private Simulation Simulation;
        [Link] private Soil soil;
        [Link] private ISummary summary;
        [Link] private Weather Weather;
        [Link] private Zone zone;
        public int PatchCount;
        public int PaddockCount;
        public double Grazed;
        public double GrazedN;
        public double UrineNReturned;
        private double iniOrgC;
        private double iniOrgN;
        private double myVariable;
        //[Link(ByName = true)] private ISolute NO3;
        //[Link(ByName = true)] private ISolute NH4;
        //[Link(ByName = true)] private ISolute Urea;
        [Link] private NutrientPatchManager patchManager;
        [Link] private Models.Report ReportingWithZones;
        [Link] private IPhysical soilPhysical;

        private Zone[] Zones { get; set; }


        [Description("Verbose reporting mode (True/False)")]
        public bool verbose { get; set; }

        [Description("Name of the patch manager for input")]
        public string InputModule { get; set; }

        [Description("Name of the report for output")]
        public string OutputModule { get; set; }

        [Description("Frequency of reporting")]
        public reportingFrequencyTypes ReportingFreq { get; set; }

        [JsonIgnore] public int DaysSinceReport { get; set; }
        [JsonIgnore] public double NHA { get; set; }
        [JsonIgnore] public double PGR { get; set; }
        [JsonIgnore] public double HerbageGrazed { get; set; }
        [JsonIgnore] public double HerbageGrazedN { get; set; }
        [JsonIgnore] public double AreaUrinePatchesToday { get; set; }
        [JsonIgnore] public double UreaReturned { get; set; }
        [JsonIgnore] public double Fixation { get; set; }
        [JsonIgnore] public double LeachN { get; set; }
        [JsonIgnore] public double Denit { get; set; }
        [JsonIgnore] public double DenitN2O { get; set; }
        [JsonIgnore] public double OrgC { get; set; }
        [JsonIgnore] public double OrgN { get; set; }
        [JsonIgnore] public double dltOrgC { get; set; }
        [JsonIgnore] public double dltOrgN { get; set; }
        [JsonIgnore] public double MinN { get; set; }
        [JsonIgnore] public double UreaN { get; set; }
        [JsonIgnore] public double NH4N { get; set; }
        [JsonIgnore] public double NO3N { get; set; }
        [JsonIgnore] public double UreaAddedInGrazing { get; set; }

        [JsonIgnore] public double[] MinNPatch { get; set; }
        [JsonIgnore] public double PastureUptake { get; set; }

        [JsonIgnore] public double[] GrazedByZone { get; set; }
        [JsonIgnore] public double[] GrazedNByZone { get; set; }



        private bool ReportToday = false;

        public enum reportingFrequencyTypes
        {
            /// <summary>Daily</summary>
            Daily,
            /// <summary>Every 10 days</summary>
            TenDaily,
            /// <summary>Monthly</summary>
            Monthly,
            /// <summary>Annual</summary>
            Annual,
            /// <summary>On grazing</summary>
            OnGrazing
        }

    

        [EventSubscribe("StartOfSimulation")]
        private void OnStartOfSimulation(object sender, EventArgs e)
        {

            if (verbose)
                summary.WriteMessage(this, "Initialising the Manager for grazing, urine return and reporting", MessageType.Diagnostic);
            DaysSinceReport = 0;
            PatchCount = patchManager.NumPatches;
            PaddockCount = 0;



            // Get list of zones in the simulation
            List<Zone> zones = new List<Zone>();

            foreach (Zone zone in this.Parent.FindAllInScope<Zone>().OfType<IModel>().ToList())
            {
                zones.Add(zone as Zone);
                //ReportingWithPatches = (Models.Report)zone.Get("[" + OutputModule + "]"); Is this needed now?
                PaddockCount++;
            }
            Zones = zones.ToArray();
            GrazedByZone = new double[PaddockCount];
            GrazedNByZone = new double[PaddockCount];


            //myVariable = (double)ManageGriddedPaddock.Get("Script.Var1");
            //double grazedN = ManageGriddedPaddock.Get("Script.grazedN");

            if (verbose)
                summary.WriteMessage(this, "Finished initialising the Manager for grazing, urine return and reporting", MessageType.Diagnostic);
        }


        [EventSubscribe("DoDailyInitialisation")]
        private void OnDoDailyInitialisation(object sender, EventArgs e)
        {    
                    
            if (verbose)
                summary.WriteMessage(this, "In Daily Initialisation for the Reporting Manager on " + Clock.Today, MessageType.Diagnostic);
            if (Clock.Today == Clock.StartDate)
            {

                iniOrgC = 0.0; 
                iniOrgN = 0.0;            

                foreach (Zone zone in Zones)
                {
                    var patchManager = zone.FindInScope<NutrientPatchManager>() as NutrientPatchManager;
                    for (int ii = 0; ii < soilPhysical.Thickness.Length; ii++)
                    {
                        iniOrgC += patchManager.TotalC[ii]; // TODO RJM Check this is right!
                        iniOrgN += patchManager.Organic.N[ii];
                    }
                }
            }        


        }

            
        [EventSubscribe("DoManagement")]
        private void DoManagement(object sender, EventArgs e)
        {
            bool isEndOfMonth = false;
            if (Clock.Today.AddDays(1).Day == 1)
                isEndOfMonth = true;
            

            bool isEndOfYear = false;
            if (Clock.Today.Day == 31 && Clock.Today.Month == 12)
                isEndOfYear = true;


            bool GrazedToday = (bool)Simulation.FindByPath(InputModule + ".Script.grazedToday").Value; 

            // should reporting be done today?  
            if (ReportingFreq == reportingFrequencyTypes.Daily)
                ReportToday = true;
            else if ((ReportingFreq == reportingFrequencyTypes.TenDaily) && ((Clock.Today.Day == 10) || (Clock.Today.Day == 20) || (isEndOfMonth)))
                ReportToday = true;
            else if ((ReportingFreq == reportingFrequencyTypes.Monthly) && (isEndOfMonth))
                ReportToday = true;
            else if ((ReportingFreq == reportingFrequencyTypes.Annual) && (isEndOfYear))
                ReportToday = true;
            else if ((ReportingFreq == reportingFrequencyTypes.OnGrazing) && (GrazedToday))
                ReportToday = true;
            else
                ReportToday = false;
            if (verbose)
                summary.WriteMessage(this, "Finished Prepare for the Reporting Manager on " + Clock.Today, MessageType.Diagnostic);
        }

        [EventSubscribe("EndOfDay")]
        private void OnEndOfDay(object sender, EventArgs e)
        {
            if (verbose)
                summary.WriteMessage(this, "In EndOfDay for the Reporting Manager on  " + Clock.Today, MessageType.Diagnostic);

            DaysSinceReport += 1;


            int currentZoneNum = 0;
            foreach (Zone zone in Zones)
            {
                var sward = zone.FindAllChildren<PastureSpecies>().OfType<IModel>().ToList().Cast<PastureSpecies>().ToList();
                NHA += sward.Sum(species => species.HerbageGrowthWt) * zone.Area;
                PGR = NHA;  // divide this by the number of days just before reporting
                Fixation += sward.Sum(species => species.FixedN) * zone.Area;
                PastureUptake += sward.Sum(species => species.NitrogenUptake.Sum()) * zone.Area; 

                var waterBalance = zone.FindInScope<ISoilWater>();
                LeachN += waterBalance.LeachNO3 * zone.Area;  // only take the deepest element
				// add in drainage here?
				
                for (int ii = 0; ii <= (soilPhysical.Thickness.Length - 1); ii++)
                {
                    Denit += patchManager.DenitrifiedN[ii] * zone.Area;
                    DenitN2O += patchManager.N2Oatm[ii] * zone.Area;
                }

				GrazedByZone[currentZoneNum] += sward.Sum(species => species.HarvestedWt);
				GrazedNByZone[currentZoneNum] += sward.Sum(species => species.HarvestedN);
                Grazed = GrazedByZone[currentZoneNum] * zone.Area;
                GrazedN = GrazedNByZone[currentZoneNum] * zone.Area;
                UrineNReturned = (double)zone.Get("[" + InputModule + "].Script.UreaReturned");
            } 

            HerbageGrazed += Grazed;
            HerbageGrazedN += GrazedN;
            UreaReturned += UrineNReturned;

            if (ReportToday)
            {

                OrgC = 0.0;
                OrgN = 0.0;
                UreaN = 0.0;
                NH4N = 0.0;
                NO3N = 0.0;
                MinN = 0.0;


                Soil soil1 = Zones[0].FindInScope<Soil>() as Soil;

                if (PaddockCount > 1)
                {
                    MinNPatch = new double[PaddockCount];
                }
                else
                    MinNPatch = new double[patchManager.NumPatches];


                currentZoneNum = 0;
                foreach (Zone zone in Zones)
                {
                    var no3 = zone.FindInScope<Solute>("NO3") as Solute;
                    var nh4 = zone.FindInScope<Solute>("NH4") as Solute;
                    var urea = zone.FindInScope<Solute>("Urea") as Solute;

                    double minNPatch = 0;

                    for (int ii = 0; ii <= (soilPhysical.Thickness.Length - 1); ii++)
                    {
                        OrgC += patchManager.TotalC[ii] * zone.Area;  
                        OrgN += patchManager.Organic.N[ii] * zone.Area;
                        UreaN += urea.kgha[ii] * zone.Area;
                        NH4N += nh4.kgha[ii] * zone.Area;
                        NO3N += no3.kgha[ii] * zone.Area;
                        minNPatch += urea.kgha[ii] + nh4.kgha[ii] + no3.kgha[ii];
                    }
                    MinN = UreaN + NH4N + NO3N;                    
                    MinNPatch[currentZoneNum] = minNPatch;

                    dltOrgC = OrgC - iniOrgC; 
                    dltOrgN = OrgN - iniOrgN;
                    iniOrgC = OrgC; // ready for the next calculation of change in pools
                    iniOrgN = OrgN;
                    currentZoneNum++;
                }

                if (patchManager.NumPatches > 1)
                {  // TODO will break if there is more than one paddock/zone AND more than one patch 

                    for (int ii = 0; ii < (patchManager.NumPatches); ii++)
                    {
                        MinNPatch[ii] = patchManager.UreaForEachPatch[ii] + patchManager.NH4ForEachPatch[ii] + patchManager.NO3ForEachPatch[ii];
                    }
                }

                PGR = NHA / DaysSinceReport; 

                ReportingWithZones.DoOutput();  //TODO this should not be hard coded!

                // now zero the reported variables
                DaysSinceReport = 0;
                HerbageGrazed = 0.0;
                HerbageGrazedN = 0.0;
                DaysSinceReport = 0;
                NHA = 0;
                PGR = 0;
                UreaReturned = 0;
                Fixation = 0;
                LeachN = 0;
                Denit = 0;
                DenitN2O = 0;
                OrgC = 0;
                OrgN = 0;
                MinN = 0;
                UreaN = 0;
                NH4N = 0;
                NO3N = 0;
                PastureUptake = 0.0;

            }
        }
    }
}
```
    Manager ZoneManagerOld
      PatchType = UP
      SystemID = A
      NumPatches = 0
      CuttingFrequency = 0
      CuttingResidual = 1000
      NutrientReturnType = SetMonthly
      AmountFertNReturned = 15
      AmountDungNReturned = 0
      FertiliserDepth = 200
      FertiliserReturnPattern = RotatingInOrder
      ReportingFreq = OnGrazing
```csharp
using Newtonsoft.Json;
using Models.Soils.Nutrients;
using Models.Soils.NutrientPatching;
using Models.Interfaces;
using System.Diagnostics;
using System.Collections.Generic;
using APSIM.Shared.Utilities;
using Models.Surface;
using Models.Soils;
using System.Xml.Serialization;
using Models.AgPasture;
using Models.Zones;
using Models.PMF;
using Models.Core;
using Models.Core.ApsimFile;
using System;
using System.Linq;
using Models.Climate;

namespace Models
{
    [Serializable]
    [System.Xml.Serialization.XmlInclude(typeof(Model))]
    public class Script : Model
    {
        [Link] private Clock Clock;
        [Link] private Soil soil;
        [Link] private ISummary summary;
        [Link] private Weather Weather;
        [Link] private Zone myZone;
        public string SoilType;
        public string SimLocation;
        public string SetIrrigation;
        public string GeneralFertType;
        public double GeneralFertAmt;
        public string PastureType;
        public int PatchCount;
        private double iniOrgC;
        private double iniOrgN;
        private double NewArea;
        private Sward sward;
        [Link]
        private IPhysical soilPhysical;

        [Link]
        private List<NutrientPatchManager> patchManagers;


        public int DaysSinceCut = 0;
        public int PatchNumForFert = -1;

        private int NumPaddocks = 0;
        // NumPaddocks is the number of AgPastures and SoilWats etc
        private int NumPatchesForFertiliser = 1;
        private double[] MonthlyFertAmt;
        private double[] FertDepthPlacement;
        private int[] PseudoRandomSeq;
        private int GrazingNumber = -1;
        private bool CutNow = false;

        private double AmountDungCReturned = 0.0;
        private int nPatchesAdded = 0;
        private int[] PatchToAddTo;
        private string[] PatchNmToAddTo = new string[1];


        [JsonIgnore] public bool grazedToday { get; set; }
        [JsonIgnore] public double Harvested { get; set; }
        [JsonIgnore] public double HarvestedN { get; set; }
        [JsonIgnore] public double UreaReturned  { get; set; }

        [Description("Frequency of cutting (days) (0 will be interpreted as the end of each month)")]
        public int CuttingFrequency { get; set; }

        [Description("Residual pasture mass after cutting (kg DM /ha)")]
        public int CuttingResidual { get; set; }

        [Description("Type of nutrient return - calculated from the amount of herbage harvested or constant")]
        public NutrientReturnTypes NutrientReturnType { get; set; }

        [Description("Amount of fertiliser N to apply to simulation after each cutting (pretend urine) (kgN/ha) (ignored if nutrient return is FromHarvest)")]
        public double AmountFertNReturned { get; set; }

        [Description("Amount of dung N to apply to simulation after each cutting (kgN/ha) (ignored if nutrient return is FromHarvest)")]
        public double AmountDungNReturned { get; set; }

        [Description("Depth band (0 mm to X mm) for fertiliser placement (mm)")]
        public int FertiliserDepth { get; set; }
                        
        [Description("Pattern for fertiliser return")]
        public urineReturnTypes FertiliserReturnPattern { get; set; }

        [Description("Frequency of reporting")]
        public reportingFrequencyTypes ReportingFreq { get; set; }

        [Description("Patch type")]
        public patchTypes PatchType { get; set; }

        [Description("How many patches should there be in the grid? (used to create the grid for EP & GP and the size of the patches for PP)")]
        public int NumPatches { get; set; }

        [Description("System identifier")]
        public systemTypes SystemID { get; set; }

        public enum systemTypes
        {
            /// <summary>A</summary>
            A,
            /// <summary>B</summary>
            B,
            /// <summary>C</summary>
            C,
            /// <summary>D</summary>
            D,
            /// <summary>E</summary>
            E,
            /// <summary>F</summary>
            F
        }

        public enum patchTypes
        {
            /// <summary>EP</summary>
            EP,
            /// <summary>EP</summary>
            GP,
            /// <summary>EP</summary>
            PP,
            /// <summary>EP</summary>
            UP
        }

        public enum reportingFrequencyTypes
        {
            /// <summary>Daily</summary>
            Daily,
            /// <summary>Every 10 days</summary>
            TenDaily,
            /// <summary>Monthly</summary>
            Monthly,
            /// <summary>Annual</summary>
            Annual,
            /// <summary>On grazing</summary>
            OnGrazing
        }

        public enum urineReturnTypes
        {
            /// <summary>Uniform</summary>
            UniformAcrossAllPatches,
            /// <summary>Rotating in order</summary>
            RotatingInOrder,
            /// <summary>Random</summary>
            Random,
            /// <summary>Pseudo-random</summary>
            PseudoRandom
        }

        public enum NutrientReturnTypes
        {
            /// <summary>Constant</summary>
            Constant,
            /// <summary>FromHarvest</summary>
            FromHarvest,
            /// <summary>SetMonthly</summary>
            SetMonthly
        }

        // Called just before a simulation is run.
        public override void OnPreLink()
        {
            var simulation = Parent.Parent as Simulation;
            var paddock = simulation.FindChild<Zone>();
                
			// Set the maximum N uptake for all species
			foreach (var species in paddock.FindAllDescendants<PastureSpecies>())
			{
				var root = species.FindChild<PastureBelowGroundOrgan>();
				root.MaximumNUptake = 3.0;
			}
				
            // Create the required number of paddocks.
            if (PatchType == patchTypes.EP)
            {			                
                for (int i = 0; i < NumPatches-1; i++)
                {
                    var newPaddock = Apsim.Clone(paddock);
                    Structure.Add(newPaddock, simulation);
                }
            //summary.WriteMessage(this, "Created " & NumPatches & " identical paddocks", MessageType.Diagnostic);
            }
        }

        // Called at beginning of a simulation run.
        [EventSubscribe("StartOfSimulation")]
        private void OnStartOfSimulation(object sender, EventArgs e)
        {
            summary.WriteMessage(this, "Initialising the Manager for grazing, urine return and reporting", MessageType.Diagnostic);

            sward = new Sward(myZone); //TODO Huh? Ask Dean

            grazedToday = false;
            
            // count the paddocks in the simulation
            NumPaddocks = 0;
            string paddockAreas = "";   
            foreach (Zone zone in this.Parent.FindAllInScope<Zone>().OfType<IModel>().ToList())
				NumPaddocks += 1;
            foreach (Zone zone in this.Parent.FindAllInScope<Zone>().OfType<IModel>().ToList())
			{
				zone.Area = (1.0 / NumPaddocks);   //TODO it would be better to move this to the creation
				paddockAreas += zone.Area + ", ";
			}   
            summary.WriteMessage(this, "There are " + NumPaddocks + " paddocks in the simulation", MessageType.Diagnostic);
            summary.WriteMessage(this, "There areas are " + paddockAreas, MessageType.Diagnostic);

            MonthlyFertAmt = new double[] { 24, 19, 17, 12, 8, 5, 5, 10, 16, 19, 23, 25 }; //TODO Huh? Why? This is to get a patter of return that varies with month but removes the vairation that might be caused by small changes in herbage growth

            summary.WriteMessage(this, "Finished initialising the Manager for grazing, urine return and reporting", MessageType.Diagnostic);

            SetSystemParams();  //probably change to do this in an experiment now

            if ((PatchType == patchTypes.GP) && (NumPaddocks > 1))
                throw new Exception("Patch type GP may only have one paddock/zone");
            if ((PatchType == patchTypes.PP) && (NumPaddocks > 1))
                throw new Exception("Patch type PP may only have one paddock/zone");

            NumPatchesForFertiliser = 1;  // in the future this might be > 1 - note that 'fertiliser' is actually urine
            if (FertiliserReturnPattern == urineReturnTypes.PseudoRandom)  // generate a return pattern up front
            {
                int MaxNumGrazings = (Clock.EndDate.Year - Clock.StartDate.Year + 1) * 52; //allow for a maximum of 1 per week should never get near this

                PseudoRandomSeq = new int[MaxNumGrazings * NumPatchesForFertiliser];
                Random rndConstSeed = new Random((int)666);
                string MyString = "";
                for (int i = 0; i < (MaxNumGrazings * NumPatchesForFertiliser); i++)
                {
                    PseudoRandomSeq[i] = rndConstSeed.Next(0, NumPatches);  // will never select NumPatches  ?? and want this because is 0 to ...
                    //MyString += Convert.ToString(PseudoRandomSeq[i]) + " ";
                }

                //summary.WriteMessage(this, "The order of patch return will be: " + MyString, MessageType.Diagnostic);
            }

            // Add patches
            if (PatchType == patchTypes.GP)
            {
                foreach (var patchManager in patchManagers)
                {
                    //patchManager.MaximumNitrogenAvailableToPlants = 0.45; This is now set in pre start
                    patchManager.NPartitionApproach = PartitionApproachEnum.BasedOnConcentrationAndDelta;
                    patchManager.AutoAmalgamationApproach = AutoAmalgamationApproachEnum.None;
                    patchManager.basePatchApproach = BaseApproachEnum.IDBased;
                    patchManager.AllowPatchAmalgamationByAge = false;
                    patchManager.PatchAgeForForcedMerge = 1000000.0;  // ie don't merge                                
                }

                int[] PatchToAddTo = new int[1];  //need an array variable for this
                string[] PatchNmToAddTo = new string[1];  
                int nPatchesAdded = 0;
                double NewArea = 1.0 / NumPatches;
				// here is where woudl want to limit N uptake
				
                while (nPatchesAdded < NumPatches - 1)
                {
                    AddSoilCNPatchType NewPatch = new AddSoilCNPatchType();
                    NewPatch.DepositionType = DepositionTypeEnum.ToNewPatch;
                    NewPatch.AreaFraction = NewArea;
                    PatchToAddTo[0] = 0;
                    PatchNmToAddTo[0] = "0";
                    NewPatch.AffectedPatches_id = PatchToAddTo;
                    NewPatch.AffectedPatches_nm = PatchNmToAddTo;
                    NewPatch.SuppressMessages = false;

                    foreach (var patchManager in patchManagers)
                        patchManager.Add(NewPatch);
                    nPatchesAdded += 1;
                }                

                summary.WriteMessage(this, "NumPatches at end of initialisation (GP):" + patchManagers[0].NumPatches.ToString(), MessageType.Diagnostic);
            }
        }

        [EventSubscribe("DoManagement")]
        private void OnDoManagement(object sender, EventArgs e)
        {    

            // if this is the start of the simulation then sort out the depth for the fertiliser (aka urine) placement
            // can't do this in initialisation because of the module order
            if (Clock.Today == Clock.StartDate)
            {
                FertPlacementDepth();
                int i = -1;  // to use as a patch counter

                iniOrgC = 0.0; 
                iniOrgN = 0.0;
                foreach (Zone zone in this.Parent.FindAllInScope<Zone>().OfType<IModel>().ToList())
                {
                    Soil soil = zone.FindInScope<Soil>() as Soil;
                    i += 1;

                    var patchManager = soil.FindChild<NutrientPatchManager>();
                    PatchCount = patchManager.NumPatches;

                    for (int ii = 0; ii <= (soilPhysical.Thickness.Length - 1); ii++)
                    {
                        iniOrgC += patchManager.TotalC[ii] / NumPaddocks; 
                        iniOrgN += patchManager.Organic.N[ii] / NumPaddocks;
                    }
                }
            }

            DaysSinceCut += 1;
            Harvested = 0.0;
            HarvestedN = 0.0;
            UreaReturned = 0.0;

            bool isEndOfMonth = false;
            if (Clock.Today.AddDays(1).Day == 1)
                isEndOfMonth = true;

            bool isEndOfYear = false;
            if (Clock.Today.AddDays(1).DayOfYear == 1)  // TODO this could be simpler!!
                isEndOfYear = true;

            CutNow = false;
            grazedToday = false;
            if ((CuttingFrequency == 0) && (isEndOfMonth))
                CutNow = true;
            else if ((DaysSinceCut >= CuttingFrequency) && (CuttingFrequency > 0))
                CutNow = true;

            if (CutNow)
            {
                grazedToday = true;
                summary.WriteMessage(this, "Doing grazing", MessageType.Diagnostic);
                DaysSinceCut = 0;
                GrazingNumber += 1;  //was initialsed as -1 - this is used to pick the pseudo-random patch return number
                // GetPatchForUrineReturn();  now called in the deposition routine

                // do the cutting=grazing - it doesn't matter if there one (GP) or many (EP) physical paddocks in the simulation at this point
                int i = -1;  // to use as a patch counter
                Harvested = 0.0;
                HarvestedN = 0.0;
                foreach (Zone zone in this.Parent.FindAllInScope<Zone>().OfType<IModel>().ToList())
                {
                    i += 1;
                    var sward = new Sward(zone);
                    sward.Graze(amount: CuttingResidual, type: "SetResidueAmount");
                    Harvested += sward.HarvestedWt * zone.Area;
                    HarvestedN += sward.HarvestedN * zone.Area;
                    summary.WriteMessage(this, "Just harvested " + Harvested + " from Paddock " + zone, MessageType.Diagnostic);
                }

                if (NutrientReturnType == NutrientReturnTypes.FromHarvest)
                {
                    AmountFertNReturned = HarvestedN * 0.50;  // 
                    AmountDungNReturned = HarvestedN * 0.35;  // 
                    AmountDungCReturned = AmountDungNReturned * 20;
                }
                else if (NutrientReturnType == NutrientReturnTypes.SetMonthly)
                {
                    AmountFertNReturned = MonthlyFertAmt[Clock.Today.Month - 1];   // noting that this is notional urine - hardcoded on L202
                    AmountDungNReturned = AmountFertNReturned * (0.35 / 0.50);  // 
                    AmountDungCReturned = AmountDungNReturned * 20;
                }
                else
                {
                    // the only other possibility is "constant"
                    //AmountFertNReturned = xxx taken from the UI
                    //AmountDungNReturned = xxx taken from the UI
                    AmountDungCReturned = AmountDungNReturned * 20;
                }


                summary.WriteMessage(this, "The amount of urea fertiliser to be returned to the whole paddock is " + AmountFertNReturned, MessageType.Diagnostic);

                DoUrineReturn();

                DoTramplingAndDungReturn();

                summary.WriteMessage(this, "Finished Cutting", MessageType.Diagnostic);

            } // this is the end of the CutNow section

            if ((GeneralFertAmt > 0.0) && (Clock.Today.AddDays(1).Day == 1))
                DoFertiliser();
        }

        public void DoTramplingAndDungReturn()
        {
            int i = -1;  // patch or paddock counter
            foreach (Zone zone in this.Parent.FindAllInScope<Zone>().OfType<IModel>().ToList())
            {
                i += 1;
                SurfaceOrganicMatter surfaceOM = zone.FindInScope<SurfaceOrganicMatter>() as SurfaceOrganicMatter; 

                // do some trampling of litter
                // accelerate the movement of surface litter into the soil - do this before the dung is added
                double temp = surfaceOM.Wt * 0.1;

                TillageType trampling = new TillageType();
                surfaceOM.Incorporate(fraction: (double)0.1, depth: (double)100.0);

                summary.WriteMessage(this, "For patch " + i + " the amount of litter trampled was " + temp + " and the remaining litter is " + (surfaceOM.Wt), MessageType.Diagnostic);

                // move the dung to litter - assume dung is 40% of that harvested and a C:N ratio of 
                AddFaecesType dung = new AddFaecesType();
                dung.OMWeight = AmountDungCReturned / 0.4;
                dung.OMN = AmountDungNReturned;
                surfaceOM.AddFaeces(dung);
                summary.WriteMessage(this, "For patch " + i + " the amount of dung DM added to the litter was " + (AmountDungCReturned / 0.4) + " and the amount of N added in the dung was " + (AmountDungNReturned), MessageType.Diagnostic);

            } 
        }
        // this is the end of the trampling and dung patch/paddock section

        public void DoUrineReturn()
        {
            if (PatchType == patchTypes.EP)  //TODO can this be used for UP as well?
            {                

                GetPatchForUrineReturn();  //sets the value for PatchNumForFert
          		//summary.WriteMessage(this, "The paddock for urine return is " + PatchNumForFert, MessageType.Diagnostic);

                int i = -1; //to count the paddocks
                foreach (Zone zone in this.Parent.FindAllInScope<Zone>().OfType<IModel>().ToList())
                {
                    i += 1;
                    if (i == PatchNumForFert)
                    {
                        Fertiliser thisFert = zone.FindInScope<Fertiliser>() as Fertiliser;
                        Soil soil = zone.FindInScope<Soil>() as Soil;

                        double tempDepth = 0.0;
                        for (int ii = 0; ii <= (soilPhysical.Thickness.Length - 1); ii++)
                        {
                            tempDepth += soilPhysical.Thickness[ii];
                            thisFert.Apply(Amount: (double)(FertDepthPlacement[ii] * NumPatches * AmountFertNReturned), Type: Fertiliser.Types.UreaN, Depth: (tempDepth - soilPhysical.Thickness[ii] / 2));
                        }
                        UreaReturned += AmountFertNReturned * NumPatches;
                                        
                		summary.WriteMessage(this, AmountFertNReturned + " urine N added to Paddock " + i, MessageType.Diagnostic);

                    }
                } 

            }
            else if (PatchType == patchTypes.GP)
            {
                GetPatchForUrineReturn();  //sets the value for PatchNumForFert
                int[] PatchToAddTo = new int[1];  //because need an array variable for this
                string[] PatchNmToAddTo = new string[0];  //need an array variable for this
                List<IModel> zones = this.FindAllInScope<Zone>().OfType<IModel>().ToList();
                Soil soil = zones[0].FindInScope<Soil>() as Soil; // Only one zone allowed for GP so use the first
                double[] UreaToAdd = new double[soilPhysical.Thickness.Length];  

                for (int ii = 0; ii <= (soilPhysical.Thickness.Length - 1); ii++)
                    UreaToAdd[ii] = FertDepthPlacement[ii] * NumPatches * AmountFertNReturned;

                UreaReturned += AmountFertNReturned;


                AddSoilCNPatchType CurrentPatch = new AddSoilCNPatchType();
                CurrentPatch.Sender = "manager";
                CurrentPatch.DepositionType = DepositionTypeEnum.ToSpecificPatch;
                PatchToAddTo[0] = PatchNumForFert;
                CurrentPatch.AffectedPatches_id = PatchToAddTo;
                CurrentPatch.AffectedPatches_nm = PatchNmToAddTo;
                CurrentPatch.Urea = UreaToAdd;


                summary.WriteMessage(this, "Patch MinN prior to urine return:", MessageType.Diagnostic);

                var patchManager = soil.FindChild<INutrientPatchManager>(); 
                patchManager.Add(CurrentPatch); 
                summary.WriteMessage(this, "Patch MinN after urine return:", MessageType.Diagnostic);
            }
            else if (PatchType == patchTypes.PP)
            {
                // create a new patch from base of area 1/NumPatches
                // add the fertiliser to that patch
                // set amalgamation autmomatic
                List<IModel> zones = this.FindAllInScope<Zone>().OfType<IModel>().ToList();
                Soil soil = zones[0].FindInScope<Soil>() as Soil; // Only one zone allowed for GP so use the first

                double[] UreaToAdd = new double[soilPhysical.Thickness.Length];  

                for (int ii = 0; ii <= (soilPhysical.Thickness.Length - 1); ii++)
                    UreaToAdd[ii] = FertDepthPlacement[ii] * NumPatches * AmountFertNReturned;

                int[] PatchToAddTo = new int[1];
                string[] PatchNmToAddTo = new string[0];  //need an array variable for this

                UreaReturned += AmountFertNReturned;

                AddSoilCNPatchType NewPatch = new AddSoilCNPatchType();
                NewPatch.DepositionType = DepositionTypeEnum.ToNewPatch;
                NewPatch.AreaFraction = 1.0 / NumPatches;
                PatchToAddTo[0] = 0;
                NewPatch.AffectedPatches_id = PatchToAddTo;
                NewPatch.AffectedPatches_nm = PatchNmToAddTo;
                NewPatch.Urea = UreaToAdd;

                summary.WriteMessage(this, "UreaToAdd " + UreaToAdd[0] + " " + UreaToAdd[1] + " " + UreaToAdd[2] + " " + UreaToAdd[3] + " " + UreaToAdd[4], MessageType.Diagnostic);

                var patchManager = soil.FindChild<INutrientPatchManager>(); 
                patchManager.Add(NewPatch);

                //throw new Exception("Have not set up the PP for DoUrineReturn yet");
            }
            else if (PatchType == patchTypes.UP)
            {
                int i = -1;  // patch or paddock counter
                foreach (Zone zone in this.Parent.FindAllInScope<Zone>().OfType<IModel>().ToList())
                {
                    i += 1;

                    Fertiliser thisFert = zone.FindInScope<Fertiliser>() as Fertiliser;
                    Soil soil = zone.FindInScope<Soil>() as Soil;

                    double tempDepth = 0.0;
                    for (int ii = 0; ii <= (soilPhysical.Thickness.Length - 1); ii++)
                    {
                        tempDepth += soilPhysical.Thickness[ii];
                        thisFert.Apply(Amount: (double)(FertDepthPlacement[ii] * AmountFertNReturned), Type: Fertiliser.Types.UreaN, Depth: (tempDepth - soilPhysical.Thickness[ii] / 2));
                    } 
                    UreaReturned += AmountFertNReturned;
                }
            }
            else
                throw new Exception("Patch type not catered for");



        }
        // end of DoUrineReturn

        public void GetPatchForUrineReturn()
        {
            
            if (FertiliserReturnPattern == urineReturnTypes.UniformAcrossAllPatches)
                PatchNumForFert = 0;  // but will not be used
            else if (FertiliserReturnPattern == urineReturnTypes.RotatingInOrder)
            {
                PatchNumForFert += 1;  //increment the patch number
                if (PatchNumForFert >= NumPatches)
                    PatchNumForFert = 0;  // but reset back to the first patch if needed
                //summary.WriteMessage(this, "The patch for fertiliser return is " + PatchNumForFert, MessageType.Diagnostic);
            }
            else if (FertiliserReturnPattern == urineReturnTypes.Random)
            {
                Random rnd = new Random();
                PatchNumForFert = rnd.Next(0, NumPatches);
                //summary.WriteMessage(this, "The next random number patch for fertiliser return is " + PatchNumForFert, MessageType.Diagnostic);
            }
            else if (FertiliserReturnPattern == urineReturnTypes.PseudoRandom)
            {
                PatchNumForFert = PseudoRandomSeq[GrazingNumber];
                //summary.WriteMessage(this, "The next pseudo-random number patch for fertiliser return is " + PatchNumForFert, MessageType.Diagnostic);
            }
        }
        // this is the end of GetPatchForUrineReturn


        public void FertPlacementDepth()
        {
            // note that this only looks at the first paddock and assumes that all the paddocks are the same
            int iii = -1;  // to use as a patch counter
            foreach (Zone zone in this.Parent.FindAllInScope<Zone>().OfType<IModel>().ToList())
            {
                iii += 1;
                if (iii == 0)
                {
                    Soil soil = zone.FindInScope<Soil>() as Soil;
                    double tempDepth = 0.0;
                    FertDepthPlacement = new double[soilPhysical.Thickness.Length];
                    for (int i = 0; i <= (soilPhysical.Thickness.Length - 1); i++)
                    {
                        tempDepth += soilPhysical.Thickness[i];
                        if (tempDepth <= FertiliserDepth)
                        {
                            FertDepthPlacement[i] = soilPhysical.Thickness[i] / FertiliserDepth;
                        }
                        else
                        {
                            FertDepthPlacement[i] = (FertiliserDepth - (tempDepth - soilPhysical.Thickness[i])) / (tempDepth - (tempDepth - soilPhysical.Thickness[i])) * soilPhysical.Thickness[i] / FertiliserDepth;
                            FertDepthPlacement[i] = Math.Max(0.0, Math.Min(1.0, FertDepthPlacement[i]));
                        }
                        //if (FertiliserReturnPattern == "UniformAcrossAllPatches")
                        //   summary.WriteMessage(this, "The proportion of fertiliser applied to the " + i + "th layer will be " + FertDepthPlacement[i], MessageType.Diagnostic);
                        //else
                        summary.WriteMessage(this, "The proportion of fertiliser (* NumPatches) applied to the " + i + "th layer will be " + FertDepthPlacement[i], MessageType.Diagnostic);
                    }
                }
            }

        }
        // this is the end of FertPlacementDepth


        public void DoFertiliser()
        {
            bool ApplyFert = true; // the test for first day of the month has already been done
            double NumMonths = 0;

            if (GeneralFertType == "Monthly")
                NumMonths = 12;
            else if (GeneralFertType == "NoWinter")
            {
                if ((Clock.Today.Month < 5) || (Clock.Today.Month > 7))
                {
                    ApplyFert = true;
                    NumMonths = 9;
                }
                else
                    ApplyFert = false;
            }
            else
                throw new Exception("Wrong general fertiliser setting");

            if (ApplyFert)
            {
                foreach (Zone zone in this.Parent.FindAllInScope<Zone>().OfType<IModel>().ToList())  // but actually there will only be a single paddock
                {
                    Fertiliser thisFert = zone.FindInScope<Fertiliser>() as Fertiliser;

                    //thisFert.Apply((float)(GeneralFertAmt / NumMonths), (float) (0.0), "urea_n");
                    thisFert.Apply(Amount: (double)(GeneralFertAmt / NumMonths), Type: Fertiliser.Types.UreaN, Depth: FertiliserDepth);
                    summary.WriteMessage(this, "Applying " + (GeneralFertAmt / NumMonths) + " kg of general fertiliser", MessageType.Diagnostic);
                }

            }
        }

        // Definition of all systems
        private void SetSystemParams()
        {
            if (SystemID == systemTypes.A)
            {
                SoilType = "HE";
                SimLocation = "Rua";
                SetIrrigation = "no";
                GeneralFertType = "NoWinter";
                GeneralFertAmt = 0.0;
                PastureType = "RyeWhite";
            }
            else if (SystemID == systemTypes.B)
            {
                SoilType = "HE";
                SimLocation = "Rua";
                SetIrrigation = "no";
                GeneralFertType = "NoWinter";
                GeneralFertAmt = 150.0;
                PastureType = "RyeWhite";
            }
            else if (SystemID == systemTypes.C)
            {
                SoilType = "VL";
                SimLocation = "Lin";
                SetIrrigation = "yes";
                GeneralFertType = "NoWinter";
                GeneralFertAmt = 0.0;
                PastureType = "RyeWhite";
            }
            else if (SystemID == systemTypes.D)
            {
                SoilType = "VL";
                SimLocation = "Lin";
                SetIrrigation = "yes";
                GeneralFertType = "NoWinter";
                GeneralFertAmt = 250.0;
                PastureType = "RyeWhite";
            }
            else if (SystemID == systemTypes.E)
            {
                SoilType = "VL";
                SimLocation = "Lin";
                SetIrrigation = "yes";
                GeneralFertType = "NoWinter";
                GeneralFertAmt = 400.0;
                PastureType = "GrassOnly";
            }
            else if (SystemID == systemTypes.F)
            {
                SoilType = "VL";
                SimLocation = "Lin";
                SetIrrigation = "no";
                GeneralFertType = "NoWinter";
                GeneralFertAmt = 0.0;
                PastureType = "RyeWhite";
            }
        }
    }

    // A class for aggregating a pasture species mix.
    [Serializable]
    class Sward
    {
        private const double Epsilon = 0.000000001;
        private double amountRequired;

        public Sward(Zone zone)
        {
            Species = zone.FindAllDescendants<PastureSpecies>().OfType<IModel>().ToList().Cast<PastureSpecies>().ToList();
        }

        public List<PastureSpecies> Species { get; private set; }

        public double HarvestableWt { get { return Species.Sum(sp => sp.Harvestable.Wt); } }

        public double HarvestedWt { get { return Species.Sum(sp => sp.HarvestedWt); } }

        public double HarvestedN { get { return Species.Sum(sp => sp.HarvestedN); } }

        public double StandingHerbageWt { get { return Species.Sum(sp => sp.Standing.Wt); } }

        public double AboveGroundWt { get { return Species.Sum(sp => sp.AboveGroundWt); } }

        public bool IsAlive
        {
            get
            {
                bool alive = true;
                Species.ForEach(sp => alive = alive && sp.PlantStatus == "alive");
                return alive;
            }
        }

        /// <summary>Removes plant material simulating a graze event.</summary>
        /// <param name="amount">The DM amount (kg/ha)</param>
        /// <param name="type">How the amount is interpreted (SetResidueAmount or SetRemoveAmount)</param>
        public void Graze(double amount, string type)
        {
            double amountAvailable = HarvestableWt;
            if (IsAlive || (amountAvailable > Epsilon))
            {
                // Get the amount required to remove
                if (type.ToLower() == "setresidueamount")
                {
                    // Remove all DM above given residual amount
                    amountRequired = Math.Max(0.0, AboveGroundWt - amount);
                }
                else if (type.ToLower() == "setremoveamount")
                {
                    // Remove a given amount
                    amountRequired = Math.Max(0.0, amount);
                }
                else
                {
                    throw new Exception("Type of amount to remove on graze not recognized (use \'SetResidueAmount\' or \'SetRemoveAmount\'");
                }
                // Get the actual amount to remove
                double amountToRemove = Math.Max(0.0, Math.Min(amountRequired, amountAvailable));

                // Get the amounts to remove by mySpecies:
                if (amountToRemove > Epsilon)
                {
                    double[] fractionToRemove = new double[Species.Count];
                    for (int s = 0; s < Species.Count; s++)
                    {
                        // get the fraction to required for each mySpecies, partition according to available DM to harvest
                        fractionToRemove[s] = Species[s].Harvestable.Wt / amountAvailable;

                        // remove DM and N for each mySpecies (digestibility is also evaluated)
                        Species[s].RemoveBiomass(amountToRemove * fractionToRemove[s]);
                    }
                }
            }
        }
    }
}
```
    Report ReportingWithZones: EventNames=[Clock].EndOfDay
      VariableNames:
        Parent.Name as Zone
        [Clock].Today as Date
        //[Clock].Today.Month as Month
        //[Clock].Today.Month as Year
        [ReportingWithZonesHelper].Script.ZoneCount as NumZones
        sum([ReportingWithZonesHelper].Script.DenitByZone) / NumZones as Denit
        sum([ReportingWithZonesHelper].Script.DenitN2OByZone) / NumZones as DenitN2O
        sum([ReportingWithZonesHelper].Script.LeachedNByZone) / NumZones as LeachN
        //[ReportingWithZonesHelper].Script.UreaByZone as UreaByZone
        //[ReportingWithZonesHelper].Script.NH4ByZone as NH4ByZone
        //[ReportingWithZonesHelper].Script.NO3ByZone as NO3ByZone
        //[ReportingWithZonesHelper].Script.MinNByZone as MinNByZone
        //[ReportingWithZonesHelper].Script.HerbageWtByZone as HerbageWtByZone
        //[ReportingWithZonesHelper].Script.HerbageNByZone as HerbageNByZone
        sum([ReportingWithZonesHelper].Script.HarvestedWtByZone) / NumZones as Harvested
        //[ReportingWithZonesHelper].Script.HarvestedNByZone as HarvestedNByZone
    Report ZoneReport: EventNames=[Clock].EndOfDay
      VariableNames:
        [Clock].Today as Date
        //[AgPRyegrass].NitrogenUptake
        //[AgPWhiteClover].NitrogenUptake
        //sum([Soil].NutrientPatchManager.Urea) as Urea
        //sum([Soil].NutrientPatchManager.NH4) as NH4
        //sum([Soil].NutrientPatchManager.NO3) as NO3
        //sum([Soil].NutrientPatchManager.DenitrifiedN) as Denit
        //[Soil].SoilWater.LeachUrea as LeachUrea
        //[Soil].SoilWater.LeachNH4 as LeachNH4
        //[Soil].SoilWater.LeachNO3 as LeachNO3
        //sum([Soil].NutrientPatchManager.Organic.N) as OrganicN
        [Soil].NutrientPatchManager.NH4EachPatch
        [Soil].NutrientPatchManager.NH4ForEachPatch
        [Soil].NutrientPatchManager.N2Oatm
    Report ReportingWithZonesPaddock: EventNames=[Clock].EndOfMonth
      VariableNames:
        [Clock].Today as Date
        [ReportingWithZonesHelper].Script.ZoneCount as NumZones
        Sum of (sum([ReportingWithZonesHelper].Script.DenitByZone) / NumZones) from [ReportingWithZonesPaddock].DayAfterLastOutput to [Clock].Today as Denit
        Sum of (sum([ReportingWithZonesHelper].Script.DenitN2OByZone) / NumZones) from [ReportingWithZonesPaddock].DayAfterLastOutput to [Clock].Today as DenitN2O
        Sum of (sum([ReportingWithZonesHelper].Script.LeachedNByZone) / NumZones) from [ReportingWithZonesPaddock].DayAfterLastOutput to [Clock].Today as LeachN
        Sum of (sum([ReportingWithZonesHelper].Script.HarvestedWtByZone) / NumZones) from [ReportingWithZonesPaddock].DayAfterLastOutput to [Clock].Today as HarvestedWt
    Manager ReportingWithZonesHelper
```csharp
using Newtonsoft.Json;
using System.Linq;
using System.Collections.Generic;
using APSIM.Shared.Utilities;
using System.IO;
using System.Xml.Serialization;
using Models.AgPasture;
using Models.Zones;
using Models.PMF;
using Models.Soils;
using Models.Core;
using System;
using Models.Interfaces;
using Models.Soils.Nutrients;

namespace Models
{
    [Serializable]
    [System.Xml.Serialization.XmlInclude(typeof(Model))]
    public class Script : Model
    {
        [Link] private Clock Clock;
        [Link] private Soil soil;
        [Link] private Zone[] zones;
        [Link] private ISummary summary;
        

// nitrogen stuff - the array dimension is the number of paddocks
        [JsonIgnore] public double[] DenitByZone { get; set; }
        [JsonIgnore] public double[] DenitN2OByZone { get; set; }
        [JsonIgnore] public double[] LeachedNByZone  { get; set; }
        [JsonIgnore] public double[] UreaByZone { get; set; }
        [JsonIgnore] public double[] NH4ByZone { get; set; }
        [JsonIgnore] public double[] NO3ByZone { get; set; }
        [JsonIgnore] public double[] MinNByZone  { get; set; }
        [JsonIgnore] public int ZoneCount  { get; set; }

// pasture stuff - the array dimension is the number of paddocks
        [JsonIgnore] public double[] HerbageWtByZone { get; set; }
        [JsonIgnore] public double[] HerbageNByZone { get; set; }
        [JsonIgnore] public double[] HarvestedWtByZone { get; set; }
        [JsonIgnore] public double[] HarvestedNByZone { get; set; }


        [EventSubscribe("StartOfSimulation")]
        private void OnSimulationCommencing(object sender, EventArgs e)
        {    
            DenitByZone = new double[zones.Length];
            DenitN2OByZone = new double[zones.Length];
            LeachedNByZone = new double[zones.Length];
            UreaByZone = new double[zones.Length];
            NH4ByZone = new double[zones.Length];
            NO3ByZone = new double[zones.Length];
            MinNByZone = new double[zones.Length];
            HerbageWtByZone = new double[zones.Length];
            HerbageNByZone = new double[zones.Length];
            HarvestedWtByZone = new double[zones.Length];
            HarvestedNByZone = new double[zones.Length];

            ZoneCount = zones.Length;
        }

        [EventSubscribe("DoReport")]
        private void OnEndOfDay(object sender, EventArgs e)
        {
            //zones = this.FindAllInScope<Zone>().OfType<IModel>().ToList();    

            for (int x = 0; x < zones.Length; x++)
            {
                var nutrient = zones[x].FindInScope<INutrient>();                                
                var waterBalance = zones[x].FindInScope<ISoilWater>();                                
                var Urea = zones[x].FindInScope<ISolute>("Urea");                                
                var NH4 = zones[x].FindInScope<ISolute>("NH4");                                
                var NO3 = zones[x].FindInScope<ISolute>("NO3");                                

                DenitByZone[x] = nutrient.DenitrifiedN.Sum();
                DenitN2OByZone[x] = nutrient.N2Oatm.Sum();
                LeachedNByZone[x] = waterBalance.LeachNO3;
                UreaByZone[x] = Urea.kgha.Sum();
                NH4ByZone[x] = NH4.kgha.Sum();
                NO3ByZone[x] = NO3.kgha.Sum();
                MinNByZone[x] = UreaByZone[x] + NH4ByZone[x] + NO3ByZone[x];
                
                var sward = zones[x].FindAllInScope<PastureSpecies>();                                
                HerbageWtByZone[x] = sward.Sum(species => species.AboveGroundWt); 
                HerbageNByZone[x] = sward.Sum(species => species.AboveGroundN);   
                HarvestedWtByZone[x] = sward.Sum(species => species.HarvestedWt); 
                HarvestedNByZone[x] = sward.Sum(species => species.HarvestedN); 


            }            

        }

    }
}
```
    Manager ZoneManager
      ZoneCount = 0
      UrineDepthPenetration = 200
      Verbose = False
```csharp
using Newtonsoft.Json;
using Models.Soils.Nutrients;
using Models.Soils.NutrientPatching;
using Models.Interfaces;
using System.Diagnostics;
using System.Collections.Generic;
using APSIM.Shared.Utilities;
using Models.Surface;
using Models.Soils;
using System.Xml.Serialization;
using Models.AgPasture;
using Models.Zones;
using Models.PMF;
using Models.Core;
using Models.Core.ApsimFile;
using System;
using System.Linq;
using Models.Climate;

namespace Models
{
    [Serializable]
    [System.Xml.Serialization.XmlInclude(typeof(Model))]
    public class Script : Model
    {
        [Link] private Clock clock;
        [Link] private Soil soil;
        [Link] private ISummary summary;
        [Link] private Weather weather;
        [Link] private Zone zone;

        [Description("Use verbose reporting to the summary file?")]
        public bool Verbose { get; set; }
        
        [Description("How many zones (explicit patches) should be created?")]
        public int ZoneCount { get; set; }
        
        [Description("Depth of urine penetration (mm)")]
        public double UrineDepthPenetration { get; set; }
        
        

        private Sward sward;
        [Link]  private IPhysical soilPhysical;

        [Link] private List<NutrientPatchManager> patchManagers;
        
        public int ZoneNumForUrine { get; set; }
        
        private double[] MonthlyUrineNAmt;
        private bool GrazeToday;
        public double HarvestedWt { get; set; }
        public double HarvestedN { get; set; }
        
        
        public double AmountUrineNReturned { get; set; }
        public double AmountDungNReturned { get; set; } 
        public double AmountDungCReturned { get; set; }


		private double[] UrineDepthPenetrationArray;

        public override void OnPreLink()
        {
            var simulation = Parent.Parent as Simulation;
            var zone = simulation.FindChild<Zone>();
                
			// Set the maximum N uptake for all species
			foreach (var species in zone.FindAllDescendants<PastureSpecies>())
			{
				var root = species.FindChild<PastureBelowGroundOrgan>();
				root.MaximumNUptake = 3.0;
			}
				
            zone.Area = 1.0 / ZoneCount;  // and then this will apply to all the new zones  
            for (int i = 0; i < ZoneCount-1; i++)
            {
                var newZone = Apsim.Clone(zone);
                Structure.Add(newZone, simulation);
            }
        }

        [EventSubscribe("StartOfSimulation")] private void OnStartOfSimulation(object sender, EventArgs e)
        {
            if (Verbose)
            	summary.WriteMessage(this, "Created " + ZoneCount + " identical zones, each of area " + (1.0 / ZoneCount) + " ha", MessageType.Diagnostic);

            if (Verbose)
            	summary.WriteMessage(this, "Initialising the ZoneManager for grazing, urine return and reporting", MessageType.Diagnostic);

            sward = new Sward(zone); 
            MonthlyUrineNAmt = new double[] { 24, 19, 17, 12, 8, 5, 5, 10, 16, 19, 23, 25 }; //This is to get a pattern of return that varies with month but removes the variation that might be caused by small changes in herbage growth
            if (Verbose)
            	summary.WriteMessage(this, "Finished initialising the Manager for grazing, urine return and reporting", MessageType.Diagnostic);

            //NumZonesForUrine = 1;  // in the future this might be > 1
            ZoneNumForUrine = -1;  // this will be incremented to 0 (first zone) below 
        }

        [EventSubscribe("DoManagement")]
        private void OnDoManagement(object sender, EventArgs e)
        {    

            // if this is the start of the simulation then sort out the depth for the urine penetration
            // can't do this in initialisation because of the module order
            if (clock.Today == clock.StartDate)
                UrinePenetration();

            GrazeToday = false;
			if (clock.Today.AddDays(1).Day == 1)    // why separate this?  - for multiple options in teh future
                GrazeToday = true;

            if (GrazeToday)
            {
                if (Verbose)
                	summary.WriteMessage(this, "Doing grazing", MessageType.Diagnostic);

                // do the herbage removal part of the grazing
                int i = -1;  // to use as a zone counter
                HarvestedWt = 0.0;
                HarvestedN = 0.0;
                foreach (Zone zone in this.Parent.FindAllInScope<Zone>())
                {
                    i += 1;
                    var sward = new Sward(zone);
                    sward.Graze(amount: 1000.0, type: "SetResidueAmount", Verbose);   // note that I have hardcoded the grazing residual
                    HarvestedWt += sward.HarvestedWt * zone.Area;
                    HarvestedN += sward.HarvestedN * zone.Area;
                    if (Verbose)
                    	summary.WriteMessage(this, "Just harvested " + HarvestedWt + " from Zone " + zone, MessageType.Diagnostic);
                }

                /*if (NutrientReturnType == NutrientReturnTypes.FromHarvest)  will need this soon so leave in
                {
                    AmountFertNReturned = HarvestedN * 0.50;  // 
                    AmountDungNReturned = HarvestedN * 0.35;  // 
                    AmountDungCReturned = AmountDungNReturned * 20;
                }
                else if (NutrientReturnType == NutrientReturnTypes.SetMonthly)
                {*/
                AmountUrineNReturned = MonthlyUrineNAmt[clock.Today.Month - 1];   //  hardcoded above
                AmountDungNReturned = AmountUrineNReturned * (0.35 / 0.50);  // 
                AmountDungCReturned = AmountDungNReturned * 20;
                if (Verbose)
                	summary.WriteMessage(this, "The amount of urine N to be returned to the whole paddock is " + AmountUrineNReturned, MessageType.Diagnostic);

                DoUrineReturn();
                DoTramplingAndDungReturn();
                if (Verbose)
                	summary.WriteMessage(this, "Finished Grazing", MessageType.Diagnostic);

            }
            else
            {
            }
            
        }

        public void DoTramplingAndDungReturn()
        {
            // IS THE AMOUTN OF DUNG CORREXT FOR ZONES????
            
            int i = -1;  // patch or paddock counter
            foreach (Zone zone in this.Parent.FindAllInScope<Zone>().OfType<IModel>().ToList())
            {
                i += 1;
                SurfaceOrganicMatter surfaceOM = zone.FindInScope<SurfaceOrganicMatter>() as SurfaceOrganicMatter; 

                // do some trampling of litter
                // accelerate the movement of surface litter into the soil - do this before the dung is added
                double temp = surfaceOM.Wt * 0.1;

                TillageType trampling = new TillageType();
                surfaceOM.Incorporate(fraction: (double)0.1, depth: (double)100.0, Verbose);

                if (Verbose)
                	summary.WriteMessage(this, "For patch " + i + " the amount of litter trampled was " + temp + " and the remaining litter is " + (surfaceOM.Wt), MessageType.Diagnostic);

                // move the dung to litter - assume dung is 40% of that harvested and a C:N ratio of 
                AddFaecesType dung = new AddFaecesType();
                dung.OMWeight = AmountDungCReturned / 0.4;
                dung.OMN = AmountDungNReturned;
                surfaceOM.AddFaeces(dung);
                if (Verbose)
                	summary.WriteMessage(this, "For patch " + i + " the amount of dung DM added to the litter was " + (AmountDungCReturned / 0.4) + " and the amount of N added in the dung was " + (AmountDungNReturned), MessageType.Diagnostic);

            } 
        }

        public void DoUrineReturn()
        {
            GetZoneForUrineReturn();  
      		if (Verbose)
      			summary.WriteMessage(this, "The Zone for urine return is " + ZoneNumForUrine, MessageType.Diagnostic);

            int i = -1; //to count the zones
            foreach (Zone zone in this.Parent.FindAllInScope<Zone>())
            {
                i += 1;
                if (i == ZoneNumForUrine)
                {
                    Fertiliser thisFert = zone.FindInScope<Fertiliser>() as Fertiliser;
                    Soil soil = zone.FindInScope<Soil>() as Soil;  // do I need this?

                    double tempDepth = 0.0;
                    for (int ii = 0; ii <= (soilPhysical.Thickness.Length - 1); ii++)
                    {
                        tempDepth += soilPhysical.Thickness[ii];
                        thisFert.Apply(Amount: (double)(UrineDepthPenetrationArray[ii] * ZoneCount * AmountUrineNReturned), Type: Fertiliser.Types.UreaN, Depth: (tempDepth - soilPhysical.Thickness[ii] / 2), doOutput: Verbose);
                        // above multiply by ZoneCount to get the patch concentration effect
                    }
                                        
             		if (Verbose)
             			summary.WriteMessage(this, AmountUrineNReturned + " urine N added to Zone " + i + ", the local load was " + ZoneCount * AmountUrineNReturned + " kg N /ha", MessageType.Diagnostic);
                 }
             } 
        }

        public void GetZoneForUrineReturn()
        {
            ZoneNumForUrine += 1;  //increment the patch number - it was initialised at -1
            if (ZoneNumForUrine >= ZoneCount)
                ZoneNumForUrine = 0;  // but reset back to the first patch if needed

            //Random rnd = new Random();
            //PatchNumForFert = rnd.Next(0, NumPatches);
            //summary.WriteMessage(this, "The next random number patch for fertiliser return is " + PatchNumForFert, MessageType.Diagnostic);
        }


        public void UrinePenetration()
        {
            // note that this only looks at the first paddock and assumes that all the paddocks are the same
            int iii = -1;  // to use as a patch counter
            foreach (Zone zone in this.Parent.FindAllInScope<Zone>().OfType<IModel>().ToList())
            {
                iii += 1;
                if (iii == 0)
                {
                    Soil soil = zone.FindInScope<Soil>() as Soil;
                    double tempDepth = 0.0;
                    UrineDepthPenetrationArray = new double[soilPhysical.Thickness.Length];
                    for (int i = 0; i <= (soilPhysical.Thickness.Length - 1); i++)
                    {
                        tempDepth += soilPhysical.Thickness[i];
                        if (tempDepth <= UrineDepthPenetration)
                        {
                            UrineDepthPenetrationArray[i] = soilPhysical.Thickness[i] / UrineDepthPenetration;
                        }
                        else
                        {
                            UrineDepthPenetrationArray[i] = (UrineDepthPenetration - (tempDepth - soilPhysical.Thickness[i])) / (tempDepth - (tempDepth - soilPhysical.Thickness[i])) * soilPhysical.Thickness[i] / UrineDepthPenetration;
                            UrineDepthPenetrationArray[i] = Math.Max(0.0, Math.Min(1.0, UrineDepthPenetrationArray[i]));
                        }
                        if (Verbose)
                        	summary.WriteMessage(this, "The proportion of urine applied to the " + i + "th layer will be " + UrineDepthPenetrationArray[i], MessageType.Diagnostic);
                    }
                }
            }

        }


        
   
    // A class for aggregating a pasture species mix.  ??????????????? is this needed now?
    [Serializable]
    class Sward
    {
     	private const double Epsilon = 0.000000001;
        private double amountRequired;

        public Sward(Zone zone)
        {
            Species = zone.FindAllDescendants<PastureSpecies>().OfType<IModel>().ToList().Cast<PastureSpecies>().ToList();
		}
		
        public List<PastureSpecies> Species { get; private set; }

        public double HarvestableWt { get { return Species.Sum(sp => sp.Harvestable.Wt); } }

        public double HarvestedWt { get { return Species.Sum(sp => sp.HarvestedWt); } }

        public double HarvestedN { get { return Species.Sum(sp => sp.HarvestedN); } }

        public double StandingHerbageWt { get { return Species.Sum(sp => sp.Standing.Wt); } }

        public double AboveGroundWt { get { return Species.Sum(sp => sp.AboveGroundWt); } }

        public bool IsAlive
        {
            get
            {
                bool alive = true;
                Species.ForEach(sp => alive = alive && sp.PlantStatus == "alive");
                return alive;
            }
         }
     

        /// <summary>Removes plant material simulating a graze event.</summary>
        /// <param name="amount">The DM amount (kg/ha)</param>
        /// <param name="type">How the amount is interpreted (SetResidueAmount or SetRemoveAmount)</param>
        public void Graze(double amount, string type, bool Verbose)
        {
            double amountAvailable = HarvestableWt;
            if (IsAlive || (amountAvailable > Epsilon))
            {
                // Get the amount required to remove
                if (type.ToLower() == "setresidueamount")
                {
                    // Remove all DM above given residual amount
                    amountRequired = Math.Max(0.0, AboveGroundWt - amount);
                }
                else if (type.ToLower() == "setremoveamount")
                {
                    // Remove a given amount
                    amountRequired = Math.Max(0.0, amount);
                }
                else
                {
                    throw new Exception("Type of amount to remove on graze not recognized (use \'SetResidueAmount\' or \'SetRemoveAmount\'");
                }
                // Get the actual amount to remove
                double amountToRemove = Math.Max(0.0, Math.Min(amountRequired, amountAvailable));

                // Get the amounts to remove by mySpecies:
                if (amountToRemove > Epsilon)
                {
                    double[] fractionToRemove = new double[Species.Count];
                    for (int s = 0; s < Species.Count; s++)
                    {
                        // get the fraction to required for each mySpecies, partition according to available DM to harvest
                        fractionToRemove[s] = Species[s].Harvestable.Wt / amountAvailable;

                        // remove DM and N for each mySpecies (digestibility is also evaluated)
                        Species[s].RemoveBiomass(amountToRemove * fractionToRemove[s], Verbose);
                    }
                }
            }
        }
	}
    }
}
```
    Report ReportingWithZonesPaddock1: same as Folder.ReportingWithZonesPaddock
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