Simulations: Version=167
  Memo
    The intent of this simulation is to replicate the testing in

    Snow, V.O., Cichota, R., McAuliffe, R.J., Hutchings, N.J., Vejlin, J., 2017. Increasing the spatial scale of process-based agricultural systems models by representing heterogeneity: The case of urine patches in grazed pastures. Environmental Modelling & Software 90 89-106.

    http://dx.doi.org/10.1016/j.envsoft.2017.01.005

    Basically it compares explicit patches to pseudo-patches under a range of conditions/intensity. Ideally there should be no or little difference between the two types of patches. Note that the grazing schedual (and the returns?? - check) should be imposed and the results compared on an annual basis.

    Current state is ....
  DataStore
    Memo: same as Memo
  Experiment ExpRange
    Factors
      Permutation
        Factor ReturnType
          Specification=[PatchAndZoneManagerWithUptakeCorrection].Script.UrineReturnType = SetMonthly, FromHarvest
        Factor SystemType
          CompositeFactor A
            Specifications:
              [Weather].FileName = VCS_Ruakura.met
              [Soil]
              [CentrePivot].Script.allowIrrigation = false
              [Fertilisation].Script.Amount = 0
              [KillClover].Script.Enable = false
            Soil HE: SoilType=NZ_sedementary; Region=Plains; State=Canterbury; Country=New Zealand; Latitude=0; Longitude=0
              DataSource=Generic profile descriptions provided by Trevor Webb and data for functional horizions based on SWAMP project results
              Comments=Bulk density values were measured on the fine earth fraction so values entered into apsim soil are adjusted down to account for stone content (assuming stones are inert from all soil process so their mass and volume is removed from model paramaters).  SAT, DUL, LL15 and Air dry have been adjusted down to account for stone content.  OC has not been adjusted so the model will get the correct carbon and N amounts using the adjusted BD.
              Physical
                Thickness  ParticleSizeClay  ParticleSizeSand  ParticleSizeSilt  BD     AirDry  LL15   DUL    SAT    KS
                200        20                14.5              65.5              1.31   0.077   0.153  0.373  0.456  4832.039
                150        24                18                58                1.524  0.201   0.201  0.332  0.394  389.229
                200        39                13                48                1.42   0.298   0.298  0.426  0.442  21.6
                350        44                1                 55                1.424  0.308   0.308  0.446  0.456  19.051
                150        44                1                 55                1.424  0.308   0.308  0.446  0.456  19.051
                150        19                15                66                1.601  0.162   0.162  0.325  0.376  97.995
                300        19                15                66                1.601  0.162   0.162  0.325  0.376  97.995
                SoilCrop AGPRyegrassSoil: LL=[0.154, 0.201, 0.299, 0.308, 0.308, 0.162, 0.162]; KL=[0.1, 0.1, 0.1, 0.05, 0.05, 0.05, 0.05]; XF=[1, 0.8, 0.8, 0.3, 0, 0, 0]
                SoilCrop AGPWhiteCloverSoil: LL=[0.154, 0.201, 0.299, 0.308, 0.308, 0.162, 0.162]; KL=[0.1, 0.1, 0.1, 0.05, 0.05, 0.05, 0.05]; XF=[1, 0.8, 0.8, 0.3, 0, 0, 0]
              Organic: FOMCNRatio=40; CarbonUnits=Total
                Thickness  Carbon  SoilCNRatio  FBiom  FInert  FOM
                200        4.502   11           0.048  0.382   347.67
                150        1.91    11           0.027  0.634   257.56
                200        0.772   11           0.019  0.784   172.648
                350        0.422   11           0.015  0.924   85.734
                150        0.422   11           0.015  0.924   63.514
                150        0.402   11           0.015  0.971   47.052
                300        0.4     11           0.015  0.985   25.823
              Chemical: Thickness=[200, 150, 200, 350, 150, 150, 300]; PH=[6, 6, 6, 6, 6, 6, 6]; PHUnits=Water
              WaterBalance SoilWater: SummerDate=1-Oct; SummerU=9; SummerCona=4.4; WinterDate=1-Apr; WinterU=6; WinterCona=3; DiffusConst=88; DiffusSlope=35; Salb=0.13; CN2Bare=73; CNRed=20; CNCov=0.8; PSIDul=-100; Thickness=[200, 150, 200, 350, 150, 150, 300]; SWCON=[0.496, 0.366, 0.374, 0.076, 0.076, 0.306, 0.306]
              Water: Thickness=[200, 150, 200, 350, 150, 150, 300]; InitialValues=[0.373, 0.332, 0.426, 0.446, 0.446, 0.325, 0.325]; InitialPAWmm=231.6; RelativeTo=LL15; FilledFromTop=true
              CERESSoilTemperature Temperature
              SolutePatch NO3: InitialValuesUnits=kg/ha; WaterTableConcentration=0; D0=0; DepthConstant=0; MaxDepthSoluteAccessible=0; RunoffEffectivenessAtMovingSolute=0; MaxEffectiveRunoff=0
                Thickness  InitialValues  Exco  FIP
                200        18             0     1
                150        5              0     1
                200        4              0     1
                350        2              0     1
                150        1              0     1
                150        1              0     1
                300        1              0     1
              SolutePatch NH4: InitialValuesUnits=kg/ha; WaterTableConcentration=0; D0=0; DepthConstant=0; MaxDepthSoluteAccessible=0; RunoffEffectivenessAtMovingSolute=0; MaxEffectiveRunoff=0
                Thickness  InitialValues  Exco  FIP
                200        0              1     1
                150        0              1     1
                200        0              1     1
                350        0              1     1
                150        0              1     1
                150        0              1     1
                300        0              1     1
              SolutePatch Urea: InitialValuesUnits=kg/ha; WaterTableConcentration=0; D0=0; DepthConstant=0; MaxDepthSoluteAccessible=0; RunoffEffectivenessAtMovingSolute=0; MaxEffectiveRunoff=0
                Thickness  InitialValues  Exco  FIP
                200        0              0     1
                150        0              0     1
                200        0              0     1
                350        0              0     1
                150        0              0     1
                150        0              0     1
                300        0              0     1
              NutrientPatchManager: MaximumNitrogenAvailableToPlants=3; NPartitionApproach=0; AutoAmalgamationApproach=0; basePatchApproach=0; AllowPatchAmalgamationByAge=false; PatchAgeForForcedMerge=0; LayerForNPartition=-99
          CompositeFactor B
            Specifications:
              [Weather].FileName = VCS_Ruakura.met
              [Soil]
              [CentrePivot].Script.allowIrrigation = false
              [Fertilisation].Script.Amount = 150
              [KillClover].Script.Enable = false
            Soil HE: same as ExpRange.Factors.Permutation.SystemType.A.HE
          CompositeFactor C
            Specifications:
              [Weather].FileName = VCS_Lincoln.met
              [Soil]
              [CentrePivot].Script.allowIrrigation = true
              [Fertilisation].Script.Amount = 0
              [KillClover].Script.Enable = false
            Soil VL: SoilType=NZ_Sedimentary; LocalName=Lismore; Site=Winchmore; NearestTown=Ashburton; Region=Canterbury; Country=New Zealand; Latitude=-48.48; Longitude=0
              Chemical: Thickness=[150, 150, 200, 150, 250, 300, 300]; PH=[6, 6, 6, 6, 6, 6, 6]; PHUnits=Water
              Physical
                Thickness  ParticleSizeClay  ParticleSizeSand  ParticleSizeSilt  BD    AirDry  LL15   DUL   SAT   KS
                150        20                15                65                1.3   0.05    0.15   0.25  0.45  5000
                150        15                20                65                1.35  0.12    0.14   0.22  0.43  2500
                200        12                25                63                1     0.055   0.055  0.15  0.25  3000
                150        8                 35                57                0.53  0.015   0.015  0.05  0.15  10000
                250        6                 40                54                0.31  0.01    0.01   0.03  0.11  17500
                300        5                 40                55                0.3   0.01    0.01   0.03  0.11  20000
                300        5                 40                55                0.3   0.01    0.01   0.03  0.11  20000
                SoilCrop AGPRyegrassSoil: LL=[0.15, 0.14, 0.06, 0.02, 0.01, 0.01, 0.01]; KL=[0.1, 0.1, 0.08, 0.04, 0.01, 0, 0]; XF=[1, 1, 1, 1, 1, 0, 0]
                SoilCrop AGPWhiteCloverSoil: LL=[0.15, 0.14, 0.06, 0.02, 0.01, 0.01, 0.01]; KL=[0.1, 0.1, 0.08, 0.04, 0.01, 0, 0]; XF=[1, 1, 1, 1, 1, 0, 0]
                SoilCrop Slurp1Soil: LL=[0.15, 0.14, 0.06, 0.02, 0.01, 0.01, 0.01]; KL=[0.1, 0.1, 0.08, 0.04, 0.01, 0, 0]; XF=[1, 1, 1, 1, 1, 0, 0]
                SoilCrop Slurp2Soil: LL=[0.15, 0.14, 0.06, 0.02, 0.01, 0.01, 0.01]; KL=[0.1, 0.1, 0.08, 0.04, 0.01, 0, 0]; XF=[1, 1, 1, 1, 1, 0, 0]
                SoilCrop Rye1Soil: LL=[0.15, 0.14, 0.06, 0.02, 0.01, 0.01, 0.01]; KL=[0.1, 0.1, 0.08, 0.04, 0.01, 0, 0]; XF=[1, 1, 1, 1, 1, 0, 0]
                SoilCrop Rye2Soil: LL=[0.15, 0.14, 0.06, 0.02, 0.01, 0.01, 0.01]; KL=[0.1, 0.1, 0.08, 0.04, 0.01, 0, 0]; XF=[1, 1, 1, 1, 1, 0, 0]
              WaterBalance SoilWater: SummerDate=1-Nov; SummerU=6; SummerCona=3.5; WinterDate=1-apr; WinterU=2; WinterCona=2; DiffusConst=88; DiffusSlope=35; Salb=0.13; CN2Bare=73; CNRed=20; CNCov=0.8; DischargeWidth=0; CatchmentArea=0; PSIDul=-100
                Thickness  SWCON  KLAT
                150        0.5    0
                150        0.52   0
                200        0.55   0
                150        0.6    0
                250        0.65   0
                300        0.65   0
                300        0.65   0
              Nutrient
              Organic: FOMCNRatio=40; CarbonUnits=Total
                Thickness  Carbon  SoilCNRatio  FBiom  FInert  FOM
                150        3       12           0.04   0.5     331.337
                150        1       12           0.02   0.7     245.461
                200        0.6     12           0.02   0.83    164.537
                150        0.4     12           0.01   0.9     121.892
                250        0.25    12           0.01   0.95    73.9313
                300        0.15    12           0      0.99    40.5743
                300        0.1     12           0      0.99    22.2677
              Water: Thickness=[150, 150, 200, 150, 250, 300, 300]; InitialValues=[0.245, 0.216, 0.145, 0.048, 0.029, 0.029, 0.029]; InitialPAWmm=64.75; RelativeTo=LL15; FilledFromTop=false
              CERESSoilTemperature Temperature
              SolutePatch NO3: same as ExpRange.Factors.Permutation.SystemType.A.HE.NO3
              SolutePatch NH4: same as ExpRange.Factors.Permutation.SystemType.A.HE.NH4
              SolutePatch Urea: same as ExpRange.Factors.Permutation.SystemType.A.HE.Urea
              NutrientPatchManager: MaximumNitrogenAvailableToPlants=3; NPartitionApproach=0; AutoAmalgamationApproach=0; basePatchApproach=0; AllowPatchAmalgamationByAge=false; PatchAgeForForcedMerge=0; LayerForNPartition=-99
          CompositeFactor D
            Specifications:
              [Weather].FileName = VCS_Lincoln.met
              [Soil]
              [CentrePivot].Script.allowIrrigation = true
              [Fertilisation].Script.Amount = 250
              [KillClover].Script.Enable = false
            Soil VL: same as ExpRange.Factors.Permutation.SystemType.C.VL
          CompositeFactor E
            Specifications:
              [Weather].FileName = VCS_Lincoln.met
              [Soil]
              [CentrePivot].Script.allowIrrigation = true
              [Fertilisation].Script.Amount = 400
              [KillClover].Script.Enable = true
            Soil VL: same as ExpRange.Factors.Permutation.SystemType.C.VL
          CompositeFactor F
            Specifications:
              [Weather].FileName = VCS_Lincoln.met
              [Soil]
              [CentrePivot].Script.allowIrrigation = false
              [Fertilisation].Script.Amount = 0
              [KillClover].Script.Enable = false
            Soil VL: same as ExpRange.Factors.Permutation.SystemType.C.VL
        Factor PatchNum
          Specification=[PatchAndZoneManagerWithUptakeCorrection].Script.ZoneCount = 5
        Factor PatchNumAll (disabled)
          Specification=[PatchAndZoneManagerWithUptakeCorrection].Script.ZoneCount = 1, 5, 10, 20, 50, 70, 100, 150, 200, 300, 500
        Factor PatchType
          CompositeFactor Explicit
            Specifications=[PatchAndZoneManagerWithUptakeCorrection].Script.PseudoPatches=false
          CompositeFactor PPRaw
            Specifications:
              [PatchAndZoneManagerWithUptakeCorrection].Script.PseudoPatches=true
              [PatchAndZoneManagerWithUptakeCorrection].Script.PPUptakeCorrection=false
          CompositeFactor PPCorr
            Specifications:
              [PatchAndZoneManagerWithUptakeCorrection].Script.PseudoPatches=true
              [PatchAndZoneManagerWithUptakeCorrection].Script.PPUptakeCorrection=true
    Simulation ExpBase
      Clock: Start=1972-01-01; End=1972-12-31
      Summary SummaryFile
      Weather: FileName=VCS_Lincoln.met
      SoilArbitrator Soil Arbitrator
      MicroClimate: a_interception=0; b_interception=1; c_interception=0; d_interception=0; SoilHeatFluxFraction=0.4; MinimumHeightDiffForNewLayer=0; NightInterceptionFraction=0.5; ReferenceHeight=2
      Manager PatchAndZoneManagerWithUptakeCorrection
        Verbose = False
        PseudoPatches = True
        PPUptakeCorrection = True
        SpeciesMaxUptake = 3
        ZoneCount = 5
        UrineReturnType = FromHarvest
        UrineReturnPattern = RotatingInOrder
        UrineDepthPenetration = 200
```csharp
using Newtonsoft.Json;
using Models.Soils.Nutrients;
using Models.Soils.NutrientPatching;
using Models.Interfaces;
using System.Diagnostics;
using System.Collections.Generic;
using APSIM.Shared.Utilities;
using Models.Surface;
using Models.Soils;
using System.Xml.Serialization;
using Models.AgPasture;
using Models.Zones;
using Models.PMF;
using Models.Core;
using Models.Core.ApsimFile;
using System;
using System.Linq;
using Models.Climate;

namespace Models
{
    [Serializable]
    [System.Xml.Serialization.XmlInclude(typeof(Model))]
    public class PatchScript : Model
    {
        [Link] private Clock clock;
        [Link] private Soil soil;
        [Link] private ISummary summary;
        [Link] private Weather weather;
        [Link] private Zone zone;
        [Link] private IPhysical soilPhysical;
        [Link] private List<NutrientPatchManager> patchManagers;

        private Sward sward;
      
        [Description("Verbose reporting to the summary file?")]
        public bool Verbose { get; set; }
        
        [Description("Should this simulation create Patches? If not then explict Zones will be created")]
        public bool PseudoPatches { get; set; }
        
        [Description("Implement reduction in maximum pasture uptake for PseudoPatches? Ignored if PseudoPatches are not used")]
        public bool PPUptakeCorrection { get; set; }
        
        [Description("Maximum single-species N uptake")]
        public double SpeciesMaxUptake { get; set; }
        
        [Description("How many patches or zones should be created?")]
        public int ZoneCount { get; set; }
        
        [Description("Nature of nutrient return")]
        public UrineReturnTypes UrineReturnType { get; set; }

        [Description("Pattern (spatial) of nutrient return")]
        public UrineReturnPatterns UrineReturnPattern { get; set; }

        [Description("Depth of urine penetration (mm)")]
        public double UrineDepthPenetration { get; set; }

        
        public int ZoneNumForUrine { get; set; }    // zone or patch that urine will be applied to
        public int NumZonesForUrine { get; set; }   // not enabled yet but for applying urine across more than one zone or patch
        public double DivisorForReporting { get; set; }   // 
        
        public double HarvestedWt { get; set; }     // from the whole paddock
        public double HarvestedN { get; set; }      // from the whole paddock
        public double AmountUrineNReturned { get; set; }   // to the whole paddock
        public double AmountDungNReturned { get; set; }    // to the whole paddock
        public double AmountDungCReturned { get; set; }    // to the whole paddock
        
        private double[] MonthlyUrineNAmt;                 // breaks the N balance but useful for testing
        private bool GrazeToday;
        private double[] UrineDepthPenetrationArray;

        [NonSerialized]
        Random pseudoRandom; // = new Random(666);  // sets a constant seed value


        public enum UrineReturnPatterns
        {
            // <summary>Not enabled Uniform</summary>
            //UniformAcrossAllPatches,
            /// <summary>Rotating in order</summary>
            RotatingInOrder,
            /// <summary>Not enabled Random</summary>
            Random,
            /// <summary>Not enabled Pseudo-random</summary>
            PseudoRandom
        }
        
        public enum UrineReturnTypes
        {
            /// <summary>FromHarvest</summary>
            FromHarvest,
            /// <summary>SetMonthly</summary>
            SetMonthly
        }


        public override void OnPreLink()
        {
            var simulation = Parent.Parent as Simulation;
            var zone = simulation.FindChild<Zone>();
                
            if (PseudoPatches)  
            {
                zone.Area = 1.0 / ZoneCount;  
                   foreach (var species in zone.FindAllDescendants<PastureSpecies>())
                {
                    var root = species.FindChild<PastureBelowGroundOrgan>();
                    if (PPUptakeCorrection)
                        root.MaximumNUptake = SpeciesMaxUptake * Math.Pow(ZoneCount, -0.0567);   // correction for patch number as fitted
                    else
                        root.MaximumNUptake = SpeciesMaxUptake;
                }
            }
            else //if (!PseudoPatches)  // so now this is zones - possibly multiple zones
            {
                zone.Area = 1.0 / ZoneCount;  // and then this will apply to all the new zones
                   foreach (var species in zone.FindAllDescendants<PastureSpecies>())
                {
                    var root = species.FindChild<PastureBelowGroundOrgan>();
                    root.MaximumNUptake = 1.5;
                }
                for (int i = 0; i < ZoneCount-1; i++)  // create all the new zones = note that this can be time consuming
                {
                    var newZone = Apsim.Clone(zone);
                    Structure.Add(newZone, simulation);
                }
            }

        }

        [EventSubscribe("StartOfSimulation")] private void OnStartOfSimulation(object sender, EventArgs e)
        {
        //Debugger.Break();
            if (Verbose && !PseudoPatches)
                summary.WriteMessage(this, "Created " + ZoneCount + " identical zones, each of area " + (1.0 / ZoneCount) + " ha", MessageType.Diagnostic);

            if (Verbose)
                summary.WriteMessage(this, "Initialising the ZoneManager for grazing, urine return and reporting", MessageType.Diagnostic);

            sward = new Sward(zone); 
            pseudoRandom = new Random(666);  // sets a constant seed value
            
            if (PseudoPatches)
                DivisorForReporting = 1.0;
            else
                DivisorForReporting = ZoneCount;

            MonthlyUrineNAmt = new double[] { 24, 19, 17, 12, 8, 5, 5, 10, 16, 19, 23, 25 }; //This is to get a pattern of return that varies with month but removes the variation that might be caused by small changes in herbage growth
            //MonthlyUrineNAmt = new double[] { 25, 25, 25, 25, 25, 25, 25, 25, 25, 25, 25, 25 }; //This is to get a pattern of return that varies with month but removes the variation that might be caused by small changes in herbage growth

            if (PseudoPatches)
            {
                foreach (var patchManager in patchManagers)
                {
                    //patchManager.MaximumNitrogenAvailableToPlants = 0.45; This is now set in pre start
                    patchManager.NPartitionApproach = PartitionApproachEnum.BasedOnConcentrationAndDelta;
                    patchManager.AutoAmalgamationApproach = AutoAmalgamationApproachEnum.None;
                    patchManager.basePatchApproach = BaseApproachEnum.IDBased;
                    patchManager.AllowPatchAmalgamationByAge = false;
                    patchManager.PatchAgeForForcedMerge = 1000000.0;  // ie don't merge                                
                }

                int[] PatchToAddTo = new int[1];  //need an array variable for this
                string[] PatchNmToAddTo = new string[1];  
                int nPatchesAdded = 0;
                double NewArea = 1.0 / ZoneCount;
                
                while (nPatchesAdded < ZoneCount - 1)
                {
                    AddSoilCNPatchType NewPatch = new AddSoilCNPatchType();
                    NewPatch.DepositionType = DepositionTypeEnum.ToNewPatch;
                    NewPatch.AreaFraction = NewArea;
                    PatchToAddTo[0] = 0;
                    PatchNmToAddTo[0] = "0";
                    NewPatch.AffectedPatches_id = PatchToAddTo;
                    NewPatch.AffectedPatches_nm = PatchNmToAddTo;
                    NewPatch.SuppressMessages = Verbose;

                    foreach (var patchManager in patchManagers)
                        patchManager.Add(NewPatch);
                    nPatchesAdded += 1;
                }                

                if (Verbose)
                    summary.WriteMessage(this, patchManagers[0].NumPatches.ToString() + " pseudopatches have been created", MessageType.Diagnostic);
            }

            if (Verbose)
                summary.WriteMessage(this, "Finished initialising the Manager for grazing, urine return and reporting", MessageType.Diagnostic);

            NumZonesForUrine = 1;  // in the future this might be > 1
            ZoneNumForUrine = -1;  // this will be incremented to 0 (first zone) below 
        }

        [EventSubscribe("DoManagement")]
        private void OnDoManagement(object sender, EventArgs e)
        {    

            // if this is the start of the simulation then sort out the depth for the urine penetration. Can't do this in initialisation because of the module order
            if (clock.Today == clock.StartDate)
                UrinePenetration();

            GrazeToday = false;
            if (clock.Today.AddDays(1).Day == 1)    // why separate this from the if below?  - to allow for multiple options in the future
                GrazeToday = true;

            if (GrazeToday)
            {
                if (Verbose)
                    summary.WriteMessage(this, "Doing grazing", MessageType.Diagnostic);

                // do the herbage removal part of the grazing
                int i = -1;  // to use as a zone counter
                HarvestedWt = 0.0;
                HarvestedN = 0.0;
                foreach (Zone zone in this.Parent.FindAllInScope<Zone>())   // NOTE - this is a zone regardless of pseudopatches 
                {
                    i += 1;
                    var sward = new Sward(zone);
                    sward.Graze(amount: 1000.0, type: "SetResidueAmount", Verbose);   // note that I have hardcoded the grazing residual for now
                    HarvestedWt += sward.HarvestedWt * zone.Area;
                    HarvestedN += sward.HarvestedN * zone.Area;
                    if (Verbose)
                        summary.WriteMessage(this, "Just harvested " + HarvestedWt + " from Zone " + zone.Name, MessageType.Diagnostic);
                }

                if (UrineReturnType == UrineReturnTypes.FromHarvest)
                {
                    AmountUrineNReturned = HarvestedN * 0.50;  // 
                    AmountDungNReturned = HarvestedN * 0.35;  // 
                    AmountDungCReturned = AmountDungNReturned * 20;
                }
                else if (UrineReturnType == UrineReturnTypes.SetMonthly)
                {
                    AmountUrineNReturned = MonthlyUrineNAmt[clock.Today.Month - 1];   //  hardcoded as an input
                    AmountDungNReturned = AmountUrineNReturned * (0.35 / 0.50);  // 
                    AmountDungCReturned = AmountDungNReturned * 20;
                }
                if (Verbose)
                    summary.WriteMessage(this, "The amount of urine N to be returned to the whole paddock is " + AmountUrineNReturned, MessageType.Diagnostic);

                DoUrineReturn();

                DoTramplingAndDungReturn();

                if (Verbose)
                    summary.WriteMessage(this, "Finished Grazing", MessageType.Diagnostic);

            }
        }

        public void DoTramplingAndDungReturn()
        {
             // Note that dung is assumed to be spread uniformly over the paddock (patches or sones).
             // There is no need to bring zone area into the calculations here but zone area must be included for variables reported FROM the zone to the upper level
                        
            int i = -1;  // patch or paddock counter
            foreach (Zone zone in this.Parent.FindAllInScope<Zone>())
            {
                i += 1;
                SurfaceOrganicMatter surfaceOM = zone.FindInScope<SurfaceOrganicMatter>() as SurfaceOrganicMatter; 

                // do some trampling of litter
                // accelerate the movement of surface litter into the soil - do this before the dung is added
                double temp = surfaceOM.Wt * 0.1;

                TillageType trampling = new TillageType();
                surfaceOM.Incorporate(fraction: (double) 0.1, depth: (double)100.0, Verbose);

                if (Verbose)
                    summary.WriteMessage(this, "For patch " + i + " the amount of litter trampled was " + temp + " and the remaining litter is " + (surfaceOM.Wt), MessageType.Diagnostic);

                // move the dung to litter  
                AddFaecesType dung = new AddFaecesType();
                dung.OMWeight = AmountDungCReturned / 0.4;  //assume dung C is 40% of OM  
                dung.OMN = AmountDungNReturned;
                surfaceOM.AddFaeces(dung);
                if (Verbose)
                    summary.WriteMessage(this, "For patch " + i + " the amount of dung DM added to the litter was " + (AmountDungCReturned / 0.4) + " and the amount of N added in the dung was " + (AmountDungNReturned), MessageType.Diagnostic);

            } 
        }

        public void DoUrineReturn()
        {
            GetZoneForUrineReturn();  

              if (Verbose)
                  summary.WriteMessage(this, "The Zone for urine return is " + ZoneNumForUrine, MessageType.Diagnostic);

            if (!PseudoPatches)
            {
                int i = -1; //to count the zones
                foreach (Zone zone in this.Parent.FindAllInScope<Zone>())
                {
                    i += 1;
                    if (i == ZoneNumForUrine)
                    {
                        Fertiliser thisFert = zone.FindInScope<Fertiliser>() as Fertiliser;

                          thisFert.Apply(amount: AmountUrineNReturned / zone.Area, 
                                  type: Fertiliser.Types.UreaN,  
                                  depthTop: 0.0, 
                                  depthBottom: UrineDepthPenetration, 
                                  doOutput: Verbose);
                                        
                         if (Verbose)
                             summary.WriteMessage(this, AmountUrineNReturned + " urine N added to Zone " + i + ", the local load was " + AmountUrineNReturned / zone.Area + " kg N /ha", MessageType.Diagnostic);
                     }
                 }
            }
            else // PseudoPatches
            {
                        int[] PatchToAddTo = new int[1];  //because need an array variable for this
                        string[] PatchNmToAddTo = new string[0];  //need an array variable for this
                        //List<IModel> zones = this.FindAllInScope<Zone>().OfType<IModel>().ToList();   //TODO ask Dean - is all this needed?
                        double[] UreaToAdd = new double[soilPhysical.Thickness.Length];  

                        for (int ii = 0; ii <= (soilPhysical.Thickness.Length - 1); ii++)
                            UreaToAdd[ii] = UrineDepthPenetrationArray[ii]  * AmountUrineNReturned * ZoneCount;

                        // needed??   UreaReturned += AmountFertNReturned;

                        AddSoilCNPatchType CurrentPatch = new AddSoilCNPatchType();
                        CurrentPatch.Sender = "manager";
                        CurrentPatch.DepositionType = DepositionTypeEnum.ToSpecificPatch;
                        PatchToAddTo[0] = ZoneNumForUrine;
                        CurrentPatch.AffectedPatches_id = PatchToAddTo;
                        CurrentPatch.AffectedPatches_nm = PatchNmToAddTo;
                        CurrentPatch.Urea = UreaToAdd; 

                        var patchManager = soil.FindChild<NutrientPatchManager>(); 

                         if (Verbose)
                            summary.WriteMessage(this, "Patch MinN prior to urine return: " + patchManager.MineralNEachPatch[ZoneNumForUrine], MessageType.Diagnostic);
                        patchManager.Add(CurrentPatch); 
                         if (Verbose)
                            summary.WriteMessage(this, "Patch MinN after urine return: " + patchManager.MineralNEachPatch[ZoneNumForUrine], MessageType.Diagnostic);
            } 
        }

        public void GetZoneForUrineReturn()
        {
            if (UrineReturnPattern == UrineReturnPatterns.RotatingInOrder) 
            {
                ZoneNumForUrine += 1;  //increment the zone number - it was initialised at -1. NOTE, ZoneNumForUrine is used for both zones and patches
                if (ZoneNumForUrine >= ZoneCount)
                    ZoneNumForUrine = 0;  // but reset back to the first patch if needed
            }
            else if (UrineReturnPattern == UrineReturnPatterns.Random)
            {
                Random rnd = new Random();
                ZoneNumForUrine = rnd.Next(0, ZoneCount); // in C# the maximum value (ZoneCount) will not be selected
            }
            else if (UrineReturnPattern == UrineReturnPatterns.PseudoRandom)
            {
                ZoneNumForUrine = pseudoRandom.Next(0, ZoneCount); // in C# the maximum value (ZoneCount) will not be selected
            }
            else
                throw new Exception("UrineResturnPattern not recognised");

            if (Verbose)
                summary.WriteMessage(this, "The next zone/patch for urine return is " + ZoneNumForUrine, MessageType.Diagnostic);
        }


        public void UrinePenetration()
        {
            // note that this only looks at the first paddock and assumes that all the paddocks are the same
            int iii = -1;  // to use as a patch counter
            foreach (Zone zone in this.Parent.FindAllInScope<Zone>().OfType<IModel>().ToList())
            {
                iii += 1;
                if (iii == 0)
                {
                    Soil soil = zone.FindInScope<Soil>() as Soil;
                    double tempDepth = 0.0;
                    UrineDepthPenetrationArray = new double[soilPhysical.Thickness.Length];
                    for (int i = 0; i <= (soilPhysical.Thickness.Length - 1); i++)
                    {
                        tempDepth += soilPhysical.Thickness[i];
                        if (tempDepth <= UrineDepthPenetration)
                        {
                            UrineDepthPenetrationArray[i] = soilPhysical.Thickness[i] / UrineDepthPenetration;
                        }
                        else
                        {
                            UrineDepthPenetrationArray[i] = (UrineDepthPenetration - (tempDepth - soilPhysical.Thickness[i])) / (tempDepth - (tempDepth - soilPhysical.Thickness[i])) * soilPhysical.Thickness[i] / UrineDepthPenetration;
                            UrineDepthPenetrationArray[i] = Math.Max(0.0, Math.Min(1.0, UrineDepthPenetrationArray[i]));
                        }
                        if (Verbose)
                            summary.WriteMessage(this, "The proportion of urine applied to the " + i + "th layer will be " + UrineDepthPenetrationArray[i], MessageType.Diagnostic);
                    }
                }
            }

        } 


        
   
    // A class for aggregating a pasture species mix.  ??????????????? is this needed now?
    [Serializable]
    class Sward
    {
         private const double Epsilon = 0.000000001;
        private double amountRequired;

        public Sward(Zone zone)
        {
            Species = zone.FindAllDescendants<PastureSpecies>().OfType<IModel>().ToList().Cast<PastureSpecies>().ToList();
        }
        
        public List<PastureSpecies> Species { get; private set; }

        public double HarvestableWt { get { return Species.Sum(sp => sp.Harvestable.Wt); } }

        public double HarvestedWt { get { return Species.Sum(sp => sp.HarvestedWt); } }

        public double HarvestedN { get { return Species.Sum(sp => sp.HarvestedN); } }

        public double StandingHerbageWt { get { return Species.Sum(sp => sp.Standing.Wt); } }

        public double AboveGroundWt { get { return Species.Sum(sp => sp.AboveGroundWt); } }

        public bool IsAlive
        {
            get
            {
                bool alive = true;
                Species.ForEach(sp => alive = alive && sp.PlantStatus == "alive");
                return alive;
            }
         }
     

        /// <summary>Removes plant material simulating a graze event.</summary>
        /// <param name="amount">The DM amount (kg/ha)</param>
        /// <param name="type">How the amount is interpreted (SetResidueAmount or SetRemoveAmount)</param>
        public void Graze(double amount, string type, bool Verbose)
        {
            double amountAvailable = HarvestableWt;
            if (IsAlive || (amountAvailable > Epsilon))
            {
                // Get the amount required to remove
                if (type.ToLower() == "setresidueamount")
                {
                    // Remove all DM above given residual amount
                    amountRequired = Math.Max(0.0, AboveGroundWt - amount);
                }
                else if (type.ToLower() == "setremoveamount")
                {
                    // Remove a given amount
                    amountRequired = Math.Max(0.0, amount);
                }
                else
                {
                    throw new Exception("Type of amount to remove on graze not recognized (use \'SetResidueAmount\' or \'SetRemoveAmount\'");
                }
                // Get the actual amount to remove
                double amountToRemove = Math.Max(0.0, Math.Min(amountRequired, amountAvailable));

                // Get the amounts to remove by mySpecies:
                if (amountToRemove > Epsilon)
                {
                    double[] fractionToRemove = new double[Species.Count];
                    for (int s = 0; s < Species.Count; s++)
                    {
                        // get the fraction to required for each mySpecies, partition according to available DM to harvest
                        fractionToRemove[s] = Species[s].Harvestable.Wt / amountAvailable;

                        // remove DM and N for each mySpecies (digestibility is also evaluated)
                        Species[s].RemoveBiomass(amountToRemove * fractionToRemove[s], Verbose);
                    }
                }
            }
        }
    }
    }
}
```
      Manager ReportingWithZonesHelper
```csharp
using Newtonsoft.Json;
using System.Linq;
using System.Collections.Generic;
using APSIM.Shared.Utilities;
using System.IO;
using System.Xml.Serialization;
using Models.AgPasture;
using Models.Zones;
using Models.PMF;
using Models.Soils;
using Models.Core;
using System;
using System.Diagnostics;
using Models.Interfaces;
using Models.Soils.Nutrients;
using Models.Soils.NutrientPatching;

namespace Models
{
    [Serializable]
    [System.Xml.Serialization.XmlInclude(typeof(Model))]
    public class ScriptReporting : Model
    {
        [Link] private Clock Clock;
        [Link] private Soil soil;
        [Link] private Zone[] zones;
        [Link] private ISummary summary;
        [Link] private PatchScript patchAndZoneManager;
        [Link] private NutrientPatchManager nutrientPatchManager;
        

        [JsonIgnore] public int ZoneCount  { get; set; }
        [JsonIgnore] public int PatchCount  { get; set; }
        [JsonIgnore] public int ArrayLength  { get; set; }

        [JsonIgnore] public DateTime SysTime  { get; set; }

// Whole paddock states and fluxes
        [JsonIgnore] public double DenitPdk { get; set; }
        [JsonIgnore] public double DenitN2OPdk { get; set; }
        [JsonIgnore] public double LeachedNPdk  { get; set; }
        [JsonIgnore] public double UreaPdk { get; set; }
        [JsonIgnore] public double NH4Pdk { get; set; }
        [JsonIgnore] public double NO3Pdk { get; set; }
        [JsonIgnore] public double MinNPdk  { get; set; }
        [JsonIgnore] public double TotalCPdk  { get; set; }
        [JsonIgnore] public double TotalNPdk  { get; set; }

        [JsonIgnore] public double HerbageWtPdk { get; set; }
        [JsonIgnore] public double HerbageNPdk { get; set; }
        [JsonIgnore] public double HarvestedWtPdk { get; set; }
        [JsonIgnore] public double HarvestedNPdk { get; set; }
        [JsonIgnore] public double FixedNPdk { get; set; }
        [JsonIgnore] public double UptakeNPdk { get; set; }
        [JsonIgnore] public double PastureCompositionPdk { get; set; }

// nitrogen stuff - the array dimension is the number of patches - patches might be either explicit zones or pseudopatches
        [JsonIgnore] public double[] DenitByPatch { get; set; }
        [JsonIgnore] public double[] DenitN2OByPatch { get; set; }
        [JsonIgnore] public double[] LeachedNByPatch  { get; set; }
        [JsonIgnore] public double[] UreaByPatch { get; set; }
        [JsonIgnore] public double[] NH4ByPatch { get; set; }
        [JsonIgnore] public double[] NO3ByPatch { get; set; }
        [JsonIgnore] public double[] MinNByPatch  { get; set; }
        
// carbon stuff - the array dimension is the number of patches - patches might be either explicit zones or pseudopatches
        [JsonIgnore] public double[] TotalCByPatch { get; set; }
        [JsonIgnore] public double[] TotalNByPatch { get; set; }

// pasture stuff - is using explict patches (zones) then the array dimension is the number of zones - otherwise is 1
        [JsonIgnore] public double[] HerbageWtByPatch { get; set; }
        [JsonIgnore] public double[] HerbageNByPatch { get; set; }
        [JsonIgnore] public double[] HarvestedWtByPatch { get; set; }
        [JsonIgnore] public double[] HarvestedNByPatch { get; set; }
        [JsonIgnore] public double[] FixedNByPatch { get; set; }
        [JsonIgnore] public double[] UptakeNByPatch { get; set; }
        [JsonIgnore] public double[] PastureCompositionByPatch { get; set; }

        [EventSubscribe("StartOfSimulation")]
        private void OnSimulationCommencing(object sender, EventArgs e)
        {    
            //Debugger.Break();
            
// first deal with the Nutrient things. These will always have multiple values - patches or zones            
            if (patchAndZoneManager.PseudoPatches == true)
                ArrayLength = nutrientPatchManager.NumPatches;    //the number of patches - which is fixed in this simulation but could be dangerous elsewhere
            else
                ArrayLength = zones.Length;                       // the number of paddocks/zones

            DenitByPatch = new double[ArrayLength];
            DenitN2OByPatch = new double[ArrayLength];
            LeachedNByPatch = new double[ArrayLength];
            UreaByPatch = new double[ArrayLength];
            NH4ByPatch = new double[ArrayLength];
            NO3ByPatch = new double[ArrayLength];
            MinNByPatch = new double[ArrayLength];
            TotalCByPatch = new double[ArrayLength];
            TotalNByPatch = new double[ArrayLength];

            HerbageWtByPatch = new double[ArrayLength];
            HerbageNByPatch = new double[ArrayLength];
            HarvestedWtByPatch = new double[ArrayLength];
            HarvestedNByPatch = new double[ArrayLength];
            FixedNByPatch = new double[ArrayLength];
            UptakeNByPatch = new double[ArrayLength];
            PastureCompositionByPatch = new double[ArrayLength];

        }

        [EventSubscribe("EndOfDay")]
        private void OnEndOfDay(object sender, EventArgs e)
        {
            SysTime = DateTime.Now;
        
            if (patchAndZoneManager.PseudoPatches == false)  // explicit zones
            {
                for (int x = 0; x < zones.Length; x++)
                {
                    // start with the patchy stuff first
                    var soil = zones[x].FindChild<Soil>();  
                    var patchManager = soil.FindChild<NutrientPatchManager>();  
                    var waterBalance = soil.FindChild<ISoilWater>();                                
                    var Urea = soil.FindChild<ISolute>("Urea");                                
                    var NH4 = soil.FindChild<ISolute>("NH4");                                
                    var NO3 = soil.FindChild<ISolute>("NO3");                                

                    DenitByPatch[x] = patchManager.DenitrifiedN.Sum();
                    DenitN2OByPatch[x] = patchManager.N2Oatm.Sum();
                    LeachedNByPatch[x] = waterBalance.LeachNO3 + waterBalance.LeachNH4 + waterBalance.LeachUrea;
                    UreaByPatch[x] = patchManager.Urea.kgha.Sum();
                    NH4ByPatch[x] = patchManager.NH4.kgha.Sum();
                    NO3ByPatch[x] = patchManager.NO3.kgha.Sum();
                    MinNByPatch[x] = patchManager.MineralN.Sum();
                    TotalCByPatch[x] = patchManager.TotalC.Sum();
                    TotalNByPatch[x] = patchManager.TotalN.Sum();

                    var sward = zones[x].FindAllInScope<PastureSpecies>();                                
                    var Clover = zones[x].FindChild<PastureSpecies>("AGPWhiteClover");                                

                    HerbageWtByPatch[x] = sward.Sum(species => species.AboveGroundWt); 
                    HerbageNByPatch[x] = sward.Sum(species => species.AboveGroundN);   
                    HarvestedWtByPatch[x] = sward.Sum(species => species.HarvestedWt); 
                    HarvestedNByPatch[x] = sward.Sum(species => species.HarvestedN); 
                    FixedNByPatch[x] = sward.Sum(species => species.FixedN);
                    UptakeNByPatch[x] = sward.Sum(species => species.SoilUptakeN);
                    PastureCompositionByPatch[x] = Clover.AboveGroundWt / (HerbageWtByPatch[x] + 0.1);
                    
                }
                 
                // now do the whole-paddock stuff
                DenitPdk = DenitByPatch.Sum() / zones.Length;
                DenitN2OPdk = DenitN2OByPatch.Sum() / zones.Length;
                LeachedNPdk = LeachedNByPatch.Sum() / zones.Length;
                UreaPdk = UreaByPatch.Sum() / zones.Length;
                NH4Pdk = NH4ByPatch.Sum() / zones.Length;
                NO3Pdk = NO3ByPatch.Sum() / zones.Length;
                MinNPdk = MinNByPatch.Sum() / zones.Length;
                TotalCPdk = TotalCByPatch.Sum() / zones.Length;
                TotalNPdk = TotalNByPatch.Sum() / zones.Length;
                
                HerbageWtPdk = HerbageWtByPatch.Sum() / zones.Length;
                HerbageNPdk = HerbageNByPatch.Sum() / zones.Length;
                HarvestedWtPdk = HarvestedWtByPatch.Sum() / zones.Length;
                HarvestedNPdk = HarvestedNByPatch.Sum() / zones.Length;
                FixedNPdk = FixedNByPatch.Sum() / zones.Length;
                UptakeNPdk = UptakeNByPatch.Sum() / zones.Length;
                PastureCompositionPdk = PastureCompositionByPatch.Sum() / zones.Length;

            }
            else  // PseudoPatches and there will only be one zone
            {
                for (int x = 0; x < zones.Length; x++)  // there is only onw however
                {
                    var soil = zones[x].FindChild<Soil>();  
                    var patchManager = soil.FindChild<NutrientPatchManager>();  
                    var waterBalance = soil.FindChild<ISoilWater>();                                
                    var Urea = soil.FindChild<ISolute>("Urea");                                
                    var NH4 = soil.FindChild<ISolute>("NH4");                                
                    var NO3 = soil.FindChild<ISolute>("NO3");                                

                    DenitByPatch = patchManager.DenitrifiedNEachPatch;
                    DenitN2OByPatch = patchManager.DenitN2OEachPatch;
                    UreaByPatch = patchManager.UreaEachPatch;
                    NH4ByPatch = patchManager.NH4EachPatch;
                    NO3ByPatch = patchManager.NO3EachPatch;
                    MinNByPatch = patchManager.MineralNEachPatch;
                    TotalCByPatch = patchManager.TotalCEachPatch;
                    TotalNByPatch = patchManager.TotalNEachPatch;

                    var sward = zones[x].FindAllInScope<PastureSpecies>();                                
                    var Clover = zones[x].FindChild<PastureSpecies>("AGPWhiteClover");                                

                    LeachedNByPatch[x] = waterBalance.LeachNO3 + waterBalance.LeachNH4 + waterBalance.LeachUrea; 
                    HerbageWtByPatch[x] = sward.Sum(species => species.AboveGroundWt); 
                    HerbageNByPatch[x] = sward.Sum(species => species.AboveGroundN);   
                    HarvestedWtByPatch[x] = sward.Sum(species => species.HarvestedWt); 
                    HarvestedNByPatch[x] = sward.Sum(species => species.HarvestedN); 
                    FixedNByPatch[x] = sward.Sum(species => species.FixedN);
                    UptakeNByPatch[x] = sward.Sum(species => species.SoilUptakeN);
                    PastureCompositionByPatch[x] = Clover.AboveGroundWt / (HerbageWtByPatch[x] + 0.1);
                 }
                 
                    // now do the whole-paddock stuff
                    
                    DenitPdk = DenitByPatch.Sum() / nutrientPatchManager.NumPatches;
                    DenitN2OPdk = DenitN2OByPatch.Sum() / nutrientPatchManager.NumPatches;
                    LeachedNPdk = LeachedNByPatch.Sum() / nutrientPatchManager.NumPatches;
                    UreaPdk = UreaByPatch.Sum() / nutrientPatchManager.NumPatches;
                    NH4Pdk = NH4ByPatch.Sum() / nutrientPatchManager.NumPatches;
                    NO3Pdk = NO3ByPatch.Sum() / nutrientPatchManager.NumPatches;
                    MinNPdk = MinNByPatch.Sum() / nutrientPatchManager.NumPatches;
                    TotalCPdk = TotalCByPatch.Sum() / nutrientPatchManager.NumPatches;
                    TotalNPdk = TotalNByPatch.Sum() / nutrientPatchManager.NumPatches;
                    
                    LeachedNPdk = LeachedNByPatch.Sum();
                    HerbageWtPdk = HerbageWtByPatch.Sum();
                    HerbageNPdk = HerbageNByPatch.Sum();
                    HarvestedWtPdk = HarvestedWtByPatch.Sum();
                    HarvestedNPdk = HarvestedNByPatch.Sum();
                    FixedNPdk = FixedNByPatch.Sum();
                    UptakeNPdk = UptakeNByPatch.Sum();
                    PastureCompositionPdk = PastureCompositionByPatch.Sum();


                }
                

            }


        }

}
```
      Report ReportingWithPatchesPaddock
        VariableNames:
          [Clock].Today as Date
          [Clock].Today.Year as Year
          //[PatchAndZoneManager].Script.PseudoPatches as PseudoPatches
          //[PatchAndZoneManager].Script.ZoneCount as ZoneCount
          // whole soil and pasture states and fluxes (i.e., aggregated across patches or zones)
          Sum of [ReportingWithZonesHelper].ScriptReporting.DenitPdk from [ReportingWithPatchesPaddock].DayAfterLastOutput to [Clock].Today as Denit
          Sum of [ReportingWithZonesHelper].ScriptReporting.DenitN2OPdk from [ReportingWithPatchesPaddock].DayAfterLastOutput to [Clock].Today as DenitN2O
          Sum of [ReportingWithZonesHelper].ScriptReporting.LeachedNPdk from [ReportingWithPatchesPaddock].DayAfterLastOutput to [Clock].Today as LeachN
          Last of [ReportingWithZonesHelper].ScriptReporting.UreaPdk from [ReportingWithPatchesPaddock].DayAfterLastOutput to [Clock].Today as UreaN
          Last of [ReportingWithZonesHelper].ScriptReporting.NH4Pdk from [ReportingWithPatchesPaddock].DayAfterLastOutput to [Clock].Today as NH4N
          Last of [ReportingWithZonesHelper].ScriptReporting.NO3Pdk from [ReportingWithPatchesPaddock].DayAfterLastOutput to [Clock].Today as NO3N
          Last of [ReportingWithZonesHelper].ScriptReporting.MinNPdk from [ReportingWithPatchesPaddock].DayAfterLastOutput to [Clock].Today as MinN
          Last of [ReportingWithZonesHelper].ScriptReporting.TotalCPdk from [ReportingWithPatchesPaddock].DayAfterLastOutput to [Clock].Today as TotalC
          Last of [ReportingWithZonesHelper].ScriptReporting.TotalNPdk from [ReportingWithPatchesPaddock].DayAfterLastOutput to [Clock].Today as TotalN
          Mean of [ReportingWithZonesHelper].ScriptReporting.HerbageWtPdk from [ReportingWithPatchesPaddock].DayAfterLastOutput to [Clock].Today as HerbageWt
          Mean of [ReportingWithZonesHelper].ScriptReporting.HerbageNPdk from [ReportingWithPatchesPaddock].DayAfterLastOutput to [Clock].Today as HerbageN
          Mean of [ReportingWithZonesHelper].ScriptReporting.PastureCompositionPdk from [ReportingWithPatchesPaddock].DayAfterLastOutput to [Clock].Today as Composition
          Sum of [ReportingWithZonesHelper].ScriptReporting.HarvestedWtPdk from [ReportingWithPatchesPaddock].DayAfterLastOutput to [Clock].Today as HarvestedWt
          Sum of [ReportingWithZonesHelper].ScriptReporting.HarvestedNPdk from [ReportingWithPatchesPaddock].DayAfterLastOutput to [Clock].Today as HarvestedN
          Sum of [ReportingWithZonesHelper].ScriptReporting.FixedNPdk from [ReportingWithPatchesPaddock].DayAfterLastOutput to [Clock].Today as FixedN
          Sum of [ReportingWithZonesHelper].ScriptReporting.UptakeNPdk from [ReportingWithPatchesPaddock].DayAfterLastOutput to [Clock].Today as UptakeN
          //Sum of [PatchAndZoneManager].Script.AmountUrineNReturned from [ReportingWithPatchesPaddock].DayAfterLastOutput to [Clock].Today as UrineNReturned
          [ReportingWithZonesHelper].ScriptReporting.SysTime as SysTime
          // states in the individual zones or patches
          //[ReportingWithZonesHelper].ScriptReporting.UreaByPatch as UreaByPatch
          //[ReportingWithZonesHelper].ScriptReporting.NH4ByPatch as NH4ByPatch
          //[ReportingWithZonesHelper].ScriptReporting.NO3ByPatch as NO3ByPatch
          //[ReportingWithZonesHelper].ScriptReporting.MinNByPatch as MinNByPatch
        EventNames=Clock.Today >= new DateTime(1970, 1, 1) && Clock.Today.Month == 12 && Clock.Today.Day == 31
      Zone P: Area=1; Slope=0; AspectAngle=0; Altitude=50
        Manager CentrePivot
          allowIrrigation = True
          IrrigStart = 1-sep
          IrrigEnd = 30-apr
          SoilDepth = 500
          CritPAWForShallow = 60
          CritRainToPause = 30
          DaysToPauseOnCritRain = 3
          IrrigReturnShallow = 2
          IrrigAmtShallow = 10
          PercPAWIrrigDeficitShallow = 0
          IrrigEffShallow = 100
          IrrigReturnDeep = 4
          IrrigAmtDeep = 20
          IrrigDeficitDeep = 25
          IrrigEffDeep = 100
```csharp
using Models.Soils;
using System;
using System.Linq;
using System.Diagnostics;
using Models.Core;
using Models.Interfaces;
using APSIM.Shared.Utilities;

namespace Models
{
    [Serializable]
    public class Script : Model
    {
        [Link] Clock clock;
        [Link] IWeather weather;
        [Link] Irrigation irrigation;
        [Link] ISummary summary;
        [Link] Physical physical;
        [Link] Water water;

        [Description("Allow this mananger to control irrigation?")]
        public bool allowIrrigation { get; set; } = true;

        [Separator("All soils")]

        [Description("Start of irrigation season (dd-mmm)")] 
        public string IrrigStart { get; set; }

        [Description("End of irrigation season (dd-mmm)")] 
        public string IrrigEnd { get; set; }

        [Description("Enter the depth to which water deficit is computed (mm)")] 
        public double SoilDepth { get; set; }
        
        [Description("PAW below which soil is considered 'shallow' (mm)")] 
        public double CritPAWForShallow { get; set; }

        [Description("Amount of rainfall over the last 3 days to cause pause to irrigator (mm)")] 
        public double CritRainToPause { get; set; }

        [Description("Number of days to pause irrigator after critical delay (days)")] 
        public double DaysToPauseOnCritRain { get; set; }
        
        [Separator("Shallow soils")]
        
        [Description("Irrigation return period for shallow soils (days)")] 
        public double IrrigReturnShallow { get; set; }

        [Description("Effective irrigation amount for shallow soils (mm)")] 
        public double IrrigAmtShallow { get; set; }

        [Description("Percentage of PAW at which to irrigate shallow soils (%)")] 
        public double PercPAWIrrigDeficitShallow { get; set; }

        [Description("Irrigation efficiency for shallow soils (%)")] 
        public double IrrigEffShallow { get; set; }

        [Separator("Deep soils")]
        
        [Description("Irrigation return period for deep soils (days)")] 
        public double IrrigReturnDeep { get; set; }

        [Description("Effective irrigation amount for deep soils (mm)")] 
        public double IrrigAmtDeep { get; set; }

        [Description("Percentage of PAW at which to irrigate deep soils (%)")] 
        public double IrrigDeficitDeep { get; set; }

        [Description("Irrigation efficiency for deep soils (%)")] 
        public double IrrigEffDeep { get; set; }


        // Output variables
        [Units("mm")]
        public double TodayDeficit {get; set; }
         
        [Units("mm")]
        public double TodayDeficit_nve {get; set; }
         
        [Units("")]
        public double IrrigDay {get; set; }
         
        [Units("")]
        public double SoilPAW {get; set; }
         
        [Units("")]
        public double IrrigDeficit {get; set; }
        
        [Units("")]
        public double IrrigReturn {get; set; }
        
        [Units("")]
        public double IrrigAmt {get; set; }
        
        [Units("")]
        public double IrrigEff {get; set; }
        
        [Units("mm")]
        public double Rain3 {get; set; }
        
        [Units("mm")]
        public double[] Rain_3 {get; set; } = new double[3];
        
        [Units("")]
        public double Days2Pause {get; set; }

         // private variables
        private double irrigDeficitShallow {get; set; }

        
        [EventSubscribe("StartOfSimulation")]
        private void OnStartOfSimulation(object sender, EventArgs e)
        {
            if (allowIrrigation)
            {
            
                IrrigDay = 5000;  // so will reset to 1 on first day

                Rain3 = 0.0;
                Rain_3[0] = 0.0; Rain_3[1] = 0.0; Rain_3[2] = 0.0;

                SoilPAW = 0.0;
                double mySoilDepth = 0;
                for (int z = 0; z <= physical.Thickness.Length - 1; z++)
                {
                    mySoilDepth = mySoilDepth + physical.Thickness[z];
                    if (mySoilDepth <= SoilDepth)
                        SoilPAW = SoilPAW + physical.DULmm[z] - physical.LL15mm[z];
                }
                if (SoilPAW <= CritPAWForShallow)
                {
                    IrrigDeficit = PercPAWIrrigDeficitShallow / (double)100 * SoilPAW;
                    IrrigReturn = IrrigReturnShallow;
                    IrrigAmt = IrrigAmtShallow;
                    IrrigEff = IrrigEffShallow;
                    summary.WriteMessage(this, "Soil is considered to be shallow " + CritPAWForShallow + " " + SoilPAW, MessageType.Information);
                }
                else
                {
                    IrrigDeficit = IrrigDeficitDeep;
                    IrrigReturn = IrrigReturnDeep;
                    IrrigAmt = IrrigAmtDeep;
                    IrrigEff = IrrigEffDeep;
                    summary.WriteMessage(this, "Soil is considered to be deep", MessageType.Information);
                }

                summary.WriteMessage(this, $"Irrigation critical deficit (mm): {IrrigDeficit}", MessageType.Information);
                summary.WriteMessage(this, $"        Irrigation return (days): {IrrigReturn}", MessageType.Information);
                summary.WriteMessage(this, $"   Irrigation pumped amount (mm): {IrrigAmt}", MessageType.Information);
                summary.WriteMessage(this, $"       Irrigation efficiency (%): {IrrigEff}", MessageType.Information);
            }
        }
        
        
        [EventSubscribe("DoManagement")]
        private void OnDoManagement(object sender, EventArgs e)
        {
            if (allowIrrigation)
            {
                Rain_3[2] = Rain_3[1];
                Rain_3[1] = Rain_3[0];
                Rain_3[0] = weather.Rain;
                Rain3 = Rain_3[0] + Rain_3[1] + Rain_3[2];
                if (Rain3 >= CritRainToPause)
                    Days2Pause = DaysToPauseOnCritRain;
                else
                    Days2Pause = Days2Pause - 1;

                TodayDeficit = 0.0;
                SoilPAW = 0.0;
                double mySoilDepth = 0;

                for (int z = 0; z <= physical.Thickness.Length - 1; z++)
                {
                    mySoilDepth = mySoilDepth + physical.Thickness[z];
                    if (mySoilDepth <= SoilDepth)
                    {
                        SoilPAW = SoilPAW + physical.DULmm[z] - physical.LL15mm[z];
                        TodayDeficit = TodayDeficit + physical.DULmm[z] - Math.Min(physical.DULmm[z], water.MM[z]);
                    }
                }
                TodayDeficit_nve = -1 * TodayDeficit;

                if (DateUtilities.WithinDates(IrrigStart, clock.Today, IrrigEnd))
                {
                    if (SoilPAW <= CritPAWForShallow)
                    {
                        IrrigDeficit = PercPAWIrrigDeficitShallow / 100 * SoilPAW;
                        IrrigReturn = IrrigReturnShallow;
                        IrrigAmt = IrrigAmtShallow;
                        IrrigEff = IrrigEffShallow;
                    }
                    else
                    {
                        IrrigDeficit = IrrigDeficitDeep;
                        IrrigReturn = IrrigReturnDeep;
                        IrrigAmt = IrrigAmtDeep;
                        IrrigEff = IrrigEffDeep;
                    }

                    if (Days2Pause < 0.5)
                    {
                        IrrigDay = IrrigDay + 1;
                        if (IrrigDay > IrrigReturn)
                            IrrigDay = 1;// and day = 1 is when the irrigation happens

                        if (TodayDeficit >= IrrigDeficit)
                        {
                            if (IrrigDay == 1)
                                irrigation.Apply(amount: IrrigAmt / (IrrigEff / 100.0));
                        }
                    }
                }
            }
        }    
    }
}
```
        Manager Fertilisation
          FertiliserType = UreaN
          FertiliserDates = 15-jan, 15-feb, 15-mar, 15-apr, 15-aug, 15-sep, 15-oct, 15-nov, 15-dec
          Amount = 100
          AmountType = False
```csharp
using Models.Soils;
using System;
using System.Linq;
using Models.Core;
using Models.PMF;
using APSIM.Shared.Utilities;
namespace Models
{
    [Serializable]
    public class Script : Model
    {
        [Link] Clock Clock;
        [Link] Fertiliser Fertiliser;
        
        [Separator("A component to apply fertiliser on one or more dates on every year of the simulation")]

        [Description("Type of fertiliser to apply? ")] 
        public Fertiliser.Types FertiliserType { get; set; }

        [Description("Enter the fertilisation dates as dd-mmm with comma separation (any year information entered will be ignored): ")] 
        public string[] FertiliserDates { get; set; } 

        [Description("Amount of fertiliser to be applied (kg /ha)")] 
        public double Amount { get; set; }

        [Description("Is the above amount to be applied each time? (yes/ticked)? Or is it the total annual amount across all dates (no/unticked)")] 
        public bool AmountType { get; set; }
        
        [EventSubscribe("DoManagement")]
        private void OnDoManagement(object sender, EventArgs e)
        {
            foreach (string ddMMM in FertiliserDates)
            {
                if (DateUtilities.DatesEqual(ddMMM, Clock.Today))
                {
                    if (AmountType)
                        Fertiliser.Apply(Amount: Amount, Type: FertiliserType);
                    else
                        Fertiliser.Apply(Amount: Amount / FertiliserDates.Length, Type: FertiliserType);
                }
            }
        }
    }
}
```
        Manager KillClover
          Enable = False
          Crop = [AGPWhiteClover]
```csharp
using APSIM.Shared.Utilities;
using Models.Utilities;
using Models.Soils;
using Models.PMF;
using Models.Core;
using System;
using System.Linq;

namespace Models
{
    [Serializable] 
    public class Script : Model
    {
        [Description("Enable this action?")] public bool Enable { get; set; }
        [Description("Pasture component to kill")] public IPlant Crop { get; set; }
        
        [EventSubscribe("StartOfSimulation")]
        private void OnDoManagement(object sender, EventArgs e)
        {
                if (Enable) 
                    Crop.EndCrop();
        }
    }
}
```
        Irrigation
        Fertiliser
        Soil VL: SoilType=NZ_Sedimentary; LocalName=Lismore; Site=Winchmore; NearestTown=Ashburton; Region=Canterbury; Country=New Zealand; Latitude=-48.48; Longitude=0
          Chemical: Thickness=[150, 150, 200, 150, 250, 300, 300]; PH=[6, 6, 6, 6, 6, 6, 6]; PHUnits=Water
          Physical: same as ExpRange.Factors.Permutation.SystemType.C.VL.Physical
          WaterBalance SoilWater: same as ExpRange.Factors.Permutation.SystemType.C.VL.SoilWater
          Nutrient
          Organic: same as ExpRange.Factors.Permutation.SystemType.C.VL.Organic
          Water: Thickness=[150, 150, 200, 150, 250, 300, 300]; InitialValues=[0.245, 0.216, 0.145, 0.048, 0.029, 0.029, 0.029]; InitialPAWmm=64.75; RelativeTo=LL15; FilledFromTop=false
          Swim3 (disabled): Salb=0.13; CN2Bare=0; CNRed=0; CNCov=0.8; KDul=1; PSIDul=-100; VC=true; DTMin=0; DTMax=30; MaxWaterIncrement=5; SpaceWeightingFactor=0; SoluteSpaceWeightingFactor=1; Dis=0; Disp=1; A=2; DTHC=0.1; DTHP=2; Diagnostics=false
          CERESSoilTemperature Temperature
          SolutePatch NO3: same as ExpRange.Factors.Permutation.SystemType.A.HE.NO3
          SolutePatch NH4: same as ExpRange.Factors.Permutation.SystemType.A.HE.NH4
          SolutePatch Urea: same as ExpRange.Factors.Permutation.SystemType.A.HE.Urea
          NutrientPatchManager: MaximumNitrogenAvailableToPlants=3; NPartitionApproach=0; AutoAmalgamationApproach=0; basePatchApproach=0; AllowPatchAmalgamationByAge=false; PatchAgeForForcedMerge=0; LayerForNPartition=-99
        SurfaceOrganicMatter: InitialResidueName=grass; InitialResidueType=grass; InitialResidueMass=0; InitialStandingFraction=0; InitialCPR=0; InitialCNR=15
        PastureSpecies AGPRyegrass: doyGermination=275; daysEmergenceToAnthesis=120; daysAnthesisToMaturity=85; degreesDayForAnthesis=1100; degreesDayForMaturity=900; daysAnnualsFactor=45; InitialShootDM=1500; InitialRootDM=450; InitialRootDepth=750; initialDMFractionsGrasses=[0.15, 0.25, 0.25, 0.05, 0.05, 0.1, 0.1, 0.05, 0, 0, 0]; initialDMFractionsForbs=[0.2, 0.2, 0.15, 0.05, 0.1, 0.15, 0.1, 0.05, 0, 0, 0]; PhotosyntheticEfficiency=0.01; PhotosynthesisCurveFactor=0.8; FractionPAR=0.5; ReferenceCO2=380; CO2EffectScaleFactor=700; CO2EffectOffsetFactor=600; CO2EffectMinimum=0.7; CO2EffectExponent=2; ReproSeasonDurationCoeff=2; ReproSeasonShouldersLengthFactor=1; ReproSeasonOnsetDurationFactor=0.6; RelativeTurnoverEmerging=2; DetachmentDroughtCoefficient=3; DetachmentDroughtEffectMin=0.1; TurnoverStockFactor=0.01; TurnoverDefoliationEffectMin=0.025; MinimumGreenLeafProp=0.8; MinimumGreenRootProp=0.5
          initialDMFractionsLegumes=[0.16, 0.23, 0.22, 0.05, 0.03, 0.05, 0.05, 0.01, 0.04, 0.08, 0.08]
          LinearInterpolationFunction FVPDFunction
        PastureSpecies AGPWhiteClover: doyGermination=275; daysEmergenceToAnthesis=120; daysAnthesisToMaturity=85; degreesDayForAnthesis=1100; degreesDayForMaturity=900; daysAnnualsFactor=45; InitialShootDM=500; InitialRootDM=150; InitialRootDepth=350; initialDMFractionsGrasses=[0.15, 0.25, 0.25, 0.05, 0.05, 0.1, 0.1, 0.05, 0, 0, 0]; initialDMFractionsForbs=[0.2, 0.2, 0.15, 0.05, 0.1, 0.15, 0.1, 0.05, 0, 0, 0]; PhotosyntheticEfficiency=0.01; PhotosynthesisCurveFactor=0.8; FractionPAR=0.5; ReferenceCO2=380; CO2EffectScaleFactor=700; CO2EffectOffsetFactor=600; CO2EffectMinimum=0.7; CO2EffectExponent=2; ReproSeasonDurationCoeff=2; ReproSeasonShouldersLengthFactor=1; ReproSeasonOnsetDurationFactor=0.6; RelativeTurnoverEmerging=2; DetachmentDroughtCoefficient=3; DetachmentDroughtEffectMin=0.1; TurnoverStockFactor=0.01; TurnoverDefoliationEffectMin=0.025; MinimumGreenLeafProp=0.8; MinimumGreenRootProp=0.5
          initialDMFractionsLegumes=[0.16, 0.23, 0.22, 0.05, 0.03, 0.05, 0.05, 0.01, 0.04, 0.08, 0.08]
          LinearInterpolationFunction FVPDFunction
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