Simulations: Version=20
  DataStore
    ExcelInput: FileName=Observed.xlsx; SheetNames=[Observed]
    PredictedObserved: PredictedTableName=ReportExp; ObservedTableName=Observed; FieldNameUsedForMatch=Date
      Tests: POName=PredictedObserved
        AcceptedStats:
          Name                   n     RMSE  ME  MAE  Slope  Intercept  SEslope  SEintercept  R2  NSE  RSR
          dltDenitrifiedN        3840  0     0   0    -      -          -        -            -   -    -
          dltHydrolisedN         3840  0     0   0    -      -          -        -            -   -    -
          dltMineralisedSoilN    3840  0     0   0    -      -          -        -            -   -    -
          dltMineralisedSurfOMN  3840  0     0   0    -      -          -        -            -   -    -
          dltNitrifiedN          3840  0     0   0    -      -          -        -            -   -    -
          dltSoilDenit           3840  0     0   0    -      -          -        -            -   -    -
          dltSoilNO3             3840  0     0   0    -      -          -        -            -   -    -
          dltTotalFOMC           3840  0     0   0    -      -          -        -            -   -    -
          dltTotalFOMN           3840  0     0   0    -      -          -        -            -   -    -
          dltTotalHumicC         3840  0     0   0    -      -          -        -            -   -    -
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        AcceptedStatsName=Name n Slope Intercept SEslope SEintercept R2 RMSE NSE ME MAE RSR
  Folder DifferenceTesting
    Experiment
      Factors
        Factor Fert: Specifications=[FertiliserSchedule]
          Operations None
            1981-01-10  [Fertiliser].Apply(0, Fertiliser.Types.NO3N, 30);
          Operations NO3
            1981-01-10  [Fertiliser].Apply(100, Fertiliser.Types.NO3N, 30);
          Operations NH4
            1981-01-10  [Fertiliser].Apply(100, Fertiliser.Types.NH4N, 30);
          Operations Urea
            1981-01-10  [Fertiliser].Apply(100, Fertiliser.Types.Urea, 30);
        Factor SurfaceOM: Specifications=[SurfaceOrganicMatter]
          SurfaceOrganicMatter On: PoolName=wheat_stubble; type=wheat; mass=500; standing_fraction=0; cnr=10; CriticalResidueWeight=2000; OptimumDecompTemp=20; MaxCumulativeEOS=20; CNRatioDecompCoeff=0.277; CNRatioDecompThreshold=25; TotalLeachRain=25; MinRainToLeach=10; CriticalMinimumOrganicC=0.004; DefaultCPRatio=0; DefaultStandingFraction=0; StandingExtinctCoeff=0.5; FractionFaecesAdded=0.5
            Pools:
              {PoolName=wheat_stubble, ResidueType=wheat, Mass=500, CNRatio=10, StandingFraction=0}
            ResidueTypes: LoadFromResource=ResidueTypes
          SurfaceOrganicMatter Off: PoolName=wheat_stubble; type=wheat; mass=0; standing_fraction=0; cnr=10; CriticalResidueWeight=2000; OptimumDecompTemp=20; MaxCumulativeEOS=20; CNRatioDecompCoeff=0.277; CNRatioDecompThreshold=25; TotalLeachRain=25; MinRainToLeach=10; CriticalMinimumOrganicC=0.004; DefaultCPRatio=0; DefaultStandingFraction=0; StandingExtinctCoeff=0.5; FractionFaecesAdded=0.5
            Pools:
              {PoolName=wheat_stubble, ResidueType=wheat, Mass=0, CNRatio=10, StandingFraction=0}
            ResidueTypes: LoadFromResource=ResidueTypes
        Factor SoilOM: Specifications=[SoilOrganicMatter]
          SoilOrganicMatter On: RootCN=40; RootWt=0; SoilCN=12; EnrACoeff=7.4; EnrBCoeff=0.2; OCUnits=Total
            Thickness  OC  FBiom  FInert
            150        5   0.04   0.4
            150        3   0.02   0.6
            300        2   0.02   0.8
            300        1   0.02   1
            300        0   0.01   1
            300        0   0.01   1
            300        0   0.01   1
          SoilOrganicMatter Off: RootCN=40; RootWt=0; SoilCN=12; EnrACoeff=7.4; EnrBCoeff=0.2; OCUnits=Total
            Thickness  OC  FBiom  FInert
            150        0   0.04   0.4
            150        0   0.02   0.6
            300        0   0.02   0.8
            300        0   0.02   1
            300        0   0.01   1
            300        0   0.01   1
            300        0   0.01   1
        Factor Plant: Specifications=[KillPlants]
          Manager On
            killPlants = False
```csharp
using System;
using Models.Core;
using Models.Soils;
using Models.PMF;
using Models.Zones;
using Models.AgPasture;
using System.Xml.Serialization;
using Models.Soils;
using APSIM.Shared.Utilities;
using System.Collections.Generic;


namespace Models
{
	[Serializable]
	[System.Xml.Serialization.XmlInclude(typeof(Model))]
	public class Script : Model
	{
		[Link] Clock Clock;
		[Link] AgPasture.Sward Pasture;

		[Description("Kill all plants (True/False)")]
		public bool killPlants { get; set; }

		[EventSubscribe("DoDailyInitialisation")]
		private void OnDoDailyInitialisation(object sender, EventArgs e)
		{	
			bool isEndOfMonth = false;

			if (Clock.Today == Clock.StartDate)
			{
				if (killPlants)
				{
					Pasture.KillCrop(1);
					Pasture.EndCrop();
				}
			}					   		
		}
	}
}
```
          Manager Off
            killPlants = True
            script: same as in DifferenceTesting.Experiment.Factors.Plant.On
      Simulation Diffs
        Clock: StartDate=1981-01-01; EndDate=1981-04-30
        Summary SummaryFile
        Weather: FileName=WinchmoreMet.met
        SoilArbitrator Soil Arbitrator
        Manager Reporting
```csharp
using System;
using Models.Core;
using Models.Soils;
using Models.PMF;
using Models.Zones;
using Models.AgPasture;
using System.Xml.Serialization;
using System.IO;
using Models.Soils;
using APSIM.Shared.Utilities;
using System.Collections.Generic;


namespace Models
{
	[Serializable]
	[System.Xml.Serialization.XmlInclude(typeof(Model))]
	public class Script : Model
	{
		[Link] Clock Clock;
		[Link] Soil soil;
		[Link] Zone zone;
		[Link] ISummary summary = null;
		[Link] AgPasture.Sward Pasture;
		
				
		[XmlIgnore] public double[] TotalWater { get; set; }
		[XmlIgnore] public double[] DenitrifiedN { get; set; }
		//[XmlIgnore] public double[] LeachedN  { get; set; }
		[XmlIgnore] public double[] MineralisedSoilN  { get; set; }
		[XmlIgnore] public double[] MineralisedSurfOMN  { get; set; }

		//[XmlIgnore] public double[] SoilNContent  { get; set; }
		[XmlIgnore] public double[] TotalUrea { get; set; }
		[XmlIgnore] public double[] TotalNH4 { get; set; }
		[XmlIgnore] public double[] TotalNO3 { get; set; }

		[XmlIgnore] public double[] TotalFOMN { get; set; }
		[XmlIgnore] public double[] TotalHumicN { get; set; }

		[XmlIgnore] public double[] TotalMicrobialN { get; set; }
		[XmlIgnore] public double[] HydrolisedN { get; set; }
		[XmlIgnore] public double[] NitrifiedN { get; set; }
		[XmlIgnore] public double[] TotalFOMC { get; set; }
		[XmlIgnore] public double[] TotalHumicC { get; set; }
		[XmlIgnore] public double[] TotalMicrobialC { get; set; }

		//[XmlIgnore] public double[] SoilAtmC { get; set; }
		[XmlIgnore] public double[] SoilNO3 { get; set; }
		[XmlIgnore] public double[] SoilDenit { get; set; }


		[XmlIgnore] public double[] TotalWt { get; set; }




		double[] tmpTotalWater;
		double[] tmpMineralisedN;
		double[] tmpDenitrifiedN;
		double[] tmpLeachedN;
		double[] tmpMineralisedSoilN;
		double[] tmpMineralisedSurfOMN;
		double[] tmpSoilNContent;
		double[] tmpTotalUrea;
		double[] tmpTotalNH4;
		double[] tmpTotalNO3;
		double[] tmpTotalFOMN;
		double[] tmpTotalHumicN;
		double[] tmpTotalMicrobialN;
		double[] tmpHydrolisedN;
		double[] tmpNitrifiedN;
		double[] tmpTotalFOMC;
		double[] tmpTotalHumicC;
		double[] tmpTotalMicrobialC;
		double[] tmpSoilAtmC;
		double[] tmpSoilNO3;
		double[] tmpSoilDenit;
		double[] tmpTotalWt;

		private List<IModel> zones;

		private double sum(double[] inarr)
		{
			double total = 0;
			for (int x = 0; x < inarr.Length; x++)
			{
				total += inarr[x];
			}			
			return(total);
		}

		[EventSubscribe("Commencing")]
		private void OnSimulationCommencing(object sender, EventArgs e)
		{	
			zones = Apsim.FindAll(this, typeof(Zone));
			
			Array.Resize(ref tmpMineralisedN, zones.Count);					
			Array.Resize(ref tmpTotalWater, zones.Count); 
			Array.Resize(ref tmpDenitrifiedN, zones.Count); 
			//Array.Resize(ref tmpLeachedN, zones.Count); 
			Array.Resize(ref tmpMineralisedSoilN, zones.Count); 
			Array.Resize(ref tmpMineralisedSurfOMN, zones.Count);
			//Array.Resize(ref tmpSoilNContent, zones.Count); 
			Array.Resize(ref tmpTotalUrea, zones.Count); 
			Array.Resize(ref tmpTotalNH4, zones.Count); 
			Array.Resize(ref tmpTotalNO3, zones.Count); 
			Array.Resize(ref tmpTotalFOMN, zones.Count); 
			Array.Resize(ref tmpTotalHumicN, zones.Count); 
			Array.Resize(ref tmpTotalMicrobialN, zones.Count); 
			Array.Resize(ref tmpHydrolisedN, zones.Count); 
			Array.Resize(ref tmpNitrifiedN, zones.Count); 
			Array.Resize(ref tmpTotalFOMC, zones.Count); 
			Array.Resize(ref tmpTotalHumicC, zones.Count); 
			Array.Resize(ref tmpTotalMicrobialC, zones.Count); 
			//Array.Resize(ref tmpSoilAtmC, zones.Count); 
			Array.Resize(ref tmpSoilNO3, zones.Count);
			Array.Resize(ref tmpSoilDenit, zones.Count);			
			
			
			Array.Resize(ref tmpTotalWt, zones.Count);			

			// if the outputs are queried before DoReport is run they will be uninitialised
			// so assign them to the tmp results now (all zeros)		
			MineralisedSoilN = tmpMineralisedSoilN;
			TotalWater = tmpTotalWater; 
			DenitrifiedN = tmpDenitrifiedN; 
			MineralisedSurfOMN = tmpMineralisedSurfOMN;
			TotalUrea = tmpTotalUrea; 
			TotalNH4 = tmpTotalNH4; 
			TotalNO3 = tmpTotalNO3; 
			TotalFOMN = tmpTotalFOMN; 
			TotalHumicN = tmpTotalHumicN; 
			TotalMicrobialN = tmpTotalMicrobialN; 
			HydrolisedN = tmpHydrolisedN; 
			NitrifiedN = tmpNitrifiedN; 
			TotalFOMC = tmpTotalFOMC; 
			TotalHumicC = tmpTotalHumicC; 
			TotalMicrobialC = tmpTotalMicrobialC; 
			SoilNO3 = tmpSoilNO3;
			SoilDenit = tmpSoilDenit; 
			TotalWt = tmpTotalWt;

		}

		[EventSubscribe("DoReport")]
		private void OnEndOfDay(object sender, EventArgs e)
		{
			zones = Apsim.FindAll(this, typeof(Zone));	
			for (int x = 0; x < zones.Count; x++)
			{
				Soil soil = Apsim.Find(zone, typeof(Soil)) as Soil;								
				tmpTotalWater[x] = sum(soil.SoilWater.SWmm);
				
				tmpMineralisedN[x] = sum(soil.SoilNitrogen.MineralisedN);
				tmpDenitrifiedN[x] = sum(soil.SoilNitrogen.Denitrification);
				//tmpLeachedN[x] = sum();
				tmpMineralisedSoilN[x] = sum(soil.SoilNitrogen.MineralisedN);
				tmpMineralisedSurfOMN[x] = sum(soil.SoilNitrogen.dlt_n_min_res);
				//tmpSoilNContent[x] = sum();
				tmpTotalUrea[x] = sum(soil.SoilNitrogen.urea);
				tmpTotalNH4[x] = sum(soil.SoilNitrogen.NH4);
				tmpTotalNO3[x] = sum(soil.SoilNitrogen.NO3);
				tmpTotalFOMN[x] = sum(soil.SoilNitrogen.FOMN);
				tmpTotalHumicN[x] = sum(soil.SoilNitrogen.HumicN);
				tmpTotalMicrobialN[x] = sum(soil.SoilNitrogen.MicrobialN);
				tmpHydrolisedN[x] = sum(soil.SoilNitrogen.dlt_urea_hydrol);
				tmpNitrifiedN[x] = sum(soil.SoilNitrogen.Nitrification);
				tmpTotalFOMC[x] = sum(soil.SoilNitrogen.FOMC);
				tmpTotalHumicC[x] = sum(soil.SoilNitrogen.HumicC);
				tmpTotalMicrobialC[x] = sum(soil.SoilNitrogen.MicrobialC);
				//tmpSoilAtmC[x] = sum();
				tmpSoilNO3[x] = sum(soil.SoilNitrogen.NO3);
				tmpSoilDenit[x] = sum(soil.SoilNitrogen.Denitrification);				
				tmpTotalWt[x] = Pasture.TotalWt;
			}			
			
			
			//PreHarvestDM = Pasture.StandingHerbageWt;
			//existingDM = Pasture.HarvestableWt;

			MineralisedSoilN = tmpMineralisedSoilN;
			TotalWater = tmpTotalWater;
			DenitrifiedN = tmpDenitrifiedN;
			//LeachedN = tmpLeachedN;
			MineralisedSurfOMN = tmpMineralisedSurfOMN;
			//SoilNContent = tmpSoilNContent;
			TotalUrea = tmpTotalUrea;
			TotalNH4 = tmpTotalNH4;
			TotalNO3 = tmpTotalNO3;
			TotalFOMN = tmpTotalFOMN;
			TotalHumicN = tmpTotalHumicN;
			TotalMicrobialN = tmpTotalMicrobialN;
			HydrolisedN = tmpHydrolisedN;
			NitrifiedN = tmpNitrifiedN;
			TotalFOMC = tmpTotalFOMC;
			TotalHumicC = tmpTotalHumicC;
			TotalMicrobialC = tmpTotalMicrobialC;
			//SoilAtmC = tmpSoilAtmC;
			SoilNO3 = tmpSoilNO3;
			SoilDenit = tmpSoilDenit;						
			TotalWt = tmpTotalWt;
		}

	}
}
```
        Report ReportExp: EventNames=[Clock].EndOfDay
          VariableNames:
            [Clock].Today as Date
            ([Reporting]Script.TotalWater[2]-[Reporting]Script.TotalWater[1]) as dltTotalWater
            ([Reporting]Script.DenitrifiedN[2]-[Reporting]Script.DenitrifiedN[1]) as dltDenitrifiedN
            ([Reporting]Script.MineralisedSoilN[2]-[Reporting]Script.MineralisedSoilN[1]) as dltMineralisedSoilN
            ([Reporting]Script.MineralisedSurfOMN[2]-[Reporting]Script.MineralisedSurfOMN[1]) as dltMineralisedSurfOMN
            ([Reporting]Script.TotalUrea[2]-[Reporting]Script.TotalUrea[1]) as dltTotalUrea
            ([Reporting]Script.TotalNH4[2]-[Reporting]Script.TotalNH4[1]) as dltTotalNH4
            ([Reporting]Script.TotalNO3[2]-[Reporting]Script.TotalNO3[1]) as dltTotalNO3
            ([Reporting]Script.TotalFOMN[2]-[Reporting]Script.TotalFOMN[1]) as dltTotalFOMN
            ([Reporting]Script.TotalHumicN[2]-[Reporting]Script.TotalHumicN[1]) as dltTotalHumicN
            ([Reporting]Script.TotalMicrobialN[2]-[Reporting]Script.TotalMicrobialN[1]) as dltTotalMicrobialN
            ([Reporting]Script.HydrolisedN[2]-[Reporting]Script.HydrolisedN[1]) as dltHydrolisedN
            ([Reporting]Script.NitrifiedN[2]-[Reporting]Script.NitrifiedN[1]) as dltNitrifiedN
            ([Reporting]Script.TotalFOMC[2]-[Reporting]Script.TotalFOMC[1]) as dltTotalFOMC
            ([Reporting]Script.TotalHumicC[2]-[Reporting]Script.TotalHumicC[1]) as dltTotalHumicC
            ([Reporting]Script.TotalMicrobialC[2]-[Reporting]Script.TotalMicrobialC[1]) as dltTotalMicrobialC
            ([Reporting]Script.SoilNO3[2]-[Reporting]Script.SoilNO3[1]) as dltSoilNO3
            ([Reporting]Script.SoilDenit[2]-[Reporting]Script.SoilDenit[1]) as dltSoilDenit
            ([Reporting]Script.SoilDenit[2]-[Reporting]Script.SoilDenit[1]) as dltSoilDenit
            ([Reporting]Script.TotalWt[2]-[Reporting]Script.TotalWt[1]) as dltTotalWt
            [Reporting]Script.DenitrifiedN[1]
            [Reporting]Script.DenitrifiedN[2]
            [Reporting]Script.MineralisedSoilN[1]
            [Reporting]Script.MineralisedSoilN[2]
            [Reporting]Script.MineralisedSurfOMN[1]
            [Reporting]Script.MineralisedSurfOMN[2]
            [Reporting]Script.TotalUrea[1]
            [Reporting]Script.TotalUrea[2]
            [Reporting]Script.TotalNH4[1]
            [Reporting]Script.TotalNH4[2]
            [Reporting]Script.TotalNO3[1]
            [Reporting]Script.TotalNO3[2]
            [Reporting]Script.TotalFOMN[1]
            [Reporting]Script.TotalFOMN[2]
            [Reporting]Script.TotalHumicN[1]
            [Reporting]Script.TotalHumicN[2]
            [Reporting]Script.TotalMicrobialN[1]
            [Reporting]Script.TotalMicrobialN[2]
            [Reporting]Script.HydrolisedN[1]
            [Reporting]Script.HydrolisedN[2]
            [Reporting]Script.NitrifiedN[1]
            [Reporting]Script.NitrifiedN[2]
            [Reporting]Script.TotalFOMC[1]
            [Reporting]Script.TotalFOMC[2]
            [Reporting]Script.TotalHumicC[1]
            [Reporting]Script.TotalHumicC[2]
            [Reporting]Script.TotalMicrobialC[1]
            [Reporting]Script.TotalMicrobialC[2]
            [Reporting]Script.SoilNO3[1]
            [Reporting]Script.SoilNO3[2]
            [Reporting]Script.SoilDenit[1]
            [Reporting]Script.SoilDenit[2]
            [Reporting]Script.TotalWt[1]
            [Reporting]Script.TotalWt[2]
        Zone 1Patch: Area=1; Slope=0
          Fertiliser
          Soil: ASCOrder=Vertosol; ASCSubOrder=Black; SoilType=Clay; Site=Norwin; NearestTown=Norwin; Region=Darling Downs and Granite Belt; State=Queensland; Country=Australia; NaturalVegetation=Qld. Bluegrass, possible Qld. Blue gum; ApsoilNumber=900; Latitude=-27.581836; Longitude=151.320206; LocationAccuracy=+/- 20m
            DataSource=CSIRO Sustainable Ecosystems, Toowoomba; Characteriesd as part of the GRDC funded project"Doing it better, doing it smarter, managing soil water in Australian agriculture' 2011
            Comments=OC, CLL for all crops estimated-based on Bongeen Mywybilla Soil No1
            Water
              Thickness  BD       AirDry    LL15      DUL       SAT       KS
              150        1.01056  0.13025   0.2605    0.521     0.588655  20
              150        1.07146  0.198689  0.248362  0.496723  0.565677  20
              300        1.09394  0.28      0.28      0.488438  0.557193  20
              300        1.15861  0.28      0.28      0.480297  0.532787  20
              300        1.17301  0.28      0.28      0.471584  0.527354  20
              300        1.16287  0.28      0.28      0.457071  0.53118   20
              300        1.1875   0.28      0.28      0.452332  0.521888  20
              SoilCrop WhiteCloverSoil: LL=[0.261, 0.248, 0.28, 0.306, 0.36, 0.392, 0.446]; KL=[0.06, 0.06, 0.06, 0.04, 0.04, 0.02, 0.01]; XF=[1, 1, 1, 1, 1, 1, 1]
              SoilCrop RyegrassSoil: LL=[0.261, 0.248, 0.28, 0.306, 0.36, 0.392, 0.446]; KL=[0.06, 0.06, 0.06, 0.04, 0.04, 0.02, 0.01]; XF=[1, 1, 1, 1, 1, 1, 1]
            SoilWater: SummerDate=1-Nov; SummerU=5; SummerCona=5; WinterDate=1-Apr; WinterU=5; WinterCona=5; DiffusConst=40; DiffusSlope=16; Salb=0.12; CN2Bare=73; CNRed=20; CNCov=0.8; max_pond=0; Thickness=[150, 150, 300, 300, 300, 300, 300]; SWCON=[0.3, 0.3, 0.3, 0.3, 0.3, 0.3, 0.3]; residueinterception=0
            SoilNitrogen: fom_type=[default, manure, mucuna, lablab, shemp, stable]; fract_carb=[0.2, 0.3, 0.54, 0.57, 0.45, 0]; fract_cell=[0.7, 0.3, 0.37, 0.37, 0.47, 0.1]; fract_lign=[0.1, 0.4, 0.09, 0.06, 0.08, 0.9]
            SoilOrganicMatter: same as DifferenceTesting.Experiment.Factors.SoilOM.Off
            Analysis: Thickness=[150, 150, 300, 300, 300, 300, 300]; PH=[8, 8, 8, 8, 8, 8, 8]; PHUnits=Water; BoronUnits=HotWater
            InitialWater: PercentMethod=EvenlyDistributed; FractionFull=1
            Sample InitialN: NO3Units=ppm; NH4Units=ppm; SWUnits=Volumetric; OCUnits=Total; PHUnits=Water
              Thickness  NO3  NH4
              150        0    0
              150        0    0
              300        0    0
              300        0    0
              300        0    0
              300        0    0
              300        0    0
            CERESSoilTemperature
          SurfaceOrganicMatter: same as DifferenceTesting.Experiment.Factors.SurfaceOM.Off
          MicroClimate: a_interception=0; b_interception=1; c_interception=0; d_interception=0; soil_albedo=0.3; sun_angle=15; soil_heat_flux_fraction=0.4; night_interception_fraction=0.5; refheight=2; albedo=0.15; emissivity=0.96; RadIntTotal=0
          SoluteManager
          Manager CreatePatches
            Verbose = True
            NumPatches = 1
```csharp
using System;
using Models.Core;
using Models.Soils;
using Models.PMF;
using Models.Zones;
using Models.AgPasture;
using System.Xml.Serialization;
using Models.Soils;
using APSIM.Shared.Utilities;
using System.Collections.Generic;


namespace Models
{
	[Serializable]
	[System.Xml.Serialization.XmlInclude(typeof(Model))]
	public class Script : Model
	{
		[Link] Clock Clock;
		[Link] Soil soil;
		[Link] ISummary summary = null;
		[Link] Weather Weather;
		[Link] Zone zone;

		[Description("Verbose reporting mode (True/False)")]
		public bool Verbose { get; set; }
		
		[Description("How many patches should there be in the grid?")]
		public int NumPatches { get; set; }

		
		private List<IModel> zones;
		public event AddSoilCNPatchDelegate AddSoilCNPatch;

		[EventSubscribe("DoDailyInitialisation")]
		private void OnDoDailyInitialisation(object sender, EventArgs e)
		{	
			bool isEndOfMonth = false;
			if (Clock.Today.AddDays(1).Day == 1)
				isEndOfMonth = true;

			if (Clock.Today == Clock.StartDate)
			{
				

				
				if (Verbose)
				{
					
					summary.WriteMessage(this, "NumPatches at start:" + soil.SoilNitrogen.PatchCount.ToString());					
				}
				
				soil.SoilNitrogen.MaximumNitrogenAvailableToPlants = 3.0;
				soil.SoilNitrogen.NPartitionApproach = "BasedOnConcentrationAndDelta";
				soil.SoilNitrogen.AllowPatchAutoAmalgamation = "No";
				soil.SoilNitrogen.AutoAmalgamationApproach = "CompareAll";
				soil.SoilNitrogen.basePatchApproach = "IDBased";
				soil.SoilNitrogen.AllowPatchAmalgamationByAge = "No";
				soil.SoilNitrogen.PatchAgeForForcedMerge = 3.0;								
				
				int[] PatchToAddTo = new int[1];  //need an array variable for this
				string[] PatchNmToAddTo = new string[1];  
				int nPatchesAdded = 0;
				double NewArea = 1.0 / NumPatches;

				while (nPatchesAdded < NumPatches - 1)
				{
					AddSoilCNPatchType NewPatch = new AddSoilCNPatchType();
					NewPatch.DepositionType = "ToNewPatch";
					NewPatch.AreaFraction = NewArea;
					PatchToAddTo[0] = 0;
					PatchNmToAddTo[0] = "0";
					NewPatch.AffectedPatches_id = PatchToAddTo;
					NewPatch.AffectedPatches_nm = PatchNmToAddTo;
					NewPatch.SuppressMessages = "yes";
					AddSoilCNPatch.Invoke(NewPatch);
					nPatchesAdded += 1;
				}				
				if (Verbose)
					summary.WriteMessage(this, "NumPatches at end of initialisation:" + soil.SoilNitrogen.PatchCount.ToString());
			}					   
		
		}
	}
}
```
          Manager KillPlants: same as DifferenceTesting.Experiment.Factors.Plant.On
          Operations FertiliserSchedule
            1981-01-10  [Fertiliser].Apply(0, Fertiliser.Types.NO3N, 30);
          Sward: ControlledBySward=yes; WaterUptakeSource=soilarbitrator; NUptakeSource=soilarbitrator
            PastureSpecies Ryegrass: MaximumNUptake=10; Albedo=0.26; Gsmax=0.011; R50=200; SpeciesFamily=Grass; PhotosyntheticPathway=C3; InitialShootDM=1500; InitialRootDM=450; InitialRootDepth=750; ReferencePhotosyntheticRate=1; LightExtinctionCoefficient=0.5; GrowthTminimum=1; GrowthToptimum=20; GrowthTEffectExponent=1.7; UseHeatStressFactor=yes; HeatOnsetTemperature=28; HeatFullTemperature=35; HeatRecoverySumDD=30; HeatRecoveryTReference=25; UseColdStressFactor=yes; ColdOnsetTemperature=1; ColdFullTemperature=-5; ColdRecoverySumDD=25; ColdRecoveryTReference=0; MaintenanceRespirationCoefficient=0.03; GrowthRespirationCoefficient=0.25; RespirationTReference=20; RespirationExponent=1.5; NThresholdsForLeaves=[0.04, 0.012, 0.05]; NThresholdsForStems=[0.02, 0.006, 0.025]; NThresholdsForStolons=[0, 0, 0]; NThresholdsForRoots=[0.02, 0.006, 0.025]; DegreesDayForGermination=125; TargetShootRootRatio=4; MaxRootAllocation=0.25; ShootRootGlfFactor=0.5; UseReproSeasonFactor=yes; ReproSeasonReferenceLatitude=41; ReproSeasonTimingCoeff=0.14; ReproSeasonMaxAllocationIncrease=0.5; ReproSeasonAllocationCoeff=0.1; FractionLeafMaximum=0.7; FractionLeafMinimum=0.7; FractionLeafDMThreshold=500; FractionLeafDMFactor=2000; FractionLeafExponent=3; FractionToStolon=0; SpecificLeafArea=25; SpecificRootLength=100; StolonEffectOnLAI=0; ShootMaxEffectOnLAI=1000; MaxStemEffectOnLAI=1; LiveLeavesPerTiller=3; TissueTurnoverRateShoot=0.05; TissueTurnoverRateRoot=0.02; DetachmentRateShoot=0.08; TurnoverTemperatureMin=2; TurnoverTemperatureRef=20; TurnoverTemperatureExponent=1; TurnoverDroughtEffectMax=1; TurnoverDroughtThreshold=0.5; TurnoverDefoliationCoefficient=0.5; TurnoverDefoliationRootEffect=0.1; FractionNLuxuryRemobilisable=[0.1, 0.1, 0.1]; MinimumNFixation=0; MaximumNFixation=0; SoilSaturationEffectMax=0.1; MinimumWaterFreePorosity=-1; SoilSaturationRecoveryFactor=0.25; NDillutionCoefficient=0.25; GlfGeneric=1; GlfSoilFertility=1; PlantHeightMinimum=25; PlantHeightMaximum=600; PlantHeightMassForMax=10000; PlantHeightExponent=2.8; RootDepthMinimum=50; RootDepthMaximum=750; RootElongationRate=25; RootDistributionDepthParam=90; RootDistributionExponent=3.2; DigestibilitiesCellWall=[0.6, 0.6, 0.6, 0.2]; MinimumGreenWt=100; FractionStolonStanding=0; PreferenceForGreenOverDead=1; PreferenceForLeafOverStems=1; WaterAvailableMethod=DefaultAPSIM; NitrogenAvailableMethod=BasicAgPasture
            PastureSpecies WhiteClover: MaximumNUptake=10; Albedo=0.26; Gsmax=0.011; R50=200; SpeciesFamily=Legume; PhotosyntheticPathway=C3; InitialShootDM=400; InitialRootDM=100; InitialRootDepth=350; ReferencePhotosyntheticRate=1; LightExtinctionCoefficient=0.8; GrowthTminimum=2; GrowthToptimum=22; GrowthTEffectExponent=1.7; UseHeatStressFactor=yes; HeatOnsetTemperature=30; HeatFullTemperature=36; HeatRecoverySumDD=20; HeatRecoveryTReference=25; UseColdStressFactor=yes; ColdOnsetTemperature=2; ColdFullTemperature=-5; ColdRecoverySumDD=30; ColdRecoveryTReference=0; MaintenanceRespirationCoefficient=0.04; GrowthRespirationCoefficient=0.25; RespirationTReference=20; RespirationExponent=1.5; NThresholdsForLeaves=[0.045, 0.02, 0.055]; NThresholdsForStems=[0.0225, 0.01, 0.0275]; NThresholdsForStolons=[0.0225, 0.01, 0.0275]; NThresholdsForRoots=[0.0225, 0.01, 0.0275]; DegreesDayForGermination=125; TargetShootRootRatio=4; MaxRootAllocation=0.25; ShootRootGlfFactor=0.5; UseReproSeasonFactor=yes; ReproSeasonReferenceLatitude=41; ReproSeasonTimingCoeff=0.14; ReproSeasonMaxAllocationIncrease=0.5; ReproSeasonAllocationCoeff=0.1; FractionLeafMaximum=0.56; FractionLeafMinimum=0.28; FractionLeafDMThreshold=500; FractionLeafDMFactor=2000; FractionLeafExponent=3; FractionToStolon=0.2; SpecificLeafArea=30; SpecificRootLength=45; StolonEffectOnLAI=0.3; ShootMaxEffectOnLAI=500; MaxStemEffectOnLAI=0.5; LiveLeavesPerTiller=3; TissueTurnoverRateShoot=0.05; TissueTurnoverRateRoot=0.02; DetachmentRateShoot=0.11; TurnoverTemperatureMin=2; TurnoverTemperatureRef=20; TurnoverTemperatureExponent=1; TurnoverDroughtEffectMax=1; TurnoverDroughtThreshold=0.5; TurnoverDefoliationCoefficient=0.5; TurnoverDefoliationRootEffect=0.1; FractionNLuxuryRemobilisable=[0.1, 0.1, 0.1]; MinimumNFixation=0.2; MaximumNFixation=0.6; SoilSaturationEffectMax=0.1; MinimumWaterFreePorosity=-1; SoilSaturationRecoveryFactor=0.25; NDillutionCoefficient=1; GlfGeneric=1; GlfSoilFertility=1; PlantHeightMinimum=25; PlantHeightMaximum=350; PlantHeightMassForMax=7500; PlantHeightExponent=2.5; RootDepthMinimum=30; RootDepthMaximum=350; RootElongationRate=25; RootDistributionDepthParam=70; RootDistributionExponent=2.5; DigestibilitiesCellWall=[0.6, 0.6, 0.6, 0.2]; MinimumGreenWt=50; FractionStolonStanding=0; PreferenceForGreenOverDead=1; PreferenceForLeafOverStems=1; WaterAvailableMethod=DefaultAPSIM; NitrogenAvailableMethod=BasicAgPasture
        Zone 10Patch: Area=1; Slope=0
          Fertiliser
          Soil: same as DifferenceTesting.Experiment.Diffs.1Patch.Soil
          SurfaceOrganicMatter: same as DifferenceTesting.Experiment.Factors.SurfaceOM.Off
          MicroClimate: a_interception=0; b_interception=1; c_interception=0; d_interception=0; soil_albedo=0.3; sun_angle=15; soil_heat_flux_fraction=0.4; night_interception_fraction=0.5; refheight=2; albedo=0.15; emissivity=0.96; RadIntTotal=0
          SoluteManager
          Manager CreatePatches
            Verbose = True
            NumPatches = 10
            script: same as in DifferenceTesting.Experiment.Diffs.1Patch.CreatePatches
          Manager KillPlants: same as DifferenceTesting.Experiment.Factors.Plant.Off
          Operations FertiliserSchedule
            1981-01-10  [Fertiliser].Apply(0, Fertiliser.Types.NO3N, 30);
          Sward: same as DifferenceTesting.Experiment.Diffs.1Patch.Sward
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