Simulations: Version=159
  DataStore
    ExcelInput: FileNames=[PatchyMcPatchFace.xlsx]; SheetNames=[Sheet1]
  Folder Replacements
    Manager AutomaticIrrigation
      allowIrrigation = True
      seasonStart = 1-sep
      seasonEnd = 30-mar
      seasonsAllocation = 10000
      triggerDeficit = 65
      targetDeficit = 95
      returndays = 3
      maximumAmount = 30
      depthPAWC = 300
```csharp
using Newtonsoft.Json;
using APSIM.Shared.Utilities;
using System.Xml.Serialization;
using Models.Soils;
using Models.PMF;
using Models.Core;
using System;
using Models.Interfaces;



        
namespace Models
{
    [Serializable] 
    [System.Xml.Serialization.XmlInclude(typeof(Model))]
    public class Script : Model
    {
        [Link] private ISummary summary;
        [Link] private Irrigation Irrigation;
        [Link] private Clock Clock;
        [Link] private Soil Soil;
        [Link(IsOptional = true)] private IPlant existingCrop;
        private DateTime StartDate;
        private DateTime EndDate;
        private double TopDUL;
        private double TopLL;
        private int nLayers;
        [Link]
        private IPhysical soilPhysical;
        [Link]
        private ISoilWater waterBalance;
        //Communication to other modules
       
        //User inputs from properties tab
        [Description("Turn irrigation on?")]
        public bool allowIrrigation { get; set; }
        [Description("Start of irrigation season (dd-MMM)")]
        public string seasonStart { get; set; }
        [Description("End of irrigation season (dd-MMM)")]
        public string seasonEnd { get; set; }
        [Description("Season allocation (mm)")]
        public double seasonsAllocation { get; set; }
        [Description("Deficit to trigger irrigation (% PAWC)")]
        public double triggerDeficit { get; set; }
        [Description("Deficit to stop irrigaton (% PAWC)")]
        public double targetDeficit { get; set; }
        [Description("Minimum days for irrigation to return")]
        public double returndays { get; set; }
        [Description("Maximum irrigation application (mm/day)")]
        public double maximumAmount { get; set; }
        [Description("Depth to calculate PAWC (mm)")]
        public double depthPAWC { get; set; }

        //Class members
        [JsonIgnore] public double TopSWdeficit { get; set; }
        [JsonIgnore] public double TopSWC { get; set; }
        [JsonIgnore] public double DaysSinceIrrigation { get; set; }
        [JsonIgnore] public double AmountToApply { get; set; }
        [JsonIgnore] public double SeasonAppliedAmount { get; set; }
        
        private bool IrrigationIsAllowed { get; set; }
        private bool SeasonIsOpen { get; set; }
        private bool CropIsActive { get; set; }
        private bool IrrigatorIsAvailable { get; set; }
        private bool SoilIsDry { get; set; }

    
        //Calculate static soil variables
        [EventSubscribe("StartOfSimulation")]
        private void OnStartOfSimulation(object sender, EventArgs e)
        {   
            //Set the season dates
            StartDate = DateTime.Parse(seasonStart + "-" + Clock.Today.Year.ToString());
            EndDate = DateTime.Parse(seasonEnd + "-" + Clock.Today.Year.ToString());
            
            //Can we irrigate at all?
            IrrigationIsAllowed = false; 
            if (allowIrrigation)
                IrrigationIsAllowed = true; 

            //Calculate soil water variables
            double depthFromSurface = 0.0;
            double fracLayer = 0.0;
            nLayers = soilPhysical.Thickness.Length;
            for (int layer = 0; layer < nLayers; layer++)
            {
                fracLayer = Math.Min(1.0, (depthPAWC - depthFromSurface) / soilPhysical.Thickness[layer]);
                TopLL += soilPhysical.LL15mm[layer] * fracLayer;
                TopDUL += soilPhysical.DULmm[layer] * fracLayer;
                depthFromSurface += soilPhysical.Thickness[layer];
                if (depthFromSurface >= depthPAWC)
                    layer = nLayers;
            }
        }
             
        //Determine daily requirement for irrigation
        [EventSubscribe("StartOfDay")]
        private void OnStartOfDay(object sender, EventArgs e)
        {
            //Can we irrigate today?          
            SeasonIsOpen = isBetween(Clock.Today, StartDate, EndDate);
            if (!SeasonIsOpen)
                SeasonAppliedAmount = 0;

            //Is there a crop in the ground that needs irrigation?
            CropIsActive = false;
            if ((existingCrop != null) && (existingCrop.IsAlive))
                CropIsActive = true;
            //if ((existingCrop.Phenology.Stage >= 3.0) && (existingCrop.Phenology.Stage < 6.0))
          
            //Is the irrigator available?
            IrrigatorIsAvailable = false;
            DaysSinceIrrigation += 1;
            if (DaysSinceIrrigation >= returndays)
                IrrigatorIsAvailable = true;
          
            //Is the soil dry enough to require irrigation?
            SoilIsDry = false;
            double depthFromSurface = 0.0;
            double fracLayer = 0.0;
            TopSWC = 0.0;
            for (int layer = 0; layer < nLayers; layer++)
            //for (int layer = 0; depthFromSurface < depthPAWC + soilPhysical.Thickness[layer]; layer++)
            {
                fracLayer = Math.Min(1.0, (depthPAWC - depthFromSurface) / soilPhysical.Thickness[layer]);
                TopSWC += waterBalance.SWmm[layer] * fracLayer;
                depthFromSurface += soilPhysical.Thickness[layer];
                if (depthFromSurface >= depthPAWC)
                    layer = nLayers;
            }
            
            TopSWdeficit = TopSWC - TopDUL;
            if (Math.Max(0.0, -TopSWdeficit) >= (TopDUL - TopLL) * (100 - triggerDeficit) / 100)
                SoilIsDry = true;
                
            //Are all the conditions ratifying irrigation
            if (IrrigationIsAllowed && SeasonIsOpen && CropIsActive && IrrigatorIsAvailable && SoilIsDry)
            {
                //Lets bloody well irrigate then!!!!
                AmountToApply = TopDUL * targetDeficit / 100 - TopSWC;
                AmountToApply = Math.Max(0.0, Math.Min(AmountToApply, seasonsAllocation - SeasonAppliedAmount));
                AmountToApply = Math.Min(AmountToApply,maximumAmount);
                Irrigation.Apply(AmountToApply);
                DaysSinceIrrigation = 0;
                SeasonAppliedAmount += AmountToApply;
            }
        }
        
        ///Checks whether theDate is between iniDate and endDate (non-year specific)
        private bool isBetween(DateTime theDay, DateTime iniDate, DateTime endDate)
        {
            bool result = false;
            if (iniDate.DayOfYear < endDate.DayOfYear)
            {
                // period is within one year, ex: summer in the northern hemisphere
                if ((theDay.DayOfYear >= iniDate.DayOfYear) && (theDay.DayOfYear <= endDate.DayOfYear))
                    result = true;
            }
            else
            {
                // period goes over the end of the year, ex: summer in the southern hemisphere
                if ((theDay.DayOfYear >= iniDate.DayOfYear) || (theDay.DayOfYear <= endDate.DayOfYear))
                    result = true;
            }
            
            return result;
        }
    }
}
```
    Manager Irrigate on fixed dates
      IrrigateDates = 15-jan, 15-feb, 15-mar, 15-apr, 15-sep, 15-oct, 15-nov, 15-dec
      Amount = 50
      Depth = 0
      Efficiency = 1
      WillRunoff = False
```csharp
using Models.Soils;
using System;
using Models.Core;
using Models.PMF;
using APSIM.Shared.Utilities;
namespace Models
{
    [Serializable]
    public class Script : Model
    {
        [Link] Clock Clock;
        [Link] Irrigation Irrigation;
        
        [Separator("A component to apply irrigation on one or more dates on every year of the simulation")]

        [Description("Enter the irrigation dates as dd-mmm with comma separation (any year information entered will be ignored)")] 
        public string[] IrrigateDates { get; set; }
        
        [Description("Amount of irrigation to be applied (mm)")] 
        public double Amount { get; set; }
        
        [Description("Depth in the soil to apply the  irrigation (mm)")] 
        public double Depth { get; set; }
        
        [Description("Efficiency of irrigation (0-1)")] 
        public double Efficiency { get; set; }
        
        [Description("Will the irrigation runoff?")] 
        public bool WillRunoff { get; set; }
        
        [EventSubscribe("DoManagement")]
        private void OnDoManagement(object sender, EventArgs e)
        {
            foreach (string ddMMM in IrrigateDates)
            {
                if (DateUtilities.DatesEqual(ddMMM, Clock.Today))
                    Irrigation.Apply(amount: Amount, depth: Depth, efficiency: Efficiency, willRunoff: WillRunoff);
            }
        }
    }
}
```
    Manager Fertilise on fixed dates
      FertiliserType = UreaN
      FertiliserDates = 21-jan, 21-feb, 21-mar, 21-apr, 21-may, 21-jun, 21-jul, 21-aug, 21-sep, 21-oct, 21-nov, 21-dec
      Amount = 120
      AmountType = False
```csharp
using Models.Soils;
using System;
using Models.Core;
using Models.PMF;
using APSIM.Shared.Utilities;
namespace Models
{
    [Serializable]
    public class Script : Model
    {
        [Link] Clock Clock;
        [Link] Fertiliser Fertiliser;
        
        [Separator("A component to apply fertiliser on one or more dates on every year of the simulation")]

        [Description("Type of fertiliser to apply? ")] 
        public Fertiliser.Types FertiliserType { get; set; }

        [Description("Enter the fertilisation dates as dd-mmm with comma separation (any year information entered will be ignored): ")] 
        public string[] FertiliserDates { get; set; } 

        [Description("Amount of fertiliser to be applied (kg /ha)")] 
        public double Amount { get; set; }

        [Description("Is the above amount to be applied each time? (yes/ticked)? Or is it the total annual amount across all dates (no/unticked)")] 
        public bool AmountType { get; set; }
        
        [EventSubscribe("DoManagement")]
        private void OnDoManagement(object sender, EventArgs e)
        {
            foreach (string ddMMM in FertiliserDates)
            {
                if (DateUtilities.DatesEqual(ddMMM, Clock.Today))
                {
                    if (AmountType)
                        Fertiliser.Apply(Amount: Amount, Type: FertiliserType);
                    else
                        Fertiliser.Apply(Amount: Amount / FertiliserDates.Length, Type: FertiliserType);
                }
            }
        }
    }
}
```
    SimpleGrazing: GrazingRotationType=0; SimpleGrazingFrequencyString=0; SimpleMinGrazable=21; SimpleGrazingResidual=1000; FlexibleGrazePostDM=0; FractionDefoliatedNToSoil=[0]; FractionExcretedNToDung=[0.4]; DepthUrineIsAdded=200; FractionPopulationDecline=0; TramplingOn=false; MaximumPropLitterMovedToSoil=0.1; PastureConsumedAtMaximumRateOfLitterRemoval=1200
    SurfaceOrganicMatter: InitialResidueName=grass; InitialResidueType=grass; InitialResidueMass=0; InitialStandingFraction=0; InitialCPR=0; InitialCNR=15
      ResidueTypes
        ResidueType:
          fom_type                 fraction_C  po4ppm  nh4ppm  no3ppm  specific_area  cf_contrib  pot_decomp_rate  fr_c             fr_n             fr_p              derived_from
          base_type                0.4         0       0       0       0.0005         1           0.1              [0.2, 0.7, 0.1]  [0.2, 0.7, 0.1]  [0.2, 0.7, 0.1]   -
          inert                    0           0       0       0       0              0           0                -                -                -                 base_type
          manure                   0.08        10      10      10      0.0001         1           0.1              [0.3, 0.3, 0.4]  [0.3, 0.3, 0.4]  [0.3, 0.3, 0.4]   base_type
          RuminantDung_PastureFed  0.4         5       1250    0       0.0001         1           0.1              [0.3, 0.5, 0.2]  [0.3, 0.5, 0.2]  [0.3, 0.5, 0.2]   base_type
          algae                    0.4         0       0       0       0.0005         1           0.1              -                -                -                 base_type
          fym                      0.08        40      10      10      0.0001         1           0.1              [0.3, 0.3, 0.4]  [0.3, 0.3, 0.4]  [0.3, 0.3, 0.4]   base_type
          goatmanure               0.08        5       1307    481     0.0001         1           0.1              [0.3, 0.6, 0.3]  [0.3, 0.6, 0.3]  [0.3, 0.6, 0.34]  base_type
          chickenmanure_base       0.374       5       1307    481     0.0001         1           0.1              [0, 0.5, 0.5]    [0, 0.5, 0.5]    [0, 0.5, 0.5]     base_type
          cm                       0.277       0       2558    873     0              0           0                -                -                -                 chickenmanure_base
          cmA                      0.374       0       1307    481     0              0           0                -                -                -                 chickenmanure_base
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    Physical
      Thickness  ParticleSizeClay  ParticleSizeSand  ParticleSizeSilt  BD     AirDry  LL15   DUL    SAT    KS
      200        20                14.5              65.5              1.31   0.077   0.153  0.373  0.456  4832.039
      150        24                18                58                1.524  0.201   0.201  0.332  0.394  389.229
      200        39                13                48                1.42   0.298   0.298  0.426  0.442  21.6
      350        44                1                 55                1.424  0.308   0.308  0.446  0.456  19.051
      150        44                1                 55                1.424  0.308   0.308  0.446  0.456  19.051
      150        19                15                66                1.601  0.162   0.162  0.325  0.376  97.995
      300        19                15                66                1.601  0.162   0.162  0.325  0.376  97.995
      SoilCrop AGPRyegrassSoil: LL=[0.154, 0.201, 0.299, 0.308, 0.308, 0.162, 0.162]; KL=[0.1, 0.1, 0.1, 0.05, 0.05, 0.05, 0.05]; XF=[1, 0.8, 0.8, 0.3, 0, 0, 0]
      SoilCrop AGPWhiteCloverSoil: LL=[0.154, 0.201, 0.299, 0.308, 0.308, 0.162, 0.162]; KL=[0.1, 0.1, 0.1, 0.05, 0.05, 0.05, 0.05]; XF=[1, 0.8, 0.8, 0.3, 0, 0, 0]
    Organic: FOMCNRatio=40; CarbonUnits=Total
      Thickness  Carbon  SoilCNRatio  FBiom  FInert  FOM
      200        0       11           0.048  0.382   0
      150        0       11           0.027  0.634   0
      200        0       11           0.019  0.784   0
      350        0       11           0.015  0.924   0
      150        0       11           0.015  0.924   0
      150        0       11           0.015  0.971   0
      300        0       11           0.015  0.985   0
    PastureSpecies AGPRyegrass: doyGermination=275; daysEmergenceToAnthesis=120; daysAnthesisToMaturity=85; degreesDayForAnthesis=1100; degreesDayForMaturity=900; daysAnnualsFactor=45; InitialShootDM=1500; InitialRootDM=450; InitialRootDepth=750; initialDMFractionsGrasses=[0.15, 0.25, 0.25, 0.05, 0.05, 0.1, 0.1, 0.05, 0, 0, 0]; initialDMFractionsForbs=[0.2, 0.2, 0.15, 0.05, 0.1, 0.15, 0.1, 0.05, 0, 0, 0]; PhotosyntheticEfficiency=0.01; PhotosynthesisCurveFactor=0.8; FractionPAR=0.5; ReferenceCO2=380; CO2EffectScaleFactor=700; CO2EffectOffsetFactor=600; CO2EffectMinimum=0.7; CO2EffectExponent=2; ReproSeasonDurationCoeff=2; ReproSeasonShouldersLengthFactor=1; ReproSeasonOnsetDurationFactor=0.6; RelativeTurnoverEmerging=2; DetachmentDroughtCoefficient=3; DetachmentDroughtEffectMin=0.1; TurnoverStockFactor=0.01; TurnoverDefoliationEffectMin=0.025; MinimumGreenLeafProp=0.8; MinimumGreenRootProp=0.5
      initialDMFractionsLegumes=[0.16, 0.23, 0.22, 0.05, 0.03, 0.05, 0.05, 0.01, 0.04, 0.08, 0.08]
      LinearInterpolationFunction FVPDFunction
      PastureAboveGroundOrgan Leaf: NConcOptimum=0.04; NConcMinimum=0.01; NConcMaximum=0.0525; FractionStanding=1; MinimumLiveDM=10
        GenericTissue EmergingTissue: FractionNRemobilisable=0; FractionSugarNewGrowth=0.5; DigestibilityCellWall=0.9; DigestibilityProtein=1; DMTransferredIn=0; NTransferredIn=0; NRemobilisable=0; NRemobilised=0
        GenericTissue DevelopingTissue: FractionNRemobilisable=0.1; FractionSugarNewGrowth=0; DigestibilityCellWall=0.7; DigestibilityProtein=1; DMTransferredIn=0; NTransferredIn=0; NRemobilisable=0; NRemobilised=0
        GenericTissue MatureTissue: FractionNRemobilisable=0.2; FractionSugarNewGrowth=0; DigestibilityCellWall=0.6; DigestibilityProtein=1; DMTransferredIn=0; NTransferredIn=0; NRemobilisable=0; NRemobilised=0
        GenericTissue DeadTissue: FractionNRemobilisable=1; FractionSugarNewGrowth=0; DigestibilityCellWall=0.2; DigestibilityProtein=1; DMTransferredIn=0; NTransferredIn=0; NRemobilisable=0; NRemobilised=0
      PastureAboveGroundOrgan Stem: NConcOptimum=0.02; NConcMinimum=0.0067; NConcMaximum=0.03; FractionStanding=1; MinimumLiveDM=10
        GenericTissue EmergingTissue: FractionNRemobilisable=0; FractionSugarNewGrowth=0.5; DigestibilityCellWall=0.9; DigestibilityProtein=1; DMTransferredIn=0; NTransferredIn=0; NRemobilisable=0; NRemobilised=0
        GenericTissue DevelopingTissue: FractionNRemobilisable=0.1; FractionSugarNewGrowth=0; DigestibilityCellWall=0.7; DigestibilityProtein=1; DMTransferredIn=0; NTransferredIn=0; NRemobilisable=0; NRemobilised=0
        GenericTissue MatureTissue: FractionNRemobilisable=0.2; FractionSugarNewGrowth=0; DigestibilityCellWall=0.6; DigestibilityProtein=1; DMTransferredIn=0; NTransferredIn=0; NRemobilisable=0; NRemobilised=0
        GenericTissue DeadTissue: FractionNRemobilisable=1; FractionSugarNewGrowth=0; DigestibilityCellWall=0.2; DigestibilityProtein=1; DMTransferredIn=0; NTransferredIn=0; NRemobilisable=0; NRemobilised=0
      PastureAboveGroundOrgan Stolon: NConcOptimum=0; NConcMinimum=0; NConcMaximum=0; FractionStanding=0; MinimumLiveDM=10
        GenericTissue EmergingTissue: FractionNRemobilisable=0; FractionSugarNewGrowth=0.5; DigestibilityCellWall=0.9; DigestibilityProtein=1; DMTransferredIn=0; NTransferredIn=0; NRemobilisable=0; NRemobilised=0
        GenericTissue DevelopingTissue: FractionNRemobilisable=0.1; FractionSugarNewGrowth=0; DigestibilityCellWall=0.7; DigestibilityProtein=1; DMTransferredIn=0; NTransferredIn=0; NRemobilisable=0; NRemobilised=0
        GenericTissue MatureTissue: FractionNRemobilisable=0.2; FractionSugarNewGrowth=0; DigestibilityCellWall=0.6; DigestibilityProtein=1; DMTransferredIn=0; NTransferredIn=0; NRemobilisable=0; NRemobilised=0
        GenericTissue DeadTissue: FractionNRemobilisable=1; FractionSugarNewGrowth=0; DigestibilityCellWall=0.2; DigestibilityProtein=1; DMTransferredIn=0; NTransferredIn=0; NRemobilisable=0; NRemobilised=0
      PastureBelowGroundOrgan Root: ExponentSoilMoisture=1.5; MinimumRootingDepth=50; MaximumPotentialRootingDepth=1000; MaximumAllowedRootingDepth=500; ElongationRate=25; DepthDistributionParamTop=90; DepthDistributionExponent=3.2; DepthDistributionParamBottom=1.05; SpecificRootLength=100; NConcOptimum=0.02; NConcMinimum=0.008; NConcMaximum=0.0275; KNH4=0.01; KNO3=0.025; MaximumNUptake=10; MinimumLiveDM=1; Depth=0
        RootTissue Live: DMTransferredOut=0; FractionNRemobilisable=0.2; DMRemoved=0; NRemoved=0; NRemobilisable=0; NRemobilised=0
        RootTissue Dead: DMTransferredOut=0; FractionNRemobilisable=1; DMRemoved=0; NRemoved=0; NRemobilisable=0; NRemobilised=0
    PastureSpecies AGPWhiteClover: doyGermination=275; daysEmergenceToAnthesis=120; daysAnthesisToMaturity=85; degreesDayForAnthesis=1100; degreesDayForMaturity=900; daysAnnualsFactor=45; InitialShootDM=550; InitialRootDM=350; InitialRootDepth=150; initialDMFractionsGrasses=[0.15, 0.25, 0.25, 0.05, 0.05, 0.1, 0.1, 0.05, 0, 0, 0]; initialDMFractionsForbs=[0.2, 0.2, 0.15, 0.05, 0.1, 0.15, 0.1, 0.05, 0, 0, 0]; PhotosyntheticEfficiency=0.01; PhotosynthesisCurveFactor=0.8; FractionPAR=0.5; ReferenceCO2=380; CO2EffectScaleFactor=700; CO2EffectOffsetFactor=600; CO2EffectMinimum=0.7; CO2EffectExponent=2; ReproSeasonDurationCoeff=2; ReproSeasonShouldersLengthFactor=1; ReproSeasonOnsetDurationFactor=0.6; RelativeTurnoverEmerging=2; DetachmentDroughtCoefficient=3; DetachmentDroughtEffectMin=0.1; TurnoverStockFactor=0.01; TurnoverDefoliationEffectMin=0.025; MinimumGreenLeafProp=0.8; MinimumGreenRootProp=0.5
      initialDMFractionsLegumes=[0.16, 0.23, 0.22, 0.05, 0.03, 0.05, 0.05, 0.01, 0.04, 0.08, 0.08]
      LinearInterpolationFunction FVPDFunction
      PastureAboveGroundOrgan Leaf: NConcOptimum=0.05; NConcMinimum=0.0135; NConcMaximum=0.06; FractionStanding=1; MinimumLiveDM=10
        GenericTissue EmergingTissue: FractionNRemobilisable=0; FractionSugarNewGrowth=0.5; DigestibilityCellWall=0.9; DigestibilityProtein=1; DMTransferredIn=0; NTransferredIn=0; NRemobilisable=0; NRemobilised=0
        GenericTissue DevelopingTissue: FractionNRemobilisable=0.1; FractionSugarNewGrowth=0; DigestibilityCellWall=0.8; DigestibilityProtein=1; DMTransferredIn=0; NTransferredIn=0; NRemobilisable=0; NRemobilised=0
        GenericTissue MatureTissue: FractionNRemobilisable=0.2; FractionSugarNewGrowth=0; DigestibilityCellWall=0.7; DigestibilityProtein=1; DMTransferredIn=0; NTransferredIn=0; NRemobilisable=0; NRemobilised=0
        GenericTissue DeadTissue: FractionNRemobilisable=1; FractionSugarNewGrowth=0; DigestibilityCellWall=0.2; DigestibilityProtein=1; DMTransferredIn=0; NTransferredIn=0; NRemobilisable=0; NRemobilised=0
      PastureAboveGroundOrgan Stem: NConcOptimum=0.0225; NConcMinimum=0.0073; NConcMaximum=0.03; FractionStanding=1; MinimumLiveDM=10
        GenericTissue EmergingTissue: FractionNRemobilisable=0; FractionSugarNewGrowth=0.5; DigestibilityCellWall=0.9; DigestibilityProtein=1; DMTransferredIn=0; NTransferredIn=0; NRemobilisable=0; NRemobilised=0
        GenericTissue DevelopingTissue: FractionNRemobilisable=0.1; FractionSugarNewGrowth=0; DigestibilityCellWall=0.8; DigestibilityProtein=1; DMTransferredIn=0; NTransferredIn=0; NRemobilisable=0; NRemobilised=0
        GenericTissue MatureTissue: FractionNRemobilisable=0.2; FractionSugarNewGrowth=0; DigestibilityCellWall=0.7; DigestibilityProtein=1; DMTransferredIn=0; NTransferredIn=0; NRemobilisable=0; NRemobilised=0
        GenericTissue DeadTissue: FractionNRemobilisable=1; FractionSugarNewGrowth=0; DigestibilityCellWall=0.2; DigestibilityProtein=1; DMTransferredIn=0; NTransferredIn=0; NRemobilisable=0; NRemobilised=0
      PastureAboveGroundOrgan Stolon: NConcOptimum=0.025; NConcMinimum=0.008; NConcMaximum=0.0325; FractionStanding=0.3; MinimumLiveDM=10
        GenericTissue EmergingTissue: FractionNRemobilisable=0; FractionSugarNewGrowth=0.5; DigestibilityCellWall=0.9; DigestibilityProtein=1; DMTransferredIn=0; NTransferredIn=0; NRemobilisable=0; NRemobilised=0
        GenericTissue DevelopingTissue: FractionNRemobilisable=0.1; FractionSugarNewGrowth=0; DigestibilityCellWall=0.8; DigestibilityProtein=1; DMTransferredIn=0; NTransferredIn=0; NRemobilisable=0; NRemobilised=0
        GenericTissue MatureTissue: FractionNRemobilisable=0.2; FractionSugarNewGrowth=0; DigestibilityCellWall=0.7; DigestibilityProtein=1; DMTransferredIn=0; NTransferredIn=0; NRemobilisable=0; NRemobilised=0
        GenericTissue DeadTissue: FractionNRemobilisable=1; FractionSugarNewGrowth=0; DigestibilityCellWall=0.2; DigestibilityProtein=1; DMTransferredIn=0; NTransferredIn=0; NRemobilisable=0; NRemobilised=0
      PastureBelowGroundOrgan Root: ExponentSoilMoisture=1.5; MinimumRootingDepth=30; MaximumPotentialRootingDepth=350; MaximumAllowedRootingDepth=500; ElongationRate=25; DepthDistributionParamTop=70; DepthDistributionExponent=2.5; DepthDistributionParamBottom=1.05; SpecificRootLength=45; NConcOptimum=0.0225; NConcMinimum=0.01; NConcMaximum=0.0275; KNH4=0.005; KNO3=0.01; MaximumNUptake=5; MinimumLiveDM=1; Depth=0
        RootTissue Live: DMTransferredOut=0; FractionNRemobilisable=0.1; DMRemoved=0; NRemoved=0; NRemobilisable=0; NRemobilised=0
        RootTissue Dead: DMTransferredOut=0; FractionNRemobilisable=1; DMRemoved=0; NRemoved=0; NRemobilisable=0; NRemobilised=0
  Simulation TestPatchManager
    Clock: Start=1972-01-01; End=2008-12-31
    Summary SummaryFile
    Weather: FileName=%root%\Tests\WeatherFiles\Ruakura.met
    SoilArbitrator Soil Arbitrator
    MicroClimate: a_interception=0; b_interception=1; c_interception=0; d_interception=0; SoilHeatFluxFraction=0.4; MinimumHeightDiffForNewLayer=0; NightInterceptionFraction=0.5; ReferenceHeight=2
    Forages
      Parameters:
        Name                          IsLive  DigestibilityString  FractionConsumable  MinimumAmount  UseDigestibilityFromModel
        SurfaceOrganicMatter.Residue  true    0.7                  1                   100            false
        SurfaceOrganicMatter.Residue  false   0.3                  1                   0              false
        AGPRyegrass.Leaf              true    0.7                  1                   100            false
        AGPRyegrass.Leaf              false   0.3                  1                   0              false
        AGPRyegrass.Stem              true    0.7                  1                   100            false
        AGPRyegrass.Stem              false   0.3                  1                   0              false
        AGPRyegrass.Stolon            true    0.7                  1                   100            false
        AGPRyegrass.Stolon            false   0.3                  1                   0              false
        AGPWhiteClover.Leaf           true    0.7                  1                   100            false
        AGPWhiteClover.Leaf           false   0.3                  1                   0              false
        AGPWhiteClover.Stem           true    0.7                  1                   100            false
        AGPWhiteClover.Stem           false   0.3                  1                   0              false
        AGPWhiteClover.Stolon         true    0.7                  1                   100            false
        AGPWhiteClover.Stolon         false   0.3                  1                   0              false
    Zone PaddockWithNutrient: Area=1; Slope=0; AspectAngle=0; Altitude=50
      Manager AutomaticIrrigation: same as Replacements.AutomaticIrrigation
      Manager Irrigate on fixed dates: same as Replacements.Irrigate on fixed dates
      Manager Fertilise on fixed dates: same as Replacements.Fertilise on fixed dates
      Fertiliser
      Irrigation
      SimpleGrazing: same as Replacements.SimpleGrazing
      SurfaceOrganicMatter: InitialResidueName=grass; InitialResidueType=grass; InitialResidueMass=0; InitialStandingFraction=0; InitialCPR=0; InitialCNR=15
      Soil HE_140mm: SoilType=NZ_sedementary; Region=Plains; State=Canterbury; Country=New Zealand; Latitude=0; Longitude=0
        DataSource=Generic profile descriptions provided by Trevor Webb and data for functional horizions based on SWAMP project results
        Comments=Bulk density values were measured on the fine earth fraction so values entered into apsim soil are adjusted down to account for stone content (assuming stones are inert from all soil process so their mass and volume is removed from model paramaters).  SAT, DUL, LL15 and Air dry have been adjusted down to account for stone content.  OC has not been adjusted so the model will get the correct carbon and N amounts using the adjusted BD.
        Physical: same as Replacements.Physical
        Organic: same as Replacements.Organic
        Chemical: Thickness=[200, 150, 200, 350, 150, 150, 300]; PH=[6, 6, 6, 6, 6, 6, 6]; PHUnits=Water
        WaterBalance SoilWater: SummerDate=1-Oct; SummerU=9; SummerCona=4.4; WinterDate=1-Apr; WinterU=6; WinterCona=3; DiffusConst=88; DiffusSlope=35; Salb=0.13; CN2Bare=73; CNRed=20; CNCov=0.8; PSIDul=-100; Thickness=[200, 150, 200, 350, 150, 150, 300]; SWCON=[0.496, 0.366, 0.374, 0.076, 0.076, 0.306, 0.306]
        Water: Thickness=[200, 150, 200, 350, 150, 150, 300]; InitialValues=[0.373, 0.332, 0.426, 0.446, 0.446, 0.325, 0.325]; RelativeTo=LL15; FilledFromTop=true
        Nutrient
        CERESSoilTemperature Temperature
        Solute NO3: Thickness=[200, 150, 200, 350, 150, 150, 300]; InitialValues=[18.98, 4.625, 1.047, 1.047, 1.031, 1, 1]; InitialValuesUnits=ppm; WaterTableConcentration=0; D0=0; DepthConstant=0; MaxDepthSoluteAccessible=0; RunoffEffectivenessAtMovingSolute=0; MaxEffectiveRunoff=0
        Solute NH4: Thickness=[200, 150, 200, 350, 150, 150, 300]; InitialValues=[0.884, 0.313, 0.105, 0.105, 0.136, 0.2, 0.2]; InitialValuesUnits=ppm; WaterTableConcentration=0; D0=0; DepthConstant=0; MaxDepthSoluteAccessible=0; RunoffEffectivenessAtMovingSolute=0; MaxEffectiveRunoff=0
        Solute Urea: Thickness=[200, 150, 200, 350, 150, 150, 300]; InitialValues=[0, 0, 0, 0, 0, 0, 0]; InitialValuesUnits=ppm; WaterTableConcentration=0; D0=0; DepthConstant=0; MaxDepthSoluteAccessible=0; RunoffEffectivenessAtMovingSolute=0; MaxEffectiveRunoff=0
      PastureSpecies AGPRyegrass: doyGermination=275; daysEmergenceToAnthesis=120; daysAnthesisToMaturity=85; degreesDayForAnthesis=1100; degreesDayForMaturity=900; daysAnnualsFactor=45; InitialShootDM=1500; InitialRootDM=450; InitialRootDepth=750; initialDMFractionsGrasses=[0.15, 0.25, 0.25, 0.05, 0.05, 0.1, 0.1, 0.05, 0, 0, 0]; initialDMFractionsForbs=[0.2, 0.2, 0.15, 0.05, 0.1, 0.15, 0.1, 0.05, 0, 0, 0]; PhotosyntheticEfficiency=0.01; PhotosynthesisCurveFactor=0.8; FractionPAR=0.5; ReferenceCO2=380; CO2EffectScaleFactor=700; CO2EffectOffsetFactor=600; CO2EffectMinimum=0.7; CO2EffectExponent=2; ReproSeasonDurationCoeff=2; ReproSeasonShouldersLengthFactor=1; ReproSeasonOnsetDurationFactor=0.6; RelativeTurnoverEmerging=2; DetachmentDroughtCoefficient=3; DetachmentDroughtEffectMin=0.1; TurnoverStockFactor=0.01; TurnoverDefoliationEffectMin=0.025; MinimumGreenLeafProp=0.8; MinimumGreenRootProp=0.5
        initialDMFractionsLegumes=[0.16, 0.23, 0.22, 0.05, 0.03, 0.05, 0.05, 0.01, 0.04, 0.08, 0.08]
        LinearInterpolationFunction FVPDFunction
      PastureSpecies AGPWhiteClover: doyGermination=275; daysEmergenceToAnthesis=120; daysAnthesisToMaturity=85; degreesDayForAnthesis=1100; degreesDayForMaturity=900; daysAnnualsFactor=45; InitialShootDM=500; InitialRootDM=150; InitialRootDepth=350; initialDMFractionsGrasses=[0.15, 0.25, 0.25, 0.05, 0.05, 0.1, 0.1, 0.05, 0, 0, 0]; initialDMFractionsForbs=[0.2, 0.2, 0.15, 0.05, 0.1, 0.15, 0.1, 0.05, 0, 0, 0]; PhotosyntheticEfficiency=0.01; PhotosynthesisCurveFactor=0.8; FractionPAR=0.5; ReferenceCO2=380; CO2EffectScaleFactor=700; CO2EffectOffsetFactor=600; CO2EffectMinimum=0.7; CO2EffectExponent=2; ReproSeasonDurationCoeff=2; ReproSeasonShouldersLengthFactor=1; ReproSeasonOnsetDurationFactor=0.6; RelativeTurnoverEmerging=2; DetachmentDroughtCoefficient=3; DetachmentDroughtEffectMin=0.1; TurnoverStockFactor=0.01; TurnoverDefoliationEffectMin=0.025; MinimumGreenLeafProp=0.8; MinimumGreenRootProp=0.5
        initialDMFractionsLegumes=[0.16, 0.23, 0.22, 0.05, 0.03, 0.05, 0.05, 0.01, 0.04, 0.08, 0.08]
        LinearInterpolationFunction FVPDFunction
      Report NutrientReport: EventNames=[Clock].EndOfDay
        VariableNames:
          [Clock].Today as Date
          sum([Soil].Urea.kgha) + sum([Soil].NH4.kgha) + sum([Soil].NO3.kgha) as MinN
          sum([Soil].NO3.kgha) / (sum([Soil].Urea.kgha) + sum([Soil].NH4.kgha) + sum([Soil].NO3.kgha)) as PropNO3
          [Soil].SoilWater.LeachUrea + [Soil].SoilWater.LeachNH4 + [Soil].SoilWater.LeachNO3 as LeachN
          [AgPRyegrass].AboveGroundWt + [AgPWhiteClover].AboveGroundWt as AGBiomass
          [AgPRyegrass].NetGrowthWt + [AgPWhiteClover].NetGrowthWt as Growth
          sum([Soil].Nutrient.DenitrifiedN) as Denit
          sum([Soil].Nutrient.Organic.N) as OrganicN
          sum([Soil].Nutrient.Organic.C) as OrganicC
          [Soil].SoilWater.Drainage as Drainage
          sum([AgPRyegrass].WaterUptake) + sum([AgPWhiteClover].WaterUptake) as WaterUptake
          sum([AgPRyegrass].NitrogenUptake) +sum([AgPWhiteClover].NitrogenUptake) as NUptake
          [AgPWhiteClover].AboveGroundWt / AGBiomass as CloverProp
          [SurfaceOrganicMatter].C as SOMC
          [SurfaceOrganicMatter].Wt as SOMWt
          sum([Soil].Nutrient.Catm) as C2Atm
          [Irrigation].IrrigationApplied as Irrig
    Zone PaddockWithPatchManager: Area=1; Slope=0; AspectAngle=0; Altitude=50
      Manager AutomaticIrrigation: same as Replacements.AutomaticIrrigation
      Manager Irrigate on fixed dates: same as Replacements.Irrigate on fixed dates
      Manager Fertilise on fixed dates: same as Replacements.Fertilise on fixed dates
      Fertiliser
      Irrigation
      SimpleGrazing: same as Replacements.SimpleGrazing
      SurfaceOrganicMatter: InitialResidueName=grass; InitialResidueType=grass; InitialResidueMass=0; InitialStandingFraction=0; InitialCPR=0; InitialCNR=15
      Soil HE_140mm: SoilType=NZ_sedementary; Region=Plains; State=Canterbury; Country=New Zealand; Latitude=0; Longitude=0
        DataSource=Generic profile descriptions provided by Trevor Webb and data for functional horizions based on SWAMP project results
        Comments=Bulk density values were measured on the fine earth fraction so values entered into apsim soil are adjusted down to account for stone content (assuming stones are inert from all soil process so their mass and volume is removed from model paramaters).  SAT, DUL, LL15 and Air dry have been adjusted down to account for stone content.  OC has not been adjusted so the model will get the correct carbon and N amounts using the adjusted BD.
        Physical: same as Replacements.Physical
        Organic: same as Replacements.Organic
        Chemical: Thickness=[200, 150, 200, 350, 150, 150, 300]; PH=[6, 6, 6, 6, 6, 6, 6]; PHUnits=Water
        WaterBalance SoilWater: SummerDate=1-Oct; SummerU=9; SummerCona=4.4; WinterDate=1-Apr; WinterU=6; WinterCona=3; DiffusConst=88; DiffusSlope=35; Salb=0.13; CN2Bare=73; CNRed=20; CNCov=0.8; PSIDul=-100; Thickness=[200, 150, 200, 350, 150, 150, 300]
          SWCON=[0.496442, 0.365575, 0.373877, 0.0758548, 0.076, 0.306, 0.306]
        Water: Thickness=[200, 150, 200, 350, 150, 150, 300]; InitialValues=[0.373, 0.332, 0.426, 0.446, 0.446, 0.325, 0.325]; RelativeTo=LL15; FilledFromTop=true
        NutrientPatchManager: MaximumNitrogenAvailableToPlants=3; NPartitionApproach=0; AutoAmalgamationApproach=0; basePatchApproach=0; AllowPatchAmalgamationByAge=false; PatchAgeForForcedMerge=0; LayerForNPartition=-99
        CERESSoilTemperature Temperature
        SolutePatch NO3: Thickness=[200, 150, 200, 350, 150, 150, 300]; InitialValues=[18.98, 4.625, 1.047, 1.047, 1.031, 1, 1]; InitialValuesUnits=ppm; WaterTableConcentration=0; D0=0; DepthConstant=0; MaxDepthSoluteAccessible=0; RunoffEffectivenessAtMovingSolute=0; MaxEffectiveRunoff=0
        SolutePatch NH4: Thickness=[200, 150, 200, 350, 150, 150, 300]; InitialValues=[0.884, 0.313, 0.105, 0.105, 0.136, 0.2, 0.2]; InitialValuesUnits=ppm; WaterTableConcentration=0; D0=0; DepthConstant=0; MaxDepthSoluteAccessible=0; RunoffEffectivenessAtMovingSolute=0; MaxEffectiveRunoff=0
        SolutePatch Urea: Thickness=[200, 150, 200, 350, 150, 150, 300]; InitialValues=[0, 0, 0, 0, 0, 0, 0]; InitialValuesUnits=ppm; WaterTableConcentration=0; D0=0; DepthConstant=0; MaxDepthSoluteAccessible=0; RunoffEffectivenessAtMovingSolute=0; MaxEffectiveRunoff=0
      PastureSpecies AGPRyegrass: same as TestPatchManager.PaddockWithNutrient.AGPRyegrass
      PastureSpecies AGPWhiteClover: doyGermination=275; daysEmergenceToAnthesis=120; daysAnthesisToMaturity=85; degreesDayForAnthesis=1100; degreesDayForMaturity=900; daysAnnualsFactor=45; InitialShootDM=550; InitialRootDM=150; InitialRootDepth=350; initialDMFractionsGrasses=[0.15, 0.25, 0.25, 0.05, 0.05, 0.1, 0.1, 0.05, 0, 0, 0]; initialDMFractionsForbs=[0.2, 0.2, 0.15, 0.05, 0.1, 0.15, 0.1, 0.05, 0, 0, 0]; PhotosyntheticEfficiency=0.01; PhotosynthesisCurveFactor=0.8; FractionPAR=0.5; ReferenceCO2=380; CO2EffectScaleFactor=700; CO2EffectOffsetFactor=600; CO2EffectMinimum=0.7; CO2EffectExponent=2; ReproSeasonDurationCoeff=2; ReproSeasonShouldersLengthFactor=1; ReproSeasonOnsetDurationFactor=0.6; RelativeTurnoverEmerging=2; DetachmentDroughtCoefficient=3; DetachmentDroughtEffectMin=0.1; TurnoverStockFactor=0.01; TurnoverDefoliationEffectMin=0.025; MinimumGreenLeafProp=0.8; MinimumGreenRootProp=0.5
        initialDMFractionsLegumes=[0.16, 0.23, 0.22, 0.05, 0.03, 0.05, 0.05, 0.01, 0.04, 0.08, 0.08]
        LinearInterpolationFunction FVPDFunction
      Report PatchReport: EventNames=[Clock].EndOfDay
        VariableNames:
          [Clock].Today as Date
          sum([Soil].NutrientPatchManager.Urea.kgha) + sum([Soil].NutrientPatchManager.NH4.kgha) + sum([Soil].NutrientPatchManager.NO3.kgha) as MinN
          sum([Soil].NutrientPatchManager.NO3.kgha) / MinN as PropNO3
          [Soil].SoilWater.LeachUrea + [Soil].SoilWater.LeachNH4 + [Soil].SoilWater.LeachNO3 as LeachN
          [AgPRyegrass].AboveGroundWt + [AgPWhiteClover].AboveGroundWt as AGBiomass
          [AgPRyegrass].NetGrowthWt + [AgPWhiteClover].NetGrowthWt as Growth
          sum([Soil].NutrientPatchManager.DenitrifiedN) as Denit
          sum([Soil].NutrientPatchManager.Organic.N) as OrganicN
          sum([Soil].NutrientPatchManager.Organic.C) as OrganicC
          [Soil].SoilWater.Drainage as Drainage
          sum([AgPRyegrass].WaterUptake) + sum([AgPWhiteClover].WaterUptake) as WaterUptake
          sum([AgPRyegrass].NitrogenUptake) +sum([AgPWhiteClover].NitrogenUptake) as NUptake
          [AgPWhiteClover].AboveGroundWt / AGBiomass as CloverProp
          [SurfaceOrganicMatter].C as SOMC
          [SurfaceOrganicMatter].Wt as SOMWt
          sum([Soil].NutrientPatchManager.Catm) as C2Atm
          [Irrigation].IrrigationApplied as Irrig
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