Simulations: Version=20
  DataStore
  Simulation SinglePatchBasexx
    Clock: StartDate=1981-01-01; EndDate=1981-04-30
    Weather: FileName=lincoln.met
    Summary
    SoilArbitrator Soil Arbitrator
    Zone SinglePatchxx: Area=1; Slope=0
      MicroClimate: a_interception=0; b_interception=1; c_interception=0; d_interception=0; soil_albedo=0.23; sun_angle=15; soil_heat_flux_fraction=0.4; night_interception_fraction=0.5; refheight=2; albedo=0.26; emissivity=0.96; RadIntTotal=0
      Folder Management
        Manager CreatePatches
          Verbose = True
          NumPatches = 1
```csharp
using System;
using Models.Core;
using Models.Soils;
using Models.PMF;
using Models.Zones;
using Models.AgPasture;
using System.Xml.Serialization;
using Models.Soils;
using APSIM.Shared.Utilities;
using System.Collections.Generic;


namespace Models
{
	[Serializable]
	[System.Xml.Serialization.XmlInclude(typeof(Model))]
	public class Script : Model
	{
		[Link] Clock Clock;
		[Link] Soil soil;
		[Link] ISummary summary = null;
		[Link] Weather Weather;
		[Link] Zone zone;

		[Description("Verbose reporting mode (True/False)")]
		public bool Verbose { get; set; }
		
		[Description("How many patches should there be in the grid?")]
		public int NumPatches { get; set; }

		
		private List<IModel> zones;
		public event AddSoilCNPatchDelegate AddSoilCNPatch;

		[EventSubscribe("DoDailyInitialisation")]
		private void OnDoDailyInitialisation(object sender, EventArgs e)
		{	
			bool isEndOfMonth = false;
			if (Clock.Today.AddDays(1).Day == 1)
				isEndOfMonth = true;

			if (Clock.Today == Clock.StartDate)
			{
				

				
				if (Verbose)
				{
					
					summary.WriteMessage(this, "NumPatches at start:" + soil.SoilNitrogen.PatchCount.ToString());					
				}
				
				soil.SoilNitrogen.MaximumNitrogenAvailableToPlants = 3.0;
				soil.SoilNitrogen.NPartitionApproach = "BasedOnConcentrationAndDelta";
				soil.SoilNitrogen.AllowPatchAutoAmalgamation = "No";
				soil.SoilNitrogen.AutoAmalgamationApproach = "CompareAll";
				soil.SoilNitrogen.basePatchApproach = "IDBased";
				soil.SoilNitrogen.AllowPatchAmalgamationByAge = "No";
				soil.SoilNitrogen.PatchAgeForForcedMerge = 3.0;								
				
				int[] PatchToAddTo = new int[1];  //need an array variable for this
				string[] PatchNmToAddTo = new string[1];  
				int nPatchesAdded = 0;
				double NewArea = 1.0 / NumPatches;

				while (nPatchesAdded < NumPatches - 1)
				{
					AddSoilCNPatchType NewPatch = new AddSoilCNPatchType();
					NewPatch.DepositionType = "ToNewPatch";
					NewPatch.AreaFraction = NewArea;
					PatchToAddTo[0] = 0;
					PatchNmToAddTo[0] = "0";
					NewPatch.AffectedPatches_id = PatchToAddTo;
					NewPatch.AffectedPatches_nm = PatchNmToAddTo;
					NewPatch.SuppressMessages = "yes";
					AddSoilCNPatch.Invoke(NewPatch);
					nPatchesAdded += 1;
				}				
				if (Verbose)
					summary.WriteMessage(this, "NumPatches at end of initialisation:" + soil.SoilNitrogen.PatchCount.ToString());
			}					   
		
		}
	}
}
```
        Manager KillPlants
          killPlants = False
```csharp
using System;
using Models.Core;
using Models.Soils;
using Models.PMF;
using Models.Zones;
using Models.AgPasture;
using System.Xml.Serialization;
using Models.Soils;
using APSIM.Shared.Utilities;
using System.Collections.Generic;


namespace Models
{
	[Serializable]
	[System.Xml.Serialization.XmlInclude(typeof(Model))]
	public class Script : Model
	{
		[Link] Clock Clock;
		[Link] AgPasture.Sward Pasture;

		[Description("Kill all plants (True/False)")]
		public bool killPlants { get; set; }

		[EventSubscribe("DoDailyInitialisation")]
		private void OnDoDailyInitialisation(object sender, EventArgs e)
		{	
			bool isEndOfMonth = false;

			if (Clock.Today == Clock.StartDate)
			{
				if (killPlants)
				{
					Pasture.KillCrop(1);
					Pasture.EndCrop();
				}
			}					   		
		}
	}
}
```
        Operations FertiliserSchedule
          1981-01-10  [Fertiliser].Apply(0, Fertiliser.Types.NO3N, 30);
      Fertiliser
      Irrigation
      Soil: ASCOrder=Vertosol; ASCSubOrder=Black; SoilType=Clay; Site=Norwin; NearestTown=Norwin; Region=Darling Downs and Granite Belt; State=Queensland; Country=Australia; NaturalVegetation=Qld. Bluegrass, possible Qld. Blue gum; ApsoilNumber=900; Latitude=-27.581836; Longitude=151.320206; LocationAccuracy=+/- 20m
        DataSource=CSIRO Sustainable Ecosystems, Toowoomba; Characteriesd as part of the GRDC funded project"Doing it better, doing it smarter, managing soil water in Australian agriculture' 2011
        Comments=OC, CLL for all crops estimated-based on Bongeen Mywybilla Soil No1
        Water
          Thickness  BD       AirDry    LL15      DUL       SAT       KS
          150        1.01056  0.13025   0.2605    0.521     0.588655  20
          150        1.07146  0.198689  0.248362  0.496723  0.565677  20
          300        1.09394  0.28      0.28      0.488438  0.557193  20
          300        1.15861  0.28      0.28      0.480297  0.532787  20
          300        1.17301  0.28      0.28      0.471584  0.527354  20
          300        1.16287  0.28      0.28      0.457071  0.53118   20
          300        1.1875   0.28      0.28      0.452332  0.521888  20
          SoilCrop WhiteCloverSoil: LL=[0.261, 0.248, 0.28, 0.306, 0.36, 0.392, 0.446]; KL=[0.06, 0.06, 0.06, 0.04, 0.04, 0.02, 0.01]; XF=[1, 1, 1, 1, 1, 1, 1]
          SoilCrop RyegrassSoil: LL=[0.261, 0.248, 0.28, 0.306, 0.36, 0.392, 0.446]; KL=[0.06, 0.06, 0.06, 0.04, 0.04, 0.02, 0.01]; XF=[1, 1, 1, 1, 1, 1, 1]
        SoilWater: SummerDate=1-Nov; SummerU=5; SummerCona=5; WinterDate=1-Apr; WinterU=5; WinterCona=5; DiffusConst=40; DiffusSlope=16; Salb=0.12; CN2Bare=73; CNRed=20; CNCov=0.8; max_pond=0; Thickness=[150, 150, 300, 300, 300, 300, 300]; SWCON=[0.3, 0.3, 0.3, 0.3, 0.3, 0.3, 0.3]; residueinterception=0
        SoilNitrogen: fom_type=[default, manure, mucuna, lablab, shemp, stable]; fract_carb=[0.2, 0.3, 0.54, 0.57, 0.45, 0]; fract_cell=[0.7, 0.3, 0.37, 0.37, 0.47, 0.1]; fract_lign=[0.1, 0.4, 0.09, 0.06, 0.08, 0.9]
        SoilOrganicMatter: RootCN=40; RootWt=0; SoilCN=12; EnrACoeff=7.4; EnrBCoeff=0.2; OCUnits=Total
          Thickness  OC  FBiom  FInert
          150        0   0.04   0.4
          150        0   0.02   0.6
          300        0   0.02   0.8
          300        0   0.02   1
          300        0   0.01   1
          300        0   0.01   1
          300        0   0.01   1
        Analysis: Thickness=[150, 150, 300, 300, 300, 300, 300]; PH=[8, 8, 8, 8, 8, 8, 8]; PHUnits=Water; BoronUnits=HotWater
        InitialWater: PercentMethod=EvenlyDistributed; FractionFull=1
        Sample InitialN: NO3Units=ppm; NH4Units=ppm; SWUnits=Volumetric; OCUnits=Total; PHUnits=Water
          Thickness  NO3  NH4
          150        0    0
          150        0    0
          300        0    0
          300        0    0
          300        0    0
          300        0    0
          300        0    0
        CERESSoilTemperature
      SurfaceOrganicMatter: PondActive=no; ReportAdditions=no; ReportRemovals=no; PoolName=grass; type=grass; mass=500; standing_fraction=0; cnr=40; CriticalResidueWeight=2000; OptimumDecompTemp=20; MaxCumulativeEOS=20; CNRatioDecompCoeff=0.277; CNRatioDecompThreshold=25; TotalLeachRain=25; MinRainToLeach=10; CriticalMinimumOrganicC=0.004; DefaultCPRatio=0; DefaultStandingFraction=0; StandingExtinctCoeff=0.5; FractionFaecesAdded=0.5
        Pools:
          {PoolName=grass, ResidueType=grass, Mass=500, CNRatio=40, StandingFraction=0}
        ResidueTypes: LoadFromResource=ResidueTypes
        TillageTypes TillageTypesList
      SoluteManager
      Sward: ControlledBySward=yes; WaterUptakeSource=soilarbitrator; NUptakeSource=soilarbitrator
        PastureSpecies Ryegrass: MaximumNUptake=10; Albedo=0.26; Gsmax=0.011; R50=200; SpeciesFamily=Grass; PhotosyntheticPathway=C3; InitialShootDM=1500; InitialRootDM=450; InitialRootDepth=750; ReferencePhotosyntheticRate=1; LightExtinctionCoefficient=0.5; GrowthTminimum=1; GrowthToptimum=20; GrowthTEffectExponent=1.7; UseHeatStressFactor=yes; HeatOnsetTemperature=28; HeatFullTemperature=35; HeatRecoverySumDD=30; HeatRecoveryTReference=25; UseColdStressFactor=yes; ColdOnsetTemperature=1; ColdFullTemperature=-5; ColdRecoverySumDD=25; ColdRecoveryTReference=0; MaintenanceRespirationCoefficient=0.03; GrowthRespirationCoefficient=0.25; RespirationTReference=20; RespirationExponent=1.5; NThresholdsForLeaves=[0.04, 0.012, 0.05]; NThresholdsForStems=[0.02, 0.006, 0.025]; NThresholdsForStolons=[0, 0, 0]; NThresholdsForRoots=[0.02, 0.006, 0.025]; DegreesDayForGermination=125; TargetShootRootRatio=4; MaxRootAllocation=0.25; ShootRootGlfFactor=0.5; UseReproSeasonFactor=yes; ReproSeasonReferenceLatitude=41; ReproSeasonTimingCoeff=0.14; ReproSeasonMaxAllocationIncrease=0.5; ReproSeasonAllocationCoeff=0.1; FractionLeafMaximum=0.7; FractionLeafMinimum=0.7; FractionLeafDMThreshold=500; FractionLeafDMFactor=2000; FractionLeafExponent=3; FractionToStolon=0; SpecificLeafArea=25; SpecificRootLength=100; StolonEffectOnLAI=0; ShootMaxEffectOnLAI=1000; MaxStemEffectOnLAI=1; LiveLeavesPerTiller=3; TissueTurnoverRateShoot=0.05; TissueTurnoverRateRoot=0.02; DetachmentRateShoot=0.08; TurnoverTemperatureMin=2; TurnoverTemperatureRef=20; TurnoverTemperatureExponent=1; TurnoverDroughtEffectMax=1; TurnoverDroughtThreshold=0.5; TurnoverDefoliationCoefficient=0.5; TurnoverDefoliationRootEffect=0.1; FractionNLuxuryRemobilisable=[0.1, 0.1, 0.1]; MinimumNFixation=0; MaximumNFixation=0; SoilSaturationEffectMax=0.1; MinimumWaterFreePorosity=-1; SoilSaturationRecoveryFactor=0.25; NDillutionCoefficient=0.25; GlfGeneric=1; GlfSoilFertility=1; PlantHeightMinimum=25; PlantHeightMaximum=600; PlantHeightMassForMax=10000; PlantHeightExponent=2.8; RootDepthMinimum=50; RootDepthMaximum=750; RootElongationRate=25; RootDistributionDepthParam=90; RootDistributionExponent=3.2; DigestibilitiesCellWall=[0.6, 0.6, 0.6, 0.2]; MinimumGreenWt=100; FractionStolonStanding=0; PreferenceForGreenOverDead=1; PreferenceForLeafOverStems=1; WaterAvailableMethod=DefaultAPSIM; NitrogenAvailableMethod=BasicAgPasture
        PastureSpecies WhiteClover: MaximumNUptake=10; Albedo=0.26; Gsmax=0.011; R50=200; SpeciesFamily=Legume; PhotosyntheticPathway=C3; InitialShootDM=400; InitialRootDM=100; InitialRootDepth=350; ReferencePhotosyntheticRate=1; LightExtinctionCoefficient=0.8; GrowthTminimum=2; GrowthToptimum=22; GrowthTEffectExponent=1.7; UseHeatStressFactor=yes; HeatOnsetTemperature=30; HeatFullTemperature=36; HeatRecoverySumDD=20; HeatRecoveryTReference=25; UseColdStressFactor=yes; ColdOnsetTemperature=2; ColdFullTemperature=-5; ColdRecoverySumDD=30; ColdRecoveryTReference=0; MaintenanceRespirationCoefficient=0.04; GrowthRespirationCoefficient=0.25; RespirationTReference=20; RespirationExponent=1.5; NThresholdsForLeaves=[0.045, 0.02, 0.055]; NThresholdsForStems=[0.0225, 0.01, 0.0275]; NThresholdsForStolons=[0.0225, 0.01, 0.0275]; NThresholdsForRoots=[0.0225, 0.01, 0.0275]; DegreesDayForGermination=125; TargetShootRootRatio=4; MaxRootAllocation=0.25; ShootRootGlfFactor=0.5; UseReproSeasonFactor=yes; ReproSeasonReferenceLatitude=41; ReproSeasonTimingCoeff=0.14; ReproSeasonMaxAllocationIncrease=0.5; ReproSeasonAllocationCoeff=0.1; FractionLeafMaximum=0.56; FractionLeafMinimum=0.28; FractionLeafDMThreshold=500; FractionLeafDMFactor=2000; FractionLeafExponent=3; FractionToStolon=0.2; SpecificLeafArea=30; SpecificRootLength=45; StolonEffectOnLAI=0.3; ShootMaxEffectOnLAI=500; MaxStemEffectOnLAI=0.5; LiveLeavesPerTiller=3; TissueTurnoverRateShoot=0.05; TissueTurnoverRateRoot=0.02; DetachmentRateShoot=0.11; TurnoverTemperatureMin=2; TurnoverTemperatureRef=20; TurnoverTemperatureExponent=1; TurnoverDroughtEffectMax=1; TurnoverDroughtThreshold=0.5; TurnoverDefoliationCoefficient=0.5; TurnoverDefoliationRootEffect=0.1; FractionNLuxuryRemobilisable=[0.1, 0.1, 0.1]; MinimumNFixation=0.2; MaximumNFixation=0.6; SoilSaturationEffectMax=0.1; MinimumWaterFreePorosity=-1; SoilSaturationRecoveryFactor=0.25; NDillutionCoefficient=1; GlfGeneric=1; GlfSoilFertility=1; PlantHeightMinimum=25; PlantHeightMaximum=350; PlantHeightMassForMax=7500; PlantHeightExponent=2.5; RootDepthMinimum=30; RootDepthMaximum=350; RootElongationRate=25; RootDistributionDepthParam=70; RootDistributionExponent=2.5; DigestibilitiesCellWall=[0.6, 0.6, 0.6, 0.2]; MinimumGreenWt=50; FractionStolonStanding=0; PreferenceForGreenOverDead=1; PreferenceForLeafOverStems=1; WaterAvailableMethod=DefaultAPSIM; NitrogenAvailableMethod=BasicAgPasture
      Report Reportxx: VariableNames=[Clock].Today as Date; EventNames=[Clock].DoReport
  Folder GenerateSinglePatchBaseline
    Experiment
      Factors
        Factor Fert: Specifications=[FertiliserSchedule]
          Operations None
            1981-01-10  [Fertiliser].Apply(0, Fertiliser.Types.NO3N, 30);
          Operations NO3
            1981-01-10  [Fertiliser].Apply(100, Fertiliser.Types.NO3N, 30);
          Operations NH4
            1981-01-10  [Fertiliser].Apply(100, Fertiliser.Types.NH4N, 30);
          Operations Urea
            1981-01-10  [Fertiliser].Apply(100, Fertiliser.Types.Urea, 30);
      Simulation SinglePatchBase
        Clock: StartDate=1981-01-01; EndDate=1981-04-30
        Weather: FileName=lincoln.met
        Summary
        SoilArbitrator Soil Arbitrator
        Zone SinglePatch: Area=1; Slope=0
          MicroClimate: a_interception=0; b_interception=1; c_interception=0; d_interception=0; soil_albedo=0.23; sun_angle=15; soil_heat_flux_fraction=0.4; night_interception_fraction=0.5; refheight=2; albedo=0.26; emissivity=0.96; RadIntTotal=0
          Fertiliser
          Irrigation
          Folder Management
            Manager CreatePatches: same as SinglePatchBasexx.SinglePatchxx.Management.CreatePatches
            Manager KillPlants: same as SinglePatchBasexx.SinglePatchxx.Management.KillPlants
            Operations FertiliserSchedule
              1981-01-10  [Fertiliser].Apply(0, Fertiliser.Types.NO3N, 30);
            Manager AutoIrrig
              FASW = 0
              WaterDeficit = 0
              AutoIrrigationOn = False
              FASWThreshold = 0.95
              FASWDepth = 300
```csharp
using System;
using Models.Core;
using System.Collections.Generic;
using System.Text;
using Models.Soils;
using Models.PMF;
using Models;
using System.Xml.Serialization;
using APSIM.Shared.Utilities;

namespace Models
{
	[Serializable] 
	public class Script : Model
	{
		public double FASW { get; set; }
		public double WaterDeficit  { get; set; }
	
		[Link] Zone zone;
		[Link] Irrigation irrigation;
		[Link] Soil soil;
		
		[Description("Auto irrigation on?")]
		public bool AutoIrrigationOn { get; set; }

		[Description("Threshold fraction available water (0-1)")]
		public double FASWThreshold { get; set; }

		[Description("Soil depth (mm) to which fraction available water is calculated")]
		public double FASWDepth { get; set; }

		[EventSubscribe("DoManagement")]
		private void OnDoManagement(object sender, EventArgs e)
		{
			CalculateFASW();
			if (AutoIrrigationOn)
			{
				if (FASW < FASWThreshold)
				{
					double amount = 10;
					irrigation.Apply(WaterDeficit, depth: 0);
				}
			}
		}
		
		private void CalculateFASW()
		{
			double[] LL15 = MathUtilities.Multiply(soil.LL15, soil.Thickness);
			double[] DUL = MathUtilities.Multiply(soil.DUL, soil.Thickness);
		
			int nlayr = GetLayerIndex();
			double cumdep = MathUtilities.Sum(soil.Thickness, 0, nlayr, 0.0);

			double excess_fr = MathUtilities.Divide((cumdep - FASWDepth), soil.Thickness[nlayr], 0.0);

			// note that results may be strange if swdep < ll15
			double avail_sw = (MathUtilities.Sum(soil.Water, 0, nlayr, 0.0)
			                  - excess_fr * soil.Water[nlayr])
			                  - (MathUtilities.Sum(LL15, 0, nlayr, 0.0)
			                  - excess_fr * LL15[nlayr]);


			double pot_avail_sw = (MathUtilities.Sum(DUL, 0, nlayr, 0.0)
			                      - excess_fr * DUL[nlayr])
			                      - (MathUtilities.Sum(LL15, 0, nlayr, 0.0)
			                      - excess_fr * LL15[nlayr]);

			FASW = MathUtilities.Divide(avail_sw, pot_avail_sw, 0.0);
			WaterDeficit = MathUtilities.Constrain(pot_avail_sw - avail_sw, 0.0, 100000);
		}

		private int GetLayerIndex()
		{
			double[] cumThickness = Soil.ToCumThickness(soil.Thickness);
			for (int i = 1; i < cumThickness.Length; i++)
			{
				if (FASWDepth < cumThickness[i])
					return i - 1;
			}
			
			return cumThickness.Length - 1;
		}

	}
}
```
          SurfaceOrganicMatter: same as SinglePatchBasexx.SinglePatchxx.SurfaceOrganicMatter
          Soil: SoilType=Generic medium texture; Region=Canterbury; Country=New Zealand; Latitude=0; Longitude=0
            Analysis: PHUnits=Water; BoronUnits=HotWater
              Thickness  Rocks  PH  CEC  ParticleSizeSand  ParticleSizeSilt  ParticleSizeClay
              150        0      6   13   15                65                20
              150        0      6   11   20                60                20
              200        0      6   9    20                60                20
              250        0      6   8    25                60                15
              250        0      6   7    35                55                10
              500        0      6   6    35                55                10
            Water
              Thickness  BD    AirDry  LL15  DUL   SAT   KS
              150        1.3   0.05    0.15  0.36  0.45  4500
              150        1.4   0.17    0.17  0.34  0.42  2500
              200        1.5   0.19    0.19  0.33  0.38  200
              250        1.6   0.17    0.17  0.3   0.36  1500
              250        1.45  0.1     0.1   0.2   0.38  5000
              500        1.35  0.1     0.1   0.2   0.39  10000
              SoilCrop RyegrassSoil: LL=[0.15, 0.17, 0.19, 0.17, 0.1, 0.1]; KL=[0.06, 0.06, 0.03, 0.02, 0, 0]; XF=[1, 1, 1, 1, 0, 0]
              SoilCrop WhiteCloverSoil: LL=[0.15, 0.17, 0.19, 0.17, 0.1, 0.1]; KL=[0.1, 0.05, 0, 0, 0, 0]; XF=[1, 1, 0, 0, 0, 0]
            SoilWater: SummerDate=21-Sep; SummerU=6; SummerCona=3.5; WinterDate=23-Mar; WinterU=6; WinterCona=2.5; DiffusConst=88; DiffusSlope=35; Salb=0.2; CN2Bare=0.7; CNRed=20; CNCov=0.8; max_pond=0; Thickness=[150, 150, 200, 250, 250, 500]; SWCON=[0.45, 0.35, 0.1, 0.15, 0.3, 0.2]; residueinterception=0
            SoilNitrogen: fom_type=[default, manure, mucuna, lablab, shemp, stable]; fract_carb=[0.2, 0.3, 0.54, 0.57, 0.45, 0]; fract_cell=[0.7, 0.3, 0.37, 0.37, 0.47, 0.1]; fract_lign=[0.1, 0.4, 0.09, 0.06, 0.08, 0.9]
            SoilOrganicMatter: RootCN=40; RootWt=1000; SoilCN=12; EnrACoeff=7.4; EnrBCoeff=0.2; OCUnits=Total
              Thickness  OC    FBiom  FInert
              150        2.5   0.04   0.4
              150        1.25  0.025  0.6
              200        0.5   0.015  0.8
              250        0.2   0.01   0.9
              250        0.15  0.008  0.95
              500        0.1   0.008  0.98
            InitialWater Initial water: PercentMethod=EvenlyDistributed; FractionFull=0.9
            Sample Initial nitrogen: NO3Units=kgha; NH4Units=kgha; SWUnits=Volumetric; OCUnits=Total; PHUnits=Water
              Thickness  NO3  NH4
              200        25   1
              200        15   0.5
              600        20   0.5
              500        5    0.2
            CERESSoilTemperature
          SoluteManager
          Sward: same as SinglePatchBasexx.SinglePatchxx.Sward
          Report SinglePatchReport: EventNames=[Clock].DoReport
            VariableNames:
              [Clock].Today as Date
              sum([Soil].SoilWater.SWmm) as TotalSoilWater
              sum([Soil].SoilNitrogen.Denitrification) as DenitrifiedN
              sum([Soil].SoilNitrogen.MineralisedN) as MineralisedSoilN
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