Simulations: Version=190
  DataStore
  Memo ToDo
    - crash the sim if VOlatilisation is there and the water model is SoilWater
  Experiment TimeOfYear
    Factors
      Factor
        Specification=[Fertilise].Script.Dates = 15-jan, 15-mar, 15-may, 15-jul, 15-sep, 15-nov
    Simulation Sim
      Clock: Start=1980-01-01; End=1980-12-31
      Weather: FileName=%root%/Examples/WeatherFiles/NZ_Lincoln.met; Latitude=-43.624; Tav=11.4; Amp=11.5
      MicroClimate: a_interception=0; b_interception=1; c_interception=0; d_interception=0; SoilHeatFluxFraction=0.4; MinimumHeightDiffForNewLayer=0; NightInterceptionFraction=0.5; ReferenceHeight=2
      Forages
        Parameters:
          Name                          LiveDigestibility  DeadDigestibility  LiveFractionConsumable  DeadFractionConsumable  LiveMinimumBiomass  DeadMinimumBiomass
          SurfaceOrganicMatter.Residue  0.7                0.3                1                       1                       100                 0
          AGPRyegrass.Leaf              FromModel          FromModel          1                       1                       100                 0
          AGPRyegrass.Stem              FromModel          FromModel          1                       1                       100                 0
          AGPRyegrass.Stolon            FromModel          FromModel          1                       1                       100                 0
          AGPWhiteClover.Leaf           FromModel          FromModel          1                       1                       100                 0
          AGPWhiteClover.Stem           FromModel          FromModel          1                       1                       100                 0
          AGPWhiteClover.Stolon         FromModel          FromModel          1                       1                       100                 0
      SoilArbitrator
      Summary
      Zone Field: Area=1; Slope=0; AspectAngle=0; Altitude=50
        SimpleGrazing: GrazingRotationType=0; SimpleGrazingFrequencyString=end of month; SimpleMinGrazable=0; SimpleGrazingResidual=1500; FlexibleGrazePostDM=0; FractionDefoliatedBiomassToSoil=[0]; FractionDefoliatedNToSoil=[0]; FractionExcretedNToDung=[0]; CNRatioDung=0; DepthUrineIsAdded=0; SendDungElsewhere=0; SendUrineElsewhere=0; FractionPopulationDecline=0; TramplingOn=false; MaximumPropLitterMovedToSoil=0.1; PastureConsumedAtMaximumRateOfLitterRemoval=1200
        Manager Fertilise
          EachYear = True
          Dates = 15-jan
          UseCritNThreshold = False
          CritNThreshold = 50
          CritNDepth = 75
          Depth = 0
          Amount = 50
          FertiliserType = UreaN
```csharp
using Models.Interfaces;
using System.Linq;
using APSIM.Shared.Utilities;
using Models.PMF;
using Models.Soils;
using Models.Soils.Nutrients;
using Models.Core;
using System;
using Models.Soils.Nutrients;

namespace Models
{
    [Serializable]
    public class Script : Model
    {
        [Link] private Clock clock;
        [Link] private Fertiliser fertiliser;
        [Link] private ISummary summary;
        [Link] private Soil soil;
        private Nutrient nutrient;
        private Nutrient soilN;
        [Link]
        private IPhysical soilPhysical;
        [Link]
        private Nutrient Nutrient;
        [Link(Path="[SurfaceOrganicMatter].SurfaceResidue.Decomposition")]
        private OrganicFlow ResidueDecomposition;


        [Separator("Fertiliser will be applied on the date(s) below")]
        [Description("Apply fertiliser on the same day(s) each year? If no, then must include the year of appliaction below")]
        public bool EachYear { get; set; }

        [Description("Dates for one or more fertiliser applications (dd-mmm or dd-mmm-yyyy) as a list with a comma between dates")]
        public string[] Dates { get; set; }

        [Separator("Test for the mineral N in the soil and don't apply the fertiliser if greater than X kgN/ha is stored in the soil above a depth of Y mm")]
        [Description("Use a critical soil mineral N to prevent application above a threshold?")]
        public bool UseCritNThreshold { get; set; }

        [Description("Don't add fertiliser if N in the soil to the depth below exceeds (kg/ha)")]
        public double CritNThreshold { get; set; }

        [Description("Depth to which the amount of N in the soil should be calculated (mm)")]
        public double CritNDepth { get; set; }

        [Separator("Fertiliser application details")]
        [Description("Depth at which to apply the fertiliser (mm)")]
        public double Depth { get; set; }

        [Description("Amount of fertiliser to apply (kg N /ha) per application")]
        public double Amount { get; set; }

        [Description("Fertiliser type - select from the list")]
        [Display(Type = DisplayType.FertiliserType)]public string FertiliserType { get; set; }


        [EventSubscribe("StartOfSimulation")]
        private void FindSoilNOrNutrient(object sender, EventArgs e)
        {
            nutrient = this.FindInScope<Nutrient>() as Nutrient;
            soilN = this.FindInScope<Nutrient>() as Nutrient;

            if (nutrient == null && soilN == null)
                throw new Exception(string.Format("Error in script {0}: Unable to find nutrient or soilN.", Name));
        }

        [EventSubscribe("DoManagement")]
        private void OnDoManagement(object sender, EventArgs e)
        {
            if (OnApplicationDate())
            {
                if (NContentBelowThreshold())
                    fertiliser.Apply(Amount, FertiliserType, Depth);
                else
                    summary.WriteMessage(this, "Skipping fertiliser application due to soil mineral N content being above critical threshold.", MessageType.Diagnostic);
            }
        }

        /// <summary>Checks if today's date is one of the specified fertiliser application dates.</summary>
        private bool OnApplicationDate()
        {
            if (EachYear)
                return Dates.Any(d => DateUtilities.DatesEqual(d, clock.Today));
            
            DateTime[] dates = Dates.Select(d => DateTime.ParseExact(d, "d-MMM-yyyy", null)).ToArray();
            return dates.Any(d => SameDate(d, clock.Today));
        }

        /// <summary>Checks if N content in soil is below critical threshold.</summary>
        private bool NContentBelowThreshold()
        {
            if (!UseCritNThreshold)
                return true;
            
            double[] weights = GetLayerWeights();
            double cumSoilN = 0;

            for (int i = 0; i < soilPhysical.Thickness.Length; i++)
            {
                if (nutrient != null)
                    cumSoilN += weights[i] * nutrient.MineralN[i];
                else if (soilN != null)
                    cumSoilN += weights[i] * soilN.MineralN[i];
            }

            return cumSoilN <= CritNThreshold;
        }

        private double[] GetLayerWeights()
        {
            double[] weights = new double[soilPhysical.Thickness.Length];
            double cumDepth = 0;

            for (int i = 0; i < soilPhysical.Thickness.Length; i++)
            {
                cumDepth += soilPhysical.Thickness[i];
                if (cumDepth < CritNDepth)
                    weights[i] = 1;
                else if (cumDepth - soilPhysical.Thickness[i] <= CritNDepth)
                    weights[i] = (CritNDepth - (cumDepth - soilPhysical.Thickness[i])) / soilPhysical.Thickness[i];
                else
                    weights[i] = 0;
            }

            return weights;
        }

        private bool SameDate(DateTime d1, DateTime d2)
        {
            return d1.Year == d2.Year && d1.DayOfYear == d2.DayOfYear;
        }
    }
}
```
        Manager AutomaticIrrigation
          allowIrrigation = True
          seasonStart = 1-sep
          seasonEnd = 30-apr
          seasonsAllocation = 10000
          triggerDeficit = 50
          targetDeficit = 100
          returndays = 21
          maximumAmount = 100
          depthPAWC = 300
```csharp
using Newtonsoft.Json;
using APSIM.Shared.Utilities;
using System.Xml.Serialization;
using Models.Soils;
using Models.PMF;
using Models.Core;
using System;
using System.Linq;
using Models.Interfaces;


        
namespace Models
{
    [Serializable] 
    [System.Xml.Serialization.XmlInclude(typeof(Model))]
    public class Script : Model
    {
        [Link] private ISummary summary;
        [Link] private Irrigation Irrigation;
        [Link] private Clock Clock;
        [Link] private Soil Soil;
        [Link(IsOptional = true)] private IPlant existingCrop;
        private DateTime StartDate;
        private DateTime EndDate;
        private double TopDUL;
        private double TopLL;
        private int nLayers;
        [Link]
        private IPhysical soilPhysical;
        [Link]
        private ISoilWater waterBalance;
        //Communication to other modules
       
        //User inputs from properties tab
        [Description("Turn irrigation on?")]
        public bool allowIrrigation { get; set; }
        [Description("Start of irrigation season (dd-MMM)")]
        public string seasonStart { get; set; }
        [Description("End of irrigation season (dd-MMM)")]
        public string seasonEnd { get; set; }
        [Description("Season allocation (mm)")]
        public double seasonsAllocation { get; set; }
        [Description("Deficit to trigger irrigation (% PAWC)")]
        public double triggerDeficit { get; set; }
        [Description("Deficit to stop irrigaton (% PAWC)")]
        public double targetDeficit { get; set; }
        [Description("Minimum days for irrigation to return")]
        public double returndays { get; set; }
        [Description("Maximum irrigation application (mm/day)")]
        public double maximumAmount { get; set; }
        [Description("Depth to calculate PAWC (mm)")]
        public double depthPAWC { get; set; }

        //Class members
        [JsonIgnore] public double TopSWdeficit { get; set; }
        [JsonIgnore] public double TopSWC { get; set; }
        [JsonIgnore] public double DaysSinceIrrigation { get; set; }
        [JsonIgnore] public double AmountToApply { get; set; }
        [JsonIgnore] public double SeasonAppliedAmount { get; set; }
        
        private bool IrrigationIsAllowed { get; set; }
        private bool SeasonIsOpen { get; set; }
        private bool CropIsActive { get; set; }
        private bool IrrigatorIsAvailable { get; set; }
        private bool SoilIsDry { get; set; }

    
        //Calculate static soil variables
        [EventSubscribe("StartOfSimulation")]
        private void OnStartOfSimulation(object sender, EventArgs e)
        {   
            //Set the season dates
            StartDate = DateTime.Parse(seasonStart + "-" + Clock.Today.Year.ToString());
            EndDate = DateTime.Parse(seasonEnd + "-" + Clock.Today.Year.ToString());
            
            //Can we irrigate at all?
            IrrigationIsAllowed = false; 
            if (allowIrrigation)
                IrrigationIsAllowed = true; 

            //Calculate soil water variables
            double depthFromSurface = 0.0;
            double fracLayer = 0.0;
            nLayers = soilPhysical.Thickness.Length;
            for (int layer = 0; layer < nLayers; layer++)
            {
                fracLayer = Math.Min(1.0, (depthPAWC - depthFromSurface) / soilPhysical.Thickness[layer]);
                TopLL += soilPhysical.LL15mm[layer] * fracLayer;
                TopDUL += soilPhysical.DULmm[layer] * fracLayer;
                depthFromSurface += soilPhysical.Thickness[layer];
                if (depthFromSurface >= depthPAWC)
                    layer = nLayers;
            }
        }
             
        //Determine daily requirement for irrigation
        [EventSubscribe("StartOfDay")]
        private void OnStartOfDay(object sender, EventArgs e)
        {
            //Can we irrigate today?          
            SeasonIsOpen = isBetween(Clock.Today, StartDate, EndDate);
            if (!SeasonIsOpen)
                SeasonAppliedAmount = 0;

            //Is there a crop in the ground that needs irrigation?
            CropIsActive = false;
            if ((existingCrop != null) && (existingCrop.IsAlive))
                CropIsActive = true;
            //if ((existingCrop.Phenology.Stage >= 3.0) && (existingCrop.Phenology.Stage < 6.0))
          
            //Is the irrigator available?
            IrrigatorIsAvailable = false;
            DaysSinceIrrigation += 1;
            if (DaysSinceIrrigation >= returndays)
                IrrigatorIsAvailable = true;
          
            //Is the soil dry enough to require irrigation?
            SoilIsDry = false;
            double depthFromSurface = 0.0;
            double fracLayer = 0.0;
            TopSWC = 0.0;
            for (int layer = 0; layer < nLayers; layer++)
            //for (int layer = 0; depthFromSurface < depthPAWC + soilPhysical.Thickness[layer]; layer++)
            {
                fracLayer = Math.Min(1.0, (depthPAWC - depthFromSurface) / soilPhysical.Thickness[layer]);
                TopSWC += waterBalance.SWmm[layer] * fracLayer;
                depthFromSurface += soilPhysical.Thickness[layer];
                if (depthFromSurface >= depthPAWC)
                    layer = nLayers;
            }
            
            TopSWdeficit = TopSWC - TopDUL;
            if (Math.Max(0.0, -TopSWdeficit) >= (TopDUL - TopLL) * (100 - triggerDeficit) / 100)
                SoilIsDry = true;
                
            //Are all the conditions ratifying irrigation
            if (IrrigationIsAllowed && SeasonIsOpen && CropIsActive && IrrigatorIsAvailable && SoilIsDry)
            {
                //Lets bloody well irrigate then!!!!
                AmountToApply = TopDUL * targetDeficit / 100 - TopSWC;
                AmountToApply = Math.Max(0.0, Math.Min(AmountToApply, seasonsAllocation - SeasonAppliedAmount));
                Irrigation.Apply(AmountToApply);
                DaysSinceIrrigation = 0;
                SeasonAppliedAmount += AmountToApply;
            }
        }
        
        ///Checks whether theDate is between iniDate and endDate (non-year specific)
        private bool isBetween(DateTime theDay, DateTime iniDate, DateTime endDate)
        {
            bool result = false;
            if (iniDate.DayOfYear < endDate.DayOfYear)
            {
                // period is within one year, ex: summer in the northern hemisphere
                if ((theDay.DayOfYear >= iniDate.DayOfYear) && (theDay.DayOfYear <= endDate.DayOfYear))
                    result = true;
            }
            else
            {
                // period goes over the end of the year, ex: summer in the southern hemisphere
                if ((theDay.DayOfYear >= iniDate.DayOfYear) || (theDay.DayOfYear <= endDate.DayOfYear))
                    result = true;
            }
            
            return result;
        }
    }
}
```
        Irrigation
        Fertiliser
        SurfaceOrganicMatter: InitialResidueName=Sward; InitialResidueType=grass; InitialResidueMass=1000; InitialStandingFraction=0; InitialCPR=0; InitialCNR=15
        PastureSpecies AGPRyegrass: doyGermination=275; daysEmergenceToAnthesis=120; daysAnthesisToMaturity=85; degreesDayForAnthesis=1100; degreesDayForMaturity=900; daysAnnualsFactor=45; CanopyType=PastureSpecies; InitialShootDM=1500; InitialRootDM=450; InitialRootDepth=750; initialDMFractionsGrasses=[0.15, 0.25, 0.25, 0.05, 0.05, 0.1, 0.1, 0.05, 0, 0, 0]; initialDMFractionsForbs=[0.2, 0.2, 0.15, 0.05, 0.1, 0.15, 0.1, 0.05, 0, 0, 0]; PhotosyntheticEfficiency=0.01; PhotosynthesisCurveFactor=0.8; FractionPAR=0.5; ReferenceCO2=380; CO2EffectScaleFactor=700; CO2EffectOffsetFactor=600; CO2EffectMinimum=0.7; CO2EffectExponent=2; ReproSeasonDurationCoeff=2; ReproSeasonShouldersLengthFactor=1; ReproSeasonOnsetDurationFactor=0.6; RelativeTurnoverEmerging=2; DetachmentDroughtCoefficient=3; DetachmentDroughtEffectMin=0.1; TurnoverStockFactor=0.01; TurnoverDefoliationEffectMin=0.025; MinimumGreenLeafProp=0.8; MinimumGreenRootProp=0.5
          initialDMFractionsLegumes=[0.16, 0.23, 0.22, 0.05, 0.03, 0.05, 0.05, 0.01, 0.04, 0.08, 0.08]
          LinearInterpolationFunction FVPDFunction
        PastureSpecies AGPWhiteClover: doyGermination=275; daysEmergenceToAnthesis=120; daysAnthesisToMaturity=85; degreesDayForAnthesis=1100; degreesDayForMaturity=900; daysAnnualsFactor=45; CanopyType=PastureSpecies; InitialShootDM=500; InitialRootDM=150; InitialRootDepth=350; initialDMFractionsGrasses=[0.15, 0.25, 0.25, 0.05, 0.05, 0.1, 0.1, 0.05, 0, 0, 0]; initialDMFractionsForbs=[0.2, 0.2, 0.15, 0.05, 0.1, 0.15, 0.1, 0.05, 0, 0, 0]; PhotosyntheticEfficiency=0.01; PhotosynthesisCurveFactor=0.8; FractionPAR=0.5; ReferenceCO2=380; CO2EffectScaleFactor=700; CO2EffectOffsetFactor=600; CO2EffectMinimum=0.7; CO2EffectExponent=2; ReproSeasonDurationCoeff=2; ReproSeasonShouldersLengthFactor=1; ReproSeasonOnsetDurationFactor=0.6; RelativeTurnoverEmerging=2; DetachmentDroughtCoefficient=3; DetachmentDroughtEffectMin=0.1; TurnoverStockFactor=0.01; TurnoverDefoliationEffectMin=0.025; MinimumGreenLeafProp=0.8; MinimumGreenRootProp=0.5
          initialDMFractionsLegumes=[0.16, 0.23, 0.22, 0.05, 0.03, 0.05, 0.05, 0.01, 0.04, 0.08, 0.08]
          LinearInterpolationFunction FVPDFunction
        Report: EventNames=[Clock].EndOfDay
          VariableNames:
            [Clock].Today as Date
            [Weather].Rain as Rain
            [Irrigation].IrrigationApplied as Irrigation
            [AGPRyegrass].HarvestedWt + [AGPWhiteClover].HarvestedWt as HarvestedWt   //the amount harvested (kg DM /ha)
            [AGPRyegrass].AboveGroundWt + [AGPWhiteClover].AboveGroundWt as AboveGroundWt
            sum([Nutrient].NH3Volatilisation.EmissionNH3) as Volat
            sum([Nutrient].Urea.kgha[1:2]) as Urea30mm
            sum([Nutrient].NH4.kgha[1:2]) as NH430mm
            sum([Nutrient].NO3.kgha[1:2]) as NO330mm
            mean([Nutrient].NH3Volatilisation.pH[1:2]) as pH
        Soil: ASCOrder=Pumice; SoilType=Sandy loam; LocalName=Oropi (Sandy loam (Te Puke No1329)); Site=No.2 Rd; NearestTown=Te Puke; Region=BayOfPlenty; Country=New Zealand; NaturalVegetation=long term grass; ApsoilNumber=1329; Latitude=-37.863; Longitude=176.291; LocationAccuracy=+/-50 m; YearOfSampling=1982
          DataSource=The database of New Zealand soils was compiled by AgResearch (www.agresearch.co.nz) and based on soil properties gathered, mainly from publications, in the course of conducting several simulation-based research projects but particularly from the Pastoral 21 Environment program which was funded by the New Zealand Ministry for Business, Innovation and Employment,  Dairy NZ, Fonterra and Meat & Wool NZ.
          Comments=The data is a combination of published or supplied measurements, pedotransfer functions, and expert opinion. See Cichota et al. (2013; Soil Research 51: 92-111, http://dx.doi.org/10.1071/SR12338) for a description of the pedotransfer functions. The soil carbon and fresh organic matter settings have been set as those broadly appropriate for permanent productive pastoral systems, see Cichota el al. (2012; Soil Research 50: 694-707, http://dx.doi.org/10.1071/SR12208). Users should take care to adapt these to local conditions before using the data in simulations. FOM values estimated to be 900 kg/ha of FOM in top 600mm of soil and another 100 kg/ha below.
          Physical
            Thickness  ParticleSizeSand  ParticleSizeSilt  ParticleSizeClay  Rocks  BD    AirDry  LL15   DUL    SAT    KS
            200        59.63             34.37             6                 0      0.91  0.054   0.165  0.403  0.56   20963.266
            150        63.7              31.68             4.62              0      0.93  0.043   0.13   0.321  0.566  16928.41
            300        50.12             38.56             11.32             0      0.81  0.072   0.219  0.409  0.606  10150.978
            350        61.19             25.3              13.51             0      0.82  0.073   0.221  0.388  0.615  9243.651
            SoilCrop AGPRyegrassSoil: LL=[0.165, 0.13, 0.219, 0.221]; KL=[0.06, 0.06, 0.057, 0.04]; XF=[1, 1, 1, 1]
            SoilCrop AGPWhiteCloverSoil: LL=[0.165, 0.13, 0.219, 0.221]; KL=[0.06, 0.06, 0.057, 0.04]; XF=[1, 1, 1, 1]
          Organic: FOMCNRatio=40; CarbonUnits=Total
            Thickness  Carbon  SoilCNRatio  FBiom  FInert  FOM
            200        5.4     12.273       0.075  0.638   123.785
            150        2.5     12.273       0.017  0.801   91.7021
            300        2.6     12.273       0.008  0.924   50.3272
            350        0.9     12.273       0.008  0.97    24.9918
            2000       0.8     12.273       0.008  0.994   9.19395
          Chemical: PHUnits=Water
            Thickness  PH   CEC
            200        6.5  15.7
            150        6.5  9.4
            300        6.5  10.4
            350        6.5  8.1
            2000       6.5  10.1
            PH source: Estimated based on local knowledge
          Nutrient
            NH3Volatilisation: Depth_for_NH3=50; k_BC=0.03; k_pH_hyd=1; k_pH_nit=1; k_pH_x=0.2; k_AFPV=300; f_NV=[1, 1, 1, 0.3, 0.3, 0, 0, 0, 0, 0, 0]; f_AV=0.5; CritRain1=3; CritRain2=10; PotGasExchangeNH=0; RainFactor=0
          Swim3: Salb=0.13; CN2Bare=0; CNRed=0; CNCov=0.8; KDul=1; PSIDul=-100; VC=true; DTMin=0; DTMax=1400; MaxWaterIncrement=10; SpaceWeightingFactor=0; SoluteSpaceWeightingFactor=1; Dis=0; Disp=1; A=2; DTHC=0.1; DTHP=2; vcon1=7.28e-09; vcon2=7.26e-07; eo_time=06:00; eo_durn=720; default_rain_time=00:00; default_rain_duration=720; Diagnostics=false
          Water: Thickness=[200, 150, 300, 350, 2000]; InitialValues=[0.403, 0.321, 0.409, 0.388, 0.489]; InitialPAWmm=727.7; RelativeTo=LL15; FilledFromTop=false
          Solute NO3: InitialValuesUnits=ppm; WaterTableConcentration=0; D0=0; DepthConstant=0; MaxDepthSoluteAccessible=0; RunoffEffectivenessAtMovingSolute=0; MaxEffectiveRunoff=0
            Thickness  InitialValues  Exco  FIP
            200        6              0     1
            150        2              0     1
            300        1              0     1
            350        1              0     1
            2000       1              0     1
          Solute NH4: InitialValuesUnits=ppm; WaterTableConcentration=0; D0=0; DepthConstant=0; MaxDepthSoluteAccessible=0; RunoffEffectivenessAtMovingSolute=0; MaxEffectiveRunoff=0
            Thickness  InitialValues  Exco  FIP
            200        1              1     1
            150        1              1     1
            300        1              1     1
            350        1              1     1
            2000       1              1     1
          Solute Urea: InitialValuesUnits=kg/ha; WaterTableConcentration=0; D0=0; DepthConstant=0; MaxDepthSoluteAccessible=0; RunoffEffectivenessAtMovingSolute=0; MaxEffectiveRunoff=0
            Thickness  InitialValues  Exco  FIP
            200        0              0     1
            150        0              0     1
            300        0              0     1
            350        0              0     1
            2000       0              0     1
          LayerStructure: Thickness=[10, 20, 30, 40, 50, 50, 50, 50, 200, 250, 250]
          SoilTemperature Temperature
  Experiment DoesRainKill_DayOf
    Factors
      Factor: Specification=[ModifyRain].Script.AssertedRainfallAmount = 0 to 15 step 3
    Simulation Sim1
      Clock: Start=1980-01-03; End=1980-01-31
      Weather: FileName=%root%/Examples/WeatherFiles/NZ_Lincoln.met; Latitude=-43.624; Tav=11.4; Amp=11.5
      Manager ModifyRain
        AssertedRainfallAmount = 0
        AssertedRainfallDate = 01/15/1980 00:00:00
```csharp
using Models.Interfaces;
using System.Linq;
using APSIM.Shared.Utilities;
using Models.PMF;
using Models.Soils;
using Models.Soils.Nutrients;
using Models.Core;
using System;
using Models.Soils.Nutrients;

namespace Models
{
    [Serializable]
    public class Script : Model
    {
        [Link] private Clock clock;
        [Link] private IWeather weather;

        [Separator("???")]
        [Description("Amount of rainfall")]
        public double AssertedRainfallAmount { get; set; }

        [Description("Date of rainfall")]
        public DateTime AssertedRainfallDate { get; set; }

        [EventSubscribe("StartOfSimulation")]
        private void FindSoilNOrNutrient(object sender, EventArgs e)
        {
        }

        [EventSubscribe("DoManagement")]
        private void OnDoManagement(object sender, EventArgs e)
        {
            if (clock.Today != AssertedRainfallDate)
                weather.Rain = 0.0;
            else
                weather.Rain = AssertedRainfallAmount;
            
        }

    }
}
```
      MicroClimate: a_interception=0; b_interception=1; c_interception=0; d_interception=0; SoilHeatFluxFraction=0.4; MinimumHeightDiffForNewLayer=0; NightInterceptionFraction=0.5; ReferenceHeight=2
      Forages: same as TimeOfYear.Sim.Forages
      SoilArbitrator
      Summary
      Zone Field: Area=1; Slope=0; AspectAngle=0; Altitude=50
        SimpleGrazing: same as TimeOfYear.Sim.Field.SimpleGrazing
        Manager Fertilise: same as TimeOfYear.Sim.Field.Fertilise
        Manager AutomaticIrrigation: same as TimeOfYear.Sim.Field.AutomaticIrrigation
        Irrigation
        Fertiliser
        SurfaceOrganicMatter: InitialResidueName=Sward; InitialResidueType=grass; InitialResidueMass=1000; InitialStandingFraction=0; InitialCPR=0; InitialCNR=15
        PastureSpecies AGPRyegrass (disabled): doyGermination=275; daysEmergenceToAnthesis=120; daysAnthesisToMaturity=85; degreesDayForAnthesis=1100; degreesDayForMaturity=900; daysAnnualsFactor=45; CanopyType=PastureSpecies; InitialShootDM=1500; InitialRootDM=450; InitialRootDepth=750; initialDMFractionsGrasses=[0.15, 0.25, 0.25, 0.05, 0.05, 0.1, 0.1, 0.05, 0, 0, 0]; initialDMFractionsForbs=[0.2, 0.2, 0.15, 0.05, 0.1, 0.15, 0.1, 0.05, 0, 0, 0]; PhotosyntheticEfficiency=0.01; PhotosynthesisCurveFactor=0.8; FractionPAR=0.5; ReferenceCO2=380; CO2EffectScaleFactor=700; CO2EffectOffsetFactor=600; CO2EffectMinimum=0.7; CO2EffectExponent=2; ReproSeasonDurationCoeff=2; ReproSeasonShouldersLengthFactor=1; ReproSeasonOnsetDurationFactor=0.6; RelativeTurnoverEmerging=2; DetachmentDroughtCoefficient=3; DetachmentDroughtEffectMin=0.1; TurnoverStockFactor=0.01; TurnoverDefoliationEffectMin=0.025; MinimumGreenLeafProp=0.8; MinimumGreenRootProp=0.5
          initialDMFractionsLegumes=[0.16, 0.23, 0.22, 0.05, 0.03, 0.05, 0.05, 0.01, 0.04, 0.08, 0.08]
          LinearInterpolationFunction FVPDFunction
        PastureSpecies AGPWhiteClover (disabled): doyGermination=275; daysEmergenceToAnthesis=120; daysAnthesisToMaturity=85; degreesDayForAnthesis=1100; degreesDayForMaturity=900; daysAnnualsFactor=45; CanopyType=PastureSpecies; InitialShootDM=500; InitialRootDM=150; InitialRootDepth=350; initialDMFractionsGrasses=[0.15, 0.25, 0.25, 0.05, 0.05, 0.1, 0.1, 0.05, 0, 0, 0]; initialDMFractionsForbs=[0.2, 0.2, 0.15, 0.05, 0.1, 0.15, 0.1, 0.05, 0, 0, 0]; PhotosyntheticEfficiency=0.01; PhotosynthesisCurveFactor=0.8; FractionPAR=0.5; ReferenceCO2=380; CO2EffectScaleFactor=700; CO2EffectOffsetFactor=600; CO2EffectMinimum=0.7; CO2EffectExponent=2; ReproSeasonDurationCoeff=2; ReproSeasonShouldersLengthFactor=1; ReproSeasonOnsetDurationFactor=0.6; RelativeTurnoverEmerging=2; DetachmentDroughtCoefficient=3; DetachmentDroughtEffectMin=0.1; TurnoverStockFactor=0.01; TurnoverDefoliationEffectMin=0.025; MinimumGreenLeafProp=0.8; MinimumGreenRootProp=0.5
          initialDMFractionsLegumes=[0.16, 0.23, 0.22, 0.05, 0.03, 0.05, 0.05, 0.01, 0.04, 0.08, 0.08]
          LinearInterpolationFunction FVPDFunction
        Report: EventNames=[Clock].EndOfDay
          VariableNames:
            [Clock].Today as Date
            [Weather].Rain as Rain
            [Irrigation].IrrigationApplied as Irrigation
            //[AGPRyegrass].HarvestedWt + [AGPWhiteClover].HarvestedWt as HarvestedWt   //the amount harvested (kg DM /ha)
            //[AGPRyegrass].AboveGroundWt + [AGPWhiteClover].AboveGroundWt as AboveGroundWt
            sum([Nutrient].NH3Volatilisation.EmissionNH3) as Volat
            sum([Nutrient].Urea.kgha[1:2]) as Urea30mm
            sum([Nutrient].NH4.kgha[1:2]) as NH430mm
            sum([Nutrient].NO3.kgha[1:2]) as NO330mm
            mean([Nutrient].NH3Volatilisation.pH[1:2]) as pH
        Soil: same as TimeOfYear.Sim.Field.Soil
  Experiment DoesRainKill_DayPlus1
    Factors
      Factor: Specification=[ModifyRain].Script.AssertedRainfallAmount = 0 to 15 step 3
    Simulation Sim2
      Clock: Start=1980-01-03; End=1980-01-31
      Weather: FileName=%root%/Examples/WeatherFiles/NZ_Lincoln.met; Latitude=-43.624; Tav=11.4; Amp=11.5
      Manager ModifyRain
        AssertedRainfallAmount = 0
        AssertedRainfallDate = 01/16/1980 00:00:00
        script: same as in DoesRainKill_DayOf.Sim1.ModifyRain
      MicroClimate: a_interception=0; b_interception=1; c_interception=0; d_interception=0; SoilHeatFluxFraction=0.4; MinimumHeightDiffForNewLayer=0; NightInterceptionFraction=0.5; ReferenceHeight=2
      Forages: same as TimeOfYear.Sim.Forages
      SoilArbitrator
      Summary
      Zone Field: same as DoesRainKill_DayOf.Sim1.Field
  Experiment DoesRainKill_xxx
    Factors
      Factor
        Specification=[ModifyRain].Script.AssertedRainfallDate = 14-jan-1980, 15-jan-1980, 16-jan-1980, 17-jan-1980, 18-jan-1980, 19-jan-1980, 20-jan-1980
    Simulation Sim3
      Clock: Start=1980-01-03; End=1980-01-31
      Weather: FileName=%root%/Examples/WeatherFiles/NZ_Lincoln.met; Latitude=-43.624; Tav=11.4; Amp=11.5
      Manager ModifyRain
        AssertedRainfallAmount = 6
        AssertedRainfallDate = 01/18/1980 00:00:00
        script: same as in DoesRainKill_DayOf.Sim1.ModifyRain
      MicroClimate: a_interception=0; b_interception=1; c_interception=0; d_interception=0; SoilHeatFluxFraction=0.4; MinimumHeightDiffForNewLayer=0; NightInterceptionFraction=0.5; ReferenceHeight=2
      Forages: same as TimeOfYear.Sim.Forages
      SoilArbitrator
      Summary
      Zone Field: Area=1; Slope=0; AspectAngle=0; Altitude=50
        SimpleGrazing: same as TimeOfYear.Sim.Field.SimpleGrazing
        Manager Fertilise: same as TimeOfYear.Sim.Field.Fertilise
        Manager AutomaticIrrigation: same as TimeOfYear.Sim.Field.AutomaticIrrigation
        Irrigation
        Fertiliser
        SurfaceOrganicMatter: InitialResidueName=Sward; InitialResidueType=grass; InitialResidueMass=1000; InitialStandingFraction=0; InitialCPR=0; InitialCNR=15
        PastureSpecies AGPRyegrass (disabled): same as DoesRainKill_DayOf.Sim1.Field.AGPRyegrass
        PastureSpecies AGPWhiteClover (disabled): same as DoesRainKill_DayOf.Sim1.Field.AGPWhiteClover
        Report: EventNames=[Clock].EndOfDay
          VariableNames:
            [Clock].Today as Date
            [Weather].Rain as Rain
            [Irrigation].IrrigationApplied as Irrigation
            //[AGPRyegrass].HarvestedWt + [AGPWhiteClover].HarvestedWt as HarvestedWt   //the amount harvested (kg DM /ha)
            //[AGPRyegrass].AboveGroundWt + [AGPWhiteClover].AboveGroundWt as AboveGroundWt
            sum([Nutrient].NH3Volatilisation.EmissionNH3) as Volat
            sum([Nutrient].Urea.kgha[1:2]) as Urea30mm
            sum([Nutrient].NH4.kgha[1:2]) as NH430mm
            sum([Nutrient].NO3.kgha[1:2]) as NO330mm
            mean([Nutrient].NH3Volatilisation.pH[1:2]) as pH
            [Nutrient].NH3Volatilisation.RainFactor as RainFactor
        Soil: same as TimeOfYear.Sim.Field.Soil
  Experiment CheckRainFactor
    Factors
      Factor: Specification=[ModifyRain].Script.AssertedRainfallAmount = 0 to 20 step 1
    Simulation Sim4
      Clock: Start=1980-01-03; End=1980-01-31
      Weather: FileName=%root%/Examples/WeatherFiles/NZ_Lincoln.met; Latitude=-43.624; Tav=11.4; Amp=11.5
      Manager ModifyRain
        AssertedRainfallAmount = 6
        AssertedRainfallDate = 01/15/1980 00:00:00
        script: same as in DoesRainKill_DayOf.Sim1.ModifyRain
      MicroClimate: a_interception=0; b_interception=1; c_interception=0; d_interception=0; SoilHeatFluxFraction=0.4; MinimumHeightDiffForNewLayer=0; NightInterceptionFraction=0.5; ReferenceHeight=2
      Forages: same as TimeOfYear.Sim.Forages
      SoilArbitrator
      Summary
      Zone Field: same as DoesRainKill_xxx.Sim3.Field
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