Simulations: Version=222
  DataStore
    Input Obs_Mace: FileNames=[GerminationLab_Obs_Mace.csv]
    Input Obs_Mace18: FileNames=[GerminationLab_Obs_Mace18.csv]
    Input Rpred: FileNames=[GerminationLab_Rpred.csv]
    PredictedObserved PO_Mace: PredictedTableName=T50Summary; ObservedTableName=Obs_Mace; FieldNameUsedForMatch=SimulationName; AllColumns=true
    PredictedObserved PO_Mace18: PredictedTableName=T50Summary; ObservedTableName=Obs_Mace18; FieldNameUsedForMatch=SimulationName; AllColumns=true
    PredictedObserved PO_Rpred: PredictedTableName=T50Summary; ObservedTableName=Rpred; FieldNameUsedForMatch=SimulationName; AllColumns=true
  Folder Validation
    Experiment GerminationLab
      Factors
        Permutation
          Factor T
            Specification=[LabConditions].Script.Temperature = 5, 10, 15, 20, 25, 30, 35, 40
          Factor Psi
            Specification=[LabConditions].Script.WaterPotential = 0, -0.5, -1, -1.25, -1.5, -1.75
      Simulation LabSimulation
        Clock: Start=2000-01-01; End=2000-04-30
        Summary SummaryFile
        Weather: FileName=GerminationLab.met
        SoilArbitrator
        Zone Field: Area=1; Slope=0; AspectAngle=0; Altitude=50
          Report T50Summary: EventNames=[Clock].EndOfSimulation
            VariableNames:
              [LabConditions].Script.Temperature as Temperature
              [LabConditions].Script.WaterPotential as WaterPotential
              [LabConditions].Script.TargetWaterContent as TargetWaterContent
              [LabConditions].Script.AirTemperature as AirTemperature
              [GerminationTracker].Script.Germinated as Germinated
              [GerminationTracker].Script.T50_raw as T50_raw
              [GerminationTracker].Script.T50 as T50
              [GerminationTracker].Script.DaysAccumulated as DaysAccumulated
              [GerminationTracker].Script.MeanSeedTemperature as MeanSeedTemperature
              [GerminationTracker].Script.MinSeedTemperature as MinSeedTemperature
              [GerminationTracker].Script.MaxSeedTemperature as MaxSeedTemperature
              [GerminationTracker].Script.MeanSeedWaterPotential as MeanSeedWaterPotential
              [GerminationTracker].Script.MeanDailyRate as MeanDailyRate
          Report Daily: EventNames=[Clock].DoReport
            VariableNames:
              [Clock].Today
              [LabConditions].Script.Temperature as Temperature
              [LabConditions].Script.WaterPotential as WaterPotential
              [Wheat].Phenology.CurrentPhaseName
              [Wheat].Phenology.Germinating.SoilTemperatureSeed as SoilTemperatureSeed
              [Wheat].Phenology.Germinating.TemperatureFactor as TemperatureFactor
              [Wheat].Phenology.Germinating.WaterFactor as WaterFactor
              [Wheat].Phenology.Germinating.GerminatingWaterPotentialResponse.SeedWaterContent as SeedWaterContent
              [Wheat].Phenology.Germinating.GerminatingWaterPotentialResponse.SeedWaterPotential as SeedWaterPotential
              [Wheat].Phenology.Germinating.GerminatingWaterPotentialResponse.BaseWaterPotentialToday as BaseWaterPotential
              [Wheat].Phenology.Germinating.DailyGerminationRate as DailyGerminationRate
              [Wheat].Phenology.Germinating.ProgressThroughPhase as ProgressThroughPhase
              [Wheat].Phenology.Germinating.DaysSinceSowing as DaysSinceSowing
              [Soil].Water.Potential
              [Soil].Water.pF
          Fertiliser
          SurfaceOrganicMatter: InitialResidueName=wheat_stubble; InitialResidueType=wheat; InitialResidueMass=500; InitialStandingFraction=0; InitialCPR=0; InitialCNR=100
          Plant Wheat
          MicroClimate: a_interception=0; b_interception=1; c_interception=0; d_interception=0; SoilHeatFluxFraction=0.4; MinimumHeightDiffForNewLayer=0; NightInterceptionFraction=0.5; ReferenceHeight=2
          Soil: ASCOrder=Chromosol; ASCSubOrder=Red; SoilType=Loamy duplex; Site=Temora; NearestTown=Temora; Region=Central West Slopes and Plains; State=New South Wales; Country=Australia; ApsoilNumber=913; Latitude=-34.4085; Longitude=147.531; LocationAccuracy=+/- 200m; YearOfSampling=0; DataSource=Collected by Brett Cocks (CES) for NVT.
            Physical
              Thickness  ParticleSizeSand  ParticleSizeSilt  ParticleSizeClay  Rocks  BD     AirDry  LL15   DUL    SAT
              100        5                 65                30                0.164  1.519  0.08    0.161  0.282  0.332
              200        5                 65                30                0.371  1.408  0.104   0.129  0.224  0.274
              300        5                 65                30                0      1.572  0.192   0.192  0.321  0.371
              300        5                 65                30                0      1.578  0.192   0.192  0.325  0.375
              300        5                 65                30                0      1.616  0.192   0.192  0.31   0.36
              300        5                 65                30                0      1.614  0.192   0.192  0.311  0.361
              300        5                 65                30                0      1.581  0.192   0.192  0.323  0.373
              BD, AirDry, LL15, DUL, SAT source: Unknown source or quality of data
              Rocks, ParticleSizeSand, ParticleSizeSilt, ParticleSizeClay source: Calculated
              SoilCrop wheatSoil: LL=[0.161, 0.129, 0.192, 0.208, 0.231, 0.259, 0.317]; KL=[0.06, 0.06, 0.06, 0.04, 0.04, 0.02, 0.01]; XF=[1, 1, 1, 1, 1, 1, 1]
                LL source: Field measured and checked for sensibility
              SoilCrop barleySoil: same as Validation.GerminationLab.LabSimulation.Field.Soil.Physical.wheatSoil
              SoilCrop canolaSoil: same as Validation.GerminationLab.LabSimulation.Field.Soil.Physical.wheatSoil
            WaterBalance SoilWater: SummerDate=1-Nov; SummerU=6; SummerCona=3.5; WinterDate=1-Apr; WinterU=2; WinterCona=2; DiffusConst=88; DiffusSlope=35; Salb=0.13; CN2Bare=73; CNRed=20; CNCov=0.8; PSIDul=-100; Thickness=[100, 200, 300, 300, 300, 300, 300]; SWCON=[0, 0, 0, 0, 0, 0, 0]
            Organic: FOMCNRatio=40; CarbonUnits=Total
              Thickness  Carbon  SoilCNRatio  FBiom  FInert  FOM
              100        1.67    12           0.04   0.4     347.129
              200        1       12           0.02   0.5     270.344
              300        0.5     12           0.02   0.7     163.972
              300        0.3     12           0.02   1       99.4541
              300        0.2     12           0.01   1       60.322
              300        0.1     12           0.01   1       36.5871
              300        0.1     12           0.01   1       22.1912
            Chemical: PHUnits=Water
              Thickness  PH   EC   CEC
              100        5.2  0.1  12.1025
              200        5.7  0.1  10.595
              300        6.6  0.1  9.47
              300        7.4  0.1  9.02
              300        8.3  0.1  8.795
              300        8.5  0.2  8.57
              300        8.5  0.2  8.57
              EC, CL source: Unknown source or quality of data (layer 1, 2, 3, 4, 5, 6)
              CEC source: Calculated
              PH source: Unknown source or quality of data
            Nutrient
            Water: Thickness=[100, 200, 300, 300, 300, 300, 300]; InitialValues=[0.185, 0.148, 0.218, 0.219, 0.216, 0.216, 0.218]; FilledFromTop=false
            Solute NO3: Thickness=[100, 200, 300, 300, 300, 300, 300]; InitialValues=[20, 30, 1, 1, 1, 1, 1]; InitialValuesUnits=kg/ha; WaterTableConcentration=0; D0=0; DepthConstant=0; MaxDepthSoluteAccessible=0; RunoffEffectivenessAtMovingSolute=0; MaxEffectiveRunoff=0
            Solute NH4: Thickness=[100, 200, 300, 300, 300, 300, 300]; InitialValues=[0.1, 0.1, 0.1, 0.1, 0.1, 0.1, 0.1]; InitialValuesUnits=kg/ha; WaterTableConcentration=0; D0=0; DepthConstant=0; MaxDepthSoluteAccessible=0; RunoffEffectivenessAtMovingSolute=0; MaxEffectiveRunoff=0
            Solute Urea: Thickness=[100, 200, 300, 300, 300, 300, 300]; InitialValues=[0, 0, 0, 0, 0, 0, 0]; InitialValuesUnits=ppm; WaterTableConcentration=0; D0=0; DepthConstant=0; MaxDepthSoluteAccessible=0; RunoffEffectivenessAtMovingSolute=0; MaxEffectiveRunoff=0
            SoilTemperature: InteractionsPerDay=8
          Manager LabConditions
            Temperature = 20
            WaterPotential = 0
            SowingDate = 03/01/2000 00:00:00
            SowingDepth = 20
            CultivarName = Mace
            Population = 100
```csharp
using System;
using System.Collections.Generic;
using Models.Core;
using Models.Climate;
using Models.Interfaces;
using Models.PMF;
using Models.Soils;
using APSIM.Shared.Utilities;

namespace Models
{
    /// <summary>
    /// Holds Petri-dish conditions: a constant seed-layer temperature (through constant weather with no
    /// radiation or rain) and a constant seed-layer water potential (by resetting the seed-layer water
    /// content just before phenology), then sows the crop.
    /// </summary>
    [Serializable]
    public class Script : Model
    {
        [Link] private Clock clock = null;
        [Link] private Weather weather = null;
        [Link] private IPhysical physical = null;
        [Link] private ISoilWater soilWater = null;
        [Link] private Water water = null;
        [Link] private ISoilTemperature soilTemperature = null;
        [Link(Type = LinkType.Path, Path = "[Wheat]")] private Plant wheat = null;

        [Description("Temperature (oC)")] public double Temperature { get; set; }
        [Description("Water potential (MPa)")] public double WaterPotential { get; set; }
        [Description("Sowing date")] public DateTime SowingDate { get; set; }
        [Description("Sowing depth (mm)")] public double SowingDepth { get; set; }
        [Description("Cultivar")] public string CultivarName { get; set; }
        [Description("Population (plants/m2)")] public double Population { get; set; }

        /// <summary>Volumetric water content of the seed layer that gives the target water potential.</summary>
        public double TargetWaterContent { get; private set; }

        /// <summary>
        /// Air temperature applied to the weather (oC). It starts at Temperature and is corrected each day by
        /// the seed-layer error so that the simulated seed-layer soil temperature settles at Temperature.
        /// </summary>
        public double AirTemperature { get; private set; }

        private int seedLayer;

        [EventSubscribe("StartOfSimulation")]
        private void OnStartOfSimulation(object sender, EventArgs e)
        {
            AirTemperature = Temperature;
            seedLayer = SoilUtilities.LayerIndexOfDepth(physical.Thickness, SowingDepth);
            TargetWaterContent = ThetaForPotential(WaterPotential);
        }

        [EventSubscribe("PreparingNewWeatherData")]
        private void OnPreparingNewWeatherData(object sender, EventArgs e)
        {
            // Annual average/amplitude set the soil temperature model's initial profile and lower boundary.
            weather.Tav = Temperature;
            weather.Amp = 0;
            weather.MaxT = AirTemperature;
            weather.MinT = AirTemperature;
            weather.Radn = 0;
            weather.Rain = 0;
        }

        [EventSubscribe("EndOfDay")]
        private void OnEndOfDay(object sender, EventArgs e)
        {
            AirTemperature += 0.5 * (Temperature - soilTemperature.Value[seedLayer]);
        }

        [EventSubscribe("DoManagement")]
        private void OnDoManagement(object sender, EventArgs e)
        {
            SetSeedLayerWater();
            if (clock.Today == SowingDate)
                wheat.Sow(CultivarName, Population, SowingDepth, 250);
        }

        [EventSubscribe("PrePhenology")]
        private void OnPrePhenology(object sender, EventArgs e)
        {
            SetSeedLayerWater();
        }

        private void SetSeedLayerWater()
        {
            double[] sw = (double[])soilWater.SW.Clone();
            sw[seedLayer] = TargetWaterContent;
            soilWater.SW = sw;
        }

        /// <summary>
        /// Seed-layer water content at which the soil water model's own retention curve gives the target
        /// water potential (MPa), found by bisection on [Soil].Water.Potential. This is the value
        /// GerminatingWaterPotentialResponse reads, so the simulated seed-layer potential equals the lab treatment.
        /// </summary>
        private double ThetaForPotential(double psiTarget)
        {
            double sat = physical.SAT[seedLayer];
            if (psiTarget >= 0)
                return sat;
            double[] original = (double[])soilWater.SW.Clone();
            double[] sw = (double[])original.Clone();
            double lo = 0, hi = sat;
            for (int i = 0; i < 60; i++)
            {
                double mid = 0.5 * (lo + hi);
                sw[seedLayer] = mid;
                soilWater.SW = sw;
                if (water.Potential[seedLayer] / 1000 < psiTarget)
                    lo = mid;
                else
                    hi = mid;
            }
            soilWater.SW = original;
            return 0.5 * (lo + hi);
        }
    }
}
```
          Manager GerminationTracker
            CensorDays = 14
```csharp
using System;
using System.Collections.Generic;
using System.Linq;
using Models.Core;
using Models.Functions;
using Models.PMF;
using Models.PMF.Phen;

namespace Models
{
    /// <summary>
    /// Records the day of 50% germination (T50) from the germination phase. T50_raw is the fractional day
    /// on which the accumulated rate reaches 1: (day - 1) + (1 - progress before that day) / rate that day.
    /// T50 is T50_raw floored at 1 day (daily model), and is NaN when germination takes longer than CensorDays.
    /// </summary>
    [Serializable]
    public class Script : Model
    {
        [Link(Type = LinkType.Path, Path = "[Wheat]")] private Plant wheat = null;
        [Link(Type = LinkType.Path, Path = "[Wheat].Phenology.Germinating")] private GerminatingPhaseHydroThermal phase = null;
        [Link(Type = LinkType.Path, Path = "[Wheat].Phenology.Germinating.GerminatingWaterPotentialResponse")] private GerminatingWaterPotentialResponse water = null;

        [Description("Censor T50 after this many days (experiment length)")] public double CensorDays { get; set; }

        public bool Germinated { get; private set; }
        public double T50_raw { get; private set; } = double.NaN;
        public double T50 { get; private set; } = double.NaN;
        public int DaysAccumulated { get { return rates.Count; } }
        public double MeanSeedTemperature { get { return temperatures.Count > 0 ? temperatures.Average() : double.NaN; } }
        public double MinSeedTemperature { get { return temperatures.Count > 0 ? temperatures.Min() : double.NaN; } }
        public double MaxSeedTemperature { get { return temperatures.Count > 0 ? temperatures.Max() : double.NaN; } }
        public double MeanSeedWaterPotential { get { return potentials.Count > 0 ? potentials.Average() : double.NaN; } }
        public double MeanDailyRate { get { return rates.Count > 0 ? rates.Average() : double.NaN; } }

        private List<double> rates = new List<double>();
        private List<double> temperatures = new List<double>();
        private List<double> potentials = new List<double>();

        [EventSubscribe("EndOfDay")]
        private void OnEndOfDay(object sender, EventArgs e)
        {
            if (!wheat.IsAlive || Germinated || phase.DaysSinceSowing <= rates.Count)
                return;

            // The phase ran today: record today's values.
            rates.Add(phase.DailyGerminationRate);
            temperatures.Add(phase.SoilTemperatureSeed);
            potentials.Add(water.SeedWaterPotential);

            if (phase.ProgressThroughPhase >= phase.Target)
            {
                Germinated = true;
                double progress = 0;
                for (int day = 1; day <= rates.Count; day++)
                {
                    double r = rates[day - 1];
                    if (progress + r >= 1)
                    {
                        T50_raw = (day - 1) + (1 - progress) / r;
                        break;
                    }
                    progress += r;
                }
                if (T50_raw <= CensorDays)
                    T50 = Math.Max(1, T50_raw);
            }
        }
    }
}
```
  Folder Sensibility
    Memo
      Sensibility test of the hydrothermal germination model: SowingDate x Site x Soil x GerminationModel, 1988-2017.

      GerminationModel compares the new GerminatingPhaseHydroThermal (HydroThermal) with the original GerminatingPhase (Original).

      Box_SeedTemperature, Box_SeedWaterPotential and Box_WaterFactor show everaged seed-layer conditions on germination-phase (sowing day to germination day),over 30 years, to explain the Box_GerminationDAS results. WaterFactor exists only for the HydroThermal model.
    Experiment SowingSiteWaterModel
      Factors
        Permutation
          Factor SowingDate: Specification=[SowingRule].Script.SowingDate = 12-Apr, 12-May, 30-May
          Factor Site
            CompositeFactor Temora: Specifications=[Weather]
              Weather: FileName=Temora.met
            CompositeFactor Merredin: Specifications=[Weather]
              Weather: FileName=Merredin.met
          Factor Soil: Specification=[Soil]
            CompositeFactor Sandy: Specifications=[Soil]
              Soil Deep sandy duplex (Merredin C-R1 No1203): ASCOrder=Sodosol; ASCSubOrder=Subnatric Yellow; SoilType=Sandy duplex; LocalName=Deep sandy duplexes; Site=C-R1; NearestTown=Merredin; Region=Central Region; State=Western Australia; Country=Australia; ApsoilNumber=1203; Latitude=-31.487884; Longitude=118.222947; LocationAccuracy=+/- 2000m; YearOfSampling=1993; DataSource=DAFWA  Jeff Russell
                Comments=Deep sandy duplex - Sand over clay with silcrete layer at 50cm, Duplex S4, Table 10 in Russell (2005) Major soils of the Eastern Wheatbelt to characterise soil moisture availablity. Department of Agriculture Western Australia. Resource Management Technical Report 187.
                Physical
                  Thickness  ParticleSizeSand  ParticleSizeSilt  ParticleSizeClay  Rocks  BD    AirDry  LL15  DUL    SAT
                  100        90.5              4.8               4.7               2.5    1.5   0.015   0.03  0.13   0.363962
                  100        90.2              4.3               5.5               3.4    1.57  0.02    0.03  0.13   0.337547
                  100        88.2              3.7               8.1               3.3    1.57  0.04    0.04  0.24   0.337547
                  100        88.8              3.7               7.5               5.3    1.66  0.04    0.04  0.24   0.303585
                  100        91.4              4                 4.6               4.6    1.66  0.04    0.04  0.275  0.303585
                  200        77.2              10.8              11.9              6.4    1.71  0.1     0.1   0.29   0.324717
                  200        78.4              13.1              8.5               2.5    1.52  0.1     0.1   0.31   0.396415
                  200        79.1              12.1              8.8               7.8    1.72  0.1     0.1   0.26   0.316
                  200        74                13.3              12.7              7.9    1.68  0.15    0.15  0.25   0.33
                  200        67.4              18.2              14.4              17.3   1.47  0.15    0.15  0.29   0.358
                  200        51.3              30                18.7              0.6    1.39  0.15    0.15  0.31   0.445472
                  BD source: e, Field measured and checked for sensibility
                  AirDry, LL15 source: Estimated based on local knowledge
                  DUL source: Field measured and checked for sensibility
                  SAT source: Calculated from measured, estimated or calculated BD, Capped so rocks + BD + SAT leave 1% air
                  SoilCrop wheatSoil
                    LL=[0.03, 0.03, 0.04, 0.04, 0.14, 0.245, 0.3, 0.26, 0.25, 0.29, 0.31]
                    KL=[0.06, 0.06, 0.06, 0.06, 0.06, 0.04, 0.04, 0.04, 0.02, 0.02, 0.02]
                    XF=[1, 1, 1, 1, 1, 1, 1, 1, 1, 1, 1]
                    LL source: Field measured and checked for sensibility
                  SoilCrop SCRUMSoil: same as Sensibility.SowingSiteWaterModel.Factors.Permutation.Soil.Sandy.Deep sandy duplex (Merredin C-R1 No1203).Physical.wheatSoil
                WaterBalance SoilWater: SummerDate=1-Nov; SummerU=6; SummerCona=3.5; WinterDate=1-Apr; WinterU=2; WinterCona=2; DiffusConst=250; DiffusSlope=22; Salb=0.13; CN2Bare=68; CNRed=20; CNCov=0.8; DischargeWidth=0; CatchmentArea=0; PSIDul=-100; Thickness=[100, 100, 100, 100, 100, 200, 200, 200, 200, 200, 200]; SWCON=[0.7, 0.7, 0.7, 0.7, 0.7, 0.7, 0.7, 0.7, 0.7, 0.7, 0.7]
                Organic: FOMCNRatio=40; CarbonUnits=Total
                  Thickness  Carbon  SoilCNRatio  FBiom  FInert  FOM
                  100        1.12    12           0.035  0.4     215.076
                  100        0.5     12           0.02   0.5     180.282
                  100        0.1     12           0.02   0.7     151.116
                  100        0.1     12           0.015  0.7     126.669
                  100        0.1     12           0.015  0.95    106.177
                  200        0.1     12           0.015  0.95    74.602
                  200        0.1     12           0.015  0.95    52.4167
                  200        0.1     12           0.01   0.95    36.829
                  200        0.1     12           0.01   0.95    25.8767
                  200        0.01    12           0.01   0.95    18.1815
                  200        0.01    12           0.01   0.95    12.7746
                Chemical: PHUnits=1
                  Thickness  PH   CEC
                  100        5.7  3.9
                  100        4.7  0
                  100        5.2  3.1
                  100        6.4  0
                  100        6.9  0
                  200        6.2  5.7
                  200        5.2  0
                  200        7.4  14.7
                  200        7.8  0
                  200        7.8  13.1
                  200        8    0
                  CEC source: Measured (layer 1, 3, 6, 8, 10)
                  PH source: Measured
                Nutrient
                Solute NO3: InitialValuesUnits=ppm; WaterTableConcentration=0; D0=0; DepthConstant=0; MaxDepthSoluteAccessible=0; RunoffEffectivenessAtMovingSolute=0; MaxEffectiveRunoff=0
                Solute NH4: InitialValuesUnits=ppm; WaterTableConcentration=0; D0=0; DepthConstant=0; MaxDepthSoluteAccessible=0; RunoffEffectivenessAtMovingSolute=0; MaxEffectiveRunoff=0
                Solute Urea: Thickness=[100, 100, 100, 100, 100, 200, 200, 200, 200, 200, 200]; InitialValues=[0, 0, 0, 0, 0, 0, 0, 0, 0, 0, 0]; InitialValuesUnits=kg/ha; WaterTableConcentration=0; D0=0; DepthConstant=0; MaxDepthSoluteAccessible=0; RunoffEffectivenessAtMovingSolute=0; MaxEffectiveRunoff=0
                Water: Thickness=[100, 100, 100, 100, 100, 200, 200, 200, 200, 200, 200]; FilledFromTop=false
                  InitialValues=[0.13, 0.13, 0.24, 0.24, 0.275, 0.29, 0.31, 0.26, 0.25, 0.29, 0.31]
                SoilTemperature Temperature: InteractionsPerDay=8
            CompositeFactor Loam: Specifications=[Soil]
              Soil Red Chromosol (Temora No913): ASCOrder=Chromosol; ASCSubOrder=Red; SoilType=Loamy duplex; Site=Temora; NearestTown=Temora; Region=Central West Slopes and Plains; State=New South Wales; Country=Australia; ApsoilNumber=913; Latitude=-34.4085; Longitude=147.531; LocationAccuracy=+/- 200m; YearOfSampling=0; DataSource=Collected by Brett Cocks (CES) for NVT.
                Physical
                  Thickness  BD     AirDry  LL15   DUL    SAT
                  100        1.519  0.08    0.161  0.282  0.332
                  200        1.408  0.104   0.129  0.224  0.274
                  300        1.572  0.192   0.192  0.321  0.371
                  300        1.578  0.192   0.192  0.325  0.375
                  300        1.616  0.192   0.192  0.31   0.36
                  300        1.614  0.192   0.192  0.311  0.361
                  300        1.581  0.192   0.192  0.323  0.373
                  BD, AirDry, LL15, DUL, SAT source: Unknown source or quality of data
                  SoilCrop wheatSoil: LL=[0.161, 0.129, 0.192, 0.208, 0.231, 0.259, 0.317]; KL=[0.06, 0.06, 0.06, 0.04, 0.04, 0.02, 0.01]; XF=[1, 1, 1, 1, 1, 1, 1]
                    LL source: Field measured and checked for sensibility
                  SoilCrop barleySoil: same as Sensibility.SowingSiteWaterModel.Factors.Permutation.Soil.Loam.Red Chromosol (Temora No913).Physical.wheatSoil
                  SoilCrop canolaSoil: same as Sensibility.SowingSiteWaterModel.Factors.Permutation.Soil.Loam.Red Chromosol (Temora No913).Physical.wheatSoil
                WaterBalance SoilWater: SummerDate=1-Nov; SummerU=6; SummerCona=3.5; WinterDate=1-Apr; WinterU=2; WinterCona=2; DiffusConst=88; DiffusSlope=35; Salb=0.13; CN2Bare=73; CNRed=20; CNCov=0.8; PSIDul=-100; Thickness=[150, 150, 300, 300, 300, 300, 300]; SWCON=[0.4, 0.4, 0.4, 0.4, 0.4, 0.4, 0.4]
                Organic: FOMCNRatio=40; CarbonUnits=Total
                  Thickness  Carbon  SoilCNRatio  FBiom  FInert  FOM
                  150        1.67    12           0.04   0.4     347.129
                  150        1       12           0.02   0.5     270.344
                  300        0.5     12           0.02   0.7     163.972
                  300        0.3     12           0.02   1       99.4541
                  300        0.2     12           0.01   1       60.322
                  300        0.1     12           0.01   1       36.5871
                  300        0.1     12           0.01   1       22.1912
                Chemical: PHUnits=Water
                  Thickness  PH   EC
                  150        5.2  0.1
                  150        5.7  0.1
                  300        6.6  0.1
                  300        7.4  0.1
                  300        8.3  0.1
                  300        8.5  0.2
                  300        8.5  0.2
                  EC, CL source: Unknown source or quality of data (layer 1, 2, 3, 4, 5, 6)
                  PH source: Unknown source or quality of data
                Nutrient
                Water: Thickness=[150, 150, 300, 300, 300, 300, 300]; InitialValues=[0.185, 0.148, 0.218, 0.219, 0.216, 0.216, 0.218]; FilledFromTop=false
                Solute NO3: Thickness=[150, 150, 300, 300, 300, 300, 300]; InitialValues=[20, 30, 1, 1, 1, 1, 1]; InitialValuesUnits=kg/ha; WaterTableConcentration=0; D0=0; DepthConstant=0; MaxDepthSoluteAccessible=0; RunoffEffectivenessAtMovingSolute=0; MaxEffectiveRunoff=0
                Solute NH4: Thickness=[150, 150, 300, 300, 300, 300, 300]; InitialValues=[0.1, 0.1, 0.1, 0.1, 0.1, 0.1, 0.1]; InitialValuesUnits=kg/ha; WaterTableConcentration=0; D0=0; DepthConstant=0; MaxDepthSoluteAccessible=0; RunoffEffectivenessAtMovingSolute=0; MaxEffectiveRunoff=0
                Solute Urea: Thickness=[150, 150, 300, 300, 300, 300, 300]; InitialValues=[0, 0, 0, 0, 0, 0, 0]; InitialValuesUnits=ppm; WaterTableConcentration=0; D0=0; DepthConstant=0; MaxDepthSoluteAccessible=0; RunoffEffectivenessAtMovingSolute=0; MaxEffectiveRunoff=0
                SoilTemperature Temperature: InteractionsPerDay=8
          Factor GerminationModel
            CompositeFactor HydroThermal: Specifications=[SowingRule].Script.GerminationModel = HydroThermal
            CompositeFactor Original
              Specifications:
                [SowingRule].Script.GerminationModel = Original
                [Wheat].Phenology.Germinating
              GerminatingPhase Germinating: Start=Sowing; End=Germination; IsEmerged=false
                Constant MinSoilTemperature: FixedValue=0
      Simulation FieldSimulation
        Clock: Start=1988-01-01; End=2017-10-31
        Summary SummaryFile
        Weather: FileName=%root%/Examples/WeatherFiles/AU_WaggaWagga.met
        SoilArbitrator
        Zone Field: Area=1; Slope=0; AspectAngle=0; Altitude=50
          Report SensibilityDaily: EventNames=[Clock].DoReport
            VariableNames:
              [Clock].Today
              [SowingRule].Script.SowingDate as SowingDate
              [Wheat].Phenology.CurrentPhaseName
              [Wheat].Phenology.Stage
              [Soil].Water.Volumetric
              [Soil].Water.Potential
              [Soil].Temperature.Value
              [Weather].Rain
              [Weather].MaxT
              [Weather].MinT
          Report SensibilitySummary: EventNames=[Wheat].Harvesting
            VariableNames:
              [SowingRule].Script.SowingDate as SowingDate
              [SowingRule].Script.GerminationModel as GerminationModel
              [SowingRule].Script.SowingModel as SowingModel
              [SowingRule].Script.WaterModel as WaterModel
              [SowingRule].Script.SowingWaterModel as SowingWaterModel
              [Wheat].Phenology.GerminationDAS as GerminationDAS
              [Wheat].Phenology.EmergenceDAS as EmergenceDAS
              [Wheat].Phenology.CurrentPhaseName
              [Wheat].Phenology.Stage
              [Wheat].Grain.Wt
              [Wheat].AboveGround.Wt
              [Clock].Today
              [Clock].Today.Year
          Fertiliser
          SurfaceOrganicMatter: InitialResidueName=wheat_stubble; InitialResidueType=wheat; InitialResidueMass=500; InitialStandingFraction=0; InitialCPR=0; InitialCNR=100
          Plant Wheat
          MicroClimate: a_interception=0; b_interception=1; c_interception=0; d_interception=0; SoilHeatFluxFraction=0.4; MinimumHeightDiffForNewLayer=0; NightInterceptionFraction=0.5; ReferenceHeight=2
          Soil: ASCOrder=Chromosol; ASCSubOrder=Red; SoilType=Loamy duplex; Site=Temora; NearestTown=Temora; Region=Central West Slopes and Plains; State=New South Wales; Country=Australia; ApsoilNumber=913; Latitude=-34.4085; Longitude=147.531; LocationAccuracy=+/- 200m; YearOfSampling=0
            DataSource=Collected by Brett Cocks (CES) for NVT. KS added (placeholder values) so the soil also runs with SWIM.
            Physical
              Thickness  ParticleSizeSand  ParticleSizeSilt  ParticleSizeClay  BD     AirDry  LL15   DUL    SAT    KS
              100        5                 65                30                1.519  0.08    0.161  0.282  0.332  60
              200        5                 65                30                1.408  0.104   0.129  0.224  0.274  30
              300        5                 65                30                1.572  0.192   0.192  0.321  0.371  10
              300        5                 65                30                1.578  0.192   0.192  0.325  0.375  5
              300        5                 65                30                1.616  0.192   0.192  0.31   0.36   5
              300        5                 65                30                1.614  0.192   0.192  0.311  0.361  5
              300        5                 65                30                1.581  0.192   0.192  0.323  0.373  5
              SoilCrop WheatSoil: LL=[0.161, 0.129, 0.192, 0.208, 0.231, 0.259, 0.317]; KL=[0.06, 0.06, 0.06, 0.04, 0.04, 0.02, 0.01]; XF=[1, 1, 1, 1, 1, 1, 1]
            WaterBalance SoilWater: SummerDate=1-Nov; SummerU=6; SummerCona=3.5; WinterDate=1-Apr; WinterU=2; WinterCona=2; DiffusConst=88; DiffusSlope=35; Salb=0.13; CN2Bare=73; CNRed=20; CNCov=0.8; PSIDul=-100; Thickness=[100, 200, 300, 300, 300, 300, 300]; SWCON=[0.3, 0.3, 0.3, 0.3, 0.3, 0.3, 0.3]
            Organic: same as Validation.GerminationLab.LabSimulation.Field.Soil.Organic
            Chemical: Thickness=[100, 200, 300, 300, 300, 300, 300]; PH=[5.2, 5.7, 6.6, 7.4, 8.3, 8.5, 8.5]; PHUnits=Water
            Nutrient
            Water: Thickness=[100, 200, 300, 300, 300, 300, 300]; InitialValues=[0.185, 0.148, 0.218, 0.219, 0.216, 0.216, 0.218]; FilledFromTop=false
            Solute NO3: InitialValuesUnits=kg/ha; WaterTableConcentration=0; D0=0; DepthConstant=0; MaxDepthSoluteAccessible=0; RunoffEffectivenessAtMovingSolute=0; MaxEffectiveRunoff=0
              Thickness  InitialValues  Exco  FIP
              100        20             1     1
              200        30             1     1
              300        1              1     1
              300        1              1     1
              300        1              1     1
              300        1              1     1
              300        1              1     1
            Solute NH4: InitialValuesUnits=kg/ha; WaterTableConcentration=0; D0=0; DepthConstant=0; MaxDepthSoluteAccessible=0; RunoffEffectivenessAtMovingSolute=0; MaxEffectiveRunoff=0
              Thickness  InitialValues  Exco  FIP
              100        0.1            1     1
              200        0.1            1     1
              300        0.1            1     1
              300        0.1            1     1
              300        0.1            1     1
              300        0.1            1     1
              300        0.1            1     1
            Solute Urea: InitialValuesUnits=ppm; WaterTableConcentration=0; D0=0; DepthConstant=0; MaxDepthSoluteAccessible=0; RunoffEffectivenessAtMovingSolute=0; MaxEffectiveRunoff=0
              Thickness  InitialValues  Exco  FIP
              100        0              1     1
              200        0              1     1
              300        0              1     1
              300        0              1     1
              300        0              1     1
              300        0              1     1
              300        0              1     1
            SoilTemperature Temperature: InteractionsPerDay=8
          Manager SowingRule
            SowingDate = 1-Jun
            SowingDepth = 30
            CultivarName = Mace
            Population = 150
            RowSpacing = 250
            GerminationModel = HydroThermal
```csharp
using System;
using Models.Core;
using Models.PMF;
using Models.Interfaces;
using Models.Soils;
using APSIM.Shared.Utilities;

namespace Models
{
    /// <summary>Sows the crop on a fixed date (d-mmm) each year.</summary>
    [Serializable]
    public class Script : Model
    {
        [Link] private Clock clock = null;
        [Link(Type = LinkType.Path, Path = "[Wheat]")] private Plant wheat = null;
        [Link] private ISoilWater soilWater = null;

        [Description("Sowing date (d-mmm)")] public string SowingDate { get; set; }
        [Description("Sowing depth (mm)")] public double SowingDepth { get; set; }
        [Description("Cultivar")] public string CultivarName { get; set; }
        [Description("Population (plants/m2)")] public double Population { get; set; }
        [Description("Row spacing (mm)")] public double RowSpacing { get; set; }
        [Description("Germination model (label only, set by the GerminationModel factor)")] public string GerminationModel { get; set; }

        /// <summary>Sowing date and germination model as one label, used as the box-plot category.</summary>
        public string SowingModel => SowingDate + " " + (GerminationModel == "HydroThermal" ? "HT" : "Orig");

        /// <summary>Soil water balance model in this simulation (SWIM or SoilWater), used by the SWIMvsSoilWater graphs.</summary>
        public string WaterModel => soilWater is Swim3 ? "SWIM" : "SoilWater";

        /// <summary>Sowing date and water model as one label, used as the box-plot category in the SWIMvsSoilWater graphs.</summary>
        public string SowingWaterModel => SowingDate + " " + WaterModel;

        [EventSubscribe("DoManagement")]
        private void OnDoManagement(object sender, EventArgs e)
        {
            if (!wheat.IsAlive && DateUtilities.DatesEqual(SowingDate, clock.Today))
                wheat.Sow(CultivarName, Population, SowingDepth, RowSpacing);
        }
    }
}
```
          Manager GerminationConditions
```csharp
using System;
using System.Collections.Generic;
using System.Linq;
using Models.Core;
using Models.Functions;
using Models.Interfaces;
using Models.PMF;
using Models.PMF.Phen;
using Models.Soils;
using APSIM.Shared.Utilities;

namespace Models
{
    /// <summary>
    /// Records seed-layer conditions on each day the crop is in the germination phase (sowing day to germination day).
    /// GerminationDay is raised every such day (daily values); GerminationComplete is raised on the germination day with
    /// the means over that germination period, so a report can write one row per season.
    /// Temperature and water potential are read from the soil (the same values the HydroThermal phase uses), so they work
    /// for both germination models. WaterFactor, BaseWaterPotential and TemperatureFactor exist only in the HydroThermal
    /// model and are NaN for the Original model.
    /// </summary>
    [Serializable]
    public class Script : Model
    {
        [Link(Type = LinkType.Path, Path = "[Wheat]")] private Plant wheat = null;
        [Link(Type = LinkType.Path, Path = "[Wheat].Phenology")] private Phenology phenology = null;
        [Link(Type = LinkType.Path, Path = "[Wheat].Phenology.Germinating")] private IPhase germinatingPhase = null;
        [Link(Type = LinkType.Path, Path = "[Wheat].Phenology.Germinating.GerminatingWaterPotentialResponse", IsOptional = true)]
        private GerminatingWaterPotentialResponse waterResponse = null;
        [Link] private IPhysical physical = null;
        [Link] private Water water = null;
        [Link] private ISoilTemperature soilTemperature = null;

        /// <summary>Raised on each germination-phase day, after phenology.</summary>
        public event EventHandler GerminationDay;

        /// <summary>Raised on the germination day, after the seasonal means are calculated.</summary>
        public event EventHandler GerminationComplete;

        // Daily values (today).
        /// <summary>Seed-layer soil temperature (oC).</summary>
        public double SeedTemperature { get; private set; } = double.NaN;
        /// <summary>Seed-layer soil water potential (MPa).</summary>
        public double SeedWaterPotential { get; private set; } = double.NaN;
        /// <summary>HydroThermal water factor (0-1); NaN for the Original model.</summary>
        public double WaterFactor { get; private set; } = double.NaN;
        /// <summary>HydroThermal base water potential (MPa); NaN for the Original model.</summary>
        public double BaseWaterPotential { get; private set; } = double.NaN;
        /// <summary>HydroThermal temperature factor (0-1); NaN for the Original model.</summary>
        public double TemperatureFactor { get; private set; } = double.NaN;

        // Means over the germination period (set on the germination day).
        /// <summary>Mean seed-layer soil temperature over the germination period (oC).</summary>
        public double MeanSeedTemperature { get; private set; } = double.NaN;
        /// <summary>Mean seed-layer water potential over the germination period (MPa).</summary>
        public double MeanSeedWaterPotential { get; private set; } = double.NaN;
        /// <summary>Median seed-layer water potential over the germination period (MPa).</summary>
        public double MedianSeedWaterPotential { get; private set; } = double.NaN;
        /// <summary>Fraction of germination-period days with seed-layer potential above -1.5 MPa (wetter than LL15).</summary>
        public double FractionDaysWetterThanLL15 { get; private set; } = double.NaN;
        /// <summary>Mean HydroThermal water factor over the germination period; NaN for the Original model.</summary>
        public double MeanWaterFactor { get; private set; } = double.NaN;
        /// <summary>Mean HydroThermal temperature factor over the germination period; NaN for the Original model.</summary>
        public double MeanTemperatureFactor { get; private set; } = double.NaN;

        private List<double> temperatures = new List<double>();
        private List<double> potentials = new List<double>();
        private List<double> waterFactors = new List<double>();
        private List<double> temperatureFactors = new List<double>();

        [EventSubscribe("PlantSowing")]
        private void OnPlantSowing(object sender, SowingParameters data)
        {
            temperatures.Clear();
            potentials.Clear();
            waterFactors.Clear();
            temperatureFactors.Clear();
        }

        [EventSubscribe("PostPhenology")]
        private void OnPostPhenology(object sender, EventArgs e)
        {
            bool germinatedToday = phenology.OnStartDayOf("Germination");
            if (phenology.CurrentPhaseName != "Germinating" && !germinatedToday)
                return;

            GerminatingPhaseHydroThermal hydroThermal = germinatingPhase as GerminatingPhaseHydroThermal;
            int layer = SoilUtilities.LayerIndexOfDepth(physical.Thickness, wheat.SowingData.Depth);
            SeedTemperature = soilTemperature.Value[layer];
            SeedWaterPotential = water.Potential[layer] / 1000;
            WaterFactor = waterResponse != null ? waterResponse.WaterFactor : double.NaN;
            BaseWaterPotential = waterResponse != null ? waterResponse.BaseWaterPotentialToday : double.NaN;
            TemperatureFactor = hydroThermal != null ? hydroThermal.TemperatureFactor : double.NaN;

            temperatures.Add(SeedTemperature);
            potentials.Add(SeedWaterPotential);
            waterFactors.Add(WaterFactor);
            temperatureFactors.Add(TemperatureFactor);
            GerminationDay?.Invoke(this, EventArgs.Empty);

            if (germinatedToday)
            {
                MeanSeedTemperature = temperatures.Average();
                MeanSeedWaterPotential = potentials.Average();
                List<double> sorted = potentials.OrderBy(p => p).ToList();
                int n = sorted.Count;
                MedianSeedWaterPotential = n % 2 == 1 ? sorted[n / 2] : 0.5 * (sorted[n / 2 - 1] + sorted[n / 2]);
                FractionDaysWetterThanLL15 = potentials.Count(p => p > -1.5) / (double)n;
                MeanWaterFactor = waterFactors.Average();
                MeanTemperatureFactor = temperatureFactors.Average();
                GerminationComplete?.Invoke(this, EventArgs.Empty);
            }
        }
    }
}
```
          Report GerminationDaily: EventNames=[GerminationConditions].Script.GerminationDay
            VariableNames:
              [Clock].Today
              [SowingRule].Script.SowingDate as SowingDate
              [SowingRule].Script.GerminationModel as GerminationModel
              [SowingRule].Script.SowingModel as SowingModel
              [SowingRule].Script.WaterModel as WaterModel
              [SowingRule].Script.SowingWaterModel as SowingWaterModel
              [GerminationConditions].Script.SeedTemperature as SeedTemperature
              [GerminationConditions].Script.SeedWaterPotential as SeedWaterPotential
              [GerminationConditions].Script.WaterFactor as WaterFactor
              [GerminationConditions].Script.BaseWaterPotential as BaseWaterPotential
          Report GerminationSummary: EventNames=[GerminationConditions].Script.GerminationComplete
            VariableNames:
              [Clock].Today
              [SowingRule].Script.SowingDate as SowingDate
              [SowingRule].Script.GerminationModel as GerminationModel
              [SowingRule].Script.SowingModel as SowingModel
              [SowingRule].Script.WaterModel as WaterModel
              [SowingRule].Script.SowingWaterModel as SowingWaterModel
              [Wheat].Phenology.GerminationDAS as GerminationDAS
              [GerminationConditions].Script.MeanSeedTemperature as MeanSeedTemperature
              [GerminationConditions].Script.MeanSeedWaterPotential as MeanSeedWaterPotential
              [GerminationConditions].Script.MedianSeedWaterPotential as MedianSeedWaterPotential
              [GerminationConditions].Script.FractionDaysWetterThanLL15 as FractionDaysWetterThanLL15
              [GerminationConditions].Script.MeanWaterFactor as MeanWaterFactor
              [GerminationConditions].Script.MeanTemperatureFactor as MeanTemperatureFactor
          Manager SowingFertiliser
            Amount = 50
            CropName = wheat
```csharp
using Models.Soils;
using System;
using Models.Core;
using Models.PMF;
namespace Models
{
    [Serializable]
    public class Script : Model
    {
        [Link] Clock Clock;
        [Link] Fertiliser Fertiliser;
        [Link] Summary Summary;
        
        
        [Description("Amount of fertiliser to be applied (kg/ha)")]
        public double Amount { get; set;}
        
        [Description("Crop to be fertilised")]
        public string CropName { get; set;}
        
        
        

        [EventSubscribe("Sowing")]
        private void OnSowing(object sender, EventArgs e)
        {
            Model crop = sender as Model;
            if (crop.Name.ToLower()==CropName.ToLower())
                Fertiliser.Apply(amount: Amount, type: "NO3N");
        }
        
    }
}
```
          Manager FertiliseOnZadokstage
            Stage = 31
            FertiliserType = UreaN
            Amount = 100
```csharp
using APSIM.Core;
using Models.PMF;
using Models.Core;
using System.Linq;
using System;
using Models.Soils;
namespace Models
{
    [Serializable] 
    public class Script : Model, IStructureDependency
    {
        [Link] private Clock Clock;
        [Link] private Fertiliser Fertiliser;
        [Link] private Summary Summary;
        [Link] private Plant Wheat;
        public IStructure Structure { private get; set; }
 
        private bool hasFertilised = false;

        [Description("Fertilise once crop reaches stage:")]
        public double Stage { get; set; }

        [Description("Type of fertiliser to apply? ")] 
        [Display(Type = DisplayType.FertiliserType)]public string FertiliserType { get; set; }

        [Description("Amount of fertiliser to be applied (kg/ha)")] 
        public double Amount { get; set; }
     

        

        [EventSubscribe("DoManagement")] 
        private void OnDoManagement(object sender, EventArgs e)
        { 
            double zadok = (double)Structure.GetObject("Phenology.Zadok.Stage", relativeTo: Wheat).Value; 
 
            if (zadok >= Stage && !hasFertilised)
            { 
                Summary.WriteMessage(this, "Fertilising!!", MessageType.Diagnostic); 
                Fertiliser.Apply(amount: Amount, type: FertiliserType);
                hasFertilised = true; 
            } 
        }

        [EventSubscribe("Sowing")]
        private void OnSowing(object sender, EventArgs e)
        {
            hasFertilised = false;
        }
    }
}
```
          Manager Harvest
```csharp
using Models.Soils.Nutrients;
using System;
using Models.Core;
using Models.PMF;
using Models.Soils;
using Models.Soils.Nutrients;
using Models.Utilities;
using APSIM.Shared.Utilities;

namespace Models
{
    [Serializable]
    public class Script : Model
    {
        [Link] Plant Wheat;

        [EventSubscribe("DoManagement")]
        private void OnDoManagement(object sender, EventArgs e)
        {
            if (Wheat.IsReadyForHarvesting)
            {
               Wheat.Harvest();
               Wheat.EndCrop();    
            }
        
        }
        
    }
}
```
    Experiment SowingSiteSWIM
      Factors
        Permutation
          Factor SowingDate: Specification=[SowingRule].Script.SowingDate = 12-Apr, 12-May, 30-May
          Factor Site: same as Sensibility.SowingSiteWaterModel.Factors.Permutation.Site
          Factor Soil: Specification=[Soil]
            CompositeFactor Sandy: Specifications=[Soil]
              Soil Deep sandy duplex (Merredin C-R1 No1203): ASCOrder=Sodosol; ASCSubOrder=Subnatric Yellow; SoilType=Sandy duplex; LocalName=Deep sandy duplexes; Site=C-R1; NearestTown=Merredin; Region=Central Region; State=Western Australia; Country=Australia; ApsoilNumber=1203; Latitude=-31.487884; Longitude=118.222947; LocationAccuracy=+/- 2000m; YearOfSampling=1993; DataSource=DAFWA  Jeff Russell
                Comments=Deep sandy duplex - Sand over clay with silcrete layer at 50cm, Duplex S4, Table 10 in Russell (2005) Major soils of the Eastern Wheatbelt to characterise soil moisture availablity. Department of Agriculture Western Australia. Resource Management Technical Report 187.
                Physical
                  Thickness  ParticleSizeSand  ParticleSizeSilt  ParticleSizeClay  Rocks  BD    AirDry  LL15  DUL    SAT       KS
                  100        90.5              4.8               4.7               2.5    1.5   0.015   0.03  0.13   0.363962  1500
                  100        90.2              4.3               5.5               3.4    1.57  0.02    0.03  0.13   0.337547  1500
                  100        88.2              3.7               8.1               3.3    1.57  0.04    0.04  0.24   0.337547  1500
                  100        88.8              3.7               7.5               5.3    1.66  0.04    0.04  0.24   0.303585  1500
                  100        91.4              4                 4.6               4.6    1.66  0.04    0.04  0.275  0.303585  1500
                  200        77.2              10.8              11.9              6.4    1.71  0.1     0.1   0.29   0.324717  600
                  200        78.4              13.1              8.5               2.5    1.52  0.1     0.1   0.31   0.396415  600
                  200        79.1              12.1              8.8               7.8    1.72  0.1     0.1   0.26   0.316     600
                  200        74                13.3              12.7              7.9    1.68  0.15    0.15  0.25   0.33      600
                  200        67.4              18.2              14.4              17.3   1.47  0.15    0.15  0.29   0.358     400
                  200        51.3              30                18.7              0.6    1.39  0.15    0.15  0.31   0.445472  300
                  BD source: e, Field measured and checked for sensibility
                  AirDry, LL15 source: Estimated based on local knowledge
                  DUL source: Field measured and checked for sensibility
                  SAT source: Calculated from measured, estimated or calculated BD, Capped so rocks + BD + SAT leave 1% air
                  SoilCrop wheatSoil: same as Sensibility.SowingSiteWaterModel.Factors.Permutation.Soil.Sandy.Deep sandy duplex (Merredin C-R1 No1203).Physical.wheatSoil
                  SoilCrop SCRUMSoil: same as Sensibility.SowingSiteWaterModel.Factors.Permutation.Soil.Sandy.Deep sandy duplex (Merredin C-R1 No1203).Physical.wheatSoil
                Swim3: hydrol_effective_depth=450; hydrol_effective_exponent=4.16; Salb=0.13; CN2Bare=68; CNRed=20; CNCov=0.8; KDul=0.1; PSIDul=-100; VC=true; DTMin=0; DTMax=1440; MaxWaterIncrement=5; SpaceWeightingFactor=0.5; SoluteSpaceWeightingFactor=0.5; Dis=15; Disp=1; A=1; DTHC=0; DTHP=1; vcon1=7.28e-09; vcon2=7.26e-07; eo_time=06:00; eo_durn=720; default_rain_time=00:00; default_rain_duration=720; Diagnostics=false
                Organic: same as Sensibility.SowingSiteWaterModel.Factors.Permutation.Soil.Sandy.Deep sandy duplex (Merredin C-R1 No1203).Organic
                Chemical: same as Sensibility.SowingSiteWaterModel.Factors.Permutation.Soil.Sandy.Deep sandy duplex (Merredin C-R1 No1203).Chemical
                Nutrient
                Solute NO3: InitialValuesUnits=ppm; WaterTableConcentration=0; D0=0; DepthConstant=0; MaxDepthSoluteAccessible=0; RunoffEffectivenessAtMovingSolute=0; MaxEffectiveRunoff=0
                  Thickness  InitialValues  Exco  FIP
                  100        0              1     1
                  100        0              1     1
                  100        0              1     1
                  100        0              1     1
                  100        0              1     1
                  200        0              1     1
                  200        0              1     1
                  200        0              1     1
                  200        0              1     1
                  200        0              1     1
                  200        0              1     1
                Solute NH4: same as Sensibility.SowingSiteSWIM.Factors.Permutation.Soil.Sandy.Deep sandy duplex (Merredin C-R1 No1203).NO3
                Solute Urea: InitialValuesUnits=kg/ha; WaterTableConcentration=0; D0=0; DepthConstant=0; MaxDepthSoluteAccessible=0; RunoffEffectivenessAtMovingSolute=0; MaxEffectiveRunoff=0
                  Thickness  InitialValues  Exco  FIP
                  100        0              1     1
                  100        0              1     1
                  100        0              1     1
                  100        0              1     1
                  100        0              1     1
                  200        0              1     1
                  200        0              1     1
                  200        0              1     1
                  200        0              1     1
                  200        0              1     1
                  200        0              1     1
                Water: Thickness=[100, 100, 100, 100, 100, 200, 200, 200, 200, 200, 200]; FilledFromTop=false
                  InitialValues=[0.13, 0.13, 0.24, 0.24, 0.275, 0.29, 0.31, 0.26, 0.25, 0.29, 0.31]
                SoilTemperature Temperature: InteractionsPerDay=8
                LayerStructure: Thickness=[20, 20, 20, 40, 50, 50, 50, 50, 100, 100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]
            CompositeFactor Loam: Specifications=[Soil]
              Soil Red Chromosol (Temora No913): ASCOrder=Chromosol; ASCSubOrder=Red; SoilType=Loamy duplex; Site=Temora; NearestTown=Temora; Region=Central West Slopes and Plains; State=New South Wales; Country=Australia; ApsoilNumber=913; Latitude=-34.4085; Longitude=147.531; LocationAccuracy=+/- 200m; YearOfSampling=0; DataSource=Collected by Brett Cocks (CES) for NVT.
                Physical
                  Thickness  BD     AirDry  LL15   DUL    SAT    KS
                  100        1.519  0.08    0.161  0.282  0.332  216
                  200        1.408  0.104   0.129  0.224  0.274  216
                  300        1.572  0.192   0.192  0.321  0.371  216
                  300        1.578  0.192   0.192  0.325  0.375  216
                  300        1.616  0.192   0.192  0.31   0.36   216
                  300        1.614  0.192   0.192  0.311  0.361  216
                  300        1.581  0.192   0.192  0.323  0.373  216
                  BD, AirDry, LL15, DUL, SAT source: Unknown source or quality of data
                  SoilCrop wheatSoil: same as Sensibility.SowingSiteWaterModel.Factors.Permutation.Soil.Loam.Red Chromosol (Temora No913).Physical.wheatSoil
                  SoilCrop barleySoil: same as Sensibility.SowingSiteWaterModel.Factors.Permutation.Soil.Loam.Red Chromosol (Temora No913).Physical.wheatSoil
                  SoilCrop canolaSoil: same as Sensibility.SowingSiteWaterModel.Factors.Permutation.Soil.Loam.Red Chromosol (Temora No913).Physical.wheatSoil
                Swim3: hydrol_effective_depth=450; hydrol_effective_exponent=4.16; Salb=0.13; CN2Bare=73; CNRed=20; CNCov=0.8; KDul=0.1; PSIDul=-100; VC=true; DTMin=0; DTMax=1440; MaxWaterIncrement=5; SpaceWeightingFactor=0.5; SoluteSpaceWeightingFactor=0.5; Dis=15; Disp=1; A=1; DTHC=0; DTHP=1; vcon1=7.28e-09; vcon2=7.26e-07; eo_time=06:00; eo_durn=720; default_rain_time=00:00; default_rain_duration=720; Diagnostics=false
                Organic: same as Sensibility.SowingSiteWaterModel.Factors.Permutation.Soil.Loam.Red Chromosol (Temora No913).Organic
                Chemical: same as Sensibility.SowingSiteWaterModel.Factors.Permutation.Soil.Loam.Red Chromosol (Temora No913).Chemical
                Nutrient
                Water: Thickness=[150, 150, 300, 300, 300, 300, 300]; InitialValues=[0.185, 0.148, 0.218, 0.219, 0.216, 0.216, 0.218]; FilledFromTop=false
                Solute NO3: InitialValuesUnits=kg/ha; WaterTableConcentration=0; D0=0; DepthConstant=0; MaxDepthSoluteAccessible=0; RunoffEffectivenessAtMovingSolute=0; MaxEffectiveRunoff=0
                  Thickness  InitialValues  Exco  FIP
                  150        20             1     1
                  150        30             1     1
                  300        1              1     1
                  300        1              1     1
                  300        1              1     1
                  300        1              1     1
                  300        1              1     1
                Solute NH4: InitialValuesUnits=kg/ha; WaterTableConcentration=0; D0=0; DepthConstant=0; MaxDepthSoluteAccessible=0; RunoffEffectivenessAtMovingSolute=0; MaxEffectiveRunoff=0
                  Thickness  InitialValues  Exco  FIP
                  150        0.1            1     1
                  150        0.1            1     1
                  300        0.1            1     1
                  300        0.1            1     1
                  300        0.1            1     1
                  300        0.1            1     1
                  300        0.1            1     1
                Solute Urea: InitialValuesUnits=ppm; WaterTableConcentration=0; D0=0; DepthConstant=0; MaxDepthSoluteAccessible=0; RunoffEffectivenessAtMovingSolute=0; MaxEffectiveRunoff=0
                  Thickness  InitialValues  Exco  FIP
                  150        0              1     1
                  150        0              1     1
                  300        0              1     1
                  300        0              1     1
                  300        0              1     1
                  300        0              1     1
                  300        0              1     1
                SoilTemperature Temperature: InteractionsPerDay=8
                LayerStructure: Thickness=[20, 20, 20, 40, 50, 50, 50, 50, 100, 100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]
          Factor GerminationModel: same as Sensibility.SowingSiteWaterModel.Factors.Permutation.GerminationModel
      Simulation FieldSimulationSWIM
        Clock: Start=1988-01-01; End=2017-10-31
        Summary SummaryFile
        Weather: FileName=%root%/Examples/WeatherFiles/AU_WaggaWagga.met
        SoilArbitrator
        Zone Field: Area=1; Slope=0; AspectAngle=0; Altitude=50
          Report SensibilityDaily: same as Sensibility.SowingSiteWaterModel.FieldSimulation.Field.SensibilityDaily
          Report SensibilitySummary: same as Sensibility.SowingSiteWaterModel.FieldSimulation.Field.SensibilitySummary
          Report GerminationDaily: same as Sensibility.SowingSiteWaterModel.FieldSimulation.Field.GerminationDaily
          Report GerminationSummary: same as Sensibility.SowingSiteWaterModel.FieldSimulation.Field.GerminationSummary
          Fertiliser
          SurfaceOrganicMatter: InitialResidueName=wheat_stubble; InitialResidueType=wheat; InitialResidueMass=500; InitialStandingFraction=0; InitialCPR=0; InitialCNR=100
          Plant Wheat
          MicroClimate: a_interception=0; b_interception=1; c_interception=0; d_interception=0; SoilHeatFluxFraction=0.4; MinimumHeightDiffForNewLayer=0; NightInterceptionFraction=0.5; ReferenceHeight=2
          Soil: same as Sensibility.SowingSiteWaterModel.FieldSimulation.Field.Soil
          Manager SowingRule: same as Sensibility.SowingSiteWaterModel.FieldSimulation.Field.SowingRule
          Manager GerminationConditions: same as Sensibility.SowingSiteWaterModel.FieldSimulation.Field.GerminationConditions
          Manager SowingFertiliser: same as Sensibility.SowingSiteWaterModel.FieldSimulation.Field.SowingFertiliser
          Manager FertiliseOnZadokstage: same as Sensibility.SowingSiteWaterModel.FieldSimulation.Field.FertiliseOnZadokstage
          Manager Harvest: same as Sensibility.SowingSiteWaterModel.FieldSimulation.Field.Harvest
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