Simulations: Version=168
  DataStore
  Simulation
    Clock: Start=1900-01-01; End=1900-01-31
    Summary SummaryFile
    Weather: FileName=%root%\Examples\WeatherFiles\Dalby.met
    SoilArbitrator
    Zone Field: Area=1; Slope=0; AspectAngle=0; Altitude=50
      Report: EventNames=[Wheat].Harvesting
        VariableNames:
          [Clock].Today
          [Wheat].Phenology.Zadok.Stage
          [Wheat].Phenology.CurrentStageName
          [Wheat].AboveGround.Wt
          [Wheat].AboveGround.N
          [Wheat].Grain.Total.Wt*10 as Yield
          [Wheat].Grain.Protein
          [Wheat].Grain.Size
          [Wheat].Grain.Number
          [Wheat].Grain.Total.Wt
          [Wheat].Grain.Total.N
          [Wheat].Total.Wt
      Fertiliser
      Soil: ASCOrder=Vertosol; ASCSubOrder=Black; SoilType=Clay; Site=Norwin; NearestTown=Norwin; Region=Darling Downs and Granite Belt; State=Queensland; Country=Australia; NaturalVegetation=Qld. Bluegrass, possible Qld. Blue gum; ApsoilNumber=900; Latitude=-27.581836; Longitude=151.320206; LocationAccuracy=+/- 20m
        DataSource=CSIRO Sustainable Ecosystems, Toowoomba; Characteriesd as part of the GRDC funded project"Doing it better, doing it smarter, managing soil water in Australian agriculture' 2011
        Comments=OC, CLL for all crops estimated-based on Bongeen Mywybilla Soil No1
        Physical
          Thickness  BD       AirDry    LL15      DUL       SAT       KS
          150        1.01056  0.13025   0.2605    0.521     0.588655  20
          150        1.07146  0.198689  0.248362  0.496723  0.565677  20
          300        1.09394  0.28      0.28      0.488438  0.557193  20
          300        1.15861  0.28      0.28      0.480297  0.532787  20
          300        1.17301  0.28      0.28      0.471584  0.527354  20
          300        1.16287  0.28      0.28      0.457071  0.53118   20
          300        1.1875   0.28      0.28      0.452332  0.521888  20
          SoilCrop WheatSoil: LL=[0.261, 0.248, 0.28, 0.306, 0.36, 0.392, 0.446]; KL=[0.06, 0.06, 0.06, 0.04, 0.04, 0.02, 0.01]; XF=[1, 1, 1, 1, 1, 1, 1]
        WaterBalance SoilWater: SummerDate=1-Nov; SummerU=5; SummerCona=5; WinterDate=1-Apr; WinterU=5; WinterCona=5; DiffusConst=40; DiffusSlope=16; Salb=0.12; CN2Bare=73; CNRed=20; CNCov=0.8; PSIDul=-100; Thickness=[150, 150, 300, 300, 300, 300, 300]; SWCON=[0.3, 0.3, 0.3, 0.3, 0.3, 0.3, 0.3]
        Organic: FOMCNRatio=40; CarbonUnits=Total
          Thickness  Carbon  SoilCNRatio  FBiom  FInert  FOM
          150        1.2     12           0.04   0.4     347.129
          150        0.96    12           0.02   0.6     270.344
          300        0.6     12           0.02   0.8     163.972
          300        0.3     12           0.02   1       99.4541
          300        0.18    12           0.01   1       60.322
          300        0.12    12           0.01   1       36.5871
          300        0.12    12           0.01   1       22.1912
        Chemical: Thickness=[150, 150, 300, 300, 300, 300, 300]; PH=[8, 8, 8, 8, 8, 8, 8]; PHUnits=Water
        Water: Thickness=[150, 150, 300, 300, 300, 300, 300]; InitialPAWmm=361.245; RelativeTo=LL15; FilledFromTop=false
          InitialValues=[0.521, 0.496723, 0.488438, 0.480297, 0.471584, 0.457071, 0.452332]
        CERESSoilTemperature Temperature
        Nutrient
        Solute NO3: Thickness=[150, 150, 300, 300, 300, 300, 300]; InitialValues=[1, 1, 1, 1, 1, 1, 1]; InitialValuesUnits=ppm; WaterTableConcentration=0; D0=0; DepthConstant=0; MaxDepthSoluteAccessible=0; RunoffEffectivenessAtMovingSolute=0; MaxEffectiveRunoff=0
        Solute NH4: Thickness=[150, 150, 300, 300, 300, 300, 300]; InitialValues=[0.1, 0.1, 0.1, 0.1, 0.1, 0.1, 0.1]; InitialValuesUnits=ppm; WaterTableConcentration=0; D0=0; DepthConstant=0; MaxDepthSoluteAccessible=0; RunoffEffectivenessAtMovingSolute=0; MaxEffectiveRunoff=0
        Solute Urea: Thickness=[150, 150, 300, 300, 300, 300, 300]; InitialValues=[0, 0, 0, 0, 0, 0, 0]; InitialValuesUnits=kg/ha; WaterTableConcentration=0; D0=0; DepthConstant=0; MaxDepthSoluteAccessible=0; RunoffEffectivenessAtMovingSolute=0; MaxEffectiveRunoff=0
      SurfaceOrganicMatter: InitialResidueName=wheat_stubble; InitialResidueType=wheat; InitialResidueMass=500; InitialStandingFraction=0; InitialCPR=0; InitialCNR=100
      Plant Wheat
      MicroClimate: a_interception=0; b_interception=1; c_interception=0; d_interception=0; SoilHeatFluxFraction=0.4; MinimumHeightDiffForNewLayer=0; NightInterceptionFraction=0.5; ReferenceHeight=2
      Manager SowingFertiliser
        Amount = 160
        CropName = wheat
```csharp
using Models.Soils;
using System.Linq;
using System;
using Models.Core;
using Models.PMF;
namespace Models
{
    [Serializable]
    public class Script : Model
    {
        [Link] Clock Clock;
        [Link] Fertiliser Fertiliser;
        [Link] Summary Summary;
        
        
        [Description("Amount of fertiliser to be applied (kg/ha)")]
        public double Amount { get; set;}
        
        [Description("Crop to be fertilised")]
        public string CropName { get; set;}
        
        
        

        [EventSubscribe("Sowing")]
        private void OnSowing(object sender, EventArgs e)
        {
            Model crop = sender as Model;
            if (crop.Name.ToLower()==CropName.ToLower())
                Fertiliser.Apply(Amount: Amount, Type: Fertiliser.Types.NO3N);
        }
        
    }
}
```
      Manager Harvest
```csharp
using Models.Soils.Nutrients;
using System.Linq;
using System;
using Models.Core;
using Models.PMF;
using Models.Soils;
using Models.Soils.Nutrients;
using Models.Utilities;
using APSIM.Shared.Utilities;

namespace Models
{
    [Serializable]
    public class Script : Model
    {
        [Link] Plant Wheat;

        [EventSubscribe("DoManagement")]
        private void OnDoManagement(object sender, EventArgs e)
        {
            if (Wheat.IsReadyForHarvesting)
            {
               Wheat.Harvest();
               Wheat.EndCrop();    
            }
        
        }
        
    }
}
```
      Manager SowingRule1
        StartDate = 1-may
        EndDate = 10-jul
        MinESW = 100
        MinRain = 25
        RainDays = 7
        CultivarName = Hartog
        SowingDepth = 30
        RowSpacing = 250
        Population = 120
```csharp
using Models.Interfaces;
using System.Linq;
using System;
using Models.Core;
using Models.PMF;
using Models.Soils;
using Models.Soils.Nutrients;
using Models.Utilities;
using APSIM.Shared.Utilities;
using Models.Climate;

namespace Models
{
    [Serializable]
    public class Script : Model
    {
        [Link] private Clock Clock;
        [Link] private Fertiliser Fertiliser;
        [Link] private Summary Summary;
        [Link(ByName = true)] private Plant Wheat;
        [Link] private Soil Soil;
        private Accumulator accumulatedRain;
        [Link]
        private ISoilWater waterBalance;
        
        [Description("Start of sowing window (d-mmm)")]
        public string StartDate { get; set;}
        [Description("End of sowing window (d-mmm)")]
        public string EndDate { get; set;}
        [Description("Minimum extractable soil water for sowing (mm)")]
        public double MinESW { get; set;}
        [Description("Accumulated rainfall required for sowing (mm)")]
        public double MinRain { get; set;}
        [Description("Duration of rainfall accumulation (d)")]
        public int RainDays { get; set;}
        [Description("Cultivar to be sown")]
        [Display(Type=DisplayType.CultivarName, PlantName = "Wheat")]
        public string CultivarName { get; set;}
        [Description("Sowing depth (mm)")]
        public double SowingDepth { get; set;}        
        [Description("Row spacing (mm)")]
        public double RowSpacing { get; set;}    
        [Description("Plant population (/m2)")]
        public double Population { get; set;}    
        
        
        [EventSubscribe("StartOfSimulation")]
        private void OnSimulationCommencing(object sender, EventArgs e)
        {
            accumulatedRain = new Accumulator(this, "[Weather].Rain", RainDays);
        }
        

        [EventSubscribe("DoManagement")]
        private void OnDoManagement(object sender, EventArgs e)
        {
            accumulatedRain.Update();
            
            if (DateUtilities.WithinDates(StartDate,Clock.Today,EndDate) &&
                !Wheat.IsAlive &&
                MathUtilities.Sum(waterBalance.ESW) > MinESW &&
                accumulatedRain.Sum > MinRain)
            {
               Wheat.Sow(population:Population, cultivar:CultivarName, depth:SowingDepth, rowSpacing:RowSpacing);    
            }
        
        }
        
    }
}
```
      Manager
        DummyStringVar = garbage
        DummyDoubleVar = 562.5
```csharp
using Models.Soils.Nutrients;
using System.Linq;
using System;
using Models.Core;
using Models.PMF;
using Models.Soils;
using Models.Soils.Nutrients;
using Models.Utilities;

using APSIM.Shared.Utilities;

namespace Models
{
    [Serializable]
    public class Script : Model
    {
        [Link] Simulation simulation;
     
        [Description("DummyStringVar")]
        //public string DummyStringVar { get {return("garbage");} set {Console.WriteLine("Dummy set to " + value);}}
        public string DummyStringVar { get ; set ;}


        [Description("DummyDoubleVar")]
        //public double DummyDoubleVar { get {return(-1.0);} set {Console.WriteLine("Dummy double set to " + value.ToString());}}
        public double DummyDoubleVar { get ; set ;}
            
        [EventSubscribe("StartOfSimulation")]
        private void OnSimulationCommencing(object sender, EventArgs e)
        {
           
        }
    }
}
```
      Manager NO3Management
```csharp
using Models.Soils.Nutrients;
using System.Linq;
using System;
using Models.Core;
using Models.PMF;
using Models.Soils;
using Models.Soils.Nutrients;
using Models.Utilities;

using APSIM.Shared.Utilities;

namespace Models
{
    [Serializable]
    public class NO3Script : Model
    {
        [Link] Simulation simulation;
        [Link] Fertiliser Fertiliser;
        [Link] Nutrient Nutrient;
        [Link (ByName = true)] Solute NO3; // a child of ^^
            
        [EventSubscribe("StartOfSimulation")]
        private void OnSimulationCommencing(object sender, EventArgs e)
        {
        }
        public void AddFertiliser(double Amount /* in kg/ha*/)
        {
            Fertiliser.Apply(Amount: Amount, Type: Fertiliser.Types.NO3N);
        }
        public void SetNO3(double Amount /* in kg/ha*/)
        {
           double [] values = new double[Nutrient.NO3.kgha.Length];
           values[0] = Amount * 0.9;
           values[1] = Amount * 0.1;
           // remaining are 0
           
           Nutrient.NO3.SetKgHa(SoluteSetterType.Other, values);
        }

    }
}
```
      Manager Synchroniser
        Identifier =
```csharp
using Models.Soils.Nutrients;
using System.Linq;
using System;
using Models.Core;
using Models.PMF;
using Models.Soils;
using Models.Soils.Nutrients;
using Models.Utilities;
using Models.Functions;
using MessagePack;
using System.IO;

using NetMQ;
using NetMQ.Sockets;

using APSIM.Shared.Utilities;

namespace Models
{
    [Serializable]
    public class Script : Model
    {
        [Link] Simulation simulation;
//             vvvvvvvv New bit                
        [Link] NO3Script NO3Management;
//             ^^^^^^^^
        [Description("Identifier")]
        public string Identifier { get; set;}

        [NonSerialized]
        private RequestSocket connection;
            
        [EventSubscribe("StartOfSimulation")]
        private void OnSimulationCommencing(object sender, EventArgs e)
        {
           Identifier = "tcp://" + Identifier;
           Console.WriteLine("StartOfSimulation, id = " + Identifier);
           connection = new RequestSocket(Identifier);

           connection.SendFrame("connect");
           var msg = connection.ReceiveFrameString(); 
           if (msg != "ok") { throw new Exception("Expected ok"); }
        }
        
        [EventSubscribe("EndOfDay")]
        private void OnEndOfDay(object sender, EventArgs e)
        {
           bool moreToDo = true;
           connection.SendFrame("paused");
           while (moreToDo) {
             var msg = connection.ReceiveMultipartMessage();
             //Console.WriteLine("Got {0} parts, first = {1}", msg.FrameCount, msg[0].ConvertToString()); 
             if (msg.FrameCount <= 0) { continue ; }
              
             var command = msg[0].ConvertToString();
             if (command == "resume") 
                moreToDo = false;
//             vvvvvvvv New bit                
             else if (command == "setNO3" && msg.FrameCount == 2) {
                 double Amount = MessagePackSerializer.Deserialize<double>( msg[1].Buffer );
                 Console.WriteLine("Got setNO3 {0} ", Amount); 
                 NO3Management.SetNO3(Amount);
                 connection.SendFrame("ok");
//             ^^^^^^^^
             } else if (command == "set" && msg.FrameCount == 3) {
                string variableName = MessagePackSerializer.Deserialize<string>( msg[1].Buffer );
                var myType = simulation.Get(variableName).GetType();
                //Console.WriteLine("Got set {0}, my type is {1}", variableName, myType);
                object value = MessagePackSerializer.Deserialize<object>( msg[2].Buffer );
                //Console.WriteLine("Got set {0} of incoming type {1}", variableName, value.GetType());
                if (value.GetType().IsArray) {
                   // This is ugly - object[] isn't handled by apsim's Get/Set..
                   Type myElementType = myType.GetElementType();
                   Object[] values = (value as object[]);
                   if (isNumeric(myElementType)) {
                       var myValues = Array.ConvertAll(values, (e) => (double) e);
                       simulation.Set(variableName, myValues);
                   } else if (isInteger(myElementType)) {
                       var myValues = Array.ConvertAll(values, (e) => (int) e);
                       simulation.Set(variableName, myValues);
                   } else if (isString(myElementType)) {
                       var myValues = Array.ConvertAll(values, (e) => (string) e);
                       simulation.Set(variableName, myValues);
                   } else {
                      throw new Exception("Don't know what to do setting a " + myElementType + " variable");
                   }
                   //var myValues = Array.ConvertAll(values, (e) => Convert.ChangeType(e, myElementType));
                   //var myValues = values.Select(e => Convert.ChangeType(e, myType.GetElementType())).ToArray();
                   //var myValues = Array.CreateInstance(myElementType, values.Length);
                   //for (int i = 0; i < values.Length; i++ ) { myValues.SetValue(Convert.ChangeType(values[i], myElementType), i); }
                   //Console.WriteLine("Doing set {0} of type {1}", variableName, myValues.GetType() );
                   //Object[] myValues = (value as object[]);
                   //simulation.Set(variableName, myValues);
                } else {
                   simulation.Set(variableName, Convert.ChangeType(value, myType));
                }
                connection.SendFrame("ok");
             } else if (command == "get" && msg.FrameCount == 2) {
                string variableName = MessagePackSerializer.Deserialize<string>( msg[1].Buffer );
                object value = simulation.Get(variableName);
                if (value is IFunction function)
                    value = function.Value();
                else if (value != null && (value.GetType().IsArray || value.GetType().IsClass))
                {
                   try
                   {
                       value = ReflectionUtilities.Clone(value);
                   }
                   catch (Exception err)
                   {
                       throw new Exception($"Cannot report variable \"{variableName}\": Variable is a non-reportable type: \"{value?.GetType()?.Name}\".", err);
                   }
                }
                //Console.WriteLine("Got get '{0}' of type '{1}'", variableName, value?.GetType()); 
             
                byte[] bytes;
                if (value != null) {
                   bytes = MessagePackSerializer.Serialize(value);
                } else {
                   bytes = MessagePackSerializer.Serialize("NA"); // fixme. Probably a better way to do this
                } 

                connection.SendFrame(bytes);
             } else {
                throw new Exception("Expected resume/get/set, not '" + command + "'");
             }
           }
        } 
        [EventSubscribe("EndOfSimulation")]
        private void OnSimulationEnding(object sender, EventArgs e)
        {
            connection.SendFrame("finished");
            var msg = connection.ReceiveFrameString(); 
           
            if (msg != "ok") { throw new Exception("Expected ok at end"); }
            connection.Close();
            Console.WriteLine("Simulation Ending");
        }       
        static bool isNumeric(Type type) {
         switch (Type.GetTypeCode(type))
            {
                case TypeCode.Double:
                case TypeCode.Single:
                   return true;
            }
            return false;
        }
        static bool isInteger(Type type) {
         switch (Type.GetTypeCode(type))
            {
                case TypeCode.Int16:
                case TypeCode.Int32:
                case TypeCode.Int64:
                case TypeCode.UInt16:
                case TypeCode.UInt32:
                case TypeCode.UInt64:
                   return true;
            }
            return false;
        }
        static bool isString(Type type) {
         switch (Type.GetTypeCode(type))
            {
                case TypeCode.String:
                   return true;
            }
            return false;
        }
    }
}
```
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