Simulations: Version=206
  DataStore
  Simulation Canola Example
    Clock: Start=1992-04-30; End=1992-12-31
    Summary SummaryFile
    Weather: FileName=%root%/Examples/WeatherFiles/AU_WaggaWagga.met
    SoilArbitrator Soil Arbitrator
    MicroClimate: a_interception=0; b_interception=0; c_interception=0; d_interception=0; SoilHeatFluxFraction=0.4; MinimumHeightDiffForNewLayer=0; NightInterceptionFraction=0.5; ReferenceHeight=2
    Zone: Area=1; Slope=0; AspectAngle=0; Altitude=50
      Report: EventNames=[Clock].DoReport
        VariableNames:
          [Clock].Today
          [Canola].DaysAfterSowing
          [Canola].Phenology.Stage
          [Canola].Phenology.BBCH.Stage
          [Canola].Phenology.BBCH.StageDAS(1)
          [Canola].Phenology.BBCH.StageDAS(10)
          [Canola].Phenology.BBCH.StageDAS(30)
          [Canola].Phenology.BBCH.StageDAS(60)
          [Canola].Phenology.BBCH.StageDAS(65)
          [Canola].Phenology.BBCH.StageDAS(75)
          [Canola].Phenology.BBCH.StageDAS(87)
          [Canola].Phenology.BBCH.StageDAS(90)
      Soil: SoilType=sand; Site=CSU; NearestTown=Wagga Wagga; Region=Southern NSW; State=NSW; Latitude=0; Longitude=0; YearOfSampling=0; DataSource=Kirsten Verburg; Comments=Greenethorpe
        Chemical: PHUnits=Water
          Thickness=[100, 100, 100, 100, 100, 100, 100, 100, 100, 100, 100, 100, 100, 100, 100, 100, 100, 100, 100, 100]
          PH=[5.8, 5.9, 6.6, 6.8, 7, 7.1, 7.2, 7.3, 7.4, 7.4, 7.6, 7.8, 8, 8.2, 8.3, 8.4, 8.4, 8.5, 8.5, 8.5]
        Water: FilledFromTop=false
          Thickness=[100, 100, 100, 100, 100, 100, 100, 100, 100, 100, 100, 100, 100, 100, 100, 100, 100, 100, 100, 100]
          InitialValues=[0.127, 0.135, 0.151, 0.172, 0.19, 0.19, 0.219, 0.219, 0.247, 0.247, 0.265, 0.265, 0.275, 0.275, 0.285, 0.285, 0.285, 0.285, 0.285, 0.285]
        Physical
          Thickness  BD    AirDry  LL15  DUL   SAT
          100        1.48  0.03    0.11  0.28  0.34
          100        1.49  0.12    0.12  0.27  0.34
          100        1.41  0.14    0.14  0.25  0.32
          100        1.37  0.16    0.16  0.28  0.35
          100        1.41  0.18    0.18  0.28  0.35
          100        1.41  0.18    0.18  0.28  0.35
          100        1.52  0.21    0.21  0.3   0.34
          100        1.52  0.21    0.21  0.3   0.34
          100        1.62  0.24    0.24  0.31  0.33
          100        1.62  0.24    0.24  0.31  0.33
          100        1.66  0.26    0.26  0.31  0.34
          100        1.66  0.26    0.26  0.31  0.34
          100        1.62  0.27    0.27  0.32  0.34
          100        1.62  0.27    0.27  0.32  0.34
          100        1.62  0.28    0.28  0.33  0.36
          100        1.62  0.28    0.28  0.33  0.36
          100        1.62  0.28    0.28  0.33  0.36
          100        1.62  0.28    0.28  0.33  0.36
          100        1.62  0.28    0.28  0.33  0.36
          100        1.62  0.28    0.28  0.33  0.36
          SoilCrop CanolaSoil
            LL=[0.11, 0.12, 0.14, 0.16, 0.18, 0.18, 0.21, 0.21, 0.24, 0.24, 0.26, 0.26, 0.27, 0.27, 0.28, 0.28, 0.28, 0.28, 0.28, 0.28]
            KL=[0.06, 0.05, 0.05, 0.04, 0.04, 0.04, 0.04, 0.03, 0.03, 0.03, 0.03, 0.02, 0.02, 0.02, 0.01, 0.01, 0.01, 0.01, 0, 0]
            XF=[1, 1, 1, 1, 1, 1, 1, 1, 1, 1, 1, 1, 1, 1, 1, 1, 0.8, 0.4, 0, 0]
        WaterBalance SoilWater: SummerDate=1-nov; SummerU=6; SummerCona=3.5; WinterDate=1-apr; WinterU=2; WinterCona=2; DiffusConst=44; DiffusSlope=16; Salb=0.13; CN2Bare=72; CNRed=20; CNCov=0.8; DischargeWidth=5; CatchmentArea=10; PSIDul=-100
          Thickness=[100, 100, 100, 100, 100, 100, 100, 100, 100, 100, 100, 100, 100, 100, 100, 100, 100, 100, 100, 100]
          SWCON=[0.8, 0.8, 0.8, 0.8, 0.8, 0.8, 0.8, 0.8, 0.8, 0.8, 0.8, 0.8, 0.8, 0.8, 0.8, 0.8, 0.6, 0.6, 0.6, 0.6]
        Organic: FOMCNRatio=60; CarbonUnits=Total
          Thickness  Carbon  SoilCNRatio  FBiom  FInert  FOM
          100        0.83    8            0.06   0.01    439.771
          100        0.35    8            0.05   0.01    378.5144
          100        0.33    8            0.04   0.31    325.7904
          100        0.22    8            0.03   0.35    280.4104
          100        0.22    8            0.02   0.4     241.3514
          100        0.22    8            0.01   0.45    207.7331
          100        0.19    8            0.01   0.5     178.7975
          100        0.17    8            0.01   0.6     153.8925
          100        0.15    8            0.01   0.7     132.4565
          100        0.12    8            0.01   0.8     114.0063
          100        0.11    8            0.01   0.9     98.1262
          100        0.1     8            0.01   0.99    84.458
          100        0.1     8            0.01   0.99    72.6937
          100        0.1     8            0.01   0.99    62.568
          100        0.1     8            0.01   0.99    53.8528
          100        0.1     8            0.01   0.99    46.3515
          100        0.08    8            0.01   0.99    39.8951
          100        0.06    8            0.01   0.99    34.3381
          100        0.05    8            0.01   0.99    29.555
          100        0.04    8            0.01   0.99    25.4383
        Nutrient
        Solute NO3: InitialValuesUnits=ppm; WaterTableConcentration=0; D0=0; DepthConstant=0; MaxDepthSoluteAccessible=0; RunoffEffectivenessAtMovingSolute=0; MaxEffectiveRunoff=0
          Thickness=[100, 100, 100, 100, 100, 100, 100, 100, 100, 100, 100, 100, 100, 100, 100, 100, 100, 100, 100, 100]
          InitialValues=[20.1, 6.88, 2.8, 2.8, 1.32, 1.32, 0.9, 0.9, 0.58, 0.58, 0.46, 0.46, 0.47, 0.47, 0.56, 0.56, 0.79, 0.79, 0.95, 0.95]
        Solute NH4: InitialValuesUnits=ppm; WaterTableConcentration=0; D0=0; DepthConstant=0; MaxDepthSoluteAccessible=0; RunoffEffectivenessAtMovingSolute=0; MaxEffectiveRunoff=0
          Thickness=[100, 100, 100, 100, 100, 100, 100, 100, 100, 100, 100, 100, 100, 100, 100, 100, 100, 100, 100, 100]
          InitialValues=[1.65, 0.21, 0.14, 0.14, 0.1, 0.1, 0.1, 0.1, 0.12, 0.12, 0.13, 0.13, 0.14, 0.14, 0.14, 0.14, 0.09, 0.09, 0.14, 0.14]
        Solute Urea: InitialValuesUnits=kg/ha; WaterTableConcentration=0; D0=0; DepthConstant=0; MaxDepthSoluteAccessible=0; RunoffEffectivenessAtMovingSolute=0; MaxEffectiveRunoff=0
          Thickness=[100, 100, 100, 100, 100, 100, 100, 100, 100, 100, 100, 100, 100, 100, 100, 100, 100, 100, 100, 100]
          InitialValues=[0, 0, 0, 0, 0, 0, 0, 0, 0, 0, 0, 0, 0, 0, 0, 0, 0, 0, 0, 0]
        SoilTemperature Temperature
      Fertiliser
      SurfaceOrganicMatter: InitialResidueName=maize_stubble; InitialResidueType=maize; InitialResidueMass=0; InitialStandingFraction=0; InitialCPR=400; InitialCNR=60
      Plant Canola
      Manager Fertilise at sowing
        Crop = [Canola]
        FertiliserType = NH4N
        Amount = 31
```csharp
using Models.Soils;
using System.Linq;
using System;
using Models.Core;
using Models.PMF;
namespace Models
{
    [Serializable]
    public class Script : Model
    {
        [Link] Clock Clock;
        [Link] Fertiliser Fertiliser;
        
        [Description("Crop to be fertilised")]
        public IPlant Crop { get; set; }

        [Description("Type of fertiliser to apply? ")] 
        [Display(Type = DisplayType.FertiliserType)]public string FertiliserType { get; set; }
    
        [Description("Amount of fertiliser to be applied (kg/ha)")]
        public double Amount { get; set; }
        
        [EventSubscribe("Sowing")]
        private void OnSowing(object sender, EventArgs e)
        {
            Model crop = sender as Model;
            if (Crop != null && crop.Name.ToLower() == (Crop as IModel).Name.ToLower())
                Fertiliser.Apply(amount: Amount, type: FertiliserType);
        }
    }
}
```
      Manager Sow on a fixed date
        Crop = [Canola]
        SowDate = 01-May
        CultivarName = ATR_Stingray
        SowingDepth = 5
        RowSpacing = 180
        Population = 45
```csharp
using APSIM.Shared.Utilities;
using Models.Utilities;
using Models.Soils;
using Models.PMF;
using Models.Core;
using System;
using System.Linq;

namespace Models
{
    [Serializable]
    public class Script : Model
    {
        [Link] Clock Clock;
        [Link] Fertiliser Fertiliser;
        [Link] Summary Summary;
        [Link] Soil Soil;
        
        [Description("Crop")]
        public IPlant Crop { get; set; }

        [Description("Sowing date (d-mmm)")]
        public string SowDate { get; set; }

        [Display(Type = DisplayType.CultivarName)]
        [Description("Cultivar to be sown")]
        public string CultivarName { get; set; }

        [Description("Sowing depth (mm)")]
        public double SowingDepth { get; set; }

        [Description("Row spacing (mm)")]
        public double RowSpacing { get; set; }

        [Description("Plant population (/m2)")]
        public double Population { get; set; }

        [EventSubscribe("DoManagement")]
        private void OnDoManagement(object sender, EventArgs e)
        {
            if (DateUtilities.WithinDates(SowDate, Clock.Today, SowDate))
            {
                Crop.Sow(population: Population, cultivar: CultivarName, depth: SowingDepth, rowSpacing: RowSpacing);    
            }
        }
    }
}
```
      Manager Harvesting
        Crop = [Canola]
```csharp
using APSIM.Shared.Utilities;
using Models.Utilities;
using Models.Soils;
using Models.PMF;
using Models.Core;
using System;
using System.Linq;

namespace Models
{
    [Serializable] 
    public class Script : Model
    {
        [Description("Crop")]
        public IPlant Crop { get; set; }
        
        [EventSubscribe("DoManagement")]
        private void OnDoManagement(object sender, EventArgs e)
        {
            if (Crop.IsReadyForHarvesting)
            {
                Crop.Harvest();
                Crop.EndCrop();
            }
        }
    }
}
```
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