Simulations: Version=205
  Folder Replacements
    Folder Cultivars
      Cultivar Hartog
        Command:
          [Leaf].CohortParameters.MaxArea.AreaLargestLeaves.FixedValue = 3000
          [Structure].BranchingRate.StressFactors.CoverEffect.XYPairs.X=0,0.1,0.25
  DataStore
  Simulation
    Clock: Start=1900-05-01; End=1900-12-31
    Summary
    Weather: FileName=%root%/Examples/WeatherFiles/AU_Dalby.met
    SoilArbitrator
    MicroClimate: a_interception=0; b_interception=1; c_interception=0; d_interception=0; SoilHeatFluxFraction=0.4; MinimumHeightDiffForNewLayer=0; NightInterceptionFraction=0.5; ReferenceHeight=2
    Zone Field: Area=1; Slope=0; AspectAngle=0; Altitude=50
      Report: EventNames=[Clock].DoReport
        VariableNames:
          [Clock].Today
          [Wheat].DaysAfterSowing
          [Wheat].Phenology.Zadok
          [Wheat].Phenology.Zadok.StageDAS(1)
          [Wheat].Phenology.Zadok.StageDAS(10)
          [Wheat].Phenology.Zadok.StageDAS(31)
          [Wheat].Phenology.Zadok.StageDAS(39)
          [Wheat].Phenology.Zadok.StageDAS(55)
          [Wheat].Phenology.Zadok.StageDAS(65)
          [Wheat].Phenology.Zadok.StageDAS(90)
      Fertiliser
      Soil: ASCOrder=Vertosol; ASCSubOrder=Black; SoilType=Clay; Site=Norwin; NearestTown=Norwin; Region=Darling Downs and Granite Belt; State=Queensland; Country=Australia; NaturalVegetation=Qld. Bluegrass, possible Qld. Blue gum; ApsoilNumber=900; Latitude=-27.581836; Longitude=151.320206; LocationAccuracy=+/- 20m; YearOfSampling=0
        DataSource=CSIRO Sustainable Ecosystems, Toowoomba; Characteriesd as part of the GRDC funded project"Doing it better, doing it smarter, managing soil water in Australian agriculture' 2011
        Comments=Clay - OC, CLL for all crops estimated-based on Bongeen Mywybilla Soil No1
        Physical
          Thickness  BD       AirDry    LL15      DUL       SAT       KS
          150        1.01056  0.13025   0.2605    0.521     0.588655  20
          150        1.07146  0.198689  0.248362  0.496723  0.565677  20
          300        1.09394  0.28      0.28      0.488438  0.557193  20
          300        1.15861  0.28      0.28      0.480297  0.532787  20
          300        1.17301  0.28      0.28      0.471584  0.527354  20
          300        1.16287  0.28      0.28      0.457071  0.53118   20
          300        1.1875   0.28      0.28      0.452332  0.521888  20
          SoilCrop WheatSoil: LL=[0.261, 0.248, 0.28, 0.306, 0.36, 0.392, 0.446]; KL=[0.06, 0.06, 0.06, 0.04, 0.04, 0.02, 0.01]; XF=[1, 1, 1, 1, 1, 1, 1]
        WaterBalance SoilWater: SummerDate=1-Nov; SummerU=5; SummerCona=5; WinterDate=1-Apr; WinterU=5; WinterCona=5; DiffusConst=40; DiffusSlope=16; Salb=0.12; CN2Bare=73; CNRed=20; CNCov=0.8; PSIDul=-100; Thickness=[150, 150, 300, 300, 300, 300, 300]; SWCON=[0.3, 0.3, 0.3, 0.3, 0.3, 0.3, 0.3]
        Organic: FOMCNRatio=40; CarbonUnits=Total
          Thickness  Carbon  SoilCNRatio  FBiom  FInert  FOM
          150        1.2     12           0.04   0.4     347.129
          150        0.96    12           0.02   0.6     270.344
          300        0.6     12           0.02   0.8     163.972
          300        0.3     12           0.02   1       99.4541
          300        0.18    12           0.01   1       60.322
          300        0.12    12           0.01   1       36.5871
          300        0.12    12           0.01   1       22.1912
        Chemical: Thickness=[150, 150, 300, 300, 300, 300, 300]; PH=[8, 8, 8, 8, 8, 8, 8]; PHUnits=Water
        Water: Thickness=[150, 150, 300, 300, 300, 300, 300]; FilledFromTop=false
          InitialValues=[0.521, 0.496723, 0.488438, 0.480297, 0.471584, 0.457071, 0.452332]
        Nutrient
        Solute NO3: Thickness=[150, 150, 300, 300, 300, 300, 300]; InitialValues=[1, 1, 1, 1, 1, 1, 1]; InitialValuesUnits=ppm; WaterTableConcentration=0; D0=0; DepthConstant=0; MaxDepthSoluteAccessible=0; RunoffEffectivenessAtMovingSolute=0; MaxEffectiveRunoff=0
        Solute NH4: Thickness=[150, 150, 300, 300, 300, 300, 300]; InitialValues=[0.1, 0.1, 0.1, 0.1, 0.1, 0.1, 0.1]; InitialValuesUnits=ppm; WaterTableConcentration=0; D0=0; DepthConstant=0; MaxDepthSoluteAccessible=0; RunoffEffectivenessAtMovingSolute=0; MaxEffectiveRunoff=0
        Solute Urea: Thickness=[150, 150, 300, 300, 300, 300, 300]; InitialValues=[0, 0, 0, 0, 0, 0, 0]; InitialValuesUnits=kg/ha; WaterTableConcentration=0; D0=0; DepthConstant=0; MaxDepthSoluteAccessible=0; RunoffEffectivenessAtMovingSolute=0; MaxEffectiveRunoff=0
        SoilTemperature Temperature
      SurfaceOrganicMatter: InitialResidueName=wheat_stubble; InitialResidueType=wheat; InitialResidueMass=500; InitialStandingFraction=0; InitialCPR=0; InitialCNR=100
      Plant Wheat
      Manager Sow using a variable rule
        Crop = [Wheat]
        StartDate = 1-may
        EndDate = 10-jul
        MinESW = 100
        MinRain = 25
        RainDays = 7
        CultivarName = Hartog
        SowingDepth = 30
        RowSpacing = 125
        Population = 350
```csharp
using APSIM.Numerics;
using Models.Climate;
using System.Linq;
using System;
using Models.Core;
using Models.PMF;
using Models.Soils;
using Models.Utilities;
using APSIM.Shared.Utilities;
using Models.Interfaces;

namespace Models
{
    [Serializable]
    public class Script : Model
    {
        [Link] private Clock Clock;
        [Link] private Fertiliser Fertiliser;
        [Link] private Summary Summary;
        [Link] private Soil Soil;
        private Accumulator accumulatedRain;
        [Link]
        private ISoilWater waterBalance;
        
        [Description("Crop")]
        public IPlant Crop { get; set; }

        [Description("Start of sowing window (d-mmm)")]
        public string StartDate { get; set; }

        [Description("End of sowing window (d-mmm)")]
        public string EndDate { get; set; }

        [Description("Minimum extractable soil water for sowing (mm)")]
        public double MinESW { get; set; }

        [Description("Accumulated rainfall required for sowing (mm)")]
        public double MinRain { get; set; }

        [Description("Duration of rainfall accumulation (d)")]
        public int RainDays { get; set; }

        [Display(Type = DisplayType.CultivarName)]
        [Description("Cultivar to be sown")]
        public string CultivarName { get; set; }

        [Description("Sowing depth (mm)")]
        public double SowingDepth { get; set; }

        [Description("Row spacing (mm)")]
        public double RowSpacing { get; set; }

        [Description("Plant population (/m2)")]
        public double Population { get; set; }
        
        
        [EventSubscribe("StartOfSimulation")]
        private void OnSimulationCommencing(object sender, EventArgs e)
        {
            accumulatedRain = new Accumulator(this, "[Weather].Rain", RainDays);
        }

        [EventSubscribe("DoManagement")]
        private void OnDoManagement(object sender, EventArgs e)
        {
            accumulatedRain.Update();
            
            if (DateUtilities.WithinDates(StartDate, Clock.Today, EndDate) &&
                !Crop.IsAlive &&
                MathUtilities.Sum(waterBalance.ESW) > MinESW &&
                accumulatedRain.Sum > MinRain)
            {
                Crop.Sow(population: Population, cultivar: CultivarName, depth: SowingDepth, rowSpacing: RowSpacing);    
            }
        }
    }
}
```
      Manager Fertilise at sowing
        Crop = [Wheat]
        FertiliserType = NO3N
        Amount = 160
```csharp
using Models.Soils;
using System;
using System.Linq;
using Models.Core;
using Models.PMF;
namespace Models
{
    [Serializable]
    public class Script : Model
    {
        [Link] Clock Clock;
        [Link] Fertiliser Fertiliser;
        
        [Description("Crop to be fertilised")]
        public IPlant Crop { get; set; }

        [Description("Type of fertiliser to apply? ")] 
        [Display(Type = DisplayType.FertiliserType)]public string FertiliserType { get; set; }
    
        [Description("Amount of fertiliser to be applied (kg/ha)")]
        public double Amount { get; set; }
        
        [EventSubscribe("Sowing")]
        private void OnSowing(object sender, EventArgs e)
        {
            Model crop = sender as Model;
            if (Crop != null && crop.Name.ToLower() == (Crop as IModel).Name.ToLower())
                Fertiliser.Apply(amount: Amount, type: FertiliserType);
        }
    }
}
```
      Manager Harvest
        Crop = [Wheat]
```csharp
using APSIM.Shared.Utilities;
using Models.Utilities;
using Models.Soils;
using Models.PMF;
using Models.Core;
using System;
using System.Linq;

namespace Models
{
    [Serializable] 
    public class Script : Model
    {
        [Description("Crop")]
        public IPlant Crop { get; set; }
        
        [EventSubscribe("DoManagement")]
        private void OnDoManagement(object sender, EventArgs e)
        {
            if (Crop.IsReadyForHarvesting)
            {
                Crop.Harvest();
                Crop.EndCrop();
            }
        }
    }
}
```
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