Simulations: Area=0
  Simulation Slurp: Area=0
    WeatherFile: FileName=..\WeatherFiles\lincoln.met; MaxT=12.2; MinT=9.4; Rain=0.6; Radn=3.3; vp=11.8; wind=2.8; CO2=350
    Clock: StartDate=2003-10-20; EndDate=2004-05-23
    Summary
    Zone Field: Area=0
      Report: EventNames=[Clock].DoReport; AutoCreateCSV=false
        VariableNames:
          [Clock].Today
          [WeatherFile].MaxT
          [Soil].SoilWater.sw_dep
          [Soil].SoilNitrogen.no3
      Soil: SoilType=Black Vertosol; LocalName=Waco; Site=Jimbour; NearestTown=Jimbour, Q 4352; Region=South East Queensland; NaturalVegetation=Grassland, mainly Qld bluegrass; Latitude=0; Longitude=0
        Water
          Thickness  BD    AirDry  LL15  DUL   SAT
          150        1.02  0.15    0.29  0.54  0.59
          150        1.03  0.26    0.29  0.53  0.58
          300        1.02  0.29    0.29  0.54  0.59
          300        1.02  0.29    0.29  0.54  0.58
          300        1.06  0.3     0.3   0.52  0.57
          300        1.11  0.31    0.31  0.5   0.55
          300        1.12  0.32    0.32  0.5   0.55
          300        1.15  0.33    0.33  0.48  0.53
          300        1.18  0.34    0.34  0.47  0.52
          300        1.2   0.35    0.35  0.46  0.51
          300        1.25  0.36    0.36  0.44  0.49
          SoilCrop Wheat
            LL=[0.29, 0.29, 0.32, 0.38, 0.39, 0.39, 0.41, 0.48, 0.47, 0.46, 0.44]
            KL=[0.1, 0.1, 0.08, 0.06, 0.04, 0.02, 0.01, 0, 0, 0, 0]
            XF=[1, 1, 1, 1, 1, 1, 1, 0, 0, 0, 0]
          SoilCrop Barley
            LL=[0.29, 0.29, 0.36, 0.43, 0.51, 0.5, 0.5, 0.48, 0.47, 0.46, 0.44]
            KL=[0.1, 0.1, 0.08, 0.06, 0.04, 0.02, 0.01, 0, 0, 0, 0]
            XF=[1, 1, 1, 1, 1, 1, 1, 0, 0, 0, 0]
          SoilCrop Slurp
            LL=[0.29, 0.29, 0.36, 0.43, 0.51, 0.5, 0.5, 0.48, 0.47, 0.46, 0.44]
            KL=[0.1, 0.1, 0.08, 0.06, 0.04, 0.02, 0.01, 0, 0, 0, 0]
            XF=[1, 1, 1, 1, 1, 1, 1, 0, 0, 0, 0]
        SoilWater: min_crit_temp=5; max_crit_temp=35; max_albedo=0.23; A_to_evap_fact=0.44; canopy_eos_coef=1.7; sw_top_crit=0.9; sumes1_max=100; sumes2_max=25; solute_flow_eff=[1]; solute_flux_eff=[1]; gravity_gradient=2E-05; specific_bd=2.65; hydrol_effective_depth=450; immobile_solutes=[nh4]; canopy_fact=[1, 1, 0, 0]; canopy_fact_height=[0, 600, 1800, 30000]; canopy_fact_default=0.5; act_evap_method=ritchie; irrigation_will_runoff=false; irrigation_layer=1; SummerCona=3; SummerU=6; SummerDate=1-Nov; WinterCona=3; WinterU=6; WinterDate=1-Apr; DiffusConst=40; DiffusSlope=16; Salb=0.13; slope=0; discharge_width=0; catchment_area=0; max_pond=0; CN2Bare=73; CNRed=20; CNCov=0.8
          Thickness  SWCON  KLAT
          150        0.3    0
          150        0.3    0
          300        0.3    0
          300        0.3    0
          300        0.3    0
          300        0.3    0
          300        0.3    0
          300        0.3    0
          300        0.3    0
          300        0.3    0
          300        0.3    0
          mobile_solutes=[no3, urea, cl, br, org_n, org_c_pool1, org_c_pool2, org_c_pool3]
        SoilNitrogen: fom_type=[default, manure, mucuna, lablab, shemp, stable]; fract_carb=[0.2, 0.3, 0.54, 0.57, 0.45, 0]; fract_cell=[0.7, 0.3, 0.37, 0.37, 0.47, 0.1]; fract_lign=[0.1, 0.4, 0.09, 0.06, 0.08, 0.9]; wfpsN2N2O_x=[22, 88]; wfpsN2N2O_y=[0.1, 1]
        SoilOrganicMatter: RootCN=40; RootWt=200; SoilCN=12.5; EnrACoeff=7.4; EnrBCoeff=0.2; OCUnits=Total
          Thickness  OC    FBiom  FInert
          150        1.04  0.025  0.4
          150        0.89  0.02   0.6
          300        0.89  0.015  0.8
          300        0.89  0.01   0.9
          300        0.77  0.01   0.95
          300        0.45  0.01   0.95
          300        0.27  0.01   0.95
          300        0.22  0.01   0.95
          300        0.16  0.01   0.95
          300        0.13  0.01   0.95
          300        0.12  0.01   0.95
        Analysis: PHUnits=Water; BoronUnits=HotWater
          Thickness  EC    PH
          150        0.2   8.4
          150        0.25  8.8
          300        0.31  9
          300        0.4   9.2
          300        0.59  9.2
          300        0.84  9.1
          300        0.93  9
          300        1.01  9
          300        1.06  8.9
          300        1.05  8.9
          300        1.01  8.9
        InitialWater Initial water: FractionFull=1; PercentMethod=FilledFromTop
        Sample: NO3Units=kgha; NH4Units=kgha; SWUnits=Volumetric; OCUnits=Total; PHUnits=Water
          Thickness  NO3   NH4
          100        40    0.1
          200        30    0.1
          300        14    0.1
          300        14    0.1
          300        1.38  0.1
          300        1.38  0.1
      SurfaceOrganicMatter: crit_residue_wt=2000; opt_temp=20; cum_eos_max=20; cnrf_coeff=0.277; cnrf_optcn=25; c_fract=0.4; leach_rain_tot=25; min_rain_to_leach=10; crit_min_surfom_orgC=0.004; default_cpr=0; default_standing_fraction=0; standing_extinct_coeff=0.5; fractionFaecesAdded=0.5; PoolName=Slurp; type=Slurp; mass=1000; standing_fraction=0; cnr=80
        TillageTypes
      Slurp: plant_status=out; CropType=Slurp; CoverGreen=0.5; RootDepth=200; LeafMass=1; kl=[0.5, 0.5, 0.5, 0.5, 0.5, 0.5, 0.5, 0.5, 0.5, 0.5, 0.5]; LAI=2; LAItot=2; CoverTot=0.5; Height=800; Depth=100; LeafN=2
      MicroClimate: air_pressure=1010; soil_emissivity=0.96; sun_angle=15; soil_heat_flux_fraction=0.4; night_interception_fraction=0.5; windspeed_default=3; refheight=2; albedo=0.293662; emissivity=0.96; gsmax=0.01; r50=200; a_interception=0; b_interception=1; c_interception=0; d_interception=0; soil_albedo=0.3
        ComponentData Slurp: Type=Slurp; Albedo=0.26; Emissivity=0.96; R50=200; Gsmax=0.011
        ComponentData crop: Albedo=0.26; Emissivity=0.96; R50=200; Gsmax=0.011
        ComponentData broccoli: Albedo=0.26; Emissivity=0.96; R50=200; Gsmax=0.011
        ComponentData tree: Albedo=0.15; Emissivity=0.96; R50=200; Gsmax=0.005
        ComponentData grandis: Albedo=0.15; Emissivity=0.96; R50=200; Gsmax=0.005
        ComponentData oilpalm: Albedo=0.15; Emissivity=0.96; R50=200; Gsmax=0.005
        ComponentData oilmallee: Albedo=0.15; Emissivity=0.96; R50=200; Gsmax=0.005
        ComponentData globulus: Albedo=0.15; Emissivity=0.96; R50=200; Gsmax=0.005
        ComponentData camaldulensis: Albedo=0.15; Emissivity=0.96; R50=200; Gsmax=0.005
        ComponentData grass: Albedo=0.23; Emissivity=0.96; R50=200; Gsmax=0
        ComponentData wheat: Albedo=0.26; Emissivity=0.96; R50=200; Gsmax=0.011
        ComponentData barley: Albedo=0.26; Emissivity=0.96; R50=200; Gsmax=0.011
        ComponentData canola: Albedo=0.26; Emissivity=0.96; R50=200; Gsmax=0.011
        ComponentData raphanus_raphanistrum: Albedo=0.26; Emissivity=0.96; R50=200; Gsmax=0.011
        ComponentData lolium_rigidum: Albedo=0.26; Emissivity=0.96; R50=200; Gsmax=0.011
        ComponentData chickpea: Albedo=0.26; Emissivity=0.96; R50=200; Gsmax=0.011
        ComponentData weed: Albedo=0.26; Emissivity=0.96; R50=200; Gsmax=0.011
        ComponentData oats: Albedo=0.26; Emissivity=0.96; R50=200; Gsmax=0.011
        ComponentData chickpea: Albedo=0.26; Emissivity=0.96; R50=200; Gsmax=0.011
        ComponentData fieldpea: Albedo=0.26; Emissivity=0.96; R50=200; Gsmax=0.011
        ComponentData sugar: Albedo=0.26; Emissivity=0.96; R50=200; Gsmax=0.011
        ComponentData potato: Albedo=0.15; Emissivity=0.96; R50=200; Gsmax=0
        ComponentData frenchbean: Albedo=0.26; Emissivity=0.96; R50=200; Gsmax=0.011
        ComponentData bambatsi: Albedo=0.23; Emissivity=0.96; R50=150; Gsmax=0.015
        ComponentData lucerne: Albedo=0.26; Emissivity=0.96; R50=200; Gsmax=0.011
        ComponentData maize: Albedo=0.26; Emissivity=0.96; R50=200; Gsmax=0.011
        ComponentData banksia: Albedo=0.15; Emissivity=0.96; R50=200; Gsmax=0.005
        ComponentData understorey: Albedo=0.26; Emissivity=0.96; R50=200; Gsmax=0.011
        ComponentData ryegrass: Albedo=0.23; Emissivity=0.96; R50=200; Gsmax=0
        ComponentData vine: Albedo=0.26; Emissivity=0.96; R50=200; Gsmax=0.011
        ComponentData saltbush: Albedo=0.15; Emissivity=0.96; R50=200; Gsmax=0.005
        ComponentData sorghum: Albedo=0.26; Emissivity=0.96; R50=200; Gsmax=0.011
        ComponentData danthonia: Albedo=0.23; Emissivity=0.96; R50=200; Gsmax=0
        ComponentData nativepasture: Albedo=0.15; Emissivity=0.96; R50=200; Gsmax=0
        ComponentData raphanus_raphanistrum: Albedo=0.26; Emissivity=0.96; R50=200; Gsmax=0.011
        ComponentData canola: Albedo=0.26; Emissivity=0.96; R50=200; Gsmax=0.011
        ComponentData kale2: Albedo=0.26; Emissivity=0.96; R50=200; Gsmax=0.011
        ComponentData Carrots4: Albedo=0.26; Emissivity=0.96; R50=200; Gsmax=0.011
  DataStore
  Simulation NoSlurp: Area=0
    WeatherFile: FileName=..\WeatherFiles\lincoln.met; MaxT=12.2; MinT=9.4; Rain=0.6; Radn=3.3; vp=11.8; wind=2.8; CO2=350
    Clock: StartDate=2003-10-20; EndDate=2004-05-23
    Summary
    Zone Field: Area=0
      Report: EventNames=[Clock].DoReport; AutoCreateCSV=false
        VariableNames:
          [Clock].Today
          [Soil].SoilWater.sw_dep
          [Soil].SoilNitrogen.no3
      Soil: same as Slurp.Field.Soil
      SurfaceOrganicMatter: same as Slurp.Field.SurfaceOrganicMatter
  Tests
    Test:
      SimulationName  TableName  Type       ColumnNames               Parameters
      Slurp           Report     Tolerance  Soil.SoilWater.sw_dep(1)  1,1
      Slurp           Report     Tolerance  Soil.SoilNitrogen.no3(1)  1,1
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