Simulations
  Memo
    replace cover with a k and calculate
  Simulation SlurpOne
    WeatherFile: FileName=ForeverSpringNoRain.met
    Clock: StartDate=2000-01-01; EndDate=2000-01-31
    Summary
    Zone Field: Area=0; Slope=0
      Soil: SoilType=Uniform soil; Latitude=0; Longitude=0
        Water
          Thickness  BD  AirDry  LL15  DUL   SAT  KS
          150        1   0.15    0.3   0.55  0.6  100
          150        1   0.15    0.3   0.55  0.6  100
          300        1   0.15    0.3   0.55  0.6  100
          300        1   0.15    0.3   0.55  0.6  100
          SoilCrop Slurp: LL=[0.3, 0.3, 0.3, 0.3]; KL=[0.1, 0.1, 0.1, 0.1]; XF=[1, 1, 1, 1]
        SoilWater: min_crit_temp=5; max_crit_temp=35; max_albedo=0.23; A_to_evap_fact=0.44; canopy_eos_coef=1.7; sw_top_crit=0.9; sumes1_max=100; sumes2_max=25; solute_flow_eff=[1]; solute_flux_eff=[1]; gravity_gradient=2E-05; specific_bd=2.65; hydrol_effective_depth=450; immobile_solutes=[nh4]; canopy_fact_default=0.5; act_evap_method=ritchie; irrigation_will_runoff=false; irrigation_layer=1; SummerCona=3; SummerU=6; SummerDate=1-Nov; WinterCona=3; WinterU=6; WinterDate=1-Apr; DiffusConst=40; DiffusSlope=16; Salb=0.13; slope=0; discharge_width=0; catchment_area=0; max_pond=0; CN2Bare=73; CNRed=20; CNCov=0.8
          canopy_fact  canopy_fact_height  Thickness  SWCON  KLAT
          1            0                   150        0      0
          1            600                 150        0      0
          0            1800                300        0      0
          0            30000               300        0      0
          mobile_solutes=[no3, urea, cl, br, org_n, org_c_pool1, org_c_pool2, org_c_pool3]
        SoilNitrogen: fom_type=[default, manure, mucuna, lablab, shemp, stable]; fract_carb=[0.2, 0.3, 0.54, 0.57, 0.45, 0]; fract_cell=[0.7, 0.3, 0.37, 0.37, 0.47, 0.1]; fract_lign=[0.1, 0.4, 0.09, 0.06, 0.08, 0.9]; wfpsN2N2O_x=[22, 88]; wfpsN2N2O_y=[0.1, 1]; oc=[0, 0, 0, 0]
        SoilOrganicMatter: RootCN=40; RootWt=0; SoilCN=12.5; EnrACoeff=7.4; EnrBCoeff=0.2; OCUnits=Total
          Thickness  OC  FBiom  FInert
          150        0   0      1
          150        0   0      1
          300        0   0      1
          300        0   0      1
        Analysis: PHUnits=Water; BoronUnits=HotWater
          Thickness  EC    PH
          150        0.2   8.4
          150        0.25  8.8
          300        0.31  9
          300        0.4   9.2
        InitialWater Initial water: PercentMethod=EvenlyDistributed; FractionFull=1; RelativeTo=LL15
        Sample: NO3Units=kgha; NH4Units=kgha; SWUnits=Volumetric; OCUnits=Total; PHUnits=Water
          Thickness  NO3  NH4
          100        40   0.1
          200        30   0.1
          300        14   0.1
          300        14   0.1
      SurfaceOrganicMatter: crit_residue_wt=2000; opt_temp=20; cum_eos_max=20; cnrf_coeff=0.277; cnrf_optcn=25; c_fract=0.4; leach_rain_tot=25; min_rain_to_leach=10; crit_min_surfom_orgC=0.004; default_cpr=0; default_standing_fraction=0; standing_extinct_coeff=0.5; fractionFaecesAdded=0.5; PoolName=Slurp; type=Slurp; mass=0; standing_fraction=0; cnr=80
        TillageTypes
      Manager SlurpUpdates
        DateToUpdate = 1990-01-01
        VariableToUpdate = [Slurp].CanopyProperties.LAI
        tempValue = 3.5
```csharp
using System;
using Models.Core;
using Models.PMF;
using Models.PMF.Slurp;
namespace Models
{
	[Serializable]
	[System.Xml.Serialization.XmlInclude(typeof(Model))]
	public class Script : Model
	{
		[Link] Clock Clock;
		[Link] Slurp Slurp;
		[Link] Report Report;
		[Link] Summary Summary;
		

		[Description("Date to change states or properties")] public DateTime DateToUpdate {get; set;}
		[Description("Variable to update (e.g. LAI, LAItot, CoverGreen")] public string VariableToUpdate {get; set;}        
        [Description("Value to update to")] public double tempValue { get; set; }

		public string myString;

		public override void OnSimulationCommencing()
		{
		}
		
		[EventSubscribe("DoManagement")]
		private void OnDoManagement(object sender, EventArgs e)
		{	
			if (Clock.Today == DateToUpdate)
			{
                myString="SlurpUpdates is resetting the value of " + VariableToUpdate + " to " + tempValue.ToString();
			    Summary.WriteMessage(FullPath, myString);
			    this.Set(VariableToUpdate, tempValue);
			}
        }
	}
}
```
      Manager Diffs
```csharp
using System;
using Models.Core;
using Models.PMF;
using Models.PMF.Slurp;
using System.Xml.Serialization;
namespace Models
{
	[Serializable]
	[System.Xml.Serialization.XmlInclude(typeof(Model))]
	public class Script : Model
	{
		[Link] Clock Clock;
		[Link] Slurp Slurp;
		[Link] Report Report;
		[Link] Summary Summary;
		[Link] Soils.Soil Soil;

		public string myString;
        private double tempSum;

        [XmlIgnore] public double initSWDep { get; set; }
        [XmlIgnore] public double currSWDep { get; set; }
        [XmlIgnore] public double diffSWDepUptake { get; set; }

        [XmlIgnore] public double initMinN { get; set; }
        [XmlIgnore] public double currMinN { get; set; }
        [XmlIgnore] public double diffMinNUptake { get; set; }

		public override void OnSimulationCommencing()
		{
		}

		[EventSubscribe("DoDailyInitialisation")]
		private void DoDailyInitialisation(object sender, EventArgs e)
		{
		    initSWDep = 0.0;
		    initMinN = 0.0;
		    for (int j = 0; j < Soil.SoilWater.dlayer.Length; j++)
		    {
		       initSWDep += Soil.SoilWater.sw_dep[j];
		       initMinN += Soil.SoilNitrogen.no3[j] + Soil.SoilNitrogen.nh4[j];
		    }
		}
		
		[EventSubscribe("DoManagementCalculations")]
		private void DoManagementCalculations(object sender, EventArgs e)
		{	
		    currSWDep = 0.0;
		    currMinN = 0.0;
		    for (int j = 0; j < Soil.SoilWater.dlayer.Length; j++)
		    {
		       currSWDep += Soil.SoilWater.sw_dep[j];
		       currMinN += Soil.SoilNitrogen.no3[j] + Soil.SoilNitrogen.nh4[j];

			   // Summary.WriteMessage(FullPath, (Soil.SoilWater.sw_dep[j].ToString() + " " + currSWDep.ToString()));
		    }
            diffSWDepUptake = (initSWDep - currSWDep) - Soil.SoilWater.es;
            diffMinNUptake = (initMinN - currMinN); // what about denitrification?
        }
	}
}
```
      Slurp: localLAI=5; localLAItot=5; localLightExtinction=0.6; localCanopyHeight=500; localCanopyDepth=500; localMaximumStomatalConductance=0.011; localFrgr=1; localDemandWater=10; localPotentialNitrogenDemand=10; localCoverGreen=1; localCoverTot=1; localRootDepth=500; localSurfaceRootLengthDensity=0.05; localRootExplorationByLayer=[1, 1, 1, 0]; localRootLengthDensityByVolume=[0.0425, 0.0275, 0.005, 0]
      Arbitrator: ArbitrationMethod=PropDemand; dltSWdep=[0, -0.0523687, -0.204765, 0]; ArbitEOS=0
      Report ReportOne: EventNames=[Clock].DoReport
        VariableNames:
          [Clock].Today
          [Slurp].demandWater
          Evaluate sum([Slurp].supplyWater[1:4]) as UptakeWater
          [Slurp].potentialNitrogenDemand
          [Slurp].actualNitrogenSupply
          Evaluate sum([Soil].SoilWater.sw_dep[1:4]) as SWDep
          [Diffs].Script.diffSWDepUptake
          Evaluate (sum([Soil].SoilNitrogen.nh4[1:4]) + sum([Soil].SoilNitrogen.no3[1:4]) as MinN
          [Diffs].Script.diffMinNUptake
  Simulation SlurpTwo
    WeatherFile: FileName=ForeverSpringNoRain.met
    Clock: StartDate=2000-01-01; EndDate=2000-01-02
    Summary
    Zone Field: Area=0; Slope=0
      Soil: SoilType=Uniform soil; Latitude=0; Longitude=0
        Water
          Thickness  BD  AirDry  LL15  DUL   SAT  KS
          150        1   0.15    0.3   0.55  0.6  100
          150        1   0.15    0.3   0.55  0.6  100
          300        1   0.15    0.3   0.55  0.6  100
          300        1   0.15    0.3   0.55  0.6  100
          SoilCrop Slurp1: LL=[0.3, 0.3, 0.3, 0.3]; KL=[0.1, 0.1, 0.1, 0.1]; XF=[1, 1, 1, 1]
          SoilCrop Slurp2: LL=[0.3, 0.3, 0.3, 0.3]; KL=[0.1, 0.1, 0.1, 0.1]; XF=[1, 1, 1, 1]
        SoilWater: same as SlurpOne.Field.Soil.SoilWater
        SoilNitrogen: fom_type=[default, manure, mucuna, lablab, shemp, stable]; fract_carb=[0.2, 0.3, 0.54, 0.57, 0.45, 0]; fract_cell=[0.7, 0.3, 0.37, 0.37, 0.47, 0.1]; fract_lign=[0.1, 0.4, 0.09, 0.06, 0.08, 0.9]; wfpsN2N2O_x=[22, 88]; wfpsN2N2O_y=[0.1, 1]; oc=[0, 0, 0, 0]
        SoilOrganicMatter: RootCN=40; RootWt=0; SoilCN=12.5; EnrACoeff=7.4; EnrBCoeff=0.2; OCUnits=Total
          Thickness  OC  FBiom  FInert
          150        0   0      1
          150        0   0      1
          300        0   0      1
          300        0   0      1
        Analysis: PHUnits=Water; BoronUnits=HotWater
          Thickness  EC    PH
          150        0.2   8.4
          150        0.25  8.8
          300        0.31  9
          300        0.4   9.2
        InitialWater Initial water: PercentMethod=EvenlyDistributed; FractionFull=1; RelativeTo=LL15
        Sample: NO3Units=kgha; NH4Units=kgha; SWUnits=Volumetric; OCUnits=Total; PHUnits=Water
          Thickness  NO3  NH4
          100        40   0.1
          200        30   0.1
          300        14   0.1
          300        14   0.1
      SurfaceOrganicMatter: same as SlurpOne.Field.SurfaceOrganicMatter
      Manager Diffs
```csharp
using System;
using Models.Core;
using Models.PMF;
using Models.PMF.Slurp;
using System.Xml.Serialization;
namespace Models
{
	[Serializable]
	[System.Xml.Serialization.XmlInclude(typeof(Model))]
	public class Script : Model
	{
		[Link] Clock Clock;
		[Link] Report ReportWater;
		[Link] Report ReportNitrogen;
		[Link] Summary Summary;
		[Link] Soils.Soil Soil;

		public string myString;
        private double tempSum;

        [XmlIgnore] public double initSWDep { get; set; }
        [XmlIgnore] public double currSWDep { get; set; }
        [XmlIgnore] public double diffSWDepUptake { get; set; }

        [XmlIgnore] public double initMinN { get; set; }
        [XmlIgnore] public double currMinN { get; set; }
        [XmlIgnore] public double diffMinNUptake { get; set; }

		public override void OnSimulationCommencing()
		{
		}

		[EventSubscribe("DoDailyInitialisation")]
		private void DoDailyInitialisation(object sender, EventArgs e)
		{
		    initSWDep = 0.0;
		    initMinN = 0.0;
		    for (int j = 0; j < Soil.SoilWater.dlayer.Length; j++)
		    {
		       initSWDep += Soil.SoilWater.sw_dep[j];
		       initMinN += Soil.SoilNitrogen.no3[j] + Soil.SoilNitrogen.nh4[j];
		    }
		}
		
		[EventSubscribe("DoManagementCalculations")]
		private void DoManagementCalculations(object sender, EventArgs e)
		{	
		    currSWDep = 0.0;
		    currMinN = 0.0;
		    for (int j = 0; j < Soil.SoilWater.dlayer.Length; j++)
		    {
		       currSWDep += Soil.SoilWater.sw_dep[j];
		       currMinN += Soil.SoilNitrogen.no3[j] + Soil.SoilNitrogen.nh4[j];

			   // Summary.WriteMessage(FullPath, (Soil.SoilWater.sw_dep[j].ToString() + " " + currSWDep.ToString()));
		    }
            diffSWDepUptake = (initSWDep - currSWDep) - Soil.SoilWater.es;
            diffMinNUptake = (initMinN - currMinN); // what about denitrification?
        }
	}
}
```
      Slurp Slurp1: localLAI=2.5; localLAItot=2.5; localLightExtinction=0.6; localCanopyHeight=500; localCanopyDepth=500; localMaximumStomatalConductance=0.01; localFrgr=1; localDemandWater=7.5; localPotentialNitrogenDemand=1; localCoverGreen=0; localCoverTot=0; localRootDepth=750; localSurfaceRootLengthDensity=0.05; localRootExplorationByLayer=[1, 1, 1, 1]; localRootLengthDensityByVolume=[0.045, 0.035, 0.02, 0]
      Slurp Slurp2: localLAI=2.5; localLAItot=2.5; localLightExtinction=0.6; localCanopyHeight=500; localCanopyDepth=500; localMaximumStomatalConductance=0.01; localFrgr=1; localDemandWater=5; localPotentialNitrogenDemand=1; localCoverGreen=0; localCoverTot=0; localRootDepth=750; localSurfaceRootLengthDensity=0.05; localRootExplorationByLayer=[1, 1, 1, 1]; localRootLengthDensityByVolume=[0.045, 0.035, 0.02, 0]
      Arbitrator: ArbitrationMethod=PropDemand; dltSWdep=[-1.89876, -2.09983, -4.24969, -4.25172]; ArbitEOS=0
      Report ReportWater: EventNames=[Clock].DoReport
        VariableNames:
          [Clock].Today
          Evaluate sum([Soil].SoilWater.sw_dep[1:4]) as SWDep
          [Diffs].Script.diffSWDepUptake
          [Slurp1].demandWater
          [Slurp2].demandWater
          Evaluate sum([Slurp1].supplyWater[1:4]) as Slurp1Uptake
          Evaluate sum([Slurp2].supplyWater[1:4]) as Slurp2Uptake
          [Slurp1].supplyWater[4]
          [Slurp2].supplyWater[4]
      Report ReportNitrogen: EventNames=[Clock].DoReport
        VariableNames:
          [Clock].Today
          Evaluate (sum([Soil].SoilNitrogen.nh4[1:4]) + sum([Soil].SoilNitrogen.no3[1:4]) as MinN
          [Diffs].Script.diffMinNUptake
          [Slurp1].potentialNitrogenDemand
          [Slurp2].potentialNitrogenDemand
          [Slurp1].actualNitrogenSupply
          [Slurp2].actualNitrogenSupply
  DataStore
  Folder
    Slurp: localLAI=5; localLAItot=5; localLightExtinction=0; localCanopyHeight=500; localCanopyDepth=500; localMaximumStomatalConductance=0.011; localFrgr=1; localDemandWater=0; localPotentialNitrogenDemand=0; localCoverGreen=0; localCoverTot=0; localRootDepth=600; localSurfaceRootLengthDensity=0.05; localRootExplorationByLayer=[1, 1, 1, 0]; localRootLengthDensityByVolume=[0.04375, 0.03125, 0.0125, 0]
    Memo
      [Clock].Today

      [SlurpUpdates].DateToUpdate

      [SlurpUpdates].tempValue

      [Slurp].localLAI

      [Slurp].CanopyProperties

      [Slurp].PotentialEP

      [Slurp].ActualEP

      [Slurp].potentialNitrogenDemand

      [Slurp].actualNitrogenSupply

      [Slurp].localRootDepth

      [Arbitrator].scalerLayer

      [Arbitrator].scalerPlant

      [Soil].SoilWater.drain

      [Soil].SoilWater.es

      [Arbitrator].dltSWdep

      [Soil].SoilWater.sw_dep

      Evaluate (sum(([Soil].SoilWater.sw_dep[0:3] - (SoilWater.es)))) as TotalSW1
    Manager SlurpUpdates
      DateToUpdate = 1990-01-01
      VariableToUpdate = [Slurp1].CanopyProperties.LAI
      tempValue = 3.5
```csharp
using System;
using Models.Core;
using Models.PMF;
using Models.PMF.Slurp;
namespace Models
{
	[Serializable]
	[System.Xml.Serialization.XmlInclude(typeof(Model))]
	public class Script : Model
	{
		[Link] Clock Clock;
		[Link] Slurp Slurp1;
		[Link] Report Report;
		[Link] Summary Summary;
		

		[Description("Date to change states or properties")] public DateTime DateToUpdate {get; set;}
		[Description("Variable to update (e.g. LAI, LAItot, CoverGreen")] public string VariableToUpdate {get; set;}        
        [Description("Value to update to")] public double tempValue { get; set; }

		public string myString;

		public override void OnSimulationCommencing()
		{
		}
		
		[EventSubscribe("DoManagement")]
		private void OnDoManagement(object sender, EventArgs e)
		{	
			if (Clock.Today == DateToUpdate)
			{
                myString="SlurpUpdates is resetting the value of " + VariableToUpdate + " to " + tempValue.ToString();
			    Summary.WriteMessage(FullPath, myString);
			    this.Set(VariableToUpdate, tempValue);
			}
        }
	}
}
```
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