Simulations
  DataStore
  Folder SingleField
    Simulation SingleField Wheat: Area=0; Slope=0
      Clock: StartDate=1900-01-01; EndDate=1904-12-31
      Summary SummaryFile
      Weather: FileName=%root%\Examples\WeatherFiles\Dalby.met
      Zone Field: Area=1; Slope=0
        Report: EventNames=[Clock].EndOfDay
          VariableNames:
            [Clock].Today
            Wheat.Zadok.Stage
            Wheat.Phenology.CurrentStageName
            Wheat.AboveGround.Wt
            Wheat.AboveGround.N
            Wheat.Grain.Yield
            Wheat.Grain.Protein
            Wheat.Grain.Size
            Wheat.Grain.GrainNo
            Wheat.Grain.Wt
            Wheat.Grain.N
            Wheat.Total.Wt
            Wheat.EP
            [wheat].SWStress.Photo
            sum([Soil].SoilWater.SWmm) as SWTotal
        Fertiliser
        Soil: ASCOrder=Vertosol; ASCSubOrder=Black; SoilType=Clay; Site=Norwin; NearestTown=Norwin; Region=Darling Downs and Granite Belt; State=Queensland; Country=Australia; NaturalVegetation=Qld. Bluegrass, possible Qld. Blue gum; ApsoilNumber=900; Latitude=-27.581836; Longitude=151.320206; LocationAccuracy=+/- 20m
          DataSource=CSIRO Sustainable Ecosystems, Toowoomba; Characteriesd as part of the GRDC funded project"Doing it better, doing it smarter, managing soil water in Australian agriculture' 2011
          Comments=OC, CLL for all crops estimated-based on Bongeen Mywybilla Soil No1
          Water
            Thickness  BD       AirDry    LL15      DUL       SAT       KS
            150        1.01056  0.13025   0.2605    0.521     0.588655  20
            150        1.07146  0.198689  0.248362  0.496723  0.565677  20
            300        1.09394  0.28      0.28      0.488438  0.557193  20
            300        1.15861  0.28      0.28      0.480297  0.532787  20
            300        1.17301  0.28      0.28      0.471584  0.527354  20
            300        1.16287  0.28      0.28      0.457071  0.53118   20
            300        1.1875   0.28      0.28      0.452332  0.521888  20
            SoilCrop WheatSoil: LL=[0.261, 0.248, 0.28, 0.306, 0.36, 0.392, 0.446]; KL=[0.06, 0.06, 0.06, 0.04, 0.04, 0.02, 0.01]; XF=[1, 1, 1, 1, 1, 1, 1]
          SoilWater: residueinterception=0; SummerDate=1-Nov; SummerU=5; SummerCona=5; WinterDate=1-Apr; WinterU=5; WinterCona=5; DiffusConst=40; DiffusSlope=16; Salb=0.12; CN2Bare=73; CNRed=20; CNCov=0.8; max_pond=0; Thickness=[150, 150, 300, 300, 300, 300, 300]; SWCON=[0.3, 0.3, 0.3, 0.3, 0.3, 0.3, 0.3]
          SoilNitrogen: fom_type=[default, manure, mucuna, lablab, shemp, stable]; fract_carb=[0.2, 0.3, 0.54, 0.57, 0.45, 0]; fract_cell=[0.7, 0.3, 0.37, 0.37, 0.47, 0.1]; fract_lign=[0.1, 0.4, 0.09, 0.06, 0.08, 0.9]; wfpsN2N2O_x=[22, 88]; wfpsN2N2O_y=[0.1, 1]
          SoilOrganicMatter: RootCN=40; RootWt=1000; SoilCN=12; EnrACoeff=7.4; EnrBCoeff=0.2; OCUnits=Total
            Thickness  OC    FBiom  FInert
            150        1.2   0.04   0.4
            150        0.96  0.02   0.6
            300        0.6   0.02   0.8
            300        0.3   0.02   1
            300        0.18  0.01   1
            300        0.12  0.01   1
            300        0.12  0.01   1
          Analysis: Thickness=[150, 150, 300, 300, 300, 300, 300]; PH=[8, 8, 8, 8, 8, 8, 8]; PHUnits=Water; BoronUnits=HotWater
          InitialWater: PercentMethod=EvenlyDistributed; FractionFull=1
          Sample InitialN: NO3Units=ppm; NH4Units=ppm; SWUnits=Volumetric; OCUnits=Total; PHUnits=Water
            Thickness  NO3  NH4
            150        1    0.1
            150        1    0.1
            300        1    0.1
            300        1    0.1
            300        1    0.1
            300        1    0.1
            300        1    0.1
        SurfaceOrganicMatter: PoolName=wheat_stubble; type=wheat; mass=500; standing_fraction=0; cnr=100; CriticalResidueWeight=2000; OptimumDecompTemp=20; MaxCumulativeEOS=20; CNRatioDecompCoeff=0.277; CNRatioDecompThreshold=25; TotalLeachRain=25; MinRainToLeach=10; CriticalMinimumOrganicC=0.004; DefaultCPRatio=0; DefaultStandingFraction=0; StandingExtinctCoeff=0.5; FractionFaecesAdded=0.5
          Pools:
            {PoolName=wheat_stubble, ResidueType=wheat, Mass=500, CNRatio=100, StandingFraction=0}
          ResidueTypes: LoadFromResource=ResidueTypes
        Plant15 Wheat: AutoHarvest=true; CropType=Wheat
        MicroClimate: air_pressure=1010; soil_emissivity=0.96; sun_angle=15; soil_heat_flux_fraction=0.4; night_interception_fraction=0.5; windspeed_default=3; refheight=2; albedo=0.15; emissivity=0.96; gsmax=0.01; r50=200; a_interception=0; b_interception=1; c_interception=0; d_interception=0; soil_albedo=0.3
        Manager SowingFertiliser
          Amount = 160
          CropName = wheat
```csharp
using System;
using Models.Core;
using Models.PMF;
using APSIM.Shared.Utilities;

namespace Models
{
	[Serializable]
	public class Script : Model
	{
		[Link] Clock Clock;
		[Link] Fertiliser Fertiliser;
		[Link] Summary Summary;
		
		
		[Description("Amount of fertiliser to be applied (kg/ha)")]
		public double Amount { get; set;}
		
		[Description("Crop to be fertilised")]
		public string CropName { get; set;}
		
		
		

		[EventSubscribe("Sowing")]
		private void OnSowing(object sender, EventArgs e)
		{
			Model crop = sender as Model;
			if (crop.Name.ToLower()==CropName.ToLower())
				Fertiliser.Apply(Amount: Amount, Type: Fertiliser.Types.NO3N);
		}
		
	}
}
```
        Manager SowingRule
          StartDate = 1-may
          EndDate = 10-jul
          MinESW = 100
          MinRain = 25
          RainDays = 7
          CultivarName = Hartog
          SowingDepth = 30
          RowSpacing = 250
          Population = 120
```csharp
using System;
using Models.Core;
using Models.PMF.OldPlant;
using Models.Soils;
using Models.Utilities;
using APSIM.Shared.Utilities;

namespace Models
{
	[Serializable]
	public class Script : Model
	{
		[Link] Clock Clock;
		[Link] Fertiliser Fertiliser;
		[Link] Summary Summary;
		[Link] Plant15 Wheat;
		[Link] Soil Soil; 
		Accumulator accumulatedRain;
		
		[Description("Start of sowing window (d-mmm)")]
		public string StartDate { get; set;}
		[Description("End of sowing window (d-mmm)")]
		public string EndDate { get; set;}
		[Description("Minimum extractable soil water for sowing (mm)")]
		public double MinESW { get; set;}
		[Description("Accumulated rainfall required for sowing (mm)")]
		public double MinRain { get; set;}
		[Description("Duration of rainfall accumulation (d)")]
		public int RainDays { get; set;}
		[Description("Cultivar to be sown")]
		public string CultivarName { get; set;}
		[Description("Sowing depth (mm)")]
		public double SowingDepth { get; set;}		
		[Description("Row spacing (mm)")]
		public double RowSpacing { get; set;}	
		[Description("Plant population (/m2)")]
		public double Population { get; set;}	
		
		
		[EventSubscribe("Commencing")]
        private void OnSimulationCommencing(object sender, EventArgs e)
        {
        	accumulatedRain = new Accumulator(this, "[Weather].Rain", RainDays);
        }
		

		[EventSubscribe("DoManagement")]
		private void OnDoManagement(object sender, EventArgs e)
		{
			accumulatedRain.Update();
			
			if (DateUtilities.WithinDates(StartDate,Clock.Today,EndDate) &&
			    Wheat.plant_status=="out" &&
			    Soil.SoilWater.ESW > MinESW &&
			    accumulatedRain.Sum > MinRain)
			{
			   Wheat.Sow(population:Population, cultivar:CultivarName, depth:SowingDepth, rowSpacing:RowSpacing);	
			}
		
		}
		
	}
}
```
    Simulation SingleField Wheat with Arbitrator: Area=0; Slope=0
      Clock: StartDate=1900-01-01; EndDate=1904-12-31
      Summary SummaryFile
      Weather: FileName=%root%\Examples\WeatherFiles\Dalby.met
      SoilArbitrator Soil Arbitrator
      Zone Field: same as SingleField.SingleField Wheat.Field
  Folder TwoField
    Simulation TwoField Wheat: Area=0; Slope=0
      Clock: StartDate=1900-01-01; EndDate=1904-12-31
      Summary SummaryFile
      Weather: FileName=%root%\Examples\WeatherFiles\Dalby.met
      Zone Field1: Area=1; Slope=0
        Report Report1: EventNames=[Clock].EndOfDay
          VariableNames:
            [Clock].Today
            Wheat.Zadok.Stage
            Wheat.Phenology.CurrentStageName
            Wheat.AboveGround.Wt
            Wheat.AboveGround.N
            Wheat.Grain.Yield
            Wheat.Grain.Protein
            Wheat.Grain.Size
            Wheat.Grain.GrainNo
            Wheat.Grain.Wt
            Wheat.Grain.N
            Wheat.Total.Wt
            [wheat].SWStress.Photo
            [Wheat].EP
            sum([Soil].SoilWater.SWmm) as SWTotal
            sum([Soil].SoilNitrogen.NO3) as NO3Total
        Fertiliser
        Soil: same as SingleField.SingleField Wheat.Field.Soil
        SurfaceOrganicMatter: same as SingleField.SingleField Wheat.Field.SurfaceOrganicMatter
        Plant15 Wheat: AutoHarvest=true; CropType=Wheat
        MicroClimate: same as SingleField.SingleField Wheat.Field.MicroClimate
        Manager SowingFertiliser: same as SingleField.SingleField Wheat.Field.SowingFertiliser
        Manager SowingRule: same as SingleField.SingleField Wheat.Field.SowingRule
      Zone Field2: Area=1; Slope=0
        Report Report2: same as TwoField.TwoField Wheat.Field1.Report1
        Fertiliser
        Soil: same as SingleField.SingleField Wheat.Field.Soil
        SurfaceOrganicMatter: same as SingleField.SingleField Wheat.Field.SurfaceOrganicMatter
        Plant15 Wheat: AutoHarvest=true; CropType=Wheat
        MicroClimate: same as SingleField.SingleField Wheat.Field.MicroClimate
        Manager SowingFertiliser
          Amount = 0
          CropName = wheat
          script: same as in SingleField.SingleField Wheat.Field.SowingFertiliser
        Manager SowingRule: same as SingleField.SingleField Wheat.Field.SowingRule
    Simulation TwoField Wheat with Arbitrator: Area=0; Slope=0
      Clock: StartDate=1900-01-01; EndDate=1904-12-31
      Summary SummaryFile
      Weather: FileName=%root%\Examples\WeatherFiles\Dalby.met
      SoilArbitrator Soil Arbitrator
      Zone Field1: Area=1; Slope=0
        Report Report1: EventNames=[Clock].EndOfDay
          VariableNames:
            [Clock].Today
            Wheat.Zadok.Stage
            Wheat.Phenology.CurrentStageName
            Wheat.AboveGround.Wt
            Wheat.AboveGround.N
            Wheat.Grain.Yield
            Wheat.Grain.Protein
            Wheat.Grain.Size
            Wheat.Grain.GrainNo
            Wheat.Grain.Wt
            Wheat.Grain.N
            Wheat.Total.Wt
            Wheat.EP
            [wheat].SWStress.Photo
            sum([Soil].SoilWater.SWmm) as SWTotal
            sum([Soil].SoilNitrogen.NO3) as NO3Total
        Fertiliser
        Soil: same as SingleField.SingleField Wheat.Field.Soil
        SurfaceOrganicMatter: same as SingleField.SingleField Wheat.Field.SurfaceOrganicMatter
        Plant15 Wheat: AutoHarvest=true; CropType=Wheat
        MicroClimate: same as SingleField.SingleField Wheat.Field.MicroClimate
        Manager SowingFertiliser: same as SingleField.SingleField Wheat.Field.SowingFertiliser
        Manager SowingRule: same as SingleField.SingleField Wheat.Field.SowingRule
      Zone Field2: Area=1; Slope=0
        Report Report2: same as TwoField.TwoField Wheat with Arbitrator.Field1.Report1
        Fertiliser
        Soil: same as SingleField.SingleField Wheat.Field.Soil
        SurfaceOrganicMatter: same as SingleField.SingleField Wheat.Field.SurfaceOrganicMatter
        Plant15 Wheat: AutoHarvest=true; CropType=Wheat
        MicroClimate: same as SingleField.SingleField Wheat.Field.MicroClimate
        Manager SowingFertiliser: same as TwoField.TwoField Wheat.Field2.SowingFertiliser
        Manager SowingRule: same as SingleField.SingleField Wheat.Field.SowingRule
  Folder SimpleIntercrop
    Simulation Pop100: Area=0; Slope=0
      Clock: StartDate=1900-01-01; EndDate=1904-12-31
      Summary SummaryFile
      Weather: FileName=%root%\Examples\WeatherFiles\Dalby.met
      SoilArbitrator Soil Arbitrator
      Zone Field1: Area=1; Slope=0
        Report Report1: EventNames=[Clock].EndOfDay
          VariableNames:
            [Clock].Today
            sum([Soil].SoilWater.SWmm) as SWTotal
            sum([Soil].SoilNitrogen.NO3) as NO3Total
            sum([Soil].SoilNitrogen.NH4) as NH4Total
            [Wheat].PotentialEP
            [Wheat].EP
        Fertiliser
        Soil: ASCOrder=Vertosol; ASCSubOrder=Black; SoilType=Clay; Site=Norwin; NearestTown=Norwin; Region=Darling Downs and Granite Belt; State=Queensland; Country=Australia; NaturalVegetation=Qld. Bluegrass, possible Qld. Blue gum; ApsoilNumber=900; Latitude=-27.581836; Longitude=151.320206; LocationAccuracy=+/- 20m
          DataSource=CSIRO Sustainable Ecosystems, Toowoomba; Characteriesd as part of the GRDC funded project"Doing it better, doing it smarter, managing soil water in Australian agriculture' 2011
          Comments=OC, CLL for all crops estimated-based on Bongeen Mywybilla Soil No1
          Water
            Thickness  BD       AirDry    LL15      DUL       SAT       KS
            150        1.01056  0.13025   0.2605    0.521     0.588655  20
            150        1.07146  0.198689  0.248362  0.496723  0.565677  20
            300        1.09394  0.28      0.28      0.488438  0.557193  20
            300        1.15861  0.28      0.28      0.480297  0.532787  20
            300        1.17301  0.28      0.28      0.471584  0.527354  20
            300        1.16287  0.28      0.28      0.457071  0.53118   20
            300        1.1875   0.28      0.28      0.452332  0.521888  20
            SoilCrop WheatSoil: LL=[0.261, 0.248, 0.28, 0.306, 0.36, 0.392, 0.446]; KL=[0.06, 0.06, 0.06, 0.03, 0.03, 0.03, 0.03]; XF=[1, 1, 1, 1, 1, 1, 1]
          SoilWater: same as SingleField.SingleField Wheat.Field.Soil.SoilWater
          SoilNitrogen: fom_type=[default, manure, mucuna, lablab, shemp, stable]; fract_carb=[0.2, 0.3, 0.54, 0.57, 0.45, 0]; fract_cell=[0.7, 0.3, 0.37, 0.37, 0.47, 0.1]; fract_lign=[0.1, 0.4, 0.09, 0.06, 0.08, 0.9]; wfpsN2N2O_x=[22, 88]; wfpsN2N2O_y=[0.1, 1]
          SoilOrganicMatter: same as SingleField.SingleField Wheat.Field.Soil.SoilOrganicMatter
          Analysis: Thickness=[150, 150, 300, 300, 300, 300, 300]; PH=[8, 8, 8, 8, 8, 8, 8]; PHUnits=Water; BoronUnits=HotWater
          InitialWater: PercentMethod=EvenlyDistributed; FractionFull=1
          Sample InitialN: same as SingleField.SingleField Wheat.Field.Soil.InitialN
        SurfaceOrganicMatter: same as SingleField.SingleField Wheat.Field.SurfaceOrganicMatter
        MicroClimate: same as SingleField.SingleField Wheat.Field.MicroClimate
        SimpleTree wheat: CanopyType=wheat; LAI=3; Height=10000; RootDepth=1000; NDemand=0.15
      Zone Field2: Area=1; Slope=0
        Report Report2: EventNames=[Clock].EndOfDay
          VariableNames:
            [Clock].Today
            sum([Soil].SoilWater.SWmm) as SWTotal
            sum([Soil].SoilNitrogen.NO3) as NO3Total
            sum([Soil].SoilNitrogen.NH4) as NH4Total
            [Wheat].PotentialEP
            [Barley].PotentialEP
            ([Wheat].PotentialEP+[Barley].PotentialEP) as TotalPEP
            [Wheat].EP
            [Barley].EP
            ([Wheat].EP+[Barley].EP) as TotalEP
        Fertiliser
        Soil: ASCOrder=Vertosol; ASCSubOrder=Black; SoilType=Clay; Site=Norwin; NearestTown=Norwin; Region=Darling Downs and Granite Belt; State=Queensland; Country=Australia; NaturalVegetation=Qld. Bluegrass, possible Qld. Blue gum; ApsoilNumber=900; Latitude=-27.581836; Longitude=151.320206; LocationAccuracy=+/- 20m
          DataSource=CSIRO Sustainable Ecosystems, Toowoomba; Characteriesd as part of the GRDC funded project"Doing it better, doing it smarter, managing soil water in Australian agriculture' 2011
          Comments=OC, CLL for all crops estimated-based on Bongeen Mywybilla Soil No1
          Water
            Thickness  BD       AirDry    LL15      DUL       SAT       KS
            150        1.01056  0.13025   0.2605    0.521     0.588655  20
            150        1.07146  0.198689  0.248362  0.496723  0.565677  20
            300        1.09394  0.28      0.28      0.488438  0.557193  20
            300        1.15861  0.28      0.28      0.480297  0.532787  20
            300        1.17301  0.28      0.28      0.471584  0.527354  20
            300        1.16287  0.28      0.28      0.457071  0.53118   20
            300        1.1875   0.28      0.28      0.452332  0.521888  20
            SoilCrop WheatSoil: LL=[0.261, 0.248, 0.28, 0.306, 0.36, 0.392, 0.446]; KL=[0.03, 0.03, 0.03, 0.015, 0.015, 0.015, 0.015]; XF=[1, 1, 1, 1, 1, 1, 1]
            SoilCrop BarleySoil: LL=[0.261, 0.248, 0.28, 0.306, 0.36, 0.392, 0.446]; KL=[0.03, 0.03, 0.03, 0.015, 0.015, 0.015, 0.015]; XF=[1, 1, 1, 1, 1, 1, 1]
          SoilWater: same as SingleField.SingleField Wheat.Field.Soil.SoilWater
          SoilNitrogen: fom_type=[default, manure, mucuna, lablab, shemp, stable]; fract_carb=[0.2, 0.3, 0.54, 0.57, 0.45, 0]; fract_cell=[0.7, 0.3, 0.37, 0.37, 0.47, 0.1]; fract_lign=[0.1, 0.4, 0.09, 0.06, 0.08, 0.9]; wfpsN2N2O_x=[22, 88]; wfpsN2N2O_y=[0.1, 1]
          SoilOrganicMatter: same as SingleField.SingleField Wheat.Field.Soil.SoilOrganicMatter
          Analysis: Thickness=[150, 150, 300, 300, 300, 300, 300]; PH=[8, 8, 8, 8, 8, 8, 8]; PHUnits=Water; BoronUnits=HotWater
          InitialWater: PercentMethod=EvenlyDistributed; FractionFull=1
          Sample InitialN: same as SingleField.SingleField Wheat.Field.Soil.InitialN
        SurfaceOrganicMatter: same as SingleField.SingleField Wheat.Field.SurfaceOrganicMatter
        MicroClimate: same as SingleField.SingleField Wheat.Field.MicroClimate
        SimpleTree wheat: CanopyType=wheat; LAI=1.5; Height=10000; RootDepth=1000; NDemand=0.075
        SimpleTree barley: CanopyType=barley; LAI=1.5; Height=10000; RootDepth=1000; NDemand=0.075
      Zone Field3: Area=1; Slope=0
        Report Report3: EventNames=[Clock].EndOfDay
          VariableNames:
            [Clock].Today
            sum([Soil].SoilWater.SWmm) as SWTotal
            sum([Soil].SoilNitrogen.NO3) as NO3Total
            sum([Soil].SoilNitrogen.NH4) as NH4Total
            [Wheat].PotentialEP
            [Barley].PotentialEP
            [Oats].PotentialEP
            ([Wheat].PotentialEP+[Barley].PotentialEP+[Oats].PotentialEP) as TotalPEP
            [Wheat].EP
            [Barley].EP
            [Oats].EP
            ([Wheat].EP+[Barley].EP+[Oats].EP) as TotalEP
        Fertiliser
        Soil: ASCOrder=Vertosol; ASCSubOrder=Black; SoilType=Clay; Site=Norwin; NearestTown=Norwin; Region=Darling Downs and Granite Belt; State=Queensland; Country=Australia; NaturalVegetation=Qld. Bluegrass, possible Qld. Blue gum; ApsoilNumber=900; Latitude=-27.581836; Longitude=151.320206; LocationAccuracy=+/- 20m
          DataSource=CSIRO Sustainable Ecosystems, Toowoomba; Characteriesd as part of the GRDC funded project"Doing it better, doing it smarter, managing soil water in Australian agriculture' 2011
          Comments=OC, CLL for all crops estimated-based on Bongeen Mywybilla Soil No1
          Water
            Thickness  BD       AirDry    LL15      DUL       SAT       KS
            150        1.01056  0.13025   0.2605    0.521     0.588655  20
            150        1.07146  0.198689  0.248362  0.496723  0.565677  20
            300        1.09394  0.28      0.28      0.488438  0.557193  20
            300        1.15861  0.28      0.28      0.480297  0.532787  20
            300        1.17301  0.28      0.28      0.471584  0.527354  20
            300        1.16287  0.28      0.28      0.457071  0.53118   20
            300        1.1875   0.28      0.28      0.452332  0.521888  20
            SoilCrop WheatSoil: LL=[0.261, 0.248, 0.28, 0.306, 0.36, 0.392, 0.446]; KL=[0.02, 0.02, 0.02, 0.01, 0.01, 0.01, 0.01]; XF=[1, 1, 1, 1, 1, 1, 1]
            SoilCrop BarleySoil: LL=[0.261, 0.248, 0.28, 0.306, 0.36, 0.392, 0.446]; KL=[0.02, 0.02, 0.02, 0.01, 0.01, 0.01, 0.01]; XF=[1, 1, 1, 1, 1, 1, 1]
            SoilCrop OatsSoil: LL=[0.261, 0.248, 0.28, 0.306, 0.36, 0.392, 0.446]; KL=[0.02, 0.02, 0.02, 0.01, 0.01, 0.01, 0.01]; XF=[1, 1, 1, 1, 1, 1, 1]
          SoilWater: same as SingleField.SingleField Wheat.Field.Soil.SoilWater
          SoilNitrogen: fom_type=[default, manure, mucuna, lablab, shemp, stable]; fract_carb=[0.2, 0.3, 0.54, 0.57, 0.45, 0]; fract_cell=[0.7, 0.3, 0.37, 0.37, 0.47, 0.1]; fract_lign=[0.1, 0.4, 0.09, 0.06, 0.08, 0.9]; wfpsN2N2O_x=[22, 88]; wfpsN2N2O_y=[0.1, 1]
          SoilOrganicMatter: same as SingleField.SingleField Wheat.Field.Soil.SoilOrganicMatter
          Analysis: Thickness=[150, 150, 300, 300, 300, 300, 300]; PH=[8, 8, 8, 8, 8, 8, 8]; PHUnits=Water; BoronUnits=HotWater
          InitialWater: PercentMethod=EvenlyDistributed; FractionFull=1
          Sample InitialN: same as SingleField.SingleField Wheat.Field.Soil.InitialN
        SurfaceOrganicMatter: same as SingleField.SingleField Wheat.Field.SurfaceOrganicMatter
        MicroClimate: same as SingleField.SingleField Wheat.Field.MicroClimate
        SimpleTree wheat: CanopyType=wheat; LAI=1; Height=10000; RootDepth=1000; NDemand=0.05
        SimpleTree barley: CanopyType=barley; LAI=1; Height=10000; RootDepth=1000; NDemand=0.05
        SimpleTree oats: CanopyType=oats; LAI=1; Height=10000; RootDepth=1000; NDemand=0.05
  Folder PMFTest_NotWorking_SeeMemo
    Simulation SingleTatie: Area=0; Slope=0
      Weather: FileName=%root%\Examples\WeatherFiles\lincoln.met
      Clock: StartDate=2003-10-20; EndDate=2004-06-05
      Summary
      SoilArbitrator Soil Arbitrator
      Zone Field: Area=0; Slope=0
        Soil: SoilType=Sedementary; LocalName=Lincoln; Latitude=0; Longitude=0
          Water
            Thickness  BD   AirDry  LL15  DUL   SAT
            100        1.2  0.08    0.16  0.33  0.5
            200        1.2  0.16    0.16  0.33  0.5
            300        1.2  0.15    0.15  0.31  0.44
            300        1.2  0.13    0.13  0.27  0.46
            300        1.2  0.15    0.15  0.3   0.44
            300        1.2  0.15    0.15  0.3   0.44
            SoilCrop PotatoSoil: LL=[0.13, 0.13, 0.1, 0.15, 0.3, 0.3]; KL=[0.1, 0.06, 0.04, 0.01, 0, 0]; XF=[1, 1, 1, 1, 0, 0]
          SoilWater: residueinterception=0; SummerDate=1-Nov; SummerU=9; SummerCona=4.4; WinterDate=1-Apr; WinterU=9; WinterCona=4.4; DiffusConst=88; DiffusSlope=35.4; Salb=0.18; CN2Bare=0; CNRed=-9E-05; CNCov=0; slope=0; discharge_width=0; catchment_area=0; max_pond=0
            Thickness  SWCON  KLAT
            100        0.55   0
            200        0.55   0
            300        0.55   0
            300        0.55   0
            300        0.55   0
            300        0.55   0
          SoilNitrogen: fom_type=[default, manure, mucuna, lablab, shemp, stable]; fract_carb=[0.2, 0.3, 0.54, 0.57, 0.45, 0]; fract_cell=[0.7, 0.3, 0.37, 0.37, 0.47, 0.1]; fract_lign=[0.1, 0.4, 0.09, 0.06, 0.08, 0.9]; wfpsN2N2O_x=[22, 88]; wfpsN2N2O_y=[0.1, 1]; oc=[3.51204, 2.4888, 1.19986, 1.03067, 0.470328, 0.470127]
          SoilOrganicMatter: RootCN=30; RootWt=3000; SoilCN=11.5; EnrACoeff=7.4; EnrBCoeff=0.2; OCUnits=Total
            Thickness  OC    FBiom  FInert
            100        3.5   0.025  0.3
            200        2.5   0.025  0.4
            300        1.2   0.015  0.75
            300        1.03  0.01   0.9
            300        0.47  0.01   0.96
            300        0.47  0.01   0.96
          Analysis: Thickness=[100, 200, 300, 300, 300, 300]; PH=[6.6, 6.2, 5.7, 5.5, 5.5, 5.5]; PHUnits=Water; BoronUnits=HotWater
          InitialWater Initial water: PercentMethod=FilledFromTop; FractionFull=1
          Sample: NO3Units=kgha; NH4Units=kgha; SWUnits=Volumetric; OCUnits=Total; PHUnits=Water
            Thickness  NO3   NH4
            100        40    0.1
            200        30    0.1
            300        14    0.1
            300        14    0.1
            300        1.38  0.1
            300        1.38  0.1
        Irrigation
        Fertiliser
        MicroClimate: air_pressure=1010; soil_emissivity=0.96; sun_angle=15; soil_heat_flux_fraction=0.4; night_interception_fraction=0.5; windspeed_default=3; refheight=2; albedo=0.26; emissivity=0.96; gsmax=0.01; r50=200; a_interception=0; b_interception=1; c_interception=0; d_interception=0; soil_albedo=0.23
        Plant Potato: CropType=Potato
        Manager PotatoSowingRule
          RowSpace = 280
          RowWidth = 770
          PlantingDepth = 120
          StemNumberPerSeedTuber = 2.2
          CultivarName = RussetBurbank
          SowingDate = 2003-10-20
```csharp
        using System;
        using Models.Core;
        using Models.PMF;
        using APSIM.Shared.Utilities;

        namespace Models
        {
           [Serializable] 
           [System.Xml.Serialization.XmlInclude(typeof(Model))]
            public class Script : Model
            {      
               [Link] Plant Potato;
               [Link] Clock Clock;

               [Description("Spacing (mm) between plants within rows")]
               public double RowSpace { get; set; }
               [Description("Spacing (mm) between rows")]
               public double RowWidth { get; set; }
               [Description("Depth (mm) tubers are planted")]
               public double PlantingDepth { get; set; }
               [Description("Number of stems per seed tuber")]
               public double StemNumberPerSeedTuber { get; set; }
               [Description("Cultivar")]
                public string CultivarName { get; set; }
               [Description("Sowing Date")]
               public DateTime SowingDate { get; set; }

               [EventSubscribe("DoManagement")]
               private void OnDoManagement(object sender, EventArgs e)
               {
				double PlantPopulation = 1/((RowWidth/1000)*(RowSpace/1000));

				if (Clock.Today.Date == SowingDate)
                    Potato.Sow(population:PlantPopulation, cultivar:CultivarName, depth:PlantingDepth, rowSpacing:150, budNumber:StemNumberPerSeedTuber);
                //Potato.Sow(... Contains the following arguements:
                //Population  double  Required  Seeds sowing/m2
                //Cultivar    string  Required  "NameOfCultivar"
                //Depth       double  Optional  Depth (mm) seed sown.   Default is 100mm 
                //MaxCover    double  Optional  Proportion (0-1) of the ground row crop will cover.   Default is 1.0
                //BudNumber   double  Optional  Number of mainstems per seed sown.  Default is 1.0
                //RowSpacing  double  Optional  Spaceing (mm) between drill rows when crop is sown.  Default is 150mm
                //CropClass   string  Optional  Crop class to instantiate when crop is sown.  Default is "Plant"
			   }
            }
        }
```
        Manager PotatoHarvestRule
          HarvestDate = 2004-06-01
```csharp
        using System;
        using Models.Core;
        using Models.PMF;
        using System.Xml.Serialization;
        using APSIM.Shared.Utilities;

        namespace Models
        {
           [Serializable] 
           [System.Xml.Serialization.XmlInclude(typeof(Model))]
            public class Script : Model
            {      
               [Link] Plant Potato;
               [Link] Clock Clock;
               [Link] Summary Summary;
               [Description("HarvestDate Date")]
               public DateTime HarvestDate { get; set; }    		
		       [XmlIgnore] public string FinalTag { get; set;}
		       [XmlIgnore] public bool Harvested {get; set;}
               [XmlIgnore] public bool ReadyForHarvest {get; set;}
               
               [EventSubscribe("Commencing")]
               private void OnSimulationCommencing(object sender, EventArgs e)
		       {
		       FinalTag = "";
               Harvested = false;
               ReadyForHarvest = false;
               }
               
               [EventSubscribe("DoManagement")]
               private void OnDoManagement(object sender, EventArgs e)
               {
               if (ReadyForHarvest == true)
                   {
                   Potato.Harvest();
                   ReadyForHarvest = false;
                   Harvested = true;
                   }
               FinalTag = "";    
               }
               
               [EventSubscribe("DoManagementCalculations")]
               private void OnDoManagementCalculations(object sender, EventArgs e)
               {
				if ((Clock.Today == HarvestDate)&&(Harvested == false))
				{
                    FinalTag = "yield";
					ReadyForHarvest = true;
                }
			   }
            }
        }
```
        Manager ExtraVariables
```csharp
using System;
using Models.Core;
using System.Collections.Generic;
using System.Text;
using Models.Soils;
using Models.PMF;
using Models;
using System.Xml.Serialization;
using APSIM.Shared.Utilities;

namespace Models
{
	[Serializable] 
	public class Script : Model
	{      
		[Link] Clock Clock;
		[Link] Soils.Soil Soil;
		[Link] Models.SurfaceOM.SurfaceOrganicMatter SOM;
		[Link] Weather Met;   
		[Link] Fertiliser Fert;
		[Link] Irrigation Irrig;  
		[Link] Plant Potato;
        [Link] Zone zone;
					
		[XmlIgnore] public bool InitialDay { get; set; }
		
		[XmlIgnore] public double AccumPlantN { get; set; }
		[XmlIgnore] public double AccumMineralisation { get; set; }
		[XmlIgnore] public double AccumDenit { get; set; }
		[XmlIgnore] public double AccumFert { get; set; }
		[XmlIgnore] public double AccumLeach { get; set; }
		[XmlIgnore] public double AccumDetach { get; set; }
		[XmlIgnore] public double DeltaSoilOMN { get; set; }
		[XmlIgnore] public double DeltaSurfaceOMN { get; set; }
		[XmlIgnore] public double DeltaSoilMineralN { get; set; }
		[XmlIgnore] public double SoilNitrogenContent { get; set; }
		
		[XmlIgnore] public double AccumEO { get; set; }
		[XmlIgnore] public double AccumEP { get; set; }
		[XmlIgnore] public double AccumES { get; set; }
		[XmlIgnore] public double AccumDrainage { get; set; }
		[XmlIgnore] public double AccumRunoff { get; set; }
		[XmlIgnore] public double AccumOutflowLat { get; set; }
		[XmlIgnore] public double AccumIrrigation { get; set; }
		[XmlIgnore] public double AccumRainfall { get; set; }
		[XmlIgnore] public double SoilWaterDeficit { get; set; }
		
		[XmlIgnore] public double AccumTtemerg { get; set; }
		
		[XmlIgnore] public double  InitialSoilOMN { get; set; }
		[XmlIgnore] public double  InitialSurfaceOMN { get; set; }
		[XmlIgnore] public double  InitialMineralN { get; set; }
		
		[XmlIgnore] public double SWC { get; set; }
		[XmlIgnore] public double DUL { get; set; }
		[XmlIgnore] public double OutFlowLat { get; set; }

		[XmlIgnore] public double FomN { get; set; }
		[XmlIgnore] public double BiomN { get; set; }
		[XmlIgnore] public double HumN { get; set; }
		[XmlIgnore] public double OrganicN { get; set; }
		[XmlIgnore] public double NO3N { get; set; }
		[XmlIgnore] public double NH4N { get; set; }
		[XmlIgnore] public double UreaN { get; set; }
		[XmlIgnore] public double MineralN { get; set; }
		[XmlIgnore] public double DltNMinRes { get; set; }
		[XmlIgnore] public double DltNMinTot { get; set; }
		
        [EventSubscribe("Commencing")]
        private void OnSimulationCommencing(object sender, EventArgs e)
        {
			InitialDay = true;
		}	   
		
		[EventSubscribe("DoManagement")]
		private void OnDoManagement(object sender, EventArgs e)
		{
			//!!!!!! Nitrogen balance components !!!!!!
			//!!!!!!^^^^^^^^^^^^^^^^^^^^^^^^^^^^^!!!!!!
           	FomN = MathUtilities.Sum(Soil.SoilNitrogen.FOMN);
			HumN = MathUtilities.Sum(Soil.SoilNitrogen.HumicN);
		    BiomN = MathUtilities.Sum(Soil.SoilNitrogen.MicrobialN);
			OrganicN = FomN + HumN + BiomN;
			NO3N = MathUtilities.Sum(Soil.NO3N);
			NH4N = MathUtilities.Sum(Soil.NH4N);
			UreaN = MathUtilities.Sum(Soil.SoilNitrogen.urea);
			MineralN = NO3N + NH4N + UreaN; 
			DltNMinRes = MathUtilities.Sum(Soil.SoilNitrogen.dlt_n_min_res);
			DltNMinTot = MathUtilities.Sum(Soil.SoilNitrogen.MineralisedN);
            int layers = Soil.Thickness.Length;
			if (InitialDay == true)
			{
				InitialSurfaceOMN = SOM.N;
				InitialSoilOMN = OrganicN;
				InitialMineralN = MineralN;
				InitialDay = false;
			}
			AccumFert += Fert.NitrogenApplied;
			DeltaSurfaceOMN = SOM.N - InitialSurfaceOMN;
			AccumLeach = AccumLeach - Soil.SoilWater.LeachNH4 - Soil.SoilWater.LeachNO3 - Soil.SoilWater.LeachUrea; //Fails
            AccumMineralisation += MathUtilities.Sum(Soil.SoilNitrogen.MineralisedN);
            AccumDenit -= MathUtilities.Sum(Soil.SoilNitrogen.Denitrification);
			AccumPlantN -= (double)zone.Get("Potato.Root.NUptake");
			DeltaSoilOMN = OrganicN - InitialSoilOMN;
			DeltaSoilMineralN = MineralN - InitialMineralN;
			SoilNitrogenContent = MineralN;
			
			//!!!!!! Water balance components !!!!!!
			//!!!!!!^^^^^^^^^^^^^^^^^^^^^^^^^^!!!!!!

			AccumIrrigation += Irrig.IrrigationApplied;
			AccumRainfall += Met.Rain;
			AccumEP -= (double)zone.Get("Potato.Leaf.Transpiration");
			SoilWaterDeficit =  (SWC - DUL);
			double OutFlowLat = MathUtilities.Sum(Soil.SoilWater.outflow_lat);
			AccumOutflowLat -= OutFlowLat;
			
			//!!!!!! Thermal time calculation !!!!!!
			//!!!!!! ^^^^^^^^^^^^^^^^^^^^^^^^ !!!!!!
			if (Potato.Phenology.Stage >= 3)
			AccumTtemerg += Potato.Phenology.ThermalTime.Value;
		}
		
		[EventSubscribe("DoManagementCalculations")]
		private void OnDoManagementCalculations(object sender, EventArgs e)
		{
			FomN = MathUtilities.Sum(Soil.SoilNitrogen.FOMN);
			HumN = MathUtilities.Sum(Soil.SoilNitrogen.HumicN);
		    BiomN = MathUtilities.Sum(Soil.SoilNitrogen.MicrobialN);
			
			
			AccumEO -= Soil.SoilWater.Eo;
			AccumES -= Soil.SoilWater.Es; 
			AccumDrainage -= Soil.SoilWater.Drainage;
			AccumRunoff -= Soil.SoilWater.Runoff;
			SWC = MathUtilities.Sum(Soil.SoilWater.SWmm);
			DUL = MathUtilities.Sum(Soil.SoilWater.DULmm);
		}
	}
}
```
        Report: EventNames=[Clock].DoReport
          VariableNames:
            [Clock].Today
            [ExtraVariables].Script.AccumTtemerg
            Potato.Phenology.CurrentPhaseName
            Potato.Phenology.Stage
            Potato.Phenology.Stage
            [ExtraVariables].Script.AccumPlantN
            [ExtraVariables].Script.AccumMineralisation
            [ExtraVariables].Script.AccumDenit
            [ExtraVariables].Script.AccumFert
            [ExtraVariables].Script.AccumLeach
            [ExtraVariables].Script.AccumDetach
            [ExtraVariables].Script.DeltaSoilOMN
            [ExtraVariables].Script.DeltaSurfaceOMN
            [ExtraVariables].Script.DeltaSoilMineralN
            Potato.Root.NSupplyUptake
            [Soil].SoilWater.Eo
            [Soil].SoilWater.Es
            [ExtraVariables].Script.SWC
            [ExtraVariables].Script.DUL
            [Soil].SoilWater.Drainage
            [Soil].SoilWater.Runoff
            [ExtraVariables].Script.OutFlowLat
            [Soil].SoilWater.pond
            [ExtraVariables].Script.AccumEO
            [ExtraVariables].Script.AccumEP
            [ExtraVariables].Script.AccumES
            [ExtraVariables].Script.AccumDrainage
            [ExtraVariables].Script.AccumRunoff
            [ExtraVariables].Script.AccumRainfall
            [ExtraVariables].Script.AccumIrrigation
            [ExtraVariables].Script.AccumOutflowLat
            [ExtraVariables].Script.SoilWaterDeficit
            Potato.Summariser.AboveGround.Wt
            Potato.Summariser.BelowGround.Wt
            Potato.Summariser.Total.Wt
            Potato.Summariser.TotalDead.Wt
            Potato.Summariser.TotalLive.Wt
            Potato.Leaf.Dead.Wt
            Potato.Leaf.Live.Wt
            Potato.Stem.Dead.Wt
            Potato.Stem.Live.Wt
            Potato.Tuber.Dead.Wt
            Potato.Tuber.Live.Wt
            Potato.Root.Dead.Wt
            Potato.Root.Live.Wt
            Potato.Summariser.AboveGround.N
            Potato.Summariser.BelowGround.N
            Potato.Summariser.Total.N
            Potato.Summariser.TotalLive.N
            Potato.Summariser.TotalDead.N
            Potato.Leaf.Dead.N
            Potato.Leaf.Live.N
            Potato.Stem.Dead.N
            Potato.Stem.Live.N
            Potato.Tuber.Dead.N
            Potato.Tuber.Live.N
            Potato.Root.Live.N
            Potato.Root.Dead.N
            Potato.Leaf.Live.NConc
            Potato.Leaf.Dead.NConc
            Potato.Stem.Live.NConc
            Potato.Stem.Dead.NConc
            Potato.Tuber.Live.NConc
            Potato.Tuber.Dead.NConc
            Potato.Root.Live.NConc
            Potato.Root.Dead.NConc
            Potato.Root.WaterSupply
            Potato.Root.WaterUptake
            Potato.Leaf.Transpiration
            Potato.Leaf.WaterDemand
            Potato.Root.Depth
            Potato.Leaf.CoverGreen
            Potato.Leaf.CoverTotal
            Potato.Leaf.CoverDead
            Potato.Leaf.LAI
            Potato.Leaf.LAIDead
            Potato.Structure.Height
            Potato.Leaf.Fn
            Potato.Leaf.Fw
            Potato.Leaf.Photosynthesis.FT.Value
            Potato.Leaf.Photosynthesis.FVPD.Value
            Potato.Structure.PlantTotalNodeNo
            Potato.Structure.TotalStemPopn
            Potato.Leaf.PlantAppearedGreenLeafNo
            Potato.Leaf.ExpandingCohortNo
            Potato.Leaf.AppearedCohortNo
            Potato.Leaf.DeadCohortNo
            Potato.Structure.MainStemNodeNo
            Potato.Leaf.SenescingCohortNo
            Potato.Structure.PrimaryBudTotalNodeNo
            Potato.Leaf.LeafCohortParameters.MinimumNConc.Value
            Potato.Stem.MinimumNConc.Value
            Potato.Tuber.MinimumNConc.Value
            Potato.Root.MinimumNConc.Value
            Potato.Leaf.LeafCohortParameters.MaximumNConc.Value
            Potato.Stem.MaximumNConc.Value
            Potato.Tuber.MaximumNConc.Value
            Potato.Root.MaximumNConc.Value
            Potato.Stem.Live.StructuralWt
            Potato.Stem.Live.NonStructuralWt
            Potato.Leaf.SpecificArea
            Potato.Leaf.ExpandedCohortNo
            [Soil].SoilWater.SWmm
            [Soil].NO3N
            [ExtraVariables].Script.SoilNitrogenContent
            Potato.Arbitrator.NDemand
            [MicroClimate].net_radn
            [MicroClimate].peta
            [MicroClimate].petr
            [ExtraVariables].Script.FomN
            [ExtraVariables].Script.HumN
            [ExtraVariables].Script.BiomN
            [ExtraVariables].Script.DltNMinRes
            [ExtraVariables].Script.DltNMinTot
            [PotatoHarvestRule].Script.FinalTag
            Potato.Tuber.LiveFWt
            Potato.Tuber.DryMatterContent.Value
            [Potato].Arbitrator.NO3NSupply
            [Potato].Arbitrator.NH4NSupply
            [Potato].Root.NUptake
        SurfaceOrganicMatter: PondActive=no; ReportAdditions=no; ReportRemovals=no; PoolName=Wheat; type=Wheat; mass=2000; standing_fraction=0; cnr=80; CriticalResidueWeight=2000; OptimumDecompTemp=20; MaxCumulativeEOS=20; CNRatioDecompCoeff=0.277; CNRatioDecompThreshold=25; TotalLeachRain=25; MinRainToLeach=10; CriticalMinimumOrganicC=0.004; DefaultCPRatio=0; DefaultStandingFraction=0; StandingExtinctCoeff=0.5; FractionFaecesAdded=0.5
          Pools:
            {PoolName=Wheat, ResidueType=Wheat, Mass=2000, CNRatio=80, StandingFraction=0}
          ResidueTypes: LoadFromResource=ResidueTypes
          TillageTypes TillageTypesList
        Operations
          2003-10-20  [Fertiliser].Apply(100, Fertiliser.Types.UreaN, 0);
          2003-11-25  [Fertiliser].Apply(69, Fertiliser.Types.UreaN,0);
          2003-11-26  [Irrigation].Apply(15);
          2003-12-04  [Irrigation].Apply(50);
          2003-12-16  [Irrigation].Apply(15);
          2003-12-22  [Irrigation].Apply(50);
          2003-12-30  [Irrigation].Apply(50);
          2004-01-08  [Irrigation].Apply(50);
          2004-01-21  [Irrigation].Apply(50);
          2004-01-31  [Irrigation].Apply(50);
          2004-02-27  [Irrigation].Apply(25);
    Simulation TwinTatie: Area=0; Slope=0
      Weather: FileName=%root%\Examples\WeatherFiles\lincoln.met
      Clock: StartDate=2003-10-20; EndDate=2004-06-05
      Summary
      SoilArbitrator Soil Arbitrator
      Zone Field: Area=0; Slope=0
        Soil: same as PMFTest_NotWorking_SeeMemo.SingleTatie.Field.Soil
        Irrigation
        Fertiliser
        MicroClimate: same as PMFTest_NotWorking_SeeMemo.SingleTatie.Field.MicroClimate
        Plant Potato: CropType=Potato
        Manager PotatoSowingRule
          RowSpace = 280
          RowWidth = 770
          PlantingDepth = 120
          StemNumberPerSeedTuber = 2.2
          SowingDate = 2003-10-20
          cultivar = RussetBurbank
          cultivar2 = RussetBurbank
```csharp
        using System;
        using Models.Core;
        using Models.PMF;
        using APSIM.Shared.Utilities;

        namespace Models
        {
           [Serializable] 
           [System.Xml.Serialization.XmlInclude(typeof(Model))]
            public class Script : Model
            {      
               [Link] Plant Potato;
               //[Link] Plant Potato2;
               
               [Link] Clock Clock;

               [Description("Spacing (mm) between plants within rows")]
               public double RowSpace { get; set; }
               [Description("Spacing (mm) between rows")]
               public double RowWidth { get; set; }
               [Description("Depth (mm) tubers are planted")]
               public double PlantingDepth { get; set; }
               [Description("Number of stems per seed tuber")]
               public double StemNumberPerSeedTuber { get; set; }
               [Description("Sowing Date")]
               public DateTime SowingDate { get; set; }
               
               [Description("Cultivar")]
		       [Display(DisplayType = DisplayAttribute.DisplayTypeEnum.CultivarName)]
                public string cultivar {get; set;}
               
               [Description("Cultivar2")]
		       [Display(DisplayType = DisplayAttribute.DisplayTypeEnum.CultivarName)]
               public string cultivar2 {get; set;}

               [EventSubscribe("DoManagement")]
               private void OnDoManagement(object sender, EventArgs e)
               {
				double PlantPopulation = 1/((RowWidth/1000)*(RowSpace/1000));

				if (Clock.Today.Date == SowingDate)
                    {
                    Potato.Sow(population:PlantPopulation, cultivar:cultivar, depth:PlantingDepth, rowSpacing:150, budNumber:StemNumberPerSeedTuber);
                    //Potato2.Sow(population:PlantPopulation, cultivar:cultivar2, depth:PlantingDepth, rowSpacing:150, budNumber:StemNumberPerSeedTuber);
                    }
                //Potato.Sow(... Contains the following arguements:
                //Population  double  Required  Seeds sowing/m2
                //Cultivar    string  Required  "NameOfCultivar"
                //Depth       double  Optional  Depth (mm) seed sown.   Default is 100mm 
                //MaxCover    double  Optional  Proportion (0-1) of the ground row crop will cover.   Default is 1.0
                //BudNumber   double  Optional  Number of mainstems per seed sown.  Default is 1.0
                //RowSpacing  double  Optional  Spaceing (mm) between drill rows when crop is sown.  Default is 150mm
                //CropClass   string  Optional  Crop class to instantiate when crop is sown.  Default is "Plant"
			   }
            }
        }
```
        Manager PotatoHarvestRule
          HarvestDate = 2004-06-01
```csharp
        using System;
        using Models.Core;
        using Models.PMF;
        using System.Xml.Serialization;
        using APSIM.Shared.Utilities;

        namespace Models
        {
           [Serializable] 
           [System.Xml.Serialization.XmlInclude(typeof(Model))]
            public class Script : Model
            {      
               [Link] Plant Potato;
               //[Link] Plant Potato2;
               
               [Link] Clock Clock;
               [Link] Summary Summary;
               [Description("HarvestDate Date")]
               public DateTime HarvestDate { get; set; }    		
		       [XmlIgnore] public string FinalTag { get; set;}
		       [XmlIgnore] public bool Harvested {get; set;}
               [XmlIgnore] public bool ReadyForHarvest {get; set;}
               
               [EventSubscribe("Commencing")]
               private void OnSimulationCommencing(object sender, EventArgs e)
		       {
		       FinalTag = "";
               Harvested = false;
               ReadyForHarvest = false;
               }
               
               [EventSubscribe("DoManagement")]
               private void OnDoManagement(object sender, EventArgs e)
               {
               if (ReadyForHarvest == true)
                   {
                   Potato.Harvest();
                   ReadyForHarvest = false;
                   Harvested = true;
                   }
               FinalTag = "";    
               }
               
               [EventSubscribe("DoManagementCalculations")]
               private void OnDoManagementCalculations(object sender, EventArgs e)
               {
				if ((Clock.Today == HarvestDate)&&(Harvested == false))
				{
                    FinalTag = "yield";
					ReadyForHarvest = true;
                }
			   }
            }
        }
```
        Manager ExtraVariables: same as PMFTest_NotWorking_SeeMemo.SingleTatie.Field.ExtraVariables
        Report: EventNames=[Clock].DoReport
          VariableNames:
            [Clock].Today
            Potato.Phenology.Stage
            Potato.Root.NSupplyUptake
            Potato.Summariser.Total.Wt
            Potato.Summariser.Total.N
            Potato.Root.WaterSupply
            Potato.Root.WaterUptake
            Potato.Leaf.Transpiration
            Potato.Leaf.WaterDemand
            sum([Soil].SoilWater.SWmm) as SoilWater
            sum([Soil].NO3N) as SoilNitrate
            Potato.Arbitrator.NDemand
            Potato.Root.NUptake
        SurfaceOrganicMatter: same as PMFTest_NotWorking_SeeMemo.SingleTatie.Field.SurfaceOrganicMatter
        Operations: same as PMFTest_NotWorking_SeeMemo.SingleTatie.Field.Operations
    Memo
      For the TwinTatie test need to firstly fix PMF so it can cope with multiple crop instances.

      Then drop another potato into the tree (potato2), uncomment the bits in sowing and harvesting to plant and harvest potato2 and put some outputs in
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