Simulations
  Simulation NoTree: Area=0; Slope=0
    WeatherFile: FileName=.\norain.met
    Clock: StartDate=1988-01-01; EndDate=1988-12-31
    Summary
    Zone Field: Area=1; Slope=0
      Fertiliser
      Report ReportNT: EventNames=[Clock].DoReport
        VariableNames:
          [Clock].Today
          [Calculations].Script.TotalSW
      Soil: SoilType=Black Vertosol; LocalName=Waco; Site=Jimbour; NearestTown=Jimbour, Q 4352; Region=South East Queensland; NaturalVegetation=Grassland, mainly Qld bluegrass; Latitude=0; Longitude=0
        Water
          Thickness  BD    AirDry  LL15  DUL   SAT
          150        1.02  0.15    0.29  0.54  0.59
          150        1.03  0.26    0.29  0.53  0.58
          300        1.02  0.29    0.29  0.54  0.59
          300        1.02  0.29    0.29  0.54  0.58
          300        1.06  0.3     0.3   0.52  0.57
          300        1.11  0.31    0.31  0.5   0.55
          300        1.12  0.32    0.32  0.5   0.55
          300        1.15  0.33    0.33  0.48  0.53
          300        1.18  0.34    0.34  0.47  0.52
          300        1.2   0.35    0.35  0.46  0.51
          300        1.25  0.36    0.36  0.44  0.49
          SoilCrop WheatSoil
            LL=[0.29, 0.29, 0.32, 0.38, 0.39, 0.39, 0.41, 0.48, 0.47, 0.46, 0.44]
            KL=[0.5, 0.5, 0.08, 0.06, 0.04, 0.02, 0.01, 0, 0, 0, 0]
            XF=[1, 1, 1, 1, 1, 1, 1, 0, 0, 0, 0]
          SoilCrop SimpleTreeSoil: LL=[0.5, 0.5, 0.5, 0.5, 0.5, 0.5, 0.5, 0.5, 0.5, 0.5, 0.5]; KL=[0.1, 0.1, 0.1, 0.1, 0.1, 0.1, 0.1, 0, 0, 0, 0]; XF=[1, 1, 1, 1, 1, 1, 1, 0, 0, 0, 0]
          SoilCrop PotatoSoil
            LL=[0.29, 0.29, 0.36, 0.43, 0.51, 0.5, 0.5, 0.48, 0.47, 0.46, 0.44]
            KL=[0.5, 0.5, 0.08, 0.06, 0.04, 0.02, 0.01, 0, 0, 0, 0]
            XF=[1, 1, 1, 1, 1, 1, 1, 0, 0, 0, 0]
        SoilWater: min_crit_temp=5; max_crit_temp=35; max_albedo=0.23; A_to_evap_fact=0.44; canopy_eos_coef=1.7; sw_top_crit=0.9; sumes1_max=100; sumes2_max=25; solute_flow_eff=[1]; solute_flux_eff=[1]; gravity_gradient=2E-05; specific_bd=2.65; hydrol_effective_depth=450; immobile_solutes=[NH4]; canopy_fact=[1, 1, 0, 0]; canopy_fact_height=[0, 600, 1800, 30000]; canopy_fact_default=0.5; act_evap_method=ritchie; irrigation_will_runoff=false; irrigation_layer=1; slope=0; discharge_width=0; catchment_area=0; max_pond=0; SummerCona=0; SummerU=0; SummerDate=1-Nov; WinterCona=0; WinterU=0; WinterDate=1-Apr; DiffusConst=40; DiffusSlope=16; Salb=0.13; CN2Bare=73; CNRed=20; CNCov=0.8
          Thickness  SWCON  KLAT
          150        0.3    0
          150        0.3    0
          300        0.3    0
          300        0.3    0
          300        0.3    0
          300        0.3    0
          300        0.3    0
          300        0.3    0
          300        0.3    0
          300        0.3    0
          300        0.3    0
          mobile_solutes=[NO3, urea, cl, br, org_n, org_c_pool1, org_c_pool2, org_c_pool3]
        SoilNitrogen: fom_type=[default, manure, mucuna, lablab, shemp, stable]; fract_carb=[0.2, 0.3, 0.54, 0.57, 0.45, 0]; fract_cell=[0.7, 0.3, 0.37, 0.37, 0.47, 0.5]; fract_lign=[0.5, 0.4, 0.09, 0.06, 0.08, 0.9]; wfpsN2N2O_x=[22, 88]; wfpsN2N2O_y=[0.5, 1]
          oc=[1.01611, 0.877744, 0.884624, 0.887705, 0.769077, 0.449491, 0.269712, 0.21977, 0.159837, 0.129869, 0.119879]
        SoilOrganicMatter: RootCN=40; RootWt=200; SoilCN=12.5; EnrACoeff=7.4; EnrBCoeff=0.2; OCUnits=Total
          Thickness  OC    FBiom  FInert
          150        1.04  0.025  0.4
          150        0.89  0.02   0.6
          300        0.89  0.015  0.8
          300        0.89  0.01   0.9
          300        0.77  0.01   0.95
          300        0.45  0.01   0.95
          300        0.27  0.01   0.95
          300        0.22  0.01   0.95
          300        0.16  0.01   0.95
          300        0.13  0.01   0.95
          300        0.12  0.01   0.95
        Analysis: PHUnits=Water; BoronUnits=HotWater
          Thickness  EC    PH
          150        0.2   8.4
          150        0.25  8.8
          300        0.31  9
          300        0.4   9.2
          300        0.59  9.2
          300        0.84  9.1
          300        0.93  9
          300        1.01  9
          300        1.06  8.9
          300        1.05  8.9
          300        1.01  8.9
        InitialWater Initial water: PercentMethod=FilledFromTop; FractionFull=1
        Sample: NO3Units=ppm; NH4Units=ppm; SWUnits=Volumetric; OCUnits=Total; PHUnits=Water
          Thickness  NO3     NH4
          150        1116.5  0.599004
          150        2.101   0.100001
          300        2.101   0.100001
          300        1.701   0.100001
          300        1.701   0.100001
          300        1.701   0.100001
          300        1.701   0.100001
          300        1.701   0.100001
          300        1.701   0.100001
          300        1.701   0.100001
          300        1.701   0.100001
      SurfaceOrganicMatter: PondActive=no; ReportAdditions=no; ReportRemovals=no; PoolName=Wheat; type=Wheat; mass=0; standing_fraction=0; cnr=80; CriticalResidueWeight=2000; OptimumDecompTemp=20; MaxCumulativeEOS=20; CNRatioDecompCoeff=0.277; CNRatioDecompThreshold=25; TotalLeachRain=25; MinRainToLeach=10; CriticalMinimumOrganicC=0.004; DefaultCPRatio=0; DefaultStandingFraction=0; StandingExtinctCoeff=0.5; FractionFaecesAdded=0.5
        Pools:
          {PoolName=Wheat, ResidueType=Wheat, Mass=0, CNRatio=80, StandingFraction=0}
        ResidueTypes: LoadFromResource=ResidueTypes
        TillageTypes
      MicroClimate: air_pressure=1010; soil_emissivity=0.96; sun_angle=15; soil_heat_flux_fraction=0.4; night_interception_fraction=0.5; windspeed_default=3; refheight=2; albedo=0.293662; emissivity=0.96; gsmax=0.01; r50=200; a_interception=0; b_interception=1; c_interception=0; d_interception=0; soil_albedo=0.3
      Manager Calculations
        TotalSW = 1495.5
```csharp
using System;
using Models.Core;
using Models.PMF;
using Models.PMF.OilPalm;
using Models.Soils;
using Models.SurfaceOM;

namespace Models
{ 
	[Serializable]
	[System.Xml.Serialization.XmlInclude(typeof(Model))]
	public class Script : Model
	{
		[Link] Clock Clock;
		[Link] Soil Soil;
		
		public double TotalSW{get;set;}
       	
       [EventSubscribe("DoManagementCalculations")]
       private void OnDoManagement(object sender, EventArgs e)
		{
            TotalSW = Utility.Math.Sum(Soil.SoilWater.sw_dep);
		}
	}
}
```
    Zone Field1: Area=1; Slope=0
      Fertiliser
      Report Report1NT: EventNames=[Clock].DoReport
        VariableNames:
          [Clock].Today
          [Calculations].Script.TotalSW
      Soil: SoilType=Black Vertosol; LocalName=Waco; Site=Jimbour; NearestTown=Jimbour, Q 4352; Region=South East Queensland; NaturalVegetation=Grassland, mainly Qld bluegrass; Latitude=0; Longitude=0
        Water
          Thickness  BD    AirDry  LL15  DUL   SAT
          150        1.02  0.15    0.29  0.54  0.59
          150        1.03  0.26    0.29  0.53  0.58
          300        1.02  0.29    0.29  0.54  0.59
          300        1.02  0.29    0.29  0.54  0.58
          300        1.06  0.3     0.3   0.52  0.57
          300        1.11  0.31    0.31  0.5   0.55
          300        1.12  0.32    0.32  0.5   0.55
          300        1.15  0.33    0.33  0.48  0.53
          300        1.18  0.34    0.34  0.47  0.52
          300        1.2   0.35    0.35  0.46  0.51
          300        1.25  0.36    0.36  0.44  0.49
          SoilCrop WheatSoil
            LL=[0.29, 0.29, 0.32, 0.38, 0.39, 0.39, 0.41, 0.48, 0.47, 0.46, 0.44]
            KL=[0.5, 0.5, 0.08, 0.06, 0.04, 0.02, 0.01, 0, 0, 0, 0]
            XF=[1, 1, 1, 1, 1, 1, 1, 0, 0, 0, 0]
          SoilCrop SimpleTreeSoil: LL=[0.5, 0.5, 0.5, 0.5, 0.5, 0.5, 0.5, 0.5, 0.5, 0.5, 0.5]; KL=[0, 0, 0, 0, 0, 0, 0, 0, 0, 0, 0]; XF=[1, 1, 1, 1, 1, 1, 1, 0, 0, 0, 0]
          SoilCrop PotatoSoil
            LL=[0.29, 0.29, 0.36, 0.43, 0.51, 0.5, 0.5, 0.48, 0.47, 0.46, 0.44]
            KL=[0.5, 0.5, 0.08, 0.06, 0.04, 0.02, 0.01, 0, 0, 0, 0]
            XF=[1, 1, 1, 1, 1, 1, 1, 0, 0, 0, 0]
        SoilWater: same as NoTree.Field.Soil.SoilWater
        SoilNitrogen: same as NoTree.Field.Soil.SoilNitrogen
        SoilOrganicMatter: same as NoTree.Field.Soil.SoilOrganicMatter
        Analysis: PHUnits=Water; BoronUnits=HotWater
          Thickness  EC    PH
          150        0.2   8.4
          150        0.25  8.8
          300        0.31  9
          300        0.4   9.2
          300        0.59  9.2
          300        0.84  9.1
          300        0.93  9
          300        1.01  9
          300        1.06  8.9
          300        1.05  8.9
          300        1.01  8.9
        InitialWater Initial water: PercentMethod=FilledFromTop; FractionFull=1
        Sample: same as NoTree.Field.Soil.Sample
      SurfaceOrganicMatter: same as NoTree.Field.SurfaceOrganicMatter
      MicroClimate: same as NoTree.Field.MicroClimate
      Manager Calculations: same as NoTree.Field.Calculations
    Zone Field2: Area=1; Slope=0
      Fertiliser
      Report Report2NT: EventNames=[Clock].DoReport
        VariableNames:
          [Clock].Today
          [Calculations].Script.TotalSW
      Soil: same as NoTree.Field1.Soil
      SurfaceOrganicMatter: same as NoTree.Field.SurfaceOrganicMatter
      MicroClimate: same as NoTree.Field.MicroClimate
      Manager Calculations: same as NoTree.Field.Calculations
  Simulation 1Tree1Field: Area=0; Slope=0
    WeatherFile: FileName=norain.met
    Clock: StartDate=1988-01-01; EndDate=1988-12-31
    Summary
    SoilArbitrator Soil Arbitrator
    Zone Field: Area=1; Slope=0
      Fertiliser
      Report Report1T1F: EventNames=[Clock].DoReport
        VariableNames:
          [Clock].Today
          [Calculations].Script.TotalSW
          [Calculations].Script.Uptake
          [Soil].SoilWater.eo
          [Soil].SoilWater.es
      Soil: SoilType=Black Vertosol; LocalName=Waco; Site=Jimbour; NearestTown=Jimbour, Q 4352; Region=South East Queensland; NaturalVegetation=Grassland, mainly Qld bluegrass; Latitude=0; Longitude=0
        Water: same as NoTree.Field.Soil.Water
        SoilWater: same as NoTree.Field.Soil.SoilWater
        SoilNitrogen: fom_type=[default, manure, mucuna, lablab, shemp, stable]; fract_carb=[0.2, 0.3, 0.54, 0.57, 0.45, 0]; fract_cell=[0.7, 0.3, 0.37, 0.37, 0.47, 0.5]; fract_lign=[0.5, 0.4, 0.09, 0.06, 0.08, 0.9]; wfpsN2N2O_x=[22, 88]; wfpsN2N2O_y=[0.5, 1]
          oc=[1.02808, 0.882115, 0.885171, 0.887717, 0.769083, 0.449494, 0.269713, 0.219771, 0.159838, 0.12987, 0.11988]
        SoilOrganicMatter: same as NoTree.Field.Soil.SoilOrganicMatter
        Analysis: PHUnits=Water; BoronUnits=HotWater
          Thickness  EC    PH
          150        0.2   8.4
          150        0.25  8.8
          300        0.31  9
          300        0.4   9.2
          300        0.59  9.2
          300        0.84  9.1
          300        0.93  9
          300        1.01  9
          300        1.06  8.9
          300        1.05  8.9
          300        1.01  8.9
        InitialWater Initial water: PercentMethod=FilledFromTop; FractionFull=1
        Sample: same as NoTree.Field.Soil.Sample
      SurfaceOrganicMatter: PondActive=no; ReportAdditions=no; ReportRemovals=no; PoolName=Wheat; type=Wheat; mass=1000; standing_fraction=0; cnr=80; CriticalResidueWeight=2000; OptimumDecompTemp=20; MaxCumulativeEOS=20; CNRatioDecompCoeff=0.277; CNRatioDecompThreshold=25; TotalLeachRain=25; MinRainToLeach=10; CriticalMinimumOrganicC=0.004; DefaultCPRatio=0; DefaultStandingFraction=0; StandingExtinctCoeff=0.5; FractionFaecesAdded=0.5
        Pools:
          {PoolName=Wheat, ResidueType=Wheat, Mass=1000, CNRatio=80, StandingFraction=0}
        ResidueTypes: LoadFromResource=ResidueTypes
        TillageTypes
      MicroClimate: same as NoTree.Field.MicroClimate
      SimpleTree: CoverLive=0.5; plant_status=alive; zones=Field
        MicroClimate: same as NoTree.Field.MicroClimate
      Manager Calculations
        TotalSW = 1339.27
        Uptake = 0.298135
```csharp
using System;
using Models.Core;
using Models.PMF;
using Models.PMF.OilPalm;
using Models.Soils;
using Models.SurfaceOM;

namespace Models
{ 
	[Serializable]
	[System.Xml.Serialization.XmlInclude(typeof(Model))]
	public class Script : Model
	{
		[Link] Clock Clock;
		[Link] Soil Soil;
		[Link] SimpleTree SimpleTree;
		
		public double TotalSW{get;set;}
		public double Uptake{get;set;}
       	
       [EventSubscribe("DoManagementCalculations")]
       private void OnDoManagement(object sender, EventArgs e)
		{
            TotalSW = Utility.Math.Sum(Soil.SoilWater.sw_dep);
            if (SimpleTree.RootSystem.Uptake != null)
              Uptake = Utility.Math.Sum(SimpleTree.RootSystem.Uptake);
		}
	}
}
```
  Simulation 1Tree2Field: Area=0; Slope=0
    WeatherFile: FileName=norain.met
    Clock: StartDate=1988-01-01; EndDate=1988-12-31
    Summary
    SoilArbitrator Soil Arbitrator
    Zone Field: Area=1; Slope=0
      Fertiliser
      Report Report1T2F: EventNames=[Clock].DoReport
        VariableNames:
          [Clock].Today
          [Calculations].Script.TotalSW
      Soil: SoilType=Black Vertosol; LocalName=Waco; Site=Jimbour; NearestTown=Jimbour, Q 4352; Region=South East Queensland; NaturalVegetation=Grassland, mainly Qld bluegrass; Latitude=0; Longitude=0
        Water
          Thickness  BD    AirDry  LL15  DUL   SAT
          150        1.02  0.15    0.29  0.54  0.59
          150        1.03  0.26    0.29  0.53  0.58
          300        1.02  0.29    0.29  0.54  0.59
          300        1.02  0.29    0.29  0.54  0.58
          300        1.06  0.3     0.3   0.52  0.57
          300        1.11  0.31    0.31  0.5   0.55
          300        1.12  0.32    0.32  0.5   0.55
          300        1.15  0.33    0.33  0.48  0.53
          300        1.18  0.34    0.34  0.47  0.52
          300        1.2   0.35    0.35  0.46  0.51
          300        1.25  0.36    0.36  0.44  0.49
          SoilCrop WheatSoil
            LL=[0.29, 0.29, 0.32, 0.38, 0.39, 0.39, 0.41, 0.48, 0.47, 0.46, 0.44]
            KL=[0.1, 0.1, 0.1, 0.1, 0.1, 0.1, 0.1, 0, 0, 0, 0]
            XF=[1, 1, 1, 1, 1, 1, 1, 0, 0, 0, 0]
          SoilCrop SimpleTreeSoil: LL=[0.5, 0.5, 0.5, 0.5, 0.5, 0.5, 0.5, 0.5, 0.5, 0.5, 0.5]; KL=[0.1, 0.1, 0.1, 0.1, 0.1, 0.1, 0.1, 0, 0, 0, 0]; XF=[1, 1, 1, 1, 1, 1, 1, 0, 0, 0, 0]
          SoilCrop PotatoSoil
            LL=[0.29, 0.29, 0.36, 0.43, 0.51, 0.5, 0.5, 0.48, 0.47, 0.46, 0.44]
            KL=[0.5, 0.5, 0.08, 0.06, 0.04, 0.02, 0.01, 0, 0, 0, 0]
            XF=[1, 1, 1, 1, 1, 1, 1, 0, 0, 0, 0]
        SoilWater: same as NoTree.Field.Soil.SoilWater
        SoilNitrogen: fom_type=[default, manure, mucuna, lablab, shemp, stable]; fract_carb=[0.2, 0.3, 0.54, 0.57, 0.45, 0]; fract_cell=[0.7, 0.3, 0.37, 0.37, 0.47, 0.5]; fract_lign=[0.5, 0.4, 0.09, 0.06, 0.08, 0.9]; wfpsN2N2O_x=[22, 88]; wfpsN2N2O_y=[0.5, 1]
          oc=[1.01706, 0.877751, 0.88463, 0.887708, 0.769079, 0.449492, 0.269712, 0.21977, 0.159837, 0.129869, 0.119879]
        SoilOrganicMatter: same as NoTree.Field.Soil.SoilOrganicMatter
        Analysis: PHUnits=Water; BoronUnits=HotWater
          Thickness  EC    PH
          150        0.2   8.4
          150        0.25  8.8
          300        0.31  9
          300        0.4   9.2
          300        0.59  9.2
          300        0.84  9.1
          300        0.93  9
          300        1.01  9
          300        1.06  8.9
          300        1.05  8.9
          300        1.01  8.9
        InitialWater Initial water: PercentMethod=FilledFromTop; FractionFull=1
        Sample: same as NoTree.Field.Soil.Sample
      SurfaceOrganicMatter: same as 1Tree1Field.Field.SurfaceOrganicMatter
      MicroClimate: same as NoTree.Field.MicroClimate
      SimpleTree: CoverLive=0.5; plant_status=alive; zones=Field,Field1
        MicroClimate: same as NoTree.Field.MicroClimate
      Manager Calculations
        TotalSW = 1420.2
        script: same as in NoTree.Field.Calculations
    Zone Field1: Area=1; Slope=0
      Fertiliser
      Report Report11T2F: EventNames=[Clock].DoReport
        VariableNames:
          [Clock].Today
          [Calculations].Script.TotalSW
      Soil: SoilType=Black Vertosol; LocalName=Waco; Site=Jimbour; NearestTown=Jimbour, Q 4352; Region=South East Queensland; NaturalVegetation=Grassland, mainly Qld bluegrass; Latitude=0; Longitude=0
        Water
          Thickness  BD    AirDry  LL15  DUL   SAT
          150        1.02  0.15    0.29  0.54  0.59
          150        1.03  0.26    0.29  0.53  0.58
          300        1.02  0.29    0.29  0.54  0.59
          300        1.02  0.29    0.29  0.54  0.58
          300        1.06  0.3     0.3   0.52  0.57
          300        1.11  0.31    0.31  0.5   0.55
          300        1.12  0.32    0.32  0.5   0.55
          300        1.15  0.33    0.33  0.48  0.53
          300        1.18  0.34    0.34  0.47  0.52
          300        1.2   0.35    0.35  0.46  0.51
          300        1.25  0.36    0.36  0.44  0.49
          SoilCrop WheatSoil
            LL=[0.29, 0.29, 0.32, 0.38, 0.39, 0.39, 0.41, 0.48, 0.47, 0.46, 0.44]
            KL=[0.5, 0.5, 0.08, 0.06, 0.04, 0.02, 0.01, 0, 0, 0, 0]
            XF=[1, 1, 1, 1, 1, 1, 1, 0, 0, 0, 0]
          SoilCrop SimpleTreeSoil: LL=[0.5, 0.5, 0.5, 0.5, 0.5, 0.5, 0.5, 0.5, 0.5, 0.5, 0.5]; KL=[0.1, 0.1, 0.1, 0.1, 0.1, 0.1, 0.1, 0, 0, 0, 0]; XF=[1, 1, 1, 1, 1, 1, 1, 0, 0, 0, 0]
          SoilCrop PotatoSoil
            LL=[0.29, 0.29, 0.36, 0.43, 0.51, 0.5, 0.5, 0.48, 0.47, 0.46, 0.44]
            KL=[0.5, 0.5, 0.08, 0.06, 0.04, 0.02, 0.01, 0, 0, 0, 0]
            XF=[1, 1, 1, 1, 1, 1, 1, 0, 0, 0, 0]
        SoilWater: same as NoTree.Field.Soil.SoilWater
        SoilNitrogen: same as 1Tree2Field.Field.Soil.SoilNitrogen
        SoilOrganicMatter: same as NoTree.Field.Soil.SoilOrganicMatter
        Analysis: PHUnits=Water; BoronUnits=HotWater
          Thickness  EC    PH
          150        0.2   8.4
          150        0.25  8.8
          300        0.31  9
          300        0.4   9.2
          300        0.59  9.2
          300        0.84  9.1
          300        0.93  9
          300        1.01  9
          300        1.06  8.9
          300        1.05  8.9
          300        1.01  8.9
        InitialWater Initial water: PercentMethod=FilledFromTop; FractionFull=1
        Sample: same as NoTree.Field.Soil.Sample
      SurfaceOrganicMatter: same as 1Tree1Field.Field.SurfaceOrganicMatter
      MicroClimate: same as NoTree.Field.MicroClimate
      Manager Calculations: same as 1Tree2Field.Field.Calculations
  Simulation 1Tree3Field: Area=0; Slope=0
    WeatherFile: FileName=norain.met
    Clock: StartDate=1988-01-01; EndDate=1988-12-31
    Summary
    SoilArbitrator Soil Arbitrator
    Zone Field: Area=1; Slope=0
      Fertiliser
      Report Report1T3F: EventNames=[Clock].DoReport
        VariableNames:
          [Clock].Today
          [Calculations].Script.TotalSW
      Soil: SoilType=Black Vertosol; LocalName=Waco; Site=Jimbour; NearestTown=Jimbour, Q 4352; Region=South East Queensland; NaturalVegetation=Grassland, mainly Qld bluegrass; Latitude=0; Longitude=0
        Water: same as 1Tree2Field.Field.Soil.Water
        SoilWater: same as NoTree.Field.Soil.SoilWater
        SoilNitrogen: fom_type=[default, manure, mucuna, lablab, shemp, stable]; fract_carb=[0.2, 0.3, 0.54, 0.57, 0.45, 0]; fract_cell=[0.7, 0.3, 0.37, 0.37, 0.47, 0.5]; fract_lign=[0.5, 0.4, 0.09, 0.06, 0.08, 0.9]; wfpsN2N2O_x=[22, 88]; wfpsN2N2O_y=[0.5, 1]
          oc=[1.01706, 0.877747, 0.884626, 0.887706, 0.769078, 0.449491, 0.269712, 0.21977, 0.159837, 0.129869, 0.119879]
        SoilOrganicMatter: same as NoTree.Field.Soil.SoilOrganicMatter
        Analysis: PHUnits=Water; BoronUnits=HotWater
          Thickness  EC    PH
          150        0.2   8.4
          150        0.25  8.8
          300        0.31  9
          300        0.4   9.2
          300        0.59  9.2
          300        0.84  9.1
          300        0.93  9
          300        1.01  9
          300        1.06  8.9
          300        1.05  8.9
          300        1.01  8.9
        InitialWater Initial water: PercentMethod=FilledFromTop; FractionFull=1
        Sample: same as NoTree.Field.Soil.Sample
      SurfaceOrganicMatter: same as 1Tree1Field.Field.SurfaceOrganicMatter
      MicroClimate: same as NoTree.Field.MicroClimate
      SimpleTree: CoverLive=0.5; plant_status=alive; zones=Field, Field1, Field2
        MicroClimate: same as NoTree.Field.MicroClimate
      Manager Calculations
        TotalSW = 1456.98
        script: same as in NoTree.Field.Calculations
    Zone Field1: Area=1; Slope=0
      Fertiliser
      Report Report11T3F: EventNames=[Clock].DoReport
        VariableNames:
          [Clock].Today
          [Calculations].Script.TotalSW
      Soil: SoilType=Black Vertosol; LocalName=Waco; Site=Jimbour; NearestTown=Jimbour, Q 4352; Region=South East Queensland; NaturalVegetation=Grassland, mainly Qld bluegrass; Latitude=0; Longitude=0
        Water: same as 1Tree2Field.Field1.Soil.Water
        SoilWater: same as NoTree.Field.Soil.SoilWater
        SoilNitrogen: same as 1Tree3Field.Field.Soil.SoilNitrogen
        SoilOrganicMatter: same as NoTree.Field.Soil.SoilOrganicMatter
        Analysis: PHUnits=Water; BoronUnits=HotWater
          Thickness  EC    PH
          150        0.2   8.4
          150        0.25  8.8
          300        0.31  9
          300        0.4   9.2
          300        0.59  9.2
          300        0.84  9.1
          300        0.93  9
          300        1.01  9
          300        1.06  8.9
          300        1.05  8.9
          300        1.01  8.9
        InitialWater Initial water: PercentMethod=FilledFromTop; FractionFull=1
        Sample: same as NoTree.Field.Soil.Sample
      SurfaceOrganicMatter: same as 1Tree1Field.Field.SurfaceOrganicMatter
      MicroClimate: same as NoTree.Field.MicroClimate
      Manager Calculations: same as 1Tree3Field.Field.Calculations
    Zone Field2: Area=1; Slope=0
      Fertiliser
      Report Report21T3F: EventNames=[Clock].DoReport
        VariableNames:
          [Clock].Today
          [Calculations].Script.TotalSW
      Soil: same as 1Tree3Field.Field1.Soil
      SurfaceOrganicMatter: same as 1Tree1Field.Field.SurfaceOrganicMatter
      MicroClimate: same as NoTree.Field.MicroClimate
      Manager Calculations: same as 1Tree3Field.Field.Calculations
  Simulation 2Tree1Field: Area=0; Slope=0
    WeatherFile: FileName=norain.met
    Clock: StartDate=1988-01-01; EndDate=1988-12-31
    Summary
    SoilArbitrator Soil Arbitrator
    Zone Field: Area=1; Slope=0
      Fertiliser
      Report Report2T1F: EventNames=[Clock].DoReport
        VariableNames:
          [Clock].Today
          [Calculations].Script.TotalSW
          [Soil].SoilWater.eo
          [Soil].SoilWater.es
          [Calculations].Script.Uptake
          [Calculations].Script.Uptake1
      Soil: SoilType=Black Vertosol; LocalName=Waco; Site=Jimbour; NearestTown=Jimbour, Q 4352; Region=South East Queensland; NaturalVegetation=Grassland, mainly Qld bluegrass; Latitude=0; Longitude=0
        Water: same as NoTree.Field.Soil.Water
        SoilWater: same as NoTree.Field.Soil.SoilWater
        SoilNitrogen: fom_type=[default, manure, mucuna, lablab, shemp, stable]; fract_carb=[0.2, 0.3, 0.54, 0.57, 0.45, 0]; fract_cell=[0.7, 0.3, 0.37, 0.37, 0.47, 0.5]; fract_lign=[0.5, 0.4, 0.09, 0.06, 0.08, 0.9]; wfpsN2N2O_x=[22, 88]; wfpsN2N2O_y=[0.5, 1]
          oc=[1.03758, 0.887723, 0.88764, 0.887725, 0.769086, 0.449496, 0.269715, 0.219772, 0.159839, 0.12987, 0.11988]
        SoilOrganicMatter: same as NoTree.Field.Soil.SoilOrganicMatter
        Analysis: PHUnits=Water; BoronUnits=HotWater
          Thickness  EC    PH
          150        0.2   8.4
          150        0.25  8.8
          300        0.31  9
          300        0.4   9.2
          300        0.59  9.2
          300        0.84  9.1
          300        0.93  9
          300        1.01  9
          300        1.06  8.9
          300        1.05  8.9
          300        1.01  8.9
        InitialWater Initial water: PercentMethod=FilledFromTop; FractionFull=1
        Sample: same as NoTree.Field.Soil.Sample
      SurfaceOrganicMatter: same as 1Tree1Field.Field.SurfaceOrganicMatter
      MicroClimate: same as NoTree.Field.MicroClimate
      SimpleTree: same as 1Tree1Field.Field.SimpleTree
      SimpleTree SimpleTree1: same as 1Tree1Field.Field.SimpleTree
      Manager Calculations
        TotalSW = 1308.1
        Uptake = 0.298135
        Uptake1 = 0.298135
```csharp
using System;
using Models.Core;
using Models.PMF;
using Models.PMF.OilPalm;
using Models.Soils;
using Models.SurfaceOM;

namespace Models
{ 
	[Serializable]
	[System.Xml.Serialization.XmlInclude(typeof(Model))]
	public class Script : Model
	{
		[Link] Clock Clock;
		[Link] Soil Soil;
		[Link] SimpleTree SimpleTree;
		[Link] SimpleTree SimpleTree1;
		
		public double TotalSW{get;set;}
		public double Uptake{get;set;}
		public double Uptake1{get;set;}
       	
       [EventSubscribe("DoManagementCalculations")]
       private void OnDoManagement(object sender, EventArgs e)
		{
            TotalSW = Utility.Math.Sum(Soil.SoilWater.sw_dep);
            if (SimpleTree.RootSystem.Uptake != null)
            	Uptake = Utility.Math.Sum(SimpleTree.RootSystem.Uptake);
            if (SimpleTree1.RootSystem.Uptake != null)
            	Uptake1 = Utility.Math.Sum(SimpleTree1.RootSystem.Uptake);
		}
	}
}
```
  Simulation 3Tree1Field: Area=0; Slope=0
    WeatherFile: FileName=norain.met
    Clock: StartDate=1988-01-01; EndDate=1988-12-31
    Summary
    SoilArbitrator Soil Arbitrator
    Zone Field: Area=1; Slope=0
      Fertiliser
      Report Report2T1F: EventNames=[Clock].DoReport
        VariableNames:
          [Clock].Today
          [Calculations].Script.TotalSW
          [Soil].SoilWater.eo
          [Soil].SoilWater.es
          [Calculations].Script.Uptake
          [Calculations].Script.Uptake1
      Soil: SoilType=Black Vertosol; LocalName=Waco; Site=Jimbour; NearestTown=Jimbour, Q 4352; Region=South East Queensland; NaturalVegetation=Grassland, mainly Qld bluegrass; Latitude=0; Longitude=0
        Water: same as NoTree.Field.Soil.Water
        SoilWater: same as NoTree.Field.Soil.SoilWater
        SoilNitrogen: fom_type=[default, manure, mucuna, lablab, shemp, stable]; fract_carb=[0.2, 0.3, 0.54, 0.57, 0.45, 0]; fract_cell=[0.7, 0.3, 0.37, 0.37, 0.47, 0.5]; fract_lign=[0.5, 0.4, 0.09, 0.06, 0.08, 0.9]; wfpsN2N2O_x=[22, 88]; wfpsN2N2O_y=[0.5, 1]
          oc=[1.04009, 0.889133, 0.888826, 0.887728, 0.769088, 0.449497, 0.269715, 0.219773, 0.159839, 0.129871, 0.11988]
        SoilOrganicMatter: same as NoTree.Field.Soil.SoilOrganicMatter
        Analysis: PHUnits=Water; BoronUnits=HotWater
          Thickness  EC    PH
          150        0.2   8.4
          150        0.25  8.8
          300        0.31  9
          300        0.4   9.2
          300        0.59  9.2
          300        0.84  9.1
          300        0.93  9
          300        1.01  9
          300        1.06  8.9
          300        1.05  8.9
          300        1.01  8.9
        InitialWater Initial water: PercentMethod=FilledFromTop; FractionFull=1
        Sample: same as NoTree.Field.Soil.Sample
      SurfaceOrganicMatter: same as 1Tree1Field.Field.SurfaceOrganicMatter
      MicroClimate: same as NoTree.Field.MicroClimate
      SimpleTree: same as 1Tree1Field.Field.SimpleTree
      SimpleTree SimpleTree1: same as 1Tree1Field.Field.SimpleTree
      SimpleTree SimpleTree2: same as 1Tree1Field.Field.SimpleTree
      Manager Calculations
        TotalSW = 1305.54
        Uptake = 0.298135
        Uptake1 = 0.298135
        script: same as in 2Tree1Field.Field.Calculations
  DataStore
  Simulation 2T2FSameField: Area=0; Slope=0
    WeatherFile: FileName=norain.met
    Clock: StartDate=1988-01-01; EndDate=1988-12-31
    Summary
    SoilArbitrator Soil Arbitrator
    Zone Field: Area=1; Slope=0
      Fertiliser
      Report Report2T2FSameF: EventNames=[Clock].DoReport
        VariableNames:
          [Clock].Today
          [Calculations].Script.TotalSW
          [Soil].SoilWater.eo
          [Soil].SoilWater.es
          [Calculations].Script.Uptake
          [Calculations].Script.Uptake1
      Soil: same as 1Tree1Field.Field.Soil
      SurfaceOrganicMatter: same as 1Tree1Field.Field.SurfaceOrganicMatter
      MicroClimate: same as NoTree.Field.MicroClimate
      SimpleTree: same as 1Tree2Field.Field.SimpleTree
      SimpleTree SimpleTree1: same as 1Tree2Field.Field.SimpleTree
      Manager Calculations
        TotalSW = 1339.27
        Uptake = 0.298135
        Uptake1 = 0.298135
        script: same as in 2Tree1Field.Field.Calculations
    Zone Field1: Area=1; Slope=0
      Fertiliser
      Report Report2T2FSameF1: EventNames=[Clock].DoReport
        VariableNames:
          [Clock].Today
          [Calculations].Script.TotalSW
          [Soil].SoilWater.eo
          [Soil].SoilWater.es
      Soil: same as 1Tree1Field.Field.Soil
      SurfaceOrganicMatter: same as 1Tree1Field.Field.SurfaceOrganicMatter
      MicroClimate: same as NoTree.Field.MicroClimate
      Manager Calculations
        TotalSW = 1339.27
        script: same as in NoTree.Field.Calculations
  Simulation 2T2FDiffField: Area=0; Slope=0
    WeatherFile: FileName=norain.met
    Clock: StartDate=1988-01-01; EndDate=1988-12-31
    Summary
    SoilArbitrator Soil Arbitrator
    Zone Field: Area=1; Slope=0
      Fertiliser
      Report Report2T2FDiffF: EventNames=[Clock].DoReport
        VariableNames:
          [Clock].Today
          [Calculations].Script.TotalSW
          [Soil].SoilWater.eo
          [Soil].SoilWater.es
          [Calculations].Script.Uptake
      Soil: same as 1Tree1Field.Field.Soil
      SurfaceOrganicMatter: same as 1Tree1Field.Field.SurfaceOrganicMatter
      MicroClimate: same as NoTree.Field.MicroClimate
      SimpleTree: same as 1Tree2Field.Field.SimpleTree
      Manager Calculations
        TotalSW = 1339.27
        Uptake = 0.298135
        script: same as in 1Tree1Field.Field.Calculations
    Zone Field1: Area=1; Slope=0
      Fertiliser
      Report Report2T2FDiffF1: EventNames=[Clock].DoReport
        VariableNames:
          [Clock].Today
          [Calculations].Script.TotalSW
          [Soil].SoilWater.eo
          [Soil].SoilWater.es
          [Calculations].Script.Uptake
      Soil: same as 1Tree1Field.Field.Soil
      SurfaceOrganicMatter: same as 1Tree1Field.Field.SurfaceOrganicMatter
      MicroClimate: same as NoTree.Field.MicroClimate
      SimpleTree: same as 1Tree2Field.Field.SimpleTree
      Manager Calculations: same as 2T2FDiffField.Field.Calculations
  Simulation 2T2FDiffRoots: Area=0; Slope=0
    WeatherFile: FileName=norain.met
    Clock: StartDate=1988-01-01; EndDate=1988-12-31
    Summary
    SoilArbitrator Soil Arbitrator
    Zone Field: Area=1; Slope=0
      Fertiliser
      Report Report2T2FDiffRoots: EventNames=[Clock].DoReport
        VariableNames:
          [Clock].Today
          [Calculations].Script.TotalSW
          [Soil].SoilWater.eo
          [Soil].SoilWater.es
          [Calculations].Script.Uptake
          [Calculations].Script.Uptake1
      Soil: SoilType=Black Vertosol; LocalName=Waco; Site=Jimbour; NearestTown=Jimbour, Q 4352; Region=South East Queensland; NaturalVegetation=Grassland, mainly Qld bluegrass; Latitude=0; Longitude=0
        Water: same as NoTree.Field.Soil.Water
        SoilWater: same as NoTree.Field.Soil.SoilWater
        SoilNitrogen: fom_type=[default, manure, mucuna, lablab, shemp, stable]; fract_carb=[0.2, 0.3, 0.54, 0.57, 0.45, 0]; fract_cell=[0.7, 0.3, 0.37, 0.37, 0.47, 0.5]; fract_lign=[0.5, 0.4, 0.09, 0.06, 0.08, 0.9]; wfpsN2N2O_x=[22, 88]; wfpsN2N2O_y=[0.5, 1]
          oc=[1.03442, 0.885763, 0.886433, 0.887722, 0.769085, 0.449495, 0.269714, 0.219771, 0.159838, 0.12987, 0.11988]
        SoilOrganicMatter: same as NoTree.Field.Soil.SoilOrganicMatter
        Analysis: PHUnits=Water; BoronUnits=HotWater
          Thickness  EC    PH
          150        0.2   8.4
          150        0.25  8.8
          300        0.31  9
          300        0.4   9.2
          300        0.59  9.2
          300        0.84  9.1
          300        0.93  9
          300        1.01  9
          300        1.06  8.9
          300        1.05  8.9
          300        1.01  8.9
        InitialWater Initial water: PercentMethod=FilledFromTop; FractionFull=1
        Sample: same as NoTree.Field.Soil.Sample
      SurfaceOrganicMatter: same as 1Tree1Field.Field.SurfaceOrganicMatter
      MicroClimate: same as NoTree.Field.MicroClimate
      SimpleTree: same as 1Tree2Field.Field.SimpleTree
      SimpleTree SimpleTree1: same as 1Tree1Field.Field.SimpleTree
      Manager Calculations
        TotalSW = 1315.77
        Uptake = 0.298135
        Uptake1 = 0.298135
        script: same as in 2Tree1Field.Field.Calculations
    Zone Field1: Area=1; Slope=0
      Fertiliser
      Report Report2T2FDiffRoots1: EventNames=[Clock].DoReport
        VariableNames:
          [Clock].Today
          [Calculations].Script.TotalSW
          [Soil].SoilWater.eo
          [Soil].SoilWater.es
      Soil: SoilType=Black Vertosol; LocalName=Waco; Site=Jimbour; NearestTown=Jimbour, Q 4352; Region=South East Queensland; NaturalVegetation=Grassland, mainly Qld bluegrass; Latitude=0; Longitude=0
        Water: same as NoTree.Field.Soil.Water
        SoilWater: same as NoTree.Field.Soil.SoilWater
        SoilNitrogen: fom_type=[default, manure, mucuna, lablab, shemp, stable]; fract_carb=[0.2, 0.3, 0.54, 0.57, 0.45, 0]; fract_cell=[0.7, 0.3, 0.37, 0.37, 0.47, 0.5]; fract_lign=[0.5, 0.4, 0.09, 0.06, 0.08, 0.9]; wfpsN2N2O_x=[22, 88]; wfpsN2N2O_y=[0.5, 1]
          oc=[1.01728, 0.877753, 0.884631, 0.887709, 0.769079, 0.449492, 0.269712, 0.21977, 0.159837, 0.12987, 0.119879]
        SoilOrganicMatter: same as NoTree.Field.Soil.SoilOrganicMatter
        Analysis: PHUnits=Water; BoronUnits=HotWater
          Thickness  EC    PH
          150        0.2   8.4
          150        0.25  8.8
          300        0.31  9
          300        0.4   9.2
          300        0.59  9.2
          300        0.84  9.1
          300        0.93  9
          300        1.01  9
          300        1.06  8.9
          300        1.05  8.9
          300        1.01  8.9
        InitialWater Initial water: PercentMethod=FilledFromTop; FractionFull=1
        Sample: same as NoTree.Field.Soil.Sample
      SurfaceOrganicMatter: same as 1Tree1Field.Field.SurfaceOrganicMatter
      MicroClimate: same as NoTree.Field.MicroClimate
      Manager Calculations
        TotalSW = 1408.74
        script: same as in NoTree.Field.Calculations
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