Simulations
  Simulation Sorghum_HighWaterHighN: Area=0; Slope=0
    Clock: StartDate=1997-11-18; EndDate=1998-04-15
    Summary summaryfile
    Weather: FileName=HE5.met
    SoilArbitrator Soil Arbitrator
    Zone paddock: Area=1; Slope=0
      Folder Manager folder
        Manager SorghumSowingRule
          PlantPopulation = 10
          RowSpacing = 500
          SowingDepth = 30
          CultivarName = Dekalb_XL82
          SowingDate = 1997-11-27
          SkipConfig = solid
```csharp
        using System;
        using Models.Core;
        using Models.PMF;
        using APSIM.Shared.Utilities;
        
        namespace Models
        {
           [Serializable] 
           [System.Xml.Serialization.XmlInclude(typeof(Model))]
            public class Script : Model
            {      
               [Link] Plant Sorghum;
               [Link] Clock Clock;
               [Link] Fertiliser Fertiliser;
               [Description("Sowing Density (mm)")]
               public double PlantPopulation { get; set;}
               [Description("Row Spacing (mm)")]
               public double RowSpacing { get; set; }
               [Description("Sowing Depth (mm)")]
               public double SowingDepth { get; set;}
               [Description("Cultivar")]
               [Display(DisplayType = DisplayAttribute.DisplayTypeEnum.CultivarName)]
               public string CultivarName { get; set; }
               [Description("Sowing Date")]
               public DateTime SowingDate { get; set; }
               [Description("Skip Row Configuration")]
               public string SkipConfig { get; set;}
               
               public double DaysAfterSowing =0;
               
             
               
               [EventSubscribe("DoManagement")]
               private void OnDoManagement(object sender, EventArgs e)
               {
				//double PlantPopulation = 1/((RowWidth/1000)*(RowSpace/1000));

				if (Clock.Today.Date == SowingDate)
				{
                    Sorghum.Sow(population:PlantPopulation, cultivar:CultivarName, depth:SowingDepth, rowSpacing:RowSpacing, skipRow: SkipConfig);
                 }
                 
                 if(Clock.Today.Date > SowingDate)
                 {
                 DaysAfterSowing++;
                 }
                    
                //Potato.Sow(... Contains the following arguements:
                //Population  double  Required  Seeds sowing/m2
                //Cultivar    string  Required  "NameOfCultivar"
                //Depth       double  Optional  Depth (mm) seed sown.   Default is 100mm 
                //MaxCover    double  Optional  Proportion (0-1) of the ground row crop will cover.   Default is 1.0
                //BudNumber   double  Optional  Number of mainstems per seed sown.  Default is 1.0
                //RowSpacing  double  Optional  Spaceing (mm) between drill rows when crop is sown.  Default is 150mm
                //CropClass   string  Optional  Crop class to instantiate when crop is sown.  Default is "Plant"
			   }
            }
        }
```
      Operations
        1997-11-28  [Irrigation].Apply(16);
        1997-12-02  [Irrigation].Apply(25);
        1997-12-04  [Irrigation].Apply(13);
        1997-12-08  [Irrigation].Apply(21);
        1997-12-18  [Irrigation].Apply(28);
        1998-01-06  [Irrigation].Apply(26);
        1998-01-12  [Irrigation].Apply(46);
        1998-01-27  [Irrigation].Apply(25);
        1998-02-20  [Irrigation].Apply(26);
        1998-02-27  [Irrigation].Apply(55);
        1998-03-13  [Irrigation].Apply(22);
        1998-03-18  [Irrigation].Apply(39);
        1998-03-20  [Irrigation].Apply(21);
        1997-11-26  [Fertiliser].Apply(3, Fertiliser.Types.NO3N, 50);
        1998-02-20  [Fertiliser].Apply(59, Fertiliser.Types.NO3N, 50);
      Soil HRS: SoilType=HMM; Site=HRS; NearestTown=Unknown; Region=SE Queensland; NaturalVegetation=Unknown; Latitude=0; Longitude=0
        Water
          Thickness  BD    AirDry  LL15   DUL   SAT
          100        1.34  0.08    0.226  0.42  0.45
          100        1.34  0.19    0.226  0.42  0.45
          200        1.33  0.23    0.258  0.46  0.48
          200        1.38  0.26    0.27   0.46  0.47
          200        1.4   0.26    0.268  0.43  0.45
          200        1.55  0.28    0.304  0.4   0.41
          200        1.59  0.25    0.335  0.37  0.38
          200        1.63  0.28    0.33   0.33  0.37
          200        1.66  0.3     0.32   0.32  0.37
          200        1.68  0.31    0.33   0.33  0.36
          SoilCrop SorghumSoil
            LL=[0.226, 0.226, 0.258, 0.27, 0.268, 0.304, 0.335, 0.33, 0.32, 0.33]
            KL=[0.07, 0.07, 0.07, 0.07, 0.06, 0.06, 0.06, 0.05, 0.05, 0.04]
            XF=[1, 1, 1, 1, 1, 1, 1, 1, 1, 1]
        SoilWater: residueinterception=0; SummerDate=1-Nov; SummerU=1.5; SummerCona=6.5; WinterDate=1-Apr; WinterU=1.5; WinterCona=6.5; DiffusConst=40; DiffusSlope=16; Salb=0.2; CN2Bare=85; CNRed=20; CNCov=0.8; max_pond=0; Thickness=[100, 100, 200, 200, 200, 200, 200, 200, 200, 200]; SWCON=[0.3, 0.3, 0.3, 0.3, 0.3, 0.3, 0.3, 0.3, 0.3, 0.3]
        SoilNitrogen: fom_type=[default, manure, mucuna, lablab, shemp, stable]; fract_carb=[0.2, 0.3, 0.54, 0.57, 0.45, 0]; fract_cell=[0.7, 0.3, 0.37, 0.37, 0.47, 0.1]; fract_lign=[0.1, 0.4, 0.09, 0.06, 0.08, 0.9]; wfpsN2N2O_x=[22, 88]; wfpsN2N2O_y=[0.1, 1]
        SoilOrganicMatter: RootCN=50; RootWt=1000; SoilCN=12.5; EnrACoeff=7.4; EnrBCoeff=0.2; OCUnits=Total
          Thickness  OC    FBiom  FInert
          100        1.19  0.05   0.45
          100        0.59  0.02   0.6
          200        0.45  0.01   0.75
          200        0.3   0.01   0.9
          200        0.2   0.01   0.9
          200        0.16  0.01   0.9
          200        0.17  0.01   0.9
          200        0.17  0.05   0.9
          200        0.17  0.02   0.9
          200        0.17  0.01   0.9
        Analysis: Thickness=[100, 100, 200, 200, 200, 200, 200, 200, 200, 200]; PH=[6.3, 6.4, 6.5, 6.6, 6.6, 6.5, 6.5, 6.5, 6.5, 6.5]; PHUnits=Water; BoronUnits=HotWater
        Sample Initial Water: Thickness=[100, 100, 200, 200, 200, 200, 200, 200, 200, 200]; NO3Units=ppm; NH4Units=ppm; SWUnits=Volumetric; OCUnits=Total; PHUnits=Water
          SW=[0.217, 0.357, 0.375, 0.401, 0.349, 0.351, 0.359, 0.33, 0.322, 0.347]
        Sample Initial Nitrogen: NO3Units=ppm; NH4Units=ppm; SWUnits=Volumetric; OCUnits=Total; PHUnits=Water
          Thickness  NO3     NH4  PH
          100        8.421   0.1  7
          100        8.054   0.1  7
          200        7.001   0.1  7
          200        3.824   0.1  7
          200        2.759   0.1  7
          200        3.429   0.1  7
          200        8.668   0.1  7
          200        11.576  0.1  7
          200        8.816   0.1  7
          200        11.758  0.1  7
      Plant Sorghum: CropType=Sorghum
      SurfaceOrganicMatter: PoolName=wheat_stubble; type=wheat; mass=0; standing_fraction=0; cpr=0; cnr=80; CriticalResidueWeight=2000; OptimumDecompTemp=20; MaxCumulativeEOS=20; CNRatioDecompCoeff=0.277; CNRatioDecompThreshold=25; TotalLeachRain=25; MinRainToLeach=10; CriticalMinimumOrganicC=0.004; DefaultCPRatio=0; DefaultStandingFraction=0; StandingExtinctCoeff=0.5; FractionFaecesAdded=0.5
        Pools:
          {PoolName=wheat_stubble, ResidueType=wheat, Mass=0, CNRatio=80, CPRatio=0, StandingFraction=0}
        ResidueTypes ResidueTypesList: LoadFromResource=ResidueTypes
      MicroClimate: air_pressure=1010; soil_emissivity=0.96; sun_angle=15; soil_heat_flux_fraction=0.4; night_interception_fraction=0.5; windspeed_default=3; refheight=2; albedo=0.15; emissivity=0.96; gsmax=0.01; r50=200; a_interception=0; b_interception=1; c_interception=0; d_interception=0; soil_albedo=0.23
      Fertiliser
      Irrigation
      Report
        VariableNames:
          [Clock].Today
          [SorgumSowingRule].Script.DaysAfterSowing as Das
          [Sorghum].Phenology.Stage
          [Sorghum].Summariser.AboveGroundLive.Wt
          [Sorghum].Root.Live.Wt
          [Sorghum].Leaf.Live.Wt
          [Sorghum].Stem.Live.Wt
          [Sorghum].Rachis.Live.Wt
          [Sorghum].Grain.Live.Wt
          [Sorghum].Summariser.AboveGroundLive.N
          [Sorghum].Root.Live.N
          [Sorghum].Leaf.Live.N
          [Sorghum].Stem.Live.N
          [Sorghum].Rachis.Live.N
          [Sorghum].Grain.Live.N
          [Sorghum].Grain.Live.NConc
          [Sorghum].Grain.NumberFunction.Value
          [Sorghum].Grain.Size
          [Sorghum].Structure.MainStemNodeNo
          [Sorghum].Leaf.LAI
          [Sorghum].Leaf.LAIDead
          [Soil].SoilWater.ESW
          sum([Soil].SoilNitrogen.NO3) as NO3
          sum([Soil].SoilWater.SW) as sw
          [Sorghum].WaterSupplyDemandRatio
          [Sorghum].Leaf.Photosynthesis.FW.Value
        EventNames:
          [Clock].DoReport
  Simulation Sorghum_HighWaterLowN: Area=0; Slope=0
    Clock: StartDate=1997-11-18; EndDate=1998-04-15
    Summary summaryfile
    Weather: FileName=HE6.met
    Zone paddock: Area=1; Slope=0
      Report outputfile
        VariableNames:
          [Clock].Today
          DaysAfterSowing as Das
          Stage
          Biomass
          GreenWt
          Biomass units g/m^2 as BiomassWt
          RootGreenWt
          LeafGreenWt
          StemGreenWt
          RachisGreenWt
          GrainGreenWt
          BiomassN
          RootGreenN
          LeafGreenN
          StemGreenN
          RachisGreenN
          GrainGreenN
          GrainGreenNConc
          GrainNo
          GrainSize
          LeafNo
          LAI
          SLAI
          ESW
          no3() as NO3
          SLN
          WaterSD
          sw
          HI
          TPLA
          SPLA
          biomass_n
      Folder Manager folder
        Manager Sow SkipRow on a fixed date
```csharp
using System;
using Models.Core;
using Models.PMF;
using Models.PMF.OldPlant;
namespace Models
{
	[Serializable]
	[System.Xml.Serialization.XmlInclude(typeof(Model))]
	public class Script : Model
	{
		[Link] Clock Clock;
		[EventSubscribe("DoManagement")]
		private void OnDoManagement(object sender, EventArgs e)
		{
			/*
				
            if (paddock_is_fallow() = 1 and today = date('[date]')) then
              [crop] sow plants =[density], sowing_depth = [depth], cultivar = [cultivar], row_spacing = [row_spacing], skip = [RowConfiguration], tiller_no_fertile = [ftn] ()
            endif
            if (paddock_is_fallow() = 0) then
               outputfile do_output
            endif
          
			*/
		}
	}
}
```
        Manager Harvesting rule
```csharp
using System;
using Models.Core;
using Models.PMF;
using Models.PMF.OldPlant;
namespace Models
{
	[Serializable]
	[System.Xml.Serialization.XmlInclude(typeof(Model))]
	public class Script : Model
	{
		[Link] Clock Clock;
		[EventSubscribe("DoCalculations")]
		private void OnDoCalculations(object sender, EventArgs e)
		{
			/*
				

           if [crop].StageName = 'harvest_ripe' or [crop].plant_status = 'dead' then
              [crop]  harvest
              [crop]  end_crop
           endif
 
            
			*/
		}
	}
}
```
      Operations
        1997-11-28  Irrigation.Apply(16);
        1997-12-02  Irrigation.Apply(24);
        1997-12-04  Irrigation.Apply(13);
        1997-12-08  Irrigation.Apply(21);
        1997-12-18  Irrigation.Apply(28);
        1998-01-06  Irrigation.Apply(26);
        1998-01-12  Irrigation.Apply(47);
        1998-01-27  Irrigation.Apply(25);
        1998-02-20  Irrigation.Apply(20);
        1998-02-27  Irrigation.Apply(38);
        1998-03-13  Irrigation.Apply(22);
        1998-03-18  Irrigation.Apply(40);
        1997-11-26  Fertiliser.Apply(10, Fertiliser.Types.NO3N, 50);
      Soil HRS: SoilType=HMM; Site=HRS; NearestTown=Unknown; Region=SE Queensland; NaturalVegetation=Unknown; Latitude=0; Longitude=0
        Water
          Thickness  BD    AirDry  LL15   DUL   SAT
          100        1.34  0.08    0.226  0.42  0.45
          100        1.34  0.19    0.226  0.42  0.45
          200        1.33  0.23    0.258  0.46  0.48
          200        1.38  0.26    0.27   0.46  0.47
          200        1.4   0.26    0.268  0.43  0.45
          200        1.55  0.28    0.304  0.4   0.41
          200        1.59  0.25    0.335  0.37  0.38
          200        1.63  0.28    0.33   0.33  0.37
          200        1.66  0.3     0.32   0.32  0.37
          200        1.68  0.31    0.33   0.33  0.36
          SoilCrop Sorghum
            LL=[0.226, 0.226, 0.258, 0.27, 0.268, 0.304, 0.335, 0.33, 0.32, 0.33]
            KL=[0.07, 0.07, 0.07, 0.07, 0.06, 0.06, 0.06, 0.05, 0.05, 0.04]
            XF=[1, 1, 1, 1, 1, 1, 1, 1, 1, 1]
        SoilWater: same as Sorghum_HighWaterHighN.paddock.HRS.SoilWater
        SoilNitrogen: fom_type=[default, manure, mucuna, lablab, shemp, stable]; fract_carb=[0.2, 0.3, 0.54, 0.57, 0.45, 0]; fract_cell=[0.7, 0.3, 0.37, 0.37, 0.47, 0.1]; fract_lign=[0.1, 0.4, 0.09, 0.06, 0.08, 0.9]; wfpsN2N2O_x=[22, 88]; wfpsN2N2O_y=[0.1, 1]
        SoilOrganicMatter: same as Sorghum_HighWaterHighN.paddock.HRS.SoilOrganicMatter
        Analysis: Thickness=[100, 100, 200, 200, 200, 200, 200, 200, 200, 200]; PH=[6.3, 6.4, 6.5, 6.6, 6.6, 6.5, 6.5, 6.5, 6.5, 6.5]; PHUnits=Water; BoronUnits=HotWater
        Sample Initial Water: Thickness=[100, 100, 200, 200, 200, 200, 200, 200, 200, 200]; NO3Units=ppm; NH4Units=ppm; SWUnits=Volumetric; OCUnits=Total; PHUnits=Water
          SW=[0.217, 0.357, 0.375, 0.401, 0.349, 0.351, 0.359, 0.33, 0.322, 0.347]
        Sample Initial Nitrogen: NO3Units=ppm; NH4Units=ppm; SWUnits=Volumetric; OCUnits=Total; PHUnits=Water
          Thickness  NO3    NH4
          100        1.493  0.1
          100        1.633  0.1
          200        1.233  0.1
          200        0.9    0.1
          200        1.1    0.1
          200        1.467  0.1
          200        2.516  0.1
          200        3.067  0.1
          200        3.012  0.1
          200        2.976  0.1
      Plant Sorghum: CropType=Sorghum
      SurfaceOrganicMatter: same as Sorghum_HighWaterHighN.paddock.SurfaceOrganicMatter
      MicroClimate: same as Sorghum_HighWaterHighN.paddock.MicroClimate
  Simulation Sorghum_LowWaterHighN: Area=0; Slope=0
    Clock: StartDate=1997-11-25; EndDate=1998-04-15
    Summary summaryfile
    Weather: FileName=HE7.met
    Zone paddock: Area=1; Slope=0
      Report outputfile: same as Sorghum_HighWaterLowN.paddock.outputfile
      Folder Manager folder: same as Sorghum_HighWaterLowN.paddock.Manager folder
      Operations
        1997-11-28  Irrigation.Apply(65);
        1997-12-16  Irrigation.Apply(90);
        1997-11-26  Fertiliser.Apply(3, Fertiliser.Types.NO3N, 50);
        1997-11-26  Fertiliser.Apply(119, Fertiliser.Types.NO3N, 50);
      Soil HRS: SoilType=HMM; Site=HRS; NearestTown=Unknown; Region=SE Queensland; NaturalVegetation=Unknown; Latitude=0; Longitude=0
        Water
          Thickness  BD    AirDry  LL15   DUL   SAT
          100        1.34  0.08    0.226  0.42  0.45
          100        1.34  0.19    0.226  0.42  0.45
          200        1.33  0.23    0.258  0.46  0.48
          200        1.38  0.26    0.27   0.46  0.47
          200        1.4   0.26    0.268  0.43  0.45
          200        1.55  0.28    0.304  0.4   0.41
          200        1.59  0.32    0.335  0.37  0.38
          200        1.63  0.32    0.33   0.33  0.37
          200        1.66  0.32    0.32   0.32  0.37
          200        1.68  0.33    0.33   0.33  0.36
          SoilCrop Sorghum
            LL=[0.226, 0.226, 0.258, 0.27, 0.268, 0.304, 0.335, 0.33, 0.32, 0.33]
            KL=[0.07, 0.07, 0.07, 0.07, 0.06, 0.06, 0.06, 0.05, 0.05, 0.04]
            XF=[1, 1, 1, 1, 1, 1, 1, 1, 1, 1]
        SoilWater: same as Sorghum_HighWaterHighN.paddock.HRS.SoilWater
        SoilNitrogen: fom_type=[default, manure, mucuna, lablab, shemp, stable]; fract_carb=[0.2, 0.3, 0.54, 0.57, 0.45, 0]; fract_cell=[0.7, 0.3, 0.37, 0.37, 0.47, 0.1]; fract_lign=[0.1, 0.4, 0.09, 0.06, 0.08, 0.9]; wfpsN2N2O_x=[22, 88]; wfpsN2N2O_y=[0.1, 1]
        SoilOrganicMatter: same as Sorghum_HighWaterHighN.paddock.HRS.SoilOrganicMatter
        Analysis: Thickness=[100, 100, 200, 200, 200, 200, 200, 200, 200, 200]; PH=[6.3, 6.4, 6.5, 6.6, 6.6, 6.5, 6.5, 6.5, 6.5, 6.5]; PHUnits=Water; BoronUnits=HotWater
        Sample Initial nitrogen: NO3Units=ppm; NH4Units=ppm; SWUnits=Volumetric; OCUnits=Total; PHUnits=Water
          Thickness  NO3     NH4
          100        25.798  0.1
          100        6.921   0.1
          200        9.285   0.1
          200        2.823   0.1
          200        2.286   0.1
          200        3.196   0.1
          200        3.695   0.1
          200        4.41    0.1
          200        2.743   0.1
          200        4.891   0.1
        Sample Initial water: Thickness=[100, 100, 200, 200, 200, 200, 200, 200, 200, 200]; NO3Units=ppm; NH4Units=ppm; SWUnits=Volumetric; OCUnits=Total; PHUnits=Water
          SW=[0.307, 0.326, 0.444, 0.429, 0.363, 0.351, 0.336, 0.343, 0.352, 0.347]
      Plant Sorghum: CropType=Sorghum
      SurfaceOrganicMatter: same as Sorghum_HighWaterHighN.paddock.SurfaceOrganicMatter
      MicroClimate: same as Sorghum_HighWaterHighN.paddock.MicroClimate
  Simulation Sorghum_LowWaterLowN: Area=0; Slope=0
    Clock: StartDate=1997-11-25; EndDate=1998-04-15
    Summary summaryfile
    Weather: FileName=HE8.met
    Zone paddock: Area=1; Slope=0
      Report outputfile: same as Sorghum_HighWaterLowN.paddock.outputfile
      Folder Manager folder
        Manager Sow SkipRow on a fixed date: same as Sorghum_HighWaterLowN.paddock.Manager folder.Sow SkipRow on a fixed date
        Manager Harvesting rule
          script: same as in Sorghum_HighWaterLowN.paddock.Manager folder.Harvesting rule
      Operations
        1997-11-28  Irrigation.Apply(65);
        1997-12-16  Irrigation.Apply(90);
        1997-11-26  Fertiliser.Apply(3, Fertiliser.Types.NO3N, 50);
        1997-11-26  Fertiliser.Apply(10, Fertiliser.Types.NO3N, 50);
      Soil HRS: SoilType=HMM; Site=HRS; NearestTown=Unknown; Region=SE Queensland; NaturalVegetation=Unknown; Latitude=0; Longitude=0
        Water: same as Sorghum_LowWaterHighN.paddock.HRS.Water
        SoilWater: same as Sorghum_HighWaterHighN.paddock.HRS.SoilWater
        SoilNitrogen: fom_type=[default, manure, mucuna, lablab, shemp, stable]; fract_carb=[0.2, 0.3, 0.54, 0.57, 0.45, 0]; fract_cell=[0.7, 0.3, 0.37, 0.37, 0.47, 0.1]; fract_lign=[0.1, 0.4, 0.09, 0.06, 0.08, 0.9]; wfpsN2N2O_x=[22, 88]; wfpsN2N2O_y=[0.1, 1]
        SoilOrganicMatter: same as Sorghum_HighWaterHighN.paddock.HRS.SoilOrganicMatter
        Analysis: Thickness=[100, 100, 200, 200, 200, 200, 200, 200, 200, 200]; PH=[6.3, 6.4, 6.5, 6.6, 6.6, 6.5, 6.5, 6.5, 6.5, 6.5]; PHUnits=Water; BoronUnits=HotWater
        Sample Initial nitrogen: same as Sorghum_LowWaterHighN.paddock.HRS.Initial nitrogen
        Sample Initial water: Thickness=[100, 100, 200, 200, 200, 200, 200, 200, 200, 200]; NO3Units=ppm; NH4Units=ppm; SWUnits=Volumetric; OCUnits=Total; PHUnits=Water
          SW=[0.294, 0.381, 0.367, 0.306, 0.29, 0.319, 0.33, 0.343, 0.337, 0.344]
      Plant Sorghum: CropType=Sorghum
      SurfaceOrganicMatter: same as Sorghum_HighWaterHighN.paddock.SurfaceOrganicMatter
      MicroClimate: same as Sorghum_HighWaterHighN.paddock.MicroClimate
  DataStore
  Experiment Sorghum
    Factors
      Factor Treatment
        Factor HighWaterHighN: Specifications=[operations]
          Operations: same as Sorghum_HighWaterHighN.paddock.operations
          Sample Initial Water: Thickness=[100, 100, 200, 200, 200, 200, 200, 200, 200, 200]; NO3Units=ppm; NH4Units=ppm; SWUnits=Volumetric; OCUnits=Total; PHUnits=Water
            SW=[0.217, 0.357, 0.375, 0.401, 0.349, 0.351, 0.359, 0.33, 0.322, 0.347]
          Sample Initial Nitrogen: same as Sorghum_HighWaterHighN.paddock.HRS.Initial Nitrogen
        Factor HighWaterLowN: Specifications=[operations]
          Operations
            1997-11-28  [Irrigation].Apply(16);
            1997-12-02  [Irrigation].Apply(24);
            1997-12-04  [Irrigation].Apply(13);
            1997-12-08  [Irrigation].Apply(21);
            1997-12-18  [Irrigation].Apply(28);
            1998-01-06  [Irrigation].Apply(26);
            1998-01-12  [Irrigation].Apply(47);
            1998-01-27  [Irrigation].Apply(25);
            1998-02-20  [Irrigation].Apply(20);
            1998-02-27  [Irrigation].Apply(38);
            1998-03-13  [Irrigation].Apply(22);
            1998-03-18  [Irrigation].Apply(40);
            1997-11-26  [Fertiliser].Apply(10, Fertiliser.Types.NO3N, 50);
          Sample Initial Water: Thickness=[100, 100, 200, 200, 200, 200, 200, 200, 200, 200]; NO3Units=ppm; NH4Units=ppm; SWUnits=Volumetric; OCUnits=Total; PHUnits=Water
            SW=[0.217, 0.357, 0.375, 0.401, 0.349, 0.351, 0.359, 0.33, 0.322, 0.347]
          Sample Initial Nitrogen: same as Sorghum_HighWaterLowN.paddock.HRS.Initial Nitrogen
        Factor LowWaterHighN: Specifications=[operations]
          Operations
            1997-11-28  [Irrigation].Apply(65);
            1997-12-16  [Irrigation].Apply(90);
            1997-11-26  [Fertiliser].Apply(3, Fertiliser.Types.NO3N, 50);
            1997-11-26  [Fertiliser].Apply(119, Fertiliser.Types.NO3N, 50);
          Sample Initial Nitrogen: same as Sorghum_LowWaterHighN.paddock.HRS.Initial nitrogen
          Sample Initial Water: Thickness=[100, 100, 200, 200, 200, 200, 200, 200, 200, 200]; NO3Units=ppm; NH4Units=ppm; SWUnits=Volumetric; OCUnits=Total; PHUnits=Water
            SW=[0.307, 0.326, 0.444, 0.429, 0.363, 0.351, 0.336, 0.343, 0.352, 0.347]
        Factor LowWaterLowN: Specifications=[operations]
          Operations
            1997-11-28  [Irrigation].Apply(65);
            1997-12-16  [Irrigation].Apply(90);
            1997-11-26  [Fertiliser].Apply(3, Fertiliser.Types.NO3N, 50);
            1997-11-26  [Fertiliser].Apply(10, Fertiliser.Types.NO3N, 50);
          Sample Initial Nitrogen: same as Sorghum_LowWaterHighN.paddock.HRS.Initial nitrogen
          Sample Initial Water: Thickness=[100, 100, 200, 200, 200, 200, 200, 200, 200, 200]; NO3Units=ppm; NH4Units=ppm; SWUnits=Volumetric; OCUnits=Total; PHUnits=Water
            SW=[0.294, 0.381, 0.367, 0.306, 0.29, 0.319, 0.33, 0.343, 0.337, 0.344]
    Simulation SorghumBase: same as Sorghum_HighWaterHighN
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