Simulations
  Simulation SugarCane: Area=0; Slope=0
    Weather: FileName=%root%\Tests\SugarCane\Example\Ingham.met
    Clock: StartDate=1990-01-01; EndDate=2000-12-31
    Summary summaryfile
    Zone Field: Area=1; Slope=0
      SurfaceOrganicMatter: PoolName=wheat_stubble; type=wheat; mass=0; standing_fraction=0; cpr=0; cnr=80; CriticalResidueWeight=2000; OptimumDecompTemp=20; MaxCumulativeEOS=20; CNRatioDecompCoeff=0.277; CNRatioDecompThreshold=25; TotalLeachRain=25; MinRainToLeach=10; CriticalMinimumOrganicC=0.004; DefaultCPRatio=0; DefaultStandingFraction=0; StandingExtinctCoeff=0.5; FractionFaecesAdded=0.5
        Pools:
          {PoolName=wheat_stubble, ResidueType=wheat, Mass=0, CNRatio=80, CPRatio=0, StandingFraction=0}
        ResidueTypes ResidueTypesList: LoadFromResource=ResidueTypes
      Soil: SoilType=Black Vertosol; Site=Jimbour; NearestTown=Jimbour, Q 4352; Region=South East Queensland; NaturalVegetation=Grassland, mainly Qld bluegrass; Latitude=0; Longitude=0
        InitialWater Initial water: PercentMethod=FilledFromTop; FractionFull=0
        Water
          Thickness  BD    AirDry  LL15  DUL   SAT
          150        1.02  0.14    0.29  0.54  0.59
          150        1.03  0.26    0.29  0.53  0.58
          300        1.02  0.29    0.29  0.54  0.59
          300        1.02  0.29    0.29  0.54  0.58
          300        1.06  0.3     0.3   0.52  0.57
          300        1.11  0.31    0.31  0.5   0.55
          300        1.12  0.32    0.32  0.5   0.55
          300        1.15  0.33    0.33  0.48  0.53
          300        1.18  0.34    0.34  0.47  0.52
          300        1.2   0.35    0.35  0.46  0.51
          300        1.25  0.36    0.36  0.44  0.49
          SoilCrop Barley
            LL=[0.29, 0.29, 0.32, 0.38, 0.39, 0.39, 0.41, 0.48, 0.47, 0.46, 0.44]
            KL=[0.1, 0.1, 0.08, 0.06, 0.04, 0.02, 0.01, 0, 0, 0, 0]
            XF=[1, 1, 1, 1, 1, 1, 1, 0, 0, 0, 0]
          SoilCrop Chickpea
            LL=[0.29, 0.29, 0.36, 0.43, 0.51, 0.5, 0.5, 0.48, 0.47, 0.46, 0.44]
            KL=[0.1, 0.1, 0.08, 0.06, 0.04, 0.02, 0.01, 0, 0, 0, 0]
            XF=[1, 1, 1, 1, 1, 1, 1, 0, 0, 0, 0]
          SoilCrop Lucerne
            LL=[0.29, 0.29, 0.29, 0.29, 0.3, 0.31, 0.32, 0.33, 0.34, 0.35, 0.36]
            KL=[0.1, 0.1, 0.1, 0.1, 0.09, 0.09, 0.09, 0.09, 0.09, 0.09, 0.09]
            XF=[1, 1, 1, 1, 1, 1, 1, 1, 1, 1, 1]
          SoilCrop Maize
            LL=[0.29, 0.29, 0.34, 0.34, 0.37, 0.4, 0.42, 0.48, 0.47, 0.46, 0.44]
            KL=[0.1, 0.1, 0.1, 0.08, 0.06, 0.04, 0.02, 0, 0, 0, 0]
            XF=[1, 1, 1, 1, 1, 1, 1, 0, 0, 0, 0]
          SoilCrop Perennial Grass
            LL=[0.29, 0.29, 0.39, 0.41, 0.4, 0.4, 0.41, 0.41, 0.4, 0.4, 0.42]
            KL=[0.1, 0.1, 0.1, 0.1, 0.09, 0.07, 0.05, 0, 0, 0, 0]
            XF=[1, 1, 1, 1, 1, 1, 1, 0, 0, 0, 0]
          SoilCrop Sorghum
            LL=[0.29, 0.29, 0.35, 0.38, 0.4, 0.4, 0.4, 0.48, 0.47, 0.46, 0.44]
            KL=[0.1, 0.1, 0.1, 0.08, 0.06, 0.04, 0.02, 0, 0, 0, 0]
            XF=[1, 1, 1, 1, 1, 1, 1, 0, 0, 0, 0]
          SoilCrop Wheat
            LL=[0.29, 0.29, 0.32, 0.32, 0.35, 0.38, 0.41, 0.48, 0.47, 0.46, 0.44]
            KL=[0.1, 0.1, 0.08, 0.06, 0.04, 0.02, 0.01, 0, 0, 0, 0]
            XF=[1, 1, 1, 1, 1, 1, 1, 0, 0, 0, 0]
          SoilCrop SugarCaneSoil
            LL=[0.29, 0.29, 0.32, 0.32, 0.35, 0.38, 0.41, 0.48, 0.47, 0.46, 0.44]
            KL=[0.1, 0.1, 0.08, 0.06, 0.04, 0.02, 0.01, 0, 0, 0, 0]
            XF=[1, 1, 1, 1, 1, 1, 1, 0, 0, 0, 0]
        SoilWater: residueinterception=0; SummerDate=1-Nov; SummerU=6; SummerCona=3.5; WinterDate=1-Apr; WinterU=6; WinterCona=3.5; DiffusConst=40; DiffusSlope=16; Salb=0.13; CN2Bare=73; CNRed=20; CNCov=0.8; slope=0; discharge_width=0; catchment_area=0; max_pond=0; Thickness=[150, 150, 300, 300, 300, 300, 300, 300, 300, 300, 300]; SWCON=[0.3, 0.3, 0.3, 0.3, 0.3, 0.3, 0.3, 0.3, 0.3, 0.3, 0.3]
        SoilNitrogen: fom_type=[default, manure, mucuna, lablab, shemp, stable]; fract_carb=[0.2, 0.3, 0.54, 0.57, 0.45, 0]; fract_cell=[0.7, 0.3, 0.37, 0.37, 0.47, 0.1]; fract_lign=[0.1, 0.4, 0.09, 0.06, 0.08, 0.9]; wfpsN2N2O_x=[22, 88]; wfpsN2N2O_y=[0.1, 1]
        SoilOrganicMatter: RootCN=40; RootWt=200; SoilCN=12.5; EnrACoeff=7.4; EnrBCoeff=0.2; OCUnits=Total
          Thickness  OC    FBiom  FInert
          150        1.04  0.025  0.4
          150        0.89  0.02   0.6
          300        0.89  0.015  0.8
          300        0.89  0.01   0.9
          300        0.77  0.01   0.95
          300        0.45  0.01   0.95
          300        0.27  0.01   0.95
          300        0.22  0.01   0.95
          300        0.16  0.01   0.95
          300        0.13  0.01   0.95
          300        0.12  0.01   0.95
        Analysis: Thickness=[150, 150, 300, 300, 300, 300, 300, 300, 300, 300, 300]; PH=[8.4, 8.8, 9, 9.2, 9.2, 9.1, 9, 9, 8.9, 8.9, 8.9]; PHUnits=Water; BoronUnits=HotWater
        Sample Initial nitrogen: NO3Units=ppm; NH4Units=ppm; SWUnits=Volumetric; OCUnits=Total; PHUnits=Water
          Thickness  NO3  NH4  SW
          150        6.5  0.6  81
          150        2.1  0.1  79.4999
          300        2.1  0.1  162
          300        1.7  0.1  162
          300        1.7  0.1  137.39999
          300        1.7  0.1  93
          300        1.7  0.1  96
          300        1.7  0.1  99
          300        1.7  0.1  102
          300        1.7  0.1  105
          300        1.7  0.1  108
      Fertiliser
      SugarCane: crop_type=SugarCane; tt_emerg_to_begcane_ub=2000; tt_begcane_to_flowering_ub=10000; tt_flowering_to_crop_end_ub=5000; n_uptake_option=1; NO3_diffn_const=2; n_supply_preference=active; kno3=0.05; knh4=0.05; total_n_uptake_max=0.6; ll_ub=1000; kl_ub=1; minsw=1E-05; latitude_ub=90; latitude_lb=-90; maxt_ub=55; mint_ub=40; mint_lb=-10; radn_ub=50; radn_lb=1; dlayer_ub=1000; dul_dep_ub=1000; sw_dep_ub=1000; NO3_ub=10000; NO3_min_ub=10000; NH4_ub=10000; NH4_min_ub=10000; eo_crop_factor=100; uptake_source=calc; rlv_init=[0.04, 0.02, 0.01, 0.005, 0, 0, 0]
        zero: maxt_lb, no3ppm_min, nh4ppm_min, dlayer_lb, dul_dep_lb, sw_dep_lb, NO3_lb, NO3_min_lb, NH4_lb, NH4_min_lb
        plant={stage_names=[sowing, sprouting, emergence, begin_cane, flowering, end_crop], stage_code_list=[1, 2, 3, 4, 5, 6], rue=[0, 0, 1.8, 1.8, 1.8, 0], root_depth_rate=[0, 0, 10, 15, 15, 15], ratio_root_shoot=[0, 0, 0.2, 0.15, 0.1, 0], transp_eff_cf=[0.008, 0.008, 0.008, 0.008, 0.008, 0.008], n_fix_rate=[0, 0, 0, 0, 0, 0], extinction_coef=0.38, extinction_coef_dead=0.01, leaf_no_crit=99, tt_emerg_limit=800, days_germ_limit=40, swdf_pheno_limit=500, swdf_photo_limit=500, swdf_photo_rate=0, initial_root_depth=150, specific_root_length=18000, x_plant_rld=[0, 0.1], y_rel_root_rate=[1, 1], root_die_back_fr=0.17, initial_tpla=1000, sla_lfno=[6, 25], sla_max=[11500, 11500], sla_min=[9000, 8500], x_stem_wt=[0, 200], y_height=[0, 6000], svp_fract=0.75, eo_crop_factor_default=100, pesw_germ=0.05, fasw_emerg=[0, 0.7], rel_emerg_rate=[0.3, 1], leaf_no_at_emerg=1, shoot_lag=250, shoot_rate=0.8, x_node_no_app=[1, 20, 30, 40], y_node_app_rate=[80, 105, 125, 150], x_node_no_leaf=[1, 20, 30, 40], y_leaves_per_node=[1, 1, 1, 1], dm_root_init=0.2, dm_sstem_init=0.01, dm_leaf_init=0.2, dm_cabbage_init=0.143, dm_sucrose_init=0, leaf_cabbage_ratio=1.7, cabbage_sheath_fr=0.2, dm_root_sen_frac=0.002, dead_detach_frac=[0.1, 0.1, 0.05, 0.1, 0], sen_detach_frac=[1, 0.01, 0, 0.01, 0], leaf_no_correction=1.6, lai_sen_light=4.99, sen_light_slope=0.001, frost_temp=[-5, 0, 2], frost_fraction=[1, 0.1, 0], sen_rate_water=0.01, twilight=-6, x_stage_code=[1, 2, 3, 4, 5], y_n_conc_crit_leaf=[0.025, 0.025, 0.015, 0.015, 0.005], y_n_conc_min_leaf=[0.015, 0.015, 0.005, 0.005, 0.004], y_n_conc_crit_cane=[0.009, 0.009, 0.009, 0.006, 0.0035], y_n_conc_min_cane=[0.002, 0.002, 0.0005, 0.0005, 0.0005], y_n_conc_crit_cabbage=[0.019, 0.019, 0.006, 0.006, 0.001], y_n_conc_min_cabbage=[0.01, 0.01, 0.003, 0.003, 0.0008], n_conc_crit_root=0.01, n_conc_min_root=0.005, n_root_init_conc=0.01, n_sstem_init_conc=0.007, n_leaf_init_conc=0.03, n_cabbage_init_conc=0.02, n_root_sen_conc=0.005, n_leaf_sen_conc=0.004, n_cabbage_sen_conc=0.0008, x_ave_temp=[0, 5, 15, 35, 50], y_stress_photo=[0, 0, 1, 1, 0], x_ave_temp_stalk=[0, 50], y_stress_stalk=[1, 1], x_temp=[9, 32, 45], y_tt=[0, 23, 0], x_sw_demand_ratio=[0.1, 0.6], y_swdef_leaf=[0, 1], x_demand_ratio_stalk=[0.3, 1.5], y_swdef_stalk=[0, 1], x_sw_avail_ratio=[0, 0.16], y_swdef_pheno=[1, 1], x_sw_ratio=[0, 0.25], y_sw_fac_root=[0, 1], k_nfact_photo=1.5, k_nfact_expansion=1.25, k_nfact_stalk=1, k_nfact_pheno=100, oxdef_photo_rtfr=[0.5, 0.8], oxdef_photo=[1, 1], x_afps=[0.03, 0.05], y_afps_fac=[1, 1], cane_dmf_max=[0.11, 0.17, 0.23], cane_dmf_min=[0.09, 0.13, 0.2], cane_dmf_tt=[0, 500, 4500], cane_dmf_rate=0, stress_lodge=[0, 1], death_fr_lodge=[0.002, 0.001], lodge_redn_photo=0.92, lodge_redn_sucrose=0.77, lodge_redn_green_leaf=0.85}
        ratoon={stage_names=[sowing, sprouting, emergence, begin_cane, flowering, end_crop], stage_code_list=[1, 2, 3, 4, 5, 6], rue=[0, 0, 1.65, 1.65, 1.65, 0], root_depth_rate=[0, 0, 10, 15, 15, 15], ratio_root_shoot=[0, 0, 0.2, 0.15, 0.1, 0], transp_eff_cf=[0.008, 0.008, 0.008, 0.008, 0.008, 0.008], n_fix_rate=[0, 0, 0, 0, 0, 0], extinction_coef=0.38, extinction_coef_dead=0.01, leaf_no_crit=99, tt_emerg_limit=800, days_germ_limit=40, swdf_pheno_limit=500, swdf_photo_limit=500, swdf_photo_rate=0, initial_root_depth=150, specific_root_length=18000, x_plant_rld=[0, 0.1], y_rel_root_rate=[1, 1], root_die_back_fr=0.17, initial_tpla=1000, sla_lfno=[6, 25], sla_max=[11500, 11500], sla_min=[9000, 8500], x_stem_wt=[0, 200], y_height=[0, 6000], svp_fract=0.75, eo_crop_factor_default=100, pesw_germ=0.03, fasw_emerg=[0, 0.7], rel_emerg_rate=[0.3, 1], leaf_no_at_emerg=1, shoot_lag=100, shoot_rate=0.8, x_node_no_app=[1, 20, 30, 40], y_node_app_rate=[80, 105, 125, 150], x_node_no_leaf=[1, 20, 30, 40], y_leaves_per_node=[1, 1, 1, 1], dm_root_init=0.2, dm_sstem_init=0.01, dm_leaf_init=0.2, dm_cabbage_init=0.143, dm_sucrose_init=0, leaf_cabbage_ratio=1.7, cabbage_sheath_fr=0.2, dm_root_sen_frac=0.002, dead_detach_frac=[0.1, 0.1, 0.05, 0.1, 0], sen_detach_frac=[1, 0.01, 0, 0.01, 0], leaf_no_correction=1.6, lai_sen_light=4.99, sen_light_slope=0.001, frost_temp=[-5, 0, 2], frost_fraction=[1, 0.1, 0], sen_rate_water=0.01, twilight=-6, x_stage_code=[1, 2, 3, 4, 5], y_n_conc_crit_leaf=[0.025, 0.025, 0.015, 0.015, 0.005], y_n_conc_min_leaf=[0.015, 0.015, 0.005, 0.005, 0.004], y_n_conc_crit_cane=[0.009, 0.009, 0.009, 0.006, 0.0035], y_n_conc_min_cane=[0.002, 0.002, 0.0005, 0.0005, 0.0005], y_n_conc_crit_cabbage=[0.019, 0.019, 0.006, 0.006, 0.001], y_n_conc_min_cabbage=[0.01, 0.01, 0.003, 0.003, 0.0008], n_conc_crit_root=0.01, n_conc_min_root=0.005, n_root_init_conc=0.01, n_sstem_init_conc=0.007, n_leaf_init_conc=0.03, n_cabbage_init_conc=0.02, n_root_sen_conc=0.005, n_leaf_sen_conc=0.004, n_cabbage_sen_conc=0.0008, x_ave_temp=[0, 5, 15, 35, 50], y_stress_photo=[0, 0, 1, 1, 0], x_ave_temp_stalk=[0, 50], y_stress_stalk=[1, 1], x_temp=[9, 32, 45], y_tt=[0, 23, 0], x_sw_demand_ratio=[0.1, 0.6], y_swdef_leaf=[0, 1], x_demand_ratio_stalk=[0.3, 1.5], y_swdef_stalk=[0, 1], x_sw_avail_ratio=[0, 0.16], y_swdef_pheno=[1, 1], x_sw_ratio=[0, 0.25], y_sw_fac_root=[0, 1], k_nfact_photo=1.5, k_nfact_expansion=1.25, k_nfact_stalk=1, k_nfact_pheno=100, oxdef_photo_rtfr=[0.5, 0.8], oxdef_photo=[1, 1], x_afps=[0.03, 0.05], y_afps_fac=[1, 1], cane_dmf_max=[0.11, 0.17, 0.23], cane_dmf_min=[0.09, 0.13, 0.2], cane_dmf_tt=[0, 500, 4500], cane_dmf_rate=0, stress_lodge=[0, 1], death_fr_lodge=[0.002, 0.001], lodge_redn_photo=0.92, lodge_redn_sucrose=0.77, lodge_redn_green_leaf=0.85}
        cultivars:
          {cultivar_name=q117, leaf_size=[1500, 55000, 55000], leaf_size_no=[1, 14, 20], cane_fraction=0.7, sucrose_fraction_stalk=[1, 0.55], stress_factor_stalk=[0.2, 1], sucrose_delay=0, min_sstem_sucrose=800, min_sstem_sucrose_redn=10, tt_emerg_to_begcane=1900, tt_begcane_to_flowering=6000, tt_flowering_to_crop_end=2000, green_leaf_no=13, tillerf_leaf_size=[1, 1.5, 1.5, 1, 1], tillerf_leaf_size_no=[1, 6, 10, 12, 26]}
          {cultivar_name=q117_ratoon, leaf_size=[1500, 55000, 55000], leaf_size_no=[1, 14, 20], cane_fraction=0.7, sucrose_fraction_stalk=[1, 0.55], stress_factor_stalk=[0.2, 1], sucrose_delay=0, min_sstem_sucrose=800, min_sstem_sucrose_redn=10, tt_emerg_to_begcane=1900, tt_begcane_to_flowering=6000, tt_flowering_to_crop_end=2000, green_leaf_no=13, tillerf_leaf_size=[1.5, 1.5, 1.5, 1, 1], tillerf_leaf_size_no=[1, 4, 10, 12, 26]}
          {cultivar_name=q117_fum, leaf_size=[1500, 55000, 55000], leaf_size_no=[1, 14, 20], cane_fraction=0.7, sucrose_fraction_stalk=[1, 0.55], stress_factor_stalk=[0.2, 1], sucrose_delay=0, min_sstem_sucrose=800, min_sstem_sucrose_redn=10, tt_emerg_to_begcane=1900, tt_begcane_to_flowering=6000, tt_flowering_to_crop_end=2000, green_leaf_no=13, tillerf_leaf_size=[1.5, 3, 2.5, 1, 1], tillerf_leaf_size_no=[1, 4, 10, 12, 26]}
          {cultivar_name=q117_fum_ratoon, leaf_size=[1500, 55000, 55000], leaf_size_no=[1, 14, 20], cane_fraction=0.7, sucrose_fraction_stalk=[1, 0.55], stress_factor_stalk=[0.2, 1], sucrose_delay=0, min_sstem_sucrose=800, min_sstem_sucrose_redn=10, tt_emerg_to_begcane=1900, tt_begcane_to_flowering=6000, tt_flowering_to_crop_end=2000, green_leaf_no=13, tillerf_leaf_size=[2, 3, 2, 1, 1], tillerf_leaf_size_no=[1, 4, 10, 12, 26]}
          {cultivar_name=q96, leaf_size=[1500, 55000, 55000], leaf_size_no=[1, 14, 20], cane_fraction=0.7, sucrose_fraction_stalk=[1, 0.55], stress_factor_stalk=[0.2, 1], sucrose_delay=0, min_sstem_sucrose=900, min_sstem_sucrose_redn=10, tt_emerg_to_begcane=1900, tt_begcane_to_flowering=6000, tt_flowering_to_crop_end=2000, green_leaf_no=13, tillerf_leaf_size=[1, 1, 1.5, 1, 1], tillerf_leaf_size_no=[1, 4, 10, 16, 26]}
          {cultivar_name=q96_ratoon, leaf_size=[1500, 55000, 55000], leaf_size_no=[1, 14, 20], cane_fraction=0.7, sucrose_fraction_stalk=[1, 0.55], stress_factor_stalk=[0.2, 1], sucrose_delay=0, min_sstem_sucrose=900, min_sstem_sucrose_redn=10, tt_emerg_to_begcane=1900, tt_begcane_to_flowering=6000, tt_flowering_to_crop_end=2000, green_leaf_no=13, tillerf_leaf_size=[1.5, 1.5, 1.5, 1, 1], tillerf_leaf_size_no=[1, 4, 10, 16, 26]}
          {cultivar_name=q96_fum, leaf_size=[1500, 55000, 55000], leaf_size_no=[1, 14, 20], cane_fraction=0.7, sucrose_fraction_stalk=[1, 0.55], stress_factor_stalk=[0.2, 1], sucrose_delay=0, min_sstem_sucrose=900, min_sstem_sucrose_redn=10, tt_emerg_to_begcane=1900, tt_begcane_to_flowering=6000, tt_flowering_to_crop_end=2000, green_leaf_no=13, tillerf_leaf_size=[1, 1, 1.5, 1, 1], tillerf_leaf_size_no=[1, 4, 10, 16, 26]}
          {cultivar_name=q96_fum_ratoon, leaf_size=[1500, 55000, 55000], leaf_size_no=[1, 14, 20], cane_fraction=0.7, sucrose_fraction_stalk=[1, 0.55], stress_factor_stalk=[0.2, 1], sucrose_delay=0, min_sstem_sucrose=900, min_sstem_sucrose_redn=10, tt_emerg_to_begcane=1900, tt_begcane_to_flowering=6000, tt_flowering_to_crop_end=2000, green_leaf_no=13, tillerf_leaf_size=[1.5, 1.5, 1.5, 1, 1], tillerf_leaf_size_no=[1, 4, 10, 16, 26]}
          {cultivar_name=q138, leaf_size=[1500, 55000, 55000], leaf_size_no=[1, 14, 20], cane_fraction=0.7, sucrose_fraction_stalk=[1, 0.61], stress_factor_stalk=[0.2, 1], sucrose_delay=600, min_sstem_sucrose=1500, min_sstem_sucrose_redn=10, tt_emerg_to_begcane=1900, tt_begcane_to_flowering=6000, tt_flowering_to_crop_end=2000, green_leaf_no=13, tillerf_leaf_size=[1, 1, 1.5, 1, 1], tillerf_leaf_size_no=[1, 4, 10, 16, 26]}
          {cultivar_name=q138_ratoon, leaf_size=[1500, 55000, 55000], leaf_size_no=[1, 14, 20], cane_fraction=0.7, sucrose_fraction_stalk=[1, 0.61], stress_factor_stalk=[0.2, 1], sucrose_delay=0, min_sstem_sucrose=1500, min_sstem_sucrose_redn=10, tt_emerg_to_begcane=1900, tt_begcane_to_flowering=6000, tt_flowering_to_crop_end=2000, green_leaf_no=13, tillerf_leaf_size=[1.5, 1.5, 1.5, 1, 1], tillerf_leaf_size_no=[1, 4, 10, 16, 26]}
          {cultivar_name=q138_fum, leaf_size=[1500, 55000, 55000], leaf_size_no=[1, 14, 20], cane_fraction=0.7, sucrose_fraction_stalk=[1, 0.61], stress_factor_stalk=[0.2, 1], sucrose_delay=600, min_sstem_sucrose=1500, min_sstem_sucrose_redn=10, tt_emerg_to_begcane=1900, tt_begcane_to_flowering=6000, tt_flowering_to_crop_end=2000, green_leaf_no=13, tillerf_leaf_size=[1, 1, 1.5, 1, 1], tillerf_leaf_size_no=[1, 4, 10, 16, 26]}
          {cultivar_name=q138_fum_ratoon, leaf_size=[1500, 55000, 55000], leaf_size_no=[1, 14, 20], cane_fraction=0.7, sucrose_fraction_stalk=[1, 0.61], stress_factor_stalk=[0.2, 1], sucrose_delay=0, min_sstem_sucrose=1500, min_sstem_sucrose_redn=10, tt_emerg_to_begcane=1900, tt_begcane_to_flowering=6000, tt_flowering_to_crop_end=2000, green_leaf_no=13, tillerf_leaf_size=[1.5, 1.5, 1.5, 1, 1], tillerf_leaf_size_no=[1, 4, 10, 16, 26]}
          {cultivar_name=ts65-28, leaf_size=[1500, 55000, 55000], leaf_size_no=[1, 14, 20], cane_fraction=0.7, sucrose_fraction_stalk=[1, 0.55], stress_factor_stalk=[0.2, 1], sucrose_delay=0, min_sstem_sucrose=800, min_sstem_sucrose_redn=10, tt_emerg_to_begcane=1900, tt_begcane_to_flowering=6000, tt_flowering_to_crop_end=2000, green_leaf_no=13, tillerf_leaf_size=[1, 1, 1.5, 1, 1], tillerf_leaf_size_no=[1, 4, 10, 16, 26]}
          {cultivar_name=ts65-28_ratoon, leaf_size=[1500, 55000, 55000], leaf_size_no=[1, 14, 20], cane_fraction=0.7, sucrose_fraction_stalk=[1, 0.55], stress_factor_stalk=[0.2, 1], sucrose_delay=0, min_sstem_sucrose=800, min_sstem_sucrose_redn=10, tt_emerg_to_begcane=1900, tt_begcane_to_flowering=6000, tt_flowering_to_crop_end=2000, green_leaf_no=13, tillerf_leaf_size=[1.5, 1.5, 1.5, 1, 1], tillerf_leaf_size_no=[1, 4, 10, 16, 26]}
          {cultivar_name=ts65-28_fum, leaf_size=[1500, 55000, 55000], leaf_size_no=[1, 14, 20], cane_fraction=0.7, sucrose_fraction_stalk=[1, 0.55], stress_factor_stalk=[0.2, 1], sucrose_delay=0, min_sstem_sucrose=800, min_sstem_sucrose_redn=10, tt_emerg_to_begcane=1900, tt_begcane_to_flowering=6000, tt_flowering_to_crop_end=2000, green_leaf_no=13, tillerf_leaf_size=[1, 1, 1.5, 1, 1], tillerf_leaf_size_no=[1, 4, 10, 16, 26]}
          {cultivar_name=ts65-28_fum_ratoon, leaf_size=[1500, 55000, 55000], leaf_size_no=[1, 14, 20], cane_fraction=0.7, sucrose_fraction_stalk=[1, 0.55], stress_factor_stalk=[0.2, 1], sucrose_delay=0, min_sstem_sucrose=800, min_sstem_sucrose_redn=10, tt_emerg_to_begcane=1900, tt_begcane_to_flowering=6000, tt_flowering_to_crop_end=2000, green_leaf_no=13, tillerf_leaf_size=[1.5, 1.5, 1.5, 1, 1], tillerf_leaf_size_no=[1, 4, 10, 16, 26]}
          {cultivar_name=h73, leaf_size=[1500, 55000, 55000], leaf_size_no=[1, 14, 20], cane_fraction=0.7, sucrose_fraction_stalk=[1, 0.55], stress_factor_stalk=[0.2, 1], sucrose_delay=0, min_sstem_sucrose=800, min_sstem_sucrose_redn=10, tt_emerg_to_begcane=1900, tt_begcane_to_flowering=6000, tt_flowering_to_crop_end=2000, green_leaf_no=13, tillerf_leaf_size=[1, 1, 1.5, 1, 1], tillerf_leaf_size_no=[1, 4, 10, 16, 26]}
          {cultivar_name=h73_ratoon, leaf_size=[1500, 55000, 55000], leaf_size_no=[1, 14, 20], cane_fraction=0.7, sucrose_fraction_stalk=[1, 0.5], stress_factor_stalk=[0.2, 1], sucrose_delay=0, min_sstem_sucrose=800, min_sstem_sucrose_redn=10, tt_emerg_to_begcane=1900, tt_begcane_to_flowering=6000, tt_flowering_to_crop_end=2000, green_leaf_no=13, tillerf_leaf_size=[1.5, 1.5, 1.5, 1, 1], tillerf_leaf_size_no=[1, 4, 10, 16, 26]}
          {cultivar_name=q141, leaf_size=[1500, 55000, 55000], leaf_size_no=[1, 14, 20], cane_fraction=0.7, sucrose_fraction_stalk=[1, 0.64], stress_factor_stalk=[0.2, 1], sucrose_delay=0, min_sstem_sucrose=1200, min_sstem_sucrose_redn=10, tt_emerg_to_begcane=1900, tt_begcane_to_flowering=6000, tt_flowering_to_crop_end=2000, green_leaf_no=13, tillerf_leaf_size=[1, 1, 1.5, 1, 1], tillerf_leaf_size_no=[1, 4, 10, 16, 26]}
          {cultivar_name=q141_ratoon, leaf_size=[1500, 55000, 55000], leaf_size_no=[1, 14, 20], cane_fraction=0.7, sucrose_fraction_stalk=[1, 0.64], stress_factor_stalk=[0.2, 1], sucrose_delay=0, min_sstem_sucrose=1200, min_sstem_sucrose_redn=10, tt_emerg_to_begcane=1900, tt_begcane_to_flowering=6000, tt_flowering_to_crop_end=2000, green_leaf_no=13, tillerf_leaf_size=[1.5, 1.5, 1.5, 1, 1], tillerf_leaf_size_no=[1, 4, 10, 16, 26]}
          {cultivar_name=nco376, leaf_size=[3000, 7000, 12000, 28000, 28000], leaf_size_no=[1, 4, 6, 14, 20], cane_fraction=0.65, sucrose_fraction_stalk=[1, 0.55], stress_factor_stalk=[0.2, 1], sucrose_delay=0, min_sstem_sucrose=450, min_sstem_sucrose_redn=10, tt_emerg_to_begcane=1800, tt_begcane_to_flowering=6000, tt_flowering_to_crop_end=2000, green_leaf_no=10, tillerf_leaf_size=[1, 1, 1.5, 1, 1], tillerf_leaf_size_no=[1, 4, 10, 16, 26]}
          {cultivar_name=nco376_ratoon, leaf_size=[3000, 7000, 12000, 28000, 28000], leaf_size_no=[1, 4, 6, 14, 20], cane_fraction=0.65, sucrose_fraction_stalk=[1, 0.55], stress_factor_stalk=[0.2, 1], sucrose_delay=0, min_sstem_sucrose=450, min_sstem_sucrose_redn=10, tt_emerg_to_begcane=1800, tt_begcane_to_flowering=6000, tt_flowering_to_crop_end=2000, green_leaf_no=10, tillerf_leaf_size=[1.5, 1.5, 1.5, 1, 1], tillerf_leaf_size_no=[1, 4, 10, 16, 26]}
          {cultivar_name=n12, leaf_size=[3000, 7000, 12000, 30000, 30000], leaf_size_no=[1, 4, 6, 14, 20], cane_fraction=0.7, sucrose_fraction_stalk=[1, 0.55], stress_factor_stalk=[0.2, 1], sucrose_delay=0, min_sstem_sucrose=450, min_sstem_sucrose_redn=10, tt_emerg_to_begcane=1900, tt_begcane_to_flowering=6000, tt_flowering_to_crop_end=2000, green_leaf_no=13, tillerf_leaf_size=[1, 1, 1.5, 1, 1], tillerf_leaf_size_no=[1, 4, 10, 16, 26]}
          {cultivar_name=n12_ratoon, leaf_size=[3000, 7000, 12000, 30000, 30000], leaf_size_no=[1, 4, 6, 14, 20], cane_fraction=0.7, sucrose_fraction_stalk=[1, 0.55], stress_factor_stalk=[0.2, 1], sucrose_delay=0, min_sstem_sucrose=450, min_sstem_sucrose_redn=10, tt_emerg_to_begcane=1900, tt_begcane_to_flowering=6000, tt_flowering_to_crop_end=2000, green_leaf_no=13, tillerf_leaf_size=[1.5, 1.5, 1.5, 1, 1], tillerf_leaf_size_no=[1, 4, 10, 16, 26]}
          {cultivar_name=n14, leaf_size=[3000, 8000, 13000, 45000, 45000], leaf_size_no=[1, 4, 6, 14, 20], cane_fraction=0.7, sucrose_fraction_stalk=[1, 0.55], stress_factor_stalk=[0.2, 1], sucrose_delay=0, min_sstem_sucrose=450, min_sstem_sucrose_redn=10, tt_emerg_to_begcane=1900, tt_begcane_to_flowering=6000, tt_flowering_to_crop_end=2000, green_leaf_no=13, tillerf_leaf_size=[1, 1.5, 1.5, 1, 1], tillerf_leaf_size_no=[1, 4, 10, 16, 26]}
          {cultivar_name=n14_ratoon, leaf_size=[3000, 8000, 13000, 45000, 45000], leaf_size_no=[1, 4, 6, 14, 20], cane_fraction=0.7, sucrose_fraction_stalk=[1, 0.55], stress_factor_stalk=[0.2, 1], sucrose_delay=0, min_sstem_sucrose=450, min_sstem_sucrose_redn=10, tt_emerg_to_begcane=1900, tt_begcane_to_flowering=6000, tt_flowering_to_crop_end=2000, green_leaf_no=13, tillerf_leaf_size=[1.5, 1.5, 1.5, 1, 1], tillerf_leaf_size_no=[1, 4, 10, 16, 26]}
          {cultivar_name=CP51, leaf_size=[3000, 7000, 15000, 35000, 35000], leaf_size_no=[1, 4, 7, 15, 20], cane_fraction=0.7, sucrose_fraction_stalk=[1, 0.55], stress_factor_stalk=[0.2, 1], sucrose_delay=0, min_sstem_sucrose=450, min_sstem_sucrose_redn=10, tt_emerg_to_begcane=1350, tt_begcane_to_flowering=6000, tt_flowering_to_crop_end=2000, green_leaf_no=13, tillerf_leaf_size=[1, 1, 1, 1, 1], tillerf_leaf_size_no=[1, 4, 10, 16, 26]}
          {cultivar_name=CP51_ratoon, leaf_size=[3000, 7000, 15000, 35000, 35000], leaf_size_no=[1, 4, 7, 15, 20], cane_fraction=0.7, sucrose_fraction_stalk=[1, 0.55], stress_factor_stalk=[0.2, 1], sucrose_delay=0, min_sstem_sucrose=450, min_sstem_sucrose_redn=10, tt_emerg_to_begcane=1350, tt_begcane_to_flowering=6000, tt_flowering_to_crop_end=2000, green_leaf_no=13, tillerf_leaf_size=[1.5, 1.5, 1, 1, 1], tillerf_leaf_size_no=[1, 4, 10, 16, 26]}
          {cultivar_name=R570, leaf_size=[3000, 7000, 10000, 45000, 60000, 60000], leaf_size_no=[1, 4, 6, 10, 14, 20], cane_fraction=0.68, sucrose_fraction_stalk=[1, 0.58], stress_factor_stalk=[0.2, 1], sucrose_delay=0, min_sstem_sucrose=693, min_sstem_sucrose_redn=10, tt_emerg_to_begcane=1500, tt_begcane_to_flowering=6000, tt_flowering_to_crop_end=2000, green_leaf_no=13, tillerf_leaf_size=[6, 1], tillerf_leaf_size_no=[1, 12]}
          {cultivar_name=R570_ratoon, leaf_size=[3000, 7000, 10000, 45000, 60000, 60000], leaf_size_no=[1, 4, 6, 10, 14, 20], cane_fraction=0.68, sucrose_fraction_stalk=[1, 0.58], stress_factor_stalk=[0.2, 1], sucrose_delay=0, min_sstem_sucrose=693, min_sstem_sucrose_redn=10, tt_emerg_to_begcane=1500, tt_begcane_to_flowering=6000, tt_flowering_to_crop_end=2000, green_leaf_no=13, tillerf_leaf_size=[10, 1], tillerf_leaf_size_no=[1, 12]}
          {cultivar_name=M1356, leaf_size=[3000, 7000, 10000, 25000, 40000, 40000], leaf_size_no=[1, 4, 6, 10, 14, 20], cane_fraction=0.78, sucrose_fraction_stalk=[1, 0.57], stress_factor_stalk=[0.2, 1], sucrose_delay=0, min_sstem_sucrose=521, min_sstem_sucrose_redn=10, tt_emerg_to_begcane=1200, tt_begcane_to_flowering=6000, tt_flowering_to_crop_end=2000, green_leaf_no=13, tillerf_leaf_size=[6, 1], tillerf_leaf_size_no=[1, 12]}
          {cultivar_name=M1356_ratoon, leaf_size=[3000, 7000, 10000, 25000, 40000, 40000], leaf_size_no=[1, 4, 6, 10, 14, 20], cane_fraction=0.78, sucrose_fraction_stalk=[1, 0.57], stress_factor_stalk=[0.2, 1], sucrose_delay=0, min_sstem_sucrose=521, min_sstem_sucrose_redn=10, tt_emerg_to_begcane=1200, tt_begcane_to_flowering=6000, tt_flowering_to_crop_end=2000, green_leaf_no=13, tillerf_leaf_size=[10, 1], tillerf_leaf_size_no=[1, 12]}
          {cultivar_name=M55560, leaf_size=[3000, 7000, 10000, 35000, 50000, 50000], leaf_size_no=[1, 4, 6, 10, 14, 20], cane_fraction=0.7, sucrose_fraction_stalk=[1, 0.62], stress_factor_stalk=[0.2, 1], sucrose_delay=0, min_sstem_sucrose=775, min_sstem_sucrose_redn=10, tt_emerg_to_begcane=1300, tt_begcane_to_flowering=6000, tt_flowering_to_crop_end=2000, green_leaf_no=13, tillerf_leaf_size=[6, 1], tillerf_leaf_size_no=[1, 12]}
          {cultivar_name=M55560_ratoon, leaf_size=[3000, 7000, 10000, 35000, 50000, 50000], leaf_size_no=[1, 4, 6, 10, 14, 20], cane_fraction=0.7, sucrose_fraction_stalk=[1, 0.62], stress_factor_stalk=[0.2, 1], sucrose_delay=0, min_sstem_sucrose=775, min_sstem_sucrose_redn=10, tt_emerg_to_begcane=1300, tt_begcane_to_flowering=6000, tt_flowering_to_crop_end=2000, green_leaf_no=13, tillerf_leaf_size=[10, 1], tillerf_leaf_size_no=[1, 12]}
          {cultivar_name=q124, leaf_size=[1500, 55000, 55000], leaf_size_no=[1, 14, 20], cane_fraction=0.7, sucrose_fraction_stalk=[1, 0.55], stress_factor_stalk=[0.2, 1], sucrose_delay=0, min_sstem_sucrose=800, min_sstem_sucrose_redn=10, tt_emerg_to_begcane=1900, tt_begcane_to_flowering=6000, tt_flowering_to_crop_end=2000, green_leaf_no=13, tillerf_leaf_size=[1, 1, 1.5, 1, 1], tillerf_leaf_size_no=[1, 4, 10, 16, 26]}
          {cultivar_name=q124_ratoon, leaf_size=[1500, 55000, 55000], leaf_size_no=[1, 14, 20], cane_fraction=0.7, sucrose_fraction_stalk=[1, 0.55], stress_factor_stalk=[0.2, 1], sucrose_delay=0, min_sstem_sucrose=800, min_sstem_sucrose_redn=10, tt_emerg_to_begcane=1900, tt_begcane_to_flowering=6000, tt_flowering_to_crop_end=2000, green_leaf_no=13, tillerf_leaf_size=[1.5, 1.5, 1.5, 1, 1], tillerf_leaf_size_no=[1, 4, 10, 16, 26]}
      Folder Manager folder
        Manager SUGAR management
          planting_day = 1-apr
          plantlen = 450
          plant_stalks = 10
          variety = q117
          sowing_depth = 150
          NoRatoons = 4
          ratoonlen = 390
          ratoon_stalks = 10
```csharp
using System;
using Models.Core;
using Models.PMF;
using Models.PMF.OldPlant;


namespace Models
{
	[Serializable]
	[System.Xml.Serialization.XmlInclude(typeof(Model))]
	public class Script : Model
	{
		[Link] Clock Clock;
		[Link] SugarCane SugarCane;
		
		[Description("Enter planting date (dd-mmm)")]
		public string planting_day {get; set;}
		[Description("Duration of a plant crop (days) (30days/mth x 15mths)")]
		public int    plantlen {get; set;}
		[Description("Stalk density of plant crop (/m2)")]
		public double plant_stalks {get; set;}
		[Description("Planting variety")]
		public string variety {get; set;}
		[Description("Planting depth (mm)")]
		public double sowing_depth {get; set;}
		[Description("Number of ratoons before EndCrop")]  
		public int    NoRatoons {get; set;}
		[Description("Duration of a ratoon crop (days) (30days/mth x 13mths)")]
		public int    ratoonlen {get; set;}
		[Description("Stalk density of ratoon crop (/m2)")]
		public double ratoon_stalks {get; set;}
		

		private int dah;  //Remove this later, I don't think they use it. Days After Harvest.
		
		//two below are used for rotations. Remove this. I don't think ApsimX does rotations like this.
		private int      nextcrop;
        private int 	 fallowin;

		
		[EventSubscribe("StartOfSimulation")]
		private void OnStartOfSimulation(object sender, EventArgs e)
		{
			//Rotation variables. Not sure if these are still needed in ApsimX rotations
            nextcrop = 0;
            fallowin = 0;
		}


		[EventSubscribe("StartOfDay")]
		private void OnStartOfDay(object sender, EventArgs e)
		{

            //! Initialise and set a time counter for entire run
            dah = 0;


            if ( SugarCane.crop_status == "alive" ) 
            	{
                dah = 0;

                //! Set harvest dates for each crop phase
                if ( ((SugarCane.DaysAfterSowing == plantlen) && (SugarCane.ratoon_no == 0)) 
                  || ((SugarCane.DaysAfterSowing == ratoonlen) && (SugarCane.ratoon_no > 0)) )
					{
					
                   	SugarCane.HarvestCrop();
                  	if (SugarCane.ratoon_no == NoRatoons + 1)
                  		{
                     	//! plough the crop out
                     	SugarCane.KillCrop();
                     	SugarCane.EndCrop();
						}
                  	else
                    	{
                     	//! Set stalk density
                     	SugarCane.plants = ratoon_stalks;
                    	}
                    }
                else
                	{
                  	//! We have not reached the harvest date for this ratoon.
               		}
               	}   
            else if ( SugarCane.crop_status == "dead" )
            	{
                SugarCane.HarvestCrop();
                SugarCane.EndCrop();
				}   
            else if ( (SugarCane.crop_status == "out") && (Utility.Date.DatesEqual(planting_day, Clock.Today)) )
            	{
                SugarCane.Sow(PlantingDensity: 10, Depth: sowing_depth, CultivarName: variety);
                SugarCane.plants = plant_stalks;
                dah = 0;
				}	
            else
            	{
                dah = dah + 1;
            	}
     
		}
	}
}
```
        Manager Fertilise on fixed date
          fert_date = 1-Sep
          fert_criteria = 1000
          fert_amount = 200
          fert_type = hard coded
```csharp
using System;
using Models.Core;
using Models.PMF;
using Models.PMF.OldPlant;
using Models.Soils;

namespace Models
{
	[Serializable]
	[System.Xml.Serialization.XmlInclude(typeof(Model))]
	public class Script : Model
	{

		[Link] Clock Clock;
		[Link] Soil Soil;
		[Link] Fertiliser Fertiliser;
		[Link] Summary Summary;
		
		[Description("Fertilise on this date (dd-mmm)")]
		public string fert_date {get; set;}
		
		[Description("Don't add fertiliser if N in top 2 layers exceeds (kg/ha)")]
		public double fert_criteria {get; set;}
		
		[Description("Amount to apply (kg/ha)")]
		public double fert_amount {get; set;}
		
		[Description("Type of fertilser to apply")]
		public string fert_type {get; set;}
	
		private double N_topsoil;


        /*
         if (today = date('[fert_date]') then
            N_topsoil = no3(1) + nh4(1) + no3(2) + nh4(2)
            if (N_topsoil < [fert_criteria]) then
               [fertmodule] apply amount = [fert_amount] (kg/ha), depth = 50 (mm), type = [fert_type] ()
            endif
         endif 
        */
        
        
		[EventSubscribe("StartOfDay")]
		private void OnStartOfDay(object sender, EventArgs e)
		{

        if (Utility.Date.DatesEqual(fert_date, Clock.Today))
			{
				N_topsoil = Soil.SoilNitrogen.NO3[1] + Soil.SoilNitrogen.NH4[1] + Soil.SoilNitrogen.NO3[2] + Soil.SoilNitrogen.NH4[2];					
				if (N_topsoil < fert_criteria)
				{
					Fertiliser.Apply(Amount: fert_amount, Depth: 50, Type: Fertiliser.Types.UreaN);
				}
			}

		}
      
	}
}
```
      Report: EventNames=[Clock].DoReport
        VariableNames:
          [Clock].Today
          [SugarCane].biomass as biomass
          [SugarCane].cane_wt as cane_wt
          [SugarCane].sucrose_wt as sucrose_wt
          [SugarCane].sw_demand as sw_demand
          [SugarCane].DaysAfterSowing as DaysAfterSowing
          [SugarCane].ratoon_no as ratoon_no
          [SugarCane].crop_status as crop_status
          [Soil].SoilWater.ESW as esw
          [SugarCane].lai as lai
          [SugarCane].nfact_photo as nfact_photo
          [SugarCane].root_depth as root_depth
          [SugarCane].swdef_photo as swdef_photo
          [SugarCane].canefw as canefw
          [Weather].Radn as radn
          [Weather].Rain as rain
          [Weather].MaxT as maxt
          [Weather].MinT as mint
          [SugarCane].tt_tot as tt_tot
          [SugarCane].leaf_no as leaf_no
          [SugarCane].node_no_dead as node_no_dead
          [SugarCane].node_no_detached as node_no_detached
          [SugarCane].leaves as leaves
          [SugarCane].green_leaves as green_leaves
          [SugarCane].dead_leaves as dead_leaves
          [SugarCane].leaf_area as leaf_area
          [SugarCane].leaf_dm as leaf_dm
          [SugarCane].height as height
          [SugarCane].cover_green as cover_green
          [SugarCane].radn_int as radn_int
          [SugarCane].cover_tot as cover_tot
          [SugarCane].lai_sum as lai_sum
          [SugarCane].tlai as tlai
          [SugarCane].tla  as tla
          [SugarCane].slai as slai
          [SugarCane].rlv_tot as rlv_tot
          [SugarCane].ll_dep as ll_dep
          [SugarCane].lai2  as lai2
          [SugarCane].leaf_wt2  as leaf_wt2
          [SugarCane].rootgreenwt as rootgreenwt
          [SugarCane].leafgreenwt as leafgreenwt
          [SugarCane].sstem_wt as sstem_wt
          [SugarCane].cane_dmf as cane_dmf
          [SugarCane].ccs as ccs
          [SugarCane].scmstf as scmstf
          [SugarCane].scmst as scmst
          [SugarCane].cabbage_wt as cabbage_wt
          [SugarCane].green_biomass as green_biomass
          [SugarCane].greenwt as greenwt
          [SugarCane].senescedwt as senescedwt
          [SugarCane].dm_dead as dm_dead
          [SugarCane].dlt_dm  as dlt_dm
          [SugarCane].partition_xs as partition_xs
          [SugarCane].dlt_dm_green  as dlt_dm_green
          [SugarCane].dlt_dm_detached as dlt_dm_detached
          [SugarCane].n_critical as n_critical
          [SugarCane].n_minimum as n_minimum
          [SugarCane].n_conc_leaf as n_conc_leaf
          [SugarCane].n_conc_cab  as n_conc_cab
          [SugarCane].n_conc_cane as n_conc_cane
          [SugarCane].n_leaf_crit as n_leaf_crit
          [SugarCane].n_leaf_min as n_leaf_min
          [SugarCane].biomass_n  as biomass_n
          [SugarCane].plant_n_tot as plant_n_tot
          [SugarCane].green_biomass_n as green_biomass_n
          [SugarCane].n_green as n_green
          [SugarCane].greenn  as greenn
          [SugarCane].sensescedn as sensescedn
          [SugarCane].dlt_n_green as dlt_n_green
          [SugarCane].swdef_pheno  as swdef_pheno
          [SugarCane].swdef_expan  as swdef_expan
          [SugarCane].swdef_stalk  as swdef_stalk
          [SugarCane].nfact_expan  as nfact_expan
          [SugarCane].oxdef_photo  as oxdef_photo
          [SugarCane].ep  as ep
          [SugarCane].cep  as cep
          [SugarCane].sw_uptake as sw_uptake
          [SugarCane].sw_demand_te as sw_demand_te
          [SugarCane].fasw as fasw
          [SugarCane].esw_layr as esw_layr
          [SugarCane].no3_tot as no3_tot
          [SugarCane].n_demand as n_demand
          [SugarCane].no3_demand as no3_demand
          [SugarCane].n_supply  as n_supply
          [SugarCane].no3_uptake  as no3_uptake
          [SugarCane].nh4_uptake  as nh4_uptake
          [SugarCane].no3_uptake_pot as no3_uptake_pot
          [SugarCane].nh4_uptake_pot as nh4_uptake_pot
          [Soil].SoilWater.SWmm as sw_dep
          [Soil].SoilWater.Eo as eo
          [Soil].SoilWater.Eos as eos
          [Soil].SoilWater.Es as es
          [SurfaceOrganicMatter].Cover as surfaceom_cover
          [SugarCane].stage as stage
          [SugarCane].stage_code as stage_code
          [SugarCane].stagename as stagename
  DataStore
    Input Sugar: ErrorMessage=The specified file does not exist.; FileName=%root%\Tests\SugarCane\Example\OLD\Sugar.out
    Input Cane: ErrorMessage=The specified file does not exist.; FileName=%root%\Tests\SugarCane\Example\OLD\Cane.out
