Simulations: Area=0
  Simulation Test: Area=0
    WeatherFile: FileName=Goondiwindi.met
    Clock: StartDate=1940-01-01; EndDate=1940-12-31
    Summary
    Zone Field: Area=0
      Report: Events=[Clock].EndOfDay
        Variables:
          [Clock].Today
          [WeatherFile].DayLength
          [WeatherFile].MaxT
          [WeatherFile].MinT
          [WeatherFile].Radn
          [WeatherFile].Rain
          [SoilWater].sw_dep
          [SoilNitrogen].no3
          [SurfaceOrganicMatter].surfaceom_wt
          [Plant].Phenology.StageCode.FunctionValue
          [Plant].Structure.Population
          [Plant].Leaf.LAI
          [Plant].Leaf.CoverGreen
          [Plant].Leaf.Live.Wt
          [Plant].Stem.Live.Wt
          [Plant].Tuber.Live.Wt
          [Plant].Root.Live.Wt
          [Plant].Leaf.Live.N
          [Plant].Stem.Live.N
          [Plant].Tuber.Live.N
          [Plant].Root.Live.N
      Manager Script
```csharp
        using System;
        using Models.Core;
        using Models.PMF;
        namespace Models
        {
            public class Script : Model
            {      
               // Links
               [Link] Plant Plant;
               [Link] Clock Clock;
               [EventSubscribe("StartOfDay")]
               private void OnStartOfDay(object sender, EventArgs e)
               {
				if(Clock.Today.DayOfYear == 3)
					Plant.Sow(new SowPlant2Type() {Population = 100, Cultivar = "Russet_Burbank"});
               }
            }
        }
```
      Soil: SoilType=Black Vertosol; LocalName=Waco; Site=Jimbour; NearestTown=Jimbour, Q 4352; Region=South East Queensland; NaturalVegetation=Grassland, mainly Qld bluegrass; Latitude=0; Longitude=0
        Water
          Thickness  BD    AirDry  LL15  DUL   SAT
          150        1.02  0.15    0.29  0.54  0.59
          150        1.03  0.26    0.29  0.53  0.58
          300        1.02  0.29    0.29  0.54  0.59
          300        1.02  0.29    0.29  0.54  0.58
          300        1.06  0.3     0.3   0.52  0.57
          300        1.11  0.31    0.31  0.5   0.55
          300        1.12  0.32    0.32  0.5   0.55
          300        1.15  0.33    0.33  0.48  0.53
          300        1.18  0.34    0.34  0.47  0.52
          300        1.2   0.35    0.35  0.46  0.51
          300        1.25  0.36    0.36  0.44  0.49
          SoilCrop Wheat
            LL=[0.29, 0.29, 0.32, 0.38, 0.39, 0.39, 0.41, 0.48, 0.47, 0.46, 0.44]
            KL=[0.1, 0.1, 0.08, 0.06, 0.04, 0.02, 0.01, 0, 0, 0, 0]
            XF=[1, 1, 1, 1, 1, 1, 1, 0, 0, 0, 0]
          SoilCrop Barley
            LL=[0.29, 0.29, 0.36, 0.43, 0.51, 0.5, 0.5, 0.48, 0.47, 0.46, 0.44]
            KL=[0.1, 0.1, 0.08, 0.06, 0.04, 0.02, 0.01, 0, 0, 0, 0]
            XF=[1, 1, 1, 1, 1, 1, 1, 0, 0, 0, 0]
          SoilCrop Potato
            LL=[0.29, 0.29, 0.36, 0.43, 0.51, 0.5, 0.5, 0.48, 0.47, 0.46, 0.44]
            KL=[0.1, 0.1, 0.08, 0.06, 0.04, 0.02, 0.01, 0, 0, 0, 0]
            XF=[1, 1, 1, 1, 1, 1, 1, 0, 0, 0, 0]
        SoilWater: min_crit_temp=5; max_crit_temp=35; max_albedo=0.23; A_to_evap_fact=0.44; canopy_eos_coef=1.7; sw_top_crit=0.9; sumes1_max=100; sumes2_max=25; solute_flow_eff=[1]; solute_flux_eff=[1]; gravity_gradient=2E-05; specific_bd=2.65; hydrol_effective_depth=450; immobile_solutes=[nh4]; canopy_fact=[1, 1, 0, 0]; canopy_fact_height=[0, 600, 1800, 30000]; canopy_fact_default=0.5; act_evap_method=ritchie; irrigation_will_runoff=0; irrigation_layer=0; SummerCona=3; SummerU=6; SummerDate=1-Nov; WinterCona=3; WinterU=6; WinterDate=1-Apr; DiffusConst=40; DiffusSlope=16; Salb=0.13; slope=0; discharge_width=0; catchment_area=0; eos=5.84087; max_pond=0; CN2Bare=73; CNRed=20; CNCov=0.8
          Thickness  SWCON  KLAT
          150        0.3    0
          150        0.3    0
          300        0.3    0
          300        0.3    0
          300        0.3    0
          300        0.3    0
          300        0.3    0
          300        0.3    0
          300        0.3    0
          300        0.3    0
          300        0.3    0
          mobile_solutes=[no3, urea, cl, br, org_n, org_c_pool1, org_c_pool2, org_c_pool3]
        SoilNitrogen: NPartitionApproach=BasedOnLayerConcentration; wnmm_n_alpha=0.002; wnmm_dn_alpha=0.5; nemis_dn_km=22; nemis_dn_pot=7.194; cent_n_soilt_ave=15; cent_n_maxt_ave=25; cent_n_wfps_ave=0.7; cent_n_max_rate=0.1; ini_FOMtype=default; fom_type=[default, manure, mucuna, lablab, shemp, stable]; fract_carb=[0.2, 0.3, 0.54, 0.57, 0.45, 0]; fract_cell=[0.7, 0.3, 0.37, 0.37, 0.47, 0.1]; fract_lign=[0.1, 0.4, 0.09, 0.06, 0.08, 0.9]; ef_res=0.4; fr_res_biom=0.9; min_depth=100; rd_carb=[0.2, 0.1]; rd_cell=[0.05, 0.25]; rd_lign=[0.0095, 0.003]; ef_fom=0.4; fr_fom_biom=0.9; cnrf_coeff=0.693; cnrf_optcn=25; rd_biom=[0.0081, 0.004]; ef_biom=0.4; fr_biom_biom=0.6; rd_hum=[0.00015, 7E-05]; ef_hum=0.4; opt_temp=[32, 32]; wfmin_index=[0, 0.5, 1, 2]; wfmin_values=[0, 1, 1, 0.5]; soiltype=standard; allow_simpleSoilTemp=no; profile_reduction=no; use_organic_solutes=no; c_in_fom=0.4; minPatchArea=1; mcn=8; root_depth=3000; root_cn_pool=[40, 40, 40]
          zero: n2o_approach, ureappm_min, nh4ppm_min, no3ppm_min, fom_min, oc2om_factor, ini_pH, WarningThreshold, FatalThreshold, potHydrol_min, potHydrol_parmA, potHydrol_parmB, potHydrol_parmC, potHydrol_parmD, nitrification_pot, nh4_at_half_pot, dnit_rate_coeff, dnit_nitrf_loss, dnit_k1, dnit_wf_power, actC_parmB, actC_parmA, N2N2O_parmA, N2N2O_parmB
        SoilOrganicMatter: RootCN=40; RootWt=200; SoilCN=12.5; EnrACoeff=7.4; EnrBCoeff=0.2; OCUnits=Total
          Thickness  OC    FBiom  FInert
          150        1.04  0.025  0.4
          150        0.89  0.02   0.6
          300        0.89  0.015  0.8
          300        0.89  0.01   0.9
          300        0.77  0.01   0.95
          300        0.45  0.01   0.95
          300        0.27  0.01   0.95
          300        0.22  0.01   0.95
          300        0.16  0.01   0.95
          300        0.13  0.01   0.95
          300        0.12  0.01   0.95
        Analysis: PHUnits=Water; BoronUnits=HotWater
          Thickness  EC    PH
          150        0.2   8.4
          150        0.25  8.8
          300        0.31  9
          300        0.4   9.2
          300        0.59  9.2
          300        0.84  9.1
          300        0.93  9
          300        1.01  9
          300        1.06  8.9
          300        1.05  8.9
          300        1.01  8.9
        InitialWater Initial water: FractionFull=1; PercentMethod=FilledFromTop
        Sample: NO3Units=ppm; NH4Units=ppm; SWUnits=Volumetric; OCUnits=Total; PHUnits=Water
          Thickness  NO3     NH4
          150        1116.5  0.599004
          150        2.101   0.100001
          300        2.101   0.100001
          300        1.701   0.100001
          300        1.701   0.100001
          300        1.701   0.100001
          300        1.701   0.100001
          300        1.701   0.100001
          300        1.701   0.100001
          300        1.701   0.100001
          300        1.701   0.100001
      SurfaceOrganicMatter: crit_residue_wt=2000; opt_temp=20; cum_eos_max=20; cnrf_coeff=0.277; cnrf_optcn=25; c_fract=0.4; leach_rain_tot=25; min_rain_to_leach=10; crit_min_surfom_orgC=0.004; default_cpr=0; default_standing_fraction=0; standing_extinct_coeff=0.5; fractionFaecesAdded=0.5; PoolName=wheat; type=wheat; mass=1000; standing_fraction=0; cnr=80
        ResidueTypes:
          {Name=wheat, fraction_C=0.08, po4ppm=10, nh4ppm=10, no3ppm=10, specific_area=0.0001, cf_contrib=1, pot_decomp_rate=0.1, fr_c=[0.3, 0.3, 0.4], fr_n=[0.3, 0.3, 0.4], fr_p=[0.3, 0.3, 0.4]}
      MicroClimate: air_pressure=1010; soil_emissivity=0.96; sun_angle=15; soil_heat_flux_fraction=0.4; night_interception_fraction=0.5; windspeed_default=3; refheight=2; albedo=0.3; emissivity=0.96; gsmax=0.01; r50=200; soil_heat=-2.199; dryleaffraction=1; a_interception=0; b_interception=1; c_interception=0; d_interception=0; soil_albedo=0.3
        ComponentData Potato
      Plant Potato: CropType=Potato
        Arbitrator={NArbitrationOption=PriorityThenRelativeAllocation, DMArbitrationOption=RelativeAllocation, Memo=There are a number of passes involved in the allocation of Weight (Wt). Wt_Step 1. Set up DM supplies and demands.  Each organ may have a demand for Structural, Metabolic and Non-structural Wt.  Each organ may supply Fresh DM from photosynthesis and/or stored DM from retranslocation of its Non-structural pool. Wt_Step 2. In this step freshly fixed Wt is partitioned to organs based on their relative Structural and Metabolic demands such that if there is not enough freshly fixed Wt to meet these demands the organs with the highest demands get the greatest share of the photosynthesis. Wt_Step 3. In the second step any freshly fixed DM that was surplus to Structural and Metabolic demands is partitioned to sink organs.  An organ will be a sink if it is parameterised to have a Non-structural (mobile) component and the capacity of each organ to receive excess DM depends on its structural fraction (which determines the Non-structural Fraction and subsequent sink capacity).  If there is still fresh DM unallocated after the second pass this remains unallocated with the assumption that in this case the plant would down regulate photosynthesis due to lack of sink capacity. Wt_Step 4. In this step, Non-structural DM is reallocated from Non-Structural pools if there was insufficient DM to meet the structural and metabolic DM demands of organs. The arbitrator then sends a potential DM allocation to each organ that they use to calculate their N demands and then steps through N partitioning routines.  The final pass in biomass partitioning comes after N partitioning N_Step 1. Set up N supplies and demands.  Each organ may (or may not) supply N in a number of ways.  Each organ has (potentially) a structural, metabolic and Non-structural N Demand.  The structural N demand is that required to grow immobile biomass components, Metabolic N is that required to produce working biomass such as the photosynthetic mechanism in the leaves.  The Non-structural N demand is considered to be the luxury uptake and storage of highly mobile N compounds such as nitrate. Each of the following 4 steps have a number of processes in common; Firstly the arbitrator determines each organs current N demand (that outstanding after previous N partitioning steps), then it allocates N to each demanding organ (There are three ways that N can be allocated, see below), then it sets for each supplying organ the amount of N that was taken up. N_Step 2. NReallocation.  This is the supply of N within the plant by the reallocation of sensing and/or Non-structural N which is the lowest energy form of N available to the plant so is partitioned first. N_Step 3. NUptake.  This is the supply of mineral N from the environment (typically by roots from the soil). In this step the arbitrator partitions the potential N uptake supply to satisfy all organs N demands (Structural, Metabolic and Non-structural).  If supply is sufficient this will replenish all Non-structural N that was reallocated in the previous step.  If not the N conc of organs with a Non-structural N component will begin to fall.  If total N demand is less than the uptake supply the crop will leave the surplus mineral N in the soil. N_Step 4. NFixation.  This is the supply of symbiotically fixed N and is redundant for Non-fixers!  The arbitrator will asks all N fixing organs (typically nodules) for their potential N fixation supply and then partition this to meet the Structural and Metabolic N demands of organs.  The arbitrator will not fix N to meet Non-structural N demands to minimise the biomass cost of fixation which is metabolically expensive.  Fixation follows uptake to enable the arbitrator to capture the "Lazy" N fixing behaviour of some legumes.  Once fixation is calculated the arbitrator determines the DM cost of this fixation. N_Step 5. NRetranslocation.  This is only invoked under sever N shortage when NReallocation and Uptake (and fixation if appropriate) cannot meet structural and metabolic N demands.  It this step the arbitrator will remove Metabolic N from older leaf cohorts to meet the N demand of new leaves and reproductive organs. In all of these N partitioning steps there are three options the developer may chose for determining the allocation of N between demanding organs. 1. RelativeAllocation.  If this option is used all N is partitioned to organs relative to their demand so that the organs with the larger N demand get a larger share of a limited N supply. 2. PriorityAllocation.  If this option is used the arbitrator steps through all organs in order of priority (set by the order they appear in the IDE) allocating N to meet all of the first organs structural and metabolic N demands before partitioning any to the next organ in the hierarchy.  Once it has stepped through all organs and allocated their minimum (structural and metabolic) N demands it will then step through them again and allocate their luxury (Non-structural) N demands in the same way. 3. PrioritythenRelativeAllocation.  If this option is used the arbitrator steps through all organs in order of priority allocating N to meet minimum N demands.  However on the second pass it allocated N relative to the organs outstanding demands such that the organ with the greatest luxury N demand will get the greatest share of the N allocation. Wt_Step 5. Once N is allocated the arbitrator then reduces the Wt allocation of each organ to account for the metabolic cost of N fixation.  The Wt reduction is spread around all organs and an organ will only have its Wt allocation limited until it reaches maximum N conc. Wt_Step 6. Then the arbitrator determines if the N allocated to each organ is sufficient for that organ to reach its minimum N concentration.  If not the arbitrator will constrain the biomass growth of that organ and discards the surplus biomass.  This assume that under sever N stress photosynthesis would be down regulated due to N inadequacy limiting sink strength. Once these steps are complete the Arbitrator finally communicates to each organ its state changes as a result of arbitration.}
        Phenology={Dormant={{http://www.w3.org/2001/XMLSchema-instance}type=GenericPhase, Name=Dormant, Start=Planting, End=Peeping, ThermalTime=[{X=[2, 20, 35], Y=[0, 18, 0]}], Target={{http://www.w3.org/2001/XMLSchema-instance}type=Constant, Value=1}}, Sprouting={{http://www.w3.org/2001/XMLSchema-instance}type=EmergingPhase, Name=Sprouting, Start=Peeping, End=Emergence, ShootLag=72, ShootRate=1.35, ThermalTime=[{X=[2, 20, 35], Y=[0, 18, 0]}]}, Vegetative={{http://www.w3.org/2001/XMLSchema-instance}type=GenericPhase, Name=Vegetative, Start=Emergence, End=TuberInitiation, ThermalTime=[{X=[2, 20, 35], Y=[0, 18, 0]}], Target={{http://www.w3.org/2001/XMLSchema-instance}type=Constant, Value=300}}, EarlyTuber={{http://www.w3.org/2001/XMLSchema-instance}type=LeafAppearancePhase, Name=EarlyTuber, Start=TuberInitiation, End=FinalLeaf, RemainingLeaves=0, ThermalTime=[{X=[2, 20, 35], Y=[0, 18, 0]}]}, LateTuber={{http://www.w3.org/2001/XMLSchema-instance}type=LeafDeathPhase, Name=LateTuber, Start=FinalLeaf, End=FullSenescence, ThermalTime=[{X=[2, 20, 35], Y=[0, 18, 0]}]}, Senesced={{http://www.w3.org/2001/XMLSchema-instance}type=GenericPhase, Name=Senesced, Start=FullSenescence, End=Maturity, Target={{http://www.w3.org/2001/XMLSchema-instance}type=Constant, Value=200}, ThermalTime=[{X=[2, 20, 35], Y=[0, 18, 0]}]}, Maturity={{http://www.w3.org/2001/XMLSchema-instance}type=EndPhase, Name=Maturity, Start=Maturity, End=Unused, ThermalTime=[{X=[2, 20, 35], Y=[0, 18, 0]}]}, StageCode={{http://www.w3.org/2001/XMLSchema-instance}type=StageBasedInterpolation, Name=StageCode, Stages=[Planting, Peeping, Emergence, TuberInitiation, FinalLeaf, FullSenescence, Maturity], Values=[1, 2, 3, 4, 5, 6, 7]}}
        Structure={PrimaryBudNo=1, InitialiseStage=Emergence, ThermalTime=[{X=[2, 20, 35], Y=[0, 18, 0]}], HeightModel={{http://www.w3.org/2001/XMLSchema-instance}type=LinearInterpolationFunction, XProperty=[Stem].Live.Wt, XYPairs={X=[0, 200, 1200, 4000], Y=[20, 300, 700, 900]}}, MainStemPrimordiaInitiationRate={{http://www.w3.org/2001/XMLSchema-instance}type=PhaseLookupValue, Start=Emergence, End=FinalLeaf}, MainStemNodeAppearanceRate={{http://www.w3.org/2001/XMLSchema-instance}type=PhaseLookupValue, Start=Emergence, End=FinalLeaf, Memo=Determines how quickly nodes appear}, MainStemFinalNodeNumber={{http://www.w3.org/2001/XMLSchema-instance}type=Constant, Value=34}, BranchingRate={{http://www.w3.org/2001/XMLSchema-instance}type=MultiplyFunction, Memo=The branching rates sets the number of new branches initiated.  If we have a plant with one stem and branching rate is set as zero this plant will continue to have only one stem.  If this value increases to 1 for the appearance of 1 mainstem node and then reduces to zero again the plant will produce one branch on its mainstem that has the same properties as the mainstem.  The higher this number is and the longer is remains above 0 the more branches the plant will produce. For Potato the potential branching rate is the branching pattern that would be observed in wide spaced plantings.  There is a cover response factor to reduce branching rates in closer spacings., Potential_Branching_Rate={{http://www.w3.org/2001/XMLSchema-instance}type=LinearInterpolationFunction, XProperty=[Structure].MainStemNodeNo, XYPairs={X=[0, 7, 8, 13, 14, 34], Y=[0, 0, 0.5, 0.5, 0, 0]}}, Cover_response={{http://www.w3.org/2001/XMLSchema-instance}type=LinearInterpolationFunction, XProperty=[leaf].CoverGreen, XYPairs={X=[0, 0.4, 0.55, 0.8, 1], Y=[1, 1, 0.45, 0, 0]}}}, ShadeInducedBranchMortality={{http://www.w3.org/2001/XMLSchema-instance}type=Constant, Value=0}, DroughtInducedBranchMortality={{http://www.w3.org/2001/XMLSchema-instance}type=Constant, Value=0}}
        Summariser={AboveGround=[[[Leaf].Live, [Leaf].Dead, [Stem].Live, [Stem].Dead]], BelowGround=[[[Root].Live, [Root].Dead, [Tuber].Live, [Tuber].Dead]], Total=[[[Leaf].Live, [Leaf].Dead, [Stem].Live, [Stem].Dead, [Root].Live, [Root].Dead, [Tuber].Live, [Tuber].Dead]]}
        GenericAboveGroundOrgan Tuber
          Memo:
            This organ inherits from SIRIUSGeneric organ so has the same 6 optional paramaters and default values for these paramaters.
            In addition this organ has a relative growth rate variable and a tubers per stem variable.  These are used to calculate DM demand in the tubers.  This differs from the generic organ that uses a pratitioning fraction to calculate DM demand.
          DMDemandFunction={{http://www.w3.org/2001/XMLSchema-instance}type=PotentialSizeDemandFunction, StartStageName=TuberInitiation, EndStageName=Maturity, PotentialGrowthIncrement={{http://www.w3.org/2001/XMLSchema-instance}type=LinearInterpolationFunction, XProperty=[Phenology].StageCode.FunctionValue, XYPairs={X=[4, 4.04, 4.32, 4.52, 4.95, 6.54], Y=[0.017, 0.017, 0.06, 0.06, 0.018, 0]}, Memo=This is potential growth rate of tubers in g/degree day}, OrganNumber={{http://www.w3.org/2001/XMLSchema-instance}type=MultiplyFunction, Memo=Multiplies the values of the children of this node, OrganNumberPerStem={{http://www.w3.org/2001/XMLSchema-instance}type=Constant, Value=5}, StemNumber={{http://www.w3.org/2001/XMLSchema-instance}type=VariableReference, VariableName=[Structure].MainStemPopn}}, ThermalTime=[{X=[2, 20, 35], Y=[0, 18, 0]}], AccumThermalTime={{http://www.w3.org/2001/XMLSchema-instance}type=AccumulateFunction, StartStageName=TuberInitiation, EndStageName=Maturity, Memo=Sum the values of the children of this node and accumulate daily between the start and end stages, DailyThermalTimeValue={{http://www.w3.org/2001/XMLSchema-instance}type=VariableReference, VariableName=[Phenology].ThermalTime.FunctionValue, Memo=Returns the value of a nominated internal Plant2 numerical variable}}}
          WaterContent={{http://www.w3.org/2001/XMLSchema-instance}type=LinearInterpolationFunction, XProperty=[Phenology].StageCode.FunctionValue, XYPairs={X=[3, 4, 4.1, 4.7, 5.4, 6], Y=[0, 0, 0.1, 0.16, 0.2, 0.22]}, Memo=The relative growth rate is used to set the DM demand of each tuber}
          StructuralFraction={{http://www.w3.org/2001/XMLSchema-instance}type=Constant, Value=1, Memo=Demand for DM is based on demand to grow structural components.  If the structural fraction is less than 1 the organ has the capacity to accumulate Non-structural biomass.  The lower the number the greater the capacity.  However, the arbitrator will only partition biomass to non-structural pools after all structural and metabolic DM demands have been met so the Non-Structural DM proportion of the organ may be less smaller that 1 - StructuralFraction.}
          NitrogenDemandSwitch={{http://www.w3.org/2001/XMLSchema-instance}type=LinearInterpolationFunction, XProperty=[Leaf].LAI, XYPairs={X=[0, 0.02, 0.0201, 10], Y=[0, 0, 1, 1]}, Memo=This turns of N demand after the canopy has fully senesed to stop the tubers from taking up N after canopy death}
          MaximumNConc={{http://www.w3.org/2001/XMLSchema-instance}type=LinearInterpolationFunction, XProperty=[Phenology].StageCode.FunctionValue, XYPairs={X=[3, 4, 5, 6], Y=[0.023, 0.023, 0.018, 0.015]}, Memo=The relative growth rate is used to set the DM demand of each tuber}
          MinimumNConc={{http://www.w3.org/2001/XMLSchema-instance}type=LinearInterpolationFunction, XProperty=[Phenology].StageCode.FunctionValue, XYPairs={X=[4, 4.1, 7], Y=[0.02, 0.006, 0.006]}, Memo=This is the highest N concentration that the organ can achieve.  This sets the upper limit to N demand and includes essential and Luxury N demands.  Essential N demand is set by the MinimumNConc of the organ.  Luxary N Demand is N is set by Live.Wt * (MaximumNConc - MinimumNConc) and is N the organ may take up in surples to its growth requirements and store in its Non-Structural pool for reallocation -}
        Root: InitialDM=5; SpecificRootLength=40000; KNO3=0.02; KNH4=0.0; Live=[[[Root].LayerLive]]; Dead=[[[Root].LayerDead]]
          ll=[0.29, 0.29, 0.29, 0.29, 0.30, 0.31, 0.32, 0.33, 0.34, 0.35, 0.36]
          kl=[0.07, 0.07, 0.07, 0.07, 0.05, 0.05, 0.04, 0.04, 0.04, 0.04, 0.04]
          xf=[1.00, 1.00, 1.00, 1.00, 1.00, 1.00, 1.00, 1.00, 1.00, 1.00, 1.00]
          Memo:
            Optional paramaters

            1. SenescenceRate.  Default value is 0 which means the organ will not seness.  If senesence is required place a function on the organ named SenescenceRate.  It needs to be a number for 0 - 1 that represents the proportion of total biomass that is senessed each day.
            2.  NitrogenDemandSwitch.  Default value is 1 which means the organ always has a N demand if its N content is below maximum N conc.  If N demand needs to be switched off place a function on the organ named NitrogenDemandSwitch which returns a value of 1 when no demand is expressed.
          KLModifier={{http://www.w3.org/2001/XMLSchema-instance}type=LinearInterpolationFunction, XProperty=[Leaf].LAI, XYPairs={X=[0, 3], Y=[1, 1]}}
          SoilWaterEffect={{http://www.w3.org/2001/XMLSchema-instance}type=Constant, Value=1.0}
          TemperatureEffect:
            {X=[0, 26, 35], Y=[1, 1, 1]}
          xMaxDailyNUptake={{http://www.w3.org/2001/XMLSchema-instance}type=Constant, Value=10, Memo=I the maximum amount of N that the root system can take up each day (kg/ha), Constant={name=MaxDailyNUptake, Value=10, Memo=I the maximum amount of N that the root system can take up each day (kg/ha)}}
          RootFrontVelocity:
            {Start=Peeping, End=FinalLeaf}
          PartitionFraction={{http://www.w3.org/2001/XMLSchema-instance}type=PhaseLookup, Vegetative={{http://www.w3.org/2001/XMLSchema-instance}type=PhaseLookupValue, Start=Emergence, End=TuberInitiation}, EarlyTuber={{http://www.w3.org/2001/XMLSchema-instance}type=PhaseLookupValue, Start=TuberInitiation, End=FinalLeaf}, LateTuber={{http://www.w3.org/2001/XMLSchema-instance}type=PhaseLookupValue, Start=FinalLeaf, End=FullSenescence}}
          MaximumNConc={{http://www.w3.org/2001/XMLSchema-instance}type=Constant, Value=0.01, Memo=This is the highest N concentration that the organ can achieve.  This sets the upper limit to N demand and includes essential and Luxury N demands.  Essential N demand is set by the MinimumNConc of the organ.  Luxary N Demand is N is set by Live.Wt * (MaximumNConc - MinimumNConc) and is N the organ may take up in surples to its growth requirements and store in its Non-Structural pool for reallocation -}
          MinimumNConc={{http://www.w3.org/2001/XMLSchema-instance}type=Constant, Value=0.01, Memo=The MinimumNconc determins the organs essential N demand.  Essential N Demand is N is set by Live.Wt * MinimumNConc and is N the organ must take up to achieve its potential growth.  If the organ is not supplied with sufficient N to maintain MinimunNConc its growth will be constrained by the arbitrator.  All N taken up to MinimunNConc is placed in the StructuralPool and is not mobile}
          NitrogenDemandSwitch={{http://www.w3.org/2001/XMLSchema-instance}type=PhaseBasedSwitch, Start=Planting, End=FinalLeaf, Memo=Stops the roots from demanding Nitrogen after final leaf stage}
          MaxDailyNUptake={{http://www.w3.org/2001/XMLSchema-instance}type=LinearInterpolationFunction, XProperty=[Root].Length, XYPairs={X=[0, 0.02], Y=[0, 6]}}
          SenescenceRate={{http://www.w3.org/2001/XMLSchema-instance}type=LinearInterpolationFunction, XProperty=[Leaf].FractionDied, XYPairs={X=[0, 1], Y=[0, 0.1]}}
        Leaf: MaxCover=1.0; KDead=.03; Live=[[[Leaf].CohortLive]]; Dead=[[[Leaf].CohortDead]]; Total=[[Leaf].Live, [Leaf].Dead]
          InitialLeaf:
            Rank  Area
            1     900
            2     600
            3     300
          Memo:
            The Leaf organ has 3 biomass pools, Structural, Metabolic and Non-Structural.

            Initial ages and initial areas are array fields so the size and age of multiple leaves can be entered, separated by a space.  The initial age is used to set how far through its expansion phase each leaf is on the day of planting.
          CohortArrayLive={{http://www.w3.org/2001/XMLSchema-instance}type=ArrayBiomass, ArraySize=[Leaf].MaxNodeNo, Property=[Leaf].Live}
          CohortArrayDead={{http://www.w3.org/2001/XMLSchema-instance}type=ArrayBiomass, ArraySize=[Leaf].MaxNodeNo, Property=[Leaf].Dead}
          ThermalTime:
            {X=[2, 20, 35], Y=[0, 18, 0]}
          LeafCohortParameters={GrowthDuration={{http://www.w3.org/2001/XMLSchema-instance}type=LinearInterpolationFunction, XProperty=[Structure].RelativeNodeApperance, XYPairs={X=[0, 0.3, 0.4, 1], Y=[200, 400, 400, 400]}, Memo=Gives the size of individual leaves when they are fully expanded (mm2)}, MaxArea={{http://www.w3.org/2001/XMLSchema-instance}type=LinearInterpolationFunction, XProperty=[Structure].RelativeNodeApperance, XYPairs={X=[0, 0.15, 0.3, 0.44, 0.59, 0.73], Y=[2000, 18000, 27000, 15000, 6000, 1500]}, Memo=Gives the size of individual leaves when they are fully expanded (mm2)}, LagDuration={{http://www.w3.org/2001/XMLSchema-instance}type=LinearInterpolationFunction, XProperty=[Structure].RelativeNodeApperance, XYPairs={X=[0, 0.15, 0.3, 0.4, 0.73, 1], Y=[350, 350, 350, 350, 350, 20]}, Memo=Gives the size of individual leaves when they are fully expanded (mm2)}, SenescenceDuration={{http://www.w3.org/2001/XMLSchema-instance}type=LinearInterpolationFunction, XProperty=[Structure].RelativeNodeApperance, XYPairs={X=[0, 0.15, 0.3, 0.4, 0.73, 2], Y=[350, 350, 350, 350, 350, 100]}, Memo=Gives the size of individual leaves when they are fully expanded (mm2)}, DetachmentLagDuration={{http://www.w3.org/2001/XMLSchema-instance}type=Constant, Value=1e6}, DetachmentDuration={{http://www.w3.org/2001/XMLSchema-instance}type=Constant, Value=1e6}, SpecificLeafAreaMax={{http://www.w3.org/2001/XMLSchema-instance}type=LinearInterpolationFunction, XProperty=[Structure].RelativeNodeApperance, XYPairs={X=[0, 1], Y=[40000, 25000]}, Memo=Gives the size of individual leaves when they are fully expanded (mm2)}, StructuralFraction={{http://www.w3.org/2001/XMLSchema-instance}type=Constant, Value=.5, Memo=StructuralFraction sets the size of the metabolic pool with Metabolic DM demand calculated as: (StructuralDMDemand * (1 / StructuralFraction)) - StructuralDMDemand such that the actual SLA of leaves will normally be less than SpecificLeafAreaMax.  If the leaf cohort is not partitioned sufficient biomass to meet both structural and metabolic N demands it will reduce the growth of both proportinatly.  With moderate DM limitations leaves will get less dense but when they reach SpecificLeafAreaMax and then leaf size will become constrained.}, SpecificLeafAreaMin={{http://www.w3.org/2001/XMLSchema-instance}type=Constant, Value=25000, Memo=sets the maximum density that leaves can obtain and sets up the potential size of the Non-Structural pool.  If leaf is partitioned enough DM to meet Structural and Metabolic Demands its SLA will be (DeltaStructuralWt * SpecificLeafAreaMax)/(DeltaStructuralWt* 1/StructuralFraction).  However, if there is surpless DM after all organs are allocated their DM demands it will be partitioned back to the leaf (assuming this would actually be stored as sugar of starch in such a situation) and the leaves can become more dense until they reach SpecificLeafAreaMin.  If leaf area expansion is constrained by water stress leaves will also get more dense until they reach SpecificLeafAreaMin.  Once leaves reach SpecificLeafAreaMin they can not absorb any further excess DM and if there are no other DM sinks available the leaf will discard potential biomass production, assuming that in this situation the leaf would down regulate photosynthesis due to source limitation.}, ExpansionStress={{http://www.w3.org/2001/XMLSchema-instance}type=LinearInterpolationFunction, XProperty=[Plant].WaterSupplyDemandRatio, XYPairs={X=[0.5, 1], Y=[0, 1]}, Memo=This controls the effect of water stress on leaf area expansion, LinearInterpolationFunction={name=ExpansionStress, XProperty=[Plant].WaterSupplyDemandRatio, XYPairs={X=[0.1, 1], Y=[0, 1]}, Memo=This controls the effect of water stress on leaf area expansion}}, MinimumNConc={{http://www.w3.org/2001/XMLSchema-instance}type=Constant, Value=.03}, CriticalNConc={{http://www.w3.org/2001/XMLSchema-instance}type=Constant, Value=.05}, MaximumNConc={{http://www.w3.org/2001/XMLSchema-instance}type=Constant, Value=.07, Memo=This is the highest N concentration that the organ can achieve.  This sets the upper limit to N demand and includes essential and Luxury N demands.  Essential N demand is set by the CriticalNConc of the organ.  Luxary N Demand is N is set by Live.Wt * (MaximumNConc - CriticalNConc) and is N the organ may take up in surples to its growth requirements and store in its Non-Structural pool for reallocation.}, NReallocationFactor={{http://www.w3.org/2001/XMLSchema-instance}type=Constant, Value=1, Memo=Controls the proportion of Non-Structural and senesing Metabolic N that may be Reallocated to other organs each day.}, NRetranslocationFactor={{http://www.w3.org/2001/XMLSchema-instance}type=Constant, Value=.01, Memo=sets the proportion of Metabolic N that may be Remobilised to meet the demand of other organs each day.  A value of zero means the crop will favor maintaining the N concentration and photosynthetic capacity of its current leaf area (behaviour of crops such as potato and wheat).  Increasing this will enable the crop to grow and increased leaf area with diluted N concentration, favoring larger leaf area over the higher N concentration and photosynthetic capacity of leaves (behaviour of crops such as maize)}, DMRetranslocationFactor={{http://www.w3.org/2001/XMLSchema-instance}type=Constant, Value=.5, Memo=This sets the proportion of NonStructural Wt that can be remobilised each day.}, NonStructuralFraction={{http://www.w3.org/2001/XMLSchema-instance}type=Constant, Value=.2}, ShadeInducedSenescenceRate={{http://www.w3.org/2001/XMLSchema-instance}type=LinearInterpolationFunction, XProperty=[Leaf].CohortCurrentRank.CoverAbove, XYPairs={X=[0, 0.5, 0.8, 1], Y=[0, 0, 0, 0.03]}}, InitialNConc={{http://www.w3.org/2001/XMLSchema-instance}type=Constant, Value=0}}
          Photosynthesis={{http://www.w3.org/2001/XMLSchema-instance}type=RUEModel, Memo=Potential photosynthesis is set by the radiation use efficiency (RUE in gDM/MJ).  Stress and CO2 adjustments are applied as: Photosynthesis =  RadnInt * RUE * Min(Ft, Min(Fn Fvpd)) * Fw * Fco2, RUE={{http://www.w3.org/2001/XMLSchema-instance}type=Constant, Value=1.2}, FT={{http://www.w3.org/2001/XMLSchema-instance}type=WeightedTemperatureFunction, MaximumTemperatureWeighting=0.75, XYPairs={X=[2, 12, 24, 34], Y=[0, 1, 1, 0]}}, FVPD={{http://www.w3.org/2001/XMLSchema-instance}type=LinearInterpolationFunction, XProperty=[Leaf].Photosynthesis.VPD, XYPairs={X=[0, 10, 50], Y=[1, 1, 1]}}, FN={{http://www.w3.org/2001/XMLSchema-instance}type=LinearInterpolationFunction, XProperty=[Leaf].Fn, XYPairs={X=[0, 1, 1.5], Y=[1, 1, 1]}}, FW={{http://www.w3.org/2001/XMLSchema-instance}type=LinearInterpolationFunction, XProperty=[Leaf].Fw, XYPairs={X=[0, 0.4, 1.5], Y=[0, 1, 1]}}, FCO2={{http://www.w3.org/2001/XMLSchema-instance}type=RUECO2Function, PhotosyntheticPathway=C3}}
          FrostFraction={{http://www.w3.org/2001/XMLSchema-instance}type=LinearInterpolationFunction, XProperty=[WeatherFile].MinT, XYPairs={X=[-1, 0], Y=[0, 0]}, Memo=Sets the proportion of leaf area that is killed by frost}
          ExtinctionCoeff={{http://www.w3.org/2001/XMLSchema-instance}type=MultiplyFunction, Memo=Quantifies the relationship between Leaf area index and radiation interception.  The PotentialExtinctionCoeff is the unstressed value and extinction coefficient declines in response to water stress as leaves wilt to reduce their radiation load, PotentialExtinctionCoeff={{http://www.w3.org/2001/XMLSchema-instance}type=Constant, Value=0.8}, WaterStressReduction={{http://www.w3.org/2001/XMLSchema-instance}type=LinearInterpolationFunction, XProperty=[Plant].WaterSupplyDemandRatio, XYPairs={X=[0, 1], Y=[0.5, 1]}}}
        GenericAboveGroundOrgan Stem
          Memo:
            The stem inherits from the generic organ so has 6 optional paramaters.  If you wish to override the defaults values specified below drop a function onto this organ and name and set accordingly
            1. SenescenceRate.  Default value is 0 which means the organ will not seness.  If senesence is required place a function on the organ named SenescenceRate.  It needs to be a number for 0 - 1 that represents the proportion of total biomass that is senessed each day.
            2. NReallocationFactor.  Default value is 0 which means the organ will not allow any of its N to be reallocated as it senesses.  If reallocation of senessing N is required place a function on the organ named NReallocationFactor.  It needs to be a number from 0 - 1 that represents the proportion of senessing N that is available for reallocation
            3. NRetranslocationFactor.  Default value is 0 which means none of the nonstructuralN in this organ is available for retranslocation.  If retranslocation is required place a function on the organ named NRetranslocationFactor. It needs to be a number from 0 -1 that represents the proportion of non-structural N that can be removed from an organ on any day.
            4. NitrogenDemandSwitch.  Default value is 1 which means the organ always has a N demand if its N content is below maximum N conc.  If N demand needs to be switched off place a function on the organ named NitrogenDemandSwitch which returns a value of 1 when no demand is expressed.
            5. DMRetranslocationFactor.  Default value is 0 which means the organ will not retranslocate NonStructural biomass.  If retranslocation is desired turn change this to a value between 0 - 1.  This represents the proportion of NonStructural biomass in the organ that can be retranslocated each day.
            6. StructuralFraction.  Derault value is 1 which means all biomass partitioned to this organ is put into the structrual pool.  If you wish this organ to have NonStructural DM that can be retranslocated set this to a value lower than 1 (between 0 - 1). Also note that making structural fraction less then 1 may influence the biomass partitioning to this organ because biomass is only partitioned to NonStructural Pools after the DM demand from other pools has been met.
          DMDemandFunction:
            {{http://www.w3.org/2001/XMLSchema-instance}type=Constant, Value=.2}
          StructuralFraction={{http://www.w3.org/2001/XMLSchema-instance}type=Constant, Value=1, Memo=Demand for DM is based on demand to grow structural components.  If the structural fraction is less than 1 the organ has the capacity to accumulate Non-structural biomass.  The lower the number the greater the capacity.  However, the arbitrator will only partition biomass to non-structural pools after all structural and metabolic DM demands have been met so the Non-Structural DM proportion of the organ may be less smaller that 1 - StructuralFraction.}
          MaximumNConc={{http://www.w3.org/2001/XMLSchema-instance}type=LinearInterpolationFunction, XProperty=[Phenology].StageCode.FunctionValue, XYPairs={X=[3, 4, 5.3], Y=[0.06, 0.06, 0.025]}, Memo=This is the highest N concentration that the organ can achieve.  This sets the upper limit to N demand and includes essential and Luxury N demands.  Essential N demand is set by the CriticalNConc of the organ.  Luxary N Demand is N is set by Live.Wt * (MaximumNConc - CriticalNConc) and is N the organ may take up in surples to its growth requirements and store in its Non-Structural pool for reallocation.}
          MinimumNConc={{http://www.w3.org/2001/XMLSchema-instance}type=Constant, Value=0.006, Memo=The MinimumNconc determins the organs essential N demand.  Essential N Demand is N is set by Live.Wt * MinimumNConc and is N the organ must take up to achieve its potential growth.  If the organ is not supplied with sufficient N to maintain MinimunNConc its growth will be constrained by the arbitrator.  All N taken up to MinimunNConc is placed in the StructuralPool and is not mobile}
          NitrogenDemandSwitch={{http://www.w3.org/2001/XMLSchema-instance}type=PhaseBasedSwitch, Start=Planting, End=FinalLeaf, Memo=stops the stem from demanding N following final leaf stage}
          NReallocationFactor={{http://www.w3.org/2001/XMLSchema-instance}type=Constant, Value=0, Memo=Controls the proportion of Non-Structural and senesing Metabolic N that may be Reallocated to other organs each day.}
          NRetranslocationFactor={{http://www.w3.org/2001/XMLSchema-instance}type=Constant, Value=.05, Memo=sets the proportion of Non-Structural N that may be Remobilised to meet the demand of other organs each day.  A value of zero means the crop will favor maintaining the N concentration and photosynthetic capacity of its current leaf area (behaviour of crops such as potato and wheat).  Increasing this will enable the crop to grow and increased leaf area with diluted N concentration, favoring larger leaf area over the higher N concentration and photosynthetic capacity of leaves (behaviour of crops such as maize)}
          DMRetranslocationFactor={{http://www.w3.org/2001/XMLSchema-instance}type=Constant, Value=0, Memo=This sets the proportion of NonStructural Wt that can be remobilised each day.}
    Input: FileName=C:\Users\hol353\ApsimX\Tests\TestObserved.txt
  DataStore: AutoCreateReport=false
  Tests
    Test:
      SimulationName  TableName  Type       ColumnNames                              Parameters
      Test            Report     Tolerance  Plant.Phenology.StageCode.FunctionValue  1,1
      Test            Report     Tolerance  Plant.Structure.Population               1,1
      Test            Report     Tolerance  Plant.Leaf.LAI                           1,1
      Test            Report     Tolerance  Plant.Leaf.CoverGreen                    1,1
      Test            Report     Tolerance  Plant.Leaf.Live.Wt                       1,1
      Test            Report     Tolerance  Plant.Stem.Live.Wt                       1,1
      Test            Report     Tolerance  Plant.Tuber.Live.Wt                      1,1
      Test            Report     Tolerance  Plant.Root.Live.Wt                       1,1
      Test            Report     Tolerance  Plant.Leaf.Live.N                        1,1
      Test            Report     Tolerance  Plant.Stem.Live.N                        1,1
      Test            Report     Tolerance  Plant.Tuber.Live.N                       1,1
      Test            Report     Tolerance  Plant.Root.Live.N                        1,1
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