Simulations: Version=67
  DataStore
  Simulation DevReportingRadcliffe
    Clock: Start=1982-07-01; End=1984-06-30
    Weather: FileName=Ruakura.met
    Manager ClimateController
      AllowControl = no
      EnableDate = 05/30/1979 00:00:00
      WithinYearControl = no
      ControlStart = 01-jan
      ControlEnd = 31-dec
      RainfallMultiplier = 0.7791
      RainfallAddition = 0
      RadiationMultiplier = 1
      RadiationAddition = 0
      MinTMultiplier = 0.9484
      MinTAddition = 0
      MaxTMultiplier = 0.9484
      MaxTAddition = 0
      WindMultiplier = 1
      WindAddition = 0
      VPMultiplier = 1
      VPAddition = 0
```csharp
using System;
using System.Xml.Serialization;
using Models.Core;
using Models.PMF;
using Models.Soils;
using APSIM.Shared.Utilities;

namespace Models
{
    [Serializable]
    public class Script : Model
    {
        // - Links to APSIM models
        [Link] Zone zone;
        [Link] Clock Clock;
        [Link] Weather Weather;
        [Link] ISummary summary = null;

        // - Paramters for this manager
        [Description("Enable? Set to 'No' to completely disable this manager")] public yesnoType AllowControl { get; set; }

        [Separator("General settings")]
        [Description("Start the climate controls beginning on date (dd/mmm/yyyy): ")] public DateTime EnableDate { get; set; }
        [Description("Implement climate control only during part of the year?")] public yesnoType WithinYearControl { get; set; }
        [Description("Within each year, the first day to start the climate controls is (dd-mmm)")] public string ControlStart { get; set; }
        [Description("Within each year, end last day of climate control is (dd-mmm)")] public string ControlEnd { get; set; }

        [Separator("Rainfall")]
        [Description("Rainfall multiplier (-): ")] public double RainfallMultiplier { get; set; }
        [Description("Rainfall addition (mm): ")] public double RainfallAddition { get; set; }

        [Separator("Radiation")]
        [Description("Radiation multiplier (-): ")] public double RadiationMultiplier { get; set; }
        [Description("Radiation addition (MJ/m2): ")] public double RadiationAddition { get; set; }

        [Separator("Minimum temperature")]
        [Description("Minimum temperature multiplier (-): ")] public double MinTMultiplier { get; set; }
        [Description("Minimum temperature addition (C): ")] public double MinTAddition { get; set; }

        [Separator("Maximum temperature")]
        [Description("Maximum temperature multiplier (-): ")] public double MaxTMultiplier { get; set; }
        [Description("Maximum temperature addition (C): ")] public double MaxTAddition { get; set; }

        [Separator("Wind speed")]
        [Description("Wind speed multiplier (-): ")] public double WindMultiplier { get; set; }
        [Description("Wind speed addition (m/s): ")] public double WindAddition { get; set; }

        [Separator("Vapour pressure")]
        [Description("Vapour pressure multiplier (-): ")] public double VPMultiplier { get; set; }
        [Description("Vapour pressure addition (hPa): ")] public double VPAddition { get; set; }

        [XmlIgnore] public string Message { get; set; }

        [XmlIgnore] public bool doControl { get; set; }
        [XmlIgnore] public int doControlInt { get; set; }
        //public DateTime ControlStartDate { get; set; }
        //public DateTime ControlEndDate { get; set; }


        [EventSubscribe("StartOfSimulation")] private void OnStartOfSimulation(object sender, EventArgs e)
        {   
            //Set the dates
            //ControlStartDate = DateTime.Parse(ControlStart + "-" + Clock.Today.Year.ToString());
            //ControlEndDate = DateTime.Parse(ControlEnd + "-" + Clock.Today.Year.ToString());
            Message = "";
        }


        [EventSubscribe("PreparingNewWeatherData")] private void OnDoManagement(object sender, EventArgs e)
        {
            // Check if this manager is enabled
            if ((AllowControl == yesnoType.yes) && (Clock.Today >= EnableDate))
            {
            	doControl = true;
	            if (WithinYearControl == yesnoType.yes)
	            	doControl = DateUtilities.WithinDates(ControlStart, Clock.Today, ControlEnd); 
            }

            if (doControl)
            	doControlInt = 1;
            else
            	doControlInt = 0;

            if (doControl)
            {
                // do the weather alterations 
                Weather.Rain = RainfallMultiplier * Weather.Rain + RainfallAddition;
                Weather.Radn = RadiationMultiplier * Weather.Radn + RadiationAddition;
                Weather.MinT = MinTMultiplier * Weather.MinT + MinTAddition;
                Weather.MaxT = MaxTMultiplier * Weather.MaxT + MaxTAddition;
                Weather.Wind = WindMultiplier * Weather.Wind + WindAddition;
                Weather.VP = VPMultiplier * Weather.VP + VPAddition;
            }
        }

        public enum yesnoType
        {
            /// <summary>a positive answer</summary>
            yes,
            /// <summary>a negative answer</summary>
            no
        }

	}
}
```
    Summary
    SoilArbitrator
    Zone Field: Area=1; Slope=0; AspectAngle=0; Altitude=50
      Manager CutRotation
        AllowControl = no
        CutRotationStartDate = 01/01/1900 00:00:00
        CutRotationEndDate = 12/31/2100 00:00:00
        IntervalType = FixedInterval
        CutInterval = 21
        DurationOfCut = 1
        RemoveAmountType = ResidualDM
        AmountGiven = 1000
        DMRemoveType = BasedOnDigestibility
        FractionN2Remove = 0.75
        ReturnType = AsDungUrine
        NDungType = DefineProportion
        ProportionN2Dung = 0.4
        CNRatioDung = 0
        UrineDepth = 250
```csharp
// Defoliates AgPasture on a regular rotation or one-off via a schedule
// currenty defoliates the amount specified by spreading evenly over the specified period

using System;
using System.Collections.Generic;
using System.Xml.Serialization;
using Models.Core;
using Models.PMF;
using Models.Soils;
using APSIM.Shared.Utilities;
using Models.Interfaces;
using Models.AgPasture;

namespace Models
{
    [Serializable]
    public class Script : Model
    {
        // - Links to APSIM models
        [Link] Zone myZone;
        [Link] Clock Clock;
        [Link] Fertiliser fertiliser;
        [ScopedLinkByName] ISolute no3;
        [Link] Soil mySoil;
        [Link] ISummary summary = null;

        List<AgPasture.PastureSpecies> Pasture = new List<AgPasture.PastureSpecies>();
        
        // - Paramters for this manager
        [Description("Allow this manager to control defoliation? ")]
        public yesnoType AllowControl { get; set; }
        [Description("Date to begin the rotation: ")]
        public DateTime CutRotationStartDate { get; set; }
        [Description("Date to finish the rotation: ")]
        public DateTime CutRotationEndDate { get; set; }
        [Description("How the interval is defined: ")]
        public rotationIntervalTypes IntervalType { get; set; }
        [Description("Rotation interval (days): ")]
        public int CutInterval { get; set; }
        [Description("Duration of each event (days): ")]
        public int DurationOfCut { get; set; }
        [Description("What amount is being defined: ")]
        public removeAmountTypes RemoveAmountType { get; set; }
        [Description("Amount to use (kg/ha): ")]
        public double AmountGiven { get; set; }
        [Description("How much of DM is removed from the field: ")]
        public removeDMTypes DMRemoveType { get; set; }
        [Description("Fraction of N that is removed from the field (0-1): ")]
        public double FractionN2Remove { get; set; }
        [Description("How defoliated material is returned to the field? ")]
        public returnTypes ReturnType { get; set; }
        [Description("How the partition of N to dung and urine are defined:")]
        public dungNContentTypes NDungType { get; set; }
        [Description("Proportion of returned N that goes to dung (0-1): ")]
        public double ProportionN2Dung { get; set; }
        [Description("The C:N of dung (typically around 20): ")]
        public double CNRatioDung { get; set; }
        [Description("Depth down to which urine is applied (mm): ")]
        public double UrineDepth { get; set; }

        // - Outputs from this manager
        [XmlIgnore][Units("g/m2")]// Description: Pasture DM defoliated today
        public double DefoliatedWt { get; set; }
        [XmlIgnore][Units("g/m2")]// Description: Pasture N defoliate today
        public double DefoliatedN { get; set; }
        [XmlIgnore][Units("g/m2")]// Description: Pasture DM harvested today
        public double HarvestedWt { get; set; }
        [XmlIgnore][Units("g/m2")]// Description: Pasture N harvested today
        public double HarvestedN { get; set; }
        [XmlIgnore][Units("g/m2")]// Description: Pasture DM removed from the field
        public double RemovedWt { get; set; }
        [XmlIgnore][Units("g/m2")]// Description: Pasture N removed from the field
        public double RemovedN { get; set; }
        [XmlIgnore][Units("g/m2")]// Description: Residue DM returned to the field
        public double ReturnedWt { get; set; }
        [XmlIgnore][Units("g/m2")]// Description: Residue N returned to the field
        public double ReturnedN { get; set; }
        [XmlIgnore][Units("g/m2")]// Description: Harvested N returned as dung (SurfaceOM)
        public double NReturnedInDung { get; set; }
        [XmlIgnore][Units("g/m2")]// Description: Harvested N returned as urine (urea)
        public double NReturnedInUrine { get; set; }
        [XmlIgnore][Units("day")]// Description: Number of days after last defoliation
        public int DaysAfterCut { get; set; }
        [XmlIgnore][Units("g/m2")]// Description: Total standing DM (Leaf + Stem/Sheath) before cut
        public double PreHarvestDM { get; set; }
        [XmlIgnore][Units("g/m2")]// Description: Total standing DM (Leaf + Stem/Sheath) after cut
        public double PostHarvestDM { get; set; }

        [XmlIgnore][Units("")] public bool HarvestedToday { get; set; } // auxiliary flag for defoliation

        // - Internal variables
        // fraction of harvested Dm to actually remove from field
        private double fractionDM2Remove = 1.0;
        // number of days for each defoliation event
        private int cuttingDuration = 0;
        // counter for day within each defoliation
        private int daysCutting = 0;
        // total existing DM harvestable
        private double existingDM;
        // total herbage to remove in g/m2 per day
        private double herbageToRemove;
        // type of DM amount (ResidualDM or DMToRemove)
        private string amountType;
        // auxiliary flag for defoliation
        private bool aCutHasHappened = false;
        // fraction of urine that is applied to each layer
        private double[] fractionUrine;
        // number of layer in the soil
        private int nLayers;

        // - Event to add residue or dung to surface OM
        public event BiomassRemovedDelegate BiomassRemoved;

        [EventSubscribe("StartOfSimulation")]
        private void OnStartOfSimulation(object sender, EventArgs e)
        {
            foreach (PastureSpecies species in Apsim.Children(myZone, typeof(PastureSpecies)))
                Pasture.Add(species);

            // reset variables
            DaysAfterCut = 0;
            resetVariables();
            cuttingDuration = DurationOfCut;
            HarvestedToday = false;
            
            // get the type of amount given
            if (RemoveAmountType == removeAmountTypes.ResidualDM)
                amountType = "SetResidueAmount";
            else
                amountType = "SetRemoveAmount";

            // make sure that rotation start when startDate < simulationStartDay
            if ((Clock.Today > CutRotationStartDate) && (Clock.Today < CutRotationEndDate))
                CutRotationStartDate = Clock.Today;
                
            // set the fraction of urine for each layer
            nLayers = mySoil.Thickness.Length;
            fractionUrine = new double[nLayers];
            double soilDepth = 0.0;
            double distFactor = 1.5;
            if (ReturnType == returnTypes.AsDungUrine)
            {
                double atZ0;
                double atZ1;
                double totalProp = UrineDepth * Math.Pow(1.0, distFactor) / (distFactor + 1.0);
                
                atZ1 = (UrineDepth - soilDepth) * Math.Pow(1.0 - soilDepth / UrineDepth, distFactor) / (distFactor + 1.0);
                for (int z = 0; z < nLayers; z++)
                {
                    atZ0 = atZ1;
                    soilDepth += mySoil.Thickness[z];
                    atZ1 = (UrineDepth - soilDepth) * Math.Pow(1.0 - soilDepth / UrineDepth, distFactor) / (distFactor + 1);
                    if (1.0 - (soilDepth / UrineDepth) < 0.0)
                        atZ1 = 0;
                    fractionUrine[z] = (atZ0 - atZ1) / totalProp;
                }
            }
        }
        
        [EventSubscribe("DoManagement")]
        private void OnDoManagement(object sender, EventArgs e)
        {
            HarvestedToday = false;

			// Check whether defoliation is allowed at all
            if (AllowControl == yesnoType.yes)
            {
                // Check whether defoliation can start
                if ((Clock.Today >= CutRotationStartDate) && (Clock.Today <= CutRotationEndDate))
                {
                    if (Clock.Today == CutRotationStartDate)
                        DaysAfterCut = CutInterval;
    
                    // Check whether we should start a defoliation
                    if ((Pasture[0].IsAlive) && (DaysAfterCut >= (CutInterval - 1)))
                        StartDefoliation(AmountGiven, amountType, DurationOfCut);
                }
            }
            //// Note: Only the code above should be limited by 'AllowControl'. So the rest of the code
            ////  can be used by being called from another manager or a schedulle thingy


            // Check whether we need to continue cutting
            if ((daysCutting > 0) && (daysCutting < cuttingDuration))
            {
                // reset outputs
                resetVariables();

                defoliatePasture(herbageToRemove);
                if (ReturnType == returnTypes.AsResidue)
                    returnResidues();
                else
                    returnExcreta();
                daysCutting += 1;
                if (daysCutting == cuttingDuration)
                {
                    PostHarvestDM = 0.0;
                    foreach (PastureSpecies species in Pasture)
                        PostHarvestDM += species.StandingHerbageWt;
                }
            }

            // reset outputs
            if (daysCutting < 0)
            {
                resetVariables();
                daysCutting = 0;
            }
        }

        [EventSubscribe("DoManagementCalculations")]
        private void OnDoManagementCalculations(object sender, EventArgs e)
        {
            // Check whether a cutting has finished
            if (daysCutting == cuttingDuration)
            {
                aCutHasHappened = true;
                daysCutting = -1;
            }

            // Increase the counter for days after cutting
            if (aCutHasHappened && (daysCutting == 0))
                DaysAfterCut += 1;
        }

        // Resets the values of all outputs
        private void resetVariables()
        {
            DefoliatedWt = 0.0;
            DefoliatedN = 0.0;
            HarvestedWt = 0.0;
            HarvestedN = 0.0;
            RemovedWt = 0.0;
            RemovedN = 0.0;
            ReturnedWt = 0.0;
            ReturnedN = 0.0;
            NReturnedInDung = 0.0;
            NReturnedInUrine = 0.0;
        }

        // Description: Perform the basic calculations for defoliation
        public void StartDefoliation(double amountDM, string amountType, int duration)
        {
            // Get the existing plant amount
            existingDM = 0.0;
            PreHarvestDM = 0.0;
            HarvestedToday = true;
            foreach (PastureSpecies species in Pasture)
            {
                PreHarvestDM += species.StandingHerbageWt;
                existingDM += species.HarvestableWt;
            }
            
            // Check the amount to remove and print some info
            if ((amountType == "SetRemoveAmount") && (existingDM >= amountDM / duration))
            {
                summary.WriteMessage(this, "   Defoliating " + (10 * amountDM).ToString("#0.0") + "kg/ha over " + duration + " days");
                herbageToRemove = amountDM / duration;
            }
            else if ((amountType == "SetResidueAmount") && (existingDM >= amountDM))
            {
                summary.WriteMessage(this, "   Defoliating down to approximately " + (10 * amountDM).ToString("#0.0") + "kg/ha over " + duration + " days");
                herbageToRemove = (PreHarvestDM - amountDM) / duration;
            }
            else
            {
                summary.WriteMessage(this, "   Defoliation will not happend because there is not enough plant material");
                if (IntervalType == rotationIntervalTypes.FixedInterval)
                    DaysAfterCut = -duration;
                return;
            }

            // Start defoliation
            cuttingDuration = duration;
            defoliatePasture(herbageToRemove);
            if (ReturnType == returnTypes.AsResidue)
                returnResidues();
            else
                returnExcreta();
                
            daysCutting = 1;
            DaysAfterCut = 0;
            if (daysCutting == cuttingDuration)
            {
                PostHarvestDM = 0.0;
                foreach (PastureSpecies species in Pasture)
                    PostHarvestDM += species.StandingHerbageWt;
            }
        }

        // Do the DM removal
        private void defoliatePasture(double removeAmount)
        {
            // Remove a proportion of required DM from each species
            DefoliatedWt = 0.0;
            DefoliatedN = 0.0;
            foreach (PastureSpecies species in Pasture)
            {
                double amountToRemove = removeAmount * species.HarvestableWt / existingDM;
                species.Graze(amount: amountToRemove, type: "SetRemoveAmount");
                DefoliatedWt += species.HarvestedWt;
                DefoliatedN += species.HarvestedN;
            }
            
            // total harvested is equal total defoliated, for now
            HarvestedWt = DefoliatedWt;
            HarvestedN = DefoliatedN;

            // get amounts actually removed from field and that to be returned (dung/urine)
            if (DMRemoveType == removeDMTypes.RemoveAll)
                fractionDM2Remove = 1.0;
            else if (DMRemoveType == removeDMTypes.RemoveNone)
                fractionDM2Remove = 0.0;
            else
            {
                fractionDM2Remove = 0.0;
                foreach (PastureSpecies species in Pasture)
                    fractionDM2Remove += species.HarvestedDigestibility * species.HarvestedWt;
                fractionDM2Remove /= removeAmount;
            }
            
            RemovedWt = HarvestedWt * fractionDM2Remove;
            RemovedN = HarvestedN * FractionN2Remove;
            ReturnedWt = HarvestedWt - RemovedWt;
            ReturnedN = HarvestedN - RemovedN;

            if (ReturnType == returnTypes.AsDungUrine)
            {
                if (NDungType == dungNContentTypes.DefineProportion)
                    NReturnedInDung = ReturnedN * ProportionN2Dung;
                else
                    NReturnedInDung = Math.Min(ReturnedN, ReturnedWt * 0.4 / CNRatioDung);
                NReturnedInUrine = ReturnedN - NReturnedInDung;
            }
            else
            {
                NReturnedInDung = 0.0;
                NReturnedInUrine = 0.0;
            }
        }
        
        // Return dung and urine
        private void returnExcreta()
        {
            if ((ReturnedWt > 0.0) || (NReturnedInDung > 0.0))
            {
                PMF.BiomassRemovedType BiomassDung = new PMF.BiomassRemovedType();
                string[] type = new string[] { "RuminantDung_PastureFed" };
                float[] dltdm = new float[] { (Single)ReturnedWt };
                float[] dltn = new float[] { (Single)NReturnedInDung };
                float[] dltp = new float[] { 0 };
                float[] fraction = new float[] { 1 };     // fraction is always 1.0 here

                BiomassDung.crop_type = "RuminantDung_PastureFed";
                BiomassDung.dm_type = type;
                BiomassDung.dlt_crop_dm = dltdm;
                BiomassDung.dlt_dm_n = dltn;
                BiomassDung.dlt_dm_p = dltp;
                BiomassDung.fraction_to_residue = fraction;
                BiomassRemoved.Invoke(BiomassDung);
            }

            if (NReturnedInUrine > 0.0)
            {
                double[] myUrineDeposition = new double[nLayers];
                for (int z = 0; z < nLayers; z++)
                    myUrineDeposition[z] = NReturnedInUrine * fractionUrine[z];

                no3.AddKgHaDelta(SoluteSetterType.Fertiliser, myUrineDeposition);
                //fertiliser.Apply(NReturnedInUrine * 10, Fertiliser.Types.UreaN, 1.0);
            }
        }

        // Return pasture residues
        private void returnResidues()
        {
            if ((ReturnedWt > 0.0) || (ReturnedN > 0.0))
            {
                PMF.BiomassRemovedType BiomassDung = new PMF.BiomassRemovedType();
                string[] type = new string[] { "Grass" };
                float[] dltdm = new float[] { (Single)ReturnedWt };
                float[] dltn = new float[] { (Single)ReturnedN };
                float[] dltp = new float[] { 0 };
                float[] fraction = new float[] { 1 };     // fraction is always 1.0 here

                BiomassDung.crop_type = "Grass";
                BiomassDung.dm_type = type;
                BiomassDung.dlt_crop_dm = dltdm;
                BiomassDung.dlt_dm_n = dltn;
                BiomassDung.dlt_dm_p = dltp;
                BiomassDung.fraction_to_residue = fraction;
                BiomassRemoved.Invoke(BiomassDung);
            }
        }
        
        // Auxiliary bits and pieces  - - - - - - - - - - - - - - - - - - - - - - - -  - - - - -  - -

        public enum yesnoType
        {
            /// <summary>a positive answer</summary>
            yes,
            /// <summary>a negative answer</summary>
            no
        }

        public enum removeAmountTypes
        {
            /// <summary>Setting DM amount to remove</summary>
            DMToRemove,
            /// <summary>Setting residual DM amount</summary>
            ResidualDM
        }

        public enum rotationIntervalTypes
        {
            /// <summary>Setting a fixed interval</summary>
            FixedInterval,
            /// <summary>Setting a target (minimum) inteval</summary>
            TargetInterval
        }

        public enum removeDMTypes
        {
            /// <summary>Remove all DM</summary>
            RemoveAll,
            /// <summary>Remove no DM</summary>
            RemoveNone,
            /// <summary>Remove a fraction based on digestibility</summary>
            BasedOnDigestibility
        }
        
        public enum returnTypes
        {
            /// <summary>Return plant material as residue</summary>
            AsResidue,
            /// <summary>Return meterial as dung and urine</summary>
            AsDungUrine
        }

        public enum dungNContentTypes
        {
            /// <summary>Define the proportion of N returned as dung</summary>
            DefineProportion,
            /// <summary>Define the C:N of dung</summary>
            DefineCNratio,
        }
    }
}
```
      Manager AutomaticIrrigation
        allowIrrigation = False
        seasonStart = 15-Aug
        seasonEnd = 30-May
        seasonsAllocation = 10000
        triggerDeficit = 50
        targetDeficit = 99
        returndays = 1
        maximumAmount = 30
        depthPAWC = 300
```csharp
using System;
using Models.Core;
using Models.PMF;
using Models.Soils;
using System.Xml.Serialization;
using Models.PMF;
using APSIM.Shared.Utilities;

        
namespace Models
{
    [Serializable] 
    [System.Xml.Serialization.XmlInclude(typeof(Model))]
    public class Script : Model
    {
        //Communication to other modules
        [Link] ISummary summary = null;
        [Link] Irrigation Irrigation;
        [Link] Clock Clock;
        [Link] Soil Soil;
        [Link(IsOptional = true)] IPlant existingCrop;
       
        //User inputs from properties tab
        [Description("Turn irrigation on?")]
        public bool allowIrrigation { get; set; }
        [Description("Start of irrigation season (dd-MMM)")]
        public string seasonStart { get; set; }
        [Description("End of irrigation season (dd-MMM)")]
        public string seasonEnd { get; set; }
        [Description("Season allocation (mm)")]
        public double seasonsAllocation { get; set; }
        [Description("Deficit to trigger irrigation (% PAWC)")]
        public double triggerDeficit { get; set; }
        [Description("Deficit to stop irrigaton (% PAWC)")]
        public double targetDeficit { get; set; }
        [Description("Minimum days for irrigation to return")]
        public double returndays { get; set; }
        [Description("Maximum irrigation application (mm/day)")]
        public double maximumAmount { get; set; }
        [Description("Depth to calculate PAWC (mm)")]
        public double depthPAWC { get; set; }

        //Class members
        [XmlIgnore] public double TopSWdeficit { get; set; }
        [XmlIgnore] public double TopSWC { get; set; }
        [XmlIgnore] public double DaysSinceIrrigation { get; set; }
        [XmlIgnore] public double AmountToApply { get; set; }
        [XmlIgnore] public double SeasonAppliedAmount { get; set; }
        
        private bool IrrigationIsAllowed { get; set; }
        private bool SeasonIsOpen { get; set; }
        private bool CropIsActive { get; set; }
        private bool IrrigatorIsAvailable { get; set; }
        private bool SoilIsDry { get; set; }

        private DateTime StartDate;
        private DateTime EndDate;
        private double TopDUL;
        private double TopLL;
        private int nLayers;
    
        //Calculate static soil variables
        [EventSubscribe("StartOfSimulation")]
        private void OnStartOfSimulation(object sender, EventArgs e)
        {   
            //Set the season dates
            StartDate = DateTime.Parse(seasonStart + "-" + Clock.Today.Year.ToString());
            EndDate = DateTime.Parse(seasonEnd + "-" + Clock.Today.Year.ToString());
            
            //Can we irrigate at all?
            IrrigationIsAllowed = false; 
            if (allowIrrigation)
                IrrigationIsAllowed = true; 

            //Calculate soil water variables
            double depthFromSurface = 0.0;
            double fracLayer = 0.0;
            nLayers = Soil.Thickness.Length;
            for (int layer = 0; layer < nLayers; layer++)
            {
                fracLayer = Math.Min(1.0, (depthPAWC - depthFromSurface) / Soil.Thickness[layer]);
                TopLL += Soil.LL15mm[layer] * fracLayer;
                TopDUL += Soil.DULmm[layer] * fracLayer;
                depthFromSurface += Soil.Thickness[layer];
                if (depthFromSurface >= depthPAWC)
                    layer = nLayers;
            }
        }
             
        //Determine daily requirement for irrigation
        [EventSubscribe("StartOfDay")]
        private void OnStartOfDay(object sender, EventArgs e)
        {
            //Can we irrigate today?          
            SeasonIsOpen = isBetween(Clock.Today, StartDate, EndDate);

            //Is there a crop in the ground that needs irrigation?
            CropIsActive = false;
            if ((existingCrop != null) && (existingCrop.IsAlive))
                CropIsActive = true;
            //if ((existingCrop.Phenology.Stage >= 3.0) && (existingCrop.Phenology.Stage < 6.0))
          
            //Is the irrigator available?
            IrrigatorIsAvailable = false;
            DaysSinceIrrigation += 1;
            if (DaysSinceIrrigation >= returndays)
                IrrigatorIsAvailable = true;
          
            //Is the soil dry enough to require irrigation?
            SoilIsDry = false;
            double depthFromSurface = 0.0;
            double fracLayer = 0.0;
            TopSWC = 0.0;
            for (int layer = 0; layer < nLayers; layer++)
            //for (int layer = 0; depthFromSurface < depthPAWC + Soil.Thickness[layer]; layer++)
            {
                fracLayer = Math.Min(1.0, (depthPAWC - depthFromSurface) / Soil.Thickness[layer]);
                TopSWC += Soil.SoilWater.SWmm[layer] * fracLayer;
                depthFromSurface += Soil.Thickness[layer];
                if (depthFromSurface >= depthPAWC)
                    layer = nLayers;
            }
            
            TopSWdeficit = TopSWC - TopDUL;
            if (Math.Max(0.0, -TopSWdeficit) >= (TopDUL - TopLL) * (100 - triggerDeficit) / 100)
                SoilIsDry = true;
                
            //Are all the conditions ratifying irrigation
            if (IrrigationIsAllowed && SeasonIsOpen && CropIsActive && IrrigatorIsAvailable && SoilIsDry)
            {
                //Lets bloody well irrigate then!!!!
                AmountToApply = TopDUL * targetDeficit / 100 - TopSWC;
                AmountToApply = Math.Max(0.0, Math.Min(AmountToApply, seasonsAllocation - SeasonAppliedAmount));
                Irrigation.Apply(AmountToApply);
                DaysSinceIrrigation = 0;
                SeasonAppliedAmount += AmountToApply;
            }
        }
        
        ///Checks whether theDate is between iniDate and endDate (non-year specific)
        private bool isBetween(DateTime theDay, DateTime iniDate, DateTime endDate)
        {
            bool result = false;
            if (iniDate.DayOfYear < endDate.DayOfYear)
            {
                // period is within one year, ex: summer in the northern hemisphere
                if ((theDay.DayOfYear >= iniDate.DayOfYear) && (theDay.DayOfYear <= endDate.DayOfYear))
                    result = true;
            }
            else
            {
                // period goes over the end of the year, ex: summer in the southern hemisphere
                if ((theDay.DayOfYear >= iniDate.DayOfYear) || (theDay.DayOfYear <= endDate.DayOfYear))
                    result = true;
            }
            
            return result;
        }
    }
}
```
      Operations IrrigationSchedule
      Operations CuttingRuakura
        1982-07-15  [CutRotation].Script.StartDefoliation(amountDM: 1000, amountType: "SetResidueAmount",duration:1)
        1982-08-12  [CutRotation].Script.StartDefoliation(amountDM: 1000, amountType: "SetResidueAmount",duration:1)
        1982-09-09  [CutRotation].Script.StartDefoliation(amountDM: 1000, amountType: "SetResidueAmount",duration:1)
        1982-10-07  [CutRotation].Script.StartDefoliation(amountDM: 1000, amountType: "SetResidueAmount",duration:1)
        1982-11-04  [CutRotation].Script.StartDefoliation(amountDM: 1000, amountType: "SetResidueAmount",duration:1)
        1982-12-02  [CutRotation].Script.StartDefoliation(amountDM: 1000, amountType: "SetResidueAmount",duration:1)
        1982-12-30  [CutRotation].Script.StartDefoliation(amountDM: 1000, amountType: "SetResidueAmount",duration:1)
        1983-01-27  [CutRotation].Script.StartDefoliation(amountDM: 1000, amountType: "SetResidueAmount",duration:1)
        1983-02-24  [CutRotation].Script.StartDefoliation(amountDM: 1000, amountType: "SetResidueAmount",duration:1)
        1983-03-24  [CutRotation].Script.StartDefoliation(amountDM: 1000, amountType: "SetResidueAmount",duration:1)
        1983-04-21  [CutRotation].Script.StartDefoliation(amountDM: 1000, amountType: "SetResidueAmount",duration:1)
        1983-05-19  [CutRotation].Script.StartDefoliation(amountDM: 1000, amountType: "SetResidueAmount",duration:1)
        1983-06-16  [CutRotation].Script.StartDefoliation(amountDM: 1000, amountType: "SetResidueAmount",duration:1)
        1983-07-14  [CutRotation].Script.StartDefoliation(amountDM: 1000, amountType: "SetResidueAmount",duration:1)
        1983-08-11  [CutRotation].Script.StartDefoliation(amountDM: 1000, amountType: "SetResidueAmount",duration:1)
        1983-09-08  [CutRotation].Script.StartDefoliation(amountDM: 1000, amountType: "SetResidueAmount",duration:1)
        1983-10-06  [CutRotation].Script.StartDefoliation(amountDM: 1000, amountType: "SetResidueAmount",duration:1)
        1983-11-03  [CutRotation].Script.StartDefoliation(amountDM: 1000, amountType: "SetResidueAmount",duration:1)
        1983-12-01  [CutRotation].Script.StartDefoliation(amountDM: 1000, amountType: "SetResidueAmount",duration:1)
        1983-12-29  [CutRotation].Script.StartDefoliation(amountDM: 1000, amountType: "SetResidueAmount",duration:1)
        1984-01-26  [CutRotation].Script.StartDefoliation(amountDM: 1000, amountType: "SetResidueAmount",duration:1)
        1984-02-23  [CutRotation].Script.StartDefoliation(amountDM: 1000, amountType: "SetResidueAmount",duration:1)
        1984-03-22  [CutRotation].Script.StartDefoliation(amountDM: 1000, amountType: "SetResidueAmount",duration:1)
        1984-04-19  [CutRotation].Script.StartDefoliation(amountDM: 1000, amountType: "SetResidueAmount",duration:1)
        1984-05-17  [CutRotation].Script.StartDefoliation(amountDM: 1000, amountType: "SetResidueAmount",duration:1)
        1984-06-14  [CutRotation].Script.StartDefoliation(amountDM: 1000, amountType: "SetResidueAmount",duration:1)
        1984-07-12  [CutRotation].Script.StartDefoliation(amountDM: 1000, amountType: "SetResidueAmount",duration:1)
        1984-08-09  [CutRotation].Script.StartDefoliation(amountDM: 1000, amountType: "SetResidueAmount",duration:1)
        1984-09-06  [CutRotation].Script.StartDefoliation(amountDM: 1000, amountType: "SetResidueAmount",duration:1)
        1984-10-04  [CutRotation].Script.StartDefoliation(amountDM: 1000, amountType: "SetResidueAmount",duration:1)
        1984-11-01  [CutRotation].Script.StartDefoliation(amountDM: 1000, amountType: "SetResidueAmount",duration:1)
        1984-11-29  [CutRotation].Script.StartDefoliation(amountDM: 1000, amountType: "SetResidueAmount",duration:1)
        1984-12-27  [CutRotation].Script.StartDefoliation(amountDM: 1000, amountType: "SetResidueAmount",duration:1)
        1985-01-24  [CutRotation].Script.StartDefoliation(amountDM: 1000, amountType: "SetResidueAmount",duration:1)
        1985-02-21  [CutRotation].Script.StartDefoliation(amountDM: 1000, amountType: "SetResidueAmount",duration:1)
        1985-03-21  [CutRotation].Script.StartDefoliation(amountDM: 1000, amountType: "SetResidueAmount",duration:1)
        1985-04-18  [CutRotation].Script.StartDefoliation(amountDM: 1000, amountType: "SetResidueAmount",duration:1)
        1985-05-16  [CutRotation].Script.StartDefoliation(amountDM: 1000, amountType: "SetResidueAmount",duration:1)
        1985-06-13  [CutRotation].Script.StartDefoliation(amountDM: 1000, amountType: "SetResidueAmount",duration:1)
        1985-07-11  [CutRotation].Script.StartDefoliation(amountDM: 1000, amountType: "SetResidueAmount",duration:1)
        1985-08-08  [CutRotation].Script.StartDefoliation(amountDM: 1000, amountType: "SetResidueAmount",duration:1)
        1985-09-05  [CutRotation].Script.StartDefoliation(amountDM: 1000, amountType: "SetResidueAmount",duration:1)
        1985-10-03  [CutRotation].Script.StartDefoliation(amountDM: 1000, amountType: "SetResidueAmount",duration:1)
        1985-10-31  [CutRotation].Script.StartDefoliation(amountDM: 1000, amountType: "SetResidueAmount",duration:1)
        1985-11-28  [CutRotation].Script.StartDefoliation(amountDM: 1000, amountType: "SetResidueAmount",duration:1)
        1985-12-26  [CutRotation].Script.StartDefoliation(amountDM: 1000, amountType: "SetResidueAmount",duration:1)
        1986-01-23  [CutRotation].Script.StartDefoliation(amountDM: 1000, amountType: "SetResidueAmount",duration:1)
        1986-02-20  [CutRotation].Script.StartDefoliation(amountDM: 1000, amountType: "SetResidueAmount",duration:1)
        1986-03-20  [CutRotation].Script.StartDefoliation(amountDM: 1000, amountType: "SetResidueAmount",duration:1)
        1986-04-17  [CutRotation].Script.StartDefoliation(amountDM: 1000, amountType: "SetResidueAmount",duration:1)
        1986-05-15  [CutRotation].Script.StartDefoliation(amountDM: 1000, amountType: "SetResidueAmount",duration:1)
        1986-06-12  [CutRotation].Script.StartDefoliation(amountDM: 1000, amountType: "SetResidueAmount",duration:1)
        1986-07-10  [CutRotation].Script.StartDefoliation(amountDM: 1000, amountType: "SetResidueAmount",duration:1)
        1986-08-07  [CutRotation].Script.StartDefoliation(amountDM: 1000, amountType: "SetResidueAmount",duration:1)
        1986-09-04  [CutRotation].Script.StartDefoliation(amountDM: 1000, amountType: "SetResidueAmount",duration:1)
        1986-10-02  [CutRotation].Script.StartDefoliation(amountDM: 1000, amountType: "SetResidueAmount",duration:1)
        1986-10-30  [CutRotation].Script.StartDefoliation(amountDM: 1000, amountType: "SetResidueAmount",duration:1)
        1986-11-27  [CutRotation].Script.StartDefoliation(amountDM: 1000, amountType: "SetResidueAmount",duration:1)
        1986-12-25  [CutRotation].Script.StartDefoliation(amountDM: 1000, amountType: "SetResidueAmount",duration:1)
        1987-01-22  [CutRotation].Script.StartDefoliation(amountDM: 1000, amountType: "SetResidueAmount",duration:1)
        1987-02-19  [CutRotation].Script.StartDefoliation(amountDM: 1000, amountType: "SetResidueAmount",duration:1)
        1987-03-19  [CutRotation].Script.StartDefoliation(amountDM: 1000, amountType: "SetResidueAmount",duration:1)
        1987-04-16  [CutRotation].Script.StartDefoliation(amountDM: 1000, amountType: "SetResidueAmount",duration:1)
        1987-05-14  [CutRotation].Script.StartDefoliation(amountDM: 1000, amountType: "SetResidueAmount",duration:1)
        1987-06-11  [CutRotation].Script.StartDefoliation(amountDM: 1000, amountType: "SetResidueAmount",duration:1)
        1987-07-09  [CutRotation].Script.StartDefoliation(amountDM: 1000, amountType: "SetResidueAmount",duration:1)
        1987-08-06  [CutRotation].Script.StartDefoliation(amountDM: 1000, amountType: "SetResidueAmount",duration:1)
        1987-09-03  [CutRotation].Script.StartDefoliation(amountDM: 1000, amountType: "SetResidueAmount",duration:1)
        1987-10-01  [CutRotation].Script.StartDefoliation(amountDM: 1000, amountType: "SetResidueAmount",duration:1)
        1987-10-29  [CutRotation].Script.StartDefoliation(amountDM: 1000, amountType: "SetResidueAmount",duration:1)
        1987-11-26  [CutRotation].Script.StartDefoliation(amountDM: 1000, amountType: "SetResidueAmount",duration:1)
        1987-12-24  [CutRotation].Script.StartDefoliation(amountDM: 1000, amountType: "SetResidueAmount",duration:1)
        1988-01-21  [CutRotation].Script.StartDefoliation(amountDM: 1000, amountType: "SetResidueAmount",duration:1)
        1988-02-18  [CutRotation].Script.StartDefoliation(amountDM: 1000, amountType: "SetResidueAmount",duration:1)
        1988-03-17  [CutRotation].Script.StartDefoliation(amountDM: 1000, amountType: "SetResidueAmount",duration:1)
        1988-04-14  [CutRotation].Script.StartDefoliation(amountDM: 1000, amountType: "SetResidueAmount",duration:1)
        1988-05-12  [CutRotation].Script.StartDefoliation(amountDM: 1000, amountType: "SetResidueAmount",duration:1)
        1988-06-09  [CutRotation].Script.StartDefoliation(amountDM: 1000, amountType: "SetResidueAmount",duration:1)
        1988-07-07  [CutRotation].Script.StartDefoliation(amountDM: 1000, amountType: "SetResidueAmount",duration:1)
        1988-08-04  [CutRotation].Script.StartDefoliation(amountDM: 1000, amountType: "SetResidueAmount",duration:1)
        1988-09-01  [CutRotation].Script.StartDefoliation(amountDM: 1000, amountType: "SetResidueAmount",duration:1)
        1988-09-29  [CutRotation].Script.StartDefoliation(amountDM: 1000, amountType: "SetResidueAmount",duration:1)
        1988-10-27  [CutRotation].Script.StartDefoliation(amountDM: 1000, amountType: "SetResidueAmount",duration:1)
        1988-11-24  [CutRotation].Script.StartDefoliation(amountDM: 1000, amountType: "SetResidueAmount",duration:1)
        1988-12-22  [CutRotation].Script.StartDefoliation(amountDM: 1000, amountType: "SetResidueAmount",duration:1)
        1989-01-19  [CutRotation].Script.StartDefoliation(amountDM: 1000, amountType: "SetResidueAmount",duration:1)
        1989-02-16  [CutRotation].Script.StartDefoliation(amountDM: 1000, amountType: "SetResidueAmount",duration:1)
        1989-03-16  [CutRotation].Script.StartDefoliation(amountDM: 1000, amountType: "SetResidueAmount",duration:1)
        1989-04-13  [CutRotation].Script.StartDefoliation(amountDM: 1000, amountType: "SetResidueAmount",duration:1)
        1989-05-11  [CutRotation].Script.StartDefoliation(amountDM: 1000, amountType: "SetResidueAmount",duration:1)
        1989-06-08  [CutRotation].Script.StartDefoliation(amountDM: 1000, amountType: "SetResidueAmount",duration:1)
        1989-07-06  [CutRotation].Script.StartDefoliation(amountDM: 1000, amountType: "SetResidueAmount",duration:1)
        1989-08-03  [CutRotation].Script.StartDefoliation(amountDM: 1000, amountType: "SetResidueAmount",duration:1)
        1989-08-31  [CutRotation].Script.StartDefoliation(amountDM: 1000, amountType: "SetResidueAmount",duration:1)
        1989-09-28  [CutRotation].Script.StartDefoliation(amountDM: 1000, amountType: "SetResidueAmount",duration:1)
        1989-10-26  [CutRotation].Script.StartDefoliation(amountDM: 1000, amountType: "SetResidueAmount",duration:1)
        1989-11-23  [CutRotation].Script.StartDefoliation(amountDM: 1000, amountType: "SetResidueAmount",duration:1)
        1989-12-21  [CutRotation].Script.StartDefoliation(amountDM: 1000, amountType: "SetResidueAmount",duration:1)
        1990-01-18  [CutRotation].Script.StartDefoliation(amountDM: 1000, amountType: "SetResidueAmount",duration:1)
        1990-02-15  [CutRotation].Script.StartDefoliation(amountDM: 1000, amountType: "SetResidueAmount",duration:1)
        1990-03-15  [CutRotation].Script.StartDefoliation(amountDM: 1000, amountType: "SetResidueAmount",duration:1)
        1990-04-12  [CutRotation].Script.StartDefoliation(amountDM: 1000, amountType: "SetResidueAmount",duration:1)
        1990-05-10  [CutRotation].Script.StartDefoliation(amountDM: 1000, amountType: "SetResidueAmount",duration:1)
        1990-06-07  [CutRotation].Script.StartDefoliation(amountDM: 1000, amountType: "SetResidueAmount",duration:1)
        1990-07-05  [CutRotation].Script.StartDefoliation(amountDM: 1000, amountType: "SetResidueAmount",duration:1)
        1990-08-02  [CutRotation].Script.StartDefoliation(amountDM: 1000, amountType: "SetResidueAmount",duration:1)
        1990-08-30  [CutRotation].Script.StartDefoliation(amountDM: 1000, amountType: "SetResidueAmount",duration:1)
        1990-09-27  [CutRotation].Script.StartDefoliation(amountDM: 1000, amountType: "SetResidueAmount",duration:1)
        1990-10-25  [CutRotation].Script.StartDefoliation(amountDM: 1000, amountType: "SetResidueAmount",duration:1)
        1990-11-22  [CutRotation].Script.StartDefoliation(amountDM: 1000, amountType: "SetResidueAmount",duration:1)
        1990-12-20  [CutRotation].Script.StartDefoliation(amountDM: 1000, amountType: "SetResidueAmount",duration:1)
        1991-01-17  [CutRotation].Script.StartDefoliation(amountDM: 1000, amountType: "SetResidueAmount",duration:1)
        1991-02-14  [CutRotation].Script.StartDefoliation(amountDM: 1000, amountType: "SetResidueAmount",duration:1)
        1991-03-14  [CutRotation].Script.StartDefoliation(amountDM: 1000, amountType: "SetResidueAmount",duration:1)
        1991-04-11  [CutRotation].Script.StartDefoliation(amountDM: 1000, amountType: "SetResidueAmount",duration:1)
        1991-05-09  [CutRotation].Script.StartDefoliation(amountDM: 1000, amountType: "SetResidueAmount",duration:1)
        1991-06-06  [CutRotation].Script.StartDefoliation(amountDM: 1000, amountType: "SetResidueAmount",duration:1)
        1991-07-04  [CutRotation].Script.StartDefoliation(amountDM: 1000, amountType: "SetResidueAmount",duration:1)
        1991-08-01  [CutRotation].Script.StartDefoliation(amountDM: 1000, amountType: "SetResidueAmount",duration:1)
        1991-08-29  [CutRotation].Script.StartDefoliation(amountDM: 1000, amountType: "SetResidueAmount",duration:1)
        1991-09-26  [CutRotation].Script.StartDefoliation(amountDM: 1000, amountType: "SetResidueAmount",duration:1)
        1991-10-24  [CutRotation].Script.StartDefoliation(amountDM: 1000, amountType: "SetResidueAmount",duration:1)
        1991-11-21  [CutRotation].Script.StartDefoliation(amountDM: 1000, amountType: "SetResidueAmount",duration:1)
        1991-12-19  [CutRotation].Script.StartDefoliation(amountDM: 1000, amountType: "SetResidueAmount",duration:1)
        1992-01-16  [CutRotation].Script.StartDefoliation(amountDM: 1000, amountType: "SetResidueAmount",duration:1)
        1992-02-13  [CutRotation].Script.StartDefoliation(amountDM: 1000, amountType: "SetResidueAmount",duration:1)
        1992-03-12  [CutRotation].Script.StartDefoliation(amountDM: 1000, amountType: "SetResidueAmount",duration:1)
        1992-04-09  [CutRotation].Script.StartDefoliation(amountDM: 1000, amountType: "SetResidueAmount",duration:1)
        1992-05-07  [CutRotation].Script.StartDefoliation(amountDM: 1000, amountType: "SetResidueAmount",duration:1)
        1992-06-04  [CutRotation].Script.StartDefoliation(amountDM: 1000, amountType: "SetResidueAmount",duration:1)
      Manager DoReporting
        CutterName = CutRotation
        HarvestName = HarvestedToday
        EnableOnHarvest = True
        ReportNameHarvest = HarvestReport
        EnableOnAnnual = True
        ReportNameAnnual = AnnualReport
        ReportDateAnnual = 31-may
        EnableOnSeason = True
        ReportNameSeasonal = SeasonalReport
        SummerEndDate = 28-feb
        AutumnEndDate = 31-may
        WinterEndDate = 31-aug
        SpringEndDate = 30-nov
        EnableOnSummary = True
        ReportNameSummary = SummaryReport
        AnnualHarvestedWt = 0
        AnnualIrrigated = 0
        IntervalNHA = 0
```csharp
using Models.Interfaces;
using Models.Utilities;
using APSIM.Shared.Utilities;
using Models.Soils;
using Models.PMF;
using Models.Core;
using System.Linq;
using System.Collections.Generic;
using System.Xml.Serialization;
using System;
using Models.AgPasture;


namespace Models
{
    [Serializable]
    public class Script : Model
    {
        [Link] private Zone zone;
        [Link] private Simulation Simulation;
        [Link] private Clock Clock;
        [Link] private Fertiliser fertiliser;
        [Link] private Soil mySoil;
        [Link] private Irrigation Irrigation;
        [Link] private ISummary summary;
        // - Links to APSIM models
        //[Link] AgPasture.PastureSpecies Pasture;

        List<AgPasture.PastureSpecies> Pasture = new List<AgPasture.PastureSpecies>();

        //[ScopedLinkByName] Report.Report HarvestReport;


        [Separator("Point to component and true/false variable for the harvesting")]
        [Description("Name of the component that does the harvesting       :")] public string CutterName { get; set; }
        [Description("Name of the variable that indicates harvesting today :")] public string HarvestName { get; set; }

        [Separator("NOTE WELL!! MUST start the sim the data after annual reporting and do a harvest on annual reporting day")]
        [Description("Do reporting on each harvest?    :")] public bool EnableOnHarvest { get; set; }
        [Description("Name of the component for harvest-based reporting    :")] public string ReportNameHarvest { get; set; }

        [Description("Do reporting at the end of each production year?    :")] public bool EnableOnAnnual { get; set; }
        [Description("Name of the component for annual reporting    :")] public string ReportNameAnnual { get; set; }
        [Description("Date for annual reporting - NOTE - must coincide with the end of one of the seasons below (dd-mmm)    :")] public string ReportDateAnnual { get; set; }

        [Description("Do the seasonal reporting)?    :")] public bool EnableOnSeason { get; set; }
        [Description("Name of the component for seasonal reporting    :")] public string ReportNameSeasonal { get; set; }
        [Description("Last day of summer for seasonal reporting (dd-mmm)")] public string SummerEndDate { get; set; }
        [Description("Last day of autumn for seasonal reporting (dd-mmm)")] public string AutumnEndDate { get; set; }
        [Description("Last day of winter for seasonal reporting (dd-mmm)")] public string WinterEndDate { get; set; }
        [Description("Last day of spring for seasonal reporting (dd-mmm)")] public string SpringEndDate { get; set; }

        [Description("Do the summary reporting (at the end of the simulation)?    :")] public bool EnableOnSummary { get; set; }
        [Description("Name of the component for summary (comparison to observed) reporting    :")] public string ReportNameSummary { get; set; }



        public double AnnualHarvestedWt { get; set; }
        public double AnnualIrrigated { get; set; }
        public double IntervalNHA { get; set; }

        private bool doAnnualReport = false;
        private bool doAnnualReportCalculations = false;
        private bool doSeasonalReport = false;
        private bool doSummerReport = false;
        private bool doAutumnReport = false;
        private bool doWinterReport = false;
        private bool doSpringReport = false;
        private bool doSummerReportCalculations = false;
        private bool doAutumnReportCalculations = false;
        private bool doWinterReportCalculations = false;
        private bool doSpringReportCalculations = false;

        [XmlIgnore][Units("kgDM/ha")] public double AveAnnHarvested { get; set; }
        [XmlIgnore][Units("kgDM/ha")] public double StdAnnHarvested { get; set; }
        [XmlIgnore][Units("kgDM/ha")] public double RngAnnHarvested { get; set; }

        [XmlIgnore][Units("kgDM/ha")] public double AveSummerHarvested { get; set; }
        [XmlIgnore][Units("kgDM/ha")] public double StdSummerHarvested { get; set; }
        [XmlIgnore][Units("kgDM/ha")] public double RngSummerHarvested { get; set; }
        [XmlIgnore][Units("kgDM/ha")] public double AveAutumnHarvested { get; set; }
        [XmlIgnore][Units("kgDM/ha")] public double StdAutumnHarvested { get; set; }
        [XmlIgnore][Units("kgDM/ha")] public double RngAutumnHarvested { get; set; }
        [XmlIgnore][Units("kgDM/ha")] public double AveWinterHarvested { get; set; }
        [XmlIgnore][Units("kgDM/ha")] public double StdWinterHarvested { get; set; }
        [XmlIgnore][Units("kgDM/ha")] public double RngWinterHarvested { get; set; }
        [XmlIgnore][Units("kgDM/ha")] public double AveSpringHarvested { get; set; }
        [XmlIgnore][Units("kgDM/ha")] public double StdSpringHarvested { get; set; }
        [XmlIgnore][Units("kgDM/ha")] public double RngSpringHarvested { get; set; }

        [XmlIgnore][Units("kgDM/ha")] public double[] AveSeasonalHarvested { get; set; }
        [XmlIgnore][Units("kgDM/ha")] public double[] StdSeasonalHarvested { get; set; }
        [XmlIgnore][Units("kgDM/ha")] public double[] RngSeasonalHarvested { get; set; }

        [XmlIgnore][Units("-")] public string Season { get; set; }
        [XmlIgnore][Units("-")] public double SeasonNHA  { get; set; }
        [XmlIgnore][Units("-")] public double SummerNHA  { get; set; }
        [XmlIgnore][Units("-")] public double AutumnNHA  { get; set; }
        [XmlIgnore][Units("-")] public double WinterNHA  { get; set; }
        [XmlIgnore][Units("-")] public double SpringNHA  { get; set; }

        [XmlIgnore][Units("kgDM/ha")] public List<double> AnnHarvested = new List<double>();
        [XmlIgnore][Units("kgDM/ha")] public List<double> SummerHarvested = new List<double>();
        [XmlIgnore][Units("kgDM/ha")] public List<double> AutumnHarvested = new List<double>();
        [XmlIgnore][Units("kgDM/ha")] public List<double> WinterHarvested = new List<double>();
        [XmlIgnore][Units("kgDM/ha")] public List<double> SpringHarvested = new List<double>();
        //List<double> harvestedWtSums = new List<double>();
        private int CountYears = 0;

        [EventSubscribe("StartOfSimulation")]
        private void OnStartOfSimulation(object sender, EventArgs e)
        {
            foreach (PastureSpecies species in Apsim.Children(zone, typeof(PastureSpecies)))
                Pasture.Add(species);

			CountYears = 0;

            Season = "Unknown";
            SeasonNHA = 0.0;
            SummerNHA = 0.0;
            AutumnNHA = 0.0;
            WinterNHA = 0.0;
            SpringNHA = 0.0;
        }
        
        [EventSubscribe("StartOfYear")]
        private void OnStartOfYear(object sender, EventArgs e)
        {
        }

        [EventSubscribe("DoManagement")]
        private void OnDoManagement(object sender, EventArgs e)
        {
            // Is this the day for annual reporting?
            doAnnualReportCalculations = false;  // this is to capture annual harvests etc for the final Summary report
            if (DateUtilities.DatesEqual(ReportDateAnnual, Clock.Today))
                doAnnualReportCalculations = true;

            doAnnualReport = false;
            if (DateUtilities.DatesEqual(ReportDateAnnual, Clock.Today) && (EnableOnAnnual))
                doAnnualReport = true;
            else if (DateUtilities.DatesEqual(ReportDateAnnual, Clock.Today.AddDays(-1)))
            {
                AnnualHarvestedWt = 0.0;
                AnnualIrrigated = 0.0;            
            }

            doSummerReport = false;
            doAutumnReport = false;
            doWinterReport = false;
            doSpringReport = false;
            doSummerReportCalculations = false;
            doAutumnReportCalculations = false;
            doWinterReportCalculations = false;
            doSpringReportCalculations = false;
            if (DateUtilities.DatesEqual(SummerEndDate, Clock.Today))
            {
            	Season = "Summer";
            	doSummerReport = true;
            	doSummerReportCalculations = true;
            }
            else if (DateUtilities.DatesEqual(SummerEndDate, Clock.Today.AddDays(-1)))
            	SeasonNHA = 0.0;  // could move this zeroing
            else if (DateUtilities.DatesEqual(AutumnEndDate, Clock.Today))
            {
            	Season = "Autumn";
            	doAutumnReport = true;
            	doAutumnReportCalculations = true;
            }
            else if (DateUtilities.DatesEqual(AutumnEndDate, Clock.Today.AddDays(-1)))
            	SeasonNHA = 0.0;
            else if (DateUtilities.DatesEqual(WinterEndDate, Clock.Today))
            {
            	Season = "Winter";
            	doWinterReport = true;
            	doWinterReportCalculations = true;
            }
            else if (DateUtilities.DatesEqual(WinterEndDate, Clock.Today.AddDays(-1)))
            	SeasonNHA = 0.0;
            else if (DateUtilities.DatesEqual(SpringEndDate, Clock.Today))
            {
            	Season = "Spring";
            	doSpringReport = true;
            	doSpringReportCalculations = true;
            }
            else if (DateUtilities.DatesEqual(SpringEndDate, Clock.Today.AddDays(-1)))
            	SeasonNHA = 0.0;
        }

        [EventSubscribe("DoManagementCalculations")]
        private void OnDoManagementCalculations(object sender, EventArgs e)
        {
        	foreach (PastureSpecies species in Pasture)
            {
		        AnnualHarvestedWt += species.NetGrowthWt;
	            IntervalNHA += species.NetGrowthWt;
    	        SeasonNHA += species.NetGrowthWt;
            }

            AnnualIrrigated += Irrigation.IrrigationApplied;

            bool aCut = (bool)Apsim.Get(zone, "[" + CutterName + "].Script." + HarvestName);
            if ((aCut) && (EnableOnHarvest))
            {
                Models.Report.Report harvestReport = Apsim.Find(this, ReportNameHarvest) as Models.Report.Report;
                if (harvestReport == null)
                    throw new Exception(string.Format("Unable to locate report {0}.", ReportNameHarvest));
                harvestReport.DoOutput();
                IntervalNHA = 0.0;
            }

            if (doSummerReport | doAutumnReport | doWinterReport | doSpringReport)
            {
                Models.Report.Report seasonalReport = Apsim.Find(this, ReportNameSeasonal) as Models.Report.Report;
                if (seasonalReport == null)
                    throw new Exception(string.Format("Unable to locate report {0}.", ReportNameSeasonal));
                seasonalReport.DoOutput();
            }

            if (doAnnualReportCalculations)
                AnnHarvested.Add(AnnualHarvestedWt);
            if (doSummerReportCalculations)
                SummerHarvested.Add(SeasonNHA);
            if (doAutumnReportCalculations)
                AutumnHarvested.Add(SeasonNHA);
            if (doWinterReportCalculations)
                WinterHarvested.Add(SeasonNHA);
            if (doSpringReportCalculations)
                SpringHarvested.Add(SeasonNHA);

            if (doAnnualReport)
            {
                Models.Report.Report annualReport = Apsim.Find(this, ReportNameAnnual) as Models.Report.Report;
                if (annualReport == null)
                    throw new Exception(string.Format("Unable to locate annual report {0}.", ReportNameAnnual));
                annualReport.DoOutput();
            }

        }

        [EventSubscribe("EndOfSimulation")]
        private void OnEndOfSimulation(object sender, EventArgs e)
        {
            if (EnableOnSummary)
            {

                AveAnnHarvested = MathUtilities.Average(AnnHarvested);
                StdAnnHarvested = MathUtilities.SampleStandardDeviation(AnnHarvested);
                RngAnnHarvested = MathUtilities.Max(AnnHarvested) - MathUtilities.Min(AnnHarvested);

                AveSummerHarvested = MathUtilities.Average(SummerHarvested);
                StdSummerHarvested = MathUtilities.SampleStandardDeviation(SummerHarvested);
                RngSummerHarvested = MathUtilities.Max(SummerHarvested) - MathUtilities.Min(SummerHarvested);

                AveAutumnHarvested = MathUtilities.Average(AutumnHarvested);
                StdAutumnHarvested = MathUtilities.SampleStandardDeviation(AutumnHarvested);
                RngAutumnHarvested = MathUtilities.Max(AutumnHarvested) - MathUtilities.Min(AutumnHarvested);

                AveWinterHarvested = MathUtilities.Average(WinterHarvested);
                StdWinterHarvested = MathUtilities.SampleStandardDeviation(WinterHarvested);
                RngWinterHarvested = MathUtilities.Max(WinterHarvested) - MathUtilities.Min(WinterHarvested);

                AveSpringHarvested = MathUtilities.Average(SpringHarvested);
                StdSpringHarvested = MathUtilities.SampleStandardDeviation(SpringHarvested);
                RngSpringHarvested = MathUtilities.Max(SpringHarvested) - MathUtilities.Min(SpringHarvested);



                Models.Report.Report summaryReport = Apsim.Find(this, ReportNameSummary) as Models.Report.Report;
                if (summaryReport == null)
                    throw new Exception(string.Format("Unable to locate annual report {0}.", ReportNameSummary));
                summaryReport.DoOutput();
            }
        }


    }
}
```
      MicroClimate: a_interception=0; b_interception=0; c_interception=0; d_interception=0; soil_albedo=0.23; SoilHeatFluxFraction=0.4; NightInterceptionFraction=0.5; ReferenceHeight=2
      Irrigation
      Fertiliser
      SurfaceOrganicMatter: InitialResidueName=Sward; InitialResidueType=grass; InitialResidueMass=1000; InitialStandingFraction=0; InitialCPR=0; InitialCNR=15; FractionFaecesAdded=0.5
      Soil: SoilType=Black Vertosol; Site=Dalby; NearestTown=Dalby, Q 4405; Region=Darling Downs; State=Queensland; ApsoilNumber=27; Latitude=-27.12; Longitude=151.305; LocationAccuracy=+/-20m; DataSource=CSIRO Sustainable Ecosystems, Toowoomba
        Comments=This was just copied from the original simulation done in the older APSIM
        Chemical
          Thickness  NO3N     NH4N   PH
          100        7.619    0.132  6
          200        7.35725  0.132  6
          300        3.871    0.132  6
          300        3.84     0.132  6
          300        3.81     0.132  6
          300        3.779    0.132  6
          300        3.691    0.132  6
        Physical
          Thickness  BD    AirDry  LL15  DUL   SAT
          100        1.25  0.1     0.14  0.35  0.48
          200        1.31  0.1     0.14  0.35  0.48
          300        1.23  0.1     0.14  0.32  0.48
          300        1.24  0.1     0.14  0.32  0.48
          300        1.25  0.1     0.14  0.2   0.45
          300        1.26  0.1     0.14  0.2   0.45
          300        1.29  0.1     0.14  0.2   0.45
          SoilCrop SwardSoil: LL=[0.14, 0.14, 0.14, 0.14, 0.14, 0.14, 0.14]; KL=[0.1, 0.1, 0.1, 0.02, 0.02, 0, 0]; XF=[1, 1, 1, 1, 1, 0, 0]
          SoilCrop RyegrassSoil: LL=[0.14, 0.14, 0.14, 0.14, 0.14, 0.14, 0.14]; KL=[0.1, 0.1, 0.1, 0.02, 0.02, 0, 0]; XF=[1, 1, 1, 1, 1, 0, 0]
          SoilCrop WhiteCloverSoil: LL=[0.14, 0.14, 0.14, 0.14, 0.14, 0.14, 0.14]; KL=[0.1, 0.1, 0.1, 0.02, 0.02, 0, 0]; XF=[1, 1, 1, 1, 1, 0, 0]
        SoilWater: SummerDate=1-Nov; SummerU=6; SummerCona=3.5; WinterDate=1-apr; WinterU=2; WinterCona=2; DiffusConst=88; DiffusSlope=35; Salb=0.13; CN2Bare=73; CNRed=20; CNCov=0.8; slope=0; discharge_width=0; catchment_area=0; max_pond=0; PrecipitationInterception=0
          Thickness  SWCON  KLAT
          100        0.3    0
          200        0.4    0
          300        0.4    0
          300        0.4    0
          300        0.4    0
          300        0.4    0
          300        0.4    0
        SoilNitrogen: fom_types=[default, manure, mucuna, lablab, shemp, stable]; fract_carb=[0.2, 0.3, 0.54, 0.57, 0.45, 0]; fract_cell=[0.7, 0.3, 0.37, 0.37, 0.47, 0.1]; fract_lign=[0.1, 0.4, 0.09, 0.06, 0.08, 0.9]
          SoilNitrogenNO3 NO3
          SoilNitrogenNH4 NH4
          SoilNitrogenUrea Urea
          SoilNitrogenPlantAvailableNO3 PlantAvailableNO3
          SoilNitrogenPlantAvailableNH4 PlantAvailableNH4
        Organic: FOMCNRatio=40
          Thickness  Carbon  SoilCNRatio  FBiom  FInert  FOM
          100        8.2     12.5         0.08   0.58    366.247
          200        5.5     12.5         0.02   0.7     262.428
          300        1.7     12.5         0.01   0.9     159.17
          300        1.7     12.5         0.01   0.9     96.5418
          300        0       12.5         0.01   0       58.5555
          300        0       12.5         0.01   0       35.5157
          300        0       12.5         0.01   0       21.5414
        InitialWater Initial water: PercentMethod=0; FractionFull=0.93
        Sample Initial nitrogen: Thickness=[150, 150, 300, 300, 300, 300, 300]; SWUnits=Volumetric; OCUnits=Total; PHUnits=Water
        CERESSoilTemperature
      PastureSpecies Ryegrass: MaximumNUptake=10; Albedo=0.26; Gsmax=0.011; R50=200; InitialShootDM=1500; InitialRootDM=450; InitialRootDepth=750; ReferencePhotosyntheticRate=1; LightExtinctionCoefficient=0.5; GrowthTminimum=1; GrowthToptimum=20; GrowthTEffectExponent=1.7; HeatOnsetTemperature=28; HeatFullTemperature=35; HeatRecoverySumDD=30; HeatRecoveryTReference=25; ColdOnsetTemperature=1; ColdFullTemperature=-5; ColdRecoverySumDD=25; MaintenanceRespirationCoefficient=0.03; GrowthRespirationCoefficient=0.25; RespirationTReference=20; RespirationExponent=1.5; NThresholdsForLeaves=[0.04, 0.012, 0.05]; NThresholdsForStems=[0.02, 0.006, 0.025]; NThresholdsForStolons=[0, 0, 0]; NThresholdsForRoots=[0.02, 0.006, 0.025]; DegreesDayForGermination=125; TargetShootRootRatio=4; MaxRootAllocation=0.25; ShootRootGlfFactor=0.5; ReproSeasonReferenceLatitude=41; ReproSeasonTimingCoeff=0.14; ReproSeasonMaxAllocationIncrease=0.5; ReproSeasonAllocationCoeff=0.1; FractionLeafMaximum=0.7; FractionLeafMinimum=0.7; FractionLeafDMThreshold=500; FractionLeafDMFactor=2000; FractionLeafExponent=3; SpecificLeafArea=20; SpecificRootLength=100; ShootMaxEffectOnLAI=1000; MaxStemEffectOnLAI=1; LiveLeavesPerTiller=3; TissueTurnoverRateShoot=0.05; TissueTurnoverRateRoot=0.02; DetachmentRateShoot=0.08; TurnoverTemperatureMin=2; TurnoverTemperatureRef=20; TurnoverTemperatureExponent=1; TurnoverDroughtEffectMax=1; TurnoverDroughtThreshold=0.5; TurnoverDefoliationCoefficient=0.5; TurnoverDefoliationRootEffect=0.1; FractionNLuxuryRemobilisable=[0.1, 0.1, 0.1]; SoilSaturationEffectMax=0.1; MinimumWaterFreePorosity=-1; SoilSaturationRecoveryFactor=0.25; NDillutionCoefficient=0.25; GlfGeneric=1; GlfSoilFertility=1; PlantHeightMinimum=300; PlantHeightMaximum=300; PlantHeightMassForMax=10000; PlantHeightExponent=2.8; RootDepthMinimum=50; RootDepthMaximum=1000; RootElongationRate=25; RootDistributionDepthParam=250; RootDistributionExponent=3.2; DigestibilitiesCellWall=[0.9, 0.7, 0.6, 0.2]; MinimumGreenWt=100; PreferenceForGreenOverDead=1; PreferenceForLeafOverStems=1
        zero: SpeciesFamily, PhotosyntheticPathway, UseHeatStressFactor, UseColdStressFactor, ColdRecoveryTReference, UseReproSeasonFactor, FractionToStolon, StolonEffectOnLAI, MinimumNFixation, MaximumNFixation, FractionStolonStanding, WaterAvailableMethod, NitrogenAvailableMethod
        PastureAboveGroundOrgan Leaves
          GenericTissue LeafCohort1
          GenericTissue LeafCohort2
          GenericTissue LeafCohort3
          GenericTissue Dead
        PastureAboveGroundOrgan Stems
          GenericTissue LeafCohort1
          GenericTissue LeafCohort2
          GenericTissue LeafCohort3
          GenericTissue Dead
        PastureAboveGroundOrgan Stolons
          GenericTissue LeafCohort1
          GenericTissue LeafCohort2
          GenericTissue LeafCohort3
          GenericTissue Dead
      PastureSpecies WhiteClover: MaximumNUptake=10; Albedo=0.26; Gsmax=0.011; R50=200; SpeciesFamily=1; PhotosyntheticPathway=0; InitialShootDM=500; InitialRootDM=150; InitialRootDepth=350; ReferencePhotosyntheticRate=1; LightExtinctionCoefficient=0.8; GrowthTminimum=2; GrowthToptimum=22; GrowthTEffectExponent=1.7; UseHeatStressFactor=0; HeatOnsetTemperature=30; HeatFullTemperature=36; HeatRecoverySumDD=20; HeatRecoveryTReference=25; UseColdStressFactor=0; ColdOnsetTemperature=2; ColdFullTemperature=-5; ColdRecoverySumDD=20; ColdRecoveryTReference=0; MaintenanceRespirationCoefficient=0.04; GrowthRespirationCoefficient=0.25; RespirationTReference=20; RespirationExponent=1.5; NThresholdsForLeaves=[0.045, 0.02, 0.055]; NThresholdsForStems=[0.0225, 0.01, 0.0275]; NThresholdsForStolons=[0.0225, 0.01, 0.0275]; NThresholdsForRoots=[0.0225, 0.01, 0.0275]; DegreesDayForGermination=125; TargetShootRootRatio=4; MaxRootAllocation=0.25; ShootRootGlfFactor=0.5; UseReproSeasonFactor=0; ReproSeasonReferenceLatitude=41; ReproSeasonTimingCoeff=0.14; ReproSeasonMaxAllocationIncrease=0.5; ReproSeasonAllocationCoeff=0.1; FractionLeafMaximum=0.56; FractionLeafMinimum=0.28; FractionLeafDMThreshold=500; FractionLeafDMFactor=2000; FractionLeafExponent=3; FractionToStolon=0.2; SpecificLeafArea=32; SpecificRootLength=45; StolonEffectOnLAI=0.3; ShootMaxEffectOnLAI=500; MaxStemEffectOnLAI=0.5; LiveLeavesPerTiller=3; TissueTurnoverRateShoot=0.05; TissueTurnoverRateRoot=0.02; DetachmentRateShoot=0.11; TurnoverTemperatureMin=2; TurnoverTemperatureRef=20; TurnoverTemperatureExponent=1; TurnoverDroughtEffectMax=1; TurnoverDroughtThreshold=0.5; TurnoverDefoliationCoefficient=0.5; TurnoverDefoliationRootEffect=0.1; FractionNLuxuryRemobilisable=[0.1, 0.1, 0.1]; MinimumNFixation=0.2; MaximumNFixation=0.6; SoilSaturationEffectMax=0.1; MinimumWaterFreePorosity=-1; SoilSaturationRecoveryFactor=0.25; NDillutionCoefficient=1; GlfGeneric=1; GlfSoilFertility=1; PlantHeightMinimum=300; PlantHeightMaximum=300; PlantHeightMassForMax=7500; PlantHeightExponent=2.5; RootDepthMinimum=30; RootDepthMaximum=350; RootElongationRate=25; RootDistributionDepthParam=70; RootDistributionExponent=2.5; DigestibilitiesCellWall=[0.9, 0.8, 0.7, 0.2]; MinimumGreenWt=50; FractionStolonStanding=0; PreferenceForGreenOverDead=1; PreferenceForLeafOverStems=1; WaterAvailableMethod=0; NitrogenAvailableMethod=0
        PastureAboveGroundOrgan Leaves
          GenericTissue LeafCohort1
          GenericTissue LeafCohort2
          GenericTissue LeafCohort3
          GenericTissue Dead
        PastureAboveGroundOrgan Stems
          GenericTissue LeafCohort1
          GenericTissue LeafCohort2
          GenericTissue LeafCohort3
          GenericTissue Dead
        PastureAboveGroundOrgan Stolons
          GenericTissue LeafCohort1
          GenericTissue LeafCohort2
          GenericTissue LeafCohort3
          GenericTissue Dead
      Report DailyReport: EventNames=[Clock].EndOfDay
        VariableNames:
          [Clock].Today as Date
          ([Ryegrass].HarvestedWt + [WhiteClover].HarvestedWt) as HarvestedWt
          ([Ryegrass].HarvestedWt) as HarvestedWtRye
          ([WhiteClover].HarvestedWt) as HarvestedWtWhite
          ([Ryegrass].StandingHerbageWt + [WhiteClover].StandingHerbageWt) as StandingHerbageWt
          (Sum([Soil].SoilNitrogen.Urea.kgha) + Sum([Soil].SoilNitrogen.NH4.kgha) + Sum([Soil].SoilNitrogen.NO3.kgha)) as MinN
          (Sum([Soil].SoilWater.ESW) as ESW
          [CutRotation].Script.NReturnedInUrine
          (Sum([Soil].SoilNitrogen.PlantAvailableNH4.kgha + [Soil].SoilNitrogen.PlantAvailableNO3.kgha)) as TotalPlantAvailableN
          ([WhiteClover].HarvestedWt / ([WhiteClover].HarvestedWt + [Ryegrass].HarvestedWt + 1.0)) as PropCloverHarvested
          ([Ryegrass].DeadTissuesWt) + ([WhiteClover].DeadTissuesWt) as Senescence
          [Irrigation].IrrigationApplied as Irrigation
      Report HarvestReport
        VariableNames:
          [Clock].Today as Date
          ([Ryegrass].HarvestedWt + [WhiteClover].HarvestedWt) as HarvestedWt
          ([Ryegrass].StandingHerbageWt + [WhiteClover].StandingHerbageWt) as StandingHerbageWt
          ([WhiteClover].HarvestedWt / ([WhiteClover].HarvestedWt + [Ryegrass].HarvestedWt + 1.0)) as PropCloverHarvested
      Report SeasonalReport
        VariableNames:
          [Clock].Today as Date
          [Clock].Today.Year as Year
          [DoReporting].Script.Season as Season
          [DoReporting].Script.SeasonNHA as SeasonNHA
      Report AnnualReport
        VariableNames:
          [Clock].Today as Date
          [DoReporting].Script.AnnualHarvestedWt as AnnualHarvestedWt
          [DoReporting].Script.AnnualIrrigated as AnnualIrrigated
      Report SummaryReport
        VariableNames:
          [Clock].Today as Date
          [DoReporting].Script.AveAnnHarvested as AveAnnualHarvestedWt
          [DoReporting].Script.StdAnnHarvested as StdAnnualHarvestedWt
          [DoReporting].Script.RngAnnHarvested as RngAnnualHarvestedWt
          [DoReporting].Script.AveSummerHarvested as AveSummerHarvested
          [DoReporting].Script.StdSummerHarvested as StdSummerHarvested
          [DoReporting].Script.RngSummerHarvested as RngSummerHarvested
          [DoReporting].Script.AveAutumnHarvested as AveAutumnHarvested
          [DoReporting].Script.StdAutumnHarvested as StdAutumnHarvested
          [DoReporting].Script.RngAutumnHarvested as RngAutumnHarvested
          [DoReporting].Script.AveWinterHarvested as AveWinterHarvested
          [DoReporting].Script.StdWinterHarvested as StdWinterHarvested
          [DoReporting].Script.RngWinterHarvested as RngWinterHarvested
          [DoReporting].Script.AveSpringHarvested as AveSpringHarvested
          [DoReporting].Script.StdSpringHarvested as StdSpringHarvested
          [DoReporting].Script.RngSpringHarvested as RngSpringHarvested
