Simulations: Version=79
  Memo VERSION NOTES
    even more TT to early grainfill

    Sending to version control. Chickpea Allan's version 15. 8/1/20. Works reasonably well.

    Had to fix airdry and LL15 of NZ soils to remove errors
  Memo Introduction
    The APSIM Chickpea model has been developed using the Plant Modelling Framework (PMF) of [brown_plant_2014]. This new framework provides a library of plant organ and process submodels that can be coupled, at runtime, to construct a model in much the same way that models can be coupled to construct a simulation. This means that dynamic composition of lower level process and organ classes (e.g. photosynthesis, leaf) into larger constructions (e.g. chickpea, wheat, sorghum) can be achieved by the model developer without additional coding.

    The model consists of:

    * a phenology model to simulate development between growth phases
    * a structure model to simulate plant morphology
    * a collection of organs to simulate the various plant parts
    * an arbitrator to allocate resources (N, biomass) to the various plant organs
  DataStore
    ExcelInput Observed: FileName=Observed.xlsx; SheetNames=[ObservedHarvestData]
    ExcelInput ObservedTimeseries: FileName=Observed.xlsx; SheetNames=[ObservedTimeseriesData]
    PredictedObserved: PredictedTableName=HarvestReport; ObservedTableName=ObservedHarvestData; FieldNameUsedForMatch=Stage
    PredictedObserved PredictedObserved_Daily: PredictedTableName=Report; ObservedTableName=ObservedTimeseriesData; FieldNameUsedForMatch=Clock.Today
  Replacements
    Report HarvestReport: EventNames=[Chickpea].Harvesting
      VariableNames:
        [Clock].Today
        [Chickpea].Phenology.CurrentStageName as Stage
        [Chickpea].Phenology.FloweringDAS as FloweringDAS
        [Chickpea].Phenology.MaturityDAS as MaturityDAS
        [Chickpea].Grain.Live.Wt as GrainWt
        [Chickpea].AboveGround.Wt
        [Chickpea].Phenology.FinalNodeNo
        [Chickpea].Grain.NumberFunction
        [Chickpea].Shell.PodNumber
        [Chickpea].Grain.Size
        [Chickpea].Phenology.EmergenceDAS as EmergenceDAS
        [Chickpea].SowingData.Cultivar
    Report: EventNames=[Clock].DoReport
      VariableNames:
        [Clock].Today
        [Soil].SoilWater.SW
        [Soil].SoilWater.Eo
        [Soil].SoilWater.Es
        [Soil].SoilWater.Drainage
        [Soil].SoilWater.Runoff
        [Soil].SoilWater.pond
        sum([Soil].SoilWater.SWmm) as ProfileWater
        [Soil].SoilNitrogen.NO3.kgha
        [MicroClimate].net_radn
        [MicroClimate].peta
        [MicroClimate].petr
        [Chickpea].Leaf.LAI
        [Chickpea].Leaf.Fn
        [Chickpea].Leaf.Fw
        [Chickpea].Structure.LeafTipsAppeared
        [Chickpea].Structure.PlantTotalNodeNo
        [Chickpea].Leaf.SenescingCohortNo
        [Chickpea].Structure.TotalStemPopn
        [Chickpea].AboveGround.Wt
        [Chickpea].Leaf.Live.Wt
        [Chickpea].Leaf.Live.NConc
        [Chickpea].Stem.Live.Wt
        [Chickpea].Leaf.SpecificArea
        [Chickpea].Shell.Live.Wt
        [Chickpea].Grain.Live.Wt
        [Chickpea].Grain.NumberFunction
        [Chickpea].Shell.PodNumber
        [Chickpea].Nodule.NFixed
        [Chickpea].Nodule.Live.Wt
        [Chickpea].Arbitrator.DM.NutrientLimitation
        [Chickpea].Arbitrator.DM.SinkLimitation
        [Chickpea].Arbitrator.N.TotalPlantDemand
        [Chickpea].Arbitrator.N.TotalPlantSupply
        [Chickpea].Arbitrator.DM.TotalPlantDemand
        [Chickpea].Arbitrator.DM.TotalFixationSupply
        [Chickpea].Leaf.Live.MetabolicNConc
        [Chickpea].Leaf.Live.StructuralNConc
        [Chickpea].Leaf.Live.StorageNConc
        [Chickpea].Leaf.DeadCohortNo
        [Chickpea].Stem.DMDemand
        [Chickpea].Leaf.DMSupplyPhotosynthesis
        [Chickpea].SowingData.Cultivar
        [Chickpea].Leaf.Dead.Wt
        [Chickpea].Root.Live.Wt
        [Chickpea].Leaf.Senesced.Wt
        [Chickpea].Phenology.CurrentStageName
        [Chickpea].Phenology.Stage
        [Chickpea].Leaf.LeafCohortParameters.MaxArea
        [Chickpea].Leaf.LeafCohortParameters.MaxArea.Grainfilling
        [Chickpea].Leaf.LeafCohortParameters.MaxArea.Grainfilling.MaxLeafSizeDuringGrainfilling.ExponentialFunction
        [Chickpea].Stem.Live.MetabolicWt
        [Chickpea].Root.KLModifier
        [Chickpea].Structure.BranchingRate
        [Chickpea].Structure.CoverResponse
        [Chickpea].Leaf.PlantsenescedLeafNo
        [Chickpea].Leaf.DeadCohortNo
        sum([Soil].SoilWater.SWmm)-[Soil].SoilWater.SWmm[1] as ProfWat_less_toplayer
        [Chickpea].Leaf.CoverGreen
        [Soil].PAWmm
        [Soil].PAWCmm
        [Root].SurfaceWaterAvailability
        [Chickpea].Leaf.Photosynthesis
        [Chickpea].Leaf.Transpiration
        [Chickpea].Phenology.AccumulatedTT
        [Weather].MeanT
        [Chickpea].Structure.PhotoSynthPerBranch
        [Chickpea].Root.TTklFactor.klRowSpaceModifier
        [Chickpea].Leaf.ExtinctionCoeff
        [Chickpea].Structure.BranchingRate.Potential_Branching_Rate.Vegetative.MultiplyFunction.BranchModifier.EarlyVeg.TempResponse
        [Chickpea].Structure.BranchingRate.Potential_Branching_Rate.Vegetative.MultiplyFunction.BranchModifier.EarlyVeg.Cover_response
        [Chickpea].Structure.BranchingRate.Potential_Branching_Rate.Vegetative.MultiplyFunction.BranchModifier.EarlyVeg.SurfaceWaterFactor
        [Soil].SoilWater.ESW
        [Chickpea].Structure.BranchingRate.Potential_Branching_Rate.Vegetative.MultiplyFunction.BranchModifier.LateVeg.Cover_response
        [Chickpea].Structure.BranchingRate.Potential_Branching_Rate.Vegetative.MultiplyFunction.BranchModifier.LateVeg.WaterStress
        [Chickpea].Structure.BranchingRate.Potential_Branching_Rate.Vegetative.MultiplyFunction.BranchModifier.LateVeg.TempResponse
        [Chickpea].Structure.BranchingRate.Potential_Branching_Rate.Vegetative.MultiplyFunction.BranchModifier
        [Chickpea].Structure.BranchingRate.Potential_Branching_Rate.Vegetative.MultiplyFunction.BranchModifier.EarlyVeg
        [Chickpea].Structure.BranchingRate.Potential_Branching_Rate.Vegetative.MultiplyFunction.BranchModifier.LateVeg
        ([Soil].SoilWater.SWmm[1]+[Soil].SoilWater.SWmm[2]+[Soil].SoilWater.SWmm[3]+[Soil].SoilWater.SWmm[4]+[Soil].SoilWater.SWmm[5]) as ProfWatTop5Layers
        [Chickpea].Leaf.CoverGreen
        [Chickpea].Leaf.CoverTotal
        [Chickpea].Structure.BranchingRate.Cover_response
        [Chickpea].Pod.Wt
        [Weather].MinT
        [Weather].MaxT
        ([Chickpea].Shell.Wt+[Chickpea].Grain.Wt) as PodPlusGrain
        [Chickpea].Grain.DMDemand
        [Chickpea].Leaf.DMDemand
        [Chickpea].Stem.DMDemand
        [Chickpea].Root.DMDemand
        [Chickpea].Shell.DMDemand
        [Chickpea].Stem.Dead.Wt
        [Chickpea].Grain.HarvestIndex
        [Chickpea].Grain.DMSupply.Total
        [Chickpea].Leaf.DMSupply.Total
        [Chickpea].Stem.DMSupply.Total
        [Chickpea].Shell.DMSupply.Total
        [Chickpea].Grain.Allocated.Wt
        [Chickpea].Stem.Allocated.Wt
        [Chickpea].Leaf.Allocated.Wt
        [Chickpea].Shell.Allocated.Wt
        [Chickpea].Root.Allocated.Wt
        [Weather].MeanT as MeanTemp
        [Chickpea].Phenology.CurrentStageName as GStage
    Plant Chickpea: CropType=Chickpea; IsEnding=false; DaysAfterEnding=0
      Memo Introduction
        The APSIM Chickpea model has been developed from the original APSIM Chickpea model described by Robertson et al(2002) using the Plant Modelling Framework of Brown et al (2014).
      OrganArbitrator Arbitrator
        RelativeAllocation NArbitrator
        RelativeAllocation DMArbitrator
      Phenology
        PhaseLookup ThermalTime
          PhaseLookupValue PreEmergence: Start=Germination; End=Emergence
            DivideFunction ThermalTime
              AirTemperatureFunction AirTempFunction
                Memo
                  The cardinal temperatures for calculating thermal time have been taken from Singh and Virmani (1996) as used by Robertson et al (2002).
                XYPairs: X=[0, 30, 40]; Y=[0, 30, 0]
              Constant: FixedValue=1
          PhaseLookupValue Emerge_to_Maturity: Start=Emergence; End=HarvestRipe
            DivideFunction ThermalTime
              AirTemperatureFunction AirTempFunction
                Memo
                  The cardinal temperatures for calculating thermal time have been taken from Singh and Virmani (1996) as used by Robertson et al (2002).
                XYPairs: X=[0, 30, 40]; Y=[0, 30, 0]
              LessThanFunction TTModifier
                VariableReference: VariableName=[Structure].LeafTipsAppeared
                Constant: FixedValue=12
                MinimumFunction EarlyVeg
                  LinearInterpolationFunction SurfaceWaterFactor
                    Memo
                      Robertson et al (2002) used a maximum leaf size of 300 mm2 for the first 9 leaves and 600 mm2 thereafter.
                    XYPairs: X=[0, 1]; Y=[0.8, 1]
                    VariableReference XValue: VariableName=[Root].SurfaceWaterAvailability
                MinimumFunction LateVeg
                  LinearInterpolationFunction WaterStress
                    XYPairs: X=[0, 0.5, 0.75, 1]; Y=[0.65, 0.8, 0.95, 1]
                    VariableReference XValue: VariableName=[leaf].Fw
        DivideFunction ThermalTime_orig (disabled)
          AirTemperatureFunction AirTempFunction
            Memo
              The cardinal temperatures for calculating thermal time have been taken from Singh and Virmani (1996) as used by Robertson et al (2002).
            XYPairs: X=[0, 30, 40]; Y=[0, 30, 0]
          LessThanFunction TTModifier
            VariableReference: VariableName=[Structure].LeafTipsAppeared
            Constant: FixedValue=12
            MinimumFunction EarlyVeg
              LinearInterpolationFunction SurfaceWaterFactor
                Memo
                  Robertson et al (2002) used a maximum leaf size of 300 mm2 for the first 9 leaves and 600 mm2 thereafter.
                XYPairs: X=[0, 1]; Y=[0.8, 1]
                VariableReference XValue: VariableName=[Root].SurfaceWaterAvailability
            MinimumFunction LateVeg
              LinearInterpolationFunction WaterStress
                XYPairs: X=[0, 1]; Y=[0.7, 1]
                VariableReference XValue: VariableName=[leaf].Fw
          Constant: FixedValue=1
          PowerFunction: Exponent=0.333
            VariableReference WaterStress: VariableName=Leaf.Fw
        MultiplyFunction ThermalTimexxx (disabled)
          LessThanFunction TTModifier
            VariableReference: VariableName=[Structure].LeafTipsAppeared
            Constant: FixedValue=12
            MinimumFunction EarlyVeg: same as Replacements.Chickpea.Phenology.ThermalTime_orig.TTModifier.EarlyVeg
            MinimumFunction LateVeg
              LinearInterpolationFunction WaterStress
                XYPairs: X=[0, 0.8, 1]; Y=[0.5, 0.5, 1]
                VariableReference XValue: VariableName=[leaf].Fw
          AirTemperatureFunction AirTempFunction
            Memo
              The cardinal temperatures for calculating thermal time have been taken from Singh and Virmani (1996) as used by Robertson et al (2002).
            XYPairs: X=[0, 30, 40]; Y=[0, 30, 0]
        AirTemperatureFunction OLDTTime (disabled)
          Memo
            The cardinal temperatures for calculating thermal time have been taken from Singh and Virmani (1996) as used by Robertson et al (2002).
          XYPairs: X=[0, 30, 40]; Y=[0, 30, 0]
          LessThanFunction BranchModifier: same as Replacements.Chickpea.Phenology.ThermalTimexxx.TTModifier
        AirTemperatureFunction AlternateThermalTime (disabled)
          Memo
            The cardinal temperatures for calculating thermal time have been taken from Singh and Virmani (1996) as used by Robertson et al (2002).
          XYPairs: X=[0, 5, 20, 30, 40]; Y=[0, 1, 20, 30, 0]
        PhotoperiodFunction Photoperiod: Twilight=-6; DayLength=0
        GerminatingPhase Germinating: Start=Sowing; End=Germination
        EmergingPhase Emerging: ShootLag=100; ShootRate=0.7; Start=Germination; End=Emergence; TTForTimeStep=0
          VariableReference ThermalTime: VariableName=[Phenology].ThermalTime
        GenericPhase Vegetative: Start=Emergence; End=StartFlowering
          Constant Target: FixedValue=650; Units=Degree Days
          VariableReference Progression: VariableName=[Phenology].ThermalTime
          MultiplyFunction Progression_origPP (disabled)
            VariableReference ThermalTime: VariableName=[Phenology].ThermalTime
            QualitativePPEffect PhotoperiodModifier: OptimumPhotoperiod=21; CriticalPhotoperiod=9
              VariableReference Photoperiod: VariableName=[Phenology].Photoperiod
          Memo (disabled)
            Phenology model as per work of Soltani. Shape of curve can  be modified by changing the 'Critical' or 'Optimum' photoperiod parameters, or the target TT.

            For an unmodified variety, photoperiod less than the optimum photoperiod (21) means the target TT increases by 1/Photoperiod function.

            See documentation for explanatory graph.

            ![ChickpeaPhenologyGraph](SoltaniChickpeaPhenology.PNG)
        GenericPhase EarlyFlowering: Start=StartFlowering; End=EndFlowering
          Memo
            This phase encompasses both budding (when buds are appearing but not necessarily turning into flowers) as well as flowering proper (when buds turn into flowers). It continues until the moving average of daily temperature reaches a target (currently 91 degree days = 7 days x 13 degrees) over a specified time period (currently set at 7 days in Nov 2019).
          VariableReference Progression_orig (disabled): VariableName=[Phenology].ThermalTime
          MultiplyFunction Target_orig (disabled)
            Constant NumberOfEarlyFloweringNodes: FixedValue=2.5
            VariableReference Phyllochron: VariableName=[Structure].NodeAppearanceRate
          MovingAverageFunction Progression: NumberOfDays=7; StageToStartMovingAverage=StartFlowering
            VariableReference ThermalTime: VariableName=[Phenology].ThermalTime
          MovingAverageFunction Target_stupid (disabled): NumberOfDays=7; StageToStartMovingAverage=Flowering
            Constant Target: FixedValue=91; Units=Degree Days
          Constant Target: FixedValue=91; Units=Degree Days
        GenericPhase EarlyPodDevelopment: Start=EndFlowering; End=StartGrainFilling
          Memo
            Temperature threshold is reached, now a thermal time target will dictate when first pods are visible
          VariableReference Progression_orig (disabled): VariableName=[Phenology].ThermalTime
          MultiplyFunction Target_orig (disabled)
            Constant NumberOfLateFloweringNodes: FixedValue=2.5
            VariableReference Phyllochron: VariableName=[Structure].NodeAppearanceRate
          Constant Target: FixedValue=530; Units=Degree Days
          VariableReference Progression: VariableName=[Phenology].ThermalTime
        GenericPhase EarlyGrainFilling: Start=StartGrainFilling; End=MidGrainFilling
          VariableReference Progression: VariableName=[Phenology].ThermalTime
          Constant Target: FixedValue=460
        GenericPhase MidGrainFilling: Start=MidGrainFilling; End=LateGrainFilling
          VariableReference Progression: VariableName=[Phenology].ThermalTime
          Constant Target: FixedValue=150
        GenericPhase LateGrainFilling: Start=LateGrainFilling; End=EndGrainFill
          VariableReference Progression: VariableName=[Phenology].ThermalTime
          Constant Target: FixedValue=150
        GenericPhase Maturing: Start=EndGrainFill; End=Maturity
          Memo
            The duration of the Maturing phase has been taken from the model of Robertson et al (2002).
          Constant Target: FixedValue=60
          VariableReference Progression: VariableName=[Phenology].ThermalTime
        GenericPhase Ripening: Start=Maturity; End=HarvestRipe
          Constant Target: FixedValue=1
          VariableReference Progression: VariableName=[Phenology].ThermalTime
        EndPhase ReadyForHarvesting: Start=HarvestRipe; End=Unused
          VariableReference ThermalTime: VariableName=[Phenology].ThermalTime
        OnEventFunction FloweringDAS: SetEvent=StartFlowering; ReSetEvent=never
          Memo
            A function is used to provide flowering date as days after sowing(DAS).
          Constant PreEventValue: FixedValue=0
          VariableReference PostEventValue: VariableName=[Phenology].DaysAfterSowing
        OnEventFunction MaturityDAS: SetEvent=Maturity; ReSetEvent=never
          Memo
            A function is used to provide maturity date as days after sowing(DAS).
          Constant PreEventValue: FixedValue=0
          VariableReference PostEventValue: VariableName=[Phenology].DaysAfterSowing
        OnEventFunction EmergenceDAS: SetEvent=Emergence; ReSetEvent=never
          Memo
            A function is used to provide maturity date as days after sowing(DAS).
          Constant PreEventValue: FixedValue=0
          VariableReference PostEventValue: VariableName=[Phenology].DaysAfterSowing
        OnEventFunction EndFloweringMSLeafNo: SetEvent=EndFlowering; ReSetEvent=never
          Memo
            A function is used to provide leaf number at end of flowering as a reference point for reducing maximum leaf size during grainfilling
          Constant PreEventValue: FixedValue=0
          VariableReference PostEventValue: VariableName=[Structure].LeafTipsAppeared
        DivideFunction MeanTemp
          AddFunction TempSum
            VariableReference MaxT: VariableName=[Weather].MaxT
            VariableReference MinT: VariableName=[Weather].MinT
          Constant Two: FixedValue=2
        OnEventFunction StartFloweringMSLeafNo: SetEvent=StartFlowering; ReSetEvent=never
          Memo
            A function is used to provide leaf number at end of flowering as a reference point for reducing maximum leaf size during grainfilling
          Constant PreEventValue: FixedValue=0
          VariableReference PostEventValue: VariableName=[Structure].LeafTipsAppeared
        PhaseLookup TT_Stress_modifier (disabled)
          Memo
            Also includes high T and water stress effect end of season
          PhaseLookupValue PreEmergence: Start=Germination; End=Emergence
            Constant NA: FixedValue=1
          PhaseLookupValue Vegetative_to_Flowering: Start=Emergence; End=StartFlowering
            DivideFunction
            AccumulateFunction: StartStageName=Emergence; EndStageName=StartFlowering; FractionRemovedOnCut=0; FractionRemovedOnHarvest=0; FractionRemovedOnGraze=0; FractionRemovedOnPrune=0
              VariableReference: VariableName=[Leaf].Fw
            AccumulateFunction AccumulateFunction1: StartStageName=Emergence; EndStageName=StartFlowering; FractionRemovedOnCut=0; FractionRemovedOnHarvest=0; FractionRemovedOnGraze=0; FractionRemovedOnPrune=0
              VariableReference: VariableName=[Clock].
          PhaseLookupValue Flowering: Start=StartFlowering; End=EndFlowering
            LinearInterpolationFunction FrostFraction
              XYPairs: X=[-1, 0]; Y=[0, 0]
              VariableReference XValue: VariableName=[Weather].MaxT
          PhaseLookupValue EarlyPodDevelopment: Start=EndFlowering; End=StartGrainfilling
            LinearInterpolationFunction FrostFraction
              XYPairs: X=[-1, 0]; Y=[0, 0]
              VariableReference XValue: VariableName=[Weather].MaxT
          PhaseLookupValue EarlyGrainfilling: Start=StartGrainFilling; End=MidGrainFilling
            LinearInterpolationFunction FrostFraction
              XYPairs: X=[-1, 0]; Y=[0, 0]
              VariableReference XValue: VariableName=[Weather].MinT
          PhaseLookupValue MidGrainfilling: Start=MidGrainFilling; End=LateGrainFilling
            MaximumFunction
              LinearInterpolationFunction HighTemp
                XYPairs: X=[0, 35, 40]; Y=[0, 0, 1]
                VariableReference XValue: VariableName=[Weather].MaxT
              LinearInterpolationFunction FrostFraction
                XYPairs: X=[-1, 0]; Y=[0, 0]
                VariableReference XValue: VariableName=[Weather].MinT
              LinearInterpolationFunction WaterStress
                XYPairs: X=[0, 0.1, 0.2, 0.3, 0.5, 0.8, 1]; Y=[0.5, 0.45, 0.3, 0.1, 0, 0, 0]
                VariableReference XValue: VariableName=[leaf].Fw
          PhaseLookupValue LateGrainfilling: Start=LateGrainFilling; End=EndGrainFill
            MaximumFunction
              LinearInterpolationFunction FrostFraction
                XYPairs: X=[-1, 0]; Y=[0, 0]
                VariableReference XValue: VariableName=[Weather].MinT
              LinearInterpolationFunction HighTemp
                XYPairs: X=[0, 35, 40]; Y=[0, 0, 1]
                VariableReference XValue: VariableName=[Weather].MaxT
              LinearInterpolationFunction WaterStress
                XYPairs: X=[0, 0.1, 0.2, 0.3, 0.5, 0.8, 1]; Y=[0.2, 0, 0, 0, 0, 0, 0]
                VariableReference XValue: VariableName=[leaf].Fw
      Structure: CohortInitialisationStage=Germination; LeafInitialisationStage=Emergence
        VariableReference ThermalTime: VariableName=[Phenology].ThermalTime
        Constant DroughtInducedBranchMortality: FixedValue=0
        Constant HeightModel: FixedValue=1
        Constant FinalLeafNumber: FixedValue=40
        LinearInterpolationFunction Height
          XYPairs: X=[0, 300]; Y=[10, 750]
          VariableReference XValue: VariableName=[Stem].Live.Wt
        MultiplyFunction BranchingRate
          Memo Memo1
            Cover response as per soybean
          LinearInterpolationFunction OLDPotential_Branching_Rate (disabled)
            XYPairs: X=[0, 6, 8, 10, 20, 31]; Y=[0, 0, 1, 2, 0, 0]
            VariableReference XValue: VariableName=[Structure].LeafTipsAppeared
          PhaseLookup Potential_Branching_Rate
            PhaseLookupValue PreEmergence: Start=Germination; End=Emergence
              Constant Function: FixedValue=0
            PhaseLookupValue Vegetative: Start=Emergence; End=Maturity
              MultiplyFunction
                LinearInterpolationFunction MaxBranchRate
                  Memo
                    Robertson et al (2002) used a maximum leaf size of 300 mm2 for the first 9 leaves and 600 mm2 thereafter.
                  XYPairs: X=[0, 1, 2, 4, 5, 7, 8, 20]; Y=[0, 0.5, 0.5, 0.5, 1, 1, 1, 1]
                  VariableReference XValue: VariableName=[Structure].LeafTipsAppeared
                LessThanFunction BranchModifier
                  VariableReference: VariableName=[Structure].LeafTipsAppeared
                  Constant: FixedValue=12
                  MinimumFunction EarlyVeg
                    LinearInterpolationFunction TempResponse
                      XYPairs: X=[2, 4, 6, 10, 30, 35]; Y=[0, 0.5, 1, 1, 1, 0]
                      VariableReference XValue: VariableName=[Weather].MinT
                    LinearInterpolationFunction Cover_response (disabled)
                      XYPairs: X=[0, 0.04, 0.07, 0.09, 0.1]; Y=[1, 1, 0, 0, 0]
                      VariableReference XValue: VariableName=[leaf].CoverGreen
                    LinearInterpolationFunction SurfaceWaterFactor (disabled)
                      Memo
                        Robertson et al (2002) used a maximum leaf size of 300 mm2 for the first 9 leaves and 600 mm2 thereafter.
                      XYPairs: X=[0, 0.2, 0.4, 0.6, 0.8, 1, 1.1]; Y=[0.1, 0.1, 0.2, 0.4, 1, 1, 0]
                      VariableReference XValue: VariableName=[Root].SurfaceWaterAvailability
                  MinimumFunction LateVeg
                    LinearInterpolationFunction Cover_response
                      XYPairs: X=[0, 0.2, 0.4, 0.5, 0.7, 0.8, 0.9]; Y=[1, 1, 1, 1, 0.7, 0.2, 0]
                      VariableReference XValue: VariableName=[leaf].CoverGreen
                    LinearInterpolationFunction WaterStress
                      XYPairs: X=[0, 0.2, 0.4, 0.6, 0.8, 1]; Y=[0, 0, 0, 0.2, 0.8, 1]
                      VariableReference XValue: VariableName=[leaf].Fw
                    LinearInterpolationFunction PhotoSynthPerBranch (disabled)
                      XYPairs: X=[0, 0.05, 0.1, 0.15, 0.2, 0.3, 0.4, 0.5]; Y=[0, 0, 0.8, 1, 1, 1, 1, 1]
                      VariableReference XValue: VariableName=[Structure].PhotoSynthPerBranch
                    LinearInterpolationFunction SurfaceWaterFactor (disabled)
                      Memo
                        Robertson et al (2002) used a maximum leaf size of 300 mm2 for the first 9 leaves and 600 mm2 thereafter.
                      XYPairs: X=[0, 0.2, 0.4, 0.6, 0.8, 1, 1.1]; Y=[0, 0, 0, 0, 1, 1, 0]
                      VariableReference XValue: VariableName=[Root].SurfaceWaterAvailability
                    LinearInterpolationFunction TempResponse
                      XYPairs: X=[4, 6, 8, 10, 30, 35]; Y=[0, 0.5, 1, 1, 1, 0]
                      VariableReference XValue: VariableName=[Weather].MeanT
            PhaseLookupValue PostFlowering (disabled): Start=StartFlowering; End=Maturity
              Constant Function: FixedValue=0
            PhaseLookupValue Grainfilling (disabled): Start=EndFlowering; End=Maturity
              Constant Function: FixedValue=0
          Constant: FixedValue=1
        DivideFunction LAIperMetre (disabled)
          VariableReference LAI: VariableName=[Leaf].LAI
          DivideFunction Rowlength_per_metre2
            Constant: FixedValue=1000; Units=mm per 1m of row
            VariableReference RowSpacing: VariableName=[Chickpea].SowingData.RowSpacing
        Constant BranchMortality: FixedValue=0
        PhaseLookup Phyllochron
          PhaseLookupValue PreEmergence: Start=Germination; End=Emergence
            Constant Function: FixedValue=0
          PhaseLookupValue CanopyDevelopment: Start=Emergence; End=EndFlowering
            VariableReference NodeAppearanceRate: VariableName=[Structure].NodeAppearanceRate
          PhaseLookupValue EarlyGrainfilling: Start=EndFlowering; End=MidGrainFilling
            VariableReference NodeAppearanceRate: VariableName=[Structure].NodeAppearanceRate
          PhaseLookupValue MidGrainfilling: Start=MidGrainFilling; End=LateGrainFilling
            DivideFunction
            VariableReference NodeAppearanceRate: VariableName=[Structure].NodeAppearanceRate
            MinimumFunction
              LinearInterpolationFunction WaterStress
                XYPairs: X=[0, 0.2, 0.4, 0.6, 0.8, 1]; Y=[0, 0, 0, 0.2, 0.4, 1]
                VariableReference XValue: VariableName=[leaf].Fw
          PhaseLookupValue LateGrainfilling: Start=LateGrainFilling; End=EndGrainFill
            DivideFunction
            VariableReference NodeAppearanceRate: VariableName=[Structure].NodeAppearanceRate
            MinimumFunction
              LinearInterpolationFunction WaterStress
                XYPairs: X=[0, 0.2, 0.4, 0.6, 0.8, 1]; Y=[0, 0, 0, 0.2, 0.4, 1]
                VariableReference XValue: VariableName=[leaf].Fw
        LinearInterpolationFunction NodeAppearanceRate
          XYPairs: X=[1, 2, 3, 4, 30]; Y=[20, 20, 20, 50, 50]
          Memo
            One node every 20 Degree Days for first 3 nodes. After this then reverts to 50 Degree Days for each subsequent node

            Operating during both vegetative and flowering phases.
          VariableReference XValue: VariableName=[Structure].LeafTipsAppeared
        Constant StemSenescenceAge: FixedValue=0
        DivideFunction LAIperMetreperBranch (disabled)
          VariableReference LAIperMetre: VariableName=[Structure].LAIperMetre
          DivideFunction BranchesperMetre
            VariableReference Branches: VariableName=[Structure].BranchNumber
              VariableReference Branches: VariableName=[Structure].BranchNumber
            DivideFunction Rowlength_per_metre2
              Constant: FixedValue=1000; Units=mm per 1m of row
              VariableReference RowSpacing: VariableName=[Chickpea].SowingData.RowSpacing
        DivideFunction LAIperBranch
          VariableReference LAI: VariableName=[Leaf].LAI
          VariableReference Branches: VariableName=[Structure].BranchNumber
        DivideFunction PhotoSynthPerBranch
          VariableReference Photosynthesis: VariableName=[Leaf].Photosynthesis
          VariableReference Branches: VariableName=[Structure].TotalStemPopn
      GenericOrgan OLDGrain (disabled): IsAboveGround=true
        Constant WaterContent: FixedValue=0.12
        Constant NConc: FixedValue=0.02
        VariableReference AboveGroundWt: VariableName=[AboveGround].Wt
        BiomassRemoval BiomassRemovalDefaults
          OrganBiomassRemovalType Harvest: FractionLiveToRemove=1; FractionDeadToRemove=0; FractionLiveToResidue=0; FractionDeadToResidue=0
          OrganBiomassRemovalType Cut: FractionLiveToRemove=1; FractionDeadToRemove=0; FractionLiveToResidue=0; FractionDeadToResidue=0
          OrganBiomassRemovalType Prune: FractionLiveToRemove=0; FractionDeadToRemove=0; FractionLiveToResidue=0.8; FractionDeadToResidue=0
          OrganBiomassRemovalType Graze: FractionLiveToRemove=0.6; FractionDeadToRemove=0; FractionLiveToResidue=0.2; FractionDeadToResidue=0
          OrganBiomassRemovalType Thin: FractionLiveToRemove=0; FractionDeadToRemove=0; FractionLiveToResidue=0.05; FractionDeadToResidue=0
        PhaseLookup HIIncrement
          PhaseLookupValue Vegetative: Start=Emergence; End=EndFlowering
            Constant Function: FixedValue=0
          PhaseLookupValue Reproductive: Start=EndFlowering; End=EndGrainFill
            MultiplyFunction HIIncrement
              DivideFunction IncrementPerDegreeDay
                Constant PotentialHarvestIndex: FixedValue=0.5
                VariableReference GrainFillingDuration: VariableName=[Phenology].GrainFilling.Target
              VariableReference ThermalTime: VariableName=[Phenology].ThermalTime
          PhaseLookupValue Ripening: Start=EndGrainFill; End=HarvestRipe
            Constant Function: FixedValue=0
        RetranslocateNonStructural RetranslocateNitrogen
      ReproductiveOrgan Grain: GrowthRespiration=0; MaintenanceRespiration=0
        Biomass Live: DMDOfStructural=0.6
        Biomass Dead: DMDOfStructural=0.6
        Constant PotentialHarvestIndex: FixedValue=0.5
        AddFunction FillingDuration
          VariableReference EarlyGrainFillingDuration: VariableName=[Phenology].EarlyGrainFilling.Target
          VariableReference MidGrainFillingDuration: VariableName=[Phenology].MidGrainFilling.Target
          VariableReference LateGrainFillingDuration: VariableName=[Phenology].LateGrainFilling.Target
        Constant MaximumPotentialGrainSize: FixedValue=0.25
        PhaseLookup DMDemandFunction
          PhaseLookupValue GrainFilling: Start=StartGrainFilling; End=EndGrainFill
            MultiplyFunction HIGrainDemand
              VariableReference AboveGroundWt: VariableName=[AboveGround].Wt
              DivideFunction HarvestIndexIncrease
                VariableReference PotentialHarvestIndex: VariableName=[Grain].PotentialHarvestIndex
                VariableReference FillingDuration: VariableName=[Grain].FillingDuration
                Constant (disabled): FixedValue=1
              VariableReference ThermalTime: VariableName=[Phenology].ThermalTime
            FillingRateFunction (disabled)
              VariableReference NumberFunction: VariableName=[Grain].NumberFunction
              VariableReference ThermalTime: VariableName=[Phenology].ThermalTime
              VariableReference PotentialSizeIncrement: VariableName=[Grain].MaximumPotentialGrainSize
              VariableReference FillingDuration: VariableName=[Grain].FillingDuration
        Constant MinimumNConc: FixedValue=0.02
        Constant MaximumNConc: FixedValue=0.04
        Constant WaterContent: FixedValue=0.12
        MultiplyFunction NFillingRate
          VariableReference NConc: VariableName=[Grain].MaximumNConc
          Constant DMDemand: FixedValue=0
          VariableReference DMConversionEfficiency: VariableName=[Grain].DMConversionEfficiency
        PhaseLookup NFillingRateOLD
          PhaseLookupValue GrainFilling: Start=StartGrainFilling; End=EndGrainFill
            FillingRateFunction
              VariableReference NumberFunction: VariableName=[Grain].NumberFunction
              VariableReference ThermalTime: VariableName=[Phenology].ThermalTime
              MultiplyFunction PotentialSizeIncrement
                Constant MaximumFinalNConc: FixedValue=0.04
                VariableReference MaximumSize: VariableName=[Grain].MaximumPotentialGrainSize
              AddFunction FillingDuration
                VariableReference LatePodDevelopmentDuration: VariableName=[Phenology].LatePodDevelopment.Target
                VariableReference LateGrainFillingDuration1: VariableName=[Phenology].LateGrainFilling.Target
        MultiplyFunction NumberFunction
          Constant PeasPerPod: FixedValue=1
          VariableReference PodNumber: VariableName=[Shell].PodNumber
        BiomassRemoval BiomassRemovalDefaults
          OrganBiomassRemovalType Harvest: FractionLiveToRemove=1; FractionDeadToRemove=0; FractionLiveToResidue=0; FractionDeadToResidue=0
          OrganBiomassRemovalType Cut: FractionLiveToRemove=1; FractionDeadToRemove=0; FractionLiveToResidue=0; FractionDeadToResidue=0
          OrganBiomassRemovalType Prune: FractionLiveToRemove=0; FractionDeadToRemove=0; FractionLiveToResidue=0.8; FractionDeadToResidue=0
          OrganBiomassRemovalType Graze: FractionLiveToRemove=0.6; FractionDeadToRemove=0; FractionLiveToResidue=0.2; FractionDeadToResidue=0
          OrganBiomassRemovalType Thin: FractionLiveToRemove=0; FractionDeadToRemove=0; FractionLiveToResidue=0.05; FractionDeadToResidue=0
        Constant DMConversionEfficiency: FixedValue=0.89
        Constant RemobilisationCost: FixedValue=0
        Constant CarbonConcentration: FixedValue=0.4
        DivideFunction HarvestIndex
          VariableReference GrainWt: VariableName=[Grain].Wt
          VariableReference AboveGroundWt: VariableName=[AboveGround].Wt
        VariableReference AboveGroundWt: VariableName=[AboveGround].Wt
      Root: GrowthRespiration=0; MaintenanceRespiration=0; RootAngle=45
        LinearInterpolationFunction OLDKLModifier (disabled)
          XYPairs: X=[0, 3, 6]; Y=[0.1, 1, 1]
          VariableReference XValue: VariableName=[Leaf].LAI
        PhaseLookup KLModifier
          PhaseLookupValue PreEmergence: Start=Germination; End=Emergence
            Constant Function: FixedValue=0.1
          PhaseLookupValue Emerge_to_Maturity (disabled): Start=Emergence; End=Maturity
            VariableReference klTTfactor: VariableName=[Root].klThermalTimefactor
          PhaseLookupValue PreCanopyDevelopment: Start=Emergence; End=EndFlowering
            VariableReference klTTfactor: VariableName=[Root].klThermalTimefactor
          PhaseLookupValue OLDHOLDPostCanopyDevelopment (disabled): Start=EndFlowering; End=Maturity
            OnEventFunction GrainfillKLModifier: SetEvent=EndFlowering; ReSetEvent=never
              VariableReference PreEventValue: VariableName=[Root].klThermalTimefactor
              VariableReference PostEventValue: VariableName=[Root].KLModifier
            HoldFunction: WhenToHold=EndFlowering
              VariableReference klTTfactor: VariableName=[Root].klThermalTimefactor
          PhaseLookupValue PostCanopyDevelopment: Start=EndFlowering; End=Maturity
            Memo
              Soil data at Kulai and ICRISAT suggests wider row spacing and late sowing can catch up with kl - so allow the function to continue post flowering
            VariableReference klTTfactor: VariableName=[Root].klThermalTimefactor
        Constant MaxDailyNUptake: FixedValue=6
        Constant SenescenceRate: FixedValue=0.005
        Constant MaximumRootDepth: FixedValue=1000000
        PhaseLookup RootFrontVelocity
          PhaseLookupValue PreEmergence: Start=Germination; End=Emergence
            Constant Function: FixedValue=3
          PhaseLookupValue early: Start=Emergence; End=StartFlowering
            Constant Function: FixedValue=15
          PhaseLookupValue late: Start=StartFlowering; End=Maturity
            Constant Function: FixedValue=17
        Constant MaximumNConc: FixedValue=0.01
        Constant MinimumNConc: FixedValue=0.005
        PhaseBasedSwitch NitrogenDemandSwitch: Start=Emergence; End=EndGrainFill
        BiomassRemoval BiomassRemovalDefaults
          OrganBiomassRemovalType Harvest: FractionLiveToRemove=0; FractionDeadToRemove=0; FractionLiveToResidue=0.2; FractionDeadToResidue=0
          OrganBiomassRemovalType Cut: FractionLiveToRemove=0; FractionDeadToRemove=0; FractionLiveToResidue=0.3; FractionDeadToResidue=0
          OrganBiomassRemovalType Prune: FractionLiveToRemove=0; FractionDeadToRemove=0; FractionLiveToResidue=0.1; FractionDeadToResidue=0
          OrganBiomassRemovalType Graze: FractionLiveToRemove=0; FractionDeadToRemove=0; FractionLiveToResidue=0.15; FractionDeadToResidue=0
        LinearInterpolationFunction KNO3
          XYPairs: X=[0, 0.003]; Y=[0.02, 0.02]
          VariableReference XValue: VariableName=[Root].LengthDensity
        LinearInterpolationFunction KNH4
          XYPairs: X=[0, 0.003]; Y=[0, 0]
          VariableReference XValue: VariableName=[Root].LengthDensity
        LinearInterpolationFunction NUptakeSWFactor
          XYPairs: X=[0, 1]; Y=[0, 1]
          VariableReference XValue: VariableName=[Root].RWC
        Constant InitialDM: FixedValue=0.2; Units=g/plant
        Constant SpecificRootLength: FixedValue=40; Units=m/g
        Constant DMConversionEfficiency: FixedValue=1
        Constant MaintenanceRespirationFunction: FixedValue=1
        Constant RemobilisationCost: FixedValue=0
        Constant CarbonConcentration: FixedValue=0.4
        BiomassDemand DMDemands
          MultiplyFunction Structural
            PartitionFractionDemandFunction DMDemandFunction
              PhaseLookup PartitionFraction
                PhaseLookupValue Early: Start=Emergence; End=StartFlowering
                  MultiplyFunction
                    Constant Function: FixedValue=0.1
                    DivideFunction
                      Constant Function: FixedValue=1; Units=inverse
                      LinearInterpolationFunction SurfaceWaterFactor
                        Memo
                          Robertson et al (2002) used a maximum leaf size of 300 mm2 for the first 9 leaves and 600 mm2 thereafter.
                        XYPairs: X=[0, 0.2, 0.4, 0.6, 0.8, 1]; Y=[0.4, 0.4, 0.4, 0.4, 0.6, 1]
                        VariableReference XValue: VariableName=[Root].SurfaceWaterAvailability
                  Constant Function (disabled): FixedValue=0.1
                PhaseLookupValue Middle: Start=StartFlowering; End=EndFlowering
                  Constant Function: FixedValue=0.1
                PhaseLookupValue Late: Start=EndFlowering; End=Maturity
                  Constant Function: FixedValue=0
            DivideFunction StressFactor (disabled)
              Constant Inverse: FixedValue=1
              LinearInterpolationFunction WaterStress
                XYPairs: X=[0, 1]; Y=[1, 1]
                VariableReference XValue: VariableName=[Root].WaterTensionFactor
            Constant StructuralFraction: FixedValue=1
          Constant Metabolic: FixedValue=0
          StorageDMDemandFunction Storage
            SubtractFunction StorageFraction
              Constant One: FixedValue=1
              VariableReference StructuralFraction: VariableName=[Root].DMDemands.Structural.StructuralFraction
        BiomassDemand NDemands
          MultiplyFunction Structural
            VariableReference MinNconc: VariableName=[Root].minimumNconc
            VariableReference PotentialDMAllocation: VariableName=[Root].potentialDMAllocation.Structural
          MultiplyFunction Metabolic
            SubtractFunction MetabolicNconc
              VariableReference CritNconc: VariableName=[Root].criticalNConc
              VariableReference MinNconc: VariableName=[Root].minimumNconc
            VariableReference PotentialDMAllocation: VariableName=[Root].potentialDMAllocation.Structural
          StorageNDemandFunction Storage
            VariableReference NitrogenDemandSwitch: VariableName=[Root].nitrogenDemandSwitch
            VariableReference MaxNconc: VariableName=[Root].maximumNconc
        DivideFunction SurfaceWaterAvailability
          VariableReference PAW: VariableName=[Soil].PAWmm[1]
          VariableReference PAWC: VariableName=[Soil].PAWCmm[1]
        DivideFunction WithinRowSpaceFactor
          Constant: FixedValue=1000; Units=mm per 1m of row
          VariableReference RowSpacing: VariableName=[Chickpea].SowingData.RowSpacing
          VariableReference Population: VariableName=[Chickpea].SowingData.Population
          Constant Constant1: FixedValue=0.001
        SubtractFunction TTklFactorA (disabled)
          VariableReference ThermalTime: VariableName=[Phenology].AccumulatedTT
          VariableReference klpopmod: VariableName=[Root].klPopModifier
          VariableReference klRSmod: VariableName=[Root].klRowSpaceModifier
        SubtractFunction TTklFactorB (disabled)
          VariableReference TTFacA: VariableName=[Root].TTklFactorA
          VariableReference klRSmod: VariableName=[Root].klRowSpaceModifier
        SubtractFunction TTklFactorTOTAL (disabled)
          VariableReference ThermalTime: VariableName=[Phenology].AccumulatedTT
          VariableReference klpopmod: VariableName=[Root].klPopModifier
          VariableReference klRSmod: VariableName=[Root].klRowSpaceModifier
          Constant avoid_negative: FixedValue=-1000; Units=ensure not negative TT
        LinearInterpolationFunction klPopModifier
          XYPairs: X=[10, 20, 40, 60, 70, 80, 100]; Y=[-300, -200, 0, 100, 150, 175, 200]
          XYPairs XYPairs1 (disabled): X=[10, 20, 40, 60, 70, 80, 100]; Y=[300, 200, 0, -100, -150, -175, -200]
          VariableReference XValue: VariableName=[Chickpea].SowingData.Population
        LinearInterpolationFunction klRowSpaceModifier
          XYPairs: X=[0, 200, 350, 500, 1000]; Y=[200, 100, 0, -150, -800]
          VariableReference XValue: VariableName=[Chickpea].SowingData.RowSpacing
        AddFunction TTklFactor
          VariableReference ThermalTime: VariableName=[Phenology].AccumulatedTT
          VariableReference klpopmod: VariableName=[Root].klPopModifier
          VariableReference klRSmod: VariableName=[Root].klRowSpaceModifier
        LinearInterpolationFunction klThermalTimefactor
          XYPairs: X=[0, 50, 500, 1000, 1500, 2100]; Y=[0.1, 0.1, 0.25, 0.6, 1.2, 1.4]
          VariableReference XValue: VariableName=[Root].TTklFactor
        LinearInterpolationFunction klBiomassModifier
          XYPairs: X=[0, 200, 350, 500, 1000]; Y=[-300, -200, -100, 0, 400]
          VariableReference XValue: VariableName=[Chickpea].AboveGround.Wt
      GenericOrgan Shell: IsAboveGround=true
        MultiplyFunction PodNumber
          Constant PodsPerNode: FixedValue=2
          VariableReference StemPopulation: VariableName=[Structure].TotalStemPopn
          AddFunction FloweringNodes
            Constant EarlyFloweringNodes: FixedValue=0
            Constant LateFloweringNodes: FixedValue=0
        Constant NReallocationFactor: FixedValue=0
        Constant NRetranslocationFactor: FixedValue=0.1
        Constant MaximumNConc: FixedValue=0.02
        Constant MinimumNConc: FixedValue=0.007
        Constant DMRetranslocationFactor: FixedValue=0.1
        PhaseBasedSwitch NitrogenDemandSwitch: Start=Germination; End=Maturity
        BiomassRemoval BiomassRemovalDefaults
          OrganBiomassRemovalType Harvest: FractionLiveToRemove=0.5; FractionDeadToRemove=0; FractionLiveToResidue=0.1; FractionDeadToResidue=0
          OrganBiomassRemovalType Cut: FractionLiveToRemove=0.8; FractionDeadToRemove=0; FractionLiveToResidue=0; FractionDeadToResidue=0
          OrganBiomassRemovalType Prune: FractionLiveToRemove=0; FractionDeadToRemove=0; FractionLiveToResidue=0.6; FractionDeadToResidue=0
          OrganBiomassRemovalType Graze: FractionLiveToRemove=0.6; FractionDeadToRemove=0; FractionLiveToResidue=0.2; FractionDeadToResidue=0
        Constant InitialWtFunction: FixedValue=0; Units=g/m^2
        Constant SenescenceRate: FixedValue=0; Units=/d
        Constant DetachmentRateFunction: FixedValue=0; Units=/d
        Constant MaintenanceRespirationFunction: FixedValue=0; Units=0-1
        Constant DMConversionEfficiency: FixedValue=1; Units=0-1
        Constant DMReallocationFactor: FixedValue=0
        VariableReference CriticalNConc: VariableName=[Shell].MinimumNConc
        Constant RemobilisationCost: FixedValue=0
        Constant CarbonConcentration: FixedValue=0.4
        Constant PotentialHarvestIndex: FixedValue=0.2
        BiomassDemand DMDemands
          MultiplyFunction Structural
            PhaseLookup DMDemandFunction
              PhaseLookupValue PodDevelopment: Start=EndFlowering; End=MidGrainFilling
                MultiplyFunction HIPodDemand
                  VariableReference AboveGroundWt: VariableName=[AboveGround].Wt
                  DivideFunction HarvestIndexIncrease
                    VariableReference PotentialHarvestIndex: VariableName=[Shell].PotentialHarvestIndex
                    VariableReference FillingDuration: VariableName=[Shell].FillingDuration
                  VariableReference ThermalTime: VariableName=[Phenology].ThermalTime
                FillingRateFunction (disabled): same as Replacements.Chickpea.Grain.DMDemandFunction.GrainFilling.FillingRateFunction
              PhaseLookup PartitionFraction (disabled)
                PhaseLookupValue Early: Start=Emergence; End=StartFlowering
                  Constant Function: FixedValue=0
                PhaseLookupValue Middle: Start=StartFlowering; End=EndFlowering
                  Constant Function: FixedValue=0.7
                PhaseLookupValue Late: Start=EndFlowering; End=Maturity
                  Constant Function: FixedValue=0
            Constant StructuralFraction: FixedValue=1; Units=g/g
          Constant Metabolic: FixedValue=0
          StorageDMDemandFunction Storage
            SubtractFunction StorageFraction
              Constant One: FixedValue=1
              VariableReference StructuralFraction: VariableName=[Shell].DMDemands.Structural.StructuralFraction
        AddFunction FillingDuration
          VariableReference EarlyPodDevelopmentDuration: VariableName=[Phenology].EarlyPodDevelopment.Target
          VariableReference EarlyGrainFillingDuration: VariableName=[Phenology].EarlyGrainFilling.Target
          VariableReference MidGrainFillingDuration: VariableName=[Phenology].MidGrainFilling.Target
          VariableReference LateGrainFillingDuration: VariableName=[Phenology].MidGrainFilling.Target
        BiomassDemand NDemands
          MultiplyFunction Structural
            VariableReference MinNconc: VariableName=[Shell].minimumNconc
            VariableReference PotentialDMAllocation: VariableName=[Shell].potentialDMAllocation.Structural
          MultiplyFunction Metabolic
            SubtractFunction MetabolicNconc
              VariableReference CritNconc: VariableName=[Shell].criticalNConc
              VariableReference MinNconc: VariableName=[Shell].minimumNconc
            VariableReference PotentialDMAllocation: VariableName=[Shell].potentialDMAllocation.Structural
          StorageNDemandFunction Storage
            VariableReference NitrogenDemandSwitch: VariableName=[Shell].nitrogenDemandSwitch
            VariableReference MaxNconc: VariableName=[Shell].maximumNconc
        RetranslocateNonStructural RetranslocateNitrogen
      Leaf: MaxCover=1; Albedo=0.2; Gsmax350=0.0122; R50=200; KDead=0.3; MaximumMainStemLeafNumber=40
        zero: CurrentExpandingLeaf, StartFractionExpanded, FractionNextleafExpanded, DeadNodesYesterday, GrowthRespiration, LAI, FRGR, PotentialEP, WaterDemand, TipsAtEmergence, CohortsAtInitialisation, FractionDied
        LeafCohort InitialLeaf1: Rank=1; Area=50
          zero: NReallocationFactor, DMReallocationFactor, NRetranslocationFactor, DMRetranslocationFactor, ShadeInducedSenRate, SenescedFrac, DeltaPotentialArea, DeltaStressConstrainedArea, DeltaCarbonConstrainedArea, PotentialStructuralDMAllocation, PotentialMetabolicDMAllocation, MetabolicNReallocated, MetabolicWtReallocated, StorageNReallocated, StorageWtReallocated, MetabolicNRetranslocated, StorageNRetrasnlocated, DMRetranslocated, MetabolicNAllocation, StructuralDMAllocation, MetabolicDMAllocation, MaintenanceRespiration
        LeafCohort InitialLeaf2: Rank=2; Area=100
          zero: NReallocationFactor, DMReallocationFactor, NRetranslocationFactor, DMRetranslocationFactor, ShadeInducedSenRate, SenescedFrac, DeltaPotentialArea, DeltaStressConstrainedArea, DeltaCarbonConstrainedArea, PotentialStructuralDMAllocation, PotentialMetabolicDMAllocation, MetabolicNReallocated, MetabolicWtReallocated, StorageNReallocated, StorageWtReallocated, MetabolicNRetranslocated, StorageNRetrasnlocated, DMRetranslocated, MetabolicNAllocation, StructuralDMAllocation, MetabolicDMAllocation, MaintenanceRespiration
        LeafCohort InitialLeaf3: Rank=3; Area=150
          zero: NReallocationFactor, DMReallocationFactor, NRetranslocationFactor, DMRetranslocationFactor, ShadeInducedSenRate, SenescedFrac, DeltaPotentialArea, DeltaStressConstrainedArea, DeltaCarbonConstrainedArea, PotentialStructuralDMAllocation, PotentialMetabolicDMAllocation, MetabolicNReallocated, MetabolicWtReallocated, StorageNReallocated, StorageWtReallocated, MetabolicNRetranslocated, StorageNRetrasnlocated, DMRetranslocated, MetabolicNAllocation, StructuralDMAllocation, MetabolicDMAllocation, MaintenanceRespiration
        LeafCohortParameters: ExpansionStressValue=0
          Constant StorageFraction: FixedValue=0.5
          PhaseLookup StructuralFraction
            PhaseLookupValue Vegetative_to_Flowering: Start=Emergence; End=StartFlowering
              Constant Fraction: FixedValue=0.3
            PhaseLookupValue Flowering: Start=StartFlowering; End=EndFlowering
              Constant Fraction: FixedValue=0.3
            PhaseLookupValue Grainfilling: Start=EndFlowering; End=EndGrainFill
              Constant Fraction: FixedValue=0.3
          LinearInterpolationFunction OLDESTMaxArea
            Memo
              Robertson et al (2002) used a maximum leaf size of 300 mm2 for the first 9 leaves and 600 mm2 thereafter. No they didn't! Bell curve ranging from 350 to 1000, peak at leaf 14-17
            XYPairs: X=[1, 12, 16, 19]; Y=[300, 300, 450, 850]
            VariableReference XValue: VariableName=[Structure].LeafTipsAppeared
          Constant SenessingLeafRelativeSize: FixedValue=1; Units=0-1
          LinearInterpolationFunction ArchiveMaxArea
            Memo
              Robertson et al (2002) used a maximum leaf size of 300 mm2 for the first 9 leaves and 600 mm2 thereafter. No they didn't! Bell curve ranging from 350 to 1000, peak at leaf 14-17
            XYPairs: X=[1, 7, 10, 14, 17, 25, 40]; Y=[50, 350, 500, 1000, 1000, 250, 250]
            VariableReference XValue: VariableName=[Structure].LeafTipsAppeared
          LinearInterpolationFunction MaxAreaNov18 (disabled)
            Memo
              Robertson et al (2002) used a maximum leaf size of 300 mm2 for the first 9 leaves and 600 mm2 thereafter. No they didn't! Bell curve ranging from 350 to 1000, peak at leaf 14-17
            XYPairs: X=[1, 12, 16, 19, 25]; Y=[300, 300, 450, 850, 450]
            VariableReference XValue: VariableName=[Structure].LeafTipsAppeared
          PhaseLookup MaxArea
            PhaseLookupValue PreEmergence: Start=Germination; End=Emergence
              Constant MaxArea: FixedValue=0
            PhaseLookupValue Vegetative_to_Flowering: Start=Emergence; End=EndFlowering
              LinearInterpolationFunction MaxArea
                Memo
                  As per Robertson et al (2002) bell curve (Figure 2)
                XYPairs: X=[1, 5, 10, 15, 17, 25, 40]; Y=[50, 500, 1000, 1500, 1500, 1500, 1500]
                VariableReference XValue: VariableName=[Structure].LeafTipsAppeared
            PhaseLookupValue Flowering_to_Maturity: Start=EndFlowering; End=Maturity
              LinearInterpolationFunction MaxArea
                XYPairs: X=[1, 15, 20, 25]; Y=[1400, 500, 250, 150]
                VariableReference XValue: VariableName=[Phenology].EndFloweringMSLeafNo
          PhaseLookup MaxArea_Jul19 (disabled)
            PhaseLookupValue PreEmergence: Start=Germination; End=Emergence
              Constant MaxArea: FixedValue=0
            PhaseLookupValue Vegetative_to_Flowering: Start=Emergence; End=EndFlowering
              LinearInterpolationFunction MaxArea
                Memo
                  As per Robertson et al (2002) bell curve (Figure 2)
                XYPairs: X=[1, 7, 10, 14, 17, 25, 40]; Y=[50, 350, 500, 1000, 1000, 150, 150]
                VariableReference XValue: VariableName=[Structure].LeafTipsAppeared
            PhaseLookupValue Flowering_to_Maturity: Start=EndFlowering; End=Maturity
              Constant MaxArea: FixedValue=150
            PhaseLookupValue Flowering: Start=StartFlowering; End=EndFlowering
              LinearInterpolationFunction MaxArea
                Memo
                  As per Robertson et al (2002) bell curve (Figure 2)
                XYPairs: X=[1, 7, 10, 14, 17, 30, 40]; Y=[50, 350, 500, 1000, 1000, 1000, 1000]
                VariableReference XValue: VariableName=[Phenology].StartFloweringMSLeafNo
            PhaseLookupValue Grainfilling: Start=EndFlowering; End=Maturity
              MultiplyFunction MaxArea
                Memo
                  1000mm2 is the maximum leaf size at end of grainfilling. Leaf size reduces by 0.85^(additionalleafnumber) to approximate bell curve function of Robertson et al 2002
                Constant Function: FixedValue=1176
                ExpressionFunction
                  Expression=0.85^(1+([Structure].LeafTipsAppeared - [Phenology].EndFloweringMSLeafNo))
          LinearInterpolationFunction MaxAreaOLDvNEWER (disabled)
            Memo
              Robertson et al (2002) used a maximum leaf size of 300 mm2 for the first 9 leaves and 600 mm2 thereafter.
            XYPairs: X=[1, 5, 10, 21]; Y=[224, 224, 489, 1080]
            VariableReference XValue: VariableName=[Structure].LeafTipsAppeared
          MultiplyFunction GrowthDuration
            Constant Multiplier: FixedValue=4
            VariableReference Phyllochron: VariableName=[Structure].Phyllochron
          MultiplyFunction OLDLagDuration
            Constant Multiplier: FixedValue=17
            VariableReference Phyllochron: VariableName=[Structure].Phyllochron
          MultiplyFunction LagDuration
            Constant Multiplier: FixedValue=16
            VariableReference Phyllochron: VariableName=[Structure].Phyllochron
          MultiplyFunction SenescenceDuration
            Constant Multiplier: FixedValue=2
            VariableReference Phyllochron: VariableName=[Structure].Phyllochron
          Constant DetachmentLagDuration: FixedValue=1000000
          Constant DetachmentDuration: FixedValue=46
          LinearInterpolationFunction SpecificLeafAreaMax
            Memo
              Maximum specific leaf area has been taken from Robertson et al (2002).
            XYPairs: X=[0, 2000]; Y=[22000, 15000]
            VariableReference XValue: VariableName=[Phenology].AccumulatedTT
          LinearInterpolationFunction SpecificLeafAreaMin
            XYPairs: X=[0, 2000]; Y=[20000, 14000]
            VariableReference XValue: VariableName=[Phenology].AccumulatedTT
          LinearInterpolationFunction OLDSpecificLeafAreaMax (disabled)
            Memo
              Maximum specific leaf area has been taken from Robertson et al (2002).
            XYPairs: X=[0, 3]; Y=[22000, 15000]
            VariableReference XValue: VariableName=[Leaf].LAI
          LinearInterpolationFunction OLDSpecificLeafAreaMin (disabled)
            XYPairs: X=[0, 3]; Y=[20000, 14000]
            VariableReference XValue: VariableName=[Leaf].LAI
          LinearInterpolationFunction OLDExpansionStress (disabled)
            XYPairs: X=[0, 1]; Y=[0, 1]
            VariableReference XValue: VariableName=[Chickpea].Leaf.Fw
          MinimumFunction ExpansionStress
            LinearInterpolationFunction WaterStress
              XYPairs: X=[0, 1]; Y=[0, 1]
              VariableReference XValue: VariableName=[Root].WaterTensionFactor
            LinearInterpolationFunction TemperatureEffect
              XYPairs: X=[0, 12, 14]; Y=[0, 1, 1]
              VariableReference XValue: VariableName=[Phenology].MeanTemp
            LinearInterpolationFunction Cover_response
              XYPairs: X=[0, 0.4, 0.5, 1]; Y=[1, 1, 0.7, 0.2]
              VariableReference XValue: VariableName=[leaf].CoverGreen
          LinearInterpolationFunction OLDCellDivisionStress
            XYPairs: X=[0, 1]; Y=[0, 1]
            VariableReference XValue: VariableName=[Chickpea].Leaf.Fw
          MinimumFunction CellDivisionStress
            LinearInterpolationFunction TemperatureEffect (disabled)
              XYPairs: X=[0, 12, 14]; Y=[0, 1, 1]
              VariableReference XValue: VariableName=[Phenology].MeanTemp
            LinearInterpolationFunction OLDCellDivisionStress1
              XYPairs: X=[0, 1]; Y=[0, 1]
              VariableReference XValue: VariableName=[Chickpea].Leaf.Fw
            LinearInterpolationFunction Cover_response
              XYPairs: X=[0, 0.5, 0.7, 1]; Y=[1, 1, 0.5, 0.2]
              VariableReference XValue: VariableName=[leaf].CoverGreen
          Constant MinimumNConc: FixedValue=0.02
          Constant CriticalNConc: FixedValue=0.05
          Constant MaximumNConc: FixedValue=0.08
          Constant NReallocationFactor: FixedValue=0.3
          Constant NRetranslocationFactor: FixedValue=0.1
            Memo
              Retranslocation = movement of reserves out of live organs
              Reallocation = from senesced organs

              Storage fraction decides how much is available to be moved, while these decide what proportion can be moved each day
          Constant DMReallocationFactor: FixedValue=0.5
            Memo
              Reallocation = from senesced organs, fraction that can be moved per day
          Constant DMRetranslocationFactor: FixedValue=0.3
            Memo
              Retranslocation = movement of reserves out of live organs, what proportion can be moved each day
          LinearInterpolationFunction ShadeInducedSenescenceRate
            XYPairs: X=[0, 0.8, 0.9, 0.99]; Y=[0, 0, 0, 0]
            VariableReference XValue: VariableName=[Leaf].CohortCurrentRankCoverAbove
          Constant InitialNConc: FixedValue=0.08
          Constant LeafSizeShapeParameter: FixedValue=0.01
          Constant MaintenanceRespirationFunction: FixedValue=0
          Constant DroughtInducedLagAcceleration: FixedValue=1
          Constant DroughtInducedSenAcceleration: FixedValue=1
          Constant ArchiveCellDivisionStress: FixedValue=1; Units=0-1
          ArrayFunction LagDurationAgeMultiplier: Values=1 1 1
          ArrayFunction SenescenceDurationAgeMultiplier: Values=1 1 1
          ArrayFunction LeafSizeAgeMultiplier: Values=1 1 1 1 1 1 1 1 1 1 1 1
          Constant RemobilisationCost: FixedValue=0
          Constant CarbonConcentration: FixedValue=0.4
        VariableReference ThermalTime: VariableName=[Phenology].ThermalTime
        LinearInterpolationFunction ExtinctionCoeff
          XYPairs: X=[200, 350, 500, 750, 1000]; Y=[0.65, 0.63, 0.6, 0.53, 0.45]
          Memo
            Using soybean data from Flenet et al 1996 to establish trend, with data from Tesfaye et al 2006 for absolute values (close to 0.8 at 40cm RS). These high values also agreed with Thomas and Fukai 1995 (their measurements were at noon therefore they need to be increased for absolute light interception?)
          VariableReference XValue: VariableName=[Chickpea].Folder.Manager.Script.RowSpacing
        RUEModel Photosynthesis
          Constant RUE: FixedValue=1.25
          WeightedTemperatureFunction FT: MaximumTemperatureWeighting=0.75
            XYPairs: X=[0, 15, 30, 40]; Y=[0, 1, 1, 0]
          LinearInterpolationFunction FVPD
            XYPairs: X=[0, 10, 50]; Y=[1, 1, 1]
            VariableReference XValue: VariableName=[Leaf].Photosynthesis.VPD
          LinearInterpolationFunction FN
            XYPairs: X=[0, 1, 1.5]; Y=[0, 1, 1]
            VariableReference XValue: VariableName=[Leaf].Fn
          LinearInterpolationFunction FW
            XYPairs: X=[0, 1, 1.5]; Y=[0, 1, 1]
            VariableReference XValue: VariableName=[Leaf].Fw
          RUECO2Function FCO2: PhotosyntheticPathway=C3
          Memo
            Ayaz eta 2004 presented a RUE of 1.6 g/MJ PAR during non-limiting temperature conditions for field pea.  Halving this to make it total radiation gives 0.8 g/MJ and adding 20% to account for root and  nodule production and N fixiation costs gives 1.0 g/MJ
          VariableReference RadnInt: VariableName=[Leaf].RadIntTot
        LinearInterpolationFunction FrostFractionOrig
          XYPairs: X=[-1, 0]; Y=[0, 0]
          VariableReference XValue: VariableName=[Weather].MinT
        PhaseLookup FrostFraction
          Memo
            Also includes high T and water stress effect end of season
          PhaseLookupValue PreEmergence: Start=Germination; End=Emergence
            Constant NA: FixedValue=1
          PhaseLookupValue Vegetative_to_Flowering: Start=Emergence; End=StartFlowering
            LinearInterpolationFunction FrostFraction
              XYPairs: X=[-1, 0]; Y=[0, 0]
              VariableReference XValue: VariableName=[Weather].MinT
          PhaseLookupValue Flowering: Start=StartFlowering; End=EndFlowering
            LinearInterpolationFunction FrostFraction
              XYPairs: X=[-1, 0]; Y=[0, 0]
              VariableReference XValue: VariableName=[Weather].MaxT
          PhaseLookupValue EarlyGrainfilling: Start=StartGrainFilling; End=MidGrainFilling
            LinearInterpolationFunction FrostFraction
              XYPairs: X=[-1, 0]; Y=[0, 0]
              VariableReference XValue: VariableName=[Weather].MinT
          PhaseLookupValue MidGrainfilling: Start=MidGrainFilling; End=LateGrainFilling
            MaximumFunction
              LinearInterpolationFunction HighTemp (disabled)
                XYPairs: X=[0, 35, 40]; Y=[0, 0, 1]
                VariableReference XValue: VariableName=[Weather].MaxT
              LinearInterpolationFunction FrostFraction
                XYPairs: X=[-1, 0]; Y=[0, 0]
                VariableReference XValue: VariableName=[Weather].MinT
              LinearInterpolationFunction WaterStress (disabled)
                XYPairs: X=[0, 0.1, 0.2, 0.3, 0.5, 0.8, 1]; Y=[0.5, 0.45, 0.3, 0.1, 0, 0, 0]
                VariableReference XValue: VariableName=[leaf].Fw
          PhaseLookupValue LateGrainfilling: Start=LateGrainFilling; End=EndGrainFill
            MaximumFunction
              LinearInterpolationFunction FrostFraction
                XYPairs: X=[-1, 0]; Y=[0, 0]
                VariableReference XValue: VariableName=[Weather].MinT
              LinearInterpolationFunction HighTemp
                XYPairs: X=[0, 35, 40]; Y=[0, 0, 1]
                VariableReference XValue: VariableName=[Weather].MaxT
              LinearInterpolationFunction WaterStress
                XYPairs: X=[0, 0.1, 0.2, 0.3, 0.5, 0.8, 1]; Y=[0.2, 0, 0, 0, 0, 0, 0]
                VariableReference XValue: VariableName=[leaf].Fw
        MinimumFunction FRGRFunction
          VariableReference RUE_FT: VariableName=[Leaf].Photosynthesis.FT
          MinimumFunction Others
            VariableReference RUE_FN: VariableName=[Leaf].Photosynthesis.FN
            VariableReference RUE_FVPD: VariableName=[Leaf].Photosynthesis.FVPD
        BiomassRemoval BiomassRemovalDefaults
          OrganBiomassRemovalType Harvest: FractionLiveToRemove=0; FractionDeadToRemove=0; FractionLiveToResidue=0.3; FractionDeadToResidue=0
          OrganBiomassRemovalType Cut: FractionLiveToRemove=0.8; FractionDeadToRemove=0; FractionLiveToResidue=0; FractionDeadToResidue=0
          OrganBiomassRemovalType Prune: FractionLiveToRemove=0; FractionDeadToRemove=0; FractionLiveToResidue=0.6; FractionDeadToResidue=0
          OrganBiomassRemovalType Graze: FractionLiveToRemove=0.6; FractionDeadToRemove=0; FractionLiveToResidue=0.1; FractionDeadToResidue=0
        Constant DMConversionEfficiency: FixedValue=1
        Constant RemobilisationCost: FixedValue=0
        Constant CarbonConcentration: FixedValue=0.4
        Constant StomatalConductanceCO2Modifier: FixedValue=1
        Constant StructuralFraction: FixedValue=0.3
      GenericOrgan Stem: IsAboveGround=true
        Constant NReallocationFactor: FixedValue=0
          Memo
            Rate (fraction per day) at which N can be reallocated e.g. SPECIFICALLY from sensecing stem
        Constant NRetranslocationFactor: FixedValue=0.1
          Memo
            fraction per day of stored stem reserves that can be used elsewhere - from live leaves, not seneseced
        Constant DMReallocationFactor: FixedValue=0.2
          Memo
            How quickly will it reallocate somwhere else (0.1) = 10% per day FROM SENESCED STEM
        Constant DMRetranslocationFactor: FixedValue=0.5
          Memo
            How quickly will it retranslocate somwhere else from LIVE stem (0.1) = 10% per day
        Constant MaximumNConc: FixedValue=0.02
        Constant MinimumNConc: FixedValue=0.007
        PhaseBasedSwitch NitrogenDemandSwitch: Start=Emergence; End=EndGrainFill
        BiomassRemoval BiomassRemovalDefaults: same as Replacements.Chickpea.Shell.BiomassRemovalDefaults
        Constant InitialWtFunction: FixedValue=0; Units=g/m^2
        Constant SenescenceRate: FixedValue=0; Units=/d
        Constant DetachmentRateFunction: FixedValue=0; Units=/d
        Constant MaintenanceRespirationFunction: FixedValue=0; Units=0-1
        Constant DMConversionEfficiency: FixedValue=1; Units=0-1
        VariableReference CriticalNConc: VariableName=[Stem].MinimumNConc
        Constant RemobilisationCost: FixedValue=0
          Constant DMConversionEfficiency: FixedValue=1; Units=0-1
        Constant CarbonConcentration: FixedValue=0.4
        BiomassDemand NDemands
          MultiplyFunction Structural
            VariableReference MinNconc: VariableName=[Stem].minimumNconc
            VariableReference PotentialDMAllocation: VariableName=[Stem].potentialDMAllocation.Structural
          MultiplyFunction Metabolic
            SubtractFunction MetabolicNconc
              VariableReference CritNconc: VariableName=[Stem].criticalNConc
              VariableReference MinNconc: VariableName=[Stem].minimumNconc
            VariableReference PotentialDMAllocation: VariableName=[Stem].potentialDMAllocation.Structural
          StorageNDemandFunction Storage
            VariableReference NitrogenDemandSwitch: VariableName=[Stem].nitrogenDemandSwitch
            VariableReference MaxNconc: VariableName=[Stem].maximumNconc
        RetranslocateNonStructural RetranslocateNitrogen
        BiomassDemand DMDemands
          MultiplyFunction Structural
            PhaseLookup Fraction
              PhaseLookupValue StemGrowthPhase (disabled): Start=Emergence; End=StartGrainfilling
                Constant Fraction: FixedValue=0.7
              PhaseLookupValue PodAndGrainGrowth (disabled): Start=StartGrainfilling; End=EndGrainFill
                Constant Fraction: FixedValue=0.1
              PhaseLookupValue Vegetative_to_Flowering: Start=Emergence; End=StartFlowering
                Constant Fraction: FixedValue=0.5
              PhaseLookupValue Flowering: Start=StartFlowering; End=EndFlowering
                Constant Fraction: FixedValue=0.3
              PhaseLookupValue Grainfilling: Start=EndFlowering; End=EndGrainFill
                Constant Fraction: FixedValue=0.3
            VariableReference DMDemand: VariableName=[Stem].PotentialGrowth
          Constant Metabolic: FixedValue=0
          MultiplyFunction Storage
            VariableReference DMDemand: VariableName=[Stem].PotentialGrowth
            SubtractFunction StorageFraction
              Constant One: FixedValue=1
              VariableReference StructuralFraction: VariableName=[Stem].DMDemands.Structural.Fraction
        PartitionFractionDemandFunction PotentialGrowth
          PhaseLookup PartitionFraction
            PhaseLookupValue StemGrowthPhase (disabled): Start=Emergence; End=StartGrainfilling
              Constant StemFraction: FixedValue=0.5
            PhaseLookupValue GrainFilling (disabled): Start=StartGrainfilling; End=EndGrainFill
              Constant StemFraction: FixedValue=0.05
            PhaseLookupValue Vegetative_to_Flowering: Start=Emergence; End=StartFlowering
              Constant Fraction: FixedValue=0.9
            PhaseLookupValue Flowering: Start=StartFlowering; End=EndFlowering
              Constant Fraction: FixedValue=0.7
            PhaseLookupValue EarlyGrainfilling: Start=EndFlowering; End=LateGrainFilling
              Constant Fraction: FixedValue=0.5
            PhaseLookupValue Grainfilling1: Start=LateGrainFilling; End=EndGrainFill
              Constant Fraction: FixedValue=0
      Nodule
        Constant FixationMetabolicCost: FixedValue=0
        Constant MaximumNConc: FixedValue=0.02
        Constant MinimumNConc: FixedValue=0.01
        Constant SenescenceRate: FixedValue=0
        Constant NReallocationFactor: FixedValue=0
        PhaseBasedSwitch NitrogenDemandSwitch: Start=Emergence; End=EndGrainFill
        BiomassRemoval BiomassRemovalDefaults
          OrganBiomassRemovalType Harvest: FractionLiveToRemove=0; FractionDeadToRemove=0; FractionLiveToResidue=0; FractionDeadToResidue=0
          OrganBiomassRemovalType Cut: FractionLiveToRemove=0; FractionDeadToRemove=0; FractionLiveToResidue=0; FractionDeadToResidue=0
          OrganBiomassRemovalType Prune: FractionLiveToRemove=0; FractionDeadToRemove=0; FractionLiveToResidue=0; FractionDeadToResidue=0
          OrganBiomassRemovalType Graze: FractionLiveToRemove=0; FractionDeadToRemove=0; FractionLiveToResidue=0; FractionDeadToResidue=0
        Constant InitialWtFunction: FixedValue=0; Units=g/m^2
        Constant DetachmentRateFunction: FixedValue=0; Units=/d
        Constant FixationRate: FixedValue=10000; Units=g/m^2/d
        MultiplyFunction FixationRate2
          VariableReference NoduleWt: VariableName=[Nodule].Live.Wt
          Constant SpecificNitrogenaseActivity: FixedValue=0
          MinimumFunction
            AirTemperatureFunction FT
              XYPairs: X=[0, 20, 30, 40]; Y=[0, 1, 1, 0]
            LinearInterpolationFunction FW
              XYPairs: X=[0, 1, 1.5]; Y=[0, 1, 1]
              VariableReference XValue: VariableName=[Leaf].Fw
            LinearInterpolationFunction FWlog
              XYPairs: X=[0, 1, 1.5]; Y=[1, 1, 1]
              VariableReference XValue: VariableName=[Leaf].Fw
        Constant MaintenanceRespirationFunction: FixedValue=0; Units=0-1
        Constant DMConversionEfficiency: FixedValue=1; Units=0-1
        Constant NRetranslocationFactor: FixedValue=0
        Constant DMReallocationFactor: FixedValue=0
        Constant DMRetranslocationFactor: FixedValue=0
        VariableReference CriticalNConc: VariableName=[Nodule].MinimumNConc
        Constant RemobilisationCost: FixedValue=0
        Constant CarbonConcentration: FixedValue=0.4
        BiomassDemand DMDemands
          MultiplyFunction Structural
            PartitionFractionDemandFunction DMDemandFunction
              PhaseLookup PartitionFraction
                PhaseLookupValue Early: Start=Emergence; End=StartFlowering
                  Constant Function: FixedValue=0
                PhaseLookupValue Middle: Start=StartFlowering; End=EndFlowering
                  Constant Function: FixedValue=0
                PhaseLookupValue Late: Start=EndFlowering; End=Maturity
                  Constant Function: FixedValue=0
            Constant StructuralFraction: FixedValue=1; Units=g/g
          Constant Metabolic: FixedValue=0
          StorageDMDemandFunction Storage
            SubtractFunction StorageFraction
              Constant One: FixedValue=1
              VariableReference StructuralFraction: VariableName=[Nodule].DMDemands.Structural.StructuralFraction
        BiomassDemand NDemands
          MultiplyFunction Structural
            VariableReference MinNconc: VariableName=[Nodule].minimumNconc
            VariableReference PotentialDMAllocation: VariableName=[Nodule].potentialDMAllocation.Structural
          MultiplyFunction Metabolic
            SubtractFunction MetabolicNconc
              VariableReference CritNconc: VariableName=[Nodule].criticalNConc
              VariableReference MinNconc: VariableName=[Nodule].minimumNconc
            VariableReference PotentialDMAllocation: VariableName=[Nodule].potentialDMAllocation.Structural
          StorageNDemandFunction Storage
            VariableReference NitrogenDemandSwitch: VariableName=[Nodule].nitrogenDemandSwitch
            VariableReference MaxNconc: VariableName=[Nodule].maximumNconc
      CompositeBiomass AboveGround: DMDOfStructural=0.6
        Propertys=[[Leaf].Live, [Leaf].Dead, [Stem].Live, [Stem].Dead, [Grain].Live, [Grain].Dead, [Shell].Live, [Shell].Dead]
      CompositeBiomass BelowGround: Propertys=[[Root].Live, [Root].Dead, [Nodule].Live, [Nodule].Dead]; DMDOfStructural=0.6
      CompositeBiomass Total: DMDOfStructural=0.6
        Propertys=[[Leaf].Live, [Leaf].Dead, [Stem].Live, [Stem].Dead, [Grain].Live, [Grain].Dead, [Shell].Live, [Shell].Dead, [Root].Live, [Root].Dead, [Nodule].Live, [Nodule].Dead]
      CompositeBiomass TotalLive: DMDOfStructural=0.6
        Propertys=[[Leaf].Live, [Stem].Live, [Grain].Live, [Shell].Live, [Root].Live, [Nodule].Live]
      CompositeBiomass TotalDead: DMDOfStructural=0.6
        Propertys=[[Leaf].Dead, [Stem].Dead, [Grain].Dead, [Shell].Dead, [Root].Dead, [Nodule].Dead]
      CompositeBiomass Pod: Propertys=[[Shell].Live, [Shell].Dead, [Grain].Live, [Grain].Dead]; DMDOfStructural=0.6
      Memo References
        References

        Brown, H.E., Huth, N.I., Holzworth, D.P., Teixeira, E.I., Zyskowski, R.F., Hargreaves, J.N., Moot, D.J., 2014\. Plant modelling framework: software for building and running crop models on the APSIM platform. Environmental Modelling & Software 62 385-398.

        Robertson, M.J., Carberry, P.S., Huth, N.I., Turpin, J.E., Probert, M.E., Poulton, P.L., Bell, M., Wright, G.C., Yeates, S.J., Brinsmead, R.B., 2002\. Simulation of growth and development of diverse legume species in APSIM. Australian Journal of Agricultural Research 53 429-446.

        Singh P, Virmani SM (1996) Modeling growth and yield of chickpea (Cicer arietinum L.). Field Crops Research , 46, 41-59.
      CultivarFolder
        Cultivar Amethyst
          Command:
            [Leaf].ExtinctionCoeff.XYPairs.X = 200, 350, 500, 750, 1000
            [Leaf].ExtinctionCoeff.XYPairs.Y = 0.71, 0.69, 0.66, 0.57, 0.48
        Cultivar JAKI
          Command:
            [Phenology].Vegetative.Target.FixedValue = 630
            [Leaf].LeafCohortParameters.MaxArea.Vegetative_to_Flowering.MaxArea.XYPairs.X = 1,  15,  20,   27,   40
            [Leaf].LeafCohortParameters.MaxArea.Vegetative_to_Flowering.MaxArea.XYPairs.Y = 200,  1000,  1000,   300,  100
            [Leaf].ExtinctionCoeff.XYPairs.X = 200, 350, 500, 750, 1000
            [Leaf].ExtinctionCoeff.XYPairs.Y = 0.71, 0.69, 0.66, 0.57, 0.48
            [Leaf].LeafCohortParameters.SpecificLeafAreaMax.XYPairs.X = 0, 1800
            [Leaf].LeafCohortParameters.SpecificLeafAreaMax.XYPairs.Y = 32000, 2000
            [Leaf].LeafCohortParameters.SpecificLeafAreaMin.XYPairs.X = 0, 1800
            [Leaf].LeafCohortParameters.SpecificLeafAreaMin.XYPairs.Y = 30000, 1000
        Cultivar ICCV2
          Command:
            [Phenology].Vegetative.Target.FixedValue = 460
            [Leaf].LeafCohortParameters.MaxArea.Vegetative_to_Flowering.MaxArea.XYPairs.X = 1,  8,  21,   25,   40
            [Leaf].LeafCohortParameters.MaxArea.Vegetative_to_Flowering.MaxArea.XYPairs.Y = 200,  700,  1000,   200,  100
            [Leaf].ExtinctionCoeff.XYPairs.X = 200, 350, 500, 750, 1000
            [Leaf].ExtinctionCoeff.XYPairs.Y = 0.71, 0.69, 0.66, 0.57, 0.48
            [Leaf].LeafCohortParameters.SpecificLeafAreaMax.XYPairs.X = 0, 1800
            [Leaf].LeafCohortParameters.SpecificLeafAreaMax.XYPairs.Y = 32000, 2000
            [Leaf].LeafCohortParameters.SpecificLeafAreaMin.XYPairs.X = 0, 1800
            [Leaf].LeafCohortParameters.SpecificLeafAreaMin.XYPairs.Y = 30000, 1000
        Cultivar NBeG47
          Command:
            [Phenology].Vegetative.Target.FixedValue = 560
            [Leaf].LeafCohortParameters.MaxArea.Vegetative_to_Flowering.MaxArea.XYPairs.X = 1,  11,  15,   30,   40
            [Leaf].LeafCohortParameters.MaxArea.Vegetative_to_Flowering.MaxArea.XYPairs.Y = 200,  1300,  1300,   400,  100
            [Leaf].ExtinctionCoeff.XYPairs.X = 200, 350, 500, 750, 1000
            [Leaf].ExtinctionCoeff.XYPairs.Y = 0.51, 0.49, 0.46, 0.43, 0.35
            [Leaf].LeafCohortParameters.SpecificLeafAreaMax.XYPairs.X = 0, 1800
            [Leaf].LeafCohortParameters.SpecificLeafAreaMax.XYPairs.Y = 32000, 2000
            [Leaf].LeafCohortParameters.SpecificLeafAreaMin.XYPairs.X = 0, 1800
            [Leaf].LeafCohortParameters.SpecificLeafAreaMin.XYPairs.Y = 30000, 1000
        Cultivar NBeG119
          Command:
            [Phenology].Vegetative.Target.FixedValue = 480
            [Leaf].LeafCohortParameters.MaxArea.Vegetative_to_Flowering.MaxArea.XYPairs.X = 1,  10,  22,   30,   40
            [Leaf].LeafCohortParameters.MaxArea.Vegetative_to_Flowering.MaxArea.XYPairs.Y = 200,  900,  900,   300,  100
            [Leaf].ExtinctionCoeff.XYPairs.X = 200, 350, 500, 750, 1000
            [Leaf].ExtinctionCoeff.XYPairs.Y = 0.76, 0.74, 0.71, 0.60, 0.51
            [Leaf].LeafCohortParameters.SpecificLeafAreaMax.XYPairs.X = 0, 1800
            [Leaf].LeafCohortParameters.SpecificLeafAreaMax.XYPairs.Y = 32000, 2000
            [Leaf].LeafCohortParameters.SpecificLeafAreaMin.XYPairs.X = 0, 1800
            [Leaf].LeafCohortParameters.SpecificLeafAreaMin.XYPairs.Y = 30000, 1000
            [Structure].BranchingRate.Potential_Branching_Rate.Vegetative.MultiplyFunction.MaxBranchRate.XYPairs.X = 0, 2
            [Structure].BranchingRate.Potential_Branching_Rate.Vegetative.MultiplyFunction.MaxBranchRate.XYPairs.Y = 0, 2
        Cultivar Hashem
          Command:
            [Leaf].LeafCohortParameters.MaxArea.Vegetative_to_Flowering.MaxArea.XYPairs.X = 1,  5,  10,  21
            [Leaf].LeafCohortParameters.MaxArea.Vegetative_to_Flowering.MaxArea.XYPairs.Y = 224,  224,  489, 1080
            [Phenology].Vegetative.Target.FixedValue = 610
            [Phenology].Vegetative.Progression.PhotoperiodModifier.CriticalPhotoperiod = 10.3
        Cultivar Anwar
          Command:
            [Leaf].LeafCohortParameters.MaxArea.Vegetative_to_Flowering.MaxArea.XYPairs.X = 1,  5,  10,  21
            [Leaf].LeafCohortParameters.MaxArea.Vegetative_to_Flowering.MaxArea.XYPairs.Y = 224,  224,  489, 1080
            [Phenology].Vegetative.Target.FixedValue = 490
            [Phenology].Vegetative.Progression.PhotoperiodModifier.CriticalPhotoperiod = 11
        Cultivar Ayaz
          Command:
            [Leaf].LeafCohortParameters.MaxArea.Vegetative_to_Flowering.MaxArea.XYPairs.X = 1,  5,  10,  21
            [Leaf].LeafCohortParameters.MaxArea.Vegetative_to_Flowering.MaxArea.XYPairs.Y = 224,  224,  489, 1080
            [Phenology].Vegetative.Target.FixedValue = 550
        Cultivar 99_73C
          Command:
            [Leaf].LeafCohortParameters.MaxArea.Vegetative_to_Flowering.MaxArea.XYPairs.X = 1,  5,  10,  21
            [Leaf].LeafCohortParameters.MaxArea.Vegetative_to_Flowering.MaxArea.XYPairs.Y = 224,  224,  489, 1080
            [Phenology].Vegetative.Target.FixedValue = 440
            [Phenology].Vegetative.Progression.PhotoperiodModifier.CriticalPhotoperiod = 11
        Cultivar 99_66C
          Command:
            [Leaf].LeafCohortParameters.MaxArea.Vegetative_to_Flowering.MaxArea.XYPairs.X = 1,  5,  10,  21
            [Leaf].LeafCohortParameters.MaxArea.Vegetative_to_Flowering.MaxArea.XYPairs.Y = 224,  224,  489, 1080
            [Phenology].Vegetative.Target.FixedValue = 410
            [Phenology].Vegetative.Progression.PhotoperiodModifier.CriticalPhotoperiod = 11
        Cultivar 99_34C
          Command:
            [Leaf].LeafCohortParameters.MaxArea.Vegetative_to_Flowering.MaxArea.XYPairs.X = 1,  5,  10,  21
            [Leaf].LeafCohortParameters.MaxArea.Vegetative_to_Flowering.MaxArea.XYPairs.Y = 224,  224,  489, 1080
            [Phenology].Vegetative.Target.FixedValue = 420
            [Phenology].Vegetative.Progression.PhotoperiodModifier.CriticalPhotoperiod = 11
        Cultivar 98_79C
          Command:
            [Leaf].LeafCohortParameters.MaxArea.Vegetative_to_Flowering.MaxArea.XYPairs.X = 1,  5,  10,  21
            [Leaf].LeafCohortParameters.MaxArea.Vegetative_to_Flowering.MaxArea.XYPairs.Y = 224,  224,  489, 1080
            [Phenology].Vegetative.Target.FixedValue = 410
            [Phenology].Vegetative.Progression.PhotoperiodModifier.CriticalPhotoperiod = 11
        Cultivar 98_55C
          Command:
            [Leaf].LeafCohortParameters.MaxArea.Vegetative_to_Flowering.MaxArea.XYPairs.X = 1,  5,  10,  21
            [Leaf].LeafCohortParameters.MaxArea.Vegetative_to_Flowering.MaxArea.XYPairs.Y = 224,  224,  489, 1080
            [Phenology].Vegetative.Target.FixedValue = 410
            [Phenology].Vegetative.Progression.PhotoperiodModifier.CriticalPhotoperiod = 11
        Cultivar 98_16C
          Command:
            [Leaf].LeafCohortParameters.MaxArea.Vegetative_to_Flowering.MaxArea.XYPairs.X = 1,  5,  10,  21
            [Leaf].LeafCohortParameters.MaxArea.Vegetative_to_Flowering.MaxArea.XYPairs.Y = 224,  224,  489, 1080
            [Phenology].Vegetative.Target.FixedValue = 430
            [Phenology].Vegetative.Progression.PhotoperiodModifier.CriticalPhotoperiod = 10
        Cultivar 98_107C
          Command:
            [Leaf].LeafCohortParameters.MaxArea.Vegetative_to_Flowering.MaxArea.XYPairs.X = 1,  5,  10,  21
            [Leaf].LeafCohortParameters.MaxArea.Vegetative_to_Flowering.MaxArea.XYPairs.Y = 224,  224,  489, 1080
            [Phenology].Vegetative.Target.FixedValue = 410
            [Phenology].Vegetative.Progression.PhotoperiodModifier.CriticalPhotoperiod = 11
        Cultivar 98_106C
          Command:
            [Leaf].LeafCohortParameters.MaxArea.Vegetative_to_Flowering.MaxArea.XYPairs.X = 1,  5,  10,  21
            [Leaf].LeafCohortParameters.MaxArea.Vegetative_to_Flowering.MaxArea.XYPairs.Y = 224,  224,  489, 1080
            [Phenology].Vegetative.Target.FixedValue = 400
            [Phenology].Vegetative.Progression.PhotoperiodModifier.CriticalPhotoperiod = 11
        Cultivar 97_219C
          Command:
            [Leaf].LeafCohortParameters.MaxArea.Vegetative_to_Flowering.MaxArea.XYPairs.X = 1,  5,  10,  21
            [Leaf].LeafCohortParameters.MaxArea.Vegetative_to_Flowering.MaxArea.XYPairs.Y = 224,  224,  489, 1080
            [Phenology].Vegetative.Target.FixedValue = 430
            [Phenology].Vegetative.Progression.PhotoperiodModifier.CriticalPhotoperiod = 11
        Cultivar 97_120C
          Command:
            [Leaf].LeafCohortParameters.MaxArea.Vegetative_to_Flowering.MaxArea.XYPairs.X = 1,  5,  10,  21
            [Leaf].LeafCohortParameters.MaxArea.Vegetative_to_Flowering.MaxArea.XYPairs.Y = 224,  224,  489, 1080
            [Phenology].Vegetative.Target.FixedValue = 400
            [Phenology].Vegetative.Progression.PhotoperiodModifier.CriticalPhotoperiod = 11
        Cultivar 97_118C
          Command:
            [Leaf].LeafCohortParameters.MaxArea.Vegetative_to_Flowering.MaxArea.XYPairs.X = 1,  5,  10,  21
            [Leaf].LeafCohortParameters.MaxArea.Vegetative_to_Flowering.MaxArea.XYPairs.Y = 224,  224,  489, 1080
            [Phenology].Vegetative.Target.FixedValue = 420
            [Phenology].Vegetative.Progression.PhotoperiodModifier.CriticalPhotoperiod = 10.5
        Cultivar 97_116C
          Command:
            [Leaf].LeafCohortParameters.MaxArea.Vegetative_to_Flowering.MaxArea.XYPairs.X = 1,  5,  10,  21
            [Leaf].LeafCohortParameters.MaxArea.Vegetative_to_Flowering.MaxArea.XYPairs.Y = 224,  224,  489, 1080
            [Phenology].Vegetative.Target.FixedValue = 405
            [Phenology].Vegetative.Progression.PhotoperiodModifier.CriticalPhotoperiod = 10.5
        Cultivar 02_35C
          Command:
            [Leaf].LeafCohortParameters.MaxArea.Vegetative_to_Flowering.MaxArea.XYPairs.X = 1,  5,  10,  21
            [Leaf].LeafCohortParameters.MaxArea.Vegetative_to_Flowering.MaxArea.XYPairs.Y = 224,  224,  489, 1080
            [Phenology].Vegetative.Target.FixedValue = 505
            [Phenology].Vegetative.Progression.PhotoperiodModifier.CriticalPhotoperiod = 10.5
        Cultivar 02_30C
          Command:
            [Leaf].LeafCohortParameters.MaxArea.Vegetative_to_Flowering.MaxArea.XYPairs.X = 1,  5,  10,  21
            [Leaf].LeafCohortParameters.MaxArea.Vegetative_to_Flowering.MaxArea.XYPairs.Y = 224,  224,  489, 1080
            [Phenology].Vegetative.Target.FixedValue = 400
            [Phenology].Vegetative.Progression.PhotoperiodModifier.CriticalPhotoperiod = 11
        Cultivar 02_23C
          Command:
            [Leaf].LeafCohortParameters.MaxArea.Vegetative_to_Flowering.MaxArea.XYPairs.X = 1,  5,  10,  21
            [Leaf].LeafCohortParameters.MaxArea.Vegetative_to_Flowering.MaxArea.XYPairs.Y = 224,  224,  489, 1080
            [Phenology].Vegetative.Target.FixedValue = 400
            [Phenology].Vegetative.Progression.PhotoperiodModifier.CriticalPhotoperiod = 11
        Cultivar 02_10C
          Command:
            [Leaf].LeafCohortParameters.MaxArea.Vegetative_to_Flowering.MaxArea.XYPairs.X = 1,  5,  10,  21
            [Leaf].LeafCohortParameters.MaxArea.Vegetative_to_Flowering.MaxArea.XYPairs.Y = 224,  224,  489, 1080
            [Phenology].Vegetative.Target.FixedValue = 500
            [Phenology].Vegetative.Progression.PhotoperiodModifier.CriticalPhotoperiod = 10.5
        Cultivar 02_03C
          Command:
            [Leaf].LeafCohortParameters.MaxArea.Vegetative_to_Flowering.MaxArea.XYPairs.X = 1,  5,  10,  21
            [Leaf].LeafCohortParameters.MaxArea.Vegetative_to_Flowering.MaxArea.XYPairs.Y = 224,  224,  489, 1080
            [Phenology].Vegetative.Target.FixedValue = 500
            [Phenology].Vegetative.Progression.PhotoperiodModifier.CriticalPhotoperiod = 10.5
        Cultivar 01_7C
          Command:
            [Leaf].LeafCohortParameters.MaxArea.Vegetative_to_Flowering.MaxArea.XYPairs.X = 1,  5,  10,  21
            [Leaf].LeafCohortParameters.MaxArea.Vegetative_to_Flowering.MaxArea.XYPairs.Y = 224,  224,  489, 1080
            [Phenology].Vegetative.Target.FixedValue = 485
            [Phenology].Vegetative.Progression.PhotoperiodModifier.CriticalPhotoperiod = 10.5
        Cultivar 01_61C
          Command:
            [Leaf].LeafCohortParameters.MaxArea.Vegetative_to_Flowering.MaxArea.XYPairs.X = 1,  5,  10,  21
            [Leaf].LeafCohortParameters.MaxArea.Vegetative_to_Flowering.MaxArea.XYPairs.Y = 224,  224,  489, 1080
            [Phenology].Vegetative.Target.FixedValue = 500
            [Phenology].Vegetative.Progression.PhotoperiodModifier.CriticalPhotoperiod = 10.5
        Cultivar 01_36C
          Command:
            [Leaf].LeafCohortParameters.MaxArea.Vegetative_to_Flowering.MaxArea.XYPairs.X = 1,  5,  10,  21
            [Leaf].LeafCohortParameters.MaxArea.Vegetative_to_Flowering.MaxArea.XYPairs.Y = 224,  224,  489, 1080
            [Phenology].Vegetative.Target.FixedValue = 600
            [Phenology].Vegetative.Progression.PhotoperiodModifier.CriticalPhotoperiod = 10
        Cultivar 00_40C
          Command:
            [Leaf].LeafCohortParameters.MaxArea.Vegetative_to_Flowering.MaxArea.XYPairs.X = 1,  5,  10,  21
            [Leaf].LeafCohortParameters.MaxArea.Vegetative_to_Flowering.MaxArea.XYPairs.Y = 224,  224,  489, 1080
            [Phenology].Vegetative.Target.FixedValue = 430
            [Phenology].Vegetative.Progression.PhotoperiodModifier.CriticalPhotoperiod = 10
        Cultivar 00_21C
          Command:
            [Leaf].LeafCohortParameters.MaxArea.Vegetative_to_Flowering.MaxArea.XYPairs.X = 1,  5,  10,  21
            [Leaf].LeafCohortParameters.MaxArea.Vegetative_to_Flowering.MaxArea.XYPairs.Y = 224,  224,  489, 1080
            [Phenology].Vegetative.Target.FixedValue = 500
            [Phenology].Vegetative.Progression.PhotoperiodModifier.CriticalPhotoperiod = 10.5
        Cultivar Ghab4
          Command:
            [Leaf].LeafCohortParameters.MaxArea.Vegetative_to_Flowering.MaxArea.XYPairs.X = 1,  5,  10,  21
            [Leaf].LeafCohortParameters.MaxArea.Vegetative_to_Flowering.MaxArea.XYPairs.Y = 224,  224,  489, 1080
            [Phenology].Vegetative.Target.FixedValue = 500
            [Phenology].Vegetative.Progression.PhotoperiodModifier.CriticalPhotoperiod = 10.5
        Cultivar Ghab5
          Command:
            [Leaf].LeafCohortParameters.MaxArea.Vegetative_to_Flowering.MaxArea.XYPairs.X = 1,  5,  10,  21
            [Leaf].LeafCohortParameters.MaxArea.Vegetative_to_Flowering.MaxArea.XYPairs.Y = 224,  224,  489, 1080
            [Phenology].Vegetative.Target.FixedValue = 500
            [Phenology].Vegetative.Progression.PhotoperiodModifier.CriticalPhotoperiod = 10.5
        Cultivar Ghab3
          Command:
            [Leaf].LeafCohortParameters.MaxArea.Vegetative_to_Flowering.MaxArea.XYPairs.X = 1,  5,  10,  21
            [Leaf].LeafCohortParameters.MaxArea.Vegetative_to_Flowering.MaxArea.XYPairs.Y = 224,  224,  489, 1080
            [Phenology].Vegetative.Target.FixedValue = 510
            [Phenology].Vegetative.Progression.PhotoperiodModifier.CriticalPhotoperiod = 10.5
      Folder
        Manager
```csharp
using System;
using Models.Core;
using Models.PMF;

namespace Models
{
    [Serializable] 
    public class Script : Model
    {
        [Link] private Plant chickpea;

        public double RowSpacing
        {
            get
            {
                if (chickpea != null && chickpea.SowingData != null)
                    return chickpea.SowingData.RowSpacing;
                return 0;
             }
         }
    }
}
```
  Folder Validation
    Memo Combined Results
      ### Combined Results

      Simulation results for the combined datasets from the various growing regions are shown in the following graphs. The model is able to adequately capture the influence of growing conditions (e.g. soil, climate) and management (e.g. population, irrigation, sowing date).
    Folder SE Queensland
      Experiment Lawes1990
        Memo
          Peter Carberry unpublished data.  Creek bank soil. Varies in short distances.

          Note that Brinsmead paper says 1st sowing date was waterlogged, which would explain the delayed response on that experiment.

          Note - auto-irrigate function has been used as no record of actual irrigation? Probably that they ran out of water at the end and actually wouldn't have achieved the yields we simulated
        Factors
          Factor Sowing: Specification=[Sowing]
            Operations 1 (disabled)
              1990-05-20  [Chickpea].Sow(population:33.4, cultivar:"Amethyst", depth:50, rowSpacing:350);
              1990-07-29  [Irrigation].Apply(amount:100, depth:0,efficiency:1, willRunoff:false);
              1990-08-28  [Irrigation].Apply(amount:100, depth:0,efficiency:1, willRunoff:false);
              1990-09-27  [Irrigation].Apply(amount:100, depth:0,efficiency:1, willRunoff:false);
            Operations 2
              1990-08-06  [Chickpea].Sow(population:43, cultivar:"Amethyst", depth:50, rowSpacing:350);
              1990-09-17  [Irrigation].Apply(amount:100, depth:0,efficiency:1, willRunoff:false);
              1990-10-07  [Irrigation].Apply(amount:100, depth:0,efficiency:1, willRunoff:false);
              1990-10-27  [Irrigation].Apply(amount:100, depth:0,efficiency:1, willRunoff:false);
              1990-11-16  [Irrigation].Apply(amount:100, depth:0,efficiency:1, willRunoff:false);
              1990-11-26  [Irrigation].Apply(amount:100, depth:0,efficiency:1, willRunoff:false);
        Simulation Lawes1990
          Weather: FileName=cooper.met
          Clock: Start=1990-01-01; End=1990-12-31
          Summary summaryfile
          SoilArbitrator Soil Arbitrator
          Zone Field: Area=1; Slope=0; AspectAngle=0; Altitude=50
            MicroClimate: a_interception=0; b_interception=1; c_interception=0; d_interception=0; soil_albedo=0.13; SoilHeatFluxFraction=0.4; MinimumHeightDiffForNewLayer=0; NightInterceptionFraction=0.5; ReferenceHeight=1
            Irrigation
            Fertiliser
            SurfaceOrganicMatter: InitialResidueName=maize; InitialResidueType=maize; InitialResidueMass=500; InitialStandingFraction=0; InitialCPR=0; InitialCNR=65; FractionFaecesAdded=1
            Operations Sowing
            Operations NRate
              1985-11-08  [Fertiliser].Apply(50, Fertiliser.Types.NH4NO3N, 10);
              1985-11-29  [Fertiliser].Apply(30, Fertiliser.Types.NH4NO3N, 10);
            Report: EventNames=[Clock].DoReport
              VariableNames:
                [Clock].Today
                [Soil].SoilWater.SW
                [Soil].SoilWater.Eo
                [Soil].SoilWater.Es
                [Soil].SoilWater.Drainage
                [Soil].SoilWater.Runoff
                [Soil].SoilWater.pond
                sum([Soil].SoilWater.SWmm) as ProfileWater
                [Soil].SoilNitrogen.NO3.kgha
                [MicroClimate].net_radn
                [MicroClimate].peta
                [MicroClimate].petr
                [chickpea].
            Soil: Latitude=0; Longitude=0
              Physical
                Thickness  BD    AirDry  LL15   DUL    SAT
                150        1.32  0.1     0.31   0.413  0.453
                150        1.32  0.1     0.31   0.413  0.453
                150        1.38  0.26    0.313  0.454  0.479
                300        1.33  0.32    0.376  0.495  0.498
                300        1.33  0.3     0.356  0.495  0.498
                300        1.42  0.27    0.3    0.418  0.464
                300        1.33  0.24    0.303  0.4    0.457
                300        1.35  0.31    0.31   0.37   0.435
                400        1.4   0.16    0.16   0.29   0.38
                SoilCrop ChickpeaSoil: LL=[0.3, 0.3, 0.3, 0.35, 0.35, 0.27, 0.303, 0.31, 0.16]; KL=[0.045, 0.045, 0.045, 0.037, 0.25, 0.015, 0.01, 0, 0]; XF=[1, 1, 1, 1, 1, 1, 1, 1, 1]
              SoilWater: SummerDate=1-Nov; SummerU=2; SummerCona=5; WinterDate=1-Apr; WinterU=2; WinterCona=4.5; DiffusConst=40; DiffusSlope=16; Salb=0.13; CN2Bare=68; CNRed=20; CNCov=0.8; max_pond=0; Thickness=[100, 100, 100, 200, 200, 200, 200, 200, 200]; SWCON=[0.5, 0.5, 0.5, 0.5, 0.5, 0.5, 0.5, 0.5, 0.5]; PrecipitationInterception=0
              SoilNitrogen: fom_types=[default, manure, mucuna, lablab, shemp, stable]; fract_carb=[0.2, 0.3, 0.54, 0.57, 0.45, 0]; fract_cell=[0.7, 0.3, 0.37, 0.37, 0.47, 0.1]; fract_lign=[0.1, 0.4, 0.09, 0.06, 0.08, 0.9]
                SoilNitrogenNO3 NO3
                SoilNitrogenNH4 NH4
                SoilNitrogenUrea Urea
                SoilNitrogenPlantAvailableNO3 PlantAvailableNO3
                SoilNitrogenPlantAvailableNH4 PlantAvailableNH4
              Organic: FOMCNRatio=45
                Thickness  Carbon  SoilCNRatio  FBiom  FInert  FOM
                100        1.2     14.5         0.02   0.42    268.216
                100        1       14.5         0.01   0.5     219.597
                100        0.86    14.5         0.01   0.58    179.791
                200        0.83    14.5         0.01   0.55    120.517
                200        0.58    14.5         0.01   0.86    80.7852
                200        0.54    14.5         0.01   0.9     54.1519
                200        0.47    14.5         0.01   0.95    36.2991
                200        0.5     14.5         0.01   0.95    24.332
                200        0.5     14.5         0.01   0.95    16.3103
              Chemical
                Thickness  NO3N   NH4N  PH
                100        14.4   0.6   6
                100        10.49  0.35  6
                100        6.58   0.1   6
                200        2.45   0.1   6.2
                200        1.765  0.1   6.5
                200        1.08   0.1   6.7
                200        0.15   0.1   6.8
                200        0.49   0.1   6.8
                200        0.83   0.1   6.8
              Sample InitialN: Thickness=[150, 150, 300, 300, 300, 300, 300]; SWUnits=Volumetric; OCUnits=Total; PHUnits=Water
              Sample InitialSW: Thickness=[150, 150, 300, 300, 300, 300, 300]; SW=[0.413, 0.456, 0.408, 0.374, 0.327, 0.325, 0.371]; SWUnits=Volumetric; OCUnits=Total; PHUnits=Water
              CERESSoilTemperature
            Report HarvestReport: EventNames=[Chickpea].Harvesting
              VariableNames:
                [Clock].Today
                [Chickpea].Phenology.CurrentStageName as Stage
                [Chickpea].Phenology.FloweringDAS as FloweringDAS
                [Chickpea].Phenology.MaturityDAS as MaturityDAS
                [Chickpea].Grain.Live.Wt as GrainWt
                [Chickpea].AboveGround.Wt
            Manager Harvesting
```csharp
using System;
using Models.Core;
using System.Collections.Generic;
using System.Text;
using Models.Soils;
using Models.PMF;
using Models;
using System.Xml.Serialization;
using APSIM.Shared.Utilities;

namespace Models
{
    [Serializable] 
    public class Script : Model
    {      
        [Link] Plant Chickpea;          
        [Link] Zone zone;            
                    
        
        [EventSubscribe("Commencing")]
        private void OnSimulationCommencing(object sender, EventArgs e)
        {
        }       
        
        [EventSubscribe("DoManagement")]
        private void OnDoManagement(object sender, EventArgs e)
        {
        if (Chickpea.Phenology.CurrentPhaseName=="ReadyForHarvesting")
           {
           Chickpea.Harvest();
           Chickpea.EndCrop();
           }
        }
        
        [EventSubscribe("DoManagementCalculations")]
        private void OnDoManagementCalculations(object sender, EventArgs e)
        {
            
        }
    }
}
```
            Plant Chickpea: CropType=Chickpea; IsEnding=false; DaysAfterEnding=0
            Manager AutoIrrigate
              FASW = 0
              WaterDeficit = 0
              AutoIrrigationOn = True
              StartStageName = Emergence
              EndStageName = EndGrainFill
              FASWThreshold = 0.9
              FASWDepth = 1000
```csharp
using System;
using Models.Core;
using System.Collections.Generic;
using System.Text;
using Models.Soils;
using Models.PMF;
using Models;
using System.Xml.Serialization;
using APSIM.Shared.Utilities;

namespace Models
{
    [Serializable] 
    public class Script : Model
    {
        public double FASW { get; set; }
        public double WaterDeficit  { get; set; }
    
        [Link] Plant Chickpea;
        [Link] Zone zone;
        [Link] Irrigation irrigation;
        [Link] Soil soil;
        
        [Description("Auto irrigation on?")]
        public bool AutoIrrigationOn { get; set; }
        
        [Description("Irrigation window start stage")]
        public string StartStageName { get; set; }
        [Description("Irrigation window end stage")]
        public string EndStageName { get; set; }

        [Description("Threshold fraction available water (0-1)")]
        public double FASWThreshold { get; set; }

        [Description("Soil depth (mm) to which fraction available water is calculated")]
        public double FASWDepth { get; set; }

        [EventSubscribe("DoManagement")]
        private void OnDoManagement(object sender, EventArgs e)
        {
            CalculateFASW();
            if (AutoIrrigationOn && Chickpea.Phenology.Between(StartStageName, EndStageName))
            {
                if (FASW < FASWThreshold)
                {
                    double amount = 10;
                    irrigation.Apply(WaterDeficit, depth: 0);
                }
            }
        }
        
        private void CalculateFASW()
        {
            double[] LL15 = MathUtilities.Multiply(soil.LL15, soil.Thickness);
            double[] DUL = MathUtilities.Multiply(soil.DUL, soil.Thickness);
        
            int nlayr = GetLayerIndex();
            double cumdep = MathUtilities.Sum(soil.Thickness, 0, nlayr, 0.0);

            double excess_fr = MathUtilities.Divide((cumdep - FASWDepth), soil.Thickness[nlayr], 0.0);

            // note that results may be strange if swdep < ll15
            double avail_sw = (MathUtilities.Sum(soil.Water, 0, nlayr, 0.0)
                              - excess_fr * soil.Water[nlayr])
                              - (MathUtilities.Sum(LL15, 0, nlayr, 0.0)
                              - excess_fr * LL15[nlayr]);


            double pot_avail_sw = (MathUtilities.Sum(DUL, 0, nlayr, 0.0)
                                  - excess_fr * DUL[nlayr])
                                  - (MathUtilities.Sum(LL15, 0, nlayr, 0.0)
                                  - excess_fr * LL15[nlayr]);

            FASW = MathUtilities.Divide(avail_sw, pot_avail_sw, 0.0);
            WaterDeficit = MathUtilities.Constrain(pot_avail_sw - avail_sw, 0.0, 100000);
        }

        private int GetLayerIndex()
        {
            double[] cumThickness = soil.ThicknessCumulative;
            for (int i = 1; i < cumThickness.Length; i++)
            {
                if (FASWDepth < cumThickness[i])
                    return i - 1;
            }
            
            return cumThickness.Length - 1;
        }

    }
}
```
      Experiment Lawes1991
        Memo
           Creek bank. Highly variable soil.

          Peter Carberry upublished data. Also known as APS2??
        Factors Factors2
          Factor Sowing: Specification=[Sowing]
            Operations 1
              1991-05-29  [Chickpea].Sow(population:28, cultivar:"Amethyst", depth:50, rowSpacing:500);
              1991-05-29  [Irrigation].Apply(amount:40, depth:0,efficiency:1, willRunoff:false);
              1991-06-20  [Irrigation].Apply(amount:40, depth:0,efficiency:1, willRunoff:false);
              1991-07-10  [Irrigation].Apply(amount:40, depth:0,efficiency:1, willRunoff:false);
              1991-07-30  [Irrigation].Apply(amount:40, depth:0,efficiency:1, willRunoff:false);
              1991-08-19  [Irrigation].Apply(amount:40, depth:0,efficiency:1, willRunoff:false);
              1991-09-08  [Irrigation].Apply(amount:40, depth:0,efficiency:1, willRunoff:false);
              1991-09-28  [Irrigation].Apply(amount:40, depth:0,efficiency:1, willRunoff:false);
              1991-10-18  [Irrigation].Apply(amount:40, depth:0,efficiency:1, willRunoff:false);
              1991-11-07  [Irrigation].Apply(amount:40, depth:0,efficiency:1, willRunoff:false);
            Operations 2 (disabled)
              1991-07-28  [Chickpea].Sow(population:28, cultivar:"Amethyst", depth:50, rowSpacing:500);
              1991-05-29  [Irrigation].Apply(amount:40, depth:0,efficiency:1, willRunoff:false);
              1991-06-20  [Irrigation].Apply(amount:40, depth:0,efficiency:1, willRunoff:false);
              1991-07-10  [Irrigation].Apply(amount:40, depth:0,efficiency:1, willRunoff:false);
              1991-07-30  [Irrigation].Apply(amount:40, depth:0,efficiency:1, willRunoff:false);
              1991-08-19  [Irrigation].Apply(amount:40, depth:0,efficiency:1, willRunoff:false);
              1991-09-08  [Irrigation].Apply(amount:40, depth:0,efficiency:1, willRunoff:false);
              1991-09-28  [Irrigation].Apply(amount:40, depth:0,efficiency:1, willRunoff:false);
              1991-10-18  [Irrigation].Apply(amount:40, depth:0,efficiency:1, willRunoff:false);
              1991-11-07  [Irrigation].Apply(amount:40, depth:0,efficiency:1, willRunoff:false);
              Memo
                something weird here. Can't balance MS leaf number with apparent correct sowing date amethyst phenology and measured grain weight development. So exclude
        Simulation Lawes1991
          Weather: FileName=cooper.met
          Clock: Start=1991-01-01; End=1991-12-31
          Summary summaryfile
          SoilArbitrator Soil Arbitrator
          Zone Field: Area=1; Slope=0; AspectAngle=0; Altitude=50
            MicroClimate: a_interception=0; b_interception=1; c_interception=0; d_interception=0; soil_albedo=0.13; SoilHeatFluxFraction=0.4; MinimumHeightDiffForNewLayer=0; NightInterceptionFraction=0.5; ReferenceHeight=2
            Irrigation
            Fertiliser
            SurfaceOrganicMatter: InitialResidueName=maize; InitialResidueType=maize; InitialResidueMass=500; InitialStandingFraction=0; InitialCPR=0; InitialCNR=65; FractionFaecesAdded=1
            Operations Sowing
            Operations NRate
              1985-11-08  [Fertiliser].Apply(50, Fertiliser.Types.NH4NO3N, 10);
              1985-11-29  [Fertiliser].Apply(30, Fertiliser.Types.NH4NO3N, 10);
            Report: EventNames=[Clock].DoReport
              VariableNames:
                [Clock].Today
                [Soil].SoilWater.SW
                [Soil].SoilWater.Eo
                [Soil].SoilWater.Es
                [Soil].SoilWater.Drainage
                [Soil].SoilWater.Runoff
                [Soil].SoilWater.pond
                sum([Soil].SoilWater.SWmm) as ProfileWater
                [Soil].SoilNitrogen.NO3.kgha
                [MicroClimate].net_radn
                [MicroClimate].peta
                [MicroClimate].petr
                [Chickpea].Leaf.LAI
                [Chickpea].Structure.LeafTipsAppeared
                [Chickpea].Structure.PlantTotalNodeNo
                [Chickpea].Leaf.SenescingCohortNo
                [Chickpea].Structure.TotalStemPopn
                [Chickpea].AboveGround.Wt
                [Chickpea].Leaf.Live.Wt
                [Chickpea].Stem.Live.Wt
            Soil: Latitude=0; Longitude=0
              Physical
                Thickness  BD    AirDry  LL15  DUL    SAT
                150        1.38  0.05    0.18  0.384  0.434
                150        1.38  0.19    0.19  0.381  0.431
                300        1.32  0.2     0.2   0.44   0.49
                300        1.46  0.22    0.22  0.424  0.448
                300        1.51  0.19    0.19  0.419  0.43
                300        1.49  0.17    0.17  0.376  0.426
                300        1.47  0.17    0.17  0.377  0.427
                SoilCrop ChickpeaSoil: LL=[0.25, 0.25, 0.23, 0.25, 0.2, 0.2, 0.2]; KL=[0.045, 0.045, 0.045, 0.03, 0.02, 0.01, 0.01]; XF=[1, 1, 1, 1, 1, 0, 0]
              SoilWater: SummerDate=1-Nov; SummerU=2; SummerCona=4.5; WinterDate=1-Apr; WinterU=2; WinterCona=4; DiffusConst=88; DiffusSlope=35.4; Salb=0.13; CN2Bare=50; CNRed=20; CNCov=0.8; max_pond=0; Thickness=[100, 100, 100, 200, 200, 200, 200, 200, 200]; SWCON=[0.5, 0.5, 0.5, 0.5, 0.5, 0.5, 0.5, 0.5, 0.5]; PrecipitationInterception=0
              SoilNitrogen: same as Validation.SE Queensland.Lawes1990.Lawes1990.Field.soil.SoilNitrogen
              Organic: same as Validation.SE Queensland.Lawes1990.Lawes1990.Field.soil.Organic
              Chemical
                Thickness  NO3N  NH4N  PH
                100        14.3  0     6
                100        10.1  0     6
                100        5.9   0     6
                200        1.8   0     6.2
                200        1.35  0     6.5
                200        0.9   0     6.7
                200        1     0     6.8
                200        0.6   0     6.8
                200        0.2   0     6.8
              Sample InitialN: Thickness=[150, 150, 300, 300, 300, 300, 300]; SWUnits=Volumetric; OCUnits=Total; PHUnits=Water
              Sample InitialSW: Thickness=[150, 150, 300, 300, 300, 300, 300]; SW=[0.384, 0.381, 0.44, 0.424, 0.419, 0.376, 0.377]; SWUnits=Volumetric; OCUnits=Total; PHUnits=Water
              CERESSoilTemperature
            Report HarvestReport: EventNames=[Chickpea].Harvesting
              VariableNames:
                [Clock].Today
                [Chickpea].Phenology.CurrentStageName as Stage
                [Chickpea].Phenology.FloweringDAS as FloweringDAS
                [Chickpea].Phenology.MaturityDAS as MaturityDAS
                [Chickpea].Grain.Live.Wt as GrainWt
            Manager Harvesting: same as Validation.SE Queensland.Lawes1990.Lawes1990.Field.Harvesting
            Plant Chickpea: CropType=Chickpea; IsEnding=false; DaysAfterEnding=0
            Manager AutoIrrigate: same as Validation.SE Queensland.Lawes1990.Lawes1990.Field.AutoIrrigate
      Experiment Lawes1993 (disabled)
        Memo
          R Brinsmead unpublished data. Suspect that the final biomass data may in fact have been Stover - would look good if added to grain yield.  Modifying kl by linear extrapolation from plant population for different treatments. Still uncertain about where on farm this trial was conducted i.e. what soil type? Source of starting soil water? Looks to just be set to DUL = unlikely. Not sure if I have changed clock date, need to check. Also MJR paper suggests it is irrigated but none included here at the moment, currently oversimulating biomass production.

          No known starting soil data, currently starting at DUL which is obviously false. (although perhaps this was created via pre-sowing irrigation?).

          NOTE: large amounts of dead leaf mass compared to simulated suggest disease problems with the trial - may mean we will never simulate it well. Also means that it may give false trends in relation to row spacing and plant population, because more densely populated rows are more likely to be hit hard by disease as sprays are less likely to penetrate.

          NOTE - may simply need to drop all leaves to model correct harvest biomass - chickpea HI looks really high because leaves are on ground and not sampled. Unsure if this could be more likely in terminal drought stress.

          FACTS
          According to earliest known data file: (Gat93.xls - see Chickpea Perry folder/APSIM/Chickpea/APS16)
          2nd sowing date had two varieties - 2nd variety unknown and not simulated. 1st variety has 4 treatments (1,2,4,5) repeated on second sow date

          Sim names are based on intended plant pop (and row spacing) but ACTUAL, ACHIEVED plant pop is used in simulations
        Memo important note
          Peter Carberry unpublished data. Possible the first sowing date was incorrectly passed on? Would work well if sown a month later. Creek bank soil. Varies in short distances.

          Note that Brinsmead paper says 1st sowing date was waterlogged, which would explain the delayed response on that experiment.
        Factors
          Factor SD: Specification=[SowingRule]
            Manager 1PP20RS17
              SowDate = 25-May
              CultivarName = Amethyst
              SowingDepth = 50
              RowSpacing = 170
              Population = 20
```csharp
using System;
using Models.Core;
using Models.PMF;
using Models.Soils;
using Models.Utilities;
using APSIM.Shared.Utilities;

namespace Models
{
    [Serializable]
    public class Script : Model
    {
        [Link] Clock Clock;
        [Link] Fertiliser Fertiliser;
        [Link] Summary Summary;
        [Link] Plant Chickpea;
        [Link] Soil Soil;
        Accumulator accumulatedRain;
        
        [Description("Sowing date (d-mmm)")]
        public string SowDate { get; set; }
        [Description("Cultivar to be sown")]
        public string CultivarName { get; set; }
        [Description("Sowing depth (mm)")]
        public double SowingDepth { get; set; }
        [Description("Row spacing (mm)")]
        public double RowSpacing { get; set; }
        [Description("Plant population (/m2)")]
        public double Population { get; set; }
        
        


        [EventSubscribe("DoManagement")]
        private void OnDoManagement(object sender, EventArgs e)
        {
        
            
            if (DateUtilities.WithinDates(SowDate, Clock.Today, SowDate))
            {
                Chickpea.Sow(population: Population, cultivar: CultivarName, depth: SowingDepth, rowSpacing: RowSpacing);  

   
            }
        
        }
        
    }
}
```
            Manager 1PP20RS35
              SowDate = 25-May
              CultivarName = Amethyst
              SowingDepth = 50
              RowSpacing = 350
              Population = 18
              script: same as in Validation.SE Queensland.Lawes1993.Factors.SD.1PP20RS17
            Manager 1PP20RS70
              SowDate = 25-May
              CultivarName = Amethyst
              SowingDepth = 50
              RowSpacing = 700
              Population = 17
              script: same as in Validation.SE Queensland.Lawes1993.Factors.SD.1PP20RS17
            Manager 1PP45RS17
              SowDate = 25-May
              CultivarName = Amethyst
              SowingDepth = 50
              RowSpacing = 170
              Population = 33
              script: same as in Validation.SE Queensland.Lawes1993.Factors.SD.1PP20RS17
            Manager 1PP45RS35
              SowDate = 25-May
              CultivarName = Amethyst
              SowingDepth = 50
              RowSpacing = 350
              Population = 35
              script: same as in Validation.SE Queensland.Lawes1993.Factors.SD.1PP20RS17
            Manager 1PP45RS70
              SowDate = 25-May
              CultivarName = Amethyst
              SowingDepth = 50
              RowSpacing = 700
              Population = 41
              script: same as in Validation.SE Queensland.Lawes1993.Factors.SD.1PP20RS17
            Manager 1PP90RS35
              SowDate = 25-May
              CultivarName = Amethyst
              SowingDepth = 50
              RowSpacing = 350
              Population = 78
              script: same as in Validation.SE Queensland.Lawes1993.Factors.SD.1PP20RS17
            Manager 1PP90RS70
              SowDate = 25-May
              CultivarName = Amethyst
              SowingDepth = 50
              RowSpacing = 700
              Population = 69
              script: same as in Validation.SE Queensland.Lawes1993.Factors.SD.1PP20RS17
            Manager 2PP20RS35
              SowDate = 21-Jul
              CultivarName = Amethyst
              SowingDepth = 50
              RowSpacing = 350
              Population = 18
              script: same as in Validation.SE Queensland.Lawes1993.Factors.SD.1PP20RS17
            Manager 2PP45RS17
              SowDate = 21-Jul
              CultivarName = Amethyst
              SowingDepth = 50
              RowSpacing = 170
              Population = 50
              script: same as in Validation.SE Queensland.Lawes1993.Factors.SD.1PP20RS17
            Manager 2PP45RS35
              SowDate = 21-Jul
              CultivarName = Amethyst
              SowingDepth = 50
              RowSpacing = 350
              Population = 41
              script: same as in Validation.SE Queensland.Lawes1993.Factors.SD.1PP20RS17
            Manager 2PP45RS70
              SowDate = 21-Jul
              CultivarName = Amethyst
              SowingDepth = 50
              RowSpacing = 700
              Population = 36
              script: same as in Validation.SE Queensland.Lawes1993.Factors.SD.1PP20RS17
        Simulation Lawes1993
          Weather: FileName=cooper.met
          Clock: Start=1993-05-24; End=1993-12-31
          Summary summaryfile
          SoilArbitrator Soil Arbitrator
          Zone Field: Area=1; Slope=0; AspectAngle=0; Altitude=50
            MicroClimate: a_interception=0; b_interception=1; c_interception=0; d_interception=0; soil_albedo=0.13; SoilHeatFluxFraction=0.4; MinimumHeightDiffForNewLayer=0; NightInterceptionFraction=0.5; ReferenceHeight=2
            Irrigation
            Fertiliser
            SurfaceOrganicMatter: InitialResidueName=maize; InitialResidueType=maize; InitialResidueMass=500; InitialStandingFraction=0; InitialCPR=0; InitialCNR=65; FractionFaecesAdded=1
            Operations Sowing
            Operations NRate
              1985-11-08  [Fertiliser].Apply(50, Fertiliser.Types.NH4NO3N, 10);
              1985-11-29  [Fertiliser].Apply(30, Fertiliser.Types.NH4NO3N, 10);
            Report: EventNames=[Clock].DoReport
              VariableNames:
                [Clock].Today
                [Soil].SoilWater.SW
                [Soil].SoilWater.Eo
                [Soil].SoilWater.Es
                [Soil].SoilWater.Drainage
                [Soil].SoilWater.Runoff
                [Soil].SoilWater.pond
                sum([Soil].SoilWater.SWmm) as ProfileWater
                [Soil].SoilNitrogen.NO3.kgha
                [MicroClimate].net_radn
                [MicroClimate].peta
                [MicroClimate].petr
                [Chickpea].Leaf.Fw
                [Chickpea].Leaf.Fn
            Soil: Latitude=0; Longitude=0
              Physical
                Thickness  BD    AirDry  LL15  DUL    SAT
                150        1.38  0.05    0.18  0.384  0.434
                150        1.38  0.19    0.19  0.381  0.431
                300        1.32  0.2     0.2   0.44   0.49
                300        1.46  0.22    0.22  0.424  0.448
                300        1.51  0.19    0.19  0.419  0.43
                300        1.49  0.17    0.17  0.376  0.426
                300        1.47  0.17    0.17  0.377  0.427
                SoilCrop ChickpeaSoil: LL=[0.25, 0.25, 0.23, 0.25, 0.2, 0.2, 0.2]; KL=[0.045, 0.045, 0.045, 0.03, 0.02, 0.01, 0.01]; XF=[1, 1, 1, 1, 1, 0, 0]
              SoilWater: SummerDate=1-Nov; SummerU=9; SummerCona=3; WinterDate=1-Apr; WinterU=9; WinterCona=3; DiffusConst=88; DiffusSlope=35.4; Salb=0.13; CN2Bare=50; CNRed=20; CNCov=0.8; max_pond=0; Thickness=[100, 100, 100, 200, 200, 200, 200, 200, 200]; SWCON=[0.5, 0.5, 0.5, 0.5, 0.5, 0.5, 0.5, 0.5, 0.5]; PrecipitationInterception=0
              SoilNitrogen: fom_types=[default, manure, mucuna, lablab, shemp, stable]; fract_carb=[0.2, 0.3, 0.54, 0.57, 0.45, 0]; fract_cell=[0.7, 0.3, 0.37, 0.37, 0.47, 0.1]; fract_lign=[0.1, 0.4, 0.09, 0.06, 0.08, 0.9]
                SoilNitrogenNO3 NO3
                SoilNitrogenNH4 NH4
                SoilNitrogenUrea Urea
                SoilNitrogenPlantAvailableNO3 PlantAvailableNO3
                SoilNitrogenPlantAvailableNH4 PlantAvailableNH4
              Organic: FOMCNRatio=45
                Thickness  Carbon  SoilCNRatio  FBiom  FInert  FOM
                100        1.2     14.5         0.02   0.42    268.216
                100        1       14.5         0.01   0.5     219.597
                100        0.86    14.5         0.01   0.58    179.791
                200        0.83    14.5         0.01   0.55    120.517
                200        0.58    14.5         0.01   0.86    80.7852
                200        0.54    14.5         0.01   0.9     54.1519
                200        0.47    14.5         0.01   0.95    36.2991
                200        0.5     14.5         0.01   0.95    24.332
                200        0.5     14.5         0.01   0.95    16.3103
              Chemical
                Thickness  NO3N  NH4N  PH
                100        14.3  0     6
                100        10.1  0     6
                100        5.9   0     6
                200        1.8   0     6.2
                200        1.35  0     6.5
                200        0.9   0     6.7
                200        1     0     6.8
                200        0.6   0     6.8
                200        0.2   0     6.8
              Sample InitialN: Thickness=[150, 150, 300, 300, 300, 300, 300]; SWUnits=Volumetric; OCUnits=Total; PHUnits=Water
              Sample InitialSW: Thickness=[150, 150, 300, 300, 300, 300, 300]; SW=[0.384, 0.381, 0.44, 0.424, 0.419, 0.376, 0.377]; SWUnits=Volumetric; OCUnits=Total; PHUnits=Water
              CERESSoilTemperature
            Report HarvestReport: EventNames=[Chickpea].Harvesting
              VariableNames:
                [Clock].Today
                [Chickpea].Phenology.CurrentStageName as Stage
                [Chickpea].Phenology.FloweringDAS as FloweringDAS
                [Chickpea].Phenology.MaturityDAS as MaturityDAS
                [Chickpea].Grain.Live.Wt as GrainWt
            Manager Harvesting
              script: same as in Validation.SE Queensland.Lawes1990.Lawes1990.Field.Harvesting
            Plant Chickpea: CropType=Chickpea; IsEnding=false; DaysAfterEnding=0
            Manager SowingRule
              SowDate = 24-Jul
              CultivarName = Amethyst
              SowingDepth = 50
              RowSpacing = 750
              Population = 6
              script: same as in Validation.SE Queensland.Lawes1993.Factors.SD.1PP20RS17
      Experiment Lawes1995
        Memo
          This version has modified kl values to see what would be necessary to reduce kls and achieve biomass from this experiment. Data from Yash dang suggests little deep water extraction from Chickpea - at odds with this experiment, that may have had tree roots encroaching on its area.

          Also known as APS27. Was sown adjacent to the APS26 wheat experiment and should theoretically have received the same irrigation. Creek bank. May have a problem with NMM calibration. WUE of APS26 wheat was not right, but their problem was too much biomass for the amount of water. We have opposite problem of model getting away too fast.

          May also need to drop leaves at end in order to correct biomass.

          Quite probable that the wet treatment developed disease issues or N fixation issues due to regular water, which might explain overprediction of biomass - and also explains why water use looks OK in this one. If biomass were higher (in absence of disease) then water use would increase and show the same bias between observed and predicted that we are seeing in the water limited treatment.
        Factors
          Factor Trt: Specification=[Sowing]
            Operations Wet
              1995-06-15  [Chickpea].Sow(population:37.3, cultivar:"Amethyst", depth:50, rowSpacing:350);
              1995-06-15  [Soil].SoilWater.SW = 0.329,0.347,0.379,0.318,0.358,0.332,0.292
              1995-07-05  [Irrigation].Apply(amount:26, depth:0,efficiency:0.8, willRunoff:false);
              1995-07-21  [Irrigation].Apply(amount:14, depth:0,efficiency:0.8, willRunoff:false);
              1995-08-01  [Irrigation].Apply(amount:28, depth:0,efficiency:0.8, willRunoff:false);
              1995-08-11  [Irrigation].Apply(amount:30, depth:0,efficiency:0.8, willRunoff:false);
              1995-08-25  [Irrigation].Apply(amount:15, depth:0,efficiency:0.8, willRunoff:false);
              1995-08-31  [Irrigation].Apply(amount:14, depth:0,efficiency:0.8, willRunoff:false);
              1995-09-04  [Irrigation].Apply(amount:15, depth:0,efficiency:0.8, willRunoff:false);
              1995-09-15  [Irrigation].Apply(amount:25, depth:0,efficiency:0.8, willRunoff:false);
              1995-09-22  [Irrigation].Apply(amount:20, depth:0,efficiency:0.8, willRunoff:false);
              1995-10-02  [Irrigation].Apply(amount:11, depth:0,efficiency:0.8, willRunoff:false);
            Operations Dry
              1995-06-14  [Chickpea].Sow(population:39.5, cultivar:"Amethyst", depth:50, rowSpacing:350);
              1995-06-05  [Irrigation].Apply(amount:175, depth:0,efficiency:1, willRunoff:false);
              1995-06-15  [Soil].SoilWater.SW = 0.341,0.346,0.309,0.324,0.304,0.296,0.280
        Simulation Lawes1995
          Weather: FileName=cooper.met
          Clock: Start=1995-06-14; End=1995-12-31
          Summary summaryfile
          SoilArbitrator Soil Arbitrator
          Zone Field: Area=1; Slope=0; AspectAngle=0; Altitude=50
            MicroClimate: a_interception=0; b_interception=1; c_interception=0; d_interception=0; soil_albedo=0.13; SoilHeatFluxFraction=0.4; MinimumHeightDiffForNewLayer=0; NightInterceptionFraction=0.5; ReferenceHeight=1
            Irrigation
            Fertiliser
            SurfaceOrganicMatter: InitialResidueName=maize; InitialResidueType=maize; InitialResidueMass=500; InitialStandingFraction=0; InitialCPR=0; InitialCNR=65; FractionFaecesAdded=1
            Operations Sowing
            Report: EventNames=[Clock].DoReport
              VariableNames:
                [Clock].Today
                [Soil].SoilWater.SW
                [Soil].SoilWater.Eo
                [Soil].SoilWater.Es
                [Soil].SoilWater.Drainage
                [Soil].SoilWater.Runoff
                [Soil].SoilWater.pond
                sum([Soil].SoilWater.SWmm) as ProfileWater
                [Soil].SoilNitrogen.NO3.kgha
                [MicroClimate].net_radn
                [MicroClimate].peta
                [MicroClimate].petr
            Soil: Latitude=0; Longitude=0
              Physical
                Thickness  BD    AirDry  LL15  DUL    SAT
                150        1.38  0.05    0.18  0.36   0.455
                150        1.38  0.19    0.19  0.373  0.423
                300        1.35  0.2     0.2   0.389  0.439
                300        1.46  0.22    0.22  0.348  0.398
                300        1.42  0.19    0.19  0.365  0.415
                300        1.45  0.17    0.17  0.352  0.402
                300        1.47  0.17    0.17  0.327  0.377
                SoilCrop ChickpeaSoil: LL=[0.25, 0.25, 0.2, 0.23, 0.21, 0.21, 0.22]; KL=[0.045, 0.045, 0.045, 0.03, 0.02, 0.01, 0.01]; XF=[1, 1, 1, 1, 1, 1, 1]
              SoilWater: SummerDate=1-Nov; SummerU=2; SummerCona=4.5; WinterDate=1-Apr; WinterU=2; WinterCona=4; DiffusConst=40; DiffusSlope=16; Salb=0.13; CN2Bare=78; CNRed=20; CNCov=0.8; max_pond=0; Thickness=[100, 100, 100, 200, 200, 200, 200, 200, 200]; SWCON=[0.3, 0.3, 0.3, 0.3, 0.3, 0.3, 0.3, 0.3, 0.3]; PrecipitationInterception=0
              SoilNitrogen: same as Validation.SE Queensland.Lawes1990.Lawes1990.Field.soil.SoilNitrogen
              Organic: same as Validation.SE Queensland.Lawes1990.Lawes1990.Field.soil.Organic
              Chemical: same as Validation.SE Queensland.Lawes1991.Lawes1991.Field.soil.Chemical
              Sample InitialN: Thickness=[150, 150, 300, 300, 300, 300, 300]; SWUnits=Volumetric; OCUnits=Total; PHUnits=Water
              Sample InitialSW: Thickness=[150, 150, 300, 300, 300, 300, 300]; SW=[0.384, 0.381, 0.44, 0.424, 0.419, 0.376, 0.377]; SWUnits=Volumetric; OCUnits=Total; PHUnits=Water
              CERESSoilTemperature
            Report HarvestReport: EventNames=[Chickpea].Harvesting
              VariableNames:
                [Clock].Today
                [Chickpea].Phenology.CurrentStageName as Stage
                [Chickpea].Phenology.FloweringDAS as FloweringDAS
                [Chickpea].Phenology.MaturityDAS as MaturityDAS
                [Chickpea].Grain.Live.Wt as GrainWt
            Manager Harvesting: same as Validation.SE Queensland.Lawes1990.Lawes1990.Field.Harvesting
            Plant Chickpea: CropType=Chickpea; IsEnding=false; DaysAfterEnding=0
        Memo
          Suspect that wet treatment may have become diseased due to excess irrigation. In which case would explain overprediction of biomass. Would also explain correct prediction of SW (when dry treatment underpredicts extraction) as if the wet treatment was disease limited, its observed SW use was less than it might have been
      Experiment Lawes1995original (disabled)
        Memo
          Also known as APS27. Was sown adjacent to the APS26 wheat experiment and should theoretically have received the same irrigation. Creek bank. May have a problem with NMM calibration. WUE of APS26 wheat was not right, but their problem was too much biomass for the amount of water. We have opposite problem of model getting away too fast.

          May also need to drop leaves at end in order to correct biomass.
        Factors
          Factor Trt: Specification=[Sowing]
            Operations Wet
              1995-06-15  [Chickpea].Sow(population:37.3, cultivar:"Amethyst", depth:50, rowSpacing:350);
              1995-06-15  [Soil].SoilWater.SW = 0.329,0.347,0.379,0.318,0.358,0.332,0.292
              1995-07-05  [Irrigation].Apply(amount:26, depth:0,efficiency:0.8, willRunoff:false);
              1995-07-21  [Irrigation].Apply(amount:14, depth:0,efficiency:0.8, willRunoff:false);
              1995-08-01  [Irrigation].Apply(amount:28, depth:0,efficiency:0.8, willRunoff:false);
              1995-08-11  [Irrigation].Apply(amount:30, depth:0,efficiency:0.8, willRunoff:false);
              1995-08-25  [Irrigation].Apply(amount:15, depth:0,efficiency:0.8, willRunoff:false);
              1995-08-31  [Irrigation].Apply(amount:14, depth:0,efficiency:0.8, willRunoff:false);
              1995-09-04  [Irrigation].Apply(amount:15, depth:0,efficiency:0.8, willRunoff:false);
              1995-09-15  [Irrigation].Apply(amount:25, depth:0,efficiency:0.8, willRunoff:false);
              1995-09-22  [Irrigation].Apply(amount:20, depth:0,efficiency:0.8, willRunoff:false);
              1995-10-02  [Irrigation].Apply(amount:11, depth:0,efficiency:0.8, willRunoff:false);
            Operations Dry
              1995-06-14  [Chickpea].Sow(population:39.5, cultivar:"Amethyst", depth:50, rowSpacing:350);
              1995-06-05  [Irrigation].Apply(amount:175, depth:0,efficiency:1, willRunoff:false);
              1995-06-15  [Soil].SoilWater.SW = 0.341,0.346,0.309,0.324,0.304,0.296,0.280
        Simulation Lawes1995original
          Weather: FileName=cooper.met
          Clock: Start=1995-06-14; End=1995-12-31
          Summary summaryfile
          SoilArbitrator Soil Arbitrator
          Zone Field: Area=1; Slope=0; AspectAngle=0; Altitude=50
            MicroClimate: a_interception=0; b_interception=1; c_interception=0; d_interception=0; soil_albedo=0.13; SoilHeatFluxFraction=0.4; MinimumHeightDiffForNewLayer=0; NightInterceptionFraction=0.5; ReferenceHeight=1
            Irrigation
            Fertiliser
            SurfaceOrganicMatter: InitialResidueName=maize; InitialResidueType=maize; InitialResidueMass=500; InitialStandingFraction=0; InitialCPR=0; InitialCNR=65; FractionFaecesAdded=1
            Operations Sowing
            Report: EventNames=[Clock].DoReport
              VariableNames:
                [Clock].Today
                [Soil].SoilWater.SW
                [Soil].SoilWater.Eo
                [Soil].SoilWater.Es
                [Soil].SoilWater.Drainage
                [Soil].SoilWater.Runoff
                [Soil].SoilWater.pond
                sum([Soil].SoilWater.SWmm) as ProfileWater
                [Soil].SoilNitrogen.NO3.kgha
                [MicroClimate].net_radn
                [MicroClimate].peta
                [MicroClimate].petr
            Soil: Latitude=0; Longitude=0
              Physical
                Thickness  BD    AirDry  LL15  DUL    SAT
                150        1.38  0.05    0.18  0.36   0.455
                150        1.38  0.19    0.19  0.373  0.423
                300        1.35  0.2     0.2   0.389  0.439
                300        1.46  0.22    0.22  0.348  0.398
                300        1.42  0.19    0.19  0.365  0.415
                300        1.45  0.17    0.17  0.352  0.402
                300        1.47  0.17    0.17  0.327  0.377
                SoilCrop ChickpeaSoil: LL=[0.25, 0.25, 0.2, 0.23, 0.21, 0.21, 0.22]; KL=[0.045, 0.045, 0.05, 0.065, 0.095, 0.065, 0.065]; XF=[1, 1, 1, 1, 1, 1, 1]
              SoilWater: SummerDate=1-Nov; SummerU=5; SummerCona=3; WinterDate=1-Apr; WinterU=5; WinterCona=3; DiffusConst=40; DiffusSlope=16; Salb=0.13; CN2Bare=86; CNRed=20; CNCov=0.8; max_pond=0; Thickness=[100, 100, 100, 200, 200, 200, 200, 200, 200]; SWCON=[0.5, 0.5, 0.5, 0.5, 0.5, 0.5, 0.5, 0.5, 0.5]; PrecipitationInterception=0
              SoilNitrogen: fom_types=[default, manure, mucuna, lablab, shemp, stable]; fract_carb=[0.2, 0.3, 0.54, 0.57, 0.45, 0]; fract_cell=[0.7, 0.3, 0.37, 0.37, 0.47, 0.1]; fract_lign=[0.1, 0.4, 0.09, 0.06, 0.08, 0.9]
                SoilNitrogenNO3 NO3
                SoilNitrogenNH4 NH4
                SoilNitrogenUrea Urea
                SoilNitrogenPlantAvailableNO3 PlantAvailableNO3
                SoilNitrogenPlantAvailableNH4 PlantAvailableNH4
              Organic: same as Validation.SE Queensland.Lawes1993.Lawes1993.Field.soil.Organic
              Chemical: same as Validation.SE Queensland.Lawes1993.Lawes1993.Field.soil.Chemical
              Sample InitialN: Thickness=[150, 150, 300, 300, 300, 300, 300]; SWUnits=Volumetric; OCUnits=Total; PHUnits=Water
              Sample InitialSW: Thickness=[150, 150, 300, 300, 300, 300, 300]; SW=[0.384, 0.381, 0.44, 0.424, 0.419, 0.376, 0.377]; SWUnits=Volumetric; OCUnits=Total; PHUnits=Water
              CERESSoilTemperature
            Report HarvestReport: EventNames=[Chickpea].Harvesting
              VariableNames:
                [Clock].Today
                [Chickpea].Phenology.CurrentStageName as Stage
                [Chickpea].Phenology.FloweringDAS as FloweringDAS
                [Chickpea].Phenology.MaturityDAS as MaturityDAS
                [Chickpea].Grain.Live.Wt as GrainWt
            Manager Harvesting: same as Validation.SE Queensland.Lawes1993.Lawes1993.Field.Harvesting
            Plant Chickpea: CropType=Chickpea; IsEnding=false; DaysAfterEnding=0
      Experiment Hermitage1988 (disabled)
        Factors
          Factor Sowing: Specification=[Sowing]
            Operations c3p1
              1988-05-26  [Chickpea].Sow(population:67.2, cultivar:"Amethyst", depth:50, rowSpacing:350);
              1988-10-03  [Irrigation].Apply(amount:50, depth:0,efficiency:1, willRunoff:false);
            Operations c3p2
              1988-06-22  [Chickpea].Sow(population:49.9, cultivar:"Amethyst", depth:50, rowSpacing:350);
              1988-10-03  [Irrigation].Apply(amount:50, depth:0,efficiency:1, willRunoff:false);
              1988-10-03  [Irrigation].Apply(amount:50, depth:0,efficiency:1, willRunoff:false);
              1988-10-23  [Irrigation].Apply(amount:50, depth:0,efficiency:1, willRunoff:false);
            Operations c3p3
              1988-07-27  [Chickpea].Sow(population:49.9, cultivar:"Amethyst", depth:50, rowSpacing:350);
              1988-10-15  [Irrigation].Apply(amount:50, depth:0,efficiency:1, willRunoff:false);
              1988-10-23  [Irrigation].Apply(amount:50, depth:0,efficiency:1, willRunoff:false);
            Operations c3p4
              1988-09-04  [Chickpea].Sow(population:48.5, cultivar:"Amethyst", depth:50, rowSpacing:350);
              1988-10-23  [Irrigation].Apply(amount:50, depth:0,efficiency:1, willRunoff:false);
              1988-11-16  [Irrigation].Apply(amount:50, depth:0,efficiency:1, willRunoff:false);
              1988-11-30  [Irrigation].Apply(amount:50, depth:0,efficiency:1, willRunoff:false);
            Operations c3p5
              1988-10-19  [Chickpea].Sow(population:46.6, cultivar:"Amethyst", depth:50, rowSpacing:350);
              1988-10-23  [Irrigation].Apply(amount:50, depth:0,efficiency:1, willRunoff:false);
            Operations c3p6
              1988-12-14  [Chickpea].Sow(population:38.5, cultivar:"Amethyst", depth:50, rowSpacing:350);
              1989-02-22  [Irrigation].Apply(amount:50, depth:0,efficiency:1, willRunoff:false);
        Simulation Hermitage1988
          Weather: FileName=Herm8889.met
          Clock: Start=1988-01-01; End=1988-12-31
          Summary summaryfile
          SoilArbitrator Soil Arbitrator
          Zone Field: Area=1; Slope=0; AspectAngle=0; Altitude=50
            MicroClimate: a_interception=0; b_interception=1; c_interception=0; d_interception=0; soil_albedo=0.23; SoilHeatFluxFraction=0.4; MinimumHeightDiffForNewLayer=0; NightInterceptionFraction=0.5; ReferenceHeight=2
            Irrigation
            Fertiliser
            SurfaceOrganicMatter: InitialResidueName=maize; InitialResidueType=maize; InitialResidueMass=500; InitialStandingFraction=0; InitialCPR=0; InitialCNR=65; FractionFaecesAdded=1
            Operations Sowing
            Operations NRate
              1985-11-08  [Fertiliser].Apply(50, Fertiliser.Types.NH4NO3N, 10);
              1985-11-29  [Fertiliser].Apply(30, Fertiliser.Types.NH4NO3N, 10);
            Report: same as Validation.SE Queensland.Lawes1995original.Lawes1995original.Field.Report
            Soil: Latitude=0; Longitude=0
              Physical
                Thickness  BD    AirDry  LL15  DUL   SAT
                150        1.03  0.1     0.2   0.38  0.45
                150        1.06  0.2     0.2   0.38  0.45
                300        1.06  0.2     0.2   0.38  0.45
                300        1.08  0.21    0.21  0.38  0.43
                300        1.11  0.23    0.23  0.38  0.43
                300        1.14  0.25    0.25  0.38  0.43
                300        1.14  0.28    0.28  0.35  0.4
                SoilCrop ChickpeaSoil: LL=[0.2, 0.2, 0.2, 0.22, 0.25, 0.26, 0.28]; KL=[0.06, 0.06, 0.06, 0.05, 0.04, 0.02, 0.02]; XF=[1, 1, 1, 1, 1, 0, 0]
              SoilWater: same as Validation.SE Queensland.Lawes1993.Lawes1993.Field.soil.SoilWater
              SoilNitrogen: same as Validation.SE Queensland.Lawes1995original.Lawes1995original.Field.soil.SoilNitrogen
              Organic: same as Validation.SE Queensland.Lawes1993.Lawes1993.Field.soil.Organic
              Chemical
                Thickness  NO3N   NH4N  PH
                100        14.4   4.8   6
                100        10.49  4.5   6
                100        6.58   4.2   6
                200        2.45   3.9   6.2
                200        1.765  3.9   6.5
                200        1.08   3.9   6.7
                200        0.15   3.8   6.8
                200        0.49   3.95  6.8
                200        0.83   4.1   6.8
              Sample InitialN: Thickness=[150, 150, 300, 300, 300, 300, 300]; SWUnits=Volumetric; OCUnits=Total; PHUnits=Water
              Sample InitialSW: Thickness=[150, 150, 300, 300, 300, 300, 300]; SW=[0.3, 0.3, 0.3, 0.31, 0.54, 0.37, 0.37]; SWUnits=Volumetric; OCUnits=Total; PHUnits=Water
              CERESSoilTemperature
            Report HarvestReport: EventNames=[Chickpea].Harvesting
              VariableNames:
                [Clock].Today
                [Chickpea].Phenology.CurrentStageName as Stage
                [Chickpea].Phenology.FloweringDAS as FloweringDAS
                [Chickpea].Phenology.MaturityDAS as MaturityDAS
                [Chickpea].Grain.Live.Wt as GrainWt
            Manager Harvesting: same as Validation.SE Queensland.Lawes1993.Lawes1993.Field.Harvesting
            Plant Chickpea: CropType=Chickpea; IsEnding=false; DaysAfterEnding=0
            Manager AutoIrrigate
              FASW = 0
              WaterDeficit = 0
              AutoIrrigationOn = True
              StartStageName = Emergence
              EndStageName = EndGrainFill
              FASWThreshold = 0.9
              FASWDepth = 1000
              script: same as in Validation.SE Queensland.Lawes1990.Lawes1990.Field.AutoIrrigate
      Experiment Hermitage1989 (disabled)
        Factors
          Factor Sowing: Specification=[Sowing]
            Operations c3p1
              1989-02-12  [Chickpea].Sow(population:33.4, cultivar:"Amethyst", depth:50, rowSpacing:350);
            Operations c3p2
              1989-04-23  [Chickpea].Sow(population:33.4, cultivar:"Amethyst", depth:50, rowSpacing:350);
            Operations c3p3
              1989-05-14  [Chickpea].Sow(population:33.4, cultivar:"Amethyst", depth:50, rowSpacing:350);
            Operations c3p4
              1989-06-18  [Chickpea].Sow(population:33.4, cultivar:"Amethyst", depth:50, rowSpacing:350);
            Operations c3p5
              1989-07-13  [Chickpea].Sow(population:33.4, cultivar:"Amethyst", depth:50, rowSpacing:350);
            Operations c3p6
              1989-08-27  [Chickpea].Sow(population:33.4, cultivar:"Amethyst", depth:50, rowSpacing:350);
            Operations c3p7
              1989-10-15  [Chickpea].Sow(population:33.4, cultivar:"Amethyst", depth:50, rowSpacing:350);
            Operations c3p8
              1989-11-12  [Chickpea].Sow(population:33.4, cultivar:"Amethyst", depth:50, rowSpacing:350);
        Simulation Hermitage1989
          Weather: FileName=Herm8889.met
          Clock: Start=1989-01-01; End=1989-12-31
          Summary summaryfile
          SoilArbitrator Soil Arbitrator
          Zone Field: Area=1; Slope=0; AspectAngle=0; Altitude=50
            MicroClimate: a_interception=0; b_interception=1; c_interception=0; d_interception=0; soil_albedo=0.23; SoilHeatFluxFraction=0.4; MinimumHeightDiffForNewLayer=0; NightInterceptionFraction=0.5; ReferenceHeight=2
            Irrigation
            Fertiliser
            SurfaceOrganicMatter: InitialResidueName=maize; InitialResidueType=maize; InitialResidueMass=500; InitialStandingFraction=0; InitialCPR=0; InitialCNR=65; FractionFaecesAdded=1
            Operations Sowing
            Operations NRate
              1985-11-08  [Fertiliser].Apply(50, Fertiliser.Types.NH4NO3N, 10);
              1985-11-29  [Fertiliser].Apply(30, Fertiliser.Types.NH4NO3N, 10);
            Report: same as Validation.SE Queensland.Lawes1995original.Lawes1995original.Field.Report
            Soil: Latitude=0; Longitude=0
              Physical: same as Validation.SE Queensland.Hermitage1988.Hermitage1988.Field.soil.Physical
              SoilWater: same as Validation.SE Queensland.Lawes1993.Lawes1993.Field.soil.SoilWater
              SoilNitrogen: same as Validation.SE Queensland.Lawes1995original.Lawes1995original.Field.soil.SoilNitrogen
              Organic: same as Validation.SE Queensland.Lawes1993.Lawes1993.Field.soil.Organic
              Chemical: same as Validation.SE Queensland.Hermitage1988.Hermitage1988.Field.soil.Chemical
              Sample InitialN: Thickness=[150, 150, 300, 300, 300, 300, 300]; SWUnits=Volumetric; OCUnits=Total; PHUnits=Water
              Sample InitialSW: Thickness=[150, 150, 300, 300, 300, 300, 300]; SW=[0.413, 0.456, 0.408, 0.374, 0.34, 0.37, 0.37]; SWUnits=Volumetric; OCUnits=Total; PHUnits=Water
              CERESSoilTemperature
            Report HarvestReport: EventNames=[Chickpea].Harvesting
              VariableNames:
                [Clock].Today
                [Chickpea].Phenology.CurrentStageName as Stage
                [Chickpea].Phenology.FloweringDAS as FloweringDAS
                [Chickpea].Phenology.MaturityDAS as MaturityDAS
                [Chickpea].Grain.Live.Wt as GrainWt
            Manager Harvesting: same as Validation.SE Queensland.Lawes1993.Lawes1993.Field.Harvesting
            Plant Chickpea: CropType=Chickpea; IsEnding=false; DaysAfterEnding=0
            Manager AutoIrrigate: same as Validation.SE Queensland.Hermitage1988.Hermitage1988.Field.AutoIrrigate
      Experiment Hermitage1990 (disabled)
        Factors
          Factor Sowing: Specification=[Sowing]
            Operations c3p1
              1990-06-14  [Chickpea].Sow(population:45.4, cultivar:"Amethyst", depth:50, rowSpacing:350);
              1990-09-28  [Irrigation].Apply(amount:40, depth:0,efficiency:1, willRunoff:false);
            Operations c3p2
              1990-08-19  [Chickpea].Sow(population:36.7, cultivar:"Amethyst", depth:50, rowSpacing:350);
              1990-09-28  [Irrigation].Apply(amount:40, depth:0,efficiency:1, willRunoff:false);
        Simulation Hermitage1990
          Weather: FileName=Herm90.met
          Clock: Start=1990-04-11; End=1990-12-31
          Summary summaryfile
          SoilArbitrator Soil Arbitrator
          Zone Field: same as Validation.SE Queensland.Hermitage1989.Hermitage1989.Field
      Experiment Hermitage_92 (disabled)
        Factors
          Permutation
            Factor Population (disabled): Specification=[SowingRule].Script.Population=10, 20, 40, 70, 78, 110, 115
            Factor RowSpacing (disabled): Specification=[SowingRule].Script.RowSpacing=170, 350, 700
        Simulation Hermitage_92
          Memo
            These simulations are based on data from two years of field trials done in Lincoln, Canterbury, New Zealand from 1998 to 2000. These trials used three cultivars of Kabuli chickpeas. However the results presented here are the average of cultivars for measurements that had no differences among cultivars tested. The experimental design was a split split plot with irrigation as main plot, sowing dates as sub plots and cultivars as sub sub plots.
            The first season, from 1998 until 1999, had two sowing dates (3rd if November and 7th of December) and eight irrigation treatments. Treatments were nil irrigation, full irrigation from emergence to physiological maturity, full from emergence to flowering, half irrigation from emergence to flowering, full from flowering to podding, half from flowering to podding, full from podding to physiological maturity and half from podding to physiological maturity. In these treatments irrigation was applied weekly and the fully irrigated treatment applied the same amount of water lost through evapotranspiration in the previous week. The half irrigation treatment replaced half of the amount lost in the previous week.
            Results from this season include biomass, grain yield, pods per plant, LAI, soil volumetric water content and flowering, podding and physsiological maturity dates.
            The second season, from 1999 to 2000, had two sowing dates (18th of October and 22nd of November) and four irrigation treatments. These were nil irrigation, full from emergence to physiological maturity, full from flowering to podding and full from podding to physiological maturity. The results from this season do not include LAI measurements.
            More information about the data is available in Anwar, M.R. 2001. Water use of Kabuli chickpea (Cicer arietinum L.) cultivars in Canterbury. (PhD thesis, Lincoln University).
          Weather: FileName=Herm92.met
          Clock: Start=1992-07-18; End=1992-12-25
          Summary summaryfile
          SoilArbitrator Soil Arbitrator
          Zone Field: Area=1; Slope=0; AspectAngle=0; Altitude=50
            MicroClimate: a_interception=0; b_interception=1; c_interception=0; d_interception=0; soil_albedo=0.23; SoilHeatFluxFraction=0.4; MinimumHeightDiffForNewLayer=0; NightInterceptionFraction=0.5; ReferenceHeight=2
            Irrigation
            Fertiliser
            SurfaceOrganicMatter: InitialResidueName=maize; InitialResidueType=maize; InitialResidueMass=500; InitialStandingFraction=0; InitialCPR=0; InitialCNR=65; FractionFaecesAdded=1
            Operations Sowing
              1992-07-24  [Chickpea].Sow(population:110, cultivar:"Amethyst", depth:50, rowSpacing:170);
            Operations IrrigationSchedule
            Report: EventNames=[Clock].DoReport
              VariableNames:
                [Clock].Today
                [Soil].SoilWater.SW
                [Soil].SoilWater.Eo
                [Soil].SoilWater.Es
                [Soil].SoilWater.Drainage
                [Soil].SoilWater.Runoff
                [Soil].SoilWater.pond
                sum([Soil].SoilWater.SWmm) as ProfileWater
                [Soil].SoilNitrogen.NO3.kgha
                [MicroClimate].net_radn
                [MicroClimate].peta
                [MicroClimate].petr
                [Chickpea].AboveGround.Wt
                [Chickpea].Leaf.LAI
            Report HarvestReport: EventNames=[Chickpea].Harvesting
              VariableNames:
                [Clock].Today
                [Chickpea].Phenology.CurrentStageName as Stage
                [Chickpea].Phenology.FloweringDAS as FloweringDAS
                [Chickpea].Phenology.MaturityDAS as MaturityDAS
                [Chickpea].Grain.Live.Wt as GrainWt
            Manager Harvesting
              script: same as in Validation.SE Queensland.Lawes1990.Lawes1990.Field.Harvesting
            Plant Chickpea: CropType=Chickpea; IsEnding=false; DaysAfterEnding=0
            Soil: Latitude=0; Longitude=0
              InitialWater Initial water: PercentMethod=1; FractionFull=0.8
              Physical: same as Validation.SE Queensland.Hermitage1988.Hermitage1988.Field.soil.Physical
              SoilWater: SummerDate=1-Nov; SummerU=6; SummerCona=2; WinterDate=1-Apr; WinterU=6; WinterCona=2; DiffusConst=40; DiffusSlope=16; Salb=0.13; CN2Bare=82; CNRed=20; CNCov=0.8; max_pond=0; Thickness=[150, 150, 300, 300, 300, 300, 300]; SWCON=[0.4, 0.4, 0.4, 0.4, 0.4, 0.4, 0.4]; PrecipitationInterception=0
              SoilNitrogen: same as Validation.SE Queensland.Lawes1995original.Lawes1995original.Field.soil.SoilNitrogen
              Organic: FOMCNRatio=80
                Thickness  Carbon  SoilCNRatio  FBiom  FInert  FOM
                150        2.2     14.5         0.02   0.36    173.565
                150        1.6     14.5         0.015  0.5     135.172
                300        1.35    14.5         0.01   0.59    81.9861
                300        0.95    14.5         0.01   0.84    49.7271
                300        1       14.5         0.01   0.8     30.161
                300        0.8     14.5         0.01   0.99    18.2936
                300        0.8     14.5         0.01   0.99    11.0956
              Chemical
                Thickness  NO3N  NH4N  PH
                150        14.4  4.8   8.25
                150        6.58  4.2   8.5
                300        2.45  3.9   8.75
                300        1.08  3.9   9
                300        0.15  3.8   9
                300        0.83  4.1   9
                300        0.83  4.1   9
              Sample Initial nitrogen: Thickness=[150, 150, 300, 300, 300, 300, 300]; SWUnits=Volumetric; OCUnits=Total; PHUnits=Water
              CERESSoilTemperature
            Manager SowingRule: same as Validation.SE Queensland.Lawes1993.Lawes1993.Field.SowingRule
      Experiment Bremar_2003_
        Factors
          Factor S: Specification=[SowingRule]
            Manager 1R350
              SowDate = 15-May
              CultivarName = Amethyst
              SowingDepth = 50
              RowSpacing = 350
              Population = 40
```csharp
using System;
using Models.Core;
using Models.PMF;
using Models.Soils;
using Models.Utilities;
using APSIM.Shared.Utilities;

namespace Models
{
    [Serializable]
    public class Script : Model
    {
        [Link] Clock Clock;
        [Link] Fertiliser Fertiliser;
        [Link] Summary Summary;
        [Link] Plant Chickpea;
        [Link] Soil Soil;
        Accumulator accumulatedRain;
        
        [Description("Sowing date (d-mmm)")]
        public string SowDate { get; set; }
        [Description("Cultivar to be sown")]
        public string CultivarName { get; set; }
        [Description("Sowing depth (mm)")]
        public double SowingDepth { get; set; }
        [Description("Row spacing (mm)")]
        public double RowSpacing { get; set; }
        [Description("Plant population (/m2)")]
        public double Population { get; set; }
        
        


        [EventSubscribe("DoManagement")]
        private void OnDoManagement(object sender, EventArgs e)
        {
        
            
            if (DateUtilities.WithinDates(SowDate, Clock.Today, SowDate))
            {
                Chickpea.Sow(population: Population, cultivar: CultivarName, depth: SowingDepth, rowSpacing: RowSpacing);

                //SoilCrop soilCrop = Soil.Crop("Chickpea") as SoilCrop;
                //double[] kl = soilCrop.KL;
                //double modifier = Population / 40.0;
                //for (int i = 0; i < kl.Length; i++)
                    //kl[i] = kl[i] * modifier;
                //soilCrop.KL = kl;    
            }
        
        }
        
    }
}
```
            Manager 1R700
              SowDate = 15-May
              CultivarName = Amethyst
              SowingDepth = 50
              RowSpacing = 700
              Population = 18
              script: same as in Validation.SE Queensland.Bremar_2003_.Factors.S.1R350
            Manager 2R350
              SowDate = 1-Jun
              CultivarName = Amethyst
              SowingDepth = 50
              RowSpacing = 350
              Population = 20
              script: same as in Validation.SE Queensland.Bremar_2003_.Factors.S.1R350
            Manager 2R700
              SowDate = 1-Jun
              CultivarName = Amethyst
              SowingDepth = 50
              RowSpacing = 700
              Population = 18
              script: same as in Validation.SE Queensland.Bremar_2003_.Factors.S.1R350
        Simulation Bremar2003
          Memo
            soil cores taken on row? or mid -inter row?
          Weather: FileName=bremar2.met
          Clock: Start=2003-05-14; End=2003-12-30
          Summary summaryfile
          SoilArbitrator Soil Arbitrator
          Zone Field: Area=1; Slope=0; AspectAngle=0; Altitude=50
            MicroClimate: a_interception=0; b_interception=1; c_interception=0; d_interception=0; soil_albedo=0.13; SoilHeatFluxFraction=0.4; MinimumHeightDiffForNewLayer=0; NightInterceptionFraction=0.5; ReferenceHeight=2
            Irrigation
            Fertiliser
            SurfaceOrganicMatter: InitialResidueName=wheat; InitialResidueType=wheat; InitialResidueMass=1500; InitialStandingFraction=0; InitialCPR=0; InitialCNR=76; FractionFaecesAdded=1
            Operations IrrigationSchedule
            Report: EventNames=[Clock].DoReport
              VariableNames:
                [Clock].Today
                [Soil].SoilWater.SW
                [Soil].SoilWater.Eo
                [Soil].SoilWater.Es
                [Soil].SoilWater.Drainage
                [Soil].SoilWater.Runoff
                [Soil].SoilWater.pond
                sum([Soil].SoilWater.SWmm) as ProfileWater
                [Soil].SoilNitrogen.NO3.kgha
                [MicroClimate].net_radn
                [MicroClimate].peta
                [MicroClimate].petr
                [Chickpea].AboveGround.Wt
                [Chickpea].Leaf.LAI
            Report HarvestReport: EventNames=[Chickpea].Harvesting
              VariableNames:
                [Clock].Today
                [Chickpea].Phenology.CurrentStageName as Stage
                [Chickpea].Phenology.FloweringDAS as FloweringDAS
                [Chickpea].Phenology.MaturityDAS as MaturityDAS
                [Chickpea].Grain.Live.Wt as GrainWt
            Manager Harvesting
              script: same as in Validation.SE Queensland.Lawes1990.Lawes1990.Field.Harvesting
            Plant Chickpea: CropType=Chickpea; IsEnding=false; DaysAfterEnding=0
            Manager SowingRule
              SowDate = 24-Jul
              CultivarName = Amethyst
              SowingDepth = 50
              RowSpacing = 750
              Population = 6
              script: same as in Validation.SE Queensland.Lawes1993.Factors.SD.1PP20RS17
            Soil Red Chromosol Enarra No216: ASCOrder=Chromosol; ASCSubOrder=Red; SoilType=?; Site=Enarra; NearestTown=Meandarra; Region=Darling Downs and Granite Belt; State=Queensland; Country=Australia; NaturalVegetation=Brigalow scrub; ApsoilNumber=216; Latitude=-27.725; Longitude=149.822; LocationAccuracy=+/- 20m
              DataSource=Undertaken by Jeremy Whish, CSIRO Sustainable Ecosystems, Toowoomba in collaboration with MCA, Goondiwindi as part of GRDC Best Management Practice-Pulses project
              Comments=From a pond and tent done during GRDC Best Management Practice-Pulses project ; BD estimated, oc from soil (Billa Billa No. 036)
              Physical
                Thickness  BD     AirDry  LL15  DUL    SAT
                150        1.29   0.1     0.2   0.43   0.483
                150        1.29   0.176   0.22  0.43   0.483
                300        1.327  0.25    0.25  0.419  0.469
                300        1.32   0.25    0.25  0.42   0.472
                300        1.32   0.25    0.25  0.42   0.472
                300        1.4    0.25    0.25  0.39   0.442
                300        1.459  0.25    0.25  0.37   0.42
                SoilCrop ChickpeaSoil: LL=[0.2, 0.22, 0.25, 0.27, 0.36, 0.38, 0.37]; KL=[0.045, 0.045, 0.045, 0.03, 0.025, 0.02, 0.01]; XF=[1, 1, 1, 1, 1, 1, 1]
              SoilWater: SummerDate=1-Nov; SummerU=2; SummerCona=4.5; WinterDate=1-Apr; WinterU=2; WinterCona=4; DiffusConst=88; DiffusSlope=35; Salb=0.13; CN2Bare=78; CNRed=20; CNCov=0.8; max_pond=0; Thickness=[150, 150, 300, 300, 300, 300, 300]; SWCON=[0.3, 0.3, 0.3, 0.3, 0.3, 0.3, 0.3]; PrecipitationInterception=0
              Organic: FOMCNRatio=40
                Thickness  Carbon    SoilCNRatio  FBiom  FInert  FOM
                150        0.953846  12           0.04   0.4     347.129
                150        0.953846  12           0.02   0.5     270.344
                300        0.961538  12           0.02   0.5     163.972
                300        0.846154  12           0.02   0.6     99.4541
                300        0.546154  12           0.01   0.6     60.322
                300        0.261538  12           0.01   0.7     36.5871
                300        0.261538  12           0.01   0.8     22.1912
              Chemical
                Thickness  NO3N   NH4N  PH
                150        9.69   0.3   8.6
                150        7.88   0.05  8.8
                300        9.29   0.05  8.8
                300        17.59  0.05  7.6
                300        17.49  0.05  5.1
                300        13.16  0.05  4.8
                300        10.02  0.05  4.8
              Sample Initial nitrogen: Thickness=[150, 150, 300, 300, 300, 300, 300]; SWUnits=Volumetric; OCUnits=Total; PHUnits=Water
              Sample ORIG inwat: Thickness=[150, 150, 300, 300, 300, 300, 300]; SW=[0.33, 0.36, 0.36, 0.33, 0.3, 0.28, 0.26]; SWUnits=Volumetric; OCUnits=Total; PHUnits=Water
              Sample ALTInitial water: Thickness=[150, 150, 300, 300, 300, 300, 300]; SW=[0.35, 0.38, 0.38, 0.33, 0.3, 0.28, 0.26]; SWUnits=Volumetric; OCUnits=Total; PHUnits=Water
              SoilNitrogen: same as Validation.SE Queensland.Lawes1990.Lawes1990.Field.soil.SoilNitrogen
              CERESSoilTemperature
      Experiment Bremar_2003_kl_test (disabled)
        Factors
          Factor S: Specification=[SowingRule]
            Manager 2R350
              SowDate = 1-Jun
              CultivarName = Amethyst
              SowingDepth = 50
              RowSpacing = 350
              Population = 25
              script: same as in Validation.SE Queensland.Bremar_2003_.Factors.S.1R350
            Manager 2R700
              SowDate = 1-Jun
              CultivarName = Amethyst
              SowingDepth = 50
              RowSpacing = 700
              Population = 25
              script: same as in Validation.SE Queensland.Bremar_2003_.Factors.S.1R350
            Manager 2R350xpop
              SowDate = 1-Jun
              CultivarName = Amethyst
              SowingDepth = 50
              RowSpacing = 350
              Population = 40
              script: same as in Validation.SE Queensland.Bremar_2003_.Factors.S.1R350
        Simulation Bremar2003_kltest
          Memo
            soil cores taken on row? or mid -inter row?
          Weather: FileName=bremar2.met
          Clock: Start=2003-05-14; End=2003-12-30
          Summary summaryfile
          SoilArbitrator Soil Arbitrator
          Zone Field: Area=1; Slope=0; AspectAngle=0; Altitude=50
            MicroClimate: a_interception=0; b_interception=1; c_interception=0; d_interception=0; soil_albedo=0.13; SoilHeatFluxFraction=0.4; MinimumHeightDiffForNewLayer=0; NightInterceptionFraction=0.5; ReferenceHeight=2
            Irrigation
            Fertiliser
            SurfaceOrganicMatter: InitialResidueName=wheat; InitialResidueType=wheat; InitialResidueMass=1500; InitialStandingFraction=0; InitialCPR=0; InitialCNR=76; FractionFaecesAdded=1
            Operations IrrigationSchedule
            Report: same as Validation.SE Queensland.Hermitage_92.Hermitage_92.Field.Report
            Report HarvestReport: EventNames=[Chickpea].Harvesting
              VariableNames:
                [Clock].Today
                [Chickpea].Phenology.CurrentStageName as Stage
                [Chickpea].Phenology.FloweringDAS as FloweringDAS
                [Chickpea].Phenology.MaturityDAS as MaturityDAS
                [Chickpea].Grain.Live.Wt as GrainWt
            Manager Harvesting: same as Validation.SE Queensland.Hermitage_92.Hermitage_92.Field.Harvesting
            Plant Chickpea: CropType=Chickpea; IsEnding=false; DaysAfterEnding=0
            Manager SowingRule: same as Validation.SE Queensland.Lawes1993.Lawes1993.Field.SowingRule
            Soil Red Chromosol Enarra No216: ASCOrder=Chromosol; ASCSubOrder=Red; SoilType=?; Site=Enarra; NearestTown=Meandarra; Region=Darling Downs and Granite Belt; State=Queensland; Country=Australia; NaturalVegetation=Brigalow scrub; ApsoilNumber=216; Latitude=-27.725; Longitude=149.822; LocationAccuracy=+/- 20m
              DataSource=Undertaken by Jeremy Whish, CSIRO Sustainable Ecosystems, Toowoomba in collaboration with MCA, Goondiwindi as part of GRDC Best Management Practice-Pulses project
              Comments=From a pond and tent done during GRDC Best Management Practice-Pulses project ; BD estimated, oc from soil (Billa Billa No. 036)
              Physical
                Thickness  BD     AirDry  LL15  DUL    SAT
                150        1.29   0.1     0.2   0.43   0.483
                150        1.29   0.176   0.22  0.43   0.483
                300        1.327  0.25    0.25  0.419  0.469
                300        1.32   0.25    0.25  0.42   0.472
                300        1.32   0.25    0.25  0.42   0.472
                300        1.4    0.25    0.25  0.39   0.442
                300        1.459  0.25    0.25  0.37   0.42
                SoilCrop ChickpeaSoil: LL=[0.2, 0.22, 0.25, 0.27, 0.36, 0.38, 0.37]; KL=[0.045, 0.045, 0.045, 0.03, 0.025, 0.02, 0.01]; XF=[1, 1, 1, 1, 1, 1, 1]
              SoilWater: SummerDate=1-Nov; SummerU=6; SummerCona=3.5; WinterDate=1-Apr; WinterU=4; WinterCona=2.5; DiffusConst=40; DiffusSlope=16; Salb=0.13; CN2Bare=73; CNRed=20; CNCov=0.8; max_pond=0; Thickness=[150, 150, 300, 300, 300, 300, 300]; SWCON=[0.3, 0.3, 0.3, 0.3, 0.3, 0.3, 0.3]; PrecipitationInterception=0
              Organic: FOMCNRatio=40
                Thickness  Carbon    SoilCNRatio  FBiom  FInert  FOM
                150        0.953846  12           0.04   0.4     347.129
                150        0.953846  12           0.02   0.5     270.344
                300        0.961538  12           0.02   0.5     163.972
                300        0.846154  12           0.02   0.6     99.4541
                300        0.546154  12           0.01   0.6     60.322
                300        0.261538  12           0.01   0.7     36.5871
                300        0.261538  12           0.01   0.8     22.1912
              Chemical
                Thickness  NO3N   NH4N  PH
                150        9.69   0.3   8.6
                150        7.88   0.05  8.8
                300        9.29   0.05  8.8
                300        17.59  0.05  7.6
                300        17.49  0.05  5.1
                300        13.16  0.05  4.8
                300        10.02  0.05  4.8
              Sample Initial nitrogen: Thickness=[150, 150, 300, 300, 300, 300, 300]; SWUnits=Volumetric; OCUnits=Total; PHUnits=Water
              Sample Initial water: Thickness=[150, 150, 300, 300, 300, 300, 300]; SW=[0.33, 0.36, 0.36, 0.33, 0.3, 0.28, 0.26]; SWUnits=Volumetric; OCUnits=Total; PHUnits=Water
              SoilNitrogen: same as Validation.SE Queensland.Lawes1995original.Lawes1995original.Field.soil.SoilNitrogen
              CERESSoilTemperature
    Folder NewSouthWales
      Experiment Windridge (disabled)
        Factors
          Factor NRate: Specification=[NRateSchedule]
            Operations 0
              1992-05-07  [Fertiliser].Apply(0, Fertiliser.Types.NH4NO3N, 10);
            Operations 40
              1992-05-07  [Fertiliser].Apply(40, Fertiliser.Types.NH4NO3N, 10);
            Operations 80
              1992-05-07  [Fertiliser].Apply(80, Fertiliser.Types.NH4NO3N, 10);
            Operations 120
              1992-05-07  [Fertiliser].Apply(120, Fertiliser.Types.NH4NO3N, 10);
            Operations 160
              1992-05-07  [Fertiliser].Apply(160, Fertiliser.Types.NH4NO3N, 10);
            Operations 200
              1992-05-07  [Fertiliser].Apply(200, Fertiliser.Types.NH4NO3N, 10);
        Simulation Windridge
          Weather: FileName=Windr.met
          Clock: Start=1992-04-29; End=1992-12-25
          Summary summaryfile
          SoilArbitrator Soil Arbitrator
          Zone Field: Area=1; Slope=0; AspectAngle=0; Altitude=50
            MicroClimate: a_interception=0; b_interception=1; c_interception=0; d_interception=0; soil_albedo=0.23; SoilHeatFluxFraction=0.4; MinimumHeightDiffForNewLayer=0; NightInterceptionFraction=0.5; ReferenceHeight=2
            Fertiliser
            SurfaceOrganicMatter: InitialResidueName=unknown; InitialResidueType=wheat; InitialResidueMass=0; InitialStandingFraction=0; InitialCPR=0; InitialCNR=10; FractionFaecesAdded=1
            Operations Sowing
              1992-05-07  [Chickpea].Sow(population:40, cultivar:"Amethyst", depth:50, rowSpacing:150);
            Report: same as Validation.SE Queensland.Hermitage_92.Hermitage_92.Field.Report
            Report HarvestReport: EventNames=[Chickpea].Harvesting
              VariableNames:
                [Clock].Today
                [Chickpea].Phenology.CurrentStageName as Stage
                [Chickpea].Phenology.FloweringDAS as FloweringDAS
                [Chickpea].Phenology.MaturityDAS as MaturityDAS
                [Chickpea].Grain.Live.Wt as GrainWt
            Manager Harvesting: same as Validation.SE Queensland.Hermitage_92.Hermitage_92.Field.Harvesting
            Plant Chickpea: CropType=Chickpea; IsEnding=false; DaysAfterEnding=0
            Soil: Latitude=0; Longitude=0
              InitialWater Initial water: PercentMethod=1; FractionFull=1
              Physical
                Thickness  BD   AirDry  LL15  DUL   SAT
                150        1.3  0.1     0.2   0.38  0.43
                150        1.4  0.2     0.2   0.38  0.43
                300        1.4  0.2     0.2   0.38  0.43
                300        1.4  0.2     0.2   0.37  0.42
                300        1.4  0.2     0.2   0.35  0.4
                300        1.4  0.2     0.2   0.35  0.4
                SoilCrop ChickpeaSoil: LL=[0.2, 0.22, 0.23, 0.25, 0.28, 0.3]; KL=[0.045, 0.045, 0.045, 0.03, 0.025, 0.02]; XF=[1, 1, 1, 0.5, 0, 0]
              SoilWater: SummerDate=1-Nov; SummerU=6; SummerCona=2; WinterDate=1-Apr; WinterU=6; WinterCona=2; DiffusConst=88; DiffusSlope=35.4; Salb=0.13; CN2Bare=72; CNRed=20; CNCov=0.8; max_pond=0; Thickness=[150, 150, 300, 300, 300, 300]; SWCON=[0.5, 0.5, 0.5, 0.5, 0.5, 0.5]; PrecipitationInterception=0
              SoilNitrogen: same as Validation.SE Queensland.Lawes1995original.Lawes1995original.Field.soil.SoilNitrogen
              Organic: FOMCNRatio=40
                Thickness  Carbon  SoilCNRatio  FBiom  FInert  FOM
                150        1.43    15.86        0.03   0.4     39.0598
                150        0.91    15.86        0.02   0.4     28.9362
                300        0.65    15.86        0.01   0.6     15.8805
                300        0.26    15.86        0.01   0.8     8.71541
                300        0.13    15.86        0.01   0.96    4.78312
                300        0.1     15.86        0.01   0.96    2.62503
              Chemical
                Thickness  NO3N  NH4N  PH
                150        14.4  0.01  7.62
                150        6.58  0.01  7.62
                300        2.45  0.01  7.62
                300        1.08  0.01  7.62
                300        0.15  0.01  7.62
                300        0.83  0.01  7.62
              Sample Initial nitrogen: Thickness=[150, 150, 300, 300, 300, 300]; SWUnits=Volumetric; OCUnits=Total; PHUnits=Water
              CERESSoilTemperature
            Operations NRateSchedule
              1992-05-07  [Fertiliser].Apply(0, Fertiliser.Types.NH4NO3N, 10);
            Irrigation
      Experiment Kulai_2003_
        Factors
          Factor S: Specification=[SowingRule]
            Manager 1R350
              SowDate = 2-May
              CultivarName = Amethyst
              SowingDepth = 50
              RowSpacing = 350
              Population = 28.5
              script: same as in Validation.SE Queensland.Lawes1993.Factors.SD.1PP20RS17
            Manager 1R700
              SowDate = 2-May
              CultivarName = Amethyst
              SowingDepth = 50
              RowSpacing = 700
              Population = 24.5
              script: same as in Validation.SE Queensland.Lawes1993.Factors.SD.1PP20RS17
            Manager 2R350
              SowDate = 15-May
              CultivarName = Amethyst
              SowingDepth = 50
              RowSpacing = 350
              Population = 33
              script: same as in Validation.SE Queensland.Lawes1993.Factors.SD.1PP20RS17
            Manager 2R700
              SowDate = 15-May
              CultivarName = Amethyst
              SowingDepth = 50
              RowSpacing = 700
              Population = 22
              script: same as in Validation.SE Queensland.Lawes1993.Factors.SD.1PP20RS17
        Simulation Kulai_2003
          Memo
            These simulations are based on data from two years of field trials done in Lincoln, Canterbury, New Zealand from 1998 to 2000. These trials used three cultivars of Kabuli chickpeas. However the results presented here are the average of cultivars for measurements that had no differences among cultivars tested. The experimental design was a split split plot with irrigation as main plot, sowing dates as sub plots and cultivars as sub sub plots.
            The first season, from 1998 until 1999, had two sowing dates (3rd if November and 7th of December) and eight irrigation treatments. Treatments were nil irrigation, full irrigation from emergence to physiological maturity, full from emergence to flowering, half irrigation from emergence to flowering, full from flowering to podding, half from flowering to podding, full from podding to physiological maturity and half from podding to physiological maturity. In these treatments irrigation was applied weekly and the fully irrigated treatment applied the same amount of water lost through evapotranspiration in the previous week. The half irrigation treatment replaced half of the amount lost in the previous week.
            Results from this season include biomass, grain yield, pods per plant, LAI, soil volumetric water content and flowering, podding and physsiological maturity dates.
            The second season, from 1999 to 2000, had two sowing dates (18th of October and 22nd of November) and four irrigation treatments. These were nil irrigation, full from emergence to physiological maturity, full from flowering to podding and full from podding to physiological maturity. The results from this season do not include LAI measurements.
            More information about the data is available in Anwar, M.R. 2001. Water use of Kabuli chickpea (Cicer arietinum L.) cultivars in Canterbury. (PhD thesis, Lincoln University).
          Weather: FileName=kulai2.met
          Clock: Start=2003-05-01; End=2003-12-30
          Summary summaryfile
          SoilArbitrator Soil Arbitrator
          Zone Field: Area=1; Slope=0; AspectAngle=0; Altitude=50
            MicroClimate: a_interception=0; b_interception=1; c_interception=0; d_interception=0; soil_albedo=0.23; SoilHeatFluxFraction=0.4; MinimumHeightDiffForNewLayer=0; NightInterceptionFraction=0.5; ReferenceHeight=2
            Irrigation
            Fertiliser
            SurfaceOrganicMatter: InitialResidueName=wheat; InitialResidueType=wheat; InitialResidueMass=1500; InitialStandingFraction=0; InitialCPR=0; InitialCNR=76; FractionFaecesAdded=1
            Operations IrrigationSchedule
            Report: same as Validation.SE Queensland.Bremar_2003_.Bremar2003.Field.Report
            Report HarvestReport: EventNames=[Chickpea].Harvesting
              VariableNames:
                [Clock].Today
                [Chickpea].Phenology.CurrentStageName as Stage
                [Chickpea].Phenology.FloweringDAS as FloweringDAS
                [Chickpea].Phenology.MaturityDAS as MaturityDAS
                [Chickpea].Grain.Live.Wt as GrainWt
            Manager Harvesting: same as Validation.SE Queensland.Bremar_2003_.Bremar2003.Field.Harvesting
            Plant Chickpea: CropType=Chickpea; IsEnding=false; DaysAfterEnding=0
            Soil: Latitude=0; Longitude=0
              Physical
                Thickness  BD    AirDry  LL15  DUL   SAT
                150        1.45  0.06    0.17  0.35  0.4
                150        1.43  0.16    0.17  0.34  0.39
                300        1.34  0.16    0.17  0.31  0.36
                300        1.36  0.18    0.19  0.3   0.35
                300        1.41  0.22    0.23  0.35  0.4
                300        1.61  0.25    0.26  0.37  0.39
                300        1.61  0.31    0.33  0.36  0.4
                SoilCrop ChickpeaSoil: LL=[0.18, 0.18, 0.18, 0.2, 0.24, 0.27, 0.34]; KL=[0.055, 0.055, 0.055, 0.037, 0.013, 0, 0]; XF=[1, 1, 1, 1, 0.5, 0, 0]
              SoilWater: same as Validation.SE Queensland.Bremar_2003_.Bremar2003.Field.Red Chromosol Enarra No216.SoilWater
              SoilNitrogen: same as Validation.SE Queensland.Lawes1990.Lawes1990.Field.soil.SoilNitrogen
              Organic: FOMCNRatio=50
                Thickness  Carbon  SoilCNRatio  FBiom  FInert  FOM
                150        1.19    12.5         0.05   0.39    347.129
                150        1.01    12.5         0.02   0.47    270.344
                300        0.45    12.5         0.015  0.52    163.972
                300        0.3     12.5         0.01   0.62    99.4541
                300        0.3     12.5         0.01   0.62    60.322
                300        0.2     12.5         0.01   0.74    36.5871
                300        0.16    12.5         0.01   0.83    22.1912
              Chemical
                Thickness  NO3N   NH4N  PH
                150        9.69   0.3   7.6
                150        7.88   0.05  7.9
                300        9.29   0.05  8.6
                300        17.59  0.05  8.7
                300        17.49  0.05  8.9
                300        13.16  0.05  8.9
                300        10.02  0.05  8.9
              Sample Initial nitrogen: Thickness=[150, 150, 300, 300, 300, 300, 300]; SWUnits=Volumetric; OCUnits=Total; PHUnits=Water
              Sample FakeInitialwater: Thickness=[150, 150, 300, 300, 300, 300, 300]; SW=[0.24, 0.29, 0.25, 0.293, 0.314, 0.302, 0.35]; SWUnits=Volumetric; OCUnits=Total; PHUnits=Water
              CERESSoilTemperature
              Sample Initial water: Thickness=[150, 150, 300, 300, 300, 300, 300]; SW=[0.216, 0.249, 0.251, 0.253, 0.261, 0.32, 0.42]; SWUnits=Volumetric; OCUnits=Total; PHUnits=Water
            Manager SowingRule: same as Validation.SE Queensland.Bremar_2003_.Bremar2003.Field.SowingRule
      Experiment Kulai_2004_
        Factors
          Factor S: Specification=[SowingRule]
            Manager 1R350
              SowDate = 22-May
              CultivarName = Amethyst
              SowingDepth = 50
              RowSpacing = 350
              Population = 23
              script: same as in Validation.SE Queensland.Lawes1993.Factors.SD.1PP20RS17
            Manager 1R700
              SowDate = 22-May
              CultivarName = Amethyst
              SowingDepth = 50
              RowSpacing = 700
              Population = 18
              script: same as in Validation.SE Queensland.Lawes1993.Factors.SD.1PP20RS17
            Manager 2R350
              SowDate = 22-Jun
              CultivarName = Amethyst
              SowingDepth = 50
              RowSpacing = 350
              Population = 17.5
              script: same as in Validation.SE Queensland.Lawes1993.Factors.SD.1PP20RS17
            Manager 2R700
              SowDate = 22-Jun
              CultivarName = Amethyst
              SowingDepth = 50
              RowSpacing = 700
              Population = 13
              script: same as in Validation.SE Queensland.Lawes1993.Factors.SD.1PP20RS17
        Simulation Kulai_2004
          Memo: same as Validation.NewSouthWales.Kulai_2003_.Kulai_2003.memo
          Weather: FileName=kulai2.met
          Clock: Start=2004-01-01; End=2004-12-30
          Summary summaryfile
          SoilArbitrator Soil Arbitrator
          Zone Field: Area=1; Slope=0; AspectAngle=0; Altitude=50
            MicroClimate: a_interception=0; b_interception=1; c_interception=0; d_interception=0; soil_albedo=0.23; SoilHeatFluxFraction=0.4; MinimumHeightDiffForNewLayer=0; NightInterceptionFraction=0.5; ReferenceHeight=2
            Irrigation
            Fertiliser
            SurfaceOrganicMatter: InitialResidueName=wheat; InitialResidueType=wheat; InitialResidueMass=1500; InitialStandingFraction=0; InitialCPR=0; InitialCNR=76; FractionFaecesAdded=1
            Operations IrrigationSchedule
            Report: same as Validation.SE Queensland.Bremar_2003_.Bremar2003.Field.Report
            Report HarvestReport: EventNames=[Chickpea].Harvesting
              VariableNames:
                [Clock].Today
                [Chickpea].Phenology.CurrentStageName as Stage
                [Chickpea].Phenology.FloweringDAS as FloweringDAS
                [Chickpea].Phenology.MaturityDAS as MaturityDAS
                [Chickpea].Grain.Live.Wt as GrainWt
            Manager Harvesting: same as Validation.SE Queensland.Bremar_2003_.Bremar2003.Field.Harvesting
            Plant Chickpea: CropType=Chickpea; IsEnding=false; DaysAfterEnding=0
            Soil 2004soil056: Latitude=0; Longitude=0
              Physical
                Thickness  BD    AirDry  LL15  DUL   SAT
                150        1.37  0.06    0.17  0.4   0.45
                150        1.39  0.16    0.17  0.4   0.45
                300        1.37  0.16    0.17  0.4   0.45
                300        1.39  0.18    0.19  0.4   0.45
                300        1.42  0.22    0.23  0.38  0.43
                300        1.55  0.25    0.26  0.34  0.39
                300        1.54  0.31    0.33  0.34  0.38
                SoilCrop ChickpeaSoil: LL=[0.27, 0.27, 0.28, 0.32, 0.35, 0.34, 0.34]; KL=[0.045, 0.045, 0.045, 0.03, 0.02, 0, 0]; XF=[1, 1, 1, 1, 0.5, 0, 0]
              SoilWater: SummerDate=1-Nov; SummerU=2; SummerCona=4.5; WinterDate=1-Apr; WinterU=2; WinterCona=4; DiffusConst=40; DiffusSlope=16; Salb=0.13; CN2Bare=73; CNRed=20; CNCov=0.8; max_pond=0; Thickness=[150, 150, 300, 300, 300, 300, 300]; SWCON=[0.3, 0.3, 0.3, 0.3, 0.3, 0.3, 0.3]; PrecipitationInterception=0
              SoilNitrogen: same as Validation.SE Queensland.Lawes1990.Lawes1990.Field.soil.SoilNitrogen
              Organic: same as Validation.NewSouthWales.Kulai_2003_.Kulai_2003.Field.soil.Organic
              Chemical
                Thickness  NO3N   NH4N  PH
                150        9.69   0.3   7.6
                150        7.88   0.05  7.9
                300        9.29   0.05  8.6
                300        17.59  0.05  8.7
                300        17.49  0.05  8.9
                300        13.16  0.05  8.9
                300        10.02  0.05  8.9
              Sample Initial nitrogen: Thickness=[150, 150, 300, 300, 300, 300, 300]; SWUnits=Volumetric; OCUnits=Total; PHUnits=Water
              Sample Initial water: Thickness=[150, 150, 300, 300, 300, 300, 300]; SW=[0.356, 0.397, 0.413, 0.397, 0.343, 0.341, 0.33]; SWUnits=Volumetric; OCUnits=Total; PHUnits=Water
              CERESSoilTemperature
            Manager SowingRule: same as Validation.SE Queensland.Bremar_2003_.Bremar2003.Field.SowingRule
    Folder ICRISAT
      Experiment ICRISAT_18_19_BM8_
        Factors
          Factor Cv_: Specification=[SowingRule]
            Operations JAKI
              2018-11-21  [Chickpea].Sow(population:33, cultivar:"JAKI", depth:50, rowSpacing:300);
              2018-11-08  [Irrigation].Apply(amount:47, depth:0,efficiency:1, willRunoff:false);
              2018-11-22  [Irrigation].Apply(amount:42, depth:0,efficiency:1, willRunoff:false);
              2019-01-09  [Irrigation].Apply(amount:55, depth:0,efficiency:1, willRunoff:false);
            Operations ICCV2
              2018-11-21  [Chickpea].Sow(population:33, cultivar:"ICCV2", depth:50, rowSpacing:300);
              2018-11-08  [Irrigation].Apply(amount:47, depth:0,efficiency:1, willRunoff:false);
              2018-11-22  [Irrigation].Apply(amount:42, depth:0,efficiency:1, willRunoff:false);
              2019-01-09  [Irrigation].Apply(amount:55, depth:0,efficiency:1, willRunoff:false);
            Operations NBeG47
              2018-11-21  [Chickpea].Sow(population:33, cultivar:"NBeG47", depth:50, rowSpacing:300);
              2018-11-08  [Irrigation].Apply(amount:47, depth:0,efficiency:1, willRunoff:false);
              2018-11-22  [Irrigation].Apply(amount:42, depth:0,efficiency:1, willRunoff:false);
              2019-01-09  [Irrigation].Apply(amount:55, depth:0,efficiency:1, willRunoff:false);
            Operations NBeG119
              2018-11-21  [Chickpea].Sow(population:33, cultivar:"NBeG119", depth:30, rowSpacing:300);
              2018-11-08  [Irrigation].Apply(amount:47, depth:0,efficiency:1, willRunoff:false);
              2018-11-22  [Irrigation].Apply(amount:42, depth:0,efficiency:1, willRunoff:false);
              2019-01-09  [Irrigation].Apply(amount:55, depth:0,efficiency:1, willRunoff:false);
        Simulation ICRISAT_BM8
          Memo
            Experiment conducted by Amir Hajjapoor and Jana Kholova, data simulated by A Peake.
          Weather: FileName=Hyderabad.met
          Clock: Start=2018-11-01; End=2019-02-28
          Summary summaryfile
          SoilArbitrator Soil Arbitrator
          Zone Field: Area=1; Slope=0; AspectAngle=0; Altitude=50
            MicroClimate: a_interception=0; b_interception=1; c_interception=0; d_interception=0; soil_albedo=0.13; SoilHeatFluxFraction=0.4; MinimumHeightDiffForNewLayer=0; NightInterceptionFraction=0.5; ReferenceHeight=2
            Irrigation
            Fertiliser
            SurfaceOrganicMatter: InitialResidueName=wheat; InitialResidueType=wheat; InitialResidueMass=1500; InitialStandingFraction=0; InitialCPR=0; InitialCNR=76; FractionFaecesAdded=1
            Operations IrrigationSchedule
            Report: same as Validation.SE Queensland.Bremar_2003_.Bremar2003.Field.Report
            Report HarvestReport: EventNames=[Chickpea].Harvesting
              VariableNames:
                [Clock].Today
                [Chickpea].Phenology.CurrentStageName as Stage
                [Chickpea].Phenology.FloweringDAS as FloweringDAS
                [Chickpea].Phenology.MaturityDAS as MaturityDAS
                [Chickpea].Grain.Live.Wt as GrainWt
            Manager Harvesting: same as Validation.SE Queensland.Bremar_2003_.Bremar2003.Field.Harvesting
            Plant Chickpea: CropType=Chickpea; IsEnding=false; DaysAfterEnding=0
            Manager SowingRule: same as Validation.SE Queensland.Bremar_2003_.Bremar2003.Field.SowingRule
            Soil Vertosol_9_PAWC180: ASCOrder=Vertosol; SoilType=Clay; Site=Generic-Qld; State=Generic; Country=Australia; NaturalVegetation=NA; ApsoilNumber=521-GENERIC; Latitude=-27.183286; Longitude=151.263748; LocationAccuracy=Regional Soil Type; DataSource=Generic soil. CSIRO Sustainable Ecosystems, Toowoomba
              Comments=Generic soil developed by Allan Peake. 'Typical Vertosol' soil properties have been calculated as the average of vertosols with similar characteristics from within the Apsoil database. Groupings were made on the basis of bulk density. Measured BD, DUL and CLL for the groups were then averaged to derive the characteristics of the typical Vertosols. They can then be used in conjunction with measured soil water to simplify the selection of appropriate Vertosols, for paddocks where full soil characterisations have not yet been completed. For more information see Peake et al. 2010: ‘A rapid method for estimating the plant available water capacity of Vertosols’, 2010 Australian Agronomy Conference. Typical Vertosols are different to 'Generic' soil types elsewhere in the Apsoil database, which are representative of certain soil types and districts, but have not been calculated from large numbers of similar, characterised soils.
              Physical
                Thickness  BD    AirDry  LL15   DUL    SAT
                150        1.44  0.101   0.201  0.378  0.428
                150        1.43  0.167   0.209  0.379  0.429
                300        1.43  0.224   0.224  0.38   0.43
                300        1.46  0.224   0.224  0.368  0.418
                300        1.48  0.224   0.224  0.363  0.413
                300        1.49  0.224   0.224  0.357  0.407
                300        1.49  0.224   0.224  0.357  0.407
                SoilCrop ChickpeaSoil: LL=[0.201, 0.209, 0.224, 0.244, 0.31, 0.34, 0.357]; KL=[0.045, 0.045, 0.045, 0.03, 0.025, 0.02, 0.01]; XF=[1, 1, 1, 1, 1, 1, 1]
                  LL source: Field measured and checked for sensibility
                SoilCrop CottonSoil: LL=[0.201, 0.209, 0.224, 0.244, 0.279, 0.31, 0.341]; KL=[0.1, 0.1, 0.1, 0.1, 0.09, 0.07, 0.05]; XF=[1, 1, 1, 1, 1, 1, 1]
                  LL source: Field measured and checked for sensibility
                SoilCrop SorghumSoil: LL=[0.201, 0.209, 0.224, 0.244, 0.279, 0.31, 0.341]; KL=[0.07, 0.07, 0.07, 0.05, 0.05, 0.04, 0.03]; XF=[1, 1, 1, 1, 1, 1, 1]
                  LL source: Field measured and checked for sensibility
              SoilWater: SummerDate=1-Apr; SummerU=2; SummerCona=4.5; WinterDate=1-May; WinterU=2; WinterCona=4.5; DiffusConst=40; DiffusSlope=16; Salb=0.13; CN2Bare=78; CNRed=20; CNCov=0.8; max_pond=0; Thickness=[150, 150, 300, 300, 300, 300, 300]; SWCON=[0.3, 0.3, 0.3, 0.3, 0.3, 0.3, 0.3]; PrecipitationInterception=0
              SoilNitrogen: same as Validation.SE Queensland.Lawes1990.Lawes1990.Field.soil.SoilNitrogen
              Organic: FOMCNRatio=40
                Thickness  Carbon   SoilCNRatio  FBiom  FInert  FOM
                150        1.235    12           0.04   0.4     347.129
                150        0.988    12           0.02   0.6     270.344
                300        0.6175   12           0.02   0.8     163.972
                300        0.30875  12           0.02   1       99.4541
                300        0.18525  12           0.01   1       60.322
                300        0.1235   12           0.01   1       36.5871
                300        0.1235   12           0.01   1       22.1912
              Chemical: Thickness=[150, 150, 300, 300, 300, 300, 300]; PH=[8.1, 8.7, 8.9, 8, 7, 6.4, 5.8]
              Sample Initial water: Thickness=[150, 150, 300, 300, 300, 300, 300]; SW=[0.339, 0.346, 0.373, 0.4, 0.396, 0.396, 0.396]; SWUnits=Volumetric; OCUnits=Total; PHUnits=Water
              CERESSoilTemperature
        Memo
          4th biomass cut was taken almost at Phys. maturity - beginning to go yellow, may explain low SLA
    Folder Central Queensland (disabled)
      Memo
        The data presented for the trials done in Emerald and Biloela were obtained from R Brinsmead (unpublished), as reported by Robertson et al. (2002). The two trials were sowed in four dates. The Emerald experiment was sowed at March 5th, April 13th, June 18th and September 13th. The experiment in Biloela was sowed on March 12th, April 26th, June 18th and Septemebr 13th.
      Experiment Emerald
        Factors
          Factor Sowing: Specification=[Sowing]
            Operations 1
              1989-03-05  [Chickpea].Sow(population:13.7, cultivar:"Amethyst", depth:50, rowSpacing:350);
              1989-07-13  [Irrigation].Apply(amount:50, depth:0, efficiency:1, willRunoff:false);
              1989-08-17  [Irrigation].Apply(amount:100, depth:0, efficiency:1, willRunoff:false);
              1989-10-29  [Irrigation].Apply(amount:100, depth:0, efficiency:1, willRunoff:false);
            Operations 2
              1989-04-13  [Chickpea].Sow(population:18.6, cultivar:"Amethyst", depth:50, rowSpacing:350);
              1989-07-13  [Irrigation].Apply(amount:50, depth:0, efficiency:1, willRunoff:false);
              1989-08-17  [Irrigation].Apply(amount:100, depth:0, efficiency:1, willRunoff:false);
              1989-10-29  [Irrigation].Apply(amount:100, depth:0, efficiency:1, willRunoff:false);
            Operations 3
              1989-06-18  [Chickpea].Sow(population:18.7, cultivar:"Amethyst", depth:50, rowSpacing:350);
              1989-07-13  [Irrigation].Apply(amount:50, depth:0, efficiency:1, willRunoff:false);
              1989-08-17  [Irrigation].Apply(amount:100, depth:0, efficiency:1, willRunoff:false);
              1989-10-29  [Irrigation].Apply(amount:100, depth:0, efficiency:1, willRunoff:false);
            Operations 4
              1989-07-13  [Chickpea].Sow(population:18.8, cultivar:"Amethyst", depth:50, rowSpacing:350);
              1989-07-13  [Irrigation].Apply(amount:50, depth:0, efficiency:1, willRunoff:false);
              1989-08-17  [Irrigation].Apply(amount:100, depth:0, efficiency:1, willRunoff:false);
              1989-10-29  [Irrigation].Apply(amount:100, depth:0, efficiency:1, willRunoff:false);
        Simulation Emerald
          Weather: FileName=Emer89.met
          Clock: Start=1989-01-01; End=1989-12-31
          Summary summaryfile
          SoilArbitrator Soil Arbitrator
          Zone Field: Area=1; Slope=0; AspectAngle=0; Altitude=50
            MicroClimate: a_interception=0; b_interception=1; c_interception=0; d_interception=0; soil_albedo=0.23; SoilHeatFluxFraction=0.4; MinimumHeightDiffForNewLayer=0; NightInterceptionFraction=0.5; ReferenceHeight=2
            Irrigation
            Fertiliser
            SurfaceOrganicMatter: InitialResidueName=unknown; InitialResidueType=wheat; InitialResidueMass=0; InitialStandingFraction=0; InitialCPR=0; InitialCNR=10; FractionFaecesAdded=1
            Operations Sowing
            Operations NRate
            Report: EventNames=[Clock].DoReport
              VariableNames:
                [Clock].Today
                [Soil].SoilWater.SW
                [Soil].SoilWater.Eo
                [Soil].SoilWater.Es
                [Soil].SoilWater.Drainage
                [Soil].SoilWater.Runoff
                [Soil].SoilWater.pond
                [Soil].SoilNitrogen.NO3.kgha
                [MicroClimate].net_radn
                [MicroClimate].peta
                [MicroClimate].petr
            Soil: Latitude=0; Longitude=0
              Physical
                Thickness  BD    AirDry  LL15  DUL   SAT
                150        1.35  0.04    0.14  0.25  0.35
                150        1.35  0.14    0.14  0.25  0.35
                300        1.35  0.14    0.14  0.29  0.37
                300        1.4   0.15    0.15  0.29  0.37
                300        1.4   0.15    0.15  0.29  0.37
                SoilCrop ChickpeaSoil: LL=[0.14, 0.14, 0.14, 0.15, 0.15]; KL=[0.045, 0.045, 0.035, 0.02, 0]; XF=[1, 1, 0.5, 0.5, 0]
              SoilWater: SummerDate=1-Nov; SummerU=6; SummerCona=2; WinterDate=1-Apr; WinterU=6; WinterCona=2; DiffusConst=40; DiffusSlope=16; Salb=0.13; CN2Bare=75; CNRed=20; CNCov=0.8; max_pond=0; Thickness=[150, 150, 300, 300, 300]; SWCON=[0.1, 0.1, 0.1, 0.1, 0.1]; PrecipitationInterception=0
              SoilNitrogen: same as Validation.SE Queensland.Lawes1995original.Lawes1995original.Field.soil.SoilNitrogen
              Organic: FOMCNRatio=80
                Thickness  Carbon  SoilCNRatio  FBiom  FInert  FOM
                150        0.8     14.5         0.05   0.39    261.541
                150        0.4     14.5         0.02   0.47    158.633
                300        0.2     14.5         0.015  0.52    58.3577
                300        0.2     14.5         0.015  0.52    21.4686
              Chemical
                Thickness  NO3N  NH4N  PH
                150        3.9   0.6   7.5
                150        1.3   0.1   8
                300        1.5   0.1   8
                300        0.1   0.1   8
                300        0     0     8
              Sample InitialN: Thickness=[150, 150, 300, 300, 300]; SWUnits=Volumetric; OCUnits=Total; PHUnits=Water
              Sample InitialSW: Thickness=[150, 150, 300, 300, 300]; SW=[0.48, 0.46, 0.48, 0.48, 0.48]; SWUnits=Volumetric; OCUnits=Total; PHUnits=Water
              CERESSoilTemperature
            Report HarvestReport: EventNames=[Chickpea].Harvesting
              VariableNames:
                [Clock].Today
                [Chickpea].Phenology.CurrentStageName as Stage
                [Chickpea].Phenology.FloweringDAS as FloweringDAS
                [Chickpea].Phenology.MaturityDAS as MaturityDAS
                [Chickpea].Grain.Live.Wt as GrainWt
            Manager Harvesting: same as Validation.SE Queensland.Lawes1993.Lawes1993.Field.Harvesting
            Plant Chickpea: CropType=Chickpea; IsEnding=false; DaysAfterEnding=0
            Manager AutoIrrigate: same as Validation.SE Queensland.Hermitage1988.Hermitage1988.Field.AutoIrrigate
      Experiment Biloela
        Factors
          Factor Sowing: Specification=[Sowing]
            Operations 1
              1990-03-12  [Chickpea].Sow(population:24.79, cultivar:"Amethyst", depth:50, rowSpacing:350);
              1990-03-08  [Irrigation].Apply(amount:100, depth:0, efficiency:1, willRunoff:false);
            Operations 2
              1990-04-26  [Chickpea].Sow(population:21.35, cultivar:"Amethyst", depth:50, rowSpacing:350);
              1990-03-08  [Irrigation].Apply(amount:100, depth:0, efficiency:1, willRunoff:false);
            Operations 3
              1990-06-18  [Chickpea].Sow(population:24.43, cultivar:"Amethyst", depth:50, rowSpacing:750);
              1990-09-14  [Irrigation].Apply(amount:100, depth:0, efficiency:1, willRunoff:false);
            Operations 4
              1990-09-13  [Chickpea].Sow(population:19.18, cultivar:"Amethyst", depth:50, rowSpacing:750);
              1990-09-14  [Irrigation].Apply(amount:100, depth:0, efficiency:1, willRunoff:false);
        Simulation Biloela
          Weather: FileName=biloela.met
          Clock: Start=1990-03-07; End=1990-12-31
          Summary summaryfile
          SoilArbitrator Soil Arbitrator
          Zone Field: Area=1; Slope=0; AspectAngle=0; Altitude=50
            MicroClimate: a_interception=0; b_interception=1; c_interception=0; d_interception=0; soil_albedo=0.23; SoilHeatFluxFraction=0.4; MinimumHeightDiffForNewLayer=0; NightInterceptionFraction=0.5; ReferenceHeight=2
            Irrigation
            Fertiliser
            SurfaceOrganicMatter: InitialResidueName=unknown; InitialResidueType=wheat; InitialResidueMass=0; InitialStandingFraction=0; InitialCPR=0; InitialCNR=10; FractionFaecesAdded=1
            Operations Sowing
            Operations NRate
            Report: EventNames=[Clock].DoReport
              VariableNames:
                [Clock].Today
                [Soil].SoilWater.SW
                [Soil].SoilWater.Eo
                [Soil].SoilWater.Es
                [Soil].SoilWater.Drainage
                [Soil].SoilWater.Runoff
                [Soil].SoilWater.pond
                [Soil].SoilNitrogen.NO3.kgha
                [MicroClimate].net_radn
                [MicroClimate].peta
                [MicroClimate].petr
            Soil: Latitude=0; Longitude=0
              Physical
                Thickness  BD    AirDry  LL15   DUL    SAT
                150        1.09  0.1     0.167  0.4    0.41
                150        1.27  0.167   0.167  0.42   0.43
                300        1.3   0.213   0.213  0.447  0.455
                300        1.3   0.22    0.22   0.46   0.47
                300        1.3   0.22    0.22   0.46   0.47
                SoilCrop ChickpeaSoil: LL=[0.167, 0.167, 0.25, 0.37, 0.37]; KL=[0.045, 0.045, 0.035, 0.02, 0]; XF=[1, 1, 0.5, 0.5, 0]
              SoilWater: SummerDate=1-Nov; SummerU=6; SummerCona=2; WinterDate=1-Apr; WinterU=6; WinterCona=2; DiffusConst=40; DiffusSlope=16; Salb=0.13; CN2Bare=75; CNRed=20; CNCov=0.8; max_pond=0; Thickness=[150, 150, 300, 300]; SWCON=[0.1, 0.1, 0.1, 0.1]; PrecipitationInterception=0
              SoilNitrogen: same as Validation.SE Queensland.Lawes1995original.Lawes1995original.Field.soil.SoilNitrogen
              Organic: FOMCNRatio=80
                Thickness  Carbon  SoilCNRatio  FBiom  FInert  FOM
                150        0.8     14.5         0.05   0.39    261.541
                150        0.4     14.5         0.02   0.47    158.633
                300        0.2     14.5         0.015  0.52    58.3577
                300        0.2     14.5         0.015  0.52    21.4686
              Chemical
                Thickness  NO3N  NH4N  PH
                150        3.9   0.6   7.5
                150        1.3   0.1   8
                300        1.5   0.1   8
                300        1.5   0.1   8
              Sample InitialN: Thickness=[150, 150, 300, 300]; SWUnits=Volumetric; OCUnits=Total; PHUnits=Water
              Sample InitialSW: Thickness=[150, 150, 300, 300, 300]; SW=[0.4, 0.42, 0.447, 0.46, 0.46]; SWUnits=Volumetric; OCUnits=Total; PHUnits=Water
              CERESSoilTemperature
            Report HarvestReport: EventNames=[Chickpea].Harvesting
              VariableNames:
                [Clock].Today
                [Chickpea].Phenology.CurrentStageName as Stage
                [Chickpea].Phenology.FloweringDAS as FloweringDAS
                [Chickpea].Phenology.MaturityDAS as MaturityDAS
                [Chickpea].Grain.Live.Wt as GrainWt
            Manager Harvesting: same as Validation.SE Queensland.Lawes1993.Lawes1993.Field.Harvesting
            Plant Chickpea: CropType=Chickpea; IsEnding=false; DaysAfterEnding=0
            Manager AutoIrrigate: same as Validation.SE Queensland.Hermitage1988.Hermitage1988.Field.AutoIrrigate
    Folder NewZealand
      Experiment Lincoln98_1
        Factors
          Factor Irrigation: Specification=[IrrigationSchedule]
            Operations Nil
            Operations Full
              1998-11-27  [Irrigation].Apply(104);
              1998-12-08  [Irrigation].Apply(48);
              1998-12-19  [Irrigation].Apply(49);
              1998-12-30  [Irrigation].Apply(62);
              1999-01-09  [Irrigation].Apply(46);
              1999-01-20  [Irrigation].Apply(55);
              1999-02-01  [Irrigation].Apply(52);
              1999-02-12  [Irrigation].Apply(56);
              1999-02-24  [Irrigation].Apply(57);
            Operations Full_e_f
              1998-11-27  [Irrigation].Apply(104);
              1998-12-08  [Irrigation].Apply(48);
              1998-12-19  [Irrigation].Apply(49);
              1999-01-01  [Irrigation].Apply(72);
            Operations Half_e_f
              1998-11-27  [Irrigation].Apply(52);
              1998-12-08  [Irrigation].Apply(24);
              1998-12-19  [Irrigation].Apply(24.5);
              1999-01-02  [Irrigation].Apply(38);
            Operations Full_f_p
              1998-12-22  [Irrigation].Apply(37);
              1998-12-29  [Irrigation].Apply(39);
              1999-01-07  [Irrigation].Apply(47);
            Operations Half_f_p
              1998-12-25  [Irrigation].Apply(17);
              1999-01-01  [Irrigation].Apply(20);
              1999-01-10  [Irrigation].Apply(21);
            Operations Full_p_m
              1999-01-12  [Irrigation].Apply(33);
              1999-01-19  [Irrigation].Apply(30);
              1999-01-26  [Irrigation].Apply(35);
            Operations Half_p_m
              1999-01-12  [Irrigation].Apply(16);
              1999-01-19  [Irrigation].Apply(15);
              1999-01-26  [Irrigation].Apply(17);
        Simulation Lincoln98_1
          Memo: same as Validation.NewSouthWales.Kulai_2003_.Kulai_2003.memo
          Weather: FileName=Lincoln.met
          Clock: Start=1998-11-01; End=1999-04-15
          Summary summaryfile
          SoilArbitrator Soil Arbitrator
          Zone Field: Area=1; Slope=0; AspectAngle=0; Altitude=50
            MicroClimate: a_interception=0; b_interception=1; c_interception=0; d_interception=0; soil_albedo=0.23; SoilHeatFluxFraction=0.4; MinimumHeightDiffForNewLayer=0; NightInterceptionFraction=0.5; ReferenceHeight=2
            Irrigation
            Fertiliser
            SurfaceOrganicMatter: InitialResidueName=maize; InitialResidueType=maize; InitialResidueMass=500; InitialStandingFraction=0; InitialCPR=0; InitialCNR=65; FractionFaecesAdded=1
            Operations Sowing
              1998-11-03  [Chickpea].Sow(population:50, cultivar:"Amethyst", depth:50, rowSpacing:150);
            Operations IrrigationSchedule
            Report: same as Validation.SE Queensland.Bremar_2003_.Bremar2003.Field.Report
            Report HarvestReport: EventNames=[Chickpea].Harvesting
              VariableNames:
                [Clock].Today
                [Chickpea].Phenology.CurrentStageName as Stage
                [Chickpea].Phenology.FloweringDAS as FloweringDAS
                [Chickpea].Phenology.MaturityDAS as MaturityDAS
                [Chickpea].Grain.Live.Wt as GrainWt
                [Chickpea].Phenology.EmergenceDAS as EmergenceDAS
            Manager Harvesting: same as Validation.SE Queensland.Bremar_2003_.Bremar2003.Field.Harvesting
            Plant Chickpea: CropType=Chickpea; IsEnding=false; DaysAfterEnding=0
            Soil Iversen 12: SoilType=Aquic Haplustept (US), Mottled Inmature Pallic (NZ); Site=Lincoln University: Iversen Field Paddock 12; NearestTown=Lincoln; Region=South East Queensland; NaturalVegetation=Grassland, mainly Qld bluegrass; Latitude=0; Longitude=0
              InitialWater Initial water: PercentMethod=0; FractionFull=0.87
              Physical
                Thickness  BD    AirDry  LL15   DUL    SAT
                300        1.2   0.075   0.075  0.362  0.4
                100        1.3   0.075   0.075  0.311  0.4
                100        1.4   0.13    0.14   0.288  0.4
                100        1.4   0.14    0.14   0.291  0.4
                100        1.4   0.114   0.14   0.3    0.4
                100        1.45  0.107   0.14   0.31   0.4
                100        1.45  0.106   0.14   0.32   0.4
                100        1.45  0.119   0.14   0.329  0.4
                SoilCrop ChickpeaSoil: LL=[0.08, 0.08, 0.155, 0.158, 0.159, 0.177, 0.187, 0.294]; KL=[0.1, 0.09, 0.09, 0.05, 0.05, 0.04, 0.04, 0.08]; XF=[1, 1, 0.5, 0.5, 0.5, 0.5, 0.5, 0.3]
              SoilWater: SummerDate=21-Sep; SummerU=6; SummerCona=3.5; WinterDate=23-Mar; WinterU=6; WinterCona=2.5; DiffusConst=88; DiffusSlope=35; Salb=0.13; CN2Bare=73; CNRed=20; CNCov=0.8; max_pond=0; Thickness=[300, 100, 100, 100, 100, 100, 100, 100]; SWCON=[0.7, 0.7, 0.7, 0.7, 0.7, 0.7, 0.7, 0.7]; PrecipitationInterception=0
              SoilNitrogen: same as Validation.SE Queensland.Lawes1990.Lawes1990.Field.soil.SoilNitrogen
              Organic: FOMCNRatio=40
                Thickness  Carbon  SoilCNRatio  FBiom  FInert  FOM
                300        2.7     11           0.03   0.4     285.04
                100        1       11           0.02   0.6     211.163
                100        0.45    11           0.01   0.7     156.433
                100        0.3     11           0.01   0.8     115.889
                100        0.2     11           0.01   0.9     85.8524
                100        0.2     11           0.01   0.9     63.601
                100        0.2     11           0.01   0.9     47.1168
                100        0.2     11           0.01   0.9     34.905
              Chemical
                Thickness  NO3N    NH4N   PH
                300        15.491  0.093  6
                100        15.491  0.093  6
                100        15.491  0.093  6
                100        15.491  0.093  6
                100        15.491  0.093  6
                100        15.491  0.093  6
                100        15.491  0.093  6
                100        15.491  0.093  6
              Sample Initial nitrogen: Thickness=[300, 100, 100, 100, 100, 100, 100, 100]; SWUnits=Volumetric; OCUnits=Total; PHUnits=Water
              CERESSoilTemperature
            Manager AutoIrrigate
              FASW = 0
              WaterDeficit = 0
              AutoIrrigationOn = False
              StartStageName = StartFlowering
              EndStageName = EndGrainFill
              FASWThreshold = 0.9
              FASWDepth = 600
              script: same as in Validation.SE Queensland.Lawes1990.Lawes1990.Field.AutoIrrigate
      Experiment Lincoln98_2
        Factors
          Factor Irrigation: Specification=[IrrigationSchedule]
            Operations Nil
            Operations Full
              1998-12-30  [Irrigation].Apply(126);
              1999-01-09  [Irrigation].Apply(49);
              1999-01-20  [Irrigation].Apply(56);
              1999-02-01  [Irrigation].Apply(52);
              1999-02-12  [Irrigation].Apply(55);
              1999-02-24  [Irrigation].Apply(55);
              1999-03-03  [Irrigation].Apply(25);
              1999-03-12  [Irrigation].Apply(32);
              1999-03-19  [Irrigation].Apply(16);
            Operations Full_e_f
              1998-12-30  [Irrigation].Apply(126);
              1999-01-09  [Irrigation].Apply(49);
              1999-01-20  [Irrigation].Apply(56);
              1999-01-26  [Irrigation].Apply(28);
            Operations Half_e_f
              1998-12-30  [Irrigation].Apply(63);
              1999-01-09  [Irrigation].Apply(24.5);
              1999-01-22  [Irrigation].Apply(32.5);
            Operations Full_f_p
              1999-01-24  [Irrigation].Apply(32);
              1999-01-31  [Irrigation].Apply(35);
              1999-02-07  [Irrigation].Apply(31);
            Operations Half_f_p
              1999-01-24  [Irrigation].Apply(16);
              1999-01-31  [Irrigation].Apply(17.5);
              1999-02-08  [Irrigation].Apply(19);
            Operations Full_p_m
              1999-02-08  [Irrigation].Apply(36);
              1999-02-15  [Irrigation].Apply(33);
              1999-02-22  [Irrigation].Apply(33);
              1999-03-01  [Irrigation].Apply(25);
              1999-03-08  [Irrigation].Apply(28);
              1999-03-15  [Irrigation].Apply(16);
              1999-03-21  [Irrigation].Apply(19);
            Operations Half_p_m
              1999-02-07  [Irrigation].Apply(15.5);
              1999-02-14  [Irrigation].Apply(18.5);
              1999-02-21  [Irrigation].Apply(15);
              1999-02-28  [Irrigation].Apply(12.5);
              1999-03-07  [Irrigation].Apply(14.5);
              1999-03-14  [Irrigation].Apply(10);
              1999-03-20  [Irrigation].Apply(8);
        Simulation Lincoln 98
          Memo: same as Validation.NewSouthWales.Kulai_2003_.Kulai_2003.memo
          Weather: FileName=Lincoln.met
          Clock: Start=1998-11-01; End=1999-05-01
          Summary summaryfile
          SoilArbitrator Soil Arbitrator
          Zone Field: Area=1; Slope=0; AspectAngle=0; Altitude=50
            MicroClimate: a_interception=0; b_interception=1; c_interception=0; d_interception=0; soil_albedo=0.23; SoilHeatFluxFraction=0.4; MinimumHeightDiffForNewLayer=0; NightInterceptionFraction=0.5; ReferenceHeight=2
            Irrigation
            Fertiliser
            SurfaceOrganicMatter: InitialResidueName=maize; InitialResidueType=maize; InitialResidueMass=500; InitialStandingFraction=0; InitialCPR=0; InitialCNR=65; FractionFaecesAdded=1
            Operations Sowing
              1998-12-07  [Chickpea].Sow(population:50, cultivar:"Amethyst", depth:50, rowSpacing:150);
            Operations IrrigationSchedule
            Report: same as Validation.SE Queensland.Bremar_2003_.Bremar2003.Field.Report
            Report HarvestReport: EventNames=[Chickpea].Harvesting
              VariableNames:
                [Clock].Today
                [Chickpea].Phenology.CurrentStageName as Stage
                [Chickpea].Phenology.FloweringDAS as FloweringDAS
                [Chickpea].Phenology.MaturityDAS as MaturityDAS
                [Chickpea].Grain.Live.Wt as GrainWt
                [Chickpea].Phenology.EmergenceDAS as EmergenceDAS
            Manager Harvesting: same as Validation.SE Queensland.Bremar_2003_.Bremar2003.Field.Harvesting
            Plant Chickpea: CropType=Chickpea; IsEnding=false; DaysAfterEnding=0
            Soil Iversen 12: SoilType=Aquic Haplustept (US), Mottled Inmature Pallic (NZ); Site=Lincoln University: Iversen Field Paddock 12; NearestTown=Lincoln; Region=South East Queensland; NaturalVegetation=Grassland, mainly Qld bluegrass; Latitude=0; Longitude=0
              InitialWater Initial water: PercentMethod=0; FractionFull=0.87
              Physical
                Thickness  BD    AirDry  LL15   DUL    SAT
                300        1.2   0.08    0.08   0.349  0.4
                100        1.3   0.11    0.173  0.317  0.4
                100        1.4   0.13    0.173  0.302  0.4
                100        1.4   0.14    0.173  0.309  0.4
                100        1.4   0.11    0.173  0.321  0.4
                100        1.45  0.11    0.173  0.334  0.4
                100        1.45  0.11    0.173  0.336  0.4
                100        1.45  0.12    0.173  0.316  0.4
                SoilCrop ChickpeaSoil: LL=[0.109, 0.167, 0.149, 0.152, 0.191, 0.201, 0.289, 0.302]; KL=[0.1, 0.09, 0.09, 0.05, 0.05, 0.04, 0.04, 0.08]; XF=[1, 1, 0.5, 0.5, 0.5, 0.5, 0.5, 0.3]
              SoilWater: same as Validation.NewZealand.Lincoln98_1.Lincoln98_1.Field.Iversen 12.SoilWater
              SoilNitrogen: same as Validation.SE Queensland.Lawes1990.Lawes1990.Field.soil.SoilNitrogen
              Organic: same as Validation.NewZealand.Lincoln98_1.Lincoln98_1.Field.Iversen 12.Organic
              Chemical: same as Validation.NewZealand.Lincoln98_1.Lincoln98_1.Field.Iversen 12.Chemical
              Sample Initial nitrogen: Thickness=[300, 100, 100, 100, 100, 100, 100, 100]; SWUnits=Volumetric; OCUnits=Total; PHUnits=Water
              CERESSoilTemperature
            Manager AutoIrrigate: same as Validation.NewZealand.Lincoln98_1.Lincoln98_1.Field.AutoIrrigate
      Experiment Lincoln99_1
        Factors
          Factor Irrigation: Specification=[IrrigationSchedule]
            Operations Nil
            Operations Full
              1999-10-25  [Irrigation].Apply(31);
              1999-11-01  [Irrigation].Apply(27);
              1999-11-08  [Irrigation].Apply(30);
              1999-11-16  [Irrigation].Apply(32);
              1999-11-23  [Irrigation].Apply(25);
              1999-11-30  [Irrigation].Apply(29);
              1999-12-07  [Irrigation].Apply(30);
              1999-12-16  [Irrigation].Apply(45);
              1999-12-23  [Irrigation].Apply(32);
              1999-12-30  [Irrigation].Apply(33);
              2000-01-07  [Irrigation].Apply(27);
              2000-01-14  [Irrigation].Apply(33);
              2000-01-21  [Irrigation].Apply(31);
              2000-01-29  [Irrigation].Apply(34);
              2000-02-05  [Irrigation].Apply(25);
              2000-02-12  [Irrigation].Apply(32);
              2000-02-20  [Irrigation].Apply(21);
              2000-02-27  [Irrigation].Apply(32);
              2000-03-05  [Irrigation].Apply(36);
              2000-03-12  [Irrigation].Apply(26);
            Operations Full_f_p
              1999-12-18  [Irrigation].Apply(36);
              1999-12-25  [Irrigation].Apply(28);
              2000-01-01  [Irrigation].Apply(34);
              2000-01-07  [Irrigation].Apply(18);
            Operations Full_p_m
              2000-01-07  [Irrigation].Apply(22);
              2000-01-14  [Irrigation].Apply(33);
              2000-01-21  [Irrigation].Apply(31);
              2000-01-28  [Irrigation].Apply(29);
              2000-02-04  [Irrigation].Apply(26);
              2000-02-11  [Irrigation].Apply(31);
              2000-02-19  [Irrigation].Apply(23);
        Simulation Lincoln99_1
          Memo
            These simulations are based on data from two years of field trials done in Lincoln, Canterbury, New Zealand from 1998 to 2000. These trials used three cultivars of Kabuli chickpeas. However the results presented here are the average of cultivars for measurements that had no differences among cultivars tested. The experimental design was a split split plot with irrigation as main plot, sowing dates as sub plots and cultivars as sub sub plots.The first season, from 1998 until 1999, had two sowing dates (3rd if November and 7th of December) and eight irrigation treatments. Treatments were nil irrigation, full irrigation from emergence to physiological maturity, full from emergence to flowering, half irrigation from emergence to flowering, full from flowering to podding, half from flowering to podding, full from podding to physiological maturity and half from podding to physiological maturity. In these treatments irrigation was applied weekly and the fully irrigated treatment applied the same amount of water lost through evapotranspiration in the previous week. The half irrigation treatment replaced half of the amount lost in the previous week.Results from this season include biomass, grain yield, pods per plant, LAI, soil volumetric water content and flowering, podding and physsiological maturity dates.The second season, from 1999 to 2000, had two sowing dates (18th of October and 22nd of November) and four irrigation treatments. These were nil irrigation, full from emergence to physiological maturity, full from flowering to podding and full from podding to physiological maturity. The results from this season do not include LAI measurements. More information about the data is available in Anwar, M.R. 2001. Water use of Kabuli chickpea (Cicer arietinum L.) cultivars in Canterbury. (PhD thesis, Lincoln University).
          Weather: FileName=Lincoln.met
          Clock: Start=1999-10-01; End=2000-05-01
          Summary summaryfile
          SoilArbitrator Soil Arbitrator
          Zone Field: Area=1; Slope=0; AspectAngle=0; Altitude=50
            MicroClimate: a_interception=0; b_interception=1; c_interception=0; d_interception=0; soil_albedo=0.23; SoilHeatFluxFraction=0.4; MinimumHeightDiffForNewLayer=0; NightInterceptionFraction=0.5; ReferenceHeight=2
            Irrigation
            Fertiliser
            SurfaceOrganicMatter: InitialResidueName=maize; InitialResidueType=maize; InitialResidueMass=500; InitialStandingFraction=0; InitialCPR=0; InitialCNR=65; FractionFaecesAdded=1
            Operations Sowing
              1999-10-18  [Chickpea].Sow(population:50, cultivar:"Amethyst", depth:50, rowSpacing:150);
            Operations IrrigationSchedule
            Report: same as Validation.SE Queensland.Bremar_2003_.Bremar2003.Field.Report
            Report HarvestReport: EventNames=[Chickpea].Harvesting
              VariableNames:
                [Clock].Today
                [Chickpea].Phenology.CurrentStageName as Stage
                [Chickpea].Phenology.FloweringDAS as FloweringDAS
                [Chickpea].Phenology.MaturityDAS as MaturityDAS
                [Chickpea].Grain.Live.Wt as GrainWt
                [Chickpea].Phenology.EmergenceDAS as EmergenceDAS
            Manager Harvesting: same as Validation.SE Queensland.Lawes1990.Lawes1990.Field.Harvesting
            Plant Chickpea: CropType=Chickpea; IsEnding=false; DaysAfterEnding=0
            Soil Iversen 12: SoilType=Aquic Haplustept (US), Mottled Inmature Pallic (NZ); Site=Lincoln University: Iversen Field Paddock 12; NearestTown=Lincoln; Region=South East Queensland; NaturalVegetation=Grassland, mainly Qld bluegrass; Latitude=0; Longitude=0
              InitialWater Initial water: PercentMethod=0; FractionFull=0.87
              Physical
                Thickness  BD    AirDry  LL15   DUL    SAT
                300        1.2   0.08    0.165  0.353  0.4
                100        1.3   0.1     0.169  0.335  0.4
                100        1.4   0.13    0.173  0.317  0.4
                100        1.4   0.14    0.173  0.318  0.4
                100        1.4   0.114   0.173  0.329  0.4
                100        1.45  0.107   0.173  0.336  0.4
                100        1.45  0.106   0.173  0.356  0.4
                100        1.45  0.119   0.173  0.362  0.4
                100        1.45  0.12    0.173  0.352  0.4
                SoilCrop ChickpeaSoil
                  LL=[0.08, 0.101, 0.155, 0.165, 0.183, 0.266, 0.303, 0.335, 0.341]
                  KL=[1, 0.09, 0.09, 0.05, 0.05, 0.04, 0.04, 0.08, 0.08]
                  XF=[1, 1, 0.5, 0.5, 0.5, 0.5, 0.5, 0.3, 0.3]
              SoilWater: SummerDate=21-Sep; SummerU=6; SummerCona=3.5; WinterDate=23-Mar; WinterU=6; WinterCona=2.5; DiffusConst=88; DiffusSlope=35; Salb=0.13; CN2Bare=73; CNRed=20; CNCov=0.8; max_pond=0; Thickness=[300, 100, 100, 100, 100, 100, 100, 100, 100]; SWCON=[0.7, 0.7, 0.7, 0.7, 0.7, 0.7, 0.7, 0.7, 0.7]; PrecipitationInterception=0
              SoilNitrogen: same as Validation.SE Queensland.Lawes1990.Lawes1990.Field.soil.SoilNitrogen
              Organic: FOMCNRatio=40
                Thickness  Carbon  SoilCNRatio  FBiom  FInert  FOM
                300        2.7     11           0.03   0.4     261.131
                100        1       11           0.02   0.6     198.799
                100        0.45    11           0.01   0.7     151.346
                100        0.3     11           0.01   0.8     115.22
                100        0.2     11           0.01   0.9     87.7169
                100        0.2     11           0.01   0.9     66.7789
                100        0.2     11           0.01   0.9     50.8388
                100        0.2     11           0.01   0.9     38.7036
                100        0.2     11           0.01   1       29.4651
              Chemical
                Thickness  NO3N    NH4N   PH
                300        15.491  0.093  6
                100        15.491  0.093  6
                100        15.491  0.093  6
                100        15.491  0.093  6
                100        15.491  0.093  6
                100        15.491  0.093  6
                100        15.491  0.093  6
                100        15.491  0.093  6
                100        15.491  0.093  6
              Sample Initial nitrogen: Thickness=[300, 100, 100, 100, 100, 100, 100, 100, 100]; SWUnits=Volumetric; OCUnits=Total; PHUnits=Water
              CERESSoilTemperature
      Experiment Lincoln99_2
        Factors
          Factor Irrigation: Specification=[IrrigationSchedule]
            Operations Nil
            Operations Full
              1999-11-30  [Irrigation].Apply(35);
              1999-12-07  [Irrigation].Apply(32);
              1999-12-17  [Irrigation].Apply(55);
              1999-12-23  [Irrigation].Apply(29);
              1999-12-30  [Irrigation].Apply(35);
              2000-01-08  [Irrigation].Apply(33);
              2000-01-14  [Irrigation].Apply(29);
              2000-01-21  [Irrigation].Apply(31);
              2000-01-30  [Irrigation].Apply(36);
              2000-02-05  [Irrigation].Apply(24);
              2000-02-12  [Irrigation].Apply(32);
              2000-02-21  [Irrigation].Apply(26);
              2000-02-27  [Irrigation].Apply(25);
              2000-03-05  [Irrigation].Apply(33);
              2000-03-12  [Irrigation].Apply(24);
              2000-03-19  [Irrigation].Apply(20);
              2000-03-28  [Irrigation].Apply(26);
              2000-04-05  [Irrigation].Apply(20);
              2000-04-12  [Irrigation].Apply(12);
            Operations Full_f_p
              2000-01-27  [Irrigation].Apply(27);
              2000-02-03  [Irrigation].Apply(27);
              2000-02-10  [Irrigation].Apply(33);
              2000-02-14  [Irrigation].Apply(17);
            Operations Full_p_m
              2000-02-12  [Irrigation].Apply(32);
              2000-02-19  [Irrigation].Apply(17);
              2000-02-26  [Irrigation].Apply(33);
              2000-03-04  [Irrigation].Apply(29);
              2000-03-11  [Irrigation].Apply(26);
              2000-03-22  [Irrigation].Apply(32);
        Simulation Lincoln99_2
          Memo: same as Validation.NewZealand.Lincoln99_1.Lincoln99_1.memo
          Weather: FileName=Lincoln.met
          Clock: Start=1999-10-01; End=2000-05-01
          Summary summaryfile
          SoilArbitrator Soil Arbitrator
          Zone Field: Area=1; Slope=0; AspectAngle=0; Altitude=50
            MicroClimate: a_interception=0; b_interception=1; c_interception=0; d_interception=0; soil_albedo=0.23; SoilHeatFluxFraction=0.4; MinimumHeightDiffForNewLayer=0; NightInterceptionFraction=0.5; ReferenceHeight=2
            Irrigation
            Fertiliser
            SurfaceOrganicMatter: InitialResidueName=maize; InitialResidueType=maize; InitialResidueMass=500; InitialStandingFraction=0; InitialCPR=0; InitialCNR=65; FractionFaecesAdded=1
            Operations Sowing
              1999-11-22  [Chickpea].Sow(population:50, cultivar:"Amethyst", depth:50, rowSpacing:150);
            Operations IrrigationSchedule
            Report: same as Validation.SE Queensland.Bremar_2003_.Bremar2003.Field.Report
            Report HarvestReport: EventNames=[Chickpea].Harvesting
              VariableNames:
                [Clock].Today
                [Chickpea].Phenology.CurrentStageName as Stage
                [Chickpea].Phenology.FloweringDAS as FloweringDAS
                [Chickpea].Phenology.MaturityDAS as MaturityDAS
                [Chickpea].Grain.Live.Wt as GrainWt
                [Chickpea].Phenology.EmergenceDAS as EmergenceDAS
            Manager Harvesting: same as Validation.SE Queensland.Lawes1990.Lawes1990.Field.Harvesting
            Plant Chickpea: CropType=Chickpea; IsEnding=false; DaysAfterEnding=0
            Soil Iversen 12: SoilType=Aquic Haplustept (US), Mottled Inmature Pallic (NZ); Site=Lincoln University: Iversen Field Paddock 12; NearestTown=Lincoln; Region=South East Queensland; NaturalVegetation=Grassland, mainly Qld bluegrass; Latitude=0; Longitude=0
              InitialWater Initial water: PercentMethod=0; FractionFull=0.87
              Physical
                Thickness  BD    AirDry  LL15   DUL    SAT
                300        1.2   0.08    0.08   0.36   0.4
                100        1.3   0.11    0.173  0.31   0.4
                100        1.4   0.13    0.173  0.29   0.4
                100        1.4   0.14    0.173  0.29   0.4
                100        1.4   0.11    0.173  0.3    0.4
                100        1.45  0.11    0.173  0.31   0.4
                100        1.45  0.11    0.173  0.32   0.4
                100        1.45  0.12    0.173  0.33   0.4
                100        1.45  0.12    0.173  0.332  0.4
                SoilCrop ChickpeaSoil
                  LL=[0.083, 0.163, 0.169, 0.176, 0.193, 0.225, 0.294, 0.331, 0.341]
                  KL=[0.1, 0.09, 0.09, 0.05, 0.05, 0.04, 0.04, 0.08, 0.08]
                  XF=[1, 1, 0.5, 0.5, 0.5, 0.5, 0.5, 0.3, 0.2]
              SoilWater: same as Validation.NewZealand.Lincoln99_1.Lincoln99_1.Field.Iversen 12.SoilWater
              SoilNitrogen: same as Validation.SE Queensland.Lawes1990.Lawes1990.Field.soil.SoilNitrogen
              Organic: same as Validation.NewZealand.Lincoln99_1.Lincoln99_1.Field.Iversen 12.Organic
              Chemical: same as Validation.NewZealand.Lincoln99_1.Lincoln99_1.Field.Iversen 12.Chemical
              Sample Initial nitrogen: Thickness=[300, 100, 100, 100, 100, 100, 100, 100, 100]; SWUnits=Volumetric; OCUnits=Total; PHUnits=Water
              CERESSoilTemperature
      Experiment Ayaz98
        Factors
          Factor Population: Specification=[Sowing]
            Operations 5
              1998-10-30  [Chickpea].Sow(population:5, cultivar:"Ayaz", depth:50, rowSpacing:150);
            Operations 50
              1998-10-30  [Chickpea].Sow(population:55, cultivar:"Ayaz", depth:50, rowSpacing:150);
            Operations 100
              1998-10-30  [Chickpea].Sow(population:87, cultivar:"Ayaz", depth:50, rowSpacing:150);
            Operations 200
              1998-10-30  [Chickpea].Sow(population:149, cultivar:"Ayaz", depth:50, rowSpacing:150);
        Simulation Ayaz98
          Memo: same as Validation.NewSouthWales.Kulai_2003_.Kulai_2003.memo
          Weather: FileName=Lincoln.met
          Clock: Start=1998-10-30; End=1999-04-15
          Summary summaryfile
          SoilArbitrator Soil Arbitrator
          Zone Field: Area=1; Slope=0; AspectAngle=0; Altitude=50
            MicroClimate: a_interception=0; b_interception=1; c_interception=0; d_interception=0; soil_albedo=0.23; SoilHeatFluxFraction=0.4; MinimumHeightDiffForNewLayer=0; NightInterceptionFraction=0.5; ReferenceHeight=2
            Irrigation
            Fertiliser
            SurfaceOrganicMatter: InitialResidueName=maize; InitialResidueType=maize; InitialResidueMass=500; InitialStandingFraction=0; InitialCPR=0; InitialCNR=65; FractionFaecesAdded=1
            Operations Sowing
              1998-11-03  [Chickpea].Sow(population:50, cultivar:"Amethyst", depth:50, rowSpacing:150);
            Operations IrrigationSchedule
              1998-11-18  [Irrigation].Apply(25);
              1998-12-30  [Irrigation].Apply(25);
              1999-01-15  [Irrigation].Apply(25);
            Report: same as Validation.SE Queensland.Bremar_2003_.Bremar2003.Field.Report
            Report HarvestReport: EventNames=[Chickpea].Harvesting
              VariableNames:
                [Clock].Today
                [Chickpea].Phenology.CurrentStageName as Stage
                [Chickpea].Phenology.FloweringDAS as FloweringDAS
                [Chickpea].Phenology.MaturityDAS as MaturityDAS
                [Chickpea].Grain.Live.Wt as GrainWt
                [Chickpea].Phenology.EmergenceDAS as EmergenceDAS
            Manager Harvesting: same as Validation.SE Queensland.Bremar_2003_.Bremar2003.Field.Harvesting
            Plant Chickpea: CropType=Chickpea; IsEnding=false; DaysAfterEnding=0
            Soil Iversen 12: SoilType=Aquic Haplustept (US), Mottled Inmature Pallic (NZ); Site=Lincoln University: Iversen Field Paddock 12; NearestTown=Lincoln; Region=South East Queensland; NaturalVegetation=Grassland, mainly Qld bluegrass; Latitude=0; Longitude=0
              InitialWater Initial water: PercentMethod=0; FractionFull=0.87
              Physical
                Thickness  BD    AirDry  LL15   DUL    SAT
                200        1.2   0.08    0.165  0.348  0.37
                100        1.3   0.169   0.169  0.358  0.37
                100        1.4   0.173   0.173  0.335  0.37
                100        1.4   0.14    0.14   0.317  0.37
                100        1.4   0.114   0.114  0.318  0.37
                100        1.45  0.107   0.107  0.329  0.37
                100        1.45  0.106   0.106  0.336  0.37
                100        1.45  0.119   0.119  0.356  0.37
                100        1.5   0.181   0.181  0.362  0.37
                100        1.5   0.176   0.176  0.352  0.37
                100        1.5   0.167   0.167  0.333  0.37
                100        1.55  0.152   0.152  0.303  0.37
                100        1.55  0.164   0.164  0.328  0.37
                100        1.55  0.177   0.177  0.353  0.37
                SoilCrop ChickpeaSoil
                  LL=[0.165, 0.169, 0.173, 0.14, 0.114, 0.107, 0.106, 0.119, 0.181, 0.176, 0.167, 0.152, 0.164, 0.177]
                  KL=[0.1, 0.1, 0.08, 0.06, 0.04, 0.02, 0.01, 0, 0, 0, 0, 0, 0, 0]
                  XF=[1, 1, 1, 1, 1, 1, 1, 0, 0, 0, 0, 0, 0, 0]
              SoilWater: SummerDate=21-Sep; SummerU=6; SummerCona=3.5; WinterDate=23-Mar; WinterU=6; WinterCona=2.5; DiffusConst=88; DiffusSlope=35; Salb=0.13; CN2Bare=73; CNRed=20; CNCov=0.8; max_pond=0; PrecipitationInterception=0
                Thickness=[200, 100, 100, 100, 100, 100, 100, 100, 100, 100, 100, 100, 100, 100]
                SWCON=[0.7, 0.7, 0.7, 0.7, 0.7, 0.7, 0.7, 0.7, 0.7, 0.7, 0.7, 0.7, 0.7, 0.7]
              SoilNitrogen: same as Validation.SE Queensland.Lawes1990.Lawes1990.Field.soil.SoilNitrogen
              Organic: FOMCNRatio=40
                Thickness  Carbon  SoilCNRatio  FBiom  FInert  FOM
                200        2.7     11           0.03   0.4     193.006
                100        1       11           0.02   0.6     158.02
                100        0.45    11           0.01   0.7     129.376
                100        0.3     11           0.01   0.8     105.924
                100        0.2     11           0.01   0.9     86.7232
                100        0.2     11           0.01   0.9     71.0029
                100        0.2     11           0.01   0.9     58.1323
                100        0.2     11           0.01   0.9     47.5947
                100        0.2     11           0.01   1       38.9672
                100        0.2     11           0.01   1       31.9037
                100        0.2     11           0.01   1       26.1205
                100        0.2     11           0.01   1       21.3857
                100        0.2     11           0.01   1       17.5091
                100        0.2     11           0.01   1       14.3352
              Chemical
                Thickness  NO3N    NH4N   PH
                200        15.491  0.093  6
                100        15.491  0.093  -
                100        15.491  0.093  -
                100        15.491  0.093  -
                100        15.491  0.093  -
                100        15.491  0.093  -
                100        15.491  0.093  -
                100        15.491  0.093  -
                100        15.491  0.093  -
                100        15.491  0.093  -
                100        15.491  0.093  -
                100        15.491  0.093  -
                100        15.491  0.093  -
                100        15.491  0.093  -
              Sample Initial nitrogen: SWUnits=Volumetric; OCUnits=Total; PHUnits=Water
                Thickness=[200, 100, 100, 100, 100, 100, 100, 100, 100, 100, 100, 100, 100, 100]
              CERESSoilTemperature
            Manager AutoIrrigate: same as Validation.SE Queensland.Lawes1990.Lawes1990.Field.AutoIrrigate
      Experiment Ayaz99
        Factors
          Factor Population: Specification=[Sowing]
            Operations 10
              1999-10-21  [Chickpea].Sow(population:10, cultivar:"Ayaz", depth:50, rowSpacing:315);
            Operations 100
              1999-10-21  [Chickpea].Sow(population:98, cultivar:"Ayaz", depth:50, rowSpacing:100);
            Operations 400
              1999-10-21  [Chickpea].Sow(population:395, cultivar:"Ayaz", depth:50, rowSpacing:50);
        Simulation Ayaz99
          Memo: same as Validation.NewSouthWales.Kulai_2003_.Kulai_2003.memo
          Weather: FileName=Lincoln.met
          Clock: Start=1999-10-21; End=2000-04-15
          Summary summaryfile
          SoilArbitrator Soil Arbitrator
          Zone Field: Area=1; Slope=0; AspectAngle=0; Altitude=50
            MicroClimate: a_interception=0; b_interception=1; c_interception=0; d_interception=0; soil_albedo=0.23; SoilHeatFluxFraction=0.4; MinimumHeightDiffForNewLayer=0; NightInterceptionFraction=0.5; ReferenceHeight=2
            Irrigation
            Fertiliser
            SurfaceOrganicMatter: InitialResidueName=maize; InitialResidueType=maize; InitialResidueMass=500; InitialStandingFraction=0; InitialCPR=0; InitialCNR=65; FractionFaecesAdded=1
            Operations Sowing
              1998-11-03  [Chickpea].Sow(population:50, cultivar:"Amethyst", depth:50, rowSpacing:150);
            Operations IrrigationSchedule
            Report: same as Validation.SE Queensland.Bremar_2003_.Bremar2003.Field.Report
            Report HarvestReport: EventNames=[Chickpea].Harvesting
              VariableNames:
                [Clock].Today
                [Chickpea].Phenology.CurrentStageName as Stage
                [Chickpea].Phenology.FloweringDAS as FloweringDAS
                [Chickpea].Phenology.MaturityDAS as MaturityDAS
                [Chickpea].Grain.Live.Wt as GrainWt
                [Chickpea].Phenology.EmergenceDAS as EmergenceDAS
            Manager Harvesting: same as Validation.SE Queensland.Bremar_2003_.Bremar2003.Field.Harvesting
            Plant Chickpea: CropType=Chickpea; IsEnding=false; DaysAfterEnding=0
            Soil Iversen 12: same as Validation.NewZealand.Ayaz98.Ayaz98.Field.Iversen 12
            Manager AutoIrrigate: same as Validation.SE Queensland.Lawes1990.Lawes1990.Field.AutoIrrigate
    Folder Phenology Only
      Memo
        Several minimal datasets are available with only flowering dates for a ranges of planting dates.  These are assembled here for testing of the phenology model for a range of latitudes, temperatures and sowing dates. Local soil data may not be available, but it is assumed that this is necessary when comparing only preditions of time to flowering.
      Experiment Beverley1989 (disabled)
        Factors
          Factor Sowing: Specification=[Sowing]
            Operations 1
              1989-05-29  [Chickpea].Sow(population:33, cultivar:"Amethyst", depth:50, rowSpacing:350);
            Operations 2
              1989-06-16  [Chickpea].Sow(population:33, cultivar:"Amethyst", depth:50, rowSpacing:350);
            Operations 3
              1989-07-10  [Chickpea].Sow(population:33, cultivar:"Amethyst", depth:50, rowSpacing:350);
            Operations 4
              1989-07-31  [Chickpea].Sow(population:33, cultivar:"Amethyst", depth:50, rowSpacing:350);
            Operations 5
              1989-08-22  [Chickpea].Sow(population:33, cultivar:"Amethyst", depth:50, rowSpacing:350);
        Simulation Beverley
          Weather: FileName=Beverley.met
          Clock: Start=1989-01-01; End=1990-12-30
          Summary summaryfile
          SoilArbitrator Soil Arbitrator
          Zone Field: Area=1; Slope=0; AspectAngle=0; Altitude=50
            MicroClimate: a_interception=0; b_interception=1; c_interception=0; d_interception=0; soil_albedo=0.23; SoilHeatFluxFraction=0.4; MinimumHeightDiffForNewLayer=0; NightInterceptionFraction=0.5; ReferenceHeight=2
            Irrigation
            Fertiliser
            SurfaceOrganicMatter: InitialResidueName=maize; InitialResidueType=maize; InitialResidueMass=500; InitialStandingFraction=0; InitialCPR=0; InitialCNR=65; FractionFaecesAdded=1
            Operations Sowing
            Operations NRate
              1985-11-08  [Fertiliser].Apply(50, Fertiliser.Types.NH4NO3N, 10);
              1985-11-29  [Fertiliser].Apply(30, Fertiliser.Types.NH4NO3N, 10);
            Report: same as Validation.SE Queensland.Lawes1995original.Lawes1995original.Field.Report
            Report HarvestReport: EventNames=[Chickpea].Harvesting
              VariableNames:
                [Clock].Today
                [Chickpea].Phenology.CurrentStageName as Stage
                [Chickpea].Phenology.FloweringDAS as FloweringDAS
                [Chickpea].Phenology.MaturityDAS as MaturityDAS
                [Chickpea].Grain.Live.Wt as GrainWt
            Manager Harvesting: same as Validation.SE Queensland.Lawes1993.Lawes1993.Field.Harvesting
            Plant Chickpea: CropType=Chickpea; IsEnding=false; DaysAfterEnding=0
            Soil: SoilType=sand; Site=Beverley; NearestTown=Unknown; Region=WA; NaturalVegetation=Unknown; Latitude=0; Longitude=0
              Physical
                Thickness  BD    AirDry  LL15  DUL   SAT
                100        1.7   0.03    0.05  0.16  0.29
                100        1.75  0.03    0.04  0.21  0.29
                100        1.8   0.04    0.06  0.21  0.29
                100        1.85  0.04    0.1   0.22  0.29
                100        1.85  0.04    0.13  0.22  0.28
                100        1.85  0.04    0.14  0.22  0.24
                100        1.85  0.04    0.17  0.22  0.24
                200        1.85  0.04    0.17  0.22  0.24
                200        1.85  0.04    0.17  0.21  0.24
                200        1.85  0.04    0.17  0.19  0.24
                SoilCrop ChickpeaSoil
                  LL=[0.05, 0.04, 0.06, 0.06, 0.13, 0.14, 0.17, 0.17, 0.17, 0.17]
                  KL=[0.06, 0.06, 0.06, 0.06, 0.06, 0.06, 0.06, 0.06, 0.06, 0.06]
                  XF=[0.2, 0.2, 0.4, 0.4, 0.4, 0.2, 0.2, 0.2, 0.2, 0]
              SoilWater: SummerDate=1-Nov; SummerU=6; SummerCona=2; WinterDate=1-Apr; WinterU=6; WinterCona=2; DiffusConst=88; DiffusSlope=35; Salb=0.13; CN2Bare=60; CNRed=20; CNCov=0.8; max_pond=0; Thickness=[100, 100, 100, 100, 100, 100, 100, 200, 200, 200]; SWCON=[1, 1, 1, 1, 0.11, 1, 1, 1, 1, 1]; PrecipitationInterception=0
              SoilNitrogen: same as Validation.SE Queensland.Lawes1995original.Lawes1995original.Field.soil.SoilNitrogen
              Organic: FOMCNRatio=20
                Thickness  Carbon  SoilCNRatio  FBiom  FInert  FOM
                100        0.81    13           0.04   0.1     356.478
                100        0.26    13           0.03   0.1     283.016
                100        0.1     13           0.02   0.2     224.693
                100        0.1     13           0.01   0.8     178.389
                100        0.1     13           0.01   0.9     141.627
                100        0.1     13           0.01   0.9     112.441
                100        0.1     13           0.01   0.9     89.2692
                200        0.1     13           0.01   0.9     56.2676
                200        0.1     13           0.01   0.9     35.4662
                200        0.1     13           0.01   0.9     22.3548
              Chemical
                Thickness  NO3N  NH4N  PH
                100        4     4     4.7
                100        1     0     4.7
                100        1     0     4.7
                100        0.5   0     6
                100        0.5   0     6
                100        0.5   0     6
                100        0.5   0     6
                200        0.5   0     6
                200        0.5   0     6
                200        0.5   0     6
              Sample Initial nitrogen: Thickness=[100, 100, 100, 100, 100, 100, 100, 200, 200, 200]; SWUnits=Volumetric; OCUnits=Total; PHUnits=Water
              Sample Initial water: Thickness=[100, 100, 100, 100, 100, 100, 100, 200, 200, 200]; SW=[0.12, 0.15, 0.18, 0.2, 0.2, 0.21, 0.22, 0.22, 0.21, 0.19]; SWUnits=Volumetric; OCUnits=Total; PHUnits=Water
              CERESSoilTemperature
      Experiment Kununurra1989 (disabled)
        Factors
          Factor Sowing: Specification=[Sowing]
            Operations 1
              1989-05-09  [Chickpea].Sow(population:33, cultivar:"Amethyst", depth:50, rowSpacing:350);
            Operations 2
              1989-05-25  [Chickpea].Sow(population:33, cultivar:"Amethyst", depth:50, rowSpacing:350);
            Operations 3
              1989-06-12  [Chickpea].Sow(population:33, cultivar:"Amethyst", depth:50, rowSpacing:350);
            Operations 4
              1989-07-03  [Chickpea].Sow(population:33, cultivar:"Amethyst", depth:50, rowSpacing:350);
            Operations 5
              1989-07-24  [Chickpea].Sow(population:33, cultivar:"Amethyst", depth:50, rowSpacing:350);
        Simulation Kununurra
          Weather: FileName=Kununurra.met
          Clock: Start=1989-01-01; End=1990-12-30
          Summary summaryfile
          SoilArbitrator Soil Arbitrator
          Zone Field: same as Validation.Phenology Only.Beverley1989.Beverley.Field
      Experiment Ayr1989 (disabled)
        Factors
          Factor Sowing: Specification=[Sowing]
            Operations 1
              1989-05-05  [Chickpea].Sow(population:33, cultivar:"Amethyst", depth:50, rowSpacing:350);
            Operations 2
              1989-06-08  [Chickpea].Sow(population:33, cultivar:"Amethyst", depth:50, rowSpacing:350);
            Operations 3
              1989-07-06  [Chickpea].Sow(population:33, cultivar:"Amethyst", depth:50, rowSpacing:350);
            Operations 4
              1989-08-08  [Chickpea].Sow(population:33, cultivar:"Amethyst", depth:50, rowSpacing:350);
        Simulation Ayr
          Weather: FileName=Ayr.met
          Clock: Start=1989-01-01; End=1990-12-30
          Summary summaryfile
          SoilArbitrator Soil Arbitrator
          Zone Field: same as Validation.Phenology Only.Beverley1989.Beverley.Field
      Experiment Tamworth1989 (disabled)
        Factors
          Factor Sowing: Specification=[Sowing]
            Operations 1
              1989-05-15  [Chickpea].Sow(population:33, cultivar:"Amethyst", depth:50, rowSpacing:350);
            Operations 2
              1989-06-14  [Chickpea].Sow(population:33, cultivar:"Amethyst", depth:50, rowSpacing:350);
            Operations 3
              1989-07-17  [Chickpea].Sow(population:33, cultivar:"Amethyst", depth:50, rowSpacing:350);
            Operations 4
              1989-08-15  [Chickpea].Sow(population:33, cultivar:"Amethyst", depth:50, rowSpacing:350);
        Simulation Tamworth
          Weather: FileName=Tamworth.met
          Clock: Start=1989-01-01; End=1990-12-30
          Summary summaryfile
          SoilArbitrator Soil Arbitrator
          Zone Field: same as Validation.Phenology Only.Beverley1989.Beverley.Field
      Experiment Gorgan_2004 (disabled)
        Factors
          Factor CV: Specification=[SowingRule]
            Operations Ghab3
              2004-12-06  [Chickpea].Sow(population:50, cultivar:"Ghab3", depth:50, rowSpacing:250);
            Operations 00_21C
              2004-12-06  [Chickpea].Sow(population:50, cultivar:"00_21C", depth:50, rowSpacing:250);
            Operations 00_40C
              2004-12-06  [Chickpea].Sow(population:50, cultivar:"00_40C", depth:50, rowSpacing:250);
            Operations 01_36C
              2004-12-06  [Chickpea].Sow(population:50, cultivar:"01_36C", depth:50, rowSpacing:250);
            Operations 01_61C
              2004-12-06  [Chickpea].Sow(population:50, cultivar:"01_61C", depth:50, rowSpacing:250);
            Operations 01_7C
              2004-12-06  [Chickpea].Sow(population:50, cultivar:"01_7C", depth:50, rowSpacing:250);
            Operations 02_03C
              2004-12-06  [Chickpea].Sow(population:50, cultivar:"02_03C", depth:50, rowSpacing:250);
            Operations 02_10C
              2004-12-06  [Chickpea].Sow(population:50, cultivar:"02_10C", depth:50, rowSpacing:250);
            Operations 02_23C
              2004-12-06  [Chickpea].Sow(population:50, cultivar:"02_23C", depth:50, rowSpacing:250);
            Operations 02_30C
              2004-12-06  [Chickpea].Sow(population:50, cultivar:"02_30C", depth:50, rowSpacing:250);
            Operations 02_35C
              2004-12-06  [Chickpea].Sow(population:50, cultivar:"02_35C", depth:50, rowSpacing:250);
            Operations Ghab5
              2004-12-06  [Chickpea].Sow(population:50, cultivar:"Ghab5", depth:50, rowSpacing:250);
            Operations Ghab4
              2004-12-06  [Chickpea].Sow(population:50, cultivar:"Ghab4", depth:50, rowSpacing:250);
            Operations 97_116C
              2004-12-06  [Chickpea].Sow(population:50, cultivar:"97_116C", depth:50, rowSpacing:250);
            Operations 97_118C
              2004-12-06  [Chickpea].Sow(population:50, cultivar:"97_118C", depth:50, rowSpacing:250);
            Operations 97_120C
              2004-12-06  [Chickpea].Sow(population:50, cultivar:"97_120C", depth:50, rowSpacing:250);
            Operations 97_219C
              2004-12-06  [Chickpea].Sow(population:50, cultivar:"97_219C", depth:50, rowSpacing:250);
            Operations 98_106C
              2004-12-06  [Chickpea].Sow(population:50, cultivar:"98_106C", depth:50, rowSpacing:250);
            Operations 98_107C
              2004-12-06  [Chickpea].Sow(population:50, cultivar:"98_107C", depth:50, rowSpacing:250);
            Operations 98_16C
              2004-12-06  [Chickpea].Sow(population:50, cultivar:"98_16C", depth:50, rowSpacing:250);
            Operations 98_55C
              2004-12-06  [Chickpea].Sow(population:50, cultivar:"98_55C", depth:50, rowSpacing:250);
            Operations 98_79C
              2004-12-06  [Chickpea].Sow(population:50, cultivar:"98_79C", depth:50, rowSpacing:250);
            Operations 99_34C
              2004-12-06  [Chickpea].Sow(population:50, cultivar:"99_34C", depth:50, rowSpacing:250);
            Operations 99_66C
              2004-12-06  [Chickpea].Sow(population:50, cultivar:"99_66C", depth:50, rowSpacing:250);
            Operations 99_73C
              2004-12-06  [Chickpea].Sow(population:50, cultivar:"99_73C", depth:50, rowSpacing:250);
        Simulation Gorgan_2004
          Weather: FileName=Gorgan.met
          Clock: Start=2004-12-01; End=2005-07-01
          Summary summaryfile
          SoilArbitrator Soil Arbitrator
          Zone Field: Area=1; Slope=0; AspectAngle=0; Altitude=50
            MicroClimate: a_interception=0; b_interception=1; c_interception=0; d_interception=0; soil_albedo=0.23; SoilHeatFluxFraction=0.4; MinimumHeightDiffForNewLayer=0; NightInterceptionFraction=0.5; ReferenceHeight=2
            Fertiliser
            SurfaceOrganicMatter: InitialResidueName=unknown; InitialResidueType=wheat; InitialResidueMass=0; InitialStandingFraction=0; InitialCPR=0; InitialCNR=10; FractionFaecesAdded=1
            Operations SowingRule
              1992-05-07  [Chickpea].Sow(population:40, cultivar:"Amethyst", depth:50, rowSpacing:150);
            Report: same as Validation.SE Queensland.Hermitage_92.Hermitage_92.Field.Report
            Report HarvestReport: EventNames=[Chickpea].Harvesting
              VariableNames:
                [Clock].Today
                [Chickpea].Phenology.CurrentStageName as Stage
                [Chickpea].Phenology.FloweringDAS as FloweringDAS
                [Chickpea].Phenology.MaturityDAS as MaturityDAS
                [Chickpea].Grain.Live.Wt as GrainWt
            Manager Harvesting: same as Validation.SE Queensland.Hermitage_92.Hermitage_92.Field.Harvesting
            Plant Chickpea: CropType=Chickpea; IsEnding=false; DaysAfterEnding=0
            Soil: Latitude=0; Longitude=0
              InitialWater Initial water: PercentMethod=1; FractionFull=1
              Physical
                Thickness  BD   AirDry  LL15  DUL   SAT
                150        1.3  0.1     0.2   0.38  0.43
                150        1.4  0.2     0.2   0.38  0.43
                300        1.4  0.2     0.2   0.38  0.43
                300        1.4  0.2     0.2   0.37  0.42
                300        1.4  0.2     0.2   0.35  0.4
                300        1.4  0.2     0.2   0.35  0.4
                SoilCrop ChickpeaSoil: LL=[0.2, 0.22, 0.23, 0.25, 0.28, 0.3]; KL=[0.06, 0.06, 0.06, 0.05, 0.04, 0.02]; XF=[1, 1, 1, 1, 1, 1]
              SoilWater: same as Validation.NewSouthWales.Windridge.Windridge.Field.soil.SoilWater
              SoilNitrogen: same as Validation.SE Queensland.Lawes1995original.Lawes1995original.Field.soil.SoilNitrogen
              Organic: same as Validation.NewSouthWales.Windridge.Windridge.Field.soil.Organic
              Chemical
                Thickness  NO3N  NH4N  PH
                150        14.4  0.01  7.62
                150        6.58  0.01  7.62
                300        2.45  0.01  7.62
                300        1.08  0.01  7.62
                300        0.15  0.01  7.62
                300        0.83  0.01  7.62
              Sample Initial nitrogen: Thickness=[150, 150, 300, 300, 300, 300]; SWUnits=Volumetric; OCUnits=Total; PHUnits=Water
              CERESSoilTemperature
      Experiment Gorgan_2005 (disabled)
        Factors
          Factor CV: Specification=[SowingRule]
            Operations Ghab3
              2005-11-27  [Chickpea].Sow(population:50, cultivar:"Ghab3", depth:50, rowSpacing:250);
            Operations 00_21C
              2005-11-27  [Chickpea].Sow(population:50, cultivar:"00_21C", depth:50, rowSpacing:250);
            Operations 00_40C
              2005-11-27  [Chickpea].Sow(population:50, cultivar:"00_40C", depth:50, rowSpacing:250);
            Operations 01_36C
              2005-11-27  [Chickpea].Sow(population:50, cultivar:"01_36C", depth:50, rowSpacing:250);
            Operations 01_61C
              2005-11-27  [Chickpea].Sow(population:50, cultivar:"01_61C", depth:50, rowSpacing:250);
            Operations 01_7C
              2005-11-27  [Chickpea].Sow(population:50, cultivar:"01_7C", depth:50, rowSpacing:250);
            Operations 02_03C
              2005-11-27  [Chickpea].Sow(population:50, cultivar:"02_03C", depth:50, rowSpacing:250);
            Operations 02_10C
              2005-11-27  [Chickpea].Sow(population:50, cultivar:"02_10C", depth:50, rowSpacing:250);
            Operations 02_23C
              2005-11-27  [Chickpea].Sow(population:50, cultivar:"02_23C", depth:50, rowSpacing:250);
            Operations 02_30C
              2005-11-27  [Chickpea].Sow(population:50, cultivar:"02_30C", depth:50, rowSpacing:250);
            Operations 02_35C
              2005-11-27  [Chickpea].Sow(population:50, cultivar:"02_35C", depth:50, rowSpacing:250);
            Operations Ghab5
              2005-11-27  [Chickpea].Sow(population:50, cultivar:"Ghab5", depth:50, rowSpacing:250);
            Operations Ghab4
              2005-11-27  [Chickpea].Sow(population:50, cultivar:"Ghab4", depth:50, rowSpacing:250);
            Operations 97_116C
              2005-11-27  [Chickpea].Sow(population:50, cultivar:"97_116C", depth:50, rowSpacing:250);
            Operations 97_118C
              2005-11-27  [Chickpea].Sow(population:50, cultivar:"97_118C", depth:50, rowSpacing:250);
            Operations 97_120C
              2005-11-27  [Chickpea].Sow(population:50, cultivar:"97_120C", depth:50, rowSpacing:250);
            Operations 97_219C
              2005-11-27  [Chickpea].Sow(population:50, cultivar:"97_219C", depth:50, rowSpacing:250);
            Operations 98_106C
              2005-11-27  [Chickpea].Sow(population:50, cultivar:"98_106C", depth:50, rowSpacing:250);
            Operations 98_107C
              2005-11-27  [Chickpea].Sow(population:50, cultivar:"98_107C", depth:50, rowSpacing:250);
            Operations 98_16C
              2005-11-27  [Chickpea].Sow(population:50, cultivar:"98_16C", depth:50, rowSpacing:250);
            Operations 98_55C
              2005-11-27  [Chickpea].Sow(population:50, cultivar:"98_55C", depth:50, rowSpacing:250);
            Operations 98_79C
              2005-11-27  [Chickpea].Sow(population:50, cultivar:"98_79C", depth:50, rowSpacing:250);
            Operations 99_34C
              2005-11-27  [Chickpea].Sow(population:50, cultivar:"99_34C", depth:50, rowSpacing:250);
            Operations 99_66C
              2005-11-27  [Chickpea].Sow(population:50, cultivar:"99_66C", depth:50, rowSpacing:250);
            Operations 99_73C
              2005-11-27  [Chickpea].Sow(population:50, cultivar:"99_73C", depth:50, rowSpacing:250);
        Simulation Gorgan_2005
          Weather: FileName=Gorgan.met
          Clock: Start=2005-11-01; End=2006-08-01
          Summary summaryfile
          SoilArbitrator Soil Arbitrator
          Zone Field: same as Validation.Phenology Only.Gorgan_2004.Gorgan_2004.Field
      Experiment Terbol_2004 (disabled)
        Factors
          Factor CV: Specification=[SowingRule]
            Operations Ghab3
              2004-11-21  [Chickpea].Sow(population:50, cultivar:"Ghab3", depth:50, rowSpacing:250);
            Operations 00_21C
              2004-11-21  [Chickpea].Sow(population:50, cultivar:"00_21C", depth:50, rowSpacing:250);
            Operations 00_40C
              2004-11-21  [Chickpea].Sow(population:50, cultivar:"00_40C", depth:50, rowSpacing:250);
            Operations 01_36C
              2004-11-21  [Chickpea].Sow(population:50, cultivar:"01_36C", depth:50, rowSpacing:250);
            Operations 01_61C
              2004-11-21  [Chickpea].Sow(population:50, cultivar:"01_61C", depth:50, rowSpacing:250);
            Operations 01_7C
              2004-11-21  [Chickpea].Sow(population:50, cultivar:"01_7C", depth:50, rowSpacing:250);
            Operations 02_03C
              2004-11-21  [Chickpea].Sow(population:50, cultivar:"02_03C", depth:50, rowSpacing:250);
            Operations 02_10C
              2004-11-21  [Chickpea].Sow(population:50, cultivar:"02_10C", depth:50, rowSpacing:250);
            Operations 02_23C
              2004-11-21  [Chickpea].Sow(population:50, cultivar:"02_23C", depth:50, rowSpacing:250);
            Operations 02_30C
              2004-11-21  [Chickpea].Sow(population:50, cultivar:"02_30C", depth:50, rowSpacing:250);
            Operations 02_35C
              2004-11-21  [Chickpea].Sow(population:50, cultivar:"02_35C", depth:50, rowSpacing:250);
            Operations Ghab5
              2004-11-21  [Chickpea].Sow(population:50, cultivar:"Ghab5", depth:50, rowSpacing:250);
            Operations Ghab4
              2004-11-21  [Chickpea].Sow(population:50, cultivar:"Ghab4", depth:50, rowSpacing:250);
            Operations 97_116C
              2004-11-21  [Chickpea].Sow(population:50, cultivar:"97_116C", depth:50, rowSpacing:250);
            Operations 97_118C
              2004-11-21  [Chickpea].Sow(population:50, cultivar:"97_118C", depth:50, rowSpacing:250);
            Operations 97_120C
              2004-11-21  [Chickpea].Sow(population:50, cultivar:"97_120C", depth:50, rowSpacing:250);
            Operations 97_219C
              2004-11-21  [Chickpea].Sow(population:50, cultivar:"97_219C", depth:50, rowSpacing:250);
            Operations 98_106C
              2004-11-21  [Chickpea].Sow(population:50, cultivar:"98_106C", depth:50, rowSpacing:250);
            Operations 98_107C
              2004-11-21  [Chickpea].Sow(population:50, cultivar:"98_107C", depth:50, rowSpacing:250);
            Operations 98_16C
              2004-11-21  [Chickpea].Sow(population:50, cultivar:"98_16C", depth:50, rowSpacing:250);
            Operations 98_55C
              2004-11-21  [Chickpea].Sow(population:50, cultivar:"98_55C", depth:50, rowSpacing:250);
            Operations 98_79C
              2004-11-21  [Chickpea].Sow(population:50, cultivar:"98_79C", depth:50, rowSpacing:250);
            Operations 99_34C
              2004-11-21  [Chickpea].Sow(population:50, cultivar:"99_34C", depth:50, rowSpacing:250);
            Operations 99_66C
              2004-11-21  [Chickpea].Sow(population:50, cultivar:"99_66C", depth:50, rowSpacing:250);
            Operations 99_73C
              2004-11-21  [Chickpea].Sow(population:50, cultivar:"99_73C", depth:50, rowSpacing:250);
        Simulation Terbol_2004
          Weather: FileName=Terbol.met
          Clock: Start=2004-11-01; End=2005-07-01
          Summary summaryfile
          SoilArbitrator Soil Arbitrator
          Zone Field: Area=1; Slope=0; AspectAngle=0; Altitude=50
            MicroClimate: a_interception=0; b_interception=1; c_interception=0; d_interception=0; soil_albedo=0.23; SoilHeatFluxFraction=0.4; MinimumHeightDiffForNewLayer=0; NightInterceptionFraction=0.5; ReferenceHeight=2
            Fertiliser
            SurfaceOrganicMatter: InitialResidueName=unknown; InitialResidueType=wheat; InitialResidueMass=0; InitialStandingFraction=0; InitialCPR=0; InitialCNR=10; FractionFaecesAdded=1
            Operations SowingRule
              1992-05-07  [Chickpea].Sow(population:40, cultivar:"Amethyst", depth:50, rowSpacing:150);
            Report: same as Validation.SE Queensland.Hermitage_92.Hermitage_92.Field.Report
            Report HarvestReport: EventNames=[Chickpea].Harvesting
              VariableNames:
                [Clock].Today
                [Chickpea].Phenology.CurrentStageName as Stage
                [Chickpea].Phenology.FloweringDAS as FloweringDAS
                [Chickpea].Phenology.MaturityDAS as MaturityDAS
                [Chickpea].Grain.Live.Wt as GrainWt
            Manager Harvesting: same as Validation.SE Queensland.Hermitage_92.Hermitage_92.Field.Harvesting
            Plant Chickpea: CropType=Chickpea; IsEnding=false; DaysAfterEnding=0
            Soil WI_VRLB006: SoilType=Calcic Vertisol (VRk); Country=Lebanon; Latitude=33.675; Longitude=35.842
              DataSource=Romero, C.C., Hoogenboom, G., Baigorria, G.A., Koo, J., Gijsman, A.J., Wood, S., 2012. Reanalysis of a global soil database for crop and environmental modeling. Environmental Modelling & Software 35, 163-170.  https://harvestchoice.wufoo.com/forms/download-wisol.
              Comments=You will need to add crops to this soil before running simulations.
              Physical
                Thickness  BD    AirDry  LL15   DUL    SAT
                200        1.36  0.07    0.213  0.351  0.471
                300        1.38  0.07    0.215  0.353  0.463
                600        1.4   0.07    0.215  0.353  0.457
                400        1.26  0.1     0.291  0.437  0.508
                400        1.26  0.1     0.291  0.437  0.508
                SoilCrop ChickpeaSoil: LL=[0.2, 0.23, 0.25, 0.28, 0.28]; KL=[0.06, 0.06, 0.05, 0.04, 0.04]; XF=[1, 1, 1, 1, 1]
              SoilWater: SummerDate=1-Apr; SummerU=6.86; SummerCona=3; WinterDate=1-Nov; WinterU=6.86; WinterCona=3; DiffusConst=0; DiffusSlope=0; Salb=0.13; CN2Bare=75; CNRed=0; CNCov=0; max_pond=0; Thickness=[200, 300, 600, 400, 400]; SWCON=[0.5, 0.5, 0.5, 0.5, 0.5]; PrecipitationInterception=0
              SoilNitrogen: same as Validation.SE Queensland.Lawes1995original.Lawes1995original.Field.soil.SoilNitrogen
              Organic: FOMCNRatio=40
                Thickness  Carbon  SoilCNRatio  FBiom  FInert  FOM
                200        0.33    14           0.02   0.4     258.74
                300        0.26    14           0.02   0.8     161.119
                600        0.19    14           0.01   0.99    62.4754
                800        0.19    14           0.01   0.99    17.6655
              Chemical
                Thickness  NO3N  NH4N  PH
                200        0.1   0.1   6.7
                300        0.1   0.1   6.7
                600        0.1   0.1   6.8
                400        0.1   0.1   7.5
                400        0.1   0.1   7.5
              InitialWater Initial Water: PercentMethod=0; FractionFull=1
              Sample Initial nitrogen: Thickness=[200, 300, 600, 400, 400]; SWUnits=Volumetric; OCUnits=Total; PHUnits=Water
              CERESSoilTemperature
      Experiment Terbol_2005 (disabled)
        Factors
          Factor CV: Specification=[SowingRule]
            Operations Ghab3
              2005-03-09  [Chickpea].Sow(population:50, cultivar:"Ghab3", depth:50, rowSpacing:250);
            Operations 00_21C
              2005-03-09  [Chickpea].Sow(population:50, cultivar:"00_21C", depth:50, rowSpacing:250);
            Operations 00_40C
              2005-03-09  [Chickpea].Sow(population:50, cultivar:"00_40C", depth:50, rowSpacing:250);
            Operations 01_36C
              2005-03-09  [Chickpea].Sow(population:50, cultivar:"01_36C", depth:50, rowSpacing:250);
            Operations 01_61C
              2005-03-09  [Chickpea].Sow(population:50, cultivar:"01_61C", depth:50, rowSpacing:250);
            Operations 01_7C
              2005-03-09  [Chickpea].Sow(population:50, cultivar:"01_7C", depth:50, rowSpacing:250);
            Operations 02_03C
              2005-03-09  [Chickpea].Sow(population:50, cultivar:"02_03C", depth:50, rowSpacing:250);
            Operations 02_10C
              2005-03-09  [Chickpea].Sow(population:50, cultivar:"02_10C", depth:50, rowSpacing:250);
            Operations 02_23C
              2005-03-09  [Chickpea].Sow(population:50, cultivar:"02_23C", depth:50, rowSpacing:250);
            Operations 02_30C
              2005-03-09  [Chickpea].Sow(population:50, cultivar:"02_30C", depth:50, rowSpacing:250);
            Operations 02_35C
              2005-03-09  [Chickpea].Sow(population:50, cultivar:"02_35C", depth:50, rowSpacing:250);
            Operations Ghab5
              2005-03-09  [Chickpea].Sow(population:50, cultivar:"Ghab5", depth:50, rowSpacing:250);
            Operations Ghab4
              2005-03-09  [Chickpea].Sow(population:50, cultivar:"Ghab4", depth:50, rowSpacing:250);
            Operations 97_116C
              2005-03-09  [Chickpea].Sow(population:50, cultivar:"97_116C", depth:50, rowSpacing:250);
            Operations 97_118C
              2005-03-09  [Chickpea].Sow(population:50, cultivar:"97_118C", depth:50, rowSpacing:250);
            Operations 97_120C
              2005-03-09  [Chickpea].Sow(population:50, cultivar:"97_120C", depth:50, rowSpacing:250);
            Operations 97_219C
              2005-03-09  [Chickpea].Sow(population:50, cultivar:"97_219C", depth:50, rowSpacing:250);
            Operations 98_106C
              2005-03-09  [Chickpea].Sow(population:50, cultivar:"98_106C", depth:50, rowSpacing:250);
            Operations 98_107C
              2005-03-09  [Chickpea].Sow(population:50, cultivar:"98_107C", depth:50, rowSpacing:250);
            Operations 98_16C
              2005-03-09  [Chickpea].Sow(population:50, cultivar:"98_16C", depth:50, rowSpacing:250);
            Operations 98_55C
              2005-03-09  [Chickpea].Sow(population:50, cultivar:"98_55C", depth:50, rowSpacing:250);
            Operations 98_79C
              2005-03-09  [Chickpea].Sow(population:50, cultivar:"98_79C", depth:50, rowSpacing:250);
            Operations 99_34C
              2005-03-09  [Chickpea].Sow(population:50, cultivar:"99_34C", depth:50, rowSpacing:250);
            Operations 99_66C
              2005-03-09  [Chickpea].Sow(population:50, cultivar:"99_66C", depth:50, rowSpacing:250);
            Operations 99_73C
              2005-03-09  [Chickpea].Sow(population:50, cultivar:"99_73C", depth:50, rowSpacing:250);
        Simulation Terbol_2005
          Weather: FileName=Terbol.met
          Clock: Start=2005-03-01; End=2006-09-01
          Summary summaryfile
          SoilArbitrator Soil Arbitrator
          Zone Field: same as Validation.Phenology Only.Terbol_2004.Terbol_2004.Field
      Experiment Terbol_2006 (disabled)
        Factors
          Factor CV: Specification=[SowingRule]
            Operations Ghab3
              2006-03-03  [Chickpea].Sow(population:50, cultivar:"Ghab3", depth:50, rowSpacing:250);
            Operations 00_21C
              2006-03-03  [Chickpea].Sow(population:50, cultivar:"00_21C", depth:50, rowSpacing:250);
            Operations 00_40C
              2006-03-03  [Chickpea].Sow(population:50, cultivar:"00_40C", depth:50, rowSpacing:250);
            Operations 01_36C
              2006-03-03  [Chickpea].Sow(population:50, cultivar:"01_36C", depth:50, rowSpacing:250);
            Operations 01_61C
              2006-03-03  [Chickpea].Sow(population:50, cultivar:"01_61C", depth:50, rowSpacing:250);
            Operations 01_7C
              2006-03-03  [Chickpea].Sow(population:50, cultivar:"01_7C", depth:50, rowSpacing:250);
            Operations 02_03C
              2006-03-03  [Chickpea].Sow(population:50, cultivar:"02_03C", depth:50, rowSpacing:250);
            Operations 02_10C
              2006-03-03  [Chickpea].Sow(population:50, cultivar:"02_10C", depth:50, rowSpacing:250);
            Operations 02_23C
              2006-03-03  [Chickpea].Sow(population:50, cultivar:"02_23C", depth:50, rowSpacing:250);
            Operations 02_30C
              2006-03-03  [Chickpea].Sow(population:50, cultivar:"02_30C", depth:50, rowSpacing:250);
            Operations 02_35C
              2006-03-03  [Chickpea].Sow(population:50, cultivar:"02_35C", depth:50, rowSpacing:250);
            Operations Ghab5
              2006-03-03  [Chickpea].Sow(population:50, cultivar:"Ghab5", depth:50, rowSpacing:250);
            Operations Ghab4
              2006-03-03  [Chickpea].Sow(population:50, cultivar:"Ghab4", depth:50, rowSpacing:250);
            Operations 97_116C
              2006-03-03  [Chickpea].Sow(population:50, cultivar:"97_116C", depth:50, rowSpacing:250);
            Operations 97_118C
              2006-03-03  [Chickpea].Sow(population:50, cultivar:"97_118C", depth:50, rowSpacing:250);
            Operations 97_120C
              2006-03-03  [Chickpea].Sow(population:50, cultivar:"97_120C", depth:50, rowSpacing:250);
            Operations 97_219C
              2006-03-03  [Chickpea].Sow(population:50, cultivar:"97_219C", depth:50, rowSpacing:250);
            Operations 98_106C
              2006-03-03  [Chickpea].Sow(population:50, cultivar:"98_106C", depth:50, rowSpacing:250);
            Operations 98_107C
              2006-03-03  [Chickpea].Sow(population:50, cultivar:"98_107C", depth:50, rowSpacing:250);
            Operations 98_16C
              2006-03-03  [Chickpea].Sow(population:50, cultivar:"98_16C", depth:50, rowSpacing:250);
            Operations 98_55C
              2006-03-03  [Chickpea].Sow(population:50, cultivar:"98_55C", depth:50, rowSpacing:250);
            Operations 98_79C
              2006-03-03  [Chickpea].Sow(population:50, cultivar:"98_79C", depth:50, rowSpacing:250);
            Operations 99_34C
              2006-03-03  [Chickpea].Sow(population:50, cultivar:"99_34C", depth:50, rowSpacing:250);
            Operations 99_66C
              2006-03-03  [Chickpea].Sow(population:50, cultivar:"99_66C", depth:50, rowSpacing:250);
            Operations 99_73C
              2006-03-03  [Chickpea].Sow(population:50, cultivar:"99_73C", depth:50, rowSpacing:250);
        Simulation Terbol_2006
          Weather: FileName=Terbol.met
          Clock: Start=2006-03-01; End=2006-07-20
          Summary summaryfile
          SoilArbitrator Soil Arbitrator
          Zone Field: same as Validation.Phenology Only.Terbol_2004.Terbol_2004.Field
      Experiment Elvas_2004 (disabled)
        Factors
          Factor CV: Specification=[SowingRule]
            Operations Ghab3
              2004-11-17  [Chickpea].Sow(population:50, cultivar:"Ghab3", depth:50, rowSpacing:250);
            Operations 00_21C
              2004-11-17  [Chickpea].Sow(population:50, cultivar:"00_21C", depth:50, rowSpacing:250);
            Operations 00_40C
              2004-11-17  [Chickpea].Sow(population:50, cultivar:"00_40C", depth:50, rowSpacing:250);
            Operations 01_36C
              2004-11-17  [Chickpea].Sow(population:50, cultivar:"01_36C", depth:50, rowSpacing:250);
            Operations 01_61C
              2004-11-17  [Chickpea].Sow(population:50, cultivar:"01_61C", depth:50, rowSpacing:250);
            Operations 01_7C
              2004-11-17  [Chickpea].Sow(population:50, cultivar:"01_7C", depth:50, rowSpacing:250);
            Operations 02_03C
              2004-11-17  [Chickpea].Sow(population:50, cultivar:"02_03C", depth:50, rowSpacing:250);
            Operations 02_10C
              2004-11-17  [Chickpea].Sow(population:50, cultivar:"02_10C", depth:50, rowSpacing:250);
            Operations 02_23C
              2004-11-17  [Chickpea].Sow(population:50, cultivar:"02_23C", depth:50, rowSpacing:250);
            Operations 02_30C
              2004-11-17  [Chickpea].Sow(population:50, cultivar:"02_30C", depth:50, rowSpacing:250);
            Operations 02_35C
              2004-11-17  [Chickpea].Sow(population:50, cultivar:"02_35C", depth:50, rowSpacing:250);
            Operations Ghab5
              2004-11-17  [Chickpea].Sow(population:50, cultivar:"Ghab5", depth:50, rowSpacing:250);
            Operations Ghab4
              2004-11-17  [Chickpea].Sow(population:50, cultivar:"Ghab4", depth:50, rowSpacing:250);
            Operations 97_116C
              2004-11-17  [Chickpea].Sow(population:50, cultivar:"97_116C", depth:50, rowSpacing:250);
            Operations 97_118C
              2004-11-17  [Chickpea].Sow(population:50, cultivar:"97_118C", depth:50, rowSpacing:250);
            Operations 97_120C
              2004-11-17  [Chickpea].Sow(population:50, cultivar:"97_120C", depth:50, rowSpacing:250);
            Operations 97_219C
              2004-11-17  [Chickpea].Sow(population:50, cultivar:"97_219C", depth:50, rowSpacing:250);
            Operations 98_106C
              2004-11-17  [Chickpea].Sow(population:50, cultivar:"98_106C", depth:50, rowSpacing:250);
            Operations 98_107C
              2004-11-17  [Chickpea].Sow(population:50, cultivar:"98_107C", depth:50, rowSpacing:250);
            Operations 98_16C
              2004-11-17  [Chickpea].Sow(population:50, cultivar:"98_16C", depth:50, rowSpacing:250);
            Operations 98_55C
              2004-11-17  [Chickpea].Sow(population:50, cultivar:"98_55C", depth:50, rowSpacing:250);
            Operations 98_79C
              2004-11-17  [Chickpea].Sow(population:50, cultivar:"98_79C", depth:50, rowSpacing:250);
            Operations 99_34C
              2004-11-17  [Chickpea].Sow(population:50, cultivar:"99_34C", depth:50, rowSpacing:250);
            Operations 99_66C
              2004-11-17  [Chickpea].Sow(population:50, cultivar:"99_66C", depth:50, rowSpacing:250);
            Operations 99_73C
              2004-11-17  [Chickpea].Sow(population:50, cultivar:"99_73C", depth:50, rowSpacing:250);
        Simulation Elvas_2004
          Weather: FileName=Elvas.met
          Clock: Start=2004-11-01; End=2005-09-01
          Summary summaryfile
          SoilArbitrator Soil Arbitrator
          Zone Field: Area=1; Slope=0; AspectAngle=0; Altitude=50
            MicroClimate: a_interception=0; b_interception=1; c_interception=0; d_interception=0; soil_albedo=0.23; SoilHeatFluxFraction=0.4; MinimumHeightDiffForNewLayer=0; NightInterceptionFraction=0.5; ReferenceHeight=2
            Fertiliser
            SurfaceOrganicMatter: InitialResidueName=unknown; InitialResidueType=wheat; InitialResidueMass=0; InitialStandingFraction=0; InitialCPR=0; InitialCNR=10; FractionFaecesAdded=1
            Operations SowingRule
              1992-05-07  [Chickpea].Sow(population:40, cultivar:"Amethyst", depth:50, rowSpacing:150);
            Report: same as Validation.SE Queensland.Hermitage_92.Hermitage_92.Field.Report
            Report HarvestReport: EventNames=[Chickpea].Harvesting
              VariableNames:
                [Clock].Today
                [Chickpea].Phenology.CurrentStageName as Stage
                [Chickpea].Phenology.FloweringDAS as FloweringDAS
                [Chickpea].Phenology.MaturityDAS as MaturityDAS
                [Chickpea].Grain.Live.Wt as GrainWt
            Manager Harvesting: same as Validation.SE Queensland.Hermitage_92.Hermitage_92.Field.Harvesting
            Plant Chickpea: CropType=Chickpea; IsEnding=false; DaysAfterEnding=0
            Soil WI_LVPT007: SoilType=Calcic Luvisol (LVk); Country=Portugal; Latitude=38.083; Longitude=-7.583
              DataSource=Romero, C.C., Hoogenboom, G., Baigorria, G.A., Koo, J., Gijsman, A.J., Wood, S., 2012. Reanalysis of a global soil database for crop and environmental modeling. Environmental Modelling & Software 35, 163-170.  https://harvestchoice.wufoo.com/forms/download-wisol.
              Comments=You will need to add crops to this soil before running simulations.
              Physical
                Thickness  BD    AirDry  LL15   DUL    SAT
                220        1.53  0.07    0.198  0.29   0.391
                280        1.45  0.07    0.211  0.313  0.437
                150        1.4   0.04    0.122  0.287  0.447
                50         1.4   0.04    0.122  0.287  0.447
                50         1.4   0.04    0.122  0.287  0.447
                SoilCrop ChickpeaSoil: LL=[0.2, 0.23, 0.25, 0.25, 0.25]; KL=[0.06, 0.06, 0.05, 0.05, 0.05]; XF=[1, 1, 1, 1, 1]
              SoilWater: SummerDate=1-Apr; SummerU=9.44; SummerCona=3; WinterDate=1-Nov; WinterU=9.44; WinterCona=3; DiffusConst=0; DiffusSlope=0; Salb=0.13; CN2Bare=75; CNRed=0; CNCov=0; max_pond=0; Thickness=[220, 280, 150]; SWCON=[0.5, 0.5, 0.5]; PrecipitationInterception=0
              SoilNitrogen: same as Validation.SE Queensland.Lawes1995original.Lawes1995original.Field.soil.SoilNitrogen
              Organic: FOMCNRatio=40
                Thickness  Carbon  SoilCNRatio  FBiom  FInert  FOM
                220        0.2     14           0.02   0.4     354.09
                280        0.2     14           0.02   0.8     97.246
                150        0.1     14           0.01   0.99    48.6638
              Chemical
                Thickness  NO3N  NH4N  PH
                220        0.1   0.1   8.2
                280        0.1   0.1   6.9
                150        0.1   0.1   8.6
                50         0.1   0.1   8.6
                50         1     0.2   8.6
              InitialWater Initial Water: PercentMethod=0; FractionFull=1
              Sample Initial nitrogen: Thickness=[220, 280, 150, 50]; SWUnits=Volumetric; OCUnits=Total; PHUnits=Water
              CERESSoilTemperature
      Experiment Elvas_2005 (disabled)
        Factors
          Factor CV: Specification=[SowingRule]
            Operations Ghab3
              2005-11-18  [Chickpea].Sow(population:50, cultivar:"Ghab3", depth:50, rowSpacing:250);
            Operations 00_21C
              2005-11-18  [Chickpea].Sow(population:50, cultivar:"00_21C", depth:50, rowSpacing:250);
            Operations 00_40C
              2005-11-18  [Chickpea].Sow(population:50, cultivar:"00_40C", depth:50, rowSpacing:250);
            Operations 01_36C
              2005-11-18  [Chickpea].Sow(population:50, cultivar:"01_36C", depth:50, rowSpacing:250);
            Operations 01_61C
              2005-11-18  [Chickpea].Sow(population:50, cultivar:"01_61C", depth:50, rowSpacing:250);
            Operations 01_7C
              2005-11-18  [Chickpea].Sow(population:50, cultivar:"01_7C", depth:50, rowSpacing:250);
            Operations 02_03C
              2005-11-18  [Chickpea].Sow(population:50, cultivar:"02_03C", depth:50, rowSpacing:250);
            Operations 02_10C
              2005-11-18  [Chickpea].Sow(population:50, cultivar:"02_10C", depth:50, rowSpacing:250);
            Operations 02_23C
              2005-11-18  [Chickpea].Sow(population:50, cultivar:"02_23C", depth:50, rowSpacing:250);
            Operations 02_30C
              2005-11-18  [Chickpea].Sow(population:50, cultivar:"02_30C", depth:50, rowSpacing:250);
            Operations 02_35C
              2005-11-18  [Chickpea].Sow(population:50, cultivar:"02_35C", depth:50, rowSpacing:250);
            Operations Ghab5
              2005-11-18  [Chickpea].Sow(population:50, cultivar:"Ghab5", depth:50, rowSpacing:250);
            Operations Ghab4
              2005-11-18  [Chickpea].Sow(population:50, cultivar:"Ghab4", depth:50, rowSpacing:250);
            Operations 97_116C
              2005-11-18  [Chickpea].Sow(population:50, cultivar:"97_116C", depth:50, rowSpacing:250);
            Operations 97_118C
              2005-11-18  [Chickpea].Sow(population:50, cultivar:"97_118C", depth:50, rowSpacing:250);
            Operations 97_120C
              2005-11-18  [Chickpea].Sow(population:50, cultivar:"97_120C", depth:50, rowSpacing:250);
            Operations 97_219C
              2005-11-18  [Chickpea].Sow(population:50, cultivar:"97_219C", depth:50, rowSpacing:250);
            Operations 98_106C
              2005-11-18  [Chickpea].Sow(population:50, cultivar:"98_106C", depth:50, rowSpacing:250);
            Operations 98_107C
              2005-11-18  [Chickpea].Sow(population:50, cultivar:"98_107C", depth:50, rowSpacing:250);
            Operations 98_16C
              2005-11-18  [Chickpea].Sow(population:50, cultivar:"98_16C", depth:50, rowSpacing:250);
            Operations 98_55C
              2005-11-18  [Chickpea].Sow(population:50, cultivar:"98_55C", depth:50, rowSpacing:250);
            Operations 98_79C
              2005-11-18  [Chickpea].Sow(population:50, cultivar:"98_79C", depth:50, rowSpacing:250);
            Operations 99_34C
              2005-11-18  [Chickpea].Sow(population:50, cultivar:"99_34C", depth:50, rowSpacing:250);
            Operations 99_66C
              2005-11-18  [Chickpea].Sow(population:50, cultivar:"99_66C", depth:50, rowSpacing:250);
            Operations 99_73C
              2005-11-18  [Chickpea].Sow(population:50, cultivar:"99_73C", depth:50, rowSpacing:250);
        Simulation Elvas_2005
          Weather: FileName=Elvas.met
          Clock: Start=2005-11-01; End=2006-08-01
          Summary summaryfile
          SoilArbitrator Soil Arbitrator
          Zone Field: same as Validation.Phenology Only.Elvas_2004.Elvas_2004.Field
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