Simulations: Version=216
  Memo TitlePage
    # The APSIM Cotton Model

    The APSIM Cotton model has been developed using the Plant Modelling Framework (PMF) of [#brown_plant_2014]. This new framework provides a library of plant organ and process submodels that can be coupled, at runtime, to construct a model in much the same way that models can be coupled to construct a simulation. This means that dynamic composition of lower level process and organ classes (e.g. photosynthesis, leaf) into larger constructions (e.g. maize, wheat, sorghum) can be achieved by the model developer without additional coding.

    The model consists of:

    * a phenology model to simulate development between growth phases
    * a collection of organs to simulate the various plant parts
    * an arbitrator to allocate resources (N, biomass) to the various plant organs
  DataStore
    ExcelInput Observed: SheetNames=[CottonObserved, PhenologyObserved]
      FileNames=[Observed/ForestHillObserved.xlsx, Observed/Narrabri0607Observed.xlsx, Observed/Narrabri0203Observed.xlsx, Observed/BDKObserved.xlsx, Observed/WarraObserved.xlsx, Observed/Narrabri23.xlsx, Observed/DouglasDaly2021.xlsx, Observed/DouglasDaly21Observed_20251202.xlsx, Observed/Emerald2015Observed.xlsx]
    PredictedObserved: PredictedTableName=DailyReport; ObservedTableName=CottonObserved; FieldNameUsedForMatch=SimulationName; FieldName2UsedForMatch=Clock.Today; AllColumns=true
      Tests: POName=PredictedObserved
        AcceptedStats:
          Name                            n    Slope      Intercept   SEslope    SEintercept  R2         RMSE       NSE       ME          MAE        RSR       RMR
          Cotton.AboveGround.N            2    -0.121622  20.3491     0          0            1          1.1788     -10.1905  1.11056     1.11056    2.36543   0.068725
          Cotton.AboveGround.Wt           123  0.910167   85.228      0.0335653  27.7988      0.858694   187.721    0.852955  25.2167     124.646    0.381903  0.281005
          Cotton.Boll.BurFraction         8    1.39873    -0.0535689  0.247317   0.0873397    0.842047   0.131292   0.229194  0.0739937   0.089634   0.821252  0.410385
          Cotton.Boll.HarvestIndex        111  0.616272   0.0533763   0.035543   0.0133341    0.733909   0.134511   0.637263  -0.062291   0.10712    0.599557  0.446243
          Cotton.Boll.LintFraction        2    -4.11755   1.88268     0          0            1          0.0149924  -898.091  0.0147725   0.0147725  21.2025   0.0410751
          Cotton.Boll.N                   5    0.196513   0.319214    0.76499    0.983699     0.0215229  0.764267   -14.3739  -0.70205    0.70205    3.50701   0.601293
          Cotton.Boll.NConc               2    0          0.0182603   0          0            -          0.013379   -1198.81  -0.0133735  0.0133735  24.493    0.422935
          Cotton.Boll.SeedCottonFraction  8    1.39873    -0.34516    0.247317   0.172213     0.842047   0.131292   0.229194  -0.0739937  0.089634   0.821252  0.193054
          Cotton.Boll.SeedFraction        2    -13.5755   6.18459     0          0            1          0.0795601  -357.832  -0.0508159  0.0612172  13.3946   0.185975
          Cotton.Boll.Wt                  110  0.673274   44.6033     0.0355056  15.5824      0.769021   163.832    0.724777  -56.145     104.086    0.522227  0.531304
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        AcceptedStatsName=Name n Slope Intercept SEslope SEintercept R2 RMSE NSE ME MAE RSR RMR
    PredictedObserved PredictedObservedPhenology: PredictedTableName=HarvestReport; ObservedTableName=PhenologyObserved; FieldNameUsedForMatch=SimulationName; AllColumns=false
    PredictedObserved PredictedObservedHarvest: PredictedTableName=HarvestReport; ObservedTableName=CottonObserved; FieldNameUsedForMatch=SimulationName; FieldName2UsedForMatch=Cotton.Phenology.CurrentStageName; AllColumns=true
    PredictedObserved PredictedObservedSoil: PredictedTableName=SoilReport; ObservedTableName=CottonObserved; FieldNameUsedForMatch=SimulationName; FieldName2UsedForMatch=Clock.Today; AllColumns=true
  Folder Replacements
    Report DailyReport: EventNames=[Clock].DoReport
      VariableNames:
        //[MaturingAverageLong]
        //[MaturingAverageShort]
        //[Cotton].DaysAfterSowing
        [Clock].Today
        [Clock].Today.DayOfYear
        [Weather].Rain
        [Weather].MeanT
        [Weather].MaxT
        [Weather].MinT
        [Weather].Radn
        [Weather].VPD
        [Weather].CO2
        [Cotton].AvRadn
        //[Cotton].Leaf.WaterStressFunction.RootWaterTension
        [Boll].LintFraction + [Boll].SeedFraction + [Boll].BurFraction as SumOfBollFractions
        [Boll].PotentialHarvestIndex
        [Bur].HarvestIndex
        [Bur].PotentialHarvestIndex
        [Lint].HarvestIndex
        [Lint].PotentialHarvestIndex
        [Seed].HarvestIndex
        [Seed].PotentialHarvestIndex
        [Bur].HarvestIndex + [Lint].HarvestIndex + [Seed].HarvestIndex as BollHI
        [Bur].PotentialHarvestIndex + [Lint].PotentialHarvestIndex + [Seed].PotentialHarvestIndex as BollPotHI
        [Boll].HarvestIndex
        [Boll].PotentialHarvestIndex
        [Phenology].Germinating.ProgressThroughPhase
        [Phenology].Germinating.FractionComplete
        [Phenology].Emerging.ProgressThroughPhase
        [Phenology].Emerging.FractionComplete
        [Phenology].Vegetative.ProgressThroughPhase
        [Phenology].Vegetative.FractionComplete
        [Phenology].Squaring.ProgressThroughPhase
        [Phenology].Squaring.FractionComplete
        [Phenology].EarlyFlowering.ProgressThroughPhase
        [Phenology].EarlyFlowering.FractionComplete
        [Phenology].Maturing.ProgressThroughPhase
        [Phenology].Maturing.FractionComplete
        [Phenology].Ripening.ProgressThroughPhase
        [Phenology].Ripening.FractionComplete
        [Arbitrator].TotalDMFixationSupply
        [Cotton].DaysAfterSowing
        [Cotton].Arbitrator.DM.TotalPlantDemand
        [Cotton].Arbitrator.DM.TotalFixationSupply
        [Cotton].Arbitrator.TotalDMFixationSupply
        [Cotton].Arbitrator.N.TotalFixationSupply
        [Cotton].Arbitrator.N.TotalPlantDemand
        [Cotton].Arbitrator.N.TotalPlantSupply
        sum([Cotton].Arbitrator.N.Fixation) as NFixed
        //(ln([Cotton].WholePlantGrowthRate)) as RGR
        //[Soil].Temperature
        [Cotton].Leaf.Photosynthesis.RueAct
        [Cotton].Leaf.Photosynthesis.RueReductionFactor
        [Cotton].Total.GrowthRate
        [Cotton].AboveGround.GrowthRate
        [Cotton].Boll.PotentialGrowthRate
        [Cotton].NitrogenUptake
        [Cotton].Phenology.Stage
        [Cotton].Phenology.ThermalTime
        [Cotton].Phenology.AccumulatedTT
        [Cotton].Phenology.CurrentStageName
        [Cotton].Phenology.Photoperiod
        [Cotton].Phenology.EmergenceDAS
        [Cotton].Phenology.SquaringDAS
        [Cotton].Phenology.FloweringDAS
        [Cotton].Phenology.CutoutDAS
        //[Cotton].Phenology.OpenbollsDAS
        [Cotton].Phenology.MaturityDAS
        //[Cotton].Phenology.EarlyFlowering.BollRatio
        [Cotton].Phenology.EarlyFlowering.FractionComplete
        [Cotton].AboveGround.Wt
        [Cotton].AboveGround.N
        [Cotton].AboveGroundLive.Wt
        [Cotton].Boll.NConc
        [Cotton].Leaf.NodeNumber
        [Cotton].Leaf.Fw
        [Cotton].Leaf.Fn
        [Cotton].Leaf.Photosynthesis.FT
        [Cotton].Leaf.Photosynthesis.FVPD
        [Cotton].Leaf.LAI
        [Cotton].Leaf.HeightFunction
        [Cotton].Leaf.Height
        [Cotton].Leaf.CoverGreen
        [Cotton].Leaf.CoverTotal
        [Cotton].Leaf.Live.Wt
        [Cotton].Leaf.Live.StructuralWt
        [Cotton].Leaf.Live.MetabolicWt
        [Cotton].Leaf.Allocated.MetabolicWt
        [Cotton].Leaf.Allocated.StructuralWt
        [Cotton].Leaf.DMDemand.Total
        [Cotton].Leaf.Dead.StructuralWt
        [Cotton].Leaf.Dead.MetabolicWt
        [Cotton].Leaf.Live.N
        [Cotton].Leaf.Live.NConc
        [Cotton].Leaf.Dead.Wt
        [Cotton].Leaf.Dead.N
        [Cotton].Leaf.Dead.NConc
        [Cotton].Leaf.RadiationIntercepted
        [Cotton].Leaf.Wt
        [Cotton].Leaf.NConc
        [Cotton].Leaf.N
        [Cotton].Leaf.Senesced.Wt
        [Cotton].Leaf.BranchNumber
        [Cotton].Leaf.SpecificAreaCanopy
        [Cotton].Leaf.Sites
        [Cotton].Leaf.SpecificArea
        [Cotton].Leaf.CoverTotal
        [Cotton].Leaf.Transpiration
        [Cotton].Leaf.WaterDemand
        [Cotton].Stem.Wt
        [Cotton].Stem.Total.StructuralWt
        [Cotton].Stem.Live.StructuralWt
        [Cotton].Stem.Live.StructuralN
        [Cotton].Stem.N
        [Cotton].Stem.NConc
        [Cotton].Lint.Wt
        [Cotton].Lint.N
        [Cotton].Lint.NConc
        [Cotton].Lint.Bales as Bales
        [Cotton].Lint.Allocated.Wt
        [Cotton].Bur.HarvestIndex
        [Cotton].Bur.PotentialHarvestIndex
        [Cotton].Lint.HarvestIndex
        [Cotton].Lint.PotentialHarvestIndex
        [Cotton].Seed.HarvestIndex
        [Cotton].Seed.PotentialHarvestIndex
        [Cotton].Lint.DMDemand.Total
        [Cotton].Leaf.DMDemand.Total
        [Cotton].Bur.DMDemand.Total
        [Cotton].Seed.DMDemand.Total
        [Cotton].Stem.DMDemand.Total
        ([Cotton].Bur.DMDemand.Total+[Cotton].Lint.DMDemand.Total+[Cotton].Seed.DMDemand.Total) as BollDemand
        ([Cotton].Stem.DMDemand.Total+[Cotton].Leaf.DMDemand.Total) as VegetativeDemand
        //([Cotton].Stem.DMDemand.Total+[Cotton].Leaf.DMDemand.Total+[Cotton].Lint.DMDemand.Total+[Cotton].Seed.DMDemand.Total+[Cotton].Bur.DMDemand.Total) as ShootDMDemand
        ([Cotton].Stem.DMDemand.Total+[Cotton].Leaf.DMDemand.Total+[Cotton].Root.DMDemand.Total) as ShootDMDemand
        [Cotton].Root.DMDemand.Total
        [Cotton].Lint.NDemand.Total
        [Cotton].Leaf.NDemand.Total
        [Cotton].Stem.NDemand.Total
        [Cotton].Root.NDemand.Total
        [Cotton].Root.NUptake
        [Cotton].Lint.LiveFWt
        [Cotton].Root.Wt
        [Cotton].Root.Depth
        //[Soil].Water.Volumetric
        //([Soil].Water.PAWmm[1]+[Soil].Water.PAWmm[2]+[Soil].Water.PAWmm[3]+[Soil].Water.PAWmm[4]+[Soil].Water.PAWmm[5]+[Soil].Water.PAWmm[6]) as ESW1800
        //sum([Soil].Water.Volumetric) as TotalSWC
        //sum([Soil].Water.MM) as TotalWaterMM
        //([Soil].Water.MM[1]+[Soil].Water.MM[2]+[Soil].Water.MM[3]+[Soil].Water.MM[4]+[Soil].Water.MM[5]+[Soil].Water.MM[6]+[Soil].Water.MM[7]) as SW1500mm
        //([Soil].Water.MM[1]+[Soil].Water.MM[2]+[Soil].Water.MM[3]+[Soil].Water.MM[4]+[Soil].Water.MM[5]+[Soil].Water.MM[6]) as SW1800mm
        //([Soil].Water.MM[1]+[Soil].Water.MM[2]+[Soil].Water.MM[3]+[Soil].Water.MM[4]+[Soil].Water.MM[5]) as SW1200mm
        //(sum([CottonSoil].PAWmm)/sum([CottonSoil].PAWCmm)) as AvailableSoilMoisture
        //([CottonSoil].PAWmm[1]+[CottonSoil].PAWmm[2]+[CottonSoil].PAWmm[3]+[CottonSoil].PAWmm[4]+[CottonSoil].PAWmm[5]) as PAWTop5Layers
        //-(([CottonSoil].PAWCmm[1]+[CottonSoil].PAWCmm[2]+[CottonSoil].PAWCmm[3]+[CottonSoil].PAWCmm[4]+[CottonSoil].PAWCmm[5])-([CottonSoil].PAWmm[1]+[CottonSoil].PAWmm[2]+[CottonSoil].PAWmm[3]+[CottonSoil].PAWmm[4]+[CottonSoil].PAWmm[5])) as SoilWaterDeficit120
        [Irrigation].IrrigationApplied
        [Cotton].Boll.Wt
        [Cotton].Lint.Wt
        [Cotton].Seed.Wt
        [Cotton].Seed.N
        [Cotton].Seed.NConc
        ([Cotton].Seed.Wt+[Cotton].Lint.Wt) as SeedLint
        [Cotton].Bur.Wt
        //sum([Soil].Water.MM) as TotalSWmm
        //[Soil].Water.MM
        //([Soil].Water.MM[1]+[Soil].Water.MM[2]+[Soil].Water.MM[3]+[Soil].Water.MM[4]+[Soil].Water.MM[5]+[Soil].Water.MM[6]) as SWmm1800
        //[Soil].Water.PAWmm[1] as ESW1
        //[Soil].Water.PAWmm[2] as ESW2
        //[Soil].Water.PAWmm[3] as ESW3
        //[Soil].Water.PAWmm[4] as ESW4
        //[Soil].Water.PAWmm[5] as ESW5
        //[Soil].Water.PAWmm[6] as ESW6
        //[Soil].Water.PAWmm[7] as ESW7
        //[Soil].Water.PAWmm[1] as PAW1
        [Cotton].Arbitrator.SDRatio
        [Cotton].Arbitrator.SDRatioBound
        sum([Soil].NO3.kgha) as TotalSoilNO3
        sum([Soil]..NH4.kgha) as TotalSoilNH4
        sum([Soil].Water.MM) as TotalSW
        sum([Soil].NH4.ppm) as NH4
        [Soil].NO3.ppm
        [Soil].NO3.kgha
        [Fertiliser].NitrogenApplied
        [Cotton].Leaf.Photosynthesis.RUE
        [Cotton].Boll.N
        [Cotton].Leaf.N
        [Cotton].Stem.N
        [Cotton].Bur.N
        [Cotton].Bur.NConc
        //[FurrowIrrigation].Script.crit_fr_asw as CRITFRASW
        //[FurrowIrrigation].Script.asw_depth as ASWDEPTH
        //[FurrowIrrigation].Script.applied_furrow_irrigation as FURROW_APPLIED
        [Irrigation].IrrigationApplied
        [Cotton].Boll.HarvestIndex
        [Soil].Organic.Carbon
        [Phenology].CurrentPhaseName
        [Arbitrator].TotalDMFixationSupply
        //[Phenology].BollPeriod
        //[Phenology].BollFilling.Target
        [Cotton].Total.GrowthRate
        [Cotton].AboveGround.GrowthRate
        [Cotton].Boll.PotentialGrowthRate
        [Cotton].Root.NUptake
        [Cotton].Total.N
        ([Soil].Water.MM[1]+[Soil].Water.MM[2]+[Soil].Water.MM[3]) as KRS_SW_Layer1
        [Cotton].Leaf.Photosynthesis.RadnInt
        ([Cotton].Leaf.NConc/[Cotton].Leaf.SpecificArea) as SLN
        [Cotton].Leaf.RadiationIntercepted
        [MicroClimate].RadiationInterception
        [Weather].DiffuseFraction
        //[Cotton].Leaf.Plastochron
        ([Cotton].Leaf.FinalLeafNumber*[Cotton].SowingData.Population) as LeafNumber
        [Cotton].Leaf.FirstFruitingBranch
        [Cotton].Leaf.TotalNumber
        ([Weather].Radn / [Weather].MeanT) as MJperC
        [Nutrient].Microbial.N
        //([SurfaceOrganicMatter].C / [SurfaceOrganicMatter].N) as SOMcnr
        [SurfaceOrganicMatter].Wt
        [Cotton].Boll.BurFraction
        [Cotton].Boll.LintFraction
        [Cotton].Boll.SeedFraction
        [Cotton].Boll.SeedCottonFraction
        [Cotton].Phenology.Maturing.Progression
        [Cotton].Phenology.Maturing.ProgressThroughPhase
        [Cotton].Phenology.Maturing.Target
        [Cotton].Phenology.EarlyFlowering.Progression
        [Cotton].Phenology.EarlyFlowering.ProgressThroughPhase
        [Cotton].Phenology.EarlyFlowering.Target
        [Root].AirFilledPoreSpace
        //[Root].SWAvailabilityRatio
        [Phenology].EarlyFlowering.Progression.BollModifier.AddFunction.MultiplyFunction.BollRatioSensitivity.BollRatio as BollRatio
        [Cotton].Leaf.DMDemands.Structural.DeltaLAIPotential.ReproductiveStage.Delta.SympodialLeaves.EmergingLeaves as EmergingLeaves
        [Cotton].AccumulateRadnDef
    Report HarvestReport: EventNames=[Cotton].Harvesting
      VariableNames:
        [Clock].Today
        [Cotton].Phenology.CurrentStageName
        [Cotton].Phenology.EmergenceDAS
        [Cotton].Phenology.SquaringDAS
        [Cotton].Phenology.FloweringDAS
        [Cotton].Phenology.CutoutDAS
        //[Cotton].Phenology.OpenbollsDAS
        [Cotton].Phenology.MaturityDAS
        [Cotton].AboveGround.Wt
        [Cotton].Boll.Wt
    Plant Cotton: PlantType=Soybean
      OrganArbitrator Arbitrator
        BiomassTypeArbitrator DMArbitration
          Folder PotentialPartitioningMethods
            ReallocationMethod
            AllocateFixationMethod
            RetranslocationMethod
            SendPotentialDMAllocationsMethod
          Folder AllocationMethods
            NutrientConstrainedAllocationMethod
            DryMatterAllocationsMethod
          RelativeAllocation ArbitrationMethod
        BiomassTypeArbitrator NArbitration
          Folder PotentialPartitioningMethods
            ReallocationMethod
          Folder ActualPartitioningMethods
            AllocateFixationMethod
            RetranslocationMethod
          Folder AllocationMethods
            NitrogenAllocationsMethod
          RelativeAllocation ArbitrationMethod
          AllocateUptakesMethod
        NitrogenUptakeMethod
        C4WaterUptakeMethod WaterUptakeMethod
          Memo
            Taken from Sorghum model
        VariableReference SDRatio: VariableName=[Arbitrator].WaterUptakeMethod.SDRatio
        VariableReference WDemand: VariableName=[Arbitrator].WaterUptakeMethod.WDemand
        VariableReference WSupply: VariableName=[Arbitrator].WaterUptakeMethod.WSupply
        VariableReference WAllocated: VariableName=[Arbitrator].WaterUptakeMethod.WAllocated
        VariableReference WatSupply: VariableName=[Arbitrator].WaterUptakeMethod.WatSupply
        BoundFunction SDRatioBound
          VariableReference SDRatio: VariableName=[Arbitrator].WaterUptakeMethod.SDRatio
          Constant Lower: FixedValue=0
          Constant Upper: FixedValue=1.5
      Phenology
        SubDailyInterpolation PreemergentThermalTime: agregationMethod=0
          Memo
            7/11/2023: Add stress factor to phenology based on temperature? See .Simulations.Canola Example.Zone.Canola.Phenology.EarlyPodDevelopment.Stress

            So, make the model work for NAR0607Ir80, and add stress to make it work for DDRF21RS1000

            7/11/2023: other examples:

            X|Y
            -|-
            15.6|0
            32|16.4
            45|0   (or 43, 40?)

            X|Y
            -|-
            15.6|0
            32|16.4
            35|16.4
            45|0

            7/11/2023: Luo, Bange, Clancy 2014: Tmax 35oC --> heat stress

            ===================================================================================

            See Bange et al., 2002: Approach two DD calculation where Tmax <35oC and Tmx >=35oC

            On 4/07/2023:

            X|Y
            -|-
            15.6|0
            32|16.4
            43|16.4
            45|0

            Base temperature of 15.6 oC and optimum temperature of 32 oC taken from:

            * *Bange, M. et al., 2022. Improving temperature‐based predictions of the timing of flowering in cotton. Agron. J., 114(5): 2728-2742.*

            U.S. Approach with:

            Squaring target - 343 DD (from planting)

            Flowering target - 584 DD (from planting)
          XYPairs Response: X=[12, 30, 42]; Y=[0, 18, 0]
          ThreeHourAirTemperature InterpolationMethod
        SubDailyInterpolation ThermalTime: agregationMethod=0
          Memo: same as Replacements.Cotton.Phenology.PreemergentThermalTime.Memo
          XYPairs Response: X=[15.6, 32, 39]; Y=[0, 16.4, 0]
          ThreeHourAirTemperature InterpolationMethod
        PhotoperiodFunction Photoperiod: Twilight=0; DayLength=0
        GerminatingPhase Germinating: Start=Sowing; End=Germination; IsEmerged=false
          Constant MinSoilTemperature: FixedValue=12
        EmergingPhase Emerging: Start=Germination; End=Emergence; IsEmerged=true; TTForTimeStep=0
          Memo
            Emergence = 80 degree days with base temp 12
          VariableReference ThermalTime: VariableName=[Phenology].PreemergentThermalTime
          AddFunction Target
            Constant ShootLag: FixedValue=40
            MultiplyFunction DepthxRate
              VariableReference SowingDepth: VariableName=[Plant].SowingData.Depth
              Constant ShootRate: FixedValue=0.6
        GenericPhase Vegetative: Start=Emergence; End=StartSquaring; IsEmerged=true
          SubtractFunction Target
            Constant SquaringTT: FixedValue=343
            VariableReference Emerging: VariableName=[Phenology].Emerging.Target
          VariableReference Progression: VariableName=[Phenology].ThermalTime
        GenericPhase Squaring: Start=StartSquaring; End=StartFlowering; IsEmerged=true
          SubtractFunction Target
            Constant FloweringTT: FixedValue=584
            VariableReference Emerging: VariableName=[Phenology].Emerging.Target
            VariableReference PreSquaring: VariableName=[Phenology].Vegetative.Target
          VariableReference Progression: VariableName=[Phenology].ThermalTime
        GenericPhase EarlyFlowering: Start=StartFlowering; End=Cutout; IsEmerged=true
          Memo
            8/11/2023 - Concept: **Bange, M. P., & Milroy, S. P. (2004). Growth and dry matter partitioning of diverse cotton genotypes. Field Crops Research, 87(1), 73-87. https://doi.org/10.1016/j.fcr.2003.09.007**

            Add (water)stress effect in cases where severe water deficit cutout reached earlier. See Hearn, 1969 paper where when 2/3 water supply depleted --> node production halts and plant shifts into cutout.

            From PhD Warren Conaty:

            Water stress also alters the time taken for a boll to reach maturity. Water deficits result in the hastening of maturity, whilst excessive soil water tends to slow maturity (Hearn, 1994; Hearn, 1979; Marani and Amirav, 1971b; Marani and Amirav, 1971a). This occurs as a result of the inherent plant water relations fixed within commercial cotton cultivars derived from its wild xerophytic ancestors. As a result, when two thirds of the soil water is used, vegetative growth ceases, boll setting and square production cease and the retained bolls mature. Boll setting and square production can resume, if conditions are favourable, when mature bolls open, leading to a second fruiting flush (Hearn, 1979).
          Constant Target: FixedValue=250
          MultiplyFunction Progression
            VariableReference ThermalTime: VariableName=[Phenology].ThermalTime
            BoundFunction BollModifier
              VariableReference Lower: VariableName=[Phenology].EarlyFlowering.BollModifierBase
              Constant Upper: FixedValue=10
              AddFunction
                VariableReference BollModifierBase: VariableName=[Phenology].EarlyFlowering.BollModifierBase
                MultiplyFunction
                  SubtractFunction BollRatioSensitivity
                    VariableReference BollRatio: VariableName=[Boll].BollRatio
                    DivideFunction
                      VariableReference BollModifierBase: VariableName=[Phenology].EarlyFlowering.BollModifierBase
                      Constant Two: FixedValue=2
                  VariableReference BollModifierMultiplier: VariableName=[Phenology].EarlyFlowering.BollModifierMultiplier
          Constant BollModifierBase: FixedValue=0.3
          Constant BollModifierMultiplier: FixedValue=3
        GenericPhase Maturing: Start=Cutout; End=Maturity; IsEmerged=true
          Memo
            15/09/2025: TOTAL GROWTH RATE, NOT BOLL GROWTH RATE

            ======================================================

            8/11/2023 - Concept: **Bange, M. P., & Milroy, S. P. (2004). Growth and dry matter partitioning of diverse cotton genotypes. Field Crops Research, 87(1), 73-87. https://doi.org/10.1016/j.fcr.2003.09.007**

            Add (water)stress effect in cases where severe water deficit cutout reached earlier. See Hearn, 1969 paper where when 2/3 water supply depleted --> node production halts and plant shifts into cutout.

            From PhD Warren Conaty:

            Water stress also alters the time taken for a boll to reach maturity. Water deficits result in the hastening of maturity, whilst excessive soil water tends to slow maturity (Hearn, 1994; Hearn, 1979; Marani and Amirav, 1971b; Marani and Amirav, 1971a). This occurs as a result of the inherent plant water relations fixed within commercial cotton cultivars derived from its wild xerophytic ancestors. As a result, when two thirds of the soil water is used, vegetative growth ceases, boll setting and square production cease and the retained bolls mature. Boll setting and square production can resume, if conditions are favourable, when mature bolls open, leading to a second fruiting flush (Hearn, 1979).
          Constant Target: FixedValue=300
          MultiplyFunction Progression
            VariableReference ThermalTime: VariableName=[Phenology].ThermalTime
            LinearInterpolationFunction
              XYPairs: X=[-120, -80, -60, -20]; Y=[0.4, 0.9, 0.9, 0.6]
              SubtractFunction XValue
                MovingAverageFunction MaturingAverageLong: NumberOfDays=21; StageToStartMovingAverage=Cutout
                  VariableReference Integral: VariableName=[Boll].Wt
                MovingAverageFunction MaturingAverageShort: NumberOfDays=3; StageToStartMovingAverage=Cutout
                  VariableReference Integral: VariableName=[Boll].Wt
        GenericPhase Ripening: Start=Maturity; End=HarvestRipe; IsEmerged=true
          Constant Target: FixedValue=50
          VariableReference Progression: VariableName=[Phenology].ThermalTime
        EndPhase ReadyForHarvesting: Start=HarvestRipe; End=Unused; IsEmerged=true
          VariableReference ThermalTime: VariableName=[Phenology].ThermalTime
        OnEventFunction EmergenceDAS: SetEvent=Emergence; ReSetEvent=never
          Memo
            A function is used to provide emergence date as days after sowing(DAS).
          Constant PreEventValue: FixedValue=0
          VariableReference PostEventValue: VariableName=[Plant].DaysAfterSowing
        OnEventFunction SquaringDAS: SetEvent=StartSquaring; ReSetEvent=never
          Memo
            A function is used to provide squaring date as days after sowing(DAS).
          Constant PreEventValue: FixedValue=0
          VariableReference PostEventValue: VariableName=[Plant].DaysAfterSowing
        OnEventFunction FloweringDAS: SetEvent=StartFlowering; ReSetEvent=never
          Memo
            A function is used to provide flowering date as days after sowing(DAS).
          Constant PreEventValue: FixedValue=0
          VariableReference PostEventValue: VariableName=[Plant].DaysAfterSowing
        OnEventFunction CutoutDAS: SetEvent=Cutout; ReSetEvent=never
          Memo
            A function is used to provide emergence date as days after sowing(DAS).
          Constant PreEventValue: FixedValue=0
          VariableReference PostEventValue: VariableName=[Plant].DaysAfterSowing
        OnEventFunction MaturityDAS: SetEvent=Maturity; ReSetEvent=never
          Memo
            A function is used to provide maturity date as days after sowing(DAS).
          Constant PreEventValue: FixedValue=0
          VariableReference PostEventValue: VariableName=[Plant].DaysAfterSowing
      SimpleLeaf Leaf: Albedo=0.25; Gsmax350=0.011; R50=150; LeafInitialisationStage=Emergence; Height=0; BaseHeight=0; Width=0; FRGR=0; PotentialEP=0; WaterDemand=0; KDead=0.2; LAIDead=0
        RUEModel Photosynthesis
          Constant RUE: FixedValue=1.5
            Memo
              15/12/2023 - **For dynamic RUE** see:

              Yin, X., Struik, P. C., & Goudriaan, J. (2021). On the needs for combining physiological principles and mathematics to improve crop models. Field Crops Research, 271. https://doi.org/10.1016/j.fcr.2021.108254

              ================================================================================================================================================

              Variation in Crop Radiation-Use Efficiency with Increased Diffuse Radiation. Published in Crop Sci. 32:1281-1284 (1992). Sinclair et al.
              --> use of diffuse radiation to determine RUE

              ================================================================================================================================================

              FROM:

              Chapter 22. CottonJ. Snider, M. Bange and J. HeitholtIn: Crop Physiology. Case Histories for Major Crops, edited by V. O. Sadras and D. F. Calderini2021

              "To encapsulate effects of changes in canopy radiation interception and/or changes in canopy photosynthesis, physiological frameworks have been developed to scale from leaf to canopy (Sinclair and Horie, 1989; Hammer and Wright 1994). With this framework, Sadras (1996) explained ontogenetic changes in cotton RUE, and Milroy and Bange (2003) explored the effects of average canopy specific leaf nitrogen (SLN g N m− 2), vertical N gradients (SLNgrad), extinction coefficient k and LAI. Sensitivity analyses indicated that RUE is responsive to SLNgrad and to a lesser extent, k (Fig. 22.7). Although the importance of these traits has been demonstrated in other crops, it has also been shown that they are of most significance at high LAI (Hirose and Werger, 1987). When the impact of SLNgrad on RUE was tested at different LAI, no impact was evident at low LAI, but a large impact was evident at LAI of 5. Although LAI of this magnitude can occur in cotton crops, lower LAI are more common with critical LAI being approximately 3 (Section 2.1.2). Thus the central finding is that there appears to be little impact of the ontogenetic changes in k and SLNgrad on the variation in RUE of cotton. For crop simulation purposes, this simplifies the process of adjusting RUE."

              See also:

              Nitrogen and Light Responses of Cotton Photosynthesis and Implications for Crop GrowthS. P. Milroy and M. P. BangeCrop Science 2003 Vol. 43 Pages 904-913

              =================================================================================================================================================================

              Radiation Use EfficiencyT. R. Sinclair and R. C. MuchowIn: Advances in Agronomy Volume 651999 DOI 10.1016/s0065-2113(08)60914-1

              =================================================================================================================================================================

              **13/07/2023**

              RUE has been shown both experimentally and theoretically to be increased by decreased irradiance and by increased fractions of diffuse radiation. On the other hand, there is little evidence to show that VPD greatly influences RUE.

              Occam's Razor, radiation-use efficiency, and vapor pressure deficit

              T.R. Sinclair, R.C. Muchow

              **13/07/2023**

              Changed XY from:

              X|Y
              -|-
              5|1.52
              40|0.55

              to

              X|Y
              -|-
              5|2
              40|0.5

              2.5 and 1 works also, more in line with publication Gonias & Oosterhuis 2012 (Figure 4)

              **--> THIS SEEMS TO WORK WELL, ESPECIALLY FOR DDRF ROW SPACING**

              ========================================================================================================

              RUE as function of VDP:

              **Gonias, E.D., Oosterhuis, D.M., Bibi, A.C. and Roberts, B.A., 2012. Radiation Use Efficiency of Cotton in Contrasting Environments. American Journal of Plant Sciences, 3: 649-654.*

              The higher productivity observed in California can be attributed to larger amounts of incident and intercepted radiation in this location. Radiation use efficiency of cotton was estimated to decrease with increasing vapor pressure deficit by a slope of –0.47 g·MJ–1·kPa–1. (this is in PAR, so divide by 2):

              **y=-0.4628x + 2.7767**

              VPD|RUE
              -|-
              5|1.27
              40|0.46

              --> ADD 20% FOR ROOT BIOMASS --> X=5,40; Y=1.52,0.55

              =====================================================

              FROM:

              Cotton photosynthetic productivity enhancement through uniform row-spacing with optimal plant density in Xinjiang, China

              Liting Hu1,# Xuebiao Pan1 XiaochenWang1 Qi Hu1 XiangruWang2 Hengheng Zhang2 Qingwu Xue3 Meizhen Song2

              Crop Science. 2021;61:2745–2758.

              Plant density (/m2) | RUE
              --------------------|-----
              5| 1.2
              25| 2.5

              Relationship between Ground Cover and RUE? Ground cover is related to LAI, where LAI=3 = Groundcover 1.0

              The impact of plant density and spatial arrangement on light interception on cotton crop and seed cotton yield: an overview

              CHAPEPA et al. Journal of Cotton Research (2020) 3:18 Journal of Cotton Research

              https://doi.org/10.1186/s42397-020-00059-z

              Need to distinguish between normal and okra sized leaves

              The maximum reported RUE for cotton is similar to other C3 species (peanut and soybean) reported in Sinclair
              and Muchow (1999).

              Values for RUE:

              **TABLE 22.1**

              * *Snider, J., Bange, M. and Heitholt, J., 2021. Chapter 22. Cotton. In: V.O. Sadras and D.F. Calderini (Editors), Crop Physiology. Case Histories for Major Crops, pp. 715-746.*

              Cotton root system may constitute 20-25% of the crop dry matter increase for part of the season:
              * *Bland, W.L. and Dugas, W.A., 1989. Cotton Root Growth and Soil Water Extraction. Soil Sci. Soc. Am. J., 53: 1850-1855.*
          MinimumFunction FT
            WeightedTemperatureFunction FTav: MaximumTemperatureWeighting=0.5
              Memo
                X|Y
                -|-
                8|0
                25|1
                35|1
                45|0

                Change to:

                X|Y
                -|-
                10|0
                23.5|1
                32|1
                45|0

                ============================

                SEE PHD CONATY

                ============================

                Base temp of 10 oC from:

                Snider, J.L. et al., 2022. Net photosynthesis acclimates to low growth temperature in cotton seedlings by shifting temperature thresholds for photosynthetic component processes and respiration. Environ. Exp. Bot., 196.

                Combing data from:

                **FIG. 2**

                * *Conaty, W.C., Burke, J.J., Mahan, J.R., Neilsen, J.E. and Sutton, B.G., 2012. Determining the Optimum Plant Temperature of Cotton Physiology and Yield to Improve Plant-Based* Irrigation Scheduling. Crop Sci., 52(4): 1828-1836.

                **FIG. 22.4**

                * *Snider, J., Bange, M. and Heitholt, J., 2021. Chapter 22. Cotton. In: V.O. Sadras and D.F. Calderini (Editors), Crop Physiology. Case Histories for Major Crops, pp. 715-746.*

                Using a base temp of 10 oC

                OZCOT uses base temperature of 8 oC for assimilate production

                From:

                * *Constable, G.A. and Bange, M.P., 2015. The yield potential of cotton (Gossypium hirsutum L.). Field Crops Res., 182: 98-106.*

                --> With a base temperature for development of 11.4–15 ◦C (Moraghan et al., 1968; Constable, 1976; Kerby et al., 1987), thermal kinetic window of 23.5–32.0 ◦C (Burke et al., 1988), and physiological optimum of 28 ◦C (Conaty et al., 2012).
              XYPairs: X=[12, 23.5, 32, 45]; Y=[0, 1, 1, 0]
            WeightedTemperatureFunction FTmin: MaximumTemperatureWeighting=0.2
              XYPairs: X=[12, 23.5, 32, 45]; Y=[0, 1, 1, 0]
          LinearInterpolationFunction FVPD
            Memo
              Photosynthesis was relatively insensitive to VPD as it decreased on average only 13% (SD = 5.0, n = 42) from the maximum photosynthetic rate over a wide range of VPD (1 kPa~4 kPa)

              **FIG. 2C**

              * *Duursma, R.A. et al., 2013. Near-optimal response of instantaneous transpiration efficiency to vapour pressure deficit, temperature and [#CO2] in cotton (Gossypium hirsutum L.). Agric. For. Meteorol., 168: 168-176.*
            XYPairs: X=[0, 10, 40]; Y=[1, 1, 0.87]
            VariableReference XValue: VariableName=[Leaf].Photosynthesis.VPD
          LinearInterpolationFunction FN
            XYPairs: X=[0, 1, 1.5]; Y=[0, 1, 1]
            VariableReference XValue: VariableName=[Leaf].Fn
          LinearInterpolationFunction FW
            XYPairs: X=[0, 1]; Y=[0, 1]
            VariableReference XValue: VariableName=[Leaf].Fw
          RUECO2Function FCO2: PhotosyntheticPathway=C3
          VariableReference RadnInt: VariableName=[Leaf].RadiationIntercepted
        StomatalConductanceCO2Modifier
          VariableReference PhotosynthesisCO2Modifier: VariableName=[Leaf].Photosynthesis.FCO2
        MaximumFunction Area
          AddFunction Calculation
            MultiplyFunction Initial
              Constant AreaPerPlant: FixedValue=0.0006
              VariableReference Population: VariableName=[Plant].SowingData.Population
            SubtractFunction Change
              AccumulateAtEvent AreaGrowth: StartStageName=Emergence; EndStageName=Maturity; AccumulateEventName=[Clock].DoActualPlantGrowth
                MultiplyFunction DeltaArea
                  VariableReference DeltaMass: VariableName=[Leaf].Allocated.StructuralWt
                  VariableReference SLA: VariableName=[Leaf].SpecificArea
              AccumulateAtEvent AreaSenesced: StartStageName=Emergence; EndStageName=HarvestRipe; AccumulateEventName=[Clock].DoActualPlantGrowth
                MultiplyFunction DeltaArea
                  VariableReference DeltaSenesced: VariableName=[Leaf].Senesced.StructuralWt
                  VariableReference SLA: VariableName=[Leaf].SpecificAreaCanopy
              AccumulateAtEvent AreaRemoved: StartStageName=Emergence; EndStageName=HarvestRipe; AccumulateEventName=[Clock].DoReportCalculations
                MultiplyFunction DeltaArea
                  VariableReference DeltaRemoved: VariableName=[Leaf].Removed.StructuralWt
                  VariableReference SLA: VariableName=[Leaf].SpecificAreaCanopy
          Constant Zero: FixedValue=0
        MinimumFunction FRGR
          VariableReference RUE_FT: VariableName=[Leaf].Photosynthesis.FT
          VariableReference RUE_FN: VariableName=[Leaf].Photosynthesis.FN
          VariableReference RUE_FVPD: VariableName=[Leaf].Photosynthesis.FVPD
        LinearInterpolationFunction ExtinctionCoefficient
          Memo
            29/02/2024: Matched to fit DDRF21RS1000 data

            For 1000 mm spacing; value taken from Constable 1986

            Extinction coeffcient mainstem leaves much larger than sympodial leaves and crop canopy (see: Constable, G. A. (1986). Growth and light receipt by mainstem cotton leaves in relation to plant density in the field. Agricultural and Forest Meteorology, 37, 279-292.)

            Mainstem leaves larger k --> due to clumpyness --> lots of shading of other leaves! --> substantially shaded, particularly at low plant densities

            Does this make sense?

            Snider, J., Bange, M., & Heitholt, J. (2021). Chapter 22. Cotton. In V. O. Sadras & D. F. Calderini (Eds.), Crop Physiology. Case Histories for Major Crops (pp. 715-746).

            -->The k is lowest in the early part of the season and increases with duration of the reproductive phase (Milroy et al., 2001).

            EXTINCTIONCOEFFICIENT FIXED: 0.69 (BASED ON 1 M ROW SPACING)

            ============================================================

            Brodrick, R., Bange, M. P., Milroy, S. P., & Hammer, G. L. (2013). Physiological determinants of high yielding ultra-narrow row cotton: Canopy development and radiation use efficiency. Field Crops Research, 148, 86-94. https://doi.org/10.1016/j.fcr.2012.05.008

            UNR (0.25m): 0.87

            Conventional (1m): 0.69
          XYPairs: X=[250, 1000, 2000]; Y=[0.87, 0.69, 0.45]
          VariableReference XValue: VariableName=[Cotton].SowingData.RowSpacing
        AddFunction HeightFunction
          Constant Initial: FixedValue=5; Units=mm
          AccumulateFunction Change: StartStageName=Emergence; EndStageName=Cutout; FractionRemovedOnCut=1; FractionRemovedOnHarvest=1; FractionRemovedOnGraze=1; FractionRemovedOnPrune=0
            MultiplyFunction DailyIncrease
              VariableReference DeltaNode: VariableName=[Leaf].NodeNumber.Change.DeltaNode
              PhaseLookup PotentialRate
                PhaseLookupValue PreSquaring: Start=Emergence; End=StartSquaring
                  Constant Rate: FixedValue=50; Units=mm
                PhaseLookupValue PostSquaring: Start=StartSquaring; End=Cutout
                  Constant Rate: FixedValue=90; Units=mm
                PhaseLookupValue PostCutOut: Start=Cutout; End=Maturity
                  Constant Rate: FixedValue=50; Units=mm
              LinearInterpolationFunction VPDEffect
                XYPairs: X=[0, 22, 40]; Y=[1, 1, 0]
                VariableReference XValue: VariableName=[Weather].VPD
              WeightedTemperatureFunction TemperatureEffect: MaximumTemperatureWeighting=0.5
                Memo: same as Replacements.Cotton.Leaf.Photosynthesis.FT.FTav.Memo
                XYPairs: X=[19, 23, 26, 36]; Y=[0, 1, 1, 0]
              LinearInterpolationFunction WaterStressFunction
                Memo
                  06/02/2024:

                  [#Leaf].FW

                  or

                  [#Root].SMI

                  ???

                  ===========================================================================================

                  21/12/2023

                  Height as a function of nodes. See H/N ratio Rose data.

                  Spreadsheet "Observed_Data.xlsx" in

                  C:\Users\rhe005\OneDrive - CSIRO\Work Files\00. APSIM NEXTGEN\Toowoomba 27 Feb to 3 Mar\Validation Data Sets\Rose Roche PhD data

                  ===========================================================================================

                  **THIS NEEDS TO BE REVISED**

                  ===========================================================================================

                  In APSIM-OZCOT, height is based off stem weight if have XY pairs on observed data (see also chickpea example).

                  In *Zhang, L. et al., 2021. Development and validation of SUCROS-Cotton: a potential crop growth simulation model for cotton. NJAS: Wageningen Journal of Life Sciences, 56(1-2): 59-83.*

                  --> Plant height is modelled as a linear function of (T) until growth is terminated by removal of the top bud ('cut-out')

                  --> Final plant height is also a function of the extension of main stem nodes

                  I used XY pairs from *CottonObserved 20230124.xlsx*

                  ===========================================================================================

                  On 08/05/2023:

                  XY values taken from NAR0607Ir80 data

                  Before 08/05/2023 (from DDRF-RS trial):

                  X|Y
                  -|-
                  0|10
                  50|540
                  100|750
                  150|950
                  200|1165
                  250|1380
                  300|1580
                XYPairs: X=[0.9, 1]; Y=[0, 1]
                VariableReference XValue: VariableName=[Leaf].FW
        Constant Phyllochron: FixedValue=28
        ExpressionFunction Plastochron: Expression=[Leaf].Phyllochron * [Leaf].Plastochron.Multiplier
          Memo Notes
            3/01/2024:

            Hanan and Hearn, 2003:

            "R, the ratio between the plastochron on a fruiting branch and on the mainstem, is 2"

            =====================================================================================

            22/12/2023:

            Add Plastochron for fruiting branch leaf emergence? See canola example

            Multiplier (R) is the "ratio of mainstem and fruiting branch leaf unfolding interval", which is temperature dependent (higher temperature, lower ratio):

            Reddy, K. R., Hodges, H. F., & McKinion, J. M. (1997). Modeling temperature effects on cotton internode and leaf growth. Crop Science, 37(2), 503-509. https://doi.org/DOI 10.2135/cropsci1997.0011183X003700020032x
          LinearInterpolationFunction Multiplier
            XYPairs: X=[15, 20, 25, 30, 35, 40, 45, 50]; Y=[0.81, 0.53, 0.47, 0.43, 0.37, 0.3, 0.21, 0.06]
            VariableReference XValue: VariableName=[Weather].MeanT
        AddFunction NodeNumber
          Memo RegrowthFunction
            Regrowth only if the BollRatio drops below 0.5 after cutout? See Burdekin example. But don't know because the BollRatio is not adequately performing because Boll weight is underpredicted!
          Memo Memo1
            The mainstem was therefore a simple parameter for the effect of age, temperature and water on the development of plant structure.

            The relationship was explained by a model in which fruiting branches compete with one another. The structure of the crop plants, as measured by the types and number of nodes, developed along a course in time determined by variety and spacing at a rate dependent on temperature.

            The rate decreased with age, but was **independent of the quantity of water available**, **until a critical amount had been used, when development stopped abruptly.**

            **--> USE ASPF FACTOR to stop node production?!?!?**

            From PhD Warren Conaty:

            The relationship between morphogenesis and water supply in cotton is that once the cropgerminates, **morphogenesis is unaffected by water supply until approximately two-thirds of available water has been depleted**. At this point, the production of squares ceases, and if water supply is not replenished crop growth terminates and the set fruit is matured (Hearn and Constable, 1984).

            ========================

            * Use separate thermal time in phenology for phyllochron?
            * fruitload slows down node-development and halts at cutout

            ========================

            FROM: *Hearn, A.B., 1994. The principles of cotton water relations and their application in management. In: G.A. Constable and N.W. Forrester (Editors), Challenging the Future: Proceedings of the World Cotton Research Conference. CSIRO, Brisbane, Australia, pp. 66–92.*

            The plants with different amounts of stored water
            develop at the same rate unaffected by the amount of water,
            until approximately three quarters is exhausted, whereupon
            morphological development and vegetative growth stop
            abruptly. Consequently, the final size and shape of the plants
            grown with different amounts of stored water look like
            successive stages of one crop, which in effect is what they are.
            This pattern of development is well adapted for survival in
            arid' and semi-arid environments where the water supply
            from rainfall or floods is erratic and variable. It allows the
            plant to make full use of supplies which can va1y greatly from
            one event or season to the next. When the supply is large,
            development continues for longer to give a larger plant and
            heavier yield, when the supply is !imaU the reverse occurs.
            The key is that the plant somehow recognises that the water
            supply is running out (the dry 'signal' in Fig. 2), and in
            response stops further morphological development and
            concentrates on maturing the fruit already set.
          Memo
            **06/11/2023: add temp effect to node development

            **12/07/2023 --> add temperature effect? Above 35oC no node development?? or at least slows down (see site MRF21) --> add to phenology thermal time calculations?**

            **Nodes develop slower with water stress!!!!!**

            ======================================================================

            ADD WATER STRESS HERE!

            WATER STRESS HALTS NODE PRODUCTION --> SEE KRS19RF DATA!

            TEMP EFFECT?

            ALSO ADD COVER EFFECT:

            SEE DDRF-RS DATA --> 0.5 M TREATMENT LESS NODES, AT COVER CLOSURE HALT NODE PRODUCTION

            Node production as function of day degree accumulation.

            **Need to add a term that provides negative feedback from metabolic stress (as fruit load increases and cutout is reached), eventually halting node (in Hearn, 1994: node = site) production.**

            Stage name to stop accumulation set on **cutout**
          Constant Initial: FixedValue=0
          AccumulateFunction Change: StartStageName=Emergence; EndStageName=Maturity; FractionRemovedOnCut=1; FractionRemovedOnHarvest=1; FractionRemovedOnGraze=1; FractionRemovedOnPrune=0
            MultiplyFunction DeltaNode
              Memo WaterFactor
                23/01/2024

                WATERFACTOR:

                XYPairs:

                X | Y
                --|--
                1.0 | 0
                1.2 | 1 --> removed and set to zero to test ndoe production

                XValue:

                [#Arbitrator].SDRatioBound

                =====================================================

                11/12/2023

                Leaf.FW waterfactor?

                **30/11/2023**

                WATERFACTOR:

                XYPairs:

                X | Y
                --|--
                1.0 | 0
                1.5 | 1

                XValue:

                [#Arbitrator].SDRatioBound

                =====================================================

                3/11/2023

                Changed:

                X | Y
                --|--
                0.5 | 0
                1.5 | 1

                To:

                X | Y
                --|--
                1 | 0
                1.5 | 1

                =====================================================

                This should be calculated for the rooting depth only!!!!!
              LessThanFunction PotentialRate
                VariableReference TTsinceEmergence: VariableName=[Phenology].Vegetative.ProgressThroughPhase
                ExpressionFunction Target: Expression=[Leaf].Phyllochron
                Constant Zero: FixedValue=0
                DivideFunction Delta
                  Memo
                    Use different thermal time for phyllochron? --> mainstem node accumulation

                    "Vegetative thermal time" see Mungbeanand Peanut model
                  VariableReference ThermalTime: VariableName=[Phenology].ThermalTime
                  VariableReference Phyllochron: VariableName=[Leaf].Phyllochron
              PhaseLookup StressModifiers
                PhaseLookupValue EmergenceToFlowering: Start=Emergence; End=StartFlowering
                  MinimumFunction
                    LinearInterpolationFunction WaterStressNodeNumber
                      Memo
                        14/03/2025:

                        X | Y
                        --|--
                        0.6 | 0
                        1.2 | 1
                      XYPairs: X=[0.6, 1.2]; Y=[1, 1]
                      VariableReference XValue: VariableName=[Arbitrator].SDRatioBound
                    LinearInterpolationFunction NitrogenStress
                      XYPairs: X=[0, 1]; Y=[0.5, 1]
                      VariableReference XValue: VariableName=[Leaf].Fn
                PhaseLookupValue FloweringToMaturity: Start=StartFlowering; End=Maturity
                  LinearInterpolationFunction BollLoad
                    XYPairs: X=[0, 1]; Y=[1, 0]
                    VariableReference XValue: VariableName=[Boll].BollRatio
        OnEventFunction FirstFruitingBranch: SetEvent=StartSquaring; ReSetEvent=0
          Constant PreEventValue: FixedValue=0
          SubtractFunction PostEventValue
            ExpressionFunction NodeNumberROUND: Expression=floor([Leaf].NodeNumber+0.5)
            Constant Two: FixedValue=2
        AddFunction BranchNumber
          PhaseLookupValue FruitingBranches: Start=StartSquaring; End=Cutout
            Memo
              **23/01/2024**

              **Need this to start accumulating from when FirstFruitingBranch is initiated**

              ===================================================================================================================

              8/1/12/2023

              Differentiate in fruiting and vegetative branch appearance.

              Node of first fruiting branch / the appearance of the first fruiting branch is sensitive to a number of environmental factors (Hesketh and Low, 1966; Moraghan et al., 1968)

              FROM: The Cotton Simulation Model "COTTAM": Fruiting Model Calibration and TestingB. S. Jackson, G. F. Arkin and A. B. HearnAmerican Society of Agricultural Engineers 1988 Vol. 31 Issue 3 Pages 846–854

              Each branch originates at a node on the main stem. The ﬁrst branches to form are vegetative, and after the ﬁrst fruiting branch arises generally no new vegetative branches are produced, FROM:

              A qualitative simulation model for cotton growth and developmentR. E. Plant, T. A. Kerby, L. J. Zelinski and D. S. MunkComputers and Electronics in Agriculture 1998 Vol. 20 Pages 165-183

              PLANT DENSITY effect on VB initiation

              ===================================================================================================================

              SEE BRANCHING IN CANOLA MODEL

              ===================================================================================================================

              For TEMP effects on branching see:

              Hodges, H.F., Reddy, K.R., McKinion, J.M. and Reddy, V.R., 1993. Temperature Effects on Cotton, Mississippi State University, Mississippi, USA.

              Distinguish between Vegetative and Fruiting branching? Seems to be a different relationship with temperature: FIG. 6A page 5
            AddFunction
              Constant: FixedValue=2
              AccumulateFunction FB: StartStageName=StartSquaring; EndStageName=Cutout; FractionRemovedOnCut=0; FractionRemovedOnHarvest=0; FractionRemovedOnGraze=0; FractionRemovedOnPrune=0
                MultiplyFunction FB
                  Memo
                    8/1/12/2023

                    Differentiate in fruiting and vegetative branch appearance.

                    Node of first fruiting branch / the appearance of the first fruiting branch is sensitive to a number of environmental factors (Hesketh and Low, 1966; Moraghan et al., 1968)

                    FROM: The Cotton Simulation Model "COTTAM": Fruiting Model Calibration and TestingB. S. Jackson, G. F. Arkin and A. B. HearnAmerican Society of Agricultural Engineers 1988 Vol. 31 Issue 3 Pages 846–854

                    Each branch originates at a node on the main stem. The ﬁrst branches to form are vegetative, and after the ﬁrst fruiting branch arises generally no new vegetative branches are produced, FROM:

                    A qualitative simulation model for cotton growth and developmentR. E. Plant, T. A. Kerby, L. J. Zelinski and D. S. MunkComputers and Electronics in Agriculture 1998 Vol. 20 Pages 165-183

                    PLANT DENSITY effect on VB initiation

                    =================================================

                    SEE BRANCHING IN CANOLA MODEL

                    =================================================

                    For TEMP effects on branching see:

                    Hodges, H.F., Reddy, K.R., McKinion, J.M. and Reddy, V.R., 1993. Temperature Effects on Cotton, Mississippi State University, Mississippi, USA.

                    Distinguish between Vegetative and Fruiting branching? Seems to be a different relationship with temperature: FIG. 6A page 5
                  VariableReference DeltaNode: VariableName=[Leaf].NodeNumber.Change.DeltaNode
          PhaseLookupValue VegetativeBranches: Start=StartSquaring; End=Cutout
            AccumulateFunction VB: StartStageName=StartSquaring; EndStageName=Cutout; FractionRemovedOnCut=0; FractionRemovedOnHarvest=0; FractionRemovedOnGraze=0; FractionRemovedOnPrune=0
              Memo
                VB production is a function of soil temperature!

                On vegetative branching: I did a quick Google search on the bus yesterday and found that vegetative branching can be (partly) explained by higher root activity affecting the plant’s hormonal balance. In the tropics, warm soil temperatures increase root metabolic activity, which is probably why we see more vegetative branches in the NT and at Forest Hill compared with the Narrabri region. This also fits with Paul Grundy’s comment that vegetative branching is “soil related”.

                =================================================

                Do we need to separate out the max leaf area on the VB compared with the fruiting branches?

                DM Supply/demand ratio on VB appearance?

                Or change to shading effect?

                ==================================================

                FROM:

                High plant density inhibits vegetative branching in cotton by altering hormone contents and photosynthetic productionT. Li, Y. Zhang, J. Dai, H. Dong and X. KongField Crops Research 2019 Vol. 230 Pages 121-131DOI: 10.1016/j.fcr.2018.10.016

                5. Conclusion
                High plant density significantly inhibited VB growth and develop-
                ment through a set of physiological changes and associated gene ex-
                pression. **The decreased photosynthesis** resulting from reduced RuBP
                carboxylase activity and chlorophyll content in VB leaves was one of
                the main reasons for the poor VB growth. High plant density promoted
                the apical dominance which increased the expression of GhYUC5 gene
                and IAA content in the main-stem tips and induced the expression of
                GhPIN1 to promote IAA transport from the apical part to the root. The
                increased IAA content and expression of GhPIN1 increased the SLs
                content by increasing the expression of GhD14 and reducing the content
                of CKs by decreasing the expression of GhIPT3 in the VB tips. Moreover,
                high plant density led to shade avoidance syndrome, which decreased
                the IAA content and auxin polar transport by down-regulating GhYUC5,
                GhPIN1 and GhPIN5 genes. It also decreased the CKs content by down-
                regulating the GhIPT3 gene, and the GA and BR contents in the VB tips,
                but increased the content of SLs in the VB tips by up-regulating GhD14.
                The decreased IAA, CKs, GA and BR contents along with the increased
                SLs content in the VB tips was another important reason for the in-
                hibited growth and development of VB
              MultiplyFunction VB
                VariableReference DeltaNode: VariableName=[Leaf].NodeNumber.Change.DeltaNode
                LinearInterpolationFunction BranchingRate
                  XYPairs: X=[1, 3.9, 4, 6.9, 7, 30]; Y=[0, 0, 0, 0, 0, 0]
                  VariableReference XValue: VariableName=[Leaf].NodeNumber
                LinearInterpolationFunction DensityFactor
                  XYPairs: X=[7, 8.6, 10.4, 11]; Y=[1, 0.44, 0.27, 0.15]
                  VariableReference XValue: VariableName=[Cotton].SowingData.Population
          Memo
            29/01/2029:

            Add coverfactor --> see peanut

            I have cover data from the RS trial from ceptometer
        AccumulateFunction Sites: StartStageName=Emergence; EndStageName=Cutout; FractionRemovedOnCut=1; FractionRemovedOnHarvest=1; FractionRemovedOnGraze=1; FractionRemovedOnPrune=0
          Memo
            11/12/2023:

            Add site reduction factors here:

            * Density
            * Water stress
            * (Variety)

            In OZCOT, site number is reduced by **PLANT POPULATION** and **NITROGEN STRESS**

            ==============================================================================================

            11/12/2023: add node number here as well

            Different phyllochron for leaf appearance of Fruiting Branches compared with mainstem:

            * *Reddy, K.R., Hodges, H.F. and McKinion, J.M., 1997. Modeling temperature effects on cotton internode and leaf growth. Crop Sci., 37(2): 503-509.*
          PhaseLookupValue SiteProduction: Start=Emergence; End=Maturity
            MultiplyFunction Delta
              VariableReference Branches: VariableName=[Leaf].BranchNumber
              DivideFunction LAR
                VariableReference TT: VariableName=[Phenology].ThermalTime
                VariableReference Phyllochron: VariableName=[Leaf].Phyllochron
              VariableReference R
                VariableName=[Leaf].DMDemands.Structural.DeltaLAIPotential.ReproductiveStage.Delta.SympodialLeaves.EmergingLeaves.MultiplyFunction.R
              VariableReference PlantNumber: VariableName=[Cotton].SowingData.Population
        AddFunction TotalNumber
          Memo
            Revisit LAR
          VariableReference MainStemNodes: VariableName=[Leaf].NodeNumber
          AccumulateFunction LeavesOnBranches: StartStageName=Emergence; EndStageName=Cutout; FractionRemovedOnCut=1; FractionRemovedOnHarvest=1; FractionRemovedOnGraze=1; FractionRemovedOnPrune=0
            Memo: same as Replacements.Cotton.Leaf.Sites.Memo
            PhaseLookupValue LeafProduction: Start=Emergence; End=Maturity
              MultiplyFunction Delta
                VariableReference Branches: VariableName=[Leaf].BranchNumber
                DivideFunction LAR
                  VariableReference TT: VariableName=[Phenology].ThermalTime
                  VariableReference Phyllochron: VariableName=[Leaf].Phyllochron
                VariableReference R
                  VariableName=[Leaf].DMDemands.Structural.DeltaLAIPotential.ReproductiveStage.Delta.SympodialLeaves.EmergingLeaves.MultiplyFunction.R
        Constant NReallocationFactor: FixedValue=1
          Memo
            This model assumes that all metabolic and storage N is available for reallocation from senescing leaves.
        MaximumFunction SenescenceRate
          Memo
            Move all LAI reducing factors here? DeltaLAI**Potential** --> so do not include reducing factors? But instead move to senescence.

            Include **ReferenceRate** 0.05/day

            ***See WhiteClover example***

            2. Mechanisms and factors inﬂuencing cotton senescence

            2.1. Environmental factors and senescence

            2.1.1. External environmental factors
            Major external environment factors that affect cotton leaf senescence include light, temperature, moisture, and mineral nutrition.

            * Shading (CoverResponse)
            * Water (SoilMostureFactor)
            * Nitrogen (NitrogenFactor)
            * Temperature (TemperatureFactor)
          Memo WaterDrivenSenescenceRate_notes
            29/04/2025:

            WaterStress effect on leaf senescence from OZCOT (Hearn, 1994):

            Each day's increment of leaf area is accounted for separately in order
            to facilitate senescence of leaves. Data on leaf longevity are sparse and
            variable; values range from 55 to 99 days and 500 to 1300 DD. Water
            stress early can delay development and lengthen life, while late in life it
            can accelerate senescence. Senescence appears to be accelerated when the
            crop has a full boll load, probably reflecting faster remobilisation of
            nitrogen. On the basis of Hesketh et al. (1977) and McMichael and
            Hesketh (1982) the day degree requirement for leaf senescence, SENLF,
            has been set to vary between 833 and 1100 as a function of SMI and
            fruit load thus:
            SENLF = 833 + 277*FB*FW
            where FW decreases linearly from l ·O when SMI = 0·25 to O·O when
            SMI = O·O, and FB in defined by 1 - LOAD/CARCAP, LOAD and
            CARCAP being defined previously. A day's leaves are senesced when the
            appropriate day degree requirement has been met.

            X|Y
            -|-
            0|0
            0.25|1

            =======================================================

            See WaterDrivenSenescenceRate from Mungbean model

            Vegetative: Emergence to StartFlowering

            Reproductive: StartFlowering to Maturity
          PhaseLookup AgeDrivenSenescenceRate
            PhaseLookupValue Phase: Start=Emergence; End=Maturity
              Memo
                Leaf senescence rate is calculated to ensure that all leaves are senesced by crop maturity.
          PhaseLookup WaterDrivenSenescenceRate
            PhaseLookupValue Phase: Start=Emergence; End=Maturity
              BoundFunction
                LinearInterpolationFunction WaterStressFunction
                  Memo
                    21/12/2023

                    Height as a function of nodes. See H/N ratio Rose data.

                    Spreadsheet "Observed_Data.xlsx" in

                    C:\Users\rhe005\OneDrive - CSIRO\Work Files\00. APSIM NEXTGEN\Toowoomba 27 Feb to 3 Mar\Validation Data Sets\Rose Roche PhD data

                    ====================================

                    **THIS NEEDS TO BE REVISED**

                    ===============================

                    In APSIM-OZCOT, height is based off stem weight if have XY pairs on observed data (see also chickpea example).

                    In *Zhang, L. et al., 2021. Development and validation of SUCROS-Cotton: a potential crop growth simulation model for cotton. NJAS: Wageningen Journal of Life Sciences, 56(1-2): 59-83.*

                    --> Plant height is modelled as a linear function of (T) until growth is terminated by removal of the top bud ('cut-out')

                    --> Final plant height is also a function of the extension of main stem nodes

                    I used XY pairs from *CottonObserved 20230124.xlsx*

                    ===================================================================================

                    On 08/05/2023:

                    XY values taken from NAR0607Ir80 data

                    Before 08/05/2023 (from DDRF-RS trial):

                    X|Y
                    -|-
                    0|10
                    50|540
                    100|750
                    150|950
                    200|1165
                    250|1380
                    300|1580
                  XYPairs: X=[0.5, 1]; Y=[0.03, 0]
                  VariableReference XValue: VariableName=[Leaf].FW
                Constant Lower: FixedValue=0
                Constant Upper: FixedValue=1
          PhaseLookup ShadeDrivenSenescenceRate
            PhaseLookupValue Phase: Start=Emergence; End=Maturity
              LinearInterpolationFunction ShadeStressFunction
                XYPairs: X=[0, 0.75, 1]; Y=[0, 0, 0]
                VariableReference XValue: VariableName=[Leaf].CoverTotal
        Constant DetachmentRate: FixedValue=0.05; Units=/d
        MultiplyFunction LAIDead
          VariableReference SLA: VariableName=[Leaf].SpecificAreaCanopy
          VariableReference LeafDeadWt: VariableName=[Leaf].Dead.Wt
        LinearInterpolationFunction MaximumNConc
          Memo
            These values have been fitted to the data from Tim Weavers Nitrogen trial. Value for Phenology.Stage 3 estimated.

            Y values were all from the N300 treatment

            Cotton.Phenology.Stage | Cotton.Phenology.CurrentStageName
            -----------------------|----------------------------------
            1 | Sowing
            2 | Germination
            3 | Emergence
            4 | StartSquaring
            5 | StartFlowering
            6 | Cutout
            7 | StartBollFilling
            8 | StartOpenBolls
            9 | Maturity
          XYPairs: X=[3, 4, 6, 7, 8]; Y=[0.0458, 0.0458, 0.035, 0.03, 0.03]
          VariableReference XValue: VariableName=[Phenology].Stage
        VariableReference CriticalNConc: VariableName=[Leaf].MaximumNConc
        Constant MinimumNConc: FixedValue=0.0127
          Memo
            Tim Weavers Nitrogen trial

            N concentration at maturity for N0 treatment = 0.025
        Constant MaintenanceRespiration: FixedValue=0; Units=0-1
        Constant DMConversionEfficiency: FixedValue=1; Units=0-1
        BiomassRemoval BiomassRemovalDefaults: HarvestFractionLiveToRemove=0; HarvestFractionDeadToRemove=0; HarvestFractionLiveToResidue=1; HarvestFractionDeadToResidue=1
        Constant NRetranslocationFactor: FixedValue=0.5
        Constant DMReallocationFactor: FixedValue=0
        Constant DMRetranslocationFactor: FixedValue=0.5
        Constant RemobilisationCost: FixedValue=0
        Constant CarbonConcentration: FixedValue=0.4
        NutrientDemandFunctions DMDemands
          DivideFunction Structural
            PhaseLookup DeltaLAIPotential
              Memo
                29/01/2024:

                **Instead of having a dynamic "AreaLargestLeaf" --> add expansion stress and add Temp and VPD?**

                **See LeafSizeTemperatureFactor in Peanut model:**

                **--> .Simulations.ContinuousPeanut.paddock.Peanut.Leaf.DeltaLAI.Vegetative.Delta.LeafSizeTemperatureFactor**

                ================================================================================================================

                16/05/2023:

                Phase runs from emergence to maturity -- veg and repr concurrent!

                ================================================================================================================

                ***Add "Vegetative phase"? Since leaf area not affected much by water stress the first couple of weeks?***

                WaterStress not working correctly?

                =======================================

                DeltaLAI describes the LAI variation over the cycle and is calculated using the Area of Largest Leaf, relative leaf area, plant number, branch number and leaf appearance rate (thermal time/phyllochron).

                Include **TemperatureFactor**?

                =======================================

                Higher density --> more rapid early leaf growth (see row spacing trial DDRF)

                =======================================

                Excess water can be detrimental between cut-out and maturity. Vegetative growth can be
                restarted if water deficit is reduced by rain

                *Yeates, S.J., 2014. Tech Bulletin Water stress: effect on cotton physiology.*
              PhaseLookupValue VegetativeStage: Start=Emergence; End=StartSquaring
                MultiplyFunction Delta
                  VariableReference PlantNumber: VariableName=[Cotton].SowingData.Population
                  VariableReference LAR: VariableName=[Leaf].NodeNumber.Change.DeltaNode
                  MultiplyFunction Area
                    VariableReference AreaLargestMainstemLeaf: VariableName=[Leaf].AreaLargestMainstemLeaf
                    LinearInterpolationFunction RelativeArea
                      Memo
                        Crop Phases:

                        Phase number | Phase
                        -------------|------
                        1 | Sowing
                        2 | Germination
                        3 | Emergence
                        4 | StartSquaring
                        5 | StartFlowering
                        6 | Cutout
                        7 | StartBollFilling
                        8 | StartOpenBolls
                        9 | Maturity
                        10 | HarvestRipe

                        Phase number | Rel.LAI
                        -----------|---------
                        3 | 0.05
                        4 | 1.0
                      XYPairs: X=[3, 3.1, 4]; Y=[0.1, 0.1, 1]
                      VariableReference XValue: VariableName=[Phenology].Stage
              PhaseLookupValue ReproductiveStage: Start=StartSquaring; End=Maturity
                AddFunction Delta
                  MultiplyFunction MainstemLeaves
                    VariableReference PlantNumber: VariableName=[Cotton].SowingData.Population
                    VariableReference LAR: VariableName=[Leaf].NodeNumber.Change.DeltaNode
                    MultiplyFunction Area
                      VariableReference AreaLargestMainstemLeaf: VariableName=[Leaf].AreaLargestMainstemLeaf
                      LinearInterpolationFunction RelativeArea
                        Memo
                          Crop Phases:

                          Phase number | Phase
                          -------------|------
                          1 | Sowing
                          2 | Germination
                          3 | Emergence
                          4 | StartSquaring
                          5 | StartFlowering
                          6 | Cutout
                          7 | StartBollFilling
                          8 | StartOpenBolls
                          9 | Maturity
                          10 | HarvestRipe

                          Phase number | Rel.LAI
                          -----------|---------
                          3 | 0.05
                          4 | 1.0
                        XYPairs: X=[4, 6]; Y=[1, 0.4]
                        VariableReference XValue: VariableName=[Phenology].Stage
                  MultiplyFunction SympodialLeaves
                    VariableReference PlantNumber: VariableName=[Cotton].SowingData.Population
                    VariableReference LAR: VariableName=[Leaf].NodeNumber.Change.DeltaNode
                    MultiplyFunction Area
                      VariableReference AreaLargestSympodialLeaf: VariableName=[Leaf].AreaLargestSympodialLeaf
                      LinearInterpolationFunction RelativeArea
                        Memo
                          Crop Phases:

                          Phase number | Phase
                          -------------|------
                          1 | Sowing
                          2 | Germination
                          3 | Emergence
                          4 | StartSquaring
                          5 | StartFlowering
                          6 | Cutout
                          7 | StartBollFilling
                          8 | StartOpenBolls
                          9 | Maturity
                          10 | HarvestRipe

                          Phase number | Rel.LAI
                          -----------|---------
                          4 | 0.2
                          5 | 0.7
                          6 | 1
                        XYPairs: X=[4, 6]; Y=[0, 0.6]
                        VariableReference XValue: VariableName=[Phenology].Stage
                    AddFunction EmergingLeaves
                      Constant: FixedValue=1
                      MultiplyFunction
                        VariableReference Branches: VariableName=[Leaf].BranchNumber
                        LinearInterpolationFunction R
                          Memo
                            29/01/2024:

                            DDRF: 0.35

                            ====================================================================================

                            22/12/2023:

                            R is temperature dependent:

                            Reddy, K. R., Hodges, H. F., & McKinion, J. M. (1997). Modeling temperature effects on cotton internode and leaf growth. Crop Science, 37(2), 503-509. https://doi.org/DOI 10.2135/cropsci1997.0011183X003700020032x

                            See notes "Plastochron"

                            ====================================================================================

                            12/12/2023:

                            XYPairs, XValue node number instead? --> then can include Veg branches R = e.g. 5, and for fruiting branches R = 2?

                            ====================================================================================

                            11/12/2023:

                            R = is potential, and depends on density. Higher density, higher R. R is then reduced by stresses, such as water.

                            So don't use DDRF site to determine potential R with different density, since this is rainfed, so water stresses may occur.

                            **Does R depend on population/m2, water stress, or both??**

                            ====================================================================================

                            **REDUCE TO 0.2? SEE CALCULATIONS FOR DDRFRS1000 IN COTTONOBSERVED DATASHEET**

                            **0.3 for RS trial?!**

                            FROM:

                            * *Hearn, A.B. and Da Roza, G.D., 1985. A simple model for crop management applications for cotton (Gossypium hirsutum L.). Field Crops Res., 12: 49–69.*

                            *R* is the ratio of the rate of mainstem node production to the rate of fruiting branch node production.

                            "For any variety, there is a constant ratio between the rate at which nodes (and thus new fruiting branches) appear on the main stem and the rate at which new fruiting sites appear along a fruiting branch (Hearn, 1969; Mutsaers, 1983)."

                            Check also the following references:

                            1. *Jackson, B.S., Arkin, G.F. and Hearn, A.B., 1988. The Cotton Simulation Model "COTTAM": Fruiting Model Calibration and Testing. American Society of Agricultural Engineers, 31(3): 846–854.*
                            2. *Hearn, A.B., 1969. Growth and performance of cotton in a desert environment: I. Morphological development of the crop. The Journal of Agricultural Science, 73(1): 65-74.*
                            3. *Mutsaers, H.J.W., 1983. Leaf Growth in Cotton (Gossyp/um hirsutum L.) 1. Growth in Area of Main-stem and Sympodial Leaves. Ann. Bot., 51: 503-520.*
                            4. *Hearn, A. B., & Da Roza, G. D. (1985). A simple model for crop management applications for cotton (Gossypium hirsutum L.). Field Crops Research, 12, 49–69.*
                          XYPairs: X=[4, 5, 6]; Y=[0.5, 0.5, 0]
                          VariableReference XValue: VariableName=[Phenology].Stage
            VariableReference SLA: VariableName=[Leaf].SpecificArea
            Memo
              Growth in leaf area is used to calculate the leaf dry matter demand. The same was assumed in the original crop models in APSIM. Further model development can be taken once new experimental data for metabolic, structural and storage forms are provided.
            Memo Memo1
              DeltaLAI describes the LAI variation over the cycle and is calculated using the Area of Largest Leaf, relative leaf area, plant number, branch number and leaf appearance rate (thermal time/phyllochron).
          Constant Storage: FixedValue=0
          Constant Metabolic: FixedValue=0
          Constant QStructuralPriority: FixedValue=1
          Constant QMetabolicPriority: FixedValue=1
          Constant QStoragePriority: FixedValue=1
        NutrientDemandFunctions NDemands
          MultiplyFunction Structural
            VariableReference MinNconc: VariableName=[Leaf].minimumNconc
            VariableReference PotentialDMAllocation: VariableName=[Leaf].potentialDMAllocation.Structural
          MultiplyFunction Metabolic
            SubtractFunction MetabolicNconc
              VariableReference CritNconc: VariableName=[Leaf].criticalNConc
              VariableReference MinNconc: VariableName=[Leaf].minimumNconc
            VariableReference PotentialDMAllocation: VariableName=[Leaf].potentialDMAllocation.Structural
          StorageNDemandFunction Storage
            Constant NitrogenDemandSwitch: FixedValue=1
            VariableReference MaxNconc: VariableName=[Leaf].maximumNconc
          Constant QStructuralPriority: FixedValue=1
          Constant QMetabolicPriority: FixedValue=1
          Constant QStoragePriority: FixedValue=1
        LinearInterpolationFunction AreaLargestMainstemLeaf
          Memo
            X|Y
            -|-
            0|0
            30|1
            38|1
            40|0.8
          XYPairs: X=[0.005, 0.012, 0.02, 0.03]; Y=[0.006, 0.006, 0.035, 0.035]
          VariableReference XValue: VariableName=[Leaf].SpecificAreaCanopy
        ExpressionFunction AreaLargestSympodialLeaf: Expression=[Leaf].AreaLargestMainstemLeaf * 0.78
        DivideFunction SpecificAreaCanopy
          VariableReference LAI: VariableName=[Leaf].Area
          VariableReference LeafWt: VariableName=[Leaf].Live.Wt
        HoldFunction FinalLeafNumber: WhenToHold=Cutout
          AddFunction FLN
            Constant PrimordiaAtEmergence: FixedValue=2
            AccumulateFunction InitiatedPrimordia: StartStageName=Germination; EndStageName=Cutout; FractionRemovedOnCut=0; FractionRemovedOnHarvest=0; FractionRemovedOnGraze=0; FractionRemovedOnPrune=0
              DivideFunction DailyPrimordiaAppearance
                VariableReference TT: VariableName=[Phenology].ThermalTime
                VariableReference Plastochron: VariableName=[Leaf].Plastochron
        DivideFunction InitialWt
          VariableReference InitialArea: VariableName=[Leaf].Area.Calculation.Initial
          VariableReference SLA: VariableName=[Leaf].SpecificArea
        PhaseLookup SpecificArea
          Memo
            STAGE 1: initial SLA is the SLA under normal, standard growing conditions --> the value chosen here seems to have a big effect on LAI!

            After cutout, hold value, and linearly decline towards harvest

            ADD another PhaseLookupValue; call Stage 3:

            After Stage2; SLA Is held a cutout, and then (linearly?) declines towards the end of the crop

            Zamora, D. S., Jose, S., Jones, J. W., & Cropper, W. P. (2008). Modeling cotton production response to shading in a pecan alleycropping system using CROPGRO. Agroforestry Systems, 76(2), 423-435. https://doi.org/10.1007/s10457-008-9166-x

            DSSAT V4.5 Volume 4 Cropping System Model Documentation -- Page34
          PhaseLookupValue Stage2: Start=Sowing; End=Unused
            HoldFunction: WhenToHold=HarvestRipe
              DivideFunction SLA_DSSAT
                MultiplyFunction SLA
                  VariableReference SLAMax: VariableName=[Leaf].SpecificArea.SLAMax
                  SubDailyInterpolation TemperatureFunction: agregationMethod=0
                    XYPairs Response: X=[0, 12, 22, 30]; Y=[0.25, 0.25, 1, 1]
                    ThreeHourAirTemperature InterpolationMethod
                  ExpressionFunction PARSLA
                    Expression=([Leaf].SpecificArea.SLAMin+([Leaf].SpecificArea.SLAMax-[Leaf].SpecificArea.SLAMin)*EXP([Leaf].SpecificArea.SLAPAR*([Weather].Radn / 2.02)))/[Leaf].SpecificArea.SLAMax
                  ExpressionFunction WaterStressFunction: Expression=MAX(0.1, (1-(1-[Leaf].Fw)*[Leaf].SpecificArea.TURSLA))
                  LinearInterpolationFunction VPDStressFunction
                    XYPairs: X=[0, 13, 30, 40, 50]; Y=[1, 1, 1, 1, 1]
                    VariableReference XValue: VariableName=[Weather].VPD
                Constant: FixedValue=10000
          Constant SLAMin: FixedValue=80
          Constant SLAMax: FixedValue=600
          Constant SLAPAR: FixedValue=-0.14
          Constant TURSLA: FixedValue=0.8
      GenericOrgan Stem: IsAboveGround=true
        Memo
          Check N dynamics over time in cotton and partitioning and storage
        Constant NReallocationFactor: FixedValue=1
        PhaseLookup NRetranslocationFactor
          PhaseLookupValue Vegetative: Start=Emergence; End=Cutout
            Constant RetranslocationFactor: FixedValue=0
          PhaseLookupValue BollFilling: Start=Cutout; End=Maturity
            Constant RetranslocationFactor: FixedValue=0.2
        PhaseLookup DMRetranslocationFactor: same as Replacements.Cotton.Stem.NRetranslocationFactor
        LinearInterpolationFunction MaximumNConc
          Memo
            From Tim Weavers N trial data
          XYPairs: X=[3, 4, 5, 6]; Y=[0.027, 0.027, 0.013, 0.01]
          VariableReference XValue: VariableName=[Phenology].Stage
        Constant MinimumNConc: FixedValue=0.008
        VariableReference CriticalNConc: VariableName=[Stem].MinimumNConc
        PhaseLookupValue NitrogenDemandSwitch: Start=Emergence; End=Cutout
          Memo
            There is no evidence of stem N storage during grain filling. Also, there is no stem structural growth during this time.
          Constant: FixedValue=1
        BiomassRemoval BiomassRemovalDefaults: HarvestFractionLiveToRemove=0; HarvestFractionDeadToRemove=0; HarvestFractionLiveToResidue=1; HarvestFractionDeadToResidue=1
        PhaseLookup SenescenceRate
          Memo
            7/2/2024: Need to revise senescence rate sine phases after flowering don't use thermal time --> check leaf senescence
          PhaseLookupValue Vegetative: Start=Emergence; End=Cutout
            Constant Rate: FixedValue=0
          PhaseLookupValue PostCutout: Start=Cutout; End=Maturity
            Constant Rate: FixedValue=0
        Constant DetachmentRateFunction: FixedValue=0; Units=/d
        Constant MaintenanceRespirationFunction: FixedValue=0; Units=0-1
        Constant DMConversionEfficiency: FixedValue=1; Units=0-1
        Constant DMReallocationFactor: FixedValue=1
        Constant RemobilisationCost: FixedValue=0
        Constant CarbonConcentration: FixedValue=0.4
        NutrientDemandFunctions DMDemands
          MultiplyFunction Structural
            PhaseLookup Fraction
              PhaseLookupValue StemGrowthPhase: Start=Emergence; End=Maturity
                Constant Fraction: FixedValue=0.9
            VariableReference DMDemand: VariableName=[Stem].PotentialGrowth
          Constant Metabolic: FixedValue=0
          MultiplyFunction Storage
            VariableReference DMDemand: VariableName=[Stem].PotentialGrowth
            SubtractFunction StorageFraction
              Constant One: FixedValue=1
              VariableReference StructuralFraction: VariableName=[Stem].DMDemands.Structural.Fraction
          Constant QStructuralPriority: FixedValue=1
          Constant QMetabolicPriority: FixedValue=1
          Constant QStoragePriority: FixedValue=1
        NutrientDemandFunctions NDemands
          MultiplyFunction Structural
            VariableReference MinNconc: VariableName=[Stem].minimumNconc
            VariableReference PotentialDMAllocation: VariableName=[Stem].potentialDMAllocation.Structural
          MultiplyFunction Metabolic
            SubtractFunction MetabolicNconc
              VariableReference CritNconc: VariableName=[Stem].criticalNConc
              VariableReference MinNconc: VariableName=[Stem].minimumNconc
            VariableReference PotentialDMAllocation: VariableName=[Stem].potentialDMAllocation.Structural
          StorageNDemandFunction Storage
            VariableReference NitrogenDemandSwitch: VariableName=[Stem].nitrogenDemandSwitch
            VariableReference MaxNconc: VariableName=[Stem].maximumNconc
          Constant QStructuralPriority: FixedValue=1
          Constant QMetabolicPriority: FixedValue=1
          Constant QStoragePriority: FixedValue=1
        PartitionFractionDemandFunction PotentialGrowth
          PhaseLookup PartitionFraction
            PhaseLookupValue PreCutOut: Start=Emergence; End=Cutout
              Constant StemFraction: FixedValue=0.4
            PhaseLookupValue PostCutOut: Start=Cutout; End=Maturity
              Constant StemFraction: FixedValue=0.2
        RetranslocateNonStructural RetranslocateNitrogen
        NutrientPoolFunctions InitialWt
          Constant Structural: FixedValue=0; Units=g/m^2
          Constant Metabolic: FixedValue=0
          Constant Storage: FixedValue=0
        Constant Photosynthesis: FixedValue=0
        VariableReference initialNConcFunction: VariableName=[Stem].MinimumNConc
      GenericOrgan Bur: IsAboveGround=true
        Memo
          **REVISE BUR N CONC!!!!!**
        PhaseLookupValue SenescenceRate: Start=Cutout; End=HarvestRipe
          Constant: FixedValue=0.02
        NutrientDemandFunctions DMDemands
          MultiplyFunction Structural
            PhaseLookup DMDemandFunction
              PhaseLookupValue BurDevelopment: Start=StartFlowering; End=Cutout
                MultiplyFunction HIDemand
                  VariableReference AboveGroundWt: VariableName=[AboveGround].Wt
                  DivideFunction HarvestIndexIncrease
                    MaximumFunction OutstandingHarvestIndexIncrease
                      ExpressionFunction Increase: Expression=[Bur].PotentialHarvestIndex - [Bur].HarvestIndex
                      Constant Zero: FixedValue=0
                    SubtractFunction TTRemaining
                      ExpressionFunction BurGrowthTT: Expression=[Phenology].EarlyFlowering.Target
                      ExpressionFunction BurGrowthTTComplete: Expression=[Phenology].EarlyFlowering.ProgressThroughPhase
                  VariableReference ThermalTime: VariableName=[Phenology].ThermalTime
            Constant StructuralFraction: FixedValue=1
          Constant Metabolic: FixedValue=0
          StorageDMDemandFunction Storage
            SubtractFunction StorageFraction
              Constant One: FixedValue=1
              VariableReference StructuralFraction: VariableName=[Bur].DMDemands.Structural.StructuralFraction
          Constant QStructuralPriority: FixedValue=1
          Constant QMetabolicPriority: FixedValue=1
          Constant QStoragePriority: FixedValue=1
        NutrientDemandFunctions NDemands
          MultiplyFunction Structural
            VariableReference MinNconc: VariableName=[Bur].minimumNconc
            VariableReference PotentialDMAllocation: VariableName=[Bur].potentialDMAllocation.Structural
          StorageNDemandFunction Storage
            VariableReference NitrogenDemandSwitch: VariableName=[Bur].nitrogenDemandSwitch
            VariableReference MaxNconc: VariableName=[Bur].maximumNconc
          Constant Metabolic: FixedValue=0
          Constant QStructuralPriority: FixedValue=1
          Constant QMetabolicPriority: FixedValue=1
          Constant QStoragePriority: FixedValue=1
        RetranslocateNonStructural RetranslocateNitrogen
        PhaseLookupValue NitrogenDemandSwitch: Start=StartFlowering; End=Cutout
          Constant: FixedValue=1
        Constant MaximumNConc: FixedValue=0.015
          Memo
            **12/07/2023: MinNConc 0.01; MaxNConc 0.045**

            Values from:

            Boquet, D.J. and Breitenbeck, G.A., 2000. Nitrogen Rate Effect on Partitioning of Nitrogen and Dry Matter by Cotton. Crop Sci., 40: 1685-1693.

            Min: 0.011

            Max: 0.020

            **17/07/2023:** Boquet & Breitenbeck 2000, EEB values (N values at cutout): MinNConc: 0.0194, MaxNConc: 0.0358
        Constant MinimumNConc: FixedValue=0.009
        VariableReference CriticalNConc: VariableName=[Bur].MinimumNConc
        Constant NReallocationFactor: FixedValue=1
        Constant NRetranslocationFactor: FixedValue=0.5
        Constant DMRetranslocationFactor: FixedValue=0.1
        BiomassRemoval BiomassRemovalDefaults: HarvestFractionLiveToRemove=0; HarvestFractionDeadToRemove=0; HarvestFractionLiveToResidue=1; HarvestFractionDeadToResidue=1
        Constant DetachmentRateFunction: FixedValue=0; Units=/d
        Constant MaintenanceRespirationFunction: FixedValue=0; Units=0-1
        Constant DMConversionEfficiency: FixedValue=1; Units=0-1
        Constant DMReallocationFactor: FixedValue=0
        Constant RemobilisationCost: FixedValue=0
        Constant CarbonConcentration: FixedValue=0.4
        MultiplyFunction PotentialHarvestIndex
          Memo
            11/07/2023: SeedFraction 0.45 at Maturity (0.04 and 0.055 N Conc) and 0.58 at HarvestRipe (0.033 and 0.043 N conc)

            If run model to Maturity, remove RipeningDuration from FillingDuration and DMDemandFunction
          VariableReference BollHarvestIndex: VariableName=[Boll].PotentialHarvestIndex
          VariableReference BurFraction: VariableName=[Boll].DailyPartitioning.BurFraction
        NutrientPoolFunctions InitialWt: same as Replacements.Cotton.Stem.InitialWt
        VariableReference initialNConcFunction: VariableName=[Bur].MinimumNConc
        Constant Photosynthesis: FixedValue=0
        DivideFunction HarvestIndex
          VariableReference BurWt: VariableName=[Bur].Wt
          VariableReference AboveGroundWt: VariableName=[AboveGround].Wt
      ReproductiveOrgan Seed: GrowthRespiration=0; MaintenanceRespiration=0
        Biomass Live
        Biomass Dead
        PhaseLookup DMDemandFunction
          PhaseLookupValue BollFilling: Start=StartFlowering; End=Maturity
            MultiplyFunction HIDemand
              VariableReference AboveGroundWt: VariableName=[AboveGround].Wt
              DivideFunction HarvestIndexIncrease
                MaximumFunction OutstandingHarvestIndexIncrease
                  ExpressionFunction Increase: Expression=[Seed].PotentialHarvestIndex - [Seed].HarvestIndex
                  Constant Zero: FixedValue=0
                SubtractFunction TTRemaining
                  ExpressionFunction SeedGrowthTT
                    Expression=[Phenology].EarlyFlowering.Target + [Phenology].Maturing.Target
                  ExpressionFunction SeedGrowthTTComplete
                    Expression=[Phenology].EarlyFlowering.ProgressThroughPhase + [Phenology].Maturing.ProgressThroughPhase
              VariableReference ThermalTime: VariableName=[Phenology].ThermalTime
        LinearInterpolationFunction MaximumNConc
          Memo: same as Replacements.Cotton.Leaf.MaximumNConc.Memo
          XYPairs: X=[5, 8]; Y=[0.035, 0.045]
          VariableReference XValue: VariableName=[Phenology].Stage
        Constant MinimumNConc: FixedValue=0.035
        Constant WaterContent: FixedValue=0.12
        MultiplyFunction NFillingRate
          VariableReference NConc: VariableName=[Seed].MaximumNConc
          VariableReference DMDemand: VariableName=[Seed].DMDemandFunction
          VariableReference DMConversionEfficiency: VariableName=[Seed].DMConversionEfficiency
        BiomassRemoval BiomassRemovalDefaults: HarvestFractionLiveToRemove=1; HarvestFractionDeadToRemove=1; HarvestFractionLiveToResidue=0; HarvestFractionDeadToResidue=0
        Constant DMConversionEfficiency: FixedValue=0.89
        Constant RemobilisationCost: FixedValue=0
        Constant CarbonConcentration: FixedValue=0.4
        DivideFunction HarvestIndex
          VariableReference SeedWt: VariableName=[Seed].Wt
          VariableReference AboveGroundWt: VariableName=[AboveGround].Wt
        MultiplyFunction PotentialHarvestIndex
          Memo
            11/07/2023: SeedFraction 0.45 at Maturity (0.04 and 0.055 N Conc) and 0.58 at HarvestRipe (0.033 and 0.043 N conc)

            If run model to Maturity, remove RipeningDuration from FillingDuration and DMDemandFunction
          VariableReference BollHarvestIndex: VariableName=[Boll].PotentialHarvestIndex
          VariableReference SeedFraction: VariableName=[Boll].DailyPartitioning.SeedFraction
        Constant MaximumPotentialBollSize: FixedValue=0
          Memo
            This parameter is not used.  Grain growth is calculated from harvest index increase.
        Constant NumberFunction: FixedValue=0
          Memo
            Grain number is not estimated by this model.
        NutrientPoolFunctions DMDemandPriorityFactors
          Constant Structural: FixedValue=1
          Constant Metabolic: FixedValue=1
          Constant Storage: FixedValue=1
        NutrientPoolFunctions NDemandPriorityFactors: same as Replacements.Cotton.Seed.DMDemandPriorityFactors
      ReproductiveOrgan Lint: GrowthRespiration=0; MaintenanceRespiration=0
        Biomass Live
        Biomass Dead
        PhaseLookup DMDemandFunction
          PhaseLookupValue BollFilling: Start=StartFlowering; End=Maturity
            MultiplyFunction HIDemand
              VariableReference AboveGroundWt: VariableName=[AboveGround].Wt
              DivideFunction HarvestIndexIncrease
                MaximumFunction OutstandingHarvestIndexIncrease
                  ExpressionFunction Increase: Expression=[Lint].PotentialHarvestIndex - [Lint].HarvestIndex
                  Constant Zero: FixedValue=0
                SubtractFunction TTRemaining
                  ExpressionFunction LintGrowthTT
                    Expression=[Phenology].EarlyFlowering.Target + [Phenology].Maturing.Target
                  ExpressionFunction LintGrowthTTComplete
                    Expression=[Phenology].EarlyFlowering.ProgressThroughPhase + [Phenology].Maturing.ProgressThroughPhase
              VariableReference ThermalTime: VariableName=[Phenology].ThermalTime
        Constant MaximumNConc: FixedValue=0
          Memo
            Values from:

            Sadras, V.O. and Wilson, L.J., 1997. Nitrogen accumulation and partitioning in shoots of cotton plants infested with two-spotted spider mites. Aust. J. Agric. Res., 48: 525-533.

            Min: 0.0020

            Max: 0.0037

            --> **Boquet, D.J. and Breitenbeck, G.A., 2000. Nitrogen Rate Effect on Partitioning of Nitrogen and Dry Matter by Cotton. Crop Sci., 40: 1685-1693.**

            Min: 0.0022

            Max: 0.0031

            Snider, J., et al. (2021). Chapter 22. Cotton. Crop Physiology. Case Histories for Major Crops. V. O. Sadras and D. F. Calderini: 715-746.

            2-3.7%
        Constant MinimumNConc: FixedValue=0
        Constant WaterContent: FixedValue=0.07
        MultiplyFunction NFillingRate
          VariableReference NConc: VariableName=[Lint].MaximumNConc
          VariableReference DMDemand: VariableName=[Lint].DMDemandFunction
          VariableReference DMConversionEfficiency: VariableName=[Lint].DMConversionEfficiency
        BiomassRemoval BiomassRemovalDefaults: HarvestFractionLiveToRemove=1; HarvestFractionDeadToRemove=1; HarvestFractionLiveToResidue=0; HarvestFractionDeadToResidue=0
        Constant DMConversionEfficiency: FixedValue=1
        Constant RemobilisationCost: FixedValue=0
        Constant CarbonConcentration: FixedValue=0.4
        DivideFunction HarvestIndex
          VariableReference LintWt: VariableName=[Lint].Wt
          VariableReference AboveGroundWt: VariableName=[AboveGround].Wt
        MultiplyFunction PotentialHarvestIndex
          Memo
            11/07/2023: LintFraction 0.30 at Maturity and 0.42 at HarvestRipe

            If run model to Maturity, remove RipeningDuration from FillingDuration and DMDemandFunction

            13/06/2023: Changed LintFraction from 0.30 to 0.25
          VariableReference BollHarvestIndex: VariableName=[Boll].PotentialHarvestIndex
          VariableReference LintFraction: VariableName=[Boll].DailyPartitioning.LintFraction
        Constant MaximumPotentialBollSize: FixedValue=0
          Memo
            This parameter is not used.  Grain growth is calculated from harvest index increase.
        Constant NumberFunction: FixedValue=0
          Memo
            Grain number is not estimated by this model.
        NutrientPoolFunctions DMDemandPriorityFactors: same as Replacements.Cotton.Seed.DMDemandPriorityFactors
        NutrientPoolFunctions NDemandPriorityFactors: same as Replacements.Cotton.Seed.DMDemandPriorityFactors
        DivideFunction Bales
          VariableReference LintWt: VariableName=[Lint].Wt
          Constant BaleWT: FixedValue=22.7; Units=kg
      Root: GrowthRespiration=0; MaintenanceRespiration=0
        Memo
          Include taproot? See crop model ***PlantainForage***

          *Snider, J., Bange, M. and Heitholt, J., 2021. Chapter 22. Cotton. In: V.O. Sadras and D.F. Calderini (Editors), Crop Physiology. Case Histories for Major Crops, pp. 715-746.*

          from EMERGENCE:

          During this time, the cotton plant exhibits rapid root growth. The primary root may be as much as 25-cm deep by the time the cotyledons unfold, and early season taproot growth proceeds at rates up to 6 cm per day under optimal
          conditions (Oosterhuis, 1990; Ritchie et al., 2007; Snider and Oosterhuis, 2015).

          CANOPY DEVELOPMENT:

          Root growth also continues during early canopy and square development. In fact, the onset of flowering represents a shift in source-sink relations towards greater reproductive growth and a significant reduction in root growth.

          Thus, crop growth before flowering is critical for developing a well-established root system and sufficient canopy to support growth and yield.

          Cotton root growth is rapid during the early part of the season and acts as the major sink for photosynthate until flowering and early boll development.

          ============================================================================================================================================

          Temperature effect on root growth?

          From:

          * Reddy et al. 1991a. Temperature effects on growth and development of cotton during the fruiting period. Agron. J. 83:211-217.
          * Hodges, H.F., Reddy, K.R., McKinion, J.M. and Reddy, V.R., 1993. Temperature Effects on Cotton, Mississippi State University, Mississippi, USA.

          Early in the season nearly 50% of the plants dry matter is found in the roots, but as the season progreses, the percentage dry matter in the root decreases. At maturity there is only about 10% in roots (Reddy 1991a)

          From:

          Hodges, H.F., Reddy, K.R., McKinion, J.M. and Reddy, V.R., 1993. Temperature Effects on Cotton, Mississippi State University, Mississippi, USA.

          Roots DM Partitioning:

          **CHECK THIS!!!!** Assuming, StartSquaring = ~20DAE = 40%, StartFlowering = ~50DAE = 30% and Cutout = ~80DAE = 20%
        RootShapeCylinder RootShape
        MultiplyFunction RootFrontVelocity
          Memo
            **06/02/2024:**

            **Roots as a function of soil drying. The dryer the soil, the quicker the roots grow down. See trial data DDRF and NAR0607Ir45!!**

            =======================================================================================

            Add temp factor?

            See Conaty's PhD page 39
          PhaseLookup PotentialRootFrontVelocity
            PhaseLookupValue PreEmergence: Start=Germination; End=Emergence
              Constant Function: FixedValue=5
            PhaseLookupValue early: Start=Emergence; End=Cutout
              Constant Function: FixedValue=23
            PhaseLookupValue late: Start=Cutout; End=Maturity
              Constant Function: FixedValue=5
          MinimumFunction StressModifiers
            WeightedTemperatureFunction TemperatureFactor: MaximumTemperatureWeighting=0.5
              XYPairs: X=[12, 30, 35, 42]; Y=[0, 1, 1, 0]
              Memo
                Soni, M., Sheshukov, A. Y., & Aguilar, J. (2025). The critical role of temperature in determining optimal planting schedule for cotton: A review. Agricultural and Forest Meteorology, 373. https://doi.org/10.1016/j.agrformet.2025.110741
            LinearInterpolationFunction AFPSFactor
              XYPairs: X=[0, 0.03, 1]; Y=[1, 1, 1]
              VariableReference XValue: VariableName=[Root].AirFilledPoreSpace
            LinearInterpolationFunction SWARatio
              XYPairs: X=[0, 0.25]; Y=[1, 1]
              VariableReference XValue: VariableName=[Root].SWAvailabilityRatio
            LinearInterpolationFunction SWScaler
              SoilWaterScale: LLModel=1
              XYPairs: X=[0, 0.25, 1]; Y=[1, 1, 1]
              VariableReference XValue: VariableName=[SoilWaterScale]
        Constant MaximumRootDepth: FixedValue=1000000
        Constant KLModifier: FixedValue=1; Units=0-1
          Memo
            No modification to water extraction rate is assumed in this model.
        LinearInterpolationFunction MaxDailyNUptake
          XYPairs: X=[0, 5]; Y=[6, 6]
          VariableReference XValue: VariableName=[Leaf].LAI
          Memo
            For all the previous reports, maximum rates of N uptake ranged from 1.3 to 4.3 kg ha− 1 d− 1 and the timing of the maximum rate varied from 49 to 98 days after sowing.

            FROM:

            Chapter 22. CottonJ. Snider, M. Bange and J. HeitholtIn: Crop Physiology. Case Histories for Major Crops, edited by V. O. Sadras and D. F. Calderini2021
        Constant SenescenceRate: FixedValue=0.005; Units=/d
        Constant MaximumNConc: FixedValue=0.01
        Constant MinimumNConc: FixedValue=0.005
        PhaseLookupValue NitrogenDemandSwitch: Start=Emergence; End=Cutout
          Constant: FixedValue=1
        Constant KNO3: FixedValue=0.02
        Constant KNH4: FixedValue=0
          Memo
            The current model version considers only NO3 uptake but NH4 option can be activated by the user . We do not expect activation of NH4 to change total plant N uptake because the nitrification rate (conversion of NH4 to NO3) is very fast in the model. In the future we will re-valuate this.
        BiomassRemoval BiomassRemovalDefaults: HarvestFractionLiveToRemove=0; HarvestFractionDeadToRemove=0; HarvestFractionLiveToResidue=0.2; HarvestFractionDeadToResidue=0
        LinearInterpolationFunction NUptakeSWFactor
          XYPairs: X=[0, 1]; Y=[0, 1]
          VariableReference XValue: VariableName=[Root].RWC
        Constant SpecificRootLength: FixedValue=60; Units=m/g
          Memo
            Specific root length default from OZCOT = 60000 mm/g
        Constant DMConversionEfficiency: FixedValue=1
        Constant MaintenanceRespirationFunction: FixedValue=1
        Constant RemobilisationCost: FixedValue=0
        Constant CarbonConcentration: FixedValue=0.4
        NutrientDemandFunctions DMDemands
          MultiplyFunction Structural
            PartitionFractionDemandFunction DMDemandFunction
              Memo
                Default:

                Preflowering: 0.2

                Flowering to cutout: 0.1
              Constant PartitionFraction: FixedValue=0.2
            Constant StructuralFraction: FixedValue=1
          Constant Metabolic: FixedValue=0
          StorageDMDemandFunction Storage
            SubtractFunction StorageFraction
              Constant One: FixedValue=1
              VariableReference StructuralFraction: VariableName=[Root].DMDemands.Structural.StructuralFraction
          Constant QStructuralPriority: FixedValue=1
          Constant QMetabolicPriority: FixedValue=1
          Constant QStoragePriority: FixedValue=1
        NutrientDemandFunctions NDemands
          MultiplyFunction Structural
            VariableReference MinNconc: VariableName=[Root].minimumNconc
            VariableReference PotentialDMAllocation: VariableName=[Root].potentialDMAllocation.Structural
          MultiplyFunction Metabolic
            SubtractFunction MetabolicNconc
              VariableReference CritNconc: VariableName=[Root].criticalNConc
              VariableReference MinNconc: VariableName=[Root].minimumNconc
            VariableReference PotentialDMAllocation: VariableName=[Root].potentialDMAllocation.Structural
          StorageNDemandFunction Storage
            VariableReference NitrogenDemandSwitch: VariableName=[Root].nitrogenDemandSwitch
            VariableReference MaxNconc: VariableName=[Root].maximumNconc
          Constant QStructuralPriority: FixedValue=1
          Constant QMetabolicPriority: FixedValue=1
          Constant QStoragePriority: FixedValue=1
        VariableReference CriticalNConc: VariableName=[Root].MinimumNConc
        NutrientPoolFunctions InitialWt
          Constant Structural: FixedValue=0.2; Units=g/plant
          Constant Metabolic: FixedValue=0
          Constant Storage: FixedValue=0
        Manager PAWCInRootZone
```csharp
using APSIM.Numerics;
using APSIM.Shared.Utilities;
using Models.PMF.Organs;
using Models.PMF;
using Models.Core;
using System.Linq;
using System;
using Models.Soils;
namespace Models
{
    [Serializable]
    public class Script : Model
    {
        [Link] Clock Clock;
        [Link] Physical physical;
        [Link] Water water;
        [Link] Root root;
        
        private double[] zeroArray;
        
        public double[] PAWInRootZone { get; private set; }
        public double[] PAWCInRootzone { get; private set; }
        
        [EventSubscribe("StartOfSimulation")]
        private void OnStartOfSimulation(object sender, EventArgs e)
        {
        	zeroArray = new double[physical.Thickness.Length];
        	//System.Diagnostics.Debugger.Break();
        }
        
        
        [EventSubscribe("DoManagementCalculations")]
        private void OnDoManagementCalculations(object sender, EventArgs e)
        {
        	if (root.Depth == 0)
        	{
				PAWInRootZone = zeroArray;
				PAWCInRootzone = zeroArray;
        	}
        	else
        	{
        		// Create a thickness array with zeros below root depth.
        		double[] rootDepthThickness = (double[]) physical.Thickness.Clone();
        		int layerIndexBottomRootZone = SoilUtilities.LayerIndexOfDepth(physical.Thickness, root.Depth);
        		
        		double depthOfLayerAboveBottomOfRootZone = 0;
        		if (layerIndexBottomRootZone > 0)
				{        		
		    		double[] cumThickness = SoilUtilities.ToCumThickness(physical.Thickness);
		    		depthOfLayerAboveBottomOfRootZone = cumThickness[layerIndexBottomRootZone-1];
		    	}
		    		
	    		rootDepthThickness[layerIndexBottomRootZone] = root.Depth - depthOfLayerAboveBottomOfRootZone;
				for (int i = layerIndexBottomRootZone+1; i < physical.Thickness.Length; i++)
		    		rootDepthThickness[i] = 0;
		    	
		        PAWInRootZone = MathUtilities.Multiply(water.PAW, rootDepthThickness);
            	PAWCInRootzone = MathUtilities.Multiply(physical.PAWC, rootDepthThickness);
        	}
        }
    }
}
```
        DivideFunction PAW_ratio
          VariableReference PAW: VariableName=sum([PAWCInRootZone].Script.PAWInRootZone)
          VariableReference PAWC: VariableName=sum([PAWCInRootZone].Script.PAWCInRootZone)
        BoundFunction SMI
          Constant Lower: FixedValue=0
          Constant Upper: FixedValue=1
          VariableReference: VariableName=[Cotton].Root.PAW_ratio
        ProtectedDivideFunction SWAvailabilityRatio: NumeratorErrVal=0; DenominatorErrVal=10
          VariableReference extractable: VariableName=[ISoilWater].ESW
          SubtractFunction capacity
            VariableReference dulDep: VariableName=[Soil].Physical.DULmm
            VariableReference llDep: VariableName=[Root].PlantZone.SoilCrop.LLmm
      CompositeBiomass Boll: OrganNames=[Bur, Seed, Lint]; IncludeLive=true; IncludeDead=true
        Memo
          Boll components develop following an S-curve.

          For DM boll component fractions:

          * Kohel, R. J. and C. R. Benedict (1984). "Year Effects on Partitioning of Dry Matter into Cotton Boll Components." Crop Science 24(2).
          * Pace, P. F., et al. (1999). "Photosynthate and Dry Matter Partitioning in Short‐ and Long‐Season Cotton Cultivars." Crop Science 39(4): 1065-1069.
          * Boquet, D. J. and G. A. Breitenbeck (2000). "Nitrogen Rate Effect on Partitioning of Nitrogen and Dry Matter by Cotton." Crop Science 40: 1685-1693.
          * Makhdum, M. I., et al. (2006). "Dry matter accumulation and partitioning in cotton (Gossypium hirsutum L.) as influenced by potassium fertilization." Biology and Fertility of Soils 43(3): 295-301.
          * Tang, F. and W. Xiao (2013). "Dry Matter Accumulation and Partitioning in Various Fractions of Cotton Bolls." Experimental Agriculture 49(4): 543-555.
          * Pabuayon, I. L. B., et al. (2020). "Dry matter and nutrient partitioning changes for the past 30 years of cotton production." Agronomy Journal 112(5): 4373-4385.
        DivideFunction HarvestIndex
          VariableReference BollWt: VariableName=[Boll].Wt
          VariableReference AboveGroundWt: VariableName=[AboveGround].Wt
        Constant PotentialHarvestIndex: FixedValue=0.5
        Folder DailyPartitioning
          LinearInterpolationFunction BurFraction
            XYPairs: X=[5, 7]; Y=[0.7, 0.22]
            VariableReference XValue: VariableName=[Phenology].Stage
          LinearInterpolationFunction LintFraction
            XYPairs: X=[5, 6, 7]; Y=[0, 0.36, 0.36]
            VariableReference XValue: VariableName=[Phenology].Stage
          ExpressionFunction SeedFraction
            Expression=1 - [Boll].DailyPartitioning.BurFraction - [Boll].DailyPartitioning.LintFraction
        DivideFunction BurFraction
          VariableReference BurWt: VariableName=[Bur].Wt
          VariableReference BollWt: VariableName=[Boll].Wt
        DivideFunction SeedFraction
          VariableReference SeedWt: VariableName=[Seed].Wt
          VariableReference BollWt: VariableName=[Boll].Wt
        DivideFunction LintFraction
          VariableReference LintWt: VariableName=[Lint].Wt
          VariableReference BollWt: VariableName=[Boll].Wt
        DivideFunction SeedCottonFraction
          ExpressionFunction SeedCottonWt: Expression=[Lint].Wt + [Seed].Wt
          VariableReference BollWt: VariableName=[Boll].Wt
        MovingAverageFunction PotentialGrowthRate: NumberOfDays=7; StageToStartMovingAverage=Emergence
          VariableReference DailyRate
            VariableName=[Bur].DMDemand.Total + [Seed].DMDemand.Total + [Lint].DMDemand.Total
        ProtectedDivideFunction BollRatio: NumeratorErrVal=0; DenominatorErrVal=1
          VariableReference PotentialBollGrowthRate: VariableName=[Boll].PotentialGrowthRate
          VariableReference AboveGroundGrowthRate: VariableName=[AboveGround].GrowthRate
      CompositeBiomass AboveGround: OrganNames=[Leaf, Stem, Bur, Seed, Lint]; IncludeLive=true; IncludeDead=true
        MovingAverageFunction GrowthRate: NumberOfDays=7; StageToStartMovingAverage=Emergence
          VariableReference DailyRate
            VariableName=[Leaf].Allocated.Wt + [Stem].Allocated.Wt + [Bur].Allocated.Wt + [Seed].Allocated.Wt + [Lint].Allocated.Wt
      CompositeBiomass AboveGroundLive: OrganNames=[Leaf, Stem, Bur, Seed, Lint]; IncludeLive=true; IncludeDead=false
      CompositeBiomass BelowGround: OrganNames=[Root]; IncludeLive=true; IncludeDead=true
      CompositeBiomass Total: OrganNames=[Leaf, Stem, Bur, Seed, Lint, Root]; IncludeLive=true; IncludeDead=true
        MovingAverageFunction GrowthRate: NumberOfDays=7; StageToStartMovingAverage=Emergence
          VariableReference DailyRate: VariableName=[Arbitrator].TotalDMFixationSupply
      CompositeBiomass TotalLive: OrganNames=[Leaf, Stem, Bur, Seed, Lint, Root]; IncludeLive=true; IncludeDead=false
      CompositeBiomass TotalDead: OrganNames=[Leaf, Stem, Bur, Seed, Lint, Root]; IncludeLive=false; IncludeDead=true
      Constant MortalityRate: FixedValue=0
      Constant SeedMortalityRate: FixedValue=0
      Folder Cultivars
        Memo
          Note: Cultivars in the Cotton model are currently assumed to have the same parameter values until further data is collated on individual cultivars to allow testing across a wide range of environments for a given cultivar.
        Cultivar Sicot_71B
          Command:
            //[Leaf].SpecificArea.FixedValue = 0.012
            //[Leaf].AreaLargestMainstemLeaf.FixedValue = 0.011 //0.006
            //[Leaf].AreaLargestSympodialLeaf.FixedValue = 0.009 //0.006
            [Phenology].Squaring.Target.FloweringTT.FixedValue = 530
        Cultivar Sicot_748B3F
          Command:
            //[Leaf].SpecificArea.FixedValue = 0.0201
            //[Leaf].AreaLargestMainstemLeaf.FixedValue = 0.023       //0.021
            //[Leaf].AreaLargestSympodialLeaf.FixedValue = 0.017      //0.012
        Cultivar Sicot_74BRF
          Command:
            //[Leaf].SpecificArea.FixedValue = 0.015
            //[Leaf].AreaLargestMainstemLeaf.FixedValue = 0.023
            //[Leaf].AreaLargestSympodialLeaf.FixedValue = 0.017
            [Phenology].Squaring.Target.FloweringTT.FixedValue = 530
        Cultivar 748V2C
          Command:
            [Root].MaxDailyNUptake.XYPairs.Y = 10, 10
            [Phenology].Squaring.Target.FloweringTT.FixedValue = 530
        Cultivar Sicot_70BRF
        Cultivar Sicot_746B3F
          Command:
            //[Leaf].AreaLargestMainstemLeaf.FixedValue = 0.023
            //[Leaf].AreaLargestSympodialLeaf.FixedValue = 0.017
        Cultivar Sicala V-3RRi
      MovingAverageFunction AvRadn: NumberOfDays=7; StageToStartMovingAverage=Emergence
        VariableReference DailyRate: VariableName=[Weather].Radn
      LessThanFunction RadnDeficit
        VariableReference DailyRadiation: VariableName=[Weather].Radn
        Constant RadiationThreshold: FixedValue=24.2
        SubtractFunction
          VariableReference: VariableName=[Cotton].RadnDeficit.RadiationThreshold
          VariableReference VariableReference1: VariableName=[Weather].Radn
      AccumulateFunction AccumulateRadnDef: StartStageName=StartFlowering; EndStageName=HarvestRipe; FractionRemovedOnCut=0; FractionRemovedOnHarvest=0; FractionRemovedOnGraze=0; FractionRemovedOnPrune=0
        VariableReference: VariableName=[Cotton].RadnDeficit
        Memo
          Grundy, P. R., Yeates, S. J., & Bell, K. L. (2020). Cotton production during the tropical monsoon season. I – The influence of variable radiation on boll loss, compensation and yield. Field Crops Research, 254, 107790. https://doi.org/10.1016/j.fcr.2020.107790
  Folder Validation
    Folder Douglas Daly Row Spacing 2021
      Memo
        08/12/2023:

        This site has vegetative branches, starting sometimes at node 1, with large leaf area on nodes 4 and 5. In the current model, branches are simulated from node 7.

        Also LAI relative area is based on phenological stage --> with 10% at flowering / this is at a much higher node number, so for DDRF the early large canopy will never be achieved

        Requires:

        1. RelativeArea to be based on node number, with about node 3 about 0.4 and 4 0.7 ' flowering 0.6 already compared with 0.2 for narrabri --> because of veg branches!!!
        2. Branching_Rate to start at Node 1
        3. [#Leaf].AreaLargestLeaf.FixedValue should be 0.025 or even 0.06 (Burdekin data)!!!!!

        Until squaring, leaf area mostly from mainstem leaves

        Leaf area follows a sigmoidal growth pattern, characterised by a lag phase, an exponential growth phase, and a plateau
        phase. The lag phase was already discussed, and in this stage of growth, leaf area is entirely accounted for by mainstem
        leaves. Sometime between squaring and flowering, leaf area enters an exponential growth phase.

        * Site production simulation? Obs vs pred not correct!
        * Parameter R reduce from 0.5 to 0.3?

        =========================================================

        Harvest Index:

        Lint: 0.45

        Seed: 0.65

        Bur: 0.10
      Memo Phenology stages Observed
        Stage|RS1000|DAS|RS500|DAS
        -|-|-|-|-
        Sowing|7 Jan 2021|0|7 Jan 2021|0
        Squaring|10 Feb 2021|34|10 Feb 2021|34
        Flowering|3 Mar 2021|55|3 Mar 2021|55
        Cutout|22 Mar 2021|74|22 Mar 2021|74
        OpenBolls|21 Apr 2021|104|21 Apr 2021|104
        Maturity|19 May 2021|132|5 May 2021|132
        HarvestRipe|2 Jun 2021|146|2 Jun 2021|146

        Defoliation on 19 May 2021 & 02 Jun 2021
      Memo Growth regulator details
        Growth regulator application (mepiquat 350):

        Rate (L/ha)

        Date|RS500|RS1000|RS1500
        -|-|-|-
        10 Feb 2021|0.4|-|-
        17 Feb 2021|-|0.4|-
        09 Mar 2021|0.4|0.4|0.4
        26 Mar 2021|0.8|0.8|0.8
      Experiment DDRF21
        Factors
          CompositeFactor RS1500: Specifications=[Operations]
            Operations
              2021-01-07  [Cotton].Sow(population: 4.7, cultivar: Sicot_748B3F , depth: 20, rowSpacing: 1500);
              2021-01-28  [Fertiliser].Apply(64.4, "UreaN",10);
              2021-02-16  [Fertiliser].Apply(64.4, "UreaN",10);
          CompositeFactor RS1000: Specifications=[Operations]
            Operations
              2021-01-07  [Cotton].Sow(population: 7, cultivar: Sicot_748B3F , depth: 20, rowSpacing: 1000);
              2021-01-28  [Fertiliser].Apply(64.4, "UreaN",10);
              2021-02-16  [Fertiliser].Apply(64.4, "UreaN",10);
          CompositeFactor RS500: Specifications=[Operations]
            Operations
              2021-01-07  [Cotton].Sow(population: 14, cultivar: Sicot_748B3F , depth: 20, rowSpacing: 500);
              2021-01-28  [Fertiliser].Apply(64.4, "UreaN",10);
              2021-02-16  [Fertiliser].Apply(64.4, "UreaN",10);
        Simulation DDRF21Base
          Clock: Start=2021-01-01; End=2021-06-30
          Summary summaryfile
          Weather: FileName=Weatherfiles/NT_RS-DDRF2021.met
          SoilArbitrator Soil Arbitrator
          MicroClimate: a_interception=0; b_interception=1; c_interception=0; d_interception=0; SoilHeatFluxFraction=0.4; MinimumHeightDiffForNewLayer=0; NightInterceptionFraction=0.5; ReferenceHeight=2
          Zone paddock: Area=1; Slope=0; AspectAngle=0; Altitude=50
            Fertiliser
            Operations
            Operations InitialiseSurfaceOM
              2021-01-01  [SurfaceOrganicMatter].Add(4450,61,0,"Wheat","Wheat");
            Irrigation
            Manager HarvestAfterDate
              HarvestDate = 2-jun
```csharp
using Models.Soils;
using System;
using Models.Core;
using System.Text;
using Models.PMF;
using Models;
using APSIM.Shared.Utilities;
using Models.PMF.Phen;

namespace Models
{
    [Serializable] 
    public class Script : Model
    {
        [Link] ISummary summary;
        [Link] private Plant cotton;
        [Link(Type = LinkType.Path, Path = "[cotton].Phenology")]
        private Phenology phenology;
                [Link] Clock Clock;

        private bool Harvestable = false;

        [Description("Harvest Date (d-mmm)")]
        public string HarvestDate { get; set; }   
      
        [EventSubscribe("DoManagement")]
        private void OnDoManagement(object sender, EventArgs e)
        {
           
            if (Harvestable && phenology.CurrentPhase.Name == "ReadyForHarvesting")
            {
                cotton.Harvest();
                cotton.EndCrop();                
            }
            
            if (DateUtilities.DatesAreEqual(HarvestDate, Clock.Today))
                Harvestable = true;

        }
    }
}
```
            Soil Tindall DDRF 2021 adjusted 20230629: SoilType=Haplic Mesotrophic Red Dermosol; LocalName=Tindall; Site=RS-DDRF; NearestTown=Pine Creek; Region=Daly Basin; State=Northern Territory; Country=Australia; Latitude=-13.83; Longitude=131.21; YearOfSampling=2021; DataSource=CSIRO/NTDPI
              Physical
                Thickness  ParticleSizeSand  ParticleSizeSilt  ParticleSizeClay  Rocks     BD    AirDry  LL15  DUL    SAT
                300        5                 65                30                0.106305  1.55  0.035   0.07  0.19   0.345
                300        5                 65                30                0         1.66  0.11    0.15  0.265  0.324
                300        5                 65                30                0.106305  1.55  0.15    0.16  0.23   0.345
                300        5                 65                30                0.117763  1.61  0.18    0.18  0.265  0.322
                300        5                 65                30                0.106305  1.55  0.15    0.15  0.23   0.345
                300        5                 65                30                0.106305  1.55  0.15    0.15  0.23   0.345
                300        5                 65                30                0.117497  1.62  0.15    0.15  0.23   0.319
                DUL source: Field measured and checked for sensibility
                Rocks, ParticleSizeSand, ParticleSizeSilt, ParticleSizeClay source: Calculated
                SoilCrop CottonSoil: LL=[0.07, 0.15, 0.15, 0.18, 0.15, 0.15, 0.15]; KL=[0.06, 0.04, 0.04, 0.02, 0.02, 0.02, 0.01]; XF=[1, 1, 1, 1, 1, 1, 1]
              WaterBalance SoilWater: SummerDate=1-Sep; SummerU=6; SummerCona=3.5; WinterDate=1-Jun; WinterU=4; WinterCona=2.5; DiffusConst=88; DiffusSlope=35.4; Salb=0.13; CN2Bare=80; CNRed=20; CNCov=0.8; PSIDul=-100; Thickness=[300, 300, 300, 300, 300, 300, 300]; SWCON=[0.9, 0.7, 0.5, 0.4, 0.4, 0.4, 0.4]
              Organic: FOMCNRatio=40; CarbonUnits=Total
                Thickness  Carbon  SoilCNRatio  FBiom  FInert  FOM
                300        0.33    12           0.07   0.3     237.302
                300        0.21    12           0.02   0.3     183.495
                300        0.16    12           0.02   0.4     141.889
                300        0.11    12           0.02   0.6     109.717
                300        0.1     12           0.01   0.9     84.839
                300        0.1     12           0.01   0.95    65.603
                300        0.1     12           0.01   0.95    50.728
                300        0.1     12           0.01   0.95    39.226
                300        0.1     12           0.01   0.95    30.332
                300        0.1     12           0.01   0.95    23.454
                300        0.1     12           0.01   0.95    18.136
                200        0.05    12           0.01   1       15.279
              Chemical: PHUnits=Water
                Thickness  PH   CEC
                300        6.2  9.0875
                300        6.3  8.8175
                300        6.4  8.705
                300        6.4  8.5925
                CEC source: Calculated
                PH source: Measured (layer 1, 2, 3, 4)
              Nutrient
              Water: Thickness=[300, 300, 300, 300, 300, 300, 300]; InitialValues=[0.19, 0.265, 0.23, 0.18, 0.15, 0.15, 0.15]; FilledFromTop=true
              Solute NO3: Thickness=[300, 300, 300, 300]; InitialValues=[0.5, 0.6, 0.4, 0.4]; InitialValuesUnits=ppm; WaterTableConcentration=0; D0=0; DepthConstant=0; MaxDepthSoluteAccessible=0; RunoffEffectivenessAtMovingSolute=0; MaxEffectiveRunoff=0
              Solute NH4: Thickness=[300, 300, 300, 300]; InitialValues=[0.4, 0.4, 0.2, 0.2]; InitialValuesUnits=ppm; WaterTableConcentration=0; D0=0; DepthConstant=0; MaxDepthSoluteAccessible=0; RunoffEffectivenessAtMovingSolute=0; MaxEffectiveRunoff=0
              Solute Urea: Thickness=[1800]; InitialValuesUnits=ppm; WaterTableConcentration=0; D0=0; DepthConstant=0; MaxDepthSoluteAccessible=0; RunoffEffectivenessAtMovingSolute=0; MaxEffectiveRunoff=0
              SoilTemperature Temperature: InteractionsPerDay=8
            SurfaceOrganicMatter: InitialResidueName=Improved pasture; InitialResidueType=nativepasture; InitialResidueMass=1; InitialStandingFraction=1; InitialCPR=0; InitialCNR=34
            Plant Cotton: PlantType=Cotton
            Report DailyReport: EventNames=[Clock].DoReport
              VariableNames:
                [Clock].Today
                [Clock].Today.DayOfYear
                [Weather].Rain
                [Weather].MeanT
                [Weather].MaxT
                [Weather].MinT
                [Weather].Radn
                [Weather].VPD
                [Cotton].DaysAfterSowing
                [Cotton].Arbitrator.DM.TotalFixationSupply
                [Cotton].Arbitrator.TotalDMFixationSupply
                [Cotton].Arbitrator.N.TotalFixationSupply
                [Cotton].Arbitrator.N.TotalPlantDemand
                [Cotton].Arbitrator.N.TotalPlantSupply
                sum([Cotton].Arbitrator.N.Fixation) as NFixed
                [Cotton].NitrogenUptake
                [Cotton].Phenology.Stage
                [Cotton].Phenology.ThermalTime
                [Cotton].Phenology.CurrentStageName
                [Cotton].Phenology.Photoperiod
                [Cotton].Phenology.EmergenceDAS
                [Cotton].Phenology.SquaringDAS
                [Cotton].Phenology.FloweringDAS
                [Cotton].Phenology.CutoutDAS
                [Cotton].Phenology.OpenbollsDAS
                [Cotton].Phenology.MaturityDAS
                [Cotton].AboveGround.Wt
                [Cotton].AboveGround.N
                [Cotton].AboveGroundLive.Wt
                [Cotton].Leaf.NodeNumber
                [Cotton].Leaf.Fw
                [Cotton].Leaf.Fn
                [Cotton].Leaf.Photosynthesis.FT
                [Cotton].Leaf.Photosynthesis.FVPD
                [Cotton].Leaf.LAI
                [Cotton].Leaf.HeightFunction
                [Cotton].Leaf.Height
                [Cotton].Leaf.CoverGreen
                [Cotton].Leaf.CoverTotal
                [Cotton].Leaf.Live.Wt
                [Cotton].Leaf.Live.StructuralWt
                [Cotton].Leaf.Live.MetabolicWt
                [Cotton].Leaf.Allocated.MetabolicWt
                [Cotton].Leaf.Allocated.StructuralWt
                [Cotton].Leaf.Dead.StructuralWt
                [Cotton].Leaf.Dead.MetabolicWt
                [Cotton].Leaf.Live.N
                [Cotton].Leaf.Live.NConc
                [Cotton].Leaf.Dead.Wt
                [Cotton].Leaf.Dead.N
                [Cotton].Leaf.Dead.NConc
                [Cotton].Leaf.RadiationIntercepted
                [Cotton].Leaf.Wt
                [Cotton].Leaf.NConc
                [Cotton].Leaf.N
                [Cotton].Leaf.Senesced.Wt
                [Cotton].Leaf.BranchNumber
                [Cotton].Leaf.SpecificAreaCanopy
                [Cotton].Leaf.Sites
                [Cotton].Leaf.SpecificArea
                [Cotton].Leaf.CoverTotal
                [Cotton].Stem.Wt
                [Cotton].Stem.Total.StructuralWt
                [Cotton].Stem.Live.StructuralWt
                [Cotton].Stem.Live.StructuralN
                [Cotton].Stem.N
                [Cotton].Stem.NConc
                [Cotton].Lint.Wt
                [Cotton].Lint.N
                [Cotton].Lint.NConc
                [Cotton].Lint.Bales as Bales
                [Cotton].Boll.HarvestIndex
                [Cotton].Lint.Allocated.Wt
                [Cotton].Lint.DMDemand.Total
                [Cotton].Leaf.DMDemand.Total
                [Cotton].Bur.DMDemand.Total
                [Cotton].Stem.DMDemand.Total
                ([Cotton].Bur.DMDemand.Total+[Cotton].Lint.DMDemand.Total+[Cotton].Seed.DMDemand.Total) as BollDMDemand
                ([Cotton].Stem.DMDemand.Total+[Cotton].Leaf.DMDemand.Total) as VegetativeDMDemand
                ([Cotton].Stem.DMDemand.Total+[Cotton].Leaf.DMDemand.Total+[Cotton].Lint.DMDemand.Total+[Cotton].Seed.DMDemand.Total+[Cotton].Bur.DMDemand.Total) as ShootDMDemand
                [Cotton].Root.DMDemand.Total
                [Cotton].Lint.NDemand.Total
                [Cotton].Leaf.NDemand.Total
                [Cotton].Stem.NDemand.Total
                [Cotton].Root.NDemand.Total
                [Cotton].Root.NUptake
                [Cotton].Lint.LiveFWt
                [Cotton].Root.Wt
                [Cotton].Root.Depth
                [Soil].Water.Volumetric[1:3]
                [Soil].Water.Volumetric
                sum([Soil].SoilWater.ESW) as TotalESW
                [Soil].SoilWater.SW
                ([Soil].SoilWater.SWmm[1]+[Soil].SoilWater.SWmm[2]+[Soil].SoilWater.SWmm[3]+[Soil].SoilWater.SWmm[4]+[Soil].SoilWater.SWmm[5]+[Soil].SoilWater.SWmm[6]) as SWmm1800
                ([Soil].SoilWater.ESW[1]+[Soil].SoilWater.ESW[2]+[Soil].SoilWater.ESW[3]+[Soil].SoilWater.ESW[4]+[Soil].SoilWater.ESW[5]+[Soil].SoilWater.ESW[6]) as ESW1800
                sum([Soil].NO3.kgha) as TotalSoilNO3
                sum([Soil]..NH4.kgha) as TotalSoilNH4
                sum([Soil].Water.MM) as TotalSW
                sum([Soil].NO3.ppm) as NO3
                sum([Soil].NH4.ppm) as NH4
                sum([Soil].Water.Volumetric) as TotalSWC
                sum([Soil].Water.MM) as TotalWaterMM
                ([Soil].Water.MM[1]+[Soil].Water.MM[2]+[Soil].Water.MM[3]+[Soil].Water.MM[4]+[Soil].Water.MM[5]+[Soil].Water.MM[6]+[Soil].Water.MM[7]) as SW1500mm
                ([Soil].Water.MM[1]+[Soil].Water.MM[2]+[Soil].Water.MM[3]+[Soil].Water.MM[4]+[Soil].Water.MM[5]+[Soil].Water.MM[6]) as SW1800mm
                ([Soil].Water.MM[1]+[Soil].Water.MM[2]+[Soil].Water.MM[3]+[Soil].Water.MM[4]+[Soil].Water.MM[5]) as SW1200mm
                (sum([CottonSoil].PAWmm)/sum([CottonSoil].PAWCmm)) as AvailableSoilMoisture
                ([CottonSoil].PAWmm[1]+[CottonSoil].PAWmm[2]+[CottonSoil].PAWmm[3]+[CottonSoil].PAWmm[4]+[CottonSoil].PAWmm[5]) as PAWTop5Layers
                -(([CottonSoil].PAWCmm[1]+[CottonSoil].PAWCmm[2]+[CottonSoil].PAWCmm[3]+[CottonSoil].PAWCmm[4]+[CottonSoil].PAWCmm[5])-([CottonSoil].PAWmm[1]+[CottonSoil].PAWmm[2]+[CottonSoil].PAWmm[3]+[CottonSoil].PAWmm[4]+[CottonSoil].PAWmm[5])) as SoilWaterDeficit120
                [Irrigation].IrrigationApplied
                [Cotton].Boll.Wt
                [Cotton].Lint.Wt
                [Cotton].Seed.Wt
                [Cotton].Bur.Wt
                [Cotton].NitrogenUptake
                sum([Soil].SoilWater.SWmm) as TotalSWmm
                ([Soil].SoilWater.SWmm[1]) as SW1
                ([Soil].SoilWater.SWmm[2]) as SW2
                ([Soil].SoilWater.SWmm[3]) as SW3
                ([Soil].SoilWater.SWmm[4]) as SW4
                ([Soil].SoilWater.SWmm[5]) as SW5
                ([Soil].SoilWater.SWmm[6]) as SW6
                ([Soil].SoilWater.SWmm[1]+[Soil].SoilWater.SWmm[2]+[Soil].SoilWater.SWmm[3]+[Soil].SoilWater.SWmm[4]+[Soil].SoilWater.SWmm[5]+[Soil].SoilWater.SWmm[6]) as SWmm1800
                [Soil].SoilWater.ESW[1] as ESW1
                [Soil].SoilWater.ESW[2] as ESW2
                [Soil].SoilWater.ESW[3] as ESW3
                [Soil].SoilWater.ESW[4] as ESW4
                [Soil].SoilWater.ESW[5] as ESW5
                [Soil].SoilWater.ESW[6] as ESW6
                [Soil].SoilWater.PAWmm[1] as PAW1
                [Cotton].Arbitrator.SDRatio
                [Cotton].Arbitrator.SDRatioBound
                [Cotton].Phenology.AccB_PER
                [Cotton].Phenology.BollPeriod
                [Cotton].Phenology.GrowthRate.CGR
                [Cotton].Phenology.GrowthRate.FGR
                [Cotton].Phenology.GrowthRate.CGR.SubtractFunction.AboveGroundToday
                [Cotton].Phenology.GrowthRate.CGR.SubtractFunction.AboveGroundYesterday
                [Cotton].Phenology.GrowthRateScript.Script.AboveGroundYesterday
                [Cotton].Phenology.GrowthRate.CGR.SubtractFunction.AboveGroundToday
                [Cotton].Phenology.GrowthRate.CGR.SubtractFunction.AboveGroundYesterday
                [Cotton].Phenology.GrowthRate.FGR.SubtractFunction.FruitToday
                [Cotton].Phenology.GrowthRate.FGR.SubtractFunction.FruitYesterday
                [Cotton].Phenology.GrowthRate.CGR
                [Cotton].Phenology.GrowthRate.FGR
            Report HarvestReport: EventNames=[Cotton].Harvesting
              VariableNames:
                [Clock].Today
                [Cotton].Phenology.CurrentStageName
                [Cotton].Phenology.EmergenceDAS
                [Cotton].Phenology.SquaringDAS
                [Cotton].Phenology.FloweringDAS
                [Cotton].Phenology.CutoutDAS
                [Cotton].Phenology.OpenbollsDAS
                [Cotton].Phenology.MaturityDAS
                [Cotton].AboveGround.Wt
                [Cotton].Boll.Wt
            Report SoilReport: EventNames=[Clock].DoReport
              VariableNames:
                [Clock].Today
                [Cotton].DaysAfterSowing
                sum([Soil].Water.MM) as TotalSWmm
                [Soil].Water.MM
                ([Soil].Water.MM[1]+[Soil].Water.MM[2]+[Soil].Water.MM[3]+[Soil].Water.MM[4]+[Soil].Water.MM[5]+[Soil].Water.MM[6]) as TotalSW180cm
      Memo
        Should resemble an S-curve
    Folder Douglas Daly 2020 Irrigation
      Memo
        Soil samples taken on 10/2/2020, so a week after sowing

        Irrigation added to rainfall in weather file
      Memo Phenology stages Observed
        Stage|Date|DAS
        -|-|-
        Sowing|6 Feb 2020|0
        Emergence||
        3 Leaves | 18 Feb 2020 | 12
        Squaring|9 Mar 2020 |32
        Flowering|25 Mar 2020 | 48
        Cutout|29 April 2020 | 83
        OpenBolls|27 May 2020|111
        Maturity|26 Jun 2020|141
        HarvestRipe|15 Jul 2020|160
      Memo Growth regulator details
        Growth regulator application (Pix):

        Date|Rate (L/ha)
        -|-
        22-23 Feb 2020|0.09
        04 Apr 2020|1.2
      Experiment DouglasDaly2021
        Factors
          Factor Irrigation: Specification=[Sowing]
            Manager Full
              Crop = [Cotton]
              SowDate = 6-feb
              CultivarName = Sicot_746B3F
              SowingDepth = 40
              RowSpacing = 1000
              Population = 10.5
```csharp
using APSIM.Shared.Utilities;
using Models.Utilities;
using Models.Soils;
using Models.PMF;
using Models.Core;
using System;

namespace Models
{
    [Serializable]
    public class Script : Model
    {
        [Link] Clock Clock;
        [Link] Fertiliser Fertiliser;
        [Link] Summary Summary;
        [Link] Soil Soil;
        
        [Description("Crop")]
        public IPlant Crop { get; set; }

        [Description("Sowing date (d-mmm)")]
        public string SowDate { get; set; }

        [Display(Type = DisplayType.CultivarName)]
        [Description("Cultivar to be sown")]
        public string CultivarName { get; set; }

        [Description("Sowing depth (mm)")]
        public double SowingDepth { get; set; }

        [Description("Row spacing (mm)")]
        public double RowSpacing { get; set; }

        [Description("Plant population (/m2)")]
        public double Population { get; set; }

        [EventSubscribe("DoManagement")]
        private void OnDoManagement(object sender, EventArgs e)
        {
            if (DateUtilities.WithinDates(SowDate, Clock.Today, SowDate))
            {
                Crop.Sow(population: Population, cultivar: CultivarName, depth: SowingDepth, rowSpacing: RowSpacing);    
            }
        }
    }
}
```
        Simulation DouglasDaly20211Base
          Clock: Start=2019-12-01; End=2020-08-16
          Summary summaryfile
          Weather: FileName=Weatherfiles/MI 2020.met
          SoilArbitrator Soil Arbitrator
          MicroClimate: a_interception=0; b_interception=1; c_interception=0; d_interception=0; SoilHeatFluxFraction=0.4; MinimumHeightDiffForNewLayer=0; NightInterceptionFraction=0.5; ReferenceHeight=2
          Zone paddock: Area=1; Slope=0; AspectAngle=0; Altitude=50
            Manager Sowing: same as Validation.Douglas Daly 2020 Irrigation.DouglasDaly2021.Factors.Irrigation.Full
            Fertiliser
            Operations FertiliserEvents
              2020-02-05  [Fertiliser].Apply(1.3, "NO3N",10);
              2020-02-19  [Fertiliser].Apply(41.3, "NO3N",10);
              2020-03-06  [Fertiliser].Apply(40.5, "NO3N",10);
              2020-03-21  [Fertiliser].Apply(40.5, "NO3N",10);
            Irrigation
            Manager HarvestAfterDate
              HarvestDate = 15-jul
              script: same as in Validation.Douglas Daly Row Spacing 2021.DDRF21.DDRF21Base.paddock.HarvestAfterDate
            Soil Oollo_McBean_2020_187mm_claysat_60cm: SoilType=Sandy Loam; LocalName=SM20; Site=Sam McBean; NearestTown=Douglas Daly; Region=Douglas Daly; State=NT; Country=Australia; Latitude=0; Longitude=0; LocationAccuracy=Regional Soils; YearOfSampling=0; DataSource=Ian Bigs & Nick Hartly
              Comments=Modified from Tonks Camp Sandly Loam by S Yeates using local data
              Physical
                Thickness  ParticleSizeSand  ParticleSizeSilt  ParticleSizeClay  Rocks  BD    AirDry  LL15   DUL    SAT    KS
                150        5                 65                30                0      1.42  0.009   0.031  0.157  0.434  50
                150        5                 65                30                0      1.71  0.011   0.047  0.177  0.35   50
                300        5                 65                30                0      1.56  0.061   0.1    0.25   0.381  50
                300        5                 65                30                0      1.6   0.061   0.14   0.27   0.368  50
                300        5                 65                30                0      1.56  0.061   0.14   0.3    0.38   50
                300        5                 65                30                0      1.5   0.11    0.11   0.27   0.377  50
                300        5                 65                30                0      1.5   0.12    0.12   0.31   0.377  50
                300        5                 65                30                0      1.5   0.12    0.12   0.31   0.377  50
                300        5                 65                30                0      1.53  0.12    0.12   0.32   0.377  50
                Rocks, ParticleSizeSand, ParticleSizeSilt, ParticleSizeClay source: Calculated (layer 1, 2, 3, 4, 5, 6, 7)
                SoilCrop CottonSoil: LL=[0.031, 0.047, 0.1, 0.14, 0.14, 0.11, 0.12, 0.12, 0.12]; KL=[0.06, 0.06, 0.04, 0.04, 0.02, 0.02, 0.02, 0.02, 0.02]; XF=[1, 1, 1, 1, 1, 1, 1, 1, 1]
              WaterBalance SoilWater: SummerDate=1-Sep; SummerU=6; SummerCona=3.5; WinterDate=1-jun; WinterU=4; WinterCona=3; DiffusConst=88; DiffusSlope=35.4; Salb=0.13; CN2Bare=80; CNRed=20; CNCov=0.8; PSIDul=-100; Thickness=[150, 150, 300, 300, 300, 300, 300, 300, 300]; SWCON=[0.5, 0.5, 0.3, 0.3, 0.3, 0.4, 0.4, 0.4, 0.4]
              Organic: FOMCNRatio=40; CarbonUnits=Total
                Thickness  Carbon  SoilCNRatio  FBiom  FInert  FOM
                150        0.5     13           0.04   0.3     347.129
                150        0.29    13           0.03   0.3     270.344
                300        0.15    13           0.02   0.3     163.972
                300        0.1     13           0.02   0.4     99.4541
                300        0.1     13           0.02   0.6     60.322
                300        0.1     13           0.01   0.9     36.5871
                300        0.1     13           0.01   1       22.1912
              Chemical: PHUnits=Water
                Thickness  PH    CEC
                150        7.14  9.47
                150        6.5   8.9975
                300        7.11  8.6825
                300        7.45  8.57
                300        7.63  8.57
                300        7.76  8.57
                300        7.83  8.57
                CEC source: Calculated
                PH source: Unknown source or quality of data
              Nutrient
              Water: Thickness=[150, 150, 300, 300, 300, 300, 300, 300, 300]; InitialValues=[0.032, 0.048, 0.1, 0.14, 0.14, 0.2, 0.25, 0.25, 0.25]; FilledFromTop=false
              Solute NO3: Thickness=[150, 150, 300, 300, 300, 300]; InitialValues=[3.8, 6.1, 6.2, 3, 2.2, 1.5]; InitialValuesUnits=ppm; WaterTableConcentration=0; D0=0; DepthConstant=0; MaxDepthSoluteAccessible=0; RunoffEffectivenessAtMovingSolute=0; MaxEffectiveRunoff=0
              Solute NH4: Thickness=[150, 150, 300, 300, 300, 300]; InitialValues=[5.4, 6.6, 5.8, 6.1, 5.4, 5.9]; InitialValuesUnits=ppm; WaterTableConcentration=0; D0=0; DepthConstant=0; MaxDepthSoluteAccessible=0; RunoffEffectivenessAtMovingSolute=0; MaxEffectiveRunoff=0
              Solute Urea: Thickness=[150, 150, 300, 300, 300, 300]; InitialValues=[0, 0, 0, 0, 0, 0]; InitialValuesUnits=ppm; WaterTableConcentration=0; D0=0; DepthConstant=0; MaxDepthSoluteAccessible=0; RunoffEffectivenessAtMovingSolute=0; MaxEffectiveRunoff=0
              SoilTemperature Temperature: InteractionsPerDay=8
            SurfaceOrganicMatter: InitialResidueName=Sorghum; InitialResidueType=sorghum; InitialResidueMass=11345; InitialStandingFraction=0.6; InitialCPR=0; InitialCNR=43
            Plant Cotton: PlantType=Cotton
            Report DailyReport: EventNames=[Clock].DoReport
              VariableNames:
                [Clock].Today
                [DiagnosticsVariables].Script.AccumPlantN
                [DiagnosticsVariables].Script.AccumMineralisation
                [DiagnosticsVariables].Script.AccumDenit
                [DiagnosticsVariables].Script.AccumFert
                [DiagnosticsVariables].Script.AccumLeach
                [DiagnosticsVariables].Script.AccumDetach
                [DiagnosticsVariables].Script.DeltaSoilOMN
                [DiagnosticsVariables].Script.DeltaSurfaceOMN
                [DiagnosticsVariables].Script.DeltaSoilMineralN
                [Cotton].Root.NSupply
                [Soil].SoilWater.Eo
                [Soil].SoilWater.Es
                [DiagnosticsVariables].Script.SWC
                [DiagnosticsVariables].Script.DUL
                [Soil].SoilWater.Drainage
                [Soil].SoilWater.Runoff
                [DiagnosticsVariables].Script.OutFlowLat
                [Soil].SoilWater.pond
                [DiagnosticsVariables].Script.AccumEO
                [DiagnosticsVariables].Script.AccumEP
                [DiagnosticsVariables].Script.AccumES
                [DiagnosticsVariables].Script.AccumDrainage
                [DiagnosticsVariables].Script.AccumRunoff
                [DiagnosticsVariables].Script.AccumRainfall
                [DiagnosticsVariables].Script.AccumIrrigation
                [DiagnosticsVariables].Script.AccumOutflowLat
                [DiagnosticsVariables].Script.SoilWaterDeficit
                [Cotton].Grain.Live.Wt
                [Cotton].Shell.Live.Wt
                [Cotton].Stem.Live.Wt
                [Cotton].Stem.Live.Wt
                [Cotton].Grain.Live.N
                [Cotton].Shell.Live.N
                [Cotton].Leaf.Live.Wt
                [Cotton].Root.Live.Wt
                [Cotton].Leaf.Live.N
                [Cotton].Root.Live.N
                [Cotton].Leaf.Live.NConc
                [Cotton].Root.Live.NConc
                [Cotton].Root.WaterSupply
                [Cotton].Root.WaterUptake
                [Cotton].Leaf.Transpiration
                [Cotton].Leaf.WaterDemand
                [Cotton].Root.Depth
                [Cotton].Leaf.CoverTotal
                [Cotton].Leaf.CoverDead
                [Cotton].Leaf.LAI
                [Cotton].Leaf.Height
                [Cotton].Leaf.PotentialBiomass
                [Soil].Water.MM
                [Soil].NO3.kgha
                [DiagnosticsVariables].Script.SoilNitrogenContent
                [Cotton].Arbitrator.N.TotalPlantDemand
                [MicroClimate].net_radn
                [MicroClimate].peta
                [MicroClimate].petr
                [DiagnosticsVariables].Script.FomN
                [DiagnosticsVariables].Script.HumN
                [DiagnosticsVariables].Script.BiomN
                [DiagnosticsVariables].Script.DltNMinRes
                [DiagnosticsVariables].Script.DltNMinTot
                [Cotton].Leaf.Fw
                [Cotton].Leaf.Fn
                [Cotton].Phenology.CurrentPhase.Name
                [Cotton].Phenology.Stage
                [Cotton].Pod.Wt
                [Cotton].Pod.N
                [Cotton].Structure.LeafTipsAppeared
                [Cotton].Structure.MainStemPrimordiaNo
                [Cotton].Leaf.CohortArea[1]
                [Cotton].Leaf.CohortArea[2]
                [Cotton].Leaf.CohortArea[3]
                [Cotton].Leaf.CohortArea[4]
                [Cotton].Leaf.CohortArea[5]
                [Cotton].Leaf.CohortArea[6]
                [Cotton].Leaf.CohortArea[7]
                [Cotton].Leaf.CohortArea[8]
                [Cotton].Leaf.CohortArea[9]
                [Cotton].Leaf.CohortArea[10]
                [Cotton].Leaf.CohortArea[11]
                [Cotton].Leaf.CohortArea[12]
                [Cotton].Leaf.CohortArea[13]
                [Cotton].Leaf.CohortArea[14]
                [Cotton].Leaf.CohortArea[15]
                [Cotton].Leaf.AppearedCohortNo
                [Cotton].Leaf.DeadCohortNo
                [Cotton].AboveGround.Wt
                [Cotton].Phenology.Stage
                [Cotton].Structure.MainStemPrimordiaNo
                [Cotton].Phenology.NFF
                [CottonHarvestRule].Script.FinalTag
                [Cotton].Grain.NumberFunction
                [Cotton].Shell.PodNumber
                [Cotton].Phenology.FN
                [Cotton].Phenology.FN.TotalNodes
                [Cotton].Phenology.FN.VegetativeNodes
            Report HarvestReport: EventNames=[Cotton].Harvesting
              VariableNames:
                [Clock].Today
                [Cotton].Structure.MainStemPrimordiaNo
                [Cotton].Phenology.NFF
                [Cotton].Script.FinalTag
            Manager SLA_set
```csharp
using APSIM.Core;
using Models.Climate;
using Models.Soils;
using Models.Interfaces;
using APSIM.Shared.Utilities;
using System.Xml.Serialization;
using Models.Functions;
using Models.PMF.Organs;
using Models.PMF;
using Models.Core;
using System.Collections.Generic;
using System.Linq;
using System;
using Newtonsoft.Json;
using Models.PMF.Interfaces;

namespace Models
{
    [Serializable]
    public class Script : Model, IStructureDependency
    {
        [Link] private Plant Cotton;
        [Link] private Weather weather;
        [Link] private IClock Clock;
        
        public IStructure Structure { private get; set; }
        // Links to APSIM components

        // List to store daily radiation values from emergence
        private List<double> dailyRadiation = new List<double>();
        private bool hasEmerged = false;
        private bool slaSet = false;  // To hold SLA value once set

        public double MedianRadiation { get; set; } = 0.0;
        public double SLA { get; set; } = 0.013;  // Default SLA value

        // Event handler for daily simulation step
        [EventSubscribe("DoManagement")]
        private void OnDoManagement(object sender, EventArgs e)
        {
            // Check if crop has emerged
            if (Cotton.Phenology.Beyond("Emergence"))
            {
                hasEmerged = true;
            }

            // If emerged, store radiation and calculate median
            if (hasEmerged)
            {
                dailyRadiation.Add(weather.Radn);
                MedianRadiation = CalculateMedian(dailyRadiation);  // Update the public property

                // Check SLA conditions only once when NodeNumber reaches 3
                if (!slaSet)
                {
                    // Dynamically find NodeNumber under Cotton
                    IFunction NodeNumber =   Structure.FindChild<IFunction>("NodeNumber", recurse: true, relativeTo: (INodeModel)Cotton);

                    if (NodeNumber != null)
                    {
                        double nodeNumber = NodeNumber.Value();  // Get value of NodeNumber

                        if (nodeNumber >= 3)
                        {
                            if (MedianRadiation < 24.2)
                                SLA = 0.02;
                            else
                                SLA = 0.013;

                            slaSet = true;  // Lock SLA for the rest of the simulation
                        }
                    }
                    else
                    {
                        throw new Exception("NodeNumber not found under Cotton!");
                    }
                }
            }
        }

        // Function to calculate the median of a list of doubles
        private double CalculateMedian(List<double> values)
        {
            int count = values.Count;
            if (count == 0)
                return 0;

            var sortedValues = values.OrderBy(v => v).ToList();
            if (count % 2 == 0)
            {
                // Average of the two middle elements for even count
                return (sortedValues[count / 2 - 1] + sortedValues[count / 2]) / 2.0;
            }
            else
            {
                // Middle element for odd count
                return sortedValues[count / 2];
            }
        }
    }
}
```
            Manager Reset on date
              ResetDate = 10-feb
              OffsetDays = 0
              ResetWater = False
              ResetNutrients = True
              ResetSOM = True
```csharp
using Models.Soils.Nutrients;
using APSIM.Shared.Utilities;
using Models.Surface;
using Models.Utilities;
using Models.Soils.Nutrients;
using Models.Soils;
using Models.PMF;
using Models.Core;
using System;
using System.Linq;
using Models.Interfaces;

namespace Models
{
    [Serializable]
    public class Script : Model
    {
        [Link] private Clock Clock;
        [Link] private Plant Wheat;
        [Link] private ISoilWater SoilWater;
        [Link] private Nutrient nutrient;
        [Link] private SurfaceOrganicMatter SOM;
        [Link] private Summary Summary;

        [Description("Date to reset on:")]
        public string ResetDate {get;set;}
        
        [Description("Offset by Days (Negative is Days Before, Positive is Days After):")]
        public int OffsetDays {get;set;}

        [Description("Reset Water?")]
        public bool ResetWater {get;set;}

        [Description("Reset Soil Nutrients?")]
        public bool ResetNutrients {get;set;}

        [Description("Reset Surface Organic Matter?")]
        public bool ResetSOM {get;set;}

        [EventSubscribe("DoManagement")]
        private void OnDoManagement(object sender, EventArgs e)
        {
            DateTime offsetDate = DateUtilities.GetDate(ResetDate, Clock.Today).AddDays(OffsetDays);
            if (offsetDate.Equals(Clock.Today))
            {
                if (ResetWater)
                {
                    Summary.WriteMessage(this, "Reset Water", MessageType.Diagnostic);
                    SoilWater.Reset();
                }
                if (ResetNutrients)
                {
                    Summary.WriteMessage(this, "Reset Nitrogen", MessageType.Diagnostic);
                    nutrient.Reset();
                }
                if (ResetSOM)
                {
                    Summary.WriteMessage(this, "Reset Surface OM", MessageType.Diagnostic);
                    SOM.Reset();
                }
            }
        }
    }
}
```
            Report SoilReport: EventNames=[Clock].DoReport
              VariableNames:
                [Clock].Today
                [Cotton].DaysAfterSowing
                sum([Soil].Water.MM) as TotalSWmm
                ([Soil].Water.MM[1]+[Soil].Water.MM[2]+[Soil].Water.MM[3]+[Soil].Water.MM[4]+[Soil].Water.MM[5]+[Soil].Water.MM[6]) as TotalSW180cm
                [Soil].Water.MM
                [Soil].Water.PAWmm
      Memo
        Should resemble an S-curve
      Memo
        Should resemble an S-curve
    Folder Burdekin Sowing Time Experiment 2009
      Memo Is observed data correct check perry obs files
        DID I CONVERT THE DATA TO M2?
      Memo
        29/01/2024:

        Check soils and compare with APSIM Classic sims

        ===================================================================================

        **25/01/2024**

        **From: C:\Users\rhe005\OneDrive - CSIRO\Work Files\00. From Desktop 20221019\Modelling report --> Modelling results.xlxs, Tab "Queensland - Burdekin"**

        1. 2008 most problems - weakest dataset
        2. Remove sites with boll rots
        3. Need dataset with abortions
        4. Planting 3 easist to validate - no cloudy weather
        5. ***Good sites: 2008, PL3 and 2009 PL3***
        6. ***2012 cloudy --> high LAI***
        7. ***Cloudy years most important one --> highest deviation***

        ===================================================================================

        1/12/2023:

        **NEED TO BE ABLE TO MODEL RE-GROWTH**

        1. cloudiness-related fruit loss and subsequent canopy responses changed the ratio of reproductive vs vegetative biomass partitioning.

        2. Differences in biomass partitioning between cultivars were minor. When cloud cover abated, extended
        concurrent vegetative and reproductive growth enabled yield recovery. Greater LAI was a consequence of
        compensatory processes following fruit loss. Faster development of LAI in response to the monsoon during early
        flowering could further shade lower canopy fruiting sites, exacerbating fruit abscission and impacting yield
        compensation.

        3. Compare observed data with that presented in the papers: Table 3 Grundy et al FCR 2020 107868

        ===================================================================================

        * Irrigation was scheduled using electronic capacitance probes(Envirotech, EP100EL-12) that were installed to a depth of 120 cm with dielectric sensors located at 10 cm intervals.

        * Two probes were installed in different replicates for each sowing time, enabling real time monitoring of soil moisture via an integrated radio frequency linked telemetry-based software system.

        * Irrigation was applied using ground water, scheduled at a 35–45 mm water deficit in the top 50 cm of the soil profile and refilled to the drained upper limit during each irrigation.

        * ***The crops were sown with a cone seeder on 750 mm equidistant spaced rows on raised beds (two rows per bed) separated by surface irrigation furrows.***

        ====================================================================================

        See papers:

        Cotton production during the tropical monsoon season. I – The influence of variable radiation on boll loss, compensation and yield

        P. R. Grundy, S. J. Yeates and K. L. Bell

        Field Crops Research 2020 Vol. 254 Pages 107790

        DOI: 10.1016/j.fcr.2020.107790

        Cotton production during the tropical monsoon season. II – Biomass accumulation, partitioning and RUE in response to boll loss and compensation

        P. R. Grundy, S. J. Yeates and K. L. Bell

        Field Crops Research 2020 Vol. 255 Pages 107868

        DOI: 10.1016/j.fcr.2020.107868
      Memo Phenology stages Observed
        1/12/2023: See Fig. 5 Grundy, Yeates, Bell. 2020 Cotton production during the tropical monsoon season. 1.

        Stage|P1|DAS|P2|DAS|P3|DAS
        -|-|-|-|-|-|-
        Sowing|1 Dec 2008|0|19 Dec 2008|0|7 Jan 2009|0
        Emergence||
        Squaring|22 Dec 2008|21|11 Jan 2009|23|2 Feb 2009|26
        Flowering|12 Jan 2009|42|5 Feb 2009|48|5 Mar 2009|57
        Cutout||
        OpenBolls|5 Mar 2009|94|19 Apr 2009|121|5 May 2009|118
        Maturity|14 May 2009|164|12 May 2009|144|10 Jun 2009|154
        Defoliation|5 May 2009?|155?|12 May 2009|144|12 Jun 2009|156
        HarvestRipe|24 May 2009|174|27 May 2009|159|30 Jun 2009|174
      Memo Growth regulator details
        FROM:

        Grundy, P. R., Yeates, S. J., & Bell, K. L. (2020).
        Cotton production during the tropical monsoon season. I – The influence of variable radiation on boll loss, compensation and yield.
        Field Crops Research, 254, 107790. https://doi.org/10.1016/j.fcr.2020.107790

        Page 3:

        "Mepiquat chloride (MC) was originally applied to all treatments
        using rates and timing according to guidelines determined for MC usage
        at the Ord River in tropical Western Australia (Yeates et al., 2002,
        2007) but usage was modified in response to the early December
        sowing in Season 1 when MC rate appeared too high with reduced
        sympodia elongation in the upper canopy observed that may have
        compromised compensation capacity. A more precautionary approach
        was used for all other treatments and MC was applied at the lower end
        of the recommended rate range (7.6–19 g ai ha−1) from sixth node
        growth stage onwards."
      Experiment BDK09
        Factors
          CompositeFactor P1
            Specifications:
              [clock]
              [Operations]
              [Soil]
              [Reset on date]
              [HarvestAfterDate]
            Clock: Start=2008-11-01; End=2009-08-31
            Operations
              2008-12-01  [Cotton].Sow(population: 8.1, cultivar: Sicot_74BRF , depth: 50, rowSpacing: 750);
              2008-12-01  [Fertiliser].Apply(90, "NH4N",10);
              2008-12-17  [Fertiliser].Apply(90, "NH4N",10);
            Soil Ayr Blain Hybrid: SoilType=Alluvial Loam; Site=Ayr Queensland; NearestTown=Ayr, QLD  4807; Region=Burdekin; State=Queensland; Country=Australia; NaturalVegetation=Flood Plain; Latitude=-19.576; Longitude=147.405; LocationAccuracy=+/- 20m; DataSource=CSIRO Plant Industry, Approximation Only
              Comments=Jody Biggs (bk-03)  merged with NT soil (Blain sand).  Adjusted based on observations by Dr Stephen Yeates (CSIRO Plant Industry)
              Physical
                Thickness  ParticleSizeSand  ParticleSizeSilt  ParticleSizeClay  Rocks     BD     AirDry  LL15  DUL    SAT    KS
                150        5                 65                30                0         1.527  0.08    0.17  0.279  0.38   240
                150        5                 65                30                0.138587  1.393  0.099   0.18  0.289  0.38   240
                300        5                 65                30                0         1.464  0.2     0.2   0.293  0.376  240
                400        5                 65                30                0         1.451  0.21    0.21  0.308  0.39   240
                500        5                 65                30                0         1.49   0.22    0.22  0.307  0.377  180
                500        5                 65                30                0         1.537  0.25    0.25  0.322  0.377  180
                Rocks, ParticleSizeSand, ParticleSizeSilt, ParticleSizeClay source: Calculated
                SoilCrop CottonSoil: LL=[0.17, 0.18, 0.2, 0.21, 0.22, 0.322]; KL=[0.1, 0.08, 0.05, 0.04, 0.03, 0.02]; XF=[1, 1, 1, 1, 1, 0]
              WaterBalance SoilWater: SummerDate=1-Nov; SummerU=6; SummerCona=3.5; WinterDate=1-Apr; WinterU=4; WinterCona=2.5; DiffusConst=88; DiffusSlope=35.5; Salb=0.2; CN2Bare=82; CNRed=20; CNCov=0.8; PSIDul=-100; Thickness=[150, 150, 300, 400, 500, 500]; SWCON=[0.7, 0.7, 0.5, 0.5, 0.5, 0.5]
              Solute NO3: Thickness=[150, 150, 300, 400, 500, 500]; InitialValues=[11.2, 23, 19, 18.2, 18.2, 16.2]; InitialValuesUnits=ppm; WaterTableConcentration=0; D0=0; DepthConstant=0; MaxDepthSoluteAccessible=0; RunoffEffectivenessAtMovingSolute=0; MaxEffectiveRunoff=0
              Solute NH4: Thickness=[150, 150, 300, 400, 500, 500]; InitialValues=[0.0666667, 0.2, 0.2, 0.2, 0.2, 0.2]; InitialValuesUnits=ppm; WaterTableConcentration=0; D0=0; DepthConstant=0; MaxDepthSoluteAccessible=0; RunoffEffectivenessAtMovingSolute=0; MaxEffectiveRunoff=0
              Solute Urea: Thickness=[100]; InitialValues=[0]; InitialValuesUnits=kg/ha; WaterTableConcentration=0; D0=0; DepthConstant=0; MaxDepthSoluteAccessible=0; RunoffEffectivenessAtMovingSolute=0; MaxEffectiveRunoff=0
              Organic: FOMCNRatio=40; CarbonUnits=WalkleyBlack
                Thickness  Carbon  SoilCNRatio  FBiom  FInert  FOM
                150        0.75    12           0.51   0.4     359.525
                150        0.42    12           0.49   0.4     287.087
                300        0.15    12           0.22   0.6     183.055
                400        0.15    12           0.09   0.7     100.462
                500        0.15    12           0.01   0.9     47.4551
                500        0.15    12           0.01   0.99    22.4162
              Chemical: PHUnits=Water
                Thickness  PH   CEC
                150        6.4  10.0325
                150        6.4  9.29
                300        6.7  8.6825
                400        6.7  8.6825
                500        6.7  8.6825
                500        6.7  8.6825
                CEC source: Calculated
              Water: Thickness=[150, 150, 300, 400, 500, 500]; InitialValues=[0.279, 0.289, 0.293, 0.246765, 0.22, 0.25]; FilledFromTop=true
              Nutrient
              SoilTemperature Temperature: InteractionsPerDay=8
            Manager Reset on date
              ResetDate = 30-nov
              OffsetDays = 0
              ResetWater = False
              ResetNutrients = True
              ResetSOM = False
              script: same as in Validation.Douglas Daly 2020 Irrigation.DouglasDaly2021.DouglasDaly20211Base.paddock.Reset on date
            Manager HarvestAfterDate
              HarvestDate = 24-may
              script: same as in Validation.Douglas Daly Row Spacing 2021.DDRF21.DDRF21Base.paddock.HarvestAfterDate
          CompositeFactor P2
            Specifications:
              [clock]
              [Operations]
              [Soil]
              [Reset on date]
              [HarvestAfterDate]
            Clock: Start=2008-11-01; End=2009-08-31
            Operations
              2008-12-18  [Cotton].Sow(population: 8.3, cultivar: Sicot_74BRF , depth: 50, rowSpacing: 750);
              2008-12-18  [Fertiliser].Apply(90, "NH4N",10);
              2009-01-08  [Fertiliser].Apply(90, "NH4N",10);
            Soil Ayr Blain Hybrid: same as Validation.Burdekin Sowing Time Experiment 2009.BDK09.Factors.P1.Ayr Blain Hybrid
            Manager Reset on date
              ResetDate = 17-dec
              OffsetDays = 0
              ResetWater = False
              ResetNutrients = True
              ResetSOM = False
              script: same as in Validation.Douglas Daly 2020 Irrigation.DouglasDaly2021.DouglasDaly20211Base.paddock.Reset on date
            Manager HarvestAfterDate
              HarvestDate = 27-may
              script: same as in Validation.Douglas Daly Row Spacing 2021.DDRF21.DDRF21Base.paddock.HarvestAfterDate
          CompositeFactor P3
            Specifications:
              [clock]
              [Operations]
              [Soil]
              [Reset on date]
              [HarvestAfterDate]
            Clock: Start=2008-11-01; End=2009-09-30
            Operations
              2009-01-07  [Cotton].Sow(population: 8.1, cultivar: Sicot_74BRF , depth: 50, rowSpacing: 750);
              2009-01-07  [Fertiliser].Apply(90, "NH4N",10);
              2009-02-21  [Fertiliser].Apply(130, "NH4N",10);
            Soil Ayr Blain Hybrid: SoilType=Alluvial Loam; Site=Ayr Queensland; NearestTown=Ayr, QLD  4807; Region=Burdekin; State=Queensland; Country=Australia; NaturalVegetation=Flood Plain; Latitude=-19.576; Longitude=147.405; LocationAccuracy=+/- 20m; DataSource=CSIRO Plant Industry, Approximation Only
              Comments=Jody Biggs (bk-03)  merged with NT soil (Blain sand).  Adjusted based on observations by Dr Stephen Yeates (CSIRO Plant Industry)
              Physical: same as Validation.Burdekin Sowing Time Experiment 2009.BDK09.Factors.P1.Ayr Blain Hybrid.Physical
              WaterBalance SoilWater: same as Validation.Burdekin Sowing Time Experiment 2009.BDK09.Factors.P1.Ayr Blain Hybrid.SoilWater
              Solute NO3: Thickness=[150, 150, 300, 400, 500, 500]; InitialValues=[11, 9, 3, 0, 0, 0]; InitialValuesUnits=ppm; WaterTableConcentration=0; D0=0; DepthConstant=0; MaxDepthSoluteAccessible=0; RunoffEffectivenessAtMovingSolute=0; MaxEffectiveRunoff=0
              Solute NH4: Thickness=[150, 150, 300, 400, 500, 500]; InitialValues=[3.46, 2.97, 2.34, 0, 0, 0]; InitialValuesUnits=ppm; WaterTableConcentration=0; D0=0; DepthConstant=0; MaxDepthSoluteAccessible=0; RunoffEffectivenessAtMovingSolute=0; MaxEffectiveRunoff=0
              Solute Urea: Thickness=[100]; InitialValues=[0]; InitialValuesUnits=kg/ha; WaterTableConcentration=0; D0=0; DepthConstant=0; MaxDepthSoluteAccessible=0; RunoffEffectivenessAtMovingSolute=0; MaxEffectiveRunoff=0
              Organic: same as Validation.Burdekin Sowing Time Experiment 2009.BDK09.Factors.P1.Ayr Blain Hybrid.Organic
              Chemical: same as Validation.Burdekin Sowing Time Experiment 2009.BDK09.Factors.P1.Ayr Blain Hybrid.Chemical
              Water: Thickness=[150, 150, 300, 400, 500, 500]; InitialValues=[0.279, 0.289, 0.293, 0.246765, 0.22, 0.25]; FilledFromTop=true
              Nutrient
              SoilTemperature Temperature: InteractionsPerDay=8
            Manager Reset on date
              ResetDate = 1-dec
              OffsetDays = 0
              ResetWater = False
              ResetNutrients = True
              ResetSOM = False
              script: same as in Validation.Douglas Daly 2020 Irrigation.DouglasDaly2021.DouglasDaly20211Base.paddock.Reset on date
            Manager HarvestAfterDate
              HarvestDate = 30-jun
              script: same as in Validation.Douglas Daly Row Spacing 2021.DDRF21.DDRF21Base.paddock.HarvestAfterDate
        Simulation BDK09Base
          Clock: Start=2008-11-01; End=2009-09-30
          Summary summaryfile
          Weather: FileName=Weatherfiles/QLD_BDK2008-12_update.met
          SoilArbitrator Soil Arbitrator
          MicroClimate: a_interception=0; b_interception=1; c_interception=0; d_interception=0; SoilHeatFluxFraction=0.4; MinimumHeightDiffForNewLayer=0; NightInterceptionFraction=0.5; ReferenceHeight=2
          Zone paddock: Area=1; Slope=0; AspectAngle=0; Altitude=50
            Fertiliser
            Operations
            Irrigation
            Manager Furrow Irrigation
              asw_depth = 6
              crit_fr_asw = 0.7
              IrrigStart = 1-Jan
              IrrigEnd = 31-Dec
```csharp
// Applies irrigation into the second soil layer after a crop has been sown(lateral inflow from furrow into adjacent beds)
// Irrigation is applied on a deficit defined by the number of soil layers (depth) and a deficit value [0-1]
// Water applied uses the Irrigation model and is reported in the summary file.
// Local variable returned and available for reporting is: applied_furrow_irrigation

using Models.Interfaces;
using System;
using System.Linq;
using Models.Core;
using System.Collections.Generic;
using System.Text;
using Models.Soils;
using Models.PMF;
using System.Xml.Serialization;
using APSIM.Shared.Utilities;

namespace Models
{
    [Serializable]
    public class Script : Model
    {
        // Links
        [Link] Clock clock;
        [Link] Irrigation Irrigation;
        [Link] Soil Soil;
        [Link] IPhysical soilPhysical;
        [Link] ISoilWater waterBalance;

        // Fields
        public double SW_now;
        public double CLL_now;
        public double SW_full;

        // Properties
        [Description("Number of soil layers used in calculating SW deficit")]
        public int asw_depth { get; set; } // Change to int for layer count
        [Description("Fraction of ASW below which irrigation is applied (0-1.0)")]
        public double crit_fr_asw { get; set; } // Critical fraction of available soil water before applying irrigation
        [Description("The earliest date irrigation will be applied (dd-MMM)")]
        public string IrrigStart { get; set; } // No irrigation will be applied before this date
        [Description("The latest date irrigation will be applied (dd-MMM)")]
        public string IrrigEnd { get; set; } // No irrigation will be applied after this date

        // Output variables
        public double[] inflow_lat { get; set; }
        public double applied_furrow_irrigation { get; set; }

        // Methods

        // Calculate static soil variables
        [EventSubscribe("StartOfSimulation")]
        private void OnStartOfSimulation(object sender, EventArgs e)
        {
            // Initialize inflow_lat array
            inflow_lat = new double[soilPhysical.DULmm.Length];
        }

        // Determine daily requirement for irrigation
        [EventSubscribe("StartOfDay")]
        private void OnStartOfDay(object sender, EventArgs e)
        {
            // Is today within the irrigation window?
            if (DateUtilities.WithinDates(IrrigStart, clock.Today, IrrigEnd))
            {
                // Calculate soil water variables
                double[] SW_add = new double[soilPhysical.DULmm.Length];
                for (int layer = 0; layer < asw_depth; layer++)
                {
                    SW_now += waterBalance.SWmm[layer];
                    CLL_now += soilPhysical.LL15mm[layer];
                    SW_full += (soilPhysical.DULmm[layer] - soilPhysical.LL15mm[layer]);
                    SW_add[layer] = soilPhysical.DULmm[layer] - waterBalance.SWmm[layer];
                }

                // Is the soil water deficit greater than the critical SW fraction?
                if ((SW_now - CLL_now) <= (SW_full * crit_fr_asw))
                {
                    // Calculate irrigation and apply it
                    for (int layer = 1; layer < asw_depth; layer++)
                    {
                        inflow_lat[layer] = SW_add[layer] + (SW_add[0] / (asw_depth - 1));
                        applied_furrow_irrigation += inflow_lat[layer];
                        Irrigation.Apply(inflow_lat[layer], depth: soilPhysical.Thickness[layer]);
                    }
                }
                else
                {
                    for (int layer = 0; layer < soilPhysical.DULmm.Length; layer++)
                    {
                        inflow_lat[layer] = 0;
                        applied_furrow_irrigation = 0;            
        		    }
                }
			}
		}
	}
}
```
            Manager Tillage on a fixed date
              TillageDate = 2-nov
              Fraction = 0.95
              Depth = 100
```csharp
using Models.Soils;
using System;
using System.Linq;
using Models.Core;
using Models.PMF;
using APSIM.Shared.Utilities;
using Models.Surface;

namespace Models
{
    [Serializable]
    public class Script : Model
    {
        [Link] Clock Clock;
        [Link] SurfaceOrganicMatter SOM;
        
        [Description("Tillage Date")]
        public string TillageDate { get; set; }
        
        [Description("Fraction of Residues To Incorporate (0-1)")]
        public double Fraction { get; set; }

        [Description("Depth of Tillage (mm)")]
        public double Depth { get; set; }

        [EventSubscribe("DoManagement")]
        private void OnDoManagement(object sender, EventArgs e)
        {
            if (DateUtilities.WithinDates(TillageDate, Clock.Today, TillageDate))
                SOM.Incorporate(Fraction, Depth);
        }
    }
}
```
            Manager HarvestAfterDate
              HarvestDate = 1-jun
              script: same as in Validation.Douglas Daly Row Spacing 2021.DDRF21.DDRF21Base.paddock.HarvestAfterDate
            Manager SLA_set: same as Validation.Douglas Daly 2020 Irrigation.DouglasDaly2021.DouglasDaly20211Base.paddock.SLA_set
            Manager Reset on date
              ResetDate = 1-Jan
              OffsetDays = 0
              ResetWater = False
              ResetNutrients = False
              ResetSOM = False
              script: same as in Validation.Douglas Daly 2020 Irrigation.DouglasDaly2021.DouglasDaly20211Base.paddock.Reset on date
            Soil Ayr Blain Hybrid: SoilType=Alluvial Loam; Site=Ayr Queensland; NearestTown=Ayr, QLD  4807; Region=Burdekin; State=Queensland; Country=Australia; NaturalVegetation=Flood Plain; Latitude=-19.576; Longitude=147.405; LocationAccuracy=+/- 20m; DataSource=CSIRO Plant Industry, Approximation Only
              Comments=Jody Biggs (bk-03)  merged with NT soil (Blain sand).  Adjusted based on observations by Dr Stephen Yeates (CSIRO Plant Industry)
              Physical
                Thickness  ParticleSizeSand  ParticleSizeSilt  ParticleSizeClay  Rocks     BD     AirDry  LL15  DUL    SAT    KS
                150        5                 65                30                0         1.527  0.08    0.17  0.279  0.38   240
                150        5                 65                30                0.138587  1.393  0.099   0.18  0.289  0.38   240
                300        5                 65                30                0         1.464  0.2     0.2   0.293  0.376  240
                400        5                 65                30                0         1.451  0.21    0.21  0.308  0.39   240
                500        5                 65                30                0         1.49   0.22    0.22  0.307  0.377  180
                500        5                 65                30                0         1.537  0.25    0.25  0.322  0.377  180
                Rocks, ParticleSizeSand, ParticleSizeSilt, ParticleSizeClay source: Calculated
                SoilCrop Cotton2Soil: LL=[0.17, 0.18, 0.2, 0.21, 0.22, 0.322]; KL=[0.1, 0.08, 0.05, 0.04, 0.03, 0.02]; XF=[1, 1, 1, 1, 1, 0]
              WaterBalance SoilWater: same as Validation.Burdekin Sowing Time Experiment 2009.BDK09.Factors.P1.Ayr Blain Hybrid.SoilWater
              Solute NO3: Thickness=[150, 150, 300, 400, 500, 500]; InitialValues=[0, 0, 0, 0, 0, 0]; InitialValuesUnits=ppm; WaterTableConcentration=0; D0=0; DepthConstant=0; MaxDepthSoluteAccessible=0; RunoffEffectivenessAtMovingSolute=0; MaxEffectiveRunoff=0
              Solute NH4: same as Validation.Burdekin Sowing Time Experiment 2009.BDK09.BDK09Base.paddock.Ayr Blain Hybrid.NO3
              Solute Urea: Thickness=[100]; InitialValues=[0]; InitialValuesUnits=kg/ha; WaterTableConcentration=0; D0=0; DepthConstant=0; MaxDepthSoluteAccessible=0; RunoffEffectivenessAtMovingSolute=0; MaxEffectiveRunoff=0
              Organic: same as Validation.Burdekin Sowing Time Experiment 2009.BDK09.Factors.P1.Ayr Blain Hybrid.Organic
              Chemical: Thickness=[150, 150, 300, 400, 500, 500]; PH=[6.4, 6.4, 6.7, 6.7, 6.7, 6.7]; PHUnits=Water
              Water: Thickness=[150, 150, 300, 400, 500, 500]; InitialValues=[0.279, 0.289, 0.293, 0.246765, 0.22, 0.25]; FilledFromTop=true
              Nutrient
              SoilTemperature Temperature: InteractionsPerDay=8
            SurfaceOrganicMatter: InitialResidueName=maize; InitialResidueType=maize; InitialResidueMass=2000; InitialStandingFraction=0; InitialCPR=0; InitialCNR=33
            Plant Cotton: PlantType=Cotton
            Report DailyReport: same as Validation.Douglas Daly 2020 Irrigation.DouglasDaly2021.DouglasDaly20211Base.paddock.DailyReport
            Report HarvestReport: EventNames=[Cotton].Harvesting
              VariableNames:
                [Clock].Today
                [Cotton].Structure.MainStemPrimordiaNo
                [Cotton].Phenology.NFF
                [Cotton].Script.FinalTag
            Report SoilReport: EventNames=[Clock].DoReport
              VariableNames:
                [Clock].Today
                [Cotton].DaysAfterSowing
                sum([Soil].Water.PAWmm) as TotalPAWmm
                ([Soil].Water.MM[1]+[Soil].Water.MM[2]+[Soil].Water.MM[3]+[Soil].Water.MM[4]+[Soil].Water.MM[5]+[Soil].Water.MM[6]) as TotalSW180cm
                [Soil].Water.PAWmm
      Memo
        Should resemble an S-curve
    Folder Emerald Sowing Time Experiment 2015
      Memo
        11/6/2025:

        Starting nitrogen in Planting 3 is likely to be lower than P1 & P2

        =====================================================================

        11/03/2025:

        SOURCE:

        Grundy, P. R., Spargo, G. M., Yeates, S. J., & Bell, K. L. (2021). Improving subtropical cotton production by using late winter sowing to reduce climatic risk. Field Crops Research, 274. https://doi.org/10.1016/j.fcr.2021.108308

        25/01/2024:

        The very early august sowings got the final irrigation around 10-15 Dec.

        The mid August ones typically got the last one around boxing day or the 27th Dec.

        The Sept sowing would have gotten one more after that about 10 days later.
      Memo Phenology stages Observed
        Stage|P1|DAS|P2|DAS|P3|DAS
        -|-|-|-|-|-|-
        Sowing|1 Aug 2015|0|21 Aug 2015|0|15 Sep 2015|0|
        Emergence||||
        Squaring|7 Oct 2015|67|11 Oct 2015|51|3 Nov 2015|49|
        Flowering|27 Oct 2015|87|4 Nov 2015|75|18 Nov 2015|64|
        Cutout|2 Dec 2015|123|7 Dec 2015|108|22 Dec 2015|98|
        OpenBolls|17 Dec 2015|138|22 Dec 2015|123|5 Jan 2016|112|
        Maturity|12 Jan 2016|164|13 Jan 2016|145|7 Feb 2016|145|
        HarvestRipe|25 Jan 2016|177|28 Jan 2016|160|12 Mar 2016|179|

        Paul Grundy (18/06/2025): For the August sowings cotton was always emerged by 11-13 days and for the mid-Sept it was 6-7 days.
      Memo Growth regulator details
        Grundy, P. R., Spargo, G. M., Yeates, S. J., & Bell, K. L. (2021). Improving subtropical cotton production by using late winter sowing to reduce climatic risk. Field Crops Research, 274. https://doi.org/10.1016/j.fcr.2021.108308

        I could not identify any details in the paper and therefore assume that none were applied.

        No data on growth regulators were provided with the observed data either.
      Experiment Emerald2015
        Factors
          CompositeFactor P1
            Specifications:
              [Reset on date]
              [Operations]
              [FurrowIrrigation]
              [HarvestAfterDate]
            Manager Reset on date
              ResetDate = 19-June
              OffsetDays = 0
              ResetWater = False
              ResetNutrients = True
              ResetSOM = False
              script: same as in Validation.Douglas Daly 2020 Irrigation.DouglasDaly2021.DouglasDaly20211Base.paddock.Reset on date
            Operations
              2015-06-20  [Fertiliser].Apply(100, "UreaN",15); //6-8 weeks prior to sowing
              2015-08-01  [Cotton].Sow(population: 9.55, cultivar: Sicot_74BRF , depth: 20, rowSpacing: 1000);
              2015-10-05  [Fertiliser].Apply(140, "UreaN",15); //during early squaring
            Manager FurrowIrrigation
              IrrigateDates = 25-jul, 30-aug, 15-sep, 17-oct, 29-oct, 20-nov, 28-nov, 10-dec, 18-dec, 4-jan
              asw_depth = 9
              crit_fr_asw = 1
```csharp
using Models.Interfaces;
using System;
using System.Linq;
using Models.Core;
using System.Collections.Generic;
using System.Text;
using Models.Soils;
using Models.PMF;
using System.Xml.Serialization;
using APSIM.Shared.Utilities;

namespace Models
{
    [Serializable]
    public class Script : Model
    {
        // Links
        [Link] Clock clock;
        [Link] Irrigation Irrigation;
        [Link] Soil Soil;
        [Link] IPhysical soilPhysical;
        [Link] ISoilWater waterBalance;

        // Fields
        public double SW_now;
        public double CLL_now;
        public double SW_full;

        // Properties
        [Description("Enter the irrigation dates as dd-mmm with comma separation (any year information entered will be ignored)")]
        public string[] IrrigateDates { get; set; } // Chosen date for irrigation
        [Description("Number of soil layers used in calculating SW deficit")]
        public int asw_depth { get; set; } // Change to int for layer count
        [Description("Fraction of ASW below which irrigation is applied (0-1.0)")]
        public double crit_fr_asw { get; set; } // Critical fraction of available soil water before applying irrigation

        // Output variables
        public double[] inflow_lat { get; set; }
        public double applied_furrow_irrigation { get; set; }

        // Methods

        // Calculate static soil variables
        [EventSubscribe("StartOfSimulation")]
        private void OnStartOfSimulation(object sender, EventArgs e)
        {
            // Initialize inflow_lat array
            inflow_lat = new double[soilPhysical.DULmm.Length];
        }

        // Determine daily requirement for irrigation
        [EventSubscribe("StartOfDay")]
        private void OnStartOfDay(object sender, EventArgs e)
        {
          foreach (string ddMMM in IrrigateDates)
          {
            // Check if today is the chosen irrigation date
            if (DateUtilities.DatesEqual(ddMMM, clock.Today))
            {
                // Calculate soil water variables
                double[] SW_add = new double[soilPhysical.DULmm.Length];
                for (int layer = 0; layer < asw_depth; layer++)
                {
                    SW_now += waterBalance.SWmm[layer];
                    CLL_now += soilPhysical.LL15mm[layer];
                    SW_full += (soilPhysical.DULmm[layer] - soilPhysical.LL15mm[layer]);
                    SW_add[layer] = soilPhysical.DULmm[layer] - waterBalance.SWmm[layer];
                }

                // Is the soil water deficit greater than the critical SW fraction?
                if ((SW_now - CLL_now) <= (SW_full * crit_fr_asw))
                {
                    // Calculate irrigation and apply it
                    for (int layer = 1; layer < asw_depth; layer++)
                    {
                        inflow_lat[layer] = SW_add[layer] + (SW_add[0] / (asw_depth - 1));
                        applied_furrow_irrigation += inflow_lat[layer];
                        Irrigation.Apply(inflow_lat[layer], depth: soilPhysical.Thickness[layer]);
                    }
                }
                else
                {
                    for (int layer = 0; layer < soilPhysical.DULmm.Length; layer++)
                    {
                        inflow_lat[layer] = 0;
                        applied_furrow_irrigation = 0;
                    }
                }
            }
        }
    }
}}
```
            Manager HarvestAfterDate
              HarvestDate = 25-jan
              script: same as in Validation.Douglas Daly Row Spacing 2021.DDRF21.DDRF21Base.paddock.HarvestAfterDate
          CompositeFactor P2
            Specifications:
              [Reset on date]
              [Operations]
              [FurrowIrrigation]
              [HarvestAfterDate]
            Manager Reset on date
              ResetDate = 9-Jul
              OffsetDays = 0
              ResetWater = False
              ResetNutrients = True
              ResetSOM = False
              script: same as in Validation.Douglas Daly 2020 Irrigation.DouglasDaly2021.DouglasDaly20211Base.paddock.Reset on date
            Operations
              2015-07-10  [Fertiliser].Apply(100, "UreaN",15); //6-8 weeks prior to sowing
              2015-08-21  [Cotton].Sow(population: 11.25, cultivar: Sicot_74BRF , depth: 20, rowSpacing: 1000);
              2015-10-16  [Fertiliser].Apply(140, "UreaN",15); //during early squaring
            Manager FurrowIrrigation
              IrrigateDates = 14-aug, 30-sep, 17-oct, 29-oct, 20-nov, 28-nov, 10-dec, 18-dec, 4-jan
              asw_depth = 9
              crit_fr_asw = 1
              script: same as in Validation.Emerald Sowing Time Experiment 2015.Emerald2015.Factors.P1.FurrowIrrigation
            Manager HarvestAfterDate
              HarvestDate = 28-jan
              script: same as in Validation.Douglas Daly Row Spacing 2021.DDRF21.DDRF21Base.paddock.HarvestAfterDate
          CompositeFactor P3
            Specifications:
              [Reset on date]
              [Operations]
              [FurrowIrrigation]
              [HarvestAfterDate]
            Manager Reset on date
              ResetDate = 3-aug
              OffsetDays = 0
              ResetWater = False
              ResetNutrients = True
              ResetSOM = False
              script: same as in Validation.Douglas Daly 2020 Irrigation.DouglasDaly2021.DouglasDaly20211Base.paddock.Reset on date
            Operations
              2015-08-04  [Fertiliser].Apply(100, "UreaN",15); //6-8 weeks prior to sowing
              2015-09-15  [Cotton].Sow(population: 9.46, cultivar: Sicot_74BRF , depth: 20, rowSpacing: 1000);
              2015-11-08  [Fertiliser].Apply(140, "UreaN",15); //during early squaring
            Manager FurrowIrrigation
              IrrigateDates = 8-sep, 17-oct, 29-oct, 20-nov, 28-nov, 10-dec, 18-dec, 4-jan, 15-jan
              asw_depth = 9
              crit_fr_asw = 1
              script: same as in Validation.Emerald Sowing Time Experiment 2015.Emerald2015.Factors.P1.FurrowIrrigation
            Manager HarvestAfterDate
              HarvestDate = 12-mar
              script: same as in Validation.Douglas Daly Row Spacing 2021.DDRF21.DDRF21Base.paddock.HarvestAfterDate
        Simulation Emerald2015Base
          Clock: Start=2015-05-12; End=2016-03-31
          Summary summaryfile
          Weather: FileName=Weatherfiles/CQ2013_17.met
          SoilArbitrator Soil Arbitrator
          MicroClimate: a_interception=0; b_interception=1; c_interception=0; d_interception=0; SoilHeatFluxFraction=0.4; MinimumHeightDiffForNewLayer=0; NightInterceptionFraction=0.5; ReferenceHeight=2
          Zone paddock: Area=1; Slope=0; AspectAngle=0; Altitude=50
            Fertiliser
            Operations
            Irrigation
            Manager FurrowIrrigation
              IrrigateDates = 30-aug, 15-sep, 17-oct, 29-oct, 20-nov, 28-nov, 10-dec, 18-dec, 4-jan
              asw_depth = 9
              crit_fr_asw = 1
              script: same as in Validation.Emerald Sowing Time Experiment 2015.Emerald2015.Factors.P1.FurrowIrrigation
            Manager HarvestAfterDate
              HarvestDate = 3-Apr
              script: same as in Validation.Douglas Daly Row Spacing 2021.DDRF21.DDRF21Base.paddock.HarvestAfterDate
            Manager Reset on date: same as Validation.Emerald Sowing Time Experiment 2015.Emerald2015.Factors.P1.Reset on date
            Soil Grey Vertosol NMM: ASCOrder=Vertosol; ASCSubOrder=Grey; SoilType=Clay; Site=Myall Vale; NearestTown=Narrabri, NSW 2390; Region=North West Slopes and Plains; State=New South Wales; Country=Australia; NaturalVegetation=Grasslands; ApsoilNumber=97; Latitude=-30.2056; Longitude=149.593; LocationAccuracy=+/- 20m; YearOfSampling=0; DataSource=CSIRO Plant Industry, Myall Vale (D Richards); Comments=Clay -
              Physical
                Thickness  ParticleSizeSand  ParticleSizeSilt  ParticleSizeClay  Rocks  BD    AirDry  LL15  DUL    SAT
                150        5                 65                30                0      1.31  0.109   0.15  0.475  0.476
                100        5                 65                30                0      1.26  0.168   0.24  0.438  0.494
                100        5                 65                30                0      1.35  0.168   0.22  0.437  0.491
                100        5                 65                30                0      1.35  0.195   0.25  0.437  0.462
                100        5                 65                30                0      1.35  0.195   0.24  0.437  0.462
                100        5                 65                30                0      1.35  0.24    0.24  0.437  0.462
                250        5                 65                30                0      1.39  0.24    0.29  0.435  0.446
                200        5                 65                30                0      1.44  0.264   0.3   0.424  0.428
                200        5                 65                30                0      1.45  0.264   0.3   0.424  0.424
                BD, DUL source: Field measured and checked for sensibility
                SAT source: Calculated from measured, estimated or calculated BD
                Rocks, ParticleSizeSand, ParticleSizeSilt, ParticleSizeClay source: Calculated
                SoilCrop CottonSoil: LL=[0.15, 0.32, 0.22, 0.25, 0.26, 0.25, 0.3, 0.3, 0.3]; KL=[0.06, 0.06, 0.06, 0.06, 0.06, 0.04, 0.04, 0.02, 0.02]; XF=[1, 0.15, 1, 1, 1, 1, 1, 1, 1]
              WaterBalance SoilWater: SummerDate=1-Nov; SummerU=7; SummerCona=5; WinterDate=1-Apr; WinterU=7; WinterCona=5; DiffusConst=1; DiffusSlope=1; Salb=0.12; CN2Bare=73; CNRed=20; CNCov=0.8; PSIDul=-100; Thickness=[150, 150, 300, 300, 300, 300, 300]; SWCON=[0.3, 0.3, 0.3, 0.3, 0.3, 0.3, 0.3]
              Organic: FOMCNRatio=40; CarbonUnits=Total
                Thickness  Carbon  SoilCNRatio  FBiom  FInert  FOM
                150        0.7     12           0.04   0.4     347.129
                150        0.4     12           0.02   0.6     270.344
                300        0.5     12           0.02   0.8     163.972
                300        0.3     12           0.02   1       99.454
                300        0.12    12           0.01   1       60.322
                300        0.1     12           0.01   1       36.587
                300        0.05    12           0.01   1       22.191
              Chemical: PHUnits=Water
                Thickness  PH   CEC
                150        8.6  10.325
                150        8.9  10.055
                300        9    9.74
                300        8.8  9.065
                300        8.8  8.615
                300        8.8  8.57
                300        8.8  8.4575
                CEC source: Calculated
              Nutrient
              Water: Thickness=[150, 100, 100, 100, 100, 100, 250, 200, 200]; FilledFromTop=true
                InitialValues=[0.475, 0.438, 0.437, 0.437, 0.437, 0.437, 0.435, 0.424, 0.424]
              Solute NO3: Thickness=[150, 150, 300, 300, 300, 300, 300]; InitialValues=[9, 2, 3, 8, 1, 1, 1]; InitialValuesUnits=ppm; WaterTableConcentration=0; D0=0; DepthConstant=0; MaxDepthSoluteAccessible=0; RunoffEffectivenessAtMovingSolute=0; MaxEffectiveRunoff=0
              Solute NH4: Thickness=[150, 150, 300, 300, 300, 300, 300]; InitialValues=[0, 0, 0, 0, 0, 0, 0]; InitialValuesUnits=ppm; WaterTableConcentration=0; D0=0; DepthConstant=0; MaxDepthSoluteAccessible=0; RunoffEffectivenessAtMovingSolute=0; MaxEffectiveRunoff=0
              Solute Urea: same as Validation.Emerald Sowing Time Experiment 2015.Emerald2015.Emerald2015Base.paddock.Grey Vertosol NMM.NH4
              Memo
                If you look at the weather files all experiments were pre irrigated in late September – early October so soil profile would have been at DUL below surface layer(s) at planting.

                A combination of post establishment rain, clay soil and very slow crop growth (cold soil and temperatures) meant probes to 1.3 m could not be installed until about a month after establishment.

                Only the surface layers would have dried slightly by 1st probe readings.

                The plants are tiny at this stage at Narrabri so you could assume Dul below about 15 cm.

                APSIM could calculate the soil Et between planting and  probe measurement. Then if needed re set soil water = observed at first measurement and let simulation continue from that point – the error should be small.
              SoilTemperature CERESSoilTemperature: InteractionsPerDay=8
              CERESSoilTemperature Temperature
              LayerStructure: Thickness=[150, 100, 100, 100, 100, 100, 250, 200, 200]
            SurfaceOrganicMatter: InitialResidueName=nativepasture; InitialResidueType=nativepasture; InitialResidueMass=0; InitialStandingFraction=0; InitialCPR=0; InitialCNR=0
            Plant Cotton: PlantType=Cotton
            Report DailyReport: same as Validation.Douglas Daly 2020 Irrigation.DouglasDaly2021.DouglasDaly20211Base.paddock.DailyReport
            Report HarvestReport: EventNames=[Cotton].Harvesting
              VariableNames:
                [Clock].Today
                [Cotton].Structure.MainStemPrimordiaNo
                [Cotton].Phenology.NFF
                [Cotton].Script.FinalTag
            Report SoilReport: EventNames=[Clock].DoReport
              VariableNames:
                [Clock].Today
                [Cotton].DaysAfterSowing
                sum([Soil].Water.PAWmm) as TotalPAWmm
                ([Soil].Water.MM[1]+[Soil].Water.MM[2]+[Soil].Water.MM[3]+[Soil].Water.MM[4]+[Soil].Water.MM[5]+[Soil].Water.MM[6]) as TotalSW180cm
                [Soil].Water.PAWmm
                [Soil].CERESSoilTemperature.AverageSoilTemperature
      Memo
        Should resemble an S-curve
    Folder Narrabri0203
      Memo
        Experiment 2: 2002-2003 Narrabri growth Analysis

        Management|Date|DAS|Rate
        -|-|-|-
        N Fertilizer (Ammonium gas)|27 Aug 2002|-44| 120 kg N/ha
        Pre-watering|24 Sep 2002|-17|
        Starting soil-N sampling|1 Oct 2002|-9|
        Sowing|10 Oct 2002|0|
        Irrigation 1|30 Oct 2002|20|
        Irrigation 2|13 Dec 2002|64|
        Irrigation 3|1 Jan 2003?|85|
        Irrigation 4|17 Jan 2003|99|
        Irrigation 5|30 Jan 2003|112|
        Irrigation 6|14 Feb 2003|127|

        =================================================

        Soil-N on 1 Oct 2002 - SITE 1:

        Depth mm|Initial values ppm
        -|-
        0-150|45.5
        150-300|11.9
        300-600|2.4
        600-900|0.5
        900-1200|0.5
        1200-1500|0.5
        1500-1800|0.5
      Memo Phenology stages Observed
        Stage|Date|DAS
        -|-|-
        Sowing|10 Oct 2002|0
        Emergence||
        Squaring|2 Dec 2002|53
        Flowering|26 Dec 2002|77
        Cutout||
        OpenBolls|10 Feb 2003?|123
        Maturity|7 Mar 2003|148
        HarvestRipe|11 Apr 2003|183
      Memo Growth regulator details
        PHYSIOLOGICAL DETERMINANTS OF YIELD AND MATURITY IN ULTRA-NARROW ROW COTTON. A thesis submitted for the degree of Doctor of Philosophy at The University of Queensland in December 2006 by Rose Roche

        Page 52/53: No growth regulators applied
      Experiment Narrabri0203
        Factors
          CompositeFactor Conventional: Specifications=[Sowing]
            Manager Sowing
              Crop = [Cotton]
              SowDate = 10-oct
              CultivarName = Sicala V-3RRi
              SowingDepth = 50
              RowSpacing = 1000
              Population = 8.7
              script: same as in Validation.Douglas Daly 2020 Irrigation.DouglasDaly2021.Factors.Irrigation.Full
          CompositeFactor UNR: Specifications=[Sowing]
            Manager Sowing
              Crop = [Cotton]
              SowDate = 10-oct
              CultivarName = Sicala V-3RRi
              SowingDepth = 50
              RowSpacing = 250
              Population = 28.6
              script: same as in Validation.Douglas Daly 2020 Irrigation.DouglasDaly2021.Factors.Irrigation.Full
        Simulation Rose0203Base
          Clock: Start=2002-08-27; End=2003-06-01
          Summary summaryfile
          Weather: FileName=Weatherfiles/ACRI0203.met
          SoilArbitrator Soil Arbitrator
          MicroClimate: a_interception=0; b_interception=1; c_interception=0; d_interception=0; SoilHeatFluxFraction=0.4; MinimumHeightDiffForNewLayer=0; NightInterceptionFraction=0.5; ReferenceHeight=2
          Zone paddock: Area=1; Slope=0; AspectAngle=0; Altitude=50
            Manager Sowing
              Crop = [Cotton]
              SowDate = 10-oct
              CultivarName = Sicala V-3RRi
              SowingDepth = 50
              RowSpacing = 1000
              Population = 12
              script: same as in Validation.Douglas Daly 2020 Irrigation.DouglasDaly2021.Factors.Irrigation.Full
            Fertiliser
            Operations FertiliserEvents
              2002-08-27  [Fertiliser].Apply(120, "UreaN",10);
            Irrigation
            Manager FurrowIrrigation
              IrrigateDates = 24-Sep, 30-Oct, 13-Dec, 1-Jan, 17-Jan, 30-Jan, 14-Feb
              asw_depth = 9
              crit_fr_asw = 1
              script: same as in Validation.Emerald Sowing Time Experiment 2015.Emerald2015.Factors.P1.FurrowIrrigation
            Manager HarvestAfterDate
              HarvestDate = 11-Apr
              script: same as in Validation.Douglas Daly Row Spacing 2021.DDRF21.DDRF21Base.paddock.HarvestAfterDate
            Soil Grey Vertosol NMM: ASCOrder=Vertosol; ASCSubOrder=Grey; SoilType=Clay; Site=Myall Vale; NearestTown=Narrabri, NSW 2390; Region=North West Slopes and Plains; State=New South Wales; Country=Australia; NaturalVegetation=Grasslands; ApsoilNumber=97; Latitude=-30.2056; Longitude=149.593; LocationAccuracy=+/- 20m; YearOfSampling=0; DataSource=CSIRO Plant Industry, Myall Vale (D Richards); Comments=Clay -
              Physical
                Thickness  ParticleSizeSand  ParticleSizeSilt  ParticleSizeClay  Rocks  BD    AirDry  LL15   DUL   SAT
                100        5                 65                30                0      1.31  0.2     0.2    0.35  0.4
                100        5                 65                30                0      1.26  0.168   0.2    0.35  0.4
                100        5                 65                30                0      1.35  0.168   0.2    0.4   0.43
                100        5                 65                30                0      1.35  0.195   0.2    0.38  0.43
                100        5                 65                30                0      1.2   0.195   0.2    0.5   0.53
                200        5                 65                30                0      1.2   0.2     0.2    0.35  0.4
                200        5                 65                30                0      1.39  0.264   0.264  0.39  0.42
                200        5                 65                30                0      1.44  0.264   0.264  0.37  0.4
                200        5                 65                30                0      1.45  0.264   0.264  0.37  0.4
                Rocks, ParticleSizeSand, ParticleSizeSilt, ParticleSizeClay source: Calculated
                SoilCrop CottonSoil: LL=[0.25, 0.2, 0.2, 0.2, 0.2, 0.2, 0.264, 0.264, 0.264]; KL=[0.1, 0.1, 0.1, 0.06, 0.06, 0.04, 0.04, 0.02, 0.02]; XF=[1, 0.2, 1, 1, 1, 1, 1, 1, 1]
              WaterBalance SoilWater: same as Validation.Emerald Sowing Time Experiment 2015.Emerald2015.Emerald2015Base.paddock.Grey Vertosol NMM.SoilWater
              Organic: FOMCNRatio=40; CarbonUnits=Total
                Thickness  Carbon  SoilCNRatio  FBiom  FInert  FOM
                150        0.88    12           0.04   0.4     347.129
                150        0.76    12           0.02   0.6     270.344
                300        0.62    12           0.02   0.8     163.972
                300        0.32    12           0.02   1       99.454
                300        0.12    12           0.01   1       60.322
                300        0.1     12           0.01   1       36.587
                300        0.05    12           0.01   1       22.191
              Chemical: PHUnits=Water
                Thickness  PH   CEC
                150        8.9  10.325
                150        9.2  10.055
                300        9.3  9.74
                300        9    9.065
                300        8.8  8.615
                300        7.5  8.57
                300        8.4  8.4575
                CEC source: Calculated
                PH source: Estimated based on local knowledge
              Nutrient
              Water: Thickness=[150, 150, 100, 100, 100, 100, 250, 200, 200]; FilledFromTop=false
                InitialValues=[0.345236, 0.375847, 0.372649, 0.487749, 0.343874, 0.343874, 0.381018, 0.365671, 0.365671]
              Solute NO3: Thickness=[150, 150, 300, 300, 300, 300, 300]; InitialValues=[45.5, 11.9, 2.4, 5, 0.5, 0.5, 0.5]; InitialValuesUnits=ppm; WaterTableConcentration=0; D0=0; DepthConstant=0; MaxDepthSoluteAccessible=0; RunoffEffectivenessAtMovingSolute=0; MaxEffectiveRunoff=0
              Solute NH4: same as Validation.Emerald Sowing Time Experiment 2015.Emerald2015.Emerald2015Base.paddock.Grey Vertosol NMM.NH4
              Solute Urea: same as Validation.Emerald Sowing Time Experiment 2015.Emerald2015.Emerald2015Base.paddock.Grey Vertosol NMM.NH4
              SoilTemperature CERESSoilTemperature: InteractionsPerDay=8
              LayerStructure: Thickness=[100, 100, 100, 100, 100, 200, 200, 200, 200]
            Plant Cotton: PlantType=Cotton
            Report DailyReport: EventNames=[Clock].DoReport
              VariableNames:
                [Clock].Today
                [Clock].Today.DayOfYear
                [Weather].Rain
                [Weather].MeanT
                [Weather].MaxT
                [Weather].MinT
                [Weather].Radn
                [Weather].VPD
                [Cotton].DaysAfterSowing
                [Cotton].Arbitrator.DM.TotalPlantDemand
                [Cotton].Arbitrator.DM.TotalFixationSupply
                [Cotton].Arbitrator.TotalDMFixationSupply
                [Cotton].Arbitrator.N.TotalFixationSupply
                [Cotton].Arbitrator.N.TotalPlantDemand
                [Cotton].Arbitrator.N.TotalPlantSupply
                sum([Cotton].Arbitrator.N.Fixation) as NFixed
                [Cotton].NitrogenUptake
                [Cotton].Phenology.Stage
                [Cotton].Phenology.ThermalTime
                [Cotton].Phenology.CurrentStageName
                [Cotton].Phenology.Photoperiod
                [Cotton].Phenology.EmergenceDAS
                [Cotton].Phenology.SquaringDAS
                [Cotton].Phenology.FloweringDAS
                [Cotton].Phenology.CutoutDAS
                [Cotton].Phenology.OpenbollsDAS
                [Cotton].Phenology.MaturityDAS
                [Cotton].Phenology.GrowthRateScript.Script.AboveGroundYesterday
                [Cotton].Phenology.GrowthRateScript.Script.FruitYesterday
                [Cotton].Phenology.GrowthRate.CGR
                [Cotton].Phenology.GrowthRate.FGR
                [Cotton].AboveGround.Wt
                [Cotton].AboveGround.N
                [Cotton].AboveGroundLive.Wt
                [Cotton].Leaf.NodeNumber
                [Cotton].Leaf.Fw
                [Cotton].Leaf.Fn
                [Cotton].Leaf.Photosynthesis.FT
                [Cotton].Leaf.Photosynthesis.FVPD
                [Cotton].Leaf.LAI
                [Cotton].Leaf.HeightFunction
                [Cotton].Leaf.Height
                [Cotton].Leaf.CoverGreen
                [Cotton].Leaf.CoverTotal
                [Cotton].Leaf.Live.Wt
                [Cotton].Leaf.Live.StructuralWt
                [Cotton].Leaf.Live.MetabolicWt
                [Cotton].Leaf.Allocated.MetabolicWt
                [Cotton].Leaf.Allocated.StructuralWt
                [Cotton].Leaf.Dead.StructuralWt
                [Cotton].Leaf.Dead.MetabolicWt
                [Cotton].Leaf.Live.N
                [Cotton].Leaf.Live.NConc
                [Cotton].Leaf.Dead.Wt
                [Cotton].Leaf.Dead.N
                [Cotton].Leaf.Dead.NConc
                [Cotton].Leaf.RadiationIntercepted
                [Cotton].Leaf.Wt
                [Cotton].Leaf.NConc
                [Cotton].Leaf.N
                [Cotton].Leaf.Senesced.Wt
                [Cotton].Leaf.BranchNumber
                [Cotton].Leaf.SpecificAreaCanopy
                [Cotton].Leaf.Sites
                [Cotton].Leaf.SpecificArea
                [Cotton].Leaf.CoverTotal
                [Cotton].Stem.Wt
                [Cotton].Stem.Total.StructuralWt
                [Cotton].Stem.Live.StructuralWt
                [Cotton].Stem.Live.StructuralN
                [Cotton].Stem.N
                [Cotton].Stem.NConc
                [Cotton].Lint.Wt
                [Cotton].Lint.N
                [Cotton].Lint.NConc
                [Cotton].Lint.Bales as Bales
                [Cotton].Boll.HarvestIndex
                [Cotton].Lint.Allocated.Wt
                [Cotton].Lint.DMDemand.Total
                [Cotton].Leaf.DMDemand.Total
                [Cotton].Bur.DMDemand.Total
                [Cotton].Stem.DMDemand.Total
                ([Cotton].Bur.DMDemand.Total+[Cotton].Lint.DMDemand.Total+[Cotton].Seed.DMDemand.Total) as BollDemand
                ([Cotton].Stem.DMDemand.Total+[Cotton].Leaf.DMDemand.Total) as VegetativeDemand
                ([Cotton].Stem.DMDemand.Total+[Cotton].Leaf.DMDemand.Total+[Cotton].Lint.DMDemand.Total+[Cotton].Seed.DMDemand.Total+[Cotton].Bur.DMDemand.Total) as ShootDMDemand
                [Cotton].Root.DMDemand.Total
                [Cotton].Lint.NDemand.Total
                [Cotton].Leaf.NDemand.Total
                [Cotton].Stem.NDemand.Total
                [Cotton].Root.NDemand.Total
                [Cotton].Root.NUptake
                [Cotton].Lint.LiveFWt
                [Cotton].Root.Wt
                [Cotton].Root.Depth
                [Soil].Water.Volumetric[1:3]
                [Soil].Water.Volumetric
                sum([Soil].SoilWater.ESW) as TotalESW
                [Soil].SoilWater.SW
                ([Soil].SoilWater.SWmm[1]+[Soil].SoilWater.SWmm[2]+[Soil].SoilWater.SWmm[3]+[Soil].SoilWater.SWmm[4]+[Soil].SoilWater.SWmm[5]+[Soil].SoilWater.SWmm[6]) as SWmm1800
                ([Soil].SoilWater.ESW[1]+[Soil].SoilWater.ESW[2]+[Soil].SoilWater.ESW[3]+[Soil].SoilWater.ESW[4]+[Soil].SoilWater.ESW[5]+[Soil].SoilWater.ESW[6]) as ESW1800
                sum([Soil].NO3.kgha) as TotalSoilNO3
                sum([Soil]..NH4.kgha) as TotalSoilNH4
                sum([Soil].Water.MM) as TotalSW
                sum([Soil].NO3.ppm) as NO3
                sum([Soil].NH4.ppm) as NH4
                sum([Soil].Water.Volumetric) as TotalSWC
                sum([Soil].Water.MM) as TotalWaterMM
                ([Soil].Water.MM[1]+[Soil].Water.MM[2]+[Soil].Water.MM[3]+[Soil].Water.MM[4]+[Soil].Water.MM[5]+[Soil].Water.MM[6]+[Soil].Water.MM[7]) as SW1500mm
                ([Soil].Water.MM[1]+[Soil].Water.MM[2]+[Soil].Water.MM[3]+[Soil].Water.MM[4]+[Soil].Water.MM[5]+[Soil].Water.MM[6]) as SW1800mm
                ([Soil].Water.MM[1]+[Soil].Water.MM[2]+[Soil].Water.MM[3]+[Soil].Water.MM[4]+[Soil].Water.MM[5]) as SW1200mm
                (sum([CottonSoil].PAWmm)/sum([CottonSoil].PAWCmm)) as AvailableSoilMoisture
                ([CottonSoil].PAWmm[1]+[CottonSoil].PAWmm[2]+[CottonSoil].PAWmm[3]+[CottonSoil].PAWmm[4]+[CottonSoil].PAWmm[5]) as PAWTop5Layers
                -(([CottonSoil].PAWCmm[1]+[CottonSoil].PAWCmm[2]+[CottonSoil].PAWCmm[3]+[CottonSoil].PAWCmm[4]+[CottonSoil].PAWCmm[5])-([CottonSoil].PAWmm[1]+[CottonSoil].PAWmm[2]+[CottonSoil].PAWmm[3]+[CottonSoil].PAWmm[4]+[CottonSoil].PAWmm[5])) as SoilWaterDeficit120
                [Irrigation].IrrigationApplied
                [Cotton].Boll.Wt
                [Cotton].Lint.Wt
                [Cotton].Seed.Wt
                [Cotton].Bur.Wt
                [Cotton].NitrogenUptake
                sum([Soil].SoilWater.SWmm) as TotalSWmm
                ([Soil].SoilWater.SWmm[1]) as SW1
                ([Soil].SoilWater.SWmm[2]) as SW2
                ([Soil].SoilWater.SWmm[3]) as SW3
                ([Soil].SoilWater.SWmm[4]) as SW4
                ([Soil].SoilWater.SWmm[5]) as SW5
                ([Soil].SoilWater.SWmm[6]) as SW6
                ([Soil].SoilWater.SWmm[1]+[Soil].SoilWater.SWmm[2]+[Soil].SoilWater.SWmm[3]+[Soil].SoilWater.SWmm[4]+[Soil].SoilWater.SWmm[5]+[Soil].SoilWater.SWmm[6]) as SWmm1800
                //to disable reporting
                ([Soil].SoilWater.SWmm[7]) as SW7
                ([Soil].SoilWater.SWmm[8]) as SW8
                ([Soil].SoilWater.SWmm[9]) as SW9
                ([Soil].SoilWater.SWmm[1]+[Soil].SoilWater.SWmm[2]+[Soil].SoilWater.SWmm[3]+[Soil].SoilWater.SWmm[4]+[Soil].SoilWater.SWmm[5]+[Soil].SoilWater.SWmm[6]+[Soil].SoilWater.SWmm[7]+[Soil].SoilWater.SWmm[8]) as SWmm2400
                [Soil].SoilWater.ESW[1] as ESW1
                [Soil].SoilWater.ESW[2] as ESW2
                [Soil].SoilWater.ESW[3] as ESW3
                [Soil].SoilWater.ESW[4] as ESW4
                [Soil].SoilWater.ESW[5] as ESW5
                [Soil].SoilWater.ESW[6] as ESW6
                [Soil].SoilWater.ESW[7] as ESW7
                [Soil].SoilWater.PAWmm[1] as PAW1
                [Cotton].Arbitrator.SDRatio
                [Cotton].Arbitrator.SDRatioBound
            Report HarvestReport: same as Validation.Douglas Daly Row Spacing 2021.DDRF21.DDRF21Base.paddock.HarvestReport
            Report SoilReport: same as Validation.Douglas Daly 2020 Irrigation.DouglasDaly2021.DouglasDaly20211Base.paddock.SoilReport
            SurfaceOrganicMatter: InitialResidueName=nativepasture; InitialResidueType=nativepasture; InitialResidueMass=0; InitialStandingFraction=0; InitialCPR=0; InitialCNR=0
      Memo
        Should resemble an S-curve
    Folder Narrabri Deficit Trial 2006
      Memo
        CRDC and Cottoninfo, 2018. NUTRIpak. A practical guide to cotton nutrition, Cotton Research and Development Corporation.

        To achieve high cotton yields, an uptake of about 250 kg N/
        ha is needed. In irrigated crops, most N taken up by the crop
        comes from the surface (0 to 50 cm) soil from where organic
        matter, mineralised N and fertiliser N are commonly located.

        With only one fert application on 2006-08-22 [#Fertiliser].Apply(200, Fertiliser.Types.UreaN,10); not even half of this was taken up and this was a high yielding crop!!!!!
      Memo Phenology stages Observed
        Stage|Ir80|DAS|Ir45|DAS
        -|-|-|-|-
        Sowing|10 Oct 2006|0|10 Oct 2006|0
        Emergence|19 Oct 2006|9|19 Oct 2006|9
        Squaring|1 Dec 2006|52|1 Dec 2006|52
        Flowering|20 Dec 2006|71|20 Dec 2006|71
        Cutout|3 Feb 2007|116|23 Jan 2007|105
        OpenBolls|2 Mar 2007|143|13 Feb 2007|126
        Maturity|22 Mar 2007|163|10 Mar 2007|151
        HarvestRipe|3 Apr 2007|175|21 Mar 2007|162

        Is date emergence correct? Other data suggest 28 October. 19 Oct more likely
      Memo Growth regulator details
        I could not find any details on the use of growth regulators and therefore assume that none were applied.

        No data on growth regulators were provided with the observed data either.
      Experiment NAR0607
        Factors
          CompositeFactor Ir80: Specifications=[FurrowIrrigation]
            Manager FurrowIrrigation
              IrrigateDates = 28-sep, 1-dec, 15-dec, 29-dec, 8-jan, 17-jan, 23-jan, 30-jan, 5-feb, 14-feb, 24-feb, 14-mar
              asw_depth = 9
              crit_fr_asw = 1
              script: same as in Validation.Emerald Sowing Time Experiment 2015.Emerald2015.Factors.P1.FurrowIrrigation
          CompositeFactor Ir68: Specifications=[FurrowIrrigation]
            Manager FurrowIrrigation
              IrrigateDates = 28-sep, 1-dec, 15-dec, 8-jan, 17-jan, 29-jan, 8-feb, 24-feb
              asw_depth = 9
              crit_fr_asw = 1
              script: same as in Validation.Emerald Sowing Time Experiment 2015.Emerald2015.Factors.P1.FurrowIrrigation
          CompositeFactor Ir55: Specifications=[FurrowIrrigation]
            Manager FurrowIrrigation
              IrrigateDates = 28-sep, 8-dec, 29-dec, 17-jan, 25-jan, 2-feb, 14-feb, 24-feb
              asw_depth = 9
              crit_fr_asw = 1
              script: same as in Validation.Emerald Sowing Time Experiment 2015.Emerald2015.Factors.P1.FurrowIrrigation
          CompositeFactor Ir45: Specifications=[FurrowIrrigation]
            Manager FurrowIrrigation
              IrrigateDates = 28-sep, 21-dec, 17-jan, 5-feb
              asw_depth = 9
              crit_fr_asw = 1
              script: same as in Validation.Emerald Sowing Time Experiment 2015.Emerald2015.Factors.P1.FurrowIrrigation
        Simulation NAR0607Base
          Clock: Start=2006-08-01; End=2007-04-19
          Summary summaryfile
          Weather: FileName=Weatherfiles/Narrabri_2006-07.met
          SoilArbitrator Soil Arbitrator
          MicroClimate: a_interception=0; b_interception=1; c_interception=0; d_interception=0; SoilHeatFluxFraction=0.4; MinimumHeightDiffForNewLayer=0; NightInterceptionFraction=0.5; ReferenceHeight=2
          Zone paddock: Area=1; Slope=0; AspectAngle=0; Altitude=50
            Manager Sowing
              Crop = [Cotton]
              SowDate = 10-oct
              CultivarName = Sicot_71B
              SowingDepth = 50
              RowSpacing = 1000
              Population = 11
              script: same as in Validation.Douglas Daly 2020 Irrigation.DouglasDaly2021.Factors.Irrigation.Full
            Fertiliser
            Operations FertiliserEvents
              2006-08-22  [Fertiliser].Apply(200, "UreaN",10);
            Irrigation
            Manager FurrowIrrigation
              IrrigateDates = 28-sep
              asw_depth = 9
              crit_fr_asw = 1
              script: same as in Validation.Emerald Sowing Time Experiment 2015.Emerald2015.Factors.P1.FurrowIrrigation
            Manager ResetWater
              ResetDate = 22-nov
              OffsetDays = 0
              ResetWater = No
              ResetNutrients = No
              ResetSOM = No
```csharp
using Models.Soils.Nutrients;
using APSIM.Shared.Utilities;
using Models.Surface;
using Models.Utilities;
using Models.Soils.Nutrients;
using Models.Soils;
using Models.PMF;
using Models.Core;
using System;
using System.Linq;
using Models.Interfaces;

namespace Models
{
    [Serializable]
    public class Script : Model
    {
        [Link] private Clock Clock;
        [Link] private Plant Wheat;
        [Link] private ISoilWater SoilWater;
        [Link] private Nutrient nutrient;
        [Link] private SurfaceOrganicMatter SOM;
        [Link] private Summary Summary;

        [Description("Date to reset on:")]
        public string ResetDate {get;set;}
        
        [Description("Offset by Days (Negative is Days Before, Positive is Days After):")]
        public int OffsetDays {get;set;}

        [Description("Reset Water? (Yes or No)")]
        public string ResetWater {get;set;}

        [Description("Reset Soil Nutrients ? (Yes or No)")]
        public string ResetNutrients {get;set;}

        [Description("Reset Surface Organic Matter? (Yes or No)")]
        public string ResetSOM {get;set;}

        [EventSubscribe("DoManagement")]
        private void OnDoManagement(object sender, EventArgs e)
        {
            DateTime offsetDate = DateUtilities.GetDate(ResetDate, Clock.Today).AddDays(OffsetDays);
            if (offsetDate.Equals(Clock.Today))
            {
                if (ResetWater == "Yes")
                {
                    Summary.WriteMessage(this, "Reset Water", MessageType.Diagnostic);
                    SoilWater.Reset();
                }
                if (ResetNutrients == "Yes")
                {
                    Summary.WriteMessage(this, "Reset Nitrogen", MessageType.Diagnostic);
                    nutrient.Reset();
                }
                if (ResetSOM == "Yes")
                {
                    Summary.WriteMessage(this, "Reset Surface OM", MessageType.Diagnostic);
                    SOM.Reset();
                }
            }
        }
    }
}
```
            Manager HarvestAfterDate: same as Validation.Emerald Sowing Time Experiment 2015.Emerald2015.Emerald2015Base.paddock.HarvestAfterDate
            Soil Grey Vertosol NMM: ASCOrder=Vertosol; ASCSubOrder=Grey; SoilType=Clay; Site=Myall Vale; NearestTown=Narrabri, NSW 2390; Region=North West Slopes and Plains; State=New South Wales; Country=Australia; NaturalVegetation=Grasslands; ApsoilNumber=97; Latitude=-30.2056; Longitude=149.593; LocationAccuracy=+/- 20m; YearOfSampling=0; DataSource=CSIRO Plant Industry, Myall Vale (D Richards); Comments=Clay -
              Memo: same as Validation.Emerald Sowing Time Experiment 2015.Emerald2015.Emerald2015Base.paddock.Grey Vertosol NMM.Memo
              Physical: same as Validation.Emerald Sowing Time Experiment 2015.Emerald2015.Emerald2015Base.paddock.Grey Vertosol NMM.Physical
              LayerStructure: Thickness=[150, 100, 100, 100, 100, 100, 250, 200, 200]
              WaterBalance SoilWater: same as Validation.Emerald Sowing Time Experiment 2015.Emerald2015.Emerald2015Base.paddock.Grey Vertosol NMM.SoilWater
              Organic: same as Validation.Narrabri0203.Narrabri0203.Rose0203Base.paddock.Grey Vertosol NMM.Organic
              Chemical: same as Validation.Narrabri0203.Narrabri0203.Rose0203Base.paddock.Grey Vertosol NMM.Chemical
              Nutrient
              Water: Thickness=[150, 100, 100, 100, 100, 100, 250, 200, 200]; InitialValues=[0.475, 0.32629, 0.22, 0.25, 0.24, 0.24, 0.29, 0.3, 0.3]; FilledFromTop=true
              Solute NO3: Thickness=[150, 150, 300, 300, 300, 300, 300]; InitialValues=[29.7, 18.3, 6.4, 4, 3, 2.8, 0]; InitialValuesUnits=ppm; WaterTableConcentration=0; D0=0; DepthConstant=0; MaxDepthSoluteAccessible=0; RunoffEffectivenessAtMovingSolute=0; MaxEffectiveRunoff=0
              Solute NH4: same as Validation.Emerald Sowing Time Experiment 2015.Emerald2015.Emerald2015Base.paddock.Grey Vertosol NMM.NH4
              Solute Urea: same as Validation.Emerald Sowing Time Experiment 2015.Emerald2015.Emerald2015Base.paddock.Grey Vertosol NMM.NH4
              SoilTemperature CERESSoilTemperature: InteractionsPerDay=8
            SurfaceOrganicMatter: InitialResidueName=nativepasture; InitialResidueType=nativepasture; InitialResidueMass=0; InitialStandingFraction=0; InitialCPR=0; InitialCNR=0
            Plant Cotton: PlantType=Cotton
            Report DailyReport: EventNames=[Clock].DoReport
              VariableNames:
                [Clock].Today
                [Clock].Today.DayOfYear
                [Weather].Rain
                [Weather].MeanT
                [Weather].MaxT
                [Weather].MinT
                [Weather].Radn
                [Weather].VPD
                [Weather].CO2
                [Arbitrator].TotalDMFixationSupply
                [Cotton].DaysAfterSowing
                [Cotton].Arbitrator.DM.TotalPlantDemand
                [Cotton].Arbitrator.DM.TotalFixationSupply
                [Cotton].Arbitrator.TotalDMFixationSupply
                [Cotton].Arbitrator.N.TotalFixationSupply
                [Cotton].Arbitrator.N.TotalPlantDemand
                [Cotton].Arbitrator.N.TotalPlantSupply
                sum([Cotton].Arbitrator.N.Fixation) as NFixed
                //(ln([Cotton].WholePlantGrowthRate)) as RGR
                [Cotton].WholePlantGrowthRate
                [Cotton].AboveGroundGrowthRate
                [Cotton].PotentialBollGrowthRate
                [Cotton].NitrogenUptake
                [Cotton].Phenology.Stage
                [Cotton].Phenology.ThermalTime
                [Cotton].Phenology.AccumulatedTT
                [Cotton].Phenology.CurrentStageName
                [Cotton].Phenology.Photoperiod
                [Cotton].Phenology.EmergenceDAS
                [Cotton].Phenology.SquaringDAS
                [Cotton].Phenology.FloweringDAS
                [Cotton].Phenology.CutoutDAS
                [Cotton].Phenology.OpenbollsDAS
                [Cotton].Phenology.MaturityDAS
                [Cotton].Phenology.EarlyFlowering.BollRatio
                [Cotton].Phenology.EarlyFlowering.FractionComplete
                [Cotton].AboveGround.Wt
                [Cotton].AboveGround.N
                [Cotton].AboveGroundLive.Wt
                [Cotton].Boll.NConc
                [Cotton].Leaf.NodeNumber
                [Cotton].Leaf.Fw
                [Cotton].Leaf.Fn
                [Cotton].Leaf.Photosynthesis.FT
                [Cotton].Leaf.Photosynthesis.FVPD
                [Cotton].Leaf.LAI
                [Cotton].Leaf.HeightFunction
                [Cotton].Leaf.Height
                [Cotton].Leaf.CoverGreen
                [Cotton].Leaf.CoverTotal
                [Cotton].Leaf.Live.Wt
                [Cotton].Leaf.Live.StructuralWt
                [Cotton].Leaf.Live.MetabolicWt
                [Cotton].Leaf.Allocated.MetabolicWt
                [Cotton].Leaf.Allocated.StructuralWt
                [Cotton].Leaf.DMDemand.Total
                [Cotton].Leaf.Dead.StructuralWt
                [Cotton].Leaf.Dead.MetabolicWt
                [Cotton].Leaf.Live.N
                [Cotton].Leaf.Live.NConc
                [Cotton].Leaf.Dead.Wt
                [Cotton].Leaf.Dead.N
                [Cotton].Leaf.Dead.NConc
                [Cotton].Leaf.RadiationIntercepted
                [Cotton].Leaf.Wt
                [Cotton].Leaf.NConc
                [Cotton].Leaf.N
                [Cotton].Leaf.Senesced.Wt
                [Cotton].Leaf.BranchNumber
                [Cotton].Leaf.SpecificAreaCanopy
                [Cotton].Leaf.Sites
                [Cotton].Leaf.SpecificArea
                [Cotton].Leaf.CoverTotal
                [Cotton].Stem.Wt
                [Cotton].Stem.Total.StructuralWt
                [Cotton].Stem.Live.StructuralWt
                [Cotton].Stem.Live.StructuralN
                [Cotton].Stem.N
                [Cotton].Stem.NConc
                [Cotton].Lint.Wt
                [Cotton].Lint.N
                [Cotton].Lint.NConc
                [Cotton].Lint.Bales as Bales
                [Cotton].Lint.Allocated.Wt
                [Cotton].Bur.HarvestIndex
                [Cotton].Bur.PotentialHarvestIndex
                [Cotton].Lint.HarvestIndex
                [Cotton].Lint.PotentialHarvestIndex
                [Cotton].Seed.HarvestIndex
                [Cotton].Seed.PotentialHarvestIndex
                [Cotton].Lint.DMDemand.Total
                [Cotton].Leaf.DMDemand.Total
                [Cotton].Bur.DMDemand.Total
                [Cotton].Seed.DMDemand.Total
                [Cotton].Stem.DMDemand.Total
                ([Cotton].Bur.DMDemand.Total+[Cotton].Lint.DMDemand.Total+[Cotton].Seed.DMDemand.Total) as BollDemand
                ([Cotton].Stem.DMDemand.Total+[Cotton].Leaf.DMDemand.Total) as VegetativeDemand
                //([Cotton].Stem.DMDemand.Total+[Cotton].Leaf.DMDemand.Total+[Cotton].Lint.DMDemand.Total+[Cotton].Seed.DMDemand.Total+[Cotton].Bur.DMDemand.Total) as ShootDMDemand
                ([Cotton].Stem.DMDemand.Total+[Cotton].Leaf.DMDemand.Total+[Cotton].Root.DMDemand.Total) as ShootDMDemand
                [Cotton].Root.DMDemand.Total
                [Cotton].Lint.NDemand.Total
                [Cotton].Leaf.NDemand.Total
                [Cotton].Stem.NDemand.Total
                [Cotton].Root.NDemand.Total
                [Cotton].Root.NUptake
                [Cotton].Lint.LiveFWt
                [Cotton].Root.Wt
                [Cotton].Root.Depth
                [Soil].Water.Volumetric[1:3]
                [Soil].Water.Volumetric
                sum([Soil].SoilWater.ESW) as TotalESW
                [Soil].SoilWater.SW
                ([Soil].SoilWater.SWmm[1]+[Soil].SoilWater.SWmm[2]+[Soil].SoilWater.SWmm[3]+[Soil].SoilWater.SWmm[4]+[Soil].SoilWater.SWmm[5]+[Soil].SoilWater.SWmm[6]) as SWmm1800
                ([Soil].SoilWater.ESW[1]+[Soil].SoilWater.ESW[2]+[Soil].SoilWater.ESW[3]+[Soil].SoilWater.ESW[4]+[Soil].SoilWater.ESW[5]+[Soil].SoilWater.ESW[6]) as ESW1800
                sum([Soil].Water.Volumetric) as TotalSWC
                sum([Soil].Water.MM) as TotalWaterMM
                ([Soil].Water.MM[1]+[Soil].Water.MM[2]+[Soil].Water.MM[3]+[Soil].Water.MM[4]+[Soil].Water.MM[5]+[Soil].Water.MM[6]+[Soil].Water.MM[7]) as SW1500mm
                ([Soil].Water.MM[1]+[Soil].Water.MM[2]+[Soil].Water.MM[3]+[Soil].Water.MM[4]+[Soil].Water.MM[5]+[Soil].Water.MM[6]) as SW1800mm
                ([Soil].Water.MM[1]+[Soil].Water.MM[2]+[Soil].Water.MM[3]+[Soil].Water.MM[4]+[Soil].Water.MM[5]) as SW1200mm
                (sum([CottonSoil].PAWmm)/sum([CottonSoil].PAWCmm)) as AvailableSoilMoisture
                ([CottonSoil].PAWmm[1]+[CottonSoil].PAWmm[2]+[CottonSoil].PAWmm[3]+[CottonSoil].PAWmm[4]+[CottonSoil].PAWmm[5]) as PAWTop5Layers
                -(([CottonSoil].PAWCmm[1]+[CottonSoil].PAWCmm[2]+[CottonSoil].PAWCmm[3]+[CottonSoil].PAWCmm[4]+[CottonSoil].PAWCmm[5])-([CottonSoil].PAWmm[1]+[CottonSoil].PAWmm[2]+[CottonSoil].PAWmm[3]+[CottonSoil].PAWmm[4]+[CottonSoil].PAWmm[5])) as SoilWaterDeficit120
                [Irrigation].IrrigationApplied
                [Cotton].Boll.Wt
                [Cotton].Lint.Wt
                [Cotton].Seed.Wt
                ([Cotton].Seed.Wt+[Cotton].Lint.Wt) as SeedLint
                [Cotton].Bur.Wt
                sum([Soil].SoilWater.SWmm) as TotalSWmm
                ([Soil].SoilWater.SWmm[1]) as SW1
                ([Soil].SoilWater.SWmm[2]) as SW2
                ([Soil].SoilWater.SWmm[3]) as SW3
                ([Soil].SoilWater.SWmm[4]) as SW4
                ([Soil].SoilWater.SWmm[5]) as SW5
                ([Soil].SoilWater.SWmm[6]) as SW6
                ([Soil].SoilWater.SWmm[7]) as SW7
                //([Soil].SoilWater.SWmm[8]) as SW8
                //([Soil].SoilWater.SWmm[9]) as SW9
                ([Soil].SoilWater.SWmm[1]+[Soil].SoilWater.SWmm[2]+[Soil].SoilWater.SWmm[3]+[Soil].SoilWater.SWmm[4]+[Soil].SoilWater.SWmm[5]+[Soil].SoilWater.SWmm[6]) as SWmm1800
                //to disable reporting
                //([Soil].SoilWater.SWmm[1]+[Soil].SoilWater.SWmm[2]+[Soil].SoilWater.SWmm[3]+[Soil].SoilWater.SWmm[4]+[Soil].SoilWater.SWmm[5]+[Soil].SoilWater.SWmm[6]+[Soil].SoilWater.SWmm[7]+[Soil].SoilWater.SWmm[8]) as SWmm2400
                [Soil].SoilWater.ESW[1] as ESW1
                [Soil].SoilWater.ESW[2] as ESW2
                [Soil].SoilWater.ESW[3] as ESW3
                [Soil].SoilWater.ESW[4] as ESW4
                [Soil].SoilWater.ESW[5] as ESW5
                [Soil].SoilWater.ESW[6] as ESW6
                [Soil].SoilWater.ESW[7] as ESW7
                [Soil].SoilWater.ESW[8] as ESW8
                [Soil].SoilWater.ESW[9] as ESW9
                [Soil].SoilWater.PAWmm[1] as PAW1
                [Cotton].Arbitrator.SDRatio
                [Cotton].Arbitrator.SDRatioBound
                sum([Soil].NO3.kgha) as TotalSoilNO3
                sum([Soil]..NH4.kgha) as TotalSoilNH4
                sum([Soil].Water.MM) as TotalSW
                sum([Soil].NH4.ppm) as NH4
                [Soil].NO3.ppm[1] as NO3_1_ppm
                [Soil].NO3.ppm[2] as NO3_2_ppm
                [Soil].NO3.ppm[3] as NO3_3_ppm
                [Soil].NO3.ppm[4] as NO3_4_ppm
                [Soil].NO3.ppm[5] as NO3_5_ppm
                [Soil].NO3.ppm[6] as NO3_6_ppm
                [Soil].NO3.ppm[7] as NO3_7_ppm
                sum([Soil].NO3.ppm) as NO3_total
                [Soil].NO3.kgha[1] as NO3_1_kgha
                [Soil].NO3.kgha[2] as NO3_2_kgha
                [Soil].NO3.kgha[3] as NO3_3_kgha
                [Soil].NO3.kgha[4] as NO3_4_kgha
                [Soil].NO3.kgha[5] as NO3_5_kgha
                [Soil].NO3.kgha[6] as NO3_6_kgha
                [Fertiliser].NitrogenApplied
                [Cotton].Leaf.Photosynthesis.RUE
                [Cotton].Boll.N
                [Cotton].Leaf.N
                [Cotton].Stem.N
                //[FurrowIrrigation].Script.crit_fr_asw as CRITFRASW
                //[FurrowIrrigation].Script.asw_depth as ASWDEPTH
                //[FurrowIrrigation].Script.applied_furrow_irrigation as FURROW_APPLIED
                [Irrigation].IrrigationApplied
                [Cotton].Boll.HarvestIndex
                [Soil].Organic.Carbon
                [Phenology].CurrentPhaseName
                [Arbitrator].TotalDMFixationSupply
                [Phenology].BollPeriod
                [Phenology].BollFilling.Target
                [Cotton].WholePlantGrowthRate
                [Cotton].AboveGroundGrowthRate
                [Cotton].PotentialBollGrowthRate
                [Cotton].Root.NUptake
                [Cotton].Total.N
                ([Soil].SoilWater.SWmm[1]+[Soil].SoilWater.SWmm[2]+[Soil].SoilWater.SWmm[3]) as KRS_SW_Layer1
                [Cotton].Leaf.Photosynthesis.RadnInt
                ([Cotton].Leaf.NConc/[Cotton].Leaf.SpecificArea) as SLN
                [Cotton].Leaf.RadiationIntercepted
                [MicroClimate].RadiationInterception
                [Cotton].Leaf.SLA_DynamicTEST.Beer-Lambert
                [Weather].DiffuseFraction
                //[Cotton].Leaf.SLA_DynamicTEST.SLA_Reddy1997
                //[Cotton].Leaf.Photosynthesis
                //[Cotton].SowingData.Population
                //[Cotton].Leaf.BranchNumber.FruitingBranches
                //[Cotton].Leaf.BranchNumber.VegetativeBranches
                //([Cotton].Leaf.DMDemands.Structural.DeltaLAIPotential.LeafGrowthStage.Delta.EmergingLeaves*[Cotton].Leaf.DMDemands.Structural.DeltaLAIPotential.LeafGrowthStage.Delta.PlantNumber) as NumberOfLeaves
                //[Cotton].Leaf.SLA_DynamicTEST.SLA_Reddy1989
                //[Cotton].Leaf.SLA_Reddy1989.RADint
                [Cotton].Leaf.Plastochron
                ([Cotton].Leaf.FinalLeafNumber*[Cotton].SowingData.Population) as LeafNumber
                [Cotton].Leaf.FirstFruitingBranch
                [Cotton].Leaf.TotalNumber
                [Soil].SoilWater.ESW
                [Soil].Water.PAWmm
                [Physical].PAWCmm
                [CottonSoil].PAWmm
                [CottonSoil].PAWCmm
                //[Cotton].Root.SMI
                [Cotton].Leaf.Photosynthesis
                //[Cotton].Leaf.Transpiration
                //[Cotton].Leaf.Gsmax350
                //[Cotton].Leaf.Gsmax
                //[Cotton].Leaf.SpecificArea
                //[Cotton].StomCond
                //[Cotton].Population
                //[Cotton].Leaf.SLA_DynamicTEST.SLA_Gsmax
                //[Cotton].Leaf.SLA_DynamicTEST.SpecificArea_TempPAR
                //[Cotton].Leaf.PlantSupplyDemand
                //[Cotton].Leaf.RadiationIntercepted
                //[Cotton].Leaf.Photosynthesis
                //[Cotton].Leaf.SLA_DynamicTEST.SLA_RGR
                sum([PAWCInRootZone].Script.PAWInRootZone)
                sum([PAWCInRootZone].Script.PAWCInRootZone)
                [Cotton].Root.SMI
                [Cotton].Root.PAW_ratio
                [Cotton].Leaf.RUE_DynamicTEST.CO2_CompensationPoint
                [Cotton].Leaf.RUE_DynamicTEST.Jmax25
                [Cotton].Leaf.RUE_DynamicTEST.Jmax
                [Cotton].Leaf.RUE_DynamicTEST.Cc
                [Cotton].Leaf.RUE_DynamicTEST.Iinc
                [Cotton].Leaf.RUE_DynamicTEST.CanopyLightUseEfficiency.Term1
                [Cotton].Leaf.RUE_DynamicTEST.CanopyLightUseEfficiency.MultiplyFunction.Term2
                [Cotton].Leaf.RUE_DynamicTEST.CanopyLightUseEfficiency.MultiplyFunction.Term3
                [Cotton].Leaf.RUE_DynamicTEST.CanopyLightUseEfficiency
                [Cotton].Leaf.RUE_DynamicTEST.RP
                [Cotton].Leaf.RUE_DynamicTEST.CBiom
                [Cotton].Leaf.RUE_DynamicTEST.RadiationUseEfficiency
                [Cotton].Leaf.RUE_DynamicTEST.MovingAverageRUE
                [Cotton].Leaf.Photosynthesis.RUE
                [Cotton].Leaf.Photosynthesis.RUE_Fixed
            Report HarvestReport: same as Validation.Douglas Daly Row Spacing 2021.DDRF21.DDRF21Base.paddock.HarvestReport
            Report SoilReport: EventNames=[Clock].DoReport
              VariableNames:
                [Clock].Today
                [Cotton].DaysAfterSowing
                sum([Soil].Water.PAWmm) as TotalPAWmm
                ([Soil].Water.MM[1]+[Soil].Water.MM[2]+[Soil].Water.MM[3]+[Soil].Water.MM[4]+[Soil].Water.MM[5]+[Soil].Water.MM[6]) as TotalSW180cm
                [Soil].Water.PAWmm
      Folder Graphs
        Folder Canopy
          Memo
            Low temp (temp stress early on) so small leaves --> low LAI
        Memo
          Should resemble an S-curve
    Folder Narrabri2023
      Memo Phenology stages Observed
        Stage|N0|DAS|N150|DAS|N300|DAS
        -|-|-|-|-|-|-
        Sowing|12 Oct 2023|0|12 Oct 2023|0|12 Oct 2023|0
        Emergence|
        Squaring|5 Dec 2023|54|6 Dec 2023|55|6 Dec 2023|55
        Flowering|25 Dec 2023|75|26 Dec 2023|75|24 Dec 2023|73
        Cutout|
        OpenBolls|17 Jan 2024|98|11 Jan 2024|91|31 Jan 2024|111
        Maturity|4 Mar 2024|144|28 Feb 2024|139|18 Mar 2024|158
        Hand picking|9 May 2024|210|9 May 2024|210|9 May 2024|210
      Memo Growth regulator details
        I could not find any details on the use of growth regulators and therefore assume that none were applied.

        No data on growth regulators were provided with the observed data either.
      Experiment Narrabri2023
        Factors
          CompositeFactor N0: Specifications=[Operations]
            Operations
              2023-10-12  [Cotton].Sow(population: 11.4, cultivar: Sicot_748B3F, depth: 50, rowSpacing: 1000);
              2023-12-12  [Fertiliser].Apply(0, "UreaN",10);
          CompositeFactor N150: Specifications=[Operations]
            Operations
              2023-10-12  [Cotton].Sow(population: 11.6, cultivar: Sicot_748B3F, depth: 50, rowSpacing: 1000);
              2023-12-12  [Fertiliser].Apply(150, "UreaN",10);
          CompositeFactor N300: Specifications=[Operations]
            Operations
              2023-10-12  [Cotton].Sow(population: 12.1, cultivar: Sicot_748B3F, depth: 50, rowSpacing: 1000);
              2023-12-12  [Fertiliser].Apply(300, "UreaN",10);
        Simulation Narrabri2023Base
          Clock: Start=2023-10-01; End=2024-05-31
          Summary summaryfile
          Weather: FileName=Weatherfiles/Narrabri2023.met
          SoilArbitrator Soil Arbitrator
          MicroClimate: a_interception=0; b_interception=1; c_interception=0; d_interception=0; SoilHeatFluxFraction=0.4; MinimumHeightDiffForNewLayer=0; NightInterceptionFraction=0.5; ReferenceHeight=2
          Zone paddock: Area=1; Slope=0; AspectAngle=0; Altitude=50
            Fertiliser
            Operations
            Irrigation
            Soil Grey Vertosol NMM: ASCOrder=Vertosol; ASCSubOrder=Grey; SoilType=Clay; Site=Myall Vale; NearestTown=Narrabri, NSW 2390; Region=North West Slopes and Plains; State=New South Wales; Country=Australia; NaturalVegetation=Grasslands; ApsoilNumber=97; Latitude=-30.2056; Longitude=149.593; LocationAccuracy=+/- 20m; YearOfSampling=0; DataSource=CSIRO Plant Industry, Myall Vale (D Richards); Comments=Clay -
              Physical
                Thickness  ParticleSizeSand  ParticleSizeSilt  ParticleSizeClay  Rocks  BD    AirDry  LL15  DUL   SAT
                150        5                 65                30                0      1.1   0.1     0.2   0.52  0.55
                100        5                 65                30                0      1.1   0.2     0.24  0.55  0.58
                100        5                 65                30                0      1.1   0.2     0.22  0.55  0.58
                100        5                 65                30                0      1.05  0.2     0.25  0.56  0.59
                100        5                 65                30                0      1.05  0.2     0.24  0.55  0.58
                100        5                 65                30                0      1.05  0.2     0.24  0.56  0.59
                250        5                 65                30                0      1.1   0.2     0.29  0.54  0.57
                200        5                 65                30                0      1.1   0.2     0.3   0.51  0.54
                200        5                 65                30                0      1.1   0.2     0.3   0.52  0.55
                Rocks, ParticleSizeSand, ParticleSizeSilt, ParticleSizeClay source: Calculated
                SoilCrop CottonSoil: LL=[0.2, 0.24, 0.22, 0.25, 0.24, 0.24, 0.29, 0.3, 0.3]; KL=[0.1, 0.1, 0.1, 0.1, 0.06, 0.04, 0.04, 0.02, 0.02]; XF=[1, 0.15, 1, 1, 1, 1, 1, 1, 1]
              LayerStructure: Thickness=[150, 100, 100, 100, 100, 100, 250, 200, 200]
              WaterBalance SoilWater: same as Validation.Emerald Sowing Time Experiment 2015.Emerald2015.Emerald2015Base.paddock.Grey Vertosol NMM.SoilWater
              Organic: FOMCNRatio=40; CarbonUnits=Total
                Thickness  Carbon  SoilCNRatio  FBiom  FInert  FOM
                150        0.58    9            0.04   0.4     347.1
                150        0.41    8            0.02   0.6     270.3
                300        0.4     8            0.02   0.8     164
                300        0.42    8            0.02   1       99.5
                300        0.36    7            0.01   1       60.3
              Chemical: same as Validation.Narrabri0203.Narrabri0203.Rose0203Base.paddock.Grey Vertosol NMM.Chemical
              Nutrient
              Water: Thickness=[150, 100, 100, 100, 100, 100, 250, 200, 200]; InitialValues=[0.52, 0.52, 0.55, 0.56, 0.55, 0.56, 0.54, 0.51, 0.5]; FilledFromTop=false
              Solute NO3: Thickness=[150, 150, 300, 300, 300]; InitialValues=[10.6, 4.8, 4.9, 4.1, 3.3]; InitialValuesUnits=ppm; WaterTableConcentration=0; D0=0; DepthConstant=0; MaxDepthSoluteAccessible=0; RunoffEffectivenessAtMovingSolute=0; MaxEffectiveRunoff=0
              Solute NH4: Thickness=[150, 150, 300, 300, 300]; InitialValues=[4.4, 2.9, 3.4, 2.7, 2.8]; InitialValuesUnits=ppm; WaterTableConcentration=0; D0=0; DepthConstant=0; MaxDepthSoluteAccessible=0; RunoffEffectivenessAtMovingSolute=0; MaxEffectiveRunoff=0
              Solute Urea: same as Validation.Emerald Sowing Time Experiment 2015.Emerald2015.Emerald2015Base.paddock.Grey Vertosol NMM.NH4
              Memo: same as Validation.Emerald Sowing Time Experiment 2015.Emerald2015.Emerald2015Base.paddock.Grey Vertosol NMM.Memo
              SoilTemperature CERESSoilTemperature: InteractionsPerDay=8
              CERESSoilTemperature Temperature
            Manager FurrowIrrigation
              EachYear = True
              Dates = 4-Oct, 13-Dec, 4-Jan, 8-Feb
              asw_depth = 8
              crit_fr_asw = 1
              minimumAmount = 100
```csharp
using Models.Interfaces;
using System;
using System.Linq;
using Models.Core;
using System.Collections.Generic;
using System.Text;
using Models.Soils;
using Models.PMF;
using System.Xml.Serialization;
using APSIM.Shared.Utilities;

namespace Models
{
    [Serializable]
    public class Script : Model
    {
        // Links
        [Link] Clock clock;
        [Link] Irrigation Irrigation;
        [Link] Soil Soil;
        [Link] IPhysical soilPhysical;
        [Link] ISoilWater waterBalance;

        // Fields
        public double SW_now;
        public double CLL_now;
        public double SW_full;

        // Properties
        [Separator("Irrigation will be applied on the date(s) below")]
        [Description("Apply irrigation on the same day(s) each year? If no, then must include the year of application below")]
        public bool EachYear { get; set; }
        [Description("Dates for one or more irrigation applications (dd-mmm or dd-mmm-yyyy) as a list with a comma between dates")]
        public string[] Dates { get; set; }
        
        [Separator("Irrigation application details")]
        [Description("Number of soil layers used in calculating SW deficit")]
        public int asw_depth { get; set; } // Change to int for layer count
        [Description("Fraction of ASW below which irrigation is applied (0-1.0)")]
        public double crit_fr_asw { get; set; } // Critical fraction of available soil water before applying irrigation
        [Description("Minimum amount of irrigation to be applied (mm)")]
        public double minimumAmount { get; set; }

        // Output variables
        public double[] inflow_lat { get; set; }
        public double applied_furrow_irrigation { get; set; }
        public double AmountToApply { get; set; }

        // Methods

        // Calculate static soil variables
        [EventSubscribe("StartOfSimulation")]
        private void OnStartOfSimulation(object sender, EventArgs e)
        {
            // Initialize inflow_lat array
            inflow_lat = new double[soilPhysical.DULmm.Length];
        }

        // Determine daily requirement for irrigation
        [EventSubscribe("StartOfDay")]
        private void OnStartOfDay(object sender, EventArgs e)
        {
            // Is today within the irrigation window?
            if (EachYear)
            {
                if (Dates.Any(d => DateUtilities.DatesEqual(d, clock.Today)))
                {
                // Calculate soil water variables
                double[] SW_add = new double[soilPhysical.DULmm.Length];
                SW_now = 0;
                CLL_now = 0;
                SW_full = 0;
                for (int layer = 0; layer < asw_depth; layer++)
                {
                    SW_now += waterBalance.SWmm[layer];
                    CLL_now += soilPhysical.LL15mm[layer];
                    SW_full += (soilPhysical.DULmm[layer] - soilPhysical.LL15mm[layer]);
                    SW_add[layer] = soilPhysical.DULmm[layer] - waterBalance.SWmm[layer];
                }

                // Is the soil water deficit greater than the critical SW fraction?
                if ((SW_now - CLL_now) <= (SW_full * crit_fr_asw))
                {
                        // Calculate irrigation requirement based on current day's soil water deficit
                        double irrigationRequirement = 0;
                        for (int layer = 0; layer < asw_depth; layer++)
                        {
                            double deficit = soilPhysical.DULmm[layer] - waterBalance.SWmm[layer];
                            irrigationRequirement += Math.Max(deficit, 0); // Accumulate positive deficits
                        }

                        // Calculate amount to apply based on irrigation requirement and minimum amount
                        AmountToApply = Math.Max(irrigationRequirement, minimumAmount);

                        // Apply irrigation proportionally to each layer
                        for (int layer = 0; layer < asw_depth; layer++)
                        {
                            double layerIrrigation = AmountToApply * (SW_add[layer] / irrigationRequirement);
                            Irrigation.Apply(layerIrrigation, depth: soilPhysical.Thickness[layer]);
                        }
                    }
                    else
                    {
                        for (int layer = 0; layer < soilPhysical.DULmm.Length; layer++)
                        {
                            inflow_lat[layer] = 0;
                            applied_furrow_irrigation = 0;
                        }
                    }
                }
            }
        }
    }
}
```
            Manager SLA_set: same as Validation.Douglas Daly 2020 Irrigation.DouglasDaly2021.DouglasDaly20211Base.paddock.SLA_set
            Manager HarvestAfterDate
              HarvestDate = 9-May
              script: same as in Validation.Douglas Daly Row Spacing 2021.DDRF21.DDRF21Base.paddock.HarvestAfterDate
            SurfaceOrganicMatter: InitialResidueName=nativepasture; InitialResidueType=nativepasture; InitialResidueMass=0; InitialStandingFraction=0; InitialCPR=0; InitialCNR=0
            Plant Cotton: PlantType=Cotton
            Report DailyReport: same as Validation.Narrabri0203.Narrabri0203.Rose0203Base.paddock.DailyReport
            Report HarvestReport: same as Validation.Douglas Daly Row Spacing 2021.DDRF21.DDRF21Base.paddock.HarvestReport
            Report SoilReport: EventNames=[Clock].DoReport
              VariableNames:
                [Clock].Today
                [Cotton].DaysAfterSowing
                sum([Soil].Water.PAWmm) as TotalPAWmm
                sum([Soil].Water.MM[2:9]) as TotalSWmm
                ([Soil].Water.MM[1]+[Soil].Water.MM[2]+[Soil].Water.MM[3]+[Soil].Water.MM[4]+[Soil].Water.MM[5]+[Soil].Water.MM[6]) as TotalSW180cm
                [Soil].Water.PAWmm
                [Soil].Water.MM
      Memo
        Should resemble an S-curve
    Folder ForestHill2023
      Memo Defoliant
        Applied on 28 April
      Memo Growth regulator details
        Email from Neil Huth on 10/01/2024:

        "The plots are being sprayed over the weekend for herbicide andPGR."

        --> This suggests that PGR was applied on 13/14 January 2024, but did this actually happen?
      Experiment ForestHill2023
        Factors
          CompositeFactor IrrigationFull: Specifications=[Operations]
            CustomDescriptors:
              {Name=Irrigation, Value=Full}
            Operations
              2023-10-25  [Irrigation].Apply(50);
              2023-11-02  [Fertiliser].Apply(300, "UreaN",10);
              2023-11-08  [Irrigation].Apply(30);
              2023-11-09  [Cotton].Sow(population: 12, cultivar: 748V2C , depth: 20, rowSpacing: 1080);
              2023-11-15  [Irrigation].Apply(40);
              2023-12-19  [Irrigation].Apply(40);
              2024-01-19  [Irrigation].Apply(50);
              2024-01-25  [Irrigation].Apply(50);
              2024-02-09  [Irrigation].Apply(50);
              2024-03-06  [Irrigation].Apply(50);
          CompositeFactor IrrigationPartial: Specifications=[Operations]
            CustomDescriptors:
              {Name=Irrigation, Value=Partial}
            Operations
              2023-10-25  [Irrigation].Apply(50);
              2023-11-02  [Fertiliser].Apply(300, "UreaN",10);
              2023-11-08  [Irrigation].Apply(30);
              2023-11-09  [Cotton].Sow(population: 12, cultivar: 748V2C , depth: 20, rowSpacing: 1080);
              2023-11-15  [Irrigation].Apply(40);
              2023-12-19  [Irrigation].Apply(40);
        Simulation ForestHill2023Base
          Clock: Start=2023-11-01; End=2024-05-01
          Summary summaryfile
          Weather: FileName=Weatherfiles/ForestHill.met
          SoilArbitrator Soil Arbitrator
          MicroClimate: a_interception=0; b_interception=1; c_interception=0; d_interception=0; SoilHeatFluxFraction=0.4; MinimumHeightDiffForNewLayer=0; NightInterceptionFraction=0.5; ReferenceHeight=2
          Zone paddock: Area=1; Slope=0; AspectAngle=0; Altitude=50
            Fertiliser
            Operations
            Irrigation
            Soil Grey Vertosol NMM: ASCOrder=Vertosol; ASCSubOrder=Grey; SoilType=Clay; Site=Myall Vale; NearestTown=Narrabri, NSW 2390; Region=North West Slopes and Plains; State=New South Wales; Country=Australia; NaturalVegetation=Grasslands; ApsoilNumber=97; Latitude=-30.2056; Longitude=149.593; LocationAccuracy=+/- 20m; YearOfSampling=0; DataSource=CSIRO Plant Industry, Myall Vale (D Richards); Comments=Clay -
              Physical
                Thickness  ParticleSizeClay  BD    AirDry  LL15   DUL    SAT   KS
                150        60                1.31  0.109   0.109  0.45   0.48  50
                100        60                1.26  0.168   0.21   0.438  0.48  20
                100        60                1.35  0.168   0.21   0.437  0.48  20
                100        60                1.35  0.195   0.21   0.437  0.48  20
                100        60                1.35  0.195   0.21   0.437  0.48  20
                100        60                1.35  0.2     0.21   0.437  0.48  20
                250        60                1.35  0.2     0.21   0.435  0.48  20
                200        60                1.35  0.2     0.21   0.424  0.48  20
                200        60                1.35  0.2     0.21   0.424  0.48  20
                200        60                1.35  0.2     0.21   0.424  0.48  20
                500        60                1.35  0.2     0.21   0.424  0.48  20
                BD, DUL source: Field measured and checked for sensibility
                AirDry, LL15 source: Estimated based on local knowledge
                SAT source: Calculated from measured, estimated or calculated BD
                SoilCrop CottonSoil
                  LL=[0.109, 0.21, 0.21, 0.21, 0.21, 0.21, 0.21, 0.21, 0.21, 0.21, 0.21]
                  KL=[0.15, 0.13, 0.13, 0.1, 0.09, 0.08, 0.07, 0.06, 0.05, 0.04, 0.03]
                  XF=[1, 1, 1, 1, 1, 1, 1, 1, 1, 1, 1]
                  LL source: Field measured and checked for sensibility
              Swim3: Salb=0.13; CN2Bare=75; CNRed=20; CNCov=0.8; KDul=0.1; PSIDul=-100; VC=true; DTMin=0; DTMax=1440; MaxWaterIncrement=5; SpaceWeightingFactor=0; SoluteSpaceWeightingFactor=1; Dis=0; Disp=1; A=2; DTHC=0.1; DTHP=2; vcon1=7.28e-09; vcon2=7.26e-07; eo_time=06:00; eo_durn=720; default_rain_time=00:00; default_rain_duration=720; Diagnostics=true
              LayerStructure
                Thickness=[10, 20, 40, 30, 100, 100, 100, 100, 100, 100, 100, 100, 100, 200, 300, 300, 200]
              Organic: FOMCNRatio=40; CarbonUnits=Total
                Thickness  Carbon  SoilCNRatio  FBiom  FInert  FOM
                150        0.88    12           0.04   0.4     6000
                150        0.76    12           0.02   0.6     1000
                300        0.62    12           0.02   0.8     500
                300        0.32    12           0.02   1       99.454
                300        0.12    12           0.01   1       60.322
                300        0.1     12           0.01   1       36.587
                300        0.05    12           0.01   1       22.191
              Chemical: PHUnits=Water
                Thickness  PH  EC
                150        7   0.15
                150        7   0.2
                300        7   0.26
                300        7   0.6
                300        7   0.6
                300        7   0.6
                300        7   0.6
                PH source: Estimated based on local knowledge
              Nutrient
              Water: Thickness=[150, 100, 100, 100, 100, 100, 250, 200, 200]; FilledFromTop=true
                InitialValues=[0.109, 0.27, 0.27, 0.264, 0.264, 0.264, 0.264, 0.264, 0.264]
              Memo: same as Validation.Emerald Sowing Time Experiment 2015.Emerald2015.Emerald2015Base.paddock.Grey Vertosol NMM.Memo
              SoilTemperature Temperature: InteractionsPerDay=8
              Solute NO3: InitialValuesUnits=ppm; WaterTableConcentration=0; D0=0.05; DepthConstant=0; MaxDepthSoluteAccessible=0; RunoffEffectivenessAtMovingSolute=0; MaxEffectiveRunoff=0
                Thickness  InitialValues  Exco  FIP
                150        38.023         0     1
                150        12.955         0     1
                300        0.422          0     1
                300        0.422          0     1
                300        0.422          0     1
                300        0.422          0     1
                500        0.422          0     1
              Solute NH4: same as Validation.ForestHill2023.ForestHill2023.ForestHill2023Base.paddock.Grey Vertosol NMM.NO3
              Solute Urea: InitialValuesUnits=ppm; WaterTableConcentration=0; D0=0.05; DepthConstant=0; MaxDepthSoluteAccessible=0; RunoffEffectivenessAtMovingSolute=0; MaxEffectiveRunoff=0
                Thickness  InitialValues  Exco  FIP
                150        0              0     1
                150        0              0     1
                300        0              0     1
                300        0              0     1
                300        0              0     1
                300        0              0     1
                500        0              0     1
            SurfaceOrganicMatter: InitialResidueName=nativepasture; InitialResidueType=nativepasture; InitialResidueMass=0; InitialStandingFraction=0; InitialCPR=0; InitialCNR=0
            Plant Cotton: PlantType=Cotton
            Report DailyReport: EventNames=[Clock].DoReport
              VariableNames:
                [Clock].Today
                [Weather].MaxT
                [Weather].MeanT
                [Weather].MinT
                [Weather].VPD
                [Cotton].DaysAfterSowing
                [Cotton].Leaf.NodeNumber
                [Cotton].Leaf.LAI
                [Cotton].Leaf.Height
                [EMCalculator].Script.EMp100
                [EMCalculator].Script.EMv100
                sum([Soil].Water.MM) as TotalSW
                sum([Soil].Physical.LL15mm) as TotalLL15
                sum([Soil].Physical.DULmm) as TotalDUL
                sum([Soil].NO3.kgha) as TotalNO3
                sum([Soil].NH4.kgha) as TotalNH4
                [Cotton].Phenology.CurrentStageName
                [Cotton].Leaf.Fw
                [Cotton].Leaf.Fn
                [Cotton].Leaf.Photosynthesis.FVPD
                [Cotton].Leaf.Photosynthesis.Ft
                [Cotton].Leaf.Transpiration
                [Cotton].Leaf.WaterDemand
                [Cotton].Leaf.CoverGreen
                [Cotton].Leaf.Wt
                [Cotton].Leaf.N
                [Cotton].Leaf.NConc
                [Cotton].Leaf.Sites
                [Cotton].Leaf.TotalNumber
                [Cotton].Leaf.SpecificArea
                [Cotton].Stem.Wt
                [Cotton].Stem.N
                [Cotton].Stem.NConc
                [Cotton].Boll.Wt
                [Cotton].Bur.Wt
                [Cotton].AboveGround.Wt
                [Cotton].Arbitrator.N.TotalUptakeSupply
                [Cotton].Arbitrator.N.TotalPlantDemand
                [Cotton].Arbitrator.N.TotalPlantAllocation
                [Cotton].Root.Depth
                [Soil].Temperature.AverageSoilTemperature[3] as ST5cm
                [Soil].Temperature.AverageSoilTemperature[8] as ST50cm
                [Soil].Temperature.AverageSoilTemperature[13] as ST100cm
            Report HarvestReport: same as Validation.Douglas Daly Row Spacing 2021.DDRF21.DDRF21Base.paddock.HarvestReport
            Report SoilReport: EventNames=[Clock].DoReport
              VariableNames:
                [Clock].Today
                [Cotton].DaysAfterSowing
                [EMCalculator].Script.EMp100
                [EMCalculator].Script.EMv100
                sum([Soil].Water.MM) as TotalSW
                sum([Soil].Physical.LL15mm) as TotalLL15
                sum([Soil].Physical.DULmm) as TotalDUL
                sum([Soil].NO3.kgha) as TotalNO3
                sum([Soil].NH4.kgha) as TotalNH4
                [Soil].Temperature.AverageSoilTemperature[3] as ST5cm
                [Soil].Temperature.AverageSoilTemperature[8] as ST50cm
                [Soil].Temperature.AverageSoilTemperature[13] as ST100cm
            Manager EMCalculator
              EMLL15 = 80
              EMRange = 110
              EMp100 = 0
              EMv100 = 0
              FASWp = 0
              FASWv = 0
```csharp
using System;
using Models.Core;
using Models.Interfaces;
using Models.PMF;
using APSIM.Shared.Utilities;
using Models.Soils;

namespace Models
{
    [Serializable]
    public class Script : Model
    {
        [Link] IClock Clock;
        [Link] ISummary Summary;
        [Link] Water water;
        [Link] Physical physical;
        [Link] Chemical chemical;
        [Link] private ISoilWater waterBalance;
        [Link] private ISoilTemperature soiltemperature;
        


        [Description("EM reading at LL15")]
        public double EMLL15 { get; set;}
        
        [Description("EM reading range")]
        public double EMRange { get; set;}


       [Description("Daily EMp100")]
        public double EMp100 { get; set;}

       [Description("Daily EMv100")]
        public double EMv100 { get; set;}
        
       [Description("Daily FASW p Dipole")]
        public double FASWp { get; set;}

       [Description("Daily FASW v Dipole")]
        public double FASWv { get; set;}

        [EventSubscribe("DoManagement")]
        private void DoDailyCalculations(object sender, EventArgs e)
        {
            int numlayers = 8;
            double WFptot = 0;
            double WFvtot = 0.0;
            double top = 0;
            double bottom = 0;
            
            for (int i=0; i<numlayers; i++)
            {
               top = bottom;
               bottom = top +physical.Thickness[i] ;
               WFptot += Fcp(top/1000, bottom/1000);
               WFvtot += Fcv(top/1000, bottom/1000);
            }

            top = 0;
            bottom = 0;       
            FASWv = 0;
            FASWp = 0;     
            EMp100 = 0;
            EMv100 = 0;
            for (int i=0; i<numlayers; i++)
            {
               top = bottom;
               bottom = top + physical.Thickness[i] ;
               double WtpLayer = Fcp(top/1000, bottom/1000)/WFptot;
               double WtvLayer = Fcv(top/1000, bottom/1000)/WFvtot;

               //double FASWLayer = (water.MM[i] - physical.LL15mm[i])/(physical.DULmm[i] - physical.LL15mm[i]);
               double FASWLayer = (water.MM[i] - physical.LL15mm[i])/(physical.SATmm[i] - physical.LL15mm[i]);                                             
               FASWp += FASWLayer * WtpLayer;
               FASWv += FASWLayer * WtvLayer;
               
               double f = 2.46 + 3.03/(physical.SAT[i]/physical.BD[i]);
               double EMsat = chemical.EC[i] * f * 100;
               
               double ST = soiltemperature.Value[i];
               double ECLayer = (EMLL15 + FASWLayer * (EMsat - EMLL15))/TF(ST);   
               //double ECLayer = (EMLL15 + FASWLayer * EMRange)/TF(ST);
               EMp100 += ECLayer * WtpLayer;
               EMv100 += ECLayer * WtvLayer;                              
           
            }
        
            
        }
       

private double  phiv(double z )
{
return 4 * z * Math.Pow((4 * Math.Pow(z,2) + 1),-1.5);
}

private double  phih(double z ) 
{
return 2 - 4 * z * Math.Pow((4 * Math.Pow(z, 2) + 1),-0.5);
}


private double  phip(double z ) 
{
return 2 * Math.Pow((4 * Math.Pow(z, 2) + 1),-1.5);
}

private double  Rv(double z ) 
{
return Math.Pow((4 * Math.Pow(z,2) + 1),-0.5);
}

private double  Rh(double z ) 
{
return Math.Pow((4 * Math.Pow(z,2) + 1),0.5) - 2 * z;
}

private double  Rp(double z ) 
{
return 2 * z * Math.Pow((4 * Math.Pow(z,2) + 1),-0.5);
}

private double  Fcv(double D1, double D2 )
{
return Rv(D1) - Rv(D2);
}


private double  Fch(double D1, double D2)
{
return Rh(D1) - Rh(D2);
}
        
private double  Fcp(double D1, double D2)
{
return Rp(D1) - Rp(D2);
}        
        
private double TF(double t)
{ 
 return 1 / (1 + 0.0191 * (t - 25));
}
        
        
    }
}
```
            Manager HarvestAfterDate
              HarvestDate = 30-Apr
              script: same as in Validation.Douglas Daly Row Spacing 2021.DDRF21.DDRF21Base.paddock.HarvestAfterDate
    Folder Warra0405
      Memo Growth regulator details
        I could not find any details on the use of growth regulators and therefore assume that none were applied.

        No data on growth regulators were provided with the observed data either.
      Experiment Warra0405
        Factors
          Factor Skip
            CompositeFactor Double
              Specifications:
                [CottonZone].Width=2
                [SkipZone].Width=2
        Simulation WarraBaseSimulation
          Clock: Start=2004-10-01; End=2005-04-01
          Summary SummaryFile
          Weather: FileName=Weatherfiles/warra.met
          MicroClimate: a_interception=0; b_interception=1; c_interception=0; d_interception=0; SoilHeatFluxFraction=0.4; MinimumHeightDiffForNewLayer=0; NightInterceptionFraction=0.5; ReferenceHeight=2
          SoilArbitrator Soil Arbitrator
          Report SimulationReport: EventNames=[Clock].DoReport
            VariableNames:
              [Clock].Today
              [CottonZone].Cotton.Phenology.CurrentStageName
              sum([CottonZone].Soil.Water.MM[1:4]) as CottonTotSW90
              sum([SkipZone].Soil.Water.MM[1:4]) as SkipTotSW90
              sum([CottonZone].Soil.Physical.LL15mm[1:4]) as CottonLL90
          RectangularZone CottonZone: Length=1; Width=100; CanopyType=CropRow; Slope=0; AspectAngle=0; Altitude=50
            Report: EventNames=[Clock].DoReport
              VariableNames:
                [Clock].Today
                [Cotton].AboveGround.Wt
                [Cotton].Lint.Wt
                [Cotton].Seed.Wt
                [Cotton].Phenology.CurrentStageName
                sum([Soil].Water.MM[1:4]) as TotalSW90cm
                [Cotton].Leaf.Fw
                [Cotton].Leaf.Fn
                sum([Soil].NO3.kgha)
            Fertiliser
            SurfaceOrganicMatter: InitialResidueName=wheat_stubble; InitialResidueType=wheat; InitialResidueMass=500; InitialStandingFraction=0; InitialCPR=0; InitialCNR=100
            Soil: ASCOrder=Vertosol; ASCSubOrder=Grey; SoilType=Clay; Site=Warra; NearestTown=Warra, Q, 4411; Region=Darling Downs and Granite Belt; State=Queensland; Country=Australia; NaturalVegetation=Brigalow scrub; ApsoilNumber=19; Latitude=-26.897; Longitude=150.909; LocationAccuracy=+/- 20m; DataSource=0; Comments=CSIRO Sustainable Ecosystems, Toowoomba
              Physical
                Thickness  ParticleSizeSand  ParticleSizeSilt  ParticleSizeClay  Rocks  BD    AirDry  LL15  DUL   SAT   KS
                150        5                 65                30                0      1.39  0.1     0.18  0.35  0.45  50
                150        5                 65                30                0      1.35  0.17    0.2   0.37  0.46  50
                300        5                 65                30                0      1.35  0.17    0.2   0.38  0.46  50
                300        5                 65                30                0      1.43  0.17    0.22  0.4   0.43  50
                300        5                 65                30                0      1.44  0.17    0.25  0.4   0.43  50
                300        5                 65                30                0      1.45  0.17    0.27  0.4   0.42  50
                Rocks, ParticleSizeSand, ParticleSizeSilt, ParticleSizeClay source: Calculated
                SoilCrop CottonSoil: LL=[0.2, 0.22, 0.22, 0.24, 0.25, 0.3]; KL=[0.06, 0.06, 0.04, 0.03, 0.02, 0.02]; XF=[1, 1, 1, 1, 1, 1]
              WaterBalance SoilWater: SummerDate=1-Nov; SummerU=6; SummerCona=4; WinterDate=1-Apr; WinterU=6; WinterCona=4; DiffusConst=20; DiffusSlope=8; Salb=0.12; CN2Bare=75; CNRed=20; CNCov=0.8; PSIDul=-100; Thickness=[150, 150, 300, 300, 300, 300]; SWCON=[0.3, 0.3, 0.3, 0.3, 0.3, 0.3]
              Nutrient
              Organic: FOMCNRatio=40; CarbonUnits=Total
                Thickness  Carbon  SoilCNRatio  FBiom  FInert  FOM
                150        0.915   12           0.04   0.4     390.598
                150        0.777   12           0.02   0.6     289.362
                300        0.346   12           0.02   0.8     158.805
                300        0.231   12           0.02   1       87.1541
                300        0.154   12           0.01   1       47.8312
                300        0.123   12           0.01   1       26.2503
              Chemical: PHUnits=Water
                Thickness  PH  CEC
                150        8   10.40375
                150        8   10.0933
                300        8   9.1235
                300        8   8.86475
                300        8   8.6915
                300        8   8.62175
                CEC source: Calculated
              Water: Thickness=[50, 100, 150, 300, 300, 300, 300]; InitialValues=[0.301, 0.301, 0.311, 0.311, 0.299, 0.3125, 0.316]; FilledFromTop=false
              Solute NO3: Thickness=[150, 150, 300, 300, 300, 300]; InitialValues=[100, 50, 30, 20, 1, 1]; InitialValuesUnits=ppm; WaterTableConcentration=0; D0=0; DepthConstant=0; MaxDepthSoluteAccessible=0; RunoffEffectivenessAtMovingSolute=0; MaxEffectiveRunoff=0
              Solute NH4: Thickness=[150, 150, 300, 300, 300, 300]; InitialValues=[0.1, 0.1, 0.1, 0.1, 0.1, 0.1]; InitialValuesUnits=ppm; WaterTableConcentration=0; D0=0; DepthConstant=0; MaxDepthSoluteAccessible=0; RunoffEffectivenessAtMovingSolute=0; MaxEffectiveRunoff=0
              Solute Urea: Thickness=[150, 150, 300, 300, 300, 300]; InitialValues=[0, 0, 0, 0, 0, 0]; InitialValuesUnits=kg/ha; WaterTableConcentration=0; D0=0; DepthConstant=0; MaxDepthSoluteAccessible=0; RunoffEffectivenessAtMovingSolute=0; MaxEffectiveRunoff=0
              SoilTemperature Temperature: InteractionsPerDay=8
            Manager Sowing
              Crop = [Cotton]
              SowDate = 23-oct
              CultivarName = Sicot_71B
              SowingDepth = 50
              RowSpacing = 1000
              Population = 9
              script: same as in Validation.Douglas Daly 2020 Irrigation.DouglasDaly2021.Factors.Irrigation.Full
            Operations
            Irrigation
            Manager SetupCottonRootZones
              UseExtraZone = True
```csharp
using Models.Soils;
using Models.Functions;
using APSIM.Shared.Utilities;
using System.Xml.Serialization;
using Models;
using Models.PMF;
using System.Text;
using System.Collections.Generic;
using Models.Core;
using System;
using Models.PMF.Organs;

namespace Models
{
    [Serializable] 
    public class Script : Model
    {
        [Link] private Plant Cotton;
        [Link] private Clock Clock;
        [Link] private Zone zone;
        [Link(Type = LinkType.Path, Path = "[Cotton].Root")]
        private Root root;

        [Description("Use extra root zone")]
        public bool UseExtraZone { get; set; }

        
        [EventSubscribe("StartOfSimulation")]
        private void OnSimulationCommencing(object sender, EventArgs e)
        {
            if (UseExtraZone)
            {
            root.ZoneNamesToGrowRootsIn.Add("SkipZone");
            root.ZoneRootDepths.Add(50);
NutrientPoolFunctions InitialDM = new NutrientPoolFunctions();
Constant InitStruct = new Constant();
InitStruct.FixedValue = 10;
InitialDM.Structural = InitStruct;
Constant InitMetab = new Constant();
InitMetab.FixedValue = 0;
InitialDM.Metabolic = InitMetab;
Constant InitStor = new Constant();
InitStor.FixedValue = 0;
InitialDM.Storage = InitStor;
            root.ZoneInitialDM.Add(InitialDM);

            }
        }
    }
}
```
            Plant Cotton: PlantType=Cotton
            Manager HarvestAfterDate
              HarvestDate = 15-Apr
              script: same as in Validation.Douglas Daly Row Spacing 2021.DDRF21.DDRF21Base.paddock.HarvestAfterDate
          RectangularZone SkipZone: Length=1; Width=100; CanopyType=CropRow; Slope=0; AspectAngle=0; Altitude=50
            Report: EventNames=[Clock].DoReport
              VariableNames:
                [Clock].Today
                sum([Soil].Water.MM[1:4]) as TotalSW90cm
            Fertiliser
            SurfaceOrganicMatter: InitialResidueName=wheat_stubble; InitialResidueType=wheat; InitialResidueMass=500; InitialStandingFraction=0; InitialCPR=0; InitialCNR=100
            Operations
            Soil: ASCOrder=Vertosol; ASCSubOrder=Grey; SoilType=Clay; Site=Warra; NearestTown=Warra, Q, 4411; Region=Darling Downs and Granite Belt; State=Queensland; Country=Australia; NaturalVegetation=Brigalow scrub; ApsoilNumber=19; Latitude=-26.897; Longitude=150.909; LocationAccuracy=+/- 20m; DataSource=0; Comments=CSIRO Sustainable Ecosystems, Toowoomba
              Physical: same as Validation.Warra0405.Warra0405.WarraBaseSimulation.CottonZone.Soil.Physical
              WaterBalance SoilWater: same as Validation.Warra0405.Warra0405.WarraBaseSimulation.CottonZone.Soil.SoilWater
              Nutrient
              Organic: same as Validation.Warra0405.Warra0405.WarraBaseSimulation.CottonZone.Soil.Organic
              Chemical: same as Validation.Warra0405.Warra0405.WarraBaseSimulation.CottonZone.Soil.Chemical
              Water: Thickness=[50, 100, 150, 300, 300, 300, 300]; InitialValues=[0.301, 0.301, 0.311, 0.311, 0.299, 0.3125, 0.316]; FilledFromTop=false
              Solute NO3: Thickness=[150, 150, 300, 300, 300, 300]; InitialValues=[1, 1, 1, 1, 1, 1]; InitialValuesUnits=ppm; WaterTableConcentration=0; D0=0; DepthConstant=0; MaxDepthSoluteAccessible=0; RunoffEffectivenessAtMovingSolute=0; MaxEffectiveRunoff=0
              Solute NH4: same as Validation.Warra0405.Warra0405.WarraBaseSimulation.CottonZone.Soil.NH4
              Solute Urea: same as Validation.Warra0405.Warra0405.WarraBaseSimulation.CottonZone.Soil.Urea
              SoilTemperature Temperature: InteractionsPerDay=8
  Folder SensibilityTests
    Folder NResponse
      Experiment NResponse
        Factors
          Factor NRate
            Specification=[FertiliseAtSowing].Script.Amount = 50, 100, 150, 200, 250, 300, 350, 400
        Simulation NResponseBase
          Clock: Start=2010-08-01; End=2024-06-30
          Summary summaryfile
          Weather: FileName=Weatherfiles/Narrabri2010-2025.met
          SoilArbitrator Soil Arbitrator
          MicroClimate: a_interception=0; b_interception=1; c_interception=0; d_interception=0; SoilHeatFluxFraction=0.4; MinimumHeightDiffForNewLayer=0; NightInterceptionFraction=0.5; ReferenceHeight=2
          Zone paddock: Area=1; Slope=0; AspectAngle=0; Altitude=50
            Manager Sowing: same as Validation.Narrabri Deficit Trial 2006.NAR0607.NAR0607Base.paddock.Sowing
            Manager FertiliseAtSowing
              Crop = [Cotton]
              FertiliserType = UreaN
              Amount = 300
              FertiliseDepth = 0
```csharp
using Models.Soils;
using System;
using System.Linq;
using Models.Core;
using Models.PMF;
namespace Models
{
    [Serializable]
    public class Script : Model
    {
        [Link] Clock Clock;
        [Link] Fertiliser Fertiliser;
        
        [Description("Crop to be fertilised")]
        public IPlant Crop { get; set; }

        [Description("Type of fertiliser to apply? ")] 
        [Display(Type = DisplayType.FertiliserType)]public string FertiliserType { get; set; }
    
        [Description("Amount of fertiliser to be applied (kg/ha)")]
        public double Amount { get; set; }
        
        [Description("Fertilise depth (mm)")]
        public double FertiliseDepth { get; set; }
        
        [EventSubscribe("Sowing")]
        private void OnSowing(object sender, EventArgs e)
        {
            Model crop = sender as Model;
            if (Crop != null && crop.Name.ToLower() == (Crop as IModel).Name.ToLower())
                Fertiliser.Apply(amount: Amount, type: FertiliserType, depth: FertiliseDepth);
        }
    }
}
```
            Fertiliser
            Irrigation
            Manager FurrowIrrigationPreFlowering
              Crop = [Cotton]
              IrrigStartStage = 3
              IrrigEndStage = 5
              asw_depth = 7
              crit_fr_asw = 0.8
              returndays = 7
              minimumAmount = 100
```csharp
using APSIM.Core;
using APSIM.Shared.Utilities;
using System.Xml.Serialization;
using Models.PMF;
using Models.Soils;
using System.Text;
using System.Collections.Generic;
using Models.Core;
using System.Linq;
using System;
using Models.Interfaces;

namespace Models
{
    [Serializable]
    public class Script : Model, IStructureDependency
    {
        [Link] private Clock clock;
        [Link] private Irrigation Irrigation;
        [Link] private Soil Soil;
        [Link] private IPhysical soilPhysical;
        [Link] private ISoilWater waterBalance;
        public double SW_now;
        public double CLL_now;
        public double SW_full;
        public IStructure Structure { private get; set; }
        // Links

        // Fields

        // Properties
        [Description("Crop to irrigate")]
        public IPlant Crop { get; set; }
        [Description("The crop stage when irrigation will start")]
        public double IrrigStartStage { get; set; } // Crop stage when irrigation will start
        [Description("The crop stage when irrigation will end")]
        public double IrrigEndStage { get; set; } // Crop stage when irrigation will end
        
        [Separator("Irrigation application details")]
        [Description("Number of soil layers used in calculating SW deficit")]
        public int asw_depth { get; set; } // Change to int for layer count
        [Description("Fraction of ASW below which irrigation is applied (0-1.0)")]
        public double crit_fr_asw { get; set; } // Critical fraction of available soil water before applying irrigation
        [Description("Minimum days between irrigations")]
        public double returndays { get; set; }
        [Description("Minimum amount of irrigation to be applied (mm)")]
        public double minimumAmount { get; set; }

        // Output variables
        public double[] inflow_lat { get; set; }
        public double applied_furrow_irrigation { get; set; }
        public double AmountToApply { get; set; }
        public double DaysSinceIrrigation { get; set; }

        // Methods

        // Calculate static soil variables

        

        [EventSubscribe("StartOfSimulation")]
        private void OnStartOfSimulation(object sender, EventArgs e)
        {
            if (Crop == null)
                throw new Exception("No crop was specified in script " + Parent.Name);

            // Initialize inflow_lat array
            inflow_lat = new double[soilPhysical.DULmm.Length];
        }

        // Determine daily requirement for irrigation
        [EventSubscribe("StartOfDay")]
        private void OnStartOfDay(object sender, EventArgs e)
        {
            // Reset accumulated irrigation at the beginning of each day
            applied_furrow_irrigation = 0;

            // Check if the crop is within the irrigation window based on crop stage
            double stage = (double)Crop.Node.GetObject("Phenology.Stage").Value;

            if (stage >= IrrigStartStage && stage <= IrrigEndStage)
            {
                // Calculate soil water variables
                double[] SW_add = new double[soilPhysical.DULmm.Length];
                SW_now = 0;
                CLL_now = 0;
                SW_full = 0;
                for (int layer = 0; layer < asw_depth; layer++)
                {
                    SW_now += waterBalance.SWmm[layer];
                    CLL_now += soilPhysical.LL15mm[layer];
                    SW_full += (soilPhysical.DULmm[layer] - soilPhysical.LL15mm[layer]);
                    SW_add[layer] = soilPhysical.DULmm[layer] - waterBalance.SWmm[layer];
                }

                // Is the soil water deficit greater than the critical SW fraction?
                if ((SW_now - CLL_now) <= (SW_full * crit_fr_asw))
                {
                    // Minimum days for irrigation to return?
                    if (DaysSinceIrrigation >= returndays)
                    {
                        // Calculate irrigation requirement based on current day's soil water deficit
                        double irrigationRequirement = 0;
                        for (int layer = 0; layer < asw_depth; layer++)
                        {
                            double deficit = soilPhysical.DULmm[layer] - waterBalance.SWmm[layer];
                            irrigationRequirement += Math.Max(deficit, 0); // Accumulate positive deficits
                        }

                        // Calculate amount to apply based on irrigation requirement and minimum amount
                        AmountToApply = Math.Max(irrigationRequirement, minimumAmount);

                        // Apply irrigation proportionally to each layer
                        for (int layer = 0; layer < asw_depth; layer++)
                        {
                            double layerIrrigation = AmountToApply * (SW_add[layer] / irrigationRequirement);
                            Irrigation.Apply(layerIrrigation, depth: soilPhysical.Thickness[layer]);
                        }

                        DaysSinceIrrigation = 0; // Reset DaysSinceIrrigation since irrigation occurred
                    }
                    else
                    {
                        for (int layer = 0; layer < soilPhysical.DULmm.Length; layer++)
                        {
                            inflow_lat[layer] = 0;
                            applied_furrow_irrigation = 0;
                        }
                        DaysSinceIrrigation += 1; // Increment DaysSinceIrrigation if irrigation did not occur
                    }
                }
            }
        }
    }
}
```
            Manager FurrowIrrigationPostFlowering
              Crop = [Cotton]
              IrrigStartStage = 5
              IrrigEndStage = 7
              asw_depth = 7
              crit_fr_asw = 0.8
              returndays = 5
              minimumAmount = 100
              script: same as in SensibilityTests.NResponse.NResponse.NResponseBase.paddock.FurrowIrrigationPreFlowering
            Manager ResetWater
              ResetDate = 1-oct
              OffsetDays = 0
              ResetWater = Yes
              ResetNutrients = Yes
              ResetSOM = Yes
              script: same as in Validation.Narrabri Deficit Trial 2006.NAR0607.NAR0607Base.paddock.ResetWater
            Manager HarvestAfterDate: same as Validation.Emerald Sowing Time Experiment 2015.Emerald2015.Emerald2015Base.paddock.HarvestAfterDate
            Soil Grey Vertosol NMM: ASCOrder=Vertosol; ASCSubOrder=Grey; SoilType=Clay; Site=Myall Vale; NearestTown=Narrabri, NSW 2390; Region=North West Slopes and Plains; State=New South Wales; Country=Australia; NaturalVegetation=Grasslands; ApsoilNumber=97; Latitude=-30.2056; Longitude=149.593; LocationAccuracy=+/- 20m; YearOfSampling=0; DataSource=CSIRO Plant Industry, Myall Vale (D Richards); Comments=Clay -
              Memo: same as Validation.Emerald Sowing Time Experiment 2015.Emerald2015.Emerald2015Base.paddock.Grey Vertosol NMM.Memo
              Physical: same as Validation.Emerald Sowing Time Experiment 2015.Emerald2015.Emerald2015Base.paddock.Grey Vertosol NMM.Physical
              LayerStructure: Thickness=[150, 100, 100, 100, 100, 100, 250, 200, 200]
              WaterBalance SoilWater: same as Validation.Emerald Sowing Time Experiment 2015.Emerald2015.Emerald2015Base.paddock.Grey Vertosol NMM.SoilWater
              Organic: same as Validation.Narrabri0203.Narrabri0203.Rose0203Base.paddock.Grey Vertosol NMM.Organic
              Chemical: same as Validation.Narrabri0203.Narrabri0203.Rose0203Base.paddock.Grey Vertosol NMM.Chemical
              Nutrient
              Water: Thickness=[150, 100, 100, 100, 100, 100, 250, 200, 200]; InitialValues=[0.475, 0.438, 0.437, 0.437, 0.3215, 0.24, 0.29, 0.3, 0.3]; FilledFromTop=true
              Solute NO3: same as Validation.Narrabri Deficit Trial 2006.NAR0607.NAR0607Base.paddock.Grey Vertosol NMM.NO3
              Solute NH4: same as Validation.Emerald Sowing Time Experiment 2015.Emerald2015.Emerald2015Base.paddock.Grey Vertosol NMM.NH4
              Solute Urea: same as Validation.Emerald Sowing Time Experiment 2015.Emerald2015.Emerald2015Base.paddock.Grey Vertosol NMM.NH4
              SoilTemperature CERESSoilTemperature: InteractionsPerDay=8
            SurfaceOrganicMatter: InitialResidueName=nativepasture; InitialResidueType=nativepasture; InitialResidueMass=0; InitialStandingFraction=0; InitialCPR=0; InitialCNR=0
            Plant Cotton: PlantType=Cotton
            Report NResponseReport: EventNames=[Cotton].Harvesting
              VariableNames:
                [Clock].Today
                [Clock].Today.Year
                [Cotton].Phenology.CurrentStageName
                [Cotton].Phenology.EmergenceDAS
                [Cotton].Phenology.SquaringDAS
                [Cotton].Phenology.FloweringDAS
                [Cotton].Phenology.CutoutDAS
                [Cotton].Phenology.MaturityDAS
                [Cotton].AboveGround.Wt
                [Cotton].Boll.Wt
                [Cotton].Lint.Wt
                [Cotton].Leaf.Fn
                [Cotton].Leaf.Fw
                [Cotton].Phenology.Stage
    Folder DetailedDynamics
      Experiment DetailedDynamics
        Memo
          This sensibility test investigates the time course of dry matter and nitrogen content in plant organs within a growing season.
        Factors
          CompositeFactor IrrigationFull: Specifications=[Operations]
            Operations: same as Validation.ForestHill2023.ForestHill2023.Factors.IrrigationFull.Operations
        Simulation DetailedDynamicsBase
          Clock: Start=2023-11-01; End=2024-05-01
          Summary summaryfile
          Weather: FileName=Weatherfiles/ForestHill.met
          SoilArbitrator Soil Arbitrator
          MicroClimate: a_interception=0; b_interception=1; c_interception=0; d_interception=0; SoilHeatFluxFraction=0.4; MinimumHeightDiffForNewLayer=0; NightInterceptionFraction=0.5; ReferenceHeight=2
          Zone paddock: Area=1; Slope=0; AspectAngle=0; Altitude=50
            Fertiliser
            Operations
              2023-11-02  [Fertiliser].Apply(300, Fertiliser.Types.UreaN,10);
            Irrigation
            Soil Grey Vertosol NMM: same as Validation.ForestHill2023.ForestHill2023.ForestHill2023Base.paddock.Grey Vertosol NMM
            SurfaceOrganicMatter: InitialResidueName=nativepasture; InitialResidueType=nativepasture; InitialResidueMass=0; InitialStandingFraction=0; InitialCPR=0; InitialCNR=0
            Plant Cotton: PlantType=Cotton
            Report DetailedDynamicsReport: EventNames=[Clock].DoReport
              VariableNames:
                [Clock].Today
                [Cotton].DaysAfterSowing
                [Cotton].Phenology.CurrentStageName
                [Cotton].Arbitrator.DM.TotalFixationSupply
                [Cotton].Arbitrator.DM.TotalPlantDemand
                [Cotton].Leaf.DMDemand.Total
                [Cotton].Stem.DMDemand.Total
                [Cotton].Bur.DMDemand.Total
                [Cotton].Seed.DMDemand.Total
                [Cotton].Lint.DMDemand.Total
                [Cotton].Root.DMDemand.Total
                [Cotton].Leaf.Total.Wt
                [Cotton].Leaf.Total.StructuralWt
                [Cotton].Leaf.Live.Wt
                [Cotton].Leaf.Live.StructuralWt
                [Cotton].Leaf.Total.N
                [Cotton].Leaf.Total.StructuralN
                [Cotton].Leaf.Live.N
                [Cotton].Leaf.Live.StructuralN
                [Cotton].Stem.Total.Wt
                [Cotton].Stem.Total.StructuralWt
                [Cotton].Stem.Live.Wt
                [Cotton].Stem.Live.StructuralWt
                [Cotton].Stem.Total.N
                [Cotton].Stem.Total.StructuralN
                [Cotton].Stem.Live.N
                [Cotton].Stem.Live.StructuralN
                [Cotton].Bur.Total.Wt
                [Cotton].Bur.Total.StructuralWt
                [Cotton].Bur.Live.Wt
                [Cotton].Bur.Live.StructuralWt
                [Cotton].Bur.Total.N
                [Cotton].Bur.Total.StructuralN
                [Cotton].Bur.Live.N
                [Cotton].Bur.Live.StructuralN
            Manager HarvestAfterDate: same as Validation.ForestHill2023.ForestHill2023.ForestHill2023Base.paddock.HarvestAfterDate
    Folder IrrigationResponse
      Experiment IrrigationResponse
        Factors
          Factor IrrigationDeficit: Specification=[FurrowIrrigation].Script.crit_fr_asw = 0.4, 0.8, 0.90
        Simulation IrrigationResponseBase
          Clock: Start=2010-08-01; End=2024-06-30
          Summary summaryfile
          Weather: FileName=Weatherfiles/Narrabri2010-2025.met
          SoilArbitrator Soil Arbitrator
          MicroClimate: a_interception=0; b_interception=1; c_interception=0; d_interception=0; SoilHeatFluxFraction=0.4; MinimumHeightDiffForNewLayer=0; NightInterceptionFraction=0.5; ReferenceHeight=2
          Zone paddock: Area=1; Slope=0; AspectAngle=0; Altitude=50
            Manager ResetWater: same as SensibilityTests.NResponse.NResponse.NResponseBase.paddock.ResetWater
            Manager Sowing
              Crop = [Cotton]
              SowDate = 10-oct
              CultivarName = Sicot_748B3F
              SowingDepth = 50
              RowSpacing = 1000
              Population = 11
              script: same as in Validation.Douglas Daly 2020 Irrigation.DouglasDaly2021.Factors.Irrigation.Full
            Manager Fertilise at sowing: same as SensibilityTests.NResponse.NResponse.NResponseBase.paddock.FertiliseAtSowing
            Fertiliser
            Irrigation
            Manager FurrowIrrigation
              Crop = [Cotton]
              IrrigStartStage = 3
              IrrigEndStage = 7
              asw_depth = 7
              crit_fr_asw = 0.8
              returndays = 7
              minimumAmount = 100
              script: same as in SensibilityTests.NResponse.NResponse.NResponseBase.paddock.FurrowIrrigationPreFlowering
            Manager HarvestAfterDate: same as Validation.Emerald Sowing Time Experiment 2015.Emerald2015.Emerald2015Base.paddock.HarvestAfterDate
            Soil Grey Vertosol NMM: same as SensibilityTests.NResponse.NResponse.NResponseBase.paddock.Grey Vertosol NMM
            SurfaceOrganicMatter: InitialResidueName=nativepasture; InitialResidueType=nativepasture; InitialResidueMass=0; InitialStandingFraction=0; InitialCPR=0; InitialCNR=0
            Plant Cotton: PlantType=Cotton
            Report IrrigationResponseReport: EventNames=[Cotton].Harvesting
              VariableNames:
                [Clock].Today
                [Cotton].Phenology.CurrentStageName
                [Cotton].Phenology.EmergenceDAS
                [Cotton].Phenology.SquaringDAS
                [Cotton].Phenology.FloweringDAS
                [Cotton].Phenology.CutoutDAS
                [Cotton].Phenology.MaturityDAS
                [Cotton].AboveGround.Wt
                [Cotton].Boll.Wt
                [Cotton].Lint.Wt
                [Cotton].Leaf.Fn
                [Cotton].Leaf.Fw
                [Cotton].Leaf.LAI
                sum([Soil].Water.MM)
                sum([Soil].Physical.LL15mm)
    Folder SkipRow
      Experiment SkipRow
        Factors
          Factor Skip
            CompositeFactor Double
              Specifications:
                [CottonZone].Width=2
                [SkipZone].Width=2
            CompositeFactor Single
              Specifications:
                [CottonZone].Width=2
                [SkipZone].Width=1
            CompositeFactor Solid
              Specifications:
                [CottonZone].Width=2
                [SkipZone].Width=0.01
        Simulation SkipRowBase
          Clock: Start=2010-10-01; End=2025-06-30
          Summary SummaryFile
          Weather: FileName=Weatherfiles/Dalby2010-2025.met
          MicroClimate: a_interception=0; b_interception=1; c_interception=0; d_interception=0; SoilHeatFluxFraction=0.4; MinimumHeightDiffForNewLayer=0; NightInterceptionFraction=0.5; ReferenceHeight=2
          SoilArbitrator Soil Arbitrator
          Report SimulationReport: EventNames=[Clock].DoReport
            VariableNames:
              [Clock].Today
              [CottonZone].Cotton.Phenology.CurrentStageName
              sum([CottonZone].Soil.Water.MM[1:4]) as CottonTotSW90
              sum([SkipZone].Soil.Water.MM[1:4]) as SkipTotSW90
              sum([CottonZone].Soil.Physical.LL15mm[1:4]) as CottonLL90
          RectangularZone CottonZone: Length=1; Width=100; CanopyType=CropRow; Slope=0; AspectAngle=0; Altitude=50
            Manager ResetWater
              ResetDate = 1-oct
              OffsetDays = 0
              ResetWater = Yes
              ResetNutrients = Yes
              ResetSOM = Yes
```csharp
using Models.Soils.Nutrients;
using APSIM.Shared.Utilities;
using Models.Surface;
using Models.Utilities;
using Models.Soils.Nutrients;
using Models.Soils;
using Models.PMF;
using Models.Core;
using System;
using System.Linq;
using Models.Interfaces;

namespace Models
{
    [Serializable]
    public class Script : Model
    {
        [Link] private Clock Clock;
        
        [Link] private ISoilWater SoilWater;
        [Link] private Nutrient nutrient;
        [Link] private SurfaceOrganicMatter SOM;
        [Link] private Summary Summary;

        [Description("Date to reset on:")]
        public string ResetDate {get;set;}
        
        [Description("Offset by Days (Negative is Days Before, Positive is Days After):")]
        public int OffsetDays {get;set;}

        [Description("Reset Water? (Yes or No)")]
        public string ResetWater {get;set;}

        [Description("Reset Soil Nutrients ? (Yes or No)")]
        public string ResetNutrients {get;set;}

        [Description("Reset Surface Organic Matter? (Yes or No)")]
        public string ResetSOM {get;set;}

        [EventSubscribe("DoManagement")]
        private void OnDoManagement(object sender, EventArgs e)
        {
            DateTime offsetDate = DateUtilities.GetDate(ResetDate, Clock.Today).AddDays(OffsetDays);
            if (offsetDate.Equals(Clock.Today))
            {
                if (ResetWater == "Yes")
                {
                    Summary.WriteMessage(this, "Reset Water", MessageType.Diagnostic);
                    SoilWater.Reset();
                }
                if (ResetNutrients == "Yes")
                {
                    Summary.WriteMessage(this, "Reset Nitrogen", MessageType.Diagnostic);
                    nutrient.Reset();
                }
                if (ResetSOM == "Yes")
                {
                    Summary.WriteMessage(this, "Reset Surface OM", MessageType.Diagnostic);
                    SOM.Reset();
                }
            }
        }
    }
}
```
            Report: EventNames=[Cotton].Harvesting
              VariableNames:
                [Clock].Today
                [Cotton].AboveGround.Wt
                [Cotton].Lint.Wt
                [Cotton].Seed.Wt
                [Cotton].Phenology.CurrentStageName
                sum([Soil].Water.MM[1:4]) as TotalSW90cm
                [Cotton].Leaf.Fw
                [Cotton].Leaf.Fn
                sum([Soil].NO3.kgha)
            Fertiliser
            SurfaceOrganicMatter: InitialResidueName=wheat_stubble; InitialResidueType=wheat; InitialResidueMass=500; InitialStandingFraction=0; InitialCPR=0; InitialCNR=100
            Soil: same as Validation.Warra0405.Warra0405.WarraBaseSimulation.CottonZone.Soil
            Manager Sowing: same as Validation.Warra0405.Warra0405.WarraBaseSimulation.CottonZone.Sowing
            Operations
            Irrigation
            Manager SetupCottonRootZones: same as Validation.Warra0405.Warra0405.WarraBaseSimulation.CottonZone.SetupCottonRootZones
            Plant Cotton: PlantType=Cotton
            Manager HarvestAfterDate: same as Validation.Warra0405.Warra0405.WarraBaseSimulation.CottonZone.HarvestAfterDate
          RectangularZone SkipZone: Length=1; Width=100; CanopyType=CropRow; Slope=0; AspectAngle=0; Altitude=50
            Manager ResetWater: same as SensibilityTests.SkipRow.SkipRow.SkipRowBase.CottonZone.ResetWater
            Fertiliser
            SurfaceOrganicMatter: InitialResidueName=wheat_stubble; InitialResidueType=wheat; InitialResidueMass=500; InitialStandingFraction=0; InitialCPR=0; InitialCNR=100
            Operations
            Soil: same as Validation.Warra0405.Warra0405.WarraBaseSimulation.SkipZone.Soil
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