Simulations: Version=46
  Memo TitlePage
    # The APSIM Eucalyptus Model - Example
  Replacements
    Plant Eucalyptus: CropType=Eucalyptus
      Memo
        Root:shoot ratio, and allometric relationships for height (Ht, m), stem diameter (DBH, cm, over bark at 1.3 m height), and their derivatives (stem volume Vol, and mean annual increment MAI) were developed as a function of above-ground biomass from [almeida2003application], [almeida2004parameterisation], [borges2009parametrizaccao], [cromer1993response], and [norgueira2005estadonutricional]. Similarly, above-ground biomass as a function of stem weight or wood weight was developed from the same datasets plus [turner1986organic], [byrne1989above], [bradstock1981biomass], [polglase1995mineralization], [snow1999nitrogen], [snow1999modelling], [myers1996growth], [myers1998response], and [melo2015responses].
      AccumulateFunction Age: StartStageName=Emergence; EndStageName=Old; FractionRemovedOnCut=0; FractionRemovedOnHarvest=0; FractionRemovedOnGraze=0; FractionRemovedOnPrune=0
        Constant day: FixedValue=0.00273973; Units=years
          Memo
            This converts days of growth to age in years.
      Phenology
        StageBasedInterpolation StageCode: Stages=[Emergence, EndJuvenile, Maturity, Old]; Codes=[1, 2, 3, 4]; Proportional=true
        Constant ThermalTime: FixedValue=1; Units=^od
        GerminatingPhase Germinating: Start=Sowing; End=Germination
          Memo
            We make no distinction between sowing and transplanting in this model, but all sites used transplants not sown seeds. Initial weights are specified for leaf (1 g/plant) and fine root (0.2 g/plant), which implies these are transplants. Germinating and emerging phenology phases are included in case they are needed by later users. No planting shock is included, but this could be considered in future versions, e.g. delay in commencement of root downward growth.
        EmergingPhase Emerging: ShootLag=1; ShootRate=0; Start=Germination; End=Emergence; TTForTimeStep=0
          VariableReference ThermalTime: VariableName=[Phenology].ThermalTime.Value()
        GenericPhase Juvenile: Start=Emergence; End=EndJuvenile
          Constant Progression: FixedValue=1; Units=^od
          Constant Target: FixedValue=365; Units=^o
        GenericPhase Mature: Start=EndJuvenile; End=Maturity
          Constant Progression: FixedValue=1; Units=^od
          Constant Target: FixedValue=1825; Units=^o
        GenericPhase Declining: Start=Maturity; End=Old
          Constant Progression: FixedValue=1; Units=^od
          Constant Target: FixedValue=27010; Units=^o
        EndPhase Old: Start=Old; End=Unused
          Constant ThermalTime: FixedValue=1; Units=^od
      OrganArbitrator Arbitrator
        RelativeAllocation NArbitrator
        RelativeAllocation DMArbitrator
      CompositeBiomass AboveGround: DMDOfStructural=0.6
        Propertys=[[Branch].Live, [Branch].Dead, [Leaf].Live, [Leaf].Dead, [Stem].Live, [Stem].Dead]
      CompositeBiomass BelowGround: DMDOfStructural=0.6
        Propertys=[[FineRoot].Live, [FineRoot].Dead, [CoarseRoot].Live, [CoarseRoot].Dead]
      CompositeBiomass Wood: DMDOfStructural=0.6; Propertys=[[Stem].Live, [Stem].Dead, [Branch].Live, [Branch].Dead]
      CompositeBiomass Total: DMDOfStructural=0.6
        Propertys=[[Leaf].Live, [Leaf].Dead, [Stem].Live, [Stem].Dead, [FineRoot].Live, [FineRoot].Dead, [CoarseRoot].Live, [CoarseRoot].Dead]
      CompositeBiomass TotalLive: DMDOfStructural=0.6
        Propertys=[[Leaf].Live, [Stem].Live, [FineRoot].Live, [CoarseRoot].Live]
      DivideFunction IndividualTreeLiveWt
        VariableReference LiveWt: VariableName=[Eucalyptus].TotalLive.Wt
        VariableReference Population: VariableName=[Eucalyptus].Population
      DivideFunction IndividualTreeStemWt
        VariableReference LiveWt: VariableName=[Eucalyptus].Stem.Wt
        VariableReference Population: VariableName=[Eucalyptus].Population
      CompositeBiomass TotalDead: DMDOfStructural=0.6
        Propertys=[[Leaf].Dead, [Stem].Dead, [FineRoot].Dead, [CoarseRoot].Dead]
      PerennialLeaf Leaf: CohortsInitialised=false; Albedo=0.15; Gsmax=0.005; R50=200; MicroClimatePresent=true
        zero: MaintenanceRespiration, GrowthRespiration, ApicalCohortNo, TipsAtEmergence, CohortsAtInitialisation, AppearedCohortNo, PlantAppearedLeafNo, InitialisedCohortNo, Height, FRGR, PotentialEP, WaterDemand
        MultiplyFunction InitialWtFunction
          Constant InitialPlantWt: FixedValue=1; Units=g/plant
            Memo
              This value is nominally low to reflect the dry weight of leaves on a transplanted seedling.
          VariableReference Population: VariableName=[Plant].Population
        Constant LaiDeadFunction: FixedValue=0; Units=m^2/m^2
        MinimumFunction FRGRFunction
          AirTemperatureFunction FRGRFunctionTemp
            XYPairs: X=[5, 20, 25, 35]; Y=[0, 1, 1, 0]
              Memo
                This is an assumed temperature response function.
        Constant ExtinctionCoefficient: FixedValue=0.5
          Memo
            A value of 0.50 is commonly used for Eucalyptus [macfarlane2007estimation].
        Constant ExtinctionCoefficientDead: FixedValue=0.5
        Constant MaximumNConc: FixedValue=0.03; Units=g/g
          Memo
            Foliar N concentrations are based on [leuning1991spatial].
        Constant MinimumNConc: FixedValue=0.01; Units=g/g
          Memo
            This is an assumed value.
        Constant NReallocationFactor: FixedValue=0; Units=/d
          Memo
            A value of zero assumes there is no N reallocation.
        Constant SenescenceRate: FixedValue=0; Units=/d
          Memo
            A value of zero assumes that senescence is immediate.
        BiomassRemoval BiomassRemovalDefaults
          OrganBiomassRemovalType Harvest: FractionLiveToRemove=0; FractionDeadToRemove=0; FractionLiveToResidue=0.999; FractionDeadToResidue=0.999
          OrganBiomassRemovalType Cut: FractionLiveToRemove=0.8; FractionDeadToRemove=0; FractionLiveToResidue=0; FractionDeadToResidue=0
          OrganBiomassRemovalType Prune: FractionLiveToRemove=0; FractionDeadToRemove=0; FractionLiveToResidue=0.6; FractionDeadToResidue=0
          Memo
            Values in this table reflect the live and dead fractions that are either removed fro the system or transferred to the residue pool. Harvest, Cut and Prune methods will affect these values, but default values assume for Harvest assume delimbing at the stump.
        Constant DMConversionEfficiency: FixedValue=1; Units=g/g
        Constant LeafDetachmentTime: FixedValue=14; Units=d
          Memo
            A value here is the number of days between senseence and detachment. A value of 14 days is assumed.
        Constant DetachmentRateFunction: FixedValue=0; Units=/d
          Memo
            A value for DetachmentRateFunction is required in Leaf, Branch, Stem and CoarseRoot components of the model, but a zero value means that immediate detachment has been triggered. A non-zero option might be useful in the future for defining some genotypes.

            The same explanation applies to zero values below for retranslocation factors.
        Constant DMRetranslocationFactor: FixedValue=0; Units=/d
        Constant NRetranslocationFactor: FixedValue=0; Units=/d
        RUEModel Photosynthesis
          Constant RUE: FixedValue=1.4; Units=g/MJ
            Memo
              Aboveground RUE for Gliricidia was measured as 1.06 g/MJ by [harrington1995radiation]. Adding c. 0.3 for belowground allocation provides a value of 1.4 g/MJ.
          WeightedTemperatureFunction FT: MaximumTemperatureWeighting=0.75
            XYPairs: X=[5, 20, 25, 35]; Y=[0, 1, 1, 0]
          LinearInterpolationFunction FVPD: XProperty=[Leaf].Photosynthesis.VPD
            XYPairs: X=[0, 10, 50]; Y=[1, 1, 0]
          LinearInterpolationFunction FN: XProperty=[Leaf].Fn
            XYPairs: X=[0, 1, 1.5]; Y=[0, 1, 1]
          LinearInterpolationFunction FW: XProperty=[Leaf].Fw
            XYPairs: X=[0, 1, 1.5]; Y=[0, 1, 1]
          RUECO2Function FCO2: PhotosyntheticPathway=C3
          VariableReference RadnInt: VariableName=[Leaf].RadIntTot
        Constant LeafKillFraction: FixedValue=0; Units=0-1
          Memo
            A value of zero assumes that no leaves are killed initially, but this value could be reset in an Operation to reflect, for example, an insect browsing attack, frost kill of foliage, or a pruning operation that removes leaves.
        Constant MinimumLAI: FixedValue=0.01; Units=m^2/m^2
        LinearInterpolationFunction SpecificLeafAreaFunction: XProperty=[Eucalyptus].Age.Value()
          XYPairs: X=[0, 1, 2, 3, 8]; Y=[0.016, 0.0105, 0.0089, 0.0085, 0.0073]
          Memo
            Data for SLA (m^2/g)came from [borges2009parametrizaccao] and [almeida2003comparison]. Values and trends were similar. A generalised pattern should suffice for many applicatinos, but cultivar-specific patterns are available for some cultivars and could be used to slighly refine their simulation. These data are also similar to those in [rance2014assessment].
        LinearInterpolationFunction LeafResidenceTime: XProperty=[Eucalyptus].Age.Value()
          XYPairs: X=[0, 1, 2, 3, 8]; Y=[100, 140, 180, 220, 280]
          Memo
            This function specifies that lead residence time increases with age. Values are based on [lachlau_influence_2008].
        Constant CarbonConcentration: FixedValue=0.45; Units=g/g
          Memo
            This value is based on [ribiero_aboveground-2014].
        MultiplyFunction LeafDevelopmentRate
          Constant LDR: FixedValue=1; Units=0-1
          WeightedTemperatureFunction FT: MaximumTemperatureWeighting=1
            XYPairs: X=[10, 26, 33, 34]; Y=[0, 1, 1, 0]
              Memo
                This is an assumed and tuned function of leaf development rate in relation to weighted air temperature.
        ExpressionFunction HeightFunction: Expression=[Stem].Ht*1000
          Memo
            This converts stem height in m to mm for use else where in the model.
        BiomassDemand DMDemands
          Memo
            DM demands are set in a similar ways for each organ, but with different values: structural (default specified), metabolic (value = 0), and storage functions (1 - structural). Values measured range from about 5 to 50% for eucalyptus leaves ([quentin2015non]), which also covers the range of 1-20% for other species and plant parts ([hoch2003non]). Metabolic demand is set to zero, because RUE is a value for net growth for which a respiration calculation is not needed. These values may become an important focus if one attempts to use the model for coppicing, as is already the case in several other APSIM models, e.g. lucerne and gliricidia.
          MultiplyFunction Structural
            PartitionFractionDemandFunction DMDemandFunction
              LinearInterpolationFunction PartitionFraction: XProperty=[Eucalyptus].IndividualTreeLiveWt.Value()
                XYPairs: X=[0, 1000, 10000]; Y=[0.19, 0.19, 0.2]
            Constant StructuralFraction: FixedValue=0.99; Units=0-1
          Constant Metabolic: FixedValue=0
          Constant Storage: FixedValue=0
        BiomassDemand NDemands
          Memo
            N demands are set in a similar ways to DM demands, which are described above.
          MultiplyFunction Structural
            VariableReference MinNconc: VariableName=[Leaf].minimumNconc.Value()
            VariableReference PotentialDMAllocation: VariableName=[Leaf].potentialDMAllocation.Structural
          Constant Metabolic: FixedValue=0
          StorageNDemandFunction Storage
            VariableReference MaxNconc: VariableName=[Leaf].MaximumNconc.Value()
            Constant NitrogenDemandSwitch: FixedValue=1
      GenericOrgan Branch
        Memo
          For many of the parameters in this organ, see comments for similar parameters in the leaf organ.
        Constant NReallocationFactor: FixedValue=0; Units=/d
        Constant NRetranslocationFactor: FixedValue=0.05; Units=/d
        PhaseBasedSwitch NitrogenDemandSwitch: Start=Emergence; End=Old
        Constant DMRetranslocationFactor: FixedValue=0; Units=/d
        Constant SenescenceRate: FixedValue=0; Units=/d
        Constant MaximumNConc: FixedValue=0.01; Units=g/g
        Constant MinimumNConc: FixedValue=0.0014; Units=g/g
        Constant InitialWtFunction: FixedValue=0; Units=g
        Constant DetachmentRateFunction: FixedValue=0; Units=/d
        Constant MaintenanceRespirationFunction: FixedValue=0; Units=0-1
        Constant DMConversionEfficiency: FixedValue=1; Units=0-1
        BiomassRemoval BiomassRemovalDefaults
          OrganBiomassRemovalType Harvest: FractionLiveToRemove=0.5; FractionDeadToRemove=0; FractionLiveToResidue=0.1; FractionDeadToResidue=0
          OrganBiomassRemovalType Cut: FractionLiveToRemove=0.8; FractionDeadToRemove=0; FractionLiveToResidue=0; FractionDeadToResidue=0
          OrganBiomassRemovalType Prune: FractionLiveToRemove=0; FractionDeadToRemove=0; FractionLiveToResidue=0.6; FractionDeadToResidue=0
          OrganBiomassRemovalType Thin: FractionLiveToRemove=0; FractionDeadToRemove=0; FractionLiveToResidue=0.05; FractionDeadToResidue=0
        Constant DMReallocationFactor: FixedValue=0; Units=/d
        VariableReference CriticalNConc: VariableName=[Branch].MinimumNConc.Value()
        Constant RemobilisationCost: FixedValue=0
        Constant CarbonConcentration: FixedValue=0.45; Units=g/g
        BiomassDemand DMDemands
          Memo
            DM or N demands here are set in a similar way to those described above for the leaf organ.
          MultiplyFunction Structural
            PartitionFractionDemandFunction DMDemandFunction
              LinearInterpolationFunction PartitionFraction: XProperty=[Eucalyptus].IndividualTreeLiveWt.Value()
                XYPairs: X=[0, 1000, 10000]; Y=[0.06, 0.06, 0.06]
            Constant StructuralFraction: FixedValue=0.99; Units=0-1
          Constant Metabolic: FixedValue=0
          StorageDMDemandFunction Storage
            SubtractFunction StorageFraction
              Constant One: FixedValue=1
              VariableReference StructuralFraction: VariableName=[Branch].DMDemands.Structural.StructuralFraction.Value()
        BiomassDemand NDemands
          Memo
            DM or N demands here are set in a similar way to those described above for the leaf organ.
          MultiplyFunction Structural
            VariableReference MinNconc: VariableName=[Branch].minimumNconc.Value()
            VariableReference PotentialDMAllocation: VariableName=[Branch].potentialDMAllocation.Structural
          MultiplyFunction Metabolic
            SubtractFunction MetabolicNconc
              VariableReference CritNconc: VariableName=[Branch].criticalNConc.Value()
              VariableReference MinNconc: VariableName=[Branch].minimumNconc.Value()
            VariableReference PotentialDMAllocation: VariableName=[Branch].potentialDMAllocation.Structural
          StorageNDemandFunction Storage
            VariableReference NitrogenDemandSwitch: VariableName=[Branch].nitrogenDemandSwitch.Value()
            VariableReference MaxNconc: VariableName=[Branch].maximumNconc.Value()
      GenericOrgan Stem
        Memo
          For many of the parameters in this organ, see comments for similar parameters in the leaf organ.
        Constant NReallocationFactor: FixedValue=0; Units=/d
        Constant NRetranslocationFactor: FixedValue=0.05; Units=/d
        PhaseBasedSwitch NitrogenDemandSwitch: Start=Emergence; End=Old
        Constant DMRetranslocationFactor: FixedValue=0; Units=/d
        Constant SenescenceRate: FixedValue=0; Units=/d
        Constant MaximumNConc: FixedValue=0.01; Units=g/g
          Memo
            Branch, stem and coarse root minimum N concentrations are based on [raymond2000effect].
        Constant MinimumNConc: FixedValue=0.0014; Units=g/g
        Constant InitialWtFunction: FixedValue=0; Units=g
        Constant DetachmentRateFunction: FixedValue=0; Units=/d
        Constant MaintenanceRespirationFunction: FixedValue=0; Units=0-1
        Constant DMConversionEfficiency: FixedValue=1; Units=0-1
        BiomassRemoval BiomassRemovalDefaults: same as Replacements.Eucalyptus.Branch.BiomassRemovalDefaults
        Constant DMReallocationFactor: FixedValue=0; Units=/d
        VariableReference CriticalNConc: VariableName=[Stem].MinimumNConc.Value()
        Constant CarbonConcentration: FixedValue=0.45; Units=g/g
        Constant RemobilisationCost: FixedValue=0
        ExpressionFunction DBH: Expression=0.685*([Eucalyptus].AboveGround.Wt^0.3262)
        MaximumFunction Ht
          ExpressionFunction HeightFunction: Expression=0.5201*([Eucalyptus].Stem.DBH^1.3604)
          Constant MinimumHeight: FixedValue=0.1; Units=m
        LessThanFunction Vol
          VariableReference Height: VariableName=[Stem].Ht.Value()
          Constant MinimumHeight: FixedValue=2
          Constant Zero: FixedValue=0
          ExpressionFunction VolumeEquation
            Expression=(((((([Eucalyptus].Stem.DBH)/2)^2)*3.14159)/3)*([Eucalyptus].Stem.Ht*100))*[Eucalyptus].Population*10000/1000000
            Memo
              Stem volume is calculated as concical volume with the base of the cone the same diameter as at breast height (1.3 m height). Units are m3 stem/ha.
        ExpressionFunction MAI: Expression=[Eucalyptus].Stem.Vol/[Eucalyptus].Age
          Memo
            MAI = Mean Annual Increment (m3/ha/year) of stem

            MAI, which is based on stem volume, depends entirely on the allometric equation used for DBH, and on which Ht in-turn is direclty based. The Brazilian dataset on which these relationships were based did not include large trees. It is likely that the relationships over-predict DBH, Ht, Vol and MAI at larger sizes than included in the calibration dataset, which may have been a problem for the Gympie and Coffs sites. Although Coffs in the validation dataset included large trees, DBH and Ht data were not avialable from that site to include in the calibration. The developers of this model encourage redefinition of the DBH, Ht and Vol functions for specific future applications that include large trees.
        BiomassDemand DMDemands
          Memo
            DM or N demands here are set in a similar way to those described above for the leaf organ.
          MultiplyFunction Structural
            PartitionFractionDemandFunction DMDemandFunction
              LinearInterpolationFunction PartitionFraction: XProperty=[Eucalyptus].IndividualTreeLiveWt.Value()
                XYPairs: X=[0, 2000, 10000]; Y=[0.35, 0.45, 0.58]
            Constant StructuralFraction: FixedValue=0.99; Units=0-1
          Constant Metabolic: FixedValue=0
          StorageDMDemandFunction Storage
            SubtractFunction StorageFraction
              Constant One: FixedValue=1
              VariableReference StructuralFraction: VariableName=[Stem].DMDemands.Structural.StructuralFraction.Value()
        BiomassDemand NDemands
          Memo
            DM or N demands here are set in a similar way to those described above for the leaf organ.
          MultiplyFunction Structural
            VariableReference MinNconc: VariableName=[Stem].minimumNconc.Value()
            VariableReference PotentialDMAllocation: VariableName=[Stem].potentialDMAllocation.Structural
          MultiplyFunction Metabolic
            SubtractFunction MetabolicNconc
              VariableReference CritNconc: VariableName=[Stem].criticalNConc.Value()
              VariableReference MinNconc: VariableName=[Stem].minimumNconc.Value()
            VariableReference PotentialDMAllocation: VariableName=[Stem].potentialDMAllocation.Structural
          StorageNDemandFunction Storage
            VariableReference NitrogenDemandSwitch: VariableName=[Stem].nitrogenDemandSwitch.Value()
            VariableReference MaxNconc: VariableName=[Stem].maximumNconc.Value()
      GenericOrgan CoarseRoot
        Memo
          For many of the parameters in this organ, see comments for similar parameters in the leaf organ.
        Constant NReallocationFactor: FixedValue=0; Units=/d
        Constant NRetranslocationFactor: FixedValue=0.05; Units=/d
        PhaseBasedSwitch NitrogenDemandSwitch: Start=Emergence; End=Old
        Constant DMRetranslocationFactor: FixedValue=0; Units=0-1
        Constant SenescenceRate: FixedValue=0; Units=/d
        Constant MaximumNConc: FixedValue=0.01; Units=g/g
        Constant MinimumNConc: FixedValue=0.0014; Units=g/g
        Constant InitialWtFunction: FixedValue=0; Units=g
        Constant DetachmentRateFunction: FixedValue=0; Units=/d
        Constant MaintenanceRespirationFunction: FixedValue=0; Units=0-1
        Constant DMConversionEfficiency: FixedValue=1; Units=0-1
        BiomassRemoval BiomassRemovalDefaults: same as Replacements.Eucalyptus.Branch.BiomassRemovalDefaults
        Constant DMReallocationFactor: FixedValue=0; Units=0-1
        VariableReference CriticalNConc: VariableName=[Stem].MinimumNConc.Value()
        Constant RemobilisationCost: FixedValue=0
        Constant CarbonConcentration: FixedValue=0.45; Units=g/g
        BiomassDemand DMDemands
          Memo
            DM or N demands here are set in a similar way to those described above for the leaf organ.
          MultiplyFunction Structural
            PartitionFractionDemandFunction DMDemandFunction
              LinearInterpolationFunction PartitionFraction: XProperty=[Eucalyptus].IndividualTreeLiveWt.Value()
                XYPairs: X=[0, 1000, 10000]; Y=[0.01, 0.03, 0.05]
            Constant StructuralFraction: FixedValue=0.99; Units=0-1
          Constant Metabolic: FixedValue=0
          StorageDMDemandFunction Storage
            SubtractFunction StorageFraction
              Constant One: FixedValue=1
              VariableReference StructuralFraction
                VariableName=[CoarseRoot].DMDemands.Structural.StructuralFraction.Value()
        BiomassDemand NDemands
          Memo
            DM or N demands here are set in a similar way to those described above for the leaf organ.
          MultiplyFunction Structural
            VariableReference MinNconc: VariableName=[CoarseRoot].minimumNconc.Value()
            VariableReference PotentialDMAllocation: VariableName=[CoarseRoot].potentialDMAllocation.Structural
          MultiplyFunction Metabolic
            SubtractFunction MetabolicNconc
              VariableReference CritNconc: VariableName=[CoarseRoot].criticalNConc.Value()
              VariableReference MinNconc: VariableName=[CoarseRoot].minimumNconc.Value()
            VariableReference PotentialDMAllocation: VariableName=[CoarseRoot].potentialDMAllocation.Structural
          StorageNDemandFunction Storage
            VariableReference NitrogenDemandSwitch: VariableName=[CoarseRoot].nitrogenDemandSwitch.Value()
            VariableReference MaxNconc: VariableName=[CoarseRoot].maximumNconc.Value()
      Root FineRoot: GrowthRespiration=0; MaintenanceRespiration=0
        Memo
          For many of the parameters in this organ, see comments for similar parameters in the leaf organ.
        PhaseBasedSwitch NitrogenDemandSwitch: Start=Emergence; End=Old
        Constant RootFrontVelocity: FixedValue=10; Units=mm/d
          Memo
            [huth_managing_2008] measured a constant root front velocity of 24.3 mm/d down to 1.4 m depth under favourable growing conditions, which was similar to wheat. [goncalves_integrating_2013] report eucalypt root front velocities averaging 19 mm/day for the first 1.5 years to 12 mm/day by 3.5 years in conditions of little impedence to root growth. The value of 10 mm/d used here is lower to reflect more common limiting conditions.
        Constant SenescenceRate: FixedValue=0.005; Units=/d
        Constant MaxDailyNUptake: FixedValue=6; Units=kg/ha/d
        Constant MaximumNConc: FixedValue=0.01; Units=g/g
          Memo
            Fine root N concentrations are based on [gordon2000nutrient].
        Constant MinimumNConc: FixedValue=0.003; Units=g/g
        Constant MaximumRootDepth: FixedValue=10000; Units=mm
        LinearInterpolationFunction KLModifier: XProperty=[Leaf].LAI
          XYPairs: X=[0, 3]; Y=[1, 1]
        LinearInterpolationFunction KNO3: XProperty=[Root].LengthDensity
          XYPairs: X=[0, 0.003]; Y=[0.03, 0.03]
        Constant KNH4: FixedValue=3E-06
        LinearInterpolationFunction NUptakeSWFactor: XProperty=[Root].RWC
          XYPairs: X=[0, 1]; Y=[0, 1]
        Constant InitialDM: FixedValue=0.2; Units=g/plant
        Constant SpecificRootLength: FixedValue=40; Units=m/g
          Memo
            Specific root length was based on [jourdan2008fine].
        BiomassRemoval BiomassRemovalDefaults
          OrganBiomassRemovalType Harvest: FractionLiveToRemove=0; FractionDeadToRemove=0; FractionLiveToResidue=0.9; FractionDeadToResidue=0.9
          OrganBiomassRemovalType Cut: FractionLiveToRemove=0.8; FractionDeadToRemove=0; FractionLiveToResidue=0; FractionDeadToResidue=0
          OrganBiomassRemovalType Prune: FractionLiveToRemove=0; FractionDeadToRemove=0; FractionLiveToResidue=0.6; FractionDeadToResidue=0
        Constant DMConversionEfficiency: FixedValue=1; Units=0-1
        Constant MaintenanceRespirationFunction: FixedValue=0; Units=0-1
        Constant RemobilisationCost: FixedValue=0
        Constant CarbonConcentration: FixedValue=0.45; Units=g/g
        BiomassDemand DMDemands
          Memo
            DM or N demands here are set in a similar way to those described above for the leaf organ.
          MultiplyFunction Structural
            PartitionFractionDemandFunction DMDemandFunction
              Constant PartitionFraction: FixedValue=0.25
            Constant StructuralFraction: FixedValue=1
          Constant Metabolic: FixedValue=0
          StorageDMDemandFunction Storage
            SubtractFunction StorageFraction
              Constant One: FixedValue=1
              VariableReference StructuralFraction: VariableName=[FineRoot].DMDemands.Structural.StructuralFraction.Value()
        BiomassDemand NDemands
          Memo
            DM or N demands here are set in a similar way to those described above for the leaf organ.
          MultiplyFunction Structural
            VariableReference MinNconc: VariableName=[FineRoot].minimumNconc.Value()
            VariableReference PotentialDMAllocation: VariableName=[FineRoot].potentialDMAllocation.Structural
          MultiplyFunction Metabolic
            SubtractFunction MetabolicNconc
              VariableReference CritNconc: VariableName=[FineRoot].criticalNConc.Value()
              VariableReference MinNconc: VariableName=[FineRoot].minimumNconc.Value()
            VariableReference PotentialDMAllocation: VariableName=[FineRoot].potentialDMAllocation.Structural
          StorageNDemandFunction Storage
            VariableReference NitrogenDemandSwitch: VariableName=[FineRoot].nitrogenDemandSwitch.Value()
            VariableReference MaxNconc: VariableName=[FineRoot].maximumNconc.Value()
      DivideFunction RootShootRatio
        VariableReference Numerator: VariableName=[Eucalyptus].BelowGround.Wt
        VariableReference Denominator: VariableName=[Eucalyptus].AboveGround.Wt
      CultivarFolder grandis
        Cultivar grandis
          Memo Genotype note
            This genotype specification was originally planned to be for the species E. grandis in general, but we did not actually provide any specific parameters. As no parameter values were changed here, generic Eucalyptus parameters were used where this genotype was specified in a simulation.
        Cultivar grandisCoffsHarbour
          Memo Genotype note
            This genotype specification is for a Coffs Harbour provenance of E. grandis, but as no actually genotype-specific parameters are specified, simulations using this genotype use the unchanged parameter set of the main Eucalyptus model.
        Cultivar grandisC15
          Command:
            [CoarseRoot].DMDemands.Structural.DMDemandFunction.PartitionFraction.XYPairs.X=0,1000,10000
            [CoarseRoot].DMDemands.Structural.DMDemandFunction.PartitionFraction.XYPairs.Y=0,0.03,0.04
            [Leaf].DMDemands.Structural.DMDemandFunction.PartitionFraction.XYPairs.X=0,1000,10000,20000,50000,80000
            [Leaf].DMDemands.Structural.DMDemandFunction.PartitionFraction.XYPairs.Y=0.24,0.2,0.2,.23,0.2,.12
            [Branch].DMDemands.Structural.DMDemandFunction.PartitionFraction.XYPairs.X=0,1000,10000,20000,50000,80000
            [Branch].DMDemands.Structural.DMDemandFunction.PartitionFraction.XYPairs.Y=.06,.06,.06,.05,.04,.03
            [FineRoot].DMDemands.Structural.DMDemandFunction.PartitionFraction.FixedValue=0.2
            [Stem].DMDemands.Structural.DMDemandFunction.PartitionFraction.XYPairs.X=0,1000,10000,20000,30000,80000
            [Stem].DMDemands.Structural.DMDemandFunction.PartitionFraction.XYPairs.Y=0.2,0.45,0.7,0.99,0.99,.99
          Memo Genotype note
            This genotype specification was used to specifiy partitioning to for the C15 clone used by the Aracruz company (now Fibria), in order to approximate the root:shoot ratios reported in [almeida].
        Cultivar grandisC22
          Command:
            [CoarseRoot].DMDemands.Structural.DMDemandFunction.PartitionFraction.XYPairs.X=0,1000,10000
            [CoarseRoot].DMDemands.Structural.DMDemandFunction.PartitionFraction.XYPairs.Y=0,0.08,0.08
            [Leaf].DMDemands.Structural.DMDemandFunction.PartitionFraction.XYPairs.X=0,1000,10000,20000,50000,80000
            [Leaf].DMDemands.Structural.DMDemandFunction.PartitionFraction.XYPairs.Y=0.22,0.2,0.19,0.13,0.10,.06
          Memo Genotype note
            This genotype specification was used to specifiy partitioning to for the C22 clone used by the Aracruz company (now Fibria), in order to approximate the root:shoot ratios reported in [almeida].
      CultivarFolder grandisXurophylla
        Cultivar grandisXurophylla
          Memo Genotype note
            This genotype specification was originally planned to be for a cline of grandisXurophylla, but we did not actually provide any specific parameters. As no parameter values were changed here, generic Eucalyptus parameters were used where this genotype was specified in a simulation.
        Cultivar grandisXurophyllaC3334
          Memo Genotype note
            This genotype specification was originally planned to be for the clone C3334, but we did not actually provide any specific parameters. As no parameter values were changed here, generic Eucalyptus parameters were used where this genotype was specified in a simulation.
        Cultivar grandisXurophyllaC3336
          Memo Genotype note
            This genotype specification was originally planned to be for the clone C3336, but we did not actually provide any specific parameters. As no parameter values were changed here, generic Eucalyptus parameters were used where this genotype was specified in a simulation.
      CultivarFolder urophyllaXglobulus
        Cultivar urophyllaXglobulus
          Memo Genotype note
            This genotype specification was originally planned to be for the urophyllaXglobulus hybird of E. grandis, but we did not actually provide any specific parameters. As no parameter values were changed here, generic Eucalyptus parameters were used where this genotype was specified in a simulation.
      CultivarFolder saligna
        Cultivar saligna
          Memo Genotype note
            This genotype specification was originally planned to be for the species E. saligna, but we did not actually provide any specific parameters. As no parameter values were changed here, generic Eucalyptus parameters were used where this genotype was specified in a simulation.
  DataStore
  Folder EucalyptusExample
    Memo
      This hypothetical experiment was effluent-irrigated _E. grandis,_ and weedy.
    Simulation EucalyptusExample
      Weather: FileName=wwepp.met
      Clock: StartDate=1991-07-01; EndDate=1996-06-30
      Summary
      SoilArbitrator Soil Arbitrator
      MicroClimate: a_interception=0; b_interception=1; c_interception=0; d_interception=0; soil_albedo=0.13; SoilHeatFluxFraction=0.4; NightInterceptionFraction=0.5; ReferenceHeight=2
      Zone Plantation: Area=1; Slope=0
        Soil: Latitude=0; Longitude=0
          InitialWater Initial water: PercentMethod=EvenlyDistributed; FractionFull=0.8
          Water
            Thickness  BD    AirDry  LL15  DUL   SAT
            100        1.5   0.01    0.05  0.16  0.29
            300        1.6   0.01    0.05  0.15  0.29
            600        1.68  0.01    0.05  0.14  0.29
            1000       1.75  0.02    0.05  0.13  0.29
            1000       1.7   0.05    0.05  0.12  0.29
            1000       1.7   0.05    0.05  0.12  0.29
            1000       1.7   0.05    0.05  0.12  0.29
            1000       1.7   0.05    0.05  0.12  0.29
            SoilCrop EucalyptusSoil: LL=[0.05, 0.05, 0.05, 0.05, 0.05, 0.05, 0.05, 0.05]; KL=[0.07, 0.07, 0.05, 0.02, 0.02, 0.02, 0.01, 0.01]; XF=[1, 1, 1, 1, 0.3, 0.2, 0, 0]
            SoilCrop SCRUMSoil: LL=[0.05, 0.05, 0.05, 0.05, 0.05, 0.05, 0.05, 0.05]; KL=[0.07, 0.07, 0.05, 0.02, 0.02, 0.02, 0.01, 0.01]; XF=[1, 1, 1, 1, 0.3, 0.2, 0, 0]
          SoilWater: SummerDate=1-Nov; SummerU=4; SummerCona=3.5; WinterDate=1-Apr; WinterU=4; WinterCona=3.5; DiffusConst=88; DiffusSlope=35.4; Salb=0.13; CN2Bare=65; CNRed=20; CNCov=0.8; slope=0; discharge_width=0; catchment_area=0; max_pond=0; ResidueInterception=0
            Thickness  SWCON  KLAT
            100        0.9    0
            300        0.9    0
            600        0.9    0
            1000       0.6    0
            1000       0.6    0
            1000       0.6    0
            1000       0.6    0
            1000       0.6    0
          SoilNitrogen: fom_type=[default, manure, mucuna, lablab, shemp, stable]; fract_carb=[0.2, 0.3, 0.54, 0.57, 0.45, 0]; fract_cell=[0.7, 0.3, 0.37, 0.37, 0.47, 0.1]; fract_lign=[0.1, 0.4, 0.09, 0.06, 0.08, 0.9]
          SoilOrganicMatter: RootCN=60; RootWt=1; SoilCN=14.5; EnrACoeff=7.4; EnrBCoeff=0.2; OCUnits=Total
            Thickness  OC    FBiom  FInert
            100        2     0.04   0.4
            300        1     0.03   0.5
            600        0.5   0.02   0.5
            1000       0.2   0.01   0.5
            1000       0.12  0.01   0.9
            1000       0.1   0.01   0.99
            1000       0.1   0.01   0.99
            1000       0.1   0.01   0.99
          Analysis: Thickness=[100, 300, 600, 1000, 1000, 1000, 1000, 1000]; PH=[5.8, 5.7, 5.7, 5.9, 5.7, 5.7, 5.7, 5.7]; PHUnits=Water; BoronUnits=HotWater
          Sample Initial nitrogen: NO3Units=ppm; NH4Units=ppm; SWUnits=Volumetric; OCUnits=Total; PHUnits=Water
            Thickness  NO3   NH4
            100        0.1   0.01
            300        0.1   0.01
            600        0.1   0.01
            1000       0.01  0.01
            1000       0.01  0.01
            1000       0.01  0.01
            1000       0.01  0.01
            1000       0.01  0.01
          CERESSoilTemperature
        Irrigation
        Fertiliser
        SurfaceOrganicMatter: InitialResidueName=Wheat; InitialResidueType=Wheat; InitialResidueMass=2000; InitialStandingFraction=0; InitialCPR=0; InitialCNR=80; FractionFaecesAdded=0.5
        Plant Eucalyptus: CropType=Eucalyptus
        Plant SCRUM: CropType=SCRUM
        Manager Sow Weeds
          StartDate = 1-jun
          EndDate = 10-sep
          MinESW = 100
          MinRain = 25
          RainDays = 7
          CultivarName = Barley_Autumn
          SowingDepth = 10
          RowSpacing = 150
          Population = 1
```csharp
using System;
using Models.Core;
using Models.PMF;
using Models.Soils;
using Models.Utilities;
using APSIM.Shared.Utilities;

namespace Models
{
    [Serializable]
    public class Script : Model
    {
        [Link] Clock Clock;
        [Link] Fertiliser Fertiliser;
        [Link] Summary Summary;
        [Link] Soil Soil;
        Accumulator accumulatedRain;
        [Link] Plant SCRUM;        

        [Description("Start of sowing window (d-mmm)")]
        public string StartDate { get; set; }
        [Description("End of sowing window (d-mmm)")]
        public string EndDate { get; set; }
        [Description("Minimum extractable soil water for sowing (mm)")]
        public double MinESW { get; set; }
        [Description("Accumulated rainfall required for sowing (mm)")]
        public double MinRain { get; set; }
        [Description("Duration of rainfall accumulation (d)")]
        public int RainDays { get; set; }
    [Display(Type=DisplayType.CultivarName)]
        [Description("Cultivar to be sown")]
        public string CultivarName { get; set; }
        [Description("Sowing depth (mm)")]
        public double SowingDepth { get; set; }
        [Description("Row spacing (mm)")]
        public double RowSpacing { get; set; }
        [Description("Plant population (/m2)")]
        public double Population { get; set; }
        
        
        [EventSubscribe("Commencing")]
        private void OnSimulationCommencing(object sender, EventArgs e)
        {
            accumulatedRain = new Accumulator(this, "[Weather].Rain", RainDays);
        }
        

        [EventSubscribe("DoManagement")]
        private void OnDoManagement(object sender, EventArgs e)
        {
            accumulatedRain.Update();
            
            if (DateUtilities.WithinDates(StartDate, Clock.Today, EndDate) &&
                !SCRUM.IsAlive &&
                MathUtilities.Sum(Soil.SoilWater.ESW) > MinESW &&
                accumulatedRain.Sum > MinRain)
            {
                SCRUM.Sow(population: Population, cultivar: CultivarName, depth: SowingDepth, rowSpacing: RowSpacing);    
            }
        
        }
        
    }
}
```
        Report: EventNames=[Clock].DoReport
          VariableNames:
            [Clock].Today
            [Eucalyptus].Age.Value()
            [Eucalyptus].AboveGround.Wt
            [Eucalyptus].BelowGround.Wt
            [Eucalyptus].Total.Wt
            [Eucalyptus].Stem.Wt
            [Eucalyptus].FineRoot.Wt
            [Eucalyptus].CoarseRoot.Wt
            [Eucalyptus].Total.N
            [Eucalyptus].Branch.Wt
            [Eucalyptus].Wood.Wt
            [Eucalyptus].Leaf.Transpiration
            [Eucalyptus].Leaf.CoverGreen
            [Eucalyptus].Leaf.LAI
            [Eucalyptus].Stem.DBH.Value()
            [Eucalyptus].Stem.Ht.Value()
            [Eucalyptus].RootShootRatio.Value()
        SoluteManager
        Manager TreeSowingRule
          RowSpace = 3
          RowWidth = 3
          CultivarName = grandisCoffsHarbour
          SowingDate = 1991-07-01
```csharp
using System;
using Models.Core;
using Models.PMF;
namespace Models
{
    [Serializable] 
    [System.Xml.Serialization.XmlInclude(typeof(Model))]
    public class Script : Model
    {
        [Link] Plant Plant;
        [Link] Clock Clock;

        [Description("Spacing (m) between plants within rows")]
        public double RowSpace { get; set; }
        [Description("Spacing (m) between rows")]
        public double RowWidth { get; set; }

        [Description("Cultivar")]
        [Display(Type=DisplayType.CultivarName)]
        public string CultivarName { get; set; }
        [Description("Sowing Date")]
        public DateTime SowingDate { get; set; }

        [EventSubscribe("DoManagement")]
        private void OnDoManagement(object sender, EventArgs e)
        {
            double PlantPopulation = 1 / (RowWidth * RowSpace);

            if (Clock.Today.Date == SowingDate)
                Plant.Sow(population: PlantPopulation, 
                    cultivar: CultivarName, 
                    depth: 100, 
                    rowSpacing: 150);
            //Plant.Sow(... Contains the following arguements:
            //Population  double  Required  Seeds sowing/m2
            //Cultivar    string  Required  "NameOfCultivar"
            //Depth       double  Optional  Depth (mm) seed sown.   Default is 100mm 
            //MaxCover    double  Optional  Proportion (0-1) of the ground row crop will cover.   Default is 1.0
            //BudNumber   double  Optional  Number of mainstems per seed sown.  Default is 1.0
            //RowSpacing  double  Optional  Spaceing (mm) between drill rows when crop is sown.  Default is 150mm
            //CropClass   string  Optional  Crop class to instantiate when crop is sown.  Default is "Plant"
        }
    }
}
```
        Manager AutoFertigate
          FASW = 0
          WaterDeficit = 0
          AutoIrrigationOn = True
          FASWThreshold = 0.5
          FASWDepth = 600
          NConc = 4
```csharp
using System;
using Models.Core;
using System.Collections.Generic;
using System.Text;
using Models.Soils;
using Models.PMF;
using Models;
using System.Xml.Serialization;
using APSIM.Shared.Utilities;

namespace Models
{
    [Serializable] 
    public class Script : Model
    {
        public double FASW { get; set; }
        public double WaterDeficit  { get; set; }
    
        [Link] Plant Chickpea;
        [Link] Zone zone;
        [Link] Irrigation irrigation;
        [Link] Fertiliser fertiliser;
        [Link] Soil soil;
        
        [Description("Auto irrigation on?")]
        public bool AutoIrrigationOn { get; set; }
        
        [Description("Threshold fraction available water (0-1)")]
        public double FASWThreshold { get; set; }

        [Description("Soil depth (mm) to which fraction available water is calculated")]
        public double FASWDepth { get; set; }

        [Description("N Concentration in irrigation water (ppm)")]
        public double NConc { get; set; }

        [EventSubscribe("DoManagement")]
        private void OnDoManagement(object sender, EventArgs e)
        {
            CalculateFASW();
            if (AutoIrrigationOn)
            {
                if (FASW < FASWThreshold)
                {
                    double amount = WaterDeficit * 10000.0 * NConc/1000000.0;
                    irrigation.Apply(WaterDeficit, depth: 0);
                    fertiliser.Apply(Amount: amount, Type: Fertiliser.Types.NO3N);
                }
            }
        }
        
        private void CalculateFASW()
        {
            double[] LL15 = MathUtilities.Multiply(soil.LL15, soil.Thickness);
            double[] DUL = MathUtilities.Multiply(soil.DUL, soil.Thickness);
        
            int nlayr = GetLayerIndex();
            double cumdep = MathUtilities.Sum(soil.Thickness, 0, nlayr, 0.0);

            double excess_fr = MathUtilities.Divide((cumdep - FASWDepth), soil.Thickness[nlayr], 0.0);

            // note that results may be strange if swdep < ll15
            double avail_sw = (MathUtilities.Sum(soil.Water, 0, nlayr, 0.0)
                              - excess_fr * soil.Water[nlayr])
                              - (MathUtilities.Sum(LL15, 0, nlayr, 0.0)
                              - excess_fr * LL15[nlayr]);


            double pot_avail_sw = (MathUtilities.Sum(DUL, 0, nlayr, 0.0)
                                  - excess_fr * DUL[nlayr])
                                  - (MathUtilities.Sum(LL15, 0, nlayr, 0.0)
                                  - excess_fr * LL15[nlayr]);

            FASW = MathUtilities.Divide(avail_sw, pot_avail_sw, 0.0);
            WaterDeficit = MathUtilities.Constrain(pot_avail_sw - avail_sw, 0.0, 100000);
        }

        private int GetLayerIndex()
        {
            double[] cumThickness = Soil.ToCumThickness(soil.Thickness);
            for (int i = 1; i < cumThickness.Length; i++)
            {
                if (FASWDepth < cumThickness[i])
                    return i - 1;
            }
            
            return cumThickness.Length - 1;
        }

    }
}
```
  Folder EucalyptusRotationExample
    Memo
      This hypothetical experiment was effluent-irrigated _E. grandis,_ and weedy.
    Simulation EucalyptusRotationExample
      Weather: FileName=Karama RMA.met
      Clock: StartDate=1983-07-01; EndDate=2015-06-30
      Summary
      SoilArbitrator Soil Arbitrator
      Zone Plantation: Area=1; Slope=0
        Soil: Latitude=0; Longitude=0
          InitialWater Initial water: PercentMethod=EvenlyDistributed; FractionFull=0.9
          Water
            Thickness  BD    AirDry  LL15  DUL   SAT
            100        1.5   0.01    0.05  0.16  0.29
            300        1.6   0.01    0.05  0.15  0.29
            600        1.68  0.01    0.05  0.14  0.29
            1000       1.75  0.02    0.05  0.13  0.29
            1000       1.7   0.05    0.05  0.12  0.29
            1000       1.7   0.05    0.05  0.12  0.29
            1000       1.7   0.05    0.05  0.12  0.29
            1000       1.7   0.05    0.05  0.12  0.29
            SoilCrop EucalyptusSoil: LL=[0.05, 0.05, 0.05, 0.05, 0.05, 0.05, 0.05, 0.05]; KL=[0.07, 0.07, 0.05, 0.02, 0.02, 0.02, 0.01, 0.01]; XF=[1, 1, 1, 1, 0.3, 0.2, 0.2, 0.2]
            SoilCrop SCRUMSoil: LL=[0.05, 0.05, 0.05, 0.05, 0.05, 0.05, 0.05, 0.05]; KL=[0.07, 0.07, 0.05, 0.02, 0.02, 0.02, 0.01, 0.01]; XF=[1, 1, 1, 0.7, 0.3, 0.2, 0, 0]
          SoilWater: same as EucalyptusExample.EucalyptusExample.Plantation.Soil.SoilWater
          SoilNitrogen: fom_type=[default, manure, mucuna, lablab, shemp, stable]; fract_carb=[0.2, 0.3, 0.54, 0.57, 0.45, 0]; fract_cell=[0.7, 0.3, 0.37, 0.37, 0.47, 0.1]; fract_lign=[0.1, 0.4, 0.09, 0.06, 0.08, 0.9]
          SoilOrganicMatter: same as EucalyptusExample.EucalyptusExample.Plantation.Soil.SoilOrganicMatter
          Analysis: Thickness=[100, 300, 600, 1000, 1000, 1000, 1000, 1000]; PH=[5.8, 5.7, 5.7, 5.9, 5.7, 5.7, 5.7, 5.7]; PHUnits=Water; BoronUnits=HotWater
          Sample Initial nitrogen: NO3Units=ppm; NH4Units=ppm; SWUnits=Volumetric; OCUnits=Total; PHUnits=Water
            Thickness  NO3   NH4
            100        0.1   0.01
            300        0.1   0.01
            600        0.1   0.01
            1000       0.01  0.01
            1000       0.01  0.01
            1000       0.01  0.01
            1000       0.01  0.01
            1000       0.01  0.01
          CERESSoilTemperature
        SoluteManager
        Irrigation
        Fertiliser
        SurfaceOrganicMatter: InitialResidueName=Wheat; InitialResidueType=Wheat; InitialResidueMass=2000; InitialStandingFraction=0; InitialCPR=0; InitialCNR=80; FractionFaecesAdded=0.5
        MicroClimate: a_interception=0; b_interception=1; c_interception=0; d_interception=0; soil_albedo=0.13; SoilHeatFluxFraction=0.4; NightInterceptionFraction=0.5; ReferenceHeight=2
        Plant Eucalyptus: CropType=Eucalyptus
        Plant SCRUM: CropType=SCRUM
        Manager TreeManagement
          TimeSincePlanting = 0
          RowSpace = 3
          RowWidth = 3
          CultivarName = grandisCoffsHarbour
          PlantingDate = 1-aug
          HarvestAge = 9.5
          FertAmount = 100
```csharp
using System;
using Models.Core;
using Models.PMF;
using APSIM.Shared.Utilities;

namespace Models
{
    [Serializable] 
    [System.Xml.Serialization.XmlInclude(typeof(Model))]
    public class Script : Model
    {
        [Link] Plant Plant;
        [Link] Clock Clock;
        [Link] Fertiliser Fertiliser;

        public double TimeSincePlanting {get; set;}

        [Description("Spacing (m) between plants within rows")]
        public double RowSpace { get; set; }

        [Description("Spacing (m) between rows")]
        public double RowWidth { get; set; }

        [Description("Cultivar")]
        [Display(Type=DisplayType.CultivarName)]
        public string CultivarName { get; set; }

        [Description("Planting Date (dd-mmm)")]
        public String PlantingDate { get; set; }

        [Description("Harvest Age (years)")]
        public double HarvestAge { get; set; }

        [Description("Amount of fertiliser N to be applied at planting (kg N/ha)")]
        public double FertAmount { get; set; }

        [EventSubscribe("DoManagement")]
        private void OnDoManagement(object sender, EventArgs e)
        {
            double PlantPopulation = 1 / (RowWidth * RowSpace);
            double RowWidthmm = RowWidth * 1000;

            if (DateUtilities.WithinDates(PlantingDate, Clock.Today, PlantingDate) && !Plant.IsAlive)
            {
                Plant.Sow(population: PlantPopulation, 
                    cultivar: CultivarName, 
                    depth: 100, 
                    rowSpacing: RowWidthmm);
                TimeSincePlanting = 0;
                Fertiliser.Apply(Amount: FertAmount, Type: Fertiliser.Types.NO3N);
            }

            if (TimeSincePlanting > HarvestAge && Plant.IsAlive)
            {
               Plant.Harvest();
               Plant.EndCrop();         
               TimeSincePlanting = 0;  
            }

            TimeSincePlanting += 1.0/365.0;
        }
    }
}
```
        Manager Sow weeds
          Crop = .Simulations.EucalyptusRotationExample.EucalyptusRotationExample.Plantation.SCRUM
          StartDate = 1-jun
          EndDate = 10-sep
          MinESW = 100
          MinRain = 25
          RainDays = 7
          CultivarName = Barley_Autumn
          SowingDepth = 10
          RowSpacing = 150
          Population = 1
```csharp
using System;
using Models.Core;
using Models.PMF;
using Models.Soils;
using Models.Utilities;
using APSIM.Shared.Utilities;

namespace Models
{
    [Serializable]
    public class Script : Model
    {
        [Link] Clock Clock;
        [Link] Fertiliser Fertiliser;
        [Link] Summary Summary;
        [Link] Soil Soil;
        [Link] Plant SCRUM;
        Accumulator accumulatedRain;
        
        [Description("Crop")]
        public IPlant Crop { get; set; }
        [Description("Start of sowing window (d-mmm)")]
        public string StartDate { get; set; }
        [Description("End of sowing window (d-mmm)")]
        public string EndDate { get; set; }
        [Description("Minimum extractable soil water for sowing (mm)")]
        public double MinESW { get; set; }
        [Description("Accumulated rainfall required for sowing (mm)")]
        public double MinRain { get; set; }
        [Description("Duration of rainfall accumulation (d)")]
        public int RainDays { get; set; }
    [Display(Type=DisplayType.CultivarName)]
        [Description("Cultivar to be sown")]
        public string CultivarName { get; set; }
        [Description("Sowing depth (mm)")]
        public double SowingDepth { get; set; }
        [Description("Row spacing (mm)")]
        public double RowSpacing { get; set; }
        [Description("Plant population (/m2)")]
        public double Population { get; set; }
        
        
        [EventSubscribe("Commencing")]
        private void OnSimulationCommencing(object sender, EventArgs e)
        {
            accumulatedRain = new Accumulator(this, "[Weather].Rain", RainDays);
        }
        

        [EventSubscribe("DoManagement")]
        private void OnDoManagement(object sender, EventArgs e)
        {
            accumulatedRain.Update();
            
            if (DateUtilities.WithinDates(StartDate, Clock.Today, EndDate) &&
                !SCRUM.IsAlive &&
                MathUtilities.Sum(Soil.SoilWater.ESW) > MinESW &&
                accumulatedRain.Sum > MinRain)
            {
                Crop.Sow(population: Population, cultivar: CultivarName, depth: SowingDepth, rowSpacing: RowSpacing);    
            }
        
        }
        
    }
}
```
        Report: EventNames=[Clock].DoReport
          VariableNames:
            [Clock].Today
            [TreeManagement].Script.TimeSincePlanting
            [Eucalyptus].Age.Value()
            [Eucalyptus].AboveGround.Wt
            [Eucalyptus].BelowGround.Wt
            [Eucalyptus].Total.Wt
            [Eucalyptus].Stem.Wt
            [Eucalyptus].FineRoot.Wt
            [Eucalyptus].CoarseRoot.Wt
            [Eucalyptus].Total.N
            [Eucalyptus].Branch.Wt
            [Eucalyptus].Wood.Wt
            [Eucalyptus].Leaf.Transpiration
            [Eucalyptus].Leaf.CoverGreen
            [Eucalyptus].Leaf.LAI
            [Eucalyptus].Stem.DBH.Value()
            [Eucalyptus].Stem.Ht.Value()
            [Eucalyptus].RootShootRatio.Value()
        Manager Fertilise at tree planting
          Crop = .Simulations.EucalyptusRotationExample.EucalyptusRotationExample.Plantation.Eucalyptus
          Amount = 1000
```csharp
using System;
using Models.Core;
using Models.PMF;
namespace Models
{
    [Serializable]
    public class Script : Model
    {
        [Link] Clock Clock;
        [Link] Fertiliser Fertiliser;
        
        [Description("Crop to be fertilised")]
        public IPlant Crop { get; set; }
    
        [Description("Amount of fertiliser N to be applied (kg N/ha)")]
        public double Amount { get; set; }
        
        [EventSubscribe("Sowing")]
        private void OnSowing(object sender, EventArgs e)
        {
            Model crop = sender as Model;
            if (Crop != null && crop.Name.ToLower() == (Crop as IModel).Name.ToLower())
                Fertiliser.Apply(Amount: Amount, Type: Fertiliser.Types.NO3N);
        }
        
    }
}
```
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