Simulations: Version=47
  Memo TitlePage
    # The APSIM Eucalyptus Model

    Philip J. Smethurst, Neil I. Huth and Rafael V. Valadares
  Memo Introduction
    # Eucalyptus Model Notes

    ## Plant Modelling Framework

    The APSIM Eucalyptus model has been developed using the Plant Modelling Framework (PMF) of [brown_plant_2014] within  APSIM Next Generation [holzworth_apsim_2014]. This new framework provides a library of plant organ and process submodels that can be coupled, at runtime, to construct a model in much the same way that models can be coupled to construct a simulation. This means that dynamic composition of lower level processes and organ classes (e.g. photosynthesis, leaf) into larger constructions (e.g. maize, wheat, eucalyptus) can be achieved by the model developer without additional coding.

    ##Pecularities of Eucalyptus and This Model

    The Eucalyptus model consists of:

    * a phenology model to simulate development through sequential growth phases
    * a collection of organs to simulate the various plant parts
    * an arbitrator to allocate resources (N, biomass) to the various plant organs

    This work builds upon earlier APSIM forest models such as described by [Huthetal2002],[zerger_integrating_2001] and [huth_managing_2008].

    Eucalyptus is a reasonably straight forward perennial crop to model. This model has been set up for simulation of even-aged plantations (transplanted seedlings) or native forests (also assumed to start the simulation as a transplanted seedling, but in practice it would be sown from naturally distributed seed). Plants grow in accordance with available resources and conditions, which in this version of the model are temperature, radiation, available soil water, and available soil nitrogen. Leaf, branch and roots senesce, remain attached for some time, then detach to produce litter. Above-ground biomass is the main target of production, which is made up of organs that develop from default partitioniing targets that is modified daily due to organ demand. Forest managers also deal with tree size, which are set in the model as a function of aboveground biomass. During model development, we found that Eucalyptus model performance (plant or stand development) was particularly sensitive to leaf lifespan/longevity, specific leaf area, dead leaf detachment, partitioning to roots and shoots, mortality and thinning, and weeds (if present).

    There are many Eucalyptus genotypes (species, closely related genera, provenances, families, clones, and hybrids) that can behave differently in response to their growing environment. This build of the Eucalyptus model was calbirated on datasets of three species (E. globulus, E. saligna, E. grandis), one hybrid (E. grandis x E. urophylla), and two clones of this hybrid.

    ##Including a Eucalyptus crop in an APSIM simulation

    There is a Eucalyptus example simulation available by clicking the "Open an Example" icon available on the second tab displayed when APSIM Next Gen is opened.  This provides a useful demonstration of how to simulate a Eucalyptus crop and provides some useful graphs for viewing model behaviour and performance.

    To incluce a Eucalyptus crop in a simulation the "Eucalyptus" model needs to be added to the paddock, field or zone in which it is to be grown.  This can be done by (a) right clicking on the "Paddock", selecting "Add" from the drop down menu and then selecting "Eucalyptus" from the list that comes up, or (b) dragging or copying and pasting the model up from the standard toolbox.  A TreeSowingRule needs to be set up to start the crop off. So far, no harvesting or replanting is included in this simulation, but that option will be needed in the future, e.g. for simulation of multiple rotations.

    This document elsewhere provides a more detailed description of the model, describes the validation and test datasets, and model performance.
  Replacements
    Report: EventNames=[Clock].DoReport
      VariableNames:
        [Clock].Today
        [Eucalyptus].Age.Value()
        [Eucalyptus].AboveGround.Wt
        [Eucalyptus].BelowGround.Wt
        [Eucalyptus].Leaf.Dead.Wt
        [Eucalyptus].Leaf.Live.Wt
        [Eucalyptus].Branch.Live.Wt
        [Eucalyptus].Leaf.Detached.Wt
        [Eucalyptus].Stem.Live.Wt
        [Eucalyptus].Total.N
        [Eucalyptus].Leaf.Live.N
        [Eucalyptus].Wood.Wt
        [Eucalyptus].Leaf.CoverGreen
        [Eucalyptus].Leaf.LAI
        [Eucalyptus].Leaf.Fn
        [Eucalyptus].Leaf.Fw
        [Eucalyptus].Leaf.Photosynthesis.FT.Value()
        [Eucalyptus].Leaf.Photosynthesis.FVPD.Value()
        [Eucalyptus].Leaf.Photosynthesis.RueAct
        [Eucalyptus].TotalLive.Wt
        [Eucalyptus].IndividualTreeLiveWt.Value()
        [Eucalyptus].IndividualTreeStemWt.Value()
        [Eucalyptus].Stem.DBH.Value()
        [Eucalyptus].Stem.Ht.Value()
        [Eucalyptus].RootShootRatio.Value()
        [Eucalyptus].Stem.Vol.Value()
        [Eucalyptus].Stem.MAI.Value()
        [SCRUM].Stover.LAI
        [SCRUM].Stover.Wt
    Report SensibilityReport: EventNames=[Clock].EndOfWeek
      VariableNames:
        [Clock].Today
        [Eucalyptus].Leaf.CoverGreen
        [Eucalyptus].Age.Value()
        [Eucalyptus].Stem.DBH.Value()
        [Eucalyptus].Stem.Ht.Value()
        [Eucalyptus].Stem.Vol.Value()
        [Eucalyptus].Stem.MAI.Value()
  DataStore
    Input: ErrorMessage=The specified file does not exist.; FileName=EucalyptusValidationData.txt
    ExcelInput Observed: FileName=Observed.xlsx; SheetNames=[Observed]
    PredictedObserved: PredictedTableName=Report; ObservedTableName=Observed; FieldNameUsedForMatch=Clock.Today
  Folder Validation
    Memo ValidationIntro
      Validation datasets have been included to assist with validation during model development. Validation datasets cover a range of environmental (soil and climate) conditions, management options (populations, nitrogen rates, irrigation) and genetic backgrounds (different regions, provenence, clones).  These datasets have been grouped and ordered in this simulation by country, and alphebetically within country.  Graphs of model performance are provided for biomass production and canopy development. Where a dataset did not include aboveground biomass, but instead a related parameter like stem volume or biomass, the latter was converted to aboveground biomass by a regression based on the rest of the validation dataset.

      Observed data are shown compared to predictions.
    Memo Genotype note
      This genotype specification was used to specifiy partitioning to roots and shoots for the C15 clone used by the Aracruz company (then Fibria, and now Suzano), in order to approximate the root:shoot ratios reported in [almeida].
    Memo
      This map shows the location of all datasets.
    Folder Combined Validation
      Memo
        These observed versus predicted graphs include all validation datasets and timesteps within a site for which observed data were available.
    Folder Australia
      Folder CoffsHarbour
        Memo
          Data are from [turner1986organic]. The research is also reported in [byrne1989above], and [bradstock1981biomass]. These data are from a chronosequence of approximately even-aged stands of native forests of _E grandis,_ and include the oldest stands simulated so far by the APSIM Eucalyptus model. They are the only native forest data in this set of simulations; all other simulations are of plantations.
        Simulation CoffsHarbour
          Weather: FileName=coffs.met
          Clock: StartDate=1953-04-01; EndDate=1983-12-31
          Summary
          SoilArbitrator Soil Arbitrator
          Zone Plantation: Area=1; Slope=0
            Soil: Latitude=0; Longitude=0
              InitialWater Initial water: PercentMethod=1; FractionFull=0.8
              Water
                Thickness  BD    AirDry  LL15  DUL   SAT
                100        1.5   0.01    0.05  0.16  0.29
                300        1.6   0.01    0.05  0.15  0.29
                600        1.68  0.01    0.05  0.14  0.29
                1000       1.75  0.02    0.05  0.13  0.29
                1000       1.7   0.05    0.05  0.12  0.29
                1000       1.7   0.05    0.05  0.12  0.29
                1000       1.7   0.05    0.05  0.12  0.29
                1000       1.7   0.05    0.05  0.12  0.29
                SoilCrop EucalyptusSoil: LL=[0.01, 0.01, 0.01, 0.01, 0.01, 0.01, 0.01, 0.01]; KL=[0.07, 0.07, 0.05, 0.02, 0.02, 0.02, 0.01, 0.01]; XF=[1, 1, 1, 1, 1, 1, 1, 1]
              SoilWater: SummerDate=1-Nov; SummerU=4; SummerCona=3.5; WinterDate=1-Apr; WinterU=4; WinterCona=3.5; DiffusConst=88; DiffusSlope=35.4; Salb=0.13; CN2Bare=65; CNRed=20; CNCov=0.8; slope=0; discharge_width=0; catchment_area=0; max_pond=0; ResidueInterception=0
                Thickness  SWCON  KLAT
                100        0.9    0
                300        0.9    0
                600        0.9    0
                1000       0.6    0
                1000       0.6    0
                1000       0.6    0
                1000       0.6    0
                1000       0.6    0
              SoilNitrogen: fom_types=[default, manure, mucuna, lablab, shemp, stable]; fract_carb=[0.2, 0.3, 0.54, 0.57, 0.45, 0]; fract_cell=[0.7, 0.3, 0.37, 0.37, 0.47, 0.1]; fract_lign=[0.1, 0.4, 0.09, 0.06, 0.08, 0.9]
              SoilOrganicMatter: RootCN=60; RootWt=1; SoilCN=14.5; EnrACoeff=7.4; EnrBCoeff=0.2; OCUnits=Total
                Thickness  OC    FBiom  FInert
                100        2     0.02   0.5
                300        1     0.02   0.5
                600        0.5   0.01   0.85
                1000       0.2   0.01   0.5
                1000       0.12  0.01   0.9
                1000       0.1   0.01   0.99
                1000       0.1   0.01   0.99
                1000       0.1   0.01   0.99
              Analysis: Thickness=[100, 300, 600, 1000, 1000, 1000, 1000, 1000]; PH=[5.8, 5.7, 5.7, 5.9, 5.7, 5.7, 5.7, 5.7]; PHUnits=Water; BoronUnits=0
              Sample Initial nitrogen: NO3Units=ppm; NH4Units=ppm; SWUnits=Volumetric; OCUnits=Total; PHUnits=Water
                Thickness  NO3   NH4
                100        0.1   0.01
                300        0.1   0.01
                600        0.1   0.01
                1000       0.01  0.01
                1000       0.01  0.01
                1000       0.01  0.01
                1000       0.01  0.01
                1000       0.01  0.01
              CERESSoilTemperature
            Irrigation
            Fertiliser
            SurfaceOrganicMatter: InitialResidueName=Wheat; InitialResidueType=Wheat; InitialResidueMass=2000; InitialStandingFraction=0; InitialCPR=0; InitialCNR=80; FractionFaecesAdded=0.5
            MicroClimate: a_interception=0; b_interception=1; c_interception=0; d_interception=0; soil_albedo=0.13; SoilHeatFluxFraction=0; NightInterceptionFraction=0; ReferenceHeight=0
            Plant Eucalyptus: CropType=Eucalyptus
            Manager TreeTransplantRule
              RowSpace = 3
              RowWidth = 3
              CultivarName = grandisCoffsHarbour
              SowingDate = 1953-04-01
```csharp
using System;
using Models.Core;
using Models.PMF;
namespace Models
{
    [Serializable] 
    [System.Xml.Serialization.XmlInclude(typeof(Model))]
    public class Script : Model
    {
        [Link] Plant Plant;
        [Link] Clock Clock;

        [Description("Spacing (m) between plants within rows")]
        public double RowSpace { get; set; }
        [Description("Spacing (m) between rows")]
        public double RowWidth { get; set; }

        [Description("Cultivar")]
        [Display(Type=DisplayType.CultivarName)]
        public string CultivarName { get; set; }
        [Description("Sowing Date")]
        public DateTime SowingDate { get; set; }

        [EventSubscribe("DoManagement")]
        private void OnDoManagement(object sender, EventArgs e)
        {
            double PlantPopulation = 1 / (RowWidth * RowSpace);

            if (Clock.Today.Date == SowingDate)
                Plant.Sow(population: PlantPopulation, 
                    cultivar: CultivarName, 
                    depth: 100, 
                    rowSpacing: 150);
            //Plant.Sow(... Contains the following arguements:
            //Population  double  Required  Seeds sowing/m2
            //Cultivar    string  Required  "NameOfCultivar"
            //Depth       double  Optional  Depth (mm) seed sown.   Default is 100mm 
            //MaxCover    double  Optional  Proportion (0-1) of the ground row crop will cover.   Default is 1.0
            //BudNumber   double  Optional  Number of mainstems per seed sown.  Default is 1.0
            //RowSpacing  double  Optional  Spaceing (mm) between drill rows when crop is sown.  Default is 150mm
            //CropClass   string  Optional  Crop class to instantiate when crop is sown.  Default is "Plant"
        }
    }
}
```
            Report: VariableNames=[Clock].Today; EventNames=[Clock].DoReport
            SoluteManager
      Folder Gympie
        Memo
          This experiment is described in [cromer1993response] and [cromer1993responseN]. Some soil input data are from [ross1991soils]. Experimental treatments were factorial combinations of two levels each of irrigation and fertilisation applied to _E. grandis._ Most growth response was to fertiliser, which included NPK, but only N is simulated, which assumes that other nutrients were present at adequate levels.
        Experiment Gympie
          Factors
            Factor Treatment: Specifications=[Operations]
              Operations C
              Operations I
                1987-02-08  [Irrigation].Apply(amount: 2.2533);
                1987-02-15  [Irrigation].Apply(amount: 2.2533);
                1987-02-22  [Irrigation].Apply(amount: 2.2533);
                1987-03-01  [Irrigation].Apply(amount: 2.2533);
                1987-03-08  [Irrigation].Apply(amount: 25.5633);
                1987-03-15  [Irrigation].Apply(amount: 25.5633);
                1987-03-22  [Irrigation].Apply(amount: 25.5633);
                1987-03-29  [Irrigation].Apply(amount: 25.5633);
                1987-04-08  [Irrigation].Apply(amount: 21.5229);
                1987-04-15  [Irrigation].Apply(amount: 21.5229);
                1987-04-22  [Irrigation].Apply(amount: 21.5229);
                1987-04-29  [Irrigation].Apply(amount: 21.5229);
                1987-05-08  [Irrigation].Apply(amount: 13.6752);
                1987-05-15  [Irrigation].Apply(amount: 13.6752);
                1987-05-22  [Irrigation].Apply(amount: 13.6752);
                1987-05-29  [Irrigation].Apply(amount: 13.6752);
                1987-06-08  [Irrigation].Apply(amount: 0);
                1987-06-15  [Irrigation].Apply(amount: 0);
                1987-06-22  [Irrigation].Apply(amount: 0);
                1987-06-29  [Irrigation].Apply(amount: 0);
                1987-07-08  [Irrigation].Apply(amount: 17.6379);
                1987-07-15  [Irrigation].Apply(amount: 17.6379);
                1987-07-22  [Irrigation].Apply(amount: 17.6379);
                1987-07-29  [Irrigation].Apply(amount: 17.6379);
                1987-08-08  [Irrigation].Apply(amount: 7.77);
                1987-08-15  [Irrigation].Apply(amount: 7.77);
                1987-08-22  [Irrigation].Apply(amount: 7.77);
                1987-08-29  [Irrigation].Apply(amount: 7.77);
                1987-09-08  [Irrigation].Apply(amount: 16.58895);
                1987-09-15  [Irrigation].Apply(amount: 16.58895);
                1987-09-22  [Irrigation].Apply(amount: 16.58895);
                1987-09-29  [Irrigation].Apply(amount: 16.58895);
                1987-10-08  [Irrigation].Apply(amount: 15.8508);
                1987-10-15  [Irrigation].Apply(amount: 15.8508);
                1987-10-22  [Irrigation].Apply(amount: 15.8508);
                1987-10-29  [Irrigation].Apply(amount: 15.8508);
                1987-11-08  [Irrigation].Apply(amount: 20.47395);
                1987-11-15  [Irrigation].Apply(amount: 20.47395);
                1987-11-22  [Irrigation].Apply(amount: 20.47395);
                1987-11-29  [Irrigation].Apply(amount: 20.47395);
                1987-12-08  [Irrigation].Apply(amount: 19.425);
                1987-12-15  [Irrigation].Apply(amount: 19.425);
                1987-12-22  [Irrigation].Apply(amount: 19.425);
                1987-12-29  [Irrigation].Apply(amount: 19.425);
                1988-01-08  [Irrigation].Apply(amount: 15.6954);
                1988-01-15  [Irrigation].Apply(amount: 15.6954);
                1988-01-22  [Irrigation].Apply(amount: 15.6954);
                1988-01-29  [Irrigation].Apply(amount: 15.6954);
                1988-02-08  [Irrigation].Apply(amount: 39.0054);
                1988-02-15  [Irrigation].Apply(amount: 39.0054);
                1988-02-22  [Irrigation].Apply(amount: 39.0054);
                1988-02-29  [Irrigation].Apply(amount: 39.0054);
                1988-03-08  [Irrigation].Apply(amount: 42.56018);
                1988-03-15  [Irrigation].Apply(amount: 42.56018);
                1988-03-22  [Irrigation].Apply(amount: 42.56018);
                1988-03-29  [Irrigation].Apply(amount: 42.56018);
                1988-04-08  [Irrigation].Apply(amount: 0);
                1988-04-15  [Irrigation].Apply(amount: 0);
                1988-04-22  [Irrigation].Apply(amount: 0);
                1988-04-29  [Irrigation].Apply(amount: 0);
                1988-05-08  [Irrigation].Apply(amount: 0);
                1988-05-15  [Irrigation].Apply(amount: 0);
                1988-05-22  [Irrigation].Apply(amount: 0);
                1988-05-29  [Irrigation].Apply(amount: 0);
                1988-06-08  [Irrigation].Apply(amount: 0);
                1988-06-15  [Irrigation].Apply(amount: 0);
                1988-06-22  [Irrigation].Apply(amount: 0);
                1988-06-29  [Irrigation].Apply(amount: 0);
                1988-07-08  [Irrigation].Apply(amount: 0);
                1988-07-15  [Irrigation].Apply(amount: 0);
                1988-07-22  [Irrigation].Apply(amount: 0);
                1988-07-29  [Irrigation].Apply(amount: 0);
                1988-08-08  [Irrigation].Apply(amount: 7.77);
                1988-08-15  [Irrigation].Apply(amount: 7.77);
                1988-08-22  [Irrigation].Apply(amount: 7.77);
                1988-08-29  [Irrigation].Apply(amount: 7.77);
                1988-09-08  [Irrigation].Apply(amount: 9.965025);
                1988-09-15  [Irrigation].Apply(amount: 9.965025);
                1988-09-22  [Irrigation].Apply(amount: 9.965025);
                1988-09-29  [Irrigation].Apply(amount: 9.965025);
                1988-10-08  [Irrigation].Apply(amount: 40.404);
                1988-10-15  [Irrigation].Apply(amount: 40.404);
                1988-10-22  [Irrigation].Apply(amount: 40.404);
                1988-10-29  [Irrigation].Apply(amount: 40.404);
                1988-11-08  [Irrigation].Apply(amount: 49.55318);
                1988-11-15  [Irrigation].Apply(amount: 49.55318);
                1988-11-22  [Irrigation].Apply(amount: 49.55318);
                1988-11-29  [Irrigation].Apply(amount: 49.55318);
                1988-12-08  [Irrigation].Apply(amount: 12.91763);
                1988-12-15  [Irrigation].Apply(amount: 12.91763);
                1988-12-22  [Irrigation].Apply(amount: 12.91763);
                1988-12-29  [Irrigation].Apply(amount: 12.91763);
                1989-01-08  [Irrigation].Apply(amount: 11.8881);
                1989-01-15  [Irrigation].Apply(amount: 11.8881);
                1989-01-22  [Irrigation].Apply(amount: 11.8881);
                1989-01-29  [Irrigation].Apply(amount: 11.8881);
                1989-02-08  [Irrigation].Apply(amount: 15.9285);
                1989-02-15  [Irrigation].Apply(amount: 15.9285);
                1989-02-22  [Irrigation].Apply(amount: 15.9285);
                1989-03-01  [Irrigation].Apply(amount: 15.9285);
                1989-03-08  [Irrigation].Apply(amount: 23.7762);
                1989-03-15  [Irrigation].Apply(amount: 23.7762);
                1989-03-22  [Irrigation].Apply(amount: 23.7762);
                1989-03-29  [Irrigation].Apply(amount: 23.7762);
                1989-04-08  [Irrigation].Apply(amount: 0);
                1989-04-15  [Irrigation].Apply(amount: 0);
                1989-04-22  [Irrigation].Apply(amount: 0);
                1989-04-29  [Irrigation].Apply(amount: 0);
                1989-05-08  [Irrigation].Apply(amount: 0);
                1989-05-15  [Irrigation].Apply(amount: 0);
                1989-05-22  [Irrigation].Apply(amount: 0);
                1989-05-29  [Irrigation].Apply(amount: 0);
                1989-06-08  [Irrigation].Apply(amount: 0);
                1989-06-15  [Irrigation].Apply(amount: 0);
                1989-06-22  [Irrigation].Apply(amount: 0);
                1989-06-29  [Irrigation].Apply(amount: 0);
                1989-07-08  [Irrigation].Apply(amount: 0.2331);
                1989-07-15  [Irrigation].Apply(amount: 0.2331);
                1989-07-22  [Irrigation].Apply(amount: 0.2331);
                1989-07-29  [Irrigation].Apply(amount: 0.2331);
                1989-08-08  [Irrigation].Apply(amount: 12.91763);
                1989-08-15  [Irrigation].Apply(amount: 12.91763);
                1989-08-22  [Irrigation].Apply(amount: 12.91763);
                1989-08-29  [Irrigation].Apply(amount: 12.91763);
                1989-09-08  [Irrigation].Apply(amount: 51.70935);
                1989-09-15  [Irrigation].Apply(amount: 51.70935);
                1989-09-22  [Irrigation].Apply(amount: 51.70935);
                1989-09-29  [Irrigation].Apply(amount: 51.70935);
                1989-10-08  [Irrigation].Apply(amount: 61.4607);
                1989-10-15  [Irrigation].Apply(amount: 61.4607);
                1989-10-22  [Irrigation].Apply(amount: 61.4607);
                1989-10-29  [Irrigation].Apply(amount: 61.4607);
                1989-11-08  [Irrigation].Apply(amount: 31.21598);
                1989-11-15  [Irrigation].Apply(amount: 31.21598);
                1989-11-22  [Irrigation].Apply(amount: 31.21598);
                1989-11-29  [Irrigation].Apply(amount: 31.21598);
                1989-12-08  [Irrigation].Apply(amount: 13.73348);
                1989-12-15  [Irrigation].Apply(amount: 13.73348);
                1989-12-22  [Irrigation].Apply(amount: 13.73348);
                1989-12-29  [Irrigation].Apply(amount: 13.73348);
                1990-01-08  [Irrigation].Apply(amount: 69.50265);
                1990-01-15  [Irrigation].Apply(amount: 69.50265);
                1990-01-22  [Irrigation].Apply(amount: 69.50265);
                1990-01-29  [Irrigation].Apply(amount: 69.50265);
                1990-02-08  [Irrigation].Apply(amount: 77.19495);
                1990-02-15  [Irrigation].Apply(amount: 77.19495);
                1990-02-22  [Irrigation].Apply(amount: 77.19495);
                1990-03-01  [Irrigation].Apply(amount: 77.19495);
                1990-03-08  [Irrigation].Apply(amount: 30.6915);
                1990-03-15  [Irrigation].Apply(amount: 30.6915);
                1990-03-22  [Irrigation].Apply(amount: 30.6915);
                1990-03-29  [Irrigation].Apply(amount: 30.6915);
                1990-04-08  [Irrigation].Apply(amount: 0);
                1990-04-15  [Irrigation].Apply(amount: 0);
                1990-04-22  [Irrigation].Apply(amount: 0);
                1990-04-29  [Irrigation].Apply(amount: 0);
                1990-05-08  [Irrigation].Apply(amount: 0);
                1990-05-15  [Irrigation].Apply(amount: 0);
                1990-05-22  [Irrigation].Apply(amount: 0);
                1990-05-29  [Irrigation].Apply(amount: 0);
                1990-06-08  [Irrigation].Apply(amount: 0);
                1990-06-15  [Irrigation].Apply(amount: 0);
                1990-06-22  [Irrigation].Apply(amount: 0);
                1990-06-29  [Irrigation].Apply(amount: 0);
                1990-07-08  [Irrigation].Apply(amount: 0);
                1990-07-15  [Irrigation].Apply(amount: 0);
                1990-07-22  [Irrigation].Apply(amount: 0);
                1990-07-29  [Irrigation].Apply(amount: 0);
                1990-08-08  [Irrigation].Apply(amount: 24.82515);
                1990-08-15  [Irrigation].Apply(amount: 24.82515);
                1990-08-22  [Irrigation].Apply(amount: 24.82515);
                1990-08-29  [Irrigation].Apply(amount: 24.82515);
                1990-09-08  [Irrigation].Apply(amount: 59.9844);
                1990-09-15  [Irrigation].Apply(amount: 59.9844);
                1990-09-22  [Irrigation].Apply(amount: 59.9844);
                1990-09-29  [Irrigation].Apply(amount: 59.9844);
                1990-10-08  [Irrigation].Apply(amount: 60.70313);
                1990-10-15  [Irrigation].Apply(amount: 60.70313);
                1990-10-22  [Irrigation].Apply(amount: 60.70313);
                1990-10-29  [Irrigation].Apply(amount: 60.70313);
                1990-11-08  [Irrigation].Apply(amount: 42.22995);
                1990-11-15  [Irrigation].Apply(amount: 42.22995);
                1990-11-22  [Irrigation].Apply(amount: 42.22995);
                1990-11-29  [Irrigation].Apply(amount: 42.22995);
                1990-12-08  [Irrigation].Apply(amount: 61.0722);
                1990-12-15  [Irrigation].Apply(amount: 61.0722);
                1990-12-22  [Irrigation].Apply(amount: 61.0722);
                1990-12-29  [Irrigation].Apply(amount: 61.0722);
                1991-01-08  [Irrigation].Apply(amount: 16.02563);
                1991-01-15  [Irrigation].Apply(amount: 16.02563);
                1991-01-22  [Irrigation].Apply(amount: 16.02563);
                1991-01-29  [Irrigation].Apply(amount: 16.02563);
                1991-02-08  [Irrigation].Apply(amount: 10.29525);
                1991-02-15  [Irrigation].Apply(amount: 10.29525);
                1991-02-22  [Irrigation].Apply(amount: 10.29525);
                1991-03-01  [Irrigation].Apply(amount: 10.29525);
                1991-03-08  [Irrigation].Apply(amount: 23.73735);
                1991-03-15  [Irrigation].Apply(amount: 23.73735);
                1991-03-22  [Irrigation].Apply(amount: 23.73735);
                1991-03-29  [Irrigation].Apply(amount: 23.73735);
                1991-04-08  [Irrigation].Apply(amount: 15.54);
                1991-04-15  [Irrigation].Apply(amount: 15.54);
                1991-04-22  [Irrigation].Apply(amount: 15.54);
                1991-04-29  [Irrigation].Apply(amount: 15.54);
                1991-05-08  [Irrigation].Apply(amount: 15.9285);
                1991-05-15  [Irrigation].Apply(amount: 15.9285);
                1991-05-22  [Irrigation].Apply(amount: 15.9285);
                1991-05-29  [Irrigation].Apply(amount: 15.9285);
                1991-06-08  [Irrigation].Apply(amount: 0);
                1991-06-15  [Irrigation].Apply(amount: 0);
                1991-06-22  [Irrigation].Apply(amount: 0);
                1991-06-29  [Irrigation].Apply(amount: 0);
                1991-07-08  [Irrigation].Apply(amount: 0);
                1991-07-15  [Irrigation].Apply(amount: 0);
                1991-07-22  [Irrigation].Apply(amount: 0);
                1991-07-29  [Irrigation].Apply(amount: 0);
                1991-08-08  [Irrigation].Apply(amount: 16.51125);
                1991-08-15  [Irrigation].Apply(amount: 16.51125);
                1991-08-22  [Irrigation].Apply(amount: 16.51125);
                1991-08-29  [Irrigation].Apply(amount: 16.51125);
                1991-09-08  [Irrigation].Apply(amount: 61.63553);
                1991-09-15  [Irrigation].Apply(amount: 61.63553);
                1991-09-22  [Irrigation].Apply(amount: 61.63553);
                1991-09-29  [Irrigation].Apply(amount: 61.63553);
                1991-10-08  [Irrigation].Apply(amount: 31.7016);
                1991-10-15  [Irrigation].Apply(amount: 31.7016);
                1991-10-22  [Irrigation].Apply(amount: 31.7016);
                1991-10-29  [Irrigation].Apply(amount: 31.7016);
                1991-11-08  [Irrigation].Apply(amount: 29.04038);
                1991-11-15  [Irrigation].Apply(amount: 29.04038);
                1991-11-22  [Irrigation].Apply(amount: 29.04038);
                1991-11-29  [Irrigation].Apply(amount: 29.04038);
                1991-12-08  [Irrigation].Apply(amount: 31.08);
                1991-12-15  [Irrigation].Apply(amount: 31.08);
                1991-12-22  [Irrigation].Apply(amount: 31.08);
                1991-12-29  [Irrigation].Apply(amount: 31.08);
                1992-01-08  [Irrigation].Apply(amount: 46.7754);
                1992-01-15  [Irrigation].Apply(amount: 46.7754);
                1992-01-22  [Irrigation].Apply(amount: 46.7754);
                1992-01-29  [Irrigation].Apply(amount: 46.7754);
                1992-02-08  [Irrigation].Apply(amount: 7.7);
                1992-02-15  [Irrigation].Apply(amount: 7.7);
                1992-02-22  [Irrigation].Apply(amount: 7.7);
                1992-02-29  [Irrigation].Apply(amount: 7.7);
                1992-03-08  [Irrigation].Apply(amount: 0);
                1992-03-15  [Irrigation].Apply(amount: 0);
                1992-03-22  [Irrigation].Apply(amount: 0);
                1992-03-29  [Irrigation].Apply(amount: 0);
                1992-04-08  [Irrigation].Apply(amount: 0);
                1992-04-15  [Irrigation].Apply(amount: 0);
                1992-04-22  [Irrigation].Apply(amount: 0);
                1992-04-29  [Irrigation].Apply(amount: 0);
                1992-05-08  [Irrigation].Apply(amount: 0);
                1992-05-15  [Irrigation].Apply(amount: 0);
                1992-05-22  [Irrigation].Apply(amount: 0);
                1992-05-29  [Irrigation].Apply(amount: 0);
                1992-06-08  [Irrigation].Apply(amount: 0);
                1992-06-15  [Irrigation].Apply(amount: 0);
                1992-06-22  [Irrigation].Apply(amount: 0);
                1992-06-29  [Irrigation].Apply(amount: 0);
                1992-07-08  [Irrigation].Apply(amount: 6.41);
                1992-07-15  [Irrigation].Apply(amount: 6.41);
                1992-07-22  [Irrigation].Apply(amount: 6.41);
                1992-07-29  [Irrigation].Apply(amount: 6.41);
                1992-08-08  [Irrigation].Apply(amount: 34.965);
                1992-08-15  [Irrigation].Apply(amount: 34.965);
                1992-08-22  [Irrigation].Apply(amount: 34.965);
                1992-08-29  [Irrigation].Apply(amount: 34.965);
                1992-09-08  [Irrigation].Apply(amount: 3.885);
                1992-09-15  [Irrigation].Apply(amount: 3.885);
                1992-09-22  [Irrigation].Apply(amount: 3.885);
                1992-09-29  [Irrigation].Apply(amount: 3.885);
                1992-10-08  [Irrigation].Apply(amount: 41.35583);
                1992-10-15  [Irrigation].Apply(amount: 41.35583);
                1992-10-22  [Irrigation].Apply(amount: 41.35583);
                1992-10-29  [Irrigation].Apply(amount: 41.35583);
                1992-11-08  [Irrigation].Apply(amount: 3.69075);
                1992-11-15  [Irrigation].Apply(amount: 3.69075);
                1992-11-22  [Irrigation].Apply(amount: 3.69075);
                1992-11-29  [Irrigation].Apply(amount: 3.69075);
                1992-12-08  [Irrigation].Apply(amount: 0);
                1992-12-15  [Irrigation].Apply(amount: 0);
                1992-12-22  [Irrigation].Apply(amount: 0);
                1992-12-29  [Irrigation].Apply(amount: 0);
                1993-01-08  [Irrigation].Apply(amount: 11.79098);
                1993-01-15  [Irrigation].Apply(amount: 11.79098);
                1993-01-22  [Irrigation].Apply(amount: 11.79098);
                1993-01-29  [Irrigation].Apply(amount: 11.79098);
                1993-02-08  [Irrigation].Apply(amount: 26.37915);
                1993-02-15  [Irrigation].Apply(amount: 26.37915);
                1993-02-22  [Irrigation].Apply(amount: 26.37915);
                1993-03-01  [Irrigation].Apply(amount: 26.37915);
                1993-03-08  [Irrigation].Apply(amount: 9.51825);
                1993-03-15  [Irrigation].Apply(amount: 9.51825);
                1993-03-22  [Irrigation].Apply(amount: 9.51825);
                1993-03-29  [Irrigation].Apply(amount: 9.51825);
                1993-04-08  [Irrigation].Apply(amount: 47.64953);
                1993-04-15  [Irrigation].Apply(amount: 47.64953);
                1993-04-22  [Irrigation].Apply(amount: 47.64953);
                1993-04-29  [Irrigation].Apply(amount: 47.64953);
                1993-05-08  [Irrigation].Apply(amount: 0);
                1993-05-15  [Irrigation].Apply(amount: 0);
                1993-05-22  [Irrigation].Apply(amount: 0);
                1993-05-29  [Irrigation].Apply(amount: 0);
                1993-06-08  [Irrigation].Apply(amount: 20.70705);
                1993-06-15  [Irrigation].Apply(amount: 20.70705);
                1993-06-22  [Irrigation].Apply(amount: 20.70705);
                1993-06-29  [Irrigation].Apply(amount: 20.70705);
                1993-07-08  [Irrigation].Apply(amount: 17.19113);
                1993-07-15  [Irrigation].Apply(amount: 17.19113);
                1993-07-22  [Irrigation].Apply(amount: 17.19113);
                1993-07-29  [Irrigation].Apply(amount: 17.19113);
                1993-08-08  [Irrigation].Apply(amount: 30.56625);
                1993-08-15  [Irrigation].Apply(amount: 30.56625);
                1993-08-22  [Irrigation].Apply(amount: 30.56625);
                1993-08-29  [Irrigation].Apply(amount: 30.56625);
                1993-09-08  [Irrigation].Apply(amount: 7.724925);
                1993-09-15  [Irrigation].Apply(amount: 7.724925);
                1993-09-22  [Irrigation].Apply(amount: 7.724925);
                1993-09-29  [Irrigation].Apply(amount: 7.724925);
                1993-10-08  [Irrigation].Apply(amount: 30.381);
                1993-10-15  [Irrigation].Apply(amount: 30.381);
                1993-10-22  [Irrigation].Apply(amount: 30.381);
                1993-10-29  [Irrigation].Apply(amount: 30.381);
                1993-11-08  [Irrigation].Apply(amount: 0);
                1993-11-15  [Irrigation].Apply(amount: 0);
                1993-11-22  [Irrigation].Apply(amount: 0);
                1993-11-29  [Irrigation].Apply(amount: 0);
                1993-12-08  [Irrigation].Apply(amount: 10.50368);
                1993-12-15  [Irrigation].Apply(amount: 10.50368);
                1993-12-22  [Irrigation].Apply(amount: 10.50368);
                1993-12-29  [Irrigation].Apply(amount: 10.50368);
                1994-01-08  [Irrigation].Apply(amount: 15.38898);
                1994-01-15  [Irrigation].Apply(amount: 15.38898);
                1994-01-22  [Irrigation].Apply(amount: 15.38898);
                1994-01-29  [Irrigation].Apply(amount: 15.38898);
                1994-02-08  [Irrigation].Apply(amount: 0);
                1994-02-15  [Irrigation].Apply(amount: 0);
                1994-02-22  [Irrigation].Apply(amount: 0);
                1994-03-01  [Irrigation].Apply(amount: 0);
                1994-03-08  [Irrigation].Apply(amount: 7.7805);
                1994-03-15  [Irrigation].Apply(amount: 7.7805);
                1994-03-22  [Irrigation].Apply(amount: 7.7805);
                1994-03-29  [Irrigation].Apply(amount: 7.7805);
              Operations F
                1987-02-09  [Fertiliser].Apply(192, Fertiliser.Types.UreaN, 0);
                1987-05-20  [Fertiliser].Apply(192, Fertiliser.Types.UreaN, 0);
                1987-08-28  [Fertiliser].Apply(96, Fertiliser.Types.UreaN, 0);
                1987-12-06  [Fertiliser].Apply(256, Fertiliser.Types.UreaN, 0);
                1988-02-29  [Fertiliser].Apply(256, Fertiliser.Types.UreaN, 0);
                1988-07-18  [Fertiliser].Apply(128, Fertiliser.Types.UreaN, 0);
                1988-10-26  [Fertiliser].Apply(192, Fertiliser.Types.UreaN, 0);
                1989-06-09  [Fertiliser].Apply(128, Fertiliser.Types.UreaN, 0);
                1989-10-27  [Fertiliser].Apply(96, Fertiliser.Types.UreaN, 0);
              Operations IF
                1988-02-09  [TreeThinning].Script.DoThin(0.15);
                1988-05-19  [TreeThinning].Script.DoThin(0.33);
                1988-09-26  [TreeThinning].Script.DoThin(0.21);
                1987-02-09  [Fertiliser].Apply(192, Fertiliser.Types.UreaN, 0);
                1987-05-20  [Fertiliser].Apply(192, Fertiliser.Types.UreaN, 0);
                1987-08-28  [Fertiliser].Apply(96, Fertiliser.Types.UreaN, 0);
                1987-12-06  [Fertiliser].Apply(256, Fertiliser.Types.UreaN, 0);
                1988-02-29  [Fertiliser].Apply(256, Fertiliser.Types.UreaN, 0);
                1988-07-18  [Fertiliser].Apply(128, Fertiliser.Types.UreaN, 0);
                1988-10-26  [Fertiliser].Apply(192, Fertiliser.Types.UreaN, 0);
                1989-06-09  [Fertiliser].Apply(128, Fertiliser.Types.UreaN, 0);
                1989-10-27  [Fertiliser].Apply(96, Fertiliser.Types.UreaN, 0);
                1987-02-08  [Irrigation].Apply(amount: 2.2533);
                1987-02-15  [Irrigation].Apply(amount: 2.2533);
                1987-02-22  [Irrigation].Apply(amount: 2.2533);
                1987-03-01  [Irrigation].Apply(amount: 2.2533);
                1987-03-08  [Irrigation].Apply(amount: 25.5633);
                1987-03-15  [Irrigation].Apply(amount: 25.5633);
                1987-03-22  [Irrigation].Apply(amount: 25.5633);
                1987-03-29  [Irrigation].Apply(amount: 25.5633);
                1987-04-08  [Irrigation].Apply(amount: 21.5229);
                1987-04-15  [Irrigation].Apply(amount: 21.5229);
                1987-04-22  [Irrigation].Apply(amount: 21.5229);
                1987-04-29  [Irrigation].Apply(amount: 21.5229);
                1987-05-08  [Irrigation].Apply(amount: 13.6752);
                1987-05-15  [Irrigation].Apply(amount: 13.6752);
                1987-05-22  [Irrigation].Apply(amount: 13.6752);
                1987-05-29  [Irrigation].Apply(amount: 13.6752);
                1987-06-08  [Irrigation].Apply(amount: 0);
                1987-06-15  [Irrigation].Apply(amount: 0);
                1987-06-22  [Irrigation].Apply(amount: 0);
                1987-06-29  [Irrigation].Apply(amount: 0);
                1987-07-08  [Irrigation].Apply(amount: 17.6379);
                1987-07-15  [Irrigation].Apply(amount: 17.6379);
                1987-07-22  [Irrigation].Apply(amount: 17.6379);
                1987-07-29  [Irrigation].Apply(amount: 17.6379);
                1987-08-08  [Irrigation].Apply(amount: 7.77);
                1987-08-15  [Irrigation].Apply(amount: 7.77);
                1987-08-22  [Irrigation].Apply(amount: 7.77);
                1987-08-29  [Irrigation].Apply(amount: 7.77);
                1987-09-08  [Irrigation].Apply(amount: 16.58895);
                1987-09-15  [Irrigation].Apply(amount: 16.58895);
                1987-09-22  [Irrigation].Apply(amount: 16.58895);
                1987-09-29  [Irrigation].Apply(amount: 16.58895);
                1987-10-08  [Irrigation].Apply(amount: 15.8508);
                1987-10-15  [Irrigation].Apply(amount: 15.8508);
                1987-10-22  [Irrigation].Apply(amount: 15.8508);
                1987-10-29  [Irrigation].Apply(amount: 15.8508);
                1987-11-08  [Irrigation].Apply(amount: 20.47395);
                1987-11-15  [Irrigation].Apply(amount: 20.47395);
                1987-11-22  [Irrigation].Apply(amount: 20.47395);
                1987-11-29  [Irrigation].Apply(amount: 20.47395);
                1987-12-08  [Irrigation].Apply(amount: 19.425);
                1987-12-15  [Irrigation].Apply(amount: 19.425);
                1987-12-22  [Irrigation].Apply(amount: 19.425);
                1987-12-29  [Irrigation].Apply(amount: 19.425);
                1988-01-08  [Irrigation].Apply(amount: 15.6954);
                1988-01-15  [Irrigation].Apply(amount: 15.6954);
                1988-01-22  [Irrigation].Apply(amount: 15.6954);
                1988-01-29  [Irrigation].Apply(amount: 15.6954);
                1988-02-08  [Irrigation].Apply(amount: 39.0054);
                1988-02-15  [Irrigation].Apply(amount: 39.0054);
                1988-02-22  [Irrigation].Apply(amount: 39.0054);
                1988-02-29  [Irrigation].Apply(amount: 39.0054);
                1988-03-08  [Irrigation].Apply(amount: 42.56018);
                1988-03-15  [Irrigation].Apply(amount: 42.56018);
                1988-03-22  [Irrigation].Apply(amount: 42.56018);
                1988-03-29  [Irrigation].Apply(amount: 42.56018);
                1988-04-08  [Irrigation].Apply(amount: 0);
                1988-04-15  [Irrigation].Apply(amount: 0);
                1988-04-22  [Irrigation].Apply(amount: 0);
                1988-04-29  [Irrigation].Apply(amount: 0);
                1988-05-08  [Irrigation].Apply(amount: 0);
                1988-05-15  [Irrigation].Apply(amount: 0);
                1988-05-22  [Irrigation].Apply(amount: 0);
                1988-05-29  [Irrigation].Apply(amount: 0);
                1988-06-08  [Irrigation].Apply(amount: 0);
                1988-06-15  [Irrigation].Apply(amount: 0);
                1988-06-22  [Irrigation].Apply(amount: 0);
                1988-06-29  [Irrigation].Apply(amount: 0);
                1988-07-08  [Irrigation].Apply(amount: 0);
                1988-07-15  [Irrigation].Apply(amount: 0);
                1988-07-22  [Irrigation].Apply(amount: 0);
                1988-07-29  [Irrigation].Apply(amount: 0);
                1988-08-08  [Irrigation].Apply(amount: 7.77);
                1988-08-15  [Irrigation].Apply(amount: 7.77);
                1988-08-22  [Irrigation].Apply(amount: 7.77);
                1988-08-29  [Irrigation].Apply(amount: 7.77);
                1988-09-08  [Irrigation].Apply(amount: 9.965025);
                1988-09-15  [Irrigation].Apply(amount: 9.965025);
                1988-09-22  [Irrigation].Apply(amount: 9.965025);
                1988-09-29  [Irrigation].Apply(amount: 9.965025);
                1988-10-08  [Irrigation].Apply(amount: 40.404);
                1988-10-15  [Irrigation].Apply(amount: 40.404);
                1988-10-22  [Irrigation].Apply(amount: 40.404);
                1988-10-29  [Irrigation].Apply(amount: 40.404);
                1988-11-08  [Irrigation].Apply(amount: 49.55318);
                1988-11-15  [Irrigation].Apply(amount: 49.55318);
                1988-11-22  [Irrigation].Apply(amount: 49.55318);
                1988-11-29  [Irrigation].Apply(amount: 49.55318);
                1988-12-08  [Irrigation].Apply(amount: 12.91763);
                1988-12-15  [Irrigation].Apply(amount: 12.91763);
                1988-12-22  [Irrigation].Apply(amount: 12.91763);
                1988-12-29  [Irrigation].Apply(amount: 12.91763);
                1989-01-08  [Irrigation].Apply(amount: 11.8881);
                1989-01-15  [Irrigation].Apply(amount: 11.8881);
                1989-01-22  [Irrigation].Apply(amount: 11.8881);
                1989-01-29  [Irrigation].Apply(amount: 11.8881);
                1989-02-08  [Irrigation].Apply(amount: 15.9285);
                1989-02-15  [Irrigation].Apply(amount: 15.9285);
                1989-02-22  [Irrigation].Apply(amount: 15.9285);
                1989-03-01  [Irrigation].Apply(amount: 15.9285);
                1989-03-08  [Irrigation].Apply(amount: 23.7762);
                1989-03-15  [Irrigation].Apply(amount: 23.7762);
                1989-03-22  [Irrigation].Apply(amount: 23.7762);
                1989-03-29  [Irrigation].Apply(amount: 23.7762);
                1989-04-08  [Irrigation].Apply(amount: 0);
                1989-04-15  [Irrigation].Apply(amount: 0);
                1989-04-22  [Irrigation].Apply(amount: 0);
                1989-04-29  [Irrigation].Apply(amount: 0);
                1989-05-08  [Irrigation].Apply(amount: 0);
                1989-05-15  [Irrigation].Apply(amount: 0);
                1989-05-22  [Irrigation].Apply(amount: 0);
                1989-05-29  [Irrigation].Apply(amount: 0);
                1989-06-08  [Irrigation].Apply(amount: 0);
                1989-06-15  [Irrigation].Apply(amount: 0);
                1989-06-22  [Irrigation].Apply(amount: 0);
                1989-06-29  [Irrigation].Apply(amount: 0);
                1989-07-08  [Irrigation].Apply(amount: 0.2331);
                1989-07-15  [Irrigation].Apply(amount: 0.2331);
                1989-07-22  [Irrigation].Apply(amount: 0.2331);
                1989-07-29  [Irrigation].Apply(amount: 0.2331);
                1989-08-08  [Irrigation].Apply(amount: 12.91763);
                1989-08-15  [Irrigation].Apply(amount: 12.91763);
                1989-08-22  [Irrigation].Apply(amount: 12.91763);
                1989-08-29  [Irrigation].Apply(amount: 12.91763);
                1989-09-08  [Irrigation].Apply(amount: 51.70935);
                1989-09-15  [Irrigation].Apply(amount: 51.70935);
                1989-09-22  [Irrigation].Apply(amount: 51.70935);
                1989-09-29  [Irrigation].Apply(amount: 51.70935);
                1989-10-08  [Irrigation].Apply(amount: 61.4607);
                1989-10-15  [Irrigation].Apply(amount: 61.4607);
                1989-10-22  [Irrigation].Apply(amount: 61.4607);
                1989-10-29  [Irrigation].Apply(amount: 61.4607);
                1989-11-08  [Irrigation].Apply(amount: 31.21598);
                1989-11-15  [Irrigation].Apply(amount: 31.21598);
                1989-11-22  [Irrigation].Apply(amount: 31.21598);
                1989-11-29  [Irrigation].Apply(amount: 31.21598);
                1989-12-08  [Irrigation].Apply(amount: 13.73348);
                1989-12-15  [Irrigation].Apply(amount: 13.73348);
                1989-12-22  [Irrigation].Apply(amount: 13.73348);
                1989-12-29  [Irrigation].Apply(amount: 13.73348);
                1990-01-08  [Irrigation].Apply(amount: 69.50265);
                1990-01-15  [Irrigation].Apply(amount: 69.50265);
                1990-01-22  [Irrigation].Apply(amount: 69.50265);
                1990-01-29  [Irrigation].Apply(amount: 69.50265);
                1990-02-08  [Irrigation].Apply(amount: 77.19495);
                1990-02-15  [Irrigation].Apply(amount: 77.19495);
                1990-02-22  [Irrigation].Apply(amount: 77.19495);
                1990-03-01  [Irrigation].Apply(amount: 77.19495);
                1990-03-08  [Irrigation].Apply(amount: 30.6915);
                1990-03-15  [Irrigation].Apply(amount: 30.6915);
                1990-03-22  [Irrigation].Apply(amount: 30.6915);
                1990-03-29  [Irrigation].Apply(amount: 30.6915);
                1990-04-08  [Irrigation].Apply(amount: 0);
                1990-04-15  [Irrigation].Apply(amount: 0);
                1990-04-22  [Irrigation].Apply(amount: 0);
                1990-04-29  [Irrigation].Apply(amount: 0);
                1990-05-08  [Irrigation].Apply(amount: 0);
                1990-05-15  [Irrigation].Apply(amount: 0);
                1990-05-22  [Irrigation].Apply(amount: 0);
                1990-05-29  [Irrigation].Apply(amount: 0);
                1990-06-08  [Irrigation].Apply(amount: 0);
                1990-06-15  [Irrigation].Apply(amount: 0);
                1990-06-22  [Irrigation].Apply(amount: 0);
                1990-06-29  [Irrigation].Apply(amount: 0);
                1990-07-08  [Irrigation].Apply(amount: 0);
                1990-07-15  [Irrigation].Apply(amount: 0);
                1990-07-22  [Irrigation].Apply(amount: 0);
                1990-07-29  [Irrigation].Apply(amount: 0);
                1990-08-08  [Irrigation].Apply(amount: 24.82515);
                1990-08-15  [Irrigation].Apply(amount: 24.82515);
                1990-08-22  [Irrigation].Apply(amount: 24.82515);
                1990-08-29  [Irrigation].Apply(amount: 24.82515);
                1990-09-08  [Irrigation].Apply(amount: 59.9844);
                1990-09-15  [Irrigation].Apply(amount: 59.9844);
                1990-09-22  [Irrigation].Apply(amount: 59.9844);
                1990-09-29  [Irrigation].Apply(amount: 59.9844);
                1990-10-08  [Irrigation].Apply(amount: 60.70313);
                1990-10-15  [Irrigation].Apply(amount: 60.70313);
                1990-10-22  [Irrigation].Apply(amount: 60.70313);
                1990-10-29  [Irrigation].Apply(amount: 60.70313);
                1990-11-08  [Irrigation].Apply(amount: 42.22995);
                1990-11-15  [Irrigation].Apply(amount: 42.22995);
                1990-11-22  [Irrigation].Apply(amount: 42.22995);
                1990-11-29  [Irrigation].Apply(amount: 42.22995);
                1990-12-08  [Irrigation].Apply(amount: 61.0722);
                1990-12-15  [Irrigation].Apply(amount: 61.0722);
                1990-12-22  [Irrigation].Apply(amount: 61.0722);
                1990-12-29  [Irrigation].Apply(amount: 61.0722);
                1991-01-08  [Irrigation].Apply(amount: 16.02563);
                1991-01-15  [Irrigation].Apply(amount: 16.02563);
                1991-01-22  [Irrigation].Apply(amount: 16.02563);
                1991-01-29  [Irrigation].Apply(amount: 16.02563);
                1991-02-08  [Irrigation].Apply(amount: 10.29525);
                1991-02-15  [Irrigation].Apply(amount: 10.29525);
                1991-02-22  [Irrigation].Apply(amount: 10.29525);
                1991-03-01  [Irrigation].Apply(amount: 10.29525);
                1991-03-08  [Irrigation].Apply(amount: 23.73735);
                1991-03-15  [Irrigation].Apply(amount: 23.73735);
                1991-03-22  [Irrigation].Apply(amount: 23.73735);
                1991-03-29  [Irrigation].Apply(amount: 23.73735);
                1991-04-08  [Irrigation].Apply(amount: 15.54);
                1991-04-15  [Irrigation].Apply(amount: 15.54);
                1991-04-22  [Irrigation].Apply(amount: 15.54);
                1991-04-29  [Irrigation].Apply(amount: 15.54);
                1991-05-08  [Irrigation].Apply(amount: 15.9285);
                1991-05-15  [Irrigation].Apply(amount: 15.9285);
                1991-05-22  [Irrigation].Apply(amount: 15.9285);
                1991-05-29  [Irrigation].Apply(amount: 15.9285);
                1991-06-08  [Irrigation].Apply(amount: 0);
                1991-06-15  [Irrigation].Apply(amount: 0);
                1991-06-22  [Irrigation].Apply(amount: 0);
                1991-06-29  [Irrigation].Apply(amount: 0);
                1991-07-08  [Irrigation].Apply(amount: 0);
                1991-07-15  [Irrigation].Apply(amount: 0);
                1991-07-22  [Irrigation].Apply(amount: 0);
                1991-07-29  [Irrigation].Apply(amount: 0);
                1991-08-08  [Irrigation].Apply(amount: 16.51125);
                1991-08-15  [Irrigation].Apply(amount: 16.51125);
                1991-08-22  [Irrigation].Apply(amount: 16.51125);
                1991-08-29  [Irrigation].Apply(amount: 16.51125);
                1991-09-08  [Irrigation].Apply(amount: 61.63553);
                1991-09-15  [Irrigation].Apply(amount: 61.63553);
                1991-09-22  [Irrigation].Apply(amount: 61.63553);
                1991-09-29  [Irrigation].Apply(amount: 61.63553);
                1991-10-08  [Irrigation].Apply(amount: 31.7016);
                1991-10-15  [Irrigation].Apply(amount: 31.7016);
                1991-10-22  [Irrigation].Apply(amount: 31.7016);
                1991-10-29  [Irrigation].Apply(amount: 31.7016);
                1991-11-08  [Irrigation].Apply(amount: 29.04038);
                1991-11-15  [Irrigation].Apply(amount: 29.04038);
                1991-11-22  [Irrigation].Apply(amount: 29.04038);
                1991-11-29  [Irrigation].Apply(amount: 29.04038);
                1991-12-08  [Irrigation].Apply(amount: 31.08);
                1991-12-15  [Irrigation].Apply(amount: 31.08);
                1991-12-22  [Irrigation].Apply(amount: 31.08);
                1991-12-29  [Irrigation].Apply(amount: 31.08);
                1992-01-08  [Irrigation].Apply(amount: 46.7754);
                1992-01-15  [Irrigation].Apply(amount: 46.7754);
                1992-01-22  [Irrigation].Apply(amount: 46.7754);
                1992-01-29  [Irrigation].Apply(amount: 46.7754);
                1992-02-08  [Irrigation].Apply(amount: 7.7);
                1992-02-15  [Irrigation].Apply(amount: 7.7);
                1992-02-22  [Irrigation].Apply(amount: 7.7);
                1992-02-29  [Irrigation].Apply(amount: 7.7);
                1992-03-08  [Irrigation].Apply(amount: 0);
                1992-03-15  [Irrigation].Apply(amount: 0);
                1992-03-22  [Irrigation].Apply(amount: 0);
                1992-03-29  [Irrigation].Apply(amount: 0);
                1992-04-08  [Irrigation].Apply(amount: 0);
                1992-04-15  [Irrigation].Apply(amount: 0);
                1992-04-22  [Irrigation].Apply(amount: 0);
                1992-04-29  [Irrigation].Apply(amount: 0);
                1992-05-08  [Irrigation].Apply(amount: 0);
                1992-05-15  [Irrigation].Apply(amount: 0);
                1992-05-22  [Irrigation].Apply(amount: 0);
                1992-05-29  [Irrigation].Apply(amount: 0);
                1992-06-08  [Irrigation].Apply(amount: 0);
                1992-06-15  [Irrigation].Apply(amount: 0);
                1992-06-22  [Irrigation].Apply(amount: 0);
                1992-06-29  [Irrigation].Apply(amount: 0);
                1992-07-08  [Irrigation].Apply(amount: 6.41);
                1992-07-15  [Irrigation].Apply(amount: 6.41);
                1992-07-22  [Irrigation].Apply(amount: 6.41);
                1992-07-29  [Irrigation].Apply(amount: 6.41);
                1992-08-08  [Irrigation].Apply(amount: 34.965);
                1992-08-15  [Irrigation].Apply(amount: 34.965);
                1992-08-22  [Irrigation].Apply(amount: 34.965);
                1992-08-29  [Irrigation].Apply(amount: 34.965);
                1992-09-08  [Irrigation].Apply(amount: 3.885);
                1992-09-15  [Irrigation].Apply(amount: 3.885);
                1992-09-22  [Irrigation].Apply(amount: 3.885);
                1992-09-29  [Irrigation].Apply(amount: 3.885);
                1992-10-08  [Irrigation].Apply(amount: 41.35583);
                1992-10-15  [Irrigation].Apply(amount: 41.35583);
                1992-10-22  [Irrigation].Apply(amount: 41.35583);
                1992-10-29  [Irrigation].Apply(amount: 41.35583);
                1992-11-08  [Irrigation].Apply(amount: 3.69075);
                1992-11-15  [Irrigation].Apply(amount: 3.69075);
                1992-11-22  [Irrigation].Apply(amount: 3.69075);
                1992-11-29  [Irrigation].Apply(amount: 3.69075);
                1992-12-08  [Irrigation].Apply(amount: 0);
                1992-12-15  [Irrigation].Apply(amount: 0);
                1992-12-22  [Irrigation].Apply(amount: 0);
                1992-12-29  [Irrigation].Apply(amount: 0);
                1993-01-08  [Irrigation].Apply(amount: 11.79098);
                1993-01-15  [Irrigation].Apply(amount: 11.79098);
                1993-01-22  [Irrigation].Apply(amount: 11.79098);
                1993-01-29  [Irrigation].Apply(amount: 11.79098);
                1993-02-08  [Irrigation].Apply(amount: 26.37915);
                1993-02-15  [Irrigation].Apply(amount: 26.37915);
                1993-02-22  [Irrigation].Apply(amount: 26.37915);
                1993-03-01  [Irrigation].Apply(amount: 26.37915);
                1993-03-08  [Irrigation].Apply(amount: 9.51825);
                1993-03-15  [Irrigation].Apply(amount: 9.51825);
                1993-03-22  [Irrigation].Apply(amount: 9.51825);
                1993-03-29  [Irrigation].Apply(amount: 9.51825);
                1993-04-08  [Irrigation].Apply(amount: 47.64953);
                1993-04-15  [Irrigation].Apply(amount: 47.64953);
                1993-04-22  [Irrigation].Apply(amount: 47.64953);
                1993-04-29  [Irrigation].Apply(amount: 47.64953);
                1993-05-08  [Irrigation].Apply(amount: 0);
                1993-05-15  [Irrigation].Apply(amount: 0);
                1993-05-22  [Irrigation].Apply(amount: 0);
                1993-05-29  [Irrigation].Apply(amount: 0);
                1993-06-08  [Irrigation].Apply(amount: 20.70705);
                1993-06-15  [Irrigation].Apply(amount: 20.70705);
                1993-06-22  [Irrigation].Apply(amount: 20.70705);
                1993-06-29  [Irrigation].Apply(amount: 20.70705);
                1993-07-08  [Irrigation].Apply(amount: 17.19113);
                1993-07-15  [Irrigation].Apply(amount: 17.19113);
                1993-07-22  [Irrigation].Apply(amount: 17.19113);
                1993-07-29  [Irrigation].Apply(amount: 17.19113);
                1993-08-08  [Irrigation].Apply(amount: 30.56625);
                1993-08-15  [Irrigation].Apply(amount: 30.56625);
                1993-08-22  [Irrigation].Apply(amount: 30.56625);
                1993-08-29  [Irrigation].Apply(amount: 30.56625);
                1993-09-08  [Irrigation].Apply(amount: 7.724925);
                1993-09-15  [Irrigation].Apply(amount: 7.724925);
                1993-09-22  [Irrigation].Apply(amount: 7.724925);
                1993-09-29  [Irrigation].Apply(amount: 7.724925);
                1993-10-08  [Irrigation].Apply(amount: 30.381);
                1993-10-15  [Irrigation].Apply(amount: 30.381);
                1993-10-22  [Irrigation].Apply(amount: 30.381);
                1993-10-29  [Irrigation].Apply(amount: 30.381);
                1993-11-08  [Irrigation].Apply(amount: 0);
                1993-11-15  [Irrigation].Apply(amount: 0);
                1993-11-22  [Irrigation].Apply(amount: 0);
                1993-11-29  [Irrigation].Apply(amount: 0);
                1993-12-08  [Irrigation].Apply(amount: 10.50368);
                1993-12-15  [Irrigation].Apply(amount: 10.50368);
                1993-12-22  [Irrigation].Apply(amount: 10.50368);
                1993-12-29  [Irrigation].Apply(amount: 10.50368);
                1994-01-08  [Irrigation].Apply(amount: 15.38898);
                1994-01-15  [Irrigation].Apply(amount: 15.38898);
                1994-01-22  [Irrigation].Apply(amount: 15.38898);
                1994-01-29  [Irrigation].Apply(amount: 15.38898);
                1994-02-08  [Irrigation].Apply(amount: 0);
                1994-02-15  [Irrigation].Apply(amount: 0);
                1994-02-22  [Irrigation].Apply(amount: 0);
                1994-03-01  [Irrigation].Apply(amount: 0);
                1994-03-08  [Irrigation].Apply(amount: 7.7805);
                1994-03-15  [Irrigation].Apply(amount: 7.7805);
                1994-03-22  [Irrigation].Apply(amount: 7.7805);
                1994-03-29  [Irrigation].Apply(amount: 7.7805);
          Simulation GympieBase
            Weather: FileName=toolara8797.met
            Clock: StartDate=1987-02-04; EndDate=1998-05-08
            Summary
            SoilArbitrator Soil Arbitrator
            Zone Plantation: Area=1; Slope=0
              Soil: NearestTown=Toolara State Forest; State=Queensland; Latitude=0; Longitude=0
                Comments:
                  Soil properties are based on Ross and Thompson (1991)  SOILS AT SITES SELECTED FOR
                  EUCALYPT RESEARCH IN TOOLARA
                   STATE FOREST, GYMPIE, QUEENSLAND CSIRO DIVISION OF SOILS
                   Divisional Report No. 111
                InitialWater Initial water: PercentMethod=1; FractionFull=0.8
                Water
                  Thickness  BD    AirDry  LL15  DUL   SAT
                  100        1.5   0.01    0.05  0.15  0.18
                  300        1.6   0.01    0.05  0.15  0.18
                  600        1.68  0.01    0.05  0.15  0.18
                  1000       1.75  0.02    0.05  0.15  0.18
                  1000       1.7   0.05    0.05  0.15  0.18
                  1000       1.7   0.05    0.05  0.15  0.2
                  1000       1.7   0.05    0.05  0.15  0.2
                  1000       1.7   0.05    0.05  0.15  0.2
                  SoilCrop EucalyptusSoil: LL=[0.01, 0.01, 0.01, 0.01, 0.01, 0.01, 0.01, 0.01]; KL=[0.07, 0.07, 0.05, 0.02, 0.02, 0.02, 0.01, 0.01]; XF=[0.9, 0.8, 0.7, 0.6, 0.3, 0, 0, 0]
                SoilWater: SummerDate=1-Nov; SummerU=2; SummerCona=3.5; WinterDate=1-Apr; WinterU=2; WinterCona=3.5; DiffusConst=88; DiffusSlope=35.4; Salb=0.13; CN2Bare=65; CNRed=20; CNCov=0.8; slope=0; discharge_width=0; catchment_area=0; max_pond=0; ResidueInterception=0
                  Thickness  SWCON  KLAT
                  100        0.9    0
                  300        0.9    0
                  600        0.9    0
                  1000       0.9    0
                  1000       0.9    0
                  1000       0.9    0
                  1000       0.9    0
                  1000       0.9    0
                SoilNitrogen: fom_types=[default, manure, mucuna, lablab, shemp, stable]; fract_carb=[0.2, 0.3, 0.54, 0.57, 0.45, 0]; fract_cell=[0.7, 0.3, 0.37, 0.37, 0.47, 0.1]; fract_lign=[0.1, 0.4, 0.09, 0.06, 0.08, 0.9]
                SoilOrganicMatter: RootCN=60; RootWt=1; SoilCN=38; EnrACoeff=7.4; EnrBCoeff=0.2; OCUnits=Total
                  Thickness  OC    FBiom  FInert
                  100        2.2   0.03   0.6
                  300        1     0.02   0.7
                  600        0.5   0.02   0.7
                  1000       0.2   0.01   0.7
                  1000       0.12  0.01   0.9
                  1000       0.1   0.01   0.99
                  1000       0.1   0.01   0.99
                  1000       0.1   0.01   0.99
                Analysis: same as Validation.Australia.CoffsHarbour.CoffsHarbour.Plantation.Soil.Analysis
                Sample Initial nitrogen: NO3Units=ppm; NH4Units=ppm; SWUnits=Volumetric; OCUnits=Total; PHUnits=Water
                  Thickness  NO3   NH4
                  100        0.1   0.01
                  300        0.1   0.01
                  600        0.1   0.01
                  1000       0.01  0.01
                  1000       0.01  0.01
                  1000       0.01  0.01
                  1000       0.01  0.01
                  1000       0.01  0.01
                CERESSoilTemperature
              Irrigation
              Fertiliser
              SurfaceOrganicMatter: InitialResidueName=Wheat; InitialResidueType=Wheat; InitialResidueMass=2000; InitialStandingFraction=0; InitialCPR=0; InitialCNR=80; FractionFaecesAdded=0.5
              MicroClimate: a_interception=0; b_interception=1; c_interception=0; d_interception=0; soil_albedo=0.13; SoilHeatFluxFraction=0; NightInterceptionFraction=0; ReferenceHeight=0
              Plant Eucalyptus: CropType=Eucalyptus
              Manager TreeTransplantRule
                RowSpace = 2.65
                RowWidth = 3.4
                CultivarName = grandisCoffsHarbour
                SowingDate = 1987-02-04
                script: same as in Validation.Australia.CoffsHarbour.CoffsHarbour.Plantation.TreeTransplantRule
              Operations: same as Validation.Australia.Gympie.Gympie.Factors.Treatment.I
              Report: VariableNames=[Clock].Today; EventNames=[Clock].DoReport
              SoluteManager
              Manager TreeThinning
```csharp
using System;
using System.Collections.Generic;
using Models.Core;
using Models.PMF;
using Models.PMF.Interfaces;
using System.Xml.Serialization;

namespace Models
{
    [Serializable] 
    [System.Xml.Serialization.XmlInclude(typeof(Model))]
    public class Script : Model
    {
        [Link] Plant Eucalyptus;
        [Link] Clock Clock;

        [XmlIgnore] private RemovalFractions Remove { get; set; }
        
        [EventSubscribe("Commencing")]
        private void OnSimulationCommencing(object sender, EventArgs e)
        {
            Remove = new RemovalFractions();
        }
        
        [EventSubscribe("DoManagement")]
        public void DoThin(double ThinFr)
        {
            //Set up  array of remove fractions to send with Cut method.  Each member in the array corresponds to an organ in the same order they are set up in.

                //Harvest with manager specified removal fractions
                Remove.SetFractionToRemove("Leaf", 0);
                Remove.SetFractionToRemove("Stem", 0);
                Remove.SetFractionToRemove("Branch", 0);
                Remove.SetFractionToRemove("FineRoot", 0);
                Remove.SetFractionToRemove("CoarseRoot", 0);
                Remove.SetFractionToResidue("Leaf", ThinFr);
                Remove.SetFractionToResidue("Stem", ThinFr);
                Remove.SetFractionToResidue("Branch", ThinFr);
                Remove.SetFractionToResidue("FineRoot", ThinFr);
                Remove.SetFractionToResidue("CoarseRoot", ThinFr);
                Remove.SetThinningProportion = ThinFr;
                Eucalyptus.RemoveBiomass("Thin", Remove);
        }
    }
}
```
      Folder Wagga
        Memo
          This experiment is described in [polglase1995mineralization], [snow1999nitrogen], [snow1999modelling], [myers1996growth], and [myers1998response]. The experiment was effluent-irrigated _E. grandis,_ and weedy; only the irrigated treatement was included here.
        Simulation Wagga
          Weather: FileName=wwepp.met
          Clock: StartDate=1991-07-01; EndDate=1996-06-30
          Summary
          SoilArbitrator Soil Arbitrator
          Zone Plantation: Area=1; Slope=0
            Soil: Latitude=0; Longitude=0
              InitialWater Initial water: PercentMethod=1; FractionFull=0.8
              Water
                Thickness  BD    AirDry  LL15  DUL   SAT
                100        1.5   0.01    0.05  0.16  0.29
                300        1.6   0.01    0.05  0.15  0.29
                600        1.68  0.01    0.05  0.14  0.29
                1000       1.75  0.02    0.05  0.13  0.29
                1000       1.7   0.05    0.05  0.12  0.29
                1000       1.7   0.05    0.05  0.12  0.29
                1000       1.7   0.05    0.05  0.12  0.29
                1000       1.7   0.05    0.05  0.12  0.29
                SoilCrop EucalyptusSoil: LL=[0.01, 0.01, 0.01, 0.01, 0.01, 0.01, 0.01, 0.01]; KL=[0.07, 0.07, 0.05, 0.02, 0.02, 0.02, 0.01, 0.01]; XF=[1, 1, 1, 1, 0.3, 0.2, 0, 0]
                SoilCrop SCRUMSoil: LL=[0.01, 0.01, 0.01, 0.01, 0.01, 0.01, 0.01, 0.01]; KL=[0.07, 0.07, 0.05, 0.02, 0.02, 0.02, 0.01, 0.01]; XF=[1, 1, 1, 1, 0.3, 0.2, 0, 0]
              SoilWater: same as Validation.Australia.CoffsHarbour.CoffsHarbour.Plantation.Soil.SoilWater
              SoilNitrogen: fom_types=[default, manure, mucuna, lablab, shemp, stable]; fract_carb=[0.2, 0.3, 0.54, 0.57, 0.45, 0]; fract_cell=[0.7, 0.3, 0.37, 0.37, 0.47, 0.1]; fract_lign=[0.1, 0.4, 0.09, 0.06, 0.08, 0.9]
              SoilOrganicMatter: RootCN=60; RootWt=1; SoilCN=14.5; EnrACoeff=7.4; EnrBCoeff=0.2; OCUnits=Total
                Thickness  OC    FBiom  FInert
                100        2     0.04   0.4
                300        1     0.03   0.5
                600        0.5   0.02   0.5
                1000       0.2   0.01   0.5
                1000       0.12  0.01   0.9
                1000       0.1   0.01   0.99
                1000       0.1   0.01   0.99
                1000       0.1   0.01   0.99
              Analysis: same as Validation.Australia.CoffsHarbour.CoffsHarbour.Plantation.Soil.Analysis
              Sample Initial nitrogen: NO3Units=ppm; NH4Units=ppm; SWUnits=Volumetric; OCUnits=Total; PHUnits=Water
                Thickness  NO3   NH4
                100        0.1   0.01
                300        0.1   0.01
                600        0.1   0.01
                1000       0.01  0.01
                1000       0.01  0.01
                1000       0.01  0.01
                1000       0.01  0.01
                1000       0.01  0.01
              CERESSoilTemperature
            Irrigation
            Fertiliser
            SurfaceOrganicMatter: InitialResidueName=Wheat; InitialResidueType=Wheat; InitialResidueMass=2000; InitialStandingFraction=0; InitialCPR=0; InitialCNR=80; FractionFaecesAdded=0.5
            MicroClimate: a_interception=0; b_interception=1; c_interception=0; d_interception=0; soil_albedo=0.13; SoilHeatFluxFraction=0; NightInterceptionFraction=0; ReferenceHeight=0
            Plant Eucalyptus: CropType=Eucalyptus
            Plant SCRUM: CropType=SCRUM
            Manager TreeTransplantRule
              RowSpace = 3
              RowWidth = 3
              CultivarName = grandisCoffsHarbour
              SowingDate = 1991-07-01
              script: same as in Validation.Australia.CoffsHarbour.CoffsHarbour.Plantation.TreeTransplantRule
            Operations WeedSowing
              1991-07-01  [SCRUM].Sow(population: 1, cultivar: Barley_Autumn, depth: 10, rowSpacing: 150);
            Operations FertiliserOperations: same as Validation.Australia.Gympie.Gympie.Factors.Treatment.F
            Report: VariableNames=[Clock].Today; EventNames=[Clock].DoReport
            Manager AutoFertigate
              FASW = 0
              WaterDeficit = 0
              AutoIrrigationOn = True
              FASWThreshold = 0.95
              FASWDepth = 1000
              NConc = 3
```csharp
using System;
using Models.Core;
using System.Collections.Generic;
using System.Text;
using Models.Soils;
using Models.PMF;
using Models;
using System.Xml.Serialization;
using APSIM.Shared.Utilities;

namespace Models
{
    [Serializable] 
    public class Script : Model
    {
        public double FASW { get; set; }
        public double WaterDeficit  { get; set; }
    
        [Link] Plant Chickpea;
        [Link] Zone zone;
        [Link] Irrigation irrigation;
        [Link] Fertiliser fertiliser;
        [Link] Soil soil;
        
        [Description("Auto irrigation on?")]
        public bool AutoIrrigationOn { get; set; }
        
        [Description("Threshold fraction available water (0-1)")]
        public double FASWThreshold { get; set; }

        [Description("Soil depth (mm) to which fraction available water is calculated")]
        public double FASWDepth { get; set; }

        [Description("N Concentration in irrigation water (ppm)")]
        public double NConc { get; set; }

        [EventSubscribe("DoManagement")]
        private void OnDoManagement(object sender, EventArgs e)
        {
            CalculateFASW();
            if (AutoIrrigationOn)
            {
                if (FASW < FASWThreshold)
                {
                    double amount = WaterDeficit * 10000.0 * NConc/1000000.0;
                    irrigation.Apply(WaterDeficit, depth: 0);
                    fertiliser.Apply(Amount: amount, Type: Fertiliser.Types.NO3N);
                }
            }
        }
        
        private void CalculateFASW()
        {
            double[] LL15 = MathUtilities.Multiply(soil.LL15, soil.Thickness);
            double[] DUL = MathUtilities.Multiply(soil.DUL, soil.Thickness);
        
            int nlayr = GetLayerIndex();
            double cumdep = MathUtilities.Sum(soil.Thickness, 0, nlayr, 0.0);

            double excess_fr = MathUtilities.Divide((cumdep - FASWDepth), soil.Thickness[nlayr], 0.0);

            // note that results may be strange if swdep < ll15
            double avail_sw = (MathUtilities.Sum(soil.Water, 0, nlayr, 0.0)
                              - excess_fr * soil.Water[nlayr])
                              - (MathUtilities.Sum(LL15, 0, nlayr, 0.0)
                              - excess_fr * LL15[nlayr]);


            double pot_avail_sw = (MathUtilities.Sum(DUL, 0, nlayr, 0.0)
                                  - excess_fr * DUL[nlayr])
                                  - (MathUtilities.Sum(LL15, 0, nlayr, 0.0)
                                  - excess_fr * LL15[nlayr]);

            FASW = MathUtilities.Divide(avail_sw, pot_avail_sw, 0.0);
            WaterDeficit = MathUtilities.Constrain(pot_avail_sw - avail_sw, 0.0, 100000);
        }

        private int GetLayerIndex()
        {
            double[] cumThickness = Soil.ToCumThickness(soil.Thickness);
            for (int i = 1; i < cumThickness.Length; i++)
            {
                if (FASWDepth < cumThickness[i])
                    return i - 1;
            }
            
            return cumThickness.Length - 1;
        }

    }
}
```
            SoluteManager
            Manager Harvesting
              Crop = .Simulations.Validation.Australia.Wagga.Wagga.Plantation.SCRUM
```csharp
using System;
using Models.Core;
using Models.PMF;
using Models.Soils;
using Models.Utilities;
using APSIM.Shared.Utilities;

namespace Models
{
    [Serializable] 
    public class Script : Model
    {
        [Description("Crop")]
        public IPlant Crop { get; set; }
        
        [EventSubscribe("DoManagement")]
        private void OnDoManagement(object sender, EventArgs e)
        {
            if (Crop.IsReadyForHarvesting)
            {
                Crop.Harvest();
                Crop.EndCrop();
            }
        }
    }
}
```
    Folder Brazil
      Folder Aracruz
        Memo
          These data are described in [almeida2003application] and [almeida2004parameterisation]. Two clones of _E. grandis_ are included that had measured differences in root:shoot ratio. These differences were simulated by specifiying partitioning targets as a genetic property.
        Experiment Aracruz
          Factors
            Factor Cult
              Specifications=[TreeTransplantRule].Script.CultivarName=grandisC15,grandisC22
          Simulation Aracruz
            Weather: FileName=Aracruz.met
            Clock: StartDate=1996-02-01; EndDate=2002-08-01
            Summary
            SoilArbitrator Soil Arbitrator
            Zone Plantation: Area=1; Slope=0
              Soil AracruzSoil: SoilType=sand; Latitude=-19.81; Longitude=40.23
                Comments=Soil data from Smethurst et al (2015) and Soares and Almeida (2001)
                InitialWater Initial water: PercentMethod=0; FractionFull=0; RelativeTo=LL15
                Water
                  Thickness  BD    AirDry  LL15  DUL   SAT
                  200        1.45  0.01    0.11  0.2   0.39
                  200        1.53  0.01    0.13  0.21  0.39
                  200        1.6   0.01    0.14  0.26  0.39
                  200        1.62  0.02    0.13  0.26  0.39
                  200        1.57  0.05    0.13  0.28  0.39
                  500        1.61  0.05    0.14  0.3   0.39
                  500        1.62  0.05    0.15  0.29  0.39
                  28000      1.62  0.05    0.15  0.29  0.39
                  SoilCrop EucalyptusSoil: LL=[0.01, 0.01, 0.01, 0.01, 0.01, 0.01, 0.01, 0.01]; KL=[0.07, 0.07, 0.05, 0.02, 0.02, 0.02, 0.01, 0.01]; XF=[1, 1, 1, 1, 1, 1, 1, 0.15]
                SoilWater: SummerDate=1-Nov; SummerU=4; SummerCona=3.5; WinterDate=1-Apr; WinterU=4; WinterCona=3.5; DiffusConst=88; DiffusSlope=35.4; Salb=0.13; CN2Bare=65; CNRed=20; CNCov=0.8; slope=0; discharge_width=0; catchment_area=0; max_pond=0; ResidueInterception=0
                  Thickness  SWCON  KLAT
                  200        0.3    0
                  200        0.3    0
                  200        0.3    0
                  200        0.3    0
                  200        0.2    0
                  500        0.2    0
                  500        0.2    0
                  1000       0.1    0
                SoilNitrogen: fom_types=[default, manure, mucuna, lablab, shemp, stable]; fract_carb=[0.2, 0.3, 0.54, 0.57, 0.45, 0]; fract_cell=[0.7, 0.3, 0.37, 0.37, 0.47, 0.1]; fract_lign=[0.1, 0.4, 0.09, 0.06, 0.08, 0.9]
                SoilOrganicMatter: RootCN=197; RootWt=1; SoilCN=12; EnrACoeff=7.4; EnrBCoeff=0.2; OCUnits=Total
                  Thickness  OC    FBiom  FInert
                  200        1.4   0.06   0.05
                  200        0.7   0.05   0.1
                  200        0.3   0.04   0.1
                  200        0.18  0.01   0.1
                  200        0.12  0.01   0.7
                  500        0.1   0.01   0.99
                  500        0     0.01   0.99
                  28000      0     0.01   0.99
                Analysis: PHUnits=Water; BoronUnits=0
                  Thickness  PH   ParticleSizeSand  ParticleSizeSilt  ParticleSizeClay
                  200        4.9  71                11                18
                  200        4.9  56                14                31
                  400        4.8  48                13                39
                  400        4.8  47                12                42
                  300        4.8  47                12                42
                  28500      4.8  47                12                42
                Sample Initial nitrogen: NO3Units=ppm; NH4Units=ppm; SWUnits=Volumetric; OCUnits=Total; PHUnits=Water
                  Thickness  NO3   NH4
                  220        5     2
                  230        2     2
                  280        2     1
                  440        0.01  0.01
                  360        0.01  0.01
                  440        0.01  0.01
                  2030       0     0
                  26000      0     0
                CERESSoilTemperature
              Irrigation
              Fertiliser
              SurfaceOrganicMatter: InitialResidueName=Wheat; InitialResidueType=Wheat; InitialResidueMass=2000; InitialStandingFraction=0; InitialCPR=0; InitialCNR=80; FractionFaecesAdded=0.5
              MicroClimate: a_interception=0; b_interception=1; c_interception=0; d_interception=0; soil_albedo=0.13; SoilHeatFluxFraction=0; NightInterceptionFraction=0; ReferenceHeight=0
              Plant Eucalyptus: CropType=Eucalyptus
              Manager TreeTransplantRule
                RowSpace = 3
                RowWidth = 3
                CultivarName = C15
                SowingDate = 1997-12-15
                script: same as in Validation.Australia.CoffsHarbour.CoffsHarbour.Plantation.TreeTransplantRule
              Operations FertiliserOperations
                1997-12-25  [Fertiliser].Apply(0, Fertiliser.Types.UreaN, 0);
                1998-06-25  [Fertiliser].Apply(0, Fertiliser.Types.UreaN, 0);
                1998-12-25  [Fertiliser].Apply(0, Fertiliser.Types.UreaN, 0);
              Report: VariableNames=[Clock].Today; EventNames=[Clock].DoReport
              SoluteManager
      Folder SantanadoParaiso
        Memo
          These data are described in [norgueira2005estadonutricional]. One clone of the hybrid _E. grandis_ was included, and it was grown in a factorial experiment of two levels each of irrigation and fertilisation.
        Experiment SantanadoParaiso
          Factors
            Factor Irr: Specifications=[IrrigationOperations]
              Operations Zero
              Operations High
                2001-10-28  [Irrigation].Apply(amount: 23.89);
                2001-11-17  [Irrigation].Apply(amount: 33.45);
                2001-12-17  [Irrigation].Apply(amount: 0.0);
                2002-01-17  [Irrigation].Apply(amount: 0.0);
                2002-02-17  [Irrigation].Apply(amount: 9.56);
                2002-03-17  [Irrigation].Apply(amount: 40.61);
                2002-04-17  [Irrigation].Apply(amount: 43.00);
                2002-05-17  [Irrigation].Apply(amount: 47.78);
                2002-06-17  [Irrigation].Apply(amount: 40.61);
                2002-07-17  [Irrigation].Apply(amount: 14.33);
                2002-08-17  [Irrigation].Apply(amount: 57.34);
                2002-09-17  [Irrigation].Apply(amount: 50.17);
                2002-10-17  [Irrigation].Apply(amount: 78.84);
                2002-11-17  [Irrigation].Apply(amount: 38.23);
                2002-12-17  [Irrigation].Apply(amount: 28.67);
                2003-01-17  [Irrigation].Apply(amount: 7.17);
                2003-02-17  [Irrigation].Apply(amount: 52.56);
                2003-03-17  [Irrigation].Apply(amount: 71.67);
                2003-04-17  [Irrigation].Apply(amount: 52.56);
                2003-05-17  [Irrigation].Apply(amount: 105.12);
                2003-06-17  [Irrigation].Apply(amount: 97.95);
                2003-07-17  [Irrigation].Apply(amount: 114.68);
                2003-08-17  [Irrigation].Apply(amount: 102.73);
                2003-09-17  [Irrigation].Apply(amount: 102.73);
                2003-10-17  [Irrigation].Apply(amount: 86.01);
                2003-11-17  [Irrigation].Apply(amount: 57.34);
                2003-12-17  [Irrigation].Apply(amount: 47.78);
                2004-01-17  [Irrigation].Apply(amount: 11.95);
                2004-02-17  [Irrigation].Apply(amount: 2.39);
                2004-03-17  [Irrigation].Apply(amount: 11.95);
                2004-04-17  [Irrigation].Apply(amount: 11.95);
                2004-05-17  [Irrigation].Apply(amount: 23.89);
                2004-06-17  [Irrigation].Apply(amount: 38.23);
                2004-07-17  [Irrigation].Apply(amount: 38.23);
                2004-08-17  [Irrigation].Apply(amount: 95.56);
                2004-09-17  [Irrigation].Apply(amount: 107.51);
                2004-10-17  [Irrigation].Apply(amount: 71.67);
                2004-11-17  [Irrigation].Apply(amount: 59.73);
                2004-12-17  [Irrigation].Apply(amount: 11.95);
                2005-01-17  [Irrigation].Apply(amount: 7.17);
                2005-02-17  [Irrigation].Apply(amount: 7.17);
                2005-03-17  [Irrigation].Apply(amount: 0);
                2005-04-17  [Irrigation].Apply(amount: 0);
                2005-05-17  [Irrigation].Apply(amount: 11.95);
                2005-06-17  [Irrigation].Apply(amount: 16.72);
                2005-07-17  [Irrigation].Apply(amount: 62.12);
                2005-08-17  [Irrigation].Apply(amount: 114.68);
                2005-09-17  [Irrigation].Apply(amount: 86.01);
                2005-10-17  [Irrigation].Apply(amount: 86.01);
                2005-11-17  [Irrigation].Apply(amount: 2.39);
                2005-12-17  [Irrigation].Apply(amount: 4.78);
                2006-01-17  [Irrigation].Apply(amount: 26.28);
                2006-02-17  [Irrigation].Apply(amount: 7.17);
            Factor N: Specifications=[FertiliserOperations]
              Operations Zero
              Operations High
                2001-10-24  [Fertiliser].Apply(14.4, Fertiliser.Types.NH4N, 0);
                2002-08-28  [Fertiliser].Apply(32.8, Fertiliser.Types.NH4N, 0);
                2002-09-17  [Fertiliser].Apply(32.8, Fertiliser.Types.NH4N, 0);
                2002-10-17  [Fertiliser].Apply(32.8, Fertiliser.Types.NH4N, 0);
                2002-11-17  [Fertiliser].Apply(32.8, Fertiliser.Types.NH4N, 0);
                2002-12-17  [Fertiliser].Apply(32.8, Fertiliser.Types.NH4N, 0);
                2003-01-17  [Fertiliser].Apply(32.8, Fertiliser.Types.NH4N, 0);
                2003-02-17  [Fertiliser].Apply(32.8, Fertiliser.Types.NH4N, 0);
                2003-03-17  [Fertiliser].Apply(32.8, Fertiliser.Types.NH4N, 0);
                2003-04-17  [Fertiliser].Apply(32.8, Fertiliser.Types.NH4N, 0);
                2003-05-17  [Fertiliser].Apply(32.8, Fertiliser.Types.NH4N, 0);
                2003-06-17  [Fertiliser].Apply(32.8, Fertiliser.Types.NH4N, 0);
                2003-07-17  [Fertiliser].Apply(32.8, Fertiliser.Types.NH4N, 0);
                2003-08-17  [Fertiliser].Apply(32.8, Fertiliser.Types.NH4N, 0);
                2003-09-17  [Fertiliser].Apply(32.8, Fertiliser.Types.NH4N, 0);
                2003-10-17  [Fertiliser].Apply(32.8, Fertiliser.Types.NH4N, 0);
                2003-11-17  [Fertiliser].Apply(32.8, Fertiliser.Types.NH4N, 0);
                2003-12-17  [Fertiliser].Apply(32.8, Fertiliser.Types.NH4N, 0);
                2004-01-17  [Fertiliser].Apply(32.8, Fertiliser.Types.NH4N, 0);
                2004-02-17  [Fertiliser].Apply(32.8, Fertiliser.Types.NH4N, 0);
                2004-03-17  [Fertiliser].Apply(32.8, Fertiliser.Types.NH4N, 0);
                2004-04-17  [Fertiliser].Apply(32.8, Fertiliser.Types.NH4N, 0);
                2004-05-17  [Fertiliser].Apply(32.8, Fertiliser.Types.NH4N, 0);
                2004-06-17  [Fertiliser].Apply(32.8, Fertiliser.Types.NH4N, 0);
                2004-07-17  [Fertiliser].Apply(32.8, Fertiliser.Types.NH4N, 0);
                2004-08-17  [Fertiliser].Apply(32.8, Fertiliser.Types.NH4N, 0);
                2004-09-17  [Fertiliser].Apply(32.8, Fertiliser.Types.NH4N, 0);
                2004-10-17  [Fertiliser].Apply(32.8, Fertiliser.Types.NH4N, 0);
                2004-11-17  [Fertiliser].Apply(32.8, Fertiliser.Types.NH4N, 0);
                2004-12-17  [Fertiliser].Apply(32.8, Fertiliser.Types.NH4N, 0);
                2005-01-17  [Fertiliser].Apply(32.8, Fertiliser.Types.NH4N, 0);
                2005-02-17  [Fertiliser].Apply(32.8, Fertiliser.Types.NH4N, 0);
                2005-03-17  [Fertiliser].Apply(32.8, Fertiliser.Types.NH4N, 0);
                2005-04-17  [Fertiliser].Apply(32.8, Fertiliser.Types.NH4N, 0);
                2005-05-17  [Fertiliser].Apply(32.8, Fertiliser.Types.NH4N, 0);
                2005-06-17  [Fertiliser].Apply(32.8, Fertiliser.Types.NH4N, 0);
                2005-07-17  [Fertiliser].Apply(32.8, Fertiliser.Types.NH4N, 0);
                2005-08-17  [Fertiliser].Apply(32.8, Fertiliser.Types.NH4N, 0);
                2005-09-17  [Fertiliser].Apply(32.8, Fertiliser.Types.NH4N, 0);
                2005-10-17  [Fertiliser].Apply(32.8, Fertiliser.Types.NH4N, 0);
                2005-11-17  [Fertiliser].Apply(32.8, Fertiliser.Types.NH4N, 0);
                2005-12-17  [Fertiliser].Apply(32.8, Fertiliser.Types.NH4N, 0);
                2006-01-17  [Fertiliser].Apply(32.8, Fertiliser.Types.NH4N, 0);
                2006-02-17  [Fertiliser].Apply(32.8, Fertiliser.Types.NH4N, 0);
          Simulation SantanadoParaisoBase
            Weather: FileName=SantanadoParaiso.met
            Clock: StartDate=2000-10-17; EndDate=2004-12-31
            Summary
            SoilArbitrator Soil Arbitrator
            Zone Plantation: Area=1; Slope=0
              Soil SantanadoparaisoSoil: SoilType=sand; Latitude=0; Longitude=0
                Comments=Soil data from Smethurst et al (2015) and Soares and Almeida (2001)
                InitialWater Initial water: PercentMethod=0; FractionFull=0; RelativeTo=LL15
                Water
                  Thickness  BD   AirDry  LL15   DUL    SAT
                  100        1.6  0.01    0.191  0.272  0.39
                  100        1.6  0.01    0.208  0.29   0.39
                  700        1.5  0.01    0.248  0.351  0.39
                  550        1.5  0.02    0.235  0.324  0.39
                  100        1.5  0.05    0.231  0.319  0.39
                  450        1.5  0.05    0.231  0.319  0.39
                  2000       1.5  0.05    0.231  0.319  0.39
                  26000      1.5  0.05    0.05   0.05   0.05
                  SoilCrop EucalyptusSoil: LL=[0.01, 0.01, 0.01, 0.01, 0.01, 0.01, 0.01, 0.01]; KL=[0.07, 0.07, 0.05, 0.02, 0.02, 0.02, 0.01, 0.01]; XF=[1, 1, 1, 1, 1, 1, 1, 0]
                SoilWater: SummerDate=1-Nov; SummerU=4; SummerCona=3.5; WinterDate=1-Apr; WinterU=4; WinterCona=3.5; DiffusConst=88; DiffusSlope=35.4; Salb=0.13; CN2Bare=65; CNRed=20; CNCov=0.8; slope=0; discharge_width=0; catchment_area=0; max_pond=0; ResidueInterception=0
                  Thickness  SWCON  KLAT
                  220        0.3    0
                  230        0.3    0
                  280        0.3    0
                  440        0.3    0
                  360        0.2    0
                  440        0.2    0
                  2030       0.2    0
                  26000      0.1    0
                SoilNitrogen: fom_types=[default, manure, mucuna, lablab, shemp, stable]; fract_carb=[0.2, 0.3, 0.54, 0.57, 0.45, 0]; fract_cell=[0.7, 0.3, 0.37, 0.37, 0.47, 0.1]; fract_lign=[0.1, 0.4, 0.09, 0.06, 0.08, 0.9]
                SoilOrganicMatter: RootCN=197; RootWt=1; SoilCN=12; EnrACoeff=7.4; EnrBCoeff=0.2; OCUnits=Total
                  Thickness  OC    FBiom  FInert
                  200        1.04  0.06   0.1
                  200        0.68  0.05   0.1
                  200        0.54  0.04   0.2
                  550        0.18  0.01   0.3
                  400        0.12  0.01   0.9
                  450        0.1   0.01   0.99
                  2000       0     0.01   0.99
                  26000      0     0.01   0.99
                Analysis: Thickness=[200, 200, 200, 570, 360, 440, 2030, 26000]; PH=[4.9, 4.7, 4.7, 4.8, 3.7, 3.7, 3.7, 3.7]; ParticleSizeSand=[28.6, 27, 34.7]; ParticleSizeSilt=[6, 6.7, 6.9]; ParticleSizeClay=[65.4, 66.6, 58.4]; PHUnits=Water; BoronUnits=0
                Sample Initial nitrogen: NO3Units=ppm; NH4Units=ppm; SWUnits=Volumetric; OCUnits=Total; PHUnits=Water
                  Thickness  NO3   NH4
                  220        5     2
                  230        2     2
                  280        2     1
                  440        0.01  0.01
                  360        0.01  0.01
                  440        0.01  0.01
                  2030       0     0
                  26000      0     0
                CERESSoilTemperature
              Irrigation
              Fertiliser
              SurfaceOrganicMatter: InitialResidueName=Wheat; InitialResidueType=Wheat; InitialResidueMass=2000; InitialStandingFraction=0; InitialCPR=0; InitialCNR=80; FractionFaecesAdded=0.5
              MicroClimate: a_interception=0; b_interception=1; c_interception=0; d_interception=0; soil_albedo=0.13; SoilHeatFluxFraction=0; NightInterceptionFraction=0; ReferenceHeight=0
              Plant Eucalyptus: CropType=Eucalyptus
              Manager TreeTransplantRule
                RowSpace = 3
                RowWidth = 3
                CultivarName = grandis
                SowingDate = 2001-10-17
                script: same as in Validation.Australia.CoffsHarbour.CoffsHarbour.Plantation.TreeTransplantRule
              Operations FertiliserOperations: same as Validation.Brazil.SantanadoParaiso.SantanadoParaiso.Factors.N.High
              Operations IrrigationOperations
                2001-10-17  [Irrigation].Apply(amount: 23.89);
                2001-11-17  [Irrigation].Apply(amount: 33.45);
                2001-12-17  [Irrigation].Apply(amount: 0.0);
                2002-01-17  [Irrigation].Apply(amount: 0.0);
                2002-02-17  [Irrigation].Apply(amount: 9.56);
                2002-03-17  [Irrigation].Apply(amount: 40.61);
                2002-04-17  [Irrigation].Apply(amount: 43.00);
                2002-05-17  [Irrigation].Apply(amount: 47.78);
                2002-06-17  [Irrigation].Apply(amount: 40.61);
                2002-07-17  [Irrigation].Apply(amount: 14.33);
                2002-08-17  [Irrigation].Apply(amount: 57.34);
                2002-09-17  [Irrigation].Apply(amount: 50.17);
                2002-10-17  [Irrigation].Apply(amount: 78.84);
                2002-11-17  [Irrigation].Apply(amount: 38.23);
                2002-12-17  [Irrigation].Apply(amount: 28.67);
                2003-01-17  [Irrigation].Apply(amount: 7.17);
                2003-02-17  [Irrigation].Apply(amount: 52.56);
                2003-03-17  [Irrigation].Apply(amount: 71.67);
                2003-04-17  [Irrigation].Apply(amount: 52.56);
                2003-05-17  [Irrigation].Apply(amount: 105.12);
                2003-06-17  [Irrigation].Apply(amount: 97.95);
                2003-07-17  [Irrigation].Apply(amount: 114.68);
                2003-08-17  [Irrigation].Apply(amount: 102.73);
                2003-09-17  [Irrigation].Apply(amount: 102.73);
                2003-10-17  [Irrigation].Apply(amount: 86.01);
                2003-11-17  [Irrigation].Apply(amount: 57.34);
                2003-12-17  [Irrigation].Apply(amount: 47.78);
                2004-01-17  [Irrigation].Apply(amount: 11.95);
                2004-02-17  [Irrigation].Apply(amount: 2.39);
                2004-03-17  [Irrigation].Apply(amount: 11.95);
                2004-04-17  [Irrigation].Apply(amount: 11.95);
                2004-05-17  [Irrigation].Apply(amount: 23.89);
                2004-06-17  [Irrigation].Apply(amount: 38.23);
                2004-07-17  [Irrigation].Apply(amount: 38.23);
                2004-08-17  [Irrigation].Apply(amount: 95.56);
                2004-09-17  [Irrigation].Apply(amount: 107.51);
                2004-10-17  [Irrigation].Apply(amount: 71.67);
                2004-11-17  [Irrigation].Apply(amount: 59.73);
                2004-12-17  [Irrigation].Apply(amount: 11.95);
                2005-01-17  [Irrigation].Apply(amount: 7.17);
                2005-02-17  [Irrigation].Apply(amount: 7.17);
                2005-03-17  [Irrigation].Apply(amount: 0);
                2005-04-17  [Irrigation].Apply(amount: 0);
                2005-05-17  [Irrigation].Apply(amount: 11.95);
                2005-06-17  [Irrigation].Apply(amount: 16.72);
                2005-07-17  [Irrigation].Apply(amount: 62.12);
                2005-08-17  [Irrigation].Apply(amount: 114.68);
                2005-09-17  [Irrigation].Apply(amount: 86.01);
                2005-10-17  [Irrigation].Apply(amount: 86.01);
                2005-11-17  [Irrigation].Apply(amount: 2.39);
                2005-12-17  [Irrigation].Apply(amount: 4.78);
                2006-01-17  [Irrigation].Apply(amount: 26.28);
                2006-02-17  [Irrigation].Apply(amount: 7.17);
              Report: VariableNames=[Clock].Today; EventNames=[Clock].DoReport
              SoluteManager
            Input: ErrorMessage=Please select a file to use.
      Folder Curvelo
        Memo
          These data are described in [borges2009parametrizaccao]. Two clones of the hybrid E. grandis x E. urophylla were included (C3334, C3336), but their measured differences were not significantly different. Hence, clonal differences were not simulated by specifiying partitioning targets as a genetic property.
        Experiment Curvelo
          Factors
            Factor CultC3334
              Specifications:
                [TreeTransplantRule].Script.CultivarName=grandisXurophyllaC3334
                [TreeTransplantRule].Script.SowingDate=2001-10-01
            Factor CultC3336
              Specifications:
                [TreeTransplantRule].Script.CultivarName=grandisXurophyllaC3336
                [TreeTransplantRule].Script.SowingDate=2003-01-01
          Simulation CurveloBase
            Weather: FileName=Curvelo.met
            Clock: StartDate=2001-01-01; EndDate=2008-01-01
            Summary
            SoilArbitrator Soil Arbitrator
            Zone Plantation: Area=1; Slope=0
              Soil CurveloSoil: SoilType=sand; Latitude=0; Longitude=0
                Comments=Soil data from Smethurst et al (2015) and Soares and Almeida (2001)
                InitialWater Initial water: PercentMethod=0; FractionFull=0; RelativeTo=LL15
                Water
                  Thickness  BD   AirDry  LL15  DUL   SAT
                  200        1.6  0.01    0.15  0.39  0.4
                  200        1.6  0.01    0.15  0.39  0.4
                  200        1.5  0.01    0.25  0.38  0.4
                  200        1.5  0.02    0.25  0.37  0.39
                  200        1.5  0.05    0.25  0.37  0.39
                  500        1.5  0.05    0.25  0.37  0.39
                  500        1.5  0.05    0.2   0.37  0.39
                  28000      1.5  0.05    0.2   0.37  0.39
                  SoilCrop EucalyptusSoil: LL=[0.01, 0.01, 0.01, 0.01, 0.01, 0.01, 0.01, 0.01]; KL=[0.07, 0.07, 0.07, 0.07, 0.07, 0.07, 0.07, 0.07]; XF=[1, 1, 1, 1, 1, 1, 1, 0.1]
                SoilWater: same as Validation.Brazil.SantanadoParaiso.SantanadoParaiso.SantanadoParaisoBase.Plantation.SantanadoparaisoSoil.SoilWater
                SoilNitrogen: fom_types=[default, manure, mucuna, lablab, shemp, stable]; fract_carb=[0.2, 0.3, 0.54, 0.57, 0.45, 0]; fract_cell=[0.7, 0.3, 0.37, 0.37, 0.47, 0.1]; fract_lign=[0.1, 0.4, 0.09, 0.06, 0.08, 0.9]
                SoilOrganicMatter: RootCN=197; RootWt=1; SoilCN=12; EnrACoeff=7.4; EnrBCoeff=0.2; OCUnits=Total
                  Thickness  OC     FBiom  FInert
                  220        2.45   0.06   0.1
                  230        1.225  0.05   0.1
                  280        0.61   0.05   0.1
                  440        0.3    0.02   0.2
                  360        0.15   0.02   0.5
                  440        0.07   0.01   0.8
                  2030       0      0.01   0.99
                  26000      0      0.01   0.99
                Analysis: PHUnits=Water; BoronUnits=0
                  Thickness  PH   ParticleSizeSand  ParticleSizeSilt  ParticleSizeClay
                  200        4.9  5.27              15.92             78.82
                  200        5    6.25              13.97             79.78
                  200        5    5.59              13.7              80.71
                  200        5    5.59              13.7              80.71
                  200        5    5.59              13.7              80.71
                  500        5    5.59              13.7              80.71
                  500        5    5.59              13.7              80.71
                Sample Initial nitrogen: NO3Units=ppm; NH4Units=ppm; SWUnits=Volumetric; OCUnits=Total; PHUnits=Water
                  Thickness  NO3   NH4
                  220        5     2
                  230        2     2
                  280        2     1
                  440        0.01  0.01
                  360        0.01  0.01
                  440        0.01  0.01
                  2030       0     0
                  26000      0     0
                CERESSoilTemperature
              Irrigation
              Fertiliser
              SurfaceOrganicMatter: InitialResidueName=Wheat; InitialResidueType=Wheat; InitialResidueMass=2000; InitialStandingFraction=0; InitialCPR=0; InitialCNR=80; FractionFaecesAdded=0.5
              MicroClimate: a_interception=0; b_interception=1; c_interception=0; d_interception=0; soil_albedo=0.13; SoilHeatFluxFraction=0; NightInterceptionFraction=0; ReferenceHeight=0
              Plant Eucalyptus: CropType=Eucalyptus
              Manager TreeTransplantRule
                RowSpace = 3
                RowWidth = 3
                CultivarName = grandisXurophyllaC3334
                SowingDate = 2001-10-11
                script: same as in Validation.Australia.CoffsHarbour.CoffsHarbour.Plantation.TreeTransplantRule
              Operations FertiliserOperations
                2001-10-11  [Fertiliser].Apply(150, Fertiliser.Types.NH4N, 0);
                2002-10-11  [Fertiliser].Apply(150, Fertiliser.Types.NH4N, 0);
                2003-10-11  [Fertiliser].Apply(150, Fertiliser.Types.NH4N, 0);
              Report: VariableNames=[Clock].Today; EventNames=[Clock].DoReport
              SoluteManager
      Folder Itacambira
        Memo
          These data are described in [borges2009parametrizaccao]. Two clones of the hybrid E. grandis x E. urophylla were included (C3334, C3336), but their measured differences were not significantly different. Hence, clonal differences were not simulated by specifiying partitioning targets as a genetic property.
        Experiment Itacambira
          Factors
            Factor CultC3334
              Specifications:
                [TreeTransplantRule].Script.CultivarName=grandisXurophyllaC3334
                [TreeTransplantRule].Script.SowingDate=2001-01-05
            Factor CultC3336
              Specifications:
                [TreeTransplantRule].Script.CultivarName=grandisXurophyllaC3336
                [TreeTransplantRule].Script.SowingDate=2001-03-30
          Simulation ItacambiraBase
            Weather: FileName=Itacambira.met
            Clock: StartDate=2000-04-06; EndDate=2007-12-28
            Summary
            SoilArbitrator Soil Arbitrator
            Zone Plantation: Area=1; Slope=0
              Soil ItacambiraC3334Soil: SoilType=sand; Latitude=0; Longitude=0
                Comments=Soil data from Smethurst et al (2015) and Soares and Almeida (2001)
                InitialWater Initial water: PercentMethod=0; FractionFull=0; RelativeTo=LL15
                Water
                  Thickness  BD   AirDry  LL15  DUL   SAT
                  200        1.6  0.01    0.22  0.35  0.39
                  200        1.6  0.01    0.22  0.32  0.39
                  400        1.5  0.01    0.22  0.32  0.39
                  200        1.5  0.02    0.22  0.34  0.39
                  500        1.5  0.05    0.22  0.34  0.39
                  500        1.5  0.05    0.22  0.34  0.39
                  2030       1.5  0.05    0.22  0.34  0.39
                  25970      1.5  0.05    0.05  0.05  0.05
                  SoilCrop EucalyptusSoil: LL=[0.01, 0.01, 0.01, 0.01, 0.01, 0.01, 0.01, 0.01]; KL=[0.07, 0.07, 0.05, 0.02, 0.02, 0.02, 0.01, 0.01]; XF=[1, 1, 1, 1, 1, 1, 1, 0.1]
                SoilWater: same as Validation.Brazil.SantanadoParaiso.SantanadoParaiso.SantanadoParaisoBase.Plantation.SantanadoparaisoSoil.SoilWater
                SoilNitrogen: fom_types=[default, manure, mucuna, lablab, shemp, stable]; fract_carb=[0.2, 0.3, 0.54, 0.57, 0.45, 0]; fract_cell=[0.7, 0.3, 0.37, 0.37, 0.47, 0.1]; fract_lign=[0.1, 0.4, 0.09, 0.06, 0.08, 0.9]
                SoilOrganicMatter: RootCN=197; RootWt=1; SoilCN=12; EnrACoeff=7.4; EnrBCoeff=0.2; OCUnits=Total
                  Thickness  OC    FBiom  FInert
                  220        1.4   0.06   0.1
                  230        0.7   0.05   0.1
                  280        0.3   0.04   0.2
                  440        0.18  0.01   0.3
                  360        0.12  0.01   0.9
                  440        0.1   0.01   0.99
                  2030       0     0.01   0.99
                  26000      0     0.01   0.99
                Analysis: PHUnits=Water; BoronUnits=0
                  Thickness  PH    ParticleSizeSand  ParticleSizeSilt  ParticleSizeClay
                  200        4.62  17.65             77.8              4.56
                  200        4.71  16.66             79.29             4.05
                  200        4.75  15.86             80.76             3.38
                  200        4.75  15.86             80.76             3.38
                  200        4.75  15.86             80.76             3.38
                  500        4.75  15.86             80.76             3.38
                  500        4.75  15.86             80.76             3.38
                Sample Initial nitrogen: NO3Units=ppm; NH4Units=ppm; SWUnits=Volumetric; OCUnits=Total; PHUnits=Water
                  Thickness  NO3   NH4
                  220        5     2
                  230        2     2
                  280        2     1
                  440        0.01  0.01
                  360        0.01  0.01
                  440        0.01  0.01
                  2030       0     0
                  26000      0     0
                CERESSoilTemperature
              Irrigation
              Fertiliser
              SurfaceOrganicMatter: InitialResidueName=Wheat; InitialResidueType=Wheat; InitialResidueMass=2000; InitialStandingFraction=0; InitialCPR=0; InitialCNR=80; FractionFaecesAdded=0.5
              MicroClimate: a_interception=0; b_interception=1; c_interception=0; d_interception=0; soil_albedo=0.13; SoilHeatFluxFraction=0; NightInterceptionFraction=0; ReferenceHeight=0
              Plant Eucalyptus: CropType=Eucalyptus
              Manager TreeTransplantRule
                RowSpace = 3
                RowWidth = 3
                CultivarName = grandisXurophyllaC3334
                SowingDate = 2001-01-06
                script: same as in Validation.Australia.CoffsHarbour.CoffsHarbour.Plantation.TreeTransplantRule
              Operations FertiliserOperations: same as Validation.Brazil.Curvelo.Curvelo.CurveloBase.Plantation.FertiliserOperations
              Report: VariableNames=[Clock].Today; EventNames=[Clock].DoReport
              SoluteManager
            Input: ErrorMessage=Please select a file to use.
      Folder MonteDourado
        Memo
          These data are described in [silva2006nutricao]. One clone of the hybrid _E. grandis x E. urophylla_ was included, and it was grown at two sites on contrasting soils.
        Simulation MonteDouradoClayey
          Weather: FileName=Montedourado.met
          Clock: StartDate=2000-01-01; EndDate=2005-12-31
          Summary
          SoilArbitrator Soil Arbitrator
          Zone Clayey: Area=1; Slope=0
            Soil Clayey: SoilType=sand; Latitude=0; Longitude=0
              Comments=Soil data from Smethurst et al (2015) and Soares and Almeida (2001)
              InitialWater Initial water: PercentMethod=0; FractionFull=0; RelativeTo=LL15
              Water
                Thickness  BD   AirDry  LL15  DUL   SAT
                100        1.6  0.01    0.16  0.4   0.4
                100        1.6  0.01    0.16  0.4   0.4
                200        1.5  0.01    0.16  0.4   0.4
                600        1.5  0.01    0.16  0.4   0.4
                500        1.5  0.01    0.16  0.4   0.4
                500        1.5  0.01    0.16  0.4   0.4
                2000       1.5  0.01    0.16  0.24  0.4
                26000      1.5  0.01    0.05  0.05  0.05
                SoilCrop EucalyptusSoil: LL=[0.01, 0.01, 0.01, 0.01, 0.01, 0.01, 0.01, 0.01]; KL=[0.07, 0.07, 0.05, 0.02, 0.02, 0.02, 0.01, 0.01]; XF=[1, 1, 1, 1, 1, 1, 0.1, 0.1]
              SoilWater: SummerDate=1-Nov; SummerU=4; SummerCona=3.5; WinterDate=1-Apr; WinterU=4; WinterCona=3.5; DiffusConst=88; DiffusSlope=35.4; Salb=0.13; CN2Bare=65; CNRed=20; CNCov=0.8; slope=0; discharge_width=0; catchment_area=0; max_pond=0; ResidueInterception=0
                Thickness  SWCON  KLAT
                100        0.3    0
                100        0.3    0
                200        0.3    0
                600        0.3    0
                500        0.2    0
                500        0.2    0
                2000       0.2    0
                26000      0.1    0
              SoilNitrogen: fom_types=[default, manure, mucuna, lablab, shemp, stable]; fract_carb=[0.2, 0.3, 0.54, 0.57, 0.45, 0]; fract_cell=[0.7, 0.3, 0.37, 0.37, 0.47, 0.1]; fract_lign=[0.1, 0.4, 0.09, 0.06, 0.08, 0.9]
              SoilOrganicMatter: RootCN=197; RootWt=1; SoilCN=12; EnrACoeff=7.4; EnrBCoeff=0.2; OCUnits=Total
                Thickness  OC    FBiom  FInert
                220        2.5   0.06   0.1
                230        1.25  0.05   0.1
                280        0.62  0.04   0.2
                440        0.18  0.01   0.3
                360        0.12  0.01   0.9
                440        0.1   0.01   0.99
                2030       0     0.01   0.99
                26000      0     0.01   0.99
              Analysis: Thickness=[100, 100, 200, 600, 500, 500, 2000, 26000]; PH=[4.9, 4.8, 4.7, 4.13, 4.13, 4.13, 4.13, 4.12]; PHUnits=Water; BoronUnits=0
              Sample Initial nitrogen: NO3Units=ppm; NH4Units=ppm; SWUnits=Volumetric; OCUnits=Total; PHUnits=Water
                Thickness  NO3   NH4
                220        5     2
                230        2     2
                280        2     1
                440        0.01  0.01
                360        0.01  0.01
                440        0.01  0.01
                2030       0     0
                26000      0     0
              CERESSoilTemperature
            Irrigation
            Fertiliser
            SurfaceOrganicMatter: InitialResidueName=Wheat; InitialResidueType=Wheat; InitialResidueMass=2000; InitialStandingFraction=0; InitialCPR=0; InitialCNR=80; FractionFaecesAdded=0.5
            MicroClimate: a_interception=0; b_interception=1; c_interception=0; d_interception=0; soil_albedo=0.13; SoilHeatFluxFraction=0; NightInterceptionFraction=0; ReferenceHeight=0
            Plant Eucalyptus: CropType=Eucalyptus
            Manager TreeTransplantRule
              RowSpace = 3
              RowWidth = 3
              CultivarName = grandisXurophylla
              SowingDate = 2001-01-01
              script: same as in Validation.Australia.CoffsHarbour.CoffsHarbour.Plantation.TreeTransplantRule
            Operations FertiliserOperations
              2001-01-15  [Fertiliser].Apply(10, Fertiliser.Types.NH4N, 0);
            Report: VariableNames=[Clock].Today; EventNames=[Clock].DoReport
            SoluteManager
        Simulation MonteDouradoSandy
          Weather: FileName=Montedourado.met
          Clock: StartDate=2000-01-01; EndDate=2005-12-31
          Summary
          SoilArbitrator Soil Arbitrator
          Zone Sandy: Area=1; Slope=0
            Soil Sandy: SoilType=sand; Latitude=0; Longitude=0
              Comments=Soil data from Smethurst et al (2015) and Soares and Almeida (2001)
              InitialWater Initial water: PercentMethod=0; FractionFull=0; RelativeTo=LL15
              Water
                Thickness  BD   AirDry  LL15  DUL   SAT
                100        1.6  0.01    0.06  0.25  0.39
                100        1.6  0.01    0.06  0.25  0.39
                200        1.5  0.01    0.06  0.25  0.39
                600        1.5  0.01    0.06  0.25  0.39
                500        1.5  0.01    0.06  0.25  0.39
                500        1.5  0.01    0.06  0.25  0.39
                2000       1.5  0.01    0.06  0.25  0.4
                26000      1.5  0.01    0.05  0.05  0.05
                SoilCrop EucalyptusSoil: LL=[0.01, 0.01, 0.01, 0.01, 0.01, 0.01, 0.01, 0.01]; KL=[0.07, 0.07, 0.05, 0.02, 0.02, 0.02, 0.01, 0.01]; XF=[1, 1, 1, 1, 1, 1, 0, 0]
              SoilWater: same as Validation.Brazil.MonteDourado.MonteDouradoClayey.Clayey.Clayey.SoilWater
              SoilNitrogen: fom_types=[default, manure, mucuna, lablab, shemp, stable]; fract_carb=[0.2, 0.3, 0.54, 0.57, 0.45, 0]; fract_cell=[0.7, 0.3, 0.37, 0.37, 0.47, 0.1]; fract_lign=[0.1, 0.4, 0.09, 0.06, 0.08, 0.9]
              SoilOrganicMatter: RootCN=197; RootWt=1; SoilCN=12; EnrACoeff=7.4; EnrBCoeff=0.2; OCUnits=Total
                Thickness  OC     FBiom  FInert
                220        1.1    0.06   0.1
                230        0.55   0.05   0.1
                280        0.25   0.04   0.2
                440        0.125  0.01   0.3
                360        0.07   0.01   0.9
                440        0.07   0.01   0.99
                2030       0      0.01   0.99
                26000      0      0.01   0.99
              Analysis: same as Validation.Brazil.MonteDourado.MonteDouradoClayey.Clayey.Clayey.Analysis
              Sample Initial nitrogen: NO3Units=ppm; NH4Units=ppm; SWUnits=Volumetric; OCUnits=Total; PHUnits=Water
                Thickness  NO3   NH4
                220        5     2
                230        2     2
                280        2     1
                440        0.01  0.01
                360        0.01  0.01
                440        0.01  0.01
                2030       0     0
                26000      0     0
              CERESSoilTemperature
            Irrigation
            Fertiliser
            SurfaceOrganicMatter: InitialResidueName=Wheat; InitialResidueType=Wheat; InitialResidueMass=2000; InitialStandingFraction=0; InitialCPR=0; InitialCNR=80; FractionFaecesAdded=0.5
            MicroClimate: a_interception=0; b_interception=1; c_interception=0; d_interception=0; soil_albedo=0.13; SoilHeatFluxFraction=0; NightInterceptionFraction=0; ReferenceHeight=0
            Plant Eucalyptus: CropType=Eucalyptus
            Manager TreeTransplantRule
              RowSpace = 3
              RowWidth = 3
              CultivarName = grandis
              SowingDate = 2001-01-01
              script: same as in Validation.Australia.CoffsHarbour.CoffsHarbour.Plantation.TreeTransplantRule
            Operations FertiliserOperations
              2001-01-15  [Fertiliser].Apply(10, Fertiliser.Types.NH4N, 0);
            Report: VariableNames=[Clock].Today; EventNames=[Clock].DoReport
            SoluteManager
      Folder Paulistania
        Memo
          These data are described in [melo2015responses]. One clone of the hybrid _E. grandis x E. urophylla_ was grown with 4 rates of N fertilisation.
        Experiment Paulistania
          Factors
            Factor N: Specifications=[FertiliserOperations]
              Operations 0
                2008-11-15  [Fertiliser].Apply(0, Fertiliser.Types.NH4N, 0);
              Operations 50
                2008-11-15  [Fertiliser].Apply(50, Fertiliser.Types.NH4N, 0);
              Operations 100
                2008-11-15  [Fertiliser].Apply(100, Fertiliser.Types.NH4N, 0);
              Operations 150
                2008-11-15  [Fertiliser].Apply(150, Fertiliser.Types.NH4N, 0);
          Simulation PaulistaniaBase
            Weather: FileName=Paulistania.met
            Clock: StartDate=2007-11-01; EndDate=2013-11-01
            Summary
            SoilArbitrator Soil Arbitrator
            Zone Plantation: Area=1; Slope=0
              Soil PaulistaniaSoil: SoilType=sand; Latitude=0; Longitude=0
                Comments=Soil data from Smethurst et al (2015) and Soares and Almeida (2001)
                InitialWater Initial water: PercentMethod=0; FractionFull=0; RelativeTo=LL15
                Water
                  Thickness  BD   AirDry  LL15  DUL   SAT
                  220        1.6  0.01    0.05  0.27  0.39
                  230        1.6  0.01    0.05  0.27  0.39
                  280        1.5  0.01    0.05  0.27  0.39
                  440        1.5  0.02    0.05  0.27  0.39
                  360        1.5  0.05    0.05  0.27  0.39
                  440        1.5  0.05    0.05  0.27  0.39
                  2030       1.5  0.05    0.05  0.27  0.39
                  26000      1.5  0.05    0.05  0.05  0.05
                  SoilCrop EucalyptusSoil: LL=[0.01, 0.01, 0.01, 0.01, 0.01, 0.01, 0.01, 0.01]; KL=[0.07, 0.07, 0.05, 0.02, 0.02, 0.02, 0.01, 0.01]; XF=[1, 1, 1, 1, 1, 1, 0.1, 0.1]
                SoilWater: same as Validation.Brazil.SantanadoParaiso.SantanadoParaiso.SantanadoParaisoBase.Plantation.SantanadoparaisoSoil.SoilWater
                SoilNitrogen: fom_types=[default, manure, mucuna, lablab, shemp, stable]; fract_carb=[0.2, 0.3, 0.54, 0.57, 0.45, 0]; fract_cell=[0.7, 0.3, 0.37, 0.37, 0.47, 0.1]; fract_lign=[0.1, 0.4, 0.09, 0.06, 0.08, 0.9]
                SoilOrganicMatter: RootCN=197; RootWt=1; SoilCN=12; EnrACoeff=7.4; EnrBCoeff=0.2; OCUnits=Total
                  Thickness  OC    FBiom  FInert
                  220        0.6   0.06   0.1
                  230        0.3   0.05   0.1
                  280        0.2   0.04   0.2
                  440        0.1   0.01   0.3
                  360        0.05  0.01   0.9
                  440        0.05  0.01   0.99
                  2030       0.05  0.01   0.99
                  26000      0     0.01   0.99
                Analysis: Thickness=[220, 230, 280, 440, 360, 440, 2030, 26000]; PH=[4.9, 4.7, 4.7, 4.8, 3.7, 3.7, 3.7, 3.7]; PHUnits=Water; BoronUnits=0
                Sample Initial nitrogen: NO3Units=ppm; NH4Units=ppm; SWUnits=Volumetric; OCUnits=Total; PHUnits=Water
                  Thickness  NO3   NH4
                  220        5     2
                  230        2     2
                  280        2     1
                  440        0.01  0.01
                  360        0.01  0.01
                  440        0.01  0.01
                  2030       0     0
                  26000      0     0
                CERESSoilTemperature
              Irrigation
              Fertiliser
              SurfaceOrganicMatter: InitialResidueName=Wheat; InitialResidueType=Wheat; InitialResidueMass=2000; InitialStandingFraction=0; InitialCPR=0; InitialCNR=80; FractionFaecesAdded=0.5
              MicroClimate: a_interception=0; b_interception=1; c_interception=0; d_interception=0; soil_albedo=0.13; SoilHeatFluxFraction=0; NightInterceptionFraction=0; ReferenceHeight=0
              Plant Eucalyptus: CropType=Eucalyptus
              Manager TreeTransplantRule
                RowSpace = 3
                RowWidth = 3
                CultivarName = grandisXurophylla
                SowingDate = 2008-11-01
                script: same as in Validation.Australia.CoffsHarbour.CoffsHarbour.Plantation.TreeTransplantRule
              Operations FertiliserOperations
                2008-11-15  [Fertiliser].Apply(0, Fertiliser.Types.NH4N, 0);
              Report: VariableNames=[Clock].Today; EventNames=[Clock].DoReport
              SoluteManager
      Folder Ribasdoriopardo
        Memo
          These data are described in [melo2015responses]. One clone of the hybrid _E. grandis x E. urophylla_ was grown with 4 rates of N fertilisation.
        Experiment Ribasdoriopardo
          Factors: same as Validation.Brazil.Paulistania.Paulistania.Factors
          Simulation RibasdoriopardoBase
            Weather: FileName=Ribasdoriopardo.met
            Clock: StartDate=2007-11-01; EndDate=2013-11-01
            Summary
            SoilArbitrator Soil Arbitrator
            Zone Plantation: Area=1; Slope=0
              Soil RibasdoriopardoSoil: SoilType=sand; Latitude=0; Longitude=0
                Comments=Soil data from Smethurst et al (2015) and Soares and Almeida (2001)
                InitialWater Initial water: PercentMethod=0; FractionFull=0; RelativeTo=LL15
                Water
                  Thickness  BD   AirDry  LL15  DUL   SAT
                  220        1.6  0.01    0.03  0.26  0.31
                  230        1.6  0.01    0.03  0.26  0.31
                  280        1.5  0.01    0.03  0.26  0.31
                  440        1.5  0.01    0.03  0.26  0.31
                  360        1.5  0.01    0.03  0.26  0.31
                  440        1.5  0.01    0.03  0.26  0.31
                  2030       1.5  0.01    0.03  0.26  0.31
                  26000      1.5  0.05    0.05  0.05  0.05
                  SoilCrop EucalyptusSoil: LL=[0.01, 0.01, 0.01, 0.01, 0.01, 0.01, 0.01, 0.01]; KL=[0.07, 0.07, 0.05, 0.02, 0.02, 0.02, 0.01, 0.01]; XF=[1, 1, 1, 1, 1, 1, 0, 0]
                SoilWater: same as Validation.Brazil.SantanadoParaiso.SantanadoParaiso.SantanadoParaisoBase.Plantation.SantanadoparaisoSoil.SoilWater
                SoilNitrogen: fom_types=[default, manure, mucuna, lablab, shemp, stable]; fract_carb=[0.2, 0.3, 0.54, 0.57, 0.45, 0]; fract_cell=[0.7, 0.3, 0.37, 0.37, 0.47, 0.1]; fract_lign=[0.1, 0.4, 0.09, 0.06, 0.08, 0.9]
                SoilOrganicMatter: RootCN=197; RootWt=1; SoilCN=12; EnrACoeff=7.4; EnrBCoeff=0.2; OCUnits=Total
                  Thickness  OC    FBiom  FInert
                  220        0.81  0.05   0.25
                  230        0.4   0.04   0.2
                  280        0.2   0.04   0.3
                  440        0.1   0.01   0.3
                  360        0.05  0.01   0.9
                  440        0.03  0.01   0.99
                  2030       0     0.01   0.99
                  26000      0     0.01   0.99
                Analysis: Thickness=[220, 230, 280, 440, 360, 440, 2030, 26000]; PH=[4.65, 4.65, 4.65, 4.65, 3.7, 3.7, 3.7, 3.7]; PHUnits=Water; BoronUnits=0
                Sample Initial nitrogen: NO3Units=ppm; NH4Units=ppm; SWUnits=Volumetric; OCUnits=Total; PHUnits=Water
                  Thickness  NO3   NH4
                  220        5     2
                  230        2     2
                  280        2     1
                  440        0.01  0.01
                  360        0.01  0.01
                  440        0.01  0.01
                  2030       0     0
                  26000      0     0
                CERESSoilTemperature
              Irrigation
              Fertiliser
              SurfaceOrganicMatter: InitialResidueName=Wheat; InitialResidueType=Wheat; InitialResidueMass=2000; InitialStandingFraction=0; InitialCPR=0; InitialCNR=80; FractionFaecesAdded=0.5
              MicroClimate: a_interception=0; b_interception=1; c_interception=0; d_interception=0; soil_albedo=0.13; SoilHeatFluxFraction=0; NightInterceptionFraction=0; ReferenceHeight=0
              Plant Eucalyptus: CropType=Eucalyptus
              Manager TreeTransplantRule: same as Validation.Brazil.Paulistania.Paulistania.PaulistaniaBase.Plantation.TreeTransplantRule
              Operations FertiliserOperations
                2008-01-15  [Fertiliser].Apply(0, Fertiliser.Types.NH4N, 0);
              Report: VariableNames=[Clock].Today; EventNames=[Clock].DoReport
              SoluteManager
            Input: ErrorMessage=Please select a file to use.
      Folder Mogiguacu
        Memo
          These data are described in [melo2015responses]. One clone of the hybrid _E. grandis x E. urophylla_ was grown with 4 rates of N fertilisation.
        Experiment Mogiguacu
          Factors
            Factor N: Specifications=[FertiliserOperations]
              Operations 0
                2009-11-15  [Fertiliser].Apply(0, Fertiliser.Types.NH4N, 0);
              Operations 50
                2009-11-15  [Fertiliser].Apply(50, Fertiliser.Types.NH4N, 0);
              Operations 100
                2009-11-15  [Fertiliser].Apply(100, Fertiliser.Types.NH4N, 0);
              Operations 150
                2009-11-15  [Fertiliser].Apply(150, Fertiliser.Types.NH4N, 0);
          Simulation MogiguacuBase
            Weather: FileName=Mogiguacu.met
            Clock: StartDate=2007-11-01; EndDate=2013-11-01
            Summary
            SoilArbitrator Soil Arbitrator
            Zone Plantation: Area=1; Slope=0
              Soil MogiguacuSoil: SoilType=sand; Latitude=0; Longitude=0
                Comments=Soil data from Smethurst et al (2015) and Soares and Almeida (2001)
                InitialWater Initial water: PercentMethod=0; FractionFull=0; RelativeTo=LL15
                Water
                  Thickness  BD   AirDry  LL15  DUL   SAT
                  220        1.6  0.01    0.06  0.32  0.39
                  230        1.6  0.01    0.06  0.32  0.39
                  280        1.5  0.01    0.06  0.32  0.39
                  440        1.5  0.02    0.06  0.32  0.39
                  360        1.5  0.05    0.06  0.32  0.39
                  440        1.5  0.05    0.06  0.32  0.39
                  2030       1.5  0.05    0.06  0.32  0.39
                  26000      1.5  0.05    0.06  0.05  0.05
                  SoilCrop EucalyptusSoil: LL=[0.01, 0.01, 0.01, 0.01, 0.01, 0.01, 0.01, 0.01]; KL=[0.07, 0.07, 0.05, 0.02, 0.02, 0.02, 0.01, 0.01]; XF=[1, 1, 1, 1, 1, 1, 0.1, 0.1]
                SoilWater: same as Validation.Brazil.SantanadoParaiso.SantanadoParaiso.SantanadoParaisoBase.Plantation.SantanadoparaisoSoil.SoilWater
                SoilNitrogen: fom_types=[default, manure, mucuna, lablab, shemp, stable]; fract_carb=[0.2, 0.3, 0.54, 0.57, 0.45, 0]; fract_cell=[0.7, 0.3, 0.37, 0.37, 0.47, 0.1]; fract_lign=[0.1, 0.4, 0.09, 0.06, 0.08, 0.9]
                SoilOrganicMatter: RootCN=197; RootWt=1; SoilCN=12; EnrACoeff=7.4; EnrBCoeff=0.2; OCUnits=Total
                  Thickness  OC    FBiom  FInert
                  220        0.93  0.06   0.1
                  230        0.47  0.05   0.1
                  280        0.23  0.04   0.2
                  440        0.12  0.01   0.3
                  360        0.06  0.01   0.9
                  440        0.05  0.01   0.99
                  2030       0.05  0.01   0.99
                  26000      0     0.01   0.99
                Analysis: Thickness=[220, 230, 280, 440, 360, 440, 2030, 26000]; PH=[4.55, 4.55, 4.55, 4.55, 3.7, 3.7, 3.7, 3.7]; PHUnits=Water; BoronUnits=0
                Sample Initial nitrogen: NO3Units=ppm; NH4Units=ppm; SWUnits=Volumetric; OCUnits=Total; PHUnits=Water
                  Thickness  NO3   NH4
                  220        5     2
                  230        2     2
                  280        2     1
                  440        0.01  0.01
                  360        0.01  0.01
                  440        0.01  0.01
                  2030       0     0
                  26000      0     0
                CERESSoilTemperature
              Irrigation
              Fertiliser
              SurfaceOrganicMatter: InitialResidueName=Wheat; InitialResidueType=Wheat; InitialResidueMass=2000; InitialStandingFraction=0; InitialCPR=0; InitialCNR=80; FractionFaecesAdded=0.5
              MicroClimate: a_interception=0; b_interception=1; c_interception=0; d_interception=0; soil_albedo=0.13; SoilHeatFluxFraction=0; NightInterceptionFraction=0; ReferenceHeight=0
              Plant Eucalyptus: CropType=Eucalyptus
              Manager TreeTransplantRule
                RowSpace = 3
                RowWidth = 3
                CultivarName = urophyllaXglobulus
                SowingDate = 2009-11-01
                script: same as in Validation.Australia.CoffsHarbour.CoffsHarbour.Plantation.TreeTransplantRule
              Operations FertiliserOperations
                2009-11-15  [Fertiliser].Apply(0, Fertiliser.Types.NH4N, 0);
              Report: VariableNames=[Clock].Today; EventNames=[Clock].DoReport
              SoluteManager
            Input: ErrorMessage=Please select a file to use.
      Folder Luisantonio
        Experiment Luisantonio
          Factors
            Factor N: Specifications=[FertiliserOperations]
              Operations 0
                2009-11-01  [Fertiliser].Apply(0, Fertiliser.Types.NH4N, 0);
              Operations 50
                2009-11-01  [Fertiliser].Apply(50, Fertiliser.Types.NH4N, 0);
              Operations 100
                2009-11-01  [Fertiliser].Apply(100, Fertiliser.Types.NH4N, 0);
              Operations 150
                2009-11-01  [Fertiliser].Apply(150, Fertiliser.Types.NH4N, 0);
          Simulation LuisantonioBase
            Weather: FileName=Luisantonio.met
            Clock: StartDate=2007-11-01; EndDate=2013-11-01
            Summary
            SoilArbitrator Soil Arbitrator
            Zone Plantation: Area=1; Slope=0
              Soil LuisAntonioSoil: Latitude=0; Longitude=0
                InitialWater Initial water: PercentMethod=0; FractionFull=1; RelativeTo=LL15
                Water
                  Thickness  BD   AirDry  LL15  DUL   SAT
                  220        1.6  0.01    0.04  0.27  0.39
                  230        1.6  0.01    0.04  0.27  0.39
                  280        1.5  0.01    0.04  0.27  0.39
                  440        1.5  0.02    0.04  0.27  0.39
                  360        1.5  0.02    0.04  0.27  0.39
                  440        1.5  0.02    0.04  0.27  0.39
                  2030       1.5  0.02    0.04  0.27  0.39
                  26000      1.5  0.02    0.03  0.03  0.05
                  SoilCrop EucalyptusSoil: LL=[0.01, 0.01, 0.01, 0.01, 0.01, 0.01, 0.01, 0.01]; KL=[0.07, 0.07, 0.05, 0.02, 0.02, 0.02, 0.01, 0.01]; XF=[1, 1, 1, 1, 1, 1, 0.2, 0.1]
                SoilWater: same as Validation.Brazil.SantanadoParaiso.SantanadoParaiso.SantanadoParaisoBase.Plantation.SantanadoparaisoSoil.SoilWater
                SoilNitrogen: fom_types=[default, manure, mucuna, lablab, shemp, stable]; fract_carb=[0.2, 0.3, 0.54, 0.57, 0.45, 0]; fract_cell=[0.7, 0.3, 0.37, 0.37, 0.47, 0.1]; fract_lign=[0.1, 0.4, 0.09, 0.06, 0.08, 0.9]
                SoilOrganicMatter: RootCN=197; RootWt=1; SoilCN=11; EnrACoeff=7.4; EnrBCoeff=0.2; OCUnits=Total
                  Thickness  OC    FBiom  FInert
                  220        1.2   0.06   0.01
                  230        0.7   0.06   0.01
                  280        0.28  0.06   0.01
                  440        0.14  0.04   0.3
                  360        0.07  0.01   0.9
                  440        0.04  0.01   0.99
                  2030       0     0.01   0.99
                  26000      0     0.01   0.99
                Analysis: Thickness=[220, 230, 280, 440, 360, 440, 2030, 26000]; PH=[4.2, 4.2, 4.2, 4.2, 4.2, 4.2, 4.2, 4.2]; PHUnits=Water; BoronUnits=0
                Sample Initial nitrogen: NO3Units=ppm; NH4Units=ppm; SWUnits=Volumetric; OCUnits=Total; PHUnits=Water
                  Thickness  NO3   NH4
                  220        5     2
                  230        2     2
                  280        2     1
                  440        0.01  0.01
                  360        0.01  0.01
                  440        0.01  0.01
                  2030       0     0
                  26000      0     0
                CERESSoilTemperature
              Irrigation
              Fertiliser
              SurfaceOrganicMatter: InitialResidueName=Wheat; InitialResidueType=Wheat; InitialResidueMass=2000; InitialStandingFraction=0; InitialCPR=0; InitialCNR=80; FractionFaecesAdded=0.5
              MicroClimate: a_interception=0; b_interception=1; c_interception=0; d_interception=0; soil_albedo=0.13; SoilHeatFluxFraction=0; NightInterceptionFraction=0; ReferenceHeight=0
              Plant Eucalyptus: CropType=Eucalyptus
              Manager TreeTransplantRule
                RowSpace = 3
                RowWidth = 3
                CultivarName = urophyllaXglobulus
                SowingDate = 2009-11-15
                script: same as in Validation.Australia.CoffsHarbour.CoffsHarbour.Plantation.TreeTransplantRule
              Operations FertiliserOperations
                2009-11-01  [Fertiliser].Apply(0, Fertiliser.Types.NH4N, 0);
              Report: VariableNames=[Clock].Today; EventNames=[Clock].DoReport
              SoluteManager
            Input: ErrorMessage=Please select a file to use.
        Memo
          These data are described in [melo2015responses]. One clone of the hybrid _E. grandis x E. urophylla_ was grown with 4 rates of N fertilisation.
  Folder Sensibility
    Memo
      A series of sensibility tests have been employed to test the behaviour of the model in regions not explicitly included in the previous test set.  Furthermore, these tests explore the emergent behaviour of the model under a range of changing climate, fertility and management scenarios to ensure that simulated patterns agree with expected behaviours.
    Folder MAI in SE Australia
      Memo
        Representative growth rates for Eucalyptus grandis have been published for south-eastern Australia (Victoria and South Australia) by [Wong2000].  Some of the sites within this publication had previously been used for improved pasture and had minimual fertility constraints.  Simulations for 4 sites have been presented here to capture a range of environmental conditions.  Stocking rates used at each site match those obtained at each site within the published study.  MAI at age 10 years should be approximately 10 cubic metres per annum for Mount Worth and Stockdale and approximately 20 cubic metres per annum for Tostaree and Mount Lofty.  Climate data has been taken from nearby towns and common soil properties have been used for all sites, with soil properties reflecting a relatively high state of fertility.
      Simulation MountWorth
        Weather: FileName=MountWorth.met
        Clock: StartDate=1990-01-01; EndDate=2000-12-31
        Summary
        SoilArbitrator Soil Arbitrator
        Zone Plantation: Area=1; Slope=0
          Soil: Latitude=0; Longitude=0
            InitialWater Initial water: PercentMethod=1; FractionFull=0.8
            Water: same as Validation.Australia.Gympie.Gympie.GympieBase.Plantation.Soil.Water
            SoilWater: same as Validation.Australia.Gympie.Gympie.GympieBase.Plantation.Soil.SoilWater
            SoilNitrogen: fom_types=[default, manure, mucuna, lablab, shemp, stable]; fract_carb=[0.2, 0.3, 0.54, 0.57, 0.45, 0]; fract_cell=[0.7, 0.3, 0.37, 0.37, 0.47, 0.1]; fract_lign=[0.1, 0.4, 0.09, 0.06, 0.08, 0.9]
            SoilOrganicMatter: RootCN=60; RootWt=1; SoilCN=12; EnrACoeff=7.4; EnrBCoeff=0.2; OCUnits=Total
              Thickness  OC    FBiom  FInert
              100        3     0.03   0.1
              300        2     0.02   0.2
              600        0.5   0.02   0.5
              1000       0.2   0.01   0.9
              1000       0.12  0.01   0.9
              1000       0.1   0.01   0.99
              1000       0.1   0.01   0.99
              1000       0.1   0.01   0.99
            Analysis: same as Validation.Australia.CoffsHarbour.CoffsHarbour.Plantation.Soil.Analysis
            Sample Initial nitrogen: NO3Units=ppm; NH4Units=ppm; SWUnits=Volumetric; OCUnits=Total; PHUnits=Water
              Thickness  NO3   NH4
              100        10    0.01
              300        10    0.01
              600        10    0.01
              1000       10    0.01
              1000       0.01  0.01
              1000       0.01  0.01
              1000       0.01  0.01
              1000       0.01  0.01
            CERESSoilTemperature
          Irrigation
          Fertiliser
          SurfaceOrganicMatter: InitialResidueName=Wheat; InitialResidueType=Wheat; InitialResidueMass=2000; InitialStandingFraction=0; InitialCPR=0; InitialCNR=80; FractionFaecesAdded=0.5
          MicroClimate: a_interception=0; b_interception=1; c_interception=0; d_interception=0; soil_albedo=0.13; SoilHeatFluxFraction=0; NightInterceptionFraction=0; ReferenceHeight=0
          Plant Eucalyptus: CropType=Eucalyptus
          Report SensibilityReport: VariableNames=[Clock].Today; EventNames=[Clock].DoReport
          SoluteManager
          Manager TreeThinning: same as Validation.Australia.Gympie.Gympie.GympieBase.Plantation.TreeThinning
          Manager TreeTransplantRule
            RowSpace = 4.2
            RowWidth = 3.3
            CultivarName = grandisCoffsHarbour
            SowingDate = 1990-01-01
            script: same as in Validation.Australia.CoffsHarbour.CoffsHarbour.Plantation.TreeTransplantRule
      Simulation Tostaree
        Weather: FileName=Tostaree.met
        Clock: StartDate=1990-01-01; EndDate=2000-12-31
        Summary
        SoilArbitrator Soil Arbitrator
        Zone Plantation: Area=1; Slope=0
          Soil: same as Sensibility.MAI in SE Australia.MountWorth.Plantation.Soil
          Irrigation
          Fertiliser
          SurfaceOrganicMatter: InitialResidueName=Wheat; InitialResidueType=Wheat; InitialResidueMass=2000; InitialStandingFraction=0; InitialCPR=0; InitialCNR=80; FractionFaecesAdded=0.5
          MicroClimate: a_interception=0; b_interception=1; c_interception=0; d_interception=0; soil_albedo=0.13; SoilHeatFluxFraction=0; NightInterceptionFraction=0; ReferenceHeight=0
          Plant Eucalyptus: CropType=Eucalyptus
          Manager TreeTransplantRule
            RowSpace = 3.2
            RowWidth = 3.3
            CultivarName = grandisCoffsHarbour
            SowingDate = 1990-01-01
            script: same as in Validation.Australia.CoffsHarbour.CoffsHarbour.Plantation.TreeTransplantRule
          Report SensibilityReport: VariableNames=[Clock].Today; EventNames=[Clock].DoReport
          SoluteManager
          Manager TreeThinning: same as Validation.Australia.Gympie.Gympie.GympieBase.Plantation.TreeThinning
      Simulation MountLofty
        Weather: FileName=MountLofty.met
        Clock: StartDate=1990-01-01; EndDate=2000-12-31
        Summary
        SoilArbitrator Soil Arbitrator
        Zone Plantation: Area=1; Slope=0
          Soil: same as Sensibility.MAI in SE Australia.MountWorth.Plantation.Soil
          Irrigation
          Fertiliser
          SurfaceOrganicMatter: InitialResidueName=Wheat; InitialResidueType=Wheat; InitialResidueMass=2000; InitialStandingFraction=0; InitialCPR=0; InitialCNR=80; FractionFaecesAdded=0.5
          MicroClimate: a_interception=0; b_interception=1; c_interception=0; d_interception=0; soil_albedo=0.13; SoilHeatFluxFraction=0; NightInterceptionFraction=0; ReferenceHeight=0
          Plant Eucalyptus: CropType=Eucalyptus
          Report SensibilityReport: VariableNames=[Clock].Today; EventNames=[Clock].DoReport
          SoluteManager
          Manager TreeThinning: same as Validation.Australia.Gympie.Gympie.GympieBase.Plantation.TreeThinning
          Manager TreeTransplantRule
            RowSpace = 2.1
            RowWidth = 3.3
            CultivarName = grandisCoffsHarbour
            SowingDate = 1990-01-01
            script: same as in Validation.Australia.CoffsHarbour.CoffsHarbour.Plantation.TreeTransplantRule
      Simulation Stockdale
        Weather: FileName=Stockdale.met
        Clock: StartDate=1990-01-01; EndDate=2000-12-31
        Summary
        SoilArbitrator Soil Arbitrator
        Zone Plantation: same as Sensibility.MAI in SE Australia.Tostaree.Plantation
    Folder Response to Rainfall
      Memo
        Eucalyptus should respond to changes in rainfall such that peak MAI should increase with rainfall.  Long term "climax LAI" should also increase with mean annual rainfall.  This simulation experiment explores the changes in MAI and canopy cover along a rainfall gradient within SE Queensland Australia.  Mean annual rainfall decreases from approximately 1200 mm to 660 mm.  Fertiliser is applied within the simulations to remove any confounding of results due to site fertility.  Data from [specht1972water] show that canopy cover should be almost complete for the wetter sites in this study, and decrease to approximately 50% at the drier sites.
      Experiment Climate
        Factors
          Factor Site: Specifications=[Weather]
            Weather Canungra: FileName=Canungra.met
            Weather Samford: FileName=Samford.met
            Weather Ipswich: FileName=Ipswich.met
            Weather Gatton: FileName=Gatton.met
            Weather Dalby: FileName=Dalby.met
        Simulation ClimateBase
          Weather: FileName=coffs.met
          Clock: StartDate=1970-01-01; EndDate=2015-12-31
          Summary
          SoilArbitrator Soil Arbitrator
          Zone Plantation: Area=1; Slope=0
            Irrigation
            Fertiliser
            SurfaceOrganicMatter: InitialResidueName=Wheat; InitialResidueType=Wheat; InitialResidueMass=2000; InitialStandingFraction=0; InitialCPR=0; InitialCNR=80; FractionFaecesAdded=0.5
            MicroClimate: a_interception=0; b_interception=1; c_interception=0; d_interception=0; soil_albedo=0.13; SoilHeatFluxFraction=0; NightInterceptionFraction=0; ReferenceHeight=0
            Plant Eucalyptus: CropType=Eucalyptus
            Manager TreeTransplantAndFertiliserRule
              RowSpace = 3.3
              RowWidth = 3.3
              CultivarName = grandisCoffsHarbour
              SowingDate = 1970-04-01
```csharp
using System;
using Models.Core;
using Models.PMF;
namespace Models
{
    [Serializable] 
    [System.Xml.Serialization.XmlInclude(typeof(Model))]
    public class Script : Model
    {
        [Link] Plant Plant;
        [Link] Clock Clock;
        [Link] Fertiliser Fertiliser;

        [Description("Spacing (m) between plants within rows")]
        public double RowSpace { get; set; }
        [Description("Spacing (m) between rows")]
        public double RowWidth { get; set; }

        [Description("Cultivar")]
        [Display(Type=DisplayType.CultivarName)]
        public string CultivarName { get; set; }
        [Description("Sowing Date")]
        public DateTime SowingDate { get; set; }

        [EventSubscribe("DoManagement")]
        private void OnDoManagement(object sender, EventArgs e)
        {
            double PlantPopulation = 1 / (RowWidth * RowSpace);

            if (Clock.Today.Date == SowingDate)
                Plant.Sow(population: PlantPopulation, 
                    cultivar: CultivarName, 
                    depth: 100, 
                    rowSpacing: 150);
            //Plant.Sow(... Contains the following arguements:
            //Population  double  Required  Seeds sowing/m2
            //Cultivar    string  Required  "NameOfCultivar"
            //Depth       double  Optional  Depth (mm) seed sown.   Default is 100mm 
            //MaxCover    double  Optional  Proportion (0-1) of the ground row crop will cover.   Default is 1.0
            //BudNumber   double  Optional  Number of mainstems per seed sown.  Default is 1.0
            //RowSpacing  double  Optional  Spaceing (mm) between drill rows when crop is sown.  Default is 150mm
            //CropClass   string  Optional  Crop class to instantiate when crop is sown.  Default is "Plant"

            if (Clock.Today.DayOfYear == 1)
                Fertiliser.Apply(128, Fertiliser.Types.UreaN, 100);
        }
    }
}
```
            Report SensibilityReport: VariableNames=[Clock].Today; EventNames=[Clock].DoReport
            SoluteManager
            Manager TreeThinning: same as Validation.Australia.Gympie.Gympie.GympieBase.Plantation.TreeThinning
            Soil: Latitude=0; Longitude=0
              InitialWater Initial water: PercentMethod=0; FractionFull=0.25
              Water: same as Validation.Australia.Gympie.Gympie.GympieBase.Plantation.Soil.Water
              SoilWater: same as Validation.Australia.Gympie.Gympie.GympieBase.Plantation.Soil.SoilWater
              SoilNitrogen: fom_types=[default, manure, mucuna, lablab, shemp, stable]; fract_carb=[0.2, 0.3, 0.54, 0.57, 0.45, 0]; fract_cell=[0.7, 0.3, 0.37, 0.37, 0.47, 0.1]; fract_lign=[0.1, 0.4, 0.09, 0.06, 0.08, 0.9]
              SoilOrganicMatter: same as Sensibility.MAI in SE Australia.MountWorth.Plantation.Soil.SoilOrganicMatter
              Analysis: same as Validation.Australia.CoffsHarbour.CoffsHarbour.Plantation.Soil.Analysis
              Sample Initial nitrogen: NO3Units=ppm; NH4Units=ppm; SWUnits=Volumetric; OCUnits=Total; PHUnits=Water
                Thickness  NO3   NH4
                100        0.1   0.01
                300        0.1   0.01
                600        0.1   0.01
                1000       0.1   0.01
                1000       0.01  0.01
                1000       0.01  0.01
                1000       0.01  0.01
                1000       0.01  0.01
              CERESSoilTemperature
    Folder Response to Soil Fertility
      Memo
        Site fertility is an important driver of the pattern of tree growth rates.  As site fertility declines, the long term growth rate (e.g. MAI) should also decrease, but the time to obtaining peak MAI should increase.  This sensibility test uses a single location in SE Queensland at which Eucalyptus grandis occurs naturally.  A range of soil fertility states are applied in this experiment.  Peak MAI should decrease with decreasing fertility, but the time required to achieve this should increase.
      Experiment Fertility
        DisabledSimNames=[ClimateSiteSamford, ClimateSiteIpswich, ClimateSiteGatton, ClimateSiteDalby]
        Factors
          Factor Level: Specifications=[SoilOrganicMatter]
            SoilOrganicMatter High: same as Sensibility.MAI in SE Australia.MountWorth.Plantation.Soil.SoilOrganicMatter
            SoilOrganicMatter Medium: RootCN=60; RootWt=1; SoilCN=12; EnrACoeff=7.4; EnrBCoeff=0.2; OCUnits=Total
              Thickness  OC    FBiom  FInert
              100        2     0.03   0.25
              300        1     0.02   0.5
              600        0.5   0.02   0.7
              1000       0.2   0.01   0.9
              1000       0.12  0.01   0.9
              1000       0.1   0.01   0.99
              1000       0.1   0.01   0.99
              1000       0.1   0.01   0.99
            SoilOrganicMatter Low: RootCN=60; RootWt=1; SoilCN=12; EnrACoeff=7.4; EnrBCoeff=0.2; OCUnits=Total
              Thickness  OC    FBiom  FInert
              100        1     0.03   0.5
              300        0.75  0.02   0.66
              600        0.5   0.02   0.9
              1000       0.2   0.01   0.9
              1000       0.12  0.01   0.9
              1000       0.1   0.01   0.99
              1000       0.1   0.01   0.99
              1000       0.1   0.01   0.99
        Simulation FertilityBase
          Weather: FileName=Canungra.met
          Clock: StartDate=1970-01-01; EndDate=2000-12-31
          Summary
          SoilArbitrator Soil Arbitrator
          Zone Plantation: Area=1; Slope=0
            Irrigation
            Fertiliser
            SurfaceOrganicMatter: InitialResidueName=Wheat; InitialResidueType=Wheat; InitialResidueMass=2000; InitialStandingFraction=0; InitialCPR=0; InitialCNR=80; FractionFaecesAdded=0.5
            MicroClimate: a_interception=0; b_interception=1; c_interception=0; d_interception=0; soil_albedo=0.13; SoilHeatFluxFraction=0; NightInterceptionFraction=0; ReferenceHeight=0
            Plant Eucalyptus: CropType=Eucalyptus
            Manager TreeTransplantRule
              RowSpace = 3.3
              RowWidth = 3.3
              CultivarName = grandisCoffsHarbour
              SowingDate = 1970-04-01
              script: same as in Validation.Australia.CoffsHarbour.CoffsHarbour.Plantation.TreeTransplantRule
            Report SensibilityReport: VariableNames=[Clock].Today; EventNames=[Clock].DoReport
            SoluteManager
            Manager TreeThinning: same as Validation.Australia.Gympie.Gympie.GympieBase.Plantation.TreeThinning
            Soil: same as Sensibility.Response to Rainfall.Climate.ClimateBase.Plantation.Soil
    Folder Reponse to N Fertilizer
      Memo
        Eucalyptus responses to rate of fertiliser are often asymptotic, the plateau of which is determined by other limiting factors ([rubilar2018advances]). In the sensibility tests presented here, soil from Wodonga, Australia, was used as the basis for the simulations, except soil organic C and C:N were set to represent site 1 in Columbia in [albaugh2015response] and [rubilar2018advances]. Two climates are used in these simualtions ('WodongaI0ClimateWodonga' and 'WodongaI0ClimateCoffs'. Management was set similar to site 1 in [rubilar2018advances], i.e. E grandis was fertilised at 2 years of age and the 3-year stem volume response assessed at 5 years of age. For a highly responsive site in Columbia, a plateau in growth response occurred at about 800 kg N/ha, when it was speculated that other factors became limiting.

        In 'WodongaI0ClimateWodonga', a low rainfall site (739 mm/year average longterm), the response to N was simulated to plateau at a rate  of about 800 kg N/ha. The N rate inflexion point here is similar to that in [rubilar2018advances], but the limiting factor above this N rate in this simulation was mainly water, whereas in [albaugh2015response] we can specualte that it was base cation deficiency.

        In 'WodongaI0ClimateCoffs', a high rainfall site (1635 mm/year average longterm), the water limitation was removed and the response to N has not plateaued even at a rate of 3000 kg N/ha.

        Values of MAI and other outputs are in the range of expectation.
      Experiment WodongaI0ClimateWodonga
        Factors
          Factor N: Specifications=[FertiliserOperations]
            Operations 0
              2009-11-15  [Fertiliser].Apply(0, Fertiliser.Types.NH4N, 0);
            Operations 100
              1982-08-20  [Fertiliser].Apply(Amount: 100, Type: Fertiliser.Types.NO3N)
            Operations 200
              1982-08-20  [Fertiliser].Apply(Amount: 200, Type: Fertiliser.Types.NO3N)
            Operations 400
              1982-08-20  [Fertiliser].Apply(Amount: 400, Type: Fertiliser.Types.NO3N)
            Operations 800
              1982-08-20  [Fertiliser].Apply(Amount: 800, Type: Fertiliser.Types.NO3N)
            Operations 1000
              1982-08-20  [Fertiliser].Apply(Amount: 1000, Type: Fertiliser.Types.NO3N)
            Operations 2000
              1982-08-20  [Fertiliser].Apply(Amount: 2000, Type: Fertiliser.Types.NO3N)
            Operations 3000
              1982-08-20  [Fertiliser].Apply(Amount: 3000, Type: Fertiliser.Types.NO3N)
        Simulation WodongaEgrandisNrateI0
          Clock: StartDate=1980-08-10; EndDate=1985-08-15
          Weather: FileName=wodonga.met
          Summary
          SoilArbitrator Soil Arbitrator
          Zone Plantation: Area=1; Slope=0
            Soil: Latitude=0; Longitude=0
              InitialWater Initial water: PercentMethod=1; FractionFull=0.8
              Water
                Thickness  BD    AirDry  LL15  DUL   SAT
                50         1.14  0.03    0.03  0.19  0.35
                100        1.2   0.03    0.03  0.19  0.35
                100        1.3   0.04    0.05  0.23  0.34
                100        1.45  0.04    0.05  0.27  0.34
                200        1.62  0.12    0.13  0.29  0.33
                500        1.6   0.15    0.16  0.3   0.33
                450        1.52  0.2     0.22  0.3   0.32
                1500       1.52  0.2     0.22  0.29  0.31
                SoilCrop EucalyptusSoil: LL=[0.03, 0.03, 0.04, 0.04, 0.12, 0.15, 0.2, 0.2]; KL=[0.08, 0.08, 0.07, 0.06, 0.05, 0.04, 0.01, 0.01]; XF=[1, 1, 1, 0.8, 0.8, 0.8, 0.8, 0.8]
              SoilWater: SummerDate=1-Nov; SummerU=6; SummerCona=3.5; WinterDate=1-Apr; WinterU=2; WinterCona=2; DiffusConst=44; DiffusSlope=16; Salb=0.13; CN2Bare=75; CNRed=20; CNCov=0.8; slope=0; discharge_width=0; catchment_area=0; max_pond=0; ResidueInterception=0
                Thickness  SWCON  KLAT
                50         0.9    0
                100        0.9    0
                100        0.9    0
                100        0.6    0
                200        0.6    0
                500        0.6    0
                500        0.5    0
                1450       0.5    0
              SoilNitrogen: fom_types=[default, manure, mucuna, lablab, shemp, stable]; fract_carb=[0.2, 0.3, 0.54, 0.57, 0.45, 0]; fract_cell=[0.7, 0.3, 0.37, 0.37, 0.47, 0.1]; fract_lign=[0.1, 0.4, 0.09, 0.06, 0.08, 0.9]
              SoilOrganicMatter: RootCN=60; RootWt=1; SoilCN=6; EnrACoeff=7.4; EnrBCoeff=0.2; OCUnits=Total
                Thickness  OC    FBiom  FInert
                50         1.42  0.02   0.5
                100        1.42  0.02   0.5
                100        0.96  0.01   0.85
                100        0.5   0.01   0.5
                200        0.35  0.01   0.9
                500        0.3   0.01   0.99
                500        0.08  0.01   0.99
                1450       0.06  0.01   0.99
              Analysis: Thickness=[50, 100, 100, 100, 200, 500, 500, 450]; PH=[6.05, 6.1, 6.55, 6.75, 6.9, 7.3, 7.55, 7.55]; PHUnits=Water; BoronUnits=0
              Sample Initial nitrogen: NO3Units=ppm; NH4Units=ppm; SWUnits=Volumetric; OCUnits=Total; PHUnits=Water
                Thickness  NO3   NH4
                50         0.1   0.01
                100        0.1   0.01
                100        0.1   0.01
                100        0.01  0.01
                200        0.01  0.01
                500        0.01  0.01
                500        0.01  0.01
                1450       0.01  0.01
              CERESSoilTemperature
            SoluteManager
            Irrigation
            Fertiliser
            SurfaceOrganicMatter: InitialResidueName=Wheat; InitialResidueType=Wheat; InitialResidueMass=2000; InitialStandingFraction=0; InitialCPR=0; InitialCNR=80; FractionFaecesAdded=0.5
            MicroClimate: a_interception=0; b_interception=1; c_interception=0; d_interception=0; soil_albedo=0.13; SoilHeatFluxFraction=0; NightInterceptionFraction=0; ReferenceHeight=0
            Plant Eucalyptus: CropType=Eucalyptus
            Manager TreeTransplantRule
              RowSpace = 3
              RowWidth = 3
              CultivarName = grandis
              SowingDate = 1980-08-15
              script: same as in Validation.Australia.CoffsHarbour.CoffsHarbour.Plantation.TreeTransplantRule
            Manager TreeThinning: same as Validation.Australia.Gympie.Gympie.GympieBase.Plantation.TreeThinning
            Manager Automatic irrigation based on water deficit
              FASW = 0
              WaterDeficit = 0
              AutoIrrigationOn = False
              FASWThreshold = 0.01
              FASWDepth = 600
```csharp
using System;
using Models.Core;
using System.Collections.Generic;
using System.Text;
using Models.Soils;
using Models.PMF;
using Models;
using System.Xml.Serialization;
using APSIM.Shared.Utilities;

namespace Models
{
    [Serializable] 
    public class Script : Model
    {
        public double FASW { get; set; }
        public double WaterDeficit  { get; set; }
    
        [Link] Zone zone;
        [Link] Irrigation irrigation;
        [Link] Soil soil;
        
        [Description("Auto irrigation on?")]
        public bool AutoIrrigationOn { get; set; }

        [Description("Threshold fraction available water (0-1)")]
        public double FASWThreshold { get; set; }

        [Description("Soil depth (mm) to which fraction available water is calculated")]
        public double FASWDepth { get; set; }

        [EventSubscribe("DoManagement")]
        private void OnDoManagement(object sender, EventArgs e)
        {
            CalculateFASW();
            if (AutoIrrigationOn)
            {
                if (FASW < FASWThreshold)
                {
                    double amount = 10;
                    irrigation.Apply(WaterDeficit, depth: 0);
                }
            }
        }
        
        private void CalculateFASW()
        {
            double[] LL15 = MathUtilities.Multiply(soil.LL15, soil.Thickness);
            double[] DUL = MathUtilities.Multiply(soil.DUL, soil.Thickness);
        
            int nlayr = GetLayerIndex();
            double cumdep = MathUtilities.Sum(soil.Thickness, 0, nlayr, 0.0);

            double excess_fr = MathUtilities.Divide((cumdep - FASWDepth), soil.Thickness[nlayr], 0.0);

            // note that results may be strange if swdep < ll15
            double avail_sw = (MathUtilities.Sum(soil.Water, 0, nlayr, 0.0)
                              - excess_fr * soil.Water[nlayr])
                              - (MathUtilities.Sum(LL15, 0, nlayr, 0.0)
                              - excess_fr * LL15[nlayr]);


            double pot_avail_sw = (MathUtilities.Sum(DUL, 0, nlayr, 0.0)
                                  - excess_fr * DUL[nlayr])
                                  - (MathUtilities.Sum(LL15, 0, nlayr, 0.0)
                                  - excess_fr * LL15[nlayr]);

            FASW = MathUtilities.Divide(avail_sw, pot_avail_sw, 0.0);
            WaterDeficit = MathUtilities.Constrain(pot_avail_sw - avail_sw, 0.0, 100000);
        }

        private int GetLayerIndex()
        {
            double[] cumThickness = Soil.ToCumThickness(soil.Thickness);
            for (int i = 1; i < cumThickness.Length; i++)
            {
                if (FASWDepth < cumThickness[i])
                    return i - 1;
            }
            
            return cumThickness.Length - 1;
        }

    }
}
```
            Operations Management
              1980-08-20  [Fertiliser].Apply(Amount: 0, Type: Fertiliser.Types.NO3N)
              1981-08-20  [Fertiliser].Apply(Amount: 20, Type: Fertiliser.Types.NO3N)
              1982-08-20  [Fertiliser].Apply(Amount: 0, Type: Fertiliser.Types.NO3N)
              1983-08-20  [Fertiliser].Apply(Amount: 0, Type: Fertiliser.Types.NO3N)
              1984-08-20  [Fertiliser].Apply(Amount: 0, Type: Fertiliser.Types.NO3N)
              1985-08-20  [Fertiliser].Apply(Amount: 0, Type: Fertiliser.Types.NO3N)
              1986-08-20  [Fertiliser].Apply(Amount: 0, Type: Fertiliser.Types.NO3N)
              1987-08-20  [Fertiliser].Apply(Amount: 0, Type: Fertiliser.Types.NO3N)
              1988-08-20  [Fertiliser].Apply(Amount: 0, Type: Fertiliser.Types.NO3N)
              1989-08-20  [Fertiliser].Apply(Amount: 0, Type: Fertiliser.Types.NO3N)
              1990-08-20  [Fertiliser].Apply(Amount: 0, Type: Fertiliser.Types.NO3N)
              1991-08-20  [Fertiliser].Apply(Amount: 0, Type: Fertiliser.Types.NO3N)
              1992-08-20  [Fertiliser].Apply(Amount: 0, Type: Fertiliser.Types.NO3N)
              1993-08-20  [Fertiliser].Apply(Amount: 0, Type: Fertiliser.Types.NO3N)
              1994-08-20  [Fertiliser].Apply(Amount: 0, Type: Fertiliser.Types.NO3N)
              1995-08-20  [Fertiliser].Apply(Amount: 0, Type: Fertiliser.Types.NO3N)
              1996-08-20  [Fertiliser].Apply(Amount: 0, Type: Fertiliser.Types.NO3N)
            Operations FertiliserOperations
              1980-08-20  [Fertiliser].Apply(Amount: 0, Type: Fertiliser.Types.NO3N)
              1981-08-20  [Fertiliser].Apply(Amount: 0, Type: Fertiliser.Types.NO3N)
              1982-08-20  [Fertiliser].Apply(Amount: 0, Type: Fertiliser.Types.NO3N)
              1983-08-20  [Fertiliser].Apply(Amount: 0, Type: Fertiliser.Types.NO3N)
              1984-08-20  [Fertiliser].Apply(Amount: 0, Type: Fertiliser.Types.NO3N)
              1985-08-20  [Fertiliser].Apply(Amount: 0, Type: Fertiliser.Types.NO3N)
              1986-08-20  [Fertiliser].Apply(Amount: 0, Type: Fertiliser.Types.NO3N)
              1987-08-20  [Fertiliser].Apply(Amount: 0, Type: Fertiliser.Types.NO3N)
              1988-08-20  [Fertiliser].Apply(Amount: 0, Type: Fertiliser.Types.NO3N)
              1989-08-20  [Fertiliser].Apply(Amount: 0, Type: Fertiliser.Types.NO3N)
              1990-08-20  [Fertiliser].Apply(Amount: 0, Type: Fertiliser.Types.NO3N)
              1991-08-20  [Fertiliser].Apply(Amount: 0, Type: Fertiliser.Types.NO3N)
              1992-08-20  [Fertiliser].Apply(Amount: 0, Type: Fertiliser.Types.NO3N)
              1993-08-20  [Fertiliser].Apply(Amount: 0, Type: Fertiliser.Types.NO3N)
              1994-08-20  [Fertiliser].Apply(Amount: 0, Type: Fertiliser.Types.NO3N)
              1995-08-20  [Fertiliser].Apply(Amount: 0, Type: Fertiliser.Types.NO3N)
              1996-08-20  [Fertiliser].Apply(Amount: 0, Type: Fertiliser.Types.NO3N)
            Report SensibilityReport: VariableNames=[Clock].Today; EventNames=[Clock].DoReport
      Experiment WodongaI0ClimateCoffs
        Factors: same as Sensibility.Reponse to N Fertilizer.WodongaI0ClimateWodonga.Factors
        Simulation WodongaEgrandisNrateI0ClimateCoffs
          Clock: StartDate=1980-08-10; EndDate=1990-08-15
          Weather: FileName=coffs.met
          Summary
          SoilArbitrator Soil Arbitrator
          Zone Plantation: same as Sensibility.Reponse to N Fertilizer.WodongaI0ClimateWodonga.WodongaEgrandisNrateI0.Plantation
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