Simulations: Version=87
  Replacements
    Manager CuttingManagement
      LeafRemovalWt = 0
      StemRemovalWt = 0
      TotalRemovalWt = 0
```csharp
using System.Xml.Serialization;
using Models.PMF.Interfaces;
using Models.PMF;
using Models.Core;
using System.Collections.Generic;
using System;

namespace Models
{
    [Serializable] 
    [System.Xml.Serialization.XmlInclude(typeof(Model))]
    public class Script : Model
    {
        [Link(ByName = true)] Plant Gliricidia;
        [Link] Clock Clock;

    
        [XmlIgnore] private RemovalFractions Remove { get; set; }

        [Description("Leaf Removal Wt")]
        public double LeafRemovalWt {get; set;}


        [Description("Stem Removal Wt")]
        public double StemRemovalWt {get; set;}

        [Description("Total Removal Wt")]
        public double TotalRemovalWt {get; set;}

        [EventSubscribe("Commencing")]
        private void OnSimulationCommencing(object sender, EventArgs e)
        {
            Remove = new RemovalFractions();
        }

        [EventSubscribe("StartOfDay")]
        private void OnStartOfDay(object sender, EventArgs e)
        {

        LeafRemovalWt = 0;
        StemRemovalWt = 0;
        TotalRemovalWt = 0;
        }

        public void DoCut(double LeafResidue, double StemResidue)
        {
            double L = (double)Apsim.Get(Gliricidia, "Leaf.Live.Wt");
            double LeafRemovalFraction = 0;

            if (L > 0)
                LeafRemovalFraction = (L - LeafResidue) / L;
                LeafRemovalWt = (L - LeafResidue);
            if (LeafRemovalFraction < 0)
                LeafRemovalFraction = 0;
               
            double S = (double)Apsim.Get(Gliricidia, "Stem.Live.Wt");
            double StemRemovalFraction = 0;

            if (S > 0)
                StemRemovalFraction = (S - StemResidue) / S; 
                StemRemovalWt = (S - StemResidue);              
            if (StemRemovalFraction < 0)
                StemRemovalFraction = 0;

            TotalRemovalWt = LeafRemovalWt + StemRemovalWt;
               
            Remove.SetFractionToRemove("Leaf", LeafRemovalFraction);
            Remove.SetFractionToRemove("Stem", StemRemovalFraction);
            Remove.SetFractionToResidue("Leaf", 0.0);
            Remove.SetFractionToResidue("Stem", 0.0);
            Gliricidia.RemoveBiomass("Cut", Remove);
        }
        
    }
}
```
    Report GliricidiaDailyReport: EventNames=[Clock].DoReport
      VariableNames:
        [Clock].Today
        [Zone].Area
        [Soil].SoilWater.Es
        sum([Soil].Nutrient.NO3.kgha) as TotalNO3N
        sum([Soil].Nutrient.NH4.kgha) as TotalNH4N
        sum([Soil].SoilWater.SWmm) as SWTotal
        [Soil].SoilWater.SW[2] as SW30cm
        [Soil].SoilWater.SW[3] as SW50cm
        [Soil].SoilWater.SW[4] as SW70cm
        [Soil].Nutrient.NO3.ppm[1] as NO3ppm10cm
        [Soil].Nutrient.NO3.ppm[2] as NO3ppm30cm
        [Soil].Nutrient.NO3.ppm[3] as NO3ppm50cm
        [Soil].Nutrient.NO3.kgha[1] as NO3kgpha10cm
        [Soil].Nutrient.NO3.kgha[2] as NO3kgpha30cm
        [Soil].Nutrient.NO3.kgha[3] as NO3kgpha50cm
        [Soil].SoilWater.Eo
        [Soil].FBiom[1] as FBiom10cm
        [Soil].SoilWater.SW[1] as SurfaceSW
        [SurfaceOrganicMatter].Wt
        [Gliricidia].Leaf.LAI
        [Gliricidia].Leaf.Fn
        [Gliricidia].Leaf.Live.NConc
        [Gliricidia].Leaf.MaximumNConc.FixedValue
        [Gliricidia].Leaf.MinimumNConc.FixedValue
        [Gliricidia].Leaf.Fw
        [Gliricidia].Leaf.Live.Wt
        [Gliricidia].Leaf.Live.Wt
        [Gliricidia].Stem.Live.Wt
        [Gliricidia].Root.Live.Wt
        [Gliricidia].Root.TotalDMDemand
        [Gliricidia].AboveGround.Wt
        [Gliricidia].Leaf.CoverTotal
        [Gliricidia].Leaf.Live.Wt
        [Gliricidia].Leaf.Dead.Wt
        [Gliricidia].Leaf.Detached.Wt
        sum of [Gliricidia].Leaf.Detached.Wt from [Gliricidia].Cutting to [Clock].Today as CumulativeLitterFall
        [Gliricidia].Stem.Live.Wt
        [Gliricidia].Stem.Dead.Wt
        [Gliricidia].Stem.Detached.Wt
        [Gliricidia].Stem.Dead.Wt
        [Gliricidia].Nodule.FixationRate
        [Gliricidia].Nodule.NFixed
        [Gliricidia].Stem.Live.StorageWt
        [Gliricidia].Stem.Live.StructuralWt
        [Gliricidia].Stem.Live.StorageN
        [Gliricidia].Stem.Live.StructuralN
        [Gliricidia].Leaf.Photosynthesis
        [Gliricidia].Leaf.Detached.Wt
        [CuttingManagement].Script.StemRemovalWt
        [CuttingManagement].Script.LeafRemovalWt
        [CuttingManagement].Script.TotalRemovalWt
    Report GlircidiaAnnualOutput: EventNames=[Clock].EndOfYear
      VariableNames:
        [Clock].Today
        [Clock].Today.Year
        [Gliricidia].Age
        [Gliricidia].LAI
        sum of [CuttingManagement].Script.TotalRemovalWt from 1-Jan to 31-Dec as AnnualTotalRemovalWt
        sum of [Gliricidia].Nodule.NFixed from 1-Jan to 31-Dec as NFixedAnnualgpm2
    Report MaizeDailyReport: EventNames=[Clock].DoReport
      VariableNames:
        [Clock].Today
        [Clock].Today.DayOfYear
        [Zone].Area
        [Soil].SoilWater.Es
        ([Soil].Nutrient.NO3.kgha[1]+[Soil].Nutrient.NH4.kgha[1]) as SurfaceMineralN
        ([Soil].Nutrient.NO3.kgha[2]+[Soil].Nutrient.NH4.kgha[2]) as Soil2MineralN
        ([Soil].Nutrient.NO3.kgha[3]+[Soil].Nutrient.NH4.kgha[3]) as Soil3MineralN
        ([Soil].Nutrient.NO3.kgha[4]+[Soil].Nutrient.NH4.kgha[4]) as Soil4MineralN
        ([Soil].Nutrient.NO3.kgha[3]+[Soil].Nutrient.NH4.kgha[3]+[Soil].Nutrient.NO3.kgha[4]+[Soil].Nutrient.NH4.kgha[4]) as SubsurfaceMineralN
        sum([Soil].Nutrient.NO3.kgha) as TotalNO3N
        sum([Soil].Nutrient.NH4.kgha) as TotalNH4N
        sum([Soil].SoilWater.SWmm[1:10]) as SW200cm
        [Soil].SoilWater.SW[2] as SW30cm
        [Soil].SoilWater.SW[3] as SW50cm
        [Soil].SoilWater.SW[4] as SW70cm
        [Soil].Nutrient.NO3.ppm[1] as NO3ppm10cm
        [Soil].Nutrient.NO3.ppm[2] as NO3ppm30cm
        [Soil].Nutrient.NO3.ppm[3] as NO3ppm50cm
        [Soil].Nutrient.NO3.kgha[1] as NO3kgpha10cm
        [Soil].Nutrient.NO3.kgha[2] as NO3kgpha30cm
        [Soil].Nutrient.NO3.kgha[3] as NO3kgpha50cm
        [Soil].SoilWater.LeachNO3
        [Soil].SoilWater.FlowNO3
        [SurfaceOrganicMatter].Wt
        [Soil].SoilWater.Eo
        [Soil].FBiom[1] as FBiom10cm
        [Soil].SoilWater.SW[1] as SurfaceSW
        [Maize].Leaf.Fw
        [Maize].Leaf.Fn
        [Maize].Root.Depth
        [Maize].Grain.Live.Wt as GrainWt
        [Maize].Phenology.DaysAfterSowing
        [Maize].Phenology.LeafAppearance.FractionComplete
        [Maize].Leaf.ExpandedCohortNo
    Report MaizeHarvestReport: EventNames=[Maize].Harvesting
      VariableNames:
        [Clock].Today
        [Clock].Today.Year as Year
        [Zone].Area
        [Maize].SowingData.Population
        [Maize].SowingDate.DayOfYear
        [Maize].Phenology.CurrentStageName as Stage
        [Maize].Grain.Wt
        [Maize].Stem.Live.Wt
        [Maize].EarLive.Wt
        [Maize].Leaf.Live.Wt
        [Maize].Root.Live.Wt
        [Maize].Husk.Live.Wt
        [Maize].Rachis.Live.Wt
        [Maize].EarLive.N
        [Maize].Grain.Live.N
        [Maize].Stem.Live.N
        [Maize].Leaf.Live.N
        [Maize].Root.Live.N
        [Maize].Root.Depth
        [Maize].AboveGround.N
        [Maize].AboveGround.Wt
        [Maize].Total.N
        [Maize].Total.Wt
        'max of [Maize].Leaf.LAI from [Maize].Sowing to [Maize].Harvesting as LAImax
        [Maize].Grain.Number
        [Maize].Grain.Size
        [Maize].Population
    Plant Gliricidia: CropType=Gliricidia; IsAlive=false; IsEnding=false; DaysAfterEnding=0
      AccumulateFunction Age: StartStageName=Emergence; EndStageName=Old; FractionRemovedOnCut=0; FractionRemovedOnHarvest=0; FractionRemovedOnGraze=0; FractionRemovedOnPrune=0
        Memo
          Age is the age of the planting in years.
        DivideFunction day
          Constant One: FixedValue=1
          Constant DaysPerYear: FixedValue=365
      Phenology
        StageBasedInterpolation StageCode: Stages=[Emergence, EndJuvenile, Maturity, Old]; Codes=[1, 2, 3, 4]; Proportional=true
        Constant ThermalTime: FixedValue=1
          Memo
            This model uses standard days rather than a thermal time and so a value of 1 is used for each day.
        GerminatingPhase Germinating: Start=Sowing; End=Germination
        EmergingPhase Emerging: ShootLag=1; ShootRate=0; Start=Germination; End=Emergence; TTForTimeStep=0
          VariableReference ThermalTime: VariableName=[Phenology].ThermalTime
        GenericPhase Juvenile: Start=Emergence; End=EndJuvenile
          Constant Progression: FixedValue=1
          Constant Target: FixedValue=365
        GenericPhase Mature: Start=EndJuvenile; End=Maturity
          Constant Progression: FixedValue=1
          Constant Target: FixedValue=1825
        GenericPhase Declining: Start=Maturity; End=Old
          Constant Progression: FixedValue=1
          Constant Target: FixedValue=27010
        EndPhase Old: Start=Old; End=Unused
          Constant ThermalTime: FixedValue=1
      OrganArbitrator Arbitrator
        BiomassTypeArbitrator DMArbitration
          Folder PotentialPartitioningMethods
            ReallocationMethod
            AllocateFixationMethod
            RetranslocationMethod
            SendPotentialDMAllocationsMethod
          Folder AllocationMethods
            NutrientConstrainedAllocationMethod
            DryMatterAllocationsMethod
          RelativeAllocation ArbitrationMethod
        BiomassTypeArbitrator NArbitration
          Folder PotentialPartitioningMethods
            ReallocationMethod
          Folder ActualPartitioningMethods
            AllocateFixationMethod
            RetranslocationMethod
          Folder AllocationMethods
            NitrogenAllocationsMethod
          RelativeAllocation ArbitrationMethod
          AllocateUptakesMethod
        WaterUptakeMethod
        NitrogenUptakeMethod
      CompositeBiomass AboveGround: Propertys=[[Leaf].Live, [Leaf].Dead, [Stem].Live, [Stem].Dead]; DMDOfStructural=0.6
      CompositeBiomass BelowGround: Propertys=[[Root].Live, [Root].Dead]; DMDOfStructural=0.6
      CompositeBiomass Total: DMDOfStructural=0.6
        Propertys=[[Leaf].Live, [Leaf].Dead, [Stem].Live, [Stem].Dead, [Root].Live, [Root].Dead]
      CompositeBiomass TotalLive: Propertys=[[Leaf].Live, [Stem].Live, [Root].Live]; DMDOfStructural=0.6
      DivideFunction IndividualTreeLiveWt
        VariableReference LiveWt: VariableName=[Gliricidia].TotalLive.Wt
        VariableReference Population: VariableName=[Gliricidia].Population
      CompositeBiomass TotalDead: Propertys=[[Leaf].Dead, [Stem].Dead, [Root].Dead]; DMDOfStructural=0.6
      PerennialLeaf Leaf: MaintenanceRespiration=0; GrowthRespiration=0; Albedo=0.18; Gsmax350=0.015; R50=150; LAI=0; Height=0; FRGR=0; PotentialEP=0; WaterDemand=0
        MultiplyFunction InitialWtFunction
          Constant InitialPlantWt: FixedValue=1; Units=g/plant
          VariableReference Population: VariableName=[Plant].Population
        Constant LaiDeadFunction: FixedValue=0; Units=m^2/m^2
          Memo
            This model assumes that all senesced leaves detach immediately.
        MultiplyFunction Photosynthesis
          Constant RUE: FixedValue=1.2
            Memo
              Value of 1.06 g/MJ for above ground growth from [HarringtonAndFownes1995] is increased to account for biomass partitioning to below-ground organs.
          RUECO2Function FCO2: PhotosyntheticPathway=C3
          VariableReference InterceptedRadiation: VariableName=[Leaf].RadIntTot
          VariableReference WaterStressFactor: VariableName=[Leaf].Fw
          VariableReference Frgr: VariableName=[Leaf].FRGRFunction
        MinimumFunction FRGRFunction
          AirTemperatureFunction FRGRFunctionTemp
            XYPairs: X=[0, 10, 32, 42]; Y=[0, 1, 1, 0]
          VariableReference NitrogenStressFactor: VariableName=[Leaf].Fn
        Constant ExtinctionCoefficient: FixedValue=0.57
          Memo
            Value is taken from [HarringtonAndFownes1995].
        VariableReference ExtinctionCoefficientDead: VariableName=[ExtinctionCoefficient]
          Memo
            Use same value as determined for live leaves.
        LinearInterpolationFunction HeightFunction
          XYPairs: X=[60, 2000]; Y=[250, 2500]
          VariableReference XValue: VariableName=[Phenology].Stage
        Constant MaximumNConc: FixedValue=0.07
        Constant MinimumNConc: FixedValue=0.03
        Constant NReallocationFactor: FixedValue=0
        Constant SenescenceRate: FixedValue=0
        BiomassRemoval BiomassRemovalDefaults
          OrganBiomassRemovalType Harvest: FractionLiveToRemove=0; FractionDeadToRemove=0; FractionLiveToResidue=0.98; FractionDeadToResidue=1
          OrganBiomassRemovalType Cut: FractionLiveToRemove=0; FractionDeadToRemove=0; FractionLiveToResidue=0.98; FractionDeadToResidue=1
          OrganBiomassRemovalType Prune: FractionLiveToRemove=0; FractionDeadToRemove=0; FractionLiveToResidue=0.46; FractionDeadToResidue=1
          OrganBiomassRemovalType Graze: FractionLiveToRemove=0; FractionDeadToRemove=0; FractionLiveToResidue=0; FractionDeadToResidue=0
          OrganBiomassRemovalType Thin: FractionLiveToRemove=0; FractionDeadToRemove=0; FractionLiveToResidue=0; FractionDeadToResidue=0
        Constant LeafResidenceTime: FixedValue=184
          Memo
            Assume leaves have a life span of approximately half a year.
        Constant DMConversionEfficiency: FixedValue=1
        Constant LeafDetachmentTime: FixedValue=1
          Memo
            This model assumes that all leaves detach upon senescence.
        Constant DMRetranslocationFactor: FixedValue=0
        Constant NRetranslocationFactor: FixedValue=0
        Constant LeafKillFraction: FixedValue=0
        Constant MinimumLAI: FixedValue=0.1
        Constant SpecificLeafAreaFunction: FixedValue=0.01; Units=m^2/g
        Constant CarbonConcentration: FixedValue=0.4
        Constant LeafDevelopmentRate: FixedValue=1
          Memo
            Leaf cohorts age according to a simple aggregation of time (ie no accounting for differing rates of development with temperature or stress).
        BiomassDemand DMDemands
          MultiplyFunction Structural
            PartitionFractionDemandFunction DMDemandFunction
              Constant PartitionFraction: FixedValue=0.29
            Constant StructuralFraction: FixedValue=1
          Constant Metabolic: FixedValue=0
          StorageDMDemandFunction Storage
            SubtractFunction StorageFraction
              Constant One: FixedValue=1
              VariableReference StructuralFraction: VariableName=[Leaf].DMDemands.Structural.StructuralFraction
        BiomassDemand NDemands
          MultiplyFunction Structural
            VariableReference MinNconc: VariableName=[Leaf].minimumNconc
            VariableReference PotentialDMAllocation: VariableName=[Leaf].potentialDMAllocation.Structural
          MultiplyFunction Metabolic
            SubtractFunction MetabolicNconc
              VariableReference CritNconc: VariableName=[Leaf].criticalNConc
              VariableReference MinNconc: VariableName=[Leaf].minimumNconc
            VariableReference PotentialDMAllocation: VariableName=[Leaf].potentialDMAllocation.Structural
          StorageNDemandFunction Storage
            VariableReference MaxNconc: VariableName=[Leaf].MaximumNConc
            Constant NitrogenDemandSwitch: FixedValue=1
        ExpressionFunction CO2internal: Expression=(163 - [IWeather].MeanT)/(5 - 0.1*[IWeather].MeanT)
        DivideFunction StomatalConductanceCO2Modifier
          VariableReference FCO2: VariableName=[Leaf].Photosynthesis.FCO2
          ExpressionFunction RelativeCO2Gradient
            Expression=([IWeather].CO2 - [Leaf].CO2internal)/(350 - [Leaf].CO2internal)
      Root: GrowthRespiration=0; MaintenanceRespiration=0; RootAngle=45
        PhaseBasedSwitch NitrogenDemandSwitch: Start=Emergence; End=Old
        Constant RootFrontVelocity: FixedValue=10
        Constant SenescenceRate: FixedValue=0.005
        Constant MaximumNConc: FixedValue=0.03
        Constant MinimumNConc: FixedValue=0.01
        Constant MaxDailyNUptake: FixedValue=6
        Constant MaximumRootDepth: FixedValue=10000
        Constant KLModifier: FixedValue=1
          Memo
            This model does not account for any change in potential water uptake with plant development.
        Constant KNO3: FixedValue=0.03
          Memo
            This model does not account for any change in potential NO3 uptake with plant development.
        Constant KNH4: FixedValue=0
          Memo
            This model does not account for any change in potential NH4 uptake with plant development.
        LinearInterpolationFunction NUptakeSWFactor
          XYPairs: X=[0, 1]; Y=[0, 1]
          VariableReference XValue: VariableName=[Root].RWC
        Constant InitialDM: FixedValue=5; Units=g/plant
        Constant SpecificRootLength: FixedValue=100; Units=m/g
        BiomassRemoval BiomassRemovalDefaults
          OrganBiomassRemovalType Harvest: FractionLiveToRemove=0; FractionDeadToRemove=0; FractionLiveToResidue=0; FractionDeadToResidue=0
          OrganBiomassRemovalType Cut: FractionLiveToRemove=0; FractionDeadToRemove=0; FractionLiveToResidue=0; FractionDeadToResidue=0
          OrganBiomassRemovalType Prune: FractionLiveToRemove=0; FractionDeadToRemove=0; FractionLiveToResidue=0; FractionDeadToResidue=0
          OrganBiomassRemovalType Graze: FractionLiveToRemove=0; FractionDeadToRemove=0; FractionLiveToResidue=0; FractionDeadToResidue=0
          OrganBiomassRemovalType Thin: FractionLiveToRemove=0; FractionDeadToRemove=0; FractionLiveToResidue=0; FractionDeadToResidue=0
        Constant DMConversionEfficiency: FixedValue=1
        Constant MaintenanceRespirationFunction: FixedValue=1
        Constant RemobilisationCost: FixedValue=0
        Constant CarbonConcentration: FixedValue=0.4
        BiomassDemand DMDemands
          MultiplyFunction Structural
            PartitionFractionDemandFunction DMDemandFunction
              Constant PartitionFraction: FixedValue=0.03
            Constant StructuralFraction: FixedValue=0.7; Units=g/g
          Constant Metabolic: FixedValue=0
          StorageDMDemandFunction Storage
            SubtractFunction StorageFraction
              Constant One: FixedValue=1
              VariableReference StructuralFraction: VariableName=[Root].DMDemands.Structural.StructuralFraction
        BiomassDemand NDemands
          MultiplyFunction Structural
            VariableReference MinNconc: VariableName=[Root].minimumNconc
            VariableReference PotentialDMAllocation: VariableName=[Root].potentialDMAllocation.Structural
          MultiplyFunction Metabolic
            SubtractFunction MetabolicNconc
              VariableReference CritNconc: VariableName=[Root].criticalNConc
              VariableReference MinNconc: VariableName=[Root].minimumNconc
            VariableReference PotentialDMAllocation: VariableName=[Root].potentialDMAllocation.Structural
          StorageNDemandFunction Storage
            VariableReference NitrogenDemandSwitch: VariableName=[Root].nitrogenDemandSwitch
            VariableReference MaxNconc: VariableName=[Root].maximumNconc
        VariableReference CriticalNConc: VariableName=[Root].MinimumNConc
      GenericOrgan Stem: IsAboveGround=true
        Constant NReallocationFactor: FixedValue=0
        Constant NRetranslocationFactor: FixedValue=0.05
        PhaseBasedSwitch NitrogenDemandSwitch: Start=Emergence; End=Old
        Constant DMRetranslocationFactor: FixedValue=0
        Constant SenescenceRate: FixedValue=0; Units=/d
        Constant MaximumNConc: FixedValue=0.003
          Memo
            Value taken from [Thomasetal1991].
        Constant MinimumNConc: FixedValue=0.0014
        Constant InitialWtFunction: FixedValue=1; Units=g/m^2
        Constant DetachmentRateFunction: FixedValue=0; Units=/d
        BiomassRemoval BiomassRemovalDefaults
          OrganBiomassRemovalType Harvest: FractionLiveToRemove=0; FractionDeadToRemove=0; FractionLiveToResidue=0.7; FractionDeadToResidue=0.7
          OrganBiomassRemovalType Cut: FractionLiveToRemove=0; FractionDeadToRemove=0; FractionLiveToResidue=0.1; FractionDeadToResidue=0
          OrganBiomassRemovalType Prune: FractionLiveToRemove=0; FractionDeadToRemove=0; FractionLiveToResidue=0; FractionDeadToResidue=0
          OrganBiomassRemovalType Graze: FractionLiveToRemove=0; FractionDeadToRemove=0; FractionLiveToResidue=0; FractionDeadToResidue=0
          OrganBiomassRemovalType Thin: FractionLiveToRemove=0; FractionDeadToRemove=0; FractionLiveToResidue=0; FractionDeadToResidue=0
        Constant MaintenanceRespirationFunction: FixedValue=0; Units=0-1
        Constant DMConversionEfficiency: FixedValue=1; Units=0-1
        Constant DMReallocationFactor: FixedValue=0
        VariableReference CriticalNConc: VariableName=[Stem].MinimumNConc
        Constant RemobilisationCost: FixedValue=0
        Constant CarbonConcentration: FixedValue=0.4
        BiomassDemand DMDemands
          MultiplyFunction Structural
            AllometricDemandFunction DMDemandFunction: Const=0.0345; Power=1.36
              VariableReference XValue: VariableName=[AboveGround].Wt
              VariableReference YValue: VariableName=[Stem].Live.Wt
            Constant StructuralFraction: FixedValue=0.7; Units=g/g
          Constant Metabolic: FixedValue=0
          StorageDMDemandFunction Storage
            SubtractFunction StorageFraction
              Constant One: FixedValue=1
              VariableReference StructuralFraction: VariableName=[Stem].DMDemands.Structural.StructuralFraction
        BiomassDemand NDemands
          MultiplyFunction Structural
            VariableReference MinNconc: VariableName=[Stem].minimumNconc
            VariableReference PotentialDMAllocation: VariableName=[Stem].potentialDMAllocation.Structural
          MultiplyFunction Metabolic
            SubtractFunction MetabolicNconc
              VariableReference CritNconc: VariableName=[Stem].criticalNConc
              VariableReference MinNconc: VariableName=[Stem].minimumNconc
            VariableReference PotentialDMAllocation: VariableName=[Stem].potentialDMAllocation.Structural
          StorageNDemandFunction Storage
            VariableReference NitrogenDemandSwitch: VariableName=[Stem].nitrogenDemandSwitch
            VariableReference MaxNconc: VariableName=[Stem].maximumNconc
        RetranslocateNonStructural RetranslocateNitrogen
      Nodule
        Memo
          This model calculated the N supply from biological N fixation by nodules within the plant root system.
        Constant FixationMetabolicCost: FixedValue=0
        Constant MaximumNConc: FixedValue=0.08
        Constant MinimumNConc: FixedValue=0.03
        Constant SenescenceRate: FixedValue=0
        Constant NReallocationFactor: FixedValue=0
        PhaseBasedSwitch NitrogenDemandSwitch: Start=Emergence; End=Maturity
        BiomassRemoval BiomassRemovalDefaults
          OrganBiomassRemovalType Harvest: FractionLiveToRemove=0; FractionDeadToRemove=0; FractionLiveToResidue=0; FractionDeadToResidue=0
          OrganBiomassRemovalType Cut: FractionLiveToRemove=0; FractionDeadToRemove=0; FractionLiveToResidue=0; FractionDeadToResidue=0
          OrganBiomassRemovalType Prune: FractionLiveToRemove=0; FractionDeadToRemove=0; FractionLiveToResidue=0; FractionDeadToResidue=0
          OrganBiomassRemovalType Graze: FractionLiveToRemove=0; FractionDeadToRemove=0; FractionLiveToResidue=0; FractionDeadToResidue=0
        Constant InitialWtFunction: FixedValue=0.1; Units=g/m^2
        Constant DetachmentRateFunction: FixedValue=0; Units=/d
        Constant MaintenanceRespirationFunction: FixedValue=0; Units=0-1
        Constant DMConversionEfficiency: FixedValue=1; Units=0-1
        Constant FixationRate: FixedValue=0.6; Units=g/m^2/d
        Constant NRetranslocationFactor: FixedValue=0
        Constant DMReallocationFactor: FixedValue=0
        Constant DMRetranslocationFactor: FixedValue=0
        VariableReference CriticalNConc: VariableName=[Nodule].MinimumNConc
        Constant RemobilisationCost: FixedValue=0
        Constant CarbonConcentration: FixedValue=0.4
        BiomassDemand DMDemands
          MultiplyFunction Structural
            PartitionFractionDemandFunction DMDemandFunction
              Constant PartitionFraction: FixedValue=0.05
            Constant StructuralFraction: FixedValue=1; Units=g/g
          Constant Metabolic: FixedValue=0
          StorageDMDemandFunction Storage
            SubtractFunction StorageFraction
              Constant One: FixedValue=1
              VariableReference StructuralFraction: VariableName=[Nodule].DMDemands.Structural.StructuralFraction
        BiomassDemand NDemands
          MultiplyFunction Structural
            VariableReference MinNconc: VariableName=[Nodule].minimumNconc
            VariableReference PotentialDMAllocation: VariableName=[Nodule].potentialDMAllocation.Structural
          MultiplyFunction Metabolic
            SubtractFunction MetabolicNconc
              VariableReference CritNconc: VariableName=[Nodule].criticalNConc
              VariableReference MinNconc: VariableName=[Nodule].minimumNconc
            VariableReference PotentialDMAllocation: VariableName=[Nodule].potentialDMAllocation.Structural
          StorageNDemandFunction Storage
            VariableReference NitrogenDemandSwitch: VariableName=[Nodule].nitrogenDemandSwitch
            VariableReference MaxNconc: VariableName=[Nodule].maximumNconc
      Cultivar Gliricidia
      Cultivar GliricidiaYoung
        Command=[Gliricidia].Stem.DMDemands.Structural.DMDemandFunction.Const=0.05
  DataStore
  Simulation GliricidiaStripCropExample
    Clock: Start=1984-01-01; End=1990-12-31
    Summary SummaryFile
    Weather: FileName=Makoka.met
    MicroClimate: a_interception=0; b_interception=1; c_interception=0; d_interception=0; soil_albedo=0.3; SoilHeatFluxFraction=0.4; MinimumHeightDiffForNewLayer=0; NightInterceptionFraction=0.5; ReferenceHeight=2
    Manager GliricidiaManagement
      Harvest1Date = 15-feb
      Harvest2Date = 15-sep
      Harvest3Date = 15-dec
      AddGliricidiaResidues = True
      LeafRemovalWt = 0
      LeafRemovalN = 0
      StemRemovalWt = 0
      StemRemovalN = 0
      TotalRemovalWt = 0
      TotalRemovalN = 0
```csharp
using APSIM.Shared.Utilities;
using System.Xml.Serialization;
using Models.Surface;
using Models.PMF.Organs;
using Models.PMF;
using Models.Core;
using System.Collections.Generic;
using System;


namespace Models
{
    [Serializable] 
    [System.Xml.Serialization.XmlInclude(typeof(Model))]
    public class Script : Model
    {
        [Link(ByName = true)] Plant Gliricidia;
        [Link(ByName = true)] SurfaceOrganicMatter MaizeZoneSurfaceOrganicMatter;
        [Link(ByName = true)] Zone MaizeZone;
        [Link(ByName = true)] Zone GliricidiaZone;
        [Link] Clock Clock;


        [Description("First Harvest (d-mmm)")]
        public string Harvest1Date { get; set; }
        [Description("Second Harvest (d-mmm)")]
        public string Harvest2Date { get; set; }
        [Description("Third Harvest (d-mmm)")]
        public string Harvest3Date { get; set; }

        [Description("Add gliricidia residues to mazie zone")]
        public bool AddGliricidiaResidues { get; set; }
    
        [XmlIgnore] private RemovalFractions Remove { get; set; }

        [Description("Leaf Removal Wt")]
        public double LeafRemovalWt {get; set;}
        [Description("Leaf Removal N")]
        public double LeafRemovalN {get; set;}


        [Description("Stem Removal Wt")]
        public double StemRemovalWt {get; set;}
        [Description("Stem Removal N")]
        public double StemRemovalN {get; set;}


        [Description("Total Removal Wt")]
        public double TotalRemovalWt {get; set;}
        [Description("Total Removal N")]
        public double TotalRemovalN {get; set;}


        [EventSubscribe("Commencing")]
        private void OnSimulationCommencing(object sender, EventArgs e)
        {
            Remove = new RemovalFractions();
        }

        [EventSubscribe("StartOfDay")]
        private void OnStartOfDay(object sender, EventArgs e)
        {

        LeafRemovalWt = 0;
        StemRemovalWt = 0;
        LeafRemovalN = 0;
        StemRemovalN = 0;

            if (DateUtilities.WithinDates(Harvest1Date, Clock.Today, Harvest1Date) ||
                DateUtilities.WithinDates(Harvest2Date, Clock.Today, Harvest2Date) ||
                DateUtilities.WithinDates(Harvest3Date, Clock.Today, Harvest3Date))
            {
                DoCut(10,25);   
            }

        }

        public void DoCut(double LeafResidue, double StemResidue)
        {
            double Lwt = (double)Apsim.Get(Gliricidia, "Leaf.Live.Wt");
            double Ln = (double)Apsim.Get(Gliricidia, "Leaf.Live.N");
            double LeafRemovalFraction = 0;

            if (Lwt > 0)
                LeafRemovalFraction = (Lwt - LeafResidue) / Lwt;
            if (LeafRemovalFraction < 0)
                LeafRemovalFraction = 0;
            LeafRemovalWt = (Lwt - LeafResidue);
            LeafRemovalN = Ln * LeafRemovalFraction;
                               
            double Swt = (double)Apsim.Get(Gliricidia, "Stem.Live.Wt");
            double Sn = (double)Apsim.Get(Gliricidia, "Stem.Live.N");
            double StemRemovalFraction = 0;

            if (Swt > 0)
                StemRemovalFraction = (Swt - StemResidue) / Swt;             
            if (StemRemovalFraction < 0)
                StemRemovalFraction = 0;
            StemRemovalWt = (Swt - StemResidue);  
            StemRemovalN = Sn * StemRemovalFraction;
               
            Remove.SetFractionToRemove("Leaf", LeafRemovalFraction);
            Remove.SetFractionToRemove("Stem", StemRemovalFraction);
            Remove.SetFractionToResidue("Leaf", 0.0);
            Remove.SetFractionToResidue("Stem", 0.0);
            Gliricidia.RemoveBiomass("Cut", Remove);

            if (AddGliricidiaResidues)
            {
            double FOMadded = (LeafRemovalWt)*10.0*GliricidiaZone.Area/MaizeZone.Area;
            double FONadded = (LeafRemovalN)*10.0*GliricidiaZone.Area/MaizeZone.Area;

            MaizeZoneSurfaceOrganicMatter.Add(FOMadded, FONadded,0.0,"gliricidia","gliricidia");
            }

        }
        
    }
}
```
    SoilArbitrator Soil Arbitrator
    RectangularZone GliricidiaZone: Length=1; Width=2; Slope=0; AspectAngle=0; Altitude=50
      Report GliricidiaZoneReport: EventNames=[Clock].DoReport
        VariableNames:
          [Clock].Today
          sum([Soil].SoilWater.SWmm) as GliricidiaZoneSWTot
          [Gliricidia].AboveGround.Wt
          [Gliricidia].Leaf.LAI
      Fertiliser
      SurfaceOrganicMatter: InitialResidueName=wheat_stubble; InitialResidueType=wheat; InitialResidueMass=500; InitialStandingFraction=0; InitialCPR=0; InitialCNR=100; FractionFaecesAdded=1
      Manager SetupGliricidiaRootZones
        UseExtraZone = True
```csharp
using APSIM.Shared.Utilities;
using System.Xml.Serialization;
using Models;
using Models.PMF;
using System.Text;
using System.Collections.Generic;
using Models.Core;
using System;

namespace Models
{
    [Serializable] 
    public class Script : Model
    {
        [Link] Plant Gliricidia;
        [Link] Clock Clock;
        [Link] Zone zone;

        [Description("Use extra root zone")]
        public bool UseExtraZone { get; set; }

        
        [EventSubscribe("Commencing")]
        private void OnSimulationCommencing(object sender, EventArgs e)
        {
            if (UseExtraZone)
            {
            Gliricidia.Root.ZoneNamesToGrowRootsIn.Add("MaizeZone");
            Gliricidia.Root.ZoneRootDepths.Add(50);
            Gliricidia.Root.ZoneInitialDM.Add(10);
            }
        }
    }
}
```
      Plant Gliricidia: CropType=Gliricidia; IsAlive=false; IsEnding=false; DaysAfterEnding=0
      Operations GliricidiaSowing
        1984-12-15  [Gliricidia].Sow(population: 0.74, cultivar: GliricidiaYoung,depth: 100, rowSpacing: 1500);
      Soil GliricidiaZoneSoil: Site=Bugesera; NearestTown=Nyamata; Region=Bugesera; Country=Rwanda; Latitude=-2.15; Longitude=30.45; DataSource=Rwanda soil database using properties for Ferralsol
        InitialWater: PercentMethod=0; FractionFull=0.25
        Sample Initial nitrogen: Thickness=[200, 1600]; SWUnits=Volumetric; OCUnits=Total; PHUnits=Water
        CERESSoilTemperature
        Nutrient
          DirectedGraphInfo={Nodes=[{Name=Inert, OutlineColour=Black}, {Name=SurfaceResidue, OutlineColour=Black}, {Name=FOMLignin, OutlineColour=Black}, {Name=FOMCellulose, OutlineColour=Black}, {Name=FOMCarbohydrate, OutlineColour=Black}, {Name=Microbial, OutlineColour=Black}, {Name=Humic, OutlineColour=Black}, {Name=Urea, OutlineColour=Black}, {Name=NO3, OutlineColour=Black}, {Name=NH4, OutlineColour=Black}, {Name=Atmosphere, OutlineColour=White}], Arcs=[{SourceName=SurfaceResidue, DestinationName=Microbial}, {SourceName=SurfaceResidue, DestinationName=Humic}, {SourceName=FOMLignin, DestinationName=Microbial}, {SourceName=FOMLignin, DestinationName=Humic}, {SourceName=FOMCellulose, DestinationName=Microbial}, {SourceName=FOMCellulose, DestinationName=Humic}, {SourceName=FOMCarbohydrate, DestinationName=Microbial}, {SourceName=FOMCarbohydrate, DestinationName=Humic}, {SourceName=Microbial, DestinationName=Microbial}, {SourceName=Microbial, DestinationName=Humic}, {SourceName=Humic, DestinationName=Microbial}, {SourceName=Urea, DestinationName=NH4}, {SourceName=NO3, DestinationName=Atmosphere}, {SourceName=NH4, DestinationName=NO3}]}
        SoilWater: SummerDate=1-Nov; SummerU=9; SummerCona=2.5; WinterDate=1-Apr; WinterU=9; WinterCona=2.5; DiffusConst=40; DiffusSlope=16; Salb=0.13; CN2Bare=65; CNRed=20; CNCov=0.8; max_pond=0; Thickness=[200, 1800, 1000]; SWCON=[0.2, 0.1, 0]; PrecipitationInterception=0
        Physical
          Thickness  BD    AirDry  LL15  DUL   SAT
          200        1.42  0.01    0.08  0.36  0.46
          200        1.45  0.01    0.08  0.36  0.453
          200        1.47  0.01    0.08  0.34  0.445
          200        1.31  0.01    0.08  0.33  0.44
          200        1.42  0.01    0.08  0.33  0.44
          200        1.38  0.01    0.08  0.32  0.44
          200        1.32  0.01    0.08  0.31  0.44
          200        1.3   0.01    0.08  0.3   0.44
          200        1.31  0.01    0.08  0.3   0.44
          200        1.31  0.01    0.08  0.29  0.44
          500        1.31  0.01    0.08  0.29  0.44
          500        1.31  0.01    0.08  0.29  0.44
          SoilCrop MaizeSoil
            LL=[0.05, 0.05, 0.05, 0.05, 0.1, 0.1, 0.1, 0.1, 0.1, 0.1, 0.1, 0.1]
            KL=[0.05, 0.05, 0.05, 0.05, 0.05, 0.04, 0.03, 0.02, 0.02, 0.02, 0, 0]
            XF=[1, 1, 1, 1, 0.6, 0.6, 0, 0, 0, 0, 0, 0]
          SoilCrop GliricidiaSoil
            LL=[0.02, 0.02, 0.02, 0.02, 0.02, 0.02, 0.02, 0.02, 0.02, 0.02, 0.02, 0.02]
            KL=[0.1, 0.1, 0.1, 0.1, 0.1, 0.1, 0.1, 0.1, 0.02, 0.02, 0.02, 0.02]
            XF=[1, 1, 1, 1, 1, 1, 1, 1, 1, 0, 0, 0]
        Organic: FOMCNRatio=15
          Thickness  Carbon  SoilCNRatio  FBiom  FInert  FOM
          200        0.8     14.3         0.02   0.7     27.2762
          200        0.6     14.3         0.01   0.7     20.2067
          200        0.4     14.3         0.01   0.7     14.9695
          200        0.2     14.3         0.01   0.7     11.0897
          200        0.2     14.3         0.01   0.7     8.21543
          200        0.1     14.3         0.01   0.7     6.08614
          200        0.05    14.3         0.01   0.7     4.50872
          200        0.05    14.3         0.01   0.7     3.34014
          200        0.05    14.3         0.01   0.7     2.47444
          200        0.05    14.3         0.01   0.7     1.83311
        Chemical
          Thickness  NO3N       NH4N      PH
          200        0.457746   0.84507   5.9
          200        0.0593066  0.109489  5.6
          200        0.0593066  0.109489  5.8
          200        0.0593066  0.109489  5.9
          200        0.0593066  0.109489  6.1
          200        0.0593066  0.109489  6.3
          200        0.0593066  0.109489  6.2
          200        0.0593066  0.109489  6.4
          200        0.0593066  0.109489  6.3
          200        1          0.2       5.9
    RectangularZone MaizeZone: Length=1; Width=6; Slope=0; AspectAngle=0; Altitude=50
      Report: EventNames=[Clock].DoReport
        VariableNames:
          [Clock].Today
          [Clock].Today.Year
          [Maize].AboveGround.Wt
      Fertiliser
      SurfaceOrganicMatter MaizeZoneSurfaceOrganicMatter: InitialResidueName=wheat_stubble; InitialResidueType=wheat; InitialResidueMass=500; InitialStandingFraction=0; InitialCPR=0; InitialCNR=100; FractionFaecesAdded=1
      Irrigation
      Plant Maize: CropType=Maize; IsAlive=false; IsEnding=false; DaysAfterEnding=0
      Soil MaizeZoneSoil: Site=Bugesera; NearestTown=Nyamata; Region=Bugesera; Country=Rwanda; Latitude=-2.15; Longitude=30.45; DataSource=Rwanda soil database using properties for Ferralsol
        InitialWater: PercentMethod=0; FractionFull=0.25
        Sample Initial nitrogen: Thickness=[200, 1600]; SWUnits=Volumetric; OCUnits=Total; PHUnits=Water
        CERESSoilTemperature
        Nutrient: same as GliricidiaStripCropExample.GliricidiaZone.GliricidiaZoneSoil.Nutrient
        SoilWater: same as GliricidiaStripCropExample.GliricidiaZone.GliricidiaZoneSoil.SoilWater
        Physical
          Thickness  BD    AirDry  LL15  DUL   SAT
          200        1.42  0.05    0.08  0.36  0.46
          200        1.45  0.05    0.08  0.36  0.46
          200        1.47  0.05    0.08  0.34  0.45
          200        1.31  0.05    0.08  0.33  0.44
          200        1.42  0.05    0.08  0.33  0.44
          200        1.38  0.05    0.08  0.32  0.44
          200        1.32  0.05    0.08  0.31  0.44
          200        1.3   0.05    0.08  0.3   0.44
          200        1.31  0.05    0.08  0.3   0.44
          200        1.31  0.05    0.08  0.29  0.44
          500        1.31  0.05    0.08  0.29  0.44
          500        1.31  0.05    0.08  0.29  0.44
          SoilCrop MaizeSoil
            LL=[0.05, 0.05, 0.05, 0.05, 0.1, 0.1, 0.1, 0.1, 0.1, 0.1, 0.1, 0.1]
            KL=[0.05, 0.05, 0.05, 0.05, 0.05, 0.04, 0.03, 0.02, 0.02, 0.02, 0, 0]
            XF=[1, 1, 1, 1, 0.6, 0.6, 0, 0, 0, 0, 0, 0]
          SoilCrop GliricidiaSoil
            LL=[0.02, 0.02, 0.02, 0.02, 0.02, 0.02, 0.02, 0.02, 0.02, 0.02, 0.02, 0.02]
            KL=[0.1, 0.1, 0.1, 0.1, 0.1, 0.1, 0.1, 0.1, 0.02, 0.02, 0.02, 0.02]
            XF=[1, 1, 1, 1, 1, 1, 1, 1, 1, 0, 0, 0]
        Organic: same as GliricidiaStripCropExample.GliricidiaZone.GliricidiaZoneSoil.Organic
        Chemical: same as GliricidiaStripCropExample.GliricidiaZone.GliricidiaZoneSoil.Chemical
      Manager Harvesting
        RemoveFraction = 1
```csharp
using APSIM.Shared.Utilities;
using System.Xml.Serialization;
using Models;
using Models.Surface;
using Models.PMF;
using Models.Soils.Nutrients;
using Models.Soils;
using System.Text;
using System.Collections.Generic;
using Models.Core;
using System;

namespace Models
{
    [Serializable] 
    public class Script : Model
    {
        [Link] Plant Maize;
        [Link] Zone zone;
        [Link] SurfaceOrganicMatter SOM;
        [Link] Clock clock;
        [Link] Models.Report report;

        [Description("Fraction of resiudes to remove at harvest (0-1)")]
        public double RemoveFraction { get; set; }

    
        [EventSubscribe("DoManagement")]
        private void OnDoManagement(object sender, EventArgs e)
        {
            if (Maize.Phenology.CurrentPhaseName == "ReadyForHarvesting")
            {
                Maize.Harvest();
                Maize.EndCrop();
                if (RemoveFraction > 0)
                    SOM.Incorporate(RemoveFraction, 0.0);         

            }
        }
        
        [EventSubscribe("DoManagementCalculations")]
        private void OnDoManagementCalculations(object sender, EventArgs e)
        {
            
        }
    }
}
```
      Manager SowingFertiliser
        Amount = 0
        CropName = Maize
```csharp
using Models.PMF;
using Models.Core;
using System;
namespace Models
{
    [Serializable]
    public class Script : Model
    {
        [Link] Clock Clock;
        [Link] Fertiliser Fertiliser;
        [Link] Summary Summary;
        
        
        [Description("Amount of fertiliser to be applied (kg/ha)")]
        public double Amount { get; set; }
        
        [Description("Crop to be fertilised")]
        public string CropName { get; set; }
        
        
        

        [EventSubscribe("Sowing")]
        private void OnSowing(object sender, EventArgs e)
        {
            Model crop = sender as Model;
            if (crop.Name.ToLower() == CropName.ToLower())
                Fertiliser.Apply(Amount: Amount, Type: Fertiliser.Types.NO3N);
        }
        
    }
}
```
      Manager MaizeCalculations
        EffectiveYieldFactor = 1
```csharp
using Models.PMF.Organs;
using Models.Interfaces;
using APSIM.Shared.Utilities;
using System.Xml.Serialization;
using Models.Surface;
using Models.PMF.Interfaces;
using Models.PMF;
using Models.Core;
using System.Collections.Generic;
using System;

namespace Models
{
    [Serializable] 
    [System.Xml.Serialization.XmlInclude(typeof(Model))]
    public class Script : Model
    {
        [Link(ByName = true)] ReproductiveOrgan Grain;
        [Link(ByName = true)] Zone MaizeZone;
        [Link(ByName = true)] Zone GliricidiaZone;
        [Link] Clock Clock;

        [Description("Effective Yield Factor")]
        public double EffectiveYieldFactor { get; set; }

        [Description("EffectiveYield")]
        public double EffectiveYield 
        {
           get
           { 
           return Grain.Live.Wt * EffectiveYieldFactor;
           }
        }




    }
}
```
      Manager SowingRule
        StartDate = 12-Dec
        EndDate = 30-Jan
        MinESW = 30
        MinRain = 30
        RainDays = 10
        CultivarName = Katumani
        SowingDepth = 30
        RowSpacing = 750
        Population = 4.44
```csharp
using APSIM.Shared.Utilities;
using Models.Utilities;
using Models.Soils;
using Models.PMF;
using Models.Core;
using System;

namespace Models
{
    [Serializable]
    public class Script : Model
    {
        [Link] Clock Clock;
        [Link] Fertiliser Fertiliser;
        [Link] Summary Summary;
        [Link] Plant Maize;
        [Link] Soil Soil;
        Accumulator accumulatedRain;
        
        [Description("Start of sowing window (d-mmm)")]
        public string StartDate { get; set; }
        [Description("End of sowing window (d-mmm)")]
        public string EndDate { get; set; }
        [Description("Minimum extractable soil water for sowing (mm)")]
        public double MinESW { get; set; }
        [Description("Accumulated rainfall required for sowing (mm)")]
        public double MinRain { get; set; }
        [Description("Duration of rainfall accumulation (d)")]
        public int RainDays { get; set; }
        [Description("Cultivar to be sown")]
        public string CultivarName { get; set; }
        [Description("Sowing depth (mm)")]
        public double SowingDepth { get; set; }
        [Description("Row spacing (mm)")]
        public double RowSpacing { get; set; }
        [Description("Plant population (/m2)")]
        public double Population { get; set; }
        
        
        [EventSubscribe("Commencing")]
        private void OnSimulationCommencing(object sender, EventArgs e)
        {
            accumulatedRain = new Accumulator(this, "[Weather].Rain", RainDays);
        }
        

        [EventSubscribe("DoManagement")]
        private void OnDoManagement(object sender, EventArgs e)
        {
            accumulatedRain.Update();
            
            if ((DateUtilities.WithinDates(StartDate, Clock.Today, EndDate) &&
                Maize.IsAlive != true &&
                MathUtilities.Sum(Soil.SoilWater.ESW) > MinESW &&
                accumulatedRain.Sum > MinRain) ||
               (DateUtilities.WithinDates(EndDate, Clock.Today, EndDate) &&
                Maize.IsAlive != true))
            {
                Maize.Sow(population: Population, cultivar: CultivarName, depth: SowingDepth, rowSpacing: RowSpacing);    
            }
        
        }
        
    }
}
```
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