Simulations: Version=133
  DataStore
    ExcelInput Observed: FileNames=[Observed.xlsx]; SheetNames=[Observed]
  Memo TitlePage
    # The APSIM Peanut Model

    The APSIM Peanut model has been developed using the Plant Modelling Framework (PMF) of [brown_plant_2014]. This new framework provides a library of plant organ and process submodels that can be coupled, at runtime, to construct a model in much the same way that models can be coupled to construct a simulation. This means that dynamic composition of lower level process and organ classes (e.g. photosynthesis, leaf) into larger constructions (e.g. maize, wheat, sorghum) can be achieved by the model developer without additional coding.

    The model consists of:

    * a phenology model to simulate development between growth phases
    * a structure model to simulate plant morphology
    * a collection of organs to simulate the various plant parts
    * an arbitrator to allocate resources (N, biomass) to the various plant organs
  Replacements
    Report DailyReport: EventNames=[Clock].DoReport
      VariableNames:
        [Clock].Today
        [Clock].Today as Date
        [Clock].Today.DayOfYear
        [Peanut].SowingData.RowSpacing
        [Peanut].DaysAfterSowing
        [Peanut].Phenology.DaysAfterEmergence
        [Peanut].Phenology.CurrentStageName
        [Weather].MeanT
        [Weather].Radn
        [Weather].MaxT
        [Weather].MinT
        [Weather].Rain
        [Peanut].Arbitrator.DM.TotalFixationSupply
        sum([Peanut].Arbitrator.N.Fixation) as NFixed
        [Peanut].Arbitrator.DM.TotalPlantDemand
        [Peanut].Root.PlantWaterPotentialFactor
        [Peanut].Phenology.Photoperiod
        [Peanut].Phenology.ThermalTime
        [Peanut].AboveGround.Wt
        [Peanut].AboveGround.N
        [Peanut].Leaf.NodeNumber
        [Peanut].Leaf.BranchNumber
        [Peanut].Leaf.Number
        [Peanut].Leaf.Fw
        [Peanut].Leaf.Fn
        [Peanut].Leaf.Photosynthesis.FT
        [Peanut].Leaf.LAI
        [Peanut].Leaf.CoverGreen
        [Peanut].Leaf.CoverTotal
        [Peanut].Leaf.ExtinctionCoefficient
        [Peanut].Leaf.Live.Wt
        [Peanut].Leaf.Live.StructuralWt
        [Peanut].Leaf.Live.MetabolicWt
        [Peanut].Leaf.Allocated.MetabolicWt
        [Peanut].Leaf.Allocated.StructuralWt
        [Peanut].Leaf.Dead.StructuralWt
        [Peanut].Leaf.Dead.MetabolicWt
        [Peanut].Leaf.Live.N
        [Peanut].Leaf.Live.NConc
        [Peanut].Leaf.Dead.Wt
        [Peanut].Leaf.Dead.N
        [Peanut].Leaf.Dead.NConc
        [Peanut].Leaf.SpecificArea
        [Peanut].Leaf.SpecificAreaCanopy
        [Peanut].Leaf.Wt
        [Peanut].Leaf.Nconc
        [Peanut].Leaf.Senesced.Wt
        [Peanut].Leaf.Transpiration
        [Peanut].Stem.Wt
        [Peanut].Stem.Live.Wt
        [Peanut].Stem.Total.StructuralWt
        [Peanut].Stem.Live.StructuralWt
        [Peanut].Stem.Live.StructuralN
        [Peanut].Stem.Total.StorageWt
        [Peanut].Stem.PotentialGrowth
        [Peanut].Stem.N
        [Peanut].Stem.Nconc
        [Peanut].Shell.Wt
        [Peanut].Shell.Live.Wt
        [Peanut].Shell.N
        [Peanut].Shell.Nconc
        [Peanut].Grain.Wt
        [Peanut].Grain.N
        [Peanut].Grain.Nconc
        [Peanut].Grain.HarvestIndex
        [Peanut].Shell.Wt
        [Peanut].Pod.Wt
        [Peanut].Pod.N
        [Peanut].Pod.NConc
        [Peanut].Nodule.NFixed
        [Peanut].Root.Wt
        [Soil].SoilWater.Eo
        sum([Soil].SoilWater.SWmm) as TotalSW
        [Soil].SoilWater.SW[1:3]
        [Peanut].Leaf.Height
        [Peanut].Root.Depth
        sum([Soil].SoilWater.ESW) as TotalESW
    Report HarvestReport: EventNames=[Peanut].Harvesting
      VariableNames:
        [Clock].Today
        [Clock].Today as Date
        [Peanut].SowingDate
        [Peanut].Phenology.CurrentStageName
        [Peanut].Phenology.EmergenceDAS
        [Peanut].Phenology.FloweringDAS
        [Peanut].Phenology.MaturityDAS
        [Peanut].AboveGround.Wt
        [Peanut].Grain.Wt
        [Peanut].Pod.Wt
        [Peanut].Pod.HarvestIndex
        [Peanut].AflotoxinPercentage
    Plant Peanut: PlantType=Peanut; IsAlive=false; IsEnding=false; DaysAfterEnding=0
      OrganArbitrator Arbitrator
        BiomassTypeArbitrator DMArbitration
          Folder PotentialPartitioningMethods
            ReallocationMethod
            AllocateFixationMethod
            RetranslocationMethod
            SendPotentialDMAllocationsMethod
          Folder AllocationMethods
            NutrientConstrainedAllocationMethod
            DryMatterAllocationsMethod
          RelativeAllocation ArbitrationMethod
        BiomassTypeArbitrator NArbitration
          Folder PotentialPartitioningMethods
            ReallocationMethod
          Folder ActualPartitioningMethods
            AllocateFixationMethod
            RetranslocationMethod
          Folder AllocationMethods
            NitrogenAllocationsMethod
          RelativeAllocation ArbitrationMethod
          AllocateUptakesMethod
        WaterUptakeMethod
        NitrogenUptakeMethod
      Phenology
        Memo Introduction
          In the new model we simplified phenology by taking out stages that are not measurable (e.g. end of juvenile stage) and by adding new stages that are measurable (e.g. start pod).
          The new phenology follows the V/R staging system
        LinearInterpolationFunction PreemergentThermalTime
          XYPairs: X=[13, 25, 50]; Y=[0, 12, 0]
          Memo
            These parameters are overridden by cultivar parameter descriptions to capture the difference between individual cultivars in terms of their phenological development.  Responses shown here are only indicative.  See cultivar descriptions for more information.
          VariableReference XValue: VariableName=[IWeather].MeanT
        LinearInterpolationFunction VegetativeThermalTime
          XYPairs: X=[9, 32, 50]; Y=[0, 23, 0]
          Memo
            These parameters are overridden by cultivar parameter descriptions to capture the difference between individual cultivars in terms of their phenological development.  Responses shown here are only indicative.  See cultivar descriptions for more information.
          VariableReference XValue: VariableName=[IWeather].MeanT
        LinearInterpolationFunction ReproductiveThermalTime
          XYPairs: X=[0, 22, 32, 40]; Y=[13, 13, 23, 23]
          VariableReference XValue: VariableName=[IWeather].MeanT
        PhaseLookup ThermalTime
          PhaseLookupValue PreEmergence: Start=Sowing; End=Emergence
            VariableReference TT: VariableName=[Phenology].PreemergentThermalTime
          PhaseLookupValue VegetativeGrowth: Start=Emergence; End=StartFlowering
            VariableReference TT: VariableName=[Phenology].VegetativeThermalTime
          PhaseLookupValue ReproductiveGrowth: Start=StartFlowering; End=HarvestRipe
            MultiplyFunction TT
              VariableReference ReproductiveTT: VariableName=[Phenology].ReproductiveThermalTime
              LinearInterpolationFunction PPModifier
                XYPairs: X=[13, 16, 20]; Y=[1, 1, 1]
                VariableReference XValue: VariableName=[Phenology].Photoperiod
        PhotoperiodFunction Photoperiod: Twilight=-6; DayLength=0
        GerminatingPhase Germinating: Start=Sowing; End=Germination
        EmergingPhase Emerging: ShootLag=70; ShootRate=0; Start=Germination; End=Emergence; TTForTimeStep=0
          VariableReference ThermalTime: VariableName=[Phenology].PreemergentThermalTime
        GenericPhase Vegetative: Start=Emergence; End=StartFlowering
          Constant Target: FixedValue=390
          VariableReference Progression: VariableName=[Phenology].ThermalTime
        GenericPhase EarlyFlowering: Start=StartFlowering; End=StartPodDevelopment
          Constant Target: FixedValue=200
          VariableReference Progression: VariableName=[Phenology].ThermalTime
        GenericPhase EarlyPodDevelopment: Start=StartPodDevelopment; End=StartGrainFilling
          Constant Target: FixedValue=140
          VariableReference Progression: VariableName=[Phenology].ThermalTime
        GenericPhase EarlyGrainFilling: Start=StartGrainFilling; End=EndCanopyDevelopment
          MultiplyFunction Target
            Constant FractionofGrainfilling: FixedValue=0.05
            VariableReference EntireGrainfilling
              VariableName=[Phenology].LateGrainFilling.Target.EntireGrainfillPeriod.FixedValue
          VariableReference Progression: VariableName=[Phenology].ThermalTime
        GenericPhase MidGrainFilling: Start=EndCanopyDevelopment; End=EndPodDevelopment
          MultiplyFunction Target
            Constant FractionofMidToLateGrainfilling: FixedValue=0.5
            SubtractFunction MidToLateGrainfilling
              VariableReference EntireGrainfilling
                VariableName=[Phenology].LateGrainFilling.Target.EntireGrainfillPeriod.FixedValue
              VariableReference EarlyGrainfilling: VariableName=[Phenology].EarlyGrainFilling.Target
          VariableReference Progression: VariableName=[Phenology].ThermalTime
        GenericPhase LateGrainFilling: Start=EndPodDevelopment; End=EndGrainFill
          SubtractFunction Target
            Constant EntireGrainfillPeriod: FixedValue=1020
            VariableReference EarlyGrainFillingTarget: VariableName=[Phenology].EarlyGrainFilling.Target
            VariableReference MidGrainFillingTarget: VariableName=[Phenology].MidGrainFilling.Target
          VariableReference Progression: VariableName=[Phenology].ThermalTime
        GenericPhase Maturing: Start=EndGrainFill; End=Maturity
          Constant Target: FixedValue=45
          VariableReference Progression: VariableName=[Phenology].ThermalTime
        GenericPhase Ripening: Start=Maturity; End=HarvestRipe
          Constant Target: FixedValue=45
          VariableReference Progression: VariableName=[Phenology].ThermalTime
        EndPhase ReadyForHarvesting: Start=HarvestRipe; End=Unused
          VariableReference ThermalTime: VariableName=[Phenology].ThermalTime
        OnEventFunction EmergenceDAS: SetEvent=Emergence; ReSetEvent=never
          Memo
            A function is used to provide maturity date as days after sowing(DAS).
          Constant PreEventValue: FixedValue=0
          VariableReference PostEventValue: VariableName=[Plant].DaysAfterSowing
        OnEventFunction FloweringDAS: SetEvent=StartFlowering; ReSetEvent=never
          Memo
            A function is used to provide flowering date as days after sowing(DAS).
          Constant PreEventValue: FixedValue=0
          VariableReference PostEventValue: VariableName=[Plant].DaysAfterSowing
        OnEventFunction MaturityDAS: SetEvent=Maturity; ReSetEvent=never
          Memo
            A function is used to provide maturity date as days after sowing(DAS).
          Constant PreEventValue: FixedValue=0
          VariableReference PostEventValue: VariableName=[Plant].DaysAfterSowing
        AccumulateFunction DaysAfterEmergence: StartStageName=Emergence; EndStageName=HarvestRipe; FractionRemovedOnCut=0; FractionRemovedOnHarvest=0; FractionRemovedOnGraze=0; FractionRemovedOnPrune=0
          Constant OneDay: FixedValue=1
      SimpleLeaf Leaf: Albedo=0.25; Gsmax350=0.011; R50=150; LeafInitialisationStage=Emergence; Height=0; BaseHeight=0; Width=0; FRGR=0; PotentialEP=0; WaterDemand=0; KDead=0.3; LAIDead=0
        RUEModel Photosynthesis
          Constant RUE: FixedValue=1.5
            Memo
              This approach is based upon the value used in [robertson_simulation_2002] increased to account for partitioning to roots.
          WeightedTemperatureFunction FT: MaximumTemperatureWeighting=0.75
            Memo
              This approach is based upon that used in Bell, WRight and Hammer (1992) Crop Sci
            XYPairs: X=[10, 21, 35, 40]; Y=[0, 1, 1, 0]
          LinearInterpolationFunction FVPD
            XYPairs: X=[0, 10, 50]; Y=[1, 1, 1]
            VariableReference XValue: VariableName=[Leaf].Photosynthesis.VPD
          LinearInterpolationFunction FN
            XYPairs: X=[0, 1, 1.5]; Y=[0, 1, 1]
            VariableReference XValue: VariableName=[Leaf].Fn
          LinearInterpolationFunction FW
            XYPairs: X=[0, 1]; Y=[0, 1]
            VariableReference XValue: VariableName=[Leaf].Fw
          RUECO2Function FCO2: PhotosyntheticPathway=C3
          VariableReference RadnInt: VariableName=[Leaf].RadiationIntercepted
        StomatalConductanceCO2Modifier
          VariableReference PhotosynthesisCO2Modifier: VariableName=[Leaf].Photosynthesis.FCO2
        MultiplyFunction AreaOLD
          VariableReference SLA: VariableName=[Leaf].SpecificArea
          VariableReference LeafLiveWt: VariableName=[Leaf].Live.Wt
        AddFunction AreaNew
          Constant InitialArea: FixedValue=1
          AccumulateFunction AreaGrowth: StartStageName=Emergence; EndStageName=EndCanopyDevelopment; FractionRemovedOnCut=1; FractionRemovedOnHarvest=1; FractionRemovedOnGraze=1; FractionRemovedOnPrune=0
            MultiplyFunction DeltaArea
              VariableReference DeltaMass: VariableName=[Leaf].Allocated.StructuralWt
              VariableReference SLA: VariableName=[Leaf].SpecificArea
        AddFunction Area
          MultiplyFunction Initial
            Constant AreaPerPlant: FixedValue=0.005
            VariableReference Population: VariableName=[Peanut].SowingData.Population
          SubtractFunction Change
            AccumulateAtEvent AreaGrowth: StartStageName=Emergence; EndStageName=EndCanopyDevelopment; AccumulateEventName=[Clock].DoActualPlantGrowth
              MultiplyFunction DeltaArea
                VariableReference DeltaMass: VariableName=[Leaf].Allocated.StructuralWt
                VariableReference SLA: VariableName=[Leaf].SpecificArea
            AccumulateAtEvent AreaLoss: StartStageName=EndCanopyDevelopment; EndStageName=HarvestRipe; AccumulateEventName=[Clock].DoActualPlantGrowth
              MultiplyFunction DeltaArea
                VariableReference DeltaMass: VariableName=[Leaf].Senesced.StructuralWt
                VariableReference SLA: VariableName=[Leaf].SpecificAreaCanopy
        MinimumFunction FRGR
          VariableReference RUE_FT: VariableName=[Leaf].Photosynthesis.FT
          MinimumFunction Others
            VariableReference RUE_FN: VariableName=[Leaf].Photosynthesis.FN
            VariableReference RUE_FVPD: VariableName=[Leaf].Photosynthesis.FVPD
        LinearInterpolationFunction ExtinctionCoefficient
          Memo
            This approach is based upon that described by [Porter2000PhD] to account for the impacts of population and row/plant spacing.  Extinction coefficient is said to decrease with decreasing inter-plant spacing within the plant row.
          XYPairs: X=[0, 335]; Y=[0.214, 0.7]
          ExpressionFunction XValue
            Expression=1000000/[Peanut].SowingData.Population/[Peanut].SowingData.RowSpacing
        LinearInterpolationFunction Tallness
          XYPairs: X=[1, 2, 3, 4, 5, 6, 9]; Y=[0, 0, 50, 400, 450, 450, 450]
          VariableReference XValue: VariableName=[Phenology].Stage
        AccumulateFunction NodeNumber: StartStageName=Emergence; EndStageName=EndCanopyDevelopment; FractionRemovedOnCut=1; FractionRemovedOnHarvest=1; FractionRemovedOnGraze=1; FractionRemovedOnPrune=0
          DivideFunction DeltaNode
            VariableReference ThermalTime: VariableName=[Phenology].VegetativeThermalTime
            VariableReference Phyllochron: VariableName=[Leaf].Phyllochron
        AddFunction BranchNumber
          Constant One: FixedValue=1
          AccumulateFunction CumulativeBranching: StartStageName=Emergence; EndStageName=EndCanopyDevelopment; FractionRemovedOnCut=1; FractionRemovedOnHarvest=1; FractionRemovedOnGraze=1; FractionRemovedOnPrune=0
            MultiplyFunction DeltaBranch
              VariableReference DeltaNode: VariableName=[Leaf].NodeNumber.DeltaNode
              VariableReference BranchingRate: VariableName=[Leaf].BranchingRate
              LinearInterpolationFunction TemperatureFactor
                XYPairs: X=[20, 28, 32, 40]; Y=[1, 1, 1, 1]
                VariableReference XValue: VariableName=[Weather].MeanT
              LinearInterpolationFunction WaterFactor
                XYPairs: X=[0.5, 1]; Y=[0, 1]
                VariableReference XValue: VariableName=[Leaf].Fw
              LinearInterpolationFunction CoverFactor
                XYPairs: X=[0, 0.33, 0.5, 1]; Y=[1, 1, 0, 0]
                VariableReference XValue: VariableName=[Leaf].CoverTotal
              LinearInterpolationFunction PPFactor
                XYPairs: X=[12, 13]; Y=[0, 1]
                VariableReference XValue: VariableName=[Phenology].Photoperiod
        AccumulateFunction Number: StartStageName=Emergence; EndStageName=EndCanopyDevelopment; FractionRemovedOnCut=1; FractionRemovedOnHarvest=1; FractionRemovedOnGraze=1; FractionRemovedOnPrune=0
          MultiplyFunction DailyNumberIncrease
            VariableReference DeltaNode: VariableName=[Leaf].NodeNumber.DeltaNode
            VariableReference BranchNumber: VariableName=[Leaf].BranchNumber
            VariableReference PlantNumber: VariableName=[Peanut].SowingData.Population
        AccumulateAtEvent BranchNumberNew (disabled): StartStageName=Emergence; EndStageName=EndCanopyDevelopment; AccumulateEventName=DoUpdate
          MultiplyFunction DeltaBranch
            VariableReference DeltaNode: VariableName=[Leaf].NodeNumber.DeltaNode
            LinearInterpolationFunction BranchingRate
              Memo
                From Hammer Paper
              XYPairs: X=[0, 2, 3, 6, 7, 15, 16]; Y=[0, 0, 1, 1, 1.5, 1.5, 0]
              VariableReference XValue: VariableName=[Leaf].NodeNumber
        Constant NReallocationFactor: FixedValue=1
          Memo
            This model assumes that all metabolic and storage N is available for reallocation from senescing leaves.
        PhaseLookup SenescenceRate
          PhaseLookupValue Vegetative: Start=Emergence; End=EndPodDevelopment
            Constant Rate: FixedValue=0
          PhaseLookupValue Reproductive: Start=EndPodDevelopment; End=Maturity
            Memo
              Leaf senescence rate is calculated to ensure that all leaves are senesced by crop maturity.
            DivideFunction Rate
              VariableReference TT: VariableName=[Phenology].ThermalTime
              SubtractFunction TTRemaining
                ExpressionFunction TTRequired
                  Expression=[Phenology].LateGrainFilling.Target + [Phenology].Maturing.Target + 1000
                ExpressionFunction TTComplete
                  Expression=[Phenology].LateGrainFilling.ProgressThroughPhase + [Phenology].Maturing.ProgressThroughPhase
              Constant Modifier: FixedValue=1
          PhaseLookupValue Senescent: Start=Maturity; End=HarvestRipe
            Memo
              Leaf senescence rate is calculated to ensure that all leaves are senesced by crop maturity.
            Constant Rate: FixedValue=0.1
        Constant DetachmentRate: FixedValue=0.05; Units=/d
        MultiplyFunction InitialWt
          Constant MassPerPlant: FixedValue=0.06
          VariableReference Population: VariableName=[Peanut].SowingData.Population
        MultiplyFunction LAIDead
          VariableReference SLA: VariableName=[Leaf].SpecificAreaCanopy
          VariableReference LeafDeadWt: VariableName=[Leaf].Dead.Wt
        LinearInterpolationFunction MaximumNConc
          XYPairs: X=[3, 4, 9]; Y=[0.06, 0.05, 0.03]
          VariableReference XValue: VariableName=[Phenology].Stage
        LinearInterpolationFunction CriticalNConc
          XYPairs: X=[3, 4, 9]; Y=[0.06, 0.05, 0.03]
          VariableReference XValue: VariableName=[Phenology].Stage
        Constant MinimumNConc: FixedValue=0.02
        Constant MaintenanceRespiration: FixedValue=0; Units=0-1
        Constant DMConversionEfficiency: FixedValue=1; Units=0-1
        BiomassRemoval BiomassRemovalDefaults
          OrganBiomassRemovalType Harvest: FractionLiveToRemove=0; FractionDeadToRemove=0; FractionLiveToResidue=1; FractionDeadToResidue=1
          OrganBiomassRemovalType Cut: FractionLiveToRemove=0; FractionDeadToRemove=0; FractionLiveToResidue=1; FractionDeadToResidue=1
          OrganBiomassRemovalType Prune: FractionLiveToRemove=0; FractionDeadToRemove=0; FractionLiveToResidue=0; FractionDeadToResidue=0
          OrganBiomassRemovalType Graze: FractionLiveToRemove=0; FractionDeadToRemove=0; FractionLiveToResidue=0; FractionDeadToResidue=0
        Constant NRetranslocationFactor: FixedValue=0.5
        Constant DMReallocationFactor: FixedValue=0
        Constant DMRetranslocationFactor: FixedValue=0.5
        Constant RemobilisationCost: FixedValue=0
        Constant CarbonConcentration: FixedValue=0.4
        BiomassDemand DMDemands
          DivideFunction Structural
            VariableReference DeltaLAI: VariableName=[Leaf].DeltaLAI
            VariableReference SLA: VariableName=[Leaf].SpecificArea
            Memo
              Growth in leaf area is used to calculate the leaf dry matter demand.  Note that leaf biomass is assumed to consist of entirely structural dry matter.
          Constant Storage: FixedValue=0
          Constant Metabolic: FixedValue=0
        BiomassDemand NDemands
          MultiplyFunction Structural
            VariableReference MinNconc: VariableName=[Leaf].minimumNconc
            VariableReference PotentialDMAllocation: VariableName=[Leaf].potentialDMAllocation.Structural
          MultiplyFunction Metabolic
            SubtractFunction MetabolicNconc
              VariableReference CritNconc: VariableName=[Leaf].criticalNConc
              VariableReference MinNconc: VariableName=[Leaf].minimumNconc
            VariableReference PotentialDMAllocation: VariableName=[Leaf].potentialDMAllocation.Structural
          StorageNDemandFunction Storage
            Constant NitrogenDemandSwitch: FixedValue=1
            VariableReference MaxNconc: VariableName=[Leaf].maximumNconc
        LinearInterpolationFunction FrostFraction
          XYPairs: X=[-4, 4]; Y=[1, 0]
          VariableReference XValue: VariableName=[Weather].MinT
        LinearInterpolationFunction SpecificArea
          XYPairs: X=[0, 17, 21, 35]; Y=[0.027, 0.027, 0.027, 0.027]
          VariableReference XValue: VariableName=[Weather].MinT
        PhaseLookup DeltaLAI
          PhaseLookupValue Vegetative: Start=Emergence; End=EndCanopyDevelopment
            MultiplyFunction Delta
              VariableReference AreaLargestLeaf: VariableName=[Leaf].AreaLargestLeaf
              PhaseLookup RelativeArea
                PhaseLookupValue BeforeEndPod: Start=Emergence; End=StartPodDevelopment
                  LinearInterpolationFunction RelativeArea
                    Memo
                      This approach is based upon that used in [robertson_simulation_2002].
                    XYPairs: X=[2, 4, 6, 7, 10]; Y=[0.5, 1, 1, 1, 1]
                    VariableReference XValue: VariableName=[Leaf].NodeNumber
                PhaseLookupValue AfterEndPod: Start=StartPodDevelopment; End=EndCanopyDevelopment
                  Constant RelativeArea: FixedValue=1
              VariableReference PlantNumber: VariableName=[Peanut].SowingData.Population
              VariableReference BranchNumber: VariableName=[Leaf].BranchNumber
              DivideFunction LAR
                VariableReference TT: VariableName=[Phenology].VegetativeThermalTime
                VariableReference Phyllochron: VariableName=[Leaf].Phyllochron
              LinearInterpolationFunction LeafSizeTemperatureFactor
                XYPairs: X=[20, 22, 32, 40]; Y=[1, 1, 1, 0]
                VariableReference XValue: VariableName=[Weather].MeanT
          PhaseLookupValue Reproductive: Start=EndCanopyDevelopment; End=Maturity
            Constant: FixedValue=0
        Constant AreaLargestLeaf: FixedValue=0.0014
        DivideFunction SpecificAreaCanopy
          VariableReference LAI: VariableName=[Leaf].Area
          VariableReference LeafWt: VariableName=[Leaf].Live.Wt
        PhaseLookup Phyllochron
          PhaseLookupValue EarlyVegetative: Start=Emergence; End=StartGrainFilling
            Constant Phyllochron: FixedValue=56
              Memo
                This value is based upon that used in [robertson_simulation_2002].
          PhaseLookupValue LateVegetative: Start=StartGrainFilling; End=EndCanopyDevelopment
            MultiplyFunction Phyllochron
              Constant Base: FixedValue=56
                Memo
                  This value is based upon that used in [robertson_simulation_2002].
              LinearInterpolationFunction PPFactor
                XYPairs: X=[10, 12, 12.8, 14]; Y=[10, 10, 1, 1]
                VariableReference XValue: VariableName=[Phenology].Photoperiod
          PhaseLookupValue Reproductive: Start=EndCanopyDevelopment; End=Maturity
            Constant: FixedValue=0
        LinearInterpolationFunction BranchingRate
          Memo
            From Hammer Paper
          XYPairs: X=[0, 1, 2, 3, 15, 16]; Y=[0, 2, 1, 0.5, 0.5, 0]
          VariableReference XValue: VariableName=[Leaf].NodeNumber
      ReproductiveOrgan Grain: GrowthRespiration=0; MaintenanceRespiration=0
        Biomass Live: DMDOfStructural=0.6
        Biomass Dead: DMDOfStructural=0.6
        AddFunction FillingDuration
          VariableReference EarlyGrainFillingDuration: VariableName=[Phenology].EarlyGrainFilling.Target
          VariableReference MidGrainFillingDuration: VariableName=[Phenology].MidGrainFilling.Target
          VariableReference LateGrainFillingDuration: VariableName=[Phenology].LateGrainFilling.Target
        PhaseLookup DMDemandFunction
          PhaseLookupValue GrainFilling: Start=StartGrainFilling; End=EndGrainFill
            MultiplyFunction HIGrainDemand
              VariableReference AboveGroundWt: VariableName=[AboveGround].Wt
              DivideFunction HarvestIndexIncrease
                MaximumFunction OutstandingHarvestIndexIncrease
                  ExpressionFunction Increase: Expression=[Grain].PotentialHarvestIndex - [Grain].HarvestIndex
                  Constant Zero: FixedValue=0
                SubtractFunction TTRemaining
                  ExpressionFunction ReproductiveTT
                    Expression=[Phenology].EarlyGrainFilling.Target+[Phenology].MidGrainFilling.Target+[Phenology].LateGrainFilling.Target
                  ExpressionFunction ReproductiveTTComplete
                    Expression=[Phenology].EarlyGrainFilling.ProgressThroughPhase+[Phenology].MidGrainFilling.ProgressThroughPhase+[Phenology].LateGrainFilling.ProgressThroughPhase
              VariableReference ThermalTime: VariableName=[Phenology].ThermalTime
        Constant MinimumNConc: FixedValue=0.05
        Constant MaximumNConc: FixedValue=0.058
        Constant WaterContent: FixedValue=0.13
        MultiplyFunction NFillingRate
          VariableReference NConc: VariableName=[Grain].MaximumNConc
          VariableReference DMDemand: VariableName=[Grain].DMDemandFunction
          VariableReference DMConversionEfficiency: VariableName=[Grain].DMConversionEfficiency
        BiomassRemoval BiomassRemovalDefaults
          OrganBiomassRemovalType Harvest: FractionLiveToRemove=1; FractionDeadToRemove=1; FractionLiveToResidue=0; FractionDeadToResidue=0
          OrganBiomassRemovalType Cut: FractionLiveToRemove=0; FractionDeadToRemove=0; FractionLiveToResidue=1; FractionDeadToResidue=1
          OrganBiomassRemovalType Prune: FractionLiveToRemove=0; FractionDeadToRemove=0; FractionLiveToResidue=0; FractionDeadToResidue=0
          OrganBiomassRemovalType Graze: FractionLiveToRemove=0; FractionDeadToRemove=0; FractionLiveToResidue=0; FractionDeadToResidue=0
        Constant DMConversionEfficiency: FixedValue=0.89
        Constant RemobilisationCost: FixedValue=0
        Constant CarbonConcentration: FixedValue=0.4
        DivideFunction HarvestIndex
          VariableReference GrainWt: VariableName=[Grain].Wt
          VariableReference AboveGroundWt: VariableName=[AboveGround].Wt
        Constant MaximumPotentialGrainSize: FixedValue=0
          Memo
            This parameter is not used.  Grain growth is calculated from harvest index increase.
        Constant NumberFunction: FixedValue=0
          Memo
            Grain number is not estimated by this model.
        MultiplyFunction PotentialHarvestIndex
          VariableReference PodHarvestIndex: VariableName=[Pod].PotentialHarvestIndex
          Constant GrainFraction: FixedValue=0.72; Units=0-1
      Root: GrowthRespiration=0; MaintenanceRespiration=0
        RootShapeCylindre RootShape
        LinearInterpolationFunction KLModifier
          XYPairs: X=[0, 3]; Y=[1, 1]
          VariableReference XValue: VariableName=[Leaf].LAI
        HourlyInterpolation TemperatureEffect: agregationMethod=0
          XYPairs Response: X=[0, 26, 35]; Y=[1, 1, 1]
          ThreeHourSin InterpolationMethod
        LinearInterpolationFunction MaxDailyNUptake
          XYPairs: X=[0, 5]; Y=[1, 3]
          VariableReference XValue: VariableName=[Leaf].LAI
        Constant SenescenceRate: FixedValue=0.005
        Constant MaximumRootDepth: FixedValue=1000000
        PhaseLookup RootFrontVelocity
          Memo
            This approach is based upon that used in [robertson_simulation_2002].
          PhaseLookupValue PreEmergence: Start=Germination; End=Emergence
            Constant Function: FixedValue=15
          PhaseLookupValue early: Start=Emergence; End=StartGrainFilling
            Constant Function: FixedValue=35
          PhaseLookupValue late: Start=StartGrainFilling; End=Maturity
            Constant Function: FixedValue=0
        Constant MaximumNConc: FixedValue=0.01
        Constant MinimumNConc: FixedValue=0.005
        PhaseLookupValue NitrogenDemandSwitch: Start=Emergence; End=EndGrainFill
          Constant: FixedValue=1
        LinearInterpolationFunction KNO3
          XYPairs: X=[0, 0.003]; Y=[0.02, 0.02]
          VariableReference XValue: VariableName=[Root].LengthDensity
        LinearInterpolationFunction KNH4
          XYPairs: X=[0, 0.003]; Y=[0, 0]
          VariableReference XValue: VariableName=[Root].LengthDensity
        BiomassRemoval BiomassRemovalDefaults
          OrganBiomassRemovalType Harvest: FractionLiveToRemove=0; FractionDeadToRemove=0; FractionLiveToResidue=0.2; FractionDeadToResidue=0
          OrganBiomassRemovalType Cut: FractionLiveToRemove=0; FractionDeadToRemove=0; FractionLiveToResidue=0.2; FractionDeadToResidue=0
          OrganBiomassRemovalType Prune: FractionLiveToRemove=0; FractionDeadToRemove=0; FractionLiveToResidue=0; FractionDeadToResidue=0
          OrganBiomassRemovalType Graze: FractionLiveToRemove=0; FractionDeadToRemove=0; FractionLiveToResidue=0; FractionDeadToResidue=0
        LinearInterpolationFunction NUptakeSWFactor
          XYPairs: X=[0, 1]; Y=[0, 1]
          VariableReference XValue: VariableName=[Root].RWC
        Constant SpecificRootLength: FixedValue=60; Units=m/g
          Memo
            This approach is based upon that used in [robertson_simulation_2002].
        Constant DMConversionEfficiency: FixedValue=1
        Constant MaintenanceRespirationFunction: FixedValue=1
        Constant RemobilisationCost: FixedValue=0
        Constant CarbonConcentration: FixedValue=0.4
        BiomassDemand DMDemands
          MultiplyFunction Structural
            PartitionFractionDemandFunction DMDemandFunction
              PhaseLookup PartitionFraction
                PhaseLookupValue Early: Start=Emergence; End=StartFlowering
                  Constant Function: FixedValue=0.2
                PhaseLookupValue Middle: Start=StartFlowering; End=StartGrainFilling
                  Constant Function: FixedValue=0.2
                PhaseLookupValue Late: Start=StartGrainFilling; End=Maturity
                  Constant Function: FixedValue=0.05
            Constant StructuralFraction: FixedValue=1
          Constant Metabolic: FixedValue=0
          StorageDMDemandFunction Storage
            SubtractFunction StorageFraction
              Constant One: FixedValue=1
              VariableReference StructuralFraction: VariableName=[Root].DMDemands.Structural.StructuralFraction
        BiomassDemand NDemands
          MultiplyFunction Structural
            VariableReference MinNconc: VariableName=[Root].minimumNconc
            VariableReference PotentialDMAllocation: VariableName=[Root].potentialDMAllocation.Structural
          MultiplyFunction Metabolic
            SubtractFunction MetabolicNconc
              VariableReference CritNconc: VariableName=[Root].criticalNConc
              VariableReference MinNconc: VariableName=[Root].minimumNconc
            VariableReference PotentialDMAllocation: VariableName=[Root].potentialDMAllocation.Structural
          StorageNDemandFunction Storage
            VariableReference NitrogenDemandSwitch: VariableName=[Root].nitrogenDemandSwitch
            VariableReference MaxNconc: VariableName=[Root].maximumNconc
        VariableReference CriticalNConc: VariableName=[Root].MinimumNConc
        BiomassDemand InitialWt
          Constant Structural: FixedValue=0.1; Units=g/plant
          Constant Metabolic: FixedValue=0
          Constant Storage: FixedValue=0
        Constant RootDepthStressFactor: FixedValue=1
      Nodule
        Constant FixationMetabolicCost: FixedValue=0
        Constant MaximumNConc: FixedValue=0.02
        Constant MinimumNConc: FixedValue=0.01
        Constant SenescenceRate: FixedValue=0
        Constant NReallocationFactor: FixedValue=0
        PhaseLookupValue NitrogenDemandSwitch: Start=Emergence; End=EndGrainFill
          Constant: FixedValue=1
        BiomassRemoval BiomassRemovalDefaults: same as Replacements.Peanut.Root.BiomassRemovalDefaults
        Constant InitialWtFunction: FixedValue=0; Units=g/m^2
        Constant DetachmentRateFunction: FixedValue=0; Units=/d
        Constant MaintenanceRespirationFunction: FixedValue=0; Units=0-1
        Constant DMConversionEfficiency: FixedValue=1; Units=0-1
        Constant NRetranslocationFactor: FixedValue=0
        Constant DMReallocationFactor: FixedValue=0
        Constant DMRetranslocationFactor: FixedValue=0
        VariableReference CriticalNConc: VariableName=[Nodule].MinimumNConc
        Constant RemobilisationCost: FixedValue=0
        Constant CarbonConcentration: FixedValue=0.4
        HoldFunction FixationRate: WhenToHold=StartGrainFilling
          MinimumFunction DailyPotentialFixationRate
            MultiplyFunction PotentialFixationRate
              VariableReference LiveBiomass: VariableName=[AboveGroundLive].Wt
              PhaseLookup SpecificFixationRate
                PhaseLookupValue VegetativeGrowth: Start=Emergence; End=StartFlowering
                  Constant Rate: FixedValue=0.006
                PhaseLookupValue ReproductiveGrowth: Start=StartFlowering; End=EndGrainFill
                  Constant Rate: FixedValue=0.002
            Constant MaximumFixationRate: FixedValue=0.6
        BiomassDemand DMDemands
          MultiplyFunction Structural
            PartitionFractionDemandFunction DMDemandFunction
              PhaseLookup PartitionFraction
                PhaseLookupValue Early: Start=Emergence; End=StartFlowering
                  Constant Function: FixedValue=0.03
                PhaseLookupValue Middle: Start=StartFlowering; End=StartGrainFilling
                  Constant Function: FixedValue=0.02
                PhaseLookupValue Late: Start=StartGrainFilling; End=Maturity
                  Constant Function: FixedValue=0
            Constant StructuralFraction: FixedValue=1; Units=g/g
          Constant Metabolic: FixedValue=0
          StorageDMDemandFunction Storage
            SubtractFunction StorageFraction
              Constant One: FixedValue=1
              VariableReference StructuralFraction: VariableName=[Nodule].DMDemands.Structural.StructuralFraction
        BiomassDemand NDemands
          MultiplyFunction Structural
            VariableReference MinNconc: VariableName=[Nodule].minimumNconc
            VariableReference PotentialDMAllocation: VariableName=[Nodule].potentialDMAllocation.Structural
          MultiplyFunction Metabolic
            SubtractFunction MetabolicNconc
              VariableReference CritNconc: VariableName=[Nodule].criticalNConc
              VariableReference MinNconc: VariableName=[Nodule].minimumNconc
            VariableReference PotentialDMAllocation: VariableName=[Nodule].potentialDMAllocation.Structural
          StorageNDemandFunction Storage
            VariableReference NitrogenDemandSwitch: VariableName=[Nodule].nitrogenDemandSwitch
            VariableReference MaxNconc: VariableName=[Nodule].maximumNconc
      GenericOrgan Shell: IsAboveGround=true
        Constant NReallocationFactor: FixedValue=1
        Constant NRetranslocationFactor: FixedValue=0.5
        Constant MaximumNConc: FixedValue=0.045
        VariableReference CriticalNConc: VariableName=[Shell].MinimumNConc
        Constant MinimumNConc: FixedValue=0.01
        Constant DMRetranslocationFactor: FixedValue=0.1
        PhaseLookupValue NitrogenDemandSwitch: Start=StartPodDevelopment; End=EndPodDevelopment
          Constant: FixedValue=1
        BiomassRemoval BiomassRemovalDefaults: same as Replacements.Peanut.Leaf.BiomassRemovalDefaults
        PhaseLookup SenescenceRate
          PhaseLookupValue ReproductivePhase: Start=StartPodDevelopment; End=Maturity
            MinimumFunction Rate
              DivideFunction Fraction
                VariableReference TT: VariableName=[Phenology].ThermalTime
                SubtractFunction TTRemaining
                  ExpressionFunction ReproductiveTT
                    Expression=[Phenology].EarlyPodDevelopment.Target+[Phenology].EarlyGrainFilling.Target+[Phenology].MidGrainFilling.Target+[Phenology].LateGrainFilling.Target
                  ExpressionFunction ReproductiveTT1Complete
                    Expression=[Phenology].EarlyPodDevelopment.ProgressThroughPhase+[Phenology].EarlyGrainFilling.ProgressThroughPhase+[Phenology].MidGrainFilling.ProgressThroughPhase+[Phenology].LateGrainFilling.ProgressThroughPhase
              Constant One: FixedValue=1
        Constant DetachmentRateFunction: FixedValue=0; Units=/d
        Constant MaintenanceRespirationFunction: FixedValue=0; Units=0-1
        Constant DMConversionEfficiency: FixedValue=1; Units=0-1
        Constant DMReallocationFactor: FixedValue=0
        Constant RemobilisationCost: FixedValue=0
        Constant CarbonConcentration: FixedValue=0.4
        AddFunction FillingDuration
          VariableReference EarlyPodDevelopmentDuration: VariableName=[Phenology].EarlyPodDevelopment.Target
          VariableReference EarlyGrainFillingDuration: VariableName=[Phenology].EarlyGrainFilling.Target
          VariableReference MidGrainFillingDuration: VariableName=[Phenology].MidGrainFilling.Target
        BiomassDemand DMDemands
          MultiplyFunction Structural
            PhaseLookup DMDemandFunction
              PhaseLookupValue PodDevelopment: Start=StartPodDevelopment; End=EndPodDevelopment
                MultiplyFunction HIPodDemand
                  VariableReference AboveGroundWt: VariableName=[AboveGround].Wt
                  DivideFunction HarvestIndexIncrease
                    MaximumFunction OutstandingHarvestIndexIncrease
                      ExpressionFunction Increase: Expression=[Shell].PotentialHarvestIndex - [Shell].HarvestIndex
                      Constant Zero: FixedValue=0
                    SubtractFunction TTRemaining
                      ExpressionFunction ShellGrowthTT
                        Expression=[Phenology].EarlyPodDevelopment.Target+[Phenology].EarlyGrainFilling.Target+[Phenology].MidGrainFilling.Target
                      ExpressionFunction ShellGrowthTTComplete
                        Expression=[Phenology].EarlyPodDevelopment.ProgressThroughPhase+[Phenology].EarlyGrainFilling.ProgressThroughPhase+[Phenology].MidGrainFilling.ProgressThroughPhase
                  VariableReference ThermalTime: VariableName=[Phenology].ThermalTime
            Constant StructuralFraction: FixedValue=1
          Constant Metabolic: FixedValue=0
          StorageDMDemandFunction Storage
            SubtractFunction StorageFraction
              Constant One: FixedValue=1
              VariableReference StructuralFraction: VariableName=[Shell].DMDemands.Structural.StructuralFraction
        BiomassDemand NDemands
          MultiplyFunction Structural
            VariableReference MinNconc: VariableName=[Shell].minimumNconc
            VariableReference PotentialDMAllocation: VariableName=[Shell].potentialDMAllocation.Structural
          StorageNDemandFunction Storage
            VariableReference NitrogenDemandSwitch: VariableName=[Shell].nitrogenDemandSwitch
            VariableReference MaxNconc: VariableName=[Shell].maximumNconc
          Constant Metabolic: FixedValue=0
        RetranslocateNonStructural RetranslocateNitrogen
        BiomassDemand InitialWt
          Constant Structural: FixedValue=0; Units=g/m^2
          Constant Metabolic: FixedValue=0
          Constant Storage: FixedValue=0
        MultiplyFunction PotentialHarvestIndex
          VariableReference PodHarvestIndex: VariableName=[Pod].PotentialHarvestIndex
          Constant ShellFraction: FixedValue=0.28; Units=0-1
        DivideFunction HarvestIndex
          VariableReference ShellWt: VariableName=[Shell].Wt
          VariableReference AboveGroundWt: VariableName=[AboveGround].Wt
        Constant Photosynthesis: FixedValue=0
        VariableReference initialNConcFunction: VariableName=[Shell].MinimumNConc
        BiomassDemand dmDemandPriorityFactors
          Constant Structural: FixedValue=1
          Constant Metabolic: FixedValue=1
          Constant Storage: FixedValue=1
      GenericOrgan Stem: IsAboveGround=true
        Constant NReallocationFactor: FixedValue=1
        Constant NRetranslocationFactor: FixedValue=0.5
        PhaseLookup DMRetranslocationFactor
          PhaseLookupValue Vegetative: Start=Emergence; End=EndCanopyDevelopment
            Constant RetranslocationFactor: FixedValue=0
          PhaseLookupValue GrainFilling: Start=EndCanopyDevelopment; End=EndGrainFill
            Constant RetranslocationFactor: FixedValue=0.2
        LinearInterpolationFunction MaximumNConc
          XYPairs: X=[3, 4, 5]; Y=[0.025, 0.02, 0.015]
          VariableReference XValue: VariableName=[Phenology].Stage
        Constant MinimumNConc: FixedValue=0.006
        PhaseLookupValue NitrogenDemandSwitch: Start=Emergence; End=StartGrainFilling
          Constant: FixedValue=1
        BiomassRemoval BiomassRemovalDefaults: same as Replacements.Peanut.Leaf.BiomassRemovalDefaults
        PhaseLookup SenescenceRate
          PhaseLookupValue PostCanopyPhase: Start=EndCanopyDevelopment; End=Maturity
            MinimumFunction Rate
              DivideFunction Fraction
                VariableReference TT: VariableName=[Phenology].ThermalTime
                SubtractFunction TTRemaining
                  ExpressionFunction PostCanopyTT
                    Expression=[Phenology].EarlyPodDevelopment.Target+[Phenology].EarlyGrainFilling.Target+[Phenology].MidGrainFilling.Target+[Phenology].LateGrainFilling.Target
                  ExpressionFunction PostCanopyTTComplete
                    Expression=[Phenology].MidGrainFilling.ProgressThroughPhase+[Phenology].LateGrainFilling.ProgressThroughPhase
              Constant One: FixedValue=1
        Constant DetachmentRateFunction: FixedValue=0; Units=/d
        Constant MaintenanceRespirationFunction: FixedValue=0; Units=0-1
        Constant DMConversionEfficiency: FixedValue=1; Units=0-1
        Constant DMReallocationFactor: FixedValue=0
        VariableReference CriticalNConc: VariableName=[Stem].MinimumNConc
        Constant RemobilisationCost: FixedValue=0
        Constant CarbonConcentration: FixedValue=0.4
        BiomassDemand DMDemands
          MultiplyFunction Structural
            PhaseLookup Fraction
              PhaseLookupValue StemGrowthPhase: Start=Emergence; End=EndCanopyDevelopment
                Memo
                  This approach is based upon that used in [robertson_simulation_2002].
                Constant Fraction: FixedValue=0.9
              PhaseLookupValue PodAndGrainGrowth: Start=EndCanopyDevelopment; End=EndGrainFill
                Constant Fraction: FixedValue=0
            VariableReference DMDemand: VariableName=[Stem].PotentialGrowth
          Constant Metabolic: FixedValue=0
          MultiplyFunction Storage
            VariableReference DMDemand: VariableName=[Stem].PotentialGrowth
            SubtractFunction StorageFraction
              Constant One: FixedValue=1
              VariableReference StructuralFraction: VariableName=[Stem].DMDemands.Structural.Fraction
        BiomassDemand NDemands
          MultiplyFunction Structural
            VariableReference MinNconc: VariableName=[Stem].minimumNconc
            VariableReference PotentialDMAllocation: VariableName=[Stem].potentialDMAllocation.Structural
          MultiplyFunction Metabolic
            SubtractFunction MetabolicNconc
              VariableReference CritNconc: VariableName=[Stem].criticalNConc
              VariableReference MinNconc: VariableName=[Stem].minimumNconc
            VariableReference PotentialDMAllocation: VariableName=[Stem].potentialDMAllocation.Structural
          StorageNDemandFunction Storage
            VariableReference NitrogenDemandSwitch: VariableName=[Stem].nitrogenDemandSwitch
            VariableReference MaxNconc: VariableName=[Stem].maximumNconc
        PartitionFractionDemandFunction PotentialGrowth
          PhaseLookup PartitionFraction
            PhaseLookupValue StemGrowthPhase: Start=Emergence; End=EndPodDevelopment
              Constant StemFraction: FixedValue=0.4
            PhaseLookupValue GrainFilling: Start=EndPodDevelopment; End=EndGrainFill
              Constant StemFraction: FixedValue=0
        RetranslocateNonStructural RetranslocateNitrogen
        BiomassDemand InitialWt
          Constant Structural: FixedValue=0; Units=g/m^2
          Constant Metabolic: FixedValue=0
          Constant Storage: FixedValue=0
        Constant Photosynthesis: FixedValue=0
        VariableReference initialNConcFunction: VariableName=[Stem].MinimumNConc
        BiomassDemand dmDemandPriorityFactors
          Constant Structural: FixedValue=1
          Constant Metabolic: FixedValue=1
          Constant Storage: FixedValue=1
      CompositeBiomass AboveGround: DMDOfStructural=0.6
        Propertys=[[Leaf].Live, [Leaf].Dead, [Stem].Live, [Stem].Dead, [Grain].Live, [Grain].Dead, [Shell].Live, [Shell].Dead]
      CompositeBiomass BelowGround: Propertys=[[Root].Live, [Root].Dead, [Nodule].Live, [Nodule].Dead]; DMDOfStructural=0.6
      CompositeBiomass AboveGroundLive: Propertys=[[Leaf].Live, [Stem].Live, [Grain].Live, [Shell].Live]; DMDOfStructural=0.6
      CompositeBiomass Total: DMDOfStructural=0.6
        Propertys=[[Leaf].Live, [Leaf].Dead, [Stem].Live, [Stem].Dead, [Grain].Live, [Grain].Dead, [Shell].Live, [Shell].Dead, [Root].Live, [Root].Dead, [Nodule].Live, [Nodule].Dead]
      CompositeBiomass TotalLive: DMDOfStructural=0.6
        Propertys=[[Leaf].Live, [Stem].Live, [Grain].Live, [Shell].Live, [Root].Live, [Nodule].Live]
      CompositeBiomass TotalDead: DMDOfStructural=0.6
        Propertys=[[Leaf].Dead, [Stem].Dead, [Grain].Dead, [Shell].Dead, [Root].Dead, [Nodule].Dead]
      CompositeBiomass Pod: Propertys=[[Shell].Live, [Shell].Dead, [Grain].Live, [Grain].Dead]; DMDOfStructural=0.6
        DivideFunction HarvestIndex
          VariableReference PodWt: VariableName=[Pod].Wt
          VariableReference AboveGroundWt: VariableName=[AboveGround].Wt
        Constant PotentialHarvestIndex: FixedValue=0.5
          Memo
            This approach is based upon that used in [robertson_simulation_2002].
      CultivarFolder Cultivars
        Cultivar EarlyBunch
          Command:
            [Phenology].Vegetative.Target.FixedValue = 420
            [Phenology].EarlyFlowering.Target.FixedValue = 160
            [Phenology].LateGrainFilling.Target.EntireGrainfillPeriod.FixedValue = 1050
            [Phenology].EarlyGrainFilling.Target.FractionofGrainfilling.FixedValue = 0.6
            [Phenology].MidGrainFilling.Target.FractionofMidToLateGrainfilling.FixedValue=0.4
            [Grain].MaximumNConc.FixedValue = 0.067
            [Stem].PotentialGrowth.PartitionFraction.StemGrowthPhase.StemFraction.FixedValue = 0.5
            [Leaf].BranchingRate.XYPairs.X = 0,1,2,3,10,11
            [Leaf].BranchingRate.XYPairs.Y = 0,1,2,2.0,2.0,0.4
            [Leaf].ExtinctionCoefficient.XYPairs.X = 0, 335
            [Leaf].ExtinctionCoefficient.XYPairs.Y = 0.5, 0.5
        Cultivar VirginiaBunch
          Command:
            [Phenology].Vegetative.Target.FixedValue = 450
            [Phenology].EarlyFlowering.Target.FixedValue = 160
            [Phenology].LateGrainFilling.Target.EntireGrainfillPeriod.FixedValue = 1020
            [Phenology].EarlyGrainFilling.Target.FractionofGrainfilling.FixedValue = 0.40
            [Phenology].MidGrainFilling.Target.FractionofMidToLateGrainfilling.FixedValue=0.33
            [Grain].MaximumNConc.FixedValue = 0.067
            [Stem].PotentialGrowth.PartitionFraction.StemGrowthPhase.StemFraction.FixedValue = 0.5
            [Leaf].BranchingRate.XYPairs.X = 0,1,2,3,15,16
            [Leaf].BranchingRate.XYPairs.Y = 0,1,2,1.0,1.0,0
        Cultivar TMV2
          Command:
            [Phenology].Vegetative.Target.FixedValue = 390
            [Phenology].EarlyFlowering.Target.FixedValue = 160
            [Phenology].LateGrainFilling.Target.EntireGrainfillPeriod.FixedValue = 1020
            [Phenology].EarlyGrainFilling.Target.FractionofGrainfilling.FixedValue = 0.40
            [Phenology].MidGrainFilling.Target.FractionofMidToLateGrainfilling.FixedValue=0.33
            [Grain].MaximumNConc.FixedValue = 0.067
            [Stem].PotentialGrowth.PartitionFraction.StemGrowthPhase.StemFraction.FixedValue = 0.5
            [Leaf].BranchingRate.XYPairs.X = 0,1,2,3,15,16
            [Leaf].BranchingRate.XYPairs.Y = 0,1,2,1.0,1.0,0
        Cultivar Tapir: same as Replacements.Peanut.Cultivars.TMV2
        Cultivar VB97
          Command:
            [Phenology].Emerging.ShootLag=50
            [Phenology].Vegetative.Target.FixedValue = 390
            [Phenology].EarlyFlowering.Target.FixedValue = 100
            [Phenology].EarlyGrainFilling.Target.FractionofGrainfilling.FixedValue = 0.05
            [Phenology].LateGrainFilling.Target.EntireGrainfillPeriod.FixedValue = 1020
            [Phenology].MidGrainFilling.Target.FractionofMidToLateGrainfilling.FixedValue=0.33
            [Grain].MaximumNConc.FixedValue = 0.067
            [Stem].PotentialGrowth.PartitionFraction.StemGrowthPhase.StemFraction.FixedValue = 0.5
            [Leaf].BranchingRate.XYPairs.X = 0,1,2,3,15,16
            [Leaf].BranchingRate.XYPairs.Y = 0,1,2,2,2,0
            [Leaf].ExtinctionCoefficient.XYPairs.X = 5, 335
            [Leaf].ExtinctionCoefficient.XYPairs.Y = 0.2, 0.55
        Cultivar Florunner
          Command:
            [Phenology].Vegetative.Target.FixedValue = 400
            [Phenology].EarlyFlowering.Target.FixedValue = 160
            [Phenology].EarlyGrainFilling.Target.FractionofGrainfilling.FixedValue = 0.7
            [Phenology].LateGrainFilling.Target.EntireGrainfillPeriod.FixedValue = 1020
            [Phenology].MidGrainFilling.Target.FractionofMidToLateGrainfilling.FixedValue=0.20
            [Grain].MaximumNConc.FixedValue = 0.067
            [Stem].PotentialGrowth.PartitionFraction.StemGrowthPhase.StemFraction.FixedValue = 0.33
            [Leaf].BranchingRate.XYPairs.X = 0,1,2,3,15,16
            [Leaf].BranchingRate.XYPairs.Y = 0,1,2,2,2,0
            [Leaf].ExtinctionCoefficient.XYPairs.X = 0, 335
            [Leaf].ExtinctionCoefficient.XYPairs.Y = 0.6, 0.6
            [Leaf].SpecificArea.XYPairs.X = 0, 17, 21, 35
            [Leaf].SpecificArea.XYPairs.Y = .02, .02, .02, .02
            [Leaf].SenescenceRate.Reproductive.Rate.Modifier.FixedValue = 100
        Cultivar Redvale
          Command:
            [Phenology].Vegetative.Target.FixedValue = 420
            [Phenology].EarlyFlowering.Target.FixedValue = 200
            [Phenology].LateGrainFilling.Target.EntireGrainfillPeriod.FixedValue = 950
            [Phenology].EarlyGrainFilling.Target.FractionofGrainfilling.FixedValue = 0.5
            [Phenology].MidGrainFilling.Target.FractionofMidToLateGrainfilling.FixedValue=0.2
            [Grain].MaximumNConc.FixedValue = 0.067
            [Stem].PotentialGrowth.PartitionFraction.StemGrowthPhase.StemFraction.FixedValue = 0.5
            [Leaf].BranchingRate.XYPairs.X = 0,1,2,3,15,16
            [Leaf].BranchingRate.XYPairs.Y = 0,1,2,2.0,1.0,0
        Cultivar Taabinga
          Command:
            [Phenology].Vegetative.Target.FixedValue = 420
            [Phenology].EarlyFlowering.Target.FixedValue = 200
            [Phenology].LateGrainFilling.Target.EntireGrainfillPeriod.FixedValue = 950
            [Phenology].EarlyGrainFilling.Target.FractionofGrainfilling.FixedValue = 0.5
            [Phenology].MidGrainFilling.Target.FractionofMidToLateGrainfilling.FixedValue=0.20
            [Grain].MaximumNConc.FixedValue = 0.067
            [Stem].PotentialGrowth.PartitionFraction.StemGrowthPhase.StemFraction.FixedValue = 0.5
            [Leaf].BranchingRate.XYPairs.X = 0,1,2,3,15,16
            [Leaf].BranchingRate.XYPairs.Y = 0,1,2,2.0,1.0,0
        Cultivar Holt
          Command:
            [Phenology].Vegetative.Target.FixedValue = 500
            [Phenology].EarlyFlowering.Target.FixedValue = 200
            [Phenology].LateGrainFilling.Target.EntireGrainfillPeriod.FixedValue = 1050
            [Phenology].EarlyGrainFilling.Target.FractionofGrainfilling.FixedValue = 0.5
            [Phenology].MidGrainFilling.Target.FractionofMidToLateGrainfilling.FixedValue=0.2
            [Grain].MaximumNConc.FixedValue = 0.067
            [Stem].PotentialGrowth.PartitionFraction.StemGrowthPhase.StemFraction.FixedValue = 0.5
            [Leaf].BranchingRate.XYPairs.X = 0,1,2,3,15,16
            [Leaf].BranchingRate.XYPairs.Y = 0,1,2,2.0,1.0,0
      Constant MortalityRate: FixedValue=0
      BoundFunction AflotoxinPercentage
        Constant Lower: FixedValue=0
        Constant Upper: FixedValue=100
        AccumulateFunction AccumulatedValue: StartStageName=EndPodDevelopment; EndStageName=EndGrainFill; FractionRemovedOnCut=0; FractionRemovedOnHarvest=0; FractionRemovedOnGraze=0; FractionRemovedOnPrune=0
          MultiplyFunction DailyIncrease
            LinearInterpolationFunction TemperatureFactor
              XYPairs: X=[22, 30, 35]; Y=[0, 1, 0]
              Memo
                These parameters are overridden by cultivar parameter descriptions to capture the difference between individual cultivars in terms of their phenological development.  Responses shown here are only indicative.  See cultivar descriptions for more information.
              VariableReference XValue: VariableName=[Soil].Temperature.Value[1]
            LinearInterpolationFunction SoilWaterFactor
              XYPairs: X=[0, 0.2, 0.21, 1]; Y=[1, 1, 0, 0]
              Memo
                These parameters are overridden by cultivar parameter descriptions to capture the difference between individual cultivars in terms of their phenological development.  Responses shown here are only indicative.  See cultivar descriptions for more information.
              VariableReference XValue: VariableName=[Peanut].Root.FASW
            Constant: FixedValue=3
  Folder Validation
    Memo
      The Peanut model has been tested across a range of planting and agronomic conditions.  These include datasets covering a wide range of weather conditions (See graphs that follow) and agronomic factors (irrigation, fertiliser, sowing dates).
    Folder Combined Results
      Memo Combined Results
        Simulation results for the combined datasets from the various countries are shown in the following graphs.  The model is able to adequately capture the influence of growing conditions (soil, climate) and management (population, Nitrogen, irrigation, sowing date).
    Folder Australia
      Experiment Kingaroy8384
        Factors
          Permutation
            Factor Sow
              CompositeFactor Sep28: Specifications=[SowingRule].Script.SowingDate=1983-09-28
              CompositeFactor Oct12: Specifications=[SowingRule].Script.SowingDate=1983-10-12
              CompositeFactor Oct26: Specifications=[SowingRule].Script.SowingDate=1983-10-26
              CompositeFactor Nov09: Specifications=[SowingRule].Script.SowingDate=1983-11-09
              CompositeFactor Nov25: Specifications=[SowingRule].Script.SowingDate=1983-11-25
              CompositeFactor Dec07: Specifications=[SowingRule].Script.SowingDate=1983-12-07
              CompositeFactor Dec21: Specifications=[SowingRule].Script.SowingDate=1983-12-21
              CompositeFactor Jan04: Specifications=[SowingRule].Script.SowingDate=1984-01-04
              CompositeFactor Jan18: Specifications=[SowingRule].Script.SowingDate=1984-01-18
              CompositeFactor Feb01: Specifications=[SowingRule].Script.SowingDate=1984-02-01
              CompositeFactor Feb15: Specifications=[SowingRule].Script.SowingDate=1984-02-15
            Factor Cv
              Specification=[SowingRule].Script.CultivarName=VirginiaBunch,Florunner,EarlyBunch
        Simulation Kingaroy8384Base
          Clock: Start=1983-09-28; End=1984-12-31
          Summary summaryfile
          Weather: FileName=Kingaroy.met
          SoilArbitrator Soil Arbitrator
          MicroClimate: a_interception=0; b_interception=1; c_interception=0; d_interception=0; soil_albedo=0.23; SoilHeatFluxFraction=0.4; MinimumHeightDiffForNewLayer=0; NightInterceptionFraction=0.5; ReferenceHeight=2
          Zone paddock: Area=1; Slope=0; AspectAngle=0; Altitude=50
            Irrigation
            Manager Automatic irrigation based on water deficit
              FASW = 0
              WaterDeficit = 0
              AutoIrrigationOn = True
              FASWThreshold = 0.9
              FASWDepth = 900
```csharp
using Models.Interfaces;
using APSIM.Shared.Utilities;
using System.Xml.Serialization;
using Models;
using Models.PMF;
using Models.Soils;
using System.Text;
using System.Collections.Generic;
using Models.Core;
using System;
using Models.Soils.Nutrients;

namespace Models
{
    [Serializable] 
    public class Script : Model
    {
        [Link] private Zone zone;
        [Link] private Irrigation irrigation;
        [Link] private Soil soil;
        [Link]
        private IPhysical soilPhysical;
        [Link]
        private ISoilWater waterBalance;
        public double FASW { get; set; }
        public double WaterDeficit  { get; set; }
    
        
        [Description("Auto irrigation on?")]
        public bool AutoIrrigationOn { get; set; }

        [Description("Threshold fraction available water (0-1)")]
        public double FASWThreshold { get; set; }

        [Description("Soil depth (mm) to which fraction available water is calculated")]
        public double FASWDepth { get; set; }

        [EventSubscribe("DoManagement")]
        private void OnDoManagement(object sender, EventArgs e)
        {
            CalculateFASW();
            if (AutoIrrigationOn)
            {
                if (FASW < FASWThreshold)
                {
                    double amount = 10;
                    irrigation.Apply(WaterDeficit, depth: 0);
                }
            }
        }
        
        private void CalculateFASW()
        {
            double[] LL15 = MathUtilities.Multiply(soilPhysical.LL15, soilPhysical.Thickness);
            double[] DUL = MathUtilities.Multiply(soilPhysical.DUL, soilPhysical.Thickness);
        
            int nlayr = GetLayerIndex();
            double cumdep = MathUtilities.Sum(soilPhysical.Thickness, 0, nlayr, 0.0);

            double excess_fr = MathUtilities.Divide((cumdep - FASWDepth), soilPhysical.Thickness[nlayr], 0.0);

            // note that results may be strange if swdep < ll15
            double avail_sw = (MathUtilities.Sum(waterBalance.SWmm, 0, nlayr, 0.0)
                              - excess_fr * waterBalance.SWmm[nlayr])
                              - (MathUtilities.Sum(LL15, 0, nlayr, 0.0)
                              - excess_fr * LL15[nlayr]);


            double pot_avail_sw = (MathUtilities.Sum(DUL, 0, nlayr, 0.0)
                                  - excess_fr * DUL[nlayr])
                                  - (MathUtilities.Sum(LL15, 0, nlayr, 0.0)
                                  - excess_fr * LL15[nlayr]);

            FASW = MathUtilities.Divide(avail_sw, pot_avail_sw, 0.0);
            WaterDeficit = MathUtilities.Constrain(pot_avail_sw - avail_sw, 0.0, 100000);
        }

        private int GetLayerIndex()
        {
            double[] cumThickness = soilPhysical.ThicknessCumulative;
            for (int i = 1; i < cumThickness.Length; i++)
            {
                if (FASWDepth < cumThickness[i])
                    return i - 1;
            }
            
            return cumThickness.Length - 1;
        }

    }
}
```
            Fertiliser
            SurfaceOrganicMatter: InitialResidueName=maize; InitialResidueType=maize; InitialResidueMass=4500; InitialStandingFraction=0; InitialCPR=0; InitialCNR=55
            Report DailyReport: EventNames=[Clock].DoReport
              VariableNames:
                [Clock].Today
                [DiagnosticsVariables].Script.AccumPlantN
                [DiagnosticsVariables].Script.AccumMineralisation
                [DiagnosticsVariables].Script.AccumDenit
                [DiagnosticsVariables].Script.AccumFert
                [DiagnosticsVariables].Script.AccumLeach
                [DiagnosticsVariables].Script.AccumDetach
                [DiagnosticsVariables].Script.DeltaSoilOMN
                [DiagnosticsVariables].Script.DeltaSurfaceOMN
                [DiagnosticsVariables].Script.DeltaSoilMineralN
                [Peanut].Root.NSupply
                [Soil].SoilWater.Eo
                [Soil].SoilWater.Es
                [DiagnosticsVariables].Script.SWC
                [DiagnosticsVariables].Script.DUL
                [Soil].SoilWater.Drainage
                [Soil].SoilWater.Runoff
                [DiagnosticsVariables].Script.OutFlowLat
                [Soil].SoilWater.pond
                [DiagnosticsVariables].Script.AccumEO
                [DiagnosticsVariables].Script.AccumEP
                [DiagnosticsVariables].Script.AccumES
                [DiagnosticsVariables].Script.AccumDrainage
                [DiagnosticsVariables].Script.AccumRunoff
                [DiagnosticsVariables].Script.AccumRainfall
                [DiagnosticsVariables].Script.AccumIrrigation
                [DiagnosticsVariables].Script.AccumOutflowLat
                [DiagnosticsVariables].Script.SoilWaterDeficit
                [Peanut].Grain.Live.Wt
                [Peanut].Shell.Live.Wt
                [Peanut].Stem.Live.Wt
                [Peanut].Stem.Live.Wt
                [Peanut].Grain.Live.N
                [Peanut].Shell.Live.N
                [Peanut].Leaf.Live.Wt
                [Peanut].Root.Live.Wt
                [Peanut].Leaf.Live.N
                [Peanut].Root.Live.N
                [Peanut].Leaf.Live.NConc
                [Peanut].Root.Live.NConc
                [Peanut].Root.WaterSupply
                [Peanut].Root.WaterUptake
                [Peanut].Leaf.Transpiration
                [Peanut].Leaf.WaterDemand
                [Peanut].Root.Depth
                [Peanut].Leaf.CoverTotal
                [Peanut].Leaf.CoverDead
                [Peanut].Leaf.LAI
                [Peanut].Leaf.Height
                [Peanut].Leaf.PotentialBiomass
                [Soil].SoilWater.SWmm
                [Soil].Nutrient.NO3.kgha
                [DiagnosticsVariables].Script.SoilNitrogenContent
                [Peanut].Arbitrator.N.TotalPlantDemand
                [MicroClimate].net_radn
                [MicroClimate].peta
                [MicroClimate].petr
                [DiagnosticsVariables].Script.FomN
                [DiagnosticsVariables].Script.HumN
                [DiagnosticsVariables].Script.BiomN
                [DiagnosticsVariables].Script.DltNMinRes
                [DiagnosticsVariables].Script.DltNMinTot
                [Peanut].Leaf.Fw
                [Peanut].Leaf.Fn
                [Peanut].Phenology.CurrentPhase.Name
                [Peanut].Phenology.Stage
                [Peanut].Pod.Wt
                [Peanut].Pod.N
                [Peanut].Structure.LeafTipsAppeared
                [Peanut].Structure.MainStemPrimordiaNo
                [Peanut].Leaf.CohortArea[1]
                [Peanut].Leaf.CohortArea[2]
                [Peanut].Leaf.CohortArea[3]
                [Peanut].Leaf.CohortArea[4]
                [Peanut].Leaf.CohortArea[5]
                [Peanut].Leaf.CohortArea[6]
                [Peanut].Leaf.CohortArea[7]
                [Peanut].Leaf.CohortArea[8]
                [Peanut].Leaf.CohortArea[9]
                [Peanut].Leaf.CohortArea[10]
                [Peanut].Leaf.CohortArea[11]
                [Peanut].Leaf.CohortArea[12]
                [Peanut].Leaf.CohortArea[13]
                [Peanut].Leaf.CohortArea[14]
                [Peanut].Leaf.CohortArea[15]
                [Peanut].Leaf.AppearedCohortNo
                [Peanut].Leaf.DeadCohortNo
                [Peanut].AboveGround.Wt
                [Peanut].Phenology.Stage
                [Peanut].Structure.MainStemPrimordiaNo
                [Peanut].Phenology.NFF
                [PeanutHarvestRule].Script.FinalTag
                [Peanut].Grain.NumberFunction
                [Peanut].Shell.PodNumber
                [Peanut].Phenology.FN
                [Peanut].Phenology.FN.TotalNodes
                [Peanut].Phenology.FN.VegetativeNodes
            Manager SowingRule
              SowingDate = 06/10/2001 00:00:00
              CultivarName = EarlyBunch
              SowingRate = 30
              RowSpacing = 760
              SowingDepth = 50
```csharp
using APSIM.Shared.Utilities;
using Models.PMF;
using Models.Core;
using System;
        
        namespace Models
        {
           [Serializable] 
           [System.Xml.Serialization.XmlInclude(typeof(Model))]
            public class Script : Model
            {      
               [Link] Plant Peanut;
               [Link] Clock Clock;

               [Description("Spacing (mm) between rows")]
               public double RowSpacing { get; set; }
               [Description("Depth (mm) Grains are planted")]
               public double SowingDepth { get; set; }
               [Description("Seeds sown (/m2)")]
               public double SowingRate { get; set; }
               [Description("Cultivar")]
               [Display(Type=DisplayType.CultivarName)]
               public string CultivarName { get; set; }
               [Description("Sowing Date")]
               public DateTime SowingDate { get; set; }

               [EventSubscribe("DoManagement")]
               private void OnDoManagement(object sender, EventArgs e)
               {
                if (Clock.Today.Date == SowingDate)
                    Peanut.Sow(population:SowingRate, cultivar:CultivarName, depth:SowingDepth, rowSpacing:RowSpacing, budNumber:1);
               }
            }
        }
```
            Report HarvestReport: EventNames=[Peanut].Harvesting
              VariableNames:
                [Clock].Today
                [Peanut].Structure.MainStemPrimordiaNo
                [Peanut].Phenology.NFF
                [Peanut].Script.FinalTag
            Plant Peanut
            Soil: Latitude=0; Longitude=0
              InitialWater Initial water: PercentMethod=1; FractionFull=1
              Physical
                Thickness  BD    AirDry  LL15   DUL    SAT
                150        1.56  0.053   0.19   0.304  0.315
                150        1.52  0.08    0.21   0.31   0.33
                150        1.46  0.21    0.21   0.31   0.337
                150        1.46  0.223   0.223  0.324  0.34
                150        1.42  0.219   0.219  0.328  0.34
                150        1.42  0.219   0.219  0.328  0.341
                300        1.46  0.219   0.219  0.325  0.344
                300        1.5   0.229   0.229  0.337  0.346
                300        1.53  0.237   0.237  0.35   0.37
                SoilCrop PeanutSoil
                  LL=[0.19, 0.21, 0.21, 0.235, 0.233, 0.242, 0.248, 0.277, 0.285]
                  KL=[0.08, 0.08, 0.08, 0.08, 0.06, 0.09, 0.06, 0.05, 0.03]
                  XF=[1, 1, 1, 1, 1, 1, 1, 1, 1]
              WaterBalance SoilWater: SummerDate=1-Nov; SummerU=1.5; SummerCona=6.6; WinterDate=1-Apr; WinterU=1.5; WinterCona=6.6; DiffusConst=88; DiffusSlope=35; Salb=0.2; CN2Bare=85; CNRed=20; CNCov=0.8; DischargeWidth=5; CatchmentArea=10; Thickness=[100, 100, 300, 300, 400, 600]; SWCON=[0.5, 0.5, 0.5, 0.5, 0.5, 0.5]
              Organic: FOMCNRatio=33
                Thickness  Carbon  SoilCNRatio  FBiom  FInert  FOM
                150        1.27    14.5         0.05   0.39    0
                150        0.59    14.5         0.02   0.47    0
                150        0.34    14.5         0.015  0.52    0
                150        0.34    14.5         0.01   0.62    0
                150        0.26    14.5         0.01   0.74    0
                150        0.26    14.5         0.01   0.83    0
                300        0.25    14.5         0.01   0.93    0
                300        0.19    14.5         0.01   0.93    0
                300        0.21    14.5         0.01   0.93    0
              Chemical
                Thickness  NO3N  NH4N  PH
                100        2     1     6.5
                100        2     1     6.6
                300        2     1     7
                300        2     1     7
                400        2     1     6.5
                600        2     1     6.1
              CERESSoilTemperature Temperature
              Nutrient
            Manager Harvest
```csharp
using Models.Soils.Nutrients;
using System;
using Models.Core;
using Models.PMF;
using Models.Soils;
using Models.Soils.Nutrients;
using Models.Utilities;
using APSIM.Shared.Utilities;

namespace Models
{
    [Serializable]
    public class Script : Model
    {
        [Link] Plant Peanut;

        [EventSubscribe("DoManagement")]
        private void OnDoManagement(object sender, EventArgs e)
        {
            if (Peanut.IsReadyForHarvesting)
            {
               Peanut.Harvest();
               Peanut.EndCrop();    
            }
        
        }
        
    }
}
```
      Experiment Kingaroy8485
        Factors
          Permutation
            Factor Sow
              CompositeFactor Nov01
                Specifications:
                  [SowingRule].Script.SowingDate=1984-11-01
                  [HarvestAfterDate]
                Manager HarvestAfterDate
                  HarvestDate = 12-Mar
```csharp
using Models.PMF.Phen;
using APSIM.Shared.Utilities;
using Models;
using Models.PMF;
using System.Text;
using Models.Core;
using System;

namespace Models
{
    [Serializable] 
    public class Script : Model
    {
    	[Link] ISummary summary;
        [Link] private Plant Peanut;
        [Link(Type = LinkType.Path, Path = "[Peanut].Phenology")]
        private Phenology phenology;
                [Link] Clock Clock;

        private bool Harvestable = false;

        [Description("Harvest Date (d-mmm)")]
        public string HarvestDate { get; set; }   
      
        [EventSubscribe("DoManagement")]
        private void OnDoManagement(object sender, EventArgs e)
        {
           
        	if (Harvestable && Peanut.IsReadyForHarvesting)
            {
                Peanut.Harvest();
                Peanut.EndCrop();                
            }
            
            if (DateUtilities.DatesAreEqual(HarvestDate, Clock.Today))
                Harvestable = true;

        }
    }
}
```
              CompositeFactor Dec05
                Specifications:
                  [SowingRule].Script.SowingDate=1984-12-05
                  [HarvestAfterDate]
                Manager HarvestAfterDate
                  HarvestDate = 24-Apr
                  script: same as in Validation.Australia.Kingaroy8485.Factors.Permutation.Sow.Nov01.HarvestAfterDate
              CompositeFactor Jan15
                Specifications:
                  [SowingRule].Script.SowingDate=1985-01-15
                  [HarvestAfterDate]
                Manager HarvestAfterDate
                  HarvestDate = 28-May
                  script: same as in Validation.Australia.Kingaroy8485.Factors.Permutation.Sow.Nov01.HarvestAfterDate
            Factor Pop: Specification=[SowingRule].Script.SowingRate = 8.8, 17.6
        Simulation Kingaroy8485Base
          Clock: Start=1984-11-01; End=1985-06-30
          Summary summaryfile
          Weather: FileName=Kingaroy.met
          SoilArbitrator Soil Arbitrator
          MicroClimate: a_interception=0; b_interception=1; c_interception=0; d_interception=0; soil_albedo=0.23; SoilHeatFluxFraction=0.4; MinimumHeightDiffForNewLayer=0; NightInterceptionFraction=0.5; ReferenceHeight=2
          Zone paddock: Area=1; Slope=0; AspectAngle=0; Altitude=50
            Irrigation
            Manager Automatic irrigation based on water deficit: same as Validation.Australia.Kingaroy8384.Kingaroy8384Base.paddock.Automatic irrigation based on water deficit
            Fertiliser
            SurfaceOrganicMatter: InitialResidueName=maize; InitialResidueType=maize; InitialResidueMass=4500; InitialStandingFraction=0; InitialCPR=0; InitialCNR=55
            Report DailyReport: same as Validation.Australia.Kingaroy8384.Kingaroy8384Base.paddock.DailyReport
            Manager SowingRule
              SowingDate = 06/10/2001 00:00:00
              CultivarName = EarlyBunch
              RowSpacing = 760
              SowingDepth = 50
              SowingRate = 30
              script: same as in Validation.Australia.Kingaroy8384.Kingaroy8384Base.paddock.SowingRule
            Report HarvestReport: EventNames=[Peanut].Harvesting
              VariableNames:
                [Clock].Today
                [Peanut].Structure.MainStemPrimordiaNo
                [Peanut].Phenology.NFF
                [Peanut].Script.FinalTag
            Plant Peanut
            Soil: Latitude=0; Longitude=0
              InitialWater Initial water: PercentMethod=1; FractionFull=1
              Physical
                Thickness  BD    AirDry  LL15   DUL    SAT
                100        1.2   0.1     0.2    0.3    0.525
                100        1.23  0.15    0.234  0.34   0.514
                300        1.28  0.2     0.256  0.36   0.5
                300        1.34  0.287   0.287  0.365  0.481
                400        1.4   0.34    0.34   0.38   0.455
                600        1.45  0.34    0.37   0.398  0.435
                SoilCrop PeanutSoil: LL=[0.2, 0.234, 0.256, 0.287, 0.34, 0.37]; KL=[0.1, 0.09, 0.07, 0.05, 0.04, 0.03]; XF=[1, 1, 1, 1, 1, 0.2]
              WaterBalance SoilWater: SummerDate=1-Nov; SummerU=8; SummerCona=3.5; WinterDate=1-Apr; WinterU=8; WinterCona=3.5; DiffusConst=250; DiffusSlope=22; Salb=0.2; CN2Bare=85; CNRed=20; CNCov=0.8; DischargeWidth=5; CatchmentArea=10; Thickness=[100, 100, 300, 300, 400, 600]; SWCON=[0.5, 0.5, 0.5, 0.5, 0.5, 0.5]
              Organic: FOMCNRatio=33
                Thickness  Carbon  SoilCNRatio  FBiom  FInert  FOM
                100        1.6     12           0.045  0.4     0
                100        1.1     12           0.02   0.4     0
                300        0.9     12           0.01   0.6     0
                300        0.7     12           0.01   0.8     0
                400        0.5     12           0.01   0.96    0
                600        0.2     12           0.01   0.96    0
              Chemical: same as Validation.Australia.Kingaroy8384.Kingaroy8384Base.paddock.Soil.Chemical
              CERESSoilTemperature Temperature
              Nutrient
            Manager HarvestAfterDate
              HarvestDate = 5-Apr
              script: same as in Validation.Australia.Kingaroy8485.Factors.Permutation.Sow.Nov01.HarvestAfterDate
      Experiment Kingaroy8990
        Memo
          This dataset ([Bell1992NightTemperature]) provides data on growth for three cultivars grown under irrigated conditions in at Kingaroy in Queensland. The soil type was a deep, red clay-loam with a friable structure and increasing clay content with depth.  Supplementary irrigations were made to avoid moisture stress.
        Factors
          Factor Cv
            Specification=[SowingRule].Script.CultivarName=EarlyBunch, VirginiaBunch, TMV2
        Simulation Kingaroy8990Base
          Clock: Start=1989-11-24; End=1990-04-30
          Summary summaryfile
          Weather: FileName=Kingaroy.met
          SoilArbitrator Soil Arbitrator
          MicroClimate: a_interception=0; b_interception=1; c_interception=0; d_interception=0; soil_albedo=0.23; SoilHeatFluxFraction=0.4; MinimumHeightDiffForNewLayer=0; NightInterceptionFraction=0.5; ReferenceHeight=2
          Zone paddock: Area=1; Slope=0; AspectAngle=0; Altitude=50
            Irrigation
            Fertiliser
            SurfaceOrganicMatter: InitialResidueName=maize; InitialResidueType=maize; InitialResidueMass=4500; InitialStandingFraction=0; InitialCPR=0; InitialCNR=55
            Report DailyReport: same as Validation.Australia.Kingaroy8384.Kingaroy8384Base.paddock.DailyReport
            Manager SowingRule
              SowingDate = 11/24/1989 00:00:00
              CultivarName = EarlyBunch
              RowSpacing = 900
              SowingDepth = 50
              SowingRate = 8.8
              script: same as in Validation.Australia.Kingaroy8384.Kingaroy8384Base.paddock.SowingRule
            Report HarvestReport: EventNames=[Peanut].Harvesting
              VariableNames:
                [Clock].Today
                [Peanut].Structure.MainStemPrimordiaNo
                [Peanut].Phenology.NFF
                [Peanut].Script.FinalTag
            Plant Peanut
            Soil: same as Validation.Australia.Kingaroy8485.Kingaroy8485Base.paddock.Soil
            Manager Automatic irrigation based on water deficit: same as Validation.Australia.Kingaroy8384.Kingaroy8384Base.paddock.Automatic irrigation based on water deficit
            Manager HarvestAfterDate: same as Validation.Australia.Kingaroy8485.Factors.Permutation.Sow.Dec05.HarvestAfterDate
      Experiment Kingaroy1819
        Factors
          Permutation
            Factor Cv: Specification=[SowingRule].Script.CultivarName=Redvale, Taabinga
            Factor Irrigation: Specification=[Operations]
              Operations Wet
                2019-01-11  [Irrigation].Apply(amount:20);
                2019-01-25  [Irrigation].Apply(amount:25);
                2019-02-12  [Irrigation].Apply(amount:40);
                2019-03-01  [Irrigation].Apply(amount:40);
                2019-05-01  [Irrigation].Apply(amount:40);
              Operations Dry
                2019-01-11  [Irrigation].Apply(amount:20);
                2019-01-25  [Irrigation].Apply(amount:25);
        Simulation Kingaroy1819Base
          Clock: Start=2019-01-10; End=2019-06-15
          Summary summaryfile
          Weather: FileName=Kingaroy1819.met
          SoilArbitrator Soil Arbitrator
          MicroClimate: a_interception=0; b_interception=1; c_interception=0; d_interception=0; soil_albedo=0.23; SoilHeatFluxFraction=0.4; MinimumHeightDiffForNewLayer=0; NightInterceptionFraction=0.5; ReferenceHeight=2
          Zone paddock: Area=1; Slope=0; AspectAngle=0; Altitude=50
            Irrigation
            Fertiliser
            SurfaceOrganicMatter: InitialResidueName=maize; InitialResidueType=maize; InitialResidueMass=4500; InitialStandingFraction=0; InitialCPR=0; InitialCNR=55
            Report DailyReport: same as Validation.Australia.Kingaroy8384.Kingaroy8384Base.paddock.DailyReport
            Manager SowingRule
              RowSpacing = 900
              SowingDepth = 50
              SowingRate = 15
              CultivarName = EarlyBunch
              SowingDate = 01/10/2019 00:00:00
              script: same as in Validation.Australia.Kingaroy8384.Kingaroy8384Base.paddock.SowingRule
            Report HarvestReport: EventNames=[Peanut].Harvesting
              VariableNames:
                [Clock].Today
                [Peanut].Structure.MainStemPrimordiaNo
                [Peanut].Phenology.NFF
                [Peanut].Script.FinalTag
            Plant Peanut
            Operations
            Soil SoilOLD (disabled): ASCOrder=Ferrosol; ASCSubOrder=Red; SoilType=?; Site=Wooroolin; NearestTown=Wooroolin; Region=Wide Bay and Burnett; State=Queensland; Country=Australia; ApsoilNumber=107; Latitude=-26.368; Longitude=151.775; YearOfSampling=0
              DataSource=CSIRO Tropical Crops and Pastures in collaboration with Agforce Queensland
              Comments=Changed SWCON from 0.3 to 0.9 based on local advice about this regions Ferrosols from Mike Bell, Graeme Wright, Yash Chauhan
              Physical
                Thickness  BD     AirDry  LL15   DUL    SAT
                150        1.349  0.14    0.28   0.357  0.461
                150        1.423  0.226   0.282  0.383  0.433
                300        1.383  0.307   0.307  0.398  0.448
                300        1.332  0.307   0.307  0.417  0.467
                300        1.33   0.307   0.307  0.418  0.468
                300        1.353  0.307   0.307  0.409  0.459
                300        1.359  0.307   0.307  0.407  0.457
                SoilCrop PeanutSoil: LL=[0.28, 0.282, 0.307, 0.32, 0.332, 0.34, 0.335]; KL=[0.06, 0.06, 0.06, 0.04, 0.04, 0.02, 0.01]; XF=[1, 1, 1, 1, 1, 1, 1]
              WaterBalance SoilWater: SummerDate=1-Nov; SummerU=6; SummerCona=3.5; WinterDate=1-Apr; WinterU=4; WinterCona=2.5; DiffusConst=40; DiffusSlope=16; Salb=0.12; CN2Bare=73; CNRed=20; CNCov=0.8; Thickness=[150, 150, 300, 300, 300, 300, 300]; SWCON=[0.9, 0.9, 0.9, 0.9, 0.9, 0.9, 0.9]
              Organic: FOMCNRatio=40
                Thickness  Carbon  SoilCNRatio  FBiom  FInert  FOM
                150        1.196   12           0.04   0.4     347.129
                150        1.014   12           0.02   0.6     270.344
                300        0.455   12           0.02   0.8     163.972
                300        0.299   12           0.02   1       99.4541
                300        0.195   12           0.01   1       60.322
                300        0.156   12           0.01   1       36.5871
                300        0.156   12           0.01   1       22.1912
              Chemical: Thickness=[150, 150, 300, 300, 300, 300, 300]; PH=[8.2, 8.5, 8.6, 8.6, 7.4, 5.3, 5.3]
                PH source: Unknown source or quality of data
              InitialWater Initial water: PercentMethod=0; FractionFull=0.33
              Sample Initial conditions: Depth=[0-180]; Thickness=[1800]; NH4=[1]; SWUnits=Volumetric; OCUnits=Total; PHUnits=Water
              Nutrient
              CERESSoilTemperature Temperature
            Soil: SoilType=Red Ferrosol; Site=Redvale; NearestTown=Kingaroy, Q 4610; Region=Burnett; State=Queensland; ApsoilNumber=65; Latitude=-26.54; Longitude=151.875; LocationAccuracy=Regional Soil Type; YearOfSampling=0; DataSource=Qld DPI&F (M Bell)
              InitialWater Initial water: PercentMethod=0; FractionFull=0.33; RelativeTo=LL15
              Physical
                Thickness  ParticleSizeClay  ParticleSizeSand  ParticleSizeSilt  BD    AirDry  LL15  DUL   SAT
                100        60                20                30                1.2   0.1     0.26  0.37  0.51
                100        60                20                30                1.23  0.184   0.26  0.37  0.5
                300        60                20                30                1.27  0.26    0.26  0.36  0.49
                300        60                20                30                1.32  0.26    0.29  0.37  0.47
                300        80                20                30                1.39  0.26    0.3   0.38  0.45
                300        60                20                30                1.45  0.26    0.37  0.4   0.43
                500        60                20                30                1.48  0.26    0.37  0.39  0.42
                SoilCrop PeanutSoil: LL=[0.26, 0.26, 0.26, 0.29, 0.3, 0.37, 0.37]; KL=[0.07, 0.06, 0.06, 0.05, 0.04, 0.02, 0.01]; XF=[1, 1, 1, 1, 1, 1, 1]
              WaterBalance SoilWater: SummerDate=1-Nov; SummerU=6; SummerCona=3.5; WinterDate=1-apr; WinterU=4; WinterCona=2.5; DiffusConst=40; DiffusSlope=16; Salb=0.12; CN2Bare=73; CNRed=20; CNCov=0.8; Thickness=[100, 100, 300, 300, 300, 300, 500]; SWCON=[0.9, 0.9, 0.9, 0.9, 0.9, 0.9, 0.9]
              Organic: FOMCNRatio=40
                Thickness  Carbon  SoilCNRatio  FBiom  FInert  FOM
                100        1.19    12           0.04   0.4     321.574
                100        1.01    12           0.02   0.6     274.605
                300        0.45    12           0.02   0.8     170.997
                300        0.3     12           0.02   1       106.481
                300        0.2     12           0.01   1       66.3059
                300        0.16    12           0.01   1       41.289
                500        0.16    12           0.01   1       18.7486
              Chemical
                Thickness  NO3N  NH4N  PH
                100        10    0.1   8.2
                100        10    0.1   8.5
                300        10    0.1   8.6
                300        0.1   0.1   8.6
                300        0.1   0.1   7.4
                300        0.1   0.1   5.3
                500        0.1   0.1   5.3
              Sample Initial conditions: Depth=[0-180]; Thickness=[1800]; NH4=[1]; SWUnits=Volumetric; OCUnits=Total; PHUnits=Water
              Nutrient
              CERESSoilTemperature Temperature
            Manager HarvestAfterDate
              HarvestDate = 30-May
              script: same as in Validation.Australia.Kingaroy8485.Factors.Permutation.Sow.Nov01.HarvestAfterDate
      Experiment Kunnunura8182
        Factors
          Factor Pop: Specification=[SowingRule]
            Manager 9
              SowingRate = 8.8
              SpacingRatio = 1
              SowingDepth = 50
              CultivarName = Florunner
              SowingDate = 12/10/1981 00:00:00
              EmergDate =
```csharp
using APSIM.Shared.Utilities;
using Models.PMF;
using Models.Core;
using System;
        
        namespace Models
        {
           [Serializable] 
           [System.Xml.Serialization.XmlInclude(typeof(Model))]
            public class Script : Model
            {      
               [Link] Plant Peanut;
               [Link] Clock Clock;

               [Description("Spacing Ratio (row vs plant spacing)")]
               public double SpacingRatio { get; set; }
               [Description("Depth (mm) Grains are planted")]
               public double SowingDepth { get; set; }
               [Description("Seeds sown (/m2)")]
               public double SowingRate { get; set; }
               [Description("Cultivar")]
               [Display(Type=DisplayType.CultivarName)]
               public string CultivarName { get; set; }
               [Description("Sowing Date")]
               public DateTime SowingDate { get; set; }
			   [Description("Emergence Date")]
               public string EmergDate { get; set; }


               [EventSubscribe("DoManagement")]
               private void OnDoManagement(object sender, EventArgs e)
               {
               double A = (1/SowingRate);
               double RowSpacing = Math.Sqrt(SpacingRatio*A)*1000;
                if (Clock.Today.Date == SowingDate)
                {
                    Peanut.Sow(population:SowingRate, cultivar:CultivarName, depth:SowingDepth, rowSpacing:RowSpacing, budNumber:1);
                    if (EmergDate!="")
                       Peanut.SetEmergenceDate(EmergDate);
                }
               }
            }
        }
```
            Manager 27
              SowingRate = 27.3
              SpacingRatio = 2.15
              SowingDepth = 50
              CultivarName = Florunner
              SowingDate = 12/10/1981 00:00:00
              EmergDate =
              script: same as in Validation.Australia.Kunnunura8182.Factors.Pop.9
        Simulation Kunnunura8182Base
          Clock: Start=1981-12-10; End=1982-06-30
          Summary summaryfile
          Weather: FileName=Kunnunura.met
          SoilArbitrator Soil Arbitrator
          MicroClimate: a_interception=0; b_interception=1; c_interception=0; d_interception=0; soil_albedo=0.23; SoilHeatFluxFraction=0.4; MinimumHeightDiffForNewLayer=0; NightInterceptionFraction=0.5; ReferenceHeight=2
          Zone paddock: Area=1; Slope=0; AspectAngle=0; Altitude=50
            Irrigation
            Manager Automatic irrigation based on water deficit: same as Validation.Australia.Kingaroy8384.Kingaroy8384Base.paddock.Automatic irrigation based on water deficit
            Fertiliser
            SurfaceOrganicMatter: InitialResidueName=maize; InitialResidueType=maize; InitialResidueMass=4500; InitialStandingFraction=0; InitialCPR=0; InitialCNR=55
            Report DailyReport: same as Validation.Australia.Kingaroy8384.Kingaroy8384Base.paddock.DailyReport
            Report HarvestReport: EventNames=[Peanut].Harvesting
              VariableNames:
                [Clock].Today
                [Peanut].Structure.MainStemPrimordiaNo
                [Peanut].Phenology.NFF
                [Peanut].Script.FinalTag
            Plant Peanut
            Soil: same as Validation.Australia.Kingaroy8384.Kingaroy8384Base.paddock.Soil
            Manager SowingRule
              SowingRate = 8.8
              SpacingRatio = 1
              SowingDepth = 50
              CultivarName = Florunner
              SowingDate = 12/10/1981 00:00:00
```csharp
using APSIM.Shared.Utilities;
using Models.PMF;
using Models.Core;
using System;
        
        namespace Models
        {
           [Serializable] 
           [System.Xml.Serialization.XmlInclude(typeof(Model))]
            public class Script : Model
            {      
               [Link] Plant Peanut;
               [Link] Clock Clock;

               [Description("Spacing Ratio (row vs plant spacing)")]
               public double SpacingRatio { get; set; }
               [Description("Depth (mm) Grains are planted")]
               public double SowingDepth { get; set; }
               [Description("Seeds sown (/m2)")]
               public double SowingRate { get; set; }
               [Description("Cultivar")]
               [Display(Type=DisplayType.CultivarName)]
               public string CultivarName { get; set; }
               [Description("Sowing Date")]
               public DateTime SowingDate { get; set; }

               [EventSubscribe("DoManagement")]
               private void OnDoManagement(object sender, EventArgs e)
               {
               double A = Math.Sqrt(1/SowingRate);
               double RowSpacing = Math.Sqrt(SpacingRatio*A);
                if (Clock.Today.Date == SowingDate)
                    Peanut.Sow(population:SowingRate, cultivar:CultivarName, depth:SowingDepth, rowSpacing:RowSpacing, budNumber:1);
               }
            }
        }
```
            Manager HarvestAfterDate
              HarvestDate = 9-Apr
              script: same as in Validation.Australia.Kingaroy8485.Factors.Permutation.Sow.Nov01.HarvestAfterDate
      Experiment Kunnunura8283
        Memo
          This dataset ([Bell1986]) includes the cultvar "EarlyBunch" grown on 5 sowing dates under irrigated conditions in a monsoonal tropical environment at Kunnunura in Northern Australia.  Plants were sampled regularly for biomass partitioning and canopy development.  The soil is known locally as a normal phase Cockatoo Sand - an acid, coarse-textured and
          well-drained soil.  Supplementary irrigations were made to avoid moisture stress.
        Factors
          Factor Sow
            CompositeFactor Dec06
              Specifications:
                [SowingRule].Script.SowingDate=1982-12-06
                [HarvestAfterDate]
              Manager HarvestAfterDate: same as Validation.Australia.Kingaroy8485.Kingaroy8485Base.paddock.HarvestAfterDate
            CompositeFactor Dec29
              Specifications:
                [SowingRule].Script.SowingDate=1982-12-29
                [HarvestAfterDate]
              Manager HarvestAfterDate
                HarvestDate = 9-May
                script: same as in Validation.Australia.Kingaroy8485.Factors.Permutation.Sow.Nov01.HarvestAfterDate
            CompositeFactor Jan18
              Specifications:
                [SowingRule].Script.SowingDate=1983-01-18
                [HarvestAfterDate]
              Manager HarvestAfterDate
                HarvestDate = 9-Jun
                script: same as in Validation.Australia.Kingaroy8485.Factors.Permutation.Sow.Nov01.HarvestAfterDate
            CompositeFactor Feb07
              Specifications:
                [SowingRule].Script.SowingDate=1983-02-07
                [HarvestAfterDate]
              Manager HarvestAfterDate
                HarvestDate = 22-Jun
                script: same as in Validation.Australia.Kingaroy8485.Factors.Permutation.Sow.Nov01.HarvestAfterDate
            CompositeFactor Mar01
              Specifications:
                [SowingRule].Script.SowingDate=1983-03-01
                [HarvestAfterDate]
              Manager HarvestAfterDate
                HarvestDate = 13-Jul
                script: same as in Validation.Australia.Kingaroy8485.Factors.Permutation.Sow.Nov01.HarvestAfterDate
        Simulation Kunnunura8283Base
          Clock: Start=1982-12-05; End=1983-07-30
          Summary summaryfile
          Weather: FileName=Kunnunura.met
          SoilArbitrator Soil Arbitrator
          MicroClimate: a_interception=0; b_interception=1; c_interception=0; d_interception=0; soil_albedo=0.23; SoilHeatFluxFraction=0.4; MinimumHeightDiffForNewLayer=0; NightInterceptionFraction=0.5; ReferenceHeight=2
          Zone paddock: Area=1; Slope=0; AspectAngle=0; Altitude=50
            Irrigation
            Manager Automatic irrigation based on water deficit: same as Validation.Australia.Kingaroy8384.Kingaroy8384Base.paddock.Automatic irrigation based on water deficit
            Fertiliser
            SurfaceOrganicMatter: InitialResidueName=maize; InitialResidueType=maize; InitialResidueMass=4500; InitialStandingFraction=0; InitialCPR=0; InitialCNR=55
            Report DailyReport: same as Validation.Australia.Kingaroy8384.Kingaroy8384Base.paddock.DailyReport
            Manager SowingRule
              SowingDate = 06/10/2001 00:00:00
              CultivarName = EarlyBunch
              RowSpacing = 91
              SowingDepth = 50
              SowingRate = 9
              script: same as in Validation.Australia.Kingaroy8384.Kingaroy8384Base.paddock.SowingRule
            Report HarvestReport: EventNames=[Peanut].Harvesting
              VariableNames:
                [Clock].Today
                [Peanut].Structure.MainStemPrimordiaNo
                [Peanut].Phenology.NFF
                [Peanut].Script.FinalTag
            Plant Peanut
            Soil: same as Validation.Australia.Kingaroy8384.Kingaroy8384Base.paddock.Soil
            Manager HarvestAfterDate: same as Validation.Australia.Kunnunura8182.Kunnunura8182Base.paddock.HarvestAfterDate
      Experiment Bundaberg8990
        Memo
          This dataset ([Bell1994NFixation]) studied N fixation of various Peanut cultivars at Bundaberg, Queensland, Australia.  The soil type was a deep, red clay-loam with a friable structure and increasing clay content with depth.  The experiment was grown under irrigated conditions. Measurements were undertaken for biomass and nitrogen contents, and estimates of the contribution of N fixation to plant N contents.
        Factors
          Factor Cv
            Specification=[SowingRule].Script.CultivarName=EarlyBunch, VirginiaBunch, TMV2, Tapir
        Simulation Bundaberg8990Base
          Clock: Start=1989-12-12; End=1990-04-30
          Summary summaryfile
          Weather: FileName=Bundaberg.met
          SoilArbitrator Soil Arbitrator
          MicroClimate: a_interception=0; b_interception=1; c_interception=0; d_interception=0; soil_albedo=0.23; SoilHeatFluxFraction=0.4; MinimumHeightDiffForNewLayer=0; NightInterceptionFraction=0.5; ReferenceHeight=2
          Zone paddock: Area=1; Slope=0; AspectAngle=0; Altitude=50
            Irrigation
            Fertiliser
            SurfaceOrganicMatter: InitialResidueName=maize; InitialResidueType=maize; InitialResidueMass=4500; InitialStandingFraction=0; InitialCPR=0; InitialCNR=55
            Report DailyReport: same as Validation.Australia.Kingaroy8384.Kingaroy8384Base.paddock.DailyReport
            Manager SowingRule
              SowingDate = 12/12/1989 00:00:00
              CultivarName = EarlyBunch
              RowSpacing = 600
              SowingDepth = 50
              SowingRate = 8.8
              script: same as in Validation.Australia.Kingaroy8384.Kingaroy8384Base.paddock.SowingRule
            Report HarvestReport: EventNames=[Peanut].Harvesting
              VariableNames:
                [Clock].Today
                [Peanut].Structure.MainStemPrimordiaNo
                [Peanut].Phenology.NFF
                [Peanut].Script.FinalTag
            Plant Peanut
            Soil: same as Validation.Australia.Kingaroy8485.Kingaroy8485Base.paddock.Soil
            Manager Harvest: same as Validation.Australia.Kingaroy8384.Kingaroy8384Base.paddock.Harvest
            Manager Automatic irrigation based on water deficit: same as Validation.Australia.Kingaroy8384.Kingaroy8384Base.paddock.Automatic irrigation based on water deficit
      Experiment Loxton9697
        Memo
          This dataset ([Porter2000PhD]) studied the impact of plant population on growth and productivity.  Here we consider the cultvar EarlyBunch only (the comparison cultivar failed during the trial).  The experiment was grown under irrigated conditions in at Loxton in South Australia. The soil type was sandy loam with good drainage but low water holding capacity.
          Supplementary irrigations were made to avoid moisture stress.
        Factors
          Factor Pop: Specification=[SowingRule]
            Manager 5
              SowingDate = 11/14/1996 00:00:00
              CultivarName = VB97
              RowSpacing = 900
              SowingDepth = 50
              SowingRate = 5
              script: same as in Validation.Australia.Kingaroy8384.Kingaroy8384Base.paddock.SowingRule
            Manager 10
              SowingDate = 11/14/1996 00:00:00
              CultivarName = VB97
              RowSpacing = 900
              SowingDepth = 50
              SowingRate = 10
              script: same as in Validation.Australia.Kingaroy8384.Kingaroy8384Base.paddock.SowingRule
            Manager 15
              SowingDate = 11/14/1996 00:00:00
              CultivarName = VB97
              RowSpacing = 900
              SowingDepth = 50
              SowingRate = 15
              script: same as in Validation.Australia.Kingaroy8384.Kingaroy8384Base.paddock.SowingRule
            Manager 20
              SowingDate = 11/14/1996 00:00:00
              CultivarName = VB97
              RowSpacing = 450
              SowingDepth = 50
              SowingRate = 20
              script: same as in Validation.Australia.Kingaroy8384.Kingaroy8384Base.paddock.SowingRule
            Manager 25
              SowingDate = 11/14/1996 00:00:00
              CultivarName = VB97
              RowSpacing = 450
              SowingDepth = 50
              SowingRate = 25
              script: same as in Validation.Australia.Kingaroy8384.Kingaroy8384Base.paddock.SowingRule
            Manager 30
              SowingDate = 11/14/1996 00:00:00
              CultivarName = VB97
              RowSpacing = 450
              SowingDepth = 50
              SowingRate = 30
              script: same as in Validation.Australia.Kingaroy8384.Kingaroy8384Base.paddock.SowingRule
        Simulation Loxton9697Base
          Clock: Start=1996-11-14; End=1997-05-30
          Summary summaryfile
          Weather: FileName=Loxton.met
          SoilArbitrator Soil Arbitrator
          MicroClimate: a_interception=0; b_interception=1; c_interception=0; d_interception=0; soil_albedo=0.23; SoilHeatFluxFraction=0.4; MinimumHeightDiffForNewLayer=0; NightInterceptionFraction=0.5; ReferenceHeight=2
          Zone paddock: Area=1; Slope=0; AspectAngle=0; Altitude=50
            Irrigation
            Fertiliser
            SurfaceOrganicMatter: InitialResidueName=maize; InitialResidueType=maize; InitialResidueMass=4500; InitialStandingFraction=0; InitialCPR=0; InitialCNR=55
            Report DailyReport: same as Validation.Australia.Kingaroy8384.Kingaroy8384Base.paddock.DailyReport
            Manager SowingRule
              SowingDate = 12/12/1989 00:00:00
              CultivarName = VB97
              RowSpacing = 600
              SowingDepth = 50
              SowingRate = 8.8
              script: same as in Validation.Australia.Kingaroy8384.Kingaroy8384Base.paddock.SowingRule
            Report HarvestReport: EventNames=[Peanut].Harvesting
              VariableNames:
                [Clock].Today
                [Peanut].Structure.MainStemPrimordiaNo
                [Peanut].Phenology.NFF
                [Peanut].Script.FinalTag
            Plant Peanut
            Soil: same as Validation.Australia.Kingaroy8485.Kingaroy8485Base.paddock.Soil
            Manager Automatic irrigation based on water deficit: same as Validation.Australia.Kingaroy8384.Kingaroy8384Base.paddock.Automatic irrigation based on water deficit
            Manager Harvest
              HarvestDate = 04/11/1997 00:00:00
```csharp
using Models.Soils.Nutrients;
using System;
using Models.Core;
using Models.PMF;
using Models.Soils;
using Models.Soils.Nutrients;
using Models.Utilities;
using APSIM.Shared.Utilities;

namespace Models
{
    [Serializable]
    public class Script : Model
    {
        [Link] Plant Peanut;
        [Link] Clock Clock;

        [Description("Harvest Date")]
        public DateTime HarvestDate { get; set; }

        [EventSubscribe("DoManagement")]
        private void OnDoManagement(object sender, EventArgs e)
        {
            if (Clock.Today.Date > HarvestDate && Peanut.IsReadyForHarvesting)
            {
               Peanut.Harvest();
               Peanut.EndCrop();    
            }
        }        
    }
}
```
      Experiment Roseworthy96
        Memo
          This dataset ([Porter2000PhD]) studied the impact of sowing date on flowering and maturity for 24 germplasm lines.  Here we consider the cultvars EarlyBunch, Florunner, and VB97.  The experiment was grown under irrigated conditions in at Roseworthy in South Australia. The soil type was clay-loam with good water holding capacity.
          well-drained soil.  Supplementary irrigations were made to avoid moisture stress.
        Factors
          Permutation
            Factor Sow
              CompositeFactor Oct04: Specifications=[SowingRule].Script.SowingDate=1996-10-04
              CompositeFactor Nov07: Specifications=[SowingRule].Script.SowingDate=1996-11-07
              CompositeFactor Dec11: Specifications=[SowingRule].Script.SowingDate=1996-12-11
            Factor Cv: Specification=[SowingRule].Script.CultivarName=Florunner,EarlyBunch, VB97
        Simulation Roseworthy96Base
          Clock: Start=1996-10-01; End=1997-12-31
          Summary summaryfile
          Weather: FileName=Roseworthy.met
          SoilArbitrator Soil Arbitrator
          MicroClimate: a_interception=0; b_interception=1; c_interception=0; d_interception=0; soil_albedo=0.23; SoilHeatFluxFraction=0.4; MinimumHeightDiffForNewLayer=0; NightInterceptionFraction=0.5; ReferenceHeight=2
          Zone paddock: same as Validation.Australia.Kingaroy8384.Kingaroy8384Base.paddock
    Folder USA
      Folder Headland Florunner
        Memo
          This dataset ([Davis1991]) studied the differences in canopy development for florunner cultivars.  The experiment was grown under irrigated conditions at the Wiregrass Substation in Headland, Alabama. Supplementary irrigations were made to avoid moisture stress.  Plants were sampled for plant vegetative stage, reproductive stage, height, number of leaves, leaf area, leaf dry weight, number of pods, pod dry weight, stem dry weight, and stand density.
        Experiment Headland88
          Factors
            Factor Cv: Specification=[SowingRule].Script.CultivarName=Florunner
          Simulation Headland88Base
            Clock: Start=1988-04-28; End=1988-09-30
            Summary summaryfile
            Weather: FileName=Headland.met
            SoilArbitrator Soil Arbitrator
            MicroClimate: a_interception=0; b_interception=1; c_interception=0; d_interception=0; soil_albedo=0.23; SoilHeatFluxFraction=0.4; MinimumHeightDiffForNewLayer=0; NightInterceptionFraction=0.5; ReferenceHeight=2
            Zone paddock: Area=1; Slope=0; AspectAngle=0; Altitude=50
              Irrigation
              Manager Automatic irrigation based on water deficit: same as Validation.Australia.Kingaroy8384.Kingaroy8384Base.paddock.Automatic irrigation based on water deficit
              Fertiliser
              SurfaceOrganicMatter: InitialResidueName=maize; InitialResidueType=maize; InitialResidueMass=4500; InitialStandingFraction=0; InitialCPR=0; InitialCNR=55
              Report DailyReport: same as Validation.Australia.Kingaroy8384.Kingaroy8384Base.paddock.DailyReport
              Manager SowingRule
                SowingDate = 04/28/1988 00:00:00
                CultivarName = EarlyBunch
                RowSpacing = 910
                SowingDepth = 50
                SowingRate = 16
                script: same as in Validation.Australia.Kingaroy8384.Kingaroy8384Base.paddock.SowingRule
              Report HarvestReport: EventNames=[Peanut].Harvesting
                VariableNames:
                  [Clock].Today
                  [Peanut].Structure.MainStemPrimordiaNo
                  [Peanut].Phenology.NFF
                  [Peanut].Script.FinalTag
              Plant Peanut
              Soil: same as Validation.Australia.Kingaroy8384.Kingaroy8384Base.paddock.Soil
              Manager Harvest: same as Validation.Australia.Kingaroy8384.Kingaroy8384Base.paddock.Harvest
      Folder Gainsville EarlyBunch
        Memo
          This dataset (from Hammer_etal_QNut) studied the differences in growth for two cultivars.  We include only the cultivar "EarlyBunch". The experiment was grown under irrigated conditions at Gainesville, Florida. Supplementary irrigations were made to avoid moisture stress.  Plants were sampled for total biomass, pod biomass and leaf area index.
        Experiment Gainsville90
          Factors
            Factor Cv: Specification=[SowingRule].Script.CultivarName=EarlyBunch
          Simulation Gainsville90Base
            Clock: Start=1990-05-15; End=1990-10-21
            Summary summaryfile
            Weather: FileName=Gainsville.met
            SoilArbitrator Soil Arbitrator
            MicroClimate: a_interception=0; b_interception=1; c_interception=0; d_interception=0; soil_albedo=0.23; SoilHeatFluxFraction=0.4; MinimumHeightDiffForNewLayer=0; NightInterceptionFraction=0.5; ReferenceHeight=2
            Zone paddock: Area=1; Slope=0; AspectAngle=0; Altitude=50
              Irrigation
              Manager Automatic irrigation based on water deficit: same as Validation.Australia.Kingaroy8384.Kingaroy8384Base.paddock.Automatic irrigation based on water deficit
              Fertiliser
              SurfaceOrganicMatter: InitialResidueName=maize; InitialResidueType=maize; InitialResidueMass=4500; InitialStandingFraction=0; InitialCPR=0; InitialCNR=55
              Report DailyReport: same as Validation.Australia.Kingaroy8384.Kingaroy8384Base.paddock.DailyReport
              Manager SowingRule
                SowingDate = 05/15/1990 00:00:00
                CultivarName = EarlyBunch
                RowSpacing = 910
                SowingDepth = 50
                SowingRate = 13.7
                script: same as in Validation.Australia.Kingaroy8384.Kingaroy8384Base.paddock.SowingRule
              Report HarvestReport: EventNames=[Peanut].Harvesting
                VariableNames:
                  [Clock].Today
                  [Peanut].Structure.MainStemPrimordiaNo
                  [Peanut].Phenology.NFF
                  [Peanut].Script.FinalTag
              Plant Peanut
              Soil: same as Validation.Australia.Kingaroy8384.Kingaroy8384Base.paddock.Soil
              Operations Harvesting
                1990-10-11  [Peanut].Harvest();
                1990-10-11  [Peanut].EndCrop();
    PredictedObserved: PredictedTableName=DailyReport; ObservedTableName=Observed; FieldNameUsedForMatch=Clock.Today; FieldName2UsedForMatch=SimulationID; AllColumns=false
    PredictedObserved PredictedObservedHarvest: PredictedTableName=HarvestReport; ObservedTableName=Observed; FieldNameUsedForMatch=SimulationID; FieldName2UsedForMatch=Peanut.Phenology.CurrentStageName; AllColumns=false
  Folder Sensibility
    Folder DetailedDynamics
      Experiment DetailedDynamics
        Factors
          Factor Sow
            CompositeFactor Jan10: Specifications=[SowingRule].Script.SowingDate=2019-01-10
        Simulation DetailedDynamicsBase
          Clock: Start=2019-01-10; End=2019-06-15
          Summary summaryfile
          Weather: FileName=Kingaroy1819.met
          SoilArbitrator Soil Arbitrator
          MicroClimate: a_interception=0; b_interception=1; c_interception=0; d_interception=0; soil_albedo=0.23; SoilHeatFluxFraction=0.4; MinimumHeightDiffForNewLayer=0; NightInterceptionFraction=0.5; ReferenceHeight=2
          Zone paddock: Area=1; Slope=0; AspectAngle=0; Altitude=50
            Irrigation
            Manager Automatic irrigation based on water deficit: same as Validation.Australia.Kingaroy8384.Kingaroy8384Base.paddock.Automatic irrigation based on water deficit
            Fertiliser
            SurfaceOrganicMatter: InitialResidueName=maize; InitialResidueType=maize; InitialResidueMass=4500; InitialStandingFraction=0; InitialCPR=0; InitialCNR=55
            Report DetailedReport: EventNames=[Clock].DoReport
              VariableNames:
                [Clock].Today
                [Peanut].Phenology.CurrentStageName
                [Peanut].Leaf.Wt
                [Peanut].Leaf.N
                [Peanut].Leaf.Total.StructuralWt
                [Peanut].Leaf.Total.StructuralN
                [Peanut].Leaf.Live.StructuralWt
                [Peanut].Leaf.Live.StructuralN
                [Peanut].Leaf.Live.Wt
                [Peanut].Leaf.Live.StructuralWt
                [Peanut].Leaf.Live.N
                [Peanut].Leaf.Live.NConc
                [Peanut].Leaf.NConc
                [Peanut].Leaf.MinimumNConc
                [Peanut].Leaf.CriticalNConc
                [Peanut].Leaf.MaximumNConc
                [Peanut].Leaf.Senesced.Wt
                [Peanut].Stem.Wt
                [Peanut].Stem.Live.Wt
                [Peanut].Stem.Live.N
                [Peanut].Stem.Total.StructuralWt
                [Peanut].Stem.Total.StructuralN
                [Peanut].Stem.Live.StructuralWt
                [Peanut].Stem.Live.StructuralN
                [Peanut].Stem.N
                [Peanut].Stem.Nconc
                [Peanut].Stem.MinimumNConc
                [Peanut].Stem.CriticalNConc
                [Peanut].Stem.MaximumNConc
                [Peanut].Shell.Wt
                [Peanut].Shell.N
                [Peanut].Shell.Total.StructuralWt
                [Peanut].Shell.Total.StructuralN
                [Peanut].Shell.Live.Wt
                [Peanut].Shell.Live.N
                [Peanut].Shell.Live.StructuralWt
                [Peanut].Shell.Live.StructuralN
                [Peanut].Shell.Nconc
                [Peanut].Shell.MinimumNConc
                [Peanut].Shell.CriticalNConc
                [Peanut].Shell.MaximumNConc
                [Peanut].Grain.Wt
                [Peanut].Grain.N
                [Peanut].Grain.Nconc
                [Peanut].Shell.Wt
                [Peanut].Pod.Wt
                [Peanut].Pod.N
                [Peanut].Pod.NConc
                [Peanut].Arbitrator.DM.TotalFixationSupply
                sum([Peanut].Arbitrator.N.Fixation) as NFixed
                [Peanut].Arbitrator.DM.TotalPlantDemand
                [Peanut].Leaf.DMDemand.Total
                [Peanut].Stem.DMDemand.Total
                [Peanut].Shell.DMDemand.Total
                [Peanut].Grain.DMDemand.Total
                [Peanut].Root.DMDemand.Total
            Manager SowingRule
              CultivarName = Taabinga
              RowSpacing = 900
              SowingDepth = 50
              SowingRate = 15
              SowingDate = 01/10/2019 00:00:00
              script: same as in Validation.Australia.Kingaroy8384.Kingaroy8384Base.paddock.SowingRule
            Plant Peanut
            Manager Harvest: same as Validation.Australia.Kingaroy8384.Kingaroy8384Base.paddock.Harvest
            Operations
            Soil: ASCOrder=Ferrosol; ASCSubOrder=Red; SoilType=?; Site=Wooroolin; NearestTown=Wooroolin; Region=Wide Bay and Burnett; State=Queensland; Country=Australia; ApsoilNumber=107; Latitude=-26.368; Longitude=151.775; YearOfSampling=0
              DataSource=CSIRO Tropical Crops and Pastures in collaboration with Agforce Queensland
              Comments=Changed SWCON from 0.3 to 0.9 based on local advice about this regions Ferrosols from Mike Bell, Graeme Wright, Yash Chauhan
              Physical
                Thickness  BD     AirDry  LL15   DUL    SAT
                150        1.349  0.14    0.28   0.357  0.461
                150        1.423  0.226   0.282  0.383  0.433
                300        1.383  0.307   0.307  0.398  0.448
                300        1.332  0.307   0.307  0.417  0.467
                300        1.33   0.307   0.307  0.418  0.468
                300        1.353  0.307   0.307  0.409  0.459
                300        1.359  0.307   0.307  0.407  0.457
                SoilCrop PeanutSoil: LL=[0.28, 0.282, 0.307, 0.32, 0.332, 0.34, 0.335]; KL=[0.06, 0.06, 0.06, 0.04, 0.04, 0.02, 0.01]; XF=[1, 1, 1, 1, 1, 1, 1]
              WaterBalance SoilWater: SummerDate=1-Nov; SummerU=6; SummerCona=3.5; WinterDate=1-Apr; WinterU=4; WinterCona=2.5; DiffusConst=40; DiffusSlope=16; Salb=0.12; CN2Bare=73; CNRed=20; CNCov=0.8; Thickness=[150, 150, 300, 300, 300, 300, 300]; SWCON=[0.9, 0.9, 0.9, 0.9, 0.9, 0.9, 0.9]
              Organic: FOMCNRatio=40
                Thickness  Carbon  SoilCNRatio  FBiom  FInert  FOM
                150        1.196   12           0.04   0.4     347.129
                150        1.014   12           0.02   0.6     270.344
                300        0.455   12           0.02   0.8     163.972
                300        0.299   12           0.02   1       99.4541
                300        0.195   12           0.01   1       60.322
                300        0.156   12           0.01   1       36.5871
                300        0.156   12           0.01   1       22.1912
              Chemical: Thickness=[150, 150, 300, 300, 300, 300, 300]; PH=[8.2, 8.5, 8.6, 8.6, 7.4, 5.3, 5.3]
                PH source: Unknown source or quality of data
              InitialWater Initial water: PercentMethod=0; FractionFull=1
              Sample Initial conditions: Depth=[0-180]; Thickness=[1800]; NH4=[1]; SWUnits=Volumetric; OCUnits=Total; PHUnits=Water
              Nutrient
              CERESSoilTemperature Temperature
    Folder Sugar Systems
      Experiment SugarSystems (disabled)
        Factors
          Factor Rotation: Specification=[operations]
            Operations SugarFallow
              1980-05-01  [Sugarcane].SowNewPlant(PlantingDensity:10, Depth:100, CultivarName:"Q117_fum");
              1980-05-01  [Fertiliser].Apply(Amount:200, Type:Fertiliser.Types.NH4N, Depth:100);
              1981-08-01  [Sugarcane].HarvestCrop();
              1981-08-01  [Fertiliser].Apply(Amount:200, Type:Fertiliser.Types.NH4N, Depth:100);
              1982-08-01  [Sugarcane].HarvestCrop();
              1982-08-01  [Fertiliser].Apply(Amount:200, Type:Fertiliser.Types.NH4N, Depth:100);
              1983-08-01  [Sugarcane].HarvestCrop();
              1983-08-01  [Fertiliser].Apply(Amount:200, Type:Fertiliser.Types.NH4N, Depth:100);
              1984-08-01  [Sugarcane].HarvestCrop();
              1984-08-01  [Fertiliser].Apply(Amount:200, Type:Fertiliser.Types.NH4N, Depth:100);
              1985-08-01  [Sugarcane].HarvestCrop();
              1985-08-01  [Sugarcane].EndCrop();
              1986-05-01  [Sugarcane].SowNewPlant(PlantingDensity:10, Depth:100, CultivarName:"Q117_fum");
              1986-05-01  [Fertiliser].Apply(Amount:200, Type:Fertiliser.Types.NH4N, Depth:100);
              1987-08-01  [Sugarcane].HarvestCrop();
              1987-08-01  [Fertiliser].Apply(Amount:200, Type:Fertiliser.Types.NH4N, Depth:100);
              1988-08-01  [Sugarcane].HarvestCrop();
              1988-08-01  [Fertiliser].Apply(Amount:200, Type:Fertiliser.Types.NH4N, Depth:100);
              1989-08-01  [Sugarcane].HarvestCrop();
              1989-08-01  [Fertiliser].Apply(Amount:200, Type:Fertiliser.Types.NH4N, Depth:100);
              1990-08-01  [Sugarcane].HarvestCrop();
              1990-08-01  [Fertiliser].Apply(Amount:200, Type:Fertiliser.Types.NH4N, Depth:100);
              1991-08-01  [Sugarcane].HarvestCrop();
              1991-08-01  [Sugarcane].EndCrop();
            Operations SugarPeanut
              1980-05-01  [Sugarcane].SowNewPlant(PlantingDensity:10, Depth:100, CultivarName:"Q117_fum");
              1980-05-01  [Fertiliser].Apply(Amount:200, Type:Fertiliser.Types.NH4N, Depth:100);
              1981-08-01  [Sugarcane].HarvestCrop();
              1981-08-01  [Fertiliser].Apply(Amount:200, Type:Fertiliser.Types.NH4N, Depth:100);
              1982-08-01  [Sugarcane].HarvestCrop();
              1982-08-01  [Fertiliser].Apply(Amount:200, Type:Fertiliser.Types.NH4N, Depth:100);
              1983-08-01  [Sugarcane].HarvestCrop();
              1983-08-01  [Fertiliser].Apply(Amount:200, Type:Fertiliser.Types.NH4N, Depth:100);
              1984-08-01  [Sugarcane].HarvestCrop();
              1984-08-01  [Fertiliser].Apply(Amount:200, Type:Fertiliser.Types.NH4N, Depth:100);
              1985-08-01  [Sugarcane].HarvestCrop();
              1985-08-01  [Sugarcane].EndCrop();
              1985-12-01  [Peanut].Sow(population:27, cultivar:VirginiaBunch, depth:50, rowSpacing:750, budNumber:1)
              1986-05-01  [Sugarcane].SowNewPlant(PlantingDensity:10, Depth:100, CultivarName:"Q117_fum");
              1986-05-01  [Fertiliser].Apply(Amount:200, Type:Fertiliser.Types.NH4N, Depth:100);
              1987-08-01  [Sugarcane].HarvestCrop();
              1987-08-01  [Fertiliser].Apply(Amount:200, Type:Fertiliser.Types.NH4N, Depth:100);
              1988-08-01  [Sugarcane].HarvestCrop();
              1988-08-01  [Fertiliser].Apply(Amount:200, Type:Fertiliser.Types.NH4N, Depth:100);
              1989-08-01  [Sugarcane].HarvestCrop();
              1989-08-01  [Fertiliser].Apply(Amount:200, Type:Fertiliser.Types.NH4N, Depth:100);
              1990-08-01  [Sugarcane].HarvestCrop();
              1990-08-01  [Fertiliser].Apply(Amount:200, Type:Fertiliser.Types.NH4N, Depth:100);
              1991-08-01  [Sugarcane].HarvestCrop();
              1991-08-01  [Sugarcane].EndCrop();
        Simulation Sugar Peanut Base
          Weather: FileName=Bundaberg.met
          Clock: Start=1980-01-01; End=1993-12-31
          Summary summaryfile
          MicroClimate: a_interception=0; b_interception=1; c_interception=0; d_interception=0; soil_albedo=0.23; SoilHeatFluxFraction=0.4; MinimumHeightDiffForNewLayer=0; NightInterceptionFraction=0.5; ReferenceHeight=2
          SoilArbitrator Soil Arbitrator
          Zone Field: Area=1; Slope=0; AspectAngle=0; Altitude=50
            Fertiliser
            Sugarcane: crop_type=Sugarcane; tt_emerg_to_begcane_ub=2000; tt_begcane_to_flowering_ub=10000; tt_flowering_to_crop_end_ub=5000; n_uptake_option=1; NO3_diffn_const=2; n_supply_preference=active; kno3=0.05; knh4=0.05; total_n_uptake_max=0.6; ll_ub=1000; kl_ub=1; minsw=1e-05; latitude_ub=90; latitude_lb=-90; maxt_ub=55; mint_ub=40; mint_lb=-10; radn_ub=50; radn_lb=1; dlayer_ub=1000; dul_dep_ub=1000; sw_dep_ub=1000; NO3_ub=10000; NO3_min_ub=10000; NH4_ub=10000; NH4_min_ub=10000; eo_crop_factor=100; uptake_source=calc; rlv_init=[0.04, 0.02, 0.01, 0.005, 0, 0, 0]
              zero: maxt_lb, LAI, WaterDemand, no3ppm_min, nh4ppm_min, dlayer_lb, dul_dep_lb, sw_dep_lb, NO3_lb, NO3_min_lb, NH4_lb, NH4_min_lb
              plant={stage_names=[sowing, sprouting, emergence, begin_cane, flowering, end_crop], stage_code_list=[1, 2, 3, 4, 5, 6], rue=[0, 0, 1.8, 1.8, 1.8, 0], root_depth_rate=[0, 0, 10, 15, 15, 15], ratio_root_shoot=[0, 0, 0.2, 0.15, 0.1, 0], transp_eff_cf=[0.008, 0.008, 0.008, 0.008, 0.008, 0.008], n_fix_rate=[0, 0, 0, 0, 0, 0], extinction_coef=0.38, extinction_coef_dead=0.01, leaf_no_crit=99, tt_emerg_limit=800, days_germ_limit=40, swdf_pheno_limit=500, swdf_photo_limit=500, swdf_photo_rate=0, initial_root_depth=150, specific_root_length=18000, x_plant_rld=[0, 0.1], y_rel_root_rate=[1, 1], root_die_back_fr=0.17, initial_tpla=1000, sla_lfno=[6, 25], sla_max=[11500, 11500], sla_min=[9000, 8500], x_stem_wt=[0, 200], y_height=[0, 6000], svp_fract=0.75, eo_crop_factor_default=100, pesw_germ=0.05, fasw_emerg=[0, 0.7], rel_emerg_rate=[0.3, 1], leaf_no_at_emerg=1, shoot_lag=250, shoot_rate=0.8, x_node_no_app=[1, 20, 30, 40], y_node_app_rate=[80, 105, 125, 150], x_node_no_leaf=[1, 20, 30, 40], y_leaves_per_node=[1, 1, 1, 1], dm_root_init=0.2, dm_sstem_init=0.01, dm_leaf_init=0.2, dm_cabbage_init=0.143, dm_sucrose_init=0, leaf_cabbage_ratio=1.7, cabbage_sheath_fr=0.2, dm_root_sen_frac=0.002, dead_detach_frac=[0.1, 0.1, 0.05, 0.1, 0], sen_detach_frac=[1, 0.01, 0, 0.01, 0], leaf_no_correction=1.6, lai_sen_light=4.99, sen_light_slope=0.001, frost_temp=[-5, 0, 2], frost_fraction=[1, 0.1, 0], sen_rate_water=0.01, twilight=-6, x_stage_code=[1, 2, 3, 4, 5], y_n_conc_crit_leaf=[0.025, 0.025, 0.015, 0.015, 0.005], y_n_conc_min_leaf=[0.015, 0.015, 0.005, 0.005, 0.004], y_n_conc_crit_cane=[0.009, 0.009, 0.009, 0.006, 0.0035], y_n_conc_min_cane=[0.002, 0.002, 0.0005, 0.0005, 0.0005], y_n_conc_crit_cabbage=[0.019, 0.019, 0.006, 0.006, 0.001], y_n_conc_min_cabbage=[0.01, 0.01, 0.003, 0.003, 0.0008], n_conc_crit_root=0.01, n_conc_min_root=0.005, n_root_init_conc=0.01, n_sstem_init_conc=0.007, n_leaf_init_conc=0.03, n_cabbage_init_conc=0.02, n_root_sen_conc=0.005, n_leaf_sen_conc=0.004, n_cabbage_sen_conc=0.0008, x_ave_temp=[0, 5, 15, 35, 50], y_stress_photo=[0, 0, 1, 1, 0], x_ave_temp_stalk=[0, 50], y_stress_stalk=[1, 1], x_temp=[9, 32, 45], y_tt=[0, 23, 0], x_sw_demand_ratio=[0.1, 0.6], y_swdef_leaf=[0, 1], x_demand_ratio_stalk=[0.3, 1.5], y_swdef_stalk=[0, 1], x_sw_avail_ratio=[0, 0.16], y_swdef_pheno=[1, 1], x_sw_ratio=[0, 0.25], y_sw_fac_root=[0, 1], k_nfact_photo=1.5, k_nfact_expansion=1.25, k_nfact_stalk=1, k_nfact_pheno=100, oxdef_photo_rtfr=[0.5, 0.8], oxdef_photo=[1, 1], x_afps=[0.03, 0.05], y_afps_fac=[1, 1], cane_dmf_max=[0.11, 0.17, 0.23], cane_dmf_min=[0.09, 0.13, 0.2], cane_dmf_tt=[0, 500, 4500], cane_dmf_rate=0, stress_lodge=[0, 1], death_fr_lodge=[0.002, 0.001], lodge_redn_photo=0.92, lodge_redn_sucrose=0.77, lodge_redn_green_leaf=0.85}
              ratoon={stage_names=[sowing, sprouting, emergence, begin_cane, flowering, end_crop], stage_code_list=[1, 2, 3, 4, 5, 6], rue=[0, 0, 1.65, 1.65, 1.65, 0], root_depth_rate=[0, 0, 10, 15, 15, 15], ratio_root_shoot=[0, 0, 0.2, 0.15, 0.1, 0], transp_eff_cf=[0.008, 0.008, 0.008, 0.008, 0.008, 0.008], n_fix_rate=[0, 0, 0, 0, 0, 0], extinction_coef=0.38, extinction_coef_dead=0.01, leaf_no_crit=99, tt_emerg_limit=800, days_germ_limit=40, swdf_pheno_limit=500, swdf_photo_limit=500, swdf_photo_rate=0, initial_root_depth=150, specific_root_length=18000, x_plant_rld=[0, 0.1], y_rel_root_rate=[1, 1], root_die_back_fr=0.17, initial_tpla=1000, sla_lfno=[6, 25], sla_max=[11500, 11500], sla_min=[9000, 8500], x_stem_wt=[0, 200], y_height=[0, 6000], svp_fract=0.75, eo_crop_factor_default=100, pesw_germ=0.03, fasw_emerg=[0, 0.7], rel_emerg_rate=[0.3, 1], leaf_no_at_emerg=1, shoot_lag=100, shoot_rate=0.8, x_node_no_app=[1, 20, 30, 40], y_node_app_rate=[80, 105, 125, 150], x_node_no_leaf=[1, 20, 30, 40], y_leaves_per_node=[1, 1, 1, 1], dm_root_init=0.2, dm_sstem_init=0.01, dm_leaf_init=0.2, dm_cabbage_init=0.143, dm_sucrose_init=0, leaf_cabbage_ratio=1.7, cabbage_sheath_fr=0.2, dm_root_sen_frac=0.002, dead_detach_frac=[0.1, 0.1, 0.05, 0.1, 0], sen_detach_frac=[1, 0.01, 0, 0.01, 0], leaf_no_correction=1.6, lai_sen_light=4.99, sen_light_slope=0.001, frost_temp=[-5, 0, 2], frost_fraction=[1, 0.1, 0], sen_rate_water=0.01, twilight=-6, x_stage_code=[1, 2, 3, 4, 5], y_n_conc_crit_leaf=[0.025, 0.025, 0.015, 0.015, 0.005], y_n_conc_min_leaf=[0.015, 0.015, 0.005, 0.005, 0.004], y_n_conc_crit_cane=[0.009, 0.009, 0.009, 0.006, 0.0035], y_n_conc_min_cane=[0.002, 0.002, 0.0005, 0.0005, 0.0005], y_n_conc_crit_cabbage=[0.019, 0.019, 0.006, 0.006, 0.001], y_n_conc_min_cabbage=[0.01, 0.01, 0.003, 0.003, 0.0008], n_conc_crit_root=0.01, n_conc_min_root=0.005, n_root_init_conc=0.01, n_sstem_init_conc=0.007, n_leaf_init_conc=0.03, n_cabbage_init_conc=0.02, n_root_sen_conc=0.005, n_leaf_sen_conc=0.004, n_cabbage_sen_conc=0.0008, x_ave_temp=[0, 5, 15, 35, 50], y_stress_photo=[0, 0, 1, 1, 0], x_ave_temp_stalk=[0, 50], y_stress_stalk=[1, 1], x_temp=[9, 32, 45], y_tt=[0, 23, 0], x_sw_demand_ratio=[0.1, 0.6], y_swdef_leaf=[0, 1], x_demand_ratio_stalk=[0.3, 1.5], y_swdef_stalk=[0, 1], x_sw_avail_ratio=[0, 0.16], y_swdef_pheno=[1, 1], x_sw_ratio=[0, 0.25], y_sw_fac_root=[0, 1], k_nfact_photo=1.5, k_nfact_expansion=1.25, k_nfact_stalk=1, k_nfact_pheno=100, oxdef_photo_rtfr=[0.5, 0.8], oxdef_photo=[1, 1], x_afps=[0.03, 0.05], y_afps_fac=[1, 1], cane_dmf_max=[0.11, 0.17, 0.23], cane_dmf_min=[0.09, 0.13, 0.2], cane_dmf_tt=[0, 500, 4500], cane_dmf_rate=0, stress_lodge=[0, 1], death_fr_lodge=[0.002, 0.001], lodge_redn_photo=0.92, lodge_redn_sucrose=0.77, lodge_redn_green_leaf=0.85}
              cultivars:
                {cultivar_name=q117, leaf_size=[1500, 55000, 55000], leaf_size_no=[1, 14, 20], cane_fraction=0.7, sucrose_fraction_stalk=[1, 0.55], stress_factor_stalk=[0.2, 1], sucrose_delay=0, min_sstem_sucrose=800, min_sstem_sucrose_redn=10, tt_emerg_to_begcane=1900, tt_begcane_to_flowering=6000, tt_flowering_to_crop_end=2000, green_leaf_no=13, tillerf_leaf_size=[1, 1.5, 1.5, 1, 1], tillerf_leaf_size_no=[1, 6, 10, 12, 26]}
                {cultivar_name=q117_ratoon, leaf_size=[1500, 55000, 55000], leaf_size_no=[1, 14, 20], cane_fraction=0.7, sucrose_fraction_stalk=[1, 0.55], stress_factor_stalk=[0.2, 1], sucrose_delay=0, min_sstem_sucrose=800, min_sstem_sucrose_redn=10, tt_emerg_to_begcane=1900, tt_begcane_to_flowering=6000, tt_flowering_to_crop_end=2000, green_leaf_no=13, tillerf_leaf_size=[1.5, 1.5, 1.5, 1, 1], tillerf_leaf_size_no=[1, 4, 10, 12, 26]}
                {cultivar_name=q117_fum, leaf_size=[1500, 55000, 55000], leaf_size_no=[1, 14, 20], cane_fraction=0.7, sucrose_fraction_stalk=[1, 0.55], stress_factor_stalk=[0.2, 1], sucrose_delay=0, min_sstem_sucrose=800, min_sstem_sucrose_redn=10, tt_emerg_to_begcane=1900, tt_begcane_to_flowering=6000, tt_flowering_to_crop_end=2000, green_leaf_no=13, tillerf_leaf_size=[1.5, 3, 2.5, 1, 1], tillerf_leaf_size_no=[1, 4, 10, 12, 26]}
                {cultivar_name=q117_fum_ratoon, leaf_size=[1500, 55000, 55000], leaf_size_no=[1, 14, 20], cane_fraction=0.7, sucrose_fraction_stalk=[1, 0.55], stress_factor_stalk=[0.2, 1], sucrose_delay=0, min_sstem_sucrose=800, min_sstem_sucrose_redn=10, tt_emerg_to_begcane=1900, tt_begcane_to_flowering=6000, tt_flowering_to_crop_end=2000, green_leaf_no=13, tillerf_leaf_size=[2, 3, 2, 1, 1], tillerf_leaf_size_no=[1, 4, 10, 12, 26]}
                {cultivar_name=q96, leaf_size=[1500, 55000, 55000], leaf_size_no=[1, 14, 20], cane_fraction=0.7, sucrose_fraction_stalk=[1, 0.55], stress_factor_stalk=[0.2, 1], sucrose_delay=0, min_sstem_sucrose=900, min_sstem_sucrose_redn=10, tt_emerg_to_begcane=1900, tt_begcane_to_flowering=6000, tt_flowering_to_crop_end=2000, green_leaf_no=13, tillerf_leaf_size=[1, 1, 1.5, 1, 1], tillerf_leaf_size_no=[1, 4, 10, 16, 26]}
                {cultivar_name=q96_ratoon, leaf_size=[1500, 55000, 55000], leaf_size_no=[1, 14, 20], cane_fraction=0.7, sucrose_fraction_stalk=[1, 0.55], stress_factor_stalk=[0.2, 1], sucrose_delay=0, min_sstem_sucrose=900, min_sstem_sucrose_redn=10, tt_emerg_to_begcane=1900, tt_begcane_to_flowering=6000, tt_flowering_to_crop_end=2000, green_leaf_no=13, tillerf_leaf_size=[1.5, 1.5, 1.5, 1, 1], tillerf_leaf_size_no=[1, 4, 10, 16, 26]}
                {cultivar_name=q96_fum, leaf_size=[1500, 55000, 55000], leaf_size_no=[1, 14, 20], cane_fraction=0.7, sucrose_fraction_stalk=[1, 0.55], stress_factor_stalk=[0.2, 1], sucrose_delay=0, min_sstem_sucrose=900, min_sstem_sucrose_redn=10, tt_emerg_to_begcane=1900, tt_begcane_to_flowering=6000, tt_flowering_to_crop_end=2000, green_leaf_no=13, tillerf_leaf_size=[1, 1, 1.5, 1, 1], tillerf_leaf_size_no=[1, 4, 10, 16, 26]}
                {cultivar_name=q96_fum_ratoon, leaf_size=[1500, 55000, 55000], leaf_size_no=[1, 14, 20], cane_fraction=0.7, sucrose_fraction_stalk=[1, 0.55], stress_factor_stalk=[0.2, 1], sucrose_delay=0, min_sstem_sucrose=900, min_sstem_sucrose_redn=10, tt_emerg_to_begcane=1900, tt_begcane_to_flowering=6000, tt_flowering_to_crop_end=2000, green_leaf_no=13, tillerf_leaf_size=[1.5, 1.5, 1.5, 1, 1], tillerf_leaf_size_no=[1, 4, 10, 16, 26]}
                {cultivar_name=q138, leaf_size=[1500, 55000, 55000], leaf_size_no=[1, 14, 20], cane_fraction=0.7, sucrose_fraction_stalk=[1, 0.61], stress_factor_stalk=[0.2, 1], sucrose_delay=600, min_sstem_sucrose=1500, min_sstem_sucrose_redn=10, tt_emerg_to_begcane=1900, tt_begcane_to_flowering=6000, tt_flowering_to_crop_end=2000, green_leaf_no=13, tillerf_leaf_size=[1, 1, 1.5, 1, 1], tillerf_leaf_size_no=[1, 4, 10, 16, 26]}
                {cultivar_name=q138_ratoon, leaf_size=[1500, 55000, 55000], leaf_size_no=[1, 14, 20], cane_fraction=0.7, sucrose_fraction_stalk=[1, 0.61], stress_factor_stalk=[0.2, 1], sucrose_delay=0, min_sstem_sucrose=1500, min_sstem_sucrose_redn=10, tt_emerg_to_begcane=1900, tt_begcane_to_flowering=6000, tt_flowering_to_crop_end=2000, green_leaf_no=13, tillerf_leaf_size=[1.5, 1.5, 1.5, 1, 1], tillerf_leaf_size_no=[1, 4, 10, 16, 26]}
                {cultivar_name=q138_fum, leaf_size=[1500, 55000, 55000], leaf_size_no=[1, 14, 20], cane_fraction=0.7, sucrose_fraction_stalk=[1, 0.61], stress_factor_stalk=[0.2, 1], sucrose_delay=600, min_sstem_sucrose=1500, min_sstem_sucrose_redn=10, tt_emerg_to_begcane=1900, tt_begcane_to_flowering=6000, tt_flowering_to_crop_end=2000, green_leaf_no=13, tillerf_leaf_size=[1, 1, 1.5, 1, 1], tillerf_leaf_size_no=[1, 4, 10, 16, 26]}
                {cultivar_name=q138_fum_ratoon, leaf_size=[1500, 55000, 55000], leaf_size_no=[1, 14, 20], cane_fraction=0.7, sucrose_fraction_stalk=[1, 0.61], stress_factor_stalk=[0.2, 1], sucrose_delay=0, min_sstem_sucrose=1500, min_sstem_sucrose_redn=10, tt_emerg_to_begcane=1900, tt_begcane_to_flowering=6000, tt_flowering_to_crop_end=2000, green_leaf_no=13, tillerf_leaf_size=[1.5, 1.5, 1.5, 1, 1], tillerf_leaf_size_no=[1, 4, 10, 16, 26]}
                {cultivar_name=ts65-28, leaf_size=[1500, 55000, 55000], leaf_size_no=[1, 14, 20], cane_fraction=0.7, sucrose_fraction_stalk=[1, 0.55], stress_factor_stalk=[0.2, 1], sucrose_delay=0, min_sstem_sucrose=800, min_sstem_sucrose_redn=10, tt_emerg_to_begcane=1900, tt_begcane_to_flowering=6000, tt_flowering_to_crop_end=2000, green_leaf_no=13, tillerf_leaf_size=[1, 1, 1.5, 1, 1], tillerf_leaf_size_no=[1, 4, 10, 16, 26]}
                {cultivar_name=ts65-28_ratoon, leaf_size=[1500, 55000, 55000], leaf_size_no=[1, 14, 20], cane_fraction=0.7, sucrose_fraction_stalk=[1, 0.55], stress_factor_stalk=[0.2, 1], sucrose_delay=0, min_sstem_sucrose=800, min_sstem_sucrose_redn=10, tt_emerg_to_begcane=1900, tt_begcane_to_flowering=6000, tt_flowering_to_crop_end=2000, green_leaf_no=13, tillerf_leaf_size=[1.5, 1.5, 1.5, 1, 1], tillerf_leaf_size_no=[1, 4, 10, 16, 26]}
                {cultivar_name=ts65-28_fum, leaf_size=[1500, 55000, 55000], leaf_size_no=[1, 14, 20], cane_fraction=0.7, sucrose_fraction_stalk=[1, 0.55], stress_factor_stalk=[0.2, 1], sucrose_delay=0, min_sstem_sucrose=800, min_sstem_sucrose_redn=10, tt_emerg_to_begcane=1900, tt_begcane_to_flowering=6000, tt_flowering_to_crop_end=2000, green_leaf_no=13, tillerf_leaf_size=[1, 1, 1.5, 1, 1], tillerf_leaf_size_no=[1, 4, 10, 16, 26]}
                {cultivar_name=ts65-28_fum_ratoon, leaf_size=[1500, 55000, 55000], leaf_size_no=[1, 14, 20], cane_fraction=0.7, sucrose_fraction_stalk=[1, 0.55], stress_factor_stalk=[0.2, 1], sucrose_delay=0, min_sstem_sucrose=800, min_sstem_sucrose_redn=10, tt_emerg_to_begcane=1900, tt_begcane_to_flowering=6000, tt_flowering_to_crop_end=2000, green_leaf_no=13, tillerf_leaf_size=[1.5, 1.5, 1.5, 1, 1], tillerf_leaf_size_no=[1, 4, 10, 16, 26]}
                {cultivar_name=h73, leaf_size=[1500, 55000, 55000], leaf_size_no=[1, 14, 20], cane_fraction=0.7, sucrose_fraction_stalk=[1, 0.55], stress_factor_stalk=[0.2, 1], sucrose_delay=0, min_sstem_sucrose=800, min_sstem_sucrose_redn=10, tt_emerg_to_begcane=1900, tt_begcane_to_flowering=6000, tt_flowering_to_crop_end=2000, green_leaf_no=13, tillerf_leaf_size=[1, 1, 1.5, 1, 1], tillerf_leaf_size_no=[1, 4, 10, 16, 26]}
                {cultivar_name=h73_ratoon, leaf_size=[1500, 55000, 55000], leaf_size_no=[1, 14, 20], cane_fraction=0.7, sucrose_fraction_stalk=[1, 0.5], stress_factor_stalk=[0.2, 1], sucrose_delay=0, min_sstem_sucrose=800, min_sstem_sucrose_redn=10, tt_emerg_to_begcane=1900, tt_begcane_to_flowering=6000, tt_flowering_to_crop_end=2000, green_leaf_no=13, tillerf_leaf_size=[1.5, 1.5, 1.5, 1, 1], tillerf_leaf_size_no=[1, 4, 10, 16, 26]}
                {cultivar_name=q141, leaf_size=[1500, 55000, 55000], leaf_size_no=[1, 14, 20], cane_fraction=0.7, sucrose_fraction_stalk=[1, 0.64], stress_factor_stalk=[0.2, 1], sucrose_delay=0, min_sstem_sucrose=1200, min_sstem_sucrose_redn=10, tt_emerg_to_begcane=1900, tt_begcane_to_flowering=6000, tt_flowering_to_crop_end=2000, green_leaf_no=13, tillerf_leaf_size=[1, 1, 1.5, 1, 1], tillerf_leaf_size_no=[1, 4, 10, 16, 26]}
                {cultivar_name=q141_ratoon, leaf_size=[1500, 55000, 55000], leaf_size_no=[1, 14, 20], cane_fraction=0.7, sucrose_fraction_stalk=[1, 0.64], stress_factor_stalk=[0.2, 1], sucrose_delay=0, min_sstem_sucrose=1200, min_sstem_sucrose_redn=10, tt_emerg_to_begcane=1900, tt_begcane_to_flowering=6000, tt_flowering_to_crop_end=2000, green_leaf_no=13, tillerf_leaf_size=[1.5, 1.5, 1.5, 1, 1], tillerf_leaf_size_no=[1, 4, 10, 16, 26]}
                {cultivar_name=nco376, leaf_size=[3000, 7000, 12000, 28000, 28000], leaf_size_no=[1, 4, 6, 14, 20], cane_fraction=0.65, sucrose_fraction_stalk=[1, 0.55], stress_factor_stalk=[0.2, 1], sucrose_delay=0, min_sstem_sucrose=450, min_sstem_sucrose_redn=10, tt_emerg_to_begcane=1800, tt_begcane_to_flowering=6000, tt_flowering_to_crop_end=2000, green_leaf_no=10, tillerf_leaf_size=[1, 1, 1.5, 1, 1], tillerf_leaf_size_no=[1, 4, 10, 16, 26]}
                {cultivar_name=nco376_ratoon, leaf_size=[3000, 7000, 12000, 28000, 28000], leaf_size_no=[1, 4, 6, 14, 20], cane_fraction=0.65, sucrose_fraction_stalk=[1, 0.55], stress_factor_stalk=[0.2, 1], sucrose_delay=0, min_sstem_sucrose=450, min_sstem_sucrose_redn=10, tt_emerg_to_begcane=1800, tt_begcane_to_flowering=6000, tt_flowering_to_crop_end=2000, green_leaf_no=10, tillerf_leaf_size=[1.5, 1.5, 1.5, 1, 1], tillerf_leaf_size_no=[1, 4, 10, 16, 26]}
                {cultivar_name=n12, leaf_size=[3000, 7000, 12000, 30000, 30000], leaf_size_no=[1, 4, 6, 14, 20], cane_fraction=0.7, sucrose_fraction_stalk=[1, 0.55], stress_factor_stalk=[0.2, 1], sucrose_delay=0, min_sstem_sucrose=450, min_sstem_sucrose_redn=10, tt_emerg_to_begcane=1900, tt_begcane_to_flowering=6000, tt_flowering_to_crop_end=2000, green_leaf_no=13, tillerf_leaf_size=[1, 1, 1.5, 1, 1], tillerf_leaf_size_no=[1, 4, 10, 16, 26]}
                {cultivar_name=n12_ratoon, leaf_size=[3000, 7000, 12000, 30000, 30000], leaf_size_no=[1, 4, 6, 14, 20], cane_fraction=0.7, sucrose_fraction_stalk=[1, 0.55], stress_factor_stalk=[0.2, 1], sucrose_delay=0, min_sstem_sucrose=450, min_sstem_sucrose_redn=10, tt_emerg_to_begcane=1900, tt_begcane_to_flowering=6000, tt_flowering_to_crop_end=2000, green_leaf_no=13, tillerf_leaf_size=[1.5, 1.5, 1.5, 1, 1], tillerf_leaf_size_no=[1, 4, 10, 16, 26]}
                {cultivar_name=n14, leaf_size=[3000, 8000, 13000, 45000, 45000], leaf_size_no=[1, 4, 6, 14, 20], cane_fraction=0.7, sucrose_fraction_stalk=[1, 0.55], stress_factor_stalk=[0.2, 1], sucrose_delay=0, min_sstem_sucrose=450, min_sstem_sucrose_redn=10, tt_emerg_to_begcane=1900, tt_begcane_to_flowering=6000, tt_flowering_to_crop_end=2000, green_leaf_no=13, tillerf_leaf_size=[1, 1.5, 1.5, 1, 1], tillerf_leaf_size_no=[1, 4, 10, 16, 26]}
                {cultivar_name=n14_ratoon, leaf_size=[3000, 8000, 13000, 45000, 45000], leaf_size_no=[1, 4, 6, 14, 20], cane_fraction=0.7, sucrose_fraction_stalk=[1, 0.55], stress_factor_stalk=[0.2, 1], sucrose_delay=0, min_sstem_sucrose=450, min_sstem_sucrose_redn=10, tt_emerg_to_begcane=1900, tt_begcane_to_flowering=6000, tt_flowering_to_crop_end=2000, green_leaf_no=13, tillerf_leaf_size=[1.5, 1.5, 1.5, 1, 1], tillerf_leaf_size_no=[1, 4, 10, 16, 26]}
                {cultivar_name=CP51, leaf_size=[3000, 7000, 15000, 35000, 35000], leaf_size_no=[1, 4, 7, 15, 20], cane_fraction=0.7, sucrose_fraction_stalk=[1, 0.55], stress_factor_stalk=[0.2, 1], sucrose_delay=0, min_sstem_sucrose=450, min_sstem_sucrose_redn=10, tt_emerg_to_begcane=1350, tt_begcane_to_flowering=6000, tt_flowering_to_crop_end=2000, green_leaf_no=13, tillerf_leaf_size=[1, 1, 1, 1, 1], tillerf_leaf_size_no=[1, 4, 10, 16, 26]}
                {cultivar_name=CP51_ratoon, leaf_size=[3000, 7000, 15000, 35000, 35000], leaf_size_no=[1, 4, 7, 15, 20], cane_fraction=0.7, sucrose_fraction_stalk=[1, 0.55], stress_factor_stalk=[0.2, 1], sucrose_delay=0, min_sstem_sucrose=450, min_sstem_sucrose_redn=10, tt_emerg_to_begcane=1350, tt_begcane_to_flowering=6000, tt_flowering_to_crop_end=2000, green_leaf_no=13, tillerf_leaf_size=[1.5, 1.5, 1, 1, 1], tillerf_leaf_size_no=[1, 4, 10, 16, 26]}
                {cultivar_name=R570, leaf_size=[3000, 7000, 10000, 45000, 60000, 60000], leaf_size_no=[1, 4, 6, 10, 14, 20], cane_fraction=0.68, sucrose_fraction_stalk=[1, 0.58], stress_factor_stalk=[0.2, 1], sucrose_delay=0, min_sstem_sucrose=693, min_sstem_sucrose_redn=10, tt_emerg_to_begcane=1500, tt_begcane_to_flowering=6000, tt_flowering_to_crop_end=2000, green_leaf_no=13, tillerf_leaf_size=[6, 1], tillerf_leaf_size_no=[1, 12]}
                {cultivar_name=R570_ratoon, leaf_size=[3000, 7000, 10000, 45000, 60000, 60000], leaf_size_no=[1, 4, 6, 10, 14, 20], cane_fraction=0.68, sucrose_fraction_stalk=[1, 0.58], stress_factor_stalk=[0.2, 1], sucrose_delay=0, min_sstem_sucrose=693, min_sstem_sucrose_redn=10, tt_emerg_to_begcane=1500, tt_begcane_to_flowering=6000, tt_flowering_to_crop_end=2000, green_leaf_no=13, tillerf_leaf_size=[10, 1], tillerf_leaf_size_no=[1, 12]}
                {cultivar_name=M1356, leaf_size=[3000, 7000, 10000, 25000, 40000, 40000], leaf_size_no=[1, 4, 6, 10, 14, 20], cane_fraction=0.78, sucrose_fraction_stalk=[1, 0.57], stress_factor_stalk=[0.2, 1], sucrose_delay=0, min_sstem_sucrose=521, min_sstem_sucrose_redn=10, tt_emerg_to_begcane=1200, tt_begcane_to_flowering=6000, tt_flowering_to_crop_end=2000, green_leaf_no=13, tillerf_leaf_size=[6, 1], tillerf_leaf_size_no=[1, 12]}
                {cultivar_name=M1356_ratoon, leaf_size=[3000, 7000, 10000, 25000, 40000, 40000], leaf_size_no=[1, 4, 6, 10, 14, 20], cane_fraction=0.78, sucrose_fraction_stalk=[1, 0.57], stress_factor_stalk=[0.2, 1], sucrose_delay=0, min_sstem_sucrose=521, min_sstem_sucrose_redn=10, tt_emerg_to_begcane=1200, tt_begcane_to_flowering=6000, tt_flowering_to_crop_end=2000, green_leaf_no=13, tillerf_leaf_size=[10, 1], tillerf_leaf_size_no=[1, 12]}
                {cultivar_name=M55560, leaf_size=[3000, 7000, 10000, 35000, 50000, 50000], leaf_size_no=[1, 4, 6, 10, 14, 20], cane_fraction=0.7, sucrose_fraction_stalk=[1, 0.62], stress_factor_stalk=[0.2, 1], sucrose_delay=0, min_sstem_sucrose=775, min_sstem_sucrose_redn=10, tt_emerg_to_begcane=1300, tt_begcane_to_flowering=6000, tt_flowering_to_crop_end=2000, green_leaf_no=13, tillerf_leaf_size=[6, 1], tillerf_leaf_size_no=[1, 12]}
                {cultivar_name=M55560_ratoon, leaf_size=[3000, 7000, 10000, 35000, 50000, 50000], leaf_size_no=[1, 4, 6, 10, 14, 20], cane_fraction=0.7, sucrose_fraction_stalk=[1, 0.62], stress_factor_stalk=[0.2, 1], sucrose_delay=0, min_sstem_sucrose=775, min_sstem_sucrose_redn=10, tt_emerg_to_begcane=1300, tt_begcane_to_flowering=6000, tt_flowering_to_crop_end=2000, green_leaf_no=13, tillerf_leaf_size=[10, 1], tillerf_leaf_size_no=[1, 12]}
                {cultivar_name=q124, leaf_size=[1500, 55000, 55000], leaf_size_no=[1, 14, 20], cane_fraction=0.7, sucrose_fraction_stalk=[1, 0.55], stress_factor_stalk=[0.2, 1], sucrose_delay=0, min_sstem_sucrose=800, min_sstem_sucrose_redn=10, tt_emerg_to_begcane=1900, tt_begcane_to_flowering=6000, tt_flowering_to_crop_end=2000, green_leaf_no=13, tillerf_leaf_size=[1, 1, 1.5, 1, 1], tillerf_leaf_size_no=[1, 4, 10, 16, 26]}
                {cultivar_name=q124_ratoon, leaf_size=[1500, 55000, 55000], leaf_size_no=[1, 14, 20], cane_fraction=0.7, sucrose_fraction_stalk=[1, 0.55], stress_factor_stalk=[0.2, 1], sucrose_delay=0, min_sstem_sucrose=800, min_sstem_sucrose_redn=10, tt_emerg_to_begcane=1900, tt_begcane_to_flowering=6000, tt_flowering_to_crop_end=2000, green_leaf_no=13, tillerf_leaf_size=[1.5, 1.5, 1.5, 1, 1], tillerf_leaf_size_no=[1, 4, 10, 16, 26]}
            Report: EventNames=[Clock].DoReport
              VariableNames:
                [Clock].Today
                [Sugarcane].crop_status
                [Sugarcane].biomass
                [Sugarcane].cane_wt
                [Sugarcane].sucrose_wt
                [Sugarcane].height
                [Sugarcane].root_depth
                [Sugarcane].node_no_detached
                [Sugarcane].leaves
                [Sugarcane].green_leaves
                [Sugarcane].dead_leaves
                [Sugarcane].lai
                [Sugarcane].tla
                [Sugarcane].plant_n_tot
                [Sugarcane].swdef_photo
                [Sugarcane].swdef_pheno
                [Sugarcane].swdef_expan
                [Sugarcane].swdef_stalk
                [Sugarcane].nfact_photo
                [Sugarcane].nfact_expan
                [Sugarcane].oxdef_photo
                [Sugarcane].ep
            SurfaceOrganicMatter Surface Organic Matter: InitialResidueName=sugar_trash; InitialResidueType=Sugarcane; InitialResidueMass=1000; InitialStandingFraction=1; InitialCPR=0; InitialCNR=80
            Soil Schulte: Latitude=0; Longitude=0
              Physical
                Thickness  BD     AirDry  LL15   DUL   SAT
                200        1.574  0.05    0.111  0.23  0.35
                200        1.649  0.1     0.111  0.23  0.35
                200        1.771  0.1     0.111  0.23  0.33
                300        1.698  0.1     0.17   0.3   0.35
                300        1.58   0.1     0.25   0.37  0.4
                150        1.601  0.1     0.25   0.37  0.396
                150        1.601  0.1     0.25   0.37  0.396
                SoilCrop SugarcaneSoil: LL=[0.111, 0.111, 0.111, 0.117, 0.3, 0.33, 0.33]; KL=[0.1, 0.1, 0.1, 0.08, 0.08, 0.04, 0.04]; XF=[1, 1, 1, 1, 1, 1, 1]
                SoilCrop PeanutSoil: LL=[0.111, 0.111, 0.111, 0.117, 0.3, 0.33, 0.33]; KL=[0.1, 0.1, 0.1, 0.08, 0.08, 0.04, 0.04]; XF=[1, 1, 1, 1, 1, 1, 1]
              WaterBalance SoilWater: SummerDate=1-Nov; SummerU=4; SummerCona=2; WinterDate=1-Apr; WinterU=4; WinterCona=2; DiffusConst=88; DiffusSlope=35; Salb=0.2; CN2Bare=85; CNRed=20; CNCov=0.8; Thickness=[200, 200, 200, 300, 300, 150, 150]; SWCON=[0.2, 0.2, 0.2, 0.3, 0.3, 0.3, 0.3]
              Organic: FOMCNRatio=70
                Thickness  Carbon  SoilCNRatio  FBiom  FInert  FOM
                200        0.8     17           0.03   0.5     373.676
                200        0.5     17           0.015  0.6     250.483
                200        0.34    17           0.015  0.7     167.904
                300        0.34    17           0.01   0.8     92.1474
                300        0.26    17           0.01   0.95    50.5716
                150        0.26    17           0.01   0.95    37.4643
                150        0.26    17           0.01   0.95    27.7543
              Chemical
                Thickness  NO3N      NH4N     PH
                200        0.479935  3.28998  7
                200        1.34988   2.95     7
                200        0.479986  2.75003  7
                300        1.01996   2.48004  7
                300        8.40994   2.61002  7
                150        14.12     2.48004  7
                150        14.12     2.48002  7
              Sample Initial water: Thickness=[200, 200, 200, 300, 300, 150, 150]; SW=[0.123, 0.136, 0.159, 0.188, 0.299, 0.337, 0.337]; SWUnits=Volumetric; OCUnits=Total; PHUnits=Water
              CERESSoilTemperature Temperature
              Nutrient
            Operations
              1980-04-01  [Sugarcane].SowNewPlant(PlantingDensity:10, Depth:100, CultivarName:"Q117_fum");
              1980-04-01  [Fertiliser].Apply(Amount:200, Type:Fertiliser.Types.NH4N, Depth:100);
              1981-07-01  [Sugarcane].HarvestCrop();
              1981-07-01  [Fertiliser].Apply(Amount:200, Type:Fertiliser.Types.NH4N, Depth:100);
              1982-07-01  [Sugarcane].HarvestCrop();
              1982-07-01  [Fertiliser].Apply(Amount:200, Type:Fertiliser.Types.NH4N, Depth:100);
              1983-07-01  [Sugarcane].HarvestCrop();
              1983-07-01  [Fertiliser].Apply(Amount:200, Type:Fertiliser.Types.NH4N, Depth:100);
              1984-07-01  [Sugarcane].HarvestCrop();
              1984-07-01  [Fertiliser].Apply(Amount:200, Type:Fertiliser.Types.NH4N, Depth:100);
              1985-07-01  [Sugarcane].HarvestCrop();
              1985-07-01  [Sugarcane].EndCrop();
            Plant Peanut
    Folder Aflotoxin Risk
      Experiment Aflotoxin
        Factors
          Permutation
            Factor Cv: Specification=[SowingRule].Script.CultivarName=Redvale,Holt
            Factor Sow
              CompositeFactor 15Nov: Specifications=[SowingRule].Script.SowDate=15-Nov
              CompositeFactor 15Jan: Specifications=[SowingRule].Script.SowDate=15-Jan
        Simulation Aflotoxin Base
          Clock: Start=1990-10-01; End=2021-06-01
          Summary summaryfile
          Weather: FileName=Kingaroy.met
          SoilArbitrator Soil Arbitrator
          MicroClimate: a_interception=0; b_interception=1; c_interception=0; d_interception=0; soil_albedo=0.23; SoilHeatFluxFraction=0.4; MinimumHeightDiffForNewLayer=0; NightInterceptionFraction=0.5; ReferenceHeight=2
          Zone paddock: Area=1; Slope=0; AspectAngle=0; Altitude=50
            Irrigation
            Manager Automatic irrigation based on water deficit
              FASW = 0
              WaterDeficit = 0
              AutoIrrigationOn = False
              FASWThreshold = 0.9
              FASWDepth = 900
              script: same as in Validation.Australia.Kingaroy8384.Kingaroy8384Base.paddock.Automatic irrigation based on water deficit
            Fertiliser
            SurfaceOrganicMatter: InitialResidueName=maize; InitialResidueType=maize; InitialResidueMass=4500; InitialStandingFraction=0; InitialCPR=0; InitialCNR=55
            Report AflotoxinReport: EventNames=[Peanut].Harvesting
              VariableNames:
                [Clock].Today
                [Peanut].Pod.Wt
                [Peanut].AflotoxinPercentage
            Plant Peanut
            Manager SowingRule
              Crop = [Peanut]
              SowDate = 1-dec
              CultivarName = Redvale
              SowingDepth = 50
              RowSpacing = 900
              Population = 15
```csharp
using APSIM.Shared.Utilities;
using Models.Utilities;
using Models.Soils;
using Models.PMF;
using Models.Core;
using System;

namespace Models
{
    [Serializable]
    public class Script : Model
    {
        [Link] Clock Clock;
        [Link] Fertiliser Fertiliser;
        [Link] Summary Summary;
        [Link] Soil Soil;
        
        [Description("Crop")]
        public IPlant Crop { get; set; }

        [Description("Sowing date (d-mmm)")]
        public string SowDate { get; set; }

        [Display(Type = DisplayType.CultivarName)]
        [Description("Cultivar to be sown")]
        public string CultivarName { get; set; }

        [Description("Sowing depth (mm)")]
        public double SowingDepth { get; set; }

        [Description("Row spacing (mm)")]
        public double RowSpacing { get; set; }

        [Description("Plant population (/m2)")]
        public double Population { get; set; }

        [EventSubscribe("DoManagement")]
        private void OnDoManagement(object sender, EventArgs e)
        {
            if (DateUtilities.WithinDates(SowDate, Clock.Today, SowDate))
            {
                Crop.Sow(population: Population, cultivar: CultivarName, depth: SowingDepth, rowSpacing: RowSpacing);    
            }
        }
    }
}
```
            Manager Harvest: same as Validation.Australia.Kingaroy8384.Kingaroy8384Base.paddock.Harvest
            Operations
            Soil: same as Sensibility.DetailedDynamics.DetailedDynamics.DetailedDynamicsBase.paddock.Soil
  Folder UnderDevelopment
    Experiment Roseworthy9798
      Memo
        This dataset ([Porter2000PhD]) studied the impact of spatial arrangement on peanut crop microenvironment for the cultvar VB97.  The experiment was grown under irrigated conditions in at Roseworthy in South Australia. The soil type was clay-loam with good water holding capacity.
        well-drained soil.  Supplementary irrigations were made to avoid moisture stress.
        Treatments included a full factorial of population (8.8, 27.3, 39.4 and 58.8 plants/m^2) and Spatial Ratio (1:1, 1:2.2, 1:4.6 and 1:7.2 Inter-row:Intra-row).
      Factors
        Permutation
          Factor Pop: Specification=[SowingRule].Script.SowingRate = 8.8, 27.3, 39.4, 58.8
          Factor SR: Specification=[SowingRule].Script.SpacingRatio = 1,2.2,4.6,7.2
      Simulation Roseworthy9798Base
        Clock: Start=1997-11-07; End=1998-04-30
        Summary summaryfile
        Weather: FileName=Roseworthy.met
        SoilArbitrator Soil Arbitrator
        MicroClimate: a_interception=0; b_interception=1; c_interception=0; d_interception=0; soil_albedo=0.23; SoilHeatFluxFraction=0.4; MinimumHeightDiffForNewLayer=0; NightInterceptionFraction=0.5; ReferenceHeight=2
        Zone paddock: Area=1; Slope=0; AspectAngle=0; Altitude=50
          Irrigation
          Fertiliser
          SurfaceOrganicMatter: InitialResidueName=maize; InitialResidueType=maize; InitialResidueMass=4500; InitialStandingFraction=0; InitialCPR=0; InitialCNR=55
          Report DailyReport: same as Validation.Australia.Kingaroy8384.Kingaroy8384Base.paddock.DailyReport
          Manager SowingRule
            SowingRate = 8.8
            SpacingRatio = 1
            SowingDepth = 50
            CultivarName = VB97
            SowingDate = 11/07/1997 00:00:00
            EmergDate = 23-Nov
```csharp
using APSIM.Shared.Utilities;
using Models.PMF;
using Models.Core;
using System;
        
        namespace Models
        {
           [Serializable] 
           [System.Xml.Serialization.XmlInclude(typeof(Model))]
            public class Script : Model
            {      
               [Link] Plant Peanut;
               [Link] Clock Clock;

               [Description("Spacing Ratio (row vs plant spacing)")]
               public double SpacingRatio { get; set; }
               [Description("Depth (mm) Grains are planted")]
               public double SowingDepth { get; set; }
               [Description("Seeds sown (/m2)")]
               public double SowingRate { get; set; }
               [Description("Cultivar")]
               [Display(Type=DisplayType.CultivarName)]
               public string CultivarName { get; set; }
               [Description("Sowing Date")]
               public DateTime SowingDate { get; set; }
			   [Description("Emergence Date")]
               public string EmergDate { get; set; }


               [EventSubscribe("DoManagement")]
               private void OnDoManagement(object sender, EventArgs e)
               {
               double A = (1/SowingRate);
               double RowSpacing = Math.Sqrt(SpacingRatio*A)*1000;
                if (Clock.Today.Date == SowingDate)
                    Peanut.Sow(population:SowingRate, cultivar:CultivarName, depth:SowingDepth, rowSpacing:RowSpacing, budNumber:1);
                    Peanut.SetEmergenceDate(EmergDate);
               }
            }
        }
```
          Report HarvestReport: EventNames=[Peanut].Harvesting
            VariableNames:
              [Clock].Today
              [Peanut].Structure.MainStemPrimordiaNo
              [Peanut].Phenology.NFF
              [Peanut].Script.FinalTag
          Plant Peanut
          Soil: same as Validation.Australia.Kingaroy8485.Kingaroy8485Base.paddock.Soil
          Manager Harvest
            HarvestDate = 04/17/1998 00:00:00
            script: same as in Validation.Australia.Loxton9697.Loxton9697Base.paddock.Harvest
          Manager Automatic irrigation based on water deficit: same as Validation.Australia.Kingaroy8384.Kingaroy8384Base.paddock.Automatic irrigation based on water deficit
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