Simulations: Version=155
  Memo README
    # The APSIM SWIM3 Model

    Neil Huth, Dean Holzworth, Eric Zurcher (CSIRO, Australia)
    Rogerio Cichota (Plant and Food Research, New Zealand)
    Val Snow (AgResearch, New Zealand)

    ## Acknowledgements

    The addition of SWIM3 into APSIM NextGeneration was done using funding from CSIRO’s internal funding (SIP) and AgResearch’s Strategic Science Investment Fund. We also acknowledge the valuable data and simulations supplied for validation from Laura Buckthought (Auckland Council, New Zealand) and Sotirios Archontoulis (Iowa State University, USA).

    ## Introduction

    SWIM3 is a model that stores and moves water and chemicals through the soil. Its function is analogous to the SoilWater model (so the two models would never appear in the same zone in a simulation) but the underlying methods used to calculate water and solute movement are very different and those methods give SWIM3 much more flexibility that SoilWater – particularly when needing complex boundary conditions (e.g., tile drained soils).

    SWIM3’s origins lie in a standalone model from Peter Ross (CSIRO) developed in the 1980s. The underlying functions are based on Richards’ equation for water movement and the convection-dispersion equation with a Freundlich solute isotherm for the movement of chemicals (nutrients and other species). The model, still as a standalone model, was extensively documented in [verburg_methodology_1996] and that reference remains the source of definitive information about the functioning of the model itself. Since that time there have been changes in the user interface, some changes in the scope of the standalone version model to make it compatible with APSIM ([Huth_1996]), and more recently the method for supplying the hydraulic parameters for the model ([Huth2012SWIM3]).

    Because [verburg_methodology_1996], and also [cichota_protocol_2021], document the processes and parameters in detail, this document only covers major differences to those publications and some tricks and tips on using the model.

    ## Special features – why use SWIM3 rather than SoilWater?

    SWIM3 is not as easy to use as SoilWater, is slower and will sometimes and frustratingly crash during a simulation with a numerical convergence error (see more below). Given that, why use SWIM3 at all? Essentially these boil down to needing features that SWIM3 can provide that SoilWater cannot. These include:
    * Needing a seepage boundary condition while modelling a lysimeter experiment. Experimentally, the lower boundary is open to atmospheric pressure and that materially affects water and solute movement.
    * Needing to incorporate the effects of tile drainage or a regional water table into the simulation.
    * SWIM3 has a more realistic treatment of solute mobility and adsorption than SoilWater (in which solute are either mobile or immobile) and this may be important depending on the purpose of the simulation.
    * SoilWater requires as relatively thick (15-20 mm) layer at the soil surface and this can be problematic for questions related to surface processes that change quickly with depth in the soil. Here SWIM3’s thinner layers at the soil surface may be a better solution.

    ## Major differences compared to the Verburg report

    SWIM3 was developed from a standalone model. Because it was a standalone model, it included some functionality already provided by crop or other models in APSIM and so that were discarded when ported into APSIM. These included:

    * Initial conditions are given by the UI or other models as volumetric water content rather than soil water potential;
    * The constant potential top boundary condition was not enabled
    * Surface sealing functions were not enabled

    *For the top boundary conditions and infiltration:*

    * No ponding is handled by setting a curve number of 100
    * No runoff is handled with a curve number of 0
    * The power-law function option is set using the Manager script “SWIMSetSurfaceBC” – that script is found in the Soil folder of the Management toolbox
    * The subsurface downslope runoff function was not enabled

    *For the lower boundary conditions and Manager script “SWIMSetLowerBC” (in the Soil toolbox) was written:*

    * The “given matric potential gradient” boundary condition is enabled as the default with unit gradient (“gradient” in the Manager script)
    * The “given potential” is enabled as “potential” in the Manager. For this boundary condition the value sets a potential relative to the lower depth of the soil. If the soil is 1000 mm deep and a potential of +200 mm is set then a water table will be set at 800 mm deep and water continually added or removed to/from the lowest soil layer to maintain that water table. Setting a value of -1000 mm as the constant potential would continually add or remove water to maintain that matric potential.
    * The “zero flux” boundary condition was not enabled
    * The “seepage” was enabled with a threshold suction of zero to mimic lysimeter conditions.

    *Other differences*

    * In SWIM3 in APSIM NextGeneration there is no water or solute uptake as these functions are handled by the combination of Micromet, SoilArbitrator, Solute and the crop models
    * “Potential subsurface downslope flow” was not enabled
    * The methods for specifying the conductivity and soil water retention were replaced as described in Huth et al. (2012) to provide greater accessibility for users unfamiliar with the functional forms used in SWIM2
    * Hysteresis was not enabled
    * Because SWIM3 does not perform the soil water or solute uptake, osmotic effects on these processes are of course not enabled
    * Evapotranspiration is not enabled as this is handled by other APSIM models
    * Rainfall is assumed to arrive evenly during the day
    * Irrigation duration is taken from the irrigation command and the start time is taken as midnight
    * Rainfall/irrigation intensity effects on soil surface roughness are not enabled
    * Cultivation effects are not enabled

    ## Units

    Note that [verburg_methodology_1996] and the more interior parts of the SWIM3 code work in units of cm and hours but from the user’s perspective (inputs and outputs when used in APSIM) the standard APSIM units of mm and days are used.

    ## Layering for APSIM and nodes for SWIM3

    Numerical solutions for problems such as the Richards’ equation work on the basis of a network (here a one-dimensional array with depth) of nodes. A node is a notional point in space that contain all the mass in the simulation. There are known/set distances between the nodes and calculated resistances to flow of mass between the nodes. This is quite different to the layering approach used in APSIM so a conversion or mapping between the two systems is essential. The conversion in handled in the software so, in most circumstances, the user does not need to understand the mechanism. The exception is when there are numerical convergence issues and then understanding the layering and its effects is important.

    Node-based systems require nodes to be placed at each end of the simulated space and in past versions of SWIM this meant were two more nodes than layers. This caused some confusion for users so in SWIM3 in NextGeneration, nodes central to the deepest and second deepest layers were omitted. The placement of these is diagrammed in Figure 1. The advantage of this is that, from the users point of view, the number of nodes and layers are the same. The scheme also concentrates nodes near the soil surface which is helpful for stability. The disadvantage is that there is a large distance between the last two nodes. For simulations with unit gradient as the lower boundary condition this is not usually problematic but for simulations with water tables or tile drains near the bottom of the soil profile then it may reduce stability.

    For users this means that they should take care to extend the base of the soil profile well below the depth of interest (usually the rooting depth). In particular the soil depth should be well below any water table or tile drain depth AND there should be several (more than two) layers placed between the water table depth or tile drain depth and the base of the soil profile.

    ![](Swim-layers.png)

    Figure 1. Relationship between APSIM layers and SWIM3 nodes

    ## Convergence issues

    The numerical solution methods in SWIM3 give the model considerable flexibility in the boundary conditions but come at a cost of increased execution time and the possibility of some simulations failing when the equations do not numerically converge. See [verburg_methodology_1996] for more information on stability but here are some quick tips or approaches:

    * Put more layers (i.e., make them thinner) near the soil surface, at the base of the profile, around the interfaces of soil horizons with sharp changes in hydraulic parameters, and around features such as tile drains. The use of the LayerStructure model is highly recommended. The top layer should not be greater than 10 mm thick and the deepest layer should not be greater than 200 mm thick.
    * Default values of the maximum timestep and maximum water increment are 1440 min and 10 mm. Reducing these, to say 30 min and 2 mm, will fix many convergence problems.
    * There are space weighting factors available on the user interface that can assist with stability but these require careful usage as they can generate a simulation that runs but that gives unreliable results. See [verburg_methodology_1996] for details.
    * If the error message on non-convergence is related to solutes, consider reducing the nonlinearity (i.e., move the value of fip closer to 1.0) of the solute adsorption isotherm.

    ## Issues and further development needs

    Much of the inner code of SWIM3 is very old. The original code was in an early version of Fortran (maybe Fortran 66, possibly even some legacy Fortran IV). Because of the complexities of short variable names (a feature of early Fortran) as well as complex code to manage memory usage (these days not an issue) and execution time and the known near impossibility find and fix any introduced errors, each of the about four major modifications of the code was done with the lightest touch possible. Thus, while the code is now all in C#, there are substantial important parts of the model that still look Fortran-like. Finding the source of errors is challenging even with a modern debugger because of the code structure. At some point in the future the code will become unsupportable. Addressing this issue would be advisable but would require substantial funding.

    In the current state of SWIM3, simulations are quite unstable when the exponent on the Freundlich solute isotherm is much less then about 0.8 (lower values make the isotherm more nonlinear). This is something that should be addressed in the future.
  Folder Replacements
    Manager CalculateRollingWaterBalance
      WBTolerance = 0.1
```csharp
// This script calculates a *WaterBalance* term (output) that adds together the water balance
// water entering the system (e.g. rain, irrigation) and subtracts the water
// leaving the system (e.g. runoff, drainage, evaporation, plant water uptake). If mass balance
// is maintained, the *WaterBalance* variable should always be zero.   




using Models.Climate;
using APSIM.Shared.Utilities;
using Models.Soils.Nutrients;
using Models.Soils;
using Models.PMF;
using Models.Core;
using System.Xml.Serialization;
using System;
using Models.AgPasture;
using Models.Interfaces;
using System.Linq;

namespace Models
{
    [Serializable] 
    [System.Xml.Serialization.XmlInclude(typeof(Model))]
    public class Script : Model
    {
        [Link] Clock clock;
        [Link] ISummary summary;
        [Link] IWeather weather;
        [Link] Irrigation irrigation;
        [Link] private ISoilWater waterBalance;
        [Link] private IPlant[] plants;

  
  		[Separator("This manager checks that water in the simulation balances - that all inputs are accounted for as storage or losses. If the water balance exceeds (high or low) the tolerance then the simulation is crashed.")]
  		
  		[Description("What water mass balance error is tolerable in the cumulative water balance? (mm /year) (suggest substantially < 1 mm /year)")] public double WBTolerance { get; set; }
  		
  		
        public double WaterBalanceCumulative  { get; set; }
        public double WaterBalanceToday  { get; set; }

        public double SoilWaterAtInitialisation  { get; set; }
        public double SoilWaterYesterday  { get; set; }
		public double SoilWaterNow  { get; set; }

		public double PlantWaterUptake { get; set; }

        public double WaterAddedToday  { get; set; }
        public double WaterRemovedToday  { get; set; }
        public double WaterAddedCumulative  { get; set; }
        public double WaterRemovedCumulative  { get; set; }
        
        public double WBCheck { get; set; }
        

        [EventSubscribe("DoDailyInitialisation")]
        private void DoDailyInitialisation(object sender, EventArgs e)
        {
        	if (clock.Today == clock.StartDate) 
        	// capture the water in and on the soil as a starting point
        	// doing this here as need the models to have intialised first
        	{
	        	SoilWaterAtInitialisation = waterBalance.Pond;
    	    	for (int i = 0; i < waterBalance.SWmm.Length; i++)
        			SoilWaterAtInitialisation += waterBalance.SWmm[i];

        		SoilWaterYesterday = SoilWaterAtInitialisation;		
        		WaterAddedCumulative = 0.0;
        		WaterRemovedCumulative = 0.0;
        		SoilWaterNow = 0.0;
        	}
        	else
        	{
        		SoilWaterYesterday = SoilWaterNow;		// SoilWaterNow holds the value calculated at reporting yesterday
        		WaterAddedToday = 0.0;
        		WaterRemovedToday = 0.0;
        	}
		}

        [EventSubscribe("DoReportCalculations")]
        private void DoReportCalculations(object sender, EventArgs e)
        {
       	// All the WaterBalance variables should be zero. A positive value is a generation of water.
        	SoilWaterNow = waterBalance.Pond;
        	for (int i = 0; i < waterBalance.SWmm.Length; i++)
        		SoilWaterNow += waterBalance.SWmm[i]; // so all the water stored in or on the soil

        	WaterAddedToday = weather.Rain + irrigation.IrrigationApplied;   // Can there be runon? Probably not but this will throw an error if that ever happens
        	WaterAddedCumulative+= WaterAddedToday;

        	WaterRemovedToday = waterBalance.Drainage + waterBalance.Es + waterBalance.Runoff + waterBalance.SubsurfaceDrain;
        	PlantWaterUptake = 0.0;
        	foreach (var plant in plants)
        	{
        		if (plant.WaterUptake != null)
        			PlantWaterUptake += plant.WaterUptake.Sum();
        	}

        	WaterRemovedToday += PlantWaterUptake;

        	WaterRemovedCumulative += WaterRemovedToday;

        	WaterBalanceToday = WaterAddedToday - WaterRemovedToday - (SoilWaterNow - SoilWaterYesterday);
        	WaterBalanceCumulative = WaterAddedCumulative - WaterRemovedCumulative - (SoilWaterNow - SoilWaterAtInitialisation);

        	// need to add a warning value and a crash value and make a crash
        	double simTimeYears = (clock.Today - clock.StartDate).Days/365.25;
        	if (simTimeYears > 0.1)
        	{
        		WBCheck = WaterBalanceCumulative * simTimeYears;
        		if (WBCheck > WBTolerance * simTimeYears)
        			throw new Exception("The error in the water balance, " + WaterBalanceCumulative + ", exceeded the specified tolerance of " + WBTolerance * simTimeYears + ". There is likely a problem with SWIM or SoilWater.");
        	}
		}
    }
}
```
  DataStore
    ExcelInput: FileNames=[HudsonObserved.xlsx]
      SheetNames=[ObservedCrop, ObservedPhenology, ObservedCl, ObservedResidue, ObservedRunoff, Stubble, ObservedSW, ObservedSWlayers]
    ExcelInput ExcelInput1
      FileNames=[_measured_FACTS_Kelley_NG.xlsx, _measured_TileDrainageSpace_NG.xlsx, _measured_WaterTable_NG.xlsx]
      SheetNames=[Crop, Water, Nitrogen, Classic, Tile, SurfaceOM, DrainSpace, Classic, WT_obs, WT_classic]
    ExcelInput ExcelInput2: FileNames=[BuckthoughtObserved.xlsx]; SheetNames=[ObservedDrainage, ObservedHerbage]
    PredictedObserved PredictedObservedCl: PredictedTableName=Report; ObservedTableName=ObservedCl; FieldNameUsedForMatch=Clock.Today; AllColumns=true
    PredictedObserved PredictedObservedSW: PredictedTableName=Report; ObservedTableName=ObservedSW; FieldNameUsedForMatch=Clock.Today; AllColumns=true
    PredictedObserved PredictedObservedLeachingDrainage: PredictedTableName=Report; ObservedTableName=ObservedDrainage; FieldNameUsedForMatch=Clock.Today; AllColumns=true
  Folder Validation
    Folder Hudson
      Memo
        The Hudson experiment was conducted in the Liverpool Plains region of New South Wales, Australia (31o 45' S, 150o 45' E) to explore the water balance and productivity of nine different cropping systems including six treatments of continuous cropping of wheat ( Triticum aestivum ), sorghum ( Sorghum bicolor ), mungbeans ( Phaseolus aureus ), and chickpeas ( Cicer arietinum ) with differing cropping frequencies (Paydar et al., 2005a). The remaining three treatments involved continuous perennial pastures of lucerne ( Medicago sativa ), grass ( Panicum coloratum ), and a lucerne-grass mixture. Only the continuous wheat cropping has been chosen. The soil profile is classified as an endocalcareous, self-mulching, black vertosol (Isbell, 1996) or Ug5.15 (Northcote, 1979). The soil to around 1 m depth consists of colluvial material with 75% to 80% clay. This overlies >5 m of brown clay with variable amounts of calcium carbonate concretions. Groundwater occurs 15 m below the surface above basalt rock. Further detail on soil properties is provided by Ringrose-Voase et al. (2003). Soil water content to 3.1 m depth was measured with a calibrated neutron moisture meter (CPN 503 DR Hydroprobe moisture gauge, Boart Longyear Co., South Jordan, Utah) at regular intervals from December 1994 until January 2000. Crop and pasture growth and development and soil and crop nitrogen contents were also monitored for the duration of the trial.

        Model predictions are compared to measurements of soil water and naturally occurring soil chloride. Comparison of soil water data demonstrates the model's ability to simulate the water balance of two contrasting farming systems, while the soil chloride data provide an inert environmental tracer for testing model predictions of solute transport.
      Simulation HudsonW1
        Clock: Start=1994-08-05; End=2000-01-23
        Summary summaryfile
        Weather: FileName=Hudson.met
        SoilArbitrator
        MicroClimate: a_interception=0; b_interception=1; c_interception=0; d_interception=0; SoilHeatFluxFraction=0.4; MinimumHeightDiffForNewLayer=0; NightInterceptionFraction=0.5; ReferenceHeight=2
        Zone paddock: Area=1; Slope=0; AspectAngle=0; Altitude=50
          Manager CalculateRollingWaterBalance
```csharp
// This script calculates a *WaterBalance* term (output) that adds together the water balance
// water entering the system (e.g. rain, irrigation) and subtracts the water
// leaving the system (e.g. runoff, drainage, evaporation, plant water uptake). If mass balance
// is maintained, the *WaterBalance* variable should always be zero.   




using Models.Climate;
using APSIM.Shared.Utilities;
using Models.Soils.Nutrients;
using Models.Soils;
using Models.PMF;
using Models.Core;
using System.Xml.Serialization;
using System;
using Models.AgPasture;
using Models.Interfaces;
using System.Linq;

namespace Models
{
    [Serializable] 
    [System.Xml.Serialization.XmlInclude(typeof(Model))]
    public class Script : Model
    {
        [Link] Clock clock;
        [Link] ISummary summary;
        [Link] IWeather weather;
        [Link] Irrigation irrigation;
        [Link] private ISoilWater waterBalance;
        [Link] private IPlant[] plants;

  
        // add (no3+nh4) uptake as N uptake to IPlant

        public double WaterBalanceCumulative  { get; set; }
        public double WaterBalanceToday  { get; set; }

        public double SoilWaterAtInitialisation  { get; set; }
        public double SoilWaterYesterday  { get; set; }
		public double SoilWaterNow  { get; set; }

		public double PlantWaterUptake { get; set; }

        public double WaterAddedToday  { get; set; }
        public double WaterRemovedToday  { get; set; }
        public double WaterAddedCumulative  { get; set; }
        public double WaterRemovedCumulative  { get; set; }



        [EventSubscribe("DoDailyInitialisation")]
        private void DoDailyInitialisation(object sender, EventArgs e)
        {
        	if (clock.Today == clock.StartDate) 
        	// capture the water in and on the soil as a starting point
        	// doing this here as need the models to have intialised first
        	{
	        	SoilWaterAtInitialisation = waterBalance.Pond;
    	    	for (int i = 0; i < waterBalance.SWmm.Length; i++)
        			SoilWaterAtInitialisation += waterBalance.SWmm[i];

        		SoilWaterYesterday = SoilWaterAtInitialisation;		
        		WaterAddedCumulative = 0.0;
        		WaterRemovedCumulative = 0.0;
        		SoilWaterNow = 0.0;
        	}
        	else
        	{
        		SoilWaterYesterday = SoilWaterNow;		// SoilWaterNow holds the value calculated at reporting yesterday
        		WaterAddedToday = 0.0;
        		WaterRemovedToday = 0.0;
        	}
		}

        [EventSubscribe("DoReportCalculations")]
        private void DoReportCalculations(object sender, EventArgs e)
        {
        	// All the WaterBalance variables should be zero. A positive value is a generation of water.
        	SoilWaterNow = waterBalance.Pond;
        	for (int i = 0; i < waterBalance.SWmm.Length; i++)
        		SoilWaterNow += waterBalance.SWmm[i]; // so all the water stored in or on the soil

        	WaterAddedToday = weather.Rain + irrigation.IrrigationApplied;   // Can there be runon? Probably not but this will throw an error if that ever happens
        	WaterAddedCumulative+= WaterAddedToday;

        	WaterRemovedToday = waterBalance.Drainage + waterBalance.Es + waterBalance.Runoff + waterBalance.SubsurfaceDrain;
        	PlantWaterUptake = 0.0;
        	foreach (var plant in plants)
        		PlantWaterUptake += plant.WaterUptake.Sum();

        	WaterRemovedToday += PlantWaterUptake;
        	// Need to add subsurface drainage here

        	WaterRemovedCumulative += WaterRemovedToday;

        	WaterBalanceToday = WaterAddedToday - WaterRemovedToday - (SoilWaterNow - SoilWaterYesterday);
        	WaterBalanceCumulative = WaterAddedCumulative - WaterRemovedCumulative - (SoilWaterNow - SoilWaterAtInitialisation);
        	// need to add a warning value and a crash value and make a crash
		}
    }
}
```
          Report: EventNames=[Clock].DoReport
            VariableNames:
              [Clock].Today
              [Soil].Water.Volumetric
              [Soil].Swim3.Runoff
              [Soil].Swim3.Drainage
              [Soil].Swim3.Es
              [Soil].Swim3.Eo
              [Wheat].Leaf.LAI
              [Wheat].AboveGround.Wt
              [Wheat].Grain.Wt
              [Weather].Rain
              sum([Soil].NH4.kgha) as NH4
              sum([Soil].NO3.kgha) as NO3
              sum([Soil].Nutrient.DenitrifiedN) as dnit
              [Wheat].AboveGround.N
              [Wheat].BelowGround.N
              sum([Soil].Water.MM[5:9]) as SW110
              sum([Soil].Water.MM[10:14]) as SW210
              sum([Soil].Water.MM[15:19]) as SW310
              sum([Soil].CL.kgha[1:9]) as Cl110
              sum([Soil].CL.kgha[10:14]) as Cl210
              sum([Soil].CL.kgha[15:19]) as Cl310
          Soil: Latitude=0; Longitude=0
            Physical
              Thickness  BD   AirDry  LL15  DUL   SAT   KS
              100        1    0.1     0.24  0.47  0.53  240
              200        1.1  0.1     0.28  0.49  0.54  240
              200        1.1  0.1     0.28  0.52  0.57  120
              200        1.1  0.1     0.29  0.52  0.55  120
              200        1.1  0.1     0.29  0.51  0.54  120
              200        1.2  0.1     0.29  0.5   0.53  120
              200        1.2  0.1     0.29  0.5   0.53  120
              200        1.2  0.1     0.33  0.48  0.51  120
              200        1.2  0.1     0.33  0.48  0.51  60
              200        1.2  0.1     0.35  0.48  0.51  60
              200        1.2  0.1     0.35  0.47  0.5   60
              200        1.2  0.1     0.35  0.45  0.48  60
              200        1.3  0.1     0.35  0.45  0.48  60
              200        1.3  0.1     0.35  0.45  0.48  60
              200        1.3  0.1     0.35  0.45  0.48  60
              200        1.3  0.1     0.35  0.45  0.48  60
              SoilCrop WheatSoil
                LL=[0.25, 0.3, 0.3, 0.33, 0.33, 0.35, 0.35, 0.4, 0.4, 0.4, 0.4, 0.4, 0.4, 0.4, 0.4, 0.4]
                KL=[0.06, 0.06, 0.06, 0.06, 0.06, 0.06, 0.06, 0.06, 0.06, 0.06, 0, 0, 0, 0, 0, 0]
                XF=[1, 1, 1, 1, 1, 1, 1, 1, 1, 1, 0, 0, 0, 0, 0, 0]
            Organic: FOMCNRatio=40; CarbonUnits=Total
              Thickness  Carbon  SoilCNRatio  FBiom  FInert  FOM
              100        1.4     14.5         0.2    0.32    1.84299
              200        1.4     14.5         0.03   0.5     1.51868
              200        1.4     14.5         0.02   0.6     1.25144
              200        1.35    14.5         0.015  0.7     1.03122
              200        0.95    14.5         0.01   0.85    0.849759
              200        1       14.5         0.01   0.9     0.700227
              200        0.8     14.5         0.01   0.99    0.577008
              200        0.45    14.5         0.01   0.99    0.475472
              200        0.45    14.5         0.01   0.99    0.391803
              200        0.45    14.5         0.01   0.99    0.322858
              200        0.45    14.5         0.01   0.99    0.266044
              200        0.45    14.5         0.01   0.99    0.219228
              200        0.45    14.5         0.01   0.99    0.180651
              200        0.45    14.5         0.01   0.99    0.148862
              200        0.45    14.5         0.01   0.99    0.122667
              200        0.45    14.5         0.01   0.99    0.101081
            Chemical: PH=[6, 6.4, 6.8, 7.2, 7.6, 8, 8, 8, 8, 8, 8, 8, 8, 8, 8, 8]; PHUnits=Water
              Thickness=[100, 200, 200, 200, 200, 200, 200, 200, 200, 200, 200, 200, 200, 200, 200, 200]
            Water: RelativeTo=LL15; FilledFromTop=false
              Thickness=[100, 200, 200, 200, 200, 200, 200, 200, 200, 200, 200, 200, 200, 200, 200, 200]
              InitialValues=[0.434, 0.43, 0.48, 0.47, 0.46, 0.46, 0.46, 0.485, 0.49, 0.474, 0.457, 0.453, 0.447, 0.465, 0.457, 0.43]
            CERESSoilTemperature Temperature
            Swim3: Salb=0.13; CN2Bare=75; CNRed=20; CNCov=0.8; KDul=0.1; PSIDul=-100; VC=true; DTMin=0; DTMax=1440; MaxWaterIncrement=5; SpaceWeightingFactor=0; SoluteSpaceWeightingFactor=1; Dis=0; Disp=1; A=2; DTHC=0.1; DTHP=2; Diagnostics=true
            LayerStructure
              Thickness=[10, 20, 30, 40, 200, 200, 200, 200, 200, 200, 200, 200, 200, 200, 200, 200, 200, 200, 200]
            Solute CL: InitialValuesUnits=ppm; WaterTableConcentration=0; D0=0.05; DepthConstant=0; MaxDepthSoluteAccessible=0; RunoffEffectivenessAtMovingSolute=0; MaxEffectiveRunoff=0
              Thickness  InitialValues  Exco  FIP
              100        18             0     1
              200        13             0     1
              200        11             0     1
              200        11             0     1
              200        16             0     1
              200        28             0     1
              200        66             0     1
              200        122            0     1
              200        181            0     1
              200        232            0     1
              200        270            0     1
              200        292            0     1
              200        293            0     1
              200        270            0     1
              200        292            0     1
              200        293            0     1
            Nutrient
            Solute NO3: InitialValuesUnits=ppm; WaterTableConcentration=0; D0=0.05; DepthConstant=0; MaxDepthSoluteAccessible=0; RunoffEffectivenessAtMovingSolute=0; MaxEffectiveRunoff=0
              Thickness  InitialValues  Exco  FIP
              100        10.7           0     1
              200        9.99           0     1
              200        7.87           0     1
              200        6.2            0     1
              200        4.85           0     1
              200        3.56           0     1
              200        2.72           0     1
              200        2.34           0     1
              200        2.47           0     1
              200        3.24           0     1
              200        4.25           0     1
              200        4.94           0     1
              200        5.2            0     1
              200        4.95           0     1
              200        4.52           0     1
              200        4.24           0     1
            Solute NH4: InitialValuesUnits=ppm; WaterTableConcentration=0; D0=0.05; DepthConstant=0; MaxDepthSoluteAccessible=0; RunoffEffectivenessAtMovingSolute=0; MaxEffectiveRunoff=0
              Thickness  InitialValues  Exco  FIP
              100        0.3            1     1
              200        0.3            1     1
              200        0.3            1     1
              200        0.3            1     1
              200        0.3            1     1
              200        0.3            1     1
              200        0.3            1     1
              200        0.3            1     1
              200        0.3            1     1
              200        0.3            1     1
              200        0.3            1     1
              200        0.3            1     1
              200        0.3            1     1
              200        0.3            1     1
              200        0.3            1     1
              200        0.3            1     1
            Solute Urea: InitialValuesUnits=kg/ha; WaterTableConcentration=0; D0=0.05; DepthConstant=0; MaxDepthSoluteAccessible=0; RunoffEffectivenessAtMovingSolute=0; MaxEffectiveRunoff=0
              Thickness  InitialValues  Exco  FIP
              100        0              0     1
              200        0              0     1
              200        0              0     1
              200        0              0     1
              200        0              0     1
              200        0              0     1
              200        0              0     1
              200        0              0     1
              200        0              0     1
              200        0              0     1
              200        0              0     1
              200        0              0     1
              200        0              0     1
              200        0              0     1
              200        0              0     1
              200        0              0     1
          SurfaceOrganicMatter SurfaceOM: InitialResidueName=unknown; InitialResidueType=wheat; InitialResidueMass=0; InitialStandingFraction=1; InitialCPR=0; InitialCNR=100
          MicroClimate: a_interception=0; b_interception=1; c_interception=0; d_interception=0; SoilHeatFluxFraction=0.4; MinimumHeightDiffForNewLayer=0; NightInterceptionFraction=0.5; ReferenceHeight=2
          Fertiliser
          Plant Wheat
          Operations
            1994-08-05  [Wheat].Sow(population:26, cultivar:hartog, depth:40, rowSpacing:300);
            1994-08-05  [Fertiliser].Apply(70, Fertiliser.Types.NO3N, 50);
            1994-09-07  [Wheat].EndCrop();
            1994-10-27  [Wheat].Harvest();
            1995-06-01  [Wheat].Sow(cultivar:hartog, population:126, depth:40, rowSpacing:300);
            1995-06-01  [Fertiliser].Apply(80, Fertiliser.Types.NO3N, 50);
            1995-11-28  [Wheat].Harvest();
            1995-11-28  [Wheat].EndCrop();
            1996-07-02  [Wheat].Sow(cultivar:hartog, population:126, depth:40, rowSpacing:300);
            1996-07-02  [Fertiliser].Apply(101, Fertiliser.Types.NO3N, 50);
            1996-12-04  [Wheat].EndCrop();
            1997-06-02  [Wheat].Sow(cultivar:hartog, population:71, depth:40, rowSpacing:300);
            1997-06-02  [Fertiliser].Apply(100, Fertiliser.Types.NO3N, 50);
            1997-11-26  [Wheat].Harvest();
            1997-11-26  [Wheat].EndCrop();
            1998-06-18  [Wheat].Sow(cultivar:hartog, population:126, depth:40, rowSpacing:300);
            1998-06-18  [Fertiliser].Apply(102, Fertiliser.Types.NO3N, 50);
            1998-12-02  [Wheat].Harvest();
            1998-12-02  [Wheat].EndCrop();
            1999-06-23  [Wheat].Sow(cultivar:hartog, population:50, depth:40, rowSpacing:300);
            1999-06-23  [Fertiliser].Apply(102, Fertiliser.Types.NO3N, 50);
            1999-12-16  [Wheat].Harvest();
            1999-12-16  [Wheat].EndCrop();
          Irrigation
    Folder SeepageLysimeter
      Memo
        These simulations mimic the experimental work of Laura Buckthought done as part of her PhD (Buckthought 2014) and reported in Buckthought et al. (2015). Differring timings of urine depositions (none, 800 kg N /ha in autumn, 800 kg N /ha in spring) and amounts of fertiliser (0, 200 and 400 kg N /ha /year applied in eight applications) were used in a complete factorial experimnet with four replicates. A ryegrass - white clover pasture was grown in seepage lysimeters that contained intact cores of a Horotiu Silt Loam.

        The simulation mimics the experimental set up with standard values and components used. The exception to this was the inclusion of a Manager componed used to address known issues in the simulation of denitrification, mineralisation and nitrification in these high-organic matter allophanic soils in New Zealand's temperate regions. The quality of the C and N simulation is not the target of this test but the excessive denitrification was depressing plant growth so denitrification parameters were adjusted downwards.

        The primary results used here include the amount of pasture harvested and the amount of drainage measured from the lysimeters. Data on the leachoing of nitrate is included for reference. Drainage is slightly over-estimated ccompared to the measurements and it is highly likely that this is a result of the underestimation of pasture growth, which again is likely caused by the C and N simulation (leaching of N is too high).

        The fourth graph shows the reults of the water mass balance checks. Over the 18 months of the experiment a there was a gain of less than 0.002 mm of water which is considered to be acceptable.

        Buckthought, L. E. (2014). The interactive effects of nitrogen fertiliser and animal urine on nitrogen efficiency and losses in New Zealand dairy farming systems. A thesis submitted in partial fulfilment of the requirements for the Degree of Doctor of Philosophy at Lincoln University, New Zealand (http://hdl.handle.net/10182/5893, verified 23 July 2014).

        Buckthought, L. E., T. J. Clough, K. C. Cameron, H. J. Di and M. A. Shepherd (2015). Urine patch and fertiliser N interaction: Effects of fertiliser rate and season of urine application on nitrate leaching and pasture N uptake. Agriculture, Ecosystems & Environment 203: 19-28. http://dx.doi.org/10.1016/j.agee.2015.01.019
      Experiment SeepageLysimeterExperiment
        Factors FactorsFull
          Permutation
            Factor Fert: Specification=[TreatmentFertiliser].Script.FertLevel = 0,2,4
            Factor Urine: Specification=[TreatmentUrine].Script.UrineLevel = Autumn,Spring,None
        Simulation BaseBuckthought
          Weather: FileName=Lysimeter Exp.met
          Clock: Start=2010-12-15; End=2012-08-27
          Summary
          SoilArbitrator
          Forages
            Parameters:
              Name                          IsLive  DigestibilityString  FractionConsumable  MinimumAmount  UseDigestibilityFromModel
              SurfaceOrganicMatter.Residue  true    0                    0                   0              false
              SurfaceOrganicMatter.Residue  false   0                    0                   0              false
              AGPRyegrass.Leaf              true    0.7                  1                   100            false
              AGPRyegrass.Leaf              false   0.3                  1                   0              false
              AGPRyegrass.Stem              true    0.7                  1                   100            false
              AGPRyegrass.Stem              false   0.3                  1                   0              false
              AGPRyegrass.Stolon            true    0.7                  1                   100            false
              AGPRyegrass.Stolon            false   0.3                  1                   0              false
              AGPWhiteClover.Leaf           true    0.7                  1                   100            false
              AGPWhiteClover.Leaf           false   0.3                  1                   0              false
              AGPWhiteClover.Stem           true    0.7                  1                   100            false
              AGPWhiteClover.Stem           false   0.3                  1                   0              false
              AGPWhiteClover.Stolon         true    0.7                  1                   100            false
              AGPWhiteClover.Stolon         false   0.3                  1                   0              false
              AGPPaspalum.Leaf              true    0.7                  1                   100            false
              AGPPaspalum.Leaf              false   0.3                  1                   0              false
              AGPPaspalum.Stem              true    0.7                  1                   100            false
              AGPPaspalum.Stem              false   0.3                  1                   0              false
              AGPPaspalum.Stolon            true    0.7                  1                   100            false
              AGPPaspalum.Stolon            false   0.3                  1                   0              false
          MicroClimate: a_interception=0; b_interception=0; c_interception=0; d_interception=0; SoilHeatFluxFraction=0; MinimumHeightDiffForNewLayer=10000; NightInterceptionFraction=0; ReferenceHeight=2
          Zone Paddock: Area=1; Slope=0; AspectAngle=0; Altitude=50
            Manager SWIM3_SetLowerBC
              LowerBCType = seepage
              LowerBCValue = 700
```csharp
using Models.Climate;
using APSIM.Shared.Utilities;
using Models.Soils.Nutrients;
using Models.Soils;
using Models.PMF;
using Models.Core;
using System.Xml.Serialization;
using System;
using Models.AgPasture;
using Models.Interfaces;

namespace Models
{
    [Serializable] 
    [System.Xml.Serialization.XmlInclude(typeof(Model))]
    public class Script : Model
    {
        [Link] Clock clock;
        [Link] ISummary summary;
        [Link] private Swim3 swim;
        //[Link] private PastureSpecies ryegrass;
        //[Link] private SimpleGrazing grazing;
        
        public enum LowerBCTypeOptions {gradient,seepage,potential};

        [Separator("Sets the lower boundary condition type (and value if set to 'potential' for SWIM3. The change is applied at the beginning of the first day of the simulation.")]
        
        [Description("What lower boundary condition is wanted?")] public LowerBCTypeOptions LowerBCType { get; set; }


        [Display(VisibleCallback = "IsBCPotential")]
        [Description("What should the lower BC potential be set to (should be positive for a watertable) (mm)?")] public double LowerBCValue { get; set; }
        
		public bool IsBCPotential => LowerBCType == LowerBCTypeOptions.potential;





        public double SoilWaterStart  { get; set; }
        public double SoilWaterEnd  { get; set; }

        [EventSubscribe("DoDailyInitialisation")]
        private void DoDailyInitialisation(object sender, EventArgs e)
        {
        }

        [EventSubscribe("DoReportCalculations")]
        private void DoReportCalculations(object sender, EventArgs e)
        {
        }

        [EventSubscribe("DoManagement")]
        private void DoDailyCalculations(object sender, EventArgs e)
        {
            if (clock.Today == clock.StartDate)
            {
                summary.WriteMessage(this, "Script is setting lower boundary condition to " + LowerBCType, MessageType.Diagnostic);
                if (LowerBCType == LowerBCTypeOptions.gradient)
                    swim.SetLowerBCForGradient(bbcGradient: 0.0);   // in cm/cm (ibbc=0) Note that this is the default setting
                else if (LowerBCType == LowerBCTypeOptions.potential)
                    swim.SetLowerBCForGivenPotential(bbcPotential: LowerBCValue /10.0 );    //  convert to cm (ibbc=1), DUL is -100 cm so values more positive will often result in inflow to the bottom of the soil profile. Input in mm so divide here.
                else if (LowerBCType == LowerBCTypeOptions.seepage)
                    swim.SetLowerBCForSeepage(bbcPotentialSeepage: 0.0);  // in cm (ibbc=3). This is for zero-tension lysimeters
                else
                	throw new Exception("Wrong lower boundary condition type");
            }
        }
    }
}
```
            Manager nh3_volatilisation (disabled)
              Depth_for_NH3 = 50
              Soil_pH_base = 5.7 5.7 5.7 5.3 5.3 5.9 5.9 5.9 6.6 6.6 6.7 6.7 6.7 6.7
              CEC_strng = 28.2 28.2 28.2 21 21 17.3 17.3 17.3 12 12 12.9 12.9 12.9 12.9
              k_BC = 0.03
              k_pH_hyd = 1
              k_pH_nit = 1
              k_pH_x = 0.2
              k_AFPV = 300
              f_NV_strng = 1 1 1 0.3 0
              f_AV = 0.5
              CritRain1 = 3
```csharp
using Models.Climate;
using APSIM.Shared.Utilities;
using Models.Soils.Nutrients;
using Models.Soils;
using Models.Soils.SoilTemp;
using Models.PMF;
using Models.Core;
using System.Xml.Serialization;
using System;
using Models.AgPasture;
using Models.Interfaces;
using System.Diagnostics;

// This module estimate the amount of NH3 in the soil and its volatilisation

// -->  Last uptaded in: 12/Jul/2011 ..................


namespace Models
{
    [Serializable] 
    [System.Xml.Serialization.XmlInclude(typeof(Model))]
    public class Script : Model
    {
		[Link]
		private IWeather weather;
		
		[Link]
		private ISoilWater waterBalance;
		 
		[Link]
		private Irrigation irrigation;

		[Link]
		private Nutrient nutrient;

		[Link]
		private Swim3 swim;

		[Link]
		private NFlow hydrolysis;

		[Link]
		private NFlow nitrification;		

		[Link]
		private ISolute nh4;
				
		[Link]
		private Physical physical;

		[Link]
		private Chemical chemical;

		[Link(IsOptional=true)]
		private SoilTemperature soilTemperature;
		
		[Link(IsOptional=true)]
		private CERESSoilTemperature ceresSoilTemperature;
		
	    // Parameter variables:
	    [Separator("NH3 volatilisation parameters")]
    	[Description("Depth to which NH3 volatilisation is considered (mm):")]
    	public double Depth_for_NH3 { get; set; }
    
    	[Separator("Base soil and pH change parameters")]            
    	[Description("The base soil pH for each soil layer:")]
    	public string Soil_pH_base { get; set; }             // The base soil pH, apsim will try to keep to this value, same for all layers
    	[Description("The CEC for each layer (meq/100g)")] 
    	public string CEC_strng { get; set; }           // The CEC for each layer (meq/100g)
    	[Description("Soil buffer capacity factor")] 
    	public double k_BC { get; set; }                    // Soil buffer capacity factor ()
    	[Description("Factor to convert urea hydrolysed into H+ changes")] 
    	public double k_pH_hyd { get; set; }                 // Factor to convert urea hydrolysed into H+ changes ()
    	[Description("Factor to convert NH4 nitrified into H+ changes")] 
    	public double k_pH_nit { get; set; }                 // Factor to convert NH4 nitrified into H+ changes ()
    	[Description("Minimum decrease for pH (fraction/day)")] 
    	public double k_pH_x { get; set; }                   // Minimum decrease for pH (fraction/day)
    	
    	[Separator("Gas exchange parameters")]
    	[Description("Factor for soil/atmosphere gas exchange (AFPV/mm):")] 
    	public double k_AFPV { get; set; }                   // Factor to transform potential evaporation in air filled pore volumes that are potential exchanged with to atmosphere
    	[Description("Fractor for volatilisable NH3, per soil layer (0-1):")] 
    	public string f_NV_strng { get; set; }               // The fraction of potential NH3 volatilisation for each layer that is transpoted to the soil surface ()

		[Separator("Additional limits for volatilisation")]
    	[Description("Fraction of total soil NH4 that can be volatilised per day:")] 
    	public double f_AV { get; set; }                     // Fraction of total soil NH4 that can be volatilised per day, limits volatilisation and ensure mass balance ()
    	[Description("Rain+irrigation below which volatilisation is not limited (mm):")] 
    	public double CritRain1 { get; set; }                // Critial rainfall. Below this volatilisation is not limited by rainfall or irrigation
    	[Description("Rain+irrigation above which no volatilisation occur (mm):")] 
    	private double CritRain2 { get; set; }                // Critial rainfall. Above this no volatilisation occurs
		
    	// Output variables
	    [Units("ppm")]
	    public double[] nh3ppm { get; set; }  // The estimated amount of NH3 in the soil (ppm)

	    [Units("kgN/ha")]
	    public double[] nh3 { get; set; }               // The estimated amount of NH3 in the soil (kg/ha)
	    
	    [Units("g/ha")]
	    public double[] nh3_gas { get; set; }             // The estimated amount of NH3 in the soil in gaseous form (g/ha)
    
    	[Units("kgN/ha")]
	    public double[] emission_nh3 { get; set; }      // The estimated amount of NH3 volatilised (kg/ha/day)
    
    	[Units("")]
	    public double[] SoilpH { get; set; }                 // dummy soil pH
    
    	[Units("kgN/ha")]
	    public double[] nh4_sol { get; set; }           // The amount of NH4 in the soil solution (kg/ha)   
    
    	[Units("oC")]
	    public double[] SoilTemp { get; set; }              // The soil temperature (oC)

    	[Units("AFPV/day")]
	    public double PotGasExchangeNH { get; set; }  // The potential soil-atmosphere gas exchange (Air-filled-pore-spaces/day)
    
        [Units("L/m2/day")]
    	public double[] GasExchangeNH { get; set; }   // The volume of gas exchanged (L/m2/day)
    	
    	[Units("L/m2")]
	    public double[] AirFilledPoreVolume { get; set; } // The volume of air filled pore space in each soil layer (L_air/m2)
    
    	[Units("")]
	    public double[] NH3toNHx_ratio { get; set; }          // The ratio between NH3 and NHx in the soil solution
    
    	[Units("x1000")]
	    public double[] NH3GtoNH3A_ratio { get; set; }   // The ratio between NH3 liquide and gas in the soil, times 1000
    
	    [Units("")]
	    public double[] pK_NHx { get; set; }                  // The equilibrium constant for NH4-NH3
    	
    	[Units("")]
    	public double[] pG_NH3 { get; set; }                  // The equilibrium constant for NH3A-NH3G

    	// Internal variables
    	private int NH3_z;                           // The layer to consider NH3 volatilization
    	private double[] f_NV;                           // The fraction of NH3 transport from each layer
    	private double[] Ini_SoilpH;                     // The initial, or base, soil pH
    	private double[] SoilCEC;                        // The CEC (mol/kg)

    	[EventSubscribe("StartOfSimulation")]
        private void OnStartOfSimulation(object sender, EventArgs e)
    	{
    	//Debugger.Break();
        	SoilpH = new double[waterBalance.Thickness.Length];
        	Ini_SoilpH = new double[waterBalance.Thickness.Length];

        	// Split the read values of f_NV into an array
        	f_NV = makeArray(f_NV_strng);
        	// Split the read values of pH into an array
        	Ini_SoilpH = makeArray(Soil_pH_base);
        	// Split the read values of CEC into an array
        	SoilCEC = makeArray(CEC_strng);
        	var oldIni_SoilpH = Ini_SoilpH;
        	Ini_SoilpH = new double[waterBalance.Thickness.Length];
        	if (oldIni_SoilpH != null)
	            Array.Copy(oldIni_SoilpH, Ini_SoilpH, Math.Min(waterBalance.Thickness.Length, oldIni_SoilpH.Length));
        	var oldSoilCEC = SoilCEC;
        	SoilCEC = new double[waterBalance.Thickness.Length];
        	if (oldSoilCEC != null)
	            Array.Copy(oldSoilCEC, SoilCEC, Math.Min(waterBalance.Thickness.Length, oldSoilCEC.Length));
        	// Assign initial pH values and convert CEC from meq to mol
        	for (int z = 0; z < waterBalance.Thickness.Length; z++)
        	{
	            Ini_SoilpH[z] = Math.Max(0, Ini_SoilpH[z]);
            	SoilpH[z] = Ini_SoilpH[z];
            	SoilCEC[z] = 0.01 * Math.Max(0.1, SoilCEC[z]);     // mol/kg
        	}
	
        	// Identify the layer down to which volatilization is considered
        	double Depth_from_surface = 0;
        	for (int z = 0; z < waterBalance.Thickness.Length; z++)
        	{
	            Depth_from_surface = Depth_from_surface + waterBalance.Thickness[z];
            	if (Depth_from_surface <= Depth_for_NH3)
	                NH3_z = z;
            	else
	                z = waterBalance.Thickness.Length;
        	}

	        // verify the bounds of the pH converting factor
        	k_pH_hyd = Math.Min(1, Math.Max(0, k_pH_hyd));
        	k_pH_nit = Math.Min(1, Math.Max(0, k_pH_nit));
        	k_pH_x = Math.Min(1, Math.Max(0, k_pH_x));
        	k_BC = Math.Max(0, k_BC);
        	var oldF_NV = f_NV;
        	f_NV = new double[waterBalance.Thickness.Length];
        	if (oldF_NV != null)
	            Array.Copy(oldF_NV, f_NV, Math.Min(waterBalance.Thickness.Length, oldF_NV.Length));
        	for (int z = 0; z < waterBalance.Thickness.Length; z++)
	            f_NV[z] = Math.Min(1, Math.Max(0, f_NV[z]));
	
        	// ----------- NH3 volatilization ---------------------------------------------------
        	Console.WriteLine("");
        	Console.WriteLine("Volatilization will be calculated by manager");
        	Console.WriteLine("   Top " + Depth_for_NH3.ToString() + "mm are considered,");
        	Console.WriteLine("   pH variation is mimicked by dlt_urea_hydrol + dlt_nh4_nitrif");
        	Console.WriteLine("");
    	}

        [EventSubscribe("DoManagementCalculations")]
        private void DoManagementCalculations(object sender, EventArgs e)
        {
            double urea_hydrol;                    // The amount of urea hydrolised (mol/L)
            double nh4_nitrif;                     // The amount of NH4 nitrified (mol/L)
            double dlt_H;                          // Estimated variation of H+ in the soil (mol/L)
            double delta_pH_Hyd = 0;               // Variation in soil pH due to urea hydrolysis
            double delta_pH_Nit = 0;               // Variation in soil pH due to NH4 nitrification
            double delta_pH_x = 0;                 // Minimum decrease in soil pH, to ensure pH returns to base after urea deposition
            double delta_pH_vol = 0;               // Variatin in pH due to volatilisation
            double Beta = 1;                       // The soil buffer capacity ()
            double[] delta_nh4 = new double[waterBalance.Thickness.Length];   // The variation in NH4 content due to volatilisation (kg/ha)
            double RainFactor = 1.0;               // The rain factor
    
            if (ceresSoilTemperature == null)  // to get the soil temperature from SoilTemp, otherwise use SoilN's:
                SoilTemp = soilTemperature.AverageSoilTemp;
            else
                SoilTemp = ceresSoilTemperature.Value;
    
            nh3ppm = new double[waterBalance.Thickness.Length];
            nh4_sol = new double[waterBalance.Thickness.Length];
            nh3 = new double[waterBalance.Thickness.Length];
            nh3_gas = new double[waterBalance.Thickness.Length];
            emission_nh3 = new double[waterBalance.Thickness.Length];
            GasExchangeNH = new double[waterBalance.Thickness.Length];
            AirFilledPoreVolume = new double[waterBalance.Thickness.Length];
            NH3toNHx_ratio = new double[waterBalance.Thickness.Length];
            NH3GtoNH3A_ratio = new double[waterBalance.Thickness.Length];
            pK_NHx = new double[waterBalance.Thickness.Length];
            pG_NH3 = new double[waterBalance.Thickness.Length];
    
            // Calc the irrigation factor
            if (weather.Rain + irrigation.IrrigationApplied < CritRain1)
                RainFactor = 1.0;
            else if (weather.Rain + irrigation.IrrigationApplied > CritRain2)
                RainFactor = 0.0;
            else
                RainFactor = (weather.Rain + irrigation.IrrigationApplied - CritRain1) / (double)(CritRain2 - CritRain1);
    
            // +++++++++++++++++++++++++++++++++++++++++++++++++++++++++++++++++++++++++++++++++++++++++++++++++++++++++++++++++++++++++++
            // NOTES:
            // The RainFactor accounts for the downwards transport of NH3 gas when water from rain or irrigation is being drained throught the soil.
            // Below RainCrit1, precipitation has no effect, above RainCrit2 volatilisation is zero.  A linear relationship is used between
            // these two limits:
            // 
            // |
            // F   1+                /-----------
            // R a    |               /:
            // a c    |              / :
            // i t    |             /  :
            // n o    |            /   :
            // r    |           /    :
            // |          /     :
            // |         /      :
            // 0+========+-------+--------------> Rain + Irrigation
            // |      Rain    Rain
            // Crit1   Crit2
            // +++++++++++++++++++++++++++++++++++++++++++++++++++++++++++++++++++++++++++++++++++++++++++++++++++++++++++++++++++++++++++
    
    		double[] dlt_urea_hydrol = hydrolysis.Value;
    		double[] dlt_rntrf = nitrification.Value;
    		double[] conc_water_nh4 = swim.ConcWaterNH4;
            for (int z = 0; z < waterBalance.Thickness.Length; z++)
            {
    
                // 0-Compute the value of Beta
                Beta = k_BC * physical.BD[z] * SoilCEC[z] / (double)waterBalance.SW[z];
    
                // 1-Compute the consumption of H+ by urea hydrolysis
                urea_hydrol = dlt_urea_hydrol[z] / (double)(waterBalance.Thickness[z] * 10000);   // kg_urea_N/L_soil
                urea_hydrol = urea_hydrol * 1000 / (double)waterBalance.SW[z];                 // g_urea_N/L_water
                urea_hydrol = urea_hydrol / 14.00674;                     // mol_urea_N/L_water  - All N pools as expresseed in kg_N, so molecular mass is 14
                dlt_H = -2 * urea_hydrol * k_pH_hyd;                      // mol/L
    
                // 2-Compute changes in soil pH due to urea hydrolysis
                if (dlt_H < 0)
                    delta_pH_Hyd = (14 / (1 + ((14 - SoilpH[z]) / (double)SoilpH[z]) * Math.Pow(10, (dlt_H / (double)Beta)))) - SoilpH[z];
                else
                    delta_pH_Hyd = 0;
                SoilpH[z] = SoilpH[z] + delta_pH_Hyd;
    
                // 3-Compute the production of H+ by nitrification and its effect on soil pH
                nh4_nitrif = dlt_rntrf[z] / (double)(waterBalance.Thickness[z] * 10000);          // kg_nh4_N/L_soil
                nh4_nitrif = nh4_nitrif * 1000 / (double)waterBalance.SW[z];                   // g_nh4_N/L_water
                nh4_nitrif = nh4_nitrif / 14.0067;                        // mol_nh4_N/L_water  - All N pools as expresseed in kg_N, so molecular mass is 14
                dlt_H = 2 * nh4_nitrif * k_pH_nit;                        // mol/L
                if (dlt_H > 0)
                    delta_pH_Nit = (14 / (1 + ((14 - SoilpH[z]) / (double)SoilpH[z]) * Math.Pow(10, (dlt_H / (double)Beta)))) - SoilpH[z];
                else
                    delta_pH_Nit = 0;
    
                // 4-Compute soil forced pH change - this is to ensure pH will decline to its base value
                if (SoilpH[z] > Ini_SoilpH[z])
                    delta_pH_x = -(SoilpH[z] - Ini_SoilpH[z]) * k_pH_x;
                else
                    delta_pH_x = 0;
                SoilpH[z] = SoilpH[z] + Math.Min(delta_pH_Nit, delta_pH_x);
    
                // 5-bound pH between base and 14
                SoilpH[z] = Math.Min(14, Math.Max(Ini_SoilpH[z], SoilpH[z]));
    
    
                // +++++++++++++++++++++++++++++++++++++++++++++++++++++++++++++++++++++++++++++++++++++++++++++++++++++++++++++++++++++++++++
                // NOTES:
                // The changes in pH are due to the consumption of H+ as urea is hydrolysed or the production of H+ by nitrification,
                // in theory for each mol of N hydrolised two mols of H+ are consumed, while two mols are produced by nitrification;
                // The k_pH_nit ad k_pH_hyd factors allow to control the extent that H+ is affected by hydrolysis and nitrification,
                // when set to zero there's no effect, while setting it to one causes full theoretical effect
                // The parameter Beta describes the soil buffer capacity, which is a function of CEC, k_BC is used for adjusting the relationship.
                // k_pH_x stablish a minimum rate for pH decay, it mimicks soil buffering and other reactions that bring pH down
                // after urea/urine deposition. Used when nitrification is not enough to bring the pH down.
                // +++++++++++++++++++++++++++++++++++++++++++++++++++++++++++++++++++++++++++++++++++++++++++++++++++++++++++++++++++++++++++
    
    
                // 6-compute the NH3 equilibrium factors
                pK_NHx[z] = pK("aq", SoilTemp[z] + 273.15);      // Aqueous equilibrium [NH4 <--> NH3]
                pG_NH3[z] = pK("gs", SoilTemp[z] + 273.15);      // Gaseous equilibrium [NH3_liquid <--> NH3_gas]
    
                // 7-Calc the proportion of total NHx that is in the form of NH3
                double NH3toNHx = 1 / (1 + Math.Pow(10, (pK_NHx[z] - SoilpH[z])));
                NH3toNHx_ratio[z] = NH3toNHx;
    
                // 8-Calc the amount of NH3 in aqueous solution (original equation uses mol/L, thus the ratio of molecular mass is needed)
                nh3ppm[z] = conc_water_nh4[z] * NH3toNHx * (17.03 / 18.04);      // ppm (ug/cm3_water)
    
                // 9-Calc the proportion of total NH3 that is in the gaseous form
                double NH3GtoNH3A = 1 / (1 + Math.Pow(10, (pG_NH3[z])));
                NH3GtoNH3A_ratio[z] = NH3GtoNH3A * 1000;
    
                // 10-Calc the amount of NH3 in gaseous form
                nh3_gas[z] = nh3ppm[z] * NH3GtoNH3A;                   // ppm (ug/cm3_air in soil = mg/L)
    
                // 11-Calc the amount of NH3 in gaseous form and the amount effectivelly lost by volatilization
                PotGasExchangeNH = waterBalance.Eo * k_AFPV;   // air filled pore volumes/day
                AirFilledPoreVolume[z] = (physical.SAT[z] - waterBalance.SW[z]) * waterBalance.Thickness[z];    // L_air/m2
                if (z <= NH3_z)
                {
                    GasExchangeNH[z] = PotGasExchangeNH * AirFilledPoreVolume[z];      // L_air/m2/day
                    GasExchangeNH[z] = GasExchangeNH[z] * RainFactor;
                    if (GasExchangeNH[z] > 0)
                    {
                        emission_nh3[z] = nh3_gas[z] * GasExchangeNH[z] * f_NV[z];      // mg/m2
                        emission_nh3[z] = emission_nh3[z] * 10E+4;                      // mg/ha
                        emission_nh3[z] = emission_nh3[z] * 10E-6;                      // kg/ha
                    }
                    else
                        emission_nh3[z] = 0;
                    // Limit volatilisation to a fraction of NH4 for each layer
                    emission_nh3[z] = Math.Min(emission_nh3[z], f_AV * nh4.ppm[z]);
                }
                else
                {
                    GasExchangeNH[z] = 0;
                    emission_nh3[z] = 0;
                }
    
    
                // +++++++++++++++++++++++++++++++++++++++++++++++++++++++++++++++++++++++++++++++++++++++++++++++++++++++++++++++++++++++++++
                // NOTES:
                // To estimate the amount of NH3 volatilised during the day, it is assumed that the amount of NH3 in gaseous form in the
                // beginning of the day represents well the proportion of NHx 'volatilisable'. It is assumed also that the potential evaporation
                // is a good estimator for the gas exchange between soil and atmosphere (this makes volatilisation sensible to temperature and
                // wind).  By scaling the gas exchange to the air filled pore space in the soil, we get volatilisation also sensible to water
                // content, which mimicks the decrease in gas transport when the soil is wet.  Finally a factor (f_NV) is used to limit the
                // contribution of each soil layer to the overall volatilisation (deep layers would volatilise less because NH3 needs to move
                // transport to the surface.
                // +++++++++++++++++++++++++++++++++++++++++++++++++++++++++++++++++++++++++++++++++++++++++++++++++++++++++++++++++++++++++++
    
    
                // 12-Compute soil pH change due to volatilisation
                double emission_nh3ised = emission_nh3[z] / (double)(waterBalance.Thickness[z] * 10000);  // kg_nh3_N/L_soil
                emission_nh3ised = emission_nh3ised * 1000 / (double)waterBalance.SW[z];                      // g_nh3_N/L_water
                emission_nh3ised = emission_nh3ised / 14.0067;                           // mol_nh3_N/L_water  - All N pools as expresseed in kg_N, so molecular mass is 14
                dlt_H = emission_nh3ised;                                                // mol/L
                if (dlt_H > 0)
                    delta_pH_vol = (14 / (1 + ((14 - SoilpH[z]) / (double)SoilpH[z]) * Math.Pow(10, (dlt_H / (double)Beta)))) - SoilpH[z];
                else
                    delta_pH_vol = 0;
    
                // 13- Calc new pH and bound it between base and 14
                SoilpH[z] = SoilpH[z] + delta_pH_vol;
                SoilpH[z] = Math.Min(14, Math.Max(Ini_SoilpH[z], SoilpH[z]));
    
                // 14-Transform variables to publishable units
                nh3[z] = nh3ppm[z] * waterBalance.SW[z] / (double)1000;                     // mg/cm3_soil = g/L_soil
                nh3[z] = nh3[z] * waterBalance.Thickness[z] * 10000;                   // g/ha_soil
                nh3[z] = nh3[z] / (double)1000;                                // kg/ha
    
                nh3_gas[z] = nh3_gas[z] * (physical.SAT[z] - waterBalance.SW[z]) / (double)1000;     // mg/cm3_soil = g/L_soil
                nh3_gas[z] = nh3_gas[z] * waterBalance.Thickness[z] * 10000;           // g/ha_soil
    
                nh4_sol[z] = conc_water_nh4[z] * waterBalance.SW[z] / (double)1000;         // mg/cm3_soil = g/L_soil
                nh4_sol[z] = nh4_sol[z] * waterBalance.Thickness[z] * 10000;           // g/ha_soil
                nh4_sol[z] = nh4_sol[z] / (double)1000;                        // kg/ha
    
                // Compute the delta in nh4 amount
                delta_nh4[z] = -emission_nh3[z];
            }
            
            nh4.AddKgHaDelta(SoluteSetterType.Other, delta_nh4);
   
        }



    	public double[] makeArray(string ArrayString)
    	{

	        // Get the string with values from the user interface and put the values in an numeric array

        	string[] MyArray_string;
        	double[] MyArray_single;
        	char[] Separator = " ".ToCharArray();

        	// 1-Split string into array
        	MyArray_string = ArrayString.Split(Separator, StringSplitOptions.RemoveEmptyEntries);

        	// 2-convert array into type single
        	MyArray_single = new double[MyArray_string.Length - 1 + 1];
        	for (int i = 0; i <= MyArray_single.Length - 1; i++)
	            MyArray_single[i] = Convert.ToDouble(MyArray_string[i]);
        	return MyArray_single;
    	}

	    public double pK(string n_species, double Temp)
    	{

	        // Calculates the equilibrium constants, 
        	// if 'aq' then nh4-nh3 equilibrium in water
        	// if 'gs' then gas-liquid equilibrium for nh3

	        double[] a_pK = new[] { 0.09018, -1.69 };
        	double[] b_pK = new[] { 2729.92, 1477.7 };
        	int sp = 0;

        	if (n_species == "aq")
	            sp = 0;
        	else if (n_species == "gs")
            	sp = 1;
        	return a_pK[sp] + b_pK[sp] / Temp;
    	}
    
	}
}
```
            Manager TreatmentUrine
              UrineLevel = None
              AutumnUrinePatch_date_str = 2011-05-04
              SpringUrinePatch_date_str = 2011-08-31
              Urine_Water_to_add = 10
              Urine_N_to_add = 800
              Depth_for_urine = 150
```csharp
using Models.Climate;
using APSIM.Shared.Utilities;
using Models.Soils.Nutrients;
using Models.Soils;
using Models.PMF;
using Models.Core;
using System.Xml.Serialization;
using System;
using Models.AgPasture;
using Models.Interfaces;
using System.Diagnostics;

namespace Models
{
    [Serializable] 
    [System.Xml.Serialization.XmlInclude(typeof(Model))]
    public class Script : Model
    {
    
    	//<Link()> Dim MyPaddock As Paddock
   		[Link] Swim3 swim;
   		[Link] Nutrient nutrient;
   		[Link] Clock clock;
   		[Link] ISoilWater waterBalance;

   		// Parameter variables:
   		[Description("Date that autumn urine is applied")]
   		public string AutumnUrinePatch_date_str { get; set;}
   		
   		[Description("Date that spring urine is applied")]
   		public string SpringUrinePatch_date_str { get; set;}

  		[Description("The amount of urine as a depth of water (mm):")]
   		[Units("mm")]
  		public double Urine_Water_to_add { get; set;}
  		
   		[Description("Amount of N in the urine (kg/ha):")]
   		[Units("kgN/ha")]
   		public double Urine_N_to_add { get; set;}
   		
  		//[Description("Type the amount of Br to apply (kg/ha):")]
   		//[Units("kg/ha")] 
   		//public double Br_to_add { get; set;}
   
  		[Description("The depth reached by urine (mm):")]
   		public double Depth_for_urine { get; set;}
   
   		public enum UrineLevelOptions { None, Autumn, Spring }
   		
   		// Variables read from other modules
	    [Description("The urine level:")]
   		public UrineLevelOptions UrineLevel {get; set; }    

		// Output variables
		private double Urine;        // Amount of urine applied today
   		private DateTime UrinePatch_date;

   		// Internal variables
   		private DateTime AutumnUrinePatch_date;
   		private DateTime SpringUrinePatch_date;
   		private DateTime AppDate;             // The date when urine applications start (in date format)
   		private DateTime Today;               // The date of today (in date format)
   		private double[] Urine_prop;          // The potential proportion of urine for each soil layer
   		private double[] Urine_prop_cum;      // The potential proportion of urine for each soil layer
   		private double SoilDepth;             // The soil depth (mm)
   		private bool Add_Urine;

		[EventSubscribe("StartOfSimulation")]
        private void OnStartOfSimulation(object sender, EventArgs e)
		{
			//Debugger.Break();
			
      		// Put the dates into date format:
      		AutumnUrinePatch_date = DateTime.Parse(AutumnUrinePatch_date_str);
      		SpringUrinePatch_date = DateTime.Parse(SpringUrinePatch_date_str);
      	
	      	if (UrineLevel == UrineLevelOptions.None)
	         	UrinePatch_date = new DateTime(3000, 12, 31);    // ie - not within this simulation
      		else if (UrineLevel == UrineLevelOptions.Autumn)
         		UrinePatch_date = AutumnUrinePatch_date; 
      		else if (UrineLevel == UrineLevelOptions.Spring)
         		UrinePatch_date = SpringUrinePatch_date; 
      		else
         		throw new Exception("Incorrect urine date information");

      		Urine_prop = new double[waterBalance.Thickness.Length];
  		    Urine_prop_cum = new double[waterBalance.Thickness.Length];
  
      		SoilDepth = 0.0;
      		for (int z = 0; z < waterBalance.Thickness.Length; z++)
      		{
	        	if (SoilDepth <= Depth_for_urine)   // this is at start depth
           			Urine_prop[z] = waterBalance.Thickness[z] / Depth_for_urine;
         		else
            		Urine_prop[z] = 0.0;
         
         		SoilDepth += waterBalance.Thickness[z];   // no updated to end current depth
         
         		if (z == 0)
            		Urine_prop_cum[z] = Urine_prop[z];
         		else
            		Urine_prop_cum[z] = Urine_prop[z] + Urine_prop_cum[z - 1];

         		if (Urine_prop_cum[z] <= 1.0)
         		{
            		// do nothing
            	}
         		else
         		{
            		Urine_prop[z] = Math.Max(0.0, 1.0 - Urine_prop_cum[z - 1]);
            		Urine_prop_cum[z] = Urine_prop[z] + Urine_prop_cum[z - 1];
         		}
      		}
    	}
    	
		[EventSubscribe("DoManagement")]
        private void OnDoManagement(object sender, EventArgs e)
      	{
      		Urine = 0.0;
   
	      	Add_Urine = clock.Today == UrinePatch_date;
      
      		if (Add_Urine)
      		{
         		double[] Ini_swdep = waterBalance.SWmm;
         		double[] Ini_urea  = nutrient.Urea.kgha;

		        Urine = Urine_N_to_add;

         		double[] New_swdep = new double[waterBalance.Thickness.Length];         
         		double[] New_urea = new double[waterBalance.Thickness.Length];

		        for (int z = 0; z < waterBalance.Thickness.Length; z++)
		        {
            		New_swdep[z] = Ini_swdep[z] + Urine_prop[z] * Urine_Water_to_add;
            		New_urea[z] = Ini_urea[z] + Urine_prop[z] * Urine_N_to_add;
            	}
	         
		        nutrient.Urea.SetKgHa(SoluteSetterType.Other, New_urea);
      		}
      	}
	}
}
```
            Manager TreatmentFertiliser
              FertDates_str = 21-feb-2011 28-mar-2011 04-may-2011 31-may-2011 31-aug-2011 29-sep-2011 7-nov-2011 5-dec-2011 28-feb-2012 30-mar-2012 30-apr-2012 31-may-2012
```csharp
using Models.Climate;
using APSIM.Shared.Utilities;
using Models.Soils.Nutrients;
using Models.Soils;
using Models.PMF;
using Models.Core;
using System.Xml.Serialization;
using System;
using Models.AgPasture;
using Models.Interfaces;
using System.Linq;

namespace Models
{
	// This module estimate the amount of NH3 in the soil and its volatilisation
    [Serializable] 
    [System.Xml.Serialization.XmlInclude(typeof(Model))]
    public class Script : Model
    {

	    [Link]
    	private Fertiliser fertiliser;

  	    [Link]
    	private Clock clock;

	    [Description("Dates for fertiliser applications:")]
    	public string FertDates_str { get; set; }
    
	    public int FertLevel { get; set; }
    	
    
	    private double FertAmt;
    	private string[] FertDates_strArr;
	    private DateTime[] FertDates;
	    private bool Add_fert;

		[EventSubscribe("StartOfSimulation")]
        private void OnStartOfSimulation(object sender, EventArgs e)
		{

        	if (FertLevel == 0)
	            FertAmt = 0.0;
        	else if (FertLevel == 2)
        	    FertAmt = 25.0;
        	else if (FertLevel == 4)
        	    FertAmt = 50.0;
        	else
        	    throw new Exception("Incorrect fertilser level information");

        	FertDates_strArr = makeArray(FertDates_str);
        	FertDates = new DateTime[FertDates_strArr.Length];
        	for (int i = 0, loopTo = FertDates_strArr.Length - 1; i <= loopTo; i++)
            	FertDates[i] = DateTime.Parse(FertDates_strArr[i]);
    	}

	    [EventSubscribe("DoManagement")]
        private void OnDoManagement(object sender, EventArgs e)
	    {
	        Add_fert = false;
	        for (int i = 0, loopTo = FertDates.Length - 1; i <= loopTo; i++)
	        {
	            if (clock.Today == FertDates[i])
	            {
	                Add_fert = true;
	                fertiliser.Apply(FertAmt, Fertiliser.Types.UreaN, Depth:5.0);
	            }
	        }
	    }

    	public string[] makeArray(string ArrayString)
    	{
        	string[] MyArray_string;
        	// Dim MyArray_single As String()
        	char[] Separator = " ".ToCharArray();

        	// 1-Split string into array
        	MyArray_string = ArrayString.Split(Separator, StringSplitOptions.RemoveEmptyEntries);

        	// '2-convert array into type single
        	// ReDim MyArray_single(MyArray_string.Length - 1)      
        	// For i As Integer = 0 To MyArray_single.length - 1
        	// MyArray_single(i) = MyArray_string(i)
        	// Next
        	return MyArray_string;
    	}
	}
}
```
            Manager TempAddressCarbonAndNitrogenIssues
```csharp
using Models.Climate;
using APSIM.Shared.Utilities;
using Models.Soils.Nutrients;
using Models.Soils;
using Models.PMF;
using Models.Core;
using System.Xml.Serialization;
using System;
using Models.AgPasture;
using Models.Interfaces;
using System.Linq;
using Models.Functions;
using System.Diagnostics;

namespace Models
{
    [Serializable] 
    [System.Xml.Serialization.XmlInclude(typeof(Model))]
    public class Script : Model
    {
        [Link] Clock clock;
        [Link] ISummary summary;
        [Link] IWeather weather;
        [Link] Irrigation irrigation;
        [Link] private ISoilWater waterBalance;
        [Link] private IPlant[] plants;
        [Link(ByName=true)] PastureSpecies AGPRyegrass;
        //[Link(ByName=true)] PastureSpecies AGPWhiteClover;
        [Link] private Swim3 Swim;
       // [Link(ByName=true)] private NutrientPool NO3; 


        //[Description("Winter white clover generic growth limiting factor; default = 1")]
        //public double WinterWhiteGlfGeneric { get; set; }



        [EventSubscribe("DoDailyInitialisation")]
        private void DoDailyInitialisation(object sender, EventArgs e)
        {
            if (clock.Today == clock.StartDate) 
            {
                //AGPWhiteClover.GlfGeneric = 0.5;
                //AGPRyegrass.UseColdStressFactor = 0;
                //AGPRyegrass.Root.KNO3 = 0.1;
                //Swim.ernode = 0.001;
                //Swim.ersoil = 0.001;
                //Swim.slcerr = 0.001;
                
                //Debugger.Break();
                var denitrificationModel = FindByPath("[Nutrient].Denitrification.Rate").Value as CERESDenitrificationModel;
                denitrificationModel.DenitrificationRateModifier = 0.0001; // default is 0.0006

                var nitrifN2ORateConst = FindByPath("[Nutrient].Nitrification.NLoss").Value as Constant;
                nitrifN2ORateConst.FixedValue = 0.002; // default is 0.002

                denitrificationModel.IsInertActive = false; // default is true

            }
            else
            {
            }

        }

        [EventSubscribe("DoReportCalculations")]
        private void DoReportCalculations(object sender, EventArgs e)
        {
        }

    }
}
```
            Manager CalculateRollingWaterBalance
            Operations Cutting
              2010-12-21  [SimpleGrazing].GrazeToResidual(1700)
              2011-01-06  [SimpleGrazing].GrazeToResidual(1700)
              2011-02-20  [SimpleGrazing].GrazeToResidual(1700)
              2011-03-23  [SimpleGrazing].GrazeToResidual(1700)
              2011-04-29  [SimpleGrazing].GrazeToResidual(1700)
              2011-04-11  [SimpleGrazing].GrazeToResidual(1700)
              2011-05-31  [SimpleGrazing].GrazeToResidual(1700)
              2011-06-27  [SimpleGrazing].GrazeToResidual(1700)
              2011-07-28  [SimpleGrazing].GrazeToResidual(1700)
              2011-09-06  [SimpleGrazing].GrazeToResidual(1700)
              2011-09-28  [SimpleGrazing].GrazeToResidual(1700)
              2011-10-16  [SimpleGrazing].GrazeToResidual(1700)
              2011-11-03  [SimpleGrazing].GrazeToResidual(1700)
              2011-11-17  [SimpleGrazing].GrazeToResidual(1700)
              2011-12-05  [SimpleGrazing].GrazeToResidual(1700)
              2011-12-19  [SimpleGrazing].GrazeToResidual(1700)
              2012-01-12  [SimpleGrazing].GrazeToResidual(1700)
              2012-02-07  [SimpleGrazing].GrazeToResidual(1700)
              2012-03-13  [SimpleGrazing].GrazeToResidual(1700)
              2012-04-13  [SimpleGrazing].GrazeToResidual(1700)
              2012-05-17  [SimpleGrazing].GrazeToResidual(1700)
              2012-07-02  [SimpleGrazing].GrazeToResidual(1700)
              2012-08-24  [SimpleGrazing].GrazeToResidual(1700)
            Operations NonTrt_Fert
              2010-12-21  [Fertiliser].Apply(10, Fertiliser.Types.NO3N, 1);
              2010-12-21  [Fertiliser].Apply(10, Fertiliser.Types.NO3N, 10);
              2010-12-21  [Fertiliser].Apply(5, Fertiliser.Types.NO3N, 20);
            Operations Irrig
              2010-12-27  [Irrigation].Apply(5.3);
              2010-12-31  [Irrigation].Apply(5.3);
              2011-01-03  [Irrigation].Apply(5.3);
              2011-01-05  [Irrigation].Apply(5.3);
              2011-01-07  [Irrigation].Apply(5.3);
              2011-01-11  [Irrigation].Apply(5.3);
              2011-01-12  [Irrigation].Apply(95.4);
              2011-01-13  [Irrigation].Apply(53.0);
              2011-01-14  [Irrigation].Apply(106.0);
              2011-01-17  [Irrigation].Apply(79.5);
              2011-01-18  [Irrigation].Apply(106.0);
              2011-01-19  [Irrigation].Apply(106.0);
              2011-01-20  [Irrigation].Apply(106.0);
              2011-01-25  [Irrigation].Apply(79.5);
              2011-01-26  [Irrigation].Apply(53);
              2011-02-21  [Irrigation].Apply(10);
              2011-03-28  [Irrigation].Apply(10);
              2011-05-04  [Irrigation].Apply(10);
              2011-05-31  [Irrigation].Apply(10);
              2011-08-31  [Irrigation].Apply(10);
              2011-09-29  [Irrigation].Apply(10);
              2011-11-07  [Irrigation].Apply(10);
              2011-12-05  [Irrigation].Apply(10);
              2012-02-28  [Irrigation].Apply(10);
              2012-03-30  [Irrigation].Apply(10);
              2012-04-30  [Irrigation].Apply(10);
              2012-05-31  [Irrigation].Apply(10);
              0001-01-01
              0001-01-01
              0001-01-01
            Irrigation
            Fertiliser
            SimpleGrazing: GrazingRotationType=2; SimpleGrazingFrequencyString=21; SimpleMinGrazable=0; SimpleGrazingResidual=1500; FlexibleGrazePostDM=0; FractionDefoliatedNToSoil=[0]; FractionExcretedNToDung=[0.45]; CNRatioDung=0; DepthUrineIsAdded=250; FractionPopulationDecline=0; TramplingOn=false; MaximumPropLitterMovedToSoil=0.1; PastureConsumedAtMaximumRateOfLitterRemoval=1200
              PreGrazeDMArray=[1000, 1000, 1000, 1000, 1000, 1000, 1000, 1000, 1000, 1000, 1000, 1000]
              PostGrazeDMArray=[2000, 2000, 2000, 2000, 2000, 2000, 2000, 2000, 2000, 2000, 2000, 2000]
            PastureSpecies AGPRyegrass: doyGermination=275; daysEmergenceToAnthesis=120; daysAnthesisToMaturity=85; degreesDayForAnthesis=1100; degreesDayForMaturity=900; daysAnnualsFactor=45; InitialShootDM=2500; InitialRootDM=500; InitialRootDepth=500; initialDMFractionsGrasses=[0.15, 0.25, 0.25, 0.05, 0.05, 0.1, 0.1, 0.05, 0, 0, 0]; initialDMFractionsForbs=[0.2, 0.2, 0.15, 0.05, 0.1, 0.15, 0.1, 0.05, 0, 0, 0]; PhotosyntheticEfficiency=0.01; PhotosynthesisCurveFactor=0.8; FractionPAR=0.5; ReferenceCO2=380; CO2EffectScaleFactor=700; CO2EffectOffsetFactor=600; CO2EffectMinimum=0.7; CO2EffectExponent=2; ReproSeasonDurationCoeff=2; ReproSeasonShouldersLengthFactor=1; ReproSeasonOnsetDurationFactor=0.6; RelativeTurnoverEmerging=2; DetachmentDroughtCoefficient=3; DetachmentDroughtEffectMin=0.1; TurnoverStockFactor=0.01; TurnoverDefoliationEffectMin=0.025; MinimumGreenLeafProp=0.8; MinimumGreenRootProp=0.5
              initialDMFractionsLegumes=[0.16, 0.23, 0.22, 0.05, 0.03, 0.05, 0.05, 0.01, 0.04, 0.08, 0.08]
              LinearInterpolationFunction FVPDFunction
            PastureSpecies AGPWhiteClover: doyGermination=275; daysEmergenceToAnthesis=120; daysAnthesisToMaturity=85; degreesDayForAnthesis=1100; degreesDayForMaturity=900; daysAnnualsFactor=45; InitialShootDM=500; InitialRootDM=250; InitialRootDepth=250; initialDMFractionsGrasses=[0.15, 0.25, 0.25, 0.05, 0.05, 0.1, 0.1, 0.05, 0, 0, 0]; initialDMFractionsForbs=[0.2, 0.2, 0.15, 0.05, 0.1, 0.15, 0.1, 0.05, 0, 0, 0]; PhotosyntheticEfficiency=0.01; PhotosynthesisCurveFactor=0.8; FractionPAR=0.5; ReferenceCO2=380; CO2EffectScaleFactor=700; CO2EffectOffsetFactor=600; CO2EffectMinimum=0.7; CO2EffectExponent=2; ReproSeasonDurationCoeff=2; ReproSeasonShouldersLengthFactor=1; ReproSeasonOnsetDurationFactor=0.6; RelativeTurnoverEmerging=2; DetachmentDroughtCoefficient=3; DetachmentDroughtEffectMin=0.1; TurnoverStockFactor=0.01; TurnoverDefoliationEffectMin=0.025; MinimumGreenLeafProp=0.8; MinimumGreenRootProp=0.5
              initialDMFractionsLegumes=[0.16, 0.23, 0.22, 0.05, 0.03, 0.05, 0.05, 0.01, 0.04, 0.08, 0.08]
              LinearInterpolationFunction FVPDFunction
            SurfaceOrganicMatter: InitialResidueName=grass; InitialResidueType=grass; InitialResidueMass=200; InitialStandingFraction=0; InitialCPR=0; InitialCNR=17
            Soil: SoilType=Black Vertosol; Site=Jimbour; NearestTown=Jimbour, Q 4352; Region=South East Queensland; NaturalVegetation=Grassland, mainly Qld bluegrass; Latitude=0; Longitude=0
              Physical
                Thickness  ParticleSizeClay  ParticleSizeSand  ParticleSizeSilt  Rocks  BD     AirDry  LL15   DUL    SAT    KS
                60         17.61             33.77             48.62             0      0.865  0.077   0.231  0.565  0.6    216
                110        16.36             33.91             49.73             0      0.835  0.069   0.207  0.515  0.606  1188
                140        16.42             35.91             47.67             0      0.805  0.068   0.205  0.514  0.617  2160
                240        29.03             46.26             24.71             0      0.83   0.088   0.264  0.475  0.62   3528
                150        18.44             53.54             28.02             0      0.82   0.097   0.29   0.481  0.625  5376
                SoilCrop AGPRyegrassSoil: LL=[0.231, 0.207, 0.205, 0.264, 0.29]; KL=[0.1, 0.1, 0.05, 0.025, 0]; XF=[1, 1, 1, 1, 1]
                SoilCrop AGPWhiteCloverSoil: LL=[0.231, 0.231, 0.231, 0, 0]; KL=[0.02, 0.01, 0, 0, 0]; XF=[1, 1, 0, 0, 0]
              Water: Thickness=[60, 110, 140, 240, 150]; InitialValues=[0.565, 0.515, 0.514, 0.475, 0.316295]; RelativeTo=LL15; FilledFromTop=true
              Chemical: Thickness=[60, 110, 140, 240, 150]; PH=[5.7, 5.3, 5.9, 6.6, 6.7]; PHUnits=Water
              Nutrient
              Swim3 Swim: Salb=0.13; CNRed=20; CNCov=0.8; KDul=1; PSIDul=-100; VC=true; DTMax=1440; MaxWaterIncrement=10; Diagnostics=false
                zero: CN2Bare, DTMin, SpaceWeightingFactor, SoluteSpaceWeightingFactor, Dis, Disp, A, DTHC, DTHP
              CERESSoilTemperature Temperature (disabled)
              LayerStructure: Thickness=[10, 20, 30, 40, 50, 50, 50, 50, 100, 100, 50, 50, 50, 50]
              SoilTemperature
              Organic: FOMCNRatio=20; CarbonUnits=Total
                Thickness  Carbon  SoilCNRatio  FBiom  FInert  FOM
                60         8.2     12.5         0.08   0.58    92.873
                110        5.5     12.5         0.02   0.7     57.963
                140        3.3     12.5         0.015  0.77    31.8109
                240        1.7     12.5         0.01   0.9     11.3729
                150        1.7     12.5         0.01   0.99    5.97975
              Solute NO3: InitialValuesUnits=ppm; WaterTableConcentration=0; D0=0.05; DepthConstant=0; MaxDepthSoluteAccessible=0; RunoffEffectivenessAtMovingSolute=0; MaxEffectiveRunoff=0
                Thickness  InitialValues  Exco  FIP
                60         6.503          0     1
                110        2.101          0     1
                140        2.101          0     1
                240        1.701          0     1
                150        1.701          0     1
              Solute NH4: InitialValuesUnits=ppm; WaterTableConcentration=0; D0=0.05; DepthConstant=0; MaxDepthSoluteAccessible=0; RunoffEffectivenessAtMovingSolute=0; MaxEffectiveRunoff=0
                Thickness  InitialValues  Exco  FIP
                60         2              3     1
                110        1              3     1
                140        1              3     1
                240        1              3     1
                150        1              3     1
              Solute Urea: InitialValuesUnits=kg/ha; WaterTableConcentration=0; D0=0.05; DepthConstant=0; MaxDepthSoluteAccessible=0; RunoffEffectivenessAtMovingSolute=0; MaxEffectiveRunoff=0
                Thickness  InitialValues  Exco  FIP
                60         0              0     1
                110        0              0     1
                140        0              0     1
                240        0              0     1
                150        0              0     1
            Report: EventNames=Clock.Today >= new DateTime(2011, 2, 21)
              VariableNames:
                [Clock].Today
                [Weather].Rain
                [Irrigation].IrrigationApplied
                [AGPRyegrass].AboveGroundWt + [AGPWhiteClover].AboveGroundWt as AboveGroundBiomass
                [AGPRyegrass].HarvestedWt + [AGPWhiteClover].HarvestedWt as HarvestedWt
                [AGPRyegrass].HarvestedN + [AGPWhiteClover].HarvestedN as HarvestedN
                [Swim].Drainage
                [Swim].LeachNO3
                [Swim].LeachNH4
                sum([Nutrient].DenitrifiedN) as DenitrifiedN
                sum([Nutrient].N2Oatm[1:8]) as N2Oatm
                [CalculateRollingWaterBalance].Script.WaterBalanceCumulative
                sum of [Swim].Drainage from 21-feb-2011 to [Clock].Today as CumulativeDrainage
                sum of [Swim].LeachNO3 from 21-feb-2011 to [Clock].Today as CumulativeLeachNO3
                //sum([nh3_volatilisation].Script.emission_nh3) as emission_nh3
    Folder Tile DrainageSpacing
      Memo
        # Things to look at:
        - in your original version you were setting drain spacing in m instead of mm - I have corrected that
        - there is hardly any tile drainage but I am not surprised because the soil properties have it with a high conductivity (~70 mm /day)  at 1200 mm deep (the depth to the impermeable layer that was set). So I would say the results are consistent with the way the soil is set up. Can you look at this please?

        NW Indiana long-term experiment (est 1980) with different subsurface drainage spacing (5m, 10m, 20m, and 40m). Crops were corn, soybean and rye cover crop. Exp data collected from 2-replications. Large plot size.

        ### Status of the sim (May 2022) - SVA notes:
        1. Weather comes a local station (on site) and public data, synthetic file.
        2. Soil profile is identical to the one used in classic
        3. Management is 95% final (need to double check and verfiy as we noticed some errors in the conversion from classic to NG)
        4. Cultivars: we used a fixed corn and a fixed soy cultivar for all years, we have not yet converted all the cultivars from classic to NG
        5. Additional measured data to be added (work in progress)

        ### Relevant publications
        1. Pasley et al., 2021 (Env Res Letters) https://iopscience.iop.org/article/10.1088/1748-9326/abef8f
        2. Kladivko et al., 2004 (J of Envirn Quality) https://acsess.onlinelibrary.wiley.com/doi/abs/10.2134/jeq2004.1803
      Experiment Drain
        Factors Drain
          Factor Space
            Specification=[SWIM].SwimSubsurfaceDrain.DrainSpacing = 5000, 10000, 20000, 40000
        Simulation Base
          Clock: Start=1987-01-01; End=1999-12-31
          Weather: FileName=00_SEPAC_1968_2000.met
          Summary summaryfile
          SoilArbitrator
          MicroClimate: a_interception=0; b_interception=1; c_interception=0; d_interception=0; SoilHeatFluxFraction=0.4; MinimumHeightDiffForNewLayer=0; NightInterceptionFraction=0.5; ReferenceHeight=2
          Zone paddock: Area=1; Slope=0; AspectAngle=0; Altitude=50
            Manager SWIMSetLowerBC
              LowerBCType = potential
              LowerBCValue = 1200
```csharp
using Models.Climate;
using APSIM.Shared.Utilities;
using Models.Soils.Nutrients;
using Models.Soils;
using Models.PMF;
using Models.Core;
using System.Xml.Serialization;
using System;
using Models.AgPasture;
using Models.Interfaces;

namespace Models
{
    [Serializable] 
    [System.Xml.Serialization.XmlInclude(typeof(Model))]
    public class Script : Model
    {
        [Link] Clock clock;
        [Link] ISummary summary;
        [Link] private Swim3 swim;
        
        public enum LowerBCTypeOptions {gradient,seepage,potential};

        [Separator("Sets the lower boundary condition type (and value if set to 'potential' for SWIM3. The change is applied at the beginning of the first day of the simulation.")]
        [Description("What lower boundary condition is wanted?")] 
        public LowerBCTypeOptions LowerBCType { get; set; }
        
        [Description("If 'potential', then what potential? Should be negative (mm) ")]
        [Display(EnabledCallback = "IsPotential")] 
        public double LowerBCValue { get; set; }
        
        /// <summary></summary>
        public bool IsPotential => LowerBCType == LowerBCTypeOptions.potential;
        

        public double SoilWaterStart  { get; set; }
        public double SoilWaterEnd  { get; set; }

        [EventSubscribe("DoManagement")]
        private void DoDailyCalculations(object sender, EventArgs e)
        {
            if (clock.Today == clock.StartDate)
            {
                summary.WriteMessage(this, "Script is setting lower boundary condition to " + LowerBCType, MessageType.Diagnostic);
                if (LowerBCType == LowerBCTypeOptions.gradient)
                    swim.SetLowerBCForGradient(bbcGradient: 0.0);   // in cm/cm (ibbc=0) Note that this is the default setting
                else if (LowerBCType == LowerBCTypeOptions.potential)
                    swim.SetLowerBCForGivenPotential(bbcPotential: LowerBCValue /10.0 );    //  convert to cm (ibbc=1), DUL is -100 cm so values more positive will often result in inflow to the bottom of the soil profile. Input in mm so divide here.
                else if (LowerBCType == LowerBCTypeOptions.seepage)
                    swim.SetLowerBCForSeepage(bbcPotentialSeepage: 0.0);  // in cm (ibbc=3). This is for zero-tension lysimeters
                else
                    throw new Exception("Wrong lower boundary condition type");
            }
        }
    }
}
```
            Manager N Deposition
              ppm = 0.0156
              varname = N_deposition
              fertmodule = fertiliser
```csharp
using Models.Soils;
using System;
using Models.Core;
using Models.PMF;
namespace Models
{
    [Serializable]
    [System.Xml.Serialization.XmlInclude(typeof(Model))]
    public class Script : Model
    {
        [Link] Clock Clock;

        [Description("What to multiply rain by?")]
        public string ppm { get; set; }

        [Description("Name of the NO3_N deposition variable as seen by the model")]
        public string varname { get; set; }

        [Description("Name of module that applies nitrogen")]
        public string fertmodule { get; set; }

        [EventSubscribe("DoManagement")]
        private void OnDoManagement(object sender, EventArgs e)
        {
            /*
                
         
            [varname] = rain * [ppm]
            N_deposition_tot = N_deposition_tot + [varname]
            if (rain > 0) then
               [fertmodule] apply amount = [varname](kg/ha), depth = 0 (mm), type = NO3_N ()
            endif
      
            */
        }
    }
}
```
            Fertiliser
            Irrigation
            SurfaceOrganicMatter: InitialResidueName=maize; InitialResidueType=maize; InitialResidueMass=2800; InitialStandingFraction=0; InitialCPR=0; InitialCNR=72
            Soil: SoilType=AME_Webster_L107; Region=AME_Webster_L107; State=IL; Country=USA; ApsoilNumber=1; Latitude=0; Longitude=0; DataSource=ssurgo2apsim; Comments=None
              Physical
                Thickness  ParticleSizeClay  ParticleSizeSand  BD    AirDry  LL15   DUL    SAT    KS
                50         12.2              22                1.42  0.044   0.087  0.276  0.431  300.741
                50         12.2              22                1.42  0.043   0.087  0.275  0.428  289.832
                50         12.2              22                1.42  0.043   0.086  0.274  0.424  278.007
                150        12.2              22                1.42  0.085   0.085  0.273  0.42   266.49
                150        15.6              20                1.53  0.103   0.103  0.287  0.417  177.098
                150        19                17.7              1.53  0.121   0.121  0.303  0.419  122.923
                200        19                17.7              1.53  0.12    0.12   0.3    0.41   104.52
                200        25.8              16.8              1.53  0.158   0.158  0.327  0.4    69.193
                200        25.8              16.8              1.53  0.158   0.158  0.327  0.39   69.193
                300        25.8              16.8              1.53  0.158   0.158  0.327  0.38   68.424
                300        25.8              16.8              1.53  0.157   0.157  0.327  0.37   21.77
                300        25.8              16.8              1.53  0.157   0.157  0.327  0.36   17.824
                300        25.8              16.8              1.53  0.157   0.157  0.327  0.35   14.593
                300        25.8              16.8              1.53  0.157   0.157  0.327  0.35   11.948
                300        25.8              16.8              1.53  0.157   0.157  0.327  0.34   9.782
                300        25.8              16.8              1.64  0.157   0.157  0.327  0.34   8.009
                300        25.8              16.8              1.64  0.157   0.157  0.327  0.34   6.557
                300        25.8              16.8              1.64  0.157   0.157  0.327  0.34   5.368
                SoilCrop MaizeSoil
                  LL=[0.087, 0.087, 0.086, 0.085, 0.151, 0.185, 0.2, 0.25, 0.265, 0.28, 0.294, 0.305, 0.314, 0.315, 0.315, 0.315, 0.315, 0.315]
                  KL=[0.08, 0.08, 0.08, 0.08, 0.08, 0.08, 0.08, 0.08, 0.08, 0.042, 0.035, 0.028, 0.022, 0.016, 0.011, 0.007, 0.003, 0.001]
                  XF=[1, 1, 1, 1, 1, 1, 1, 1, 1, 0.1, 0, 0, 0, 0, 0, 0, 0, 0]
                SoilCrop SoybeanSoil
                  LL=[0.087, 0.087, 0.086, 0.085, 0.151, 0.185, 0.2, 0.25, 0.265, 0.28, 0.294, 0.305, 0.314, 0.315, 0.315, 0.315, 0.315, 0.315]
                  KL=[0.08, 0.08, 0.08, 0.08, 0.08, 0.08, 0.08, 0.08, 0.08, 0.04, 0.04, 0.03, 0.02, 0.02, 0.01, 0.01, 0, 0]
                  XF=[1, 1, 1, 1, 1, 1, 1, 1, 1, 0.1, 0, 0, 0, 0, 0, 0, 0, 0]
                SoilCrop WheatSoil
                  LL=[0.087, 0.087, 0.086, 0.085, 0.151, 0.185, 0.2, 0.25, 0.265, 0.28, 0.294, 0.305, 0.314, 0.315, 0.315, 0.315, 0.315, 0.315]
                  KL=[0.08, 0.08, 0.08, 0.08, 0.08, 0.08, 0.08, 0.08, 0.08, 0.04, 0.04, 0.03, 0.02, 0.02, 0.01, 0.01, 0, 0]
                  XF=[1, 1, 1, 1, 1, 1, 1, 1, 1, 1, 0.1, 0, 0, 0, 0, 0, 0, 0]
              Swim3 Swim: Salb=0.15; CN2Bare=70; CNRed=20; CNCov=0.8; KDul=0.25; PSIDul=-250; VC=true; DTMin=0; DTMax=1440; MaxWaterIncrement=10; SpaceWeightingFactor=0; SoluteSpaceWeightingFactor=0; Dis=15; Disp=0.65; A=1; DTHC=0; DTHP=1; Diagnostics=false
                SwimSubsurfaceDrain: DrainDepth=750; DrainSpacing=5000; DrainRadius=100; Klat=250; ImpermDepth=1200
              CERESSoilTemperature Temperature
              Organic: FOMCNRatio=45; CarbonUnits=Total
                Thickness  Carbon  SoilCNRatio  FBiom  FInert    FOM
                50         1.6125  13           0.25   0.365     125.774
                50         1.5     13           0.22   0.365     121.028
                50         1.375   13           0.2    0.365     116.462
                150        1.25    13           0.17   0.67925   103.77
                150        0.875   13           0.12   0.69875   92.4616
                150        0.625   13           0.1    0.71825   82.3855
                200        0.25    13           0.05   0.741     70.6376
                200        0.1     13           0.04   0.767     60.565
                200        0.1     13           0.019  0.96831   51.9287
                300        0.08    13           0.016  0.983835  41.2273
                300        0.01    13           0.014  0.999     32.7313
                300        0.01    13           0.013  0.999     25.9861
                300        0       13           0.012  0.999     20.631
                300        0       13           0.011  0.999     16.3794
                300        0       13           0.01   0.999     13.004
                300        0       13           0.009  0.999     10.3242
                300        0       13           0.009  0.999     8.19658
                300        0       13           0.008  0.999     6.50745
              Chemical: PHUnits=Water
                Thickness=[50, 50, 50, 150, 150, 150, 200, 200, 200, 300, 300, 300, 300, 300, 300, 300, 300, 300]
                PH=[5.7, 5.7, 5.7, 5.7, 4.5, 4.4, 4.4, 4.4, 4.4, 4.4, 4.4, 4.4, 4.4, 4.4, 4.4, 4.4, 4.4, 4.4]
              Water: RelativeTo=LL15; FilledFromTop=false
                Thickness=[50, 50, 50, 150, 150, 150, 200, 200, 200, 300, 300, 300, 300, 300, 300, 300, 300, 300]
                InitialValues=[0.276, 0.275, 0.274, 0.273, 0.287, 0.303, 0.3, 0.327, 0.327, 0.327, 0.327, 0.327, 0.327, 0.327, 0.327, 0.327, 0.327, 0.327]
              Nutrient
              Solute NO3: InitialValuesUnits=ppm; WaterTableConcentration=0; D0=0.05; Exco=[0, 0, 0, 0, 0, 0, 0, 0, 0, 0, 0, 0, 0, 0, 0, 0]; FIP=[1, 1, 1, 1, 1, 1, 1, 1, 1, 1, 1, 1, 1, 1, 1, 1]; DepthConstant=0; MaxDepthSoluteAccessible=0; RunoffEffectivenessAtMovingSolute=0; MaxEffectiveRunoff=0
                Thickness=[50, 50, 50, 150, 150, 150, 200, 200, 200, 300, 300, 300, 300, 300, 300, 300, 300, 300]
                InitialValues=[9.85915, 9.85915, 9.85915, 2.8169, 2.42424, 2.40964, 3, 4, 5, 5, 1.21951, 1.21951, 1.62602, 1.21951, 1.21951, 0.609756, 0.406504, 0.203252]
              Solute NH4: InitialValuesUnits=ppm; WaterTableConcentration=0; D0=0.05; Exco=[1, 1, 1, 1, 1, 1, 1, 1, 1, 1, 1, 1, 1, 1, 1, 1]; FIP=[1, 1, 1, 1, 1, 1, 1, 1, 1, 1, 1, 1, 1, 1, 1, 1]; DepthConstant=0; MaxDepthSoluteAccessible=0; RunoffEffectivenessAtMovingSolute=0; MaxEffectiveRunoff=0
                Thickness=[50, 50, 50, 150, 150, 150, 200, 200, 200, 300, 300, 300, 300, 300, 300, 300, 300, 300]
                InitialValues=[9.85915, 9.85915, 9.85915, 2.8169, 2.42424, 2.40964, 3, 4, 5, 5, 1.21951, 1.21951, 1.62602, 1.21951, 1.21951, 0.609756, 0.406504, 0.203252]
              Solute Urea: InitialValues=[0, 0, 0, 0, 0, 0, 0, 0, 0, 0, 0, 0, 0, 0, 0, 0, 0, 0]; InitialValuesUnits=kg/ha; WaterTableConcentration=0; D0=0.05; Exco=[0, 0, 0, 0, 0, 0, 0, 0, 0, 0, 0, 0, 0, 0, 0, 0]; FIP=[1, 1, 1, 1, 1, 1, 1, 1, 1, 1, 1, 1, 1, 1, 1, 1]; DepthConstant=0; MaxDepthSoluteAccessible=0; RunoffEffectivenessAtMovingSolute=0; MaxEffectiveRunoff=0
                Thickness=[50, 50, 50, 150, 150, 150, 200, 200, 200, 300, 300, 300, 300, 300, 300, 300, 300, 300]
            Operations Mgt
              1984-03-10  [Fertiliser].Apply(285, Fertiliser.Types.NH4N, 300)
              1984-05-10  [SurfaceOrganicMatter].Incorporate(fraction:0.5, depth:250)
              1984-05-21  [Maize].Sow(cultivar: Laila, population: 6, depth: 50, rowSpacing:750)
              1984-05-21  [Fertiliser].Apply(18, Fertiliser.Types.NH4N, 10)
              1984-05-21  [SurfaceOrganicMatter].Incorporate(fraction:0.1, depth:250)
              1984-10-30  [Maize].Harvest()
              1984-10-30  [Maize].EndCrop()
              1985-03-10  [Fertiliser].Apply(285, Fertiliser.Types.NH4N, 300)
              1985-04-10  [SurfaceOrganicMatter].Incorporate(fraction:0.5, depth:250)
              1985-04-22  [Maize].Sow(cultivar: Laila, population: 6, depth: 50, rowSpacing:750)
              1985-04-22  [Fertiliser].Apply(8, Fertiliser.Types.NH4N, 10)
              1985-04-22  [SurfaceOrganicMatter].Incorporate(fraction:0.1, depth:250)
              1985-09-23  [Maize].Harvest()
              1985-09-23  [Maize].EndCrop()
              1986-03-20  [Fertiliser].Apply(285, Fertiliser.Types.NH4N, 300)
              1986-04-20  [SurfaceOrganicMatter].Incorporate(fraction:0.5, depth:250)
              1986-04-30  [Maize].Sow(cultivar: Laila, population: 6, depth: 50, rowSpacing:750)
              1986-04-30  [Fertiliser].Apply(21, Fertiliser.Types.NH4N, 10)
              1986-04-30  [SurfaceOrganicMatter].Incorporate(fraction:0.1, depth:250)
              1986-09-23  [Maize].Harvest()
              1986-09-23  [Maize].EndCrop()
              1987-03-20  [Fertiliser].Apply(285, Fertiliser.Types.NH4N, 300)
              1987-04-27  [SurfaceOrganicMatter].Incorporate(fraction:0.5, depth:250)
              1987-04-28  [Maize].Sow(cultivar: Laila, population: 6, depth: 50, rowSpacing:750)
              1987-04-28  [Fertiliser].Apply(22, Fertiliser.Types.NH4N, 10)
              1987-04-28  [SurfaceOrganicMatter].Incorporate(fraction:0.5, depth:250)
              1987-09-15  [Maize].Harvest()
              1987-09-15  [Maize].EndCrop()
              1988-03-20  [Fertiliser].Apply(285, Fertiliser.Types.NH4N, 300)
              1988-05-01  [SurfaceOrganicMatter].Incorporate(fraction:0.5, depth:250)
              1988-05-02  [Maize].Sow(cultivar: Laila, population: 6, depth: 50, rowSpacing:750)
              1988-05-02  [Fertiliser].Apply(11, Fertiliser.Types.NH4N, 10)
              1988-05-02  [SurfaceOrganicMatter].Incorporate(fraction:0.1, depth:250)
              1988-10-03  [Maize].Harvest()
              1988-10-03  [Maize].EndCrop()
              1989-03-10  [Fertiliser].Apply(228, Fertiliser.Types.NH4N, 300)
              1989-05-17  [SurfaceOrganicMatter].Incorporate(fraction:0.5, depth:250)
              1989-05-18  [Maize].Sow(cultivar: Laila, population: 6, depth: 50, rowSpacing:750)
              1989-05-18  [Fertiliser].Apply(20, Fertiliser.Types.NH4N, 10)
              1989-05-18  [SurfaceOrganicMatter].Incorporate(fraction:0.1, depth:250)
              1989-10-12  [Maize].Harvest()
              1989-10-12  [Maize].EndCrop()
              1990-03-10  [Fertiliser].Apply(228, Fertiliser.Types.NH4N, 300)
              1990-05-28  [SurfaceOrganicMatter].Incorporate(fraction:0.5, depth:250)
              1990-05-29  [Maize].Sow(cultivar: Laila, population: 6, depth: 50, rowSpacing:750)
              1990-05-29  [Fertiliser].Apply(28, Fertiliser.Types.NH4N, 10)
              1990-05-29  [SurfaceOrganicMatter].Incorporate(fraction:0.1, depth:250)
              1990-10-29  [Maize].Harvest()
              1990-10-29  [Maize].EndCrop()
              1991-04-20  [Fertiliser].Apply(228, Fertiliser.Types.NH4N, 10)
              1991-04-30  [SurfaceOrganicMatter].Incorporate(fraction:0.5, depth:250)
              1991-05-01  [Maize].Sow(cultivar: Laila, population: 6, depth: 50, rowSpacing:750)
              1991-05-01  [Fertiliser].Apply(28, Fertiliser.Types.NH4N, 10)
              1991-05-01  [SurfaceOrganicMatter].Incorporate(fraction:0.1, depth:250)
              1991-09-17  [Maize].Harvest()
              1991-09-17  [Maize].EndCrop()
              1992-04-20  [Fertiliser].Apply(228, Fertiliser.Types.NH4N, 10)
              1992-04-05  [SurfaceOrganicMatter].Incorporate(fraction:0.5, depth:250)
              1992-05-05  [Maize].Sow(cultivar: Laila, population: 6, depth: 50, rowSpacing:750)
              1992-05-05  [Fertiliser].Apply(28, Fertiliser.Types.NH4N, 10)
              1992-05-05  [SurfaceOrganicMatter].Incorporate(fraction:0.1, depth:250)
              1992-10-05  [Maize].Harvest()
              1992-10-05  [Maize].EndCrop()
              1993-05-01  [Fertiliser].Apply(228, Fertiliser.Types.NH4N, 10)
              1993-05-09  [SurfaceOrganicMatter].Incorporate(fraction:0.5, depth:250)
              1993-05-10  [Maize].Sow(cultivar: Laila, population: 6, depth: 50, rowSpacing:750)
              1993-05-10  [Fertiliser].Apply(28, Fertiliser.Types.NH4N, 10)
              1993-05-10  [SurfaceOrganicMatter].Incorporate(fraction:0.1, depth:250)
              1993-10-13  [Maize].Harvest()
              1993-10-13  [Maize].EndCrop()
              1994-05-20  [Soybean].Sow(cultivar: Generic_MG2, population: 30, depth: 50, rowSpacing:750)
              1994-10-04  [Soybean].Harvest()
              1994-10-04  [Soybean].EndCrop()
              1995-04-06  [Fertiliser].Apply(196, Fertiliser.Types.NH4N, 200)
              1995-06-08  [Maize].Sow(cultivar: Laila, population: 6, depth: 50, rowSpacing:750)
              1995-06-08  [Fertiliser].Apply(25.08, Fertiliser.Types.UreaN, 200)
              1995-10-16  [Maize].Harvest()
              1995-10-16  [Maize].EndCrop()
              1995-10-16  [Wheat].Sow(cultivar: Yecora, population: 300, depth: 20, rowSpacing:203)
              1996-05-27  [Soybean].Sow(cultivar: Generic_MG2, population: 30, depth: 50, rowSpacing:750)
              1996-06-01  [Wheat].EndCrop()
              1996-10-25  [Soybean].Harvest()
              1996-10-25  [Soybean].EndCrop()
              1997-04-26  [Fertiliser].Apply(173.6, Fertiliser.Types.NH4N, 200)
              1997-04-29  [Maize].Sow(cultivar: Laila, population: 6, depth: 50, rowSpacing:750)
              1997-04-29  [Fertiliser].Apply(25.08, Fertiliser.Types.UreaN, 200)
              1997-11-10  [Maize].Harvest()
              1997-11-10  [Maize].EndCrop()
              1997-11-10  [Wheat].Sow(cultivar: Yecora, population: 300, depth: 20, rowSpacing:203)
              1998-04-23  [Wheat].EndCrop()
              1998-06-01  [Soybean].Sow(cultivar: Generic_MG2, population: 30, depth: 50, rowSpacing:750)
              1998-10-27  [Soybean].Harvest()
              1998-10-27  [Soybean].EndCrop()
              1999-04-28  [Fertiliser].Apply(173.6, Fertiliser.Types.NH4N, 200)
              1999-03-05  [Maize].Sow(cultivar: Laila, population: 6, depth: 50, rowSpacing:750)
              1999-03-05  [Fertiliser].Apply(25.08, Fertiliser.Types.UreaN, 200)
              1999-09-30  [Maize].Harvest()
              1999-09-30  [Maize].EndCrop()
            Plant maize: ResourceName=Maize
            Plant soybean: ResourceName=Soybean
            Plant wheat: ResourceName=Wheat
            Report OutputfileDaily: EventNames=[Clock].EndOfDay
              VariableNames:
                [Clock].Today
                ([Maize].AboveGround.Wt + [Soybean].AboveGround.Wt + [Wheat].AboveGround.Wt)*10 as CropBiomass
                ([Maize].Grain.Wt + [Soybean].Grain.Wt + [Wheat].Grain.Wt)*10 as CropYield
                [SurfaceOrganicMatter].Wt
                [SWIM].WaterTable
                [SWIM].SubsurfaceDrain
                [SWIM].SubsurfaceDrainNO3
                [SWIM].SW[6] as SW_50cm
                [SWIM].SW[8] as SW_110cm
                [SWIM].Drainage
                sum([Soil].NO3.kgha[1:4]) as NO3_030cm
                Sum of [SWIM].SubsurfaceDrain from 1-Jan to 31-Dec as Annual_tile_drainage
                Sum of [SWIM].SubsurfaceDrainNO3 from 1-Jan to 31-Dec as Annual_tile_drainage_no3
                Mean of [SWIM].WaterTable from 1-Jan to 31-Dec as Annual_WaterTable
                Max of ([Maize].AboveGround.Wt + [Soybean].AboveGround.Wt + [Wheat].AboveGround.Wt)*10 as CropBiomass2
                Max of ([Maize].Grain.Wt + [Soybean].Grain.Wt + [Wheat].Grain.Wt)*10 as CropYield2
            Report OutputfileAnnual: EventNames=[Clock].EndOfYear
              VariableNames:
                [Clock].Today
                ([Maize].AboveGround.Wt + [Soybean].AboveGround.Wt + [Wheat].AboveGround.Wt)*10 as CropBiomass
                ([Maize].Grain.Wt + [Soybean].Grain.Wt + [Wheat].Grain.Wt)*10 as CropYield
                [SurfaceOrganicMatter].Wt
                [SWIM].WaterTable
                [SWIM].SubsurfaceDrain
                [SWIM].SubsurfaceDrainNO3
                [SWIM].SW[6] as SW_50cm
                [SWIM].SW[8] as SW_110cm
                [SWIM].Drainage
                sum([Soil].NO3.kgha[1:4]) as NO3_030cm
                Sum of [SWIM].SubsurfaceDrain from 1-Jan to 31-Dec as Annual_tile_drainage
                Sum of [SWIM].SubsurfaceDrainNO3 from 1-Jan to 31-Dec as Annual_tile_drainage_no3
                Mean of [SWIM].WaterTable from 1-Jan to 31-Dec as Annual_WaterTable
                Max of ([Maize].AboveGround.Wt + [Soybean].AboveGround.Wt + [Wheat].AboveGround.Wt)*10 as CropBiomass2
                Max of ([Maize].Grain.Wt + [Soybean].Grain.Wt + [Wheat].Grain.Wt)*10 as CropYield2
    Folder WaterTable
      Memo
        # Things to look at:

        -	In both simulations, the original value that the water potential lower boundary was set at did not make sense. Were you trying to set it as the depth below the surface that the water table is at? It should be the water table depth relative to the base of the soil profile with positive values being inflow and negative outflow. Have tried to guess what it should be but needs your attention. See “HowToSetAPotentialLowerBoundaryCondition” for more information
        -	In the Stelle simulation it fails. This might be because of the coarse layering around the water table depth. Suggest adding a layering component (actually these should be used in all sims with SWIM) to try and address this.

        long term WT measurements from permanent wells (grass crop with reqular cuts, unknown mgt). Because we couldn't get the bambatsi to work, we used a maize model to keep it going

        ### Status of the sim (May 2022) - SVA notes:
        1. Weather data come from local + public sources (synthetic file).
        2. Soil profile from ssurgo
        3. Management and crop is our best assumption
        4. Similar data from other locations to be added (work in progress)
        5. most important - replace crop.

        ### Relevant publications
        1. Archontoulis et al., in-prep
      Simulation IA_Kanawha
        Weather: FileName=IA_Kanawaha.July5.2020.met
        Clock: Start=1984-01-01; End=2018-12-31
        Summary summaryfile
        SoilArbitrator
        MicroClimate: a_interception=0; b_interception=1; c_interception=0; d_interception=0; SoilHeatFluxFraction=0.4; MinimumHeightDiffForNewLayer=0; NightInterceptionFraction=0.5; ReferenceHeight=2
        Zone paddock: Area=1; Slope=0; AspectAngle=0; Altitude=50
          Manager SWIMSetLowerBC
            LowerBCType = potential
            LowerBCValue = 1300
            script: same as in Validation.Tile DrainageSpacing.Drain.Base.paddock.SWIMSetLowerBC
          Manager SowMaize
            Crop = [maize]
            SowDate = 1-may
            CultivarName = Laila
            SowingDepth = 50
            RowSpacing = 750
            Population = 6
```csharp
using APSIM.Shared.Utilities;
using Models.Utilities;
using Models.Soils;
using Models.PMF;
using Models.Core;
using System;

namespace Models
{
    [Serializable]
    public class Script : Model
    {
        [Link] Clock Clock;
        [Link] Fertiliser Fertiliser;
        [Link] Summary Summary;
        [Link] Soil Soil;
        
        [Description("Crop")]
        public IPlant Crop { get; set; }

        [Description("Sowing date (d-mmm)")]
        public string SowDate { get; set; }

        [Display(Type = DisplayType.CultivarName)]
        [Description("Cultivar to be sown")]
        public string CultivarName { get; set; }

        [Description("Sowing depth (mm)")]
        public double SowingDepth { get; set; }

        [Description("Row spacing (mm)")]
        public double RowSpacing { get; set; }

        [Description("Plant population (/m2)")]
        public double Population { get; set; }

        [EventSubscribe("DoManagement")]
        private void OnDoManagement(object sender, EventArgs e)
        {
            if (DateUtilities.WithinDates(SowDate, Clock.Today, SowDate))
            {
                Crop.Sow(population: Population, cultivar: CultivarName, depth: SowingDepth, rowSpacing: RowSpacing);    
            }
        }
    }
}
```
          Manager FertiliseMaize
            FertiliserType = NO3N
            FertiliserDates = 24-apr
            Amount = 160
            AmountType = True
```csharp
using Models.Soils;
using System;
using Models.Core;
using Models.PMF;
using APSIM.Shared.Utilities;
namespace Models
{
    [Serializable]
    public class Script : Model
    {
        [Link] Clock Clock;
        [Link] Fertiliser Fertiliser;
        
        [Separator("A component to apply fertiliser on one or more dates on every year of the simulation")]

        [Description("Type of fertiliser to apply? ")] 
        public Fertiliser.Types FertiliserType { get; set; }

        [Description("Enter the fertilisation dates as dd-mmm with comma separation (any year information entered will be ignored): ")] 
        public string[] FertiliserDates { get; set; } 

        [Description("Amount of fertiliser to be applied (kg /ha)")] 
        public double Amount { get; set; }

        [Description("Is the above amount to be applied each time? (yes/ticked)? Or is it the total annual amount across all dates (no/unticked)")] 
        public bool AmountType { get; set; }
        
        [EventSubscribe("DoManagement")]
        private void OnDoManagement(object sender, EventArgs e)
        {
            foreach (string ddMMM in FertiliserDates)
            {
                if (DateUtilities.DatesEqual(ddMMM, Clock.Today))
                {
                    if (AmountType)
                        Fertiliser.Apply(Amount: Amount, Type: FertiliserType);
                    else
                        Fertiliser.Apply(Amount: Amount / FertiliserDates.Length, Type: FertiliserType);
                }
            }
        }
    }
}
```
          Manager Harvesting
            Crop = [maize]
```csharp
using APSIM.Shared.Utilities;
using Models.Utilities;
using Models.Soils;
using Models.PMF;
using Models.Core;
using System;

namespace Models
{
    [Serializable] 
    public class Script : Model
    {
        [Description("Crop")]
        public IPlant Crop { get; set; }
        
        [EventSubscribe("DoManagement")]
        private void OnDoManagement(object sender, EventArgs e)
        {
            if (Crop.IsReadyForHarvesting)
            {
                Crop.Harvest();
                Crop.EndCrop();
            }
        }
    }
}
```
          Manager Tillage on a fixed date
            TillageDate = 1-dec
            Fraction = 0.5
            Depth = 0
```csharp
using Models.Soils;
using System;
using Models.Core;
using Models.PMF;
using APSIM.Shared.Utilities;
using Models.Surface;

namespace Models
{
    [Serializable]
    public class Script : Model
    {
        [Link] Clock Clock;
        [Link] SurfaceOrganicMatter SOM;
        
        [Description("Tillage Date")]
        public string TillageDate { get; set; }
        
        [Description("Fraction of Residues To Incorporate (0-1)")]
        public double Fraction { get; set; }

        [Description("Depth of Tillage (mm)")]
        public double Depth { get; set; }

        [EventSubscribe("DoManagement")]
        private void OnDoManagement(object sender, EventArgs e)
        {
            if (DateUtilities.WithinDates(TillageDate, Clock.Today, TillageDate))
                SOM.Incorporate(Fraction, Depth);
        }
    }
}
```
          Fertiliser
          SurfaceOrganicMatter: InitialResidueName=maize; InitialResidueType=maize; InitialResidueMass=1000; InitialStandingFraction=0; InitialCPR=0; InitialCNR=80
          Soil: SoilType=KRF_Webster_107; Region=KRF_Webster_107; State=IL; Country=USA; ApsoilNumber=1; Latitude=0; Longitude=0; DataSource=ssurgo2apsim; Comments=None
            Physical
              Thickness  ParticleSizeClay  ParticleSizeSand  ParticleSizeSilt  BD    AirDry  LL15  DUL   SAT    KS
              50         33                25                42                1.05  0.18    0.2   0.32  0.45   374.291
              50         33                25                42                1.05  0.18    0.2   0.32  0.45   408.155
              50         33                25                42                1.06  0.18    0.2   0.32  0.45   402.284
              150        33                25                42                1.17  0.2     0.21  0.33  0.45   342.607
              150        33                25                42                1.33  0.23    0.23  0.34  0.44   262.526
              150        33                25                42                1.37  0.21    0.21  0.33  0.43   206.417
              200        33                25                42                1.39  0.19    0.19  0.31  0.42   159.059
              200        32.8              25.4              41.8              1.43  0.17    0.17  0.3   0.41   146.94
              200        31.2              28.5              40.2              1.48  0.16    0.16  0.29  0.41   157.073
              300        29.1              32.8              38.1              1.55  0.14    0.14  0.28  0.4    171.822
              300        27                36.3              36.7              1.6   0.13    0.13  0.28  0.336  13.691
              300        25.1              38.8              36.2              1.6   0.13    0.13  0.28  0.329  8.877
              300        22.7              41.8              35.5              1.6   0.13    0.13  0.28  0.325  6.65
              300        21                44                35                1.6   0.13    0.13  0.28  0.319  4.312
              300        21                44                35                1.6   0.13    0.13  0.28  0.314  2.796
              300        21                44                35                1.6   0.13    0.13  0.28  0.31   1.813
              300        21                44                35                1.6   0.13    0.13  0.28  0.306  1.175
              300        21                44                35                1.6   0.13    0.13  0.28  0.303  0.762
              SoilCrop BambatsiSoil
                LL=[0.2, 0.2, 0.2, 0.21, 0.23, 0.21, 0.19, 0.17, 0.16, 0.14, 0.13, 0.13, 0.13, 0.13, 0.13, 0.13, 0.13, 0.13]
                KL=[0.08, 0.08, 0.08, 0.08, 0.07, 0.06, 0.06, 0.05, 0.04, 0.04, 0.03, 0.02, 0.02, 0.015, 0.01, 0.01, 0.01, 0.01]
                XF=[1, 1, 1, 1, 1, 1, 1, 1, 0, 0, 0, 0, 0, 0, 0, 0, 0, 0]
              SoilCrop MaizeSoil: same as Validation.WaterTable.IA_Kanawha.paddock.Soil.Physical.BambatsiSoil
            CERESSoilTemperature Temperature
            Organic: FOMCNRatio=45; CarbonUnits=Total
              Thickness  Carbon  SoilCNRatio  FBiom  FInert  FOM
              50         4.07    11           0.08   0.4     125.774
              50         4.07    11           0.08   0.4     121.028
              50         4.03    11           0.072  0.42    116.462
              150        3.6     11           0.042  0.5     103.77
              150        2.92    11           0.028  0.62    92.4616
              150        2.19    11           0.022  0.74    82.3855
              200        1.32    11           0.02   0.8     70.6376
              200        0.76    11           0.02   0.8     60.565
              200        0.5     11           0.007  0.924   51.9287
              300        0.14    11           0      0.99    41.2273
              300        0.02    11           0      0.99    32.7313
              300        0.01    11           0      0.99    25.9861
              300        0       11           0      0.99    20.631
              300        0       11           0      0.99    16.3794
              300        0       11           0      0.99    13.004
              300        0       11           0      0.99    10.3242
              300        0       11           0      0.99    8.19658
              300        0       11           0      0.99    6.50745
            Chemical: PHUnits=Water
              Thickness=[50, 50, 50, 150, 150, 150, 200, 200, 200, 300, 300, 300, 300, 300, 300, 300, 300, 300]
              PH=[7.41, 7.41, 7.41, 7.41, 7.41, 7.42, 7.58, 7.82, 7.98, 8.16, 8.37, 8.57, 8.82, 9, 9, 9, 9, 9]
            Water: RelativeTo=LL15; FilledFromTop=false
              Thickness=[50, 50, 50, 150, 150, 150, 200, 200, 200, 300, 300, 300, 300, 300, 300, 300, 300, 300]
              InitialValues=[0.32, 0.32, 0.32, 0.33, 0.34, 0.33, 0.31, 0.3, 0.29, 0.28, 0.28, 0.28, 0.28, 0.28, 0.28, 0.28, 0.28, 0.28]
            Swim3 Swim: Salb=0.13; CN2Bare=70; CNRed=20; CNCov=0.8; KDul=0.25; PSIDul=-250; VC=true; DTMin=0; DTMax=1440; MaxWaterIncrement=10; SpaceWeightingFactor=0; SoluteSpaceWeightingFactor=0; Dis=15; Disp=1; A=1; DTHC=0; DTHP=1; Diagnostics=false
            Nutrient
            Solute NO3: InitialValuesUnits=ppm; WaterTableConcentration=0; D0=0.05; DepthConstant=0; MaxDepthSoluteAccessible=0; RunoffEffectivenessAtMovingSolute=0; MaxEffectiveRunoff=0
              Thickness  InitialValues  Exco  FIP
              50         4.07           0     1
              50         4.07           0     1
              50         4.03           0     1
              150        3.6            0     1
              150        2.92           0     1
              150        2.19           0     1
              200        1.32           0     1
              200        0.76           0     1
              200        0.5            0     1
              300        0.14           0     1
              300        0.02           0     1
              300        0.01           0     1
              300        0              0     1
              300        0              0     1
              300        0              0     1
              300        0              0     1
              300        0              0     1
              300        0              0     1
            Solute NH4: InitialValuesUnits=ppm; WaterTableConcentration=0; D0=0.05; DepthConstant=0; MaxDepthSoluteAccessible=0; RunoffEffectivenessAtMovingSolute=0; MaxEffectiveRunoff=0
              Thickness  InitialValues  Exco  FIP
              50         2.03           1     1
              50         2.03           1     1
              50         2.02           1     1
              150        1.8            1     1
              150        1.46           1     1
              150        1.09           1     1
              200        0.66           1     1
              200        0.38           1     1
              200        0.25           1     1
              300        0.07           1     1
              300        0.01           1     1
              300        0              1     1
              300        0              1     1
              300        0              1     1
              300        0              1     1
              300        0              1     1
              300        0              0     1
              300        0              0     1
            Solute Urea: InitialValuesUnits=kg/ha; WaterTableConcentration=0; D0=0.05; DepthConstant=0; MaxDepthSoluteAccessible=0; RunoffEffectivenessAtMovingSolute=0; MaxEffectiveRunoff=0
              Thickness  InitialValues  Exco  FIP
              50         0              0     1
              50         0              0     1
              50         0              0     1
              150        0              0     1
              150        0              0     1
              150        0              0     1
              200        0              0     1
              200        0              0     1
              200        0              0     1
              300        0              0     1
              300        0              0     1
              300        0              0     1
              300        0              0     1
              300        0              0     1
              300        0              0     1
              300        0              0     1
              300        0              0     1
              300        0              0     1
          Plant maize: ResourceName=Maize
          Report OutputfileUSA3: EventNames=[Clock].EndOfDay
            VariableNames:
              [Clock].Today
              [SurfaceOrganicMatter].Wt
              [SWIM].WaterTable
              [SWIM].SW[12] as SW_200cm
              [SWIM].Drainage
              sum([SWIM].SWmm[1:12]) as SW_02m
              //[Bambatsi].AboveGround.Wt
              [Maize].AboveGround.Wt
              [Maize].Grain.Wt
              sum of [Maize].Leaf.Transpiration + [Soil].Swim.Es from 1-Jan to 31-Dec as Annual_ET
              sum of [Soil].Swim.Es from 1-Jan to 31-Dec as Annual_E
              sum of [Weather].Rain from 1-Jan to 31-Dec as Annual_Rain
              sum of [Soil].Swim.Runoff from 1-Jan to 31-Dec as Annual_Runoff
              sum of [Soil].Swim.Drainage from 1-Jan to 31-Dec as Annual_Drainage
      Simulation IL_Stelle (disabled)
        Weather: FileName=IL_Stelle_NasaPower.met
        Clock: Start=2000-01-01; End=2018-12-31
        Summary summaryfile
        SoilArbitrator
        MicroClimate: a_interception=0; b_interception=1; c_interception=0; d_interception=0; SoilHeatFluxFraction=0.4; MinimumHeightDiffForNewLayer=0; NightInterceptionFraction=0.5; ReferenceHeight=2
        Zone paddock: Area=1; Slope=0; AspectAngle=0; Altitude=50
          Manager SWIMSetLowerBC
            LowerBCType = potential
            LowerBCValue = 1600
            script: same as in Validation.Tile DrainageSpacing.Drain.Base.paddock.SWIMSetLowerBC
          Manager Tillage on a fixed date
            TillageDate = 1-dec
            Fraction = 0.5
            Depth = 0
            script: same as in Validation.WaterTable.IA_Kanawha.paddock.Tillage on a fixed date
          Manager SowMaize
            Crop = [maize]
            SowDate = 1-may
            CultivarName = Laila
            SowingDepth = 50
            RowSpacing = 750
            Population = 6
            script: same as in Validation.WaterTable.IA_Kanawha.paddock.SowMaize
          Manager FertiliseMaize
            FertiliserType = NO3N
            FertiliserDates = 24-apr
            Amount = 160
            AmountType = True
            script: same as in Validation.WaterTable.IA_Kanawha.paddock.FertiliseMaize
          Manager Harvesting
            Crop = [maize]
            script: same as in Validation.WaterTable.IA_Kanawha.paddock.Harvesting
          Fertiliser
          SurfaceOrganicMatter: InitialResidueName=maize; InitialResidueType=maize; InitialResidueMass=1000; InitialStandingFraction=0; InitialCPR=0; InitialCNR=80
          Soil: SoilType=KRF_Webster_107; Region=KRF_Webster_107; State=IL; Country=USA; ApsoilNumber=1; Latitude=0; Longitude=0; DataSource=ssurgo2apsim; Comments=None
            CERESSoilTemperature Temperature
            Swim3 Swim: Salb=0.13; CN2Bare=70; CNRed=20; CNCov=0.8; KDul=0.25; PSIDul=-250; VC=true; DTMin=0; DTMax=30; MaxWaterIncrement=5; SpaceWeightingFactor=0; SoluteSpaceWeightingFactor=0; Dis=15; Disp=1; A=1; DTHC=0; DTHP=1; Diagnostics=false
            Nutrient
            Physical
              Thickness  ParticleSizeClay  ParticleSizeSand  ParticleSizeSilt  BD     AirDry  LL15  DUL   SAT    KS
              50         35                7.5               57.5              1.401  0.22    0.24  0.35  0.47   242.32
              50         35                7.5               57.5              1.401  0.22    0.24  0.35  0.47   243.072
              50         35                7.5               57.5              1.401  0.22    0.24  0.35  0.47   243.072
              150        36.5              7.5               56                1.401  0.24    0.25  0.35  0.47   210.346
              150        41.1              7.5               51.4              1.35   0.26    0.26  0.36  0.49   137.488
              150        45.7              7.5               46.8              1.32   0.28    0.28  0.36  0.5    89.761
              200        51.2              7.5               41.3              1.27   0.29    0.29  0.37  0.52   56.47
              200        52.4              7.5               40.1              1.35   0.28    0.28  0.36  0.48   45.9
              200        49.5              7.5               43                1.35   0.26    0.26  0.34  0.44   46.082
              300        46.1              7.5               46.4              1.27   0.23    0.23  0.31  0.42   41.277
              300        45                7.5               47.5              1.27   0.22    0.22  0.3   0.353  11.669
              300        45                7.5               47.5              1.27   0.22    0.22  0.3   0.347  7.732
              300        45                7.5               47.5              1.27   0.22    0.22  0.3   0.343  5.877
              300        45                7.5               47.5              1.27   0.22    0.22  0.3   0.338  3.894
              300        45                7.5               47.5              1.27   0.22    0.22  0.3   0.334  2.58
              300        45                7.5               47.5              1.27   0.22    0.22  0.3   0.33   1.709
              300        45                7.5               47.5              1.48   0.22    0.22  0.3   0.326  1.133
              300        45                7.5               47.5              1.53   0.22    0.22  0.3   0.323  0.751
              SoilCrop BambatsiSoil
                LL=[0.24, 0.24, 0.24, 0.25, 0.26, 0.28, 0.29, 0.28, 0.26, 0.23, 0.22, 0.22, 0.22, 0.22, 0.22, 0.22, 0.22, 0.22]
                KL=[0.08, 0.08, 0.08, 0.08, 0.07, 0.06, 0.06, 0.05, 0.04, 0.04, 0.03, 0.02, 0.02, 0.015, 0.01, 0.01, 0.01, 0.01]
                XF=[1, 1, 1, 1, 1, 1, 1, 1, 0, 0, 0, 0, 0, 0, 0, 0, 0, 0]
              SoilCrop MaizeSoil: same as Validation.WaterTable.IL_Stelle.paddock.Soil.Physical.BambatsiSoil
            Organic: FOMCNRatio=45; CarbonUnits=Total
              Thickness  Carbon  SoilCNRatio  FBiom  FInert  FOM
              50         2.33    11           0.08   0.4     125.774
              50         2.33    11           0.08   0.4     121.028
              50         2.33    11           0.072  0.42    116.462
              150        2.19    11           0.042  0.5     103.77
              150        1.79    11           0.028  0.62    92.4616
              150        1.37    11           0.022  0.74    82.3855
              200        0.89    11           0.02   0.8     70.6376
              200        0.58    11           0.02   0.8     60.565
              200        0.47    11           0.02   0.8     51.9287
              300        0.21    11           0.02   0.852   41.2273
              300        0.07    11           0.02   0.94    32.7313
              300        0.03    11           0.02   0.99    25.9861
              300        0.005   11           0.02   0.99    20.631
              300        0       11           0.02   0.99    16.3794
              300        0       11           0.02   0.99    13.004
              300        0       11           0      0       10.3242
              300        0       11           0      0       8.19658
              300        0       11           0      0       6.50745
            Water: RelativeTo=LL15; FilledFromTop=false
              Thickness=[50, 50, 50, 150, 150, 150, 200, 200, 200, 300, 300, 300, 300, 300, 300, 300, 300, 300]
              InitialValues=[0.35, 0.35, 0.35, 0.35, 0.36, 0.36, 0.37, 0.36, 0.34, 0.31, 0.3, 0.3, 0.3, 0.3, 0.3, 0.3, 0.3, 0.3]
            Chemical: PHUnits=Water
              Thickness=[50, 50, 50, 150, 150, 150, 200, 200, 200, 300, 300, 300, 300, 300, 300, 300, 300, 300]
              PH=[7.3, 7.3, 7.3, 7.37, 7.57, 7.78, 8.03, 8.28, 8.52, 8.81, 8.89, 8.89, 8.89, 8.89, 8.89, 8.89, 8.89, 8.89]
            Solute NO3: InitialValuesUnits=ppm; WaterTableConcentration=0; D0=0.05; DepthConstant=0; MaxDepthSoluteAccessible=0; RunoffEffectivenessAtMovingSolute=0; MaxEffectiveRunoff=0
              Thickness  InitialValues  Exco  FIP
              50         2.33           0     1
              50         2.33           0     1
              50         2.33           0     1
              150        2.19           0     1
              150        1.79           0     1
              150        1.37           0     1
              200        0.89           0     1
              200        0.58           0     1
              200        0.47           0     1
              300        0.21           0     1
              300        0.07           0     1
              300        0.03           0     1
              300        0.005          0     1
              300        0              0     1
              300        0              0     1
              300        0              0     1
              300        0              0     1
              300        0              0     1
            Solute NH4: InitialValuesUnits=ppm; WaterTableConcentration=0; D0=0.05; DepthConstant=0; MaxDepthSoluteAccessible=0; RunoffEffectivenessAtMovingSolute=0; MaxEffectiveRunoff=0
              Thickness  InitialValues  Exco  FIP
              50         1.16           1     1
              50         1.16           1     1
              50         1.16           1     1
              150        1.1            1     1
              150        0.89           1     1
              150        0.69           1     1
              200        0.45           1     1
              200        0.29           1     1
              200        0.23           1     1
              300        0.11           1     1
              300        0.03           1     1
              300        0.01           1     1
              300        0.005          1     1
              300        0              1     1
              300        0              1     1
              300        0              1     1
              300        0              0     1
              300        0              0     1
            Solute Urea: InitialValuesUnits=kg/ha; WaterTableConcentration=0; D0=0.05; DepthConstant=0; MaxDepthSoluteAccessible=0; RunoffEffectivenessAtMovingSolute=0; MaxEffectiveRunoff=0
              Thickness  InitialValues  Exco  FIP
              50         0              0     1
              50         0              0     1
              50         0              0     1
              150        0              0     1
              150        0              0     1
              150        0              0     1
              200        0              0     1
              200        0              0     1
              200        0              0     1
              300        0              0     1
              300        0              0     1
              300        0              0     1
              300        0              0     1
              300        0              0     1
              300        0              0     1
              300        0              0     1
              300        0              0     1
              300        0              0     1
          Plant maize: ResourceName=Maize
          Report OutputfileUSA3: EventNames=[Clock].EndOfDay
            VariableNames:
              [Clock].Today
              [SurfaceOrganicMatter].Wt
              [SWIM].WaterTable
              [SWIM].SW[12] as SW_200cm
              [SWIM].Drainage
              sum([SWIM].SWmm[1:12]) as SW_02m
              //[Bambatsi].AboveGround.Wt
              [Maize].AboveGround.Wt
              [Maize].Grain.Wt
              sum of [Maize].Leaf.Transpiration + [Soil].Swim.Es from 1-Jan to 31-Dec as Annual_ET
              sum of [Soil].Swim.Es from 1-Jan to 31-Dec as Annual_E
              sum of [Weather].Rain from 1-Jan to 31-Dec as Annual_Rain
              sum of [Soil].Swim.Runoff from 1-Jan to 31-Dec as Annual_Runoff
              sum of [Soil].Swim.Drainage from 1-Jan to 31-Dec as Annual_Drainage
    Folder TileDrainageAndWaterTable
      Folder Systems 13 and 14
        Memo
          # Things to look at:

          -	Again in both of these look at the value in the potential boundary condition.

          Central Iowa experiment long-term experiment (est 2009) with different cropping systems. System_13 refers to a corn-soy and System_14 refers to a soy-corn rotation. Exp data collected from 3-replications. Each plot (size 24 rows x about 30 m long) has three subsurface tiles drainage, two at the border and one at the center of each plot. Subsurface drainage and N leaching were collected approx. every 5-days (March to November). Soil moisture and WT data were collected using Decagon sesnors. WT well depth about 2.5m.

          ### Status of the sim (May 2022) - SVA notes:
          1. Weather comes a local station (on site) until 2018, after than we use data from IEM station (5 km distance from the site)
          2. Soil profile is identical to the one used in classic
          3. Management is 95% final (need to double check and verfiy as we noticed some errors in the conversion from classic to NG)
          4. Cultivars: we used a fixed corn and a fixed soy cultivar for all years, we have not yet converted all the cultivars from classic to NG
          5. Additional measured data to be added (work in progress)

          ### Relevant publications
          1. Archontoulis et al. 2020 (Crop Science) https://acsess.onlinelibrary.wiley.com/doi/full/10.1002/csc2.20039
          2. Martinez-Feria et al. 2018 (Agric, Ecos & Env) https://www.sciencedirect.com/science/article/abs/pii/S0167880918300021
          2. Martinez-Feria et al. 2016 (Field Crops Res) https://www.sciencedirect.com/science/article/abs/pii/S0378429016302027
          4. Dietzel et al. 2016 (Global Change Biology) https://onlinelibrary.wiley.com/doi/full/10.1111/gcb.13101
        Simulation System_13
          Clock: Start=2006-01-01; End=2019-12-31
          Weather: FileName=KelleyNov2021.met
          SoilArbitrator
          MicroClimate: a_interception=0; b_interception=1; c_interception=0; d_interception=0; SoilHeatFluxFraction=0.4; MinimumHeightDiffForNewLayer=0; NightInterceptionFraction=0.5; ReferenceHeight=2
          Summary summaryfile
          Zone paddock: Area=1; Slope=0; AspectAngle=0; Altitude=50
            Folder DeadScripts (disabled)
              Manager WaterTable script
```csharp
using Models.Soils;
using System;
using Models.Core;
using Models.PMF;
namespace Models
{
    [Serializable]
    [System.Xml.Serialization.XmlInclude(typeof(Model))]
    public class Script : Model
    {
        [Link] Clock Clock;

    }
}
```
              Manager System Variables
                script: same as in Validation.TileDrainageAndWaterTable.Systems 13 and 14.System_13.paddock.DeadScripts.WaterTable script
              Manager InitialiseWaterTableOnce
              Manager InstallTileDrainage
```csharp
using Models.Soils;
using System;
using Models.Core;
using Models.PMF;
namespace Models
{
    [Serializable]
    [System.Xml.Serialization.XmlInclude(typeof(Model))]
    public class Script : Model
    {
        [Link] Clock Clock;

        [EventSubscribe("DoManagement")]
        private void OnDoManagement(object sender, EventArgs e)
        {
            /*
                ! tiles were installed in 2009

if year > 2008 then 
subsurface_drain_open = 'true' ! this means tile = open
else
subsurface_drain_open = 'false' ! this means tile = closed
endif 
            */
        }
    }
}
```
              Manager OxdefRUEDamageSoybean
```csharp
using Models.Soils;
using System;
using System.Collections.Generic;
using Models.Core;
namespace Models
{
    [Serializable]
    [System.Xml.Serialization.XmlInclude(typeof(Model))]
    public class Script : Model
    {

    /*
      
   [Link] Paddock MyPaddock; // Can be used to dynamically get access to simulation structure and variables
   [Input] DateTime Today;   // Equates to the value of the current simulation date - value comes from CLOCK
   [Param] string crop;         // Will be used to get oxdef values while crop is not out
   [Param] double threshold;
   [Param] double slope;
   [Param] double max;
   [Param] string xDayDmgStr;  //For the stage linear interpolation 
   [Param] string yDayDmgStr;
   [Param] int dmgDays;      //Days of 0 oxdef to wait to apply damage
   [Output] double oxdef_sum;
   [Output] double rue_damage;
   [Output] int day_limit;
   
   Component comp; //Hopefully the crop!
   bool damaged = false; //For if we are in a damaged state
   int days = 0; 
   
   List<double> tracker = new List<double>();
   
   double[] oldRUE; //For if the crop is maize (plant module supports RUEFactor, maize model does not...)
   bool afterSowing = false;
   
   //Linear interpolation function for doing days to set damage
   double[] xDayDmgFun;
   double[] yDayDmgFun;
   

   // The following event handler will be called once at the beginning of the simulation
   [EventHandler] public void OnInitialised()
   {
      comp = (Component) MyPaddock.LinkByName(crop);
      
      xDayDmgFun = (from a in xDayDmgStr.Split(',')
            select Convert.ToDouble(a)).ToArray();
      
      yDayDmgFun = (from a in yDayDmgStr.Split(',')
            select Convert.ToDouble(a)).ToArray();
      
   }
   
   [EventHandler] public void OnSowing()
   {
      if (crop == "maize")
         afterSowing = true;
   }

   // The following event handler will be called each day at the beginning of the day
   [EventHandler] public void OnPrepare()
   {
      //Needed for maize, unfortunately RUE cannot be read on sowing...
      if (afterSowing)
      {
         comp.Get("RUE", out oldRUE);
         afterSowing = false;
      }
      
      if (damaged)
         days++;
      
      string status;
      comp.Get("plant_status", out status);
      if (status != "out" && !damaged)
      {
         double oxdef_photo;
         comp.Get("oxdef_photo", out oxdef_photo);
         tracker.Insert(0, (1.0 - oxdef_photo));
      
         if (tracker.Take(dmgDays).Sum() == 0.0)//Check if the last 4 days have had no oxdef
         {
            double total = tracker.Sum();
            rue_damage = oxdefDmg(total);
            if (rue_damage > 0.0)
            {
               day_limit = dayLimit(total);
               doDamage(rue_damage);
               damaged = true;
            }
            
            
            tracker.Clear(); 
            oxdef_sum = 0.0;
         }
         else
            oxdef_sum = tracker.Sum();
      }
      else
         oxdef_sum = 0.0;
      
      
      
      if (days == day_limit && damaged)
      {
         damaged = false;
         days = 0;
         day_limit = 0;
         rue_damage = 0.0;
         doDamage(0.0);
      }

   }
   
   [EventHandler] public void OnHarvesting()
   {
      tracker.Clear();
   }
   
   private void doDamage(double dmg)
   {
      if (crop == "maize")
         comp.Set("RUE", oldRUE.Select(x => x * (1.0 - dmg)).ToArray());
      else //Assume Plant module if not maize. this means the script will not work on some crops
         comp.Set("RUEFactor", (1.0 - dmg));
   }
   
   private double oxdefDmg(double totalOxdef)
   {
      return MathUtility.Bound(slope * (totalOxdef - threshold), 0.0, max);
   }
   
   private int dayLimit(double totalOxdef)
   {
      double stage;
      comp.Get("stage", out stage);
      bool dum;
      double mult = MathUtility.LinearInterpReal(stage, xDayDmgFun, yDayDmgFun, out dum);
      return Convert.ToInt32(Math.Round(mult * totalOxdef));
   }


*/
    }
}
```
              Manager OxdefRUEDamagemaize: same as Validation.TileDrainageAndWaterTable.Systems 13 and 14.System_13.paddock.DeadScripts.OxdefRUEDamageSoybean
              Manager WinterTileClose
```csharp
using Models.Soils;
using System;
using Models.Core;
using Models.PMF;
namespace Models
{
    [Serializable]
    [System.Xml.Serialization.XmlInclude(typeof(Model))]
    public class Script : Model
    {
        [Link] Clock Clock;

        [EventSubscribe("DoManagement")]
        private void OnDoManagement(object sender, EventArgs e)
        {
            /*
                ! tiles were installed in 2009

if day > 60 and day < 365 then 
subsurface_drain_open = 'true' ! this means tile = open
else
subsurface_drain_open = 'false' ! this means tile = closed
endif 
            */
        }
    }
}
```
            Operations Mgt_system13
              2006-04-20  [SurfaceOrganicMatter].Incorporate(fraction:0.15, depth:250)
              2006-05-15  [Soybean].Sow(cultivar: Generic_MG2, population: 30, depth: 50, rowSpacing:750)
              2006-06-10  [Soybean].Harvest()
              2006-06-10  [Soybean].EndCrop()
              2006-06-11  [SurfaceOrganicMatter].Incorporate(fraction:0.01, depth:250)
              2007-04-20  [SurfaceOrganicMatter].Incorporate(fraction:0.15, depth:250)
              2007-04-05  [Fertiliser].Apply(Amount:168, Type: UreaN, Depth: 50)
              2007-04-05  [Maize].Sow(cultivar: Laila, population: 8, depth: 50, rowSpacing:750)
              2007-10-15  [Maize].Harvest()
              2007-10-15  [Maize].EndCrop()
              2007-11-11  [SurfaceOrganicMatter].Incorporate(fraction:0.6, depth:250)
              2008-04-20  [SurfaceOrganicMatter].Incorporate(fraction:0.15, depth:250)
              2008-05-15  [Soybean].Sow(cultivar: Generic_MG2, population: 30, depth: 50, rowSpacing:750)
              2008-09-20  [Soybean].Harvest()
              2008-09-20  [Soybean].EndCrop()
              2008-10-20  [SurfaceOrganicMatter].Incorporate(fraction:0.3, depth:250)
              2009-08-05  [Fertiliser].Apply(84, Fertiliser.Types.NH4NO3N, 150)
              2009-06-17  [Fertiliser].Apply(56, Fertiliser.Types.NH4NO3N, 150)
              2009-08-05  [Maize].Sow(cultivar: Laila, population: 8, depth: 50, rowSpacing:750)
              2009-10-10  [Maize].Harvest()
              2009-10-10  [Maize].EndCrop()
              2009-11-11  [SurfaceOrganicMatter].Incorporate(fraction:0.5, depth:250)
              2010-04-20  [SurfaceOrganicMatter].Incorporate(fraction:0.25, depth:150)
              2010-06-05  [Soybean].Sow(cultivar: Generic_MG2, population: 30, depth: 50, rowSpacing:750)
              2010-09-02  [Soybean].Harvest()
              2010-09-02  [Soybean].EndCrop()
              2011-05-11  [Fertiliser].Apply(87, Fertiliser.Types.NH4NO3N, 150)
              2011-06-29  [Fertiliser].Apply(39, Fertiliser.Types.NH4NO3N, 150)
              2011-05-11  [Maize].Sow(cultivar: Laila, population: 8, depth: 50, rowSpacing:750)
              2011-10-03  [Maize].Harvest()
              2011-10-03  [Maize].EndCrop()
              2012-04-20  [SurfaceOrganicMatter].Incorporate(fraction:0.25, depth:150)
              2012-05-11  [Soybean].Sow(cultivar: Generic_MG2, population: 30, depth: 50, rowSpacing:750)
              2012-09-04  [Soybean].Harvest()
              2012-09-04  [Soybean].EndCrop()
              2013-05-17  [Fertiliser].Apply(89, Fertiliser.Types.NH4NO3N, 150)
              2013-06-28  [Fertiliser].Apply(115, Fertiliser.Types.NH4NO3N, 150)
              2013-05-15  [Maize].Sow(cultivar: Laila, population: 8, depth: 50, rowSpacing:750)
              2013-10-01  [Maize].Harvest()
              2013-10-01  [Maize].EndCrop()
              2014-04-20  [SurfaceOrganicMatter].Incorporate(fraction:0.25, depth:150)
              2014-05-20  [Soybean].Sow(cultivar: Generic_MG2, population: 30, depth: 50, rowSpacing:750)
              2014-09-05  [Soybean].Harvest()
              2014-09-05  [Soybean].EndCrop()
              2015-05-13  [Fertiliser].Apply(78, Fertiliser.Types.UreaN, 150);
              2015-06-23  [Fertiliser].Apply(130, Fertiliser.Types.UreaN, 150);
              2015-05-13  [Maize].Sow(cultivar: Laila, population: 8, depth: 50, rowSpacing:750)
              2015-10-13  [Maize].Harvest()
              2015-10-13  [Maize].EndCrop()
              2016-04-15  [Fertiliser].Apply(Amount:29, Type: UreaN, Depth: 50)
              2016-04-22  [SurfaceOrganicMatter].Incorporate(fraction:0.01, depth:250)
              2016-05-18  [Soybean].Sow(cultivar: Generic_MG2, population: 30, depth: 50, rowSpacing:750)
              2016-10-17  [Soybean].Harvest()
              2016-10-17  [Soybean].EndCrop()
              2017-03-05  [SurfaceOrganicMatter].Incorporate(fraction:0.01, depth:150)
              2017-05-15  [Fertiliser].Apply(Amount:84, Type: UreaN, Depth: 50)
              2017-05-15  [Maize].Sow(cultivar: Laila, population: 8, depth: 50, rowSpacing:750)
              2017-10-18  [Maize].Harvest()
              2017-10-18  [Maize].EndCrop()
              2018-04-22  [SurfaceOrganicMatter].Incorporate(fraction:0.01, depth:250)
              2018-05-17  [Soybean].Sow(cultivar: Generic_MG2, population: 30, depth: 50, rowSpacing:750)
              2018-10-23  [Soybean].Harvest()
              2018-10-23  [Soybean].EndCrop()
              2019-03-05  [SurfaceOrganicMatter].Incorporate(fraction:0.01, depth:150)
              2019-04-14  [Fertiliser].Apply(30, Fertiliser.Types.NH4N, 50)
              2019-04-24  [Fertiliser].Apply(Amount:112, Type: UreaN, Depth: 50)
              2019-04-06  [Maize].Sow(cultivar: Laila, population: 8, depth: 50, rowSpacing:750)
              2019-06-28  [Fertiliser].Apply(Amount:66, Type: UreaN, Depth: 50)
              2019-11-14  [Maize].Harvest()
              2019-11-14  [Maize].EndCrop()
            Manager SWIMSetLowerBC
              LowerBCType = potential
              LowerBCValue = 2700
              script: same as in Validation.Tile DrainageSpacing.Drain.Base.paddock.SWIMSetLowerBC
            Manager CalculateRollingWaterBalance
            Fertiliser
            Irrigation
            SurfaceOrganicMatter: InitialResidueName=soybean; InitialResidueType=soybean; InitialResidueMass=1400; InitialStandingFraction=0; InitialCPR=0; InitialCNR=36.5
            Soil SoilCobs: DataSource=CSIRO Sustainable Ecosystems, Toowoomba
              Comments=Soil naming structure: \State\Region\Classification-Local Name (Site/district and locator number); oc and ph estimated
              Physical
                Thickness  ParticleSizeClay  ParticleSizeSand  ParticleSizeSilt  BD     AirDry  LL15   DUL    SAT    KS
                37         25.67             38.29             36.04             1.25   0.07    0.14   0.263  0.435  617
                38         25.67             38.29             36.04             1.25   0.0805  0.161  0.296  0.462  617
                50         26.43             37.95             35.65             1.25   0.055   0.11   0.256  0.443  617
                90         28.09             36.57             35.65             1.25   0.088   0.11   0.254  0.446  205
                85         28.5              36.23             35.65             1.25   0.12    0.12   0.293  0.478  205
                100        29                34                37                1.35   0.115   0.115  0.252  0.445  205
                200        29                34                37                1.35   0.122   0.122  0.252  0.4    135
                300        27                37                36                1.551  0.1     0.1    0.296  0.394  388
                300        27                37                36                1.551  0.11    0.11   0.296  0.389  388
                320        27                37                36                1.551  0.138   0.138  0.296  0.389  388
                300        27                37                36                1.551  0.165   0.165  0.296  0.349  11.872
                280        27                37                36                1.65   0.146   0.146  0.274  0.323  9.125
                300        27                37                36                1.65   0.146   0.146  0.274  0.319  6.639
                300        27                37                36                1.65   0.146   0.146  0.274  0.314  4.523
                300        27                37                36                1.65   0.146   0.146  0.274  0.31   3.255
                300        27                37                36                1.65   0.146   0.146  0.274  0.307  2.342
                300        27                37                36                1.65   0.146   0.146  0.274  0.303  1.686
                300        27                37                36                1.65   0.146   0.146  0.274  0.301  1.213
                SoilCrop MaizeSoil
                  LL=[0.14, 0.161, 0.11, 0.11, 0.12, 0.148673, 0.165864, 0.192725, 0.22341386, 0.252352, 0.27151, 0.256995, 0.262, 0.262, 0.262, 0.262, 0.262, 0.262]
                  KL=[0.08, 0.08, 0.08, 0.08, 0.08, 0.08, 0.08, 0.08, 0.08, 0.0420478, 0.03459, 0.029159, 0.0230232, 0.0162927, 0.0111758, 0.0067466, 0.00313554, 0.000603434]
                  XF=[1, 1, 1, 1, 1, 1, 1, 1, 1, 1, 1, 1, 0.4, 0, 0, 0, 0, 0]
                SoilCrop SoybeanSoil: same as Validation.TileDrainageAndWaterTable.Systems 13 and 14.System_13.paddock.SoilCobs.Physical.MaizeSoil
                SoilCrop WheatSoil
                  LL=[0.14, 0.161, 0.11, 0.11, 0.12, 0.148673, 0.165864, 0.192725, 0.22341386, 0.252352, 0.27151, 0.256995, 0.262, 0.262, 0.262, 0.262, 0.262, 0.262]
                  KL=[0.1, 0.1, 0.1, 0.1, 0.1, 0.1, 0.1, 0.1, 0.1, 0.0525598, 0.0432375, 0.0364488, 0.0287791, 0.0203659, 0.0139697, 0.00843325, 0.00391942, 0.000754293]
                  XF=[1, 1, 1, 1, 1, 1, 1, 1, 1, 1, 1, 1, 0.4, 0, 0, 0, 0, 0]
                  LL source: Estimated based on local knowledge (layer 1, 2, 3, 4, 5, 6, 7)
              Organic: FOMCNRatio=23; CarbonUnits=Total
                Thickness  Carbon  SoilCNRatio  FBiom       FInert     FOM
                37         3.926   11           0.1225      0.365      93.5878
                38         3.822   11           0.1225      0.365      90.8917
                50         3.38    11           0.0915855   0.365      87.4623
                90         3.029   11           0.0643885   0.42705    81.612
                85         2.73    11           0.0488732   0.4589875  76.4466
                100        1.703   11           0.0398626   0.49275    70.7865
                200        1.729   11           0.0314565   0.715      60.6927
                300        1.495   11           0.0240318   0.946575   48.1853
                300        0.637   11           0.0192202   0.965205   38.2554
                320        0.208   11           0.0161866   0.984456   29.9081
                300        0.13    11           0.0141235   0.999      23.7447
                280        0.13    11           0.0129188   0.999      19.1438
                300        0.13    11           0.0117614   0.999      15.1987
                300        0.13    11           0.0106631   0.999      12.0666
                300        0.13    11           0.00990398  0.999      9.57992
                300        0.13    11           0.0092672   0.999      7.60571
                300        0.13    11           0.00872398  0.999      6.03835
                300        0.13    11           0.0082541   0.999      4.79398
              Chemical: PHUnits=Water
                Thickness=[37, 38, 50, 90, 85, 100, 200, 300, 300, 320, 300, 280, 300, 300, 300, 300, 300, 300]
                PH=[6.318, 6.318, 5.902, 5.948, 5.959, 6.7, 6.7, 7.9, 7.9, 7.9, 7.9, 7.9, 7.9, 7.9, 7.9, 7.9, 7.9, 7.9]
                PH source: Estimated based on local knowledge (layer 1, 2, 3, 4, 5, 6, 7)
              Water: FilledFromTop=false
                Thickness=[37, 38, 50, 90, 85, 100, 200, 300, 300, 320, 300, 280, 300, 300, 300, 300, 300, 300]
                InitialValues=[0.263, 0.296, 0.256, 0.254, 0.293, 0.252, 0.252, 0.296, 0.296, 0.296, 0.296, 0.274, 0.274, 0.274, 0.274, 0.274, 0.274, 0.274]
              Swim3 Swim: Salb=0.13; CN2Bare=65; CNRed=20; CNCov=0.8; KDul=0.3; PSIDul=-300; VC=true; DTMin=0; DTMax=1440; MaxWaterIncrement=10; SpaceWeightingFactor=0; SoluteSpaceWeightingFactor=0; Dis=15; Disp=1; A=1; DTHC=0; DTHP=1; Diagnostics=false
                SwimSubsurfaceDrain: DrainDepth=1070; DrainSpacing=13500; DrainRadius=52; Klat=1000; ImpermDepth=4500
              CERESSoilTemperature Temperature
              Nutrient
              Solute NO3: InitialValuesUnits=kg/ha; WaterTableConcentration=0; D0=0.05; Exco=[0, 0, 0, 0, 0, 0, 0, 0, 0, 0, 0, 0, 0, 0, 0, 0]; FIP=[1, 1, 1, 1, 1, 1, 1, 1, 1, 1, 1, 1, 1, 1, 1, 1]; DepthConstant=0; MaxDepthSoluteAccessible=0; RunoffEffectivenessAtMovingSolute=0; MaxEffectiveRunoff=0
                Thickness=[37, 38, 50, 90, 85, 100, 200, 300, 300, 320, 300, 280, 300, 300, 300, 300, 300, 300]
                InitialValues=[0.5, 0.8, 0.9, 2.2, 2.9, 3.6, 4, 3, 1, 1.7, 1.7, 0.9, 0, 0.7, 1, 1, 1, 1]
              Solute NH4: InitialValuesUnits=kg/ha; WaterTableConcentration=0; D0=0.05; Exco=[1, 1, 1, 1, 1, 1, 1, 1, 1, 1, 1, 1, 1, 1, 1, 1]; FIP=[1, 1, 1, 1, 1, 1, 1, 1, 1, 1, 1, 1, 1, 1, 1, 1]; DepthConstant=0; MaxDepthSoluteAccessible=0; RunoffEffectivenessAtMovingSolute=0; MaxEffectiveRunoff=0
                Thickness=[37, 38, 50, 90, 85, 100, 200, 300, 300, 320, 300, 280, 300, 300, 300, 300, 300, 300]
                InitialValues=[1.5, 1.5, 1.4, 0.6, 0.5, 4.2, 4.1, 4.4, 4.1, 0.3, 0.1, 0.8, 0, 1, 1, 1, 1, 1]
              Solute Urea: InitialValues=[0, 0, 0, 0, 0, 0, 0, 0, 0, 0, 0, 0, 0, 0, 0, 0, 0, 0]; InitialValuesUnits=kg/ha; WaterTableConcentration=0; D0=0.05; Exco=[0, 0, 0, 0, 0, 0, 0, 0, 0, 0, 0, 0, 0, 0, 0, 0]; FIP=[1, 1, 1, 1, 1, 1, 1, 1, 1, 1, 1, 1, 1, 1, 1, 1]; DepthConstant=0; MaxDepthSoluteAccessible=0; RunoffEffectivenessAtMovingSolute=0; MaxEffectiveRunoff=0
                Thickness=[37, 38, 50, 90, 85, 100, 200, 300, 300, 320, 300, 280, 300, 300, 300, 300, 300, 300]
            Plant maize: ResourceName=Maize
            Plant soybean: ResourceName=Soybean
            Report Outputfile: EventNames=[Clock].EndOfDay
              VariableNames:
                [Clock].Today
                ([Maize].AboveGround.Wt + [Soybean].AboveGround.Wt)*10 as CropBiomass
                ([Maize].Grain.Wt + [Soybean].Grain.Wt)*10 as CropYield
                [SurfaceOrganicMatter].Wt
                [SWIM].WaterTable
                [SWIM].SubsurfaceDrain
                [SWIM].SubsurfaceDrainNO3
                ([SWIM].SW[3]*0.5 + [SWIM].SW[4]*0.5) as SW_15cm
                ([SWIM].SW[6]*0.65 + [SWIM].SW[7]*0.35) as SW_45cm
                [SWIM].SW[12] as SW_200cm
                [SWIM].Drainage
                sum([SoilCobs].Nutrient.NO3.kgha[1:5]) as NO3_030cm
                sum([SoilCobs].Nutrient.NO3.kgha[6:7]) as NO3_3060cm
                sum([SWIM].SWmm[1:12]) as SW_02m
                Sum of [SWIM].SubsurfaceDrain from 1-Jan to 31-Dec as Annual_tile_drainage
                Sum of [SWIM].SubsurfaceDrainNO3 from 1-Jan to 31-Dec as Annual_tile_drainage_no3//
                [CalculateRollingWaterBalance].Script.WaterBalanceCumulative as WaterBalanceCumulative
        Simulation System_14
          Clock: Start=2006-01-01; End=2019-12-31
          Weather: FileName=KelleyNov2021.met
          SoilArbitrator
          MicroClimate: a_interception=0; b_interception=1; c_interception=0; d_interception=0; SoilHeatFluxFraction=0.4; MinimumHeightDiffForNewLayer=0; NightInterceptionFraction=0.5; ReferenceHeight=2
          Summary summaryfile
          Zone paddock: Area=1; Slope=0; AspectAngle=0; Altitude=50
            Folder DeadScripts (disabled)
              Manager SpecialReporter
```csharp
using Models.Soils;
using System;
using Models.Core;
namespace Models
{
    [Serializable]
    [System.Xml.Serialization.XmlInclude(typeof(Model))]
    public class Script : Model
    {

    /*
      
   [Link] Paddock MyPaddock; // Can be used to dynamically get access to simulation structure and variables
   [Input] DateTime Today;   // Equates to the value of the current simulation date - value comes from CLOCK
   [Param] string date;         // The value for this will come from the Properties page.
   [Param] string date2;
   
   [Event] public event NullTypeDelegate SpecialReport;
   [Event] public event NullTypeDelegate SpecialReport2;

   
   // The following event handler will be called once at the beginning of the simulation
   [EventHandler] public void OnInitialised()
   {
      
   }
      
   // The following event handler will be called each day at the beginning of the day
   [EventHandler] public void OnPrepare()
   {
      if (DateUtility.DatesEqual(date, Today))
         SpecialReport.Invoke();
      
      if (DateUtility.DatesEqual(date2, Today))
         SpecialReport2.Invoke();
   }
   

*/
    }
}
```
              Manager WaterTable script
                script: same as in Validation.TileDrainageAndWaterTable.Systems 13 and 14.System_13.paddock.DeadScripts.WaterTable script
              Manager System Variables
                script: same as in Validation.TileDrainageAndWaterTable.Systems 13 and 14.System_13.paddock.DeadScripts.WaterTable script
              Manager InitialiseWaterTableOnce
              Manager InstallTileDrainage
                script: same as in Validation.TileDrainageAndWaterTable.Systems 13 and 14.System_13.paddock.DeadScripts.WaterTable script
              Manager OxdefRUEDamageSoybean: same as Validation.TileDrainageAndWaterTable.Systems 13 and 14.System_13.paddock.DeadScripts.OxdefRUEDamageSoybean
              Manager OxdefRUEDamagemaize: same as Validation.TileDrainageAndWaterTable.Systems 13 and 14.System_13.paddock.DeadScripts.OxdefRUEDamageSoybean
              Manager WinterTileClose
                script: same as in Validation.TileDrainageAndWaterTable.Systems 13 and 14.System_13.paddock.DeadScripts.WaterTable script
            Manager SWIMSetLowerBC
              LowerBCType = potential
              LowerBCValue = 2700
```csharp
using Models.Climate;
using APSIM.Shared.Utilities;
using Models.Soils.Nutrients;
using Models.Soils;
using Models.PMF;
using Models.Core;
using System.Xml.Serialization;
using System;
using Models.AgPasture;
using Models.Interfaces;

namespace Models
{
    [Serializable] 
    [System.Xml.Serialization.XmlInclude(typeof(Model))]
    public class Script : Model
    {
        [Link] Clock clock;
        [Link] ISummary summary;
        [Link] private Swim3 swim;
        
        public enum LowerBCTypeOptions {gradient,seepage,potential};

        [Separator("Sets the lower boundary condition type (and value if set to 'potential' for SWIM3. The change is applied at the beginning of the first day of the simulation.")]
        [Description("What lower boundary condition is wanted?")] 
        public LowerBCTypeOptions LowerBCType { get; set; }
        
        [Description("If 'potential', then what potential? Should be negative (mm) ")]
        [Display(EnabledCallback = "IsPotential")] 
        public double LowerBCValue { get; set; }
        
        /// <summary></summary>
        public bool IsPotential => LowerBCType == LowerBCTypeOptions.potential;
        

        public double SoilWaterStart  { get; set; }
        public double SoilWaterEnd  { get; set; }

        [EventSubscribe("DoManagement")]
        private void DoDailyCalculations(object sender, EventArgs e)
        {
            if (clock.Today == clock.StartDate)
            {
                summary.WriteMessage(this, "Script is setting lower boundary condition to " + LowerBCType, MessageType.Diagnostic);
                if (LowerBCType == LowerBCTypeOptions.gradient)
                    swim.SetLowerBCForGradient(bbcGradient: 0.0);   // in cm/cm (ibbc=0) Note that this is the default setting
                else if (LowerBCType == LowerBCTypeOptions.potential)
                //  convert to cm (ibbc=1), DUL is -100 cm so values more positive will often result in inflow to the bottom of the soil profile. Input in mm so divide here.
                    swim.SetLowerBCForGivenPotential(bbcPotential: LowerBCValue /10.0 );    
                else if (LowerBCType == LowerBCTypeOptions.seepage)
                    swim.SetLowerBCForSeepage(bbcPotentialSeepage: 0.0);  // in cm (ibbc=3). This is for zero-tension lysimeters
                else
                    throw new Exception("Wrong lower boundary condition type");
            }
        }
    }
}
```
            Manager N Deposition
              PPM = 0.0078
```csharp
using Models.Soils;
using System;
using Models.Climate;
using Models.Core;
using Models.PMF;
namespace Models
{
    [Serializable]
    [System.Xml.Serialization.XmlInclude(typeof(Model))]
    public class Script : Model
    {
        [Link] Clock Clock;
        [Link] Weather Weather;
        [Link] Fertiliser Fertiliser;

        [Description("Rainfall NO3N ppm.")]
        public double PPM { get; set; }

        [Description("Nitrogen deposited by rainfall.")]
        public double NDeposited { get => deposition; }
        
        private double deposition;
        [EventSubscribe("DoManagement")]
        private void OnDoManagement(object sender, EventArgs e)
        {
            deposition = Weather.Rain * PPM;
            if (deposition > 0)
                Fertiliser.Apply(deposition, Fertiliser.Types.NO3N, doOutput: false); 
        }
    }
}
```
            Operations Mgt_system14
              //   year
              2006-05-03  [SurfaceOrganicMatter].Incorporate(fraction: 0.01, depth: 150)
              2006-05-15  [Fertiliser].Apply(84, Fertiliser.Types.UreaN, 50)
              2006-05-15  [Maize].Sow(cultivar: Laila, population: 7, depth: 50, rowSpacing:760)
              2006-10-18  [Maize].Harvest
              2006-10-18  [Maize].EndCrop
              2006-11-11  [SurfaceOrganicMatter].Incorporate(fraction: 0.5, depth: 250)
              2007-04-15  [Fertiliser].Apply(29, Fertiliser.Types.UreaN, 50)
              2007-04-22  [SurfaceOrganicMatter].Incorporate(fraction: 0.01, depth: 150)
              2007-05-18  [Soybean].Sow(cultivar: Generic_MG2, population: 30.5, depth: 50, rowSpacing:760)
              2007-10-17  [Soybean].Harvest
              2007-10-17  [Soybean].EndCrop
              2008-05-15  [Fertiliser].Apply(72, Fertiliser.Types.NH4NO3N, 150)
              2008-06-24  [Fertiliser].Apply(101, Fertiliser.Types.NH4NO3N, 150)
              2008-05-15  [Maize].Sow(cultivar: Laila, population: 7.9, depth: 50, rowSpacing:760)
              2008-10-12  [Maize].Harvest
              2008-10-12  [Maize].EndCrop
              2008-11-11  [SurfaceOrganicMatter].Incorporate(fraction: 0.01, depth: 150)
              2009-05-08  [Soybean].Sow(cultivar: Generic_MG2, population: 30, depth: 50, rowSpacing:750)
              2009-09-25  [Soybean].Harvest
              2009-09-25  [Soybean].EndCrop
              2010-05-06  [Fertiliser].Apply(87, Fertiliser.Types.UreaN, 150)
              2010-06-17  [Fertiliser].Apply(18, Fertiliser.Types.UreaN, 150)
              2010-05-06  [Maize].Sow(cultivar: Laila, population: 7.9, depth: 50, rowSpacing:760)
              2010-09-19  [Maize].Harvest
              2010-09-19  [Maize].EndCrop
              2011-05-11  [Soybean].Sow(cultivar: Generic_MG2, population: 30, depth: 50, rowSpacing:750)
              2011-09-10  [Soybean].Harvest
              2011-09-10  [Soybean].EndCrop
              2012-05-11  [Fertiliser].Apply(87, Fertiliser.Types.UreaN, 150)
              2012-06-12  [Fertiliser].Apply(134, Fertiliser.Types.UreaN, 150)
              2012-05-11  [Maize].Sow(cultivar: Laila, population: 7.9, depth: 50, rowSpacing:760)
              2012-09-22  [Maize].Harvest
              2012-09-22  [Maize].EndCrop
              2013-04-15  [Fertiliser].Apply(29, Fertiliser.Types.UreaN, 50)
              2013-05-17  [Soybean].Sow(cultivar: Generic_MG2, population: 30, depth: 50, rowSpacing:750)
              2013-09-10  [Soybean].Harvest
              2013-09-10  [Soybean].EndCrop
              2014-05-20  [Fertiliser].Apply(78, Fertiliser.Types.UreaN, 150)
              2014-06-16  [Fertiliser].Apply(105, Fertiliser.Types.UreaN, 150)
              2014-05-20  [Maize].Sow(cultivar: Laila, population: 7.9, depth: 50, rowSpacing:760)
              2014-09-10  [Maize].Harvest
              2014-09-10  [Maize].EndCrop
              2015-06-02  [Soybean].Sow(cultivar: Generic_MG2, population: 30, depth: 50, rowSpacing:750)
              2015-10-13  [Soybean].Harvest
              2015-10-13  [Soybean].EndCrop
              2016-04-15  [Fertiliser].Apply(29, Fertiliser.Types.UreaN, 50)
              2016-05-03  [SurfaceOrganicMatter].Incorporate(fraction: 0.01, depth: 150)
              2016-05-18  [Fertiliser].Apply(84, Fertiliser.Types.UreaN, 50)
              2016-05-18  [Maize].Sow(cultivar: Laila, population: 9.4, depth: 50, rowSpacing:760)
              2016-06-15  [Fertiliser].Apply(44, Fertiliser.Types.UreaN, 50)
              2016-10-11  [Maize].Harvest
              2016-10-11  [Maize].EndCrop
              2016-11-11  [SurfaceOrganicMatter].Incorporate(fraction: 0.01, depth: 150)
              2017-04-22  [SurfaceOrganicMatter].Incorporate(fraction: 0.01, depth: 150)
              2017-05-30  [Soybean].Sow(cultivar: Generic_MG2, population: 20, depth: 50, rowSpacing:760)
              2017-10-19  [Soybean].Harvest
              2017-10-19  [Soybean].EndCrop
              2018-05-03  [SurfaceOrganicMatter].Incorporate(fraction: 0.01, depth: 150)
              2018-05-16  [Fertiliser].Apply(80, Fertiliser.Types.UreaN, 50)
              2018-05-17  [Maize].Sow(cultivar: Laila, population: 8.6, depth: 50, rowSpacing:760)
              2018-06-18  [Fertiliser].Apply(115, Fertiliser.Types.UreaN, 50)
              2018-10-17  [Maize].Harvest
              2018-10-17  [Maize].EndCrop
              2018-11-11  [SurfaceOrganicMatter].Incorporate(fraction: 0.01, depth: 250)
              2019-04-14  [Fertiliser].Apply(30, Fertiliser.Types.NH4N, 50)
              2019-04-22  [SurfaceOrganicMatter].Incorporate(fraction: 0.01, depth: 250)
              2019-06-10  [Soybean].Sow(cultivar: Generic_MG2, population: 32, depth: 50, rowSpacing:760)
              2019-10-27  [Soybean].Harvest
              2019-10-27  [Soybean].EndCrop
            Fertiliser
            SurfaceOrganicMatter: InitialResidueName=soybean; InitialResidueType=soybean; InitialResidueMass=1400; InitialStandingFraction=0; InitialCPR=0; InitialCNR=36.5
            Soil SoilCobs: DataSource=CSIRO Sustainable Ecosystems, Toowoomba
              Comments=Soil naming structure: \State\Region\Classification-Local Name (Site/district and locator number); oc and ph estimated
              Physical: same as Validation.TileDrainageAndWaterTable.Systems 13 and 14.System_13.paddock.SoilCobs.Physical
              Organic: same as Validation.TileDrainageAndWaterTable.Systems 13 and 14.System_13.paddock.SoilCobs.Organic
              Chemical: same as Validation.TileDrainageAndWaterTable.Systems 13 and 14.System_13.paddock.SoilCobs.Chemical
              Water: FilledFromTop=false
                Thickness=[37, 38, 50, 90, 85, 100, 200, 300, 300, 320, 300, 280, 300, 300, 300, 300, 300, 300]
                InitialValues=[0.263, 0.296, 0.256, 0.254, 0.293, 0.252, 0.252, 0.296, 0.296, 0.296, 0.296, 0.274, 0.274, 0.274, 0.274, 0.274, 0.274, 0.274]
              Swim3 Swim: Salb=0.13; CN2Bare=65; CNRed=20; CNCov=0.8; KDul=0.3; PSIDul=-300; VC=true; DTMin=0; DTMax=60; MaxWaterIncrement=2; SpaceWeightingFactor=0; SoluteSpaceWeightingFactor=0; Dis=0; Disp=0; A=0; DTHC=0; DTHP=0; Diagnostics=false
                SwimSubsurfaceDrain: DrainDepth=1070; DrainSpacing=13500; DrainRadius=52; Klat=1000; ImpermDepth=3900
              CERESSoilTemperature Temperature
              Nutrient
              Solute NO3: InitialValuesUnits=ppm; WaterTableConcentration=0; D0=0.05; Exco=[0, 0, 0, 0, 0, 0, 0, 0, 0, 0, 0, 0, 0, 0, 0, 0]; FIP=[1, 1, 1, 1, 1, 1, 1, 1, 1, 1, 1, 1, 1, 1, 1, 1]; DepthConstant=0; MaxDepthSoluteAccessible=0; RunoffEffectivenessAtMovingSolute=0; MaxEffectiveRunoff=0
                Thickness=[37, 38, 50, 90, 85, 100, 200, 300, 300, 320, 300, 280, 300, 300, 300, 300, 300, 300]
                InitialValues=[1.08108, 1.68421, 1.44, 1.95556, 2.72941, 2.66667, 1.48148, 0.644745, 0.214915, 0.342521, 0.365356, 0.194805, 0, 0.141414, 0.20202, 0.20202, 0.20202, 0.20202]
              Solute NH4: InitialValuesUnits=ppm; WaterTableConcentration=0; D0=0.05; Exco=[1, 1, 1, 1, 1, 1, 1, 1, 1, 1, 1, 1, 1, 1, 1, 1]; FIP=[1, 1, 1, 1, 1, 1, 1, 1, 1, 1, 1, 1, 1, 1, 1, 1]; DepthConstant=0; MaxDepthSoluteAccessible=0; RunoffEffectivenessAtMovingSolute=0; MaxEffectiveRunoff=0
                Thickness=[37, 38, 50, 90, 85, 100, 200, 300, 300, 320, 300, 280, 300, 300, 300, 300, 300, 300]
                InitialValues=[3.24324, 3.15789, 2.24, 0.533333, 0.470588, 3.11111, 1.51852, 0.945626, 0.881152, 0.0604449, 0.0214915, 0.17316, 0, 0.20202, 0.20202, 0.20202, 0.20202, 0.20202]
              Solute Urea: same as Validation.TileDrainageAndWaterTable.Systems 13 and 14.System_13.paddock.SoilCobs.Urea
            Plant maize: ResourceName=Maize
            Plant soybean: ResourceName=Soybean
            Report Outputfile: EventNames=[Clock].EndOfDay
              VariableNames:
                [Clock].Today
                ([Maize].AboveGround.Wt + [Soybean].AboveGround.Wt)*10 as CropBiomass
                ([Maize].Grain.Wt + [Soybean].Grain.Wt)*10 as CropYield
                [SurfaceOrganicMatter].Wt
                [SWIM].WaterTable
                [SWIM].SubsurfaceDrain
                [SWIM].SubsurfaceDrainNO3
                ([SWIM].SW[3]*0.5 + [SWIM].SW[4]*0.5) as SW_15cm
                ([SWIM].SW[6]*0.65 + [SWIM].SW[7]*0.35) as SW_45cm
                [SWIM].SW[12] as SW_200cm
                [SWIM].Drainage
                sum([SoilCobs].Nutrient.NO3.kgha[1:5]) as NO3_030cm
                sum([SoilCobs].Nutrient.NO3.kgha[6:7]) as NO3_3060cm
                sum([SWIM].SWmm[1:12]) as SW_02m
                Sum of [SWIM].SubsurfaceDrain from 1-Jan to 31-Dec as Annual_tile_drainage
                Sum of [SWIM].SubsurfaceDrainNO3 from 1-Jan to 31-Dec as Annual_tile_drainage_no3
                [Clock].Today.Year
                [Clock].Today.Month
                [Clock].Today.DayOfYear
  Folder Sensibility
    Folder LowerBoundaryConditions
      Memo Memo Lower BC
        https://www.apsim.info/documentation/model-documentation/soil-modules-documentation/swimv2-1/

        # Overview

        SWIM3 (Huth et al., 2012) allows three of the four lower boundary conditions described in Verburg et al. (1996) as described below. The zero flux lower boundary condition has not been enabled.

        All references to "SWIM" here refer to the highly detailed documentation by Verburg et al. (1996) of the standalone model that has morphed over the years into SWIM3. Verburg et al. remains the definitive documentation and should be referred to for detail.

        See the "SWIM3_SetLowerBC" Manager script (to be found in both the SWIM3 example and in the Manager toolbox) for examples of how to change lower boundary conditions.

        ## SetLowerBCForGradient(bbcGradient)

        A constant gradient in soil water potential with depth is the default lower boundary condition and is applicable to most 'open field' simulations where there is free drainage from the soil. This option is ibbc = 0 in SWIM3. This lower boundary condition setting must be accompanied by the value of that gradient. This is done using a command in a Manager script along the lines of:

        	SetLowerBCForGradient(bbcGradient);

        where bbcGradient is a double (real) variable with the value of the required gradient in soil water potential with depth in the soil. The set value remains in place until the user resets it.
        Gravity is added to bbcGradient so the most common setting is bbcGradient = 0.0 which means that there is no gradient of soil water potential. In this case, water moves under the influence of gravity alone at the lower boundary. This is the default for SWIM3 and will prevail unless the user intervenes.
        Other gradients can be set. For example, setting bbcGradient = -1.0 will set the soil water potential gradient to counteract the effect of gravity and will essentially set a no-flow lower boundary (which is likely to result in an unstable simulation).

        ## SetLowerBCForGivenPotential(bbcPotential)

        This lower boundary condition sets a constant soil water potential at the lowest node in the simulation. Note that soil water potential is in units of cm (although units of mm are used on the user interface) and is negative in unsaturated soils. This option can be useful for mimicking the effect of a water table at the base of the simulation by setting a positive value equal to the height difference between the water table and the bottom of the simulated soil profile. Note that in this setting, water will be added to the simulation at the lower boundary as needed to maintain the user set soil water potential.
        See the Manager script "SWIM3_SetLowerBC" for an example:

        	SetLowerBCForGivenPotential(bbcPotential);

        where bbcPotential is the required potential as a double variable in cm. this setting is equivalent to ibbc = 1 in SWIM.

        ## SetLowerBCForSeepage(bbcPotentialSeepage)

        A seepage lower boundary is a condition where no drainage can occur until a user-set head of water (i.e., a depth of saturated soil) of bbcPotentialSeepage accumulates at the base of the soil profile. Once that head is reached drainage occurs at the rate allowed by the saturated soil water conductivity under gravity only until the head falls below the user-set value. This lower boundary condition is that of ibbc = 3 in SWIM. A common usage of this boundary condition is when simulating a zero-tension (i.e., free to the atmosphere) lysimeter and in this case bbcPotentialSeepage = 0.0. See an example in "SWIM3_SetLowerBC":

        	SetLowerBCForSeepage(bbcPotentialSeepage);

        where bbcPotentialSeepage is in cm.

        ## Testing

        The simulation below runs a simple pasture simulation in an irrigated environment with lower boundary conditions of a unit gradient (“Gradient”), zero-tension seepage as in a lysimeter (“Seepage”), and a set water potential of -500 mm (so wetter than the drained upper limit, “Potential”).

        The simulation contains a Manager component to check for preservation of mass in the water balance (“CalculateRollingWaterBalance”). This component calculates daily and cumulative water balances to test for errors and drift. First the component adds up the daily water inputs (rain, irrigation), outputs (drainage, **tile drainage**, soil water evaporation, runoff, plant water uptake), and change in water storage from the start to the end of the day. Here, storage is both the water in the soil and that in any surface pond. The water balance is the water added, minus water removed, minus the increase in water stored. Note that this water balance component is generic and can be added to any simulation.

        Several plots have been produced.

        **Daily WaterBalance** shows that the largest absolute daily error in the water balance is less than 0.0003 mm and that there are more positive errors (water ‘lost’ in the simulation) than negative errors. Following this to the **Cumulative WaterBalance** shows the effect of the lop-sided daily errors but is reassuring in that the cumulative error is less than 0.02 mm even after six years of simulation.

        **WaterStored** shows the amount of water stored in the soil (none of these simulations included ponding conditions). As expected, the Potential simulation has the highest water storage because the lower boundary potential of -500 mm is wetter than the drained upper limit and water is regularly being added into the simulation to maintain that water potential. The Seepage simulation holds slightly more water in the soil than the Gradient simulation because in Seepage drainage cannot occur until the lower boundary soil water potential rises to zero. That need to the water potential to rise to zero before draining means that some water must accumulate at the base of the soil while the potential is rising and so it allows more time for plants to access the water before it eventually drains. The outcome is that there will generally be somewhat less drainage when a seepage lower boundary condition is set compared to the default unit gradient boundary condition.

        **PsiOfLowestLayer** shows the time series of soil water potential in the lower layer. In Potential it is the prescribed -50 cm (note that SWIM3’s outputs of psi are in cm rather than mm – something that might be fixed in the future perhaps). Seepage maintains a higher value of Psi than Gradient for most of the simulation as expected.

        **Gradient**, **Seepage** and **Potential** detail the time series of soil water potential in the lowest layer against drainage for each boundary condition type. Close examination of **Seepage** shows that drainage is only present when the potential is zero. Note that the drainage is the sum of that during the day while the potential is that at the end of the day so it is possible that there was some drainage during the day but a slightly negative potential at the end of the day. One feature of this boundary condition is the absence of the almost-daily small (< 1mm /day) drainage amounts that are seen in **Gradient**. The negative drainage in **Potential** is the result of inflow to maintain the -500 mm soil water potential at the lower boundary. **Drainage** and **CumulativeDrainage** show the effects of the boundary conditions more clearly.

        In these simulations there is no difference in **WaterUptake** across the boundary conditions (because the simulations are well irrigated). In the absence of irrigation it would be expected that their would be higher water uptake in the seepage and potential (given a value of -500 mm) boundary conditions as they hold more water in the soil (see **WaterStored**) for the bulk of the simulation duration.

        Only the constant potential boundary condition resulted in any **Runoff** (the simulations are in a relatively dry environment with a highly permeable soil). The irrigation setting for the simulations was based on soil water deficit. Therefore, as might be expected, **Irrigation** (see also ** CumulativeIrrigation**) commenced later in each season for the constant potential boundary condition and less irrigation was applied. Also as expected, slightly more irrigation was applied to the constant gradient simulation than the seepage simulation.
      Experiment E1
        Factors
          CompositeFactor Gradient
            Specifications:
              [SWIM3_SetLowerBC].Script.LowerBCType=gradient
              [SWIM3].MaxWaterIncrement=1
          CompositeFactor Seepage
            Specifications:
              [SWIM3_SetLowerBC].Script.LowerBCType=seepage
              [SWIM3].MaxWaterIncrement=5
              [SWIM3].DTMax = 30
          CompositeFactor Potential
            Specifications:
              [SWIM3_SetLowerBC].Script.LowerBCType=potential
              [SWIM3_SetLowerBC].Script.LowerBCValue=-1000
              [SWIM3].MaxWaterIncrement=5
              [SWIM3].DTMax = 30
        Simulation Base_LowerBC
          Weather: FileName=..\..\..\Examples\WeatherFiles\lincoln.met
          Clock: Start=2000-01-01; End=2005-01-31
          Summary summaryfile
          SoilArbitrator
          MicroClimate: a_interception=0; b_interception=0; c_interception=0; d_interception=0; SoilHeatFluxFraction=0; MinimumHeightDiffForNewLayer=0; NightInterceptionFraction=0; ReferenceHeight=2
          Forages
            Parameters:
              Name                          IsLive  DigestibilityString  FractionConsumable  MinimumAmount  UseDigestibilityFromModel
              SurfaceOrganicMatter.Residue  true    0.7                  0                   100            false
              SurfaceOrganicMatter.Residue  false   0.3                  0                   0              false
              AGPRyegrass.Leaf              true    0.7                  1                   100            false
              AGPRyegrass.Leaf              false   0.3                  1                   0              false
              AGPRyegrass.Stem              true    0.7                  1                   100            false
              AGPRyegrass.Stem              false   0.3                  1                   0              false
              AGPRyegrass.Stolon            true    0.7                  1                   100            false
              AGPRyegrass.Stolon            false   0.3                  1                   0              false
              AGPWhiteClover.Leaf           true    0.7                  1                   100            false
              AGPWhiteClover.Leaf           false   0.3                  1                   0              false
              AGPWhiteClover.Stem           true    0.7                  1                   100            false
              AGPWhiteClover.Stem           false   0.3                  1                   0              false
              AGPWhiteClover.Stolon         true    0.7                  1                   100            false
              AGPWhiteClover.Stolon         false   0.3                  1                   0              false
          Zone paddock: Area=1; Slope=0; AspectAngle=0; Altitude=50
            Manager CalculateRollingWaterBalance
            Manager CalculateRollingSoilNitrogenBalance
```csharp
using Models.Climate;
using APSIM.Shared.Utilities;
using Models.Soils.Nutrients;
using Models.Soils;
using Models.PMF;
using Models.Core;
using System.Xml.Serialization;
using System;
using Models.AgPasture;
using Models.Interfaces;
using System.Linq;

namespace Models
{
    [Serializable] 
    [System.Xml.Serialization.XmlInclude(typeof(Model))]
    public class Script : Model
    {
        [Link] Clock clock;
        [Link] ISummary summary;
        [Link] IWeather weather;
        [Link] Irrigation irrigation;
        [Link] private ISoilWater waterBalance;  // and I think this will give solutes as well
        [Link] private IPlant[] plants;
        [Link] private Nutrient nutrient;

  
        // add (no3+nh4) uptake as N uptake to IPlant

        public double NBalanceCumulative  { get; set; }
        public double NBalanceToday  { get; set; }

        public double SoilNAtInitialisation  { get; set; }
        public double SoilNYesterday  { get; set; }
        public double SoilNNow  { get; set; }

        public double PlantNUptake { get; set; }

        public double NAddedToday  { get; set; }
        public double NRemovedToday  { get; set; }
        public double NAddedCumulative  { get; set; }
        public double NRemovedCumulative  { get; set; }



        [EventSubscribe("DoDailyInitialisation")]
        private void DoDailyInitialisation(object sender, EventArgs e)
        {
            if (clock.Today == clock.StartDate) 
            {
                // capture the N in and on the soil as a starting point
                // doing this here as need the models to have intialised first
                SoilNAtInitialisation = 0.0; // leave this here as a reminder that once surface solutes are enabled will have to add here
                //SoilNAtInitialisation += nutrient.Urea.kgha.Sum() + nutrient.NH4.kgha.Sum() + nutrient.NO3.kgha.Sum() + nutrient.TotalN.Urea.kgha.Sum() ;// + nutrient.
                //for (int i = 0; i < waterBalance.SWmm.Length; i++)
                    //SoilNAtInitialisation += waterBalance...SWmm[i];

                //SoilWaterYesterday = SoilWaterAtInitialisation;        
                //WaterAddedCumulative = 0.0;
                //WaterRemovedCumulative = 0.0;
                //SoilWaterNow = 0.0;
            }
            else
            {
                //SoilWaterYesterday = SoilWaterNow;        // SoilWaterNow holds the value calculated at reporting yesterday
                //WaterAddedToday = 0.0;
                //WaterRemovedToday = 0.0;
            }
        }

        //[EventSubscribe("DoReportCalculations")]
        private void DoReportCalculations(object sender, EventArgs e)
        {
            /* All the WaterBalance variables should be zero. A positive value is a generation of water.
            SoilWaterNow = waterBalance.Pond;
            for (int i = 0; i < waterBalance.SWmm.Length; i++)
                SoilWaterNow += waterBalance.SWmm[i]; // so all the water stored in or on the soil

            WaterAddedToday = weather.Rain + irrigation.IrrigationApplied;   // Can there be runon? Probably not but this will throw an error if that ever happens
            WaterAddedCumulative+= WaterAddedToday;

            WaterRemovedToday = waterBalance.Drainage + waterBalance.Es + waterBalance.Runoff;
            PlantWaterUptake = 0.0;
            foreach (var plant in plants)
                PlantWaterUptake += plant.WaterUptake.Sum();

            WaterRemovedToday += PlantWaterUptake;
            // Need to add subsurface drainage here

            WaterRemovedCumulative += WaterRemovedToday;

            WaterBalanceToday = WaterAddedToday - WaterRemovedToday - (SoilWaterNow - SoilWaterYesterday);
            WaterBalanceCumulative = WaterAddedCumulative - WaterRemovedCumulative - (SoilWaterNow - SoilWaterAtInitialisation);
            // need to add a warning value and a crash value and make a crash
        */}
    }
}
```
            Manager SWIM3_SetLowerBC
              LowerBCType = potential
              LowerBCValue = -500
```csharp
using Models.Climate;
using APSIM.Shared.Utilities;
using Models.Soils.Nutrients;
using Models.Soils;
using Models.PMF;
using Models.Core;
using System.Xml.Serialization;
using System;
using Models.AgPasture;
using Models.Interfaces;

namespace Models
{
    [Serializable] 
    [System.Xml.Serialization.XmlInclude(typeof(Model))]
    public class Script : Model
    {
        [Link] Clock clock;
        [Link] ISummary summary;
        [Link] private Swim3 swim;
        //[Link] private PastureSpecies ryegrass;
        //[Link] private SimpleGrazing grazing;
        
        public enum LowerBCTypeOptions {gradient,seepage,potential};

        [Separator("Sets the lower boundary condition type (and value if set to 'potential' for SWIM3. The change is applied at the beginning of the first day of the simulation.")]
        [Description("[Get a dropdown] What lower boundary condition is wanted?")] public LowerBCTypeOptions LowerBCType { get; set; }
        [Description("If 'potential', then what potential? Should be negative (mm) ")] public double LowerBCValue { get; set; }

        public double SoilWaterStart  { get; set; }
        public double SoilWaterEnd  { get; set; }

        [EventSubscribe("DoDailyInitialisation")]
        private void DoDailyInitialisation(object sender, EventArgs e)
        {
        }

        [EventSubscribe("DoReportCalculations")]
        private void DoReportCalculations(object sender, EventArgs e)
        {
        }

        [EventSubscribe("DoManagement")]
        private void DoDailyCalculations(object sender, EventArgs e)
        {
            if (clock.Today == clock.StartDate)
            {
                summary.WriteMessage(this, "Script is setting lower boundary condition to " + LowerBCType, MessageType.Diagnostic);
                if (LowerBCType == LowerBCTypeOptions.gradient)
                    swim.SetLowerBCForGradient(bbcGradient: 0.0);   // in cm/cm (ibbc=0) Note that this is the default setting
                else if (LowerBCType == LowerBCTypeOptions.potential)
                    swim.SetLowerBCForGivenPotential(bbcPotential: LowerBCValue /10.0 );    //  convert to cm (ibbc=1), DUL is -100 cm so values more positive will often result in inflow to the bottom of the soil profile. Input in mm so divide here.
                else if (LowerBCType == LowerBCTypeOptions.seepage)
                    swim.SetLowerBCForSeepage(bbcPotentialSeepage: 0.0);  // in cm (ibbc=3). This is for zero-tension lysimeters
                else
                    throw new Exception("Wrong lower boundary condition type");
            }
        }
    }
}
```
            Manager AutomaticIrrigation
              allowIrrigation = True
              seasonStart = 1-sep
              seasonEnd = 30-mar
              seasonsAllocation = 10000
              triggerDeficit = 80
              targetDeficit = 100
              returndays = 3
              maximumAmount = 30
              depthPAWC = 300
```csharp
using Newtonsoft.Json;
using APSIM.Shared.Utilities;
using System.Xml.Serialization;
using Models.Soils;
using Models.PMF;
using Models.Core;
using System;
using Models.Interfaces;



        
namespace Models
{
    [Serializable] 
    [System.Xml.Serialization.XmlInclude(typeof(Model))]
    public class Script : Model
    {
        [Link] private ISummary summary;
        [Link] private Irrigation Irrigation;
        [Link] private Clock Clock;
        [Link] private Soil Soil;
        [Link(IsOptional = true)] private IPlant existingCrop;
        private DateTime StartDate;
        private DateTime EndDate;
        private double TopDUL;
        private double TopLL;
        private int nLayers;
        [Link]
        private IPhysical soilPhysical;
        [Link]
        private ISoilWater waterBalance;
        //Communication to other modules
       
        //User inputs from properties tab
        [Description("Turn irrigation on?")]
        public bool allowIrrigation { get; set; }
        [Description("Start of irrigation season (dd-MMM)")]
        public string seasonStart { get; set; }
        [Description("End of irrigation season (dd-MMM)")]
        public string seasonEnd { get; set; }
        [Description("Season allocation (mm)")]
        public double seasonsAllocation { get; set; }
        [Description("Deficit to trigger irrigation (% PAWC)")]
        public double triggerDeficit { get; set; }
        [Description("Deficit to stop irrigaton (% PAWC)")]
        public double targetDeficit { get; set; }
        [Description("Minimum days for irrigation to return")]
        public double returndays { get; set; }
        [Description("Maximum irrigation application (mm/day)")]
        public double maximumAmount { get; set; }
        [Description("Depth to calculate PAWC (mm)")]
        public double depthPAWC { get; set; }

        //Class members
        [JsonIgnore] public double TopSWdeficit { get; set; }
        [JsonIgnore] public double TopSWC { get; set; }
        [JsonIgnore] public double DaysSinceIrrigation { get; set; }
        [JsonIgnore] public double AmountToApply { get; set; }
        [JsonIgnore] public double SeasonAppliedAmount { get; set; }
        
        private bool IrrigationIsAllowed { get; set; }
        private bool SeasonIsOpen { get; set; }
        private bool CropIsActive { get; set; }
        private bool IrrigatorIsAvailable { get; set; }
        private bool SoilIsDry { get; set; }

    
        //Calculate static soil variables
        [EventSubscribe("StartOfSimulation")]
        private void OnStartOfSimulation(object sender, EventArgs e)
        {   
            //Set the season dates
            StartDate = DateTime.Parse(seasonStart + "-" + Clock.Today.Year.ToString());
            EndDate = DateTime.Parse(seasonEnd + "-" + Clock.Today.Year.ToString());
            
            //Can we irrigate at all?
            IrrigationIsAllowed = false; 
            if (allowIrrigation)
                IrrigationIsAllowed = true; 

            //Calculate soil water variables
            double depthFromSurface = 0.0;
            double fracLayer = 0.0;
            nLayers = soilPhysical.Thickness.Length;
            for (int layer = 0; layer < nLayers; layer++)
            {
                fracLayer = Math.Min(1.0, (depthPAWC - depthFromSurface) / soilPhysical.Thickness[layer]);
                TopLL += soilPhysical.LL15mm[layer] * fracLayer;
                TopDUL += soilPhysical.DULmm[layer] * fracLayer;
                depthFromSurface += soilPhysical.Thickness[layer];
                if (depthFromSurface >= depthPAWC)
                    layer = nLayers;
            }
        }
             
        //Determine daily requirement for irrigation
        [EventSubscribe("StartOfDay")]
        private void OnStartOfDay(object sender, EventArgs e)
        {
            //Can we irrigate today?          
            SeasonIsOpen = isBetween(Clock.Today, StartDate, EndDate);
            if (!SeasonIsOpen)
                SeasonAppliedAmount = 0;

            //Is there a crop in the ground that needs irrigation?
            CropIsActive = false;
            if ((existingCrop != null) && (existingCrop.IsAlive))
                CropIsActive = true;
            //if ((existingCrop.Phenology.Stage >= 3.0) && (existingCrop.Phenology.Stage < 6.0))
          
            //Is the irrigator available?
            IrrigatorIsAvailable = false;
            DaysSinceIrrigation += 1;
            if (DaysSinceIrrigation >= returndays)
                IrrigatorIsAvailable = true;
          
            //Is the soil dry enough to require irrigation?
            SoilIsDry = false;
            double depthFromSurface = 0.0;
            double fracLayer = 0.0;
            TopSWC = 0.0;
            for (int layer = 0; layer < nLayers; layer++)
            //for (int layer = 0; depthFromSurface < depthPAWC + soilPhysical.Thickness[layer]; layer++)
            {
                fracLayer = Math.Min(1.0, (depthPAWC - depthFromSurface) / soilPhysical.Thickness[layer]);
                TopSWC += waterBalance.SWmm[layer] * fracLayer;
                depthFromSurface += soilPhysical.Thickness[layer];
                if (depthFromSurface >= depthPAWC)
                    layer = nLayers;
            }
            
            TopSWdeficit = TopSWC - TopDUL;
            if (Math.Max(0.0, -TopSWdeficit) >= (TopDUL - TopLL) * (100 - triggerDeficit) / 100)
                SoilIsDry = true;
                
            //Are all the conditions ratifying irrigation
            if (IrrigationIsAllowed && SeasonIsOpen && CropIsActive && IrrigatorIsAvailable && SoilIsDry)
            {
                //Lets bloody well irrigate then!!!!
                AmountToApply = TopDUL * targetDeficit / 100 - TopSWC;
                AmountToApply = Math.Max(0.0, Math.Min(AmountToApply, seasonsAllocation - SeasonAppliedAmount));
                AmountToApply = Math.Min(AmountToApply,maximumAmount);
                Irrigation.Apply(AmountToApply);
                DaysSinceIrrigation = 0;
                SeasonAppliedAmount += AmountToApply;
            }
        }
        
        ///Checks whether theDate is between iniDate and endDate (non-year specific)
        private bool isBetween(DateTime theDay, DateTime iniDate, DateTime endDate)
        {
            bool result = false;
            if (iniDate.DayOfYear < endDate.DayOfYear)
            {
                // period is within one year, ex: summer in the northern hemisphere
                if ((theDay.DayOfYear >= iniDate.DayOfYear) && (theDay.DayOfYear <= endDate.DayOfYear))
                    result = true;
            }
            else
            {
                // period goes over the end of the year, ex: summer in the southern hemisphere
                if ((theDay.DayOfYear >= iniDate.DayOfYear) || (theDay.DayOfYear <= endDate.DayOfYear))
                    result = true;
            }
            
            return result;
        }
    }
}
```
            Soil: Latitude=0; Longitude=0
              Physical
                Thickness  ParticleSizeClay  ParticleSizeSand  ParticleSizeSilt  Rocks  BD     AirDry  LL15   DUL    SAT   KS
                60         17.61             33.77             48.62             0      0.865  0.077   0.231  0.565  0.58  216
                110        17.61             33.77             48.62             0      0.865  0.077   0.231  0.565  0.58  216
                140        17.61             33.77             48.62             0      0.865  0.077   0.231  0.565  0.58  216
                240        17.61             33.77             48.62             0      0.865  0.077   0.231  0.565  0.58  216
                150        17.61             33.77             48.62             0      0.865  0.077   0.231  0.565  0.58  216
                SoilCrop AgPRyegrassSoil: LL=[0.231, 0.231, 0.231, 0.231, 0.231]; KL=[0.1, 0.1, 0.1, 0.1, 0]; XF=[1, 1, 1, 1, 0]
                SoilCrop AgPWhiteCloverSoil: LL=[0.231, 0.231, 0.231, 0, 0]; KL=[0.1, 0.1, 0.1, 0, 0]; XF=[1, 1, 1, 0, 0]
              Nutrient
              Organic: FOMCNRatio=40; CarbonUnits=Total
                Thickness  Carbon  SoilCNRatio  FBiom  FInert  FOM
                60         8.2     12.5         0.08   0.58    92.873
                110        5.5     12.5         0.02   0.7     57.963
                140        3.3     12.5         0.015  0.77    31.811
                240        1.7     12.5         0.01   0.9     11.373
                150        1.7     12.5         0.01   0.99    0
              Chemical: Thickness=[60, 110, 140, 240, 150]; PH=[6.5, 6.5, 6.5, 6.5, 6.5]; PHUnits=Water
              Water: Thickness=[60, 110, 140, 240, 150]; InitialValues=[0.565, 0.565, 0.565, 0.565, 0.565]; RelativeTo=LL15; FilledFromTop=false
              Swim3: Salb=0.13; CN2Bare=50; CNRed=20; CNCov=0.8; KDul=1; PSIDul=-100; VC=true; DTMin=0; DTMax=60; MaxWaterIncrement=5; SpaceWeightingFactor=0; SoluteSpaceWeightingFactor=1; Dis=0; Disp=1; A=2; DTHC=0.1; DTHP=2; Diagnostics=false
              Solute Cl: InitialValuesUnits=ppm; WaterTableConcentration=0; D0=0.05; DepthConstant=0; MaxDepthSoluteAccessible=0; RunoffEffectivenessAtMovingSolute=0; MaxEffectiveRunoff=0
                Thickness  InitialValues  Exco  FIP
                60         0              0     1
                110        0              0     1
                140        0              0     1
                240        0              0     1
                150        0              0     1
              LayerStructure: Thickness=[10, 20, 30, 40, 50, 50, 50, 50, 100, 100, 50, 50, 50, 50]
              SoilTemperature
              Solute NO3: InitialValuesUnits=ppm; WaterTableConcentration=0; D0=0.05; DepthConstant=0; MaxDepthSoluteAccessible=0; RunoffEffectivenessAtMovingSolute=0; MaxEffectiveRunoff=0
                Thickness  InitialValues  Exco  FIP
                60         6.503          0     1
                110        2.101          0     1
                140        2.101          0     1
                240        1.701          0     1
                150        1.701          0     1
              Solute NH4: InitialValuesUnits=ppm; WaterTableConcentration=0; D0=0.05; DepthConstant=0; MaxDepthSoluteAccessible=0; RunoffEffectivenessAtMovingSolute=0; MaxEffectiveRunoff=0
                Thickness  InitialValues  Exco  FIP
                60         0.599          1     1
                110        0.1            1     1
                140        0.1            1     1
                240        0.1            1     1
                150        0.1            1     1
              Solute Urea: same as Validation.SeepageLysimeter.SeepageLysimeterExperiment.BaseBuckthought.Paddock.Soil.Urea
            Irrigation
            Fertiliser
            SurfaceOrganicMatter: InitialResidueName=grass; InitialResidueType=grass; InitialResidueMass=20; InitialStandingFraction=0; InitialCPR=0; InitialCNR=17
            SimpleGrazing: GrazingRotationType=0; SimpleGrazingFrequencyString=end of month; SimpleMinGrazable=0; SimpleGrazingResidual=1200; FlexibleGrazePostDM=0; FractionDefoliatedNToSoil=[90]; FractionExcretedNToDung=[0.4]; CNRatioDung=0; DepthUrineIsAdded=150; FractionPopulationDecline=0; TramplingOn=false; MaximumPropLitterMovedToSoil=0.1; PastureConsumedAtMaximumRateOfLitterRemoval=1200
            PastureSpecies AGPRyegrass: doyGermination=275; daysEmergenceToAnthesis=120; daysAnthesisToMaturity=85; degreesDayForAnthesis=1100; degreesDayForMaturity=900; daysAnnualsFactor=45; InitialShootDM=2500; InitialRootDM=500; InitialRootDepth=350; initialDMFractionsGrasses=[0.15, 0.25, 0.25, 0.05, 0.05, 0.1, 0.1, 0.05, 0, 0, 0]; initialDMFractionsForbs=[0.2, 0.2, 0.15, 0.05, 0.1, 0.15, 0.1, 0.05, 0, 0, 0]; PhotosyntheticEfficiency=0.01; PhotosynthesisCurveFactor=0.8; FractionPAR=0.5; ReferenceCO2=380; CO2EffectScaleFactor=700; CO2EffectOffsetFactor=600; CO2EffectMinimum=0.7; CO2EffectExponent=2; ReproSeasonDurationCoeff=2; ReproSeasonShouldersLengthFactor=1; ReproSeasonOnsetDurationFactor=0.6; RelativeTurnoverEmerging=2; DetachmentDroughtCoefficient=3; DetachmentDroughtEffectMin=0.1; TurnoverStockFactor=0.01; TurnoverDefoliationEffectMin=0.025; MinimumGreenLeafProp=0.8; MinimumGreenRootProp=0.5
              initialDMFractionsLegumes=[0.16, 0.23, 0.22, 0.05, 0.03, 0.05, 0.05, 0.01, 0.04, 0.08, 0.08]
              LinearInterpolationFunction FVPDFunction
            PastureSpecies AGPWhiteClover: doyGermination=275; daysEmergenceToAnthesis=120; daysAnthesisToMaturity=85; degreesDayForAnthesis=1100; degreesDayForMaturity=900; daysAnnualsFactor=45; InitialShootDM=500; InitialRootDM=250; InitialRootDepth=300; initialDMFractionsGrasses=[0.15, 0.25, 0.25, 0.05, 0.05, 0.1, 0.1, 0.05, 0, 0, 0]; initialDMFractionsForbs=[0.2, 0.2, 0.15, 0.05, 0.1, 0.15, 0.1, 0.05, 0, 0, 0]; PhotosyntheticEfficiency=0.01; PhotosynthesisCurveFactor=0.8; FractionPAR=0.5; ReferenceCO2=380; CO2EffectScaleFactor=700; CO2EffectOffsetFactor=600; CO2EffectMinimum=0.7; CO2EffectExponent=2; ReproSeasonDurationCoeff=2; ReproSeasonShouldersLengthFactor=1; ReproSeasonOnsetDurationFactor=0.6; RelativeTurnoverEmerging=2; DetachmentDroughtCoefficient=3; DetachmentDroughtEffectMin=0.1; TurnoverStockFactor=0.01; TurnoverDefoliationEffectMin=0.025; MinimumGreenLeafProp=0.8; MinimumGreenRootProp=0.5
              initialDMFractionsLegumes=[0.16, 0.23, 0.22, 0.05, 0.03, 0.05, 0.05, 0.01, 0.04, 0.08, 0.08]
              LinearInterpolationFunction FVPDFunction
            Report: EventNames=[Clock].EndOfDay
              VariableNames:
                [SWIM3_SetLowerBC].Script.LowerBCType
                [Clock].Today as Date
                [CalculateRollingWaterBalance].Script.WaterAddedToday as WaterAddedToday
                [CalculateRollingWaterBalance].Script.WaterRemovedToday as WaterRemovedToday
                [Soil].Swim3.Drainage as Drainage
                [Soil].Swim3.Runoff as Runoff
                sum([Soil].Water.MM) as WaterStored
                [Soil].Swim3.Pond as PondDepth
                [CalculateRollingWaterBalance].Script.WaterBalanceCumulative
                [CalculateRollingWaterBalance].Script.WaterBalanceToday
                [CalculateRollingWaterBalance].Script.PlantWaterUptake
                [Soil].Swim3.PSI as Psi
                [Soil].Water.Volumetric as SW
                [Irrigation].IrrigationApplied as Irrigation
                [AGPRyegrass].AboveGround.Wt + [AGPWhiteClover].AboveGround.Wt as AboveGroundBioamss
    Folder PotentialLowerBoundaryCondition
      Memo Memo Lower BC Potentials
        This series of simulations tests/demonstrates the setting of different potentials of the constant potential lower boundary condition. Values of 0, -1000 (drained upper limit), -10,000 and -100,000 mm were set. No irrigation was applied.

        The first two plots show that the water balance was acceptable. **WaterStored** shows the expected changes with varying lower boundary condition. **WaterUptake** and its cumulative show no effect of the two wetter lower boundary conditions that were pumping considerable amounts of water (see **Drainage**) into the bottom of the soil profile but water uptake was reduced in the drier two boundary conditions.
      Experiment E2
        Factors
          CompositeFactor Potential_0
            Specifications:
              [SWIM3_SetLowerBC].Script.LowerBCType=potential
              [SWIM3_SetLowerBC].Script.LowerBCValue=0
              [Swim3].MaxWaterIncrement = 1.0
          CompositeFactor Potential_1000
            Specifications:
              [SWIM3_SetLowerBC].Script.LowerBCType=potential
              [SWIM3_SetLowerBC].Script.LowerBCValue=-1000
          CompositeFactor Potential_10000
            Specifications:
              [SWIM3_SetLowerBC].Script.LowerBCType=potential
              [SWIM3_SetLowerBC].Script.LowerBCValue=-10000
          CompositeFactor Potential_100000
            Specifications:
              [SWIM3_SetLowerBC].Script.LowerBCType=potential
              [SWIM3_SetLowerBC].Script.LowerBCValue=-100000
        Simulation Base_LowerBC_Potentials
          Weather: FileName=..\..\..\Examples\WeatherFiles\lincoln.met
          Clock: Start=2000-01-01; End=2005-12-31
          Summary summaryfile
          SoilArbitrator
          MicroClimate: a_interception=0; b_interception=0; c_interception=0; d_interception=0; SoilHeatFluxFraction=0; MinimumHeightDiffForNewLayer=0; NightInterceptionFraction=0; ReferenceHeight=2
          Forages: same as Sensibility.LowerBoundaryConditions.E1.Base_LowerBC.Forages
          Zone paddock: Area=1; Slope=0; AspectAngle=0; Altitude=50
            Memo To do and notes
              The first few lines in IrrigationSchedule
              // these are only here to get the soil above saturation -

              // not working all that well because the upper BC is causing all the excess water to runoff anyway

              // can delete this probably once pond is fixed.

              Add with and without plants to the experiment. Need a more flexible Manager first? Or add and kill?

              Could be nice to be able to swap from weather to controlled environment without having to change the links in "CalculateRollingWaterBalance"
            Manager CalculateRollingWaterBalance
            Manager SWIM3_SetLowerBC
              LowerBCType = potential
              LowerBCValue = -500
```csharp
using Models.Climate;
using APSIM.Shared.Utilities;
using Models.Soils.Nutrients;
using Models.Soils;
using Models.PMF;
using Models.Core;
using System.Xml.Serialization;
using System;
using Models.AgPasture;
using Models.Interfaces;

namespace Models
{
    [Serializable] 
    [System.Xml.Serialization.XmlInclude(typeof(Model))]
    public class Script : Model
    {
        [Link] Clock clock;
        [Link] ISummary summary;
        [Link] private Swim3 swim;
        //[Link] private PastureSpecies ryegrass;
        //[Link] private SimpleGrazing grazing;
        
        public enum LowerBCTypeOptions {gradient,seepage,potential};

        [Separator("Sets the lower boundary condition type (and value if set to 'potential' for SWIM3. The change is applied at the beginning of the first day of the simulation.")]
        [Description("[Get a dropdown] What lower boundary condition is wanted?")] public LowerBCTypeOptions LowerBCType { get; set; }
        [Description("If 'potential', then what potential? Should be negative (mm) ")] public double LowerBCValue { get; set; }

        public double SoilWaterStart  { get; set; }
        public double SoilWaterEnd  { get; set; }

        [EventSubscribe("DoDailyInitialisation")]
        private void DoDailyInitialisation(object sender, EventArgs e)
        {
        }

        [EventSubscribe("DoReportCalculations")]
        private void DoReportCalculations(object sender, EventArgs e)
        {
        }

        [EventSubscribe("DoManagement")]
        private void DoDailyCalculations(object sender, EventArgs e)
        {
            if (clock.Today == clock.StartDate)
            {
                summary.WriteMessage(this, "Script is setting lower boundary condition to " + LowerBCType, MessageType.Diagnostic);
                if (LowerBCType == LowerBCTypeOptions.gradient)
                    swim.SetLowerBCForGradient(bbcGradient: 0.0);   // in cm/cm (ibbc=0) Note that this is the default setting
                else if (LowerBCType == LowerBCTypeOptions.potential)
                    swim.SetLowerBCForGivenPotential(bbcPotential: LowerBCValue /10.0 );    //  convert to cm (ibbc=1), DUL is -100 cm so values more positive will often result in inflow to the bottom of the soil profile. Input in mm so divide here.
                else if (LowerBCType == LowerBCTypeOptions.seepage)
                    swim.SetLowerBCForSeepage(bbcPotentialSeepage: 0.0);  // in cm (ibbc=3). This is for zero-tension lysimeters
            }
        }
    }
}
```
            Manager AutomaticIrrigation
              allowIrrigation = False
              seasonStart = 1-sep
              seasonEnd = 30-mar
              seasonsAllocation = 10000
              triggerDeficit = 80
              targetDeficit = 100
              returndays = 3
              maximumAmount = 30
              depthPAWC = 300
              script: same as in Sensibility.LowerBoundaryConditions.E1.Base_LowerBC.paddock.AutomaticIrrigation
            Soil: Latitude=0; Longitude=0
              Physical: same as Sensibility.LowerBoundaryConditions.E1.Base_LowerBC.paddock.Soil.Physical
              Nutrient
              Organic: same as Sensibility.LowerBoundaryConditions.E1.Base_LowerBC.paddock.Soil.Organic
              Chemical: Thickness=[60, 110, 140, 240, 150]; PH=[6.5, 6.5, 6.5, 6.5, 6.5]; PHUnits=Water
              Water: Thickness=[60, 110, 140, 240, 150]; InitialValues=[0.565, 0.565, 0.565, 0.565, 0.565]; FilledFromTop=false
              Swim3: Salb=0.13; CN2Bare=0; CNRed=0; CNCov=0.8; KDul=1; PSIDul=-100; VC=true; DTMin=0; DTMax=30; MaxWaterIncrement=5; SpaceWeightingFactor=0; SoluteSpaceWeightingFactor=1; Dis=0; Disp=1; A=2; DTHC=0.1; DTHP=2; Diagnostics=false
              Solute Cl: same as Sensibility.LowerBoundaryConditions.E1.Base_LowerBC.paddock.Soil.Cl
              LayerStructure: Thickness=[10, 20, 30, 40, 50, 50, 50, 50, 100, 100, 50, 50, 50, 50]
              SoilTemperature
              Solute NO3: same as Sensibility.LowerBoundaryConditions.E1.Base_LowerBC.paddock.Soil.NO3
              Solute NH4: same as Sensibility.LowerBoundaryConditions.E1.Base_LowerBC.paddock.Soil.NH4
              Solute Urea: same as Validation.SeepageLysimeter.SeepageLysimeterExperiment.BaseBuckthought.Paddock.Soil.Urea
            Irrigation
            Fertiliser
            SurfaceOrganicMatter: InitialResidueName=grass; InitialResidueType=grass; InitialResidueMass=20; InitialStandingFraction=0; InitialCPR=0; InitialCNR=17
            SimpleGrazing: same as Sensibility.LowerBoundaryConditions.E1.Base_LowerBC.paddock.SimpleGrazing
            PastureSpecies AGPRyegrass: same as Sensibility.LowerBoundaryConditions.E1.Base_LowerBC.paddock.AGPRyegrass
            PastureSpecies AGPWhiteClover: same as Sensibility.LowerBoundaryConditions.E1.Base_LowerBC.paddock.AGPWhiteClover
            Report: EventNames=[Clock].EndOfDay
              VariableNames:
                [SWIM3_SetLowerBC].Script.LowerBCType
                [Clock].Today as Date
                [CalculateRollingWaterBalance].Script.WaterAddedToday as WaterAddedToday
                [CalculateRollingWaterBalance].Script.WaterRemovedToday as WaterRemovedToday
                [Soil].Swim3.Drainage as Drainage
                [Soil].Swim3.Runoff as Runoff
                sum([Soil].Water.MM) as WaterStored
                [Soil].Swim3.Pond as PondDepth
                [CalculateRollingWaterBalance].Script.WaterBalanceCumulative
                [CalculateRollingWaterBalance].Script.WaterBalanceToday
                [CalculateRollingWaterBalance].Script.PlantWaterUptake
                [Irrigation].IrrigationApplied as Irrigation
                [Weather].Rain as Rainfall
                [Soil].Swim3.PSI as Psi
                [Soil].Water.Volumetric as SW
                [Soil].Physical.DUL as DUL
                [Soil].Physical.SAT as Sat
    Folder SurfaceBoundaryConditions
      Memo Memo Surface BC
        See the "SetSurfaceBoundaryCondition" manager script for examples of how to change the surface boundary conditions.

        ## SetSurfaceBoundaryCondition(CurveNumber)

        The curve number approach for calculating runoff is the default surface boundary condition and is applicable to most 'open field' simulations. This option is ISBC = 0 in SWIM. This surface boundary condition relies on the value of **bare soil runoff curve number** in the SWIM3 component. Setting this surface boundary condition is done using a command in a Manager script:

        	SetSurfaceBCForCurveNumber();

        **NOTE: If bare soil runoff curve number is set to zero then SWIM will enable ponding and excess water at the surface will go into a pond instead of runoff.** This is equivalent to ISBC = 1 in SWIM.

        ## SetSurfaceBoundaryCondition(PowerFunction)

        A simple power-law function for calculating runoff can be defined. This option is ISBC = 2 in the SWIM manual. This function requires 6 arguments to be specified. The first three arguments define the minimum, maximum and initial size of the pond (mm). The last three arguments define the parameters (hrc, roff0, roff1) to the runoff equation as defined in the SWIM manual (Verburg et al. (1996).

        Setting this surface boundary condition is done using a command in a Manager script:

        	swim.SetSurfaceBCForPowerFunction(minimumSurfaceStorage: 10,
                            		  maximumSurfaceStorage: 20,
                            		  initialSurfaceStorage: 15,
                            		  precipitationConstant: 50,
                            		  runoffRateFactor: 0.2,
                            		  runoffRatePower: 2);

        ## Testing

        An experiment has been set up to show the impacts of using these two methods for setting the surface boundary condition. The first three experiment factors use the curve number approach with 3 different curve numbers (0, 50 and 90). The fouth factor uses the power-rate function.

        The graphs show the following characteristics:
        * When curve number is zero there is no runoff. Instead ponding occurs at serveral points during the simulation. The lack of runoff results in more water stored in the profile.
        * Using the power function (with the above arguments) results in the lowest rate of runoff.
        * As expected, using a curve number of 90 results in the highest rate of runoff.
        * Mass balance is maintained for all options.
      Experiment E3
        Factors
          CompositeFactor CurveNumber0
            Specifications:
              [SetSurfaceBoundaryCondition].Script.SurfaceBCType = CurveNumber
              [Swim3].CN2Bare = 0
          CompositeFactor CurveNumber50
            Specifications:
              [SetSurfaceBoundaryCondition].Script.SurfaceBCType = CurveNumber
              [Swim3].CN2Bare = 50
          CompositeFactor CurveNumber90
            Specifications:
              [SetSurfaceBoundaryCondition].Script.SurfaceBCType = CurveNumber
              [Swim3].CN2Bare = 90
          CompositeFactor PowerFunction
            Specifications=[SetSurfaceBoundaryCondition].Script.SurfaceBCType = PowerFunction
        Simulation Base_SurfaceBC
          Weather: FileName=..\..\..\Examples\WeatherFiles\lincoln.met
          Clock: Start=2000-01-01; End=2005-12-30
          Summary summaryfile
          SoilArbitrator
          MicroClimate: a_interception=0; b_interception=0; c_interception=0; d_interception=0; SoilHeatFluxFraction=0; MinimumHeightDiffForNewLayer=0; NightInterceptionFraction=0; ReferenceHeight=2
          Forages: same as Sensibility.LowerBoundaryConditions.E1.Base_LowerBC.Forages
          Zone paddock: Area=1; Slope=0; AspectAngle=0; Altitude=50
            Manager CalculateRollingWaterBalance
            Manager SetSurfaceBoundaryCondition
              SurfaceBCType = CurveNumber
```csharp
using Models.Climate;
using APSIM.Shared.Utilities;
using Models.Soils.Nutrients;
using Models.Soils;
using Models.PMF;
using Models.Core;
using System.Xml.Serialization;
using System;
using Models.AgPasture;
using Models.Interfaces;

namespace Models
{
    [Serializable] 
    [System.Xml.Serialization.XmlInclude(typeof(Model))]
    public class Script : Model
    {
        [Link] ISummary summary;
        [Link] private Swim3 swim;
        
        public enum SurfaceBCOptions { CurveNumber, PowerFunction };

        [Description("What surface boundary condition?")] 
        public SurfaceBCOptions SurfaceBCType { get; set; }

        [EventSubscribe("StartOfSimulation")]
        private void DoDailyInitialisation(object sender, EventArgs e)
        {
            summary.WriteMessage(this, "Script is setting surface boundary condition to " + SurfaceBCType, MessageType.Diagnostic);
            if (SurfaceBCType == SurfaceBCOptions.CurveNumber)
                swim.SetSurfaceBCForCurveNumber();
            else if (SurfaceBCType == SurfaceBCOptions.PowerFunction)
                swim.SetSurfaceBCForPowerFunction(minimumSurfaceStorage: 10, 
                                                    maximumSurfaceStorage: 20, 
                                                     initialSurfaceStorage: 15, 
                                                     precipitationConstant: 50, 
                                                     runoffRateFactor: 0.2, 
                                                     runoffRatePower: 2);
        }
    }
}
```
            Soil: Latitude=0; Longitude=0
              Physical
                Thickness  ParticleSizeClay  ParticleSizeSand  ParticleSizeSilt  Rocks  BD     AirDry  LL15   DUL    SAT   KS
                60         17.61             33.77             48.62             0      0.865  0.077   0.231  0.565  0.58  5
                110        17.61             33.77             48.62             0      0.865  0.077   0.231  0.565  0.58  5
                140        17.61             33.77             48.62             0      0.865  0.077   0.231  0.565  0.58  5
                240        17.61             33.77             48.62             0      0.865  0.077   0.231  0.565  0.58  5
                150        17.61             33.77             48.62             0      0.865  0.077   0.231  0.565  0.58  5
                SoilCrop AgPRyegrassSoil: LL=[0.231, 0.231, 0.231, 0.231, 0.231]; KL=[0.1, 0.1, 0.1, 0.1, 0]; XF=[1, 1, 1, 1, 0]
                SoilCrop AgPWhiteCloverSoil: LL=[0.231, 0.231, 0.231, 0, 0]; KL=[0.1, 0.1, 0.1, 0, 0]; XF=[1, 1, 1, 0, 0]
              Nutrient
              Organic: same as Sensibility.LowerBoundaryConditions.E1.Base_LowerBC.paddock.Soil.Organic
              Chemical: Thickness=[60, 110, 140, 240, 150]; PH=[6.5, 6.5, 6.5, 6.5, 6.5]; PHUnits=Water
              Water: Thickness=[60, 110, 140, 240, 150]; InitialValues=[0.565, 0.565, 0.565, 0.565, 0.565]; FilledFromTop=false
              Swim3: same as Sensibility.LowerBoundaryConditions.E1.Base_LowerBC.paddock.Soil.Swim3
              Solute Cl: same as Sensibility.LowerBoundaryConditions.E1.Base_LowerBC.paddock.Soil.Cl
              LayerStructure: Thickness=[10, 20, 30, 40, 50, 50, 50, 50, 100, 100, 50, 50, 50, 50]
              SoilTemperature
              Solute NO3: same as Sensibility.LowerBoundaryConditions.E1.Base_LowerBC.paddock.Soil.NO3
              Solute NH4: same as Sensibility.LowerBoundaryConditions.E1.Base_LowerBC.paddock.Soil.NH4
              Solute Urea: same as Validation.SeepageLysimeter.SeepageLysimeterExperiment.BaseBuckthought.Paddock.Soil.Urea
            Irrigation
            Fertiliser
            SurfaceOrganicMatter: InitialResidueName=grass; InitialResidueType=grass; InitialResidueMass=20; InitialStandingFraction=0; InitialCPR=0; InitialCNR=17
            SimpleGrazing: same as Sensibility.LowerBoundaryConditions.E1.Base_LowerBC.paddock.SimpleGrazing
            PastureSpecies AGPRyegrass: same as Sensibility.LowerBoundaryConditions.E1.Base_LowerBC.paddock.AGPRyegrass
            PastureSpecies AGPWhiteClover: same as Sensibility.LowerBoundaryConditions.E1.Base_LowerBC.paddock.AGPWhiteClover
            Report: EventNames=[Clock].EndOfDay
              VariableNames:
                [SetSurfaceBoundaryCondition].Script.SurfaceBCType
                [Clock].Today as Date
                [CalculateRollingWaterBalance].Script.WaterAddedToday as WaterAddedToday
                [CalculateRollingWaterBalance].Script.WaterRemovedToday as WaterRemovedToday
                [Soil].Swim3.Drainage as Drainage
                [Soil].Swim3.Runoff as Runoff
                sum([Soil].Water.MM) as WaterStored
                [Soil].Swim3.Pond as PondDepth
                [CalculateRollingWaterBalance].Script.WaterBalanceCumulative
                [CalculateRollingWaterBalance].Script.WaterBalanceToday
                [CalculateRollingWaterBalance].Script.PlantWaterUptake
                [Soil].Swim3.PSI as Psi
                [Soil].Water.Volumetric as SW
                [Irrigation].IrrigationApplied as Irrigation
    Folder TileDrainage
      Memo
        # Subsurface drainage

        Subsurface drainage in APSIM's SWIM3 is implemented using the Hooghoudt equation. The tests below examine the sensibility of the responses in subsurface and vertical (i.e., normal) drainage as well as test for mass balance in water.
      Experiment E4_1
        Memo
          ## Depth to the impermeable layer

          When the vertical distance between the subsurface drains and the impermeable layer decreases, the drains become more effective. The reader is referred to the scientific/engineering literature on drainage to understand the details but in casual terms, when that distance is small the flow lines are compressed and the drains are more effective.

          The simulations below show that as the depth to the impermeable layer increases from 750 to 950 mm, the subsurface flow decreases and drainage increases. This is as expected. Water balance is within tolerance (less than 0.03 mm when the simulation was extended to six years).
        Factors
          Factor DepthToImperm
            Specification=[SWIM3].SwimSubsurfaceDrain.ImpermDepth = 750 to 1000 step 100
        Simulation TileDrainage1
          Memo
            ## Depth to the impermeable layer

            When the vertical distance between the subsurface drains and the impermeable layer decreases, the drains become more effective. The reader is referred to the scientific/engineering literature on drainage to understand the details but in casual terms, when that distance is small the flow lines are compressed and the drains are more effective.

            The simulations below show that as the depth to the impermeable layer increases from 750 to 950 mm, the subsurface flow decreases and drainage increases. This is as expected. Water balance is within tolerance (0.03 mm when the simulation was extended to six years).
          Weather: FileName=..\..\..\Examples\WeatherFiles\lincoln.met
          Clock: Start=2000-01-01; End=2000-01-31
          Summary summaryfile
          SoilArbitrator
          MicroClimate: a_interception=0; b_interception=0; c_interception=0; d_interception=0; SoilHeatFluxFraction=0; MinimumHeightDiffForNewLayer=0; NightInterceptionFraction=0; ReferenceHeight=2
          Forages: same as Sensibility.LowerBoundaryConditions.E1.Base_LowerBC.Forages
          Zone paddock: Area=1; Slope=0; AspectAngle=0; Altitude=50
            Manager CalculateRollingWaterBalance
            Manager SWIM3_SetLowerBC
              LowerBCType = gradient
              LowerBCValue = -500
              script: same as in Sensibility.LowerBoundaryConditions.E1.Base_LowerBC.paddock.SWIM3_SetLowerBC
            Manager AutomaticIrrigation: same as Sensibility.LowerBoundaryConditions.E1.Base_LowerBC.paddock.AutomaticIrrigation
            Operations AddIrrigation
              2000-01-10  [Irrigation].Apply(amount:100,duration:60);
              2000-01-15  [Irrigation].Apply(amount:100,duration:60);
            SurfaceOrganicMatter: InitialResidueName=grass; InitialResidueType=grass; InitialResidueMass=0; InitialStandingFraction=0; InitialCPR=0; InitialCNR=17
            Soil: SoilType=Loam; LocalName=Horotiu; Site=Ruakura, south of Railway Ln; NearestTown=Hamilton; Region=Waikato; Country=New Zealand; NaturalVegetation=long term grass; ApsoilNumber=1320; Latitude=-37.779; Longitude=175.304; LocationAccuracy=+/-50 m; YearOfSampling=1984
              DataSource=The database of New Zealand soils was compiled by AgResearch (www.agresearch.co.nz) and based on soil properties gathered, mainly from publications, in the course of conducting several simulation-based research projects but particularly from the Pastoral 21 Environment program which was funded by the New Zealand Ministry for Business, Innovation and Employment,  Dairy NZ, Fonterra and Meat & Wool NZ.
              Comments=Gravel soil. The bulk density of this APSoil reflects weight of fine-earth fraction per volume of bulk soil. Use with gravimetric water contents measured on the fine-earth fraction. Gravel assumed to not hold water as reflected in low SAT, DUL, LL15, LL and AD. The data is a combination of published or supplied measurements, pedotransfer functions, and expert opinion. See Cichota et al. (2013; Soil Research 51: 92-111, http://dx.doi.org/10.1071/SR12338) for a description of the pedotransfer functions. The soil carbon and fresh organic matter settings have been set as those broadly appropriate for permanent productive pastoral systems, see Cichota el al. (2012; Soil Research 50: 694-707, http://dx.doi.org/10.1071/SR12208). Users should take care to adapt these to local conditions before using the data in simulations. FOM values estimated to be 900 kg/ha of FOM in top 600mm of soil and another 100 kg/ha below.
              Memo Notes
                VS - added kF and nF from HydCurves for exco and fip. Also added 5 (units unclear) for D0

                VS - changed the last four Ks values from as below to 3 mm /day (to try and get tile drainage)

                13,367
                7,114
                6,216
                3,256
                6,716
                2,348
                18,003
                62,350
              Physical
                Thickness  ParticleSizeClay  ParticleSizeSand  ParticleSizeSilt  Rocks  BD    AirDry  LL15   DUL    SAT   KS
                60         18.44             53.54             28.02             0      0.82  0.091   0.276  0.414  0.45  100
                110        18.44             53.54             28.02             0      0.82  0.091   0.276  0.414  0.45  50
                140        18.44             53.54             28.02             0      0.82  0.091   0.276  0.414  0.45  25
                240        18.44             53.54             28.02             0      0.82  0.091   0.276  0.414  0.45  3
                200        18.44             53.54             28.02             0      0.82  0.091   0.276  0.414  0.45  3
                200        18.44             53.54             28.02             0      0.82  0.091   0.276  0.414  0.45  3
                200        18.44             53.54             28.02             0      0.82  0.091   0.276  0.414  0.45  3
                350        18.44             53.54             28.02             0      0.82  0.091   0.276  0.414  0.45  3
                BD source: Field measured and checked for sensibility
                AirDry source: Estimated based on local knowledge
                LL15, DUL source: Laboratory measured
                SAT source: Calculated from measured, estimated or calculated BD
              Nutrient
              Organic: FOMCNRatio=40; CarbonUnits=Total
                Thickness  Carbon  SoilCNRatio  FBiom  FInert  FOM
                60         8.2     10.649       0.08   0.597   26.6765
                110        5.5     10.649       0.072  0.642   21.4084
                140        3.3     10.649       0.026  0.777   16.1801
                240        1.7     10.649       0.008  0.896   10.012
                200        1.7     10.649       0.008  0.957   6.71124
                200        1.2     10.649       0.008  0.975   4.49868
                200        0.7     10.649       0.008  0.992   3.01555
                350        0.1     10.649       0.008  0.986   1.49748
              Chemical: Thickness=[60, 110, 140, 240, 200, 200, 200, 350]; PH=[6.5, 6.5, 6.5, 6.5, 6.5, 6.5, 6.5, 6.5]; PHUnits=Water
                PH source: Estimated based on local knowledge
              Water: Thickness=[60, 110, 140, 240, 200, 200, 200, 350]; InitialValues=[0.414, 0.414, 0.414, 0.414, 0.414, 0.414, 0.414, 0.414]; FilledFromTop=false
              Swim3: Salb=0.13; CN2Bare=0; CNRed=20; CNCov=0.8; KDul=1; PSIDul=-100; VC=true; DTMin=0; DTMax=1440; MaxWaterIncrement=10; SpaceWeightingFactor=0; SoluteSpaceWeightingFactor=1; Dis=0; Disp=1; A=2; DTHC=0.1; DTHP=2; Diagnostics=false
                SwimSubsurfaceDrain: DrainDepth=500; DrainSpacing=5000; DrainRadius=150; Klat=1000; ImpermDepth=2000
              Solute Cl: InitialValuesUnits=ppm; WaterTableConcentration=0; D0=0.05; DepthConstant=0; MaxDepthSoluteAccessible=0; RunoffEffectivenessAtMovingSolute=0; MaxEffectiveRunoff=0
                Thickness  InitialValues  Exco  FIP
                60         0              0     1
                110        0              0     1
                140        0              0     1
                240        0              0     1
                200        0              0     1
                200        0              0     1
                200        0              0     1
                350        0              0     1
              LayerStructure: Thickness=[10, 20, 30, 40, 50, 50, 50, 50, 100, 100, 50, 50, 50, 50]
              SoilTemperature
              Physical PhysicalActual (disabled)
                Thickness  ParticleSizeClay  ParticleSizeSand  ParticleSizeSilt  Rocks  BD     AirDry  LL15   DUL    SAT    KS
                60         17.61             33.77             48.62             0      0.865  0.081   0.246  0.511  0.588  13367
                110        16.36             33.91             49.73             0      0.835  0.068   0.207  0.451  0.605  7114
                140        16.42             35.91             47.67             0      0.805  0.067   0.203  0.439  0.616  6216
                240        29.03             46.26             24.71             0      0.83   0.085   0.259  0.419  0.625  3256
                200        18.44             53.54             28.02             0      0.82   0.091   0.276  0.414  0.628  6716
                200        32.64             45.98             21.38             0      0.815  0.094   0.286  0.429  0.633  2348
                200        9.49              63.84             26.67             0      0.944  0.075   0.227  0.364  0.552  18003
                350        1                 93.21             5.79              0      1.063  0.015   0.045  0.092  0.312  62350
                BD source: Field measured and checked for sensibility
                AirDry source: Estimated based on local knowledge
                LL15, DUL source: Laboratory measured
                SAT source: Calculated from measured, estimated or calculated BD
              Solute NO3: same as Sensibility.TileDrainage.E4_1.TileDrainage1.paddock.Soil.Cl
              Solute NH4: InitialValuesUnits=ppm; WaterTableConcentration=0; D0=5; DepthConstant=0; MaxDepthSoluteAccessible=0; RunoffEffectivenessAtMovingSolute=0; MaxEffectiveRunoff=0
                Thickness  InitialValues  Exco  FIP
                60         0              5     1
                110        0              5     1
                140        0              5     1
                240        0              5     1
                200        0              5     1
                200        0              5     1
                200        0              5     1
                350        0              5     1
              Solute Urea: InitialValuesUnits=kg/ha; WaterTableConcentration=0; D0=0.05; DepthConstant=0; MaxDepthSoluteAccessible=0; RunoffEffectivenessAtMovingSolute=0; MaxEffectiveRunoff=0
                Thickness  InitialValues  Exco  FIP
                60         0              0     1
                110        0              0     1
                140        0              0     1
                240        0              0     1
                200        0              0     1
                200        0              0     1
                200        0              0     1
                350        0              0     1
            Irrigation
            Fertiliser
            Report: EventNames=[Clock].EndOfDay
              VariableNames:
                [Clock].Today as Date
                [CalculateRollingWaterBalance].Script.WaterBalanceToday as WaterBalanceToday
                [CalculateRollingWaterBalance].Script.WaterBalanceCumulative as WaterBalanceCumulative
                sum([Soil].Nutrient.TotalN) as TotalN
                [Soil].Swim3.SubsurfaceDrain as SubsurfaceDrain
                [Soil].Swim3.Drainage as Drainage
                sum([Soil].Water.MM) as WaterStorage
                [Soil].Swim3.WaterTable as WaterTableDepth
                [Soil].Swim3.PSI as Psi
                [Irrigation].IrrigationApplied as Irrigation
                [NO3].kgha
      Experiment E4_2
        Memo
          ## Drain spacing

          A the spacing between subsurface drains decreases, subsurface drain flow can be expected to increase under conditions of high flow (when the hydraulics of the drains would otherwise be limiting).

          The simulations below show that as drain spacing is decreased from 10 m to 1 m, the subsurface flow increases and vertical drainage decreases. This is as expected. Water balance is within tolerance (less than 0.03 mm when the simulation was extended to six years).
        Factors
          Factor DrainSpacing
            Specification=[SWIM3].SwimSubsurfaceDrain.DrainSpacing = 1000 to 10000 step 1000
        Simulation TileDrainage2
          Memo
            On hold until the leaching variables are exposed
          Weather: FileName=..\..\..\Examples\WeatherFiles\lincoln.met
          Clock: Start=2000-01-01; End=2000-01-31
          Summary summaryfile
          SoilArbitrator
          MicroClimate: a_interception=0; b_interception=0; c_interception=0; d_interception=0; SoilHeatFluxFraction=0; MinimumHeightDiffForNewLayer=0; NightInterceptionFraction=0; ReferenceHeight=2
          Forages: same as Sensibility.LowerBoundaryConditions.E1.Base_LowerBC.Forages
          Zone paddock: Area=1; Slope=0; AspectAngle=0; Altitude=50
            Manager CalculateRollingWaterBalance
            Manager SWIM3_SetLowerBC: same as Sensibility.TileDrainage.E4_1.TileDrainage1.paddock.SWIM3_SetLowerBC
            Manager AutomaticIrrigation: same as Sensibility.LowerBoundaryConditions.E1.Base_LowerBC.paddock.AutomaticIrrigation
            Operations AddIrrigation
              2000-01-10  [Irrigation].Apply(amount:100,duration:60);
              2000-01-15  [Irrigation].Apply(amount:100,duration:60);
            SurfaceOrganicMatter: InitialResidueName=grass; InitialResidueType=grass; InitialResidueMass=0; InitialStandingFraction=0; InitialCPR=0; InitialCNR=17
            Soil: SoilType=Loam; LocalName=Horotiu; Site=Ruakura, south of Railway Ln; NearestTown=Hamilton; Region=Waikato; Country=New Zealand; NaturalVegetation=long term grass; ApsoilNumber=1320; Latitude=-37.779; Longitude=175.304; LocationAccuracy=+/-50 m; YearOfSampling=1984
              DataSource=The database of New Zealand soils was compiled by AgResearch (www.agresearch.co.nz) and based on soil properties gathered, mainly from publications, in the course of conducting several simulation-based research projects but particularly from the Pastoral 21 Environment program which was funded by the New Zealand Ministry for Business, Innovation and Employment,  Dairy NZ, Fonterra and Meat & Wool NZ.
              Comments=Gravel soil. The bulk density of this APSoil reflects weight of fine-earth fraction per volume of bulk soil. Use with gravimetric water contents measured on the fine-earth fraction. Gravel assumed to not hold water as reflected in low SAT, DUL, LL15, LL and AD. The data is a combination of published or supplied measurements, pedotransfer functions, and expert opinion. See Cichota et al. (2013; Soil Research 51: 92-111, http://dx.doi.org/10.1071/SR12338) for a description of the pedotransfer functions. The soil carbon and fresh organic matter settings have been set as those broadly appropriate for permanent productive pastoral systems, see Cichota el al. (2012; Soil Research 50: 694-707, http://dx.doi.org/10.1071/SR12208). Users should take care to adapt these to local conditions before using the data in simulations. FOM values estimated to be 900 kg/ha of FOM in top 600mm of soil and another 100 kg/ha below.
              Memo Notes
                VS - added kF and nF from HydCurves for exco and fip. Also added 5 (units unclear) for D0

                VS - changed the last four Ks values from as below to 3 mm /day (to try and get tile drainage)

                13,367
                7,114
                6,216
                3,256
                6,716
                2,348
                18,003
                62,350
              Physical: same as Sensibility.TileDrainage.E4_1.TileDrainage1.paddock.Soil.Physical
              Nutrient
              Organic: same as Sensibility.TileDrainage.E4_1.TileDrainage1.paddock.Soil.Organic
              Chemical: same as Sensibility.TileDrainage.E4_1.TileDrainage1.paddock.Soil.Chemical
              Water: Thickness=[60, 110, 140, 240, 200, 200, 200, 350]; InitialValues=[0.414, 0.414, 0.414, 0.414, 0.414, 0.414, 0.414, 0.414]; FilledFromTop=false
              Swim3: Salb=0.13; CN2Bare=0; CNRed=20; CNCov=0.8; KDul=1; PSIDul=-100; VC=true; DTMin=0; DTMax=1440; MaxWaterIncrement=10; SpaceWeightingFactor=0; SoluteSpaceWeightingFactor=1; Dis=0; Disp=1; A=2; DTHC=0.1; DTHP=2; Diagnostics=false
                SwimSubsurfaceDrain: DrainDepth=500; DrainSpacing=5000; DrainRadius=150; Klat=1000; ImpermDepth=1000
              Solute Cl: same as Sensibility.TileDrainage.E4_1.TileDrainage1.paddock.Soil.Cl
              LayerStructure: Thickness=[10, 20, 30, 40, 50, 50, 50, 50, 100, 100, 50, 50, 50, 50]
              SoilTemperature
              Physical PhysicalActual (disabled): same as Sensibility.TileDrainage.E4_1.TileDrainage1.paddock.Soil.PhysicalActual
              Solute NO3: same as Sensibility.TileDrainage.E4_1.TileDrainage1.paddock.Soil.Cl
              Solute NH4: same as Sensibility.TileDrainage.E4_1.TileDrainage1.paddock.Soil.NH4
              Solute Urea: same as Sensibility.TileDrainage.E4_1.TileDrainage1.paddock.Soil.Urea
            Irrigation
            Fertiliser
            Report: same as Sensibility.TileDrainage.E4_1.TileDrainage1.paddock.Report
      Experiment E4_3
        Memo
          ## Depth to the drains

          Shallower subsurface drains are less effective than deeper drains because they can only drain water stored in the soil layers shallower than the drains themselves.

          The simulations below show that as drain depth increases from 300 to 700 mm, the subsurface flow increases and drainage decreases. This is as expected. Water balance is within tolerance (less than 0.03 mm when the simulation was extended to six years).
        Factors
          Factor DrainDepth
            Specification=[SWIM3].SwimSubsurfaceDrain.DrainDepth = 300 to 700 step 100
        Simulation TileDrainage3
          Memo
            On hold until the leaching variables are exposed
          Weather: FileName=..\..\..\Examples\WeatherFiles\lincoln.met
          Clock: Start=2000-01-01; End=2000-01-31
          Summary summaryfile
          SoilArbitrator
          MicroClimate: a_interception=0; b_interception=0; c_interception=0; d_interception=0; SoilHeatFluxFraction=0; MinimumHeightDiffForNewLayer=0; NightInterceptionFraction=0; ReferenceHeight=2
          Forages: same as Sensibility.LowerBoundaryConditions.E1.Base_LowerBC.Forages
          Zone paddock: Area=1; Slope=0; AspectAngle=0; Altitude=50
            Manager CalculateRollingWaterBalance
            Manager SWIM3_SetLowerBC: same as Sensibility.LowerBoundaryConditions.E1.Base_LowerBC.paddock.SWIM3_SetLowerBC
            Manager AutomaticIrrigation: same as Sensibility.LowerBoundaryConditions.E1.Base_LowerBC.paddock.AutomaticIrrigation
            Operations AddIrrigation
              2000-01-10  [Irrigation].Apply(amount:100,duration:60);
              2000-01-15  [Irrigation].Apply(amount:100,duration:60);
            SurfaceOrganicMatter: InitialResidueName=grass; InitialResidueType=grass; InitialResidueMass=0; InitialStandingFraction=0; InitialCPR=0; InitialCNR=17
            Soil: same as Sensibility.TileDrainage.E4_2.TileDrainage2.paddock.Soil
            Irrigation
            Fertiliser
            Report: same as Sensibility.TileDrainage.E4_1.TileDrainage1.paddock.Report
    Folder SoluteMassBalanceTesting
      Experiment E5_tracer
        Memo
          Mass balance was tested using chloride as a tracer. Several simulations were run with a linear (FIP=1) isotherm. The simulation was set up with a bare soil, no crops, no evaporation, and 10 mm /day of rainfall. Cl was added to the top 10 mm of soil on the first day (see the AddSoluteToSoil manager) and mass balance was calculated on a daily basis. Using Factors, “exco” of the Cl was changed between 0.0 and 10. When exco = 0 the Cl is not adsorbed (no attraction to the soil surfaces). When exco = 1 the concentration on the soil surfaces in g solute / Mg soil is numerically equal to the concentration in the soil water in g solute / m3 soil water. When exco is 10 the concentration on the soil surfaces will be ten times of that in the soil water (noting the difference in units of course) and the solute is only minimally mobile.

          The mass balance error was less than 0.05 kg (of 100 kg) of solute across all simulations and it did not worsen with duration of simulation. The worst mass balance was in the no-adsorption simulation and coincided with peak leaching rate when changes in concentration were relatively steep. Given this, part of the mass balance error may be due to recalculating solute amounts from the node basis of SWIM’s numerical solution onto the layer basis that APSIM uses. Regardless, the error was minimal and within the tolerance for APSIM’s purposes.
        Factors
          Factor Exco0: Specification=[Soil].Cl
            Solute Cl: InitialValuesUnits=ppm; WaterTableConcentration=0; D0=0.05; DepthConstant=0; MaxDepthSoluteAccessible=0; RunoffEffectivenessAtMovingSolute=0; MaxEffectiveRunoff=0
              Thickness  Exco  FIP
              60         0     1
              110        0     1
              140        0     1
              240        0     1
              200        0     1
              200        0     1
              200        0     1
              350        0     1
          Factor Exco0_5: Specification=[Soil].Cl
            Solute Cl: InitialValuesUnits=ppm; WaterTableConcentration=0; D0=0.05; DepthConstant=0; MaxDepthSoluteAccessible=0; RunoffEffectivenessAtMovingSolute=0; MaxEffectiveRunoff=0
              Thickness  Exco  FIP
              60         0.5   1
              110        0.5   1
              140        0.5   1
              240        0.5   1
              200        0.5   1
              200        0.5   1
              200        0.5   1
              350        0.5   1
          Factor Exco1: Specification=[Soil].Cl
            Solute Cl: InitialValuesUnits=ppm; WaterTableConcentration=0; D0=0.05; DepthConstant=0; MaxDepthSoluteAccessible=0; RunoffEffectivenessAtMovingSolute=0; MaxEffectiveRunoff=0
              Thickness  Exco  FIP
              60         1     1
              110        1     1
              140        1     1
              240        1     1
              200        1     1
              200        1     1
              200        1     1
              350        1     1
          Factor Exco1_5: Specification=[Soil].Cl
            Solute Cl: InitialValuesUnits=ppm; WaterTableConcentration=0; D0=0.05; DepthConstant=0; MaxDepthSoluteAccessible=0; RunoffEffectivenessAtMovingSolute=0; MaxEffectiveRunoff=0
              Thickness  Exco  FIP
              60         1.5   1
              110        1.5   1
              140        1.5   1
              240        1.5   1
              200        1.5   1
              200        1.5   1
              200        1.5   1
              350        1.5   1
          Factor Exco3: Specification=[Soil].Cl
            Solute Cl: InitialValuesUnits=ppm; WaterTableConcentration=0; D0=0.05; DepthConstant=0; MaxDepthSoluteAccessible=0; RunoffEffectivenessAtMovingSolute=0; MaxEffectiveRunoff=0
              Thickness  Exco  FIP
              60         3     1
              110        3     1
              140        3     1
              240        3     1
              200        3     1
              200        3     1
              200        3     1
              350        3     1
          Factor Exco10: Specification=[Soil].Cl
            Solute Cl: InitialValuesUnits=ppm; WaterTableConcentration=0; D0=0.05; DepthConstant=0; MaxDepthSoluteAccessible=0; RunoffEffectivenessAtMovingSolute=0; MaxEffectiveRunoff=0
              Thickness  Exco  FIP
              60         10    1
              110        10    1
              140        10    1
              240        10    1
              200        10    1
              200        10    1
              200        10    1
              350        10    1
        Simulation Base_SoluteLinear
          ControlledEnvironment: Rain=10; AirPressure=1010
            zero: MaxT, MinT, Radn, PanEvap, VP, Wind, CO2, DiffuseFraction, Latitude, Longitude, DayLength, SunRise, SunSet
          Clock: Start=2000-01-01; End=2000-06-30
          Summary summaryfile
          SoilArbitrator
          MicroClimate: a_interception=0; b_interception=0; c_interception=0; d_interception=0; SoilHeatFluxFraction=0; MinimumHeightDiffForNewLayer=0; NightInterceptionFraction=0; ReferenceHeight=2
          Forages: same as Sensibility.LowerBoundaryConditions.E1.Base_LowerBC.Forages
          Zone paddock: Area=1; Slope=0; AspectAngle=0; Altitude=50
            Manager CalculateRollingWaterBalance
            Manager AddSoluteToSoil
```csharp
using Models.Climate;
using APSIM.Shared.Utilities;
using Models.Soils.Nutrients;
using Models.Soils;
using Models.Surface;
using Models.PMF;
using Models.Core;
using System.Xml.Serialization;
using System;
using Models.AgPasture;
using Models.Interfaces;
using System.Linq;

namespace Models
{
    [Serializable] 
    [System.Xml.Serialization.XmlInclude(typeof(Model))]
    public class Script : Model
    {
        [Link] Clock clock;
        [Link] ISummary summary;
        /*[Link] IWeather weather;
        [Link] Irrigation irrigation;
        [Link] private SurfaceOrganicMatter surfaceOM;
        [Link] private ISoilWater soil;  // and I think this will give solutes as well
        [Link] private Fertiliser fertiliser;
        [Link] Swim3 swim3;
        [Link(ByName = true)] private Solute no3; */
        [Link(ByName = true)] private Solute cl;
  




        [EventSubscribe("DoDailyInitialisation")] private void DoDailyInitialisation(object sender, EventArgs e)
        {
            if (clock.Today == clock.StartDate) 
                cl.AddKgHaDelta(SoluteSetterType.Other, new double[] {100, 0, 0, 0, 0, 0, 0, 0, 0, 0, 0, 0, 0, 0});
        }
    }
}
```
            Manager SoilChlorideBalance
```csharp
using Models.Climate;
using APSIM.Shared.Utilities;
using Models.Soils.Nutrients;
using Models.Soils;
using Models.Surface;
using Models.PMF;
using Models.Core;
using System.Xml.Serialization;
using System;
using Models.AgPasture;
using Models.Interfaces;
using System.Linq;

namespace Models
{
    [Serializable] 
    [System.Xml.Serialization.XmlInclude(typeof(Model))]
    public class Script : Model
    {
        [Link] Clock clock;
        [Link] ISummary summary;
        [Link] IWeather weather;
        [Link] Irrigation irrigation;
        [Link] private SurfaceOrganicMatter surfaceOM;
        [Link] private ISoilWater soil;  // and I think this will give solutes as well
        [Link] private Swim3 swim;
        [Link] private Nutrient nutrient;
        [Link] private Fertiliser fertiliser;
        [Link(ByName = true)] private Solute cl;

  
        public double ChlorideBalance  { get; set; }
        private  double ChlorideAtInit  { get; set; }
        private  double ChlorideLeached  { get; set; }


        [EventSubscribe("DoDailyInitialisation")] private void DoDailyInitialisation(object sender, EventArgs e)
        {
            if (clock.Today == clock.StartDate) 
            {
                ChlorideAtInit = cl.kgha.Sum();
                ChlorideLeached = 0.0;
                ChlorideBalance = 0.0;
            }
        }

        [EventSubscribe("DoReportCalculations")] private void DoReportCalculations(object sender, EventArgs e)
        {
            
            ChlorideLeached += swim.LeachCl;
            ChlorideBalance = ChlorideAtInit - ChlorideLeached - cl.kgha.Sum();
        }
    }
}
```
            Manager SWIM3_SetLowerBC
              LowerBCType = gradient
              LowerBCValue = -500
```csharp
using Models.Climate;
using APSIM.Shared.Utilities;
using Models.Soils.Nutrients;
using Models.Soils;
using Models.PMF;
using Models.Core;
using System.Xml.Serialization;
using System;
using Models.AgPasture;
using Models.Interfaces;

namespace Models
{
    [Serializable] 
    [System.Xml.Serialization.XmlInclude(typeof(Model))]
    public class Script : Model
    {
        [Link] Clock clock;
        [Link] ISummary summary;
        [Link] private Swim3 swim;
        //[Link] private PastureSpecies ryegrass;
        //[Link] private SimpleGrazing grazing;
        
        public enum LowerBCTypeOptions {gradient,seepage,potential};

        [Separator("Sets the lower boundary condition type (and value if set to 'potential' for SWIM3. The change is applied at the beginning of the first day of the simulation.")]
        [Description("What lower boundary condition is wanted?")] public LowerBCTypeOptions LowerBCType { get; set; }
        [Description("If 'potential', then what potential? Should be negative (mm) ")] public double LowerBCValue { get; set; }

        public double SoilWaterStart  { get; set; }
        public double SoilWaterEnd  { get; set; }

        [EventSubscribe("DoDailyInitialisation")]
        private void DoDailyInitialisation(object sender, EventArgs e)
        {
        }

        [EventSubscribe("DoReportCalculations")]
        private void DoReportCalculations(object sender, EventArgs e)
        {
        }

        [EventSubscribe("DoManagement")]
        private void DoDailyCalculations(object sender, EventArgs e)
        {
            if (clock.Today == clock.StartDate)
            {
                summary.WriteMessage(this, "Script is setting lower boundary condition to " + LowerBCType, MessageType.Diagnostic);
                if (LowerBCType == LowerBCTypeOptions.gradient)
                    swim.SetLowerBCForGradient(bbcGradient: 0.0);   // in cm/cm (ibbc=0) Note that this is the default setting
                else if (LowerBCType == LowerBCTypeOptions.potential)
                    swim.SetLowerBCForGivenPotential(bbcPotential: LowerBCValue /10.0 );    //  convert to cm (ibbc=1), DUL is -100 cm so values more positive will often result in inflow to the bottom of the soil profile. Input in mm so divide here.
                else if (LowerBCType == LowerBCTypeOptions.seepage)
                    swim.SetLowerBCForSeepage(bbcPotentialSeepage: 0.0);  // in cm (ibbc=3). This is for zero-tension lysimeters
                else
                    throw new Exception("Wrong lower boundary condition type");
            }
        }
    }
}
```
            Manager AutomaticIrrigation: same as Sensibility.PotentialLowerBoundaryCondition.E2.Base_LowerBC_Potentials.paddock.AutomaticIrrigation
            SurfaceOrganicMatter: InitialResidueName=grass; InitialResidueType=grass; InitialResidueMass=0; InitialStandingFraction=0; InitialCPR=0; InitialCNR=17
            Operations AddFertiliser
              // 2000-01-02  [Fertiliser].Apply(Amount: 500, Type: UreaN);
              // 2000-01-02  [Fertiliser].Apply(Amount: 500, Type: NO3N);
              // 2000-01-02  [Fertiliser].Apply(Amount: 500, Type: Cl);
            Operations AddWater (disabled)
              2000-01-05  [Irrigation].Apply(amount:100,duration:60);
              2000-01-10  [Irrigation].Apply(amount:100,duration:60);
              2000-01-15  [Irrigation].Apply(amount:100,duration:60);
              2000-01-20  [Irrigation].Apply(amount:100,duration:60);
              2000-01-25  [Irrigation].Apply(amount:100,duration:60);
              2000-01-30  [Irrigation].Apply(amount:100,duration:60);
              2000-02-05  [Irrigation].Apply(amount:100,duration:60);
              2000-02-10  [Irrigation].Apply(amount:100,duration:60);
              2000-02-15  [Irrigation].Apply(amount:100,duration:60);
              2000-02-20  [Irrigation].Apply(amount:100,duration:60);
              2000-02-25  [Irrigation].Apply(amount:100,duration:60);
              2000-03-05  [Irrigation].Apply(amount:100,duration:60);
              2000-03-10  [Irrigation].Apply(amount:100,duration:60);
              2000-03-15  [Irrigation].Apply(amount:100,duration:60);
              2000-03-20  [Irrigation].Apply(amount:100,duration:60);
              2000-03-25  [Irrigation].Apply(amount:100,duration:60);
              2000-03-30  [Irrigation].Apply(amount:100,duration:60);
              2000-04-05  [Irrigation].Apply(amount:100,duration:60);
              2000-04-10  [Irrigation].Apply(amount:100,duration:60);
              2000-04-15  [Irrigation].Apply(amount:100,duration:60);
              2000-04-20  [Irrigation].Apply(amount:100,duration:60);
              2000-04-25  [Irrigation].Apply(amount:100,duration:60);
              2000-04-30  [Irrigation].Apply(amount:100,duration:60);
            Soil: SoilType=Loam; LocalName=Horotiu; Site=Ruakura, south of Railway Ln; NearestTown=Hamilton; Region=Waikato; Country=New Zealand; NaturalVegetation=long term grass; ApsoilNumber=1320; Latitude=-37.779; Longitude=175.304; LocationAccuracy=+/-50 m; YearOfSampling=1984
              DataSource=The database of New Zealand soils was compiled by AgResearch (www.agresearch.co.nz) and based on soil properties gathered, mainly from publications, in the course of conducting several simulation-based research projects but particularly from the Pastoral 21 Environment program which was funded by the New Zealand Ministry for Business, Innovation and Employment,  Dairy NZ, Fonterra and Meat & Wool NZ.
              Comments=Gravel soil. The bulk density of this APSoil reflects weight of fine-earth fraction per volume of bulk soil. Use with gravimetric water contents measured on the fine-earth fraction. Gravel assumed to not hold water as reflected in low SAT, DUL, LL15, LL and AD. The data is a combination of published or supplied measurements, pedotransfer functions, and expert opinion. See Cichota et al. (2013; Soil Research 51: 92-111, http://dx.doi.org/10.1071/SR12338) for a description of the pedotransfer functions. The soil carbon and fresh organic matter settings have been set as those broadly appropriate for permanent productive pastoral systems, see Cichota el al. (2012; Soil Research 50: 694-707, http://dx.doi.org/10.1071/SR12208). Users should take care to adapt these to local conditions before using the data in simulations. FOM values estimated to be 900 kg/ha of FOM in top 600mm of soil and another 100 kg/ha below.
              Physical
                Thickness  ParticleSizeClay  ParticleSizeSand  ParticleSizeSilt  Rocks  BD     AirDry  LL15   DUL    SAT    KS
                60         17.61             33.77             48.62             0      0.865  0.081   0.246  0.511  0.588  13367.955
                110        16.36             33.91             49.73             0      0.835  0.068   0.207  0.451  0.605  7114.419
                140        16.42             35.91             47.67             0      0.805  0.067   0.203  0.439  0.616  6216.357
                240        29.03             46.26             24.71             0      0.83   0.085   0.259  0.419  0.625  3256.961
                200        18.44             53.54             28.02             0      0.82   0.091   0.276  0.414  0.628  6716.918
                200        32.64             45.98             21.38             0      0.815  0.094   0.286  0.429  0.633  2348.283
                200        9.49              63.84             26.67             0      0.944  0.075   0.227  0.364  0.552  18003.598
                350        1                 93.21             5.79              0      1.063  0.015   0.045  0.092  0.312  62350.094
                BD source: Field measured and checked for sensibility
                AirDry source: Estimated based on local knowledge
                LL15, DUL source: Laboratory measured
                SAT source: Calculated from measured, estimated or calculated BD
              Nutrient
              Organic: FOMCNRatio=40; CarbonUnits=Total
                Thickness  Carbon  SoilCNRatio  FBiom  FInert  FOM
                60         0       10.649       0.08   0.597   0
                110        0       10.649       0.072  0.642   0
                140        0       10.649       0.026  0.777   0
                240        0       10.649       0.008  0.896   0
                200        0       10.649       0.008  0.957   0
                200        0       10.649       0.008  0.975   0
                200        0       10.649       0.008  0.992   0
                350        0       10.649       0.008  0.986   0
              Chemical: same as Sensibility.TileDrainage.E4_1.TileDrainage1.paddock.Soil.Chemical
              Water: Thickness=[60, 110, 140, 240, 200, 200, 200, 350]; InitialValues=[0.511, 0.451, 0.439, 0.419, 0.414, 0.429, 0.364, 0.092]; FilledFromTop=false
              Swim3: Salb=0.13; CN2Bare=50; CNRed=20; CNCov=0.8; KDul=1; PSIDul=-100; VC=true; DTMin=0; DTMax=30; MaxWaterIncrement=5; SpaceWeightingFactor=0; SoluteSpaceWeightingFactor=0; Dis=0; Disp=1; A=2; DTHC=0.1; DTHP=2; Diagnostics=false
                SwimSubsurfaceDrain: DrainDepth=500; DrainSpacing=5000; DrainRadius=150; Klat=1000; ImpermDepth=1000
              Solute Cl: same as Sensibility.TileDrainage.E4_1.TileDrainage1.paddock.Soil.Cl
              LayerStructure: Thickness=[10, 20, 30, 40, 50, 50, 50, 50, 100, 100, 50, 50, 50, 50]
              SoilTemperature
              Solute NO3: same as Sensibility.TileDrainage.E4_1.TileDrainage1.paddock.Soil.Cl
              Solute NH4: InitialValuesUnits=ppm; WaterTableConcentration=0; D0=5; DepthConstant=0; MaxDepthSoluteAccessible=0; RunoffEffectivenessAtMovingSolute=0; MaxEffectiveRunoff=0
                Thickness  InitialValues  Exco  FIP
                60         0              0     1
                110        0              0     1
                140        0              0     1
                240        0              0     1
                200        0              0     1
                200        0              0     1
                200        0              0     1
                350        0              0     1
              Solute Urea: same as Sensibility.TileDrainage.E4_1.TileDrainage1.paddock.Soil.Urea
            Irrigation
            Fertiliser
            Report: EventNames=[Clock].EndOfDay
              VariableNames:
                [Clock].Today as Date
                sum([Soil].Cl.kgha) as StoredCl
                [SWIM3].LeachCl as LeachCl
                [SoilChlorideBalance].Script.ChlorideBalance as ChlorideBalance
                Sum of [SWIM3].Drainage from Start to End as CumulativeDrainage
                [SWIM3].LeachCl / [SWIM3].Drainage / 10 as ConcDrainagePpm
      Experiment E5_2_nonlinear
        Memo Nonlinear Solute Isotherms
          Nonlinear solute isoterms (i.e. anything with a power of the Freundlich isotherm, FIP, of less than 1) are disabled because they are causing a mass balance error. They might be reactivated in the future if the cause can be found. The tests are left here (but disbled so as not to cause a crash) should the issue be addressed in the future.
        Factors
          Factor NoAdsorb: Specification=[Soil].Cl
            Solute Cl: InitialValuesUnits=ppm; WaterTableConcentration=0; D0=0.05; DepthConstant=0; MaxDepthSoluteAccessible=0; RunoffEffectivenessAtMovingSolute=0; MaxEffectiveRunoff=0
              Thickness  InitialValues  Exco  FIP
              60         20             0     1
              110        0              0     1
              140        0              0     1
              240        0              0     1
              200        0              0     1
              200        0              0     1
              200        0              0     1
              350        0              0     1
          Factor Linear: Specification=[Soil].Cl
            Solute Cl: InitialValuesUnits=ppm; WaterTableConcentration=0; D0=0.05; DepthConstant=0; MaxDepthSoluteAccessible=0; RunoffEffectivenessAtMovingSolute=0; MaxEffectiveRunoff=0
              Thickness  InitialValues  Exco  FIP
              60         20             1     1
              110        0              1     1
              140        0              1     1
              240        0              1     1
              200        0              1     1
              200        0              1     1
              200        0              1     1
              350        0              1     1
          Factor NonlinearFIP09: Specification=[Soil].Cl
            Solute Cl: InitialValuesUnits=ppm; WaterTableConcentration=0; D0=0.05; DepthConstant=0; MaxDepthSoluteAccessible=0; RunoffEffectivenessAtMovingSolute=0; MaxEffectiveRunoff=0
              Thickness  InitialValues  Exco  FIP
              60         20             1     0.9
              110        0              1     0.9
              140        0              1     0.9
              240        0              1     0.9
              200        0              1     0.9
              200        0              1     0.9
              200        0              1     0.9
              350        0              1     0.9
          Factor NonlinearFIP08: Specification=[Soil].Cl
            Solute Cl: InitialValuesUnits=ppm; WaterTableConcentration=0; D0=0.05; DepthConstant=0; MaxDepthSoluteAccessible=0; RunoffEffectivenessAtMovingSolute=0; MaxEffectiveRunoff=0
              Thickness  InitialValues  Exco  FIP
              60         20             1     0.8
              110        0              1     0.8
              140        0              1     0.8
              240        0              1     0.8
              200        0              1     0.8
              200        0              1     0.8
              200        0              1     0.8
              350        0              1     0.8
          Factor NonlinearFIP07 (disabled): Specification=[Soil].Cl
            Solute Cl: InitialValuesUnits=ppm; WaterTableConcentration=0; D0=0.05; DepthConstant=0; MaxDepthSoluteAccessible=0; RunoffEffectivenessAtMovingSolute=0; MaxEffectiveRunoff=0
              Thickness  InitialValues  Exco  FIP
              60         20             1     0.7
              110        0              1     0.7
              140        0              1     0.7
              240        0              1     0.7
              200        0              1     0.7
              200        0              1     0.7
              200        0              1     0.7
              350        0              1     0.7
        Simulation Base_SoluteNonlinear
          Memo
            On hold until the leaching variables are exposed
          Weather: FileName=..\..\..\Examples\WeatherFiles\lincoln.met
          Clock: Start=2000-01-01; End=2000-06-30
          Summary summaryfile
          SoilArbitrator
          MicroClimate: a_interception=0; b_interception=0; c_interception=0; d_interception=0; SoilHeatFluxFraction=0; MinimumHeightDiffForNewLayer=0; NightInterceptionFraction=0; ReferenceHeight=2
          Forages: same as Sensibility.LowerBoundaryConditions.E1.Base_LowerBC.Forages
          Zone paddock: Area=1; Slope=0; AspectAngle=0; Altitude=50
            Manager CalculateRollingWaterBalance
            Manager SetSoluteInSoil (disabled)
```csharp
using Models.Climate;
using APSIM.Shared.Utilities;
using Models.Soils.Nutrients;
using Models.Soils;
using Models.Surface;
using Models.PMF;
using Models.Core;
using System.Xml.Serialization;
using System;
using Models.AgPasture;
using Models.Interfaces;
using System.Linq;

namespace Models
{
    [Serializable] 
    [System.Xml.Serialization.XmlInclude(typeof(Model))]
    public class Script : Model
    {
        [Link] Clock clock;
        [Link] ISummary summary;
        /*[Link] IWeather weather;
        [Link] Irrigation irrigation;
        [Link] private SurfaceOrganicMatter surfaceOM;
        [Link] private ISoilWater soil;  // and I think this will give solutes as well
        [Link] private Fertiliser fertiliser;
        [Link] Swim3 swim3;
        [Link(ByName = true)] private Solute no3; */
        [Link(ByName = true)] private Solute cl;
  

        public double ChlorideAdded { get; set; }


        [EventSubscribe("DoDailyInitialisation")] private void DoDailyInitialisation(object sender, EventArgs e)
        {
            if (clock.Today == clock.StartDate) 
            {
                cl.AddKgHaDelta(SoluteSetterType.Other, new double[] {1, 0, 0, 0, 0, 0, 0, 0, 0, 0, 0, 0, 0, 0});
                ChlorideAdded = cl.kgha.Sum();
            }
            else
                ChlorideAdded = 0.0;
        }
    }
}
```
            Manager SoilChlorideBalance: same as Sensibility.SoluteMassBalanceTesting.E5_tracer.Base_SoluteLinear.paddock.SoilChlorideBalance
            Manager SWIM3_SetLowerBC: same as Sensibility.TileDrainage.E4_1.TileDrainage1.paddock.SWIM3_SetLowerBC
            Manager AutomaticIrrigation: same as Sensibility.PotentialLowerBoundaryCondition.E2.Base_LowerBC_Potentials.paddock.AutomaticIrrigation
            SurfaceOrganicMatter: InitialResidueName=grass; InitialResidueType=grass; InitialResidueMass=0; InitialStandingFraction=0; InitialCPR=0; InitialCNR=17
            Operations AddFertiliser: same as Sensibility.SoluteMassBalanceTesting.E5_tracer.Base_SoluteLinear.paddock.AddFertiliser
            Operations AddWater
              2000-01-05  [Irrigation].Apply(amount:100,duration:60);
              2000-01-10  [Irrigation].Apply(amount:100,duration:60);
              2000-01-15  [Irrigation].Apply(amount:100,duration:60);
              2000-01-20  [Irrigation].Apply(amount:100,duration:60);
              2000-01-25  [Irrigation].Apply(amount:100,duration:60);
              2000-01-30  [Irrigation].Apply(amount:100,duration:60);
              2000-02-05  [Irrigation].Apply(amount:100,duration:60);
              2000-02-10  [Irrigation].Apply(amount:100,duration:60);
              2000-02-15  [Irrigation].Apply(amount:100,duration:60);
              2000-02-20  [Irrigation].Apply(amount:100,duration:60);
              2000-02-25  [Irrigation].Apply(amount:100,duration:60);
              2000-03-05  [Irrigation].Apply(amount:100,duration:60);
              2000-03-10  [Irrigation].Apply(amount:100,duration:60);
              2000-03-15  [Irrigation].Apply(amount:100,duration:60);
              2000-03-20  [Irrigation].Apply(amount:100,duration:60);
              2000-03-25  [Irrigation].Apply(amount:100,duration:60);
              2000-03-30  [Irrigation].Apply(amount:100,duration:60);
              2000-04-05  [Irrigation].Apply(amount:100,duration:60);
              2000-04-10  [Irrigation].Apply(amount:100,duration:60);
              2000-04-15  [Irrigation].Apply(amount:100,duration:60);
              2000-04-20  [Irrigation].Apply(amount:100,duration:60);
              2000-04-25  [Irrigation].Apply(amount:100,duration:60);
              2000-04-30  [Irrigation].Apply(amount:100,duration:60);
              2000-05-05  [Irrigation].Apply(amount:100,duration:60);
              2000-05-10  [Irrigation].Apply(amount:100,duration:60);
              2000-05-15  [Irrigation].Apply(amount:100,duration:60);
              2000-05-20  [Irrigation].Apply(amount:100,duration:60);
              2000-05-25  [Irrigation].Apply(amount:100,duration:60);
              2000-05-30  [Irrigation].Apply(amount:100,duration:60);
              2000-06-05  [Irrigation].Apply(amount:100,duration:60);
              2000-06-10  [Irrigation].Apply(amount:100,duration:60);
              2000-06-15  [Irrigation].Apply(amount:100,duration:60);
              2000-06-20  [Irrigation].Apply(amount:100,duration:60);
              2000-06-25  [Irrigation].Apply(amount:100,duration:60);
              2000-06-30  [Irrigation].Apply(amount:100,duration:60);
            Soil: SoilType=Loam; LocalName=Horotiu; Site=Ruakura, south of Railway Ln; NearestTown=Hamilton; Region=Waikato; Country=New Zealand; NaturalVegetation=long term grass; ApsoilNumber=1320; Latitude=-37.779; Longitude=175.304; LocationAccuracy=+/-50 m; YearOfSampling=1984
              DataSource=The database of New Zealand soils was compiled by AgResearch (www.agresearch.co.nz) and based on soil properties gathered, mainly from publications, in the course of conducting several simulation-based research projects but particularly from the Pastoral 21 Environment program which was funded by the New Zealand Ministry for Business, Innovation and Employment,  Dairy NZ, Fonterra and Meat & Wool NZ.
              Comments=Gravel soil. The bulk density of this APSoil reflects weight of fine-earth fraction per volume of bulk soil. Use with gravimetric water contents measured on the fine-earth fraction. Gravel assumed to not hold water as reflected in low SAT, DUL, LL15, LL and AD. The data is a combination of published or supplied measurements, pedotransfer functions, and expert opinion. See Cichota et al. (2013; Soil Research 51: 92-111, http://dx.doi.org/10.1071/SR12338) for a description of the pedotransfer functions. The soil carbon and fresh organic matter settings have been set as those broadly appropriate for permanent productive pastoral systems, see Cichota el al. (2012; Soil Research 50: 694-707, http://dx.doi.org/10.1071/SR12208). Users should take care to adapt these to local conditions before using the data in simulations. FOM values estimated to be 900 kg/ha of FOM in top 600mm of soil and another 100 kg/ha below.
              Memo Notes
                VS - added kF and nF from HydCurves for exco and fip. Also added 5 (units unclear) for D0
              Physical: same as Sensibility.SoluteMassBalanceTesting.E5_tracer.Base_SoluteLinear.paddock.Soil.Physical
              Nutrient
              Organic: same as Sensibility.SoluteMassBalanceTesting.E5_tracer.Base_SoluteLinear.paddock.Soil.Organic
              Chemical: same as Sensibility.TileDrainage.E4_1.TileDrainage1.paddock.Soil.Chemical
              Water: Thickness=[60, 110, 140, 240, 200, 200, 200, 350]; InitialValues=[0.511, 0.451, 0.439, 0.419, 0.414, 0.429, 0.364, 0.092]; FilledFromTop=false
              Swim3: Salb=0.13; CN2Bare=50; CNRed=20; CNCov=0.8; KDul=1; PSIDul=-100; VC=true; DTMin=0; DTMax=30; MaxWaterIncrement=5; SpaceWeightingFactor=0; SoluteSpaceWeightingFactor=1; Dis=0; Disp=1; A=2; DTHC=0.1; DTHP=2; Diagnostics=false
                SwimSubsurfaceDrain: DrainDepth=500; DrainSpacing=5000; DrainRadius=150; Klat=1000; ImpermDepth=1000
              Solute Cl: same as Sensibility.SoluteMassBalanceTesting.E5_2_nonlinear.Factors.NoAdsorb.Cl
              LayerStructure: Thickness=[10, 20, 30, 40, 50, 50, 50, 50, 100, 100, 50, 50, 50, 50]
              SoilTemperature
              Solute NO3: same as Sensibility.TileDrainage.E4_1.TileDrainage1.paddock.Soil.Cl
              Solute NH4: InitialValuesUnits=ppm; WaterTableConcentration=0; D0=5; DepthConstant=0; MaxDepthSoluteAccessible=0; RunoffEffectivenessAtMovingSolute=0; MaxEffectiveRunoff=0
                Thickness  InitialValues  Exco  FIP
                60         0              1     1
                110        0              1     1
                140        0              1     1
                240        0              1     1
                200        0              1     1
                200        0              1     1
                200        0              1     1
                350        0              1     1
              Solute Urea: same as Sensibility.TileDrainage.E4_1.TileDrainage1.paddock.Soil.Urea
            Irrigation
            Fertiliser
            Report: EventNames=[Clock].EndOfDay
              VariableNames:
                [Clock].Today as Date
                sum([Soil].Cl.kgha) as StoredCl
                [SWIM3].LeachCl as LeachedCl
                [SoilChlorideBalance].Script.ChlorideBalance as BalanceCl
    Folder InitialConditions
      Memo Memo Initial Conditions
        https://www.apsim.info/documentation/model-documentation/soil-modules-documentation/swimv2-1/

        # Overview

        SWIM3 (Huth2012SWIM3) allows three of the four lower boundary conditions described in [verburg_methodology_1996] as described below. The zero flux lower boundary condition has not been enabled.

        All references to "SWIM" here refer to the highly detailed documentation by [verburg_methodology_1996] of the standalone model that has morphed over the years into SWIM3. Verburg et al. remains the definitive documentation and should be referred to for detail.

        This test ensures that the code to initialise psi from initial values of theta is providing a close enough estimate.
      Experiment E6
        Factors
          Factor SoilType: Specification=[Soil]
            Soil Clay: Latitude=0; Longitude=0
              Physical
                Thickness  ParticleSizeClay  ParticleSizeSand  ParticleSizeSilt  Rocks  BD     AirDry  LL15   DUL    SAT   KS
                10         17.61             33.77             48.62             0      0.865  0.06    0.231  0.565  0.58  1
                20         17.61             33.77             48.62             0      0.865  0.06    0.231  0.565  0.58  1
                30         17.61             33.77             48.62             0      0.865  0.06    0.231  0.565  0.58  1
                40         17.61             33.77             48.62             0      0.865  0.06    0.231  0.565  0.58  1
                50         17.61             33.77             48.62             0      0.865  0.06    0.231  0.565  0.58  1
                50         17.61             33.77             48.62             0      0.865  0.06    0.231  0.565  0.58  1
                50         17.61             33.77             48.62             0      0.865  0.06    0.231  0.565  0.58  1
                50         17.61             33.77             48.62             0      0.865  0.06    0.231  0.565  0.58  1
              Nutrient
              Organic: same as Sensibility.LowerBoundaryConditions.E1.Base_LowerBC.paddock.Soil.Organic
              Chemical: Thickness=[60, 110, 140, 240, 150]; PH=[6.5, 6.5, 6.5, 6.5, 6.5]; PHUnits=Water
              Water: Thickness=[10, 20, 30, 40, 50, 50, 50, 50]; InitialValues=[0.58, 0.5749, 0.565, 0.4417, 0.231, 0.0638, 0.231, 0.231]; FilledFromTop=false
              Swim3: same as Sensibility.LowerBoundaryConditions.E1.Base_LowerBC.paddock.Soil.Swim3
              Solute Cl: same as Sensibility.LowerBoundaryConditions.E1.Base_LowerBC.paddock.Soil.Cl
              LayerStructure: Thickness=[10, 20, 30, 40, 50, 50, 50, 50]
              SoilTemperature
              Solute NO3: same as Sensibility.LowerBoundaryConditions.E1.Base_LowerBC.paddock.Soil.NO3
              Solute NH4: same as Sensibility.LowerBoundaryConditions.E1.Base_LowerBC.paddock.Soil.NH4
              Solute Urea: same as Validation.SeepageLysimeter.SeepageLysimeterExperiment.BaseBuckthought.Paddock.Soil.Urea
            Soil Loam: Latitude=0; Longitude=0
              Physical
                Thickness  ParticleSizeClay  ParticleSizeSand  ParticleSizeSilt  Rocks  BD     AirDry  LL15  DUL  SAT   KS
                10         17.61             33.77             48.62             0      0.865  0.02    0.1   0.2  0.35  1
                20         17.61             33.77             48.62             0      0.865  0.02    0.1   0.2  0.35  1
                30         17.61             33.77             48.62             0      0.865  0.02    0.1   0.2  0.35  1
                40         17.61             33.77             48.62             0      0.865  0.02    0.1   0.2  0.35  1
                50         17.61             33.77             48.62             0      0.865  0.02    0.1   0.2  0.35  1
                50         17.61             33.77             48.62             0      0.865  0.02    0.1   0.2  0.35  1
                50         17.61             33.77             48.62             0      0.865  0.02    0.1   0.2  0.35  1
                50         17.61             33.77             48.62             0      0.865  0.02    0.1   0.2  0.35  1
              Nutrient
              Organic: same as Sensibility.LowerBoundaryConditions.E1.Base_LowerBC.paddock.Soil.Organic
              Chemical: Thickness=[60, 110, 140, 240, 150]; PH=[6.5, 6.5, 6.5, 6.5, 6.5]; PHUnits=Water
              Water: Thickness=[10, 20, 30, 40, 50, 50, 50, 50]; InitialValues=[0.35, 0.2504, 0.2, 0.1489, 0.1, 0.0293, 0.1, 0.1]; FilledFromTop=false
              Swim3: same as Sensibility.LowerBoundaryConditions.E1.Base_LowerBC.paddock.Soil.Swim3
              Solute Cl: same as Sensibility.LowerBoundaryConditions.E1.Base_LowerBC.paddock.Soil.Cl
              LayerStructure: Thickness=[10, 20, 30, 40, 50, 50, 50, 50]
              SoilTemperature
              Solute NO3: same as Sensibility.LowerBoundaryConditions.E1.Base_LowerBC.paddock.Soil.NO3
              Solute NH4: same as Sensibility.LowerBoundaryConditions.E1.Base_LowerBC.paddock.Soil.NH4
              Solute Urea: same as Validation.SeepageLysimeter.SeepageLysimeterExperiment.BaseBuckthought.Paddock.Soil.Urea
            Soil Sand: Latitude=0; Longitude=0
              Physical
                Thickness  ParticleSizeClay  ParticleSizeSand  ParticleSizeSilt  Rocks  BD     AirDry  LL15  DUL   SAT  KS
                10         17.61             33.77             48.62             0      0.865  0.005   0.03  0.08  0.3  1
                20         17.61             33.77             48.62             0      0.865  0.005   0.03  0.08  0.3  1
                30         17.61             33.77             48.62             0      0.865  0.005   0.03  0.08  0.3  1
                40         17.61             33.77             48.62             0      0.865  0.005   0.03  0.08  0.3  1
                50         17.61             33.77             48.62             0      0.865  0.005   0.03  0.08  0.3  1
                50         17.61             33.77             48.62             0      0.865  0.005   0.03  0.08  0.3  1
                50         17.61             33.77             48.62             0      0.865  0.005   0.03  0.08  0.3  1
                50         17.61             33.77             48.62             0      0.865  0.005   0.03  0.08  0.3  1
              Nutrient
              Organic: same as Sensibility.LowerBoundaryConditions.E1.Base_LowerBC.paddock.Soil.Organic
              Chemical: Thickness=[60, 110, 140, 240, 150]; PH=[6.5, 6.5, 6.5, 6.5, 6.5]; PHUnits=Water
              Water: Thickness=[10, 20, 30, 40, 50, 50, 50, 50]; InitialValues=[0.3, 0.1474, 0.08, 0.0429, 0.03, 0.008, 0.03, 0.03]; FilledFromTop=false
              Swim3: same as Sensibility.LowerBoundaryConditions.E1.Base_LowerBC.paddock.Soil.Swim3
              Solute Cl: same as Sensibility.LowerBoundaryConditions.E1.Base_LowerBC.paddock.Soil.Cl
              LayerStructure: Thickness=[10, 20, 30, 40, 50, 50, 50, 50]
              SoilTemperature
              Solute NO3: same as Sensibility.LowerBoundaryConditions.E1.Base_LowerBC.paddock.Soil.NO3
              Solute NH4: same as Sensibility.LowerBoundaryConditions.E1.Base_LowerBC.paddock.Soil.NH4
              Solute Urea: same as Validation.SeepageLysimeter.SeepageLysimeterExperiment.BaseBuckthought.Paddock.Soil.Urea
        Simulation Base_InitialConditions
          ControlledEnvironment Weather: AirPressure=1010
            zero: MaxT, MinT, Rain, Radn, PanEvap, VP, Wind, CO2, DiffuseFraction, Latitude, Longitude, DayLength, SunRise, SunSet
          Clock: Start=2000-01-01; End=2000-01-01
          Summary summaryfile
          SoilArbitrator
          MicroClimate: a_interception=0; b_interception=0; c_interception=0; d_interception=0; SoilHeatFluxFraction=0; MinimumHeightDiffForNewLayer=0; NightInterceptionFraction=0; ReferenceHeight=2
          Zone paddock: Area=1; Slope=0; AspectAngle=0; Altitude=50
            Soil: Latitude=0; Longitude=0
              Physical: same as Sensibility.LowerBoundaryConditions.E1.Base_LowerBC.paddock.Soil.Physical
              Nutrient
              Organic: same as Sensibility.LowerBoundaryConditions.E1.Base_LowerBC.paddock.Soil.Organic
              Chemical: Thickness=[60, 110, 140, 240, 150]; PH=[6.5, 6.5, 6.5, 6.5, 6.5]; PHUnits=Water
              Water: Thickness=[60, 110, 140, 240, 150]; InitialValues=[0.565, 0.565, 0.565, 0.565, 0.565]; FilledFromTop=false
              Swim3: same as Sensibility.LowerBoundaryConditions.E1.Base_LowerBC.paddock.Soil.Swim3
              Solute Cl: same as Sensibility.LowerBoundaryConditions.E1.Base_LowerBC.paddock.Soil.Cl
              LayerStructure: Thickness=[10, 20, 30, 40, 50, 50, 50, 50, 100, 100, 50, 50, 50, 50]
              SoilTemperature
              Solute NO3: same as Sensibility.LowerBoundaryConditions.E1.Base_LowerBC.paddock.Soil.NO3
              Solute NH4: same as Sensibility.LowerBoundaryConditions.E1.Base_LowerBC.paddock.Soil.NH4
              Solute Urea: same as Validation.SeepageLysimeter.SeepageLysimeterExperiment.BaseBuckthought.Paddock.Soil.Urea
            SurfaceOrganicMatter: InitialResidueName=grass; InitialResidueType=grass; InitialResidueMass=20; InitialStandingFraction=0; InitialCPR=0; InitialCNR=17
            Report InitilisationReport
              VariableNames:
                [Clock].Today as Date
                [Swim3].PSI
                [Swim3].theta
                sum([Soil].Water.MM) as TotalSW
                [Swim3].Drainage
                [Swim3].Es
                [Swim3].Runoff
              EventNames:
                [Clock].StartOfDay
                [Clock].EndOfDay
            Manager
```csharp
using System;
using Models.Core;
using Models.Interfaces;
using Models.PMF;
using APSIM.Shared.Utilities;
using Models.Soils;

namespace Models
{
    [Serializable]
    public class Script : Model
    {
        [Link] IClock Clock;
        [Link] ISummary Summary;
        [Link] Swim3 swim3;

        [EventSubscribe("StartOfDay")]
        private void OnStartOfDay(object sender, EventArgs e)
        {
            if (!MathUtilities.FloatsAreEqual(swim3.PSI[0],0.0,0.1))
                throw new Exception ("Psi ("+swim3.PSI[0].ToString()+") is not equal to expected value of 0 in layer 0");

            if (!MathUtilities.FloatsAreEqual(swim3.PSI[1],-25.0,0.2))
                throw new Exception ("Psi ("+swim3.PSI[1].ToString()+") is not equal to expected value of -25 in layer 1");

            if (!MathUtilities.FloatsAreEqual(swim3.PSI[2],-100.0,2))
                throw new Exception ("Psi ("+swim3.PSI[2].ToString()+") is not equal to expected value of -100 in layer 2");

            if (!MathUtilities.FloatsAreEqual(swim3.PSI[3],-1000.0,10))
                throw new Exception ("Psi ("+swim3.PSI[3].ToString()+") is not equal to expected value of -1000 in layer 3");

            if (!MathUtilities.FloatsAreEqual(swim3.PSI[4],-15000.0,15))
                throw new Exception ("Psi ("+swim3.PSI[4].ToString()+") is not equal to expected value of -10000 in layer 4");

            if (!MathUtilities.FloatsAreEqual(swim3.PSI[5],-1000000.0,10000))
                throw new Exception ("Psi ("+swim3.PSI[5].ToString()+") is not equal to expected value of -100000 in layer 5");

        }
    }
}
```
  Folder Tutorial
    Simulation HowToCreateNewSolute
      Memo
        SWIM will discover solutes or tracers automatically.

        To create a new solute:

        1. Add a *Solute* to the *soil* node (right click on *soil* and choose *Solute* from the *Soils,Nutrients* folder)
        2. Rename the solute (e.g. to *Br*)
        3. Add a *SwimSoluteParameters* to the swim node (right click on *swim* and choose *SwimSoluteParameters* from the *Soils* folder)
        4. Rename the *SwimSoluteParameters* to the same name as the solute (e.g. to *Br*)
        5. Parameterise as necessary (adding EXCO and FIP)

        To report the value of the solute use:

                [Br].kgha

        Solutes canb be initialied in the Soil node (ppm of solute in soil) or using the InitialiseCl/Br Manager script (in kg solute /ha). The Manager is more flexible as it allows the setting and/or addition of the named solute on multiple dates. Note also that solutes initialised in the Soil node can undergo some movement at the very beginning of the simulation (conceptually before hte first day) that is not included for solutes added at the beginning of the first day of simulation.

        The graph at the bottom shows that SWIM is moving the Br (symbols) in the same way as Cl, which is expected given the two solutes are parameterised identically.
      ControlledEnvironment: Rain=10; AirPressure=1010
        zero: MaxT, MinT, Radn, PanEvap, VP, Wind, CO2, DiffuseFraction, Latitude, Longitude, DayLength, SunRise, SunSet
      Clock: Start=2000-01-01; End=2000-06-30
      Summary summaryfile
      SoilArbitrator
      MicroClimate: a_interception=0; b_interception=0; c_interception=0; d_interception=0; SoilHeatFluxFraction=0; MinimumHeightDiffForNewLayer=0; NightInterceptionFraction=0; ReferenceHeight=2
      Zone paddock: Area=1; Slope=0; AspectAngle=0; Altitude=50
        Manager InitialiseCl
          SoluteName = Cl
          SetAdd = Set
          DateCsvString = 1/01/2000
          ValueCsvString = 100,0,0,0,0,0,0,0
```csharp
using Models.Climate;
using APSIM.Shared.Utilities;
using Models.Soils.Nutrients;
using Models.Soils;
using Models.Core;
using System;
using System.Collections.Generic;
using Models.AgPasture;
using Models.Interfaces;
using System.Linq;

namespace Models
{
    [Serializable] 
    [System.Xml.Serialization.XmlInclude(typeof(Model))]
    public class Script : Model
    {
        [Link] Clock clock;
        [Link] ISummary summary;
        [Link] private Solute[] solutes;

        private Solute solute;
        private List<DateTime> dates = new List<DateTime>();
        private List<double> values = new List<double>();

        public enum SetAddType { Set, Add }

        [Description("Name of solute:")]
        public string SoluteName { get; set; }

        [Description("Set the value of the solute or add a delta to it?")]
        public SetAddType SetAdd { get; set; }

        [Description("Dates (csv) for setting (adding to) the solute:")]
        public string DateCsvString { get; set; }

        [Description("Values (csv) kg/ha:")]
        public string ValueCsvString { get; set; }
  
        
        public double SoluteAdded { get; set; }

        [EventSubscribe("StartOfSimulation")]
        private void OnStartOfSimulation(object sender, EventArgs e)
        {
            solute = Array.Find(solutes, s => s.Name.Equals(SoluteName, StringComparison.InvariantCultureIgnoreCase));
            if (solute == null)
                throw new Exception($"Cannot find solute {SoluteName}");
        
            var dateStrings = DateCsvString.Split(",", StringSplitOptions.RemoveEmptyEntries);
            foreach (var d in dateStrings)
               dates.Add(DateTime.Parse(d));

            var valueStrings = ValueCsvString.Split(",", StringSplitOptions.RemoveEmptyEntries);
            foreach (var v in valueStrings)
               values.Add(Convert.ToDouble(v));
        }
        
        
        [EventSubscribe("DoDailyInitialisation")] private void DoDailyInitialisation(object sender, EventArgs e)
        {
               SoluteAdded = 0.0;
            foreach (var d in dates)
            {
                if (clock.Today == d) 
                {
                    if (SetAdd == SetAddType.Add)
                        solute.AddKgHaDelta(SoluteSetterType.Other, values.ToArray());
                    else
                        solute.SetKgHa(SoluteSetterType.Other, values.ToArray());
                    
                    SoluteAdded = solute.kgha.Sum();
                }
            }
        }
    }
}
```
        Manager InitialiseBr
          SoluteName = Br
          SetAdd = Set
          DateCsvString = 1/01/2000
          ValueCsvString = 100,0,0,0,0,0,0,0
          script: same as in Tutorial.HowToCreateNewSolute.paddock.InitialiseCl
        SurfaceOrganicMatter: InitialResidueName=grass; InitialResidueType=grass; InitialResidueMass=0; InitialStandingFraction=0; InitialCPR=0; InitialCNR=17
        Soil: SoilType=Loam; LocalName=Horotiu; Site=Ruakura, south of Railway Ln; NearestTown=Hamilton; Region=Waikato; Country=New Zealand; NaturalVegetation=long term grass; ApsoilNumber=1320; Latitude=-37.779; Longitude=175.304; LocationAccuracy=+/-50 m; YearOfSampling=1984
          DataSource=The database of New Zealand soils was compiled by AgResearch (www.agresearch.co.nz) and based on soil properties gathered, mainly from publications, in the course of conducting several simulation-based research projects but particularly from the Pastoral 21 Environment program which was funded by the New Zealand Ministry for Business, Innovation and Employment,  Dairy NZ, Fonterra and Meat & Wool NZ.
          Comments=Gravel soil. The bulk density of this APSoil reflects weight of fine-earth fraction per volume of bulk soil. Use with gravimetric water contents measured on the fine-earth fraction. Gravel assumed to not hold water as reflected in low SAT, DUL, LL15, LL and AD. The data is a combination of published or supplied measurements, pedotransfer functions, and expert opinion. See Cichota et al. (2013; Soil Research 51: 92-111, http://dx.doi.org/10.1071/SR12338) for a description of the pedotransfer functions. The soil carbon and fresh organic matter settings have been set as those broadly appropriate for permanent productive pastoral systems, see Cichota el al. (2012; Soil Research 50: 694-707, http://dx.doi.org/10.1071/SR12208). Users should take care to adapt these to local conditions before using the data in simulations. FOM values estimated to be 900 kg/ha of FOM in top 600mm of soil and another 100 kg/ha below.
          Physical
            Thickness  ParticleSizeClay  ParticleSizeSand  ParticleSizeSilt  Rocks  BD     AirDry  LL15   DUL    SAT    KS
            60         17.61             33.77             48.62             0      0.865  0.081   0.246  0.511  0.588  13367.955
            110        16.36             33.91             49.73             0      0.835  0.068   0.207  0.451  0.605  7114.419
            140        16.42             35.91             47.67             0      0.805  0.067   0.203  0.439  0.616  6216.357
            240        29.03             46.26             24.71             0      0.83   0.085   0.259  0.419  0.625  3256.961
            200        18.44             53.54             28.02             0      0.82   0.091   0.276  0.414  0.628  6716.918
            200        32.64             45.98             21.38             0      0.815  0.094   0.286  0.429  0.633  2348.283
            200        9.49              63.84             26.67             0      0.944  0.075   0.227  0.364  0.552  18003.598
            350        1                 93.21             5.79              0      1.063  0.015   0.045  0.092  0.312  62350.094
            BD source: Field measured and checked for sensibility
            AirDry source: Estimated based on local knowledge
            LL15, DUL source: Laboratory measured
            SAT source: Calculated from measured, estimated or calculated BD
          Nutrient
          Organic: same as Sensibility.SoluteMassBalanceTesting.E5_tracer.Base_SoluteLinear.paddock.Soil.Organic
          Chemical: same as Sensibility.TileDrainage.E4_1.TileDrainage1.paddock.Soil.Chemical
          Water: Thickness=[60, 110, 140, 240, 200, 200, 200, 350]; InitialValues=[0.511, 0.451, 0.439, 0.419, 0.414, 0.429, 0.364, 0.092]; RelativeTo=LL15; FilledFromTop=false
          Swim3 Swim: Salb=0.13; CN2Bare=50; CNRed=20; CNCov=0.8; KDul=1; PSIDul=-100; VC=true; DTMin=0; DTMax=30; MaxWaterIncrement=5; SpaceWeightingFactor=0; SoluteSpaceWeightingFactor=0; Dis=0; Disp=1; A=2; DTHC=0.1; DTHP=2; Diagnostics=false
          Solute Cl: same as Sensibility.TileDrainage.E4_1.TileDrainage1.paddock.Soil.Cl
          Solute Br: same as Sensibility.TileDrainage.E4_1.TileDrainage1.paddock.Soil.Cl
          LayerStructure: Thickness=[10, 20, 30, 40, 50, 50, 50, 50, 100, 100, 50, 50, 50, 50]
          SoilTemperature
          Solute NO3: same as Sensibility.TileDrainage.E4_1.TileDrainage1.paddock.Soil.Cl
          Solute NH4: same as Sensibility.SoluteMassBalanceTesting.E5_tracer.Base_SoluteLinear.paddock.Soil.NH4
          Solute Urea: same as Sensibility.TileDrainage.E4_1.TileDrainage1.paddock.Soil.Urea
        Irrigation
        Fertiliser
        Report: EventNames=[Clock].EndOfDay
          VariableNames:
            [Clock].Today as Date
            sum([Soil].Cl.kgha) as Cl
            sum([Soil].Br.kgha) as Br
    Simulation HowToAddSolutesInIrrigationWater
      Memo
        Solutes can be added with irrigation water. To do this, specify the amount of solute (kg/ha) when using the *Irrigation.Apply* method. For example:

        	2000-01-01 [Irrigation].Apply(amount:100,duration:60, no3:5);

        The units for amount of solute is kg/ha. Currently, only NO3 and NH4 can be added with irrigation.

        This simulation adds four irrigations (through the *AddIrrigation* manager script), each with 5 kg/ha of NO3.

        The graph shows the four increases in NO3 coinciding with each irrigation event.

        Notes:

        1. SWIM will potentially send excess surface water to runoff, regardless of whether it is rainfall or irrigation water. The Irrigation.Apply method has a boolean argument called 'willRunoff' to indictate whether irrigation water should potentially runoff or not. SWIM ignores this property. The result is that irrigation water may potentially be lost through runoff.

        2. Runoff water in SWIM does not contain solutes at this time but this may be added in future releases.

        3. There is no soil or wind erosion in APSIM.
      ControlledEnvironment: Rain=10; AirPressure=1010
        zero: MaxT, MinT, Radn, PanEvap, VP, Wind, CO2, DiffuseFraction, Latitude, Longitude, DayLength, SunRise, SunSet
      Clock: Start=2000-01-01; End=2000-06-30
      Summary summaryfile
      SoilArbitrator
      MicroClimate: a_interception=0; b_interception=0; c_interception=0; d_interception=0; SoilHeatFluxFraction=0; MinimumHeightDiffForNewLayer=0; NightInterceptionFraction=0; ReferenceHeight=2
      Zone paddock: Area=1; Slope=0; AspectAngle=0; Altitude=50
        Operations AddIrrigation
          2000-01-10  [Irrigation].Apply(amount:10,duration:60, no3:5);
          2000-02-10  [Irrigation].Apply(amount:10,duration:60, no3:5);
          2000-03-10  [Irrigation].Apply(amount:10,duration:60, no3:5);
          2000-04-10  [Irrigation].Apply(amount:10,duration:60, no3:5);
        SurfaceOrganicMatter: InitialResidueName=grass; InitialResidueType=grass; InitialResidueMass=0; InitialStandingFraction=0; InitialCPR=0; InitialCNR=17
        Soil: SoilType=Loam; LocalName=Horotiu; Site=Ruakura, south of Railway Ln; NearestTown=Hamilton; Region=Waikato; Country=New Zealand; NaturalVegetation=long term grass; ApsoilNumber=1320; Latitude=-37.779; Longitude=175.304; LocationAccuracy=+/-50 m; YearOfSampling=1984
          DataSource=The database of New Zealand soils was compiled by AgResearch (www.agresearch.co.nz) and based on soil properties gathered, mainly from publications, in the course of conducting several simulation-based research projects but particularly from the Pastoral 21 Environment program which was funded by the New Zealand Ministry for Business, Innovation and Employment,  Dairy NZ, Fonterra and Meat & Wool NZ.
          Comments=Gravel soil. The bulk density of this APSoil reflects weight of fine-earth fraction per volume of bulk soil. Use with gravimetric water contents measured on the fine-earth fraction. Gravel assumed to not hold water as reflected in low SAT, DUL, LL15, LL and AD. The data is a combination of published or supplied measurements, pedotransfer functions, and expert opinion. See Cichota et al. (2013; Soil Research 51: 92-111, http://dx.doi.org/10.1071/SR12338) for a description of the pedotransfer functions. The soil carbon and fresh organic matter settings have been set as those broadly appropriate for permanent productive pastoral systems, see Cichota el al. (2012; Soil Research 50: 694-707, http://dx.doi.org/10.1071/SR12208). Users should take care to adapt these to local conditions before using the data in simulations. FOM values estimated to be 900 kg/ha of FOM in top 600mm of soil and another 100 kg/ha below.
          Physical: same as Sensibility.SoluteMassBalanceTesting.E5_tracer.Base_SoluteLinear.paddock.Soil.Physical
          Nutrient
          Organic: same as Sensibility.SoluteMassBalanceTesting.E5_tracer.Base_SoluteLinear.paddock.Soil.Organic
          Chemical: same as Sensibility.TileDrainage.E4_1.TileDrainage1.paddock.Soil.Chemical
          Water: Thickness=[60, 110, 140, 240, 200, 200, 200, 350]; InitialValues=[0.511, 0.451, 0.439, 0.419, 0.414, 0.429, 0.364, 0.092]; FilledFromTop=false
          Swim3 Swim: same as Tutorial.HowToCreateNewSolute.paddock.Soil.Swim
          LayerStructure: Thickness=[10, 20, 30, 40, 50, 50, 50, 50, 100, 100, 50, 50, 50, 50]
          SoilTemperature
          Solute NO3: InitialValuesUnits=ppm; WaterTableConcentration=0; D0=0.05; DepthConstant=0; MaxDepthSoluteAccessible=0; RunoffEffectivenessAtMovingSolute=0; MaxEffectiveRunoff=0
            Thickness  InitialValues  Exco  FIP
            60         1              0     1
            110        1              0     1
            140        1              0     1
            240        1              0     1
            200        1              0     1
            200        1              0     1
            200        1              0     1
            350        1              0     1
          Solute NH4: same as Sensibility.SoluteMassBalanceTesting.E5_tracer.Base_SoluteLinear.paddock.Soil.NH4
          Solute Urea: same as Sensibility.TileDrainage.E4_1.TileDrainage1.paddock.Soil.Urea
        Irrigation
        Fertiliser
        Report: EventNames=[Clock].EndOfDay
          VariableNames:
            [Clock].Today as Date
            sum([NO3].kgha) as NO3
            [Irrigation].IrrigationApplied as Irrigation
            [SWIM].LeachNO3 as NO3Leached
    Simulation HowToAddTileDrainage
      Memo
        To simulate a tile drained soil, right-click on the SWIM model in Soil and add SwimSubsurfaceDrain and fill in the fields in the component describing the drainage system.

        With a tile drained system, usually the lower boudary condition needed is a constant gradient (the default, so co additional action is needed). When adding tile drains, ensure that the soil profile extends well below the drain depth and that you have set sensible (i.e., poorly-drained) soil properties at and below the depth of the drains.

        The simulation below shows a simulation with a drain configured with a depth to impermeable layer of 1000 mm. Note that there is a combination of tile and normal drainage and that the water table depth varies during the simulation.
      Weather: FileName=..\..\..\Examples\WeatherFiles\lincoln.met
      Clock: Start=2000-01-01; End=2000-01-31
      Summary summaryfile
      SoilArbitrator
      MicroClimate: a_interception=0; b_interception=0; c_interception=0; d_interception=0; SoilHeatFluxFraction=0; MinimumHeightDiffForNewLayer=0; NightInterceptionFraction=0; ReferenceHeight=2
      Zone paddock: Area=1; Slope=0; AspectAngle=0; Altitude=50
        Operations AddIrrigation
          2000-01-10  [Irrigation].Apply(amount:100,duration:60);
          2000-01-15  [Irrigation].Apply(amount:100,duration:60);
        SurfaceOrganicMatter: InitialResidueName=grass; InitialResidueType=grass; InitialResidueMass=0; InitialStandingFraction=0; InitialCPR=0; InitialCNR=17
        Soil: SoilType=Loam; LocalName=Horotiu; Site=Ruakura, south of Railway Ln; NearestTown=Hamilton; Region=Waikato; Country=New Zealand; NaturalVegetation=long term grass; ApsoilNumber=1320; Latitude=-37.779; Longitude=175.304; LocationAccuracy=+/-50 m; YearOfSampling=1984
          DataSource=The database of New Zealand soils was compiled by AgResearch (www.agresearch.co.nz) and based on soil properties gathered, mainly from publications, in the course of conducting several simulation-based research projects but particularly from the Pastoral 21 Environment program which was funded by the New Zealand Ministry for Business, Innovation and Employment,  Dairy NZ, Fonterra and Meat & Wool NZ.
          Comments=Gravel soil. The bulk density of this APSoil reflects weight of fine-earth fraction per volume of bulk soil. Use with gravimetric water contents measured on the fine-earth fraction. Gravel assumed to not hold water as reflected in low SAT, DUL, LL15, LL and AD. The data is a combination of published or supplied measurements, pedotransfer functions, and expert opinion. See Cichota et al. (2013; Soil Research 51: 92-111, http://dx.doi.org/10.1071/SR12338) for a description of the pedotransfer functions. The soil carbon and fresh organic matter settings have been set as those broadly appropriate for permanent productive pastoral systems, see Cichota el al. (2012; Soil Research 50: 694-707, http://dx.doi.org/10.1071/SR12208). Users should take care to adapt these to local conditions before using the data in simulations. FOM values estimated to be 900 kg/ha of FOM in top 600mm of soil and another 100 kg/ha below.
          Physical
            Thickness  ParticleSizeClay  ParticleSizeSand  ParticleSizeSilt  Rocks  BD   AirDry  LL15   DUL    SAT   KS
            60         18.44             53.54             28.02             0      1.3  0.091   0.276  0.414  0.45  100
            110        18.44             53.54             28.02             0      1.3  0.091   0.276  0.414  0.45  50
            140        18.44             53.54             28.02             0      1.3  0.091   0.276  0.414  0.45  25
            240        18.44             53.54             28.02             0      1.3  0.091   0.276  0.414  0.45  3
            200        18.44             53.54             28.02             0      1.3  0.091   0.276  0.414  0.45  3
            200        18.44             53.54             28.02             0      1.3  0.091   0.276  0.414  0.42  1
            200        18.44             53.54             28.02             0      1.3  0.091   0.276  0.414  0.42  0.5
            350        18.44             53.54             28.02             0      1.3  0.091   0.276  0.414  0.42  0.1
            BD source: Field measured and checked for sensibility
            AirDry source: Estimated based on local knowledge
            LL15, DUL source: Laboratory measured
            SAT source: Calculated from measured, estimated or calculated BD
          Nutrient
          Organic: same as Sensibility.TileDrainage.E4_1.TileDrainage1.paddock.Soil.Organic
          Chemical: same as Sensibility.TileDrainage.E4_1.TileDrainage1.paddock.Soil.Chemical
          Water: Thickness=[60, 110, 140, 240, 200, 200, 200, 350]; InitialValues=[0.414, 0.414, 0.414, 0.414, 0.414, 0.414, 0.414, 0.414]; RelativeTo=LL15; FilledFromTop=false
          Swim3 Swim: same as Sensibility.TileDrainage.E4_2.TileDrainage2.paddock.Soil.Swim3
          Solute Cl: same as Sensibility.TileDrainage.E4_1.TileDrainage1.paddock.Soil.Cl
          LayerStructure
            Thickness=[10, 20, 30, 40, 50, 50, 50, 50, 100, 100, 50, 50, 50, 50, 50, 50, 50, 50, 75, 25]
          SoilTemperature
          Solute NO3: same as Sensibility.TileDrainage.E4_1.TileDrainage1.paddock.Soil.Cl
          Solute NH4: same as Sensibility.TileDrainage.E4_1.TileDrainage1.paddock.Soil.NH4
          Solute Urea: same as Sensibility.TileDrainage.E4_1.TileDrainage1.paddock.Soil.Urea
        Irrigation
        Fertiliser
        Report: EventNames=[Clock].EndOfDay
          VariableNames:
            [Clock].Today as Date
            [Soil].Swim.SubsurfaceDrain as SubsurfaceDrainage
            [Soil].Swim.Drainage as Drainage
            sum([Soil].Swim.SWmm) as WaterStorage
            [Soil].Swim.WaterTable as WaterTableDepth
    Simulation HowToSetASeepageLowerBoundaryCondition
      Memo
        By default, if no action is taken, SWIM will use a gradient lower boundary condition and this is what will be used in most simulations - but there are exceptions.

        The "seepage" boundary condition is when there is a column of soil that is not hydraulically connected to the lower soil as in a lysimeter. In such cases a small head of water must accumulate at the base of the soil profile before it can drain. To set this boundary condition use the "SWIM3_SetLowerBC" Manager component. Note that the second parameter in the component is not used in this particular boundary condition.

        The simulation below shows a simulation with a seepage boundary condition set.
      Weather: FileName=..\..\..\Examples\WeatherFiles\lincoln.met
      Clock: Start=2000-01-01; End=2005-01-31
      Summary summaryfile
      SoilArbitrator
      MicroClimate: a_interception=0; b_interception=0; c_interception=0; d_interception=0; SoilHeatFluxFraction=0; MinimumHeightDiffForNewLayer=0; NightInterceptionFraction=0; ReferenceHeight=2
      Forages: same as Sensibility.LowerBoundaryConditions.E1.Base_LowerBC.Forages
      Zone paddock: Area=1; Slope=0; AspectAngle=0; Altitude=50
        Manager SWIM3_SetLowerBC: same as Sensibility.TileDrainage.E4_1.TileDrainage1.paddock.SWIM3_SetLowerBC
        Manager AutomaticIrrigation: same as Sensibility.LowerBoundaryConditions.E1.Base_LowerBC.paddock.AutomaticIrrigation
        Soil: same as Sensibility.LowerBoundaryConditions.E1.Base_LowerBC.paddock.Soil
        Irrigation
        Fertiliser
        SurfaceOrganicMatter: InitialResidueName=grass; InitialResidueType=grass; InitialResidueMass=20; InitialStandingFraction=0; InitialCPR=0; InitialCNR=17
        SimpleGrazing: same as Sensibility.LowerBoundaryConditions.E1.Base_LowerBC.paddock.SimpleGrazing
        PastureSpecies AGPRyegrass: same as Sensibility.LowerBoundaryConditions.E1.Base_LowerBC.paddock.AGPRyegrass
        PastureSpecies AGPWhiteClover: same as Sensibility.LowerBoundaryConditions.E1.Base_LowerBC.paddock.AGPWhiteClover
        Report: EventNames=[Clock].EndOfDay
          VariableNames:
            [SWIM3_SetLowerBC].Script.LowerBCType
            [Clock].Today as Date
            [Soil].Swim3.Drainage as Drainage
    Simulation HowToSetAPotentialLowerBoundaryCondition1
      Memo
        By default, if no action is taken, SWIM will use a gradient lower boundary condition and this is what will be used in most simulations - but there are exceptions.

        The "potential" boundary condition is when there is a set soil water potential at the base of the simulated soil. This can be negative, meaning that water will be constantly 'pulled' out of the lower layer by a suction.

        More often with this boundary condition it will be positive, meaning that there is a water table that is caused by external factors (i.e. not a perched water table caused by poor internal drainage) such as a regional water table. In these cases it is assumed that there is an infinite supply of water available to keep the soil water potential of the lower boundary at the user-prescribed value. To achieve this, water is continually added (or removed) from the soil to maintain the set potential.

        The value associated with the potential lower boundary condition is relative to the base of the simulated soil profile. If the simulated soil profile is 1000 mm deep and a potential of 250 mm is set for the lower boundary, then the water table will be 750 mm below the soil surface. If the soil profile was 1500 mm deep and the potential was still set at 250 mm then the water table would be at a depth of 1250 mm below the soil surface.

        The simulation below shows a simulation with a potential boundary condition set at 100 mm and a soil profile depth of 700 mm. You will see that the water table depth is 600 mm. You will also see that drainage out of the base of the soil profile can be either positive (downward) or negative (upward) with the latter being when the regional water table is replenishing water into the soil profile.
      Weather: FileName=..\..\..\Examples\WeatherFiles\lincoln.met
      Clock: Start=2000-01-01; End=2005-01-31
      Summary summaryfile
      SoilArbitrator
      MicroClimate: a_interception=0; b_interception=0; c_interception=0; d_interception=0; SoilHeatFluxFraction=0; MinimumHeightDiffForNewLayer=0; NightInterceptionFraction=0; ReferenceHeight=2
      Forages: same as Sensibility.LowerBoundaryConditions.E1.Base_LowerBC.Forages
      Zone paddock: Area=1; Slope=0; AspectAngle=0; Altitude=50
        Manager SWIM3_SetLowerBC
          LowerBCType = potential
          LowerBCValue = 100
          script: same as in Sensibility.LowerBoundaryConditions.E1.Base_LowerBC.paddock.SWIM3_SetLowerBC
        Manager AutomaticIrrigation: same as Sensibility.LowerBoundaryConditions.E1.Base_LowerBC.paddock.AutomaticIrrigation
        Irrigation
        Fertiliser
        SurfaceOrganicMatter: InitialResidueName=grass; InitialResidueType=grass; InitialResidueMass=20; InitialStandingFraction=0; InitialCPR=0; InitialCNR=17
        Soil: same as Sensibility.LowerBoundaryConditions.E1.Base_LowerBC.paddock.Soil
        SimpleGrazing: same as Sensibility.LowerBoundaryConditions.E1.Base_LowerBC.paddock.SimpleGrazing
        PastureSpecies AGPRyegrass: same as Sensibility.LowerBoundaryConditions.E1.Base_LowerBC.paddock.AGPRyegrass
        PastureSpecies AGPWhiteClover: same as Sensibility.LowerBoundaryConditions.E1.Base_LowerBC.paddock.AGPWhiteClover
        Report: EventNames=[Clock].EndOfDay
          VariableNames:
            [Clock].Today as Date
            [Soil].Swim3.Drainage as Drainage
            [Soil].Swim3.WaterTable as WaterTableDepth
    Simulation HowToCheckMyWaterBalance
      Memo
        SWIM uses a numerical solution when calculating water and solute movement and such solutions can generate losses of mass balance of water that accumulate over time. Within any one simulation day, SWIM will check mass balance but it will not check if those errors accumulate over extended periods of time. It also cannot check if there are errors, external to SWIM, that are creating or losing mass of water. The Manager component “CalculateRollingWaterBalance” was created to do this task.

        CalculateRollingWaterBalance automatically checks for additions (e.g., rainfall, irrigation) and removals (e.g., plant water uptake, runoff) and calculates a whole-of-zone water balance. The component has several outputs that may be useful but the most useful one is WaterBalanceCumulative which tracks any gain/loss of water continuously over the simulation.

        It is useful to look at both the daily water balance (WaterBalanceToday) and the cumulative version (WaterBalanceCumulative).
      Weather: FileName=..\..\..\Examples\WeatherFiles\lincoln.met
      Clock: Start=2000-01-01; End=2005-01-31
      Summary summaryfile
      SoilArbitrator
      MicroClimate: a_interception=0; b_interception=0; c_interception=0; d_interception=0; SoilHeatFluxFraction=0; MinimumHeightDiffForNewLayer=0; NightInterceptionFraction=0; ReferenceHeight=2
      Forages: same as Sensibility.LowerBoundaryConditions.E1.Base_LowerBC.Forages
      Zone paddock: Area=1; Slope=0; AspectAngle=0; Altitude=50
        Manager CalculateRollingWaterBalance: same as Replacements.CalculateRollingWaterBalance
        Manager SWIM3_SetLowerBC: same as Sensibility.LowerBoundaryConditions.E1.Base_LowerBC.paddock.SWIM3_SetLowerBC
        Manager AutomaticIrrigation: same as Sensibility.LowerBoundaryConditions.E1.Base_LowerBC.paddock.AutomaticIrrigation
        Soil: same as Sensibility.LowerBoundaryConditions.E1.Base_LowerBC.paddock.Soil
        Irrigation
        Fertiliser
        SurfaceOrganicMatter: InitialResidueName=grass; InitialResidueType=grass; InitialResidueMass=20; InitialStandingFraction=0; InitialCPR=0; InitialCNR=17
        SimpleGrazing: same as Sensibility.LowerBoundaryConditions.E1.Base_LowerBC.paddock.SimpleGrazing
        PastureSpecies AGPRyegrass: same as Sensibility.LowerBoundaryConditions.E1.Base_LowerBC.paddock.AGPRyegrass
        PastureSpecies AGPWhiteClover: same as Sensibility.LowerBoundaryConditions.E1.Base_LowerBC.paddock.AGPWhiteClover
        Report: EventNames=[Clock].EndOfDay
          VariableNames:
            [Clock].Today as Date
            [CalculateRollingWaterBalance].Script.WaterBalanceCumulative as WaterBalanceCumulative
            [CalculateRollingWaterBalance].Script.WaterBalanceToday as WaterBalanceToday
  Folder CriticalTesting
    Simulation Psi_Theta
      Memo
        SWIM should always find a unique relationship between soil water potential (Psi) and volumetric water content (SW). During some of the early testing an error was found where SWIM would solve to multiple values or Psi for any value of SW. This simulation tests in case that behaviour re-emerges. The Manager component “CheckPSI_SW” looks for Psi values when SW is in the rage 0.182 to 0.200 and if Psi varies by more than 25000 cm then an exception is thrown. The errors found earlier were well in excess of this range and were immediately obvious in the plot included in the simulation.
      Clock: Start=1994-08-05; End=1996-08-31
      Summary summaryfile
      Weather: FileName=Hudson.met
      SoilArbitrator
      MicroClimate: a_interception=0; b_interception=1; c_interception=0; d_interception=0; SoilHeatFluxFraction=0.4; MinimumHeightDiffForNewLayer=0; NightInterceptionFraction=0.5; ReferenceHeight=2
      Zone paddock: Area=1; Slope=0; AspectAngle=0; Altitude=50
        Manager CheckPSI_SW
```csharp
using Models.Climate;
using APSIM.Shared.Utilities;
using Models.Soils.Nutrients;
using Models.Soils;
using Models.PMF;
using Models.Core;
using System.Xml.Serialization;
using System;
using Models.AgPasture;
using Models.Interfaces;
using System.Linq;

namespace Models
{
    [Serializable] 
    [System.Xml.Serialization.XmlInclude(typeof(Model))]
    public class Script : Model
    {
        [Link] Clock clock;
        [Link] ISummary summary;
        [Link] private Swim3 swim3;

        private double psiTolerance = 25000;
        private double psi1Min = double.MaxValue;
        private double psi1Max = double.MinValue;

        [EventSubscribe("DoDailyInitialisation")]
        private void DoDailyInitialisation(object sender, EventArgs e)
        {
            if (swim3.SW[0] >= 0.182 && swim3.SW[0] <= 0.200)
            {
                psi1Min = Math.Min(psi1Min, swim3.PSI[0]);
                psi1Max = Math.Max(psi1Max, swim3.PSI[0]);
                
                if (psi1Max - psi1Min > psiTolerance)
                    throw new Exception("Psi / Theta is not in range");
            }
            
        }
    }
}
```
        Operations: same as Validation.Hudson.HudsonW1.paddock.Operations
        Fertiliser
        SurfaceOrganicMatter SurfaceOM: InitialResidueName=unknown; InitialResidueType=wheat; InitialResidueMass=1000; InitialStandingFraction=1; InitialCPR=0; InitialCNR=100
        Soil: Latitude=0; Longitude=0
          Physical: same as Validation.Hudson.HudsonW1.paddock.Soil.Physical
          Organic: same as Validation.Hudson.HudsonW1.paddock.Soil.Organic
          Chemical: same as Validation.Hudson.HudsonW1.paddock.Soil.Chemical
          Water: FilledFromTop=false
            Thickness=[100, 200, 200, 200, 200, 200, 200, 200, 200, 200, 200, 200, 200, 200, 200, 200]
            InitialValues=[0.434, 0.43, 0.48, 0.47, 0.46, 0.46, 0.46, 0.485, 0.49, 0.474, 0.457, 0.453, 0.447, 0.465, 0.457, 0.43]
          CERESSoilTemperature Temperature
          Swim3: same as Validation.Hudson.HudsonW1.paddock.Soil.Swim3
          LayerStructure
            Thickness=[10, 20, 30, 40, 200, 200, 200, 200, 200, 200, 200, 200, 200, 200, 200, 200, 200, 200, 200]
          Solute CL: same as Validation.Hudson.HudsonW1.paddock.Soil.CL
          Nutrient
          Solute NO3: same as Validation.Hudson.HudsonW1.paddock.Soil.NO3
          Solute NH4: same as Validation.Hudson.HudsonW1.paddock.Soil.NH4
          Solute Urea: same as Validation.Hudson.HudsonW1.paddock.Soil.Urea
        Plant Wheat
        Report PsiThetaReport: EventNames=[Clock].DoReport
          VariableNames:
            [Clock].Today
            [Soil].Water.Volumetric[1]
            [Soil].Swim3.PSI[1]
  Folder ExampleSimulation
    Simulation SWIMExample
      Memo
        To create a simulation using SWIM as the water mode:
        -	Replace the SoilWater model with SWIM (right-click on the Soil node, Add model)
        -	Add (if it is not already there) a LayerStructure model that gives thin layers near the soil surface and also around slowly permeable layers and other structures such as tile drains
        -	If a special (potential/water table or seepage) lower boundary condition is wanted then add the “SWIMSetLowerBC” Manager (go to the Management toolbox and expand the Soil folder) to the simulation – otherwise it will default to a unit gradient boundary condition
        -	If your soil has tile drains then add the xx by right-clicking on the Swim3 node, Add model and select SwimSubsurfaceDrain and then fill out the fields describing the drainage system – note that the units are in mm rather than m
      Weather: FileName=..\..\..\Examples\WeatherFiles\lincoln.met
      Clock: Start=2000-01-01; End=2005-01-31
      Summary summaryfile
      SoilArbitrator
      MicroClimate: a_interception=0; b_interception=0; c_interception=0; d_interception=0; SoilHeatFluxFraction=0; MinimumHeightDiffForNewLayer=0; NightInterceptionFraction=0; ReferenceHeight=2
      Forages: same as Sensibility.LowerBoundaryConditions.E1.Base_LowerBC.Forages
      Zone paddock: Area=1; Slope=0; AspectAngle=0; Altitude=50
        Manager SWIMSetLowerBC: same as Sensibility.TileDrainage.E4_1.TileDrainage1.paddock.SWIM3_SetLowerBC
        Manager AutomaticIrrigation: same as Sensibility.LowerBoundaryConditions.E1.Base_LowerBC.paddock.AutomaticIrrigation
        Irrigation
        Fertiliser
        SurfaceOrganicMatter: InitialResidueName=grass; InitialResidueType=grass; InitialResidueMass=20; InitialStandingFraction=0; InitialCPR=0; InitialCNR=17
        Soil: same as Sensibility.LowerBoundaryConditions.E1.Base_LowerBC.paddock.Soil
        SimpleGrazing: same as Sensibility.LowerBoundaryConditions.E1.Base_LowerBC.paddock.SimpleGrazing
        PastureSpecies AGPRyegrass: same as Sensibility.LowerBoundaryConditions.E1.Base_LowerBC.paddock.AGPRyegrass
        PastureSpecies AGPWhiteClover: same as Sensibility.LowerBoundaryConditions.E1.Base_LowerBC.paddock.AGPWhiteClover
        Report: EventNames=[Clock].EndOfDay
          VariableNames:
            [Clock].Today as Date
            [Soil].Swim3.Drainage as Drainage
            [Soil].Swim3.Runoff as Runoff
            [Soil].Swim3.Pond as PondDepth
            sum([Soil].Water.MM) as WaterStored
            [Soil].Swim3.Runoff as Runoff[Soil].Water.Volumetric as SW
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