Simulations: Version=171
  DataStore
  Folder Initialisation of Temperature
    Memo
      SoilTemperature uses a numerical solution to the heat flow equation to find soil temperature at any depth. In principle, the numerical solution is sensitive to the layering but the extent of has not previously been tested in APSIM. Because the model will be used with both SWIM (think surface layers) and SoilWater (thick surface layers) it is important to understand any sensitivity.

      A simple simulation was set up using a ‘dummy’ model to hold soil water contents constant as the purpose here is to test the soil temperature simulation not the soil water simulation. Both simulations had soil extending to 1100 mm deep. The thin-layering simulation had 11 layers with the top layer 2 mm deep and with seven layers in the top 100 mm. The thick-layering simulation had six layers with only one layer in the top 100 mm – a value typical for simulations using SoilWater.

      The first three plots below compare the simulated soil temperature across three depths with the thin layering in black and the thick layering in orange. Plots 3 to 6 show patterns of daily average (plot 4) and maximum (plots 5 and 6) soil temperature across depths for the thin layering (plots 4 and 5) and thick layering (plot 6). Note that the depths of 1, 8 and 15 mm all fall in the top layer of the thick-layering simulation but are in layers 1, 3, 4, and 8 of the thin-layering simulation.

      Overall, the simulations showed low sensitivity to the differences in layering (Plots 1-3). There was a greater difference in simulated maximum temperature than average temperature. For example, on 22 October the average soil temperature at 1 mm for the thin layering was 29 C v’s 28 for the thick layering (Plots 5 and 6). The differences in maximum temperature are greater than for average temperature. Plot 5 show a maximum temperature at 1 mm of 36 C for the thin layering v’s 33 C for the thick layering in Plot 6. It is possible that these differences may be important in future simulation purposes but these are minor differences when viewed from the perspective of must current uses.

      It must be emphasised that this test is on the soil temperature model only. Layering will have a much more substantial effect on soil water contents when a soil water simulation model is included in the simulation and the differences in soil water content will feed through to greater differences in the simulated soil temperature. Users should be aware of this when deciding which soil water model to use.
    Experiment Effect of initialisation choices (disabled)
      Factors
        CompositeFactor Default: Specifications=[SoilTemperature]
        CompositeFactor InitAtZero: Specifications=[SoilTemperature]
        CompositeFactor InitAtThirty: Specifications=[SoilTemperature]
      Simulation Initialisation
        Clock: Start=1980-07-01; End=1985-06-30
        Weather: FileName=%root%/Examples/WeatherFiles/lincoln.met
        MicroClimate: a_interception=0; b_interception=1; c_interception=0; d_interception=0; SoilHeatFluxFraction=0.4; MinimumHeightDiffForNewLayer=0; NightInterceptionFraction=0.5; ReferenceHeight=2
        Forages
          Parameters:
            Name                          IsLive  DigestibilityString  FractionConsumable  MinimumAmount  UseDigestibilityFromModel
            SurfaceOrganicMatter.Residue  true    0.7                  1                   100            false
            SurfaceOrganicMatter.Residue  false   0.3                  1                   0              false
            AGPRyegrass.Leaf              true    0.7                  1                   100            false
            AGPRyegrass.Leaf              false   0.3                  1                   0              false
            AGPRyegrass.Stem              true    0.7                  1                   100            false
            AGPRyegrass.Stem              false   0.3                  1                   0              false
            AGPRyegrass.Stolon            true    0.7                  1                   100            false
            AGPRyegrass.Stolon            false   0.3                  1                   0              false
            AGPWhiteClover.Leaf           true    0.7                  1                   100            false
            AGPWhiteClover.Leaf           false   0.3                  1                   0              false
            AGPWhiteClover.Stem           true    0.7                  1                   100            false
            AGPWhiteClover.Stem           false   0.3                  1                   0              false
            AGPWhiteClover.Stolon         true    0.7                  1                   100            false
            AGPWhiteClover.Stolon         false   0.3                  1                   0              false
        SoilArbitrator
        Summary
        Zone Field: Area=1; Slope=0; AspectAngle=0; Altitude=50
          SimpleGrazing: GrazingRotationType=0; SimpleGrazingFrequencyString=21; SimpleMinGrazable=0; SimpleGrazingResidual=1500; FlexibleGrazePostDM=0; FractionDefoliatedBiomassToSoil=[1]; FractionDefoliatedNToSoil=[0.7]; FractionExcretedNToDung=[0.45]; DepthUrineIsAdded=250; SendDungElsewhere=0; SendUrineElsewhere=0; FractionPopulationDecline=0; TramplingOn=false; MaximumPropLitterMovedToSoil=0.1; PastureConsumedAtMaximumRateOfLitterRemoval=1200
            PreGrazeDMArray=[1000, 1000, 1000, 1000, 1000, 1000, 1000, 1000, 1000, 1000, 1000, 1000]
            PostGrazeDMArray=[2000, 2000, 2000, 2000, 2000, 2000, 2000, 2000, 2000, 2000, 2000, 2000]
          Manager FertiliseFixedDates
            EachYear = True
            Dates = 5-jan, 5-feb, 5-mar, 5-apr, 5-aug, 5-sep, 5-oct, 5-nov, 5-dec
            UseCritNThreshold = False
            CritNThreshold = 50
            CritNDepth = 75
            Depth = 50
            Amount = 15
            FertiliserType = UreaN
```csharp
using Models.Interfaces;
using System.Linq;
using APSIM.Shared.Utilities;
using Models.PMF;
using Models.Soils;
using Models.Soils.Nutrients;
using Models.Core;
using System;
using Models.Soils.Nutrients;

namespace Models
{
    [Serializable]
    public class Script : Model
    {
        [Link] private Clock clock;
        [Link] private Fertiliser fertiliser;
        [Link] private ISummary summary;
        [Link] private Soil soil;
        private Nutrient nutrient;
        private Nutrient soilN;
        [Link]
        private IPhysical soilPhysical;
        [Link]
        private Nutrient Nutrient;
        [Link(Path="[SurfaceOrganicMatter].SurfaceResidue.Decomposition")]
        private OrganicFlow ResidueDecomposition;


        [Separator("Fertiliser will be applied on the date(s) below")]
        [Description("Apply fertiliser on the same day(s) each year? If no, then must include the year of appliaction below")]
        public bool EachYear { get; set; }

        [Description("Dates for one or more fertiliser applications (dd-mmm or dd-mmm-yyyy) as a list with a comma between dates")]
        public string[] Dates { get; set; }

        [Separator("Test for the mineral N in the soil and don't apply the fertiliser if greater than X kgN/ha is stored in the soil above a depth of Y mm")]
        [Description("Use a critical soil mineral N to prevent application above a threshold?")]
        public bool UseCritNThreshold { get; set; }

        [Description("Don't add fertiliser if N in the soil to the depth below exceeds (kg/ha)")]
        public double CritNThreshold { get; set; }

        [Description("Depth to which the amount of N in the soil should be calculated (mm)")]
        public double CritNDepth { get; set; }

        [Separator("Fertiliser application details")]
        [Description("Depth at which to apply the fertiliser (mm)")]
        public double Depth { get; set; }

        [Description("Amount of fertiliser to apply (kg N /ha) per application")]
        public double Amount { get; set; }

        [Description("Fertiliser type - select from the list")]
        public Fertiliser.Types FertiliserType { get; set; }


        [EventSubscribe("StartOfSimulation")]
        private void FindSoilNOrNutrient(object sender, EventArgs e)
        {
            nutrient = this.FindInScope<Nutrient>() as Nutrient;
            soilN = this.FindInScope<Nutrient>() as Nutrient;

            if (nutrient == null && soilN == null)
                throw new Exception(string.Format("Error in script {0}: Unable to find nutrient or soilN.", Name));
        }

        [EventSubscribe("DoManagement")]
        private void OnDoManagement(object sender, EventArgs e)
        {
            if (OnApplicationDate())
            {
                if (NContentBelowThreshold())
                    fertiliser.Apply(Amount, FertiliserType, Depth);
                else
                    summary.WriteMessage(this, "Skipping fertiliser application due to soil mineral N content being above critical threshold.", MessageType.Diagnostic);
            }
        }

        /// <summary>Checks if today's date is one of the specified fertiliser application dates.</summary>
        private bool OnApplicationDate()
        {
            if (EachYear)
                return Dates.Any(d => DateUtilities.DatesEqual(d, clock.Today));
            
            DateTime[] dates = Dates.Select(d => DateTime.ParseExact(d, "d-MMM-yyyy", null)).ToArray();
            return dates.Any(d => SameDate(d, clock.Today));
        }

        /// <summary>Checks if N content in soil is below critical threshold.</summary>
        private bool NContentBelowThreshold()
        {
            if (!UseCritNThreshold)
                return true;
            
            double[] weights = GetLayerWeights();
            double cumSoilN = 0;

            for (int i = 0; i < soilPhysical.Thickness.Length; i++)
            {
                if (nutrient != null)
                    cumSoilN += weights[i] * nutrient.MineralN[i];
                else if (soilN != null)
                    cumSoilN += weights[i] * soilN.MineralN[i];
            }

            return cumSoilN <= CritNThreshold;
        }

        private double[] GetLayerWeights()
        {
            double[] weights = new double[soilPhysical.Thickness.Length];
            double cumDepth = 0;

            for (int i = 0; i < soilPhysical.Thickness.Length; i++)
            {
                cumDepth += soilPhysical.Thickness[i];
                if (cumDepth < CritNDepth)
                    weights[i] = 1;
                else if (cumDepth - soilPhysical.Thickness[i] <= CritNDepth)
                    weights[i] = (CritNDepth - (cumDepth - soilPhysical.Thickness[i])) / soilPhysical.Thickness[i];
                else
                    weights[i] = 0;
            }

            return weights;
        }

        private bool SameDate(DateTime d1, DateTime d2)
        {
            return d1.Year == d2.Year && d1.DayOfYear == d2.DayOfYear;
        }
    }
}
```
          Manager AutomaticIrrigation
            allowIrrigation = True
            seasonStart = 1-sep
            seasonEnd = 30-apr
            seasonsAllocation = 10000
            triggerDeficit = 75
            targetDeficit = 95
            returndays = 3
            maximumAmount = 30
            depthPAWC = 300
```csharp
using Newtonsoft.Json;
using APSIM.Shared.Utilities;
using System.Xml.Serialization;
using Models.Soils;
using Models.PMF;
using Models.Core;
using System;
using System.Linq;
using Models.Interfaces;


        
namespace Models
{
    [Serializable] 
    [System.Xml.Serialization.XmlInclude(typeof(Model))]
    public class Script : Model
    {
        [Link] private ISummary summary;
        [Link] private Irrigation Irrigation;
        [Link] private Clock Clock;
        [Link] private Soil Soil;
        [Link(IsOptional = true)] private IPlant existingCrop;
        private DateTime StartDate;
        private DateTime EndDate;
        private double TopDUL;
        private double TopLL;
        private int nLayers;
        [Link]
        private IPhysical soilPhysical;
        [Link]
        private ISoilWater waterBalance;
        //Communication to other modules
       
        //User inputs from properties tab
        [Description("Turn irrigation on?")]
        public bool allowIrrigation { get; set; }
        [Description("Start of irrigation season (dd-MMM)")]
        public string seasonStart { get; set; }
        [Description("End of irrigation season (dd-MMM)")]
        public string seasonEnd { get; set; }
        [Description("Season allocation (mm)")]
        public double seasonsAllocation { get; set; }
        [Description("Deficit to trigger irrigation (% PAWC)")]
        public double triggerDeficit { get; set; }
        [Description("Deficit to stop irrigaton (% PAWC)")]
        public double targetDeficit { get; set; }
        [Description("Minimum days for irrigation to return")]
        public double returndays { get; set; }
        [Description("Maximum irrigation application (mm/day)")]
        public double maximumAmount { get; set; }
        [Description("Depth to calculate PAWC (mm)")]
        public double depthPAWC { get; set; }

        //Class members
        [JsonIgnore] public double TopSWdeficit { get; set; }
        [JsonIgnore] public double TopSWC { get; set; }
        [JsonIgnore] public double DaysSinceIrrigation { get; set; }
        [JsonIgnore] public double AmountToApply { get; set; }
        [JsonIgnore] public double SeasonAppliedAmount { get; set; }
        
        private bool IrrigationIsAllowed { get; set; }
        private bool SeasonIsOpen { get; set; }
        private bool CropIsActive { get; set; }
        private bool IrrigatorIsAvailable { get; set; }
        private bool SoilIsDry { get; set; }

    
        //Calculate static soil variables
        [EventSubscribe("StartOfSimulation")]
        private void OnStartOfSimulation(object sender, EventArgs e)
        {   
            //Set the season dates
            StartDate = DateTime.Parse(seasonStart + "-" + Clock.Today.Year.ToString());
            EndDate = DateTime.Parse(seasonEnd + "-" + Clock.Today.Year.ToString());
            
            //Can we irrigate at all?
            IrrigationIsAllowed = false; 
            if (allowIrrigation)
                IrrigationIsAllowed = true; 

            //Calculate soil water variables
            double depthFromSurface = 0.0;
            double fracLayer = 0.0;
            nLayers = soilPhysical.Thickness.Length;
            for (int layer = 0; layer < nLayers; layer++)
            {
                fracLayer = Math.Min(1.0, (depthPAWC - depthFromSurface) / soilPhysical.Thickness[layer]);
                TopLL += soilPhysical.LL15mm[layer] * fracLayer;
                TopDUL += soilPhysical.DULmm[layer] * fracLayer;
                depthFromSurface += soilPhysical.Thickness[layer];
                if (depthFromSurface >= depthPAWC)
                    layer = nLayers;
            }
        }
             
        //Determine daily requirement for irrigation
        [EventSubscribe("StartOfDay")]
        private void OnStartOfDay(object sender, EventArgs e)
        {
            //Can we irrigate today?          
            SeasonIsOpen = isBetween(Clock.Today, StartDate, EndDate);
            if (!SeasonIsOpen)
                SeasonAppliedAmount = 0;

            //Is there a crop in the ground that needs irrigation?
            CropIsActive = false;
            if ((existingCrop != null) && (existingCrop.IsAlive))
                CropIsActive = true;
            //if ((existingCrop.Phenology.Stage >= 3.0) && (existingCrop.Phenology.Stage < 6.0))
          
            //Is the irrigator available?
            IrrigatorIsAvailable = false;
            DaysSinceIrrigation += 1;
            if (DaysSinceIrrigation >= returndays)
                IrrigatorIsAvailable = true;
          
            //Is the soil dry enough to require irrigation?
            SoilIsDry = false;
            double depthFromSurface = 0.0;
            double fracLayer = 0.0;
            TopSWC = 0.0;
            for (int layer = 0; layer < nLayers; layer++)
            //for (int layer = 0; depthFromSurface < depthPAWC + soilPhysical.Thickness[layer]; layer++)
            {
                fracLayer = Math.Min(1.0, (depthPAWC - depthFromSurface) / soilPhysical.Thickness[layer]);
                TopSWC += waterBalance.SWmm[layer] * fracLayer;
                depthFromSurface += soilPhysical.Thickness[layer];
                if (depthFromSurface >= depthPAWC)
                    layer = nLayers;
            }
            
            TopSWdeficit = TopSWC - TopDUL;
            if (Math.Max(0.0, -TopSWdeficit) >= (TopDUL - TopLL) * (100 - triggerDeficit) / 100)
                SoilIsDry = true;
                
            //Are all the conditions ratifying irrigation
            if (IrrigationIsAllowed && SeasonIsOpen && CropIsActive && IrrigatorIsAvailable && SoilIsDry)
            {
                //Lets bloody well irrigate then!!!!
                AmountToApply = TopDUL * targetDeficit / 100 - TopSWC;
                AmountToApply = Math.Max(0.0, Math.Min(AmountToApply, seasonsAllocation - SeasonAppliedAmount));
                Irrigation.Apply(AmountToApply);
                DaysSinceIrrigation = 0;
                SeasonAppliedAmount += AmountToApply;
            }
        }
        
        ///Checks whether theDate is between iniDate and endDate (non-year specific)
        private bool isBetween(DateTime theDay, DateTime iniDate, DateTime endDate)
        {
            bool result = false;
            if (iniDate.DayOfYear < endDate.DayOfYear)
            {
                // period is within one year, ex: summer in the northern hemisphere
                if ((theDay.DayOfYear >= iniDate.DayOfYear) && (theDay.DayOfYear <= endDate.DayOfYear))
                    result = true;
            }
            else
            {
                // period goes over the end of the year, ex: summer in the southern hemisphere
                if ((theDay.DayOfYear >= iniDate.DayOfYear) || (theDay.DayOfYear <= endDate.DayOfYear))
                    result = true;
            }
            
            return result;
        }
    }
}
```
          Irrigation
          Fertiliser
          SurfaceOrganicMatter: InitialResidueName=Sward; InitialResidueType=grass; InitialResidueMass=1000; InitialStandingFraction=0; InitialCPR=0; InitialCNR=15
          PastureSpecies AGPRyegrass: doyGermination=275; daysEmergenceToAnthesis=120; daysAnthesisToMaturity=85; degreesDayForAnthesis=1100; degreesDayForMaturity=900; daysAnnualsFactor=45; CanopyType=PastureSpecies; InitialShootDM=1500; InitialRootDM=450; InitialRootDepth=750; initialDMFractionsGrasses=[0.15, 0.25, 0.25, 0.05, 0.05, 0.1, 0.1, 0.05, 0, 0, 0]; initialDMFractionsForbs=[0.2, 0.2, 0.15, 0.05, 0.1, 0.15, 0.1, 0.05, 0, 0, 0]; PhotosyntheticEfficiency=0.01; PhotosynthesisCurveFactor=0.8; FractionPAR=0.5; ReferenceCO2=380; CO2EffectScaleFactor=700; CO2EffectOffsetFactor=600; CO2EffectMinimum=0.7; CO2EffectExponent=2; ReproSeasonDurationCoeff=2; ReproSeasonShouldersLengthFactor=1; ReproSeasonOnsetDurationFactor=0.6; RelativeTurnoverEmerging=2; DetachmentDroughtCoefficient=3; DetachmentDroughtEffectMin=0.1; TurnoverStockFactor=0.01; TurnoverDefoliationEffectMin=0.025; MinimumGreenLeafProp=0.8; MinimumGreenRootProp=0.5
            initialDMFractionsLegumes=[0.16, 0.23, 0.22, 0.05, 0.03, 0.05, 0.05, 0.01, 0.04, 0.08, 0.08]
            LinearInterpolationFunction FVPDFunction
          PastureSpecies AGPWhiteClover: doyGermination=275; daysEmergenceToAnthesis=120; daysAnthesisToMaturity=85; degreesDayForAnthesis=1100; degreesDayForMaturity=900; daysAnnualsFactor=45; CanopyType=PastureSpecies; InitialShootDM=500; InitialRootDM=150; InitialRootDepth=350; initialDMFractionsGrasses=[0.15, 0.25, 0.25, 0.05, 0.05, 0.1, 0.1, 0.05, 0, 0, 0]; initialDMFractionsForbs=[0.2, 0.2, 0.15, 0.05, 0.1, 0.15, 0.1, 0.05, 0, 0, 0]; PhotosyntheticEfficiency=0.01; PhotosynthesisCurveFactor=0.8; FractionPAR=0.5; ReferenceCO2=380; CO2EffectScaleFactor=700; CO2EffectOffsetFactor=600; CO2EffectMinimum=0.7; CO2EffectExponent=2; ReproSeasonDurationCoeff=2; ReproSeasonShouldersLengthFactor=1; ReproSeasonOnsetDurationFactor=0.6; RelativeTurnoverEmerging=2; DetachmentDroughtCoefficient=3; DetachmentDroughtEffectMin=0.1; TurnoverStockFactor=0.01; TurnoverDefoliationEffectMin=0.025; MinimumGreenLeafProp=0.8; MinimumGreenRootProp=0.5
            initialDMFractionsLegumes=[0.16, 0.23, 0.22, 0.05, 0.03, 0.05, 0.05, 0.01, 0.04, 0.08, 0.08]
            LinearInterpolationFunction FVPDFunction
          Soil: SoilType=NZ_Sedimentary; LocalName=Lismore; Site=Winchmore; NearestTown=Ashburton; Region=Canterbury; Country=New Zealand; Latitude=-48.48; Longitude=0
            Chemical: Thickness=[150, 150, 200, 150, 250, 300, 300]; PH=[6, 6, 6, 6, 6, 6, 6]; PHUnits=Water
            Physical
              Thickness  ParticleSizeClay  BD    AirDry  LL15   DUL    SAT   KS
              150        20                1.3   0.05    0.15   0.36   0.45  5000
              150        15                1.35  0.12    0.14   0.34   0.43  2500
              200        12                1     0.055   0.055  0.19   0.25  3000
              150        8                 0.53  0.015   0.015  0.065  0.15  10000
              250        6                 0.31  0.01    0.01   0.04   0.11  17500
              300        5                 0.3   0.01    0.01   0.03   0.11  20000
              300        5                 0.3   0.01    0.01   0.03   0.11  20000
              SoilCrop AGPRyegrassSoil: LL=[0.15, 0.14, 0.06, 0.02, 0.01, 0.01, 0.01]; KL=[0.1, 0.1, 0.08, 0.04, 0.01, 0, 0]; XF=[1, 1, 1, 1, 1, 0, 0]
              SoilCrop AGPWhiteCloverSoil: LL=[0.15, 0.14, 0.06, 0.02, 0.01, 0.01, 0.01]; KL=[0.1, 0.1, 0.08, 0.04, 0.01, 0, 0]; XF=[1, 1, 1, 1, 1, 0, 0]
            WaterBalance SoilWater: SummerDate=1-Nov; SummerU=6; SummerCona=3.5; WinterDate=1-apr; WinterU=2; WinterCona=2; DiffusConst=88; DiffusSlope=35; Salb=0.13; CN2Bare=73; CNRed=20; CNCov=0.8; DischargeWidth=0; CatchmentArea=0; PSIDul=-100
              Thickness  SWCON  KLAT
              150        0.5    0
              150        0.52   0
              200        0.55   0
              150        0.6    0
              250        0.65   0
              300        0.65   0
              300        0.65   0
            Organic: FOMCNRatio=40; CarbonUnits=Total
              Thickness  Carbon  SoilCNRatio  FBiom  FInert  FOM
              150        3       12           0.04   0.5     331.337
              150        1       12           0.02   0.7     245.461
              200        0.6     12           0.02   0.83    164.537
              150        0.4     12           0.01   0.9     121.892
              250        0.25    12           0.01   0.95    73.9313
              300        0.15    12           0      0.99    40.5743
              300        0.1     12           0      0.99    22.2677
            Water: Thickness=[150, 150, 200, 150, 250, 300, 300]; InitialValues=[0.349, 0.33, 0.183, 0.062, 0.038, 0.029, 0.029]; InitialPAWmm=109.4; RelativeTo=LL15; FilledFromTop=false
            SoilTemperature: Thickness=[100, 150, 200, 150, 250, 300, 300]; InitialValues=[0, 0, 0, 0, 0, 0, 0]
            Nutrient
            Solute NO3: Thickness=[150, 150, 200, 150, 250, 300, 300]; InitialValues=[5, 2.5, 1, 0.75, 0.5, 0.5, 0.5]; InitialValuesUnits=ppm; WaterTableConcentration=0; D0=0; DepthConstant=0; MaxDepthSoluteAccessible=0; RunoffEffectivenessAtMovingSolute=0; MaxEffectiveRunoff=0
            Solute NH4: Thickness=[150, 150, 200, 150, 250, 300, 300]; InitialValues=[0.1, 0.1, 0.1, 0.1, 0.1, 0.1, 0.1]; InitialValuesUnits=ppm; WaterTableConcentration=0; D0=0; DepthConstant=0; MaxDepthSoluteAccessible=0; RunoffEffectivenessAtMovingSolute=0; MaxEffectiveRunoff=0
            Solute Urea: Thickness=[150, 150, 200, 150, 250, 300, 300]; InitialValues=[0, 0, 0, 0, 0, 0, 0]; InitialValuesUnits=kg/ha; WaterTableConcentration=0; D0=0; DepthConstant=0; MaxDepthSoluteAccessible=0; RunoffEffectivenessAtMovingSolute=0; MaxEffectiveRunoff=0
          Report ReportInitialisation: EventNames=[Clock].EndOfDay
            VariableNames:
              [Clock].Today as Date
              [Soil].SoilTemperature.MaxSoilTemp[1] as MaxSoilTemp@0050mm
              [Soil].SoilTemperature.MaxSoilTemp[3] as MaxSoilTemp@0350mm
              [Soil].SoilTemperature.MaxSoilTemp[5] as MaxSoilTemp@0725mm
              [Soil].SoilTemperature.MaxSoilTemp[6] as MaxSoilTemp@1000mm
              [Soil].SoilTemperature.MaxSoilTemp[7] as MaxSoilTemp@1300mm
    Simulation Initialisation0
      Clock: Start=1980-07-01; End=1985-06-30
      Weather: FileName=%root%/Examples/WeatherFiles/lincoln.met
      MicroClimate: a_interception=0; b_interception=1; c_interception=0; d_interception=0; SoilHeatFluxFraction=0.4; MinimumHeightDiffForNewLayer=0; NightInterceptionFraction=0.5; ReferenceHeight=2
      Forages
        Parameters:
          Name                          IsLive  DigestibilityString  FractionConsumable  MinimumAmount  UseDigestibilityFromModel
          SurfaceOrganicMatter.Residue  true    0.7                  1                   100            false
          SurfaceOrganicMatter.Residue  false   0.3                  1                   0              false
          AGPRyegrass.Leaf              true    0.7                  1                   100            false
          AGPRyegrass.Leaf              false   0.3                  1                   0              false
          AGPRyegrass.Stem              true    0.7                  1                   100            false
          AGPRyegrass.Stem              false   0.3                  1                   0              false
          AGPRyegrass.Stolon            true    0.7                  1                   100            false
          AGPRyegrass.Stolon            false   0.3                  1                   0              false
          AGPWhiteClover.Leaf           true    0.7                  1                   100            false
          AGPWhiteClover.Leaf           false   0.3                  1                   0              false
          AGPWhiteClover.Stem           true    0.7                  1                   100            false
          AGPWhiteClover.Stem           false   0.3                  1                   0              false
          AGPWhiteClover.Stolon         true    0.7                  1                   100            false
          AGPWhiteClover.Stolon         false   0.3                  1                   0              false
      SoilArbitrator
      Summary
      Zone Field: Area=1; Slope=0; AspectAngle=0; Altitude=50
        SimpleGrazing: GrazingRotationType=0; SimpleGrazingFrequencyString=21; SimpleMinGrazable=0; SimpleGrazingResidual=1500; FlexibleGrazePostDM=0; FractionDefoliatedBiomassToSoil=[1]; FractionDefoliatedNToSoil=[0.7]; FractionExcretedNToDung=[0.45]; DepthUrineIsAdded=250; SendDungElsewhere=0; SendUrineElsewhere=0; FractionPopulationDecline=0; TramplingOn=false; MaximumPropLitterMovedToSoil=0.1; PastureConsumedAtMaximumRateOfLitterRemoval=1200
          PreGrazeDMArray=[1000, 1000, 1000, 1000, 1000, 1000, 1000, 1000, 1000, 1000, 1000, 1000]
          PostGrazeDMArray=[2000, 2000, 2000, 2000, 2000, 2000, 2000, 2000, 2000, 2000, 2000, 2000]
        Manager FertiliseFixedDates
          EachYear = True
          Dates = 5-jan, 5-feb, 5-mar, 5-apr, 5-aug, 5-sep, 5-oct, 5-nov, 5-dec
          UseCritNThreshold = False
          CritNThreshold = 50
          CritNDepth = 75
          Depth = 50
          Amount = 15
          FertiliserType = UreaN
          script: same as in Initialisation of Temperature.Effect of initialisation choices.Initialisation.Field.FertiliseFixedDates
        Manager AutomaticIrrigation
          allowIrrigation = True
          seasonStart = 1-sep
          seasonEnd = 30-apr
          seasonsAllocation = 10000
          triggerDeficit = 75
          targetDeficit = 95
          returndays = 3
          maximumAmount = 30
          depthPAWC = 300
          script: same as in Initialisation of Temperature.Effect of initialisation choices.Initialisation.Field.AutomaticIrrigation
        Irrigation
        Fertiliser
        SurfaceOrganicMatter: InitialResidueName=Sward; InitialResidueType=grass; InitialResidueMass=1000; InitialStandingFraction=0; InitialCPR=0; InitialCNR=15
        PastureSpecies AGPRyegrass: doyGermination=275; daysEmergenceToAnthesis=120; daysAnthesisToMaturity=85; degreesDayForAnthesis=1100; degreesDayForMaturity=900; daysAnnualsFactor=45; CanopyType=PastureSpecies; InitialShootDM=1500; InitialRootDM=450; InitialRootDepth=750; initialDMFractionsGrasses=[0.15, 0.25, 0.25, 0.05, 0.05, 0.1, 0.1, 0.05, 0, 0, 0]; initialDMFractionsForbs=[0.2, 0.2, 0.15, 0.05, 0.1, 0.15, 0.1, 0.05, 0, 0, 0]; PhotosyntheticEfficiency=0.01; PhotosynthesisCurveFactor=0.8; FractionPAR=0.5; ReferenceCO2=380; CO2EffectScaleFactor=700; CO2EffectOffsetFactor=600; CO2EffectMinimum=0.7; CO2EffectExponent=2; ReproSeasonDurationCoeff=2; ReproSeasonShouldersLengthFactor=1; ReproSeasonOnsetDurationFactor=0.6; RelativeTurnoverEmerging=2; DetachmentDroughtCoefficient=3; DetachmentDroughtEffectMin=0.1; TurnoverStockFactor=0.01; TurnoverDefoliationEffectMin=0.025; MinimumGreenLeafProp=0.8; MinimumGreenRootProp=0.5
          initialDMFractionsLegumes=[0.16, 0.23, 0.22, 0.05, 0.03, 0.05, 0.05, 0.01, 0.04, 0.08, 0.08]
          LinearInterpolationFunction FVPDFunction
        PastureSpecies AGPWhiteClover: doyGermination=275; daysEmergenceToAnthesis=120; daysAnthesisToMaturity=85; degreesDayForAnthesis=1100; degreesDayForMaturity=900; daysAnnualsFactor=45; CanopyType=PastureSpecies; InitialShootDM=500; InitialRootDM=150; InitialRootDepth=350; initialDMFractionsGrasses=[0.15, 0.25, 0.25, 0.05, 0.05, 0.1, 0.1, 0.05, 0, 0, 0]; initialDMFractionsForbs=[0.2, 0.2, 0.15, 0.05, 0.1, 0.15, 0.1, 0.05, 0, 0, 0]; PhotosyntheticEfficiency=0.01; PhotosynthesisCurveFactor=0.8; FractionPAR=0.5; ReferenceCO2=380; CO2EffectScaleFactor=700; CO2EffectOffsetFactor=600; CO2EffectMinimum=0.7; CO2EffectExponent=2; ReproSeasonDurationCoeff=2; ReproSeasonShouldersLengthFactor=1; ReproSeasonOnsetDurationFactor=0.6; RelativeTurnoverEmerging=2; DetachmentDroughtCoefficient=3; DetachmentDroughtEffectMin=0.1; TurnoverStockFactor=0.01; TurnoverDefoliationEffectMin=0.025; MinimumGreenLeafProp=0.8; MinimumGreenRootProp=0.5
          initialDMFractionsLegumes=[0.16, 0.23, 0.22, 0.05, 0.03, 0.05, 0.05, 0.01, 0.04, 0.08, 0.08]
          LinearInterpolationFunction FVPDFunction
        Soil: SoilType=NZ_Sedimentary; LocalName=Lismore; Site=Winchmore; NearestTown=Ashburton; Region=Canterbury; Country=New Zealand; Latitude=-48.48; Longitude=0
          Chemical: Thickness=[150, 150, 200, 150, 250, 300, 300]; PH=[6, 6, 6, 6, 6, 6, 6]; PHUnits=Water
          Physical
            Thickness  ParticleSizeClay  BD    AirDry  LL15   DUL    SAT   KS
            150        20                1.3   0.05    0.15   0.36   0.45  5000
            150        15                1.35  0.12    0.14   0.34   0.43  2500
            200        12                1     0.055   0.055  0.19   0.25  3000
            150        8                 0.53  0.015   0.015  0.065  0.15  10000
            250        6                 0.31  0.01    0.01   0.04   0.11  17500
            300        5                 0.3   0.01    0.01   0.03   0.11  20000
            300        5                 0.3   0.01    0.01   0.03   0.11  20000
            SoilCrop AGPRyegrassSoil: LL=[0.15, 0.14, 0.06, 0.02, 0.01, 0.01, 0.01]; KL=[0.1, 0.1, 0.08, 0.04, 0.01, 0, 0]; XF=[1, 1, 1, 1, 1, 0, 0]
            SoilCrop AGPWhiteCloverSoil: LL=[0.15, 0.14, 0.06, 0.02, 0.01, 0.01, 0.01]; KL=[0.1, 0.1, 0.08, 0.04, 0.01, 0, 0]; XF=[1, 1, 1, 1, 1, 0, 0]
          WaterBalance SoilWater: SummerDate=1-Nov; SummerU=6; SummerCona=3.5; WinterDate=1-apr; WinterU=2; WinterCona=2; DiffusConst=88; DiffusSlope=35; Salb=0.13; CN2Bare=73; CNRed=20; CNCov=0.8; DischargeWidth=0; CatchmentArea=0; PSIDul=-100
            Thickness  SWCON  KLAT
            150        0.5    0
            150        0.52   0
            200        0.55   0
            150        0.6    0
            250        0.65   0
            300        0.65   0
            300        0.65   0
          Organic: FOMCNRatio=40; CarbonUnits=Total
            Thickness  Carbon  SoilCNRatio  FBiom  FInert  FOM
            150        3       12           0.04   0.5     331.337
            150        1       12           0.02   0.7     245.461
            200        0.6     12           0.02   0.83    164.537
            150        0.4     12           0.01   0.9     121.892
            250        0.25    12           0.01   0.95    73.9313
            300        0.15    12           0      0.99    40.5743
            300        0.1     12           0      0.99    22.2677
          Water: Thickness=[150, 150, 200, 150, 250, 300, 300]; InitialValues=[0.349, 0.33, 0.183, 0.062, 0.038, 0.029, 0.029]; InitialPAWmm=109.4; RelativeTo=LL15; FilledFromTop=false
          SoilTemperature: Thickness=[100, 150, 200, 150, 250, 300, 300]; InitialValues=[0, 0, 0, 0, 0, 0, 0]
          Nutrient
          Solute NO3: Thickness=[150, 150, 200, 150, 250, 300, 300]; InitialValues=[5, 2.5, 1, 0.75, 0.5, 0.5, 0.5]; InitialValuesUnits=ppm; WaterTableConcentration=0; D0=0; DepthConstant=0; MaxDepthSoluteAccessible=0; RunoffEffectivenessAtMovingSolute=0; MaxEffectiveRunoff=0
          Solute NH4: Thickness=[150, 150, 200, 150, 250, 300, 300]; InitialValues=[0.1, 0.1, 0.1, 0.1, 0.1, 0.1, 0.1]; InitialValuesUnits=ppm; WaterTableConcentration=0; D0=0; DepthConstant=0; MaxDepthSoluteAccessible=0; RunoffEffectivenessAtMovingSolute=0; MaxEffectiveRunoff=0
          Solute Urea: Thickness=[150, 150, 200, 150, 250, 300, 300]; InitialValues=[0, 0, 0, 0, 0, 0, 0]; InitialValuesUnits=kg/ha; WaterTableConcentration=0; D0=0; DepthConstant=0; MaxDepthSoluteAccessible=0; RunoffEffectivenessAtMovingSolute=0; MaxEffectiveRunoff=0
        Report ReportInitialisation: EventNames=[Clock].EndOfDay
          VariableNames:
            [Clock].Today as Date
            [Soil].SoilTemperature.MaxSoilTemp[1] as MaxSoilTemp@0050mm
            [Soil].SoilTemperature.MaxSoilTemp[3] as MaxSoilTemp@0350mm
            [Soil].SoilTemperature.MaxSoilTemp[5] as MaxSoilTemp@0725mm
            [Soil].SoilTemperature.MaxSoilTemp[6] as MaxSoilTemp@1000mm
            [Soil].SoilTemperature.MaxSoilTemp[7] as MaxSoilTemp@1300mm
    Simulation Initialisation30
      Clock: Start=1980-07-01; End=1985-06-30
      Weather: FileName=%root%/Examples/WeatherFiles/lincoln.met
      MicroClimate: a_interception=0; b_interception=1; c_interception=0; d_interception=0; SoilHeatFluxFraction=0.4; MinimumHeightDiffForNewLayer=0; NightInterceptionFraction=0.5; ReferenceHeight=2
      Forages: same as Initialisation of Temperature.Initialisation0.Forages
      SoilArbitrator
      Summary
      Zone Field: Area=1; Slope=0; AspectAngle=0; Altitude=50
        SimpleGrazing: same as Initialisation of Temperature.Initialisation0.Field.SimpleGrazing
        Manager FertiliseFixedDates: same as Initialisation of Temperature.Initialisation0.Field.FertiliseFixedDates
        Manager AutomaticIrrigation: same as Initialisation of Temperature.Initialisation0.Field.AutomaticIrrigation
        Irrigation
        Fertiliser
        SurfaceOrganicMatter: InitialResidueName=Sward; InitialResidueType=grass; InitialResidueMass=1000; InitialStandingFraction=0; InitialCPR=0; InitialCNR=15
        PastureSpecies AGPRyegrass: same as Initialisation of Temperature.Initialisation0.Field.AGPRyegrass
        PastureSpecies AGPWhiteClover: same as Initialisation of Temperature.Initialisation0.Field.AGPWhiteClover
        Soil: SoilType=NZ_Sedimentary; LocalName=Lismore; Site=Winchmore; NearestTown=Ashburton; Region=Canterbury; Country=New Zealand; Latitude=-48.48; Longitude=0
          Chemical: Thickness=[150, 150, 200, 150, 250, 300, 300]; PH=[6, 6, 6, 6, 6, 6, 6]; PHUnits=Water
          Physical: same as Initialisation of Temperature.Initialisation0.Field.Soil.Physical
          WaterBalance SoilWater: same as Initialisation of Temperature.Initialisation0.Field.Soil.SoilWater
          Organic: same as Initialisation of Temperature.Initialisation0.Field.Soil.Organic
          Water: Thickness=[150, 150, 200, 150, 250, 300, 300]; InitialValues=[0.349, 0.33, 0.183, 0.062, 0.038, 0.029, 0.029]; InitialPAWmm=109.4; RelativeTo=LL15; FilledFromTop=false
          SoilTemperature: Thickness=[100, 150, 200, 150, 250, 300, 300]; InitialValues=[30, 30, 30, 30, 30, 30, 30]
          Nutrient
          Solute NO3: same as Initialisation of Temperature.Initialisation0.Field.Soil.NO3
          Solute NH4: same as Initialisation of Temperature.Initialisation0.Field.Soil.NH4
          Solute Urea: same as Initialisation of Temperature.Initialisation0.Field.Soil.Urea
        Report ReportInitialisation: same as Initialisation of Temperature.Initialisation0.Field.ReportInitialisation
  Folder Resetting
    Simulation NoReset
      Clock: Start=1980-07-01; End=1985-06-30
      Weather: FileName=%root%/Examples/WeatherFiles/lincoln.met
      MicroClimate: a_interception=0; b_interception=1; c_interception=0; d_interception=0; SoilHeatFluxFraction=0.4; MinimumHeightDiffForNewLayer=0; NightInterceptionFraction=0.5; ReferenceHeight=2
      Forages: same as Initialisation of Temperature.Initialisation0.Forages
      SoilArbitrator
      Summary
      Zone Field: Area=1; Slope=0; AspectAngle=0; Altitude=50
        SimpleGrazing: same as Initialisation of Temperature.Initialisation0.Field.SimpleGrazing
        Manager FertiliseFixedDates: same as Initialisation of Temperature.Initialisation0.Field.FertiliseFixedDates
        Manager AutomaticIrrigation: same as Initialisation of Temperature.Initialisation0.Field.AutomaticIrrigation
        Irrigation
        Fertiliser
        SurfaceOrganicMatter: InitialResidueName=Sward; InitialResidueType=grass; InitialResidueMass=1000; InitialStandingFraction=0; InitialCPR=0; InitialCNR=15
        PastureSpecies AGPRyegrass: same as Initialisation of Temperature.Initialisation0.Field.AGPRyegrass
        PastureSpecies AGPWhiteClover: same as Initialisation of Temperature.Initialisation0.Field.AGPWhiteClover
        Soil: SoilType=NZ_Sedimentary; LocalName=Lismore; Site=Winchmore; NearestTown=Ashburton; Region=Canterbury; Country=New Zealand; Latitude=-48.48; Longitude=0
          Chemical: Thickness=[150, 150, 200, 150, 250, 300, 300]; PH=[6, 6, 6, 6, 6, 6, 6]; PHUnits=Water
          Physical: same as Initialisation of Temperature.Initialisation0.Field.Soil.Physical
          WaterBalance SoilWater: same as Initialisation of Temperature.Initialisation0.Field.Soil.SoilWater
          Organic: same as Initialisation of Temperature.Initialisation0.Field.Soil.Organic
          Water: Thickness=[150, 150, 200, 150, 250, 300, 300]; InitialValues=[0.349, 0.33, 0.183, 0.062, 0.038, 0.029, 0.029]; InitialPAWmm=109.4; RelativeTo=LL15; FilledFromTop=false
          SoilTemperature
          Nutrient
          Solute NO3: same as Initialisation of Temperature.Initialisation0.Field.Soil.NO3
          Solute NH4: same as Initialisation of Temperature.Initialisation0.Field.Soil.NH4
          Solute Urea: same as Initialisation of Temperature.Initialisation0.Field.Soil.Urea
        Report ReportInitialisation: same as Initialisation of Temperature.Initialisation0.Field.ReportInitialisation
    Simulation WithReset: same as Resetting.NoReset
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