Simulations: Version=171
  Memo Introduction
    # Simulating crop rotation under controlled  conditions

    *Rob Zyskowski, Edmar I. Teixeira, Hamish Brown, Edith Khaembah, Rogerio Cichota*
    *The New Zealand Institute for Plant & Food Research Limited, Private Bag 4704, Christchurch, New Zealand*

    ## Introduction

    This is a simulation of a crop rotation consisting of a forage species, fodder beet (*Beta vulgaris* L.), grown over spring/summer and harvested in autumn, followed by a catch crop, oats (*Avena sativa* L.). The actual experiment was divided in two phases and was established at the rain shelter facility of Plant and Food Research, Lincoln, NZ.  The experiment was designed to help develop the models for the respective plants and here they are used to further demonstrate that ApsimX can simulate water and nitrogen cycling in the field and then to examine whether catch crops are a good option for mitigating N leaching from forages.

     **Phase 1**: Co-limitation of water and nitrogen on fodder beet physiology
     - Irrigation: 2 treatments, nil or full irrigation (to match PET)
     - Nitrogen: 3 treatments, 0 kg N/ha, 50 kg N/ha & 300 kg N/ha applied as dissolved urea with fertigator
      - 25 or 100 kg N/ha applied after emergence
      - 25 or 100 kg N/ha applied when canopy nearly reached full cover
      - 100 kg N/ha applied a month after full cover

     **Phase 2**: Ability of oats to act as catch-crops for N over winter/spring
     - Irrigation: 2 treatments, low (enough to keep plants growing) or full irrigation (to match PET)
     - Nitrogen: 3 treatments, 80 kg N/ha, 125 kg N/ha & 320 kg N/ha at sowing (residual plus urea applied at sowing)

    ### Acknowledgments
    This work was a collaborative effort funded by the Sustainable Agro-Ecosystems (SAE) and the Forages for Reduced Nitrogen Leaching (FRNL) programmes.  The experiment was setup and conducted by several people, including Brendon Malcolm, Emmanuel Chakwizira, Shane Maley, Mike George, Steve Dilon and Alexandre Michel, to whom we would like to express our gratitude.
  DataStore
    ExcelInput Obs_Rainshelter: FileNames=[LincolnRainshelter.xlsx]; SheetNames=[LincolnRainshelter]
    PredictedObserved: PredictedTableName=ReportRainshelter; ObservedTableName=LincolnRainshelter; FieldNameUsedForMatch=SimulationName; FieldName2UsedForMatch=Date; AllColumns=false
  Experiment LincolnRainshelter
    DisabledSimNames=[LincolnRainshelterNit300IrrNil, LincolnRainshelterNit0IrrFull]
    Memo Experiment Description
      ## Management
      Pre-experiment actions:
        23/08/2016 - Oats harvested
        02/09/2016 - Site irrigated with 25mm
        05/09/2016 - Site ploughed
        06/09/2016 - Site cambridge rolled
        17/10/2016 - Site power harrowed
        17/10/2016 - Rainshelter was rolled in
        18/10/2016 - Fertiliser application (200kg/ha of KCl, 250kg/ha of Triple Super, 200kg/ha of NaCl and 30kg/ha of Boronate 15%)
        18/10/2016 - Site cambridge rolled and harrowed

      Experiment:
       1) Fodder beet:
           - Cultivar: Rivage
           - Sowing density: 11 plants/m2
                row spacing: 45 cm
                      depth: 15 mm

          General actions:
              18/10/2016 - Sowing
              25/10/2016 - Irrigation of 5mm to all plots
              27/10/2016 - Plants started to emerge
              28/10/2016 - Irrigation of 5mm to all plots
              28/10/2016 - First fertiliser application, 25kgN/ha of urea_N to the 50kg/ha plots and 100kgN/ha o the 300kg/ha plots
              23/11/2016 - Irrigation treatments started
              18/01/2017 - Second fertiliser application, 25Nkg/ha of liquid urea_N to the 50kg/ha plots and 100kgN/ha to the 300kg/ha plots
              15/02/2017 - Final fertiliser application, 100Nkg/ha of liquid urea_N to the 300kg/ha plots
              17/05/2017 - Plots harvested

       Intercrop actions:
              19/05/2017 - All crop residues removed
              25/05/2017 - Dryland plots irrigated with 100mm, over two days
              29/05/2017 - Dryland 300N plot irrigated with 64.0mm
              30/05/2017 - Dryland 0N and 50N plots irrigated with 30.3 and 51.0mm
              22/06/2017 - Site topped with maxitell
              30/06/2017 - Site cambridge rolled
              30/06/2017 - Rainshelter was rolled off (but it was put on in a few occasions)

       2) Oats:
           - Cultivar: Milton
           - Sowing density: 300 plants/m2
                row spacing: 15 cm
                      depth: 45 mm

          General actions:
              05/07/2017 - Sowing
              05/07/2017 - Fertiliser application (400kg/ha Potash, Urea: treat4=40kgN/ha, treat5=85kgN/ha, treat6=270kgN/ha)
              24/07/2017 - Plants started to emerge
              11/09/2017 - Irrigation started in treatements 4, 5, and 6
              06/11/2017 - Irrigation extended to all plots
              04-09/01/2018 - Plots harvested
    Factors
      Permutation
        Factor Nit
          CompositeFactor 0
            Specifications:
              [FertiliserSchedule]
              [AdditionalActions].Script.NitFactor = 0
              [CropOperations].Script.FertFactor = 0
            Operations 0
          CompositeFactor 300
            Specifications:
              [FertiliserSchedule]
              [AdditionalActions].Script.NitFactor = 300
              [CropOperations].Script.FertFactor = 300
            Operations 300
              2016-10-28  [Fertiliser].Apply(100, Fertiliser.Types.UreaN, 10);
              2017-01-18  [Fertiliser].Apply(100, Fertiliser.Types.UreaN, 10);
              2017-02-15  [Fertiliser].Apply(100, Fertiliser.Types.UreaN, 10);
        Factor Irr
          CompositeFactor Full
            Specifications:
              [IrrigationSchedule]
              [AdditionalActions].Script.IrrFactor = true
              [CropOperations].Script.IrrgFactor = true
            Operations Full
              2016-11-23  [Irrigation].Apply(30.0)
              2016-11-30  [Irrigation].Apply(25.0)
              2016-12-07  [Irrigation].Apply(25.0)
              2016-12-21  [Irrigation].Apply(25.2)
              2016-12-29  [Irrigation].Apply(30.0)
              2017-01-04  [Irrigation].Apply(40.0)
              2017-01-11  [Irrigation].Apply(32.9)
              2017-01-18  [Irrigation].Apply(25.4)
              2017-01-25  [Irrigation].Apply(31.3)
              2017-02-08  [Irrigation].Apply(33.0)
              2017-02-15  [Irrigation].Apply(35.0)
              2017-02-22  [Irrigation].Apply(29.0)
              2017-03-08  [Irrigation].Apply(34.0)
              2017-03-22  [Irrigation].Apply(50.1)
              2017-04-12  [Irrigation].Apply(30.9)
              2017-04-27  [Irrigation].Apply(18.9)
              2017-09-11  [Irrigation].Apply(20.9)
              2017-09-12  [Irrigation].Apply(21.1)
              2017-09-13  [Irrigation].Apply(21.4)
              2017-10-10  [Irrigation].Apply(22.2)
              2017-10-11  [Irrigation].Apply(22.5)
              2017-10-12  [Irrigation].Apply(22.5)
              Memo
                Have added an extra irrigation, on 22 Oct,

                Data indcates water applied but no notes of it RFZ

                In Statefactors have donethe irrigations for
                  17/12  21/1 19/11 14/1
          CompositeFactor Nil
            Specifications:
              [IrrigationSchedule]
              [AdditionalActions].Script.IrrFactor = false
              [CropOperations].Script.IrrgFactor = false
            Operations Nil
              Memo
                Have added an extra irrigation, on 3 Nov,

                Data indcates water applied but no notes of it RFZ
    Simulation Rainshelter
      Clock: Start=2016-09-28; End=2018-01-27
      Summary summaryfile
      Weather
        FileName=C:\aaUnderVC\ApsimX\Tests\Validation\System\LincolnRotation2017\lincoln.met
      MicroClimate: a_interception=0; b_interception=1; c_interception=0; d_interception=0; SoilHeatFluxFraction=0.4; MinimumHeightDiffForNewLayer=0; NightInterceptionFraction=0.5; ReferenceHeight=2
      SoilArbitrator Soil Arbitrator
      Zone paddock: Area=1; Slope=0; AspectAngle=0; Altitude=50
        Folder Manager folder
          Operations GeneralIrrigation
            2016-09-02  [Irrigation].Apply(25.0)
            2016-10-25  [Irrigation].Apply(5.0)
            2016-10-28  [Irrigation].Apply(5.0)
            2016-11-17  [Irrigation].Apply(2.0)
            2017-01-18  [Irrigation].Apply(10.0)
            2017-02-15  [Irrigation].Apply(10.0)
            2017-11-06  [Irrigation].Apply(45.0)
            2017-11-15  [Irrigation].Apply(30.0)
            2017-11-22  [Irrigation].Apply(29.7)
            2017-11-29  [Irrigation].Apply(35.0)
            2017-12-06  [Irrigation].Apply(46.7)
          Operations IrrigationSchedule
          Operations FertiliserSchedule
          Manager CropOperations
            FodderBeetPlantingDate = 10/18/2016 00:00:00
            FodderBeetHarvestingDate = 05/30/2017 00:00:00
            OatsPlantingDate = 07/05/2017 00:00:00
            OatsHarvestingDate1 = 01/05/2018 00:00:00
            OatsHarvestingDate2 = 01/10/2018 00:00:00
```csharp
using Models.Soils;
using System.Xml.Serialization;
using APSIM.Shared.Utilities;
using Models.PMF;
using Models.PMF.Interfaces;
using Models.Core;
using System;
using Newtonsoft.Json;
        
namespace Models
{
    [Serializable] 
    [System.Xml.Serialization.XmlInclude(typeof(Model))]
    public class Script : Model
    {
        [Link(ByName = true)] Plant FodderBeet;
        [Link(ByName = true)] Plant Oats;
        [Link] Clock Clock;

        [Description("FodderBeet planting date: ")]
        public DateTime FodderBeetPlantingDate { get; set; }
        [Description("FodderBeet harvesting date: ")]
        public DateTime FodderBeetHarvestingDate { get; set; }
        [Description("Oats planting date: ")]
        public DateTime OatsPlantingDate { get; set; }
        [Description("Oats harvesting date 1: ")]
        public DateTime OatsHarvestingDate1 { get; set; }
        [Description("Oats harvesting date 2: ")]
        public DateTime OatsHarvestingDate2 { get; set; }
        
        [JsonIgnore] public string CropSown { get; set; }
        [JsonIgnore] public string CropAction { get; set; }

        [JsonIgnore] public bool IrrgFactor { get; set; }
        [JsonIgnore] public double FertFactor { get; set; }


        
        [EventSubscribe("StartOfSimulation")]
        private void OnSimulationCommencing(object sender, EventArgs e)
        {
            CropSown = "Fallow";
            CropAction = "-";
        }
        
        [EventSubscribe("DoManagement")]
        private void OnDoManagement(object sender, EventArgs e)
        {
            CropAction = "-";

            if (Clock.Today.Date == FodderBeetPlantingDate)
            {
                FodderBeet.Sow(population: 9, cultivar: "Rivage", depth: 5, rowSpacing: 500);
                CropSown = "FodderBeet";
                CropAction = "Sowing";
            }
            
            if (Clock.Today.Date == OatsPlantingDate)
            {
                Oats.Sow(population: 400, cultivar: "Milton", depth: 45, rowSpacing: 45);
                CropSown = "Oats";
                CropAction = "Sowing";
            }
            
            
            if (Clock.Today.Date == FodderBeetHarvestingDate)
            {
                HarvestFodderBeet();
                //FodderBeet.EndCrop();
                //CropSown = "Fallow";
                CropAction = "Harvesting";
            }
            if (Clock.Today.Date == FodderBeetHarvestingDate.AddDays(1))
            {
                //FodderBeet.Harvest(removalFractions);
                FodderBeet.EndCrop();
                CropSown = "Fallow";
            }

            if (Clock.Today.Date == OatsHarvestingDate1)
            {
               if((FertFactor == 0) || ((IrrgFactor == false) && (FertFactor == 50)))
               {
                   HarvestOats();
                   CropAction = "Harvesting";
               }
            }

            if (Clock.Today.Date == OatsHarvestingDate2)
            {
               if((FertFactor == 300) || ((IrrgFactor == true) && (FertFactor == 50)))
               {
                   HarvestOats();
                   CropAction = "Harvesting";
               }
            }

            if (Clock.Today.Date == OatsHarvestingDate1.AddDays(1))
            {
               if((FertFactor == 0) || ((IrrgFactor == false) && (FertFactor == 50)))
               {
                   Oats.EndCrop();
                   CropSown = "Fallow";
               }
            }

            if (Clock.Today.Date == OatsHarvestingDate2.AddDays(1))
            {
               if((FertFactor == 300) || ((IrrgFactor == true) && (FertFactor == 50)))
               {
                   Oats.EndCrop();
                   CropSown = "Fallow";
               }
            }
        }
        
        private void HarvestFodderBeet()
        {
            var Leaf = FodderBeet.FindChild<IHasDamageableBiomass>("Leaf");
            var Petiole = FodderBeet.FindChild<IHasDamageableBiomass>("Petiole");
            var StorageRoot = FodderBeet.FindChild<IHasDamageableBiomass>("StorageRoot");
            
            Leaf.RemoveBiomass(liveToRemove: 0.95, liveToResidue: 0.05, deadToRemove: 0.8, deadToResidue: 0.2);
            Petiole.RemoveBiomass(liveToRemove: 1.0, liveToResidue: 0.0, deadToRemove: 0.9, deadToResidue: 0.1);
            StorageRoot.RemoveBiomass(liveToRemove: 1.0, liveToResidue: 0.0, deadToRemove: 1.0, deadToResidue: 0.0);
             FodderBeet.Harvest(removeBiomassFromOrgans: false);
        }
        
        private void HarvestOats()
        {
            var Stem = Oats.FindChild<IHasDamageableBiomass>("Stem");
            var Panicle = Oats.FindChild<IHasDamageableBiomass>("Panicle");
            var Grain = Oats.FindChild<IHasDamageableBiomass>("Grain");
            
            Stem.RemoveBiomass(liveToRemove: 0.9, liveToResidue: 0.1, deadToRemove: 0.8, deadToResidue: 0.2);
            Panicle.RemoveBiomass(liveToRemove: 0.9, liveToResidue: 0.1, deadToRemove: 0.8, deadToResidue: 0.2);
            Grain.RemoveBiomass(liveToRemove: 1.0, liveToResidue: 0.0, deadToRemove: 1.0, deadToResidue: 0.0);
             Oats.Harvest(removeBiomassFromOrgans: false);
        }  
    }
}
```
          Manager ClimateControl
            StartDate = 10/17/2016 00:00:00
            EndDate = 06/30/2017 00:00:00
            OtherDateString = 27/07/2017 28/07/2017 29/07/2017 30/07/2017 31/07/2017 08/08/2017 09/08/2017 10/08/2017 11/08/2017 12/08/2017 13/08/2017 14/08/2017 15/08/2017 16/08/2017 17/08/2017 18/08/2017 28/08/2017 29/08/2017 30/08/2017 31/08/2017
```csharp
using Models.Soils;
using Models.Climate;
using System;
using Models.Core;
using APSIM.Shared.Utilities;
using System.Collections.Generic;
using System.Text;
using Models.PMF;
using Models;
using System.Xml.Serialization;
using System.Globalization;
using Newtonsoft.Json;

// This script simulates a rainshelter, it controls the amount of rainfall (=0.0) and radiation (=95% of weather)
// It does that for a period between two dates, as well as at sporadic dates

namespace Models
{
    [Serializable] 
    public class Script : Model
    {
        [Link] Weather Met;
        [Link] Clock Clock;
    
        [Description("Start date: ")]
        public DateTime StartDate { get; set; }
        [Description("End date: ")]
        public DateTime EndDate { get; set; }
         [Description("Other dates: ")]
         public string OtherDateString  { get; set; }
         private const string dateFormat = "dd/MM/yyyy";
         [NonSerialized]
         private CultureInfo provider = CultureInfo.InvariantCulture;

         [JsonIgnore] public string RainshelterCover  { get; set; }

         private DateTime[] OtherDates;
         private double todaysRain;

        [EventSubscribe("StartOfSimulation")]
        private void OnSimulationCommencing(object sender, EventArgs e)
        {
            provider = CultureInfo.InvariantCulture;
            //gather the dates the variables will be controlled
            string[] auxDates = OtherDateString.Split(new Char []{' ',','});
            OtherDates = new DateTime[auxDates.Length];
            for (int i = 0; i < auxDates.Length; i++)
                OtherDates[i] = DateTime.ParseExact(auxDates[i], dateFormat, provider);

            RainshelterCover = "Off";
        }

        [EventSubscribe("PreparingNewWeatherData")]
        private void OnPreparingNewWeatherData(object sender, EventArgs e)
        {
            RainshelterCover = "Off";

            if ((Clock.Today.Date >= StartDate.Date) && (Clock.Today.Date <= EndDate.Date))
            {
                todaysRain = Met.Rain;
                changeMetData();
            }
            else
            {
                for (int i = 0; i < OtherDates.Length; i++)
                    if (Clock.Today.Date == OtherDates[0].Date)
                        changeMetData();
            }

            // rain shelter partial day cover
            if (Clock.Today.Date == DateTime.ParseExact("01/09/2017", dateFormat, provider).Date)
                Met.Rain -= 2.0;
            if (Clock.Today.Date == DateTime.ParseExact("08/11/2017", dateFormat, provider).Date)
                Met.Rain -= 0.3;

            // rain shelter cover removed for weekend
            if ((Clock.Today.Date == DateTime.ParseExact("03/06/2017", dateFormat, provider).Date)||(Clock.Today.Date == DateTime.ParseExact("04/06/2017", dateFormat, provider).Date))
            {
                Met.Rain = todaysRain;
                //Met.Radn /= 0.95;
                RainshelterCover = "Off";
            }
        }

        private void changeMetData()
        {
            Met.Rain *= 0.0;
            //Met.Radn *= 0.95;
            RainshelterCover = "On";
        }
    }
}
```
          Manager AdditionalActions
            NitFactor = 0
            IrrFactor = False
```csharp
using APSIM.Shared.Utilities;
using System.Xml.Serialization;
using Models;
using Models.PMF;
using Models.Soils;
using System.Text;
using System.Collections.Generic;
using Models.Core;
using System;

// This script performs management actions that are not common to all treatments

namespace Models
{
    [Serializable] 
    public class Script : Model
    {
        [Link] Clock Clock;
        [Link] Irrigation Irrigation;
        [Link] Fertiliser Fert;
        [Link] Soil ThisSoil;

        [Description("Allow irrigation to be applied?")]
        public bool IrrFactor { get; set; }
        [Description("Amount of fertiliser to be applied (kg/ha)")]
        public double NitFactor { get; set; }

        [EventSubscribe("StartOfSimulation")]
        private void OnSimulationCommencing(object sender, EventArgs e)
        {
            //    SetSoilLayers();
        }
        
        [EventSubscribe("DoManagement")]
        private void OnDoManagement(object sender, EventArgs e)
        {
            // Fodderbeet - irrigation on high fert plots only
            if ((IrrFactor == true) && (NitFactor == 300))
            {
                if (Clock.Today.Date == DateTime.Parse("01-Feb-2017"))
                    Irrigation.Apply(40.0);
                if (Clock.Today.Date == DateTime.Parse("01-Mar-2017"))
                    Irrigation.Apply(32.6);
            }
        
            // Oats - Irrigation on dryland plots only, after harvest
            if (IrrFactor == false)
            {
                if ((Clock.Today.Date == DateTime.Parse("25-May-2017")) || (Clock.Today.Date == DateTime.Parse("26-May-2017")))
                    Irrigation.Apply(50.0);

                if (Clock.Today.Date == DateTime.Parse("29-May-2017"))
                if (NitFactor == 300)
                    Irrigation.Apply(64.0);

                if (Clock.Today.Date == DateTime.Parse("30-May-2017"))
                {
                    if (NitFactor == 0)
                        Irrigation.Apply(30.3);
                    if (NitFactor == 50)
                        Irrigation.Apply(51.0);
                }
            }

            // Oats - Irrigation on all 300N plots plus dryland 50N plots
            if (Clock.Today.Date == DateTime.Parse("13-Dec-2017"))
            {
                if (NitFactor == 300)
                    Irrigation.Apply(50.0);
                if ((NitFactor == 50) && (IrrFactor == false))
                    Irrigation.Apply(50.0);
            }

            // Oats - Fertiliser for irrigated plots only, on sowing
            if (Clock.Today.Date == DateTime.Parse("05-Jul-2017"))
            if (IrrFactor == true)
            {
                if (NitFactor == 0)
                    Fert.Apply(40, Models.Fertiliser.Types.UreaN, 10);
                if (NitFactor == 50)
                    Fert.Apply(85, Models.Fertiliser.Types.UreaN, 10);
                if (NitFactor == 300)
                    Fert.Apply(270, Models.Fertiliser.Types.UreaN, 10);
            }
        }
    }
}
```
        Irrigation
        Plant Oats
        Plant FodderBeet
        Fertiliser
        SurfaceOrganicMatter Surface Organic Matter: InitialResidueName=oat_stubble; InitialResidueType=oats; InitialResidueMass=1500; InitialStandingFraction=0.5; InitialCPR=0; InitialCNR=20
        Soil: SoilType=Silt loam over sand; LocalName=Templeton; Site=RainShelter; NearestTown=Lincoln; Region=Plains; State=Canterbury; Country=New Zealand; Latitude=37.15; Longitude=172.28; Comments=TEMPLETON-RS
          Memo Info
            # Soil Profile Description

            Templeton Silt Loam over sand, Typic Immature Pallic soil

             Horizon  Depth (cm) Description
             Ah         0-28     Very dark grayish brown (10YR 3/2); silt loam; no stones; moderately developed fine to medium blocky structure
             Bw(f)     28-55     Dark yellowish brown (10YR 4/4); silt loam; no stones; weakly developed coarse to very coarse blocky structure
             Bw(g)     55-95     Olive brown (2.5Y 4/4); fine sandy loam; no stones; apedal massive
             2BC(g)    95-145    Olive brown (2.5Y 4/4); loamy sand;no stones; apedal single-grain
             3BCg     145-153    Light yellowish brown (2.5Y 6/3); silt loam; no stones; apedal massive
             4BCg     153-200+   Light yellowish brown (2.5Y 6/3); medium sand; no stones; apedal single-grain
             ** 2BC(g) horizon contains a band of massive silt loam material between 115-130 cm

            Sampling layers:
            Layer  Depth (cm)
             1	  0-15
             2	 15-30
             3	 30-60
             4	 60-90
             5	 90-120
             6	120-150
             7	150-180 -- Only for water

            Soil parameterisation was based on the two description of the soil at the Rainshelter, with most data being a combination of "templeton-2" description (SWAMP survey) and the vbalues estimated based on the monitoring of the site.
          Chemical: Thickness=[150, 150, 300, 350, 200, 150, 150, 100, 200, 250]; PH=[6.1, 6.1, 6, 6, 6, 6, 6, 6, 6, 6]; PHUnits=Water
          SoilTemperature
          Physical
            Thickness  ParticleSizeClay  ParticleSizeSand  ParticleSizeSilt  BD     AirDry  LL15   DUL    SAT    KS
            150        24                15.9              60.1              1.116  0.063   0.126  0.359  0.534  3472.3
            150        23.2              14.3              62.5              1.177  0.124   0.127  0.352  0.521  1374.7
            300        17.9              16.1              66                1.272  0.117   0.117  0.346  0.494  539.5
            350        13.3              45.5              41.2              1.337  0.12    0.12   0.344  0.47   3985.6
            200        12                42                46                1.404  0.143   0.143  0.358  0.446  2582.8
            150        16.7              11.4              71.9              1.47   0.147   0.147  0.366  0.424  111
            150        12.7              27.4              59.9              1.434  0.13    0.13   0.3    0.436  516.8
            100        12.8              35.1              52                1.459  0.118   0.118  0.276  0.429  1457.9
            200        11.5              40.7              50.9              1.453  0.099   0.099  0.24   0.433  4616.8
            250        11.8              37.9              50.3              1.482  0.089   0.089  0.227  0.428  4841.5
            SoilCrop FodderBeetSoil
              LL=[0.126, 0.127, 0.117, 0.12, 0.143, 0.147, 0.13, 0.118, 0.099, 0.089]
              KL=[0.093, 0.066, 0.059, 0.047, 0.028, 0.014, 0.008, 0.007, 0.003, 0]
              XF=[1, 1, 1, 1, 1, 1, 1, 1, 1, 1]
            SoilCrop OatsSoil
              LL=[0.126, 0.127, 0.117, 0.12, 0.143, 0.147, 0.13, 0.118, 0.099, 0.089]
              KL=[0.083, 0.066, 0.053, 0.043, 0.022, 0.007, 0.008, 0.005, 0.004, 0.002]
              XF=[1, 1, 1, 1, 1, 1, 1, 1, 1, 1]
          WaterBalance SoilWater: SummerDate=1-Oct; SummerU=9; SummerCona=4; WinterDate=1-Apr; WinterU=6; WinterCona=3; DiffusConst=88; DiffusSlope=35; Salb=0.15; CN2Bare=60; CNRed=10; CNCov=0.8; DischargeWidth=0; CatchmentArea=0; PSIDul=-100
            Thickness  SWCON  KLAT
            150        0.553  0
            150        0.521  0
            300        0.456  0
            350        0.511  0
            200        0.524  0
            150        0.451  0
            150        0.494  0
            100        0.546  0
            200        0.538  0
            250        0.532  0
          Nutrient
          Organic: FOMCNRatio=30; CarbonUnits=Total
            Thickness  Carbon  SoilCNRatio  FBiom  FInert  FOM
            150        2.55    11           0.08   0.2     291.718
            150        2.09    11           0.04   0.325   232.942
            300        0.52    11           0.018  0.6     148.53
            350        0.23    11           0.01   0.85    87.864
            200        0.18    11           0.008  0.95    65.091
            150        0.15    11           0.008  0.98    51.976
            150        0.15    11           0.008  0.99    41.504
            100        0.12    11           0.008  0.992   35.723
            200        0.11    11           0.005  0.995   26.464
            250        0.1     11           0.005  0.995   18.188
          Water: Thickness=[150, 150, 300, 300, 300, 300, 300, 200]; InitialValues=[0.3, 0.28, 0.27, 0.3, 0.28, 0.26, 0.22, 0.22]; InitialPAWmm=290.95; RelativeTo=LL15; FilledFromTop=false
          LayerStructure: Thickness=[150, 150, 300, 300, 300, 300, 300, 200]
          Solute NO3: Thickness=[150, 150, 300, 350, 200, 150, 150, 100, 200, 250]; InitialValuesUnits=ppm; WaterTableConcentration=0; D0=0; DepthConstant=0; MaxDepthSoluteAccessible=0; RunoffEffectivenessAtMovingSolute=0; MaxEffectiveRunoff=0
            InitialValues=[8.961, 7.93, 0.917, 0.85, 0.712, 0.697, 0.69, 0.573, 0.457, 0.361]
          Solute NH4: Thickness=[150, 150, 300, 350, 200, 150, 150, 100, 200, 250]; InitialValuesUnits=ppm; WaterTableConcentration=0; D0=0; DepthConstant=0; MaxDepthSoluteAccessible=0; RunoffEffectivenessAtMovingSolute=0; MaxEffectiveRunoff=0
            InitialValues=[1.195, 1.416, 1.179, 0.478, 0.356, 0.425, 0.46, 0.344, 0.228, 0.181]
          Solute Urea: Thickness=[150, 150, 300, 350, 200, 150, 150, 100, 200, 250]; InitialValues=[0, 0, 0, 0, 0, 0, 0, 0, 0, 0]; InitialValuesUnits=kg/ha; WaterTableConcentration=0; D0=0; DepthConstant=0; MaxDepthSoluteAccessible=0; RunoffEffectivenessAtMovingSolute=0; MaxEffectiveRunoff=0
        Report ReportRainshelter: EventNames=[Clock].DoReport
          VariableNames:
            [Clock].Today as Date
            [Soil].SoilTemperature.AverageSoilTemp[1] as AveSoilTemp@0075mm
            [Soil].SoilTemperature.AverageSoilTemp[2] as AveSoilTemp@0225mm
            [Soil].SoilTemperature.AverageSoilTemp[3] as AveSoilTemp@0450mm
            [Soil].SoilTemperature.AverageSoilTemp[4] as AveSoilTemp@0750mm
            [Soil].SoilTemperature.AverageSoilTemp[5] as AveSoilTemp@1050mm
            [Soil].SoilTemperature.AverageSoilTemp[6] as AveSoilTemp@1350mm
            [Soil].SoilTemperature.AverageSoilTemp[6] as AveSoilTemp@1650mm
  Folder CompareModels
    Simulation CERES
      Clock: Start=2016-09-28; End=2018-01-27
      Summary summaryfile
      Weather
        FileName=C:\aaUnderVC\ApsimX\Tests\Validation\System\LincolnRotation2017\lincoln.met
      MicroClimate: a_interception=0; b_interception=1; c_interception=0; d_interception=0; SoilHeatFluxFraction=0.4; MinimumHeightDiffForNewLayer=0; NightInterceptionFraction=0.5; ReferenceHeight=2
      SoilArbitrator Soil Arbitrator
      Zone paddock: Area=1; Slope=0; AspectAngle=0; Altitude=50
        Folder Manager folder
          Operations GeneralIrrigation: same as LincolnRainshelter.Rainshelter.paddock.Manager folder.GeneralIrrigation
          Operations IrrigationSchedule
          Operations FertiliserSchedule
          Manager CropOperations: same as LincolnRainshelter.Rainshelter.paddock.Manager folder.CropOperations
          Manager ClimateControl
            StartDate = 10/17/2016 00:00:00
            EndDate = 06/30/2017 00:00:00
            OtherDateString = 27/07/2017 28/07/2017 29/07/2017 30/07/2017 31/07/2017 08/08/2017 09/08/2017 10/08/2017 11/08/2017 12/08/2017 13/08/2017 14/08/2017 15/08/2017 16/08/2017 17/08/2017 18/08/2017 28/08/2017 29/08/2017 30/08/2017 31/08/2017
            RainshelterCover =
            script: same as in LincolnRainshelter.Rainshelter.paddock.Manager folder.ClimateControl
          Manager AdditionalActions: same as LincolnRainshelter.Rainshelter.paddock.Manager folder.AdditionalActions
        Irrigation
        Plant Oats
        Plant FodderBeet
        Fertiliser
        SurfaceOrganicMatter Surface Organic Matter: InitialResidueName=oat_stubble; InitialResidueType=oats; InitialResidueMass=1500; InitialStandingFraction=0.5; InitialCPR=0; InitialCNR=20
        Soil: SoilType=Silt loam over sand; LocalName=Templeton; Site=RainShelter; NearestTown=Lincoln; Region=Plains; State=Canterbury; Country=New Zealand; Latitude=37.15; Longitude=172.28; Comments=TEMPLETON-RS
          Memo Info: same as LincolnRainshelter.Rainshelter.paddock.Soil.Info
          Chemical: Thickness=[150, 150, 300, 350, 200, 150, 150, 100, 200, 250]; PH=[6.1, 6.1, 6, 6, 6, 6, 6, 6, 6, 6]; PHUnits=Water
          CERESSoilTemperature
          Physical: same as LincolnRainshelter.Rainshelter.paddock.Soil.Physical
          WaterBalance SoilWater: same as LincolnRainshelter.Rainshelter.paddock.Soil.SoilWater
          Nutrient
          Organic: FOMCNRatio=30; CarbonUnits=Total
            Thickness  Carbon  SoilCNRatio  FBiom  FInert  FOM
            150        2.55    11           0.08   0.2     291.718
            150        2.09    11           0.04   0.325   232.942
            300        0.52    11           0.018  0.6     148.53
            350        0.23    11           0.01   0.85    87.8638
            200        0.18    11           0.008  0.95    65.0911
            150        0.15    11           0.008  0.98    51.9763
            150        0.15    11           0.008  0.99    41.5039
            100        0.12    11           0.008  0.992   35.7227
            200        0.11    11           0.005  0.995   26.4641
            250        0.1     11           0.005  0.995   18.1885
          Water: Thickness=[150, 150, 300, 300, 300, 300, 300, 200]; InitialValues=[0.3, 0.28, 0.27, 0.3, 0.28, 0.26, 0.22, 0.22]; InitialPAWmm=290.95; RelativeTo=LL15; FilledFromTop=false
          LayerStructure: Thickness=[150, 150, 300, 300, 300, 300, 300, 200]
          Solute NO3: same as LincolnRainshelter.Rainshelter.paddock.Soil.NO3
          Solute NH4: same as LincolnRainshelter.Rainshelter.paddock.Soil.NH4
          Solute Urea: same as LincolnRainshelter.Rainshelter.paddock.Soil.Urea
        Report ReportCompare: EventNames=[Clock].DoReport
          VariableNames:
            [Clock].Today as Date
            [Soil].CERESSoilTemperature.Value[1] as AveSoilTemp@0075mm
            [Soil].CERESSoilTemperature.Value[3] as AveSoilTemp@0450mm
            [Soil].CERESSoilTemperature.Value[5] as AveSoilTemp@1050mm
            [Soil].CERESSoilTemperature.Value[8] as AveSoilTemp@1900mm
    Simulation SoilTemperature
      Clock: Start=2016-09-28; End=2018-01-27
      Summary summaryfile
      Weather
        FileName=C:\aaUnderVC\ApsimX\Tests\Validation\System\LincolnRotation2017\lincoln.met
      MicroClimate: a_interception=0; b_interception=1; c_interception=0; d_interception=0; SoilHeatFluxFraction=0.4; MinimumHeightDiffForNewLayer=0; NightInterceptionFraction=0.5; ReferenceHeight=2
      SoilArbitrator Soil Arbitrator
      Zone paddock: Area=1; Slope=0; AspectAngle=0; Altitude=50
        Folder Manager folder: same as CompareModels.CERES.paddock.Manager folder
        Irrigation
        Plant Oats
        Plant FodderBeet
        Fertiliser
        SurfaceOrganicMatter Surface Organic Matter: InitialResidueName=oat_stubble; InitialResidueType=oats; InitialResidueMass=1500; InitialStandingFraction=0.5; InitialCPR=0; InitialCNR=20
        Soil: SoilType=Silt loam over sand; LocalName=Templeton; Site=RainShelter; NearestTown=Lincoln; Region=Plains; State=Canterbury; Country=New Zealand; Latitude=37.15; Longitude=172.28; Comments=TEMPLETON-RS
          Memo Info: same as LincolnRainshelter.Rainshelter.paddock.Soil.Info
          Chemical: Thickness=[150, 150, 300, 350, 200, 150, 150, 100, 200, 250]; PH=[6.1, 6.1, 6, 6, 6, 6, 6, 6, 6, 6]; PHUnits=Water
          SoilTemperature
          Physical: same as LincolnRainshelter.Rainshelter.paddock.Soil.Physical
          WaterBalance SoilWater: same as LincolnRainshelter.Rainshelter.paddock.Soil.SoilWater
          Nutrient
          Organic: same as CompareModels.CERES.paddock.Soil.Organic
          Water: Thickness=[150, 150, 300, 300, 300, 300, 300, 200]; InitialValues=[0.3, 0.28, 0.27, 0.3, 0.28, 0.26, 0.22, 0.22]; InitialPAWmm=290.95; RelativeTo=LL15; FilledFromTop=false
          LayerStructure: Thickness=[150, 150, 300, 300, 300, 300, 300, 200]
          Solute NO3: same as LincolnRainshelter.Rainshelter.paddock.Soil.NO3
          Solute NH4: same as LincolnRainshelter.Rainshelter.paddock.Soil.NH4
          Solute Urea: same as LincolnRainshelter.Rainshelter.paddock.Soil.Urea
        Report ReportCompare: EventNames=[Clock].DoReport
          VariableNames:
            [Clock].Today as Date
            [Soil].SoilTemperature.AverageSoilTemp[1] as AveSoilTemp@0075mm
            [Soil].SoilTemperature.AverageSoilTemp[3] as AveSoilTemp@0450mm
            [Soil].SoilTemperature.AverageSoilTemp[5] as AveSoilTemp@1050mm
            [Soil].SoilTemperature.AverageSoilTemp[8] as AveSoilTemp@1900mm
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