Simulations: Version=171
  DataStore
    SimulationComparison: TableName=ReportLayering; FieldNamesUsedForMatch=[Date]
  Folder Effect of Soil Layering
    Memo
      SoilTemperature uses a numerical solution to the heat flow equation to find soil temperature at any depth. In principle, the numerical solution is sensitive to the layering but the extent of has not previously been tested in APSIM. Because the model will be used with both SWIM (think surface layers) and SoilWater (thick surface layers) it is important to understand any sensitivity.

      A simple simulation was set up using a ‘dummy’ model to hold soil water contents constant as the purpose here is to test the soil temperature simulation not the soil water simulation. Both simulations had soil extending to 1100 mm deep. The thin-layering simulation had 11 layers with the top layer 2 mm deep and with seven layers in the top 100 mm. The thick-layering simulation had six layers with only one layer in the top 100 mm – a value typical for simulations using SoilWater.

      The first three plots below compare the simulated soil temperature across three depths with the thin layering in black and the thick layering in orange. Plots 3 to 6 show patterns of daily average (plot 4) and maximum (plots 5 and 6) soil temperature across depths for the thin layering (plots 4 and 5) and thick layering (plot 6). Note that the depths of 1, 8 and 15 mm all fall in the top layer of the thick-layering simulation but are in layers 1, 3, 4, and 8 of the thin-layering simulation.

      Overall, the simulations showed low sensitivity to the differences in layering (Plots 1-3). There was a greater difference in simulated maximum temperature than average temperature. For example, on 22 October the average soil temperature at 1 mm for the thin layering was 29 C v’s 28 for the thick layering (Plots 5 and 6). The differences in maximum temperature are greater than for average temperature. Plot 5 show a maximum temperature at 1 mm of 36 C for the thin layering v’s 33 C for the thick layering in Plot 6. It is possible that these differences may be important in future simulation purposes but these are minor differences when viewed from the perspective of must current uses.

      It must be emphasised that this test is on the soil temperature model only. Layering will have a much more substantial effect on soil water contents when a soil water simulation model is included in the simulation and the differences in soil water content will feed through to greater differences in the simulated soil temperature. Users should be aware of this when deciding which soil water model to use.
    Simulation LayeringEffectThin
      Clock: Start=2000-01-01; End=2000-12-31
      Weather: FileName=AnalyticalWeather.xlsx; ExcelWorkSheetName=Dalby
      MicroClimate: a_interception=0; b_interception=0; c_interception=0; d_interception=0; SoilHeatFluxFraction=0; MinimumHeightDiffForNewLayer=0; NightInterceptionFraction=0; ReferenceHeight=2
      Summary
      Zone FieldThin: Area=1; Slope=0; AspectAngle=0; Altitude=50
        Manager DummyWaterBalance
          SW = 0.15, 0.15, 0.15, 0.15, 0.15, 0.15, 0.15, 0.15, 0.15, 0.15, 0.15
          Eos = 0
          Es = 0
          Eo = 0
          Salb = 0
```csharp
using Models.PMF;
using Models.Core;
using System;
using Models.Interfaces;
using Models.Soils;
using APSIM.Shared.Utilities;

namespace Models
{
    [Serializable] 
    public class Script : Model, ISoilWater
    {
        [Link]
        private Physical physical;
        [Link]
        private IPhysical soilPhysical;

        ///<summary>Gets or sets soil thickness for each layer (mm)(</summary>
        public double[] Thickness { get { return soilPhysical.Thickness; } }

        ///<summary>Gets or sets soil thickness for each layer (mm)(</summary>
        public double[] LayerThickness { get { return soilPhysical.Thickness; } }

        ///<summary>Gets or sets volumetric soil water content (mm/mm)(</summary>
        [Description("Soil water content (mm/mm), comma separated values")]
        public double[] SW { get; set; }

        ///<summary>Gets soil water content (mm)</summary>
        public double[] SWmm { get { return MathUtilities.Multiply(SW, Thickness); } }

        ///<summary>Gets extractable soil water relative to LL15(mm)</summary>
        public double[] ESW { get { throw new NotImplementedException(); } }

        ///<summary>Gets extractable soil water relative to LL15(mm)</summary>
        public double[] PSI { get { throw new NotImplementedException(); } }

        ///<summary>Gets K</summary>
        public double[] K { get { throw new NotImplementedException(); } }
        
        ///<summary>Gets PoreInteractionIndex</summary>
        public double[] PoreInteractionIndex { get { throw new NotImplementedException(); } set { throw new NotImplementedException(); }}
                
        ///<summary>Gets potential evaporation from soil surface (mm)</summary>
        [Description("Eos (mm)")]
        public double Eos { get; set; }

        /// <summary>Gets the actual (realised) soil water evaporation (mm)</summary>
        [Description("Es (mm)")]
        public double Es { get; set; }

        /// <summary>Gets potential evapotranspiration of the whole soil-plant system (mm)</summary>
        [Description("Eo (mm)")]
        public double Eo { get; set; }

        /// <summary>Gets the amount of water runoff (mm)</summary>
        public double Runoff { get { return 0; } }
        
        /// <summary>Gets the amount of water drainage from bottom of profile(mm)</summary>
        public double Drainage { get { return 0; } }

        /// <summary>Fraction of incoming radiation reflected from bare soil</summary>
        [Description("Salb")]
        public double Salb { get; set; }

        /// <summary>Amount of water moving laterally out of the profile (mm)</summary>
        public double[] LateralOutflow { get { throw new NotImplementedException(); } }

        /// <summary>Amount of N leaching as NO3-N from the deepest soil layer (kg /ha)</summary>
        public double LeachNO3 { get { return 0; } }

        /// <summary>Amount of N leaching as NH4-N from the deepest soil layer (kg /ha)</summary>
        public double LeachNH4 { get { return 0; } }
        
        /// <summary>Amount of N leaching as urea-N  from the deepest soil layer (kg /ha)</summary>
        public double LeachUrea { get { return 0; } }

        /// <summary>Amount of Cl leaching  from the deepest soil layer (kg /ha)</summary>
        public double LeachCl { get { return 0; } }
        
        /// <summary>Amount of N leaching as NO3 from each soil layer (kg /ha)</summary>
        public double[] FlowNO3 { get { throw new NotImplementedException(); } }

        /// <summary>Amount of N leaching as NH4 from each soil layer (kg /ha)</summary>
        public double[] FlowNH4 { get { throw new NotImplementedException(); } }

        /// <summary>Amount of N leaching as urea from each soil layer (kg /ha)</summary>
        public double[] FlowUrea { get { throw new NotImplementedException(); } }

        /// <summary>Amount of N leaching as urea from each soil layer (kg /ha)</summary>
        public double[] FlowCl { get { throw new NotImplementedException(); } }

        /// <summary>Amount of water moving upward from each soil layer during unsaturated flow (negative value means downward movement) (mm)</summary>
        public double[] Flow  { get { throw new NotImplementedException(); } }

        /// <summary>Amount of water moving downward out of each soil layer due to gravity drainage (above DUL) (mm)</summary>
        public double[] Flux { get { throw new NotImplementedException(); } }

        /// <summary> This is set by Microclimate and is rainfall less that intercepted by the canopy and residue components </summary>
        public double PotentialInfiltration { get; set; }
        
        /// <summary> The amount of rainfall intercepted by crop and residue canopies </summary>
        public double PrecipitationInterception { get; set; }

        /// <summary>Water table depth (mm)</summary>
        public double WaterTable { get; set; }
        
        /// <summary>Pond depth (mm)</summary>
        public double Pond { get; set; }

        /// <summary>Pond depth (mm)</summary>
        public double SubsurfaceDrain { get; set; }

        /// <summary>Sets the water table.</summary>
        /// <param name="InitialDepth">The initial depth.</param> 
        public void SetWaterTable(double InitialDepth)
        {
            throw new NotImplementedException();
        }

        /// <summary>The efficiency (0-1) that solutes move down with water.</summary>
        public double[] SoluteFluxEfficiency { get; set; }

        /// <summary>The efficiency (0-1) that solutes move up with water.</summary>
        public double[] SoluteFlowEfficiency { get; set; }

        ///<summary>Perform a reset</summary>
        public void Reset()
        {
            throw new NotImplementedException();
        }

        ///<summary>Perform tillage</summary>
        public void Tillage(TillageType Data)
        {
            throw new NotImplementedException();
        }

        ///<summary>Perform tillage</summary>
        public void Tillage(string tillageType)
        {
            throw new NotImplementedException();
        }

        ///<summary>Remove water from the profile</summary>
        public void RemoveWater(double[] amountToRemove)
        {
            throw new NotImplementedException();
        }
        public void Standardise(double[] targetThickness)
        {
        
        
        }
        
        /// <summary>Plant available water SW-LL15 (mm/mm).</summary>
        [Units("mm/mm")]
        public double[] PAW
        {
            get
            {
                return SoilUtilities.CalcPAWC(soilPhysical.Thickness,
                                              soilPhysical.LL15,
                                              SW,
                                              null);
            }
        }

        /// <summary>Plant available water SW-LL15 (mm).</summary>
        [Units("mm")]
        public double[] PAWmm
        {
            get
            {
                return MathUtilities.Multiply(PAW, soilPhysical.Thickness);
            }
        }

    }
}
```
        Soil: Latitude=0; Longitude=0
          Water: Thickness=[100, 100, 200, 300]; InitialValues=[0.16, 0.16, 0.16, 0.16]; InitialPAWmm=77; RelativeTo=LL15; FilledFromTop=true
          Physical
            Thickness  ParticleSizeClay  BD   AirDry  LL15  DUL   SAT
            100        9                 1.5  0.01    0.05  0.16  0.29
            100        9                 1.5  0.01    0.05  0.16  0.29
            200        9                 1.5  0.01    0.05  0.16  0.29
            300        9                 1.5  0.01    0.05  0.16  0.29
            999999     -                 -    -       -     -     -
            999999     -                 -    -       -     -     -
            999999     -                 -    -       -     -     -
            999999     -                 -    -       -     -     -
          Organic: FOMCNRatio=60; CarbonUnits=Total
            Thickness  Carbon  SoilCNRatio  FBiom  FInert  FOM
            100        2       14.5         0.04   0.4     0.29407
            300        2       14.5         0.04   0.4     0.294
            600        2       14.5         0.04   0.4     0.294
            1000       2       14.5         0.04   0.4     0.294
            1000       2       14.5         0.04   0.4     0.294
            1000       2       14.5         0.04   0.4     0.294
            1000       2       14.5         0.04   0.4     0.294
            1000       2       14.5         0.04   0.4     0.294
          Chemical: Thickness=[100, 300, 600, 1000, 1000, 1000, 1000, 1000]; PH=[6.5, 6.5, 6.5, 6.5, 6.5, 6.5, 6.5, 6.5]; PHUnits=Water
          SoilTemperature
          Solute NO3: Thickness=[700]; InitialValues=[0.1]; InitialValuesUnits=kg/ha; WaterTableConcentration=0; D0=0; DepthConstant=0; MaxDepthSoluteAccessible=0; RunoffEffectivenessAtMovingSolute=0; MaxEffectiveRunoff=0
          Solute NH4: Thickness=[700]; InitialValues=[1]; InitialValuesUnits=kg/ha; WaterTableConcentration=0; D0=0; DepthConstant=0; MaxDepthSoluteAccessible=0; RunoffEffectivenessAtMovingSolute=0; MaxEffectiveRunoff=0
          Solute Urea: Thickness=[700]; InitialValues=[0]; InitialValuesUnits=kg/ha; WaterTableConcentration=0; D0=0; DepthConstant=0; MaxDepthSoluteAccessible=0; RunoffEffectivenessAtMovingSolute=0; MaxEffectiveRunoff=0
          LayerStructure: Thickness=[2, 4, 4, 10, 10, 10, 60, 100, 300, 400, 200]
        Report ReportLayering: EventNames=[Clock].DoReport
          VariableNames:
            [Clock].Today as Date
            [Soil].SoilTemperature.AverageSoilTemp[1] as AverageSoilTemp@0001mm
            [Soil].SoilTemperature.AverageSoilTemp[3] as AverageSoilTemp@0008mm
            [Soil].SoilTemperature.AverageSoilTemp[4] as AverageSoilTemp@0015mm
            [Soil].SoilTemperature.AverageSoilTemp[8] as AverageSoilTemp@0150mm
            [Soil].SoilTemperature.AverageSoilTemp[11] as AverageSoilTemp@1000mm
            [Soil].SoilTemperature.MaxSoilTemp[1] as MaxSoilTemp@0001mm
            [Soil].SoilTemperature.MaxSoilTemp[3] as MaxSoilTemp@0008mm
            [Soil].SoilTemperature.MaxSoilTemp[4] as MaxSoilTemp@0015mm
            [Soil].SoilTemperature.MaxSoilTemp[8] as MaxSoilTemp@0150mm
            [Soil].SoilTemperature.MaxSoilTemp[11] as MaxSoilTemp@1000mm
    Simulation LayeringEffectThick
      Clock: Start=2000-01-01; End=2000-12-31
      Weather: FileName=AnalyticalWeather.xlsx; ExcelWorkSheetName=Dalby
      MicroClimate: a_interception=0; b_interception=0; c_interception=0; d_interception=0; SoilHeatFluxFraction=0; MinimumHeightDiffForNewLayer=0; NightInterceptionFraction=0; ReferenceHeight=2
      Summary
      Zone FieldThick: Area=1; Slope=0; AspectAngle=0; Altitude=50
        Manager DummyWaterBalance
          SW = 0.15, 0.15, 0.15, 0.15, 0.15, 0.15
          Eos = 0
          Es = 0
          Eo = 0
          Salb = 0
          script: same as in Effect of Soil Layering.LayeringEffectThin.FieldThin.DummyWaterBalance
        Soil: Latitude=0; Longitude=0
          Water: Thickness=[100, 100, 200, 300]; InitialValues=[0.16, 0.16, 0.16, 0.16]; InitialPAWmm=77; RelativeTo=LL15; FilledFromTop=true
          Physical: same as Effect of Soil Layering.LayeringEffectThin.FieldThin.Soil.Physical
          Organic: same as Effect of Soil Layering.LayeringEffectThin.FieldThin.Soil.Organic
          Chemical: Thickness=[100, 300, 600, 1000, 1000, 1000, 1000, 1000]; PH=[6.5, 6.5, 6.5, 6.5, 6.5, 6.5, 6.5, 6.5]; PHUnits=Water
          SoilTemperature
          Solute NO3: Thickness=[700]; InitialValues=[0.1]; InitialValuesUnits=kg/ha; WaterTableConcentration=0; D0=0; DepthConstant=0; MaxDepthSoluteAccessible=0; RunoffEffectivenessAtMovingSolute=0; MaxEffectiveRunoff=0
          Solute NH4: Thickness=[700]; InitialValues=[1]; InitialValuesUnits=kg/ha; WaterTableConcentration=0; D0=0; DepthConstant=0; MaxDepthSoluteAccessible=0; RunoffEffectivenessAtMovingSolute=0; MaxEffectiveRunoff=0
          Solute Urea: Thickness=[700]; InitialValues=[0]; InitialValuesUnits=kg/ha; WaterTableConcentration=0; D0=0; DepthConstant=0; MaxDepthSoluteAccessible=0; RunoffEffectivenessAtMovingSolute=0; MaxEffectiveRunoff=0
          LayerStructure: Thickness=[100, 100, 100, 200, 400, 200]
        Report ReportLayering: EventNames=[Clock].DoReport
          VariableNames:
            [Clock].Today as Date
            [Soil].SoilTemperature.AverageSoilTemp[1] as AverageSoilTemp@0001mm
            [Soil].SoilTemperature.AverageSoilTemp[1] as AverageSoilTemp@0008mm
            [Soil].SoilTemperature.AverageSoilTemp[1] as AverageSoilTemp@0015mm
            [Soil].SoilTemperature.AverageSoilTemp[2] as AverageSoilTemp@0150mm
            [Soil].SoilTemperature.AverageSoilTemp[6] as AverageSoilTemp@1000mm
            [Soil].SoilTemperature.MaxSoilTemp[1] as MaxSoilTemp@0001mm
            [Soil].SoilTemperature.MaxSoilTemp[1] as MaxSoilTemp@0008mm
            [Soil].SoilTemperature.MaxSoilTemp[1] as MaxSoilTemp@0015mm
            [Soil].SoilTemperature.MaxSoilTemp[2] as MaxSoilTemp@0150mm
            [Soil].SoilTemperature.MaxSoilTemp[6] as MaxSoilTemp@1000mm
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