Simulations: Version=171
  DataStore
    ExcelInput Obs_WaggaWagga: SheetNames=[Observed]
      FileNames=[Obs_WaggaWagga.xlsx, Observed\ForestHillObserved.xlsx, Observed\NorwinObserved.xlsx, Observed\ForestHillWheatObserved.xlsx]
    PredictedObserved: PredictedTableName=Report; ObservedTableName=Observed; FieldNameUsedForMatch=SimulationName; FieldName2UsedForMatch=Clock.Today; AllColumns=false
    ExcelInput Analytical: FileNames=[SoilTemperature-AnalyticalSolution.xlsx]; SheetNames=[AnalyticalDataForAPSIM]
    ExcelInput: FileNames=[NGObserved.xlsx]; SheetNames=[BareSoil, CornSoyCrop, CornSoySoil]
    PredictedObserved USAPredictedObserved: PredictedTableName=BareSoilReport; ObservedTableName=BareSoil; FieldNameUsedForMatch=SimulationName; FieldName2UsedForMatch=Date; AllColumns=false
    PredictedObserved USASoilPredObs: PredictedTableName=CSReport; ObservedTableName=CornSoySoil; FieldNameUsedForMatch=SimulationName; FieldName2UsedForMatch=Clock.Today; AllColumns=false
    ExcelInput NZObs_Rainshelter: FileNames=[LincolnRainshelter.xlsx]; SheetNames=[LincolnRainshelter]
    PredictedObserved NZPredictedObserved: PredictedTableName=ReportRainshelter; ObservedTableName=LincolnRainshelter; FieldNameUsedForMatch=SimulationName; FieldName2UsedForMatch=Date; AllColumns=false
    SimulationComparison: TableName=ReportLayering; FieldNamesUsedForMatch=[Date]
  Folder ValidationTests
    Folder ForestHill
      Simulation ForestHillWeatherStation
        Memo
          This simulation reproduces the soil conditions within the weather station at CSIRO Forest Hill.
        Weather: FileName=WeatherFiles\ForestHill.met
        Clock: Start=2023-01-01; End=2024-02-14
        Summary
        SoilArbitrator Soil Arbitrator
        MicroClimate: a_interception=0; b_interception=1; c_interception=0; d_interception=0; SoilHeatFluxFraction=0; MinimumHeightDiffForNewLayer=0; NightInterceptionFraction=0; ReferenceHeight=2
        Zone: Area=1; Slope=0; AspectAngle=0; Altitude=50
          Soil: Latitude=0; Longitude=0
            Water: Thickness=[50, 100, 100, 150, 200, 200, 400, 300]; InitialValues=[0.4, 0.4, 0.4, 0.4, 0.12, 0.12, 0.12, 0.12]; InitialPAWmm=157; RelativeTo=LL15; FilledFromTop=true
            Physical
              Thickness  ParticleSizeClay  BD   AirDry  LL15  DUL  SAT   KS
              50         40                1.3  0.1     0.2   0.4  0.45  25
              100        40                1.3  0.1     0.2   0.4  0.45  25
              100        40                1.3  0.1     0.2   0.4  0.45  25
              150        40                1.3  0.1     0.2   0.4  0.45  25
              200        10                1.6  0.05    0.05  0.1  0.29  100
              200        10                1.6  0.05    0.05  0.1  0.29  100
              400        10                1.6  0.05    0.05  0.1  0.29  100
              300        10                1.6  0.05    0.05  0.1  0.29  100
              SoilCrop SlurpSoil: LL=[0.2, 0.2, 0.2, 0.2, 0.05, 0.05, 0.05, 0.05]; KL=[0.06, 0.06, 0.06, 0.04, 0.04, 0.04, 0.04, 0]; XF=[1, 1, 1, 1, 1, 1, 1, 0]
            Swim3: Salb=0.16; CN2Bare=75; CNRed=20; CNCov=0.8; KDul=1; PSIDul=-330; VC=true; DTMin=0; DTMax=60; MaxWaterIncrement=1; SpaceWeightingFactor=0; SoluteSpaceWeightingFactor=0; Dis=15; Disp=1; A=1; DTHC=0; DTHP=1; Diagnostics=false
            LayerStructure: Thickness=[10, 20, 20, 25, 50, 125, 150, 200, 200, 400, 300]
            Organic: FOMCNRatio=60; CarbonUnits=Total
              Thickness  Carbon  SoilCNRatio  FBiom  FInert  FOM
              50         2       14.5         0.04   0.4     0.294
              100        1       14.5         0.03   0.5     0.253
              100        0.5     14.5         0.02   0.5     0.188
              150        0.2     14.5         0.01   0.5     0.114
              200        0.12    14.5         0.01   0.9     0.069
              200        0.1     14.5         0.01   0.99    0.042
              400        0.1     14.5         0.01   0.99    0.025
              300        0.1     14.5         0.01   0.99    0.025
            Chemical: Thickness=[50, 100, 100, 150, 200, 200, 400, 300]; PH=[5.8, 5.7, 5.7, 5.9, 5.7, 5.7, 5.7, 5.7]; PHUnits=Water
            Nutrient
            SoilTemperature Temperature: CONSTANT_TEMPdepth=10; Thickness=[10, 20, 20, 25, 50, 125, 150, 200, 200, 400, 300]
              InitialValues=[23.5, 23.5, 23.5, 23.5, 23.5, 23, 22.7, 22.5, 22, 21.7, 21.5]
            Solute NO3: InitialValuesUnits=kg/ha; WaterTableConcentration=0; D0=0; DepthConstant=0; MaxDepthSoluteAccessible=0; RunoffEffectivenessAtMovingSolute=0; MaxEffectiveRunoff=0
              Thickness  InitialValues  Exco  FIP
              50         0.1            0     1
              100        0.1            0     1
              100        0.1            0     1
              150        0.01           0     1
              200        0.01           0     1
              200        0.01           0     1
              400        0.01           0     1
              300        0.01           0     1
            Solute NH4: InitialValuesUnits=kg/ha; WaterTableConcentration=0; D0=0; DepthConstant=0; MaxDepthSoluteAccessible=0; RunoffEffectivenessAtMovingSolute=0; MaxEffectiveRunoff=0
              Thickness  InitialValues  Exco  FIP
              50         0.01           0     1
              100        0.01           0     1
              100        0.01           0     1
              150        0.01           0     1
              200        0.01           0     1
              200        0.01           0     1
              400        0.01           0     1
              300        0.01           0     1
            Solute Urea: InitialValuesUnits=kg/ha; WaterTableConcentration=0; D0=0; DepthConstant=0; MaxDepthSoluteAccessible=0; RunoffEffectivenessAtMovingSolute=0; MaxEffectiveRunoff=0
              Thickness  InitialValues  Exco  FIP
              50         0              0     1
              100        0              0     1
              100        0              0     1
              150        0              0     1
              200        0              0     1
              200        0              0     1
              400        0              0     1
              300        0              0     1
          SurfaceOrganicMatter: InitialResidueName=Wheat; InitialResidueType=wheat; InitialResidueMass=1000; InitialStandingFraction=0; InitialCPR=0; InitialCNR=80
          Report: EventNames=[Clock].DoReport
            VariableNames:
              [Clock].Today
              [Soil].Temperature.AverageSoilTemp[5] as AverageSoilTemp@0100mm
              [Soil].Temperature.MaxSoilTemp[5] as MaxSoilTemp@0100mm
              [Soil].Temperature.MinSoilTemp[5] as MinSoilTemp@0100mm
              [Soil].Temperature.AverageSoilTemp[8] as AverageSoilTemp@0500mm
              [Soil].Temperature.MaxSoilTemp[8] as MaxSoilTemp@0500mm
              [Soil].Temperature.MinSoilTemp[8] as MinSoilTemp@0500mm
              [Soil].Temperature.AverageSoilTemp[10] as AverageSoilTemp@1000mm
              [Soil].Temperature.MaxSoilTemp[10] as MaxSoilTemp@1000mm
              [Soil].Temperature.MinSoilTemp[10] as MinSoilTemp@1000mm
          Plant Slurp
          Manager Slurp2Sow
            CultivarName = StaticCrop
            InitialRootDepth = 300
            SowingDate = 01/01/2023 00:00:00
```csharp
using Models.Soils;
using APSIM.Shared.Utilities;
using Models.PMF;
using Models.Core;
using System;
using System.Linq;
        
namespace Models
{
    [Serializable] 
    [System.Xml.Serialization.XmlInclude(typeof(Model))]
    public class Script : Model
    {
        [Link] Clock Clock;
        [Link] Zone zone;

        [Description("Cultivar")]
        public string CultivarName { get; set; }
        [Description("Initial Root Depth")]
        public double InitialRootDepth { get; set; }
        [Description("Sowing Date")]
        public DateTime SowingDate { get; set; }

               
        [EventSubscribe("DoManagement")]
        private void OnDoManagement(object sender, EventArgs e)
        {
            if (Clock.Today.Date == SowingDate)
            {
                foreach (Plant slurp in this.FindAllInScope<Plant>().OfType<IModel>().ToList())
                    slurp.Sow(cultivar: CultivarName, population: 1, depth: InitialRootDepth, rowSpacing: 150);
                object LAIResetValue = 1.0;
                zone.Set("Slurp.Leaf.Area.FixedValue", LAIResetValue);                                
                zone.Set("Slurp.Leaf.LaiDead.FixedValue", LAIResetValue); 
 
                object HeightResetValue = 50.0;
                zone.Set("Slurp.Leaf.HeightFunction.FixedValue", HeightResetValue); 
                 
            }
        }
    }
}
```
      Experiment ForestHillWheat
        Factors
          CompositeFactor TentHill
            Specifications:
              [Sow].Script.EmergenceDate = 05-jul
              [Sow].Script.Population= 70
              [Soil]
            Soil: SoilType=Black Vertosol; Site=Lawes; NearestTown=Lawes, Q 4343; Region=Lockyer; State=Queensland; Country=Australia; NaturalVegetation=Blue Gum, Moreton Bay Ash, Tea Tree; ApsoilNumber=37; Latitude=-27.537; Longitude=152.336; LocationAccuracy=+-20m; DataSource=CSIRO Sustainable Ecosystems, Toowoomba
              Comments=Soil naming structure: \State\Region\Classification-Local Name (Site/district and locator number); oc and ph estimated
              Physical
                Thickness  ParticleSizeClay  BD    AirDry  LL15  DUL   SAT   KS
                100        100               1.3   0.25    0.33  0.43  0.47  48
                100        100               1.3   0.33    0.33  0.43  0.48  48
                100        100               1.3   0.33    0.33  0.43  0.47  48
                100        100               1.3   0.32    0.32  0.43  0.47  48
                100        100               1.3   0.28    0.28  0.43  0.47  48
                100        100               1.35  0.27    0.27  0.4   0.47  48
                100        100               1.35  0.27    0.27  0.4   0.47  48
                100        100               1.35  0.27    0.27  0.4   0.47  48
                400        100               1.35  0.27    0.27  0.4   0.47  48
                400        100               1.35  0.27    0.27  0.4   0.47  48
                400        100               1.35  0.27    0.27  0.4   0.47  48
                SoilCrop WheatSoil
                  LL=[0.33, 0.33, 0.33, 0.32, 0.28, 0.27, 0.27, 0.27, 0.27, 0.27, 0.27]
                  KL=[0.06, 0.06, 0.06, 0.04, 0.03, 0.03, 0.03, 0.03, 0.03, 0.03, 0.03]
                  XF=[1, 1, 1, 1, 1, 1, 1, 1, 1, 1, 1]
              Organic: FOMCNRatio=40; CarbonUnits=Total
                Thickness  Carbon  SoilCNRatio  FBiom  FInert  FOM
                150        0.954   12           0.04   0.4     347.129
                150        0.954   12           0.02   0.6     270.344
                300        0.962   12           0.02   0.8     163.972
                300        0.846   12           0.02   1       99.454
                300        0.546   12           0.01   1       60.322
                300        0.262   12           0.01   1       36.587
                300        0.2     12           0.01   1       22.191
              Chemical: Thickness=[150, 150, 300, 300, 300, 300, 300]; PH=[8, 8, 8, 8, 8, 8, 8]; PHUnits=Water
              Water: Thickness=[100, 100, 100, 100, 100, 100, 100, 100, 400, 400, 400]; InitialPAWmm=251; RelativeTo=LL15; FilledFromTop=true
                InitialValues=[0.43, 0.43, 0.43, 0.43, 0.43, 0.4, 0.4, 0.4, 0.4, 0.4, 0.4]
              Nutrient
              Solute NO3: InitialValuesUnits=ppm; WaterTableConcentration=0; D0=0.05; DepthConstant=0; MaxDepthSoluteAccessible=0; RunoffEffectivenessAtMovingSolute=0; MaxEffectiveRunoff=0
                Thickness  InitialValues  Exco  FIP
                150        38.023         0     1
                150        12.955         0     1
                300        0.422          0     1
                300        0.422          0     1
                300        0.422          0     1
                300        0.422          0     1
                500        0.422          0     1
              Solute NH4: InitialValuesUnits=ppm; WaterTableConcentration=0; D0=0.05; DepthConstant=0; MaxDepthSoluteAccessible=0; RunoffEffectivenessAtMovingSolute=0; MaxEffectiveRunoff=0
                Thickness  InitialValues  Exco  FIP
                150        0.38           1     1
                150        0.155          1     1
                300        0.042          1     1
                300        0.042          1     1
                300        0.042          1     1
                300        0.042          1     1
                500        0.042          1     1
              Solute Urea: InitialValuesUnits=kg/ha; WaterTableConcentration=0; D0=0.05; DepthConstant=0; MaxDepthSoluteAccessible=0; RunoffEffectivenessAtMovingSolute=0; MaxEffectiveRunoff=0
                Thickness  InitialValues  Exco  FIP
                150        0              0     1
                150        0              0     1
                300        0              0     1
                300        0              0     1
                300        0              0     1
                300        0              0     1
                500        0              0     1
              Swim3: Salb=0.13; CN2Bare=75; CNRed=20; CNCov=0.8; KDul=0.1; PSIDul=-100; VC=true; DTMin=0; DTMax=1440; MaxWaterIncrement=5; SpaceWeightingFactor=0; SoluteSpaceWeightingFactor=1; Dis=0; Disp=1; A=2; DTHC=0.1; DTHP=2; Diagnostics=true
              LayerStructure
                Thickness=[10, 20, 40, 30, 100, 100, 100, 100, 100, 100, 100, 100, 100, 200, 300, 300, 200]
              SoilTemperature Temperature: CONSTANT_TEMPdepth=10; Thickness=[100, 100, 100, 100, 100, 100, 100, 100]; InitialValues=[11, 11, 11, 11, 12, 13, 15.3, 14]
          CompositeFactor Cavendish
            Specifications:
              [Sow].Script.EmergenceDate = 28-jun
              [Sow].Script.Population=100
              [Soil]
            Soil: SoilType=Black Vertosol; Site=Lawes; NearestTown=Lawes, Q 4343; Region=Lockyer; State=Queensland; Country=Australia; NaturalVegetation=Blue Gum, Moreton Bay Ash, Tea Tree; ApsoilNumber=37; Latitude=-27.537; Longitude=152.336; LocationAccuracy=+-20m; DataSource=CSIRO Sustainable Ecosystems, Toowoomba
              Comments=Soil naming structure: \State\Region\Classification-Local Name (Site/district and locator number); oc and ph estimated
              Physical
                Thickness  ParticleSizeClay  BD   AirDry  LL15  DUL  SAT   KS
                100        1                 1.4  0.1     0.16  0.4  0.45  48
                100        1                 1.4  0.21    0.21  0.4  0.45  48
                100        1                 1.4  0.22    0.22  0.4  0.45  48
                100        1                 1.4  0.24    0.24  0.4  0.45  48
                100        1                 1.4  0.24    0.24  0.4  0.45  48
                100        1                 1.4  0.24    0.24  0.4  0.45  48
                100        1                 1.4  0.24    0.24  0.4  0.45  48
                100        1                 1.4  0.24    0.24  0.4  0.45  48
                400        1                 1.4  0.24    0.24  0.4  0.45  48
                400        1                 1.4  0.24    0.24  0.4  0.45  48
                400        1                 1.4  0.24    0.24  0.4  0.45  48
                400        1                 1.4  0.24    0.24  0.4  0.45  48
                SoilCrop WheatSoil
                  LL=[0.16, 0.21, 0.22, 0.24, 0.24, 0.24, 0.24, 0.26, 0.28, 0.3, 0.3, 0.3]
                  KL=[0.06, 0.06, 0.06, 0.04, 0.03, 0.03, 0.03, 0.03, 0.03, 0.03, 0.03, 0.03]
                  XF=[1, 1, 1, 1, 1, 1, 1, 1, 1, 1, 1, 1]
              Organic: same as ValidationTests.ForestHill.ForestHillWheat.Factors.TentHill.Soil.Organic
              Chemical: Thickness=[150, 150, 300, 300, 300, 300, 300]; PH=[8, 8, 8, 8, 8, 8, 8]; PHUnits=Water
              Water: Thickness=[150, 150, 300, 300, 300, 300, 300, 200, 200]; InitialValues=[0.4, 0.4, 0.4, 0.4, 0.4, 0.4, 0.4, 0.4, 0.4]; InitialPAWmm=365; RelativeTo=LL15; FilledFromTop=true
              Nutrient
              Solute NO3: same as ValidationTests.ForestHill.ForestHillWheat.Factors.TentHill.Soil.NO3
              Solute NH4: same as ValidationTests.ForestHill.ForestHillWheat.Factors.TentHill.Soil.NH4
              Solute Urea: same as ValidationTests.ForestHill.ForestHillWheat.Factors.TentHill.Soil.Urea
              Swim3: same as ValidationTests.ForestHill.ForestHillWheat.Factors.TentHill.Soil.Swim3
              LayerStructure
                Thickness=[10, 20, 40, 30, 100, 100, 100, 100, 100, 100, 100, 100, 100, 200, 300, 300, 200]
              SoilTemperature Temperature: CONSTANT_TEMPdepth=10; Thickness=[100, 100, 100, 100, 100, 100, 100, 100]; InitialValues=[14, 14, 14, 14, 14.5, 15.3, 16.5, 17]
        Simulation ForestHillWheatBase
          Clock: Start=2022-06-20; End=2022-11-30
          Summary summaryfile
          Weather: FileName=WeatherFiles\ForestHill.met
          SoilArbitrator Soil Arbitrator
          MicroClimate: a_interception=0; b_interception=1; c_interception=0; d_interception=0; SoilHeatFluxFraction=0.4; MinimumHeightDiffForNewLayer=0; NightInterceptionFraction=0.5; ReferenceHeight=2
          Zone Field: Area=1; Slope=0; AspectAngle=0; Altitude=50
            Manager Sow
              SowDate = 20-Jun
              CultivarName = Hartog
              SowingDepth = 30
              RowSpacing = 250
              Population = 160
              EmergenceDate = 24-jun
```csharp
using APSIM.Shared.Utilities;
using Models.Utilities;
using Models.Soils;
using Models.PMF;
using Models.Core;
using System;

namespace Models
{
    [Serializable]
    public class Script : Model
    {
        [Link] Clock Clock;
        [Link] Fertiliser Fertiliser;
        [Link] Summary Summary;
        [Link] Soil Soil;
        [Link] Plant Wheat;        
        
        [Description("Sowing date (d-mmm)")]
        public string SowDate { get; set; }

        [Description("Emergence date (d-mmm)")]
        public string EmergenceDate { get; set; }


        [Display(Type = DisplayType.CultivarName)]
        [Description("Cultivar to be sown")]
        public string CultivarName { get; set; }

        [Description("Sowing depth (mm)")]
        public double SowingDepth { get; set; }

        [Description("Row spacing (mm)")]
        public double RowSpacing { get; set; }

        [Description("Plant population (/m2)")]
        public double Population { get; set; }

        [EventSubscribe("DoManagement")]
        private void OnDoManagement(object sender, EventArgs e)
        {
            if (DateUtilities.WithinDates(SowDate, Clock.Today, SowDate))
            {
                Wheat.Sow(population: Population, cultivar: CultivarName, depth: SowingDepth, rowSpacing: RowSpacing); 
                Wheat.Phenology.SetEmergenceDate(EmergenceDate);
            }
        }
    }
}
```
            Manager Harvest (disabled)
              Crop = [Wheat]
```csharp
using APSIM.Shared.Utilities;
using Models.Utilities;
using Models.Soils;
using Models.PMF;
using Models.Core;
using System;

namespace Models
{
    [Serializable] 
    public class Script : Model
    {
        [Description("Crop")]
        public IPlant Crop { get; set; }
        
        [EventSubscribe("DoManagement")]
        private void OnDoManagement(object sender, EventArgs e)
        {
            if (Crop.IsReadyForHarvesting)
            {
                Crop.Harvest();
                Crop.EndCrop();
            }
        }
    }
}
```
            Operations
            Irrigation
            Fertiliser
            Soil: SoilType=Black Vertosol; Site=Lawes; NearestTown=Lawes, Q 4343; Region=Lockyer; State=Queensland; Country=Australia; NaturalVegetation=Blue Gum, Moreton Bay Ash, Tea Tree; ApsoilNumber=37; Latitude=-27.537; Longitude=152.336; LocationAccuracy=+-20m; DataSource=CSIRO Sustainable Ecosystems, Toowoomba
              Comments=Soil naming structure: \State\Region\Classification-Local Name (Site/district and locator number); oc and ph estimated
              Physical
                Thickness  ParticleSizeClay  BD    AirDry  LL15  DUL   SAT   KS
                100        40                1.32  0.13    0.26  0.41  0.47  48
                300        40                1.3   0.208   0.26  0.43  0.48  48
                400        40                1.23  0.26    0.26  0.46  0.51  48
                800        40                1.23  0.26    0.26  0.46  0.51  48
                400        40                1.23  0.26    0.26  0.46  0.51  48
                SoilCrop WheatSoil: LL=[0.26, 0.26, 0.26, 0.35, 0.46]; KL=[0.06, 0.06, 0.06, 0.04, 0.03]; XF=[1, 1, 1, 1, 1]
              Organic: same as ValidationTests.ForestHill.ForestHillWheat.Factors.TentHill.Soil.Organic
              Chemical: Thickness=[150, 150, 300, 300, 300, 300, 300]; PH=[8, 8, 8, 8, 8, 8, 8]; PHUnits=Water
              Water: Thickness=[150, 150, 300, 300, 300, 300, 300, 200]; InitialValues=[0.417, 0.43, 0.45, 0.46, 0.46, 0.46, 0.46, 0.267]; InitialPAWmm=347.45; RelativeTo=LL15; FilledFromTop=true
              Nutrient
              Solute NO3: same as ValidationTests.ForestHill.ForestHillWheat.Factors.TentHill.Soil.NO3
              Solute NH4: same as ValidationTests.ForestHill.ForestHillWheat.Factors.TentHill.Soil.NH4
              Solute Urea: same as ValidationTests.ForestHill.ForestHillWheat.Factors.TentHill.Soil.Urea
              Swim3: same as ValidationTests.ForestHill.ForestHillWheat.Factors.TentHill.Soil.Swim3
              LayerStructure
                Thickness=[10, 20, 40, 30, 100, 100, 100, 100, 100, 100, 100, 100, 100, 200, 300, 300, 200]
              SoilTemperature Temperature: CONSTANT_TEMPdepth=10; Thickness=[100, 100, 100, 100, 100, 100, 100, 100]; InitialValues=[14, 14, 14, 14, 14.5, 15, 15.3, 15.5]
            SurfaceOrganicMatter: InitialResidueName=wheat_stubble; InitialResidueType=wheat; InitialResidueMass=500; InitialStandingFraction=0; InitialCPR=0; InitialCNR=100
            Plant Wheat
            Report: EventNames=[CLock].DoReport
              VariableNames:
                [Clock].Today
                [Wheat].Phenology.HaunStage
                [Wheat].Phenology.CurrentStageName
                [Wheat].Leaf.LAI
                [Wheat].Leaf.LAITotal
                [Wheat].Leaf.Fw
                [Wheat].Leaf.Fn
                [Wheat].AboveGround.Wt
                [Wheat].Grain.Wt
                sum([Soil].Water.MM) as TotalSW
                [EMCalculator].Script.EMp100 as EMp100
                [EMCalculator].Script.FASW
                [Soil].Temperature.AverageSoilTemp[3] as AverageSoilTemp@050mm
                [Soil].Temperature.AverageSoilTemp[5] as AverageSoilTemp@150mm
                [Soil].Temperature.AverageSoilTemp[6] as AverageSoilTemp@250mm
                [Soil].Temperature.AverageSoilTemp[7] as AverageSoilTemp@350mm
                [Soil].Temperature.AverageSoilTemp[8] as AverageSoilTemp@450mm
                [Soil].Temperature.AverageSoilTemp[9] as AverageSoilTemp@550mm
                [Soil].Temperature.AverageSoilTemp[10] as AverageSoilTemp@650mm
                [Soil].Temperature.AverageSoilTemp[11] as AverageSoilTemp@750mm
                [Soil].Temperature.MinSoilTemp[3] as MinSoilTemp@050mm
                [Soil].Temperature.MinSoilTemp[5] as MinSoilTemp@150mm
                [Soil].Temperature.MinSoilTemp[6] as MinSoilTemp@250mm
                [Soil].Temperature.MinSoilTemp[7] as MinSoilTemp@350mm
                [Soil].Temperature.MinSoilTemp[8] as MinSoilTemp@450mm
                [Soil].Temperature.MinSoilTemp[9] as MinSoilTemp@550mm
                [Soil].Temperature.MinSoilTemp[10] as MinSoilTemp@650mm
                [Soil].Temperature.MinSoilTemp[11] as MinSoilTemp@750mm
                [Soil].Temperature.MaxSoilTemp[3] as MaxSoilTemp@050mm
                [Soil].Temperature.MaxSoilTemp[5] as MaxSoilTemp@150mm
                [Soil].Temperature.MaxSoilTemp[6] as MaxSoilTemp@250mm
                [Soil].Temperature.MaxSoilTemp[7] as MaxSoilTemp@350mm
                [Soil].Temperature.MaxSoilTemp[8] as MaxSoilTemp@450mm
                [Soil].Temperature.MaxSoilTemp[9] as MaxSoilTemp@550mm
                [Soil].Temperature.MaxSoilTemp[10] as MaxSoilTemp@650mm
                [Soil].Temperature.MaxSoilTemp[11] as MaxSoilTemp@750mm
            Manager Fertilise topup
              FertiliserType = NO3N
              Threshold = 100
```csharp
using Models.Soils;
using APSIM.Shared.Utilities;
using Models.Soils.Nutrients;
using Models.PMF;
using Models.Core;
using System;
using Models.Soils.Nutrients;
namespace Models
{
    [Serializable]
    public class Script : Model
    {
        [Link] Clock Clock;
        [Link] Fertiliser Fertiliser;
        [Link(ByName=true)] Solute NO3;

        [Description("Type of fertiliser to apply? ")] 
        public Fertiliser.Types FertiliserType { get; set; }
    
        [Description("Threshold amount of NO3 to topup to (kg/ha)")]
        public double Threshold { get; set;}
        
        [EventSubscribe("DoManagement")]
        private void OnDoManagement(object sender, EventArgs e)
        {
            double Amount = Threshold - MathUtilities.Sum(NO3.kgha);
            Fertiliser.Apply(Amount: Amount, Type: FertiliserType);
        }
    }
}
```
            Manager EMCalculator
              EMLL15 = 30
              EMp100 = 0
              FASW = 0
              EMRange = 0
```csharp
using System;
using Models.Core;
using Models.Interfaces;
using Models.PMF;
using APSIM.Shared.Utilities;
using Models.Soils;

namespace Models
{
    [Serializable]
    public class Script : Model
    {
        [Link] IClock Clock;
        [Link] ISummary Summary;
        [Link] Water water;
        [Link] Physical physical;
        [Link] private ISoilWater waterBalance;
        [Link] private ISoilTemperature soiltemperature;
        


        [Description("EM reading at LL15")]
        public double EMLL15 { get; set;}
        
        [Description("EM reading range")]
        public double EMRange { get; set;}


       [Description("Daily EMv100")]
        public double EMp100 { get; set;}


       [Description("Daily FASW")]
        public double FASW { get; set;}

        [EventSubscribe("DoManagement")]
        private void DoDailyCalculations(object sender, EventArgs e)
        {
            int numlayers = 8;
            double WFtot = 0;
            double top = 0;
            double bottom = 0;
            
            for (int i=0; i<numlayers; i++)
            {
               top = bottom;
               bottom = top +physical.Thickness[i] ;
               WFtot += Fcp(top/1000, bottom/1000);
            }

            top = 0;
            bottom = 0;       
            FASW = 0;     
            EMp100 = 0;
            for (int i=0; i<numlayers; i++)
            {
               top = bottom;
               bottom = top + physical.Thickness[i] ;
               double WtLayer = Fcp(top/1000, bottom/1000)/WFtot;

               double FASWLayer = (water.MM[i] - physical.LL15mm[i])/(physical.DULmm[i] - physical.LL15mm[i]);                              
               FASW += FASWLayer * WtLayer;
               
               double ST = soiltemperature.Value[i];
               double ECLayer = (EMLL15 + FASWLayer * EMRange)/TF(ST);   
               EMp100 += ECLayer * WtLayer;               
           
            }
        
            
        }
       

private double  phiv(double z )
{
return 4 * z * Math.Pow((4 * Math.Pow(z,2) + 1),-1.5);
}

private double  phih(double z ) 
{
return 2 - 4 * z * Math.Pow((4 * Math.Pow(z, 2) + 1),-0.5);
}

private double  Rv(double z ) 
{
return Math.Pow((4 * Math.Pow(z,2) + 1),-0.5);
}

private double  Rh(double z ) 
{
return Math.Pow((4 * Math.Pow(z,2) + 1),0.5) - 2 * z;
}

private double  Rp(double z ) 
{
return Math.Pow((4 * Math.Pow(z,2) + 1),0.5) * 2 * z;
}

private double  Fcv(double D1, double D2 )
{
return Rv(D1) - Rv(D2);
}


private double  Fch(double D1, double D2)
{
return Rh(D1) - Rh(D2);
}
        
private double  Fcp(double D1, double D2)
{
return Rp(D1) - Rp(D2);
}        
        
private double TF(double t)
{ 
 return 1 / (1 + 0.0191 * (t - 25));
}
        
        
    }
}
```
    Folder Wagga
      Simulation Wagga
        Memo
          This simulation is a duplicate of the Eucalyptus validation Wagga simulation. The only change is the addition of the soil temperature model.
        Weather: FileName=%root%\Tests\Validation\Eucalyptus\wwepp.met
        Clock: Start=1991-07-01; End=1995-06-30
        Summary
        SoilArbitrator Soil Arbitrator
        Zone Plantation: Area=1; Slope=0; AspectAngle=0; Altitude=50
          Soil: Latitude=0; Longitude=0
            Water: Thickness=[100, 300, 600, 1000, 1000, 1000, 1000, 1000]; InitialValues=[0.16, 0.15, 0.14, 0.13, 0.12, 0.12, 0.099, 0.05]; InitialPAWmm=364; RelativeTo=LL15; FilledFromTop=true
            Physical
              Thickness  ParticleSizeClay  BD    AirDry  LL15  DUL   SAT
              100        9                 1.5   0.01    0.05  0.16  0.29
              300        11                1.6   0.01    0.05  0.15  0.29
              600        13                1.68  0.01    0.05  0.14  0.29
              1000       14                1.75  0.02    0.05  0.13  0.29
              1000       25                1.7   0.05    0.05  0.12  0.29
              1000       35                1.7   0.05    0.05  0.12  0.29
              1000       42                1.7   0.05    0.05  0.12  0.29
              1000       40                1.7   0.05    0.05  0.12  0.29
              SoilCrop EucalyptusSoil: LL=[0.01, 0.01, 0.01, 0.01, 0.01, 0.01, 0.01, 0.01]; KL=[0.07, 0.07, 0.05, 0.02, 0.02, 0.02, 0.01, 0.01]; XF=[1, 1, 1, 1, 0.3, 0.2, 0, 0]
              SoilCrop SCRUMSoil: LL=[0.01, 0.01, 0.01, 0.01, 0.01, 0.01, 0.01, 0.01]; KL=[0.07, 0.07, 0.05, 0.02, 0.02, 0.02, 0.01, 0.01]; XF=[1, 1, 1, 1, 0.3, 0.2, 0, 0]
            WaterBalance SoilWater: SummerDate=1-Nov; SummerU=4; SummerCona=3.5; WinterDate=1-Apr; WinterU=4; WinterCona=3.5; DiffusConst=88; DiffusSlope=35.4; Salb=0.13; CN2Bare=65; CNRed=20; CNCov=0.8; DischargeWidth=0; CatchmentArea=0; PSIDul=-100
              Thickness  SWCON  KLAT
              100        0.9    0
              300        0.9    0
              600        0.9    0
              1000       0.6    0
              1000       0.6    0
              1000       0.6    0
              1000       0.6    0
              1000       0.6    0
            Organic: FOMCNRatio=60; CarbonUnits=Total
              Thickness  Carbon  SoilCNRatio  FBiom  FInert  FOM
              100        2       14.5         0.04   0.4     0.29407
              300        1       14.5         0.03   0.5     0.253108
              600        0.5     14.5         0.02   0.5     0.187507
              1000       0.2     14.5         0.01   0.5     0.113729
              1000       0.12    14.5         0.01   0.9     0.06898
              1000       0.1     14.5         0.01   0.99    0.0418385
              1000       0.1     14.5         0.01   0.99    0.0253763
              1000       0.1     14.5         0.01   0.99    0.0153915
            Chemical: Thickness=[100, 300, 600, 1000, 1000, 1000, 1000, 1000]; PH=[5.8, 5.7, 5.7, 5.9, 5.7, 5.7, 5.7, 5.7]; PHUnits=Water
            Nutrient
            SoilTemperature: CONSTANT_TEMPdepth=10
            LayerStructure: Thickness=[1, 1, 1, 7, 10, 10, 120, 100, 100, 100, 100, 50]
            Solute NO3: Thickness=[100, 300, 600, 1000, 1000, 1000, 1000, 1000]; InitialValues=[0.1, 0.1, 0.1, 0.01, 0.01, 0.01, 0.01, 0.01]; InitialValuesUnits=kg/ha; WaterTableConcentration=0; D0=0; DepthConstant=0; MaxDepthSoluteAccessible=0; RunoffEffectivenessAtMovingSolute=0; MaxEffectiveRunoff=0
            Solute NH4: Thickness=[100, 300, 600, 1000, 1000, 1000, 1000, 1000]; InitialValues=[0.01, 0.01, 0.01, 0.01, 0.01, 0.01, 0.01, 0.01]; InitialValuesUnits=kg/ha; WaterTableConcentration=0; D0=0; DepthConstant=0; MaxDepthSoluteAccessible=0; RunoffEffectivenessAtMovingSolute=0; MaxEffectiveRunoff=0
            Solute Urea: Thickness=[100, 300, 600, 1000, 1000, 1000, 1000, 1000]; InitialValues=[0, 0, 0, 0, 0, 0, 0, 0]; InitialValuesUnits=kg/ha; WaterTableConcentration=0; D0=0; DepthConstant=0; MaxDepthSoluteAccessible=0; RunoffEffectivenessAtMovingSolute=0; MaxEffectiveRunoff=0
          Irrigation
          Fertiliser
          SurfaceOrganicMatter: InitialResidueName=Wheat; InitialResidueType=Wheat; InitialResidueMass=2000; InitialStandingFraction=0; InitialCPR=0; InitialCNR=80
          MicroClimate: a_interception=0; b_interception=1; c_interception=0; d_interception=0; SoilHeatFluxFraction=0; MinimumHeightDiffForNewLayer=0; NightInterceptionFraction=0; ReferenceHeight=2
          Plant Eucalyptus
          Plant SCRUM
          Manager TreeTransplantRule
            RowSpace = 3
            RowWidth = 3
            CultivarName = grandisCoffsHarbour
            SowingDate = 07/01/1991 00:00:00
```csharp
using Models.Soils;
using System;
using Models.Core;
using Models.PMF;
namespace Models
{
    [Serializable] 
    [System.Xml.Serialization.XmlInclude(typeof(Model))]
    public class Script : Model
    {
        [Link] Plant Plant;
        [Link] Clock Clock;

        [Description("Spacing (m) between plants within rows")]
        public double RowSpace { get; set; }
        [Description("Spacing (m) between rows")]
        public double RowWidth { get; set; }

        [Description("Cultivar")]
        [Display(Type=DisplayType.CultivarName)]
        public string CultivarName { get; set; }
        [Description("Sowing Date")]
        public DateTime SowingDate { get; set; }

        [EventSubscribe("DoManagement")]
        private void OnDoManagement(object sender, EventArgs e)
        {
            double PlantPopulation = 1 / (RowWidth * RowSpace);

            if (Clock.Today.Date == SowingDate)
                Plant.Sow(population: PlantPopulation, 
                    cultivar: CultivarName, 
                    depth: 100, 
                    rowSpacing: 150);
            //Plant.Sow(... Contains the following arguements:
            //Population  double  Required  Seeds sowing/m2
            //Cultivar    string  Required  "NameOfCultivar"
            //Depth       double  Optional  Depth (mm) seed sown.   Default is 100mm 
            //MaxCover    double  Optional  Proportion (0-1) of the ground row crop will cover.   Default is 1.0
            //BudNumber   double  Optional  Number of mainstems per seed sown.  Default is 1.0
            //RowSpacing  double  Optional  Spaceing (mm) between drill rows when crop is sown.  Default is 150mm
            //CropClass   string  Optional  Crop class to instantiate when crop is sown.  Default is "Plant"
        }
    }
}
```
          Operations WeedSowing
            1991-07-01  [SCRUM].Sow(population: 1, cultivar: Barley_Autumn, depth: 10, rowSpacing: 150);
          Operations FertiliserOperations
            1987-02-09  [Fertiliser].Apply(192, Fertiliser.Types.UreaN, 0);
            1987-05-20  [Fertiliser].Apply(192, Fertiliser.Types.UreaN, 0);
            1987-08-28  [Fertiliser].Apply(96, Fertiliser.Types.UreaN, 0);
            1987-12-06  [Fertiliser].Apply(256, Fertiliser.Types.UreaN, 0);
            1988-02-29  [Fertiliser].Apply(256, Fertiliser.Types.UreaN, 0);
            1988-07-18  [Fertiliser].Apply(128, Fertiliser.Types.UreaN, 0);
            1988-10-26  [Fertiliser].Apply(192, Fertiliser.Types.UreaN, 0);
            1989-06-09  [Fertiliser].Apply(128, Fertiliser.Types.UreaN, 0);
            1989-10-27  [Fertiliser].Apply(96, Fertiliser.Types.UreaN, 0);
          Report: EventNames=[Clock].DoReport
            VariableNames:
              [Clock].Today
              [Soil].SoilTemperature.AverageSoilTemp[2] as AverageSoilTemp@0003mm
              [Soil].SoilTemperature.AverageSoilTemp[5] as AverageSoilTemp@0025mm
          Manager AutoFertigate
            AutoIrrigationOn = True
            FASWThreshold = 0.95
            FASWDepth = 1000
            NConc = 3
```csharp
using Models.Interfaces;
using APSIM.Shared.Utilities;
using System.Xml.Serialization;
using Models;
using Models.PMF;
using Models.Soils;
using System.Text;
using System.Collections.Generic;
using Models.Core;
using System;
using Models.Soils.Nutrients;

namespace Models
{
    [Serializable] 
    public class Script : Model
    {
        [Link] private Plant Chickpea;
        [Link] private Zone zone;
        [Link] private Irrigation irrigation;
        [Link] private Fertiliser fertiliser;
        [Link] private Soil soil;
        [Link]
        private IPhysical soilPhysical;
        [Link]
        private ISoilWater waterBalance;
        public double FASW { get; set; }
        public double WaterDeficit  { get; set; }
    
        
        [Description("Auto irrigation on?")]
        public bool AutoIrrigationOn { get; set; }
        
        [Description("Threshold fraction available water (0-1)")]
        public double FASWThreshold { get; set; }

        [Description("Soil depth (mm) to which fraction available water is calculated")]
        public double FASWDepth { get; set; }

        [Description("N Concentration in irrigation water (ppm)")]
        public double NConc { get; set; }

        [EventSubscribe("DoManagement")]
        private void OnDoManagement(object sender, EventArgs e)
        {
            CalculateFASW();
            if (AutoIrrigationOn)
            {
                if (FASW < FASWThreshold)
                {
                    double amount = WaterDeficit * 10000.0 * NConc/1000000.0;
                    irrigation.Apply(WaterDeficit, depth: 0);
                    fertiliser.Apply(Amount: amount, Type: Fertiliser.Types.NO3N);
                }
            }
        }
        
        private void CalculateFASW()
        {
            double[] LL15 = MathUtilities.Multiply(soilPhysical.LL15, soilPhysical.Thickness);
            double[] DUL = MathUtilities.Multiply(soilPhysical.DUL, soilPhysical.Thickness);
        
            int nlayr = GetLayerIndex();
            double cumdep = MathUtilities.Sum(soilPhysical.Thickness, 0, nlayr, 0.0);

            double excess_fr = MathUtilities.Divide((cumdep - FASWDepth), soilPhysical.Thickness[nlayr], 0.0);

            // note that results may be strange if swdep < ll15
            double avail_sw = (MathUtilities.Sum(waterBalance.SWmm, 0, nlayr, 0.0)
                              - excess_fr * waterBalance.SWmm[nlayr])
                              - (MathUtilities.Sum(LL15, 0, nlayr, 0.0)
                              - excess_fr * LL15[nlayr]);


            double pot_avail_sw = (MathUtilities.Sum(DUL, 0, nlayr, 0.0)
                                  - excess_fr * DUL[nlayr])
                                  - (MathUtilities.Sum(LL15, 0, nlayr, 0.0)
                                  - excess_fr * LL15[nlayr]);

            FASW = MathUtilities.Divide(avail_sw, pot_avail_sw, 0.0);
            WaterDeficit = MathUtilities.Constrain(pot_avail_sw - avail_sw, 0.0, 100000);
        }

        private int GetLayerIndex()
        {
            double[] cumThickness = soilPhysical.ThicknessCumulative;
            for (int i = 1; i < cumThickness.Length; i++)
            {
                if (FASWDepth < cumThickness[i])
                    return i - 1;
            }
            
            return cumThickness.Length - 1;
        }

    }
}
```
          Manager Harvesting
            Crop = [Eucalyptus]
```csharp
using Models.Soils.Nutrients;
using System;
using Models.Core;
using Models.PMF;
using Models.Soils;
using Models.Soils.Nutrients;
using Models.Utilities;
using APSIM.Shared.Utilities;

namespace Models
{
    [Serializable] 
    public class Script : Model
    {
        [Description("Crop")]
        public IPlant Crop { get; set; }
        
        [EventSubscribe("DoManagement")]
        private void OnDoManagement(object sender, EventArgs e)
        {
            if (Crop.IsReadyForHarvesting)
            {
                Crop.Harvest();
                Crop.EndCrop();
            }
        }
    }
}
```
    Folder Norwin
      Simulation Norwin
        Clock: Start=2010-01-01; End=2010-12-31
        Summary SummaryFile
        Weather: FileName=WeatherFiles\Kurrowah_Norwin comp.met
        SoilArbitrator
        MicroClimate: a_interception=0; b_interception=1; c_interception=0; d_interception=0; SoilHeatFluxFraction=0.4; MinimumHeightDiffForNewLayer=0; NightInterceptionFraction=0.5; ReferenceHeight=2
        Zone Field: Area=1; Slope=0; AspectAngle=0; Altitude=50
          Report: EventNames=[Clock].DoReport
            VariableNames:
              [Clock].Today
              sum([Soil].Water.MM) as ProfileWater
              sum([Soil].Physical.DULmm) as DUL
              sum([Soil].Physical.LL15mm) as LL15
              (0.1 * [Soil].Temperature.Value[1] + 0.2 * [Soil].Temperature.Value[2] + 0.2 * [Soil].Temperature.Value[3] + 0.5 * [Soil].Temperature.Value[4]) as ST10cm
              [Soil].Temperature.Value[5] as ST20cm
              [Soil].Temperature.Value[6] as ST30cm
              [Soil].Temperature.Value[7] as ST50cm
          SurfaceOrganicMatter: InitialResidueName=wheat_stubble; InitialResidueType=wheat; InitialResidueMass=3000; InitialStandingFraction=0.8; InitialCPR=0; InitialCNR=80
          Soil: SoilType=Black Vertosol; Site=Bongeen; NearestTown=Bongeen, Q 4356; Region=Darling Downs; State=Queensland; Country=Australia; NaturalVegetation=Qld. Bluegrass, possible Qld. Blue gum; ApsoilNumber=1; Latitude=-27.629; Longitude=151.402; LocationAccuracy=+/-20m; DataSource=CSIRO Sustainable Ecosystems, Toowoomba
            Comments=Soil naming structure: \State\Region\Classification-Local Name (Site/district and locator number); oc and ph estimated
            Physical
              Thickness  ParticleSizeClay  BD    AirDry  LL15  DUL   SAT   KS
              100        70                0.99  0.1     0.26  0.55  0.61  100
              100        70                1.06  0.14    0.26  0.55  0.6   100
              100        70                1.06  0.14    0.26  0.55  0.6   100
              300        70                1.13  0.2     0.32  0.55  0.57  100
              300        70                1.11  0.2     0.33  0.5   0.55  100
            Chemical: Thickness=[150, 150, 300, 300, 300, 300, 300]; PH=[8, 8, 8, 8, 8, 8, 8]; PHUnits=Water
            Swim3: same as ValidationTests.ForestHill.ForestHillWeatherStation.Zone.Soil.Swim3
            Organic: FOMCNRatio=40; CarbonUnits=Total
              Thickness  Carbon  SoilCNRatio  FBiom  FInert  FOM
              150        1.24    12           0.04   0.4     1000
              150        1.24    12           0.02   0.6     400
              300        1.25    12           0.02   0.8     150
              300        1.1     12           0.02   1       100
              300        0.71    12           0.01   1       50
              300        0.34    12           0.01   1       50
              300        0.26    12           0.01   1       50
            Water: Thickness=[150, 150, 300, 300]; InitialValues=[0.19, 0.19, 0.26, 0.32]; InitialPAWmm=-42; RelativeTo=LL15; FilledFromTop=false
            Nutrient
            Solute NO3: InitialValuesUnits=ppm; WaterTableConcentration=0; D0=0; DepthConstant=0; MaxDepthSoluteAccessible=0; RunoffEffectivenessAtMovingSolute=0; MaxEffectiveRunoff=0
              Thickness  InitialValues  Exco  FIP
              100        2              0     1
              100        1              0     1
              100        1              0     1
              300        1              0     1
              300        1              0     1
            Solute NH4: InitialValuesUnits=ppm; WaterTableConcentration=0; D0=0; DepthConstant=0; MaxDepthSoluteAccessible=0; RunoffEffectivenessAtMovingSolute=0; MaxEffectiveRunoff=0
              Thickness  InitialValues  Exco  FIP
              100        0.658          1     1
              100        0.314          1     1
              100        0.029          1     1
              300        0.03           1     1
              300        0.2            1     1
            Solute Urea: InitialValuesUnits=kg/ha; WaterTableConcentration=0; D0=0; DepthConstant=0; MaxDepthSoluteAccessible=0; RunoffEffectivenessAtMovingSolute=0; MaxEffectiveRunoff=0
              Thickness  InitialValues  Exco  FIP
              100        0              0     1
              100        0              0     1
              100        0              0     1
              300        0              0     1
              300        0              0     1
            SoilTemperature Temperature: CONSTANT_TEMPdepth=10
            LayerStructure: Thickness=[10, 20, 20, 50, 100, 100, 300, 300]
    Folder USA
      Folder BareSoil
        Experiment ST
          Factors
            Factor Year: Specification=[Clock]
              Clock 1982: Start=1982-01-01; End=1982-12-31
              Clock 1983: Start=1983-01-01; End=1983-12-31
              Clock 1984: Start=1984-01-01; End=1984-12-31
              Clock 1985: Start=1985-01-01; End=1985-12-31
              Clock 1986: Start=1986-01-01; End=1986-12-31
              Clock 1987: Start=1987-01-01; End=1987-12-31
              Clock 1988: Start=1988-01-01; End=1988-12-31
              Clock 1989: Start=1989-01-01; End=1989-12-31
              Clock 1990: Start=1990-01-01; End=1990-12-31
          Simulation
            Clock: Start=1989-01-01; End=1989-12-31
            Summary
            Weather: FileName=AmesSoilTempAllYears.met
            SoilArbitrator
            MicroClimate: a_interception=0; b_interception=1; c_interception=0; d_interception=0; SoilHeatFluxFraction=0.4; MinimumHeightDiffForNewLayer=0; NightInterceptionFraction=0.5; ReferenceHeight=2
            Zone Field: Area=1; Slope=0; AspectAngle=0; Altitude=50
              Report BareSoilReport: EventNames=[Clock].DoReport
                VariableNames:
                  [Clock].Today as Date
                  [Soil].Temperature.Value[1] as AverageSoilTemp@0025mm
                  [Soil].Temperature.Value[2] as AverageSoilTemp@0100mm
                  [Soil].Temperature.Value[3] as AverageSoilTemp@0200mm
                  [Soil].Temperature.Value[5] as AverageSoilTemp@0400mm
                  [Soil].Temperature.Value[7] as AverageSoilTemp@0850mm
                  [Soil].SoilWater.SW as sw
                  [Weather].MeanT as Air
                  sum of (1) from [Clock].StartOfSimulation to [Clock].EndOfSimulation as simulation_days
                  [Clock].Today.DayOfYear as day
                  [SurfaceOrganicMatter].Cover as surfaceom_cover
                  [SurfaceOrganicMatter].Wt as surfaceom_wt
                  [WaterBalance].Es as es
                  [Soil].Physical.LL15 as ll15
                  [Soil].SoilWater.Drainage as drain
                  [Soil].SoilWater.Runoff as runoff
                  (9.5) as AnnualAverage
              Soil: ASCOrder=Vertosol; ASCSubOrder=Black; SoilType=Clay; Site=Norwin; NearestTown=Norwin; Region=Darling Downs and Granite Belt; State=Queensland; Country=Australia; NaturalVegetation=Qld. Bluegrass, possible Qld. Blue gum; ApsoilNumber=900; Latitude=-27.581836; Longitude=151.320206; LocationAccuracy=+/- 20m; YearOfSampling=0
                DataSource=CSIRO Sustainable Ecosystems, Toowoomba; Characteriesd as part of the GRDC funded project"Doing it better, doing it smarter, managing soil water in Australian agriculture' 2011
                Comments=Clay - OC, CLL for all crops estimated-based on Bongeen Mywybilla Soil No1
                Physical
                  Thickness  ParticleSizeClay  ParticleSizeSand  ParticleSizeSilt  BD    AirDry  LL15   DUL    SAT
                  50         18                51                31                1.52  0.091   0.181  0.239  0.314
                  100        18                51                31                1.47  0.089   0.177  0.241  0.323
                  100        22                47                31                1.39  0.192   0.192  0.266  0.35
                  50         22                47                31                1.53  0.204   0.204  0.261  0.325
                  200        21                51                28                1.48  0.15    0.15   0.262  0.334
                  200        21                51                28                1.51  0.15    0.15   0.262  0.329
                  400        17                51                32                1.5   0.127   0.127  0.247  0.322
                  100        17                51                32                1.6   0.127   0.127  0.247  0.307
                WaterBalance SoilWater: SummerDate=1-Jun; SummerU=9; SummerCona=3.8; WinterDate=1-Dec; WinterU=9; WinterCona=3.8; DiffusConst=40; DiffusSlope=16; Salb=0.16; CN2Bare=91; CNRed=20; CNCov=0.8; PSIDul=-100; Thickness=[50, 100, 100, 50, 200, 200, 400, 100]; SWCON=[0.55, 0.55, 0.55, 0.55, 0.55, 0.55, 0.55, 0.55]
                Organic: FOMCNRatio=45; CarbonUnits=Total
                  Thickness  Carbon  SoilCNRatio  FBiom  FInert  FOM
                  50         2.03    12           0.4    0.035   347.129
                  100        2.03    12           0.4    0.035   270.344
                  100        2.03    12           0.48   0.02    163.972
                  50         2.03    12           0.54   0.016   99.454
                  200        0.44    12           0.64   0.014   60.322
                  200        0.44    12           0.8    0.01    36.587
                  400        0.15    12           0.8    0.01    22.191
                  100        0.15    12           0.8    0.01    5
                Chemical: Thickness=[50, 100, 100, 50, 200, 200, 400, 100]; PH=[6.4, 6.4, 6.4, 6.4, 6.7, 6.7, 7.9, 7.9]; PHUnits=Water
                Water: Thickness=[150, 150, 300, 300, 300, 300, 300]; InitialValues=[0.24, 0.264, 0.262, 0.252, 0.247, 0.247, 0.247]; InitialPAWmm=196.25; RelativeTo=LL15; FilledFromTop=true
                Nutrient
                Solute NO3: Thickness=[50, 100, 100, 50, 200, 200, 400, 100]; InitialValues=[5, 5, 5, 5, 5, 5, 5, 5]; InitialValuesUnits=ppm; WaterTableConcentration=0; D0=0; DepthConstant=0; MaxDepthSoluteAccessible=0; RunoffEffectivenessAtMovingSolute=0; MaxEffectiveRunoff=0
                Solute NH4: Thickness=[50, 100, 100, 50, 200, 200, 400, 100]; InitialValues=[2.5, 2.5, 2.5, 2.5, 2.5, 2.5, 2.5, 2.5]; InitialValuesUnits=ppm; WaterTableConcentration=0; D0=0; DepthConstant=0; MaxDepthSoluteAccessible=0; RunoffEffectivenessAtMovingSolute=0; MaxEffectiveRunoff=0
                Solute Urea: Thickness=[50, 100, 100, 50, 200, 200, 400, 100]; InitialValues=[0, 0, 0, 0, 0, 0, 0, 0]; InitialValuesUnits=kg/ha; WaterTableConcentration=0; D0=0; DepthConstant=0; MaxDepthSoluteAccessible=0; RunoffEffectivenessAtMovingSolute=0; MaxEffectiveRunoff=0
                SoilTemperature Temperature: CONSTANT_TEMPdepth=10
              SurfaceOrganicMatter: InitialResidueName=wheat_stubble; InitialResidueType=wheat; InitialResidueMass=500; InitialStandingFraction=0; InitialCPR=0; InitialCNR=100
      Folder CornSoy
        Simulation COBSSystemCS
          Weather: FileName=COBS.met
          Clock: Start=2008-01-01; End=2013-12-31
          Summary
          SoilArbitrator
          MicroClimate: a_interception=0; b_interception=1; c_interception=0; d_interception=0; SoilHeatFluxFraction=0.4; MinimumHeightDiffForNewLayer=0; NightInterceptionFraction=0.5; ReferenceHeight=2
          Zone Paddock: Area=1; Slope=0; AspectAngle=0; Altitude=50
            SurfaceOrganicMatter: InitialResidueName=maize; InitialResidueType=soybean; InitialResidueMass=5000; InitialStandingFraction=0; InitialCPR=0; InitialCNR=40
            Fertiliser
            Plant Maize
            Plant Soybean
            Report CSReport: EventNames=[Clock].DoReport
              VariableNames:
                [Clock].Today
                sum([Soil].Swim.SW[1:2]) * 0.5 as sw_5
                [Soil].Swim.SW[3] as sw_10
                [Soil].Swim.SW[4] as sw_15
                [Soil].Swim.SW[6] as sw_35
                [Soil].Swim.SW[7] as sw_75
                sum([Soil].Temperature.Value[1:2]) * 0.5 as AverageSoilTemp@0038mm
                [Soil].Temperature.Value[3] as AverageSoilTemp@0100mm
                [Soil].Temperature.Value[4] as AverageSoilTemp@0170mm
                [Soil].Temperature.Value[6] as AverageSoilTemp@0350mm
                [Soil].Temperature.Value[7] as AverageSoilTemp@0500mm
                [Maize].Grain.Wt * 10 + [Soybean].Grain.Wt * 10 as CropYield
                [Maize].AboveGround.Wt * 10 + [Soybean].AboveGround.Wt * 10 as CropBiomass
                [SurfaceOrganicMatter].Wt
            Soil: NearestTown=Ames; State=Iowa; Country=US; ApsoilNumber=34; Latitude=0; Longitude=0; DataSource=web soil survey data revised by Ranae
              Physical
                Thickness  ParticleSizeClay  ParticleSizeSand  ParticleSizeSilt  BD     AirDry  LL15   DUL    SAT    KS
                37         25.67             38.29             36.04             1.21   0.12    0.14   0.263  0.387  500
                38         25.67             38.29             36.04             1.21   0.14    0.161  0.296  0.42   500
                50         26.43             37.95             35.65             1.39   0.11    0.11   0.256  0.42   500
                90         28.09             36.57             35.65             1.478  0.11    0.11   0.254  0.42   500
                85         28.5              36.23             35.65             1.5    0.12    0.12   0.293  0.434  500
                100        29                34                37                1.5    0.125   0.125  0.262  0.434  500
                200        29                34                37                1.5    0.132   0.132  0.262  0.41   500
                300        27                37                36                1.551  0.1     0.1    0.296  0.394  250
                300        27                37                36                1.551  0.11    0.11   0.296  0.394  250
                320        27                37                36                1.551  0.138   0.138  0.296  0.394  25
                300        27                37                36                1.551  0.165   0.165  0.296  0.394  2
                SoilCrop MaizeSoil
                  LL=[0.14, 0.161, 0.11, 0.11, 0.12, 0.125, 0.132, 0.1, 0.11, 0.138, 0.165]
                  KL=[0.08, 0.08, 0.08, 0.08, 0.08, 0.08, 0.08, 0.07, 0.06, 0.05, 0.05]
                  XF=[1, 1, 1, 1, 1, 1, 1, 1, 1, 1, 1]
                SoilCrop SoybeanSoil
                  LL=[0.14, 0.161, 0.11, 0.11, 0.12, 0.125, 0.132, 0.1, 0.11, 0.138, 0.165]
                  KL=[0.08, 0.08, 0.08, 0.08, 0.08, 0.08, 0.08, 0.07, 0.06, 0.05, 0.05]
                  XF=[1, 1, 1, 1, 1, 1, 1, 1, 1, 1, 1]
              Organic: FOMCNRatio=40; CarbonUnits=Total
                Thickness  Carbon  SoilCNRatio  FBiom  FInert  FOM
                37         2.835   11           0.035  0.34    176.333
                38         2.835   11           0.035  0.34    165.627
                50         2.625   11           0.019  0.383   152.524
                90         2.478   11           0.014  0.425   131.495
                85         2.216   11           0.013  0.468   114.304
                100        1.365   11           0.01   0.51    96.933
                200        1.365   11           0.01   0.637   69.711
                300        1.176   11           0.01   0.68    42.515
                300        0.493   11           0.01   0.711   25.928
                320        0.158   11           0.01   0.727   15.3
                300        0.105   11           0.01   0.74    9.331
              Chemical: Thickness=[37, 38, 50, 90, 85, 100, 200, 300, 300, 320, 300]; PHUnits=Water
                PH=[6.318, 6.318, 5.902, 5.948, 5.959, 6.7, 6.7, 7.9, 7.9, 7.9, 7.9]
              Water: Thickness=[37, 38, 50, 90, 85, 100, 200, 300, 300, 320, 300]; InitialPAWmm=216.692; RelativeTo=LL15; FilledFromTop=false
                InitialValues=[0.232, 0.262, 0.22, 0.218, 0.25, 0.228, 0.23, 0.247, 0.249, 0.257, 0.263]
              Swim3 Swim: Salb=0.13; CN2Bare=65; CNRed=20; CNCov=0.8; KDul=0.3; PSIDul=-100; VC=true; DTMin=0; DTMax=1440; MaxWaterIncrement=10; SpaceWeightingFactor=0; SoluteSpaceWeightingFactor=0; Dis=0; Disp=0; A=0; DTHC=0; DTHP=0; Diagnostics=false
                SwimSubsurfaceDrain: DrainDepth=1070; DrainSpacing=13500; DrainRadius=52; Klat=2800; ImpermDepth=3900
              Solute NO3: InitialValuesUnits=ppm; WaterTableConcentration=0; D0=0; DepthConstant=0; MaxDepthSoluteAccessible=0; RunoffEffectivenessAtMovingSolute=0; MaxEffectiveRunoff=0
                Thickness  InitialValues  Exco  FIP
                37         8.249          0     1
                38         14.22          0     1
                50         8.741          0     1
                90         3.759          0     1
                85         0              0     1
                100        0              0     1
                200        0              0     1
                300        0              0     1
                300        0              0     1
                320        0              0     1
                300        0              0     1
              Solute NH4: InitialValuesUnits=ppm; WaterTableConcentration=0; D0=0; DepthConstant=0; MaxDepthSoluteAccessible=0; RunoffEffectivenessAtMovingSolute=0; MaxEffectiveRunoff=0
                Thickness  InitialValues  Exco  FIP
                37         4.467          100   1
                38         19.574         100   1
                50         10.072         100   1
                90         3.759          100   1
                85         0              100   1
                100        0              100   1
                200        0              100   1
                300        0              100   1
                300        0              100   1
                320        0              100   1
                300        0              100   1
              Solute Urea: InitialValuesUnits=kg/ha; WaterTableConcentration=0; D0=0; DepthConstant=0; MaxDepthSoluteAccessible=0; RunoffEffectivenessAtMovingSolute=0; MaxEffectiveRunoff=0
                Thickness  InitialValues  Exco  FIP
                37         0              0     1
                38         0              0     1
                50         0              0     1
                90         0              0     1
                85         0              0     1
                100        0              0     1
                200        0              0     1
                300        0              0     1
                300        0              0     1
                320        0              0     1
                300        0              0     1
              Nutrient
              SoilTemperature Temperature: CONSTANT_TEMPdepth=10
            Operations
              2008-05-15  [Maize].Sow(population: 7.9, cultivar: B_110, depth: 50, rowSpacing: 750)
              2008-05-15  [Fertiliser].Apply(65, Fertiliser.Types.UreaN, 10);
              2008-06-24  [Fertiliser].Apply(90, Fertiliser.Types.UreaN, 10);
              2009-05-08  [Soybean].Sow(population: 40, cultivar: Generic_MG2, depth: 50, rowSpacing: 750)
              2010-05-06  [Maize].Sow(population: 7.9, cultivar: B_110, depth: 50, rowSpacing: 750)
              2010-05-06  [Fertiliser].Apply(78, Fertiliser.Types.UreaN, 10);
              2010-06-17  [Fertiliser].Apply(16, Fertiliser.Types.UreaN, 10);
              2011-05-11  [Soybean].Sow(population: 40, cultivar: Generic_MG2, depth: 50, rowSpacing: 750)
              2012-05-11  [Maize].Sow(population: 7.9, cultivar: B_110, depth: 50, rowSpacing: 750)
              2012-05-11  [Fertiliser].Apply(65, Fertiliser.Types.UreaN, 10);
              2012-06-12  [Fertiliser].Apply(120, Fertiliser.Types.UreaN, 10);
              2013-05-17  [Soybean].Sow(population: 40, cultivar: Generic_MG2, depth: 50, rowSpacing: 750)
            Manager HarvestMaize
              Crop = [Maize]
```csharp
using APSIM.Shared.Utilities;
using Models.Utilities;
using Models.Soils;
using Models.PMF;
using Models.Core;
using System;
using System.Linq;

namespace Models
{
    [Serializable] 
    public class Script : Model
    {
        [Description("Crop")]
        public IPlant Crop { get; set; }
        
        [EventSubscribe("DoManagement")]
        private void OnDoManagement(object sender, EventArgs e)
        {
            if (Crop.IsReadyForHarvesting)
            {
                Crop.Harvest();
                Crop.EndCrop();
            }
        }
    }
}
```
            Manager HarvestSoy
              Crop = [Soybean]
              script: same as in ValidationTests.USA.CornSoy.COBSSystemCS.Paddock.HarvestMaize
      Folder BareSoil1
        Experiment ST1
          Factors
            Factor Year: Specification=[Clock]
              Clock 1982: Start=1982-01-01; End=1990-12-31
          Simulation Simulation1: same as ValidationTests.USA.BareSoil.ST.Simulation
    Folder NewZealand
      Memo Introduction
        # Simulating crop rotation under controlled  conditions

        *Rob Zyskowski, Edmar I. Teixeira, Hamish Brown, Edith Khaembah, Rogerio Cichota*
        *The New Zealand Institute for Plant & Food Research Limited, Private Bag 4704, Christchurch, New Zealand*

        ## Introduction

        This is a simulation of a crop rotation consisting of a forage species, fodder beet (*Beta vulgaris* L.), grown over spring/summer and harvested in autumn, followed by a catch crop, oats (*Avena sativa* L.). The actual experiment was divided in two phases and was established at the rain shelter facility of Plant and Food Research, Lincoln, NZ.  The experiment was designed to help develop the models for the respective plants and here they are used to further demonstrate that ApsimX can simulate water and nitrogen cycling in the field and then to examine whether catch crops are a good option for mitigating N leaching from forages.

         **Phase 1**: Co-limitation of water and nitrogen on fodder beet physiology
         - Irrigation: 2 treatments, nil or full irrigation (to match PET)
         - Nitrogen: 3 treatments, 0 kg N/ha, 50 kg N/ha & 300 kg N/ha applied as dissolved urea with fertigator
          - 25 or 100 kg N/ha applied after emergence
          - 25 or 100 kg N/ha applied when canopy nearly reached full cover
          - 100 kg N/ha applied a month after full cover

         **Phase 2**: Ability of oats to act as catch-crops for N over winter/spring
         - Irrigation: 2 treatments, low (enough to keep plants growing) or full irrigation (to match PET)
         - Nitrogen: 3 treatments, 80 kg N/ha, 125 kg N/ha & 320 kg N/ha at sowing (residual plus urea applied at sowing)

        ### Acknowledgments
        This work was a collaborative effort funded by the Sustainable Agro-Ecosystems (SAE) and the Forages for Reduced Nitrogen Leaching (FRNL) programmes.  The experiment was setup and conducted by several people, including Brendon Malcolm, Emmanuel Chakwizira, Shane Maley, Mike George, Steve Dilon and Alexandre Michel, to whom we would like to express our gratitude.
      Experiment LincolnRainshelter
        DisabledSimNames=[LincolnRainshelterNit300IrrNil, LincolnRainshelterNit0IrrFull]
        Memo Experiment Description
          ## Management
          Pre-experiment actions:
            23/08/2016 - Oats harvested
            02/09/2016 - Site irrigated with 25mm
            05/09/2016 - Site ploughed
            06/09/2016 - Site cambridge rolled
            17/10/2016 - Site power harrowed
            17/10/2016 - Rainshelter was rolled in
            18/10/2016 - Fertiliser application (200kg/ha of KCl, 250kg/ha of Triple Super, 200kg/ha of NaCl and 30kg/ha of Boronate 15%)
            18/10/2016 - Site cambridge rolled and harrowed

          Experiment:
           1) Fodder beet:
               - Cultivar: Rivage
               - Sowing density: 11 plants/m2
                    row spacing: 45 cm
                          depth: 15 mm

              General actions:
                  18/10/2016 - Sowing
                  25/10/2016 - Irrigation of 5mm to all plots
                  27/10/2016 - Plants started to emerge
                  28/10/2016 - Irrigation of 5mm to all plots
                  28/10/2016 - First fertiliser application, 25kgN/ha of urea_N to the 50kg/ha plots and 100kgN/ha o the 300kg/ha plots
                  23/11/2016 - Irrigation treatments started
                  18/01/2017 - Second fertiliser application, 25Nkg/ha of liquid urea_N to the 50kg/ha plots and 100kgN/ha to the 300kg/ha plots
                  15/02/2017 - Final fertiliser application, 100Nkg/ha of liquid urea_N to the 300kg/ha plots
                  17/05/2017 - Plots harvested

           Intercrop actions:
                  19/05/2017 - All crop residues removed
                  25/05/2017 - Dryland plots irrigated with 100mm, over two days
                  29/05/2017 - Dryland 300N plot irrigated with 64.0mm
                  30/05/2017 - Dryland 0N and 50N plots irrigated with 30.3 and 51.0mm
                  22/06/2017 - Site topped with maxitell
                  30/06/2017 - Site cambridge rolled
                  30/06/2017 - Rainshelter was rolled off (but it was put on in a few occasions)

           2) Oats:
               - Cultivar: Milton
               - Sowing density: 300 plants/m2
                    row spacing: 15 cm
                          depth: 45 mm

              General actions:
                  05/07/2017 - Sowing
                  05/07/2017 - Fertiliser application (400kg/ha Potash, Urea: treat4=40kgN/ha, treat5=85kgN/ha, treat6=270kgN/ha)
                  24/07/2017 - Plants started to emerge
                  11/09/2017 - Irrigation started in treatements 4, 5, and 6
                  06/11/2017 - Irrigation extended to all plots
                  04-09/01/2018 - Plots harvested
        Factors
          Permutation
            Factor Nit
              CompositeFactor 0
                Specifications:
                  [FertiliserSchedule]
                  [AdditionalActions].Script.NitFactor = 0
                  [CropOperations].Script.FertFactor = 0
                Operations 0
              CompositeFactor 300
                Specifications:
                  [FertiliserSchedule]
                  [AdditionalActions].Script.NitFactor = 300
                  [CropOperations].Script.FertFactor = 300
                Operations 300
                  2016-10-28  [Fertiliser].Apply(100, Fertiliser.Types.UreaN, 10);
                  2017-01-18  [Fertiliser].Apply(100, Fertiliser.Types.UreaN, 10);
                  2017-02-15  [Fertiliser].Apply(100, Fertiliser.Types.UreaN, 10);
            Factor Irr
              CompositeFactor Full
                Specifications:
                  [IrrigationSchedule]
                  [AdditionalActions].Script.IrrFactor = true
                  [CropOperations].Script.IrrgFactor = true
                Operations Full
                  2016-11-23  [Irrigation].Apply(30.0)
                  2016-11-30  [Irrigation].Apply(25.0)
                  2016-12-07  [Irrigation].Apply(25.0)
                  2016-12-21  [Irrigation].Apply(25.2)
                  2016-12-29  [Irrigation].Apply(30.0)
                  2017-01-04  [Irrigation].Apply(40.0)
                  2017-01-11  [Irrigation].Apply(32.9)
                  2017-01-18  [Irrigation].Apply(25.4)
                  2017-01-25  [Irrigation].Apply(31.3)
                  2017-02-08  [Irrigation].Apply(33.0)
                  2017-02-15  [Irrigation].Apply(35.0)
                  2017-02-22  [Irrigation].Apply(29.0)
                  2017-03-08  [Irrigation].Apply(34.0)
                  2017-03-22  [Irrigation].Apply(50.1)
                  2017-04-12  [Irrigation].Apply(30.9)
                  2017-04-27  [Irrigation].Apply(18.9)
                  2017-09-11  [Irrigation].Apply(20.9)
                  2017-09-12  [Irrigation].Apply(21.1)
                  2017-09-13  [Irrigation].Apply(21.4)
                  2017-10-10  [Irrigation].Apply(22.2)
                  2017-10-11  [Irrigation].Apply(22.5)
                  2017-10-12  [Irrigation].Apply(22.5)
                  Memo
                    Have added an extra irrigation, on 22 Oct,

                    Data indcates water applied but no notes of it RFZ

                    In Statefactors have donethe irrigations for
                      17/12  21/1 19/11 14/1
              CompositeFactor Nil
                Specifications:
                  [IrrigationSchedule]
                  [AdditionalActions].Script.IrrFactor = false
                  [CropOperations].Script.IrrgFactor = false
                Operations Nil
                  Memo
                    Have added an extra irrigation, on 3 Nov,

                    Data indcates water applied but no notes of it RFZ
        Simulation Rainshelter
          Clock: Start=2016-09-28; End=2018-01-27
          Summary summaryfile
          Weather
            FileName=%root%\Tests\Validation\System\LincolnRotation2017\lincoln.met
          MicroClimate: a_interception=0; b_interception=1; c_interception=0; d_interception=0; SoilHeatFluxFraction=0.4; MinimumHeightDiffForNewLayer=0; NightInterceptionFraction=0.5; ReferenceHeight=2
          SoilArbitrator Soil Arbitrator
          Zone paddock: Area=1; Slope=0; AspectAngle=0; Altitude=50
            Folder Manager folder
              Operations GeneralIrrigation
                2016-09-02  [Irrigation].Apply(25.0)
                2016-10-25  [Irrigation].Apply(5.0)
                2016-10-28  [Irrigation].Apply(5.0)
                2016-11-17  [Irrigation].Apply(2.0)
                2017-01-18  [Irrigation].Apply(10.0)
                2017-02-15  [Irrigation].Apply(10.0)
                2017-11-06  [Irrigation].Apply(45.0)
                2017-11-15  [Irrigation].Apply(30.0)
                2017-11-22  [Irrigation].Apply(29.7)
                2017-11-29  [Irrigation].Apply(35.0)
                2017-12-06  [Irrigation].Apply(46.7)
              Operations IrrigationSchedule
              Operations FertiliserSchedule
              Manager CropOperations
                FodderBeetPlantingDate = 10/18/2016 00:00:00
                FodderBeetHarvestingDate = 05/30/2017 00:00:00
                OatsPlantingDate = 07/05/2017 00:00:00
                OatsHarvestingDate1 = 01/05/2018 00:00:00
                OatsHarvestingDate2 = 01/10/2018 00:00:00
```csharp
using Models.Soils;
using System.Xml.Serialization;
using APSIM.Shared.Utilities;
using Models.PMF;
using Models.PMF.Interfaces;
using Models.Core;
using System;
using Newtonsoft.Json;
        
namespace Models
{
    [Serializable] 
    [System.Xml.Serialization.XmlInclude(typeof(Model))]
    public class Script : Model
    {
        [Link(ByName = true)] Plant FodderBeet;
        [Link(ByName = true)] Plant Oats;
        [Link] Clock Clock;

        [Description("FodderBeet planting date: ")]
        public DateTime FodderBeetPlantingDate { get; set; }
        [Description("FodderBeet harvesting date: ")]
        public DateTime FodderBeetHarvestingDate { get; set; }
        [Description("Oats planting date: ")]
        public DateTime OatsPlantingDate { get; set; }
        [Description("Oats harvesting date 1: ")]
        public DateTime OatsHarvestingDate1 { get; set; }
        [Description("Oats harvesting date 2: ")]
        public DateTime OatsHarvestingDate2 { get; set; }
        
        [JsonIgnore] public string CropSown { get; set; }
        [JsonIgnore] public string CropAction { get; set; }

        [JsonIgnore] public bool IrrgFactor { get; set; }
        [JsonIgnore] public double FertFactor { get; set; }


        
        [EventSubscribe("StartOfSimulation")]
        private void OnSimulationCommencing(object sender, EventArgs e)
        {
            CropSown = "Fallow";
            CropAction = "-";
        }
        
        [EventSubscribe("DoManagement")]
        private void OnDoManagement(object sender, EventArgs e)
        {
            CropAction = "-";

            if (Clock.Today.Date == FodderBeetPlantingDate)
            {
                FodderBeet.Sow(population: 9, cultivar: "Rivage", depth: 5, rowSpacing: 500);
                CropSown = "FodderBeet";
                CropAction = "Sowing";
            }
            
            if (Clock.Today.Date == OatsPlantingDate)
            {
                Oats.Sow(population: 400, cultivar: "Milton", depth: 45, rowSpacing: 45);
                CropSown = "Oats";
                CropAction = "Sowing";
            }
            
            
            if (Clock.Today.Date == FodderBeetHarvestingDate)
            {
                HarvestFodderBeet();
                //FodderBeet.EndCrop();
                //CropSown = "Fallow";
                CropAction = "Harvesting";
            }
            if (Clock.Today.Date == FodderBeetHarvestingDate.AddDays(1))
            {
                //FodderBeet.Harvest(removalFractions);
                FodderBeet.EndCrop();
                CropSown = "Fallow";
            }

            if (Clock.Today.Date == OatsHarvestingDate1)
            {
               if((FertFactor == 0) || ((IrrgFactor == false) && (FertFactor == 50)))
               {
                   HarvestOats();
                   CropAction = "Harvesting";
               }
            }

            if (Clock.Today.Date == OatsHarvestingDate2)
            {
               if((FertFactor == 300) || ((IrrgFactor == true) && (FertFactor == 50)))
               {
                   HarvestOats();
                   CropAction = "Harvesting";
               }
            }

            if (Clock.Today.Date == OatsHarvestingDate1.AddDays(1))
            {
               if((FertFactor == 0) || ((IrrgFactor == false) && (FertFactor == 50)))
               {
                   Oats.EndCrop();
                   CropSown = "Fallow";
               }
            }

            if (Clock.Today.Date == OatsHarvestingDate2.AddDays(1))
            {
               if((FertFactor == 300) || ((IrrgFactor == true) && (FertFactor == 50)))
               {
                   Oats.EndCrop();
                   CropSown = "Fallow";
               }
            }
        }
        
        private void HarvestFodderBeet()
        {
            var Leaf = FodderBeet.FindChild<IHasDamageableBiomass>("Leaf");
            var Petiole = FodderBeet.FindChild<IHasDamageableBiomass>("Petiole");
            var StorageRoot = FodderBeet.FindChild<IHasDamageableBiomass>("StorageRoot");
            
            Leaf.RemoveBiomass(liveToRemove: 0.95, liveToResidue: 0.05, deadToRemove: 0.8, deadToResidue: 0.2);
            Petiole.RemoveBiomass(liveToRemove: 1.0, liveToResidue: 0.0, deadToRemove: 0.9, deadToResidue: 0.1);
            StorageRoot.RemoveBiomass(liveToRemove: 1.0, liveToResidue: 0.0, deadToRemove: 1.0, deadToResidue: 0.0);
             FodderBeet.Harvest(removeBiomassFromOrgans: false);
        }
        
        private void HarvestOats()
        {
            var Stem = Oats.FindChild<IHasDamageableBiomass>("Stem");
            var Panicle = Oats.FindChild<IHasDamageableBiomass>("Panicle");
            var Grain = Oats.FindChild<IHasDamageableBiomass>("Grain");
            
            Stem.RemoveBiomass(liveToRemove: 0.9, liveToResidue: 0.1, deadToRemove: 0.8, deadToResidue: 0.2);
            Panicle.RemoveBiomass(liveToRemove: 0.9, liveToResidue: 0.1, deadToRemove: 0.8, deadToResidue: 0.2);
            Grain.RemoveBiomass(liveToRemove: 1.0, liveToResidue: 0.0, deadToRemove: 1.0, deadToResidue: 0.0);
             Oats.Harvest(removeBiomassFromOrgans: false);
        }  
    }
}
```
              Manager ClimateControl
                StartDate = 10/17/2016 00:00:00
                EndDate = 06/30/2017 00:00:00
                OtherDateString = 27/07/2017 28/07/2017 29/07/2017 30/07/2017 31/07/2017 08/08/2017 09/08/2017 10/08/2017 11/08/2017 12/08/2017 13/08/2017 14/08/2017 15/08/2017 16/08/2017 17/08/2017 18/08/2017 28/08/2017 29/08/2017 30/08/2017 31/08/2017
```csharp
using Models.Soils;
using Models.Climate;
using System;
using Models.Core;
using APSIM.Shared.Utilities;
using System.Collections.Generic;
using System.Text;
using Models.PMF;
using Models;
using System.Xml.Serialization;
using System.Globalization;
using Newtonsoft.Json;

// This script simulates a rainshelter, it controls the amount of rainfall (=0.0) and radiation (=95% of weather)
// It does that for a period between two dates, as well as at sporadic dates

namespace Models
{
    [Serializable] 
    public class Script : Model
    {
        [Link] Weather Met;
        [Link] Clock Clock;
    
        [Description("Start date: ")]
        public DateTime StartDate { get; set; }
        [Description("End date: ")]
        public DateTime EndDate { get; set; }
         [Description("Other dates: ")]
         public string OtherDateString  { get; set; }
         private const string dateFormat = "dd/MM/yyyy";
         [NonSerialized]
         private CultureInfo provider = CultureInfo.InvariantCulture;

         [JsonIgnore] public string RainshelterCover  { get; set; }

         private DateTime[] OtherDates;
         private double todaysRain;

        [EventSubscribe("StartOfSimulation")]
        private void OnSimulationCommencing(object sender, EventArgs e)
        {
            provider = CultureInfo.InvariantCulture;
            //gather the dates the variables will be controlled
            string[] auxDates = OtherDateString.Split(new Char []{' ',','});
            OtherDates = new DateTime[auxDates.Length];
            for (int i = 0; i < auxDates.Length; i++)
                OtherDates[i] = DateTime.ParseExact(auxDates[i], dateFormat, provider);

            RainshelterCover = "Off";
        }

        [EventSubscribe("PreparingNewWeatherData")]
        private void OnPreparingNewWeatherData(object sender, EventArgs e)
        {
            RainshelterCover = "Off";

            if ((Clock.Today.Date >= StartDate.Date) && (Clock.Today.Date <= EndDate.Date))
            {
                todaysRain = Met.Rain;
                changeMetData();
            }
            else
            {
                for (int i = 0; i < OtherDates.Length; i++)
                    if (Clock.Today.Date == OtherDates[0].Date)
                        changeMetData();
            }

            // rain shelter partial day cover
            if (Clock.Today.Date == DateTime.ParseExact("01/09/2017", dateFormat, provider).Date)
                Met.Rain -= 2.0;
            if (Clock.Today.Date == DateTime.ParseExact("08/11/2017", dateFormat, provider).Date)
                Met.Rain -= 0.3;

            // rain shelter cover removed for weekend
            if ((Clock.Today.Date == DateTime.ParseExact("03/06/2017", dateFormat, provider).Date)||(Clock.Today.Date == DateTime.ParseExact("04/06/2017", dateFormat, provider).Date))
            {
                Met.Rain = todaysRain;
                //Met.Radn /= 0.95;
                RainshelterCover = "Off";
            }
        }

        private void changeMetData()
        {
            Met.Rain *= 0.0;
            //Met.Radn *= 0.95;
            RainshelterCover = "On";
        }
    }
}
```
              Manager AdditionalActions
                NitFactor = 0
                IrrFactor = False
```csharp
using APSIM.Shared.Utilities;
using System.Xml.Serialization;
using Models;
using Models.PMF;
using Models.Soils;
using System.Text;
using System.Collections.Generic;
using Models.Core;
using System;

// This script performs management actions that are not common to all treatments

namespace Models
{
    [Serializable] 
    public class Script : Model
    {
        [Link] Clock Clock;
        [Link] Irrigation Irrigation;
        [Link] Fertiliser Fert;
        [Link] Soil ThisSoil;

        [Description("Allow irrigation to be applied?")]
        public bool IrrFactor { get; set; }
        [Description("Amount of fertiliser to be applied (kg/ha)")]
        public double NitFactor { get; set; }

        [EventSubscribe("StartOfSimulation")]
        private void OnSimulationCommencing(object sender, EventArgs e)
        {
            //    SetSoilLayers();
        }
        
        [EventSubscribe("DoManagement")]
        private void OnDoManagement(object sender, EventArgs e)
        {
            // Fodderbeet - irrigation on high fert plots only
            if ((IrrFactor == true) && (NitFactor == 300))
            {
                if (Clock.Today.Date == DateTime.Parse("01-Feb-2017"))
                    Irrigation.Apply(40.0);
                if (Clock.Today.Date == DateTime.Parse("01-Mar-2017"))
                    Irrigation.Apply(32.6);
            }
        
            // Oats - Irrigation on dryland plots only, after harvest
            if (IrrFactor == false)
            {
                if ((Clock.Today.Date == DateTime.Parse("25-May-2017")) || (Clock.Today.Date == DateTime.Parse("26-May-2017")))
                    Irrigation.Apply(50.0);

                if (Clock.Today.Date == DateTime.Parse("29-May-2017"))
                if (NitFactor == 300)
                    Irrigation.Apply(64.0);

                if (Clock.Today.Date == DateTime.Parse("30-May-2017"))
                {
                    if (NitFactor == 0)
                        Irrigation.Apply(30.3);
                    if (NitFactor == 50)
                        Irrigation.Apply(51.0);
                }
            }

            // Oats - Irrigation on all 300N plots plus dryland 50N plots
            if (Clock.Today.Date == DateTime.Parse("13-Dec-2017"))
            {
                if (NitFactor == 300)
                    Irrigation.Apply(50.0);
                if ((NitFactor == 50) && (IrrFactor == false))
                    Irrigation.Apply(50.0);
            }

            // Oats - Fertiliser for irrigated plots only, on sowing
            if (Clock.Today.Date == DateTime.Parse("05-Jul-2017"))
            if (IrrFactor == true)
            {
                if (NitFactor == 0)
                    Fert.Apply(40, Models.Fertiliser.Types.UreaN, 10);
                if (NitFactor == 50)
                    Fert.Apply(85, Models.Fertiliser.Types.UreaN, 10);
                if (NitFactor == 300)
                    Fert.Apply(270, Models.Fertiliser.Types.UreaN, 10);
            }
        }
    }
}
```
            Irrigation
            Plant Oats
            Plant FodderBeet
            Fertiliser
            SurfaceOrganicMatter Surface Organic Matter: InitialResidueName=oat_stubble; InitialResidueType=oats; InitialResidueMass=1500; InitialStandingFraction=0.5; InitialCPR=0; InitialCNR=20
            Soil: SoilType=Silt loam over sand; LocalName=Templeton; Site=RainShelter; NearestTown=Lincoln; Region=Plains; State=Canterbury; Country=New Zealand; Latitude=37.15; Longitude=172.28; Comments=TEMPLETON-RS
              Memo Info
                # Soil Profile Description

                Templeton Silt Loam over sand, Typic Immature Pallic soil

                 Horizon  Depth (cm) Description
                 Ah         0-28     Very dark grayish brown (10YR 3/2); silt loam; no stones; moderately developed fine to medium blocky structure
                 Bw(f)     28-55     Dark yellowish brown (10YR 4/4); silt loam; no stones; weakly developed coarse to very coarse blocky structure
                 Bw(g)     55-95     Olive brown (2.5Y 4/4); fine sandy loam; no stones; apedal massive
                 2BC(g)    95-145    Olive brown (2.5Y 4/4); loamy sand;no stones; apedal single-grain
                 3BCg     145-153    Light yellowish brown (2.5Y 6/3); silt loam; no stones; apedal massive
                 4BCg     153-200+   Light yellowish brown (2.5Y 6/3); medium sand; no stones; apedal single-grain
                 ** 2BC(g) horizon contains a band of massive silt loam material between 115-130 cm

                Sampling layers:
                Layer  Depth (cm)
                 1	  0-15
                 2	 15-30
                 3	 30-60
                 4	 60-90
                 5	 90-120
                 6	120-150
                 7	150-180 -- Only for water

                Soil parameterisation was based on the two description of the soil at the Rainshelter, with most data being a combination of "templeton-2" description (SWAMP survey) and the vbalues estimated based on the monitoring of the site.
              Chemical: Thickness=[150, 150, 300, 350, 200, 150, 150, 100, 200, 250]; PH=[6.1, 6.1, 6, 6, 6, 6, 6, 6, 6, 6]; PHUnits=Water
              SoilTemperature: CONSTANT_TEMPdepth=10
              Physical
                Thickness  ParticleSizeClay  ParticleSizeSand  ParticleSizeSilt  BD     AirDry  LL15   DUL    SAT    KS
                150        24                15.9              60.1              1.116  0.063   0.126  0.359  0.534  3472.3
                150        23.2              14.3              62.5              1.177  0.124   0.127  0.352  0.521  1374.7
                300        17.9              16.1              66                1.272  0.117   0.117  0.346  0.494  539.5
                350        13.3              45.5              41.2              1.337  0.12    0.12   0.344  0.47   3985.6
                200        12                42                46                1.404  0.143   0.143  0.358  0.446  2582.8
                150        16.7              11.4              71.9              1.47   0.147   0.147  0.366  0.424  111
                150        12.7              27.4              59.9              1.434  0.13    0.13   0.3    0.436  516.8
                100        12.8              35.1              52                1.459  0.118   0.118  0.276  0.429  1457.9
                200        11.5              40.7              50.9              1.453  0.099   0.099  0.24   0.433  4616.8
                250        11.8              37.9              50.3              1.482  0.089   0.089  0.227  0.428  4841.5
                SoilCrop FodderBeetSoil
                  LL=[0.126, 0.127, 0.117, 0.12, 0.143, 0.147, 0.13, 0.118, 0.099, 0.089]
                  KL=[0.093, 0.066, 0.059, 0.047, 0.028, 0.014, 0.008, 0.007, 0.003, 0]
                  XF=[1, 1, 1, 1, 1, 1, 1, 1, 1, 1]
                SoilCrop OatsSoil
                  LL=[0.126, 0.127, 0.117, 0.12, 0.143, 0.147, 0.13, 0.118, 0.099, 0.089]
                  KL=[0.083, 0.066, 0.053, 0.043, 0.022, 0.007, 0.008, 0.005, 0.004, 0.002]
                  XF=[1, 1, 1, 1, 1, 1, 1, 1, 1, 1]
              WaterBalance SoilWater: SummerDate=1-Oct; SummerU=9; SummerCona=4; WinterDate=1-Apr; WinterU=6; WinterCona=3; DiffusConst=88; DiffusSlope=35; Salb=0.15; CN2Bare=60; CNRed=10; CNCov=0.8; DischargeWidth=0; CatchmentArea=0; PSIDul=-100
                Thickness  SWCON  KLAT
                150        0.553  0
                150        0.521  0
                300        0.456  0
                350        0.511  0
                200        0.524  0
                150        0.451  0
                150        0.494  0
                100        0.546  0
                200        0.538  0
                250        0.532  0
              Nutrient
              Organic: FOMCNRatio=30; CarbonUnits=Total
                Thickness  Carbon  SoilCNRatio  FBiom  FInert  FOM
                150        2.55    11           0.08   0.2     291.718
                150        2.09    11           0.04   0.325   232.942
                300        0.52    11           0.018  0.6     148.53
                350        0.23    11           0.01   0.85    87.864
                200        0.18    11           0.008  0.95    65.091
                150        0.15    11           0.008  0.98    51.976
                150        0.15    11           0.008  0.99    41.504
                100        0.12    11           0.008  0.992   35.723
                200        0.11    11           0.005  0.995   26.464
                250        0.1     11           0.005  0.995   18.188
              Water: Thickness=[150, 150, 300, 300, 300, 300, 300, 200]; InitialValues=[0.3, 0.28, 0.27, 0.3, 0.28, 0.26, 0.22, 0.22]; InitialPAWmm=290.95; RelativeTo=LL15; FilledFromTop=false
              LayerStructure: Thickness=[150, 150, 300, 300, 300, 300, 300, 200]
              Solute NO3: Thickness=[150, 150, 300, 350, 200, 150, 150, 100, 200, 250]; InitialValuesUnits=ppm; WaterTableConcentration=0; D0=0; DepthConstant=0; MaxDepthSoluteAccessible=0; RunoffEffectivenessAtMovingSolute=0; MaxEffectiveRunoff=0
                InitialValues=[8.961, 7.93, 0.917, 0.85, 0.712, 0.697, 0.69, 0.573, 0.457, 0.361]
              Solute NH4: Thickness=[150, 150, 300, 350, 200, 150, 150, 100, 200, 250]; InitialValuesUnits=ppm; WaterTableConcentration=0; D0=0; DepthConstant=0; MaxDepthSoluteAccessible=0; RunoffEffectivenessAtMovingSolute=0; MaxEffectiveRunoff=0
                InitialValues=[1.195, 1.416, 1.179, 0.478, 0.356, 0.425, 0.46, 0.344, 0.228, 0.181]
              Solute Urea: Thickness=[150, 150, 300, 350, 200, 150, 150, 100, 200, 250]; InitialValues=[0, 0, 0, 0, 0, 0, 0, 0, 0, 0]; InitialValuesUnits=kg/ha; WaterTableConcentration=0; D0=0; DepthConstant=0; MaxDepthSoluteAccessible=0; RunoffEffectivenessAtMovingSolute=0; MaxEffectiveRunoff=0
            Report ReportRainshelter: EventNames=[Clock].DoReport
              VariableNames:
                [Clock].Today as Date
                [Soil].SoilTemperature.AverageSoilTemp[1] as AveSoilTemp@0075mm
                [Soil].SoilTemperature.AverageSoilTemp[2] as AveSoilTemp@0225mm
                [Soil].SoilTemperature.AverageSoilTemp[3] as AveSoilTemp@0450mm
                [Soil].SoilTemperature.AverageSoilTemp[4] as AveSoilTemp@0750mm
                [Soil].SoilTemperature.AverageSoilTemp[5] as AveSoilTemp@1050mm
                [Soil].SoilTemperature.AverageSoilTemp[6] as AveSoilTemp@1350mm
                [Soil].SoilTemperature.AverageSoilTemp[6] as AveSoilTemp@1650mm
      Folder CompareModels
        Simulation CERES
          Clock: Start=2016-09-28; End=2018-01-27
          Summary summaryfile
          Weather
            FileName=%root%\Tests\Validation\System\LincolnRotation2017\lincoln.met
          MicroClimate: a_interception=0; b_interception=1; c_interception=0; d_interception=0; SoilHeatFluxFraction=0.4; MinimumHeightDiffForNewLayer=0; NightInterceptionFraction=0.5; ReferenceHeight=2
          SoilArbitrator Soil Arbitrator
          Zone paddock: Area=1; Slope=0; AspectAngle=0; Altitude=50
            Folder Manager folder
              Operations GeneralIrrigation: same as ValidationTests.NewZealand.LincolnRainshelter.Rainshelter.paddock.Manager folder.GeneralIrrigation
              Operations IrrigationSchedule
              Operations FertiliserSchedule
              Manager CropOperations: same as ValidationTests.NewZealand.LincolnRainshelter.Rainshelter.paddock.Manager folder.CropOperations
              Manager ClimateControl
                StartDate = 10/17/2016 00:00:00
                EndDate = 06/30/2017 00:00:00
                OtherDateString = 27/07/2017 28/07/2017 29/07/2017 30/07/2017 31/07/2017 08/08/2017 09/08/2017 10/08/2017 11/08/2017 12/08/2017 13/08/2017 14/08/2017 15/08/2017 16/08/2017 17/08/2017 18/08/2017 28/08/2017 29/08/2017 30/08/2017 31/08/2017
                RainshelterCover =
                script: same as in ValidationTests.NewZealand.LincolnRainshelter.Rainshelter.paddock.Manager folder.ClimateControl
              Manager AdditionalActions: same as ValidationTests.NewZealand.LincolnRainshelter.Rainshelter.paddock.Manager folder.AdditionalActions
            Irrigation
            Plant Oats
            Plant FodderBeet
            Fertiliser
            SurfaceOrganicMatter Surface Organic Matter: InitialResidueName=oat_stubble; InitialResidueType=oats; InitialResidueMass=1500; InitialStandingFraction=0.5; InitialCPR=0; InitialCNR=20
            Soil: SoilType=Silt loam over sand; LocalName=Templeton; Site=RainShelter; NearestTown=Lincoln; Region=Plains; State=Canterbury; Country=New Zealand; Latitude=37.15; Longitude=172.28; Comments=TEMPLETON-RS
              Memo Info: same as ValidationTests.NewZealand.LincolnRainshelter.Rainshelter.paddock.Soil.Info
              Chemical: Thickness=[150, 150, 300, 350, 200, 150, 150, 100, 200, 250]; PH=[6.1, 6.1, 6, 6, 6, 6, 6, 6, 6, 6]; PHUnits=Water
              CERESSoilTemperature
              Physical: same as ValidationTests.NewZealand.LincolnRainshelter.Rainshelter.paddock.Soil.Physical
              WaterBalance SoilWater: same as ValidationTests.NewZealand.LincolnRainshelter.Rainshelter.paddock.Soil.SoilWater
              Nutrient
              Organic: FOMCNRatio=30; CarbonUnits=Total
                Thickness  Carbon  SoilCNRatio  FBiom  FInert  FOM
                150        2.55    11           0.08   0.2     291.718
                150        2.09    11           0.04   0.325   232.942
                300        0.52    11           0.018  0.6     148.53
                350        0.23    11           0.01   0.85    87.8638
                200        0.18    11           0.008  0.95    65.0911
                150        0.15    11           0.008  0.98    51.9763
                150        0.15    11           0.008  0.99    41.5039
                100        0.12    11           0.008  0.992   35.7227
                200        0.11    11           0.005  0.995   26.4641
                250        0.1     11           0.005  0.995   18.1885
              Water: Thickness=[150, 150, 300, 300, 300, 300, 300, 200]; InitialValues=[0.3, 0.28, 0.27, 0.3, 0.28, 0.26, 0.22, 0.22]; InitialPAWmm=290.95; RelativeTo=LL15; FilledFromTop=false
              LayerStructure: Thickness=[150, 150, 300, 300, 300, 300, 300, 200]
              Solute NO3: same as ValidationTests.NewZealand.LincolnRainshelter.Rainshelter.paddock.Soil.NO3
              Solute NH4: same as ValidationTests.NewZealand.LincolnRainshelter.Rainshelter.paddock.Soil.NH4
              Solute Urea: same as ValidationTests.NewZealand.LincolnRainshelter.Rainshelter.paddock.Soil.Urea
            Report ReportCompare: EventNames=[Clock].DoReport
              VariableNames:
                [Clock].Today as Date
                [Soil].CERESSoilTemperature.Value[1] as AveSoilTemp@0075mm
                [Soil].CERESSoilTemperature.Value[3] as AveSoilTemp@0450mm
                [Soil].CERESSoilTemperature.Value[5] as AveSoilTemp@1050mm
                [Soil].CERESSoilTemperature.Value[8] as AveSoilTemp@1900mm
        Simulation SoilTemperature
          Clock: Start=2016-09-28; End=2018-01-27
          Summary summaryfile
          Weather
            FileName=%root%\Tests\Validation\System\LincolnRotation2017\lincoln.met
          MicroClimate: a_interception=0; b_interception=1; c_interception=0; d_interception=0; SoilHeatFluxFraction=0.4; MinimumHeightDiffForNewLayer=0; NightInterceptionFraction=0.5; ReferenceHeight=2
          SoilArbitrator Soil Arbitrator
          Zone paddock: Area=1; Slope=0; AspectAngle=0; Altitude=50
            Folder Manager folder: same as ValidationTests.NewZealand.CompareModels.CERES.paddock.Manager folder
            Irrigation
            Plant Oats
            Plant FodderBeet
            Fertiliser
            SurfaceOrganicMatter Surface Organic Matter: InitialResidueName=oat_stubble; InitialResidueType=oats; InitialResidueMass=1500; InitialStandingFraction=0.5; InitialCPR=0; InitialCNR=20
            Soil: SoilType=Silt loam over sand; LocalName=Templeton; Site=RainShelter; NearestTown=Lincoln; Region=Plains; State=Canterbury; Country=New Zealand; Latitude=37.15; Longitude=172.28; Comments=TEMPLETON-RS
              Memo Info: same as ValidationTests.NewZealand.LincolnRainshelter.Rainshelter.paddock.Soil.Info
              Chemical: Thickness=[150, 150, 300, 350, 200, 150, 150, 100, 200, 250]; PH=[6.1, 6.1, 6, 6, 6, 6, 6, 6, 6, 6]; PHUnits=Water
              SoilTemperature: CONSTANT_TEMPdepth=10
              Physical: same as ValidationTests.NewZealand.LincolnRainshelter.Rainshelter.paddock.Soil.Physical
              WaterBalance SoilWater: same as ValidationTests.NewZealand.LincolnRainshelter.Rainshelter.paddock.Soil.SoilWater
              Nutrient
              Organic: same as ValidationTests.NewZealand.CompareModels.CERES.paddock.Soil.Organic
              Water: Thickness=[150, 150, 300, 300, 300, 300, 300, 200]; InitialValues=[0.3, 0.28, 0.27, 0.3, 0.28, 0.26, 0.22, 0.22]; InitialPAWmm=290.95; RelativeTo=LL15; FilledFromTop=false
              LayerStructure: Thickness=[150, 150, 300, 300, 300, 300, 300, 200]
              Solute NO3: same as ValidationTests.NewZealand.LincolnRainshelter.Rainshelter.paddock.Soil.NO3
              Solute NH4: same as ValidationTests.NewZealand.LincolnRainshelter.Rainshelter.paddock.Soil.NH4
              Solute Urea: same as ValidationTests.NewZealand.LincolnRainshelter.Rainshelter.paddock.Soil.Urea
            Report ReportCompare: EventNames=[Clock].DoReport
              VariableNames:
                [Clock].Today as Date
                [Soil].SoilTemperature.AverageSoilTemp[1] as AveSoilTemp@0075mm
                [Soil].SoilTemperature.AverageSoilTemp[3] as AveSoilTemp@0450mm
                [Soil].SoilTemperature.AverageSoilTemp[5] as AveSoilTemp@1050mm
                [Soil].SoilTemperature.AverageSoilTemp[8] as AveSoilTemp@1900mm
  Folder Effect of Soil Layering
    Memo
      SoilTemperature uses a numerical solution to the heat flow equation to find soil temperature at any depth. In principle, the numerical solution is sensitive to the layering but the extent of has not previously been tested in APSIM. Because the model will be used with both SWIM (thin, usually <5mm, surface layers) and SoilWater (thicker, usually >100 mm, surface layers) it is important to understand any sensitivity.

      A simple simulation was set up using a ‘dummy’ model to hold soil water contents constant as the purpose here is to test the soil temperature simulation not the soil water simulation. Both simulations had soil extending to 1100 mm deep. The thin-layering simulation had 11 layers with the top layer 2 mm deep and with seven layers in the top 100 mm. The thick-layering simulation had six layers with only one layer in the top 100 mm – a value typical for simulations using SoilWater.

      The simulation was further simplified by using synthetic weather that was a simple annual cycle with a superimposed fortnightly oscillation.

      All temperatures plotted are the average temperature unless otherwise stated.

      The first four plots below compare the simulated soil temperature across four depths with the thin layering in black and the thick layering in orange. Plots 5 to 8 show the 1:1 relationship between the two layering options. Note that the depths of 1, 8 and 15 mm all fall in the top layer of the thick-layering simulation but are in layers 1, 3, 4, and 8 of the thin-layering simulation. Plots 9 and 10 show the maximum simulated temperature at 1 mm deep.

      Overall, the simulations showed low sensitivity to the differences in layering (Plots 1-4). There was a greater difference in simulated maximum temperature than average temperature (plots 9, 10). For example, on 22 October the average soil temperature at 1 mm for the thin layering was 29 C v’s 28 for the thick layering (Plots 5 and 6). The differences in maximum temperature are greater than for average temperature. This is particularly evident in Plot 10 where the deviation at higher temperatures is about 3 C. It is possible that these differences may be important in future simulation purposes but these are minor differences when viewed from the perspective of must current uses.

      It must be emphasised that this test is on the soil temperature model only. Layering will have a substantial effect on soil water contents when a soil water simulation model is included in the simulation – and the differences in soil water content will feed through to greater differences in the simulated soil temperature. Users should be aware of this when deciding which soil water model to use.
    Simulation LayeringEffectThin
      Clock: Start=2000-01-01; End=2000-12-31
      Weather: FileName=AnalyticalWeather.xlsx; ExcelWorkSheetName=WarmOscillating
      MicroClimate: a_interception=0; b_interception=0; c_interception=0; d_interception=0; SoilHeatFluxFraction=0; MinimumHeightDiffForNewLayer=0; NightInterceptionFraction=0; ReferenceHeight=2
      Summary
      Zone FieldThin: Area=1; Slope=0; AspectAngle=0; Altitude=50
        Manager DummyWaterBalance
          SW = 0.05, 0.05, 0.05, 0.05, 0.05, 0.05, 0.05, 0.05, 0.05, 0.05, 0.05
          Eos = 0
          Es = 0
          Eo = 0
          Salb = 0
```csharp
using Models.PMF;
using Models.Core;
using System;
using Models.Interfaces;
using Models.Soils;
using APSIM.Shared.Utilities;
using Newtonsoft.Json;

namespace Models
{
    [Serializable] 
    public class Script : Model, ISoilWater
    {
        [Link]
        private Physical physical;
        [Link]
        private IPhysical soilPhysical;

        ///<summary>Gets or sets soil thickness for each layer (mm)(</summary>
        public double[] Thickness { get { return soilPhysical.Thickness; } }

        ///<summary>Gets or sets soil thickness for each layer (mm)(</summary>
        public double[] LayerThickness { get { return soilPhysical.Thickness; } }

        ///<summary>Gets or sets volumetric soil water content (mm/mm)(</summary>
        [Description("Soil water content (mm/mm), comma separated values")]
        public double[] SW { get; set; }

        ///<summary>Gets soil water content (mm)</summary>
        public double[] SWmm { get { return MathUtilities.Multiply(SW, Thickness); } }

        ///<summary>Gets extractable soil water relative to LL15(mm)</summary>
        public double[] ESW { get { throw new NotImplementedException(); } }

        ///<summary>Gets extractable soil water relative to LL15(mm)</summary>
        public double[] PSI { get { throw new NotImplementedException(); } }

        ///<summary>Gets K</summary>
        public double[] K { get { throw new NotImplementedException(); } }
        
        ///<summary>Gets PoreInteractionIndex</summary>
        [JsonIgnore]
        public double[] PoreInteractionIndex { get { throw new NotImplementedException(); } set { throw new NotImplementedException(); }}
                
        ///<summary>Gets potential evaporation from soil surface (mm)</summary>
        [Description("Eos (mm)")]
        public double Eos { get; set; }

        /// <summary>Gets the actual (realised) soil water evaporation (mm)</summary>
        [Description("Es (mm)")]
        public double Es { get; set; }

        /// <summary>Gets potential evapotranspiration of the whole soil-plant system (mm)</summary>
        [Description("Eo (mm)")]
        public double Eo { get; set; }

        /// <summary>Gets the amount of water runoff (mm)</summary>
        public double Runoff { get { return 0; } }
        
        /// <summary>Gets the amount of water drainage from bottom of profile(mm)</summary>
        public double Drainage { get { return 0; } }

        /// <summary>Fraction of incoming radiation reflected from bare soil</summary>
        [Description("Salb")]
        public double Salb { get; set; }

        /// <summary>Amount of water moving laterally out of the profile (mm)</summary>
        public double[] LateralOutflow { get { throw new NotImplementedException(); } }

        /// <summary>Amount of N leaching as NO3-N from the deepest soil layer (kg /ha)</summary>
        public double LeachNO3 { get { return 0; } }

        /// <summary>Amount of N leaching as NH4-N from the deepest soil layer (kg /ha)</summary>
        public double LeachNH4 { get { return 0; } }
        
        /// <summary>Amount of N leaching as urea-N  from the deepest soil layer (kg /ha)</summary>
        public double LeachUrea { get { return 0; } }

        /// <summary>Amount of Cl leaching  from the deepest soil layer (kg /ha)</summary>
        public double LeachCl { get { return 0; } }
        
        /// <summary>Amount of N leaching as NO3 from each soil layer (kg /ha)</summary>
        public double[] FlowNO3 { get { throw new NotImplementedException(); } }

        /// <summary>Amount of N leaching as NH4 from each soil layer (kg /ha)</summary>
        public double[] FlowNH4 { get { throw new NotImplementedException(); } }

        /// <summary>Amount of N leaching as urea from each soil layer (kg /ha)</summary>
        public double[] FlowUrea { get { throw new NotImplementedException(); } }

        /// <summary>Amount of N leaching as urea from each soil layer (kg /ha)</summary>
        public double[] FlowCl { get { throw new NotImplementedException(); } }

        /// <summary>Amount of water moving upward from each soil layer during unsaturated flow (negative value means downward movement) (mm)</summary>
        public double[] Flow  { get { throw new NotImplementedException(); } }

        /// <summary>Amount of water moving downward out of each soil layer due to gravity drainage (above DUL) (mm)</summary>
        public double[] Flux { get { throw new NotImplementedException(); } }

        /// <summary> This is set by Microclimate and is rainfall less that intercepted by the canopy and residue components </summary>
        public double PotentialInfiltration { get; set; }
        
        /// <summary> The amount of rainfall intercepted by crop and residue canopies </summary>
        public double PrecipitationInterception { get; set; }

        /// <summary>Water table depth (mm)</summary>
        public double WaterTable { get; set; }
        
        /// <summary>Pond depth (mm)</summary>
        public double Pond { get; set; }

        /// <summary>Pond depth (mm)</summary>
        public double SubsurfaceDrain { get; set; }

        /// <summary>Sets the water table.</summary>
        /// <param name="InitialDepth">The initial depth.</param> 
        public void SetWaterTable(double InitialDepth)
        {
            throw new NotImplementedException();
        }

        /// <summary>The efficiency (0-1) that solutes move down with water.</summary>
        public double[] SoluteFluxEfficiency { get; set; }

        /// <summary>The efficiency (0-1) that solutes move up with water.</summary>
        public double[] SoluteFlowEfficiency { get; set; }

        ///<summary>Perform a reset</summary>
        public void Reset()
        {
            throw new NotImplementedException();
        }

        ///<summary>Perform tillage</summary>
        public void Tillage(TillageType Data)
        {
            throw new NotImplementedException();
        }

        ///<summary>Perform tillage</summary>
        public void Tillage(string tillageType)
        {
            throw new NotImplementedException();
        }

        ///<summary>Remove water from the profile</summary>
        public void RemoveWater(double[] amountToRemove)
        {
            throw new NotImplementedException();
        }
        public void Standardise(double[] targetThickness)
        {
        
        
        }
        
        /// <summary>Plant available water SW-LL15 (mm/mm).</summary>
        [Units("mm/mm")]
        public double[] PAW
        {
            get
            {
                return SoilUtilities.CalcPAWC(soilPhysical.Thickness,
                                              soilPhysical.LL15,
                                              SW,
                                              null);
            }
        }

        /// <summary>Plant available water SW-LL15 (mm).</summary>
        [Units("mm")]
        public double[] PAWmm
        {
            get
            {
                return MathUtilities.Multiply(PAW, soilPhysical.Thickness);
            }
        }

    }
}
```
        Soil: Latitude=0; Longitude=0
          Water: Thickness=[100, 100, 200, 300]; InitialValues=[0.16, 0.16, 0.16, 0.16]; InitialPAWmm=77; RelativeTo=LL15; FilledFromTop=true
          Physical
            Thickness  ParticleSizeClay  BD   AirDry  LL15  DUL   SAT
            100        9                 1.5  0.01    0.05  0.16  0.29
            100        9                 1.5  0.01    0.05  0.16  0.29
            200        9                 1.5  0.01    0.05  0.16  0.29
            300        9                 1.5  0.01    0.05  0.16  0.29
          Organic: FOMCNRatio=60; CarbonUnits=Total
            Thickness  Carbon  SoilCNRatio  FBiom  FInert  FOM
            100        2       14.5         0.04   0.4     0.29407
            300        2       14.5         0.04   0.4     0.294
            600        2       14.5         0.04   0.4     0.294
            1000       2       14.5         0.04   0.4     0.294
            1000       2       14.5         0.04   0.4     0.294
            1000       2       14.5         0.04   0.4     0.294
            1000       2       14.5         0.04   0.4     0.294
            1000       2       14.5         0.04   0.4     0.294
          Chemical: Thickness=[100, 300, 600, 1000, 1000, 1000, 1000, 1000]; PH=[6.5, 6.5, 6.5, 6.5, 6.5, 6.5, 6.5, 6.5]; PHUnits=Water
          SoilTemperature: CONSTANT_TEMPdepth=10
          Solute NO3: Thickness=[700]; InitialValues=[0.1]; InitialValuesUnits=kg/ha; WaterTableConcentration=0; D0=0; DepthConstant=0; MaxDepthSoluteAccessible=0; RunoffEffectivenessAtMovingSolute=0; MaxEffectiveRunoff=0
          Solute NH4: Thickness=[700]; InitialValues=[1]; InitialValuesUnits=kg/ha; WaterTableConcentration=0; D0=0; DepthConstant=0; MaxDepthSoluteAccessible=0; RunoffEffectivenessAtMovingSolute=0; MaxEffectiveRunoff=0
          Solute Urea: Thickness=[700]; InitialValues=[0]; InitialValuesUnits=kg/ha; WaterTableConcentration=0; D0=0; DepthConstant=0; MaxDepthSoluteAccessible=0; RunoffEffectivenessAtMovingSolute=0; MaxEffectiveRunoff=0
          LayerStructure: Thickness=[2, 4, 4, 10, 10, 10, 60, 100, 300, 400, 200]
        Report ReportLayering: EventNames=[Clock].DoReport
          VariableNames:
            [Clock].Today as Date
            [Soil].SoilTemperature.AverageSoilTemp[1] as AverageSoilTemp@0001mm
            [Soil].SoilTemperature.AverageSoilTemp[3] as AverageSoilTemp@0008mm
            [Soil].SoilTemperature.AverageSoilTemp[4] as AverageSoilTemp@0015mm
            [Soil].SoilTemperature.AverageSoilTemp[8] as AverageSoilTemp@0150mm
            [Soil].SoilTemperature.AverageSoilTemp[11] as AverageSoilTemp@1000mm
            [Soil].SoilTemperature.MaxSoilTemp[1] as MaxSoilTemp@0001mm
            [Soil].SoilTemperature.MaxSoilTemp[3] as MaxSoilTemp@0008mm
            [Soil].SoilTemperature.MaxSoilTemp[4] as MaxSoilTemp@0015mm
            [Soil].SoilTemperature.MaxSoilTemp[8] as MaxSoilTemp@0150mm
            [Soil].SoilTemperature.MaxSoilTemp[11] as MaxSoilTemp@1000mm
    Simulation LayeringEffectThick
      Clock: Start=2000-01-01; End=2000-12-31
      Weather: FileName=AnalyticalWeather.xlsx; ExcelWorkSheetName=WarmOscillating
      MicroClimate: a_interception=0; b_interception=0; c_interception=0; d_interception=0; SoilHeatFluxFraction=0; MinimumHeightDiffForNewLayer=0; NightInterceptionFraction=0; ReferenceHeight=2
      Summary
      Zone FieldThick: Area=1; Slope=0; AspectAngle=0; Altitude=50
        Manager DummyWaterBalance
          SW = 0.05, 0.05, 0.05, 0.05, 0.05, 0.05
          Eos = 0
          Es = 0
          Eo = 0
          Salb = 0
          script: same as in Effect of Soil Layering.LayeringEffectThin.FieldThin.DummyWaterBalance
        Soil: Latitude=0; Longitude=0
          Water: Thickness=[100, 100, 200, 300]; InitialValues=[0.16, 0.16, 0.16, 0.16]; InitialPAWmm=77; RelativeTo=LL15; FilledFromTop=true
          Physical: same as Effect of Soil Layering.LayeringEffectThin.FieldThin.Soil.Physical
          Organic: same as Effect of Soil Layering.LayeringEffectThin.FieldThin.Soil.Organic
          Chemical: Thickness=[100, 300, 600, 1000, 1000, 1000, 1000, 1000]; PH=[6.5, 6.5, 6.5, 6.5, 6.5, 6.5, 6.5, 6.5]; PHUnits=Water
          SoilTemperature: CONSTANT_TEMPdepth=10
          Solute NO3: Thickness=[700]; InitialValues=[0.1]; InitialValuesUnits=kg/ha; WaterTableConcentration=0; D0=0; DepthConstant=0; MaxDepthSoluteAccessible=0; RunoffEffectivenessAtMovingSolute=0; MaxEffectiveRunoff=0
          Solute NH4: Thickness=[700]; InitialValues=[1]; InitialValuesUnits=kg/ha; WaterTableConcentration=0; D0=0; DepthConstant=0; MaxDepthSoluteAccessible=0; RunoffEffectivenessAtMovingSolute=0; MaxEffectiveRunoff=0
          Solute Urea: Thickness=[700]; InitialValues=[0]; InitialValuesUnits=kg/ha; WaterTableConcentration=0; D0=0; DepthConstant=0; MaxDepthSoluteAccessible=0; RunoffEffectivenessAtMovingSolute=0; MaxEffectiveRunoff=0
          LayerStructure: Thickness=[100, 100, 100, 200, 400, 200]
        Report ReportLayering: EventNames=[Clock].DoReport
          VariableNames:
            [Clock].Today as Date
            [Soil].SoilTemperature.AverageSoilTemp[1] as AverageSoilTemp@0001mm
            [Soil].SoilTemperature.AverageSoilTemp[1] as AverageSoilTemp@0008mm
            [Soil].SoilTemperature.AverageSoilTemp[1] as AverageSoilTemp@0015mm
            [Soil].SoilTemperature.AverageSoilTemp[2] as AverageSoilTemp@0150mm
            [Soil].SoilTemperature.AverageSoilTemp[6] as AverageSoilTemp@1000mm
            [Soil].SoilTemperature.MaxSoilTemp[1] as MaxSoilTemp@0001mm
            [Soil].SoilTemperature.MaxSoilTemp[1] as MaxSoilTemp@0008mm
            [Soil].SoilTemperature.MaxSoilTemp[1] as MaxSoilTemp@0015mm
            [Soil].SoilTemperature.MaxSoilTemp[2] as MaxSoilTemp@0150mm
            [Soil].SoilTemperature.MaxSoilTemp[6] as MaxSoilTemp@1000mm
  Folder Initialisation Choices
    Memo
      SoilTemperature’s numerical solution requires initial values of soil temperature by layer. These are not usually available from measurements so a scheme, based on a simplified analytical solution to the heat flow equation, has been implemented. Those estimated values are used by default unless the user adds in their own values.

      Numerical solutions can take some time to ‘forget’ the initial conditions and the time to forget increases with depth. Simulations were set up to demonstrate this feature. The soil is a silt loam in a pasture system based at Lincoln, New Zealand. The simulation is set up with default initial conditions as well as two, deliberately bad, sets of initial temperatures – uniformly at 0.0 and 30.0 C.

      The first four plots concentrate on the first two weeks of the simulation and the surface layers. The second four plots show simulated outputs deeper in the soil and over several years.

      The deeper in the soil that the output is examined the longer it takes for the simulation to forget the initial temperatures. While we are not suggesting that initial conditions are routinely guessed as badly as these, it is important to note this effect when comparing against data. As a rough guide, if the depth of interest is in the top 300 mm then the ‘run in’ should be at least two weeks. At about 1 m deep the run in should be greater than six months and deeper than that it may be several years.

      Note that these are worst-case scenarios and that other models, particularly SoilWater or SWIM and Nutrient, also require substantial run in times.
    Experiment InitialisationChoices
      Factors
        CompositeFactor Default: Specifications=[SoilTemperature]
          SoilTemperature: CONSTANT_TEMPdepth=10
        CompositeFactor InitAtZero: Specifications=[SoilTemperature]
          SoilTemperature: CONSTANT_TEMPdepth=10; Thickness=[100, 150, 200, 150, 250, 300, 300]; InitialValues=[0, 0, 0, 0, 0, 0, 0]
        CompositeFactor InitAtThirty: Specifications=[SoilTemperature]
          SoilTemperature: CONSTANT_TEMPdepth=10; Thickness=[100, 150, 200, 150, 250, 300, 300]; InitialValues=[30, 30, 30, 30, 30, 30, 30]
      Simulation InitialisationChoices
        Clock: Start=1980-07-01; End=1985-06-30
        Weather: FileName=%root%/Examples/WeatherFiles/lincoln.met
        MicroClimate: a_interception=0; b_interception=1; c_interception=0; d_interception=0; SoilHeatFluxFraction=0.4; MinimumHeightDiffForNewLayer=0; NightInterceptionFraction=0.5; ReferenceHeight=2
        Forages
          Parameters:
            Name                          IsLive  DigestibilityString  FractionConsumable  MinimumAmount  UseDigestibilityFromModel
            SurfaceOrganicMatter.Residue  true    0.7                  1                   100            false
            SurfaceOrganicMatter.Residue  false   0.3                  1                   0              false
            AGPRyegrass.Leaf              true    0.7                  1                   100            false
            AGPRyegrass.Leaf              false   0.3                  1                   0              false
            AGPRyegrass.Stem              true    0.7                  1                   100            false
            AGPRyegrass.Stem              false   0.3                  1                   0              false
            AGPRyegrass.Stolon            true    0.7                  1                   100            false
            AGPRyegrass.Stolon            false   0.3                  1                   0              false
            AGPWhiteClover.Leaf           true    0.7                  1                   100            false
            AGPWhiteClover.Leaf           false   0.3                  1                   0              false
            AGPWhiteClover.Stem           true    0.7                  1                   100            false
            AGPWhiteClover.Stem           false   0.3                  1                   0              false
            AGPWhiteClover.Stolon         true    0.7                  1                   100            false
            AGPWhiteClover.Stolon         false   0.3                  1                   0              false
        SoilArbitrator
        Summary
        Zone Field: Area=1; Slope=0; AspectAngle=0; Altitude=50
          SimpleGrazing: GrazingRotationType=0; SimpleGrazingFrequencyString=21; SimpleMinGrazable=0; SimpleGrazingResidual=1500; FlexibleGrazePostDM=0; FractionDefoliatedBiomassToSoil=[1]; FractionDefoliatedNToSoil=[0.7]; FractionExcretedNToDung=[0.45]; DepthUrineIsAdded=250; SendDungElsewhere=0; SendUrineElsewhere=0; FractionPopulationDecline=0; TramplingOn=false; MaximumPropLitterMovedToSoil=0.1; PastureConsumedAtMaximumRateOfLitterRemoval=1200
            PreGrazeDMArray=[1000, 1000, 1000, 1000, 1000, 1000, 1000, 1000, 1000, 1000, 1000, 1000]
            PostGrazeDMArray=[2000, 2000, 2000, 2000, 2000, 2000, 2000, 2000, 2000, 2000, 2000, 2000]
          Manager FertiliseFixedDates
            EachYear = True
            Dates = 5-jan, 5-feb, 5-mar, 5-apr, 5-aug, 5-sep, 5-oct, 5-nov, 5-dec
            UseCritNThreshold = False
            CritNThreshold = 50
            CritNDepth = 75
            Depth = 50
            Amount = 15
            FertiliserType = UreaN
```csharp
using Models.Interfaces;
using System.Linq;
using APSIM.Shared.Utilities;
using Models.PMF;
using Models.Soils;
using Models.Soils.Nutrients;
using Models.Core;
using System;
using Models.Soils.Nutrients;

namespace Models
{
    [Serializable]
    public class Script : Model
    {
        [Link] private Clock clock;
        [Link] private Fertiliser fertiliser;
        [Link] private ISummary summary;
        [Link] private Soil soil;
        private Nutrient nutrient;
        private Nutrient soilN;
        [Link]
        private IPhysical soilPhysical;
        [Link]
        private Nutrient Nutrient;
        [Link(Path="[SurfaceOrganicMatter].SurfaceResidue.Decomposition")]
        private OrganicFlow ResidueDecomposition;


        [Separator("Fertiliser will be applied on the date(s) below")]
        [Description("Apply fertiliser on the same day(s) each year? If no, then must include the year of appliaction below")]
        public bool EachYear { get; set; }

        [Description("Dates for one or more fertiliser applications (dd-mmm or dd-mmm-yyyy) as a list with a comma between dates")]
        public string[] Dates { get; set; }

        [Separator("Test for the mineral N in the soil and don't apply the fertiliser if greater than X kgN/ha is stored in the soil above a depth of Y mm")]
        [Description("Use a critical soil mineral N to prevent application above a threshold?")]
        public bool UseCritNThreshold { get; set; }

        [Description("Don't add fertiliser if N in the soil to the depth below exceeds (kg/ha)")]
        public double CritNThreshold { get; set; }

        [Description("Depth to which the amount of N in the soil should be calculated (mm)")]
        public double CritNDepth { get; set; }

        [Separator("Fertiliser application details")]
        [Description("Depth at which to apply the fertiliser (mm)")]
        public double Depth { get; set; }

        [Description("Amount of fertiliser to apply (kg N /ha) per application")]
        public double Amount { get; set; }

        [Description("Fertiliser type - select from the list")]
        public Fertiliser.Types FertiliserType { get; set; }


        [EventSubscribe("StartOfSimulation")]
        private void FindSoilNOrNutrient(object sender, EventArgs e)
        {
            nutrient = this.FindInScope<Nutrient>() as Nutrient;
            soilN = this.FindInScope<Nutrient>() as Nutrient;

            if (nutrient == null && soilN == null)
                throw new Exception(string.Format("Error in script {0}: Unable to find nutrient or soilN.", Name));
        }

        [EventSubscribe("DoManagement")]
        private void OnDoManagement(object sender, EventArgs e)
        {
            if (OnApplicationDate())
            {
                if (NContentBelowThreshold())
                    fertiliser.Apply(Amount, FertiliserType, Depth);
                else
                    summary.WriteMessage(this, "Skipping fertiliser application due to soil mineral N content being above critical threshold.", MessageType.Diagnostic);
            }
        }

        /// <summary>Checks if today's date is one of the specified fertiliser application dates.</summary>
        private bool OnApplicationDate()
        {
            if (EachYear)
                return Dates.Any(d => DateUtilities.DatesEqual(d, clock.Today));
            
            DateTime[] dates = Dates.Select(d => DateTime.ParseExact(d, "d-MMM-yyyy", null)).ToArray();
            return dates.Any(d => SameDate(d, clock.Today));
        }

        /// <summary>Checks if N content in soil is below critical threshold.</summary>
        private bool NContentBelowThreshold()
        {
            if (!UseCritNThreshold)
                return true;
            
            double[] weights = GetLayerWeights();
            double cumSoilN = 0;

            for (int i = 0; i < soilPhysical.Thickness.Length; i++)
            {
                if (nutrient != null)
                    cumSoilN += weights[i] * nutrient.MineralN[i];
                else if (soilN != null)
                    cumSoilN += weights[i] * soilN.MineralN[i];
            }

            return cumSoilN <= CritNThreshold;
        }

        private double[] GetLayerWeights()
        {
            double[] weights = new double[soilPhysical.Thickness.Length];
            double cumDepth = 0;

            for (int i = 0; i < soilPhysical.Thickness.Length; i++)
            {
                cumDepth += soilPhysical.Thickness[i];
                if (cumDepth < CritNDepth)
                    weights[i] = 1;
                else if (cumDepth - soilPhysical.Thickness[i] <= CritNDepth)
                    weights[i] = (CritNDepth - (cumDepth - soilPhysical.Thickness[i])) / soilPhysical.Thickness[i];
                else
                    weights[i] = 0;
            }

            return weights;
        }

        private bool SameDate(DateTime d1, DateTime d2)
        {
            return d1.Year == d2.Year && d1.DayOfYear == d2.DayOfYear;
        }
    }
}
```
          Manager AutomaticIrrigation
            allowIrrigation = True
            seasonStart = 1-sep
            seasonEnd = 30-apr
            seasonsAllocation = 10000
            triggerDeficit = 75
            targetDeficit = 95
            returndays = 3
            maximumAmount = 30
            depthPAWC = 300
```csharp
using Newtonsoft.Json;
using APSIM.Shared.Utilities;
using System.Xml.Serialization;
using Models.Soils;
using Models.PMF;
using Models.Core;
using System;
using System.Linq;
using Models.Interfaces;


        
namespace Models
{
    [Serializable] 
    [System.Xml.Serialization.XmlInclude(typeof(Model))]
    public class Script : Model
    {
        [Link] private ISummary summary;
        [Link] private Irrigation Irrigation;
        [Link] private Clock Clock;
        [Link] private Soil Soil;
        [Link(IsOptional = true)] private IPlant existingCrop;
        private DateTime StartDate;
        private DateTime EndDate;
        private double TopDUL;
        private double TopLL;
        private int nLayers;
        [Link]
        private IPhysical soilPhysical;
        [Link]
        private ISoilWater waterBalance;
        //Communication to other modules
       
        //User inputs from properties tab
        [Description("Turn irrigation on?")]
        public bool allowIrrigation { get; set; }
        [Description("Start of irrigation season (dd-MMM)")]
        public string seasonStart { get; set; }
        [Description("End of irrigation season (dd-MMM)")]
        public string seasonEnd { get; set; }
        [Description("Season allocation (mm)")]
        public double seasonsAllocation { get; set; }
        [Description("Deficit to trigger irrigation (% PAWC)")]
        public double triggerDeficit { get; set; }
        [Description("Deficit to stop irrigaton (% PAWC)")]
        public double targetDeficit { get; set; }
        [Description("Minimum days for irrigation to return")]
        public double returndays { get; set; }
        [Description("Maximum irrigation application (mm/day)")]
        public double maximumAmount { get; set; }
        [Description("Depth to calculate PAWC (mm)")]
        public double depthPAWC { get; set; }

        //Class members
        [JsonIgnore] public double TopSWdeficit { get; set; }
        [JsonIgnore] public double TopSWC { get; set; }
        [JsonIgnore] public double DaysSinceIrrigation { get; set; }
        [JsonIgnore] public double AmountToApply { get; set; }
        [JsonIgnore] public double SeasonAppliedAmount { get; set; }
        
        private bool IrrigationIsAllowed { get; set; }
        private bool SeasonIsOpen { get; set; }
        private bool CropIsActive { get; set; }
        private bool IrrigatorIsAvailable { get; set; }
        private bool SoilIsDry { get; set; }

    
        //Calculate static soil variables
        [EventSubscribe("StartOfSimulation")]
        private void OnStartOfSimulation(object sender, EventArgs e)
        {   
            //Set the season dates
            StartDate = DateTime.Parse(seasonStart + "-" + Clock.Today.Year.ToString());
            EndDate = DateTime.Parse(seasonEnd + "-" + Clock.Today.Year.ToString());
            
            //Can we irrigate at all?
            IrrigationIsAllowed = false; 
            if (allowIrrigation)
                IrrigationIsAllowed = true; 

            //Calculate soil water variables
            double depthFromSurface = 0.0;
            double fracLayer = 0.0;
            nLayers = soilPhysical.Thickness.Length;
            for (int layer = 0; layer < nLayers; layer++)
            {
                fracLayer = Math.Min(1.0, (depthPAWC - depthFromSurface) / soilPhysical.Thickness[layer]);
                TopLL += soilPhysical.LL15mm[layer] * fracLayer;
                TopDUL += soilPhysical.DULmm[layer] * fracLayer;
                depthFromSurface += soilPhysical.Thickness[layer];
                if (depthFromSurface >= depthPAWC)
                    layer = nLayers;
            }
        }
             
        //Determine daily requirement for irrigation
        [EventSubscribe("StartOfDay")]
        private void OnStartOfDay(object sender, EventArgs e)
        {
            //Can we irrigate today?          
            SeasonIsOpen = isBetween(Clock.Today, StartDate, EndDate);
            if (!SeasonIsOpen)
                SeasonAppliedAmount = 0;

            //Is there a crop in the ground that needs irrigation?
            CropIsActive = false;
            if ((existingCrop != null) && (existingCrop.IsAlive))
                CropIsActive = true;
            //if ((existingCrop.Phenology.Stage >= 3.0) && (existingCrop.Phenology.Stage < 6.0))
          
            //Is the irrigator available?
            IrrigatorIsAvailable = false;
            DaysSinceIrrigation += 1;
            if (DaysSinceIrrigation >= returndays)
                IrrigatorIsAvailable = true;
          
            //Is the soil dry enough to require irrigation?
            SoilIsDry = false;
            double depthFromSurface = 0.0;
            double fracLayer = 0.0;
            TopSWC = 0.0;
            for (int layer = 0; layer < nLayers; layer++)
            //for (int layer = 0; depthFromSurface < depthPAWC + soilPhysical.Thickness[layer]; layer++)
            {
                fracLayer = Math.Min(1.0, (depthPAWC - depthFromSurface) / soilPhysical.Thickness[layer]);
                TopSWC += waterBalance.SWmm[layer] * fracLayer;
                depthFromSurface += soilPhysical.Thickness[layer];
                if (depthFromSurface >= depthPAWC)
                    layer = nLayers;
            }
            
            TopSWdeficit = TopSWC - TopDUL;
            if (Math.Max(0.0, -TopSWdeficit) >= (TopDUL - TopLL) * (100 - triggerDeficit) / 100)
                SoilIsDry = true;
                
            //Are all the conditions ratifying irrigation
            if (IrrigationIsAllowed && SeasonIsOpen && CropIsActive && IrrigatorIsAvailable && SoilIsDry)
            {
                //Lets bloody well irrigate then!!!!
                AmountToApply = TopDUL * targetDeficit / 100 - TopSWC;
                AmountToApply = Math.Max(0.0, Math.Min(AmountToApply, seasonsAllocation - SeasonAppliedAmount));
                Irrigation.Apply(AmountToApply);
                DaysSinceIrrigation = 0;
                SeasonAppliedAmount += AmountToApply;
            }
        }
        
        ///Checks whether theDate is between iniDate and endDate (non-year specific)
        private bool isBetween(DateTime theDay, DateTime iniDate, DateTime endDate)
        {
            bool result = false;
            if (iniDate.DayOfYear < endDate.DayOfYear)
            {
                // period is within one year, ex: summer in the northern hemisphere
                if ((theDay.DayOfYear >= iniDate.DayOfYear) && (theDay.DayOfYear <= endDate.DayOfYear))
                    result = true;
            }
            else
            {
                // period goes over the end of the year, ex: summer in the southern hemisphere
                if ((theDay.DayOfYear >= iniDate.DayOfYear) || (theDay.DayOfYear <= endDate.DayOfYear))
                    result = true;
            }
            
            return result;
        }
    }
}
```
          Irrigation
          Fertiliser
          SurfaceOrganicMatter: InitialResidueName=Sward; InitialResidueType=grass; InitialResidueMass=1000; InitialStandingFraction=0; InitialCPR=0; InitialCNR=15
          PastureSpecies AGPRyegrass: doyGermination=275; daysEmergenceToAnthesis=120; daysAnthesisToMaturity=85; degreesDayForAnthesis=1100; degreesDayForMaturity=900; daysAnnualsFactor=45; CanopyType=PastureSpecies; InitialShootDM=1500; InitialRootDM=450; InitialRootDepth=750; initialDMFractionsGrasses=[0.15, 0.25, 0.25, 0.05, 0.05, 0.1, 0.1, 0.05, 0, 0, 0]; initialDMFractionsForbs=[0.2, 0.2, 0.15, 0.05, 0.1, 0.15, 0.1, 0.05, 0, 0, 0]; PhotosyntheticEfficiency=0.01; PhotosynthesisCurveFactor=0.8; FractionPAR=0.5; ReferenceCO2=380; CO2EffectScaleFactor=700; CO2EffectOffsetFactor=600; CO2EffectMinimum=0.7; CO2EffectExponent=2; ReproSeasonDurationCoeff=2; ReproSeasonShouldersLengthFactor=1; ReproSeasonOnsetDurationFactor=0.6; RelativeTurnoverEmerging=2; DetachmentDroughtCoefficient=3; DetachmentDroughtEffectMin=0.1; TurnoverStockFactor=0.01; TurnoverDefoliationEffectMin=0.025; MinimumGreenLeafProp=0.8; MinimumGreenRootProp=0.5
            initialDMFractionsLegumes=[0.16, 0.23, 0.22, 0.05, 0.03, 0.05, 0.05, 0.01, 0.04, 0.08, 0.08]
            LinearInterpolationFunction FVPDFunction
          PastureSpecies AGPWhiteClover: doyGermination=275; daysEmergenceToAnthesis=120; daysAnthesisToMaturity=85; degreesDayForAnthesis=1100; degreesDayForMaturity=900; daysAnnualsFactor=45; CanopyType=PastureSpecies; InitialShootDM=500; InitialRootDM=150; InitialRootDepth=350; initialDMFractionsGrasses=[0.15, 0.25, 0.25, 0.05, 0.05, 0.1, 0.1, 0.05, 0, 0, 0]; initialDMFractionsForbs=[0.2, 0.2, 0.15, 0.05, 0.1, 0.15, 0.1, 0.05, 0, 0, 0]; PhotosyntheticEfficiency=0.01; PhotosynthesisCurveFactor=0.8; FractionPAR=0.5; ReferenceCO2=380; CO2EffectScaleFactor=700; CO2EffectOffsetFactor=600; CO2EffectMinimum=0.7; CO2EffectExponent=2; ReproSeasonDurationCoeff=2; ReproSeasonShouldersLengthFactor=1; ReproSeasonOnsetDurationFactor=0.6; RelativeTurnoverEmerging=2; DetachmentDroughtCoefficient=3; DetachmentDroughtEffectMin=0.1; TurnoverStockFactor=0.01; TurnoverDefoliationEffectMin=0.025; MinimumGreenLeafProp=0.8; MinimumGreenRootProp=0.5
            initialDMFractionsLegumes=[0.16, 0.23, 0.22, 0.05, 0.03, 0.05, 0.05, 0.01, 0.04, 0.08, 0.08]
            LinearInterpolationFunction FVPDFunction
          Soil: SoilType=NZ_Sedimentary; LocalName=Lismore; Site=Winchmore; NearestTown=Ashburton; Region=Canterbury; Country=New Zealand; Latitude=-48.48; Longitude=0
            Chemical: Thickness=[150, 150, 200, 150, 250, 300, 300]; PH=[6, 6, 6, 6, 6, 6, 6]; PHUnits=Water
            Physical
              Thickness  ParticleSizeClay  BD    AirDry  LL15   DUL    SAT   KS
              150        20                1.3   0.05    0.15   0.36   0.45  5000
              150        15                1.35  0.12    0.14   0.34   0.43  2500
              200        12                1     0.055   0.055  0.19   0.25  3000
              150        8                 0.53  0.015   0.015  0.065  0.15  10000
              250        6                 0.31  0.01    0.01   0.04   0.11  17500
              300        5                 0.3   0.01    0.01   0.03   0.11  20000
              300        5                 0.3   0.01    0.01   0.03   0.11  20000
              SoilCrop AGPRyegrassSoil: LL=[0.15, 0.14, 0.06, 0.02, 0.01, 0.01, 0.01]; KL=[0.1, 0.1, 0.08, 0.04, 0.01, 0, 0]; XF=[1, 1, 1, 1, 1, 0, 0]
              SoilCrop AGPWhiteCloverSoil: LL=[0.15, 0.14, 0.06, 0.02, 0.01, 0.01, 0.01]; KL=[0.1, 0.1, 0.08, 0.04, 0.01, 0, 0]; XF=[1, 1, 1, 1, 1, 0, 0]
            WaterBalance SoilWater: SummerDate=1-Nov; SummerU=6; SummerCona=3.5; WinterDate=1-apr; WinterU=2; WinterCona=2; DiffusConst=88; DiffusSlope=35; Salb=0.13; CN2Bare=73; CNRed=20; CNCov=0.8; DischargeWidth=0; CatchmentArea=0; PSIDul=-100
              Thickness  SWCON  KLAT
              150        0.5    0
              150        0.52   0
              200        0.55   0
              150        0.6    0
              250        0.65   0
              300        0.65   0
              300        0.65   0
            Organic: FOMCNRatio=40; CarbonUnits=Total
              Thickness  Carbon  SoilCNRatio  FBiom  FInert  FOM
              150        3       12           0.04   0.5     331.337
              150        1       12           0.02   0.7     245.461
              200        0.6     12           0.02   0.83    164.537
              150        0.4     12           0.01   0.9     121.892
              250        0.25    12           0.01   0.95    73.9313
              300        0.15    12           0      0.99    40.5743
              300        0.1     12           0      0.99    22.2677
            Water: Thickness=[150, 150, 200, 150, 250, 300, 300]; InitialValues=[0.349, 0.33, 0.183, 0.062, 0.038, 0.029, 0.029]; InitialPAWmm=109.4; RelativeTo=LL15; FilledFromTop=false
            SoilTemperature: CONSTANT_TEMPdepth=10; Thickness=[100, 150, 200, 150, 250, 300, 300]; InitialValues=[0, 0, 0, 0, 0, 0, 0]
            Nutrient
            Solute NO3: Thickness=[150, 150, 200, 150, 250, 300, 300]; InitialValues=[5, 2.5, 1, 0.75, 0.5, 0.5, 0.5]; InitialValuesUnits=ppm; WaterTableConcentration=0; D0=0; DepthConstant=0; MaxDepthSoluteAccessible=0; RunoffEffectivenessAtMovingSolute=0; MaxEffectiveRunoff=0
            Solute NH4: Thickness=[150, 150, 200, 150, 250, 300, 300]; InitialValues=[0.1, 0.1, 0.1, 0.1, 0.1, 0.1, 0.1]; InitialValuesUnits=ppm; WaterTableConcentration=0; D0=0; DepthConstant=0; MaxDepthSoluteAccessible=0; RunoffEffectivenessAtMovingSolute=0; MaxEffectiveRunoff=0
            Solute Urea: Thickness=[150, 150, 200, 150, 250, 300, 300]; InitialValues=[0, 0, 0, 0, 0, 0, 0]; InitialValuesUnits=kg/ha; WaterTableConcentration=0; D0=0; DepthConstant=0; MaxDepthSoluteAccessible=0; RunoffEffectivenessAtMovingSolute=0; MaxEffectiveRunoff=0
          Report ReportInitialisation: EventNames=[Clock].EndOfDay
            VariableNames:
              [Clock].Today as Date
              [Soil].SoilTemperature.AverageSoilTemp[1] as AveSoilTemp@0050mm
              [Soil].SoilTemperature.AverageSoilTemp[1] as AveSoilTemp@0075mm
              [Soil].SoilTemperature.AverageSoilTemp[3] as AveSoilTemp@0100mm
              [Soil].SoilTemperature.AverageSoilTemp[3] as AveSoilTemp@0350mm
              [Soil].SoilTemperature.AverageSoilTemp[5] as AveSoilTemp@0725mm
              [Soil].SoilTemperature.AverageSoilTemp[6] as AveSoilTemp@1000mm
              [Soil].SoilTemperature.AverageSoilTemp[7] as AveSoilTemp@1300mm
  Folder Initialisation Time of Year
    Memo
      The initialisation algorithm is not equally good at all times of the year or at all depths. Needs attention. Until exercise caution, particularlly at depth.
    Experiment InitialisationTimeOfYear
      Factors
        Factor
          Specification=[Clock].StartDate = 1980-07-01, 1980-10-15, 1981-01-01, 1981-04-15
      Simulation InitialisationToY
        Clock: Start=1980-07-01; End=1983-06-30
        Weather: FileName=%root%/Examples/WeatherFiles/lincoln.met
        MicroClimate: a_interception=0; b_interception=1; c_interception=0; d_interception=0; SoilHeatFluxFraction=0.4; MinimumHeightDiffForNewLayer=0; NightInterceptionFraction=0.5; ReferenceHeight=2
        Forages: same as Initialisation Choices.InitialisationChoices.InitialisationChoices.Forages
        SoilArbitrator
        Summary
        Zone Field: Area=1; Slope=0; AspectAngle=0; Altitude=50
          SimpleGrazing: same as Initialisation Choices.InitialisationChoices.InitialisationChoices.Field.SimpleGrazing
          Manager FertiliseFixedDates
            EachYear = True
            Dates = 5-jan, 5-feb, 5-mar, 5-apr, 5-aug, 5-sep, 5-oct, 5-nov, 5-dec
            UseCritNThreshold = False
            CritNThreshold = 50
            CritNDepth = 75
            Depth = 50
            Amount = 15
            FertiliserType = UreaN
            script: same as in Initialisation Choices.InitialisationChoices.InitialisationChoices.Field.FertiliseFixedDates
          Manager AutomaticIrrigation: same as Initialisation Choices.InitialisationChoices.InitialisationChoices.Field.AutomaticIrrigation
          Irrigation
          Fertiliser
          SurfaceOrganicMatter: InitialResidueName=Sward; InitialResidueType=grass; InitialResidueMass=1000; InitialStandingFraction=0; InitialCPR=0; InitialCNR=15
          PastureSpecies AGPRyegrass: same as Initialisation Choices.InitialisationChoices.InitialisationChoices.Field.AGPRyegrass
          PastureSpecies AGPWhiteClover: same as Initialisation Choices.InitialisationChoices.InitialisationChoices.Field.AGPWhiteClover
          Soil: SoilType=NZ_Sedimentary; LocalName=Lismore; Site=Winchmore; NearestTown=Ashburton; Region=Canterbury; Country=New Zealand; Latitude=-48.48; Longitude=0
            Chemical: Thickness=[150, 150, 200, 150, 250, 300, 300]; PH=[6, 6, 6, 6, 6, 6, 6]; PHUnits=Water
            Physical: same as Initialisation Choices.InitialisationChoices.InitialisationChoices.Field.Soil.Physical
            WaterBalance SoilWater: same as Initialisation Choices.InitialisationChoices.InitialisationChoices.Field.Soil.SoilWater
            Organic: same as Initialisation Choices.InitialisationChoices.InitialisationChoices.Field.Soil.Organic
            Water: Thickness=[150, 150, 200, 150, 250, 300, 300]; InitialValues=[0.349, 0.33, 0.183, 0.062, 0.038, 0.029, 0.029]; InitialPAWmm=109.4; RelativeTo=LL15; FilledFromTop=false
            SoilTemperature: CONSTANT_TEMPdepth=10
            Nutrient
            Solute NO3: same as Initialisation Choices.InitialisationChoices.InitialisationChoices.Field.Soil.NO3
            Solute NH4: same as Initialisation Choices.InitialisationChoices.InitialisationChoices.Field.Soil.NH4
            Solute Urea: same as Initialisation Choices.InitialisationChoices.InitialisationChoices.Field.Soil.Urea
          Report ReportInitialisationToY: same as Initialisation Choices.InitialisationChoices.InitialisationChoices.Field.ReportInitialisation
  Folder Resetting SoilTemperature
    Memo
      SoilTemperature allows the user to reset the simulated temperature at any time during the simulation with options of resetting to the values from the start of the simulation or to values specified by depth. Resetting is achieved using an Operations component.

      The plots below have the temperature not reset at all (black) compared against a reset to the initial values on 1 September and a further reset to 6 C in every layer on 1 November (ochre). The commands to do the resetting are:

      	1980-09-01 [SoilTemperature].Reset()

      	1980-11-01 [SoilTemperature].Reset(6 6 6 6 6 6 6)

      Note that if specific values are wanted (as opposed to the initial values), then the user must specify a value for each layer in a space-delimited format. If a LayerStructure is used in the soil then the layers in the reset command align to those in LayerStructure.

      Further note that the values are reset at the start of the simulation day.
    Experiment Resetting
      Factors
        CompositeFactor NoReset: Specifications=[Operations]
          Operations
        CompositeFactor Resets: Specifications=[Operations]
          Operations
            1980-09-01  [SoilTemperature].Reset()
            1980-11-01  [SoilTemperature].Reset(6 6 6 6 6 6 6)
      Simulation Reset
        Clock: Start=1980-07-01; End=1980-12-31
        Weather: FileName=%root%/Examples/WeatherFiles/lincoln.met
        MicroClimate: a_interception=0; b_interception=1; c_interception=0; d_interception=0; SoilHeatFluxFraction=0.4; MinimumHeightDiffForNewLayer=0; NightInterceptionFraction=0.5; ReferenceHeight=2
        Forages: same as Initialisation Choices.InitialisationChoices.InitialisationChoices.Forages
        SoilArbitrator
        Summary
        Zone Field: Area=1; Slope=0; AspectAngle=0; Altitude=50
          Operations
          SimpleGrazing: same as Initialisation Choices.InitialisationChoices.InitialisationChoices.Field.SimpleGrazing
          Manager FertiliseFixedDates: same as Initialisation Choices.InitialisationChoices.InitialisationChoices.Field.FertiliseFixedDates
          Manager AutomaticIrrigation: same as Initialisation Choices.InitialisationChoices.InitialisationChoices.Field.AutomaticIrrigation
          Irrigation
          Fertiliser
          SurfaceOrganicMatter: InitialResidueName=Sward; InitialResidueType=grass; InitialResidueMass=1000; InitialStandingFraction=0; InitialCPR=0; InitialCNR=15
          PastureSpecies AGPRyegrass: same as Initialisation Choices.InitialisationChoices.InitialisationChoices.Field.AGPRyegrass
          PastureSpecies AGPWhiteClover: same as Initialisation Choices.InitialisationChoices.InitialisationChoices.Field.AGPWhiteClover
          Soil: same as Initialisation Time of Year.InitialisationTimeOfYear.InitialisationToY.Field.Soil
          Report ReportResetting: same as Initialisation Choices.InitialisationChoices.InitialisationChoices.Field.ReportInitialisation
  Folder SensibilityTests
    Experiment ExpClay
      Memo
        It is expected that soil temperature will show a sensitivity to soil properties, such as clay content. From theory, as the clay content increases then the ability to store heat increases. This effect should be evident when examining plots of soil temperature, comparing the effects of day-to-day air temperature oscillations and the annual oscillation cycle. A soil with higher clay content compared to one with a lower clay content, all other things including water content being held constant, should show a more muted effect of the oscillations and a greater delay between the peak air temperature and the peak in soil temperature. Shorter-term oscillations should also be dampened down more quickly with depth.

        The plots below show these effects for a bare soil with a clay content of 10 and 90% held at a volumetric water content of 0.15.
      Factors
        Factor ClayContent
          CompositeFactor Clay10
            Specifications=[Soil].Physical.ParticleSizeClay = 10, 10, 10, 10, 10, 10, 10, 10
          CompositeFactor Clay90: Specifications=[Soil].Physical.ParticleSizeClay = 95,95,95,95,95,95,95,95
      Simulation ClayContent
        Clock: Start=2000-01-01; End=2006-12-31
        Weather: FileName=AnalyticalWeather.xlsx; ExcelWorkSheetName=CoolAdd2WeeklyOsc
        MicroClimate: a_interception=0; b_interception=0; c_interception=0; d_interception=0; SoilHeatFluxFraction=0; MinimumHeightDiffForNewLayer=0; NightInterceptionFraction=0; ReferenceHeight=2
        Summary
        Zone Field: Area=1; Slope=0; AspectAngle=0; Altitude=50
          Manager DummyWaterBalance
            SW = 0.15, 0.15, 0.15, 0.15, 0.15, 0.15, 0.15, 0.15, 0.15, 0.15, 0.15, 0.15, 0.15, 0.15, 0.15, 0.15, 0.15, 0.15, 0.15
            Eos = 0
            Es = 0
            Eo = 0
            Salb = 0
            script: same as in Effect of Soil Layering.LayeringEffectThin.FieldThin.DummyWaterBalance
          Soil: Latitude=0; Longitude=0
            Water: Thickness=[100, 100, 800, 5000]; InitialValues=[0.16, 0.16, 0.16, 0.16]; InitialPAWmm=660; RelativeTo=LL15; FilledFromTop=true
            Physical
              Thickness  ParticleSizeClay  BD   AirDry  LL15  DUL   SAT
              100        9                 1.5  0.01    0.05  0.16  0.29
              100        9                 1.5  0.01    0.05  0.16  0.29
              800        9                 1.5  0.01    0.05  0.16  0.29
              5000       9                 1.5  0.01    0.05  0.16  0.29
              999999     -                 -    -       -     -     -
              999999     -                 -    -       -     -     -
              999999     -                 -    -       -     -     -
              999999     -                 -    -       -     -     -
            Organic: FOMCNRatio=60; CarbonUnits=Total
              Thickness  Carbon  SoilCNRatio  FBiom  FInert  FOM
              100        2       14.5         0.04   0.4     0.294
              100        2       14.5         0.04   0.4     0.294
              800        2       14.5         0.04   0.4     0.294
              5000       2       14.5         0.04   0.4     0.294
            Chemical: Thickness=[100, 100, 800, 5000]; PH=[6.5, 6.5, 6.5, 6.5]; PHUnits=Water
            SoilTemperature: CONSTANT_TEMPdepth=0
            Solute NO3: Thickness=[6000]; InitialValues=[0.1]; InitialValuesUnits=kg/ha; WaterTableConcentration=0; D0=0; DepthConstant=0; MaxDepthSoluteAccessible=0; RunoffEffectivenessAtMovingSolute=0; MaxEffectiveRunoff=0
            Solute NH4: Thickness=[2000]; InitialValues=[1]; InitialValuesUnits=kg/ha; WaterTableConcentration=0; D0=0; DepthConstant=0; MaxDepthSoluteAccessible=0; RunoffEffectivenessAtMovingSolute=0; MaxEffectiveRunoff=0
            Solute Urea: Thickness=[6000]; InitialValues=[0]; InitialValuesUnits=kg/ha; WaterTableConcentration=0; D0=0; DepthConstant=0; MaxDepthSoluteAccessible=0; RunoffEffectivenessAtMovingSolute=0; MaxEffectiveRunoff=0
            LayerStructure
              Thickness=[25, 50, 50, 75, 200, 200, 300, 200, 300, 200, 200, 200, 500, 500, 500, 500, 500, 400, 200]
          Report
            VariableNames:
              [Clock].Today as Date
              [Weather].MaxT as MaxT
              [Weather].MinT as MinT
              [Soil].SoilTemperature.AverageSoilTemp[1] as AverageSoilTemp@0012mm
              [Soil].SoilTemperature.AverageSoilTemp[2] as AverageSoilTemp@0050mm
              [Soil].SoilTemperature.AverageSoilTemp[3] as AverageSoilTemp@0100mm
              [Soil].SoilTemperature.AverageSoilTemp[4] as AverageSoilTemp@0160mm
              [Soil].SoilTemperature.AverageSoilTemp[5] as AverageSoilTemp@0300mm
              [Soil].SoilTemperature.AverageSoilTemp[6] as AverageSoilTemp@0500mm
              [Soil].SoilTemperature.AverageSoilTemp[7] as AverageSoilTemp@0750mm
              [Soil].SoilTemperature.AverageSoilTemp[8] as AverageSoilTemp@1000mm
              [Soil].SoilTemperature.AverageSoilTemp[9] as AverageSoilTemp@1250mm
              [Soil].SoilTemperature.AverageSoilTemp[10] as AverageSoilTemp@1500mm
              [Soil].SoilTemperature.AverageSoilTemp[11] as AverageSoilTemp@1700mm
              [Soil].SoilTemperature.AverageSoilTemp[12] as AverageSoilTemp@1900mm
              [Soil].SoilTemperature.AverageSoilTemp[13] as AverageSoilTemp@2250mm
              [Soil].SoilTemperature.AverageSoilTemp[14] as AverageSoilTemp@2750mm
              [Soil].SoilTemperature.AverageSoilTemp[15] as AverageSoilTemp@3250mm
              [Soil].SoilTemperature.AverageSoilTemp[16] as AverageSoilTemp@3750mm
              [Soil].SoilTemperature.AverageSoilTemp[17] as AverageSoilTemp@4250mm
              [Soil].SoilTemperature.AverageSoilTemp[18] as AverageSoilTemp@4700mm
              [Soil].SoilTemperature.AverageSoilTemp[19] as AverageSoilTemp@5000mm
              [Soil].SoilTemperature.MaxSoilTemp[1] as MaxSoilTemp@0012mm
              [Soil].SoilTemperature.MaxSoilTemp[2] as MaxSoilTemp@0050mm
              [Soil].SoilTemperature.MaxSoilTemp[3] as MaxSoilTemp@0100mm
              [Soil].SoilTemperature.MaxSoilTemp[4] as MaxSoilTemp@0160mm
              [Soil].SoilTemperature.MaxSoilTemp[5] as MaxSoilTemp@0300mm
              [Soil].SoilTemperature.MaxSoilTemp[6] as MaxSoilTemp@0500mm
              [Soil].SoilTemperature.MaxSoilTemp[7] as MaxSoilTemp@0750mm
              [Soil].SoilTemperature.MaxSoilTemp[8] as MaxSoilTemp@1000mm
              [Soil].SoilTemperature.MaxSoilTemp[9] as MaxSoilTemp@1250mm
              [Soil].SoilTemperature.MaxSoilTemp[10] as MaxSoilTemp@1500mm
              [Soil].SoilTemperature.MaxSoilTemp[11] as MaxSoilTemp@1700mm
              [Soil].SoilTemperature.MaxSoilTemp[12] as MaxSoilTemp@1900mm
              [Soil].SoilTemperature.MaxSoilTemp[13] as MaxSoilTemp@2250mm
              [Soil].SoilTemperature.MaxSoilTemp[14] as MaxSoilTemp@2750mm
              [Soil].SoilTemperature.MaxSoilTemp[15] as MaxSoilTemp@3250mm
              [Soil].SoilTemperature.MaxSoilTemp[16] as MaxSoilTemp@3750mm
              [Soil].SoilTemperature.MaxSoilTemp[17] as MaxSoilTemp@4250mm
              [Soil].SoilTemperature.MaxSoilTemp[18] as MaxSoilTemp@4700mm
              [Soil].SoilTemperature.MaxSoilTemp[19] as MaxSoilTemp@5000mm
            EventNames:
              Clock.Today >= new DateTime(2005, 1, 1)
              //[Clock].EndOfDay
    Experiment ExpLowerBC
      Memo
        The assumed lower boundary condition is that of the location’s annual average temperature. That value is asserted as the temperature of the deepest layer in the soil temperature simulation (see the implementation description for more information – this is substantially deeper than the soil profile usually used in APSIM). By default that depth of constant temperature is set to 20 m but users can override that value.

        Here a test was created to ensure that the lower boundary depth was sufficiently deep. A successful test is achieved when deepening the lower boundary has no substantive effect on the simulated temperatures. The plots below demonstrate this.
      Factors
        Factor LowerBC: Specification=[SetLowerBCDepth].Script.LowerBCDepth = 20, 30, 40
      Simulation LowerBC
        Clock: Start=2000-01-01; End=2006-12-31
        Weather: FileName=AnalyticalWeather.xlsx; ExcelWorkSheetName=CoolAdd2WeeklyOsc
        MicroClimate: a_interception=0; b_interception=0; c_interception=0; d_interception=0; SoilHeatFluxFraction=0; MinimumHeightDiffForNewLayer=0; NightInterceptionFraction=0; ReferenceHeight=2
        Summary
        Zone Field: Area=1; Slope=0; AspectAngle=0; Altitude=50
          Manager DummyWaterBalance
            SW = 0.15, 0.15, 0.15, 0.15, 0.15, 0.15, 0.15, 0.15, 0.15, 0.15, 0.15, 0.15, 0.15, 0.15, 0.15, 0.15, 0.15, 0.15, 0.15, 0.15
            Eos = 0
            Es = 0
            Eo = 0
            Salb = 0
            script: same as in Effect of Soil Layering.LayeringEffectThin.FieldThin.DummyWaterBalance
          Manager SetLowerBCDepth
            LowerBCDepth = 20
```csharp
using Models.Soils;
using System;
using System.Linq;
using Models.Core;
using Models.PMF;
using APSIM.Shared.Utilities;
using Models.Soils.SoilTemp;

namespace Models
{
    [Serializable]
    public class Script : Model
    {
        [Link] Clock Clock;
        [Link] SoilTemperature soilTemperature;
        
        [Description("Depth of constant temperature BC? (m)")] 
        public double LowerBCDepth { get; set; }

        
        [EventSubscribe("StartOfSimulation")]
        private void OnStartOfSimulation(object sender, EventArgs e)
        {
        	soilTemperature.CONSTANT_TEMPdepth = LowerBCDepth;
        }
    }
}
```
          Soil: Latitude=0; Longitude=0
            Water: Thickness=[100, 100, 800, 5000]; InitialValues=[0.16, 0.16, 0.16, 0.16]; InitialPAWmm=660; RelativeTo=LL15; FilledFromTop=true
            Physical
              Thickness  ParticleSizeClay  BD   AirDry  LL15  DUL   SAT
              100        10                1.5  0.01    0.05  0.16  0.29
              100        10                1.5  0.01    0.05  0.16  0.29
              800        10                1.5  0.01    0.05  0.16  0.29
              9000       10                1.5  0.01    0.05  0.16  0.29
            Organic: FOMCNRatio=60; CarbonUnits=Total
              Thickness  Carbon  SoilCNRatio  FBiom  FInert  FOM
              100        2       14.5         0.04   0.4     0.294
              100        2       14.5         0.04   0.4     0.294
              800        2       14.5         0.04   0.4     0.294
              5000       2       14.5         0.04   0.4     0.294
            Chemical: Thickness=[100, 100, 800, 5000]; PH=[6.5, 6.5, 6.5, 6.5]; PHUnits=Water
            SoilTemperature: CONSTANT_TEMPdepth=0
            Solute NO3: Thickness=[6000]; InitialValues=[0.1]; InitialValuesUnits=kg/ha; WaterTableConcentration=0; D0=0; DepthConstant=0; MaxDepthSoluteAccessible=0; RunoffEffectivenessAtMovingSolute=0; MaxEffectiveRunoff=0
            Solute NH4: Thickness=[2000]; InitialValues=[1]; InitialValuesUnits=kg/ha; WaterTableConcentration=0; D0=0; DepthConstant=0; MaxDepthSoluteAccessible=0; RunoffEffectivenessAtMovingSolute=0; MaxEffectiveRunoff=0
            Solute Urea: Thickness=[6000]; InitialValues=[0]; InitialValuesUnits=kg/ha; WaterTableConcentration=0; D0=0; DepthConstant=0; MaxDepthSoluteAccessible=0; RunoffEffectivenessAtMovingSolute=0; MaxEffectiveRunoff=0
            LayerStructure
              Thickness=[25, 50, 50, 75, 200, 200, 300, 200, 300, 200, 200, 200, 1000, 1000, 1000, 1000, 1000, 1000, 1000, 1000]
          Report
            VariableNames:
              [Clock].Today as Date
              [Weather].MaxT as MaxT
              [Weather].MinT as MinT
              [Soil].SoilTemperature.AverageSoilTemp[1] as AverageSoilTemp@0012mm
              [Soil].SoilTemperature.AverageSoilTemp[2] as AverageSoilTemp@0050mm
              [Soil].SoilTemperature.AverageSoilTemp[3] as AverageSoilTemp@0100mm
              [Soil].SoilTemperature.AverageSoilTemp[4] as AverageSoilTemp@0160mm
              [Soil].SoilTemperature.AverageSoilTemp[5] as AverageSoilTemp@0300mm
              [Soil].SoilTemperature.AverageSoilTemp[6] as AverageSoilTemp@0500mm
              [Soil].SoilTemperature.AverageSoilTemp[7] as AverageSoilTemp@0750mm
              [Soil].SoilTemperature.AverageSoilTemp[8] as AverageSoilTemp@1000mm
              [Soil].SoilTemperature.AverageSoilTemp[9] as AverageSoilTemp@1250mm
              [Soil].SoilTemperature.AverageSoilTemp[10] as AverageSoilTemp@1500mm
              [Soil].SoilTemperature.AverageSoilTemp[11] as AverageSoilTemp@1700mm
              [Soil].SoilTemperature.AverageSoilTemp[12] as AverageSoilTemp@1900mm
              [Soil].SoilTemperature.AverageSoilTemp[20] as AverageSoilTemp@10000mm
              [Soil].SoilTemperature.MaxSoilTemp[1] as MaxSoilTemp@0012mm
              [Soil].SoilTemperature.MaxSoilTemp[2] as MaxSoilTemp@0050mm
              [Soil].SoilTemperature.MaxSoilTemp[3] as MaxSoilTemp@0100mm
              [Soil].SoilTemperature.MaxSoilTemp[4] as MaxSoilTemp@0160mm
              [Soil].SoilTemperature.MaxSoilTemp[5] as MaxSoilTemp@0300mm
              [Soil].SoilTemperature.MaxSoilTemp[6] as MaxSoilTemp@0500mm
              [Soil].SoilTemperature.MaxSoilTemp[7] as MaxSoilTemp@0750mm
              [Soil].SoilTemperature.MaxSoilTemp[8] as MaxSoilTemp@1000mm
              [Soil].SoilTemperature.MaxSoilTemp[9] as MaxSoilTemp@1250mm
              [Soil].SoilTemperature.MaxSoilTemp[10] as MaxSoilTemp@1500mm
              [Soil].SoilTemperature.MaxSoilTemp[11] as MaxSoilTemp@1700mm
              [Soil].SoilTemperature.MaxSoilTemp[12] as MaxSoilTemp@1900mm
            EventNames:
              Clock.Today >= new DateTime(2005, 1, 1)
              //[Clock].EndOfDay
    Experiment Analytical
      Factors
        Factor Site: Specification=[Weather].ExcelWorkSheetName=Warm,Cool
      Simulation ComparisonWithAnalytical
        Memo
          The intention for the analytical solution is to test the numerics and also if the soil layering that most people use (many centimetres even at the surface) with SoilWater are causing any issues with the quality of the solution. This would be under highly idealised conditions but is a necessary step - the advantage is that it is only testing the soil temperature solution (not the water, crop, ...).

          * set up the soil water model such that the profile is uniform (all the same water content, bulk density, texture, carbon) with no crop and there are no changes in water content with time. I can't exactly remember how I did this last time but I would try setting it up with the soil at LL15 (are going to need a few different levels of this for testing) and if that didn't work then at SAT with Ksat and swcon = 0

          * need a couple of artificial weather files at latitude = 0 degrees, no rainfall, no radiation, and with air temperature of varying amplitude and average as from the spreadsheet

          Need to start with soil layers of about 1 cm each (where are pretty confident that the solution will work) but be set up to expand these out to more normal layering (can probably use the layering component for these).

          With the above, use the spreadsheet outputs as validation/testing data for the idealised setting for various depths in the soil. Would also like to understand how well the model copes with initial soil temperatures.

          After that, test things that should affect damping depth (bulk density, carbon, water content, texture ...)

          Notes:

          * The simulation reads dummy weather data from AnalyticalWeather.xlsx.

          * The soil physical node has a uniform profile specified.

          * The water balance component has been replaced by a manager script (DummyWaterBalance) that ensures water content (a user specified parameter) does not change during the simulation.

          * A 'LayerStructure' component can be added to the soil to get 1cm layers. There is a 'LayerStructure' component in the Wagga simulation that can be copied/pasted.
        Clock: Start=2000-01-01; End=2000-12-31
        Weather: FileName=AnalyticalWeather.xlsx; ExcelWorkSheetName=Warm
        Summary
        Zone Field: Area=1; Slope=0; AspectAngle=0; Altitude=50
          MicroClimate: a_interception=0; b_interception=0; c_interception=0; d_interception=0; SoilHeatFluxFraction=0; MinimumHeightDiffForNewLayer=0; NightInterceptionFraction=0; ReferenceHeight=2
          Manager DummyWaterBalance
            SW = 0.05, 0.05, 0.05, 0.05, 0.05, 0.05, 0.05, 0.05
            Eos = 0
            Es = 0
            Eo = 0
            Salb = 0
            script: same as in Effect of Soil Layering.LayeringEffectThin.FieldThin.DummyWaterBalance
          Soil: Latitude=0; Longitude=0
            Water: Thickness=[100, 100, 200, 300, 300, 300, 200, 300]; InitialValues=[0.16, 0.16, 0.16, 0.16, 0.16, 0.16, 0.16, 0.16]; InitialPAWmm=198; RelativeTo=LL15; FilledFromTop=true
            Physical
              Thickness  ParticleSizeClay  BD   AirDry  LL15  DUL   SAT
              100        9                 1.5  0.01    0.05  0.16  0.29
              100        9                 1.5  0.01    0.05  0.16  0.29
              200        9                 1.5  0.01    0.05  0.16  0.29
              300        9                 1.5  0.01    0.05  0.16  0.29
              300        9                 1.5  0.01    0.05  0.16  0.29
              300        9                 1.5  0.01    0.05  0.16  0.29
              200        9                 1.5  0.01    0.05  0.16  0.29
              300        9                 1.5  0.01    0.05  0.16  0.29
            Organic: same as Effect of Soil Layering.LayeringEffectThin.FieldThin.Soil.Organic
            Chemical: Thickness=[100, 300, 600, 1000, 1000, 1000, 1000, 1000]; PH=[6.5, 6.5, 6.5, 6.5, 6.5, 6.5, 6.5, 6.5]; PHUnits=Water
            SoilTemperature: CONSTANT_TEMPdepth=10
            Solute NO3: same as ValidationTests.Wagga.Wagga.Plantation.Soil.NO3
            Solute NH4: same as ValidationTests.Wagga.Wagga.Plantation.Soil.NH4
            Solute Urea: same as ValidationTests.Wagga.Wagga.Plantation.Soil.Urea
          Report AnalyticalReport: EventNames=[Clock].DoReport
            VariableNames:
              [Clock].Today as Date
              [Soil].SoilTemperature.AverageSoilTemp
              [Soil].SoilTemperature.AverageSoilTemp[1] as SoilTemperature@1
              [Soil].SoilTemperature.AverageSoilTemp[2] as SoilTemperature@20
              [Soil].SoilTemperature.AverageSoilTemp[6] as SoilTemperature@150
  Folder Comparison of Temperature Models
    Folder Wheat in Australia
      Simulation WheatAustraliaEPIC
        Clock: Start=1991-01-01; End=2000-12-31
        Summary
        Weather: FileName=%root%/Examples/WeatherFiles/Dalby.met
        SoilArbitrator
        MicroClimate: a_interception=0; b_interception=1; c_interception=0; d_interception=0; SoilHeatFluxFraction=0.4; MinimumHeightDiffForNewLayer=0; NightInterceptionFraction=0.5; ReferenceHeight=2
        Zone Field: Area=1; Slope=0; AspectAngle=0; Altitude=50
          Manager Sow using a variable rule
            Crop = [Wheat]
            StartDate = 1-may
            EndDate = 10-jul
            MinESW = 100
            MinRain = 25
            RainDays = 7
            CultivarName = Hartog
            SowingDepth = 30
            RowSpacing = 250
            Population = 120
```csharp
using Models.Interfaces;
using APSIM.Shared.Utilities;
using Models.Utilities;
using Models.Soils;
using Models.PMF;
using Models.Core;
using System;
using System.Linq;
using Models.Climate;

namespace Models
{
    [Serializable]
    public class Script : Model
    {
        [Link] private Clock Clock;
        [Link] private Fertiliser Fertiliser;
        [Link] private Summary Summary;
        [Link] private Soil Soil;
        private Accumulator accumulatedRain;
        [Link]
        private ISoilWater waterBalance;
        
        [Description("Crop")]
        public IPlant Crop { get; set; }

        [Description("Start of sowing window (d-mmm)")]
        public string StartDate { get; set; }

        [Description("End of sowing window (d-mmm)")]
        public string EndDate { get; set; }

        [Description("Minimum extractable soil water for sowing (mm)")]
        public double MinESW { get; set; }

        [Description("Accumulated rainfall required for sowing (mm)")]
        public double MinRain { get; set; }

        [Description("Duration of rainfall accumulation (d)")]
        public int RainDays { get; set; }

        [Display(Type = DisplayType.CultivarName)]
        [Description("Cultivar to be sown")]
        public string CultivarName { get; set; }

        [Description("Sowing depth (mm)")]
        public double SowingDepth { get; set; }

        [Description("Row spacing (mm)")]
        public double RowSpacing { get; set; }

        [Description("Plant population (/m2)")]
        public double Population { get; set; }
        
        
        [EventSubscribe("StartOfSimulation")]
        private void OnSimulationCommencing(object sender, EventArgs e)
        {
            accumulatedRain = new Accumulator(this, "[Weather].Rain", RainDays);
        }

        [EventSubscribe("DoManagement")]
        private void OnDoManagement(object sender, EventArgs e)
        {
            accumulatedRain.Update();
            
            if (DateUtilities.WithinDates(StartDate, Clock.Today, EndDate) &&
                !Crop.IsAlive &&
                MathUtilities.Sum(waterBalance.ESW) > MinESW &&
                accumulatedRain.Sum > MinRain)
            {
                Crop.Sow(population: Population, cultivar: CultivarName, depth: SowingDepth, rowSpacing: RowSpacing);    
            }
        }
    }
}
```
          Manager Harvest
            Crop = [Wheat]
            script: same as in ValidationTests.USA.CornSoy.COBSSystemCS.Paddock.HarvestMaize
          Manager Fertilise at sowing
            Crop = [Wheat]
            FertiliserType = NO3N
            Amount = 160
```csharp
using Models.Soils;
using System;
using System.Linq;
using Models.Core;
using Models.PMF;
namespace Models
{
    [Serializable]
    public class Script : Model
    {
        [Link] Clock Clock;
        [Link] Fertiliser Fertiliser;
        
        [Description("Crop to be fertilised")]
        public IPlant Crop { get; set; }

        [Description("Type of fertiliser to apply? ")] 
        public Fertiliser.Types FertiliserType { get; set; }
    
        [Description("Amount of fertiliser to be applied (kg/ha)")]
        public double Amount { get; set; }
        
        [EventSubscribe("Sowing")]
        private void OnSowing(object sender, EventArgs e)
        {
            Model crop = sender as Model;
            if (Crop != null && crop.Name.ToLower() == (Crop as IModel).Name.ToLower())
                Fertiliser.Apply(Amount: Amount, Type: FertiliserType);
        }
    }
}
```
          Fertiliser
          SurfaceOrganicMatter: InitialResidueName=wheat_stubble; InitialResidueType=wheat; InitialResidueMass=500; InitialStandingFraction=0; InitialCPR=0; InitialCNR=100
          Soil: ASCOrder=Vertosol; ASCSubOrder=Black; SoilType=Clay; Site=Norwin; NearestTown=Norwin; Region=Darling Downs and Granite Belt; State=Queensland; Country=Australia; NaturalVegetation=Qld. Bluegrass, possible Qld. Blue gum; ApsoilNumber=900; Latitude=-27.581836; Longitude=151.320206; LocationAccuracy=+/- 20m; YearOfSampling=0
            DataSource=CSIRO Sustainable Ecosystems, Toowoomba; Characteriesd as part of the GRDC funded project"Doing it better, doing it smarter, managing soil water in Australian agriculture' 2011
            Comments=Clay - OC, CLL for all crops estimated-based on Bongeen Mywybilla Soil No1
            Physical
              Thickness  BD     AirDry  LL15   DUL    SAT    KS
              150        1.011  0.13    0.261  0.521  0.589  20
              150        1.071  0.199   0.248  0.497  0.566  20
              300        1.094  0.28    0.28   0.488  0.557  20
              300        1.159  0.28    0.28   0.48   0.533  20
              300        1.173  0.28    0.28   0.472  0.527  20
              300        1.163  0.28    0.28   0.457  0.531  20
              300        1.187  0.28    0.28   0.452  0.522  20
              SoilCrop WheatSoil: LL=[0.261, 0.248, 0.28, 0.306, 0.36, 0.392, 0.446]; KL=[0.06, 0.06, 0.06, 0.04, 0.04, 0.02, 0.01]; XF=[1, 1, 1, 1, 1, 1, 1]
            WaterBalance SoilWater: SummerDate=1-Nov; SummerU=5; SummerCona=5; WinterDate=1-Apr; WinterU=5; WinterCona=5; DiffusConst=40; DiffusSlope=16; Salb=0.12; CN2Bare=73; CNRed=20; CNCov=0.8; PSIDul=-100; Thickness=[150, 150, 300, 300, 300, 300, 300]; SWCON=[0.3, 0.3, 0.3, 0.3, 0.3, 0.3, 0.3]
            Organic: FOMCNRatio=40; CarbonUnits=Total
              Thickness  Carbon  SoilCNRatio  FBiom  FInert  FOM
              150        1.2     12           0.04   0.4     347.129
              150        0.96    12           0.02   0.6     270.344
              300        0.6     12           0.02   0.8     163.972
              300        0.3     12           0.02   1       99.4541
              300        0.18    12           0.01   1       60.322
              300        0.12    12           0.01   1       36.5871
              300        0.12    12           0.01   1       22.1912
            Chemical: Thickness=[150, 150, 300, 300, 300, 300, 300]; PH=[8, 8, 8, 8, 8, 8, 8]; PHUnits=Water
            Water: Thickness=[150, 150, 300, 300, 300, 300, 300]; InitialValues=[0.521, 0.497, 0.488, 0.48, 0.472, 0.457, 0.452]; InitialPAWmm=361.05; RelativeTo=LL15; FilledFromTop=false
            CERESSoilTemperature Temperature
            Nutrient
            Solute NO3: Thickness=[150, 150, 300, 300, 300, 300, 300]; InitialValues=[1, 1, 1, 1, 1, 1, 1]; InitialValuesUnits=ppm; WaterTableConcentration=0; D0=0; DepthConstant=0; MaxDepthSoluteAccessible=0; RunoffEffectivenessAtMovingSolute=0; MaxEffectiveRunoff=0
            Solute NH4: Thickness=[150, 150, 300, 300, 300, 300, 300]; InitialValues=[0.1, 0.1, 0.1, 0.1, 0.1, 0.1, 0.1]; InitialValuesUnits=ppm; WaterTableConcentration=0; D0=0; DepthConstant=0; MaxDepthSoluteAccessible=0; RunoffEffectivenessAtMovingSolute=0; MaxEffectiveRunoff=0
            Solute Urea: Thickness=[150, 150, 300, 300, 300, 300, 300]; InitialValues=[0, 0, 0, 0, 0, 0, 0]; InitialValuesUnits=kg/ha; WaterTableConcentration=0; D0=0; DepthConstant=0; MaxDepthSoluteAccessible=0; RunoffEffectivenessAtMovingSolute=0; MaxEffectiveRunoff=0
          Plant Wheat
          Report WheatAUOld: EventNames=[Clock].EndOfDay
            VariableNames:
              [Clock].Today as Date
              [Wheat].AboveGround.Wt as Biomass
              [Wheat].Grain.Total.Wt as Grain
              [Soil].Temperature.Value[1] as AveSoilTemp@0100mm
              [Soil].Temperature.Value[7] as AveSoilTemp@1250mm
      Simulation WheatAustraliaNew
        Clock: Start=1991-01-01; End=2000-12-31
        Summary
        Weather: FileName=%root%/Examples/WeatherFiles/Dalby.met
        SoilArbitrator
        MicroClimate: a_interception=0; b_interception=1; c_interception=0; d_interception=0; SoilHeatFluxFraction=0.4; MinimumHeightDiffForNewLayer=0; NightInterceptionFraction=0.5; ReferenceHeight=2
        Zone Field: Area=1; Slope=0; AspectAngle=0; Altitude=50
          Manager Sow using a variable rule: same as Comparison of Temperature Models.Wheat in Australia.WheatAustraliaEPIC.Field.Sow using a variable rule
          Manager Harvest: same as Comparison of Temperature Models.Wheat in Australia.WheatAustraliaEPIC.Field.Harvest
          Manager Fertilise at sowing: same as Comparison of Temperature Models.Wheat in Australia.WheatAustraliaEPIC.Field.Fertilise at sowing
          Fertiliser
          SurfaceOrganicMatter: InitialResidueName=wheat_stubble; InitialResidueType=wheat; InitialResidueMass=500; InitialStandingFraction=0; InitialCPR=0; InitialCNR=100
          Soil: ASCOrder=Vertosol; ASCSubOrder=Black; SoilType=Clay; Site=Norwin; NearestTown=Norwin; Region=Darling Downs and Granite Belt; State=Queensland; Country=Australia; NaturalVegetation=Qld. Bluegrass, possible Qld. Blue gum; ApsoilNumber=900; Latitude=-27.581836; Longitude=151.320206; LocationAccuracy=+/- 20m; YearOfSampling=0
            DataSource=CSIRO Sustainable Ecosystems, Toowoomba; Characteriesd as part of the GRDC funded project"Doing it better, doing it smarter, managing soil water in Australian agriculture' 2011
            Comments=Clay - OC, CLL for all crops estimated-based on Bongeen Mywybilla Soil No1
            Physical
              Thickness  ParticleSizeClay  BD     AirDry  LL15   DUL    SAT    KS
              150        30                1.011  0.13    0.261  0.521  0.589  20
              150        30                1.071  0.199   0.248  0.497  0.566  20
              300        30                1.094  0.28    0.28   0.488  0.557  20
              300        30                1.159  0.28    0.28   0.48   0.533  20
              300        30                1.173  0.28    0.28   0.472  0.527  20
              300        30                1.163  0.28    0.28   0.457  0.531  20
              300        30                1.187  0.28    0.28   0.452  0.522  20
              SoilCrop WheatSoil: LL=[0.261, 0.248, 0.28, 0.306, 0.36, 0.392, 0.446]; KL=[0.06, 0.06, 0.06, 0.04, 0.04, 0.02, 0.01]; XF=[1, 1, 1, 1, 1, 1, 1]
            WaterBalance SoilWater: same as Comparison of Temperature Models.Wheat in Australia.WheatAustraliaEPIC.Field.Soil.SoilWater
            Organic: same as Comparison of Temperature Models.Wheat in Australia.WheatAustraliaEPIC.Field.Soil.Organic
            Chemical: Thickness=[150, 150, 300, 300, 300, 300, 300]; PH=[8, 8, 8, 8, 8, 8, 8]; PHUnits=Water
            Water: Thickness=[150, 150, 300, 300, 300, 300, 300]; InitialValues=[0.521, 0.497, 0.488, 0.48, 0.472, 0.457, 0.452]; InitialPAWmm=361.05; RelativeTo=LL15; FilledFromTop=false
            SoilTemperature: CONSTANT_TEMPdepth=10
            Nutrient
            Solute NO3: same as Comparison of Temperature Models.Wheat in Australia.WheatAustraliaEPIC.Field.Soil.NO3
            Solute NH4: same as Comparison of Temperature Models.Wheat in Australia.WheatAustraliaEPIC.Field.Soil.NH4
            Solute Urea: same as Comparison of Temperature Models.Wheat in Australia.WheatAustraliaEPIC.Field.Soil.Urea
          Plant Wheat
          Report WheatAUNew: EventNames=[Clock].EndOfDay
            VariableNames:
              [Clock].Today as Date
              [Wheat].AboveGround.Wt as Biomass
              [Wheat].Grain.Total.Wt as Grain
              [Soil].SoilTemperature.AverageSoilTemp[1] as AveSoilTemp@0100mm
              [Soil].SoilTemperature.AverageSoilTemp[7] as AveSoilTemp@1250mm
    Folder Pasture in New Zealand
      Simulation PastureNewZealandEPIC
        Clock: Start=1980-07-01; End=1985-06-30
        Weather: FileName=%root%/Examples/WeatherFiles/lincoln.met
        SoilArbitrator
        Summary
        MicroClimate: a_interception=0; b_interception=1; c_interception=0; d_interception=0; SoilHeatFluxFraction=0.4; MinimumHeightDiffForNewLayer=0; NightInterceptionFraction=0.5; ReferenceHeight=2
        Forages
          Parameters:
            IsLive  UseDigestibilityFromModel  MinimumAmount  Name                          DigestibilityString  FractionConsumable
            true    false                      -              -                             -                    -
            false   false                      0              -                             -                    -
            true    false                      100            SurfaceOrganicMatter.Residue  0.7                  1
            false   false                      0              SurfaceOrganicMatter.Residue  0.3                  1
            true    false                      100            AGPRyegrass.Leaf              0.7                  1
            false   false                      0              AGPRyegrass.Leaf              0.3                  1
            true    false                      100            AGPRyegrass.Stem              0.7                  1
            false   false                      0              AGPRyegrass.Stem              0.3                  1
            true    false                      100            AGPRyegrass.Stolon            0.7                  1
            false   false                      0              AGPRyegrass.Stolon            0.3                  1
            true    false                      100            AGPWhiteClover.Leaf           0.7                  1
            false   false                      0              AGPWhiteClover.Leaf           0.3                  1
            true    false                      100            AGPWhiteClover.Stem           0.7                  1
            false   false                      0              AGPWhiteClover.Stem           0.3                  1
            true    false                      100            AGPWhiteClover.Stolon         0.7                  1
            false   false                      0              AGPWhiteClover.Stolon         0.3                  1
        Zone Field: Area=1; Slope=0; AspectAngle=0; Altitude=50
          SimpleGrazing: same as Initialisation Choices.InitialisationChoices.InitialisationChoices.Field.SimpleGrazing
          Manager FertiliseFixedDates
            EachYear = True
            Dates = 5-jan,5-feb,5-mar,5-apr,5-aug,5-sep,5-oct,5-nov,5-dec
            UseCritNThreshold = False
            CritNThreshold = 50
            CritNDepth = 75
            Depth = 50
            Amount = 15
            FertiliserType = UreaN
            script: same as in Initialisation Choices.InitialisationChoices.InitialisationChoices.Field.FertiliseFixedDates
          Manager AutomaticIrrigation: same as Initialisation Choices.InitialisationChoices.InitialisationChoices.Field.AutomaticIrrigation
          Irrigation
          Fertiliser
          PastureSpecies AGPRyegrass: same as Initialisation Choices.InitialisationChoices.InitialisationChoices.Field.AGPRyegrass
          PastureSpecies AGPWhiteClover: same as Initialisation Choices.InitialisationChoices.InitialisationChoices.Field.AGPWhiteClover
          SurfaceOrganicMatter: InitialResidueName=Sward; InitialResidueType=grass; InitialResidueMass=1000; InitialStandingFraction=0; InitialCPR=0; InitialCNR=15
          Soil: SoilType=NZ_Sedimentary; LocalName=Lismore; Site=Winchmore; NearestTown=Ashburton; Region=Canterbury; Country=New Zealand; Latitude=-48.48; Longitude=0
            Chemical: Thickness=[150, 150, 200, 150, 250, 300, 300]; PH=[6, 6, 6, 6, 6, 6, 6]; PHUnits=Water
            Physical: same as Initialisation Choices.InitialisationChoices.InitialisationChoices.Field.Soil.Physical
            WaterBalance SoilWater: same as Initialisation Choices.InitialisationChoices.InitialisationChoices.Field.Soil.SoilWater
            Organic: same as Initialisation Choices.InitialisationChoices.InitialisationChoices.Field.Soil.Organic
            Water: Thickness=[150, 150, 200, 150, 250, 300, 300]; InitialValues=[0.349, 0.33, 0.183, 0.062, 0.038, 0.029, 0.029]; InitialPAWmm=109.4; RelativeTo=LL15; FilledFromTop=false
            CERESSoilTemperature Temperature
            Nutrient
            Solute NO3: same as Initialisation Choices.InitialisationChoices.InitialisationChoices.Field.Soil.NO3
            Solute NH4: same as Initialisation Choices.InitialisationChoices.InitialisationChoices.Field.Soil.NH4
            Solute Urea: same as Initialisation Choices.InitialisationChoices.InitialisationChoices.Field.Soil.Urea
          Report PastureNZOld: EventNames=[Clock].EndOfDay
            VariableNames:
              [Clock].Today as Date
              [AGPRyegrass].AboveGroundWt + [AGPWhiteClover].AboveGroundWt as Biomass
              Sum of ([AGPRyegrass].HarvestedWt + [AGPWhiteClover].HarvestedWt) from 1-Jul to [Clock].Today as HarvestedWt
              [Soil].Temperature.Value[1] as AveSoilTemp@0100mm
              [Soil].Temperature.Value[7] as AveSoilTemp@1250mm
      Simulation PastureNewZealandNew
        Clock: Start=1980-07-01; End=1985-06-30
        Weather: FileName=%root%/Examples/WeatherFiles/lincoln.met
        SoilArbitrator
        Summary
        MicroClimate: a_interception=0; b_interception=1; c_interception=0; d_interception=0; SoilHeatFluxFraction=0.4; MinimumHeightDiffForNewLayer=0; NightInterceptionFraction=0.5; ReferenceHeight=2
        Forages: same as Comparison of Temperature Models.Pasture in New Zealand.PastureNewZealandEPIC.Forages
        Zone Field: Area=1; Slope=0; AspectAngle=0; Altitude=50
          SimpleGrazing: same as Initialisation Choices.InitialisationChoices.InitialisationChoices.Field.SimpleGrazing
          Manager FertiliseFixedDates: same as Comparison of Temperature Models.Pasture in New Zealand.PastureNewZealandEPIC.Field.FertiliseFixedDates
          Manager AutomaticIrrigation: same as Initialisation Choices.InitialisationChoices.InitialisationChoices.Field.AutomaticIrrigation
          Irrigation
          Fertiliser
          PastureSpecies AGPRyegrass: same as Initialisation Choices.InitialisationChoices.InitialisationChoices.Field.AGPRyegrass
          PastureSpecies AGPWhiteClover: same as Initialisation Choices.InitialisationChoices.InitialisationChoices.Field.AGPWhiteClover
          SurfaceOrganicMatter: InitialResidueName=Sward; InitialResidueType=grass; InitialResidueMass=1000; InitialStandingFraction=0; InitialCPR=0; InitialCNR=15
          Soil: same as Initialisation Time of Year.InitialisationTimeOfYear.InitialisationToY.Field.Soil
          Report PastureNZNew: EventNames=[Clock].EndOfDay
            VariableNames:
              [Clock].Today as Date
              [AGPRyegrass].AboveGroundWt + [AGPWhiteClover].AboveGroundWt as Biomass
              Sum of ([AGPRyegrass].HarvestedWt + [AGPWhiteClover].HarvestedWt) from 1-Jul to [Clock].Today as HarvestedWt
              [Soil].SoilTemperature.AverageSoilTemp[1] as AveSoilTemp@0100mm
              [Soil].SoilTemperature.AverageSoilTemp[7] as AveSoilTemp@1250mm
    Folder MaizeSoybean in Iowa
      Simulation MaizeSoyIAEPIC
        Weather: FileName=COBS.met
        Clock: Start=2008-01-01; End=2013-12-31
        Summary
        SoilArbitrator
        MicroClimate: a_interception=0; b_interception=1; c_interception=0; d_interception=0; SoilHeatFluxFraction=0.4; MinimumHeightDiffForNewLayer=0; NightInterceptionFraction=0.5; ReferenceHeight=2
        Zone Paddock: Area=1; Slope=0; AspectAngle=0; Altitude=50
          Manager HarvestMaize: same as ValidationTests.USA.CornSoy.COBSSystemCS.Paddock.HarvestMaize
          Manager HarvestSoy: same as ValidationTests.USA.CornSoy.COBSSystemCS.Paddock.HarvestSoy
          Operations: same as ValidationTests.USA.CornSoy.COBSSystemCS.Paddock.Operations
          Fertiliser
          Plant Maize
          Plant Soybean
          SurfaceOrganicMatter: InitialResidueName=maize; InitialResidueType=soybean; InitialResidueMass=5000; InitialStandingFraction=0; InitialCPR=0; InitialCNR=40
          Soil: NearestTown=Ames; State=Iowa; Country=US; ApsoilNumber=34; Latitude=0; Longitude=0; DataSource=web soil survey data revised by Ranae
            Physical: same as ValidationTests.USA.CornSoy.COBSSystemCS.Paddock.Soil.Physical
            Organic: same as ValidationTests.USA.CornSoy.COBSSystemCS.Paddock.Soil.Organic
            Chemical: Thickness=[37, 38, 50, 90, 85, 100, 200, 300, 300, 320, 300]; PHUnits=Water
              PH=[6.318, 6.318, 5.902, 5.948, 5.959, 6.7, 6.7, 7.9, 7.9, 7.9, 7.9]
            Water: Thickness=[37, 38, 50, 90, 85, 100, 200, 300, 300, 320, 300]; InitialPAWmm=216.692; RelativeTo=LL15; FilledFromTop=false
              InitialValues=[0.232, 0.262, 0.22, 0.218, 0.25, 0.228, 0.23, 0.247, 0.249, 0.257, 0.263]
            Swim3 Swim: same as ValidationTests.USA.CornSoy.COBSSystemCS.Paddock.Soil.Swim
            Solute NO3: same as ValidationTests.USA.CornSoy.COBSSystemCS.Paddock.Soil.NO3
            Solute NH4: same as ValidationTests.USA.CornSoy.COBSSystemCS.Paddock.Soil.NH4
            Solute Urea: same as ValidationTests.USA.CornSoy.COBSSystemCS.Paddock.Soil.Urea
            Nutrient
            CERESSoilTemperature
          Report MaizeSoyIAEPIC: EventNames=[Clock].EndOfDay
            VariableNames:
              [Clock].Today as Date
              [Maize].Grain.Wt * 10 + [Soybean].Grain.Wt * 10 as Biomass
              [Maize].AboveGround.Wt * 10 + [Soybean].AboveGround.Wt * 10 as Grain
              [Soil].CERESSoilTemperature.Value[4] as AveSoilTemp@0100mm
              [Soil].CERESSoilTemperature.Value[10] as AveSoilTemp@1250mm
      Simulation MaizeSoyIANew
        Weather: FileName=COBS.met
        Clock: Start=2008-01-01; End=2013-12-31
        Summary
        SoilArbitrator
        MicroClimate: a_interception=0; b_interception=1; c_interception=0; d_interception=0; SoilHeatFluxFraction=0.4; MinimumHeightDiffForNewLayer=0; NightInterceptionFraction=0.5; ReferenceHeight=2
        Zone Paddock: Area=1; Slope=0; AspectAngle=0; Altitude=50
          Manager HarvestMaize: same as ValidationTests.USA.CornSoy.COBSSystemCS.Paddock.HarvestMaize
          Manager HarvestSoy: same as ValidationTests.USA.CornSoy.COBSSystemCS.Paddock.HarvestSoy
          Operations: same as ValidationTests.USA.CornSoy.COBSSystemCS.Paddock.Operations
          Fertiliser
          Plant Maize
          Plant Soybean
          SurfaceOrganicMatter: InitialResidueName=maize; InitialResidueType=soybean; InitialResidueMass=5000; InitialStandingFraction=0; InitialCPR=0; InitialCNR=40
          Soil: NearestTown=Ames; State=Iowa; Country=US; ApsoilNumber=34; Latitude=0; Longitude=0; DataSource=web soil survey data revised by Ranae
            Physical: same as ValidationTests.USA.CornSoy.COBSSystemCS.Paddock.Soil.Physical
            Organic: same as ValidationTests.USA.CornSoy.COBSSystemCS.Paddock.Soil.Organic
            Chemical: Thickness=[37, 38, 50, 90, 85, 100, 200, 300, 300, 320, 300]; PHUnits=Water
              PH=[6.318, 6.318, 5.902, 5.948, 5.959, 6.7, 6.7, 7.9, 7.9, 7.9, 7.9]
            Water: Thickness=[37, 38, 50, 90, 85, 100, 200, 300, 300, 320, 300]; InitialPAWmm=216.692; RelativeTo=LL15; FilledFromTop=false
              InitialValues=[0.232, 0.262, 0.22, 0.218, 0.25, 0.228, 0.23, 0.247, 0.249, 0.257, 0.263]
            Swim3 Swim: same as ValidationTests.USA.CornSoy.COBSSystemCS.Paddock.Soil.Swim
            Solute NO3: same as ValidationTests.USA.CornSoy.COBSSystemCS.Paddock.Soil.NO3
            Solute NH4: same as ValidationTests.USA.CornSoy.COBSSystemCS.Paddock.Soil.NH4
            Solute Urea: same as ValidationTests.USA.CornSoy.COBSSystemCS.Paddock.Soil.Urea
            Nutrient
            SoilTemperature: CONSTANT_TEMPdepth=10
          Report MaizeSoyIANew: EventNames=[Clock].EndOfDay
            VariableNames:
              [Clock].Today as Date
              [Maize].Grain.Wt * 10 + [Soybean].Grain.Wt * 10 as Biomass
              [Maize].AboveGround.Wt * 10 + [Soybean].AboveGround.Wt * 10 as Grain
              [Soil].SoilTemperature.AverageSoilTemp[4] as AveSoilTemp@0100mm
              [Soil].SoilTemperature.AverageSoilTemp[10] as AveSoilTemp@1250mm
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