Simulations: Version=171
  DataStore
  Simulation Blank
    Clock: Start=2000-01-01; End=2006-12-31
    Weather: FileName=AnalyticalWeather.xlsx; ExcelWorkSheetName=CoolAdd2WeeklyOsc
    MicroClimate: a_interception=0; b_interception=0; c_interception=0; d_interception=0; SoilHeatFluxFraction=0; MinimumHeightDiffForNewLayer=0; NightInterceptionFraction=0; ReferenceHeight=2
    Summary
    Zone Field: Area=1; Slope=0; AspectAngle=0; Altitude=50
      Manager DummyWaterBalance
        SW = 0.15, 0.15, 0.15, 0.15, 0.15, 0.15, 0.15, 0.15, 0.15, 0.15, 0.15, 0.15, 0.15, 0.15, 0.15, 0.15, 0.15, 0.15, 0.15
        Eos = 0
        Es = 0
        Eo = 0
        Salb = 0
```csharp
using Models.PMF;
using Models.Core;
using System;
using Models.Interfaces;
using Models.Soils;
using APSIM.Shared.Utilities;
using Newtonsoft.Json;

namespace Models
{
    [Serializable] 
    public class Script : Model, ISoilWater
    {
        [Link]
        private Physical physical;
        [Link]
        private IPhysical soilPhysical;

        ///<summary>Gets or sets soil thickness for each layer (mm)(</summary>
        public double[] Thickness { get { return soilPhysical.Thickness; } }

        ///<summary>Gets or sets soil thickness for each layer (mm)(</summary>
        public double[] LayerThickness { get { return soilPhysical.Thickness; } }

        ///<summary>Gets or sets volumetric soil water content (mm/mm)(</summary>
        [Description("Soil water content (mm/mm), comma separated values")]
        public double[] SW { get; set; }

        ///<summary>Gets soil water content (mm)</summary>
        public double[] SWmm { get { return MathUtilities.Multiply(SW, Thickness); } }

        ///<summary>Gets extractable soil water relative to LL15(mm)</summary>
        public double[] ESW { get { throw new NotImplementedException(); } }

        ///<summary>Gets extractable soil water relative to LL15(mm)</summary>
        public double[] PSI { get { throw new NotImplementedException(); } }

        ///<summary>Gets K</summary>
        public double[] K { get { throw new NotImplementedException(); } }
        
        ///<summary>Gets PoreInteractionIndex</summary>
        [JsonIgnore]
        public double[] PoreInteractionIndex { get { throw new NotImplementedException(); } set { throw new NotImplementedException(); }}
                
        ///<summary>Gets potential evaporation from soil surface (mm)</summary>
        [Description("Eos (mm)")]
        public double Eos { get; set; }

        /// <summary>Gets the actual (realised) soil water evaporation (mm)</summary>
        [Description("Es (mm)")]
        public double Es { get; set; }

        /// <summary>Gets potential evapotranspiration of the whole soil-plant system (mm)</summary>
        [Description("Eo (mm)")]
        public double Eo { get; set; }

        /// <summary>Gets the amount of water runoff (mm)</summary>
        public double Runoff { get { return 0; } }
        
        /// <summary>Gets the amount of water drainage from bottom of profile(mm)</summary>
        public double Drainage { get { return 0; } }

        /// <summary>Fraction of incoming radiation reflected from bare soil</summary>
        [Description("Salb")]
        public double Salb { get; set; }

        /// <summary>Amount of water moving laterally out of the profile (mm)</summary>
        public double[] LateralOutflow { get { throw new NotImplementedException(); } }

        /// <summary>Amount of N leaching as NO3-N from the deepest soil layer (kg /ha)</summary>
        public double LeachNO3 { get { return 0; } }

        /// <summary>Amount of N leaching as NH4-N from the deepest soil layer (kg /ha)</summary>
        public double LeachNH4 { get { return 0; } }
        
        /// <summary>Amount of N leaching as urea-N  from the deepest soil layer (kg /ha)</summary>
        public double LeachUrea { get { return 0; } }

        /// <summary>Amount of Cl leaching  from the deepest soil layer (kg /ha)</summary>
        public double LeachCl { get { return 0; } }
        
        /// <summary>Amount of N leaching as NO3 from each soil layer (kg /ha)</summary>
        public double[] FlowNO3 { get { throw new NotImplementedException(); } }

        /// <summary>Amount of N leaching as NH4 from each soil layer (kg /ha)</summary>
        public double[] FlowNH4 { get { throw new NotImplementedException(); } }

        /// <summary>Amount of N leaching as urea from each soil layer (kg /ha)</summary>
        public double[] FlowUrea { get { throw new NotImplementedException(); } }

        /// <summary>Amount of N leaching as urea from each soil layer (kg /ha)</summary>
        public double[] FlowCl { get { throw new NotImplementedException(); } }

        /// <summary>Amount of water moving upward from each soil layer during unsaturated flow (negative value means downward movement) (mm)</summary>
        public double[] Flow  { get { throw new NotImplementedException(); } }

        /// <summary>Amount of water moving downward out of each soil layer due to gravity drainage (above DUL) (mm)</summary>
        public double[] Flux { get { throw new NotImplementedException(); } }

        /// <summary> This is set by Microclimate and is rainfall less that intercepted by the canopy and residue components </summary>
        public double PotentialInfiltration { get; set; }
        
        /// <summary> The amount of rainfall intercepted by crop and residue canopies </summary>
        public double PrecipitationInterception { get; set; }

        /// <summary>Water table depth (mm)</summary>
        public double WaterTable { get; set; }
        
        /// <summary>Pond depth (mm)</summary>
        public double Pond { get; set; }

        /// <summary>Pond depth (mm)</summary>
        public double SubsurfaceDrain { get; set; }

        /// <summary>Sets the water table.</summary>
        /// <param name="InitialDepth">The initial depth.</param> 
        public void SetWaterTable(double InitialDepth)
        {
            throw new NotImplementedException();
        }

        /// <summary>The efficiency (0-1) that solutes move down with water.</summary>
        public double[] SoluteFluxEfficiency { get; set; }

        /// <summary>The efficiency (0-1) that solutes move up with water.</summary>
        public double[] SoluteFlowEfficiency { get; set; }

        ///<summary>Perform a reset</summary>
        public void Reset()
        {
            throw new NotImplementedException();
        }

        ///<summary>Perform tillage</summary>
        public void Tillage(TillageType Data)
        {
            throw new NotImplementedException();
        }

        ///<summary>Perform tillage</summary>
        public void Tillage(string tillageType)
        {
            throw new NotImplementedException();
        }

        ///<summary>Remove water from the profile</summary>
        public void RemoveWater(double[] amountToRemove)
        {
            throw new NotImplementedException();
        }
        public void Standardise(double[] targetThickness)
        {
        
        
        }
        
        /// <summary>Plant available water SW-LL15 (mm/mm).</summary>
        [Units("mm/mm")]
        public double[] PAW
        {
            get
            {
                return SoilUtilities.CalcPAWC(soilPhysical.Thickness,
                                              soilPhysical.LL15,
                                              SW,
                                              null);
            }
        }

        /// <summary>Plant available water SW-LL15 (mm).</summary>
        [Units("mm")]
        public double[] PAWmm
        {
            get
            {
                return MathUtilities.Multiply(PAW, soilPhysical.Thickness);
            }
        }

    }
}
```
      Manager SetLowerBCDepth
        LowerBCDepth = 20
```csharp
using Models.Soils;
using System;
using System.Linq;
using Models.Core;
using Models.PMF;
using APSIM.Shared.Utilities;
using Models.Soils.SoilTemp;

namespace Models
{
    [Serializable]
    public class Script : Model
    {
        [Link] Clock Clock;
        [Link] SoilTemperature soilTemperature;
        
        [Description("Depth of constant temperature BC? (m)")] 
        public double LowerBCDepth { get; set; }

        
        [EventSubscribe("StartOfSimulation")]
        private void OnStartOfSimulation(object sender, EventArgs e)
        {
        	soilTemperature.CONSTANT_TEMPdepth = LowerBCDepth;
        }
    }
}
```
      Soil: Latitude=0; Longitude=0
        Water: Thickness=[100, 100, 800, 5000]; InitialValues=[0.16, 0.16, 0.16, 0.16]; InitialPAWmm=660; RelativeTo=LL15; FilledFromTop=true
        Physical
          Thickness  ParticleSizeClay  BD   AirDry  LL15  DUL   SAT
          100        9                 1.5  0.01    0.05  0.16  0.29
          100        9                 1.5  0.01    0.05  0.16  0.29
          800        9                 1.5  0.01    0.05  0.16  0.29
          5000       9                 1.5  0.01    0.05  0.16  0.29
          999999     -                 -    -       -     -     -
          999999     -                 -    -       -     -     -
          999999     -                 -    -       -     -     -
          999999     -                 -    -       -     -     -
        Organic: FOMCNRatio=60; CarbonUnits=Total
          Thickness  Carbon  SoilCNRatio  FBiom  FInert  FOM
          100        2       14.5         0.04   0.4     0.294
          100        2       14.5         0.04   0.4     0.294
          800        2       14.5         0.04   0.4     0.294
          5000       2       14.5         0.04   0.4     0.294
        Chemical: Thickness=[100, 100, 800, 5000]; PH=[6.5, 6.5, 6.5, 6.5]; PHUnits=Water
        SoilTemperature: CONSTANT_TEMPdepth=0
        Solute NO3: Thickness=[6000]; InitialValues=[0.1]; InitialValuesUnits=kg/ha; WaterTableConcentration=0; D0=0; DepthConstant=0; MaxDepthSoluteAccessible=0; RunoffEffectivenessAtMovingSolute=0; MaxEffectiveRunoff=0
        Solute NH4: Thickness=[2000]; InitialValues=[1]; InitialValuesUnits=kg/ha; WaterTableConcentration=0; D0=0; DepthConstant=0; MaxDepthSoluteAccessible=0; RunoffEffectivenessAtMovingSolute=0; MaxEffectiveRunoff=0
        Solute Urea: Thickness=[6000]; InitialValues=[0]; InitialValuesUnits=kg/ha; WaterTableConcentration=0; D0=0; DepthConstant=0; MaxDepthSoluteAccessible=0; RunoffEffectivenessAtMovingSolute=0; MaxEffectiveRunoff=0
        LayerStructure
          Thickness=[25, 50, 50, 75, 200, 200, 300, 200, 300, 200, 200, 200, 500, 500, 500, 500, 500, 400, 200]
      Report
        VariableNames:
          [Clock].Today as Date
          [Weather].MaxT as MaxT
          [Weather].MinT as MinT
          [Soil].SoilTemperature.AverageSoilTemp[1] as AverageSoilTemp@0012mm
          [Soil].SoilTemperature.AverageSoilTemp[2] as AverageSoilTemp@0050mm
          [Soil].SoilTemperature.AverageSoilTemp[3] as AverageSoilTemp@0100mm
          [Soil].SoilTemperature.AverageSoilTemp[4] as AverageSoilTemp@0160mm
          [Soil].SoilTemperature.AverageSoilTemp[5] as AverageSoilTemp@0300mm
          [Soil].SoilTemperature.AverageSoilTemp[6] as AverageSoilTemp@0500mm
          [Soil].SoilTemperature.AverageSoilTemp[7] as AverageSoilTemp@0750mm
          [Soil].SoilTemperature.AverageSoilTemp[8] as AverageSoilTemp@1000mm
          [Soil].SoilTemperature.AverageSoilTemp[9] as AverageSoilTemp@1250mm
          [Soil].SoilTemperature.AverageSoilTemp[10] as AverageSoilTemp@1500mm
          [Soil].SoilTemperature.AverageSoilTemp[11] as AverageSoilTemp@1700mm
          [Soil].SoilTemperature.AverageSoilTemp[12] as AverageSoilTemp@1900mm
          [Soil].SoilTemperature.AverageSoilTemp[13] as AverageSoilTemp@2250mm
          [Soil].SoilTemperature.AverageSoilTemp[14] as AverageSoilTemp@2750mm
          [Soil].SoilTemperature.AverageSoilTemp[15] as AverageSoilTemp@3250mm
          [Soil].SoilTemperature.AverageSoilTemp[16] as AverageSoilTemp@3750mm
          [Soil].SoilTemperature.AverageSoilTemp[17] as AverageSoilTemp@4250mm
          [Soil].SoilTemperature.AverageSoilTemp[18] as AverageSoilTemp@4700mm
          [Soil].SoilTemperature.AverageSoilTemp[19] as AverageSoilTemp@5000mm
          [Soil].SoilTemperature.MaxSoilTemp[1] as MaxSoilTemp@0012mm
          [Soil].SoilTemperature.MaxSoilTemp[2] as MaxSoilTemp@0050mm
          [Soil].SoilTemperature.MaxSoilTemp[3] as MaxSoilTemp@0100mm
          [Soil].SoilTemperature.MaxSoilTemp[4] as MaxSoilTemp@0160mm
          [Soil].SoilTemperature.MaxSoilTemp[5] as MaxSoilTemp@0300mm
          [Soil].SoilTemperature.MaxSoilTemp[6] as MaxSoilTemp@0500mm
          [Soil].SoilTemperature.MaxSoilTemp[7] as MaxSoilTemp@0750mm
          [Soil].SoilTemperature.MaxSoilTemp[8] as MaxSoilTemp@1000mm
          [Soil].SoilTemperature.MaxSoilTemp[9] as MaxSoilTemp@1250mm
          [Soil].SoilTemperature.MaxSoilTemp[10] as MaxSoilTemp@1500mm
          [Soil].SoilTemperature.MaxSoilTemp[11] as MaxSoilTemp@1700mm
          [Soil].SoilTemperature.MaxSoilTemp[12] as MaxSoilTemp@1900mm
          [Soil].SoilTemperature.MaxSoilTemp[13] as MaxSoilTemp@2250mm
          [Soil].SoilTemperature.MaxSoilTemp[14] as MaxSoilTemp@2750mm
          [Soil].SoilTemperature.MaxSoilTemp[15] as MaxSoilTemp@3250mm
          [Soil].SoilTemperature.MaxSoilTemp[16] as MaxSoilTemp@3750mm
          [Soil].SoilTemperature.MaxSoilTemp[17] as MaxSoilTemp@4250mm
          [Soil].SoilTemperature.MaxSoilTemp[18] as MaxSoilTemp@4700mm
          [Soil].SoilTemperature.MaxSoilTemp[19] as MaxSoilTemp@5000mm
        EventNames:
          Clock.Today >= new DateTime(2005, 1, 1)
          //[Clock].EndOfDay
  Folder SoilType
    Experiment ExpClay
      Factors
        Factor ClayContent
          CompositeFactor Clay10
            Specifications=[Soil].Physical.ParticleSizeClay = 10, 10, 10, 10, 10, 10, 10, 10
          CompositeFactor Clay90: Specifications=[Soil].Physical.ParticleSizeClay = 95,95,95,95,95,95,95,95
      Simulation ClayContent
        Clock: Start=2000-01-01; End=2006-12-31
        Weather: FileName=AnalyticalWeather.xlsx; ExcelWorkSheetName=CoolAdd2WeeklyOsc
        MicroClimate: a_interception=0; b_interception=0; c_interception=0; d_interception=0; SoilHeatFluxFraction=0; MinimumHeightDiffForNewLayer=0; NightInterceptionFraction=0; ReferenceHeight=2
        Summary
        Zone Field: Area=1; Slope=0; AspectAngle=0; Altitude=50
          Manager DummyWaterBalance: same as Blank.Field.DummyWaterBalance
          Soil: same as Blank.Field.Soil
          Report: same as Blank.Field.Report
    Experiment SoilType
      Factors
        CompositeFactor Clay: Specifications=[Soil]
          Soil: Latitude=0; Longitude=0
            Physical
              Thickness  ParticleSizeClay  BD   AirDry  LL15  DUL   SAT   KS
              100        80                1    0.1     0.24  0.47  0.53  240
              200        80                1.1  0.1     0.28  0.49  0.54  240
              200        80                1.1  0.1     0.28  0.52  0.57  120
              200        80                1.1  0.1     0.29  0.52  0.55  120
              200        80                1.1  0.1     0.29  0.51  0.54  120
              200        80                1.2  0.1     0.29  0.5   0.53  120
              200        80                1.2  0.1     0.29  0.5   0.53  120
              200        80                1.2  0.1     0.33  0.48  0.51  120
              200        80                1.2  0.1     0.33  0.48  0.51  60
              200        80                1.2  0.1     0.35  0.48  0.51  60
              200        80                1.2  0.1     0.35  0.47  0.5   60
              200        80                1.2  0.1     0.35  0.45  0.48  60
              200        80                1.3  0.1     0.35  0.45  0.48  60
              200        80                1.3  0.1     0.35  0.45  0.48  60
              200        80                1.3  0.1     0.35  0.45  0.48  60
              200        80                1.3  0.1     0.35  0.45  0.48  60
              SoilCrop WheatSoil
                LL=[0.25, 0.3, 0.3, 0.33, 0.33, 0.35, 0.35, 0.4, 0.4, 0.4, 0.4, 0.4, 0.4, 0.4, 0.4, 0.4]
                KL=[0.06, 0.06, 0.06, 0.06, 0.06, 0.06, 0.06, 0.06, 0.06, 0.06, 0, 0, 0, 0, 0, 0]
                XF=[1, 1, 1, 1, 1, 1, 1, 1, 1, 1, 0, 0, 0, 0, 0, 0]
            Organic: FOMCNRatio=40; CarbonUnits=Total
              Thickness  Carbon  SoilCNRatio  FBiom  FInert  FOM
              100        1.4     14.5         0.2    0.32    1.84299
              200        1.4     14.5         0.03   0.5     1.51868
              200        1.4     14.5         0.02   0.6     1.25144
              200        1.35    14.5         0.015  0.7     1.03122
              200        0.95    14.5         0.01   0.85    0.849759
              200        1       14.5         0.01   0.9     0.700227
              200        0.8     14.5         0.01   0.99    0.577008
              200        0.45    14.5         0.01   0.99    0.475472
              200        0.45    14.5         0.01   0.99    0.391803
              200        0.45    14.5         0.01   0.99    0.322858
              200        0.45    14.5         0.01   0.99    0.266044
              200        0.45    14.5         0.01   0.99    0.219228
              200        0.45    14.5         0.01   0.99    0.180651
              200        0.45    14.5         0.01   0.99    0.148862
              200        0.45    14.5         0.01   0.99    0.122667
              200        0.45    14.5         0.01   0.99    0.101081
            Chemical: PH=[6, 6.4, 6.8, 7.2, 7.6, 8, 8, 8, 8, 8, 8, 8, 8, 8, 8, 8]; PHUnits=Water
              Thickness=[100, 200, 200, 200, 200, 200, 200, 200, 200, 200, 200, 200, 200, 200, 200, 200]
            Water: InitialPAWmm=437; RelativeTo=LL15; FilledFromTop=false
              Thickness=[100, 200, 200, 200, 200, 200, 200, 200, 200, 200, 200, 200, 200, 200, 200, 200]
              InitialValues=[0.434, 0.43, 0.48, 0.47, 0.46, 0.46, 0.46, 0.485, 0.49, 0.474, 0.457, 0.453, 0.447, 0.465, 0.457, 0.43]
            LayerStructure
              Thickness=[10, 20, 30, 40, 200, 200, 200, 200, 200, 200, 200, 200, 200, 200, 200, 200, 200, 200, 200]
            Solute CL: InitialValuesUnits=ppm; WaterTableConcentration=0; D0=0.05; DepthConstant=0; MaxDepthSoluteAccessible=0; RunoffEffectivenessAtMovingSolute=0; MaxEffectiveRunoff=0
              Thickness  InitialValues  Exco  FIP
              100        18             0     1
              200        13             0     1
              200        11             0     1
              200        11             0     1
              200        16             0     1
              200        28             0     1
              200        66             0     1
              200        122            0     1
              200        181            0     1
              200        232            0     1
              200        270            0     1
              200        292            0     1
              200        293            0     1
              200        270            0     1
              200        292            0     1
              200        293            0     1
            Nutrient
            Solute NO3: InitialValuesUnits=ppm; WaterTableConcentration=0; D0=0.05; DepthConstant=0; MaxDepthSoluteAccessible=0; RunoffEffectivenessAtMovingSolute=0; MaxEffectiveRunoff=0
              Thickness  InitialValues  Exco  FIP
              100        10.7           0     1
              200        9.99           0     1
              200        7.87           0     1
              200        6.2            0     1
              200        4.85           0     1
              200        3.56           0     1
              200        2.72           0     1
              200        2.34           0     1
              200        2.47           0     1
              200        3.24           0     1
              200        4.25           0     1
              200        4.94           0     1
              200        5.2            0     1
              200        4.95           0     1
              200        4.52           0     1
              200        4.24           0     1
            Solute NH4: InitialValuesUnits=ppm; WaterTableConcentration=0; D0=0.05; DepthConstant=0; MaxDepthSoluteAccessible=0; RunoffEffectivenessAtMovingSolute=0; MaxEffectiveRunoff=0
              Thickness  InitialValues  Exco  FIP
              100        0.3            1     1
              200        0.3            1     1
              200        0.3            1     1
              200        0.3            1     1
              200        0.3            1     1
              200        0.3            1     1
              200        0.3            1     1
              200        0.3            1     1
              200        0.3            1     1
              200        0.3            1     1
              200        0.3            1     1
              200        0.3            1     1
              200        0.3            1     1
              200        0.3            1     1
              200        0.3            1     1
              200        0.3            1     1
            Solute Urea: InitialValuesUnits=kg/ha; WaterTableConcentration=0; D0=0.05; DepthConstant=0; MaxDepthSoluteAccessible=0; RunoffEffectivenessAtMovingSolute=0; MaxEffectiveRunoff=0
              Thickness  InitialValues  Exco  FIP
              100        0              0     1
              200        0              0     1
              200        0              0     1
              200        0              0     1
              200        0              0     1
              200        0              0     1
              200        0              0     1
              200        0              0     1
              200        0              0     1
              200        0              0     1
              200        0              0     1
              200        0              0     1
              200        0              0     1
              200        0              0     1
              200        0              0     1
              200        0              0     1
            SoilTemperature Temperature: CONSTANT_TEMPdepth=10
        CompositeFactor Sand: Specifications=[Soil]
          Soil: Latitude=0; Longitude=0
            Physical
              Thickness  ParticleSizeClay  BD   AirDry  LL15  DUL   SAT   KS
              100        5                 1.8  0.01    0.02  0.08  0.32  200
              100        5                 1.8  0.01    0.02  0.08  0.32  200
              100        5                 1.8  0.01    0.02  0.08  0.32  200
              300        5                 1.8  0.01    0.02  0.08  0.32  200
              300        5                 1.8  0.01    0.02  0.08  0.32  200
              300        5                 1.8  0.01    0.02  0.08  0.32  200
              300        5                 1.8  0.01    0.02  0.08  0.32  200
              500        5                 1.8  0.01    0.02  0.07  0.32  200
              500        5                 1.8  0.01    0.02  0.07  0.32  200
              500        5                 1.8  0.01    0.02  0.07  0.32  200
              700        5                 1.8  0.01    0.02  0.07  0.32  200
            Organic: FOMCNRatio=40; CarbonUnits=Total
              Thickness  Carbon  SoilCNRatio  FBiom  FInert  FOM
              150        0.915   12           0.04   0.4     390.598
              150        0.777   12           0.02   0.6     289.362
              300        0.346   12           0.02   0.8     158.805
              300        0.231   12           0.02   1       87.154
              300        0.154   12           0.01   1       47.831
              300        0.123   12           0.01   1       26.25
            Chemical: Thickness=[150, 150, 300, 300, 300, 300]; PH=[8, 8, 8, 8, 8, 8]; PHUnits=Water
            Water: Thickness=[50, 100, 150, 300, 300, 300, 2500]; InitialValues=[0.02, 0.02, 0.02, 0.03, 0.05, 0.06, 0.07]; InitialPAWmm=149; RelativeTo=LL15; FilledFromTop=false
            LayerStructure
              Thickness=[10, 20, 30, 40, 200, 200, 200, 200, 200, 200, 200, 200, 200, 200, 200, 200, 200, 200, 200]
            Solute CL: same as SoilType.SoilType.Factors.Clay.Soil.CL
            Nutrient
            Solute NO3: same as SoilType.SoilType.Factors.Clay.Soil.NO3
            Solute NH4: same as SoilType.SoilType.Factors.Clay.Soil.NH4
            Solute Urea: same as SoilType.SoilType.Factors.Clay.Soil.Urea
            SoilTemperature Temperature: CONSTANT_TEMPdepth=10
      Simulation SoilTypeBase
        Clock: Start=2010-01-01; End=2020-12-31
        Summary summaryfile
        Weather: FileName=WeatherFiles\Gatton.met
        SoilArbitrator Soil Arbitrator
        MicroClimate: a_interception=0; b_interception=1; c_interception=0; d_interception=0; SoilHeatFluxFraction=0.4; MinimumHeightDiffForNewLayer=0; NightInterceptionFraction=0.5; ReferenceHeight=2
        Zone Field: Area=1; Slope=0; AspectAngle=0; Altitude=50
          Manager DummyWaterBalance
            SW = 0.3, 0.3, 0.3, 0.3, 0.3, 0.3, 0.3, 0.3, 0.3, 0.3, 0.3, 0.3, 0.3, 0.3, 0.3, 0.3, 0.3, 0.3, 0.3
            Eos = 0
            Es = 0
            Eo = 0
            Salb = 0
            script: same as in Blank.Field.DummyWaterBalance
          Soil: SoilType=Black Vertosol; Site=Hudson; Latitude=0; Longitude=0
            Physical
              Thickness  BD   AirDry  LL15  DUL   SAT
              100        1    0.1     0.24  0.47  0.53
              200        1.1  0.1     0.28  0.49  0.54
              200        1.1  0.1     0.28  0.52  0.57
              200        1.1  0.1     0.29  0.52  0.55
              200        1.1  0.1     0.29  0.51  0.54
              200        1.2  0.1     0.29  0.5   0.53
              200        1.2  0.1     0.29  0.5   0.53
              200        1.2  0.1     0.33  0.48  0.51
              200        1.2  0.1     0.33  0.48  0.51
              200        1.2  0.1     0.35  0.48  0.51
              200        1.2  0.1     0.35  0.47  0.5
              200        1.2  0.1     0.35  0.45  0.48
              200        1.3  0.1     0.35  0.45  0.48
              200        1.3  0.1     0.35  0.45  0.48
              200        1.3  0.1     0.35  0.45  0.48
              200        1.3  0.1     0.35  0.45  0.48
              SoilCrop WheatSoil: same as SoilType.SoilType.Factors.Clay.Soil.Physical.WheatSoil
            Organic: FOMCNRatio=40; CarbonUnits=Total
              Thickness  Carbon  SoilCNRatio  FBiom  FInert  FOM
              100        1.4     14.5         0.2    0.32    1.843
              200        1.4     14.5         0.03   0.5     1.519
              200        1.4     14.5         0.02   0.6     1.251
              200        1.35    14.5         0.015  0.7     1.031
              200        0.95    14.5         0.01   0.85    0.85
              200        1       14.5         0.01   0.9     0.7
              200        0.8     14.5         0.01   0.99    0.577
              200        0.45    14.5         0.01   0.99    0.475
              200        0.45    14.5         0.01   0.99    0.392
              200        0.45    14.5         0.01   0.99    0.323
              200        0.45    14.5         0.01   0.99    0.266
              200        0.45    14.5         0.01   0.99    0.219
              200        0.45    14.5         0.01   0.99    0.181
              200        0.45    14.5         0.01   0.99    0.149
              200        0.45    14.5         0.01   0.99    0.123
              200        0.45    14.5         0.01   0.99    0.101
            Chemical: same as SoilType.SoilType.Factors.Clay.Soil.Chemical
            Water: Thickness=[150, 150, 300, 300, 300, 300, 300, 200]; InitialValues=[0.417, 0.43, 0.45, 0.46, 0.46, 0.46, 0.46, 0.267]; InitialPAWmm=262.45; RelativeTo=LL15; FilledFromTop=true
            Nutrient
            Solute NO3: InitialValuesUnits=ppm; WaterTableConcentration=0; D0=0.05; DepthConstant=0; MaxDepthSoluteAccessible=0; RunoffEffectivenessAtMovingSolute=0; MaxEffectiveRunoff=0
              Thickness  InitialValues  Exco  FIP
              150        38.023         0     1
              150        12.955         0     1
              300        0.422          0     1
              300        0.422          0     1
              300        0.422          0     1
              300        0.422          0     1
              500        0.422          0     1
            Solute NH4: InitialValuesUnits=ppm; WaterTableConcentration=0; D0=0.05; DepthConstant=0; MaxDepthSoluteAccessible=0; RunoffEffectivenessAtMovingSolute=0; MaxEffectiveRunoff=0
              Thickness  InitialValues  Exco  FIP
              150        0.38           1     1
              150        0.155          1     1
              300        0.042          1     1
              300        0.042          1     1
              300        0.042          1     1
              300        0.042          1     1
              500        0.042          1     1
            Solute Urea: InitialValuesUnits=kg/ha; WaterTableConcentration=0; D0=0.05; DepthConstant=0; MaxDepthSoluteAccessible=0; RunoffEffectivenessAtMovingSolute=0; MaxEffectiveRunoff=0
              Thickness  InitialValues  Exco  FIP
              150        0              0     1
              150        0              0     1
              300        0              0     1
              300        0              0     1
              300        0              0     1
              300        0              0     1
              500        0              0     1
            Swim3: Salb=0.13; CN2Bare=75; CNRed=20; CNCov=0.8; KDul=0.1; PSIDul=-100; VC=true; DTMin=0; DTMax=1440; MaxWaterIncrement=5; SpaceWeightingFactor=0; SoluteSpaceWeightingFactor=1; Dis=0; Disp=1; A=2; DTHC=0.1; DTHP=2; Diagnostics=true
            LayerStructure
              Thickness=[10, 20, 20, 100, 100, 100, 100, 100, 100, 100, 100, 100, 100, 200, 300, 300, 200]
            SoilTemperature Temperature: CONSTANT_TEMPdepth=10; Thickness=[100, 100, 100, 100, 100, 100, 100, 100]; InitialValues=[14, 14, 14, 14, 14.5, 15, 15.3, 15.5]
          SurfaceOrganicMatter: InitialResidueName=wheat_stubble; InitialResidueType=wheat; InitialResidueMass=500; InitialStandingFraction=0; InitialCPR=0; InitialCNR=100
          Report: EventNames=[CLock].DoReport
            VariableNames:
              [Clock].Today
              [Soil].Temperature.AverageSoilTemp[3] as AverageSoilTemp@0045mm
              [Soil].Temperature.AverageSoilTemp[6] as AverageSoilTemp@0400mm
              [Soil].Temperature.AverageSoilTemp[9] as AverageSoilTemp@1000mm
              [Soil].Temperature.AverageSoilTemp[14] as AverageSoilTemp@2000mm
              [Soil].Temperature.AverageSoilTemp[19] as AverageSoilTemp@3000mm
  Folder LowerBC
    Experiment ExpLowerBC
      Factors
        Factor LowerBC: Specification=[SetLowerBCDepth].Script.LowerBCDepth = 10, 100, 200, 300
      Simulation LowerBC
        Clock: Start=2000-01-01; End=2006-12-31
        Weather: FileName=AnalyticalWeather.xlsx; ExcelWorkSheetName=CoolAdd2WeeklyOsc
        MicroClimate: a_interception=0; b_interception=0; c_interception=0; d_interception=0; SoilHeatFluxFraction=0; MinimumHeightDiffForNewLayer=0; NightInterceptionFraction=0; ReferenceHeight=2
        Summary
        Zone Field: Area=1; Slope=0; AspectAngle=0; Altitude=50
          Manager DummyWaterBalance
            SW = 0.15, 0.15, 0.15, 0.15, 0.15, 0.15, 0.15, 0.15, 0.15, 0.15, 0.15, 0.15
            Eos = 0
            Es = 0
            Eo = 0
            Salb = 0
            script: same as in Blank.Field.DummyWaterBalance
          Manager SetLowerBCDepth: same as Blank.Field.SetLowerBCDepth
          Soil: Latitude=0; Longitude=0
            Water: Thickness=[100, 100, 800, 5000]; InitialValues=[0.16, 0.16, 0.16, 0.16]; InitialPAWmm=660; RelativeTo=LL15; FilledFromTop=true
            Physical
              Thickness  ParticleSizeClay  BD   AirDry  LL15  DUL   SAT
              100        10                1.5  0.01    0.05  0.16  0.29
              100        10                1.5  0.01    0.05  0.16  0.29
              800        10                1.5  0.01    0.05  0.16  0.29
              5000       10                1.5  0.01    0.05  0.16  0.29
              999999     -                 -    -       -     -     -
              999999     -                 -    -       -     -     -
              999999     -                 -    -       -     -     -
              999999     -                 -    -       -     -     -
            Organic: FOMCNRatio=60; CarbonUnits=Total
              Thickness  Carbon  SoilCNRatio  FBiom  FInert  FOM
              100        2       14.5         0.04   0.4     0.294
              100        2       14.5         0.04   0.4     0.294
              800        2       14.5         0.04   0.4     0.294
              5000       2       14.5         0.04   0.4     0.294
            Chemical: Thickness=[100, 100, 800, 5000]; PH=[6.5, 6.5, 6.5, 6.5]; PHUnits=Water
            SoilTemperature: CONSTANT_TEMPdepth=0
            Solute NO3: Thickness=[6000]; InitialValues=[0.1]; InitialValuesUnits=kg/ha; WaterTableConcentration=0; D0=0; DepthConstant=0; MaxDepthSoluteAccessible=0; RunoffEffectivenessAtMovingSolute=0; MaxEffectiveRunoff=0
            Solute NH4: Thickness=[2000]; InitialValues=[1]; InitialValuesUnits=kg/ha; WaterTableConcentration=0; D0=0; DepthConstant=0; MaxDepthSoluteAccessible=0; RunoffEffectivenessAtMovingSolute=0; MaxEffectiveRunoff=0
            Solute Urea: Thickness=[6000]; InitialValues=[0]; InitialValuesUnits=kg/ha; WaterTableConcentration=0; D0=0; DepthConstant=0; MaxDepthSoluteAccessible=0; RunoffEffectivenessAtMovingSolute=0; MaxEffectiveRunoff=0
            LayerStructure: Thickness=[25, 50, 50, 75, 200, 200, 300, 200, 300, 200, 200, 200]
          Report
            VariableNames:
              [Clock].Today as Date
              [Weather].MaxT as MaxT
              [Weather].MinT as MinT
              [Soil].SoilTemperature.AverageSoilTemp[1] as AverageSoilTemp@0012mm
              [Soil].SoilTemperature.AverageSoilTemp[2] as AverageSoilTemp@0050mm
              [Soil].SoilTemperature.AverageSoilTemp[3] as AverageSoilTemp@0100mm
              [Soil].SoilTemperature.AverageSoilTemp[4] as AverageSoilTemp@0160mm
              [Soil].SoilTemperature.AverageSoilTemp[5] as AverageSoilTemp@0300mm
              [Soil].SoilTemperature.AverageSoilTemp[6] as AverageSoilTemp@0500mm
              [Soil].SoilTemperature.AverageSoilTemp[7] as AverageSoilTemp@0750mm
              [Soil].SoilTemperature.AverageSoilTemp[8] as AverageSoilTemp@1000mm
              [Soil].SoilTemperature.AverageSoilTemp[9] as AverageSoilTemp@1250mm
              [Soil].SoilTemperature.AverageSoilTemp[10] as AverageSoilTemp@1500mm
              [Soil].SoilTemperature.AverageSoilTemp[11] as AverageSoilTemp@1700mm
              [Soil].SoilTemperature.AverageSoilTemp[12] as AverageSoilTemp@1900mm
              [Soil].SoilTemperature.MaxSoilTemp[1] as MaxSoilTemp@0012mm
              [Soil].SoilTemperature.MaxSoilTemp[2] as MaxSoilTemp@0050mm
              [Soil].SoilTemperature.MaxSoilTemp[3] as MaxSoilTemp@0100mm
              [Soil].SoilTemperature.MaxSoilTemp[4] as MaxSoilTemp@0160mm
              [Soil].SoilTemperature.MaxSoilTemp[5] as MaxSoilTemp@0300mm
              [Soil].SoilTemperature.MaxSoilTemp[6] as MaxSoilTemp@0500mm
              [Soil].SoilTemperature.MaxSoilTemp[7] as MaxSoilTemp@0750mm
              [Soil].SoilTemperature.MaxSoilTemp[8] as MaxSoilTemp@1000mm
              [Soil].SoilTemperature.MaxSoilTemp[9] as MaxSoilTemp@1250mm
              [Soil].SoilTemperature.MaxSoilTemp[10] as MaxSoilTemp@1500mm
              [Soil].SoilTemperature.MaxSoilTemp[11] as MaxSoilTemp@1700mm
              [Soil].SoilTemperature.MaxSoilTemp[12] as MaxSoilTemp@1900mm
            EventNames:
              Clock.Today >= new DateTime(2005, 1, 1)
              //[Clock].EndOfDay
  Folder LowerBC1
    Experiment ExpLowerBC1
      Factors
        Factor LowerBC
          Specification=[SetLowerBCDepth].Script.LowerBCDepth = 10, 20, 30, 100, 200, 300
      Simulation LowerBC1
        Clock: Start=2000-01-01; End=2006-12-31
        Weather: FileName=AnalyticalWeather.xlsx; ExcelWorkSheetName=CoolAdd2WeeklyOsc
        MicroClimate: a_interception=0; b_interception=0; c_interception=0; d_interception=0; SoilHeatFluxFraction=0; MinimumHeightDiffForNewLayer=0; NightInterceptionFraction=0; ReferenceHeight=2
        Summary
        Zone Field: Area=1; Slope=0; AspectAngle=0; Altitude=50
          Manager DummyWaterBalance
            SW = 0.15, 0.15, 0.15, 0.15, 0.15, 0.15, 0.15, 0.15, 0.15, 0.15, 0.15, 0.15, 0.15, 0.15, 0.15, 0.15, 0.15, 0.15, 0.15, 0.15, 0.15
            Eos = 0
            Es = 0
            Eo = 0
            Salb = 0
            script: same as in Blank.Field.DummyWaterBalance
          Manager SetLowerBCDepth: same as Blank.Field.SetLowerBCDepth
          Soil: Latitude=0; Longitude=0
            Water: Thickness=[100, 100, 800, 9000]; InitialValues=[0.16, 0.16, 0.16, 0.16]; InitialPAWmm=1100; RelativeTo=LL15; FilledFromTop=true
            Physical
              Thickness  ParticleSizeClay  BD   AirDry  LL15  DUL   SAT
              100        10                1.5  0.01    0.05  0.16  0.29
              100        10                1.5  0.01    0.05  0.16  0.29
              800        10                1.5  0.01    0.05  0.16  0.29
              9000       10                1.5  0.01    0.05  0.16  0.29
              999999     -                 -    -       -     -     -
              999999     -                 -    -       -     -     -
              999999     -                 -    -       -     -     -
              999999     -                 -    -       -     -     -
            Organic: FOMCNRatio=60; CarbonUnits=Total
              Thickness  Carbon  SoilCNRatio  FBiom  FInert  FOM
              100        2       14.5         0.04   0.4     0.294
              100        2       14.5         0.04   0.4     0.294
              800        2       14.5         0.04   0.4     0.294
              9000       2       14.5         0.04   0.4     0.294
            Chemical: Thickness=[100, 100, 800, 9000]; PH=[6.5, 6.5, 6.5, 6.5]; PHUnits=Water
            SoilTemperature: CONSTANT_TEMPdepth=0
            Solute NO3: Thickness=[6000]; InitialValues=[0.1]; InitialValuesUnits=kg/ha; WaterTableConcentration=0; D0=0; DepthConstant=0; MaxDepthSoluteAccessible=0; RunoffEffectivenessAtMovingSolute=0; MaxEffectiveRunoff=0
            Solute NH4: Thickness=[2000]; InitialValues=[1]; InitialValuesUnits=kg/ha; WaterTableConcentration=0; D0=0; DepthConstant=0; MaxDepthSoluteAccessible=0; RunoffEffectivenessAtMovingSolute=0; MaxEffectiveRunoff=0
            Solute Urea: Thickness=[6000]; InitialValues=[0]; InitialValuesUnits=kg/ha; WaterTableConcentration=0; D0=0; DepthConstant=0; MaxDepthSoluteAccessible=0; RunoffEffectivenessAtMovingSolute=0; MaxEffectiveRunoff=0
            LayerStructure
              Thickness=[25, 50, 50, 75, 200, 200, 300, 200, 300, 200, 200, 200, 500, 500, 1000, 1000, 1000, 1000, 1000, 1000, 1000]
          Report: same as LowerBC.ExpLowerBC.LowerBC.Field.Report
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