Simulations: Version=171
  DataStore
  Simulation
    Clock: Start=1900-01-01; End=2000-12-31
    Summary
    Weather: FileName=%root%/Examples/WeatherFiles/Dalby.met
    SoilArbitrator
    MicroClimate: a_interception=0; b_interception=1; c_interception=0; d_interception=0; SoilHeatFluxFraction=0.4; MinimumHeightDiffForNewLayer=0; NightInterceptionFraction=0.5; ReferenceHeight=2
    Zone Field: Area=1; Slope=0; AspectAngle=0; Altitude=50
      Manager Sow using a variable rule
        Crop = [Wheat]
        StartDate = 1-may
        EndDate = 10-jul
        MinESW = 100
        MinRain = 25
        RainDays = 7
        CultivarName = Hartog
        SowingDepth = 30
        RowSpacing = 250
        Population = 120
```csharp
using Models.Interfaces;
using APSIM.Shared.Utilities;
using Models.Utilities;
using Models.Soils;
using Models.PMF;
using Models.Core;
using System;
using System.Linq;
using Models.Climate;

namespace Models
{
    [Serializable]
    public class Script : Model
    {
        [Link] private Clock Clock;
        [Link] private Fertiliser Fertiliser;
        [Link] private Summary Summary;
        [Link] private Soil Soil;
        private Accumulator accumulatedRain;
        [Link]
        private ISoilWater waterBalance;
        
        [Description("Crop")]
        public IPlant Crop { get; set; }

        [Description("Start of sowing window (d-mmm)")]
        public string StartDate { get; set; }

        [Description("End of sowing window (d-mmm)")]
        public string EndDate { get; set; }

        [Description("Minimum extractable soil water for sowing (mm)")]
        public double MinESW { get; set; }

        [Description("Accumulated rainfall required for sowing (mm)")]
        public double MinRain { get; set; }

        [Description("Duration of rainfall accumulation (d)")]
        public int RainDays { get; set; }

        [Display(Type = DisplayType.CultivarName)]
        [Description("Cultivar to be sown")]
        public string CultivarName { get; set; }

        [Description("Sowing depth (mm)")]
        public double SowingDepth { get; set; }

        [Description("Row spacing (mm)")]
        public double RowSpacing { get; set; }

        [Description("Plant population (/m2)")]
        public double Population { get; set; }
        
        
        [EventSubscribe("StartOfSimulation")]
        private void OnSimulationCommencing(object sender, EventArgs e)
        {
            accumulatedRain = new Accumulator(this, "[Weather].Rain", RainDays);
        }

        [EventSubscribe("DoManagement")]
        private void OnDoManagement(object sender, EventArgs e)
        {
            accumulatedRain.Update();
            
            if (DateUtilities.WithinDates(StartDate, Clock.Today, EndDate) &&
                !Crop.IsAlive &&
                MathUtilities.Sum(waterBalance.ESW) > MinESW &&
                accumulatedRain.Sum > MinRain)
            {
                Crop.Sow(population: Population, cultivar: CultivarName, depth: SowingDepth, rowSpacing: RowSpacing);    
            }
        }
    }
}
```
      Manager Fertilise at sowing
        Crop = [Wheat]
        FertiliserType = NO3N
        Amount = 160
```csharp
using Models.Soils;
using System;
using System.Linq;
using Models.Core;
using Models.PMF;
namespace Models
{
    [Serializable]
    public class Script : Model
    {
        [Link] Clock Clock;
        [Link] Fertiliser Fertiliser;
        
        [Description("Crop to be fertilised")]
        public IPlant Crop { get; set; }

        [Description("Type of fertiliser to apply? ")] 
        public Fertiliser.Types FertiliserType { get; set; }
    
        [Description("Amount of fertiliser to be applied (kg/ha)")]
        public double Amount { get; set; }
        
        [EventSubscribe("Sowing")]
        private void OnSowing(object sender, EventArgs e)
        {
            Model crop = sender as Model;
            if (Crop != null && crop.Name.ToLower() == (Crop as IModel).Name.ToLower())
                Fertiliser.Apply(Amount: Amount, Type: FertiliserType);
        }
    }
}
```
      Manager Harvest
        Crop = [Wheat]
```csharp
using APSIM.Shared.Utilities;
using Models.Utilities;
using Models.Soils;
using Models.PMF;
using Models.Core;
using System;
using System.Linq;

namespace Models
{
    [Serializable] 
    public class Script : Model
    {
        [Description("Crop")]
        public IPlant Crop { get; set; }
        
        [EventSubscribe("DoManagement")]
        private void OnDoManagement(object sender, EventArgs e)
        {
            if (Crop.IsReadyForHarvesting)
            {
                Crop.Harvest();
                Crop.EndCrop();
            }
        }
    }
}
```
      Fertiliser
      Plant Wheat
      SurfaceOrganicMatter: InitialResidueName=wheat_stubble; InitialResidueType=wheat; InitialResidueMass=500; InitialStandingFraction=0; InitialCPR=0; InitialCNR=100
      Report: EventNames=[Wheat].Harvesting
        VariableNames:
          [Clock].Today
          [Wheat].LAI
          [Wheat].Phenology.Zadok.Stage
          [Wheat].Phenology.CurrentStageName
          [Wheat].AboveGround.Wt
          [Wheat].AboveGround.N
          [Wheat].Grain.Total.Wt*10 as Yield
          [Wheat].Grain.Protein
          [Wheat].Grain.Size
          [Wheat].Grain.Number
          [Wheat].Grain.Total.Wt
          [Wheat].Grain.Total.N
          [Wheat].Total.Wt
      Soil Silt loam (Rolleston, Larcomb No1384): SoilType=Silt loam; LocalName=Eyre; Site=Larcomb; NearestTown=Rolleston, Larcomb; Region=Canterbury; Country=New Zealand; ApsoilNumber=1384; Latitude=-43.58; Longitude=172.44; LocationAccuracy=+/-100 m; YearOfSampling=1990
        DataSource=The database of New Zealand soils was compiled by AgResearch (www.agresearch.co.nz) and based on soil properties gathered, mainly from publications, in the course of conducting several simulation-based research projects but particularly from the Pastoral 21 Environment program which was funded by the New Zealand Ministry for Business, Innovation and Employment,  Dairy NZ, Fonterra and Meat & Wool NZ.
        Comments=Gravel soil. The bulk density of this APSoil reflects weight of fine-earth fraction per volume of bulk soil. Use with gravimetric water contents measured on the fine-earth fraction. Gravel assumed to not hold water as reflected in low SAT, DUL, LL15, LL and AD. The data is a combination of published or supplied measurements, pedotransfer functions, and expert opinion. See Cichota et al. (2013; Soil Research 51: 92-111, http://dx.doi.org/10.1071/SR12338) for a description of the pedotransfer functions. The soil carbon and fresh organic matter settings have been set as those broadly appropriate for permanent productive pastoral systems, see Cichota el al. (2012; Soil Research 50: 694-707, http://dx.doi.org/10.1071/SR12208). Users should take care to adapt these to local conditions before using the data in simulations. FOM values estimated to be 900 kg/ha of FOM in top 600mm of soil and another 100 kg/ha below. Soil C:N ratios taken from soil Silt loam (Ashburton NoXXXX).
        Physical
          Thickness  ParticleSizeClay  ParticleSizeSand  ParticleSizeSilt  BD     AirDry  LL15   DUL    SAT    KS
          150        19                30.319            50.681            1.015  0.032   0.098  0.328  0.457  2841.713
          130        18                35.368            46.632            0.415  0.012   0.037  0.123  0.169  2568.09
          140        18                48.255            33.745            0.203  0.005   0.016  0.05   0.069  2352.819
          340        5                 88.882            6.118             0.257  0.004   0.011  0.04   0.086  25074.195
          340        2                 91.507            6.493             0.25   0.004   0.012  0.039  0.099  27424.6
          400        2                 97.156            0.844             0.36   0.005   0.016  0.056  0.153  33630.815
          BD source: Field measured and checked for sensibility
          AirDry source: Estimated based on local knowledge
          LL15, DUL source: Laboratory measured
          SAT source: Calculated from measured, estimated or calculated BD
          SoilCrop wheatSoil: LL=[0.098, 0.037, 0.016, 0.011, 0.012, 0.016]; KL=[0.06, 0.06, 0.06, 0.051, 0.04, 0.025]; XF=[1, 1, 1, 1, 1, 1]
            LL source: Estimated based on local knowledge
          SoilCrop perennialgrassSoil: same as Simulation.Field.Silt loam (Rolleston, Larcomb No1384).Physical.wheatSoil
          SoilCrop SCRUMSoil: same as Simulation.Field.Silt loam (Rolleston, Larcomb No1384).Physical.wheatSoil
        WaterBalance SoilWater: SummerDate=1-nov; SummerU=6; SummerCona=3.5; WinterDate=1-apr; WinterU=2; WinterCona=2; DiffusConst=88; DiffusSlope=35; Salb=0.13; CN2Bare=73; CNRed=20; CNCov=0.8; PSIDul=-100; Thickness=[150, 130, 140, 340, 340, 400]; SWCON=[0.581, 0.659, 0.711, 0.669, 0.665, 0.645]
        Organic: FOMCNRatio=40; CarbonUnits=Total
          Thickness  Carbon  SoilCNRatio  FBiom  FInert  FOM
          150        3.2     11.837       0.078  0.46    78.512
          130        2.7     11.837       0.034  0.709   60.5368
          140        1.2     11.837       0.008  0.845   45.7527
          340        0.65    11.837       0.008  0.93    23.1791
          340        0.55    11.837       0.008  0.976   11.7429
          400        0.26    11.837       0.008  0.992   5.27644
        Chemical: PHUnits=Water
          Thickness  PH   CEC
          150        6.5  13.4
          130        6.5  12.2
          140        6.5  8.3
          340        6.5  4.9
          340        6.5  4
          400        6.5  2.4
          PH source: Estimated based on local knowledge
        Nutrient
        Solute NO3: InitialValuesUnits=ppm; WaterTableConcentration=0; D0=0; DepthConstant=0; MaxDepthSoluteAccessible=0; RunoffEffectivenessAtMovingSolute=0; MaxEffectiveRunoff=0
        Solute NH4: InitialValuesUnits=ppm; WaterTableConcentration=0; D0=0; DepthConstant=0; MaxDepthSoluteAccessible=0; RunoffEffectivenessAtMovingSolute=0; MaxEffectiveRunoff=0
        Solute Urea: Thickness=[150, 130, 140, 340, 340, 400]; InitialValues=[0, 0, 0, 0, 0, 0]; InitialValuesUnits=kg/ha; WaterTableConcentration=0; D0=0; DepthConstant=0; MaxDepthSoluteAccessible=0; RunoffEffectivenessAtMovingSolute=0; MaxEffectiveRunoff=0
        Water: Thickness=[150, 130, 140, 340, 340, 400]; InitialPAWmm=0; FilledFromTop=false
        CERESSoilTemperature
      Soil Loam (Gore No1397): SoilType=Loam; LocalName=Riversdale; Site=Riversdale; NearestTown=Gore; Region=Southland; Country=New Zealand; ApsoilNumber=1397; Latitude=-45.9; Longitude=168.75; LocationAccuracy=+/-50 m; YearOfSampling=2016
        DataSource=The database of New Zealand soils was compiled by AgResearch (www.agresearch.co.nz) and based on soil properties gathered, mainly from publications, in the course of conducting several simulation-based research projects but particularly from the Pastoral 21 Environment program which was funded by the New Zealand Ministry for Business, Innovation and Employment,  Dairy NZ, Fonterra and Meat & Wool NZ.
        Comments=Gravel soil. The bulk density of this APSoil reflects weight of fine-earth fraction per volume of bulk soil. Use with gravimetric water contents measured on the fine-earth fraction. Gravel assumed to not hold water as reflected in low SAT, DUL, LL15, LL and AD. The data is a combination of published or supplied measurements, pedotransfer functions, and expert opinion. See Cichota et al. (2013; Soil Research 51: 92-111, http://dx.doi.org/10.1071/SR12338) for a description of the pedotransfer functions. The soil carbon and fresh organic matter settings have been set as those broadly appropriate for permanent productive pastoral systems, see Cichota el al. (2012; Soil Research 50: 694-707, http://dx.doi.org/10.1071/SR12208). Users should take care to adapt these to local conditions before using the data in simulations. FOM values estimated to be 900 kg/ha of FOM in top 600mm of soil and another 100 kg/ha below. Soil C:N ratios taken from soil Loam (Gore NoXXXX).
        Physical
          Thickness  ParticleSizeClay  ParticleSizeSand  ParticleSizeSilt  BD     AirDry  LL15   DUL    SAT    KS
          120        22                30                48                0.568  0.02    0.06   0.192  0.257  9763.585
          160        21                35                44                0.538  0.015   0.046  0.171  0.226  4801.395
          220        12                60                28                0.347  0.008   0.025  0.097  0.156  5479.158
          400        3                 92                5                 0.362  0.005   0.015  0.053  0.135  11995.823
          300        1                 97                2                 0.322  0.004   0.011  0.037  0.113  16213.516
          300        1                 98                1                 0.27   0.003   0.009  0.03   0.093  17133.381
          BD source: Field measured and checked for sensibility
          AirDry, LL15, DUL source: Estimated based on local knowledge
          SAT source: Calculated from measured, estimated or calculated BD
          SoilCrop wheatSoil: LL=[0.06, 0.046, 0.025, 0.015, 0.011, 0.009]; KL=[0.06, 0.06, 0.06, 0.045, 0.04, 0.02]; XF=[1, 1, 1, 1, 1, 1]
            LL source: Estimated based on local knowledge
          SoilCrop perennialgrassSoil: same as Simulation.Field.Loam (Gore No1397).Physical.wheatSoil
          SoilCrop SCRUMSoil: same as Simulation.Field.Loam (Gore No1397).Physical.wheatSoil
        WaterBalance SoilWater: SummerDate=1-nov; SummerU=6; SummerCona=3.5; WinterDate=1-apr; WinterU=2; WinterCona=2; DiffusConst=88; DiffusSlope=35; Salb=0.13; CN2Bare=73; CNRed=20; CNCov=0.8; PSIDul=-100; Thickness=[120, 160, 220, 400, 300, 300]; SWCON=[0.659, 0.64, 0.633, 0.631, 0.668, 0.678]
        Organic: FOMCNRatio=40; CarbonUnits=Total
          Thickness  Carbon  SoilCNRatio  FBiom  FInert  FOM
          120        4       11.837       0.079  0.476   69.6981
          160        2.5     11.837       0.04   0.621   50.6112
          220        1.2     11.837       0.008  0.858   32.5954
          400        0.6     11.837       0.008  0.951   14.6461
          300        0.4     11.837       0.008  0.99    8.03794
          300        0.3     11.837       0.008  0.993   4.41131
        Chemical: PHUnits=Water
          Thickness  PH   CEC
          120        6.5  15.384
          160        6.5  12.258
          220        6.5  11.002
          400        6.5  7.176
          300        6.5  5.876
          300        6.5  5.743
          PH source: Estimated based on local knowledge
        Nutrient
        Solute NO3: InitialValuesUnits=ppm; WaterTableConcentration=0; D0=0; DepthConstant=0; MaxDepthSoluteAccessible=0; RunoffEffectivenessAtMovingSolute=0; MaxEffectiveRunoff=0
        Solute NH4: InitialValuesUnits=ppm; WaterTableConcentration=0; D0=0; DepthConstant=0; MaxDepthSoluteAccessible=0; RunoffEffectivenessAtMovingSolute=0; MaxEffectiveRunoff=0
        Solute Urea: Thickness=[120, 160, 220, 400, 300, 300]; InitialValues=[0, 0, 0, 0, 0, 0]; InitialValuesUnits=kg/ha; WaterTableConcentration=0; D0=0; DepthConstant=0; MaxDepthSoluteAccessible=0; RunoffEffectivenessAtMovingSolute=0; MaxEffectiveRunoff=0
        Water: Thickness=[120, 160, 220, 400, 300, 300]; InitialPAWmm=0; FilledFromTop=false
        CERESSoilTemperature
      Soil Clay (Kerepehi No1324): SoilType=Clay; LocalName=Netherton; Site=Wharepoa Rd; NearestTown=Kerepehi; Region=Waikato; Country=New Zealand; NaturalVegetation=long term grass; ApsoilNumber=1324; Latitude=-37.298; Longitude=175.581; LocationAccuracy=+/-50 m; YearOfSampling=1984
        DataSource=The database of New Zealand soils was compiled by AgResearch (www.agresearch.co.nz) and based on soil properties gathered, mainly from publications, in the course of conducting several simulation-based research projects but particularly from the Pastoral 21 Environment program which was funded by the New Zealand Ministry for Business, Innovation and Employment,  Dairy NZ, Fonterra and Meat & Wool NZ.
        Comments=The data is a combination of published or supplied measurements, pedotransfer functions, and expert opinion. See Cichota et al. (2013; Soil Research 51: 92-111, http://dx.doi.org/10.1071/SR12338) for a description of the pedotransfer functions. The soil carbon and fresh organic matter settings have been set as those broadly appropriate for permanent productive pastoral systems, see Cichota el al. (2012; Soil Research 50: 694-707, http://dx.doi.org/10.1071/SR12208). Users should take care to adapt these to local conditions before using the data in simulations. FOM values estimated to be 900 kg/ha of FOM in top 600mm of soil and another 100 kg/ha below.
        Physical
          Thickness  ParticleSizeClay  ParticleSizeSand  ParticleSizeSilt  BD     AirDry  LL15   DUL    SAT    KS
          100        51.76             10.21             38.03             0.87   0.114   0.344  0.59   0.599  924.845
          100        54.52             10.21             35.27             0.985  0.116   0.351  0.504  0.564  341.563
          200        67                2.07              30.93             1.02   0.141   0.428  0.552  0.574  213.838
          150        69.42             0                 30.58             1.005  0.14    0.424  0.585  0.589  133.822
          450        59.85             0                 40.15             0.98   0.136   0.412  0.592  0.598  164.895
          500        51.22             0                 48.78             0.875  0.122   0.369  0.611  0.622  233.71
          BD source: Field measured and checked for sensibility
          AirDry source: Estimated based on local knowledge
          LL15, DUL source: Laboratory measured
          SAT source: Calculated from measured, estimated or calculated BD
          SoilCrop wheatSoil: LL=[0.344, 0.351, 0.428, 0.424, 0.412, 0.369]; KL=[0.06, 0.06, 0.06, 0.06, 0.042, 0.028]; XF=[1, 1, 1, 1, 1, 1]
            LL source: Estimated based on local knowledge
          SoilCrop perennialgrassSoil: same as Simulation.Field.Clay (Kerepehi No1324).Physical.wheatSoil
          SoilCrop SCRUMSoil: same as Simulation.Field.Clay (Kerepehi No1324).Physical.wheatSoil
        WaterBalance SoilWater: SummerDate=1-nov; SummerU=6; SummerCona=3.5; WinterDate=1-apr; WinterU=2; WinterCona=2; DiffusConst=88; DiffusSlope=35; Salb=0.13; CN2Bare=73; CNRed=20; CNCov=0.8; PSIDul=-100; Thickness=[100, 100, 200, 150, 450, 500]; SWCON=[0.774, 0.6, 0.605, 0.793, 0.644, 0.586]
        Organic: FOMCNRatio=40; CarbonUnits=Total
          Thickness  Carbon  SoilCNRatio  FBiom  FInert  FOM
          100        7.1     11.452       0.08   0.584   49.9963
          100        3.8     11.452       0.061  0.608   40.9335
          200        1.1     11.452       0.013  0.713   27.4386
          150        0.8     11.452       0.008  0.914   20.327
          450        0.6     11.452       0.008  0.961   8.26434
          500        0.8     11.452       0.008  0.994   3.04028
        Chemical: PHUnits=Water
          Thickness  PH   CEC
          100        6.5  32.3
          100        6.5  24.4
          200        6.5  27.4
          150        6.5  29.8
          450        6.5  27.9
          500        6.5  26.4
          PH source: Estimated based on local knowledge
        Nutrient
        Solute NO3: InitialValuesUnits=ppm; WaterTableConcentration=0; D0=0; DepthConstant=0; MaxDepthSoluteAccessible=0; RunoffEffectivenessAtMovingSolute=0; MaxEffectiveRunoff=0
        Solute NH4: InitialValuesUnits=ppm; WaterTableConcentration=0; D0=0; DepthConstant=0; MaxDepthSoluteAccessible=0; RunoffEffectivenessAtMovingSolute=0; MaxEffectiveRunoff=0
        Solute Urea: Thickness=[100, 100, 200, 150, 450, 500]; InitialValues=[0, 0, 0, 0, 0, 0]; InitialValuesUnits=kg/ha; WaterTableConcentration=0; D0=0; DepthConstant=0; MaxDepthSoluteAccessible=0; RunoffEffectivenessAtMovingSolute=0; MaxEffectiveRunoff=0
        Water: Thickness=[100, 100, 200, 150, 450, 500]; InitialPAWmm=0; FilledFromTop=false
        CERESSoilTemperature
      Soil Sandy loam (Taupo No1355): SoilType=Sandy loam; LocalName=Atiamuri; Site=Land disposal site; NearestTown=Taupo; Region=Taupo; Country=New Zealand; ApsoilNumber=1355; Latitude=-38.65; Longitude=176.12; LocationAccuracy=+/-100 m; YearOfSampling=2005
        DataSource=The database of New Zealand soils was compiled by AgResearch (www.agresearch.co.nz) and based on soil properties gathered, mainly from publications, in the course of conducting several simulation-based research projects but particularly from the Pastoral 21 Environment program which was funded by the New Zealand Ministry for Business, Innovation and Employment,  Dairy NZ, Fonterra and Meat & Wool NZ.
        Comments=Gravel soil. The bulk density of this APSoil reflects weight of fine-earth fraction per volume of bulk soil. Use with gravimetric water contents measured on the fine-earth fraction. Gravel assumed to not hold water as reflected in low SAT, DUL, LL15, LL and AD. The data is a combination of published or supplied measurements, pedotransfer functions, and expert opinion. See Cichota et al. (2013; Soil Research 51: 92-111, http://dx.doi.org/10.1071/SR12338) for a description of the pedotransfer functions. The soil carbon and fresh organic matter settings have been set as those broadly appropriate for permanent productive pastoral systems, see Cichota el al. (2012; Soil Research 50: 694-707, http://dx.doi.org/10.1071/SR12208). Users should take care to adapt these to local conditions before using the data in simulations. FOM values estimated to be 900 kg/ha of FOM in top 600mm of soil and another 100 kg/ha below. Soil C:N ratios taken from soil Sandy loam (Wairakei NoXXXX).
        Physical
          Thickness  ParticleSizeClay  ParticleSizeSand  ParticleSizeSilt  BD     AirDry  LL15   DUL    SAT    KS
          150        4                 56.18             39.82             0.638  0.047   0.141  0.383  0.663  4950.104
          200        2.45              52.687            44.863            0.705  0.038   0.116  0.366  0.611  2968.294
          400        2.6               50.02             47.38             0.696  0.025   0.076  0.318  0.515  2161.265
          130        1.8               58.817            39.383            0.75   0.027   0.083  0.263  0.535  876.135
          270        1.5               55.075            43.425            0.666  0.025   0.074  0.291  0.419  1972.846
          350        0.8               24.2              75                0.349  0.012   0.037  0.122  0.176  2758.964
          BD source: Field measured and checked for sensibility
          AirDry source: Estimated based on local knowledge
          LL15, DUL source: Laboratory measured
          SAT source: Calculated from measured, estimated or calculated BD
          SoilCrop wheatSoil: LL=[0.141, 0.116, 0.076, 0.083, 0.074, 0.037]; KL=[0.06, 0.06, 0.053, 0.04, 0.04, 0.023]; XF=[1, 1, 1, 1, 1, 1]
            LL source: Estimated based on local knowledge
          SoilCrop perennialgrassSoil: same as Simulation.Field.Sandy loam (Taupo No1355).Physical.wheatSoil
          SoilCrop SCRUMSoil: same as Simulation.Field.Sandy loam (Taupo No1355).Physical.wheatSoil
        WaterBalance SoilWater: SummerDate=1-nov; SummerU=6; SummerCona=3.5; WinterDate=1-apr; WinterU=2; WinterCona=2; DiffusConst=88; DiffusSlope=35; Salb=0.13; CN2Bare=73; CNRed=20; CNCov=0.8; PSIDul=-100; Thickness=[150, 200, 400, 130, 270, 350]; SWCON=[0.562, 0.536, 0.486, 0.534, 0.532, 0.585]
        Organic: FOMCNRatio=40; CarbonUnits=Total
          Thickness  Carbon  SoilCNRatio  FBiom  FInert  FOM
          150        8.1     11.25        0.078  0.662   93.505
          200        2.8     11.25        0.023  0.738   62.678
          400        0.4     11.25        0.008  0.873   28.163
          130        0.2     11.25        0.008  0.964   21.715
          270        0.15    11.25        0.008  0.985   12.655
          350        0.25    11.25        0.008  0.992   6.284
        Chemical: PHUnits=Water
          Thickness  PH   CEC
          150        6.5  21.8
          200        6.5  15.1
          400        6.5  6
          130        6.5  4.4
          270        6.5  4
          350        6.5  8
          PH source: Estimated based on local knowledge
        Nutrient
        Solute NO3: InitialValuesUnits=ppm; WaterTableConcentration=0; D0=0; DepthConstant=0; MaxDepthSoluteAccessible=0; RunoffEffectivenessAtMovingSolute=0; MaxEffectiveRunoff=0
        Solute NH4: InitialValuesUnits=ppm; WaterTableConcentration=0; D0=0; DepthConstant=0; MaxDepthSoluteAccessible=0; RunoffEffectivenessAtMovingSolute=0; MaxEffectiveRunoff=0
        Solute Urea: Thickness=[150, 200, 400, 130, 270, 350]; InitialValues=[0, 0, 0, 0, 0, 0]; InitialValuesUnits=kg/ha; WaterTableConcentration=0; D0=0; DepthConstant=0; MaxDepthSoluteAccessible=0; RunoffEffectivenessAtMovingSolute=0; MaxEffectiveRunoff=0
        Water: Thickness=[150, 200, 400, 130, 270, 350]; InitialPAWmm=0; FilledFromTop=false
        CERESSoilTemperature
      Soil Black Vertosol-Bongeen (Dalby No027): ASCOrder=Vertosol; ASCSubOrder=Black; SoilType=Clay; Site=Dalby; NearestTown=Dalby, Q 4405; Region=Darling Downs and Granite Belt; State=Queensland; Country=Australia; ApsoilNumber=27; Latitude=-27.123; Longitude=151.305; LocationAccuracy=+/- 20m; YearOfSampling=0; DataSource=CSIRO Sustainable Ecosystems, Toowoomba
        Comments=Clay - Toowoomba - Wheat ll,xf copied from sorghum. Wheat kl is just default apsim kl values for wheat.
        Physical
          Thickness  BD    AirDry  LL15  DUL   SAT
          150        1.25  0.115   0.23  0.45  0.5
          150        1.31  0.184   0.23  0.43  0.48
          300        1.23  0.23    0.23  0.46  0.51
          300        1.24  0.23    0.23  0.45  0.5
          300        1.25  0.23    0.23  0.45  0.5
          300        1.26  0.23    0.23  0.44  0.49
          300        1.29  0.23    0.23  0.43  0.48
          BD, DUL source: Field measured and checked for sensibility
          AirDry, LL15 source: Estimated based on local knowledge
          SAT source: Calculated from measured, estimated or calculated BD
          SoilCrop wheatSoil: LL=[0.23, 0.24, 0.29, 0.34, 0.37, 0.38, 0.39]; KL=[0.06, 0.06, 0.06, 0.04, 0.04, 0.02, 0.01]; XF=[1, 1, 1, 1, 1, 1, 1]
            LL source: Estimated based on local knowledge
          SoilCrop cottonSoil: LL=[0.23, 0.23, 0.23, 0.26, 0.3, 0.33, 0.37]; KL=[0.1, 0.1, 0.1, 0.1, 0.09, 0.07, 0.05]; XF=[1, 1, 1, 1, 1, 1, 1]
            LL source: Field measured and checked for sensibility
          SoilCrop sorghumSoil: LL=[0.23, 0.24, 0.29, 0.34, 0.37, 0.38, 0.39]; KL=[0.07, 0.07, 0.07, 0.05, 0.05, 0.04, 0.03]; XF=[1, 1, 1, 1, 1, 1, 1]
            LL source: Field measured and checked for sensibility
          SoilCrop SCRUMSoil: same as Simulation.Field.Black Vertosol-Bongeen (Dalby No027).Physical.wheatSoil
        WaterBalance SoilWater: SummerDate=1-Nov; SummerU=6; SummerCona=3.5; WinterDate=1-Apr; WinterU=4; WinterCona=2.5; DiffusConst=40; DiffusSlope=16; Salb=0.12; CN2Bare=73; CNRed=20; CNCov=0.8; PSIDul=-100; Thickness=[150, 150, 300, 300, 300, 300, 300]; SWCON=[0.3, 0.3, 0.3, 0.3, 0.3, 0.3, 0.3]
        Organic: FOMCNRatio=40; CarbonUnits=WalkleyBlack
          Thickness  Carbon    SoilCNRatio  FBiom  FInert  FOM
          150        0.915385  12           0.04   0.4     347.129
          150        0.776923  12           0.02   0.6     270.344
          300        0.346154  12           0.02   0.8     163.972
          300        0.230769  12           0.02   1       99.4541
          300        0.153846  12           0.01   1       60.322
          300        0.123077  12           0.01   1       36.5871
          300        0.130769  12           0.01   1       22.1912
        Chemical: Thickness=[150, 150, 300, 300, 300, 300, 300]; PH=[8.2, 8.5, 8.6, 8.6, 7.4, 5.3, 5.3]; PHUnits=Water
          PH source: Estimated based on local knowledge
        Nutrient
        Solute NO3: InitialValuesUnits=ppm; WaterTableConcentration=0; D0=0; DepthConstant=0; MaxDepthSoluteAccessible=0; RunoffEffectivenessAtMovingSolute=0; MaxEffectiveRunoff=0
        Solute NH4: InitialValuesUnits=ppm; WaterTableConcentration=0; D0=0; DepthConstant=0; MaxDepthSoluteAccessible=0; RunoffEffectivenessAtMovingSolute=0; MaxEffectiveRunoff=0
        Solute Urea: Thickness=[150, 150, 300, 300, 300, 300, 300]; InitialValues=[0, 0, 0, 0, 0, 0, 0]; InitialValuesUnits=kg/ha; WaterTableConcentration=0; D0=0; DepthConstant=0; MaxDepthSoluteAccessible=0; RunoffEffectivenessAtMovingSolute=0; MaxEffectiveRunoff=0
        Water: Thickness=[150, 150, 300, 300, 300, 300, 300]; InitialValues=[0.23, 0.23, 0.23, 0.23, 0.23, 0.23, 0.23]; InitialPAWmm=0; RelativeTo=LL15; FilledFromTop=false
        CERESSoilTemperature
      Soil Silt loam (Lincoln DSIR Farm No1317): SoilType=Silt loam; LocalName=Templeton; Site=DSIR Farm near rainshelter, Boundary Rd; NearestTown=Lincoln DSIR Farm; Region=Canterbury; Country=New Zealand; NaturalVegetation=ley grass; ApsoilNumber=1317; Latitude=-43.623; Longitude=172.468; LocationAccuracy=+/-50 m; YearOfSampling=1988
        DataSource=The database of New Zealand soils was compiled by AgResearch (www.agresearch.co.nz) and based on soil properties gathered, mainly from publications, in the course of conducting several simulation-based research projects but particularly from the Pastoral 21 Environment program which was funded by the New Zealand Ministry for Business, Innovation and Employment,  Dairy NZ, Fonterra and Meat & Wool NZ.
        Comments=The data is a combination of published or supplied measurements, pedotransfer functions, and expert opinion. See Cichota et al. (2013; Soil Research 51: 92-111, http://dx.doi.org/10.1071/SR12338) for a description of the pedotransfer functions. The soil carbon and fresh organic matter settings have been set as those broadly appropriate for permanent productive pastoral systems, see Cichota el al. (2012; Soil Research 50: 694-707, http://dx.doi.org/10.1071/SR12208). Users should take care to adapt these to local conditions before using the data in simulations. FOM values estimated to be 900 kg/ha of FOM in top 600mm of soil and another 100 kg/ha below.
        Physical
          Thickness  ParticleSizeClay  ParticleSizeSand  ParticleSizeSilt  BD     AirDry  LL15   DUL    SAT    KS
          150        24                15.63             60.37             1.348  0.055   0.167  0.364  0.453  2714.21
          100        23                13.63             63.37             1.33   0.051   0.154  0.332  0.466  578.824
          100        21                10.56             68.44             1.51   0.053   0.161  0.317  0.414  408.559
          200        15                21.33             63.67             1.37   0.031   0.093  0.313  0.46   440.794
          150        21                9.63              69.37             1.495  0.047   0.143  0.321  0.422  111.722
          200        7                 74.87             18.13             1.325  0.016   0.048  0.211  0.465  3589.667
          100        17                38.24             44.76             1.5    0.052   0.157  0.311  0.419  961.793
          100        9                 56.22             34.78             1.36   0.027   0.082  0.304  0.452  2780.3
          150        10                31.96             58.04             1.38   0.031   0.093  0.343  0.448  769.599
          250        18                7.42              74.58             1.505  0.045   0.136  0.395  0.414  54.939
          BD source: Field measured and checked for sensibility
          AirDry source: Estimated based on local knowledge
          LL15, DUL source: Laboratory measured
          SAT source: Calculated from measured, estimated or calculated BD
          SoilCrop wheatSoil
            LL=[0.167, 0.154, 0.161, 0.093, 0.143, 0.048, 0.157, 0.082, 0.093, 0.136]
            KL=[0.06, 0.06, 0.06, 0.06, 0.047, 0.04, 0.04, 0.04, 0.033, 0.02]
            XF=[1, 1, 1, 1, 1, 1, 1, 1, 1, 1]
            LL source: Estimated based on local knowledge
          SoilCrop perennialgrassSoil: same as Simulation.Field.Silt loam (Lincoln DSIR Farm No1317).Physical.wheatSoil
          SoilCrop SCRUMSoil: same as Simulation.Field.Silt loam (Lincoln DSIR Farm No1317).Physical.wheatSoil
        WaterBalance SoilWater: SummerDate=1-nov; SummerU=6; SummerCona=3.5; WinterDate=1-apr; WinterU=2; WinterCona=2; DiffusConst=88; DiffusSlope=35; Salb=0.13; CN2Bare=73; CNRed=20; CNCov=0.8; PSIDul=-100; Thickness=[150, 100, 100, 200, 150, 200, 100, 100, 150, 250]
          SWCON=[0.596, 0.564, 0.573, 0.491, 0.477, 0.566, 0.593, 0.605, 0.554, 0.543]
        Organic: FOMCNRatio=40; CarbonUnits=Total
          Thickness  Carbon  SoilCNRatio  FBiom  FInert  FOM
          150        3.1     13.478       0.078  0.449   56.185
          100        2.3     13.478       0.04   0.664   46
          100        0.56    13.478       0.013  0.681   37.662
          200        0.3     13.478       0.008  0.834   25.245
          150        0.32    13.478       0.008  0.945   18.702
          200        0.14    13.478       0.008  0.957   12.537
          100        0.28    13.478       0.008  0.976   10.264
          100        0.247   13.478       0.008  0.989   8.403
          150        0.222   13.478       0.008  0.991   6.225
          250        0.25    13.478       0.008  0.993   3.776
        Chemical: PHUnits=Water
          Thickness  PH   CEC
          150        6.5  15.2
          100        6.5  13.1
          100        6.5  7.6
          200        6.5  6.7
          150        6.5  9.7
          200        6.5  5.7
          100        6.5  10.9
          100        6.5  8.767
          150        6.5  8.456
          250        6.5  9.374
          PH source: Estimated based on local knowledge
        Nutrient
        Solute NO3: InitialValuesUnits=ppm; WaterTableConcentration=0; D0=0; DepthConstant=0; MaxDepthSoluteAccessible=0; RunoffEffectivenessAtMovingSolute=0; MaxEffectiveRunoff=0
        Solute NH4: InitialValuesUnits=ppm; WaterTableConcentration=0; D0=0; DepthConstant=0; MaxDepthSoluteAccessible=0; RunoffEffectivenessAtMovingSolute=0; MaxEffectiveRunoff=0
        Solute Urea: Thickness=[150, 100, 100, 200, 150, 200, 100, 100, 150, 250]; InitialValues=[0, 0, 0, 0, 0, 0, 0, 0, 0, 0]; InitialValuesUnits=kg/ha; WaterTableConcentration=0; D0=0; DepthConstant=0; MaxDepthSoluteAccessible=0; RunoffEffectivenessAtMovingSolute=0; MaxEffectiveRunoff=0
        Water: Thickness=[150, 100, 100, 200, 150, 200, 100, 100, 150, 250]; InitialPAWmm=0; FilledFromTop=false
        CERESSoilTemperature
      Soil Silt loam (Burnham No1316): SoilType=Silt loam; LocalName=Lismore; Site=Topham Farm, Midhurst Rd; NearestTown=Burnham; Region=Canterbury; Country=New Zealand; NaturalVegetation=long term grass; ApsoilNumber=1316; Latitude=-43.577; Longitude=172.203; LocationAccuracy=+/-50 m; YearOfSampling=1988
        DataSource=The database of New Zealand soils was compiled by AgResearch (www.agresearch.co.nz) and based on soil properties gathered, mainly from publications, in the course of conducting several simulation-based research projects but particularly from the Pastoral 21 Environment program which was funded by the New Zealand Ministry for Business, Innovation and Employment,  Dairy NZ, Fonterra and Meat & Wool NZ.
        Comments=Gravel soil. The bulk density of this APSoil reflects weight of fine-earth fraction per volume of bulk soil. Use with gravimetric water contents measured on the fine-earth fraction. Gravel assumed to not hold water as reflected in low SAT, DUL, LL15, LL and AD. The data is a combination of published or supplied measurements, pedotransfer functions, and expert opinion. See Cichota et al. (2013; Soil Research 51: 92-111, http://dx.doi.org/10.1071/SR12338) for a description of the pedotransfer functions. The soil carbon and fresh organic matter settings have been set as those broadly appropriate for permanent productive pastoral systems, see Cichota el al. (2012; Soil Research 50: 694-707, http://dx.doi.org/10.1071/SR12208). Users should take care to adapt these to local conditions before using the data in simulations. FOM values estimated to be 900 kg/ha of FOM in top 600mm of soil and another 100 kg/ha below.
        Physical
          Thickness  ParticleSizeClay  ParticleSizeSand  ParticleSizeSilt  BD     AirDry  LL15   DUL    SAT    KS
          170        22                14.28             63.72             1.2    0.05    0.153  0.367  0.498  3061.415
          110        23                14.35             62.65             1.35   0.051   0.155  0.352  0.458  1401.511
          80         22                18.42             59.58             1.42   0.052   0.159  0.316  0.439  925.09
          110        24                46.28             29.72             0.389  0.013   0.04   0.074  0.126  1355.224
          230        12                77.35             10.65             0.436  0.013   0.04   0.072  0.155  9892.477
          250        5                 90.56             4.44              0.336  0.006   0.018  0.035  0.106  15786.198
          550        3                 94.35             2.65              0.295  0.003   0.009  0.021  0.074  15210.634
          BD source: Field measured and checked for sensibility
          AirDry source: Estimated based on local knowledge
          LL15, DUL source: Laboratory measured
          SAT source: Calculated from measured, estimated or calculated BD
          SoilCrop wheatSoil: LL=[0.153, 0.155, 0.159, 0.04, 0.04, 0.018, 0.009]; KL=[0.06, 0.06, 0.06, 0.06, 0.051, 0.04, 0.029]; XF=[1, 1, 1, 1, 1, 1, 1]
            LL source: Estimated based on local knowledge
          SoilCrop perennialgrassSoil: same as Simulation.Field.Silt loam (Burnham No1316).Physical.wheatSoil
          SoilCrop SCRUMSoil: same as Simulation.Field.Silt loam (Burnham No1316).Physical.wheatSoil
        WaterBalance SoilWater: SummerDate=1-nov; SummerU=6; SummerCona=3.5; WinterDate=1-apr; WinterU=2; WinterCona=2; DiffusConst=88; DiffusSlope=35; Salb=0.13; CN2Bare=73; CNRed=20; CNCov=0.8; PSIDul=-100; Thickness=[170, 110, 80, 110, 230, 250, 550]; SWCON=[0.571, 0.594, 0.602, 0.674, 0.664, 0.693, 0.675]
        Organic: FOMCNRatio=40; CarbonUnits=Total
          Thickness  Carbon  SoilCNRatio  FBiom  FInert  FOM
          170        2.9     11.837       0.077  0.458   69.639
          110        1.2     11.837       0.031  0.59    55.887
          80         0.67    11.837       0.011  0.772   47.624
          110        0.92    11.837       0.008  0.892   38.219
          230        0.77    11.837       0.008  0.941   24.127
          250        0.52    11.837       0.008  0.97    14.634
          550        0.42    11.837       0.008  0.992   4.871
        Chemical: PHUnits=Water
          Thickness  PH   CEC
          170        6.5  13.5
          110        6.5  9.2
          80         6.5  9.5
          110        6.5  11.6
          230        6.5  7
          250        6.5  5
          550        6.5  4.1
          PH source: Estimated based on local knowledge
        Nutrient
        Solute NO3: InitialValuesUnits=ppm; WaterTableConcentration=0; D0=0; DepthConstant=0; MaxDepthSoluteAccessible=0; RunoffEffectivenessAtMovingSolute=0; MaxEffectiveRunoff=0
        Solute NH4: InitialValuesUnits=ppm; WaterTableConcentration=0; D0=0; DepthConstant=0; MaxDepthSoluteAccessible=0; RunoffEffectivenessAtMovingSolute=0; MaxEffectiveRunoff=0
        Solute Urea: Thickness=[170, 110, 80, 110, 230, 250, 550]; InitialValues=[0, 0, 0, 0, 0, 0, 0]; InitialValuesUnits=kg/ha; WaterTableConcentration=0; D0=0; DepthConstant=0; MaxDepthSoluteAccessible=0; RunoffEffectivenessAtMovingSolute=0; MaxEffectiveRunoff=0
        Water: Thickness=[170, 110, 80, 110, 230, 250, 550]; InitialPAWmm=0; FilledFromTop=false
        CERESSoilTemperature
      Soil Black Vertosol (North Star No237): ASCOrder=Vertosol; ASCSubOrder=Black; SoilType=Clay; Site=North Star; NearestTown=North Star; Region=North West Slopes and Plains; State=New South Wales; Country=Australia; NaturalVegetation=Brigalow scrub; ApsoilNumber=237; Latitude=-28.87575; Longitude=150.367; LocationAccuracy=+/- 20m; YearOfSampling=0
        DataSource=Undertaken by Jeremy Whish, CSIRO Sustainable Ecosystems, Toowoomba in collaboration with MCA, Goondiwindi as part of GRDC Best Management Practice-Pulses project
        Comments=Clay - Pond and starting water used to estimate DUL, pond appeared to be on highest water holding soil, OC measured
        Physical
          Thickness  BD     AirDry  LL15   DUL    SAT
          150        1.4    0.1     0.2    0.39   0.442
          150        1.4    0.184   0.23   0.39   0.442
          300        1.383  0.259   0.259  0.398  0.448
          300        1.39   0.259   0.259  0.39   0.445
          300        1.37   0.259   0.259  0.4    0.453
          300        1.383  0.259   0.259  0.398  0.448
          300        1.4    0.259   0.259  0.39   0.442
          BD source: Calculated from gravimetric moisture when profile wet but drained
          AirDry, LL15 source: Estimated based on local knowledge
          DUL source: Field measured and checked for sensibility
          SAT source: Calculated from measured, estimated or calculated BD
          SoilCrop wheatSoil: LL=[0.2, 0.23, 0.259, 0.29, 0.37, 0.378, 0.39]; KL=[0.06, 0.06, 0.06, 0.04, 0.04, 0.02, 0.01]; XF=[1, 1, 1, 1, 1, 1, 1]
            LL source: Field measured and checked for sensibility
          SoilCrop chickpeaSoil: LL=[0.2, 0.23, 0.279, 0.36, 0.38, 0.398, 0.39]; KL=[0.06, 0.06, 0.06, 0.06, 0.06, 0.06, 0.06]; XF=[1, 1, 1, 1, 1, 1, 1]
            LL source: Field measured and checked for sensibility
          SoilCrop SCRUMSoil: same as Simulation.Field.Black Vertosol (North Star No237).Physical.wheatSoil
        WaterBalance SoilWater: SummerDate=1-Nov; SummerU=6; SummerCona=3.5; WinterDate=1-Apr; WinterU=4; WinterCona=2.5; DiffusConst=40; DiffusSlope=16; Salb=0.13; CN2Bare=73; CNRed=20; CNCov=0.8; PSIDul=-100; Thickness=[150, 150, 300, 300, 300, 300, 300]; SWCON=[0.3, 0.3, 0.3, 0.3, 0.3, 0.3, 0.3]
        Organic: FOMCNRatio=40; CarbonUnits=WalkleyBlack
          Thickness  Carbon    SoilCNRatio  FBiom  FInert  FOM
          150        0.915385  12           0.04   0.4     347.129
          150        0.776923  12           0.02   0.5     270.344
          300        0.346154  12           0.02   0.5     163.972
          300        0.230769  12           0.02   0.6     99.4541
          300        0.153846  12           0.01   0.6     60.322
          300        0.123077  12           0.01   0.7     36.5871
          300        0.130769  12           0.01   0.8     22.1912
        Chemical: PHUnits=Water
          Thickness  PH   EC
          150        7.7  0.4
          150        8.5  0.4
          300        8.5  0.7
          300        6.8  1.1
          300        5.2  1.5
          300        4.8  1.7
          300        4.7  2
          EC, CL, PH source: Measured
        Nutrient
        Solute NO3: InitialValuesUnits=ppm; WaterTableConcentration=0; D0=0; DepthConstant=0; MaxDepthSoluteAccessible=0; RunoffEffectivenessAtMovingSolute=0; MaxEffectiveRunoff=0
        Solute NH4: InitialValuesUnits=ppm; WaterTableConcentration=0; D0=0; DepthConstant=0; MaxDepthSoluteAccessible=0; RunoffEffectivenessAtMovingSolute=0; MaxEffectiveRunoff=0
        Solute Urea: same as Simulation.Field.Black Vertosol-Bongeen (Dalby No027).Urea
        Water: Thickness=[150, 150, 300, 300, 300, 300, 300]; InitialPAWmm=0; FilledFromTop=false
        CERESSoilTemperature
      Soil Clay (Kerikeri No1353): SoilType=Clay; LocalName=Kerikeri; Site=SH 10, Bulls Rd; NearestTown=Kerikeri; Region=Northland; Country=New Zealand; ApsoilNumber=1353; Latitude=-35.258; Longitude=173.937; LocationAccuracy=+/-50 m; YearOfSampling=1979
        DataSource=The database of New Zealand soils was compiled by AgResearch (www.agresearch.co.nz) and based on soil properties gathered, mainly from publications, in the course of conducting several simulation-based research projects but particularly from the Pastoral 21 Environment program which was funded by the New Zealand Ministry for Business, Innovation and Employment,  Dairy NZ, Fonterra and Meat & Wool NZ.
        Comments=Gravel soil. The bulk density of this APSoil reflects weight of fine-earth fraction per volume of bulk soil. Use with gravimetric water contents measured on the fine-earth fraction. Gravel assumed to not hold water as reflected in low SAT, DUL, LL15, LL and AD. The data is a combination of published or supplied measurements, pedotransfer functions, and expert opinion. See Cichota et al. (2013; Soil Research 51: 92-111, http://dx.doi.org/10.1071/SR12338) for a description of the pedotransfer functions. The soil carbon and fresh organic matter settings have been set as those broadly appropriate for permanent productive pastoral systems, see Cichota el al. (2012; Soil Research 50: 694-707, http://dx.doi.org/10.1071/SR12208). Users should take care to adapt these to local conditions before using the data in simulations. FOM values estimated to be 900 kg/ha of FOM in top 600mm of soil and another 100 kg/ha below.
        Physical
          Thickness  ParticleSizeClay  ParticleSizeSand  ParticleSizeSilt  BD     AirDry  LL15   DUL    SAT    KS
          150        57                6.448             36.552            0.876  0.093   0.282  0.502  0.607  1991.893
          120        63                7.363             29.637            1.07   0.097   0.295  0.437  0.57   339.391
          180        68                5.519             26.481            1.129  0.103   0.313  0.439  0.557  129.04
          270        70                6.435             23.565            1.078  0.1     0.304  0.435  0.564  130.089
          380        70                5.518             24.482            1.013  0.094   0.286  0.426  0.565  141.539
          400        53.5              5.136             41.364            1.118  0.097   0.295  0.429  0.541  85.509
          BD source: Field measured and checked for sensibility
          AirDry source: Estimated based on local knowledge
          LL15, DUL source: Laboratory measured
          SAT source: Calculated from measured, estimated or calculated BD
          SoilCrop wheatSoil: LL=[0.282, 0.295, 0.313, 0.304, 0.286, 0.295]; KL=[0.06, 0.06, 0.06, 0.051, 0.04, 0.025]; XF=[1, 1, 1, 1, 1, 1]
            LL source: Estimated based on local knowledge
          SoilCrop perennialgrassSoil: same as Simulation.Field.Clay (Kerikeri No1353).Physical.wheatSoil
          SoilCrop SCRUMSoil: same as Simulation.Field.Clay (Kerikeri No1353).Physical.wheatSoil
        WaterBalance SoilWater: SummerDate=1-nov; SummerU=6; SummerCona=3.5; WinterDate=1-apr; WinterU=2; WinterCona=2; DiffusConst=88; DiffusSlope=35; Salb=0.13; CN2Bare=73; CNRed=20; CNCov=0.8; PSIDul=-100; Thickness=[150, 120, 180, 270, 380, 400]; SWCON=[0.574, 0.532, 0.454, 0.405, 0.367, 0.34]
        Organic: FOMCNRatio=40; CarbonUnits=Total
          Thickness  Carbon  SoilCNRatio  FBiom  FInert  FOM
          150        8.4     15.849       0.078  0.666   78.3417
          120        3.3     15.849       0.036  0.733   61.6258
          180        2.4     15.849       0.008  0.875   42.9949
          270        1.4     15.849       0.008  0.943   25.0552
          380        1.1     15.849       0.008  0.977   11.7175
          400        0.9     15.849       0.008  0.995   5.265
        Chemical: PHUnits=Water
          Thickness  PH   CEC
          150        6.5  28.5
          120        6.5  12.4
          180        6.5  8
          270        6.5  5.3
          380        6.5  4.3
          400        6.5  4.3
          PH source: Estimated based on local knowledge
        Nutrient
        Solute NO3: InitialValuesUnits=ppm; WaterTableConcentration=0; D0=0; DepthConstant=0; MaxDepthSoluteAccessible=0; RunoffEffectivenessAtMovingSolute=0; MaxEffectiveRunoff=0
        Solute NH4: InitialValuesUnits=ppm; WaterTableConcentration=0; D0=0; DepthConstant=0; MaxDepthSoluteAccessible=0; RunoffEffectivenessAtMovingSolute=0; MaxEffectiveRunoff=0
        Solute Urea: Thickness=[150, 120, 180, 270, 380, 400]; InitialValues=[0, 0, 0, 0, 0, 0]; InitialValuesUnits=kg/ha; WaterTableConcentration=0; D0=0; DepthConstant=0; MaxDepthSoluteAccessible=0; RunoffEffectivenessAtMovingSolute=0; MaxEffectiveRunoff=0
        Water: Thickness=[150, 120, 180, 270, 380, 400]; InitialPAWmm=0; FilledFromTop=false
        CERESSoilTemperature
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