Simulations: Version=128
  DataStore
  Replacements
    Plant Sorghum: PlantType=Sorghum; IsAlive=false; IsEnding=false; DaysAfterEnding=0
      Memo Introduction
        # The APSIM Sorghum Model

        _McLean, G., Brider, J., Doherty, A._

        The APSIM sorghum model has been developed using the Plant Modelling Framework (PMF) of [brown_plant_2014]. This new framework provides a library of plant organ and process submodels that can be coupled, at runtime, to construct a model in much the same way that models can be coupled to construct a simulation. This means that dynamic composition of lower level process and organ classes (e.g. photosynthesis, leaf) into larger constructions (e.g. maize, wheat, sorghum) can be achieved by the model developer without additional coding.

        The model consists of:

        * a phenology model to simulate development between developmental phases
        * a structure model to simulate plant morphology
        * a collection of organs to simulate the various plant parts
        * an arbitrator to allocate resources (N, biomass) to the various plant organs
      OrganArbitrator Arbitrator
        BiomassTypeArbitrator DMArbitration
          Folder PotentialPartitioningMethods
            ReallocationMethod
            AllocateFixationMethod
            RetranslocationMethod
            SendPotentialDMAllocationsMethod
            UpdateLeafAreaMethod
          Folder AllocationMethods
            DryMatterAllocationsMethod
          PrioritythenRelativeAllocation ArbitrationMethod
        BiomassTypeArbitrator NArbitration
          Folder PotentialPartitioningMethods
            ReallocationMethod
          Folder ActualPartitioningMethods
            AllocateFixationMethod
            C4RetranslocationMethod
          Folder AllocationMethods
            NitrogenAllocationsMethod
          SorghumArbitratorN ArbitrationMethod
          AllocateUptakesMethod
        C4WaterUptakeMethod WaterUptakeMethod: SDRatio=0
        C4NitrogenUptakeMethod NitrogenUptakeMethod: NMassFlowSupply=0; NDiffusionSupply=0
          Constant MaxNUptakeRate: FixedValue=0.029
          Constant MaxDiffusion: FixedValue=2
          Constant NSupplyFraction: FixedValue=5
          Constant NUptakeCease: FixedValue=570
        VariableReference SDRatio: VariableName=[Arbitrator].WaterUptakeMethod.SDRatio
        VariableReference WDemand: VariableName=[Arbitrator].WaterUptakeMethod.WDemand
        VariableReference WSupply: VariableName=[Arbitrator].WaterUptakeMethod.WSupply
        VariableReference WAllocated: VariableName=[Arbitrator].WaterUptakeMethod.WAllocated
        VariableReference WatSupply: VariableName=[Arbitrator].WaterUptakeMethod.WatSupply
      Phenology
        Memo
          The phenology model used in the APSIM sorghum model follows the approach used in earlier sorghum models(Jones and Kiniry (1986), Carberry and Arbrecht (1991), Carberry et al (1989).
          The model predicts development of primordia on the apex of the main stem and appearance of individual leaves to predict time to flag leaf.  Other stages use thermal time targets.
        PhaseLookup ThermalTime
          PhaseLookupValue BeforeFlowering: Start=Germination; End=Flowering
            VariableReference DltTT: VariableName=[Phenology].DltTT
          PhaseLookupValue PostFlowering: Start=Flowering; End=Maturity
            VariableReference DltTTFM: VariableName=[Phenology].DltTTFM
          PhaseLookupValue MaturityToRipe: Start=Maturity; End=HarvestRipe
            VariableReference DltTT: VariableName=[Phenology].DltTT
        MultiplyFunction DltTT
          HourlyInterpolation ThermalTime: agregationMethod=0
            XYPairs Response: X=[11, 30, 42]; Y=[0, 19, 0]
            ThreeHourSin InterpolationMethod
          PhaseLookup Stress
            PhaseLookupValue TT: Start=Sowing; End=EndJuvenile
              VariableReference PhenoWaterStress: VariableName=[Phenology].PhenoWaterStress
            PhaseLookupValue PreFlowering: Start=EndJuvenile; End=Flowering
              MinimumFunction
                VariableReference PhenoWaterStress: VariableName=[Phenology].PhenoWaterStress
                MaximumFunction
                  Constant: FixedValue=0.5
                  VariableReference NitrogenPhenoStress: VariableName=[Leaf].NitrogenPhenoStress
            PhaseLookupValue PostFlowering: Start=Flowering; End=HarvestRipe
              Constant: FixedValue=1
        WeightedTemperatureFunction DltTTFM: MaximumTemperatureWeighting=0.5
          XYPairs: X=[5.7, 23.5]; Y=[0, 17.8]
        GerminatingPhase Germinating: Start=Sowing; End=Germination
        EmergingPhase Emerging: ShootLag=15; ShootRate=0.6; Start=Germination; End=Emergence; TTForTimeStep=0
          VariableReference ThermalTime: VariableName=[Phenology].ThermalTime
        GenericPhase Juvenile: Start=Emergence; End=EndJuvenile
          Constant Target: FixedValue=100
          VariableReference Progression: VariableName=[Phenology].ThermalTime
        GenericPhase JuvenileToFloralInit: Start=EndJuvenile; End=FloralInitiation
          VariableReference Progression: VariableName=[Phenology].ThermalTime
          VariableReference Target: VariableName=[Phenology].TTTargetPhotoSensitive
        GenericPhase FloralInitToFlagLeaf: Start=FloralInitiation; End=FlagLeaf
          VariableReference Progression: VariableName=[Phenology].ThermalTime
          SubtractFunction Target
            VariableReference TTEmergToFlag: VariableName=[Phenology].TTEmergToFlagLeaf
            VariableReference TTJuvenile: VariableName=[Phenology].Juvenile.Target
            VariableReference TTJuvToFloralInit: VariableName=[Phenology].JuvenileToFloralInit.Target
        GenericPhase FlagLeafToFlowering: Start=FlagLeaf; End=Flowering
          Constant Target: FixedValue=170
          VariableReference Progression: VariableName=[Phenology].ThermalTime
        GenericPhase FloweringToGrainFilling: Start=Flowering; End=StartGrainFill
          Constant Target: FixedValue=80
          VariableReference Progression: VariableName=[Phenology].DltTTFM
        GenericPhase GrainFilling: Start=StartGrainFill; End=EndGrainFill
          VariableReference Progression: VariableName=[Phenology].DltTTFM
          SubtractFunction Target
            VariableReference FlowerToMaturity: VariableName=[Phenology].TTFlowerToMaturity
            VariableReference FlowerToGrainFill: VariableName=[Phenology].FloweringToGrainFilling.Target
            VariableReference GrainFillToMaturity: VariableName=[Phenology].TTGrainFillToMaturity
        GenericPhase Maturing: Start=EndGrainFill; End=Maturity
          VariableReference Progression: VariableName=[Phenology].DltTTFM
          VariableReference Target: VariableName=[Phenology].TTGrainFillToMaturity
        GenericPhase MaturityToHarvestRipe: Start=Maturity; End=HarvestRipe
          VariableReference Progression: VariableName=[Phenology].ThermalTime
          Constant Target: FixedValue=1
        EndPhase ReadyForHarvesting: Start=HarvestRipe; End=Unused
          VariableReference ThermalTime: VariableName=[Phenology].ThermalTime
        PhotoperiodFunction Photoperiod: Twilight=-2.2; DayLength=0
        OnEventFunction FloweringDAS: SetEvent=Flowering; ReSetEvent=never
          Memo
            A function is used to provide flowering date as days after sowing(DAS).
          Constant PreEventValue: FixedValue=0
          VariableReference PostEventValue: VariableName=[Plant].DaysAfterSowing
        OnEventFunction MaturityDAS: SetEvent=Maturity; ReSetEvent=never
          Memo
            A function is used to provide maturity date as days after sowing(DAS).
          Constant PreEventValue: FixedValue=0
          VariableReference PostEventValue: VariableName=[Plant].DaysAfterSowing
        Constant TTFlowerToMaturity: FixedValue=761
        Constant TTEndJuvToInit: FixedValue=160
        MultiplyFunction TTGrainFillToMaturity
          VariableReference FlowerToMaturity: VariableName=[Phenology].TTFlowerToMaturity
          Constant Proportion: FixedValue=0.05
        PhaseLookup TTTargetPhotoSensitive
          PhaseLookupValue: Start=Sowing; End=Emergence
            VariableReference PreEventValue: VariableName=[Phenology].TTEndJuvToInit
          PhaseLookupValue EmergenceToEndJuve: Start=Emergence; End=EndJuvenile
            AddFunction Add
              VariableReference PhotoModifier: VariableName=[Phenology].PhotoModifier
              VariableReference TTEndJuvToInit: VariableName=[Phenology].TTEndJuvToInit
          PhaseLookupValue EndJuveToMaturity: Start=EndJuvenile; End=HarvestRipe
            OnEventFunction TTTargetPhoto: SetEvent=EndJuvenile; ReSetEvent=never
              VariableReference PreEventValue: VariableName=[Phenology].TTEndJuvToInit
              AddFunction PostEventValue
                VariableReference PhotoModifier: VariableName=[Phenology].PhotoModifier
                VariableReference TTEndJuvToInit: VariableName=[Phenology].TTEndJuvToInit
        VariableReference FinalLeafNo: VariableName=[Leaf].FinalLeafNo
        Constant LeafNoAtEmergence: FixedValue=1
        Constant LeafNoRateChange: FixedValue=3.5
        AddFunction TTEmergToFlagLeaf
          MultiplyFunction LeafAppearingPhase1
            SubtractFunction NoLeavesRate1
              VariableReference FinalLeafNo: VariableName=[Phenology].FinalLeafNo
              VariableReference LeafNoAtEmergence: VariableName=[Phenology].LeafNoAtEmergence
              VariableReference LeafNoRateChange: VariableName=[Phenology].LeafNoRateChange
            Constant LeafAppearanceRate1: FixedValue=41
          MultiplyFunction LeafAppearingPhase2
            Constant LeafAppearanceRate2: FixedValue=20
            VariableReference LeafNoRateChange: VariableName=[Phenology].LeafNoRateChange
        AccumulateFunction TTFromEmergence: StartStageName=Emergence; EndStageName=Maturity; FractionRemovedOnCut=0; FractionRemovedOnHarvest=0; FractionRemovedOnGraze=0; FractionRemovedOnPrune=0
          VariableReference ThermalTime: VariableName=[Phenology].CurrentPhase.ProgressionForTimeStep
        AccumulateFunction TTFlagToFlowering: StartStageName=FlagLeaf; EndStageName=Flowering; FractionRemovedOnCut=0; FractionRemovedOnHarvest=0; FractionRemovedOnGraze=0; FractionRemovedOnPrune=0
          VariableReference ThermalTime: VariableName=[Phenology].CurrentPhase.ProgressionForTimeStep
        AccumulateFunction TTFromFlowering: StartStageName=Flowering; EndStageName=Maturity; FractionRemovedOnCut=0; FractionRemovedOnHarvest=0; FractionRemovedOnGraze=0; FractionRemovedOnPrune=0
          VariableReference ThermalTime: VariableName=[Phenology].DltTT
        AccumulateFunction TTFMFromFlowering: StartStageName=Flowering; EndStageName=Maturity; FractionRemovedOnCut=0; FractionRemovedOnHarvest=0; FractionRemovedOnGraze=0; FractionRemovedOnPrune=0
          VariableReference ThermalTime: VariableName=[Phenology].CurrentPhase.ProgressionForTimeStep
        AddFunction TTEmergToFloralInit
          VariableReference TTTargetJuvenille: VariableName=[Phenology].Juvenile.Target
          VariableReference TTTargetJuvToFI: VariableName=[Phenology].JuvenileToFloralInit.Target
        LinearInterpolationFunction PhenoWaterStress
          XYPairs: X=[0.1, 0.6, 1]; Y=[0, 1, 1]
          VariableReference XValue: VariableName=[Arbitrator].SDRatio
        AccumulateFunction TTFMSgfToMaturity: StartStageName=StartGrainFill; EndStageName=Maturity; FractionRemovedOnCut=0; FractionRemovedOnHarvest=0; FractionRemovedOnGraze=0; FractionRemovedOnPrune=0
          VariableReference ThermalTime: VariableName=[Phenology].CurrentPhase.ProgressionForTimeStep
        LinearInterpolationFunction PhotoModifier
          XYPairs: X=[11.5, 13.5]; Y=[0, 23]
          VariableReference XValue: VariableName=[Phenology].Photoperiod
        AddFunction TTToFlowering
          VariableReference GerminatingTarget: VariableName=[Emerging].Target
          VariableReference EmergingTarget: VariableName=[Juvenile].Target
          VariableReference JuvenileTarget: VariableName=[JuvenileToFloralInit].Target
          VariableReference FloralInitTarget: VariableName=[FloralInitToFlagLeaf].Target
          VariableReference FlagLeafTarget: VariableName=[FlagLeafToFlowering].Target
      LeafCulms: DynamicTillering=true; FinalLeafNo=0; NLeaves=0
        VariableReference expansionStress: VariableName=[Leaf].ExpansionStress
        Constant appearanceRate1: FixedValue=41
        Constant appearanceRate2: FixedValue=20
        Constant appearanceRate3: FixedValue=20
        VariableReference ttEmergToFlag: VariableName=[Phenology].TTEmergToFlagLeaf
        Constant leafNoCorrection: FixedValue=1.52
        VariableReference noSeed: VariableName=[Leaf].Parameters.LeafNumSeed
        VariableReference initRate: VariableName=[Leaf].Parameters.LeafInitRate
        Constant noRateChange1: FixedValue=3.5
        Constant noRateChange2: FixedValue=3.5
        VariableReference minLeafNo: VariableName=[Leaf].minLeafNo
        VariableReference maxLeafNo: VariableName=[Leaf].maxLeafNo
        VariableReference ttEmergToFI: VariableName=[LeafCulms].TTTargetFI
        VariableReference dltTT: VariableName=[Phenology].DltTT
        VariableReference slaMax: VariableName=[Leaf].Parameters.SlaMax
        VariableReference aX0: VariableName=[Leaf].Parameters.aX0
        VariableReference aMaxSlope: VariableName=[Leaf].Parameters.aMaxSlope
        VariableReference aMaxIntercept: VariableName=[Leaf].Parameters.aMaxIntercept
        Constant leafNoAtEmergence: FixedValue=1
        Constant tilleringPropensity: FixedValue=-0.82
        Constant tillerSdSlope: FixedValue=0.2065
        Constant tillerSlaBound: FixedValue=30; Units=%
        Constant aMaxVert: FixedValue=0.3
        Constant aTillerVert: FixedValue=0.05
        Constant A0: FixedValue=-0.009
          Memo
            bellCurveParams[0]
        Constant A1: FixedValue=-0.2
          Memo
            bellCurveParams[1]
        Constant B0: FixedValue=0.0006
          Memo
            bellCurveParams[2]
        Constant B1: FixedValue=-0.43
          Memo
            bellCurveParams[3]
        Constant AMaxA: FixedValue=0
          Memo
            Required by maize. Not used in sorghum, but it's a nonoptional link.
        Constant AMaxB: FixedValue=0
          Memo
            Required by maize. Not used in sorghum, but it's a nonoptional link.
        Constant AMaxC: FixedValue=0
          Memo
            Required by maize. Not used in sorghum, but it's a nonoptional link.
      ReproductiveOrgan Grain: GrowthRespiration=0; MaintenanceRespiration=0
        Biomass Live: DMDOfStructural=0.6
        Biomass Dead: DMDOfStructural=0.6
        Constant InitialGrainProportion: FixedValue=0.05
        Constant MaximumPotentialGrainSize: FixedValue=0.3
        Constant MinimumNConc: FixedValue=0.008
        PhaseLookup MaximumNConc
          PhaseLookupValue InitialPhase: Start=Flowering; End=StartGrainFill
            Constant InitialNconc: FixedValue=0.05
          PhaseLookupValue LinearPhase: Start=StartGrainFill; End=Maturity
            Constant FinalNconc: FixedValue=0.0175
        Constant WaterContent: FixedValue=0.13
        PhaseLookup NFillingRate
          PhaseLookupValue GrainFilling: Start=StartGrainFill; End=Maturity
            LessThanFunction
              DivideFunction gfFract
                VariableReference TTGrainFillToMaturity: VariableName=[Phenology].TTFMSgfToMaturity
                AddFunction TTTargetSgfToNow
                  VariableReference GrainFilling: VariableName=[Phenology].GrainFilling.Target
                  VariableReference Maturity: VariableName=[Phenology].Maturing.Target
              Constant GrainFillFraction: FixedValue=0.5; Units=g/g
              MultiplyFunction
                VariableReference NumberFunction: VariableName=[Grain].NumberFunction
                VariableReference ThermalTime: VariableName=[Phenology].DltTTFM
                DivideFunction
                  Constant GrainFillRate: FixedValue=0.001
                  Constant Thousand: FixedValue=1000
              MultiplyFunction MultiplyFunction1
                VariableReference dltDmGreen: VariableName=[Grain].potentialDMAllocation.Structural
                VariableReference maxNConc: VariableName=[Grain].MaximumNConc
        OnEventFunction FinalGrainNum: SetEvent=StartGrainFill; ReSetEvent=Germination
          Constant PreEventValue: FixedValue=0
          DivideFunction PostEventValue
            DivideFunction GrowthRate
              MaximumFunction PlantGrowth
                Memo
                  Maximum function here prevents grain from returning negative dm demand in the event that plant growth is negative.
                SubtractFunction PlantGrowth
                  VariableReference TotalBiomass: VariableName=[Sorghum].Total.Wt
                  VariableReference GreenWtAtFI: VariableName=[Grain].GreenWtAtFI
                Constant Zero: FixedValue=0.00083
              AddFunction
                VariableReference DaysFIToStartGF: VariableName=[Grain].DaysFIToStartGrainFill
            Constant DMPerSeed: FixedValue=0.00083
        AccumulateFunction DaysFIToStartGrainFill: StartStageName=FloralInitiation; EndStageName=StartGrainFill; FractionRemovedOnCut=0; FractionRemovedOnHarvest=0; FractionRemovedOnGraze=0; FractionRemovedOnPrune=0
          Constant One: FixedValue=1
        OnEventFunction GreenWtAtFI: SetEvent=FloralInitiation; ReSetEvent=Germination
          Constant PreEventValue: FixedValue=0
          VariableReference PostEventValue: VariableName=[Sorghum].Total.Wt
          Memo
            Definitely [Sorghum].Total.Wt
        VariableReference TTStartGrainToNow: VariableName=[Phenology].TTFMSgfToMaturity
        EndOfDayFunction NumberFunction
          MultiplyFunction NumberFunctionValue
            MinimumFunction
              VariableReference FinalGrainNum: VariableName=[Grain].FinalGrainNum
              MultiplyFunction
                VariableReference FinalGrainNum: VariableName=[Grain].FinalGrainNum
                DivideFunction
                  VariableReference TTStartGrainToNow: VariableName=[Grain].TTStartGrainToNow
                  Constant RampTT: FixedValue=100
            VariableReference TemperatureFactor: VariableName=[Grain].TemperatureFactor
        DivideFunction DMCaryopsis
          VariableReference DMFixationSupply: VariableName=[Arbitrator].DM.TotalFixationSupply
          VariableReference GrainNumber: VariableName=[Grain].NumberFunction
          VariableReference ThermalTime: VariableName=[Phenology].DltTTFM
        MinimumFunction PotGrainFillRate
          MultiplyFunction
            AddFunction
              MultiplyFunction
                VariableReference DMCaryopsis: VariableName=[Grain].DMCaryopsis
                Constant: FixedValue=0.4026
              Constant: FixedValue=3.19e-05
            Constant: FixedValue=1000
          Constant MaxGrainFillRate: FixedValue=0.09
        PhaseLookup DMDemandFunction
          PhaseLookupValue SowingToMaturity: Start=Sowing; End=Maturity
            MultiplyFunction DMDemandFunction
              VariableReference GrainFillRate: VariableName=[Grain].PotGrainFillRate
              VariableReference ThermalTime: VariableName=[Phenology].DltTTFM
              VariableReference GrainNumber: VariableName=[Grain].NumberFunction
              Constant: FixedValue=0.001
        BiomassRemoval BiomassRemovalDefaults
          OrganBiomassRemovalType Harvest: FractionLiveToRemove=1; FractionDeadToRemove=0; FractionLiveToResidue=0; FractionDeadToResidue=0
          OrganBiomassRemovalType Cut: FractionLiveToRemove=1; FractionDeadToRemove=0; FractionLiveToResidue=0; FractionDeadToResidue=0
          OrganBiomassRemovalType Prune: FractionLiveToRemove=0; FractionDeadToRemove=0; FractionLiveToResidue=0.8; FractionDeadToResidue=0
          OrganBiomassRemovalType Graze: FractionLiveToRemove=0.6; FractionDeadToRemove=0; FractionLiveToResidue=0.2; FractionDeadToResidue=0
        Constant DMConversionEfficiency: FixedValue=1
        Constant RemobilisationCost: FixedValue=0
        Constant CarbonConcentration: FixedValue=0.4
        LinearInterpolationFunction HeatSeverity
          XYPairs: X=[0, 32, 33, 36, 38]; Y=[0, 0, 0.14, 0.23, 0.65]
          VariableReference XValue: VariableName=[Weather].MaxT
        Constant GrainTempWindow0: FixedValue=-50
        Constant GrainTempWindow1: FixedValue=100
        DecumulateFunction TemperatureFactor: InitialValue=1; MinValue=0; StartStageName=FlagLeaf; ResetStageName=Emergence
          LessThanFunction TempFactorCalc
            Memo
              <pre>
              // calculate a daily contribution to stress on grain number
              // if we are within the grain stress window (grainTempWindow)calculate stress factor
              // from grainTempTable and this day's contribution to the total stress

              // calc severity
              double heatSeverity = grainTempTable.value(plant->today.maxT);

              // first see if it is a hot day
              if(heatSeverity < 0.001)return 0.0;

              // then see if we are in the pre-anthesis or post-anthesis window
              // if not return 0                                      (grainTempWindow[0] is -ve)
              double targetTT = plant->phenology->sumTTtarget (flag, flowering) + grainTempWindow[0];
              double eTT = plant->phenology->sumTTtotal (flag, flowering);
              if(eTT < targetTT)return 0.0;

              // see if in the post flag window
              double eTTpostAnthesis = plant->phenology->sumTTtotal (flowering, maturity);
              if(eTTpostAnthesis > grainTempWindow[1]) return 0.0;

              double dltTT = plant->phenology->getDltTT();
              double ttContrib;
              // check  window
              if(eTTpostAnthesis > 0.0)  // post anthesis
                  ttContrib = Min(grainTempWindow[1] - eTTpostAnthesis, dltTT);      // allow for overlap
              else                   // pre flag
                  ttContrib = Min(eTT - targetTT, dltTT);      // allow for overlap

              double dayFract = ttContrib / (-grainTempWindow[0] + grainTempWindow[1]);
              return dayFract * heatSeverity;
              </pre>
            VariableReference if heatSeverity: VariableName=[Grain].HeatSeverity
            Constant is close to zero: FixedValue=0.001
            Constant then return 0: FixedValue=0
            LessThanFunction else
              Memo
                `if(eTT < targetTT)return 0.0;`
              VariableReference if eTT: VariableName=[Phenology].TTFlagToFlowering
              AddFunction is less than target TT
                Memo
                  `double targetTT = plant->phenology->sumTTtarget (flag, flowering) + grainTempWindow[0];`
                VariableReference targetTT: VariableName=[Phenology].FlagLeafToFlowering.Target
                VariableReference GrainTempWindow0: VariableName=[Grain].GrainTempWindow0
              Constant then return 0: FixedValue=0
              LessThanFunction else
                Memo
                  `if(eTTpostAnthesis -  grainTempWindow[1] > 0) return 0.0;`

                  This is equivalent to the old sorghum code from Grain.cpp:

                  `if(eTTpostAnthesis > grainTempWindow[1]) return 0.0;`
                Constant if 0 is less than: FixedValue=0
                SubtractFunction
                  Memo
                    `eTTpostAnthesis -  grainTempWindow[1]`
                  VariableReference eTTPostAnthesis: VariableName=[Phenology].TTFromFlowering
                  VariableReference grainTempWindow1: VariableName=[Grain].GrainTempWindow1
                Constant then return 0: FixedValue=0
                MultiplyFunction else
                  DivideFunction DayFract
                    Memo
                      `double dayFract = ttContrib / (-grainTempWindow[0] + grainTempWindow[1]);`
                    LessThanFunction ttContrib
                      Memo
                        <pre>
                        if(eTTpostAnthesis > 0.0)  // post anthesis
                            ttContrib = Min(grainTempWindow[1] - eTTpostAnthesis, dltTT);      // allow for overlap
                        else                   // pre flag
                            ttContrib = Min(eTT - targetTT, dltTT);      // allow for overlap
                        </pre>
                      Constant if 0: FixedValue=0
                      VariableReference is less than eTTPostAnthesis: VariableName=[Phenology].TTFromFlowering
                      MinimumFunction then min of
                        Memo
                          `ttContrib = Min(grainTempWindow[1] - eTTpostAnthesis, dltTT);      // allow for overlap`
                        SubtractFunction
                          Memo
                            `grainTempWindow[1] - eTTpostAnthesis`
                          VariableReference GrainTempWindow1: VariableName=[Grain].GrainTempWindow1
                          VariableReference eTTPostAnthesis: VariableName=[Phenology].TTFromFlowering
                        VariableReference dltTT: VariableName=[Phenology].DltTT
                      MinimumFunction else min of
                        Memo
                          `ttContrib = Min(eTT - targetTT, dltTT);      // allow for overlap`
                        SubtractFunction
                          Memo
                            `eTT - targetTT`
                          VariableReference eTT: VariableName=[Phenology].TTFlagToFlowering
                          AddFunction targetTT: same as Replacements.Sorghum.Grain.TemperatureFactor.TempFactorCalc.else.is less than target TT
                        VariableReference dltTT: VariableName=[Phenology].DltTT
                    SubtractFunction
                      Memo
                        `-grainTempWindow[0] + grainTempWindow[1]`
                      VariableReference GrainTempWindow1: VariableName=[Grain].GrainTempWindow1
                      VariableReference GrainTempWindow0: VariableName=[Grain].GrainTempWindow0
                  VariableReference HeatSeverity: VariableName=[Grain].HeatSeverity
        Constant PgrT1: FixedValue=260
          Memo
            Period after anthesis to calculate plant growth rate
        Constant PgrBase: FixedValue=1.2
          Memo
            base plant growth rate
        Constant PgrT0: FixedValue=130
          Memo
            Period before anthesis to calculate plant growth rate
      Root: GrowthRespiration=0; MaintenanceRespiration=0
        RootShapeSemiCircleSorghum RootShape
        LinearInterpolationFunction KLModifier
          Memo
            The parameter KL is is described by Meinke et al (1993) to combine elements of soil conductivity (K) with root length (L) in determining root water uptake.  Peake et al (2013) demonstrated that in sorghum KL varied with plant population through impacts on root length density.  Here we adjust KL linearly with plant population.
          XYPairs: X=[0, 10]; Y=[1, 1]
          VariableReference XValue: VariableName=[Sorghum].Population
        Constant SoilWaterEffect: FixedValue=1
          Memo
            No effect of soil water content on root growth is currently captured in the model.
        Constant TemperatureEffect: FixedValue=1
          Memo
            No effect of temperature on root growth is currently captured in the model.
        Constant MaxDailyNUptake: FixedValue=20
          Memo
            Maximum daily N uptake is set to an arbitrarily high value.
        Constant SenescenceRate: FixedValue=0.002
          Memo
            Jones and Kiniry (1986) used a constant root senescence fraction in the CERES-Sorghum model.
        Constant MaximumNConc: FixedValue=0.02
        Constant MinimumNConc: FixedValue=0.002
        Constant MaximumRootDepth: FixedValue=1000000
        PhaseLookup RootFrontVelocity
          Memo
            Hammer et al (2009) used a constant extraction front velocity of 2.5cm per day in their analysis of historical sorghum yield trends in the US corn belt.
          PhaseLookupValue PreGrainFill: Start=Germination; End=StartGrainFill
            Constant Function: FixedValue=27
          PhaseLookupValue GrainfillToMaturity: Start=StartGrainFill; End=Maturity
            Constant Function: FixedValue=0
        PhaseLookupValue NitrogenDemandSwitch: Start=Germination; End=Maturity
          Constant: FixedValue=1
        LinearInterpolationFunction KNO3
          XYPairs: X=[0, 0.003]; Y=[0.03, 0.03]
          VariableReference XValue: VariableName=[Root].LengthDensity
        LinearInterpolationFunction NUptakeSWFactor
          XYPairs: X=[0, 0.2, 1]; Y=[1, 1, 1]
          VariableReference XValue: VariableName=[Root].RWC
        LinearInterpolationFunction KNH4
          XYPairs: X=[0, 0.003]; Y=[0.03, 0.03]
          VariableReference XValue: VariableName=[Root].LengthDensity
        Constant SpecificRootLength: FixedValue=100000; Units=m/g
        BiomassRemoval BiomassRemovalDefaults
          OrganBiomassRemovalType Harvest: FractionLiveToRemove=0; FractionDeadToRemove=0; FractionLiveToResidue=0.2; FractionDeadToResidue=0
          OrganBiomassRemovalType Cut: FractionLiveToRemove=0; FractionDeadToRemove=0; FractionLiveToResidue=0.3; FractionDeadToResidue=0
          OrganBiomassRemovalType Prune: FractionLiveToRemove=0; FractionDeadToRemove=0; FractionLiveToResidue=0.1; FractionDeadToResidue=0
          OrganBiomassRemovalType Graze: FractionLiveToRemove=0; FractionDeadToRemove=0; FractionLiveToResidue=0.15; FractionDeadToResidue=0
        Constant DMConversionEfficiency: FixedValue=1
        Constant MaintenanceRespirationFunction: FixedValue=1
        Constant RemobilisationCost: FixedValue=0
        Constant CarbonConcentration: FixedValue=0.4
        BiomassDemand DMDemands
          MultiplyFunction Structural
            PhaseLookup ratioRootShoot
              Memo
                This is a straight lookup table not an lineaer relationship
              PhaseLookupValue BetweenEmergenceAndFloralInit: Start=Emergence; End=FloralInitiation
                Constant rootFraction: FixedValue=1; Units=0-1
              PhaseLookupValue BetweenFloralInitAndFlowering: Start=FloralInitiation; End=Flowering
                Constant rootFraction: FixedValue=0.33; Units=0-1
              PhaseLookupValue BetweenFloweringAndGrainFill: Start=Flowering; End=StartGrainFill
                Constant rootFraction: FixedValue=0.087; Units=0-1
              PhaseLookupValue BetweenFloweringAndGrainFill1: Start=StartGrainFill; End=HarvestRipe
                Constant rootFraction: FixedValue=0; Units=0-1
            VariableReference LeafSupplyFunction: VariableName=[Leaf].DMSupplyFunction
          Constant Metabolic: FixedValue=0
          Constant Storage: FixedValue=0
        BiomassDemand NDemands
          MaximumFunction Structural
            Constant zero: FixedValue=0
            SubtractFunction
              MultiplyFunction required
                VariableReference MinNconc: VariableName=[Root].minimumNconc
                AddFunction
                  VariableReference dltDmGreen: VariableName=[Root].potentialDMAllocation.Structural
                  VariableReference dmGreen: VariableName=[Root].Live.Wt
              VariableReference nGreen: VariableName=[Root].Live.N
          Constant Metabolic: FixedValue=0
          Constant Storage: FixedValue=0
        PhaseLookupValue NitrogenRootCalcSwitch: Start=Germination; End=Maturity
          Constant: FixedValue=1
        LinearInterpolationFunction RootDepthStressFactor
          XYPairs: X=[0, 0.25]; Y=[0, 1]
          VariableReference XValue: VariableName=[Root].SWAvailabilityRatio
        ProtectedDivideFunction SWAvailabilityRatio: NumeratorErrVal=0; DenominatorErrVal=10
          VariableReference extractable: VariableName=[Soil].SoilWater.ESW
          SubtractFunction capacity
            VariableReference dulDep: VariableName=[Soil].Physical.DULmm
            VariableReference llDep: VariableName=[Soil].Physical.LL15mm
        Constant RootFrontCalcSwitch: FixedValue=1
          Memo
            Setting this to 0 will force sorghum to use the generic uptake *and* root growth routines
        LessThanFunction DltThermalTime
          VariableReference TTPostAnthesis: VariableName=[Phenology].TTFMFromFlowering
          Constant NCeaseUptake: FixedValue=570
          VariableReference ThermalTime: VariableName=[Phenology].DltTT
          Constant Zero: FixedValue=0
        PhaseLookup ratioRootShootInverse
          PhaseLookupValue BetweenEmergenceAndEndJuvenile: Start=Emergence; End=EndJuvenile
            SubtractFunction
              Constant rootFraction: FixedValue=1; Units=0-1
              DivideFunction
                Constant inverse: FixedValue=1; Units=0-1
                Constant rootFraction: FixedValue=2; Units=0-1
          PhaseLookupValue BetweenEndJuvenileAndFlagLeaf: Start=EndJuvenile; End=FlagLeaf
            SubtractFunction
              Constant rootFraction: FixedValue=1; Units=0-1
              DivideFunction
                Constant inverse: FixedValue=1; Units=0-1
                Constant rootFraction: FixedValue=1.33; Units=0-1
          Memo
            This is a straight lookup table not an lineaer relationship
          PhaseLookupValue BetweenFlagLeafAndGrainFill: Start=FlagLeaf; End=StartGrainFill
            SubtractFunction
              Constant rootFraction: FixedValue=1; Units=0-1
              DivideFunction
                Constant inverse: FixedValue=1; Units=0-1
                Constant rootFraction: FixedValue=1.087; Units=0-1
        VariableReference CriticalNConc: VariableName=[Root].MinimumNConc
        BiomassDemand InitialWt
          Constant Structural: FixedValue=0.1; Units=g/plant
          Constant Metabolic: FixedValue=0
          Constant Storage: FixedValue=0
      SorghumLeaf Leaf: MaxCover=1; Albedo=0.18; Gsmax350=0.008; R50=160; UseMicroClimate=false; MicroClimatePresent=false; LeafInitialisationStage=Emergence; PhosphorusStress=1
        zero: BaseHeight, Width, PotentialEP, DltLAI, dltPotentialLAI, dltStressedLAI, LAI, SLN, SLN0, Height, WaterDemand, BiomassRUE, BiomassTE, KDead, LAIDead, NitrogenPhotoStress, NitrogenPhenoStress, SowingDensity, LossFromExpansionStress, SenescedLai, DltRetranslocatedN, DltSenescedN, DltSenescedLaiN, DltSenescedLai, DltSenescedLaiLight, DltSenescedLaiWater, DltSenescedLaiFrost, DltSenescedLaiAge
        LeafParameters Parameters
          Constant MinLeafNo: FixedValue=10
          Constant MaxLeafNo: FixedValue=40
          Constant LeafNoDeadIntercept: FixedValue=0
            Memo
              Intercept for age-based slai calculation
          Constant LeafNoDeadSlope: FixedValue=0
            Memo
              Slope for age-based slai calculation
          Constant LeafNumSeed: FixedValue=4
          Constant InitialLAIFunction: FixedValue=200
          Constant InitialSLNFunction: FixedValue=1.5
          Constant InitialWtFunction: FixedValue=0.1; Units=g/plant
          Constant SlaMin: FixedValue=8000
          Constant SlaMax: FixedValue=45000
          Constant NewLeafSLN: FixedValue=1
          Constant SenescedLeafSLN: FixedValue=0.3
          Constant SenThreshold: FixedValue=0.25
          Constant SenWaterTimeConst: FixedValue=10
          Constant senRadnCrit: FixedValue=2; Units=Mj/m^2
          Constant SenLightTimeConst: FixedValue=10
          Constant SenescenceRate: FixedValue=0
          Constant FrostKill: FixedValue=1
          Constant FrostKillSevere: FixedValue=-3.5
          Constant NDilutionSlope: FixedValue=0.0043
          Constant NDilutionIntercept: FixedValue=-0.0017
          Constant aX0: FixedValue=0.687
          Constant aMaxSlope: FixedValue=22.25
          Constant aMaxIntercept: FixedValue=92.45
          Constant LeafInitRate: FixedValue=21.6; Units=oCd
            Memo Description
              Degree days to initiate each leaf primordium until floral init (deg day)
        MultiplyFunction ExtinctionCoefficientFunction
          LinearInterpolationFunction PotentialExtinctionCoeff
            XYPairs: X=[0.2, 0.5, 1]; Y=[0.7, 0.4, 0.4]
            VariableReference XValue: VariableName=[Sorghum].SowingData.RowSpacing
        RUEModel Photosynthesis
          Constant RUE: FixedValue=1.25
          WeightedTemperatureFunction FT: MaximumTemperatureWeighting=0.5
            XYPairs: X=[0, 8, 20, 35, 50]; Y=[0, 0, 1, 1, 0]
          VariableReference FN: VariableName=[Leaf].NitrogenPhotoStress
          VariableReference RadnInt: VariableName=[Leaf].RadiationIntercepted
          Constant FVPD: FixedValue=1
          Constant FW: FixedValue=1
          RUECO2Function FCO2: PhotosyntheticPathway=C4
            Memo
              When pathway is set to "C4", this model modifier will be have the same as the `double Plant::rue_cow_modifier()` function in the APSIM Classic sorghum model.
        LinearInterpolationFunction TemperatureStressFunction
          XYPairs: X=[8, 20, 35, 50]; Y=[0, 1, 1, 0]
          VariableReference XValue: VariableName=[Weather].MeanT
        MinimumFunction ExpansionStress
          LinearInterpolationFunction WaterStressEffect
            XYPairs: X=[0.1, 1.1]; Y=[0, 1]
            VariableReference XValue: VariableName=[Arbitrator].SDRatio
          Constant NitrogenStressEffect: FixedValue=1
          Constant PhosphorusStressEffect: FixedValue=1
        MaximumFunction NPhotoStress
          Memo
            photoStress = (2.0/(1.0 + exp(-6.05*(SLN-0.41)))-1.0);
          Constant Zero: FixedValue=0
          SubtractFunction
            DivideFunction
              Constant Two: FixedValue=2
              ExponentialFunction: A=1; B=1; C=-6.05
                SubtractFunction
                  VariableReference SLN: VariableName=[Leaf].SLN
                  Constant point41: FixedValue=0.41
            Constant One: FixedValue=1
        LinearInterpolationFunction FrostFraction
          XYPairs: X=[-10, -9]; Y=[1, 0]
          VariableReference XValue: VariableName=[Weather].MinT
        MinimumFunction FRGR
          VariableReference RUE_FT: VariableName=[Leaf].Photosynthesis.FT
          MinimumFunction Others
            VariableReference RUE_FN: VariableName=[Leaf].Photosynthesis.FN
            VariableReference RUE_FVPD: VariableName=[Leaf].Photosynthesis.FVPD
        Constant FTN: FixedValue=0.1
        LinearInterpolationFunction HeightFunction
          XYPairs: X=[0, 80]; Y=[0, 2000]
          Memo
            [Stem].Live.Wt is in the wrong units - it's out by a factor of 10 vs old apsim.

            To overcome this, we re-scale the x-values.
          VariableReference XValue: VariableName=[Stem].dmGreenStem
        DivideFunction LeafPartitioningCoefficient
          Constant One: FixedValue=1
          AddFunction
            Constant One: FixedValue=1
            MultiplyFunction
              VariableReference PartitionRate: VariableName=[Leaf].PartitionRate
              PowerFunction: Exponent=2
                VariableReference LeafNumber: VariableName=[LeafCulms].NLeaves
                Memo
                  LeafNumber is referring to NLeaves for copatitibility with old model.
                  Should be CurrentLeafNo?
        Constant PartitionRate: FixedValue=0.006
        SubtractFunction DMRemaining
          VariableReference DMFixationSupply: VariableName=[Leaf].DMSupplyFunction
          VariableReference LeafDMDemand: VariableName=[Leaf].DMDemands.Structural.DMDemandFunction
        TEWaterDemandFunction WaterDemandFunction
          Constant SVPFrac: FixedValue=0.75
          Constant TranspirationEfficiencyCoefficient: FixedValue=0.009
          VariableReference Photosynthesis: VariableName=[Leaf].Photosynthesis
        PhaseLookup DltLAIFunction
          Memo
            <pre>
            // dh - this is actually calculated in LeafCulms_Fixed::areaActual(void).
            // This version of the function is slightly different to Leaf::areaActual(void)
            // in that the end stage is flag, not maturity.

            if(stage >= endJuv && stage < flag)
                dltLAI = Min(dltStressedLAI,dltDmGreen * slaMax * smm2sm);
            else
                dltLAI = dltStressedLAI;
            </pre>
          PhaseLookupValue BetweenEndJuvenileAndMaturity: Start=EndJuvenile; End=FlagLeaf
            MinimumFunction MinFunction
              VariableReference DltStressedLAI: VariableName=[Leaf].dltStressedLAI
              MultiplyFunction LimitedSLN
                AddFunction dltDMGreen
                  VariableReference Structural: VariableName=[Leaf].DMPotentialAllocation.Structural
                  VariableReference Metabolic: VariableName=[Leaf].DMPotentialAllocation.Metabolic
                Constant slaMax: FixedValue=45000
                Constant smm2sm: FixedValue=1e-06
          PhaseLookupValue BetweenEmergenceAndEndJuvenile: Start=Emergence; End=EndJuvenile
            VariableReference DltStressedLAI: VariableName=[Leaf].dltStressedLAI
          PhaseLookupValue AllOtherTimes: Start=FlagLeaf; End=HarvestRipe
            VariableReference DltStressedLAI: VariableName=[Leaf].dltStressedLAI
        MultiplyFunction DMSupplyFixation
          PhaseLookup ratioRootShoot
            PhaseLookupValue BetweenEmergenceAndFloralInit: Start=Emergence; End=FloralInitiation
              Constant rootFraction: FixedValue=2; Units=0-1
            PhaseLookupValue BetweenFloralInitAndFlowering: Start=FloralInitiation; End=Flowering
              Constant rootFraction: FixedValue=1.33; Units=0-1
            Memo
              This is a straight lookup table not an lineaer relationship
            PhaseLookupValue BetweenFloweringAndGrainFill: Start=Flowering; End=StartGrainFill
              Constant rootFraction: FixedValue=1.087; Units=0-1
            PhaseLookupValue BetweenGrainFillAndHarvestRipe: Start=StartGrainFill; End=HarvestRipe
              Constant rootFraction: FixedValue=1; Units=0-1
          VariableReference DMSupplyFunction: VariableName=[Leaf].DMSupplyFunction
        MinimumFunction DMSupplyFunction
          VariableReference BiomassTE: VariableName=[Leaf].BiomassTE
          VariableReference BiomassRUE: VariableName=[Leaf].BiomassRUE
        MultiplyFunction PotentialBiomassTEFunction
          DivideFunction TE
            VariableReference TECoeff
              VariableName=[Leaf].WaterDemandFunction.TranspirationEfficiencyCoefficient
            VariableReference VPD: VariableName=[Leaf].WaterDemandFunction.VPD
            Constant g2mm: FixedValue=0.001
          VariableReference WaterSupply: VariableName=[Arbitrator].WatSupply
          LinearInterpolationFunction CO2Modifier
            XYPairs: X=[0, 350]; Y=[1, 1]
            VariableReference XValue: VariableName=[Weather].CO2
        Constant DMReallocationFactor: FixedValue=0
        Constant CarbonConcentration: FixedValue=0.4
        BiomassDemand DMDemands
          MultiplyFunction Structural
            PhaseLookup DMDemandFunction
              PhaseLookupValue BetweenEmergenceAndFlag: Start=Emergence; End=FlagLeaf
                MinimumFunction
                  MultiplyFunction
                    VariableReference LeafPartitionCoeff: VariableName=[Leaf].LeafPartitioningCoefficient
                    VariableReference DMSupplyFunction: VariableName=[Leaf].DMSupplyFunction
                  DivideFunction dltDmLeafMax
                    VariableReference DltStressedLAI: VariableName=[Leaf].DltStressedLAI
                    MultiplyFunction
                      VariableReference SlaMin: VariableName=[Leaf].Parameters.SlaMin
                      Constant smm2sm: FixedValue=1e-06
            Constant StructuralFraction: FixedValue=1; Units=0-1
          Constant Metabolic: FixedValue=0
          StorageDMDemandFunction Storage
            SubtractFunction StorageFraction
              Constant One: FixedValue=1
              VariableReference StructuralFraction: VariableName=[Leaf].DMDemands.Structural.StructuralFraction
        BiomassDemand NDemands
          PhaseLookup Structural
            PhaseLookupValue BetweenEmergenceAndFlower: Start=Emergence; End=Flowering
              MultiplyFunction NewLeafNDemand
                VariableReference dltLAI: VariableName=[Leaf].DltLAI
                VariableReference newLeafSLN: VariableName=[Leaf].Parameters.NewLeafSLN
          MaximumFunction Metabolic
            SubtractFunction
              MultiplyFunction nRequired
                SubtractFunction laiToday
                  Memo
                    laiToday = lai + dltLai - dltSlai
                  AddFunction
                    VariableReference LAI: VariableName=[Leaf].LAI
                    VariableReference DltLAI: VariableName=[Leaf].DltLAI
                  VariableReference dltSlai: VariableName=[Leaf].DltSenescedLai
                VariableReference TargetSLN: VariableName=[Leaf].TargetSLN
              VariableReference nGreen: VariableName=[Leaf].Live.N
            Constant Zero: FixedValue=0
          Constant Storage: FixedValue=0
        BiomassRemoval BiomassRemovalDefaults
          OrganBiomassRemovalType Harvest: FractionLiveToRemove=0; FractionDeadToRemove=0; FractionLiveToResidue=0.3; FractionDeadToResidue=0
          OrganBiomassRemovalType Cut: FractionLiveToRemove=0.8; FractionDeadToRemove=0; FractionLiveToResidue=0; FractionDeadToResidue=0
          OrganBiomassRemovalType Prune: FractionLiveToRemove=0; FractionDeadToRemove=0; FractionLiveToResidue=0.6; FractionDeadToResidue=0
          OrganBiomassRemovalType Graze: FractionLiveToRemove=0.6; FractionDeadToRemove=0; FractionLiveToResidue=0.1; FractionDeadToResidue=0
        OnEventFunction MinPlantWt: SetEvent=Flowering
          Constant PreEventValue: FixedValue=0
          MultiplyFunction PostEventValue
            DivideFunction
              VariableReference LiveWt: VariableName=[Leaf].Live.Wt
              VariableReference Density: VariableName=[Sorghum].SowingData.Population
                Memo
                  This assumes paddock area is 1ha...
            SubtractFunction
              Constant base: FixedValue=1
              Constant RetranslocationFactor: FixedValue=0.15
        MovingAverageFunction SDRatio: NumberOfDays=5; StageToStartMovingAverage=Germination
          ProtectedDivideFunction SDRatio: NumeratorErrVal=0; DenominatorErrVal=1
            VariableReference WaterSupply: VariableName=[Arbitrator].WatSupply
            VariableReference WaterDemand: VariableName=[Arbitrator].WDemand
        OnEventFunction LaiAnth: SetEvent=Flowering
          Constant PreEventValue: FixedValue=0
          VariableReference PostEventValue: VariableName=[Leaf].LAI
        DivideFunction StomatalConductanceCO2Modifier
          VariableReference FCO2: VariableName=[Leaf].Photosynthesis.FCO2
          ExpressionFunction RelativeCO2Gradient
            Expression=([IWeather].CO2 - [Leaf].CO2internal)/(350 - [Leaf].CO2internal)
        ExpressionFunction CO2internal: Expression=(163 - [IWeather].MeanT)/(5 - 0.1*[IWeather].MeanT)
        LiveOnEventFunction TargetSLN: SetEvent=FlagLeaf; ReSetEvent=Germination
          Constant PreEventValue: FixedValue=1.5
          VariableReference PostEventValue: VariableName=[Leaf].SlnAtFlag
        OnEventFunction SlnAtFlag: SetEvent=FlagLeaf; ReSetEvent=Germination
          Memo
            This seems like a terrible idea...
          VariableReference PreEventValue: VariableName=[Leaf].SLN
          VariableReference PostEventValue: VariableName=[Leaf].SLN
      GenericOrgan Rachis: IsAboveGround=true
        Constant InitialNConcFunction: FixedValue=0
        Constant NReallocationFactor: FixedValue=0
        RetranslocateAvailableN RetranslocateNitrogen
          MaximumFunction RetranslocateFunction
            MinimumFunction
              MultiplyFunction availableDilnN
                DivideFunction
                  MultiplyFunction dltStemNConc
                    AddFunction
                      MultiplyFunction
                        Constant dilnNSlope: FixedValue=0.0062
                        MultiplyFunction stemNConc
                          DivideFunction divide
                            VariableReference nGreen: VariableName=[Rachis].Live.N
                            AddFunction DMToday
                              VariableReference dltDmGreen: VariableName=[Rachis].potentialDMAllocation.Structural
                              VariableReference dmGreen: VariableName=[Rachis].Live.Wt
                          Constant Percentage: FixedValue=100
                      Constant dilnNInt: FixedValue=-0.001
                    VariableReference ThermalTime: VariableName=[Phenology].DltTT
                  Constant: FixedValue=100
                AddFunction DMToday
                  VariableReference dltDmGreen: VariableName=[Rachis].potentialDMAllocation.Structural
                  VariableReference dmGreen: VariableName=[Rachis].Live.Wt
              SubtractFunction
                VariableReference NGreen: VariableName=[Rachis].Live.N
                VariableReference StructuralN: VariableName=[Rachis].NDemands.Structural
            Constant Zero: FixedValue=0
          Constant RetranslocateDMFunction: FixedValue=0
        DivideFunction NRetranslocationFactor
          MaximumFunction NRetranslocationAmount
            MinimumFunction
              MultiplyFunction availableDilnN
                DivideFunction
                  MultiplyFunction dltStemNConc
                    AddFunction: same as Replacements.Sorghum.Rachis.RetranslocateNitrogen.RetranslocateFunction.MinimumFunction.availableDilnN.DivideFunction.dltStemNConc.AddFunction
                    VariableReference ThermalTime: VariableName=[Phenology].ThermalTime
                  Constant: FixedValue=100
                AddFunction DMToday
                  VariableReference dltDmGreen: VariableName=[Rachis].potentialDMAllocation.Structural
                  VariableReference dmGreen: VariableName=[Rachis].Live.Wt
              SubtractFunction
                VariableReference NGreen: VariableName=[Rachis].Live.N
                VariableReference StructuralN: VariableName=[Rachis].NDemands.Structural
            Constant Zero: FixedValue=0
        Constant SenescenceRate: FixedValue=0; Units=/d
        LinearInterpolationFunction ExpansionStress
          XYPairs: X=[0, 0.6]; Y=[1, 1]
          VariableReference XValue: VariableName=[Sorghum].Leaf.Fw
        Constant DetachmentRateFunction: FixedValue=0; Units=/d
        Constant MaintenanceRespirationFunction: FixedValue=0; Units=0-1
        Constant DMConversionEfficiency: FixedValue=1; Units=0-1
        BiomassRemoval BiomassRemovalDefaults
          OrganBiomassRemovalType Harvest: FractionLiveToRemove=0.5; FractionDeadToRemove=0; FractionLiveToResidue=0.1; FractionDeadToResidue=0
          OrganBiomassRemovalType Cut: FractionLiveToRemove=0.8; FractionDeadToRemove=0; FractionLiveToResidue=0; FractionDeadToResidue=0
          OrganBiomassRemovalType Prune: FractionLiveToRemove=0; FractionDeadToRemove=0; FractionLiveToResidue=0.6; FractionDeadToResidue=0
          OrganBiomassRemovalType Graze: FractionLiveToRemove=0.6; FractionDeadToRemove=0; FractionLiveToResidue=0.2; FractionDeadToResidue=0
        Constant DMReallocationFactor: FixedValue=0
        Constant DMRetranslocationFactor: FixedValue=0
        Constant RemobilisationCost: FixedValue=0
        Constant CarbonConcentration: FixedValue=0.4
        BiomassDemand DMDemands
          MultiplyFunction Structural
            PhaseLookup DMDemandFunction
              PhaseLookupValue BetweenFIAndFlower: Start=FloralInitiation; End=Flowering
                MultiplyFunction
                  VariableReference DMRemainingAfterLeaf: VariableName=[Leaf].DMRemaining
                  VariableReference Stem2FlowerFrac: VariableName=[Stem].StemToFlowerFrac
              PhaseLookupValue BetweenFlagAndFlowering: Start=FlagLeaf; End=Flowering
                MultiplyFunction
                  VariableReference DMFixationSupply: VariableName=[Arbitrator].DM.TotalSupplyFunction
                  VariableReference Stem2FlowerFrac: VariableName=[Stem].StemToFlowerFrac
            Constant StructuralFraction: FixedValue=1
          Constant Metabolic: FixedValue=0
          Constant Storage: FixedValue=0
        BiomassDemand NDemands
          MaximumFunction Structural
            Constant zero: FixedValue=0
            SubtractFunction
              MultiplyFunction required
                VariableReference MinNconc: VariableName=[Rachis].minimumNconc
                AddFunction
                  VariableReference dltDmGreen: VariableName=[Rachis].potentialDMAllocation.Structural
                  VariableReference dmGreen: VariableName=[Rachis].Live.Wt
                VariableReference NitrogenDemandSwitch: VariableName=[Rachis].nitrogenDemandSwitch
              VariableReference nGreen: VariableName=[Rachis].Live.N
          MaximumFunction Metabolic
            Constant zero: FixedValue=0
            SubtractFunction
              MultiplyFunction required
                VariableReference CritNconc: VariableName=[Rachis].criticalNConc
                AddFunction
                  VariableReference dltDmGreen: VariableName=[Rachis].potentialDMAllocation.Structural
                  VariableReference dmGreen: VariableName=[Rachis].Live.Wt
                VariableReference NitrogenDemandSwitch: VariableName=[Rachis].nitrogenDemandSwitch
              VariableReference nGreen: VariableName=[Rachis].Live.N
          StorageNDemandFunction Storage
            VariableReference NitrogenDemandSwitch: VariableName=[Rachis].nitrogenDemandSwitch
            VariableReference MaxNconc: VariableName=[Rachis].maximumNconc
        Constant MinimumNConc: FixedValue=0.003
        Constant CriticalNConc: FixedValue=0.01
        Constant MaximumNConc: FixedValue=0.008
        PhaseLookupValue NitrogenDemandSwitch: Start=Emergence; End=StartGrainFill
          Constant: FixedValue=1
        BiomassDemand InitialWt
          Constant Structural: FixedValue=0; Units=g/plant
          Constant Metabolic: FixedValue=0
          Constant Storage: FixedValue=0
      GenericOrgan Stem: IsAboveGround=true
        Constant initialNConcFunction: FixedValue=0.01
        Constant NReallocationFactor: FixedValue=0
        RetranslocateAvailableN RetranslocateNitrogen
          MaximumFunction RetranslocateFunction
            MinimumFunction
              MultiplyFunction availableDilnN
                DivideFunction
                  MultiplyFunction dltStemNConc
                    AddFunction
                      MultiplyFunction
                        Constant dilnNSlope: FixedValue=0.0062
                        MultiplyFunction stemNConcPct
                          DivideFunction divide
                            VariableReference nGreen: VariableName=[Stem].Live.N
                            AddFunction DMToday
                              VariableReference dltDmGreen: VariableName=[Stem].potentialDMAllocation.Structural
                              VariableReference dmGreen: VariableName=[Stem].Live.Wt
                          Constant Percentage: FixedValue=100
                      Constant dilnNInt: FixedValue=-0.001
                    VariableReference ThermalTime: VariableName=[Phenology].DltTT
                  Constant: FixedValue=100
                AddFunction DMToday
                  VariableReference dltDmGreen: VariableName=[Stem].potentialDMAllocation.Structural
                  VariableReference dmGreen: VariableName=[Stem].Live.Wt
              SubtractFunction
                VariableReference NGreen: VariableName=[Stem].Live.N
                MultiplyFunction
                  AddFunction DMToday
                    VariableReference dltDmGreen: VariableName=[Stem].potentialDMAllocation.Structural
                    VariableReference dmGreen: VariableName=[Stem].Live.Wt
                  VariableReference StructuralN: VariableName=[Stem].CriticalNConc
            Constant Zero: FixedValue=0
          MaximumFunction RetranslocateDMFunction
            MultiplyFunction StemWtAvail
              SubtractFunction
                AddFunction DMToday
                  VariableReference dltDmGreen: VariableName=[Stem].potentialDMAllocation.Structural
                  VariableReference dmGreen: VariableName=[Stem].Live.Wt
                MultiplyFunction
                  OnEventFunction PlantMinDM: SetEvent=Flowering
                    Constant PreEventValue: FixedValue=0
                    MultiplyFunction PostEventValue
                      DivideFunction dmPlantStem
                        VariableReference dmGreen: VariableName=[Stem].Live.Wt
                        VariableReference density: VariableName=[Plant].SowingData.Population
                      SubtractFunction
                        Constant One: FixedValue=1
                        Constant translocFrac: FixedValue=0.2
                  VariableReference density: VariableName=[Plant].SowingData.Population
              Constant retransRate: FixedValue=0.15
            Constant Zero: FixedValue=0
        DivideFunction NRetranslocationFactor
          MaximumFunction NRetranslocationAmount
            MinimumFunction
              MultiplyFunction availableDilnN
                DivideFunction
                  MultiplyFunction dltStemNConc
                    AddFunction: same as Replacements.Sorghum.Stem.RetranslocateNitrogen.RetranslocateFunction.MinimumFunction.availableDilnN.DivideFunction.dltStemNConc.AddFunction
                    VariableReference ThermalTime: VariableName=[Phenology].ThermalTime
                  Constant: FixedValue=100
                AddFunction DMToday
                  VariableReference dltDmGreen: VariableName=[Stem].potentialDMAllocation.Structural
                  VariableReference dmGreen: VariableName=[Stem].Live.Wt
              SubtractFunction
                VariableReference NGreen: VariableName=[Stem].Live.N
                MultiplyFunction
                  AddFunction DMToday
                    VariableReference dltDmGreen: VariableName=[Stem].potentialDMAllocation.Structural
                    VariableReference dmGreen: VariableName=[Stem].Live.Wt
                  VariableReference StructuralN: VariableName=[Stem].MinimumNconc
            Constant Zero: FixedValue=0
          VariableReference dmGreen: VariableName=[Stem].Live.Wt
        DivideFunction DMRetranslocationFactor
          MaximumFunction DMRetranslocationAmount
            MultiplyFunction StemWtAvail
              SubtractFunction
                AddFunction DMToday
                  VariableReference dltDmGreen: VariableName=[Stem].potentialDMAllocation.Structural
                  VariableReference dmGreen: VariableName=[Stem].Live.Wt
                MultiplyFunction
                  OnEventFunction PlantMinDM: SetEvent=Flowering
                    Constant PreEventValue: FixedValue=0
                    MultiplyFunction PostEventValue: same as Replacements.Sorghum.Stem.RetranslocateNitrogen.RetranslocateDMFunction.StemWtAvail.SubtractFunction.MultiplyFunction.PlantMinDM.PostEventValue
                  VariableReference density: VariableName=[Plant].SowingData.Population
              Constant retransRate: FixedValue=0.15
            Constant Zero: FixedValue=0
          VariableReference dmGreen: VariableName=[Stem].Live.Wt
        Constant StemToFlowerFrac: FixedValue=0.3
        Constant SenescenceRate: FixedValue=0; Units=/d
        Constant DetachmentRateFunction: FixedValue=0; Units=/d
        Constant MaintenanceRespirationFunction: FixedValue=0; Units=0-1
        Constant DMConversionEfficiency: FixedValue=1; Units=0-1
        BiomassRemoval BiomassRemovalDefaults: same as Replacements.Sorghum.Rachis.BiomassRemovalDefaults
        Constant DMReallocationFactor: FixedValue=0
        Constant RemobilisationCost: FixedValue=0
        Constant CarbonConcentration: FixedValue=0.4
        BiomassDemand DMDemands
          MultiplyFunction Structural
            MaximumFunction DMDemandFunction
              SubtractFunction DMDemandFunction
                VariableReference DMSupplyFunction: VariableName=[Leaf].DMSupplyFunction
                VariableReference LeafDemand: VariableName=[Leaf].DMDemand.Structural
                VariableReference RachisDemand: VariableName=[Rachis].DMDemand.Structural
                VariableReference GrainDemand: VariableName=[Grain].DMDemand.Structural
              Constant Zero: FixedValue=0
            Constant StructuralFraction: FixedValue=1
          Constant Metabolic: FixedValue=0
          Constant Storage: FixedValue=0
        BiomassDemand NDemands
          MaximumFunction Structural
            Constant zero: FixedValue=0
            SubtractFunction
              MultiplyFunction required
                VariableReference CriticalNconc: VariableName=[Stem].CriticalNConc
                AddFunction
                  VariableReference dltDmGreen: VariableName=[Stem].potentialDMAllocation.Structural
                  VariableReference dmGreen: VariableName=[Stem].Live.Wt
                VariableReference NitrogenDemandSwitch: VariableName=[Stem].nitrogenDemandSwitch
              VariableReference nGreen: VariableName=[Stem].Live.N
          MaximumFunction Metabolic
            Constant zero: FixedValue=0
            SubtractFunction
              MultiplyFunction required
                VariableReference MinimumNconc: VariableName=[Stem].MinimumNConc
                AddFunction
                  VariableReference dltDmGreen: VariableName=[Stem].potentialDMAllocation.Structural
                  VariableReference dmGreen: VariableName=[Stem].Live.Wt
                VariableReference NitrogenDemandSwitch: VariableName=[Stem].nitrogenDemandSwitch
              VariableReference nGreen: VariableName=[Stem].Live.N
          Constant Storage: FixedValue=0
        LinearInterpolationFunction CriticalNConc
          XYPairs: X=[3, 5, 7, 10]; Y=[0.012, 0.012, 0.005, 0.0015]
          VariableReference XValue: VariableName=[Phenology].Stage
        LinearInterpolationFunction MinimumNconc
          XYPairs: X=[3, 5, 7, 10]; Y=[0.055, 0.016, 0.01, 0.005]
          VariableReference XValue: VariableName=[Phenology].Stage
        LinearInterpolationFunction MaximumNconc
          XYPairs: X=[3, 5, 7, 10]; Y=[0.055, 0.016, 0.01, 0.005]
          VariableReference XValue: VariableName=[Phenology].Stage
        Constant NitrogenDemandSwitch: FixedValue=1
        DivideFunction dmGreenStem
          VariableReference StemWt: VariableName=[Stem].Live.Wt
          VariableReference Destiny: VariableName=[Leaf].SowingDensity
        BiomassDemand InitialWt
          MultiplyFunction Structural
            Constant InitialPlantWt: FixedValue=0.1; Units=g/plant
            VariableReference Population: VariableName=[Plant].Population
          Constant Metabolic: FixedValue=0
          Constant Storage: FixedValue=0
      AddFunction TotalPlantDemand
        VariableReference LeafDemand: VariableName=[Leaf].DMDemands.Structural.DMDemandFunction
        VariableReference StemDemand: VariableName=[Stem].DMDemands.Structural.DMDemandFunction
        VariableReference RachisDemand: VariableName=[Rachis].DMDemands.Structural.DMDemandFunction
        VariableReference GrainDemand: VariableName=[Grain].DMDemands.Structural.DMDemandFunction
      CompositeBiomass AboveGround: DMDOfStructural=0.6
        Propertys=[[Leaf].Live, [Leaf].Dead, [Stem].Live, [Stem].Dead, [Rachis].Live, [Rachis].Dead, [Grain].Live, [Grain].Dead]
      CompositeBiomass AboveGroundLive: Propertys=[[Leaf].Live, [Stem].Live, [Grain].Live, [Rachis].Live]; DMDOfStructural=0.6
        Memo
          The AboveGroundLive composite biomass object includes the Live pools of all organs occurring above the soil surface to allow output for total dry matter and Nutrient contents, including total structural, non-structural and metabolic pools.
      CompositeBiomass AboveGroundDead: Propertys=[[Leaf].Dead, [Stem].Dead, [Grain].Dead, [Rachis].Dead]; DMDOfStructural=0.6
        Memo
          The AboveGroundDead composite biomass object includes the Dead pools of all organs occurring above the soil surface to allow output for total dry matter and Nutrient contents, including total structural, non-structural and metabolic pools.
      CompositeBiomass BelowGround: Propertys=[[Root].Live, [Root].Dead]; DMDOfStructural=0.6
      CompositeBiomass Total: DMDOfStructural=0.6
        Propertys=[[Leaf].Live, [Leaf].Dead, [Stem].Live, [Stem].Dead, [Root].Live, [Root].Dead, [Rachis].Live, [Rachis].Dead, [Grain].Live, [Grain].Dead]
      CompositeBiomass TotalLive: DMDOfStructural=0.6
        Propertys=[[Leaf].Live, [Stem].Live, [Root].Live, [Rachis].Live, [Grain].Live]
      CompositeBiomass TotalDead: DMDOfStructural=0.6
        Propertys=[[Leaf].Dead, [Stem].Dead, [Root].Dead, [Rachis].Dead, [Grain].Dead]
      CultivarFolder Cultivars
        CultivarFolder Australia
          Cultivar Buster
            Command:
              [Leaf].Parameters.aX0.FixedValue = 0.786
              [Leaf].Parameters.aMaxSlope.FixedValue = 46.312
              [Leaf].Parameters.aMaxIntercept.FixedValue = -321.13
          Cultivar early
            Command:
              [Phenology].TTEndJuvToInit.FixedValue = 114
              [Leaf].Parameters.aMaxIntercept.FixedValue = -321.13
              [Leaf].Parameters.aMaxSlope.FixedValue = 46.312
              [Leaf].Parameters.aX0.FixedValue = 0.786
          Cultivar medium
            Command:
              [Phenology].TTEndJuvToInit.FixedValue = 157
              [Leaf].Parameters.aMaxIntercept.FixedValue = -321.13
              [Leaf].Parameters.aMaxSlope.FixedValue = 46.312
              [Leaf].Parameters.aX0.FixedValue = 0.786
          Cultivar late
            Command:
              [Phenology].TTEndJuvToInit.FixedValue = 201
              [Leaf].Parameters.aMaxIntercept.FixedValue = -321.13
              [Leaf].Parameters.aMaxSlope.FixedValue = 46.312
              [Leaf].Parameters.aX0.FixedValue = 0.786
          Cultivar ATX623xRTX430
            Command:
              [Phenology].PhotoModifier.XYPairs.Y[2] = 26
              [Phenology].TTEndJuvToInit.FixedValue = 202
              [Leaf].Parameters.aMaxSlope.FixedValue = 0
              [Leaf].Parameters.aMaxIntercept.FixedValue = 450
          Cultivar A35xQL36
            Command:
              [Phenology].PhotoModifier.XYPairs.X[1] = 11.8
              [Phenology].PhotoModifier.XYPairs.X[2] = 14
              [Phenology].PhotoModifier.XYPairs.Y[2] = 87.34
              [Phenology].TTEndJuvToInit.FixedValue = 134.4
              [Leaf].Parameters.aMaxSlope.FixedValue = 0
              [Leaf].Parameters.aMaxIntercept.FixedValue = 450
          Cultivar QL41xQL36
            Command:
              [Phenology].PhotoModifier.XYPairs.Y[2] = 25
              [Phenology].TTEndJuvToInit.FixedValue = 179
              [Leaf].Parameters.aMaxSlope.FixedValue = 0
              [Leaf].Parameters.aMaxIntercept.FixedValue = 450
          Cultivar QL39xQL36
            Command:
              [Phenology].PhotoModifier.XYPairs.X[1] = 11.8
              [Phenology].PhotoModifier.XYPairs.X[2] = 14
              [Phenology].PhotoModifier.XYPairs.Y[2] = 87.34
              [Phenology].TTEndJuvToInit.FixedValue = 114.4
              [Leaf].Parameters.aMaxIntercept.FixedValue = -321.13
              [Leaf].Parameters.aMaxSlope.FixedValue = 46.312
              [Leaf].Parameters.aX0.FixedValue = 0.786
          Cultivar M35-1
            Command:
              [Phenology].PhotoModifier.XYPairs.Y[2] = 122
              [Phenology].TTEndJuvToInit.FixedValue = 252
              [Grain].FinalGrainNum.PostEventValue.DMPerSeed.FixedValue = 0.001427844
              [Leaf].PartitionRate.FixedValue = 0.018
              [Arbitrator].NitrogenUptakeMethod.NUptakeCease.FixedValue = 10
              [Leaf].Parameters.LeafInitRate.FixedValue = 26.1
              [Leaf].TargetSLN.PreEventValue.FixedValue = 1.2
              [Leaf].Parameters.aMaxSlope.FixedValue = 8.9
              [Leaf].Parameters.aMaxIntercept.FixedValue = 245.3
          Cultivar CSH13R
            Command:
              [Phenology].PhotoModifier.XYPairs.Y[2] = 34
              [Phenology].TTEndJuvToInit.FixedValue = 228
              [Grain].FinalGrainNum.PostEventValue.DMPerSeed.FixedValue = 0.0015
              [Leaf].Photosynthesis.RUE.FixedValue = 1.6
              [Leaf].PartitionRate.FixedValue = 0.018
              [Leaf].TargetSLN.PreEventValue.FixedValue = 1.2
              [Leaf].Parameters.LeafInitRate.FixedValue = 23.2
          Cultivar dekalb_DK55
            Command:
              [Phenology].PhotoModifier.XYPairs.X[1] = 11
              [Phenology].PhotoModifier.XYPairs.X[2] = 13
              [Phenology].PhotoModifier.XYPairs.Y[2] = 0
              [Phenology].TTEndJuvToInit.FixedValue = 205
              [Phenology].FlagLeafToFlowering.Target.FixedValue = 100
              [Phenology].FloweringToGrainFilling.Target.FixedValue = 30
              [Phenology].TTFlowerToMaturity.FixedValue = 695
              [Leaf].Parameters.aMaxIntercept.FixedValue = -321.13
              [Leaf].Parameters.aMaxSlope.FixedValue = 46.312
              [Leaf].Parameters.aX0.FixedValue = 0.786
          Cultivar texas_RS610
            Command:
              [Phenology].PhotoModifier.XYPairs.X[1] = 12.3
              [Phenology].PhotoModifier.XYPairs.X[2] = 14.6
              [Phenology].PhotoModifier.XYPairs.Y[2] = 88.32
              [Phenology].TTEndJuvToInit.FixedValue = 120
              [Phenology].FlagLeafToFlowering.Target.FixedValue = 100
              [Phenology].FloweringToGrainFilling.Target.FixedValue = 30
              [Phenology].TTFlowerToMaturity.FixedValue = 695
              [Leaf].Parameters.aMaxIntercept.FixedValue = -321.13
              [Leaf].Parameters.aMaxSlope.FixedValue = 46.312
              [Leaf].Parameters.aX0.FixedValue = 0.786
          Cultivar pioneer_s34
            Command:
              [Phenology].PhotoModifier.XYPairs.X[1] = 12.3
              [Phenology].PhotoModifier.XYPairs.X[2] = 14.6
              [Phenology].PhotoModifier.XYPairs.Y[2] = 57.5
              [Phenology].TTEndJuvToInit.FixedValue = 115
              [Phenology].FlagLeafToFlowering.Target.FixedValue = 100
              [Phenology].FloweringToGrainFilling.Target.FixedValue = 30
              [Phenology].TTFlowerToMaturity.FixedValue = 695
              [Leaf].Parameters.aMaxIntercept.FixedValue = -321.13
              [Leaf].Parameters.aMaxSlope.FixedValue = 46.312
              [Leaf].Parameters.aX0.FixedValue = 0.786
          Cultivar texas_671
            Command:
              [Phenology].PhotoModifier.XYPairs.X[1] = 12.3
              [Phenology].PhotoModifier.XYPairs.X[2] = 14.6
              [Phenology].PhotoModifier.XYPairs.Y[2] = 34.96
              [Phenology].TTEndJuvToInit.FixedValue = 159
              [Phenology].FlagLeafToFlowering.Target.FixedValue = 100
              [Phenology].FloweringToGrainFilling.Target.FixedValue = 30
              [Phenology].TTFlowerToMaturity.FixedValue = 695
              [Leaf].Parameters.aMaxIntercept.FixedValue = -321.13
              [Leaf].Parameters.aMaxSlope.FixedValue = 46.312
              [Leaf].Parameters.aX0.FixedValue = 0.786
          Cultivar Scorpio
            Command:
              [Phenology].PhotoModifier.XYPairs.Y[2] = 0
              [Phenology].TTEndJuvToInit.FixedValue = 130
              [Phenology].FlagLeafToFlowering.Target.FixedValue = 120
              [Phenology].TTFlowerToMaturity.FixedValue = 810
              [Grain].FinalGrainNum.PostEventValue.DMPerSeed.FixedValue = 0.00065
              [Leaf].Parameters.aX0.FixedValue = 0.83
              [Leaf].Parameters.aMaxSlope.FixedValue = 2.3
              [Leaf].Parameters.aMaxIntercept.FixedValue = 514
              [Leaf].Photosynthesis.RUE.FixedValue = 1.75
          Cultivar Apollo
            Command:
              [Phenology].PhotoModifier.XYPairs.Y[2] = 0
              [Phenology].TTEndJuvToInit.FixedValue = 185
              [Phenology].FlagLeafToFlowering.Target.FixedValue = 130
              [Phenology].TTFlowerToMaturity.FixedValue = 810
              [Leaf].Parameters.aX0.FixedValue = 0.71
              [Leaf].Parameters.aMaxSlope.FixedValue = 37
              [Leaf].Parameters.aMaxIntercept.FixedValue = -101
              [Leaf].Photosynthesis.RUE.FixedValue = 1.75
          Cultivar Bazley: same as Replacements.Sorghum.Cultivars.Australia.Apollo
          Cultivar Taurus
            Command:
              [Phenology].PhotoModifier.XYPairs.Y[2] = 15
              [Phenology].TTEndJuvToInit.FixedValue = 118
              [Phenology].FlagLeafToFlowering.Target.FixedValue = 150
              [Phenology].TTFlowerToMaturity.FixedValue = 810
              [Grain].FinalGrainNum.PostEventValue.DMPerSeed.FixedValue = 0.00065
              [Leaf].Parameters.aX0.FixedValue = 0.8
              [Leaf].Parameters.aMaxSlope.FixedValue = 1
              [Leaf].Parameters.aMaxIntercept.FixedValue = 451
          Cultivar P85G33
            Command:
              [Phenology].PhotoModifier.XYPairs.Y[2] = 0
              [Phenology].TTEndJuvToInit.FixedValue = 118
              [Phenology].FlagLeafToFlowering.Target.FixedValue = 150
              [Phenology].TTFlowerToMaturity.FixedValue = 810
              [Grain].FinalGrainNum.PostEventValue.DMPerSeed.FixedValue = 0.0006
              [Leaf].Parameters.aX0.FixedValue = 0.86
              [Leaf].Parameters.aMaxSlope.FixedValue = 0
              [Leaf].Parameters.aMaxIntercept.FixedValue = 542
          Cultivar P84G22
            Command:
              [Phenology].PhotoModifier.XYPairs.Y[2] = 0
              [Phenology].FlagLeafToFlowering.Target.FixedValue = 140
              [Phenology].TTFlowerToMaturity.FixedValue = 810
              [Grain].FinalGrainNum.PostEventValue.DMPerSeed.FixedValue = 0.0006
              [Leaf].Parameters.aX0.FixedValue = 0.81
              [Leaf].Parameters.aMaxSlope.FixedValue = 0
              [Leaf].Parameters.aMaxIntercept.FixedValue = 578
          Cultivar P84G99
            Command:
              [Phenology].PhotoModifier.XYPairs.Y[2] = 0
              [Phenology].TTEndJuvToInit.FixedValue = 135
              [Phenology].FlagLeafToFlowering.Target.FixedValue = 140
              [Phenology].TTFlowerToMaturity.FixedValue = 810
              [Grain].FinalGrainNum.PostEventValue.DMPerSeed.FixedValue = 0.0005
              [Leaf].Parameters.aX0.FixedValue = 0.84
              [Leaf].Parameters.aMaxSlope.FixedValue = 0
              [Leaf].Parameters.aMaxIntercept.FixedValue = 495
          Cultivar P86G56
            Command:
              [Phenology].PhotoModifier.XYPairs.Y[2] = 20
              [Phenology].TTEndJuvToInit.FixedValue = 138
              [Phenology].FlagLeafToFlowering.Target.FixedValue = 150
              [Phenology].TTFlowerToMaturity.FixedValue = 810
              [Grain].FinalGrainNum.PostEventValue.DMPerSeed.FixedValue = 0.0005
              [Leaf].Parameters.aX0.FixedValue = 0.84
              [Leaf].Parameters.aMaxSlope.FixedValue = 0
              [Leaf].Parameters.aMaxIntercept.FixedValue = 495
          Cultivar MR43
            Command:
              [Phenology].PhotoModifier.XYPairs.Y[2] = 15
              [Phenology].TTEndJuvToInit.FixedValue = 118
              [Phenology].FlagLeafToFlowering.Target.FixedValue = 150
              [Phenology].TTFlowerToMaturity.FixedValue = 810
              [Leaf].Parameters.aX0.FixedValue = 0.71
              [Leaf].Parameters.aMaxSlope.FixedValue = 37
              [Leaf].Parameters.aMaxIntercept.FixedValue = -101
          Cultivar N_14NUS01
            Command:
              [Phenology].PhotoModifier.XYPairs.Y[2] = 0
              [Phenology].TTEndJuvToInit.FixedValue = 180
              [Phenology].FlagLeafToFlowering.Target.FixedValue = 140
              [Phenology].TTFlowerToMaturity.FixedValue = 810
              [Grain].FinalGrainNum.PostEventValue.DMPerSeed.FixedValue = 0.0007
              [Leaf].Parameters.aX0.FixedValue = 0.82
              [Leaf].Parameters.aMaxSlope.FixedValue = 8.5
              [Leaf].Parameters.aMaxIntercept.FixedValue = 378
          Cultivar N_14NUS02
            Command:
              [Phenology].PhotoModifier.XYPairs.Y[2] = 20
              [Phenology].TTEndJuvToInit.FixedValue = 174
              [Phenology].FlagLeafToFlowering.Target.FixedValue = 150
              [Phenology].TTFlowerToMaturity.FixedValue = 810
              [Grain].FinalGrainNum.PostEventValue.DMPerSeed.FixedValue = 0.0006
              [Leaf].Parameters.aX0.FixedValue = 0.82
              [Leaf].Parameters.aMaxSlope.FixedValue = 8.5
              [Leaf].Parameters.aMaxIntercept.FixedValue = 378
          Cultivar N_14NUS03
            Command:
              [Phenology].PhotoModifier.XYPairs.Y[2] = 15
              [Phenology].TTEndJuvToInit.FixedValue = 110
              [Phenology].FlagLeafToFlowering.Target.FixedValue = 100
              [Phenology].TTFlowerToMaturity.FixedValue = 810
              [Grain].FinalGrainNum.PostEventValue.DMPerSeed.FixedValue = 0.00045
              [Leaf].Parameters.aX0.FixedValue = 0.84
              [Leaf].Parameters.aMaxSlope.FixedValue = 9.3
              [Leaf].Parameters.aMaxIntercept.FixedValue = 384
          Cultivar N_14NUS04
            Command:
              [Phenology].PhotoModifier.XYPairs.Y[2] = 0
              [Phenology].TTEndJuvToInit.FixedValue = 120
              [Phenology].FlagLeafToFlowering.Target.FixedValue = 120
              [Phenology].TTFlowerToMaturity.FixedValue = 810
              [Grain].FinalGrainNum.PostEventValue.DMPerSeed.FixedValue = 0.00045
              [Leaf].Parameters.aX0.FixedValue = 0.81
              [Leaf].Parameters.aMaxSlope.FixedValue = 0
              [Leaf].Parameters.aMaxIntercept.FixedValue = 445
        CultivarFolder Old (disabled)
          Cultivar Buster
          Cultivar M35-1
            Command:
              [Phenology].TTEndJuvToInit.FixedValue = 252
              [Phenology].TTTargetPhotoSensitive.EmergenceToEndJuve.Add.PhotoModifier.XYPairs.Y[1] = 122
              [Grain].FinalGrainNum.PostEventValue.DMPerSeed.FixedValue = 0.001427844
              [Leaf].PartitionRate.FixedValue = 0.018
              [Root].NUptakeCease.FixedValue = 10
              [Leaf].Parameters.LeafInitRate.FixedValue = 26.1
              [Leaf].TargetSLN.PreEventValue.FixedValue = 1.2
              [Leaf].Parameters.aMaxSlope.FixedValue = 8.9
              [Leaf].Parameters.aMaxIntercept.FixedValue = 245.3
          Cultivar QL41xQL36
            Command:
              [Phenology].TTEndJuvToInit.FixedValue = 179
              [Phenology].TTTargetPhotoSensitive.EmergenceToEndJuve.Add.PhotoModifier.XYPairs.Y[1] = 25
              [Leaf].Parameters.aMaxSlope.FixedValue = 0.0
              [Leaf].Parameters.aMaxIntercept.FixedValue = 450
          Cultivar QL39xQL36
            Command:
              [Phenology].TTEndJuvToInit.FixedValue = 114.4
              [Phenology].TTTargetPhotoSensitive.EmergenceToEndJuve.Add.PhotoModifier.XYPairs.Y[1] = 87.34
          Cultivar CSH13r: Command=[Phenology].TTEndJuvToInit.FixedValue = 220
          Cultivar ATx623xRTx430: Command=[Phenology].TTEndJuvToInit.FixedValue = 220
          Cultivar A35xQL36: Command=[Phenology].TTEndJuvToInit.FixedValue = 220
      Constant MortalityRate: FixedValue=0
  Simulation Continuous_Sorghum
    Clock
    Summary
    Weather: FileName=%root%\Examples\WeatherFiles\Dalby.met
    SoilArbitrator
    Zone Paddock: Area=1; Slope=0; AspectAngle=0; Altitude=50
      Report HarvestReport: EventNames=[Sorghum].Harvesting
        VariableNames:
          [Clock].Today
          [Sorghum].Grain.Wt
          [Sorghum].AboveGround.Wt
          [Sorghum].Leaf.LAI
      Folder Manager folder
        Manager Harvesting rule
```csharp
using Models.PMF;
using Models.Core;
using System;

namespace Models
{
    [Serializable]

    public class Script : Model
    {
        [Link]
        private Clock clock;

        [Link]
        private IPlant crop;

        [EventSubscribe("EndOfDay")]
        private void OnDoCalculations(object sender, EventArgs e)
        {
            if (crop.IsReadyForHarvesting)
            {
                crop.Harvest();
                crop.EndCrop();
            }
            /*
                

           if [crop].StageName = 'harvest_ripe' or [crop].plant_status = 'dead' then
              [crop]  harvest
              [crop]  end_crop
           endif

            
            */
        }
    }
}
```
        Manager Sow using a variable rule
          Crop = [Sorghum]
          StartDate = 1-nov
          EndDate = 10-jan
          MinESW = 100
          MinRain = 25
          RainDays = 7
          CultivarName = QL41xQL36
          SowingDepth = 30
          RowSpacing = 750
          Population = 6
```csharp
using Models.Interfaces;
using APSIM.Shared.Utilities;
using Models.Utilities;
using Models.Soils;
using Models.PMF;
using Models.Core;
using System;
using Models.Climate;

namespace Models
{
    [Serializable]
    public class Script : Model
    {
        [Link] private Clock Clock;
        [Link] private Fertiliser Fertiliser;
        [Link] private Summary Summary;
        [Link] private Soil Soil;
        private Accumulator accumulatedRain;
        [Link]
        private ISoilWater waterBalance;
        
        [Description("Crop")]
        public IPlant Crop { get; set; }

        [Description("Start of sowing window (d-mmm)")]
        public string StartDate { get; set; }

        [Description("End of sowing window (d-mmm)")]
        public string EndDate { get; set; }

        [Description("Minimum extractable soil water for sowing (mm)")]
        public double MinESW { get; set; }

        [Description("Accumulated rainfall required for sowing (mm)")]
        public double MinRain { get; set; }

        [Description("Duration of rainfall accumulation (d)")]
        public int RainDays { get; set; }

        [Display(Type = DisplayType.CultivarName)]
        [Description("Cultivar to be sown")]
        public string CultivarName { get; set; }

        [Description("Sowing depth (mm)")]
        public double SowingDepth { get; set; }

        [Description("Row spacing (mm)")]
        public double RowSpacing { get; set; }

        [Description("Plant population (/m2)")]
        public double Population { get; set; }
        
        
        [EventSubscribe("StartOfSimulation")]
        private void OnSimulationCommencing(object sender, EventArgs e)
        {
            accumulatedRain = new Accumulator(this, "[Weather].Rain", RainDays);
        }

        [EventSubscribe("DoManagement")]
        private void OnDoManagement(object sender, EventArgs e)
        {
            accumulatedRain.Update();
            
            if (DateUtilities.WithinDates(StartDate, Clock.Today, EndDate) &&
                !Crop.IsAlive &&
                MathUtilities.Sum(waterBalance.ESW) > MinESW &&
                accumulatedRain.Sum > MinRain)
            {
                Crop.Sow(population: Population, cultivar: CultivarName, depth: SowingDepth, rowSpacing: RowSpacing);    
            }
        }
    }
}
```
      Irrigation
      Fertiliser
      MicroClimate: a_interception=0; b_interception=1; c_interception=0; d_interception=0; soil_albedo=0.13; SoilHeatFluxFraction=0.4; MinimumHeightDiffForNewLayer=0; NightInterceptionFraction=0.5; ReferenceHeight=2
      Soil HRS: SoilType=HMM; Site=HRS; NearestTown=Unknown; Region=SE Queensland; NaturalVegetation=Unknown; Latitude=0; Longitude=0
        Physical
          Thickness  BD    AirDry  LL15   DUL   SAT
          100        1.34  0.08    0.226  0.42  0.45
          100        1.34  0.19    0.226  0.42  0.45
          200        1.33  0.23    0.258  0.46  0.48
          200        1.38  0.26    0.27   0.46  0.47
          200        1.4   0.26    0.268  0.43  0.45
          200        1.55  0.28    0.304  0.4   0.41
          200        1.59  0.25    0.335  0.37  0.38
          200        1.63  0.28    0.33   0.33  0.37
          200        1.66  0.3     0.32   0.32  0.37
          200        1.68  0.31    0.33   0.33  0.36
          SoilCrop SorghumSoil
            LL=[0.226, 0.226, 0.258, 0.27, 0.268, 0.304, 0.335, 0.33, 0.32, 0.33]
            KL=[0.07, 0.07, 0.07, 0.07, 0.06, 0.06, 0.06, 0.05, 0.05, 0.04]
            XF=[1, 1, 1, 1, 1, 1, 1, 1, 1, 1]
        WaterBalance SoilWater: SummerDate=1-Nov; SummerU=1.5; SummerCona=6.5; WinterDate=1-Apr; WinterU=1.5; WinterCona=6.5; DiffusConst=40; DiffusSlope=16; Salb=0.2; CN2Bare=85; CNRed=20; CNCov=0.8; Thickness=[100, 100, 200, 200, 200, 200, 200, 200, 200, 200]; SWCON=[0.3, 0.3, 0.3, 0.3, 0.3, 0.3, 0.3, 0.3, 0.3, 0.3]
        SoilNitrogen: fom_types=[default, manure, mucuna, lablab, shemp, stable]; fract_carb=[0.2, 0.3, 0.54, 0.57, 0.45, 0]; fract_cell=[0.7, 0.3, 0.37, 0.37, 0.47, 0.1]; fract_lign=[0.1, 0.4, 0.09, 0.06, 0.08, 0.9]; NPartitionApproach=0
          SoilNitrogenNO3 NO3
          SoilNitrogenNH4 NH4
          SoilNitrogenUrea Urea
          SoilNitrogenPlantAvailableNO3 PlantAvailableNO3
          SoilNitrogenPlantAvailableNH4 PlantAvailableNH4
        Organic: FOMCNRatio=50
          Thickness  Carbon  SoilCNRatio  FBiom  FInert  FOM
          100        1.19    12.5         0.05   0.45    260.587
          100        0.59    12.5         0.02   0.6     220.582
          200        0.45    12.5         0.01   0.75    158.054
          200        0.3     12.5         0.01   0.9     113.251
          200        0.2     12.5         0.01   0.9     81.1478
          200        0.16    12.5         0.01   0.9     58.1449
          200        0.17    12.5         0.01   0.9     41.6626
          200        0.17    12.5         0.05   0.9     29.8526
          200        0.17    12.5         0.02   0.9     21.3903
          200        0.17    12.5         0.01   0.9     15.3268
        Chemical
          Thickness  NO3N   NH4N  PH
          100        10.4   0.1   6.3
          100        1.633  0.1   6.4
          200        1.233  0.1   6.5
          200        0.9    0.1   6.6
          200        1.1    0.1   6.6
          200        1.467  0.1   6.5
          200        3.633  0.1   6.5
          200        5.667  0.1   6.5
          200        5.8    0.1   6.5
          200        7.267  0.1   6.5
        Sample Initial water: Thickness=[100, 100, 200, 200, 200, 200, 200, 200, 200, 200]; SWUnits=Volumetric; OCUnits=Total; PHUnits=Water
          SW=[0.235, 0.252, 0.27, 0.3, 0.268, 0.304, 0.335, 0.33, 0.32, 0.33]
        CERESSoilTemperature Temperature
      Plant Sorghum
      SurfaceOrganicMatter: InitialResidueName=wheat_stubble; InitialResidueType=wheat; InitialResidueMass=0; InitialStandingFraction=0; InitialCPR=0; InitialCNR=80
      Manager Automatic irrigation based on water deficit
        FASW = 0
        WaterDeficit = 0
        Crop = [Sorghum]
        AutoIrrigationOn = True
        FASWThreshold = 0.9
        FASWDepth = 600
        weeks = 3
        afterSowing = 2
```csharp
using Models.Interfaces;
using System;
using Models.Core;
using System.Collections.Generic;
using System.Text;
using Models.Soils;
using Models.PMF;
using Models;
using System.Xml.Serialization;
using APSIM.Shared.Utilities;

namespace Models
{
    [Serializable] 
    public class Script : Model
    {
        [Link] private Zone zone;
        [Link] private Irrigation irrigation;
        [Link] private Soil soil;
        [Link]
        private IPhysical soilPhysical;
        [Link]
        private ISoilWater waterBalance;
        public double FASW { get; set; }
        public double WaterDeficit  { get; set; }
    

        [Description("Crop to irrigate")]
        public IPlant Crop { get; set; }
        
        [Description("Auto irrigation on?")]
        public bool AutoIrrigationOn { get; set; }

        [Description("Threshold fraction available water (0-1)")]
        public double FASWThreshold { get; set; }

        [Description("Soil depth (mm) to which fraction available water is calculated")]
        public double FASWDepth { get; set; }

        [Description("Minimum weeks between irrigations")]
        public double weeks { get; set; }

        [Description("Minimum days after sowing for first irrigation")]
        public int afterSowing { get; set; }

        private double irrigationGap = 0;    // gap between irrigations

        [EventSubscribe("DoManagement")]
        private void OnDoManagement(object sender, EventArgs e)
        {
            if (AutoIrrigationOn && Crop.IsAlive)
            {
                   irrigationGap += 1;                // increment gap between irrigations
                CalculateFASW();                // calc FASW and WaterDeficit
                if ((FASW < FASWThreshold) && (irrigationGap >= weeks * 7))
                {
                    irrigation.Apply(WaterDeficit, depth: 0);
                    irrigationGap = 0;            // reset
                }
            }
            else
            {
                irrigationGap = weeks * 7 - afterSowing - 1;    // allow irrigation a number of days after it becomes alive/sown
            }
        }

        // Calculate the fraction of the potential available sw
        // Calculate the deficit amount from DUL
        private void CalculateFASW()
        {
            double[] LL15 = MathUtilities.Multiply(soilPhysical.LL15, soilPhysical.Thickness);
            double[] DUL = MathUtilities.Multiply(soilPhysical.DUL, soilPhysical.Thickness);
        
            int nlayr = GetLayerIndex(FASWDepth);
            double cumdep = MathUtilities.Sum(soilPhysical.Thickness, 0, nlayr, 0.0);    // tricky function that sums up to before nlayr

            double part_layer = MathUtilities.Divide((FASWDepth - cumdep), soilPhysical.Thickness[nlayr], 0.0);

            // note that results may be strange if swdep < ll15
            double avail_sw = (MathUtilities.Sum(waterBalance.SWmm, 0, nlayr, 0.0) + part_layer * waterBalance.SWmm[nlayr])
                            - (MathUtilities.Sum(LL15, 0, nlayr, 0.0) + part_layer * LL15[nlayr]);

            double pot_avail_sw = (MathUtilities.Sum(DUL, 0, nlayr, 0.0) + part_layer * DUL[nlayr])
                                - (MathUtilities.Sum(LL15, 0, nlayr, 0.0) + part_layer * LL15[nlayr]);
            
            FASW = MathUtilities.Divide(avail_sw, pot_avail_sw, 0.0);
            WaterDeficit = MathUtilities.Constrain(pot_avail_sw - avail_sw, 0.0, 100000);
        }

        // Get index of the layer that has this depth in it 
        private int GetLayerIndex(double pointDepth)
        {
            double[] cumThickness = soilPhysical.ThicknessCumulative;
            int layerIdx = 0;
            while ((layerIdx < cumThickness.Length) && (pointDepth > cumThickness[layerIdx]))
            {
                layerIdx += 1;
            }

            return layerIdx;
        }
    }
}
```
      Manager Fertilise at sowing
        Crop = [Sorghum]
        FertiliserType = UreaN
        Amount = 160
```csharp
using Models.PMF;
using Models.Core;
using System;
namespace Models
{
    [Serializable]
    public class Script : Model
    {
        [Link] Clock Clock;
        [Link] Fertiliser Fertiliser;
        
        [Description("Crop to be fertilised")]
        public IPlant Crop { get; set; }

        [Description("Type of fertiliser to apply? ")] 
        public Fertiliser.Types FertiliserType { get; set; }
    
        [Description("Amount of fertiliser to be applied (kg/ha)")]
        public double Amount { get; set; }
        
        [EventSubscribe("Sowing")]
        private void OnSowing(object sender, EventArgs e)
        {
            Model crop = sender as Model;
            if (Crop != null && crop.Name.ToLower() == (Crop as IModel).Name.ToLower())
                Fertiliser.Apply(Amount: Amount, Type: FertiliserType);
        }
    }
}
```
  Simulation Forage Crop Grazing
    Memo
      “Forage Crop Grazing” is a simple single-paddock simulation. The paddock contains a sorghum crop that is irrigated and fertilised. The sorghum is sown in summer of the first year and is rejuvenated thereafter at the frequency set on the sowing rule in the paddock. In this simulation a new mob of animals are ‘bought’ every time the sorghum (or any forage crop or crops) are ready to be grazed.
      The user sets the characteristics of the stock, the grazing rules and if/how any supplementary feeding is done.

      **Stock Type Information**

      This section contains parameters for the genotype (e.g. Jersey, Small merino), reproductive type (e.g. Castrated male), age, weight, and fertility status. Every time the crop is to be grazed the animals of these characteristics are brought into the simulation. They will change status while grazing but will reset at each grazing event (they exit the simulation between grazing events).

      **Grazing event information**

      The stock parameters controlling the grazing event are the stocking rate (the numbers of animals bought will be controlled by this and the paddock area) and their location when the simulation is initialised.

      There are several parameters to control the timing of grazing events. Initially the paddock is assessed for the amount of grazable herbage at which the animals can enter and graze the cropand at which they must leave.

      The biomass is the sum of all the grazable components in the paddock. There is an option to set a rough minimum number of days that it might be anticipated that the animals might stay on the paddock if they enter. This is designed to prevent many, very short-duration, grazing events. The estimate is based on a potential intake of 3% of body mass per day and is applied as an additional amount of biomass above the post-grazing biomass. Apart from the biomass based rules there is also an optional no-grazing window. Note that there is no control of grazing based on growth stage (as there might be for a cereal crop for example).

      **Supplementary feeding**

      The management script also allows for optional supplementary feeding. A specified supplement can be feed every day and/or when the biomass in the grazed paddock falls below a set value. The supplement can be fed before grazing (i.e. as an intake priority) or animals can choose between offered supplement and forage depending on digestibility and availability (see the Stock Science Documentation for more information). Every time that a supplement about to be fed out the script buys sufficient supplement to last about a month.

      **Reporting Outputs**

      There are several example outputs included in the Report model. The documentation for the Report model for the general syntax which here is set up to accommodate means, sums or last values of the reporting interval. In this short example the reporting interval is every day but for longer simulations it might be desirable to set up reporting at the end of each month or grazing event for example.

      The first plots shows the location of the stock (on the paddock or ‘away’), the grazable biomass in the paddock and the supplement remaining in the store. The second plot shows average body mass and average dry matter intake. Note how body mass resets to a consistent value at the start of each grazing event. This is because a new mob of animals is bought at the start of each grazing event.

      The shaded area behind the plots shows the location of the stock (get this to show but adding a "ShadedBarsOnGraph" model to a Graph|Series). Clicking on one of the shaded areas will pop up the name of the location.
    Clock: Start=2010-09-01; End=2012-08-31
    Weather: FileName=%root%/Examples/WeatherFiles/Gatton.met
    Summary
    SoilArbitrator Soil Arbitrator
    MicroClimate: a_interception=0; b_interception=1; c_interception=0; d_interception=0; soil_albedo=0.23; SoilHeatFluxFraction=0.4; MinimumHeightDiffForNewLayer=0; NightInterceptionFraction=0.5; ReferenceHeight=2
    Supplement: SpoilageTime=0
      Stores:
        Name    Stored  IsRoughage  DMContent  DMD   MEContent  CPConc  ProtDg  PConc   SConc   EEConc  ADIP2CP  AshAlk  MaxPassage
        fodder  0       true        0.85       0     0          0       0       0       0       0       0        0       0
        silage  0       true        1          0.75  12         0.18    0.8     0.0032  0.0024  0.02    0.06     0.6     0
    Stock: RandSeed=9999
      GenotypeCross Small Merino: AnimalType=Sheep; PureBredBreed=Small Merino; MatureDeathRate=0.02; WeanerDeathRate=0.02; Conception=[0, 0.54, 0.41, 0]; Generation=0; SRW=40; PotFleeceWt=3.6; MaxFibreDiam=19; FleeceYield=0.7; PeakMilk=0
    Manager GrazeForageCrop
      Genotype = Friesian
      Sex = Female
      Age = 12
      Weight = 280
      Pregnant = 0
      Lactating = 0
      YoungNumber = 0
      YoungWt = 0
      StockingRate = 50
      CurrentLocation = Away
      PreGrazingDM = 2000
      MinGrazingDays = 7
      PostGrazingDM = 1500
      DoNoGrazingWindow = False
      NoGrazeStart = 1-Jun
      NoGrazeEnd = 31-Jul
      SupplementName = silage
      SupplementFirst = False
      SupplementEveryDay = 0
      SupplementOnPastureMass = 2
      TriggerPastureMass = 2100
      NumStock = 0
      GrazingSeasonIsOpen = False
      HarvestableBiomass = 0
      HarvestableBiomassYesterday = 0
```csharp
using Models.PMF.Interfaces;
using System.Diagnostics;
using Models.AgPasture;
using System.Linq;
using System.Collections.Generic;
using System.Collections;
using Models.Soils;
using Models.PMF;
using System.Xml.Serialization;
using APSIM.Shared.Utilities;
using Models.GrazPlan;
using Models.Utilities;
using Models.Core;
using Models;
using System;

namespace Models
{

    [Serializable]
    public class Script : Model
    {
        [Link] Clock clock;
        [Link] Stock stock;
        [Link] Supplement supplement;
        [Link] List<Zone> paddocks;
        [Link] ISummary summary;
        [Link] Simulation farm;
        [Link] List<IPlantDamage> forages = null;

        private int CurrentGroupNum = 1;    // animal group number
        private int CurrentLocationNum { get; set; }

        [Separator("Stock type info, the same type of stock are brought onto the paddock at each grazing")]

        [Description("Stock: genotype (e.g. Small Merino, Angus, Friesian):")] 
        [Display(Values="GetGenotypes")]
        public string Genotype { get; set; }

        [Description("Stock: sex (Female, Male, Castrate):")] 
        public ReproductiveType Sex { get; set; }

        [Description("Stock: age (months):")] 
        public double Age { get; set; }

        [Description("Stock: weight (kg liveweight /head):")] 
        public double Weight { get; set; }

        [Description("Stock: fertility status (0 if non-pregnant or days since conception):")] 
        public int Pregnant { get; set; }

        [Description("Stock: lactation status (0 if non-lactating or days since parturition):")]
        public int Lactating { get; set; }

        [Description("Stock: number of unweaned young:")]
        public int YoungNumber { get; set; }

        [Description("Stock: weight of unweaned young:")] 
        public double YoungWt { get; set; }

        [Separator("Grazing event information")]

        [Description("Paddock stocking rate (head/ha): ")] 
        public double StockingRate { get; set; }

        [Description("Initial location of the cows (give either the paddock name or 'Away'): ")] 
        public string CurrentLocation { get; set; }

        [Description("Standing biomass at which to bring the stock into the simulation (kg DM/ha): ")] 
        public double PreGrazingDM { get; set; }

        [Description("Don't move the stock onto the crop unless there is approx. X days of grazable forage available: ")] 
        public int MinGrazingDays { get; set; }

        [Description("Standing biomass at which to exit  stock from the simulation (kg DM/ha): ")] 
        public double PostGrazingDM { get; set; }

        [Description("Implement a no-grazing window? (tick for yes): ")] 
        public bool DoNoGrazingWindow { get; set; }

        [Description("Start of the no-grazing window (dd-MMM)")] 
        public string NoGrazeStart { get; set; }

        [Description("End of the no-grazing window (dd-MMM)")] 
        public string NoGrazeEnd { get; set; }

        [Separator("Supplementary feeding")]

        [Description("Name of the supplement to feed: ")] 
        public string SupplementName { get; set; }

        [Description("Feed the supplement first (i.e. before the new forage is available to the stock)?: ")] 
        public bool SupplementFirst { get; set; }

        [Description("Amount of supplementary feeding offered every day (kg DM /head /day): ")] 
        public double SupplementEveryDay { get; set; }

        [Description("Additional amount of supplement offered when available biomass is low (kg DM /head /day): ")] 
        public double SupplementOnPastureMass { get; set; }

        [Description("Trigger biomass for above rule (kg DM /ha): ")] 
        public double TriggerPastureMass { get; set; }

        public int NumStock { get; set; }
        public bool GrazingSeasonIsOpen { get; set; } // number of cows on the whole farm
        public double HarvestableBiomass { get; set; }
        public double HarvestableBiomassYesterday { get; set; }

        // Return a list of genotypes to the properties tab.
        public string[] GetGenotypes()
        {
            if (stock != null)
                return stock.Genotypes.Names.ToArray();
            return null;
        }

        [EventSubscribe("StartOfSimulation")]
        private void OnStartOfSimulation(object sender, EventArgs e)
        {

            //Debugger.Break();

            summary.WriteMessage(this, "Initialising the paddock information");

            NumStock = (int)(Math.Round(StockingRate * farm.Area, 0));

            if (CurrentLocation.ToLower() != "away")
            {
                BuyStock();
                stock.Move(CurrentLocation);
                summary.WriteMessage(this, " The Stock have been moved to " + CurrentLocation);
            }

            summary.WriteMessage(this, "     The number of animals has been rounded to " + NumStock + " from " + (StockingRate * farm.Area));
            summary.WriteMessage(this, "     The animals will begin in " + CurrentLocation + " which is paddock number " + CurrentLocationNum + " in the simulation");
            summary.WriteMessage(this, "     The area of the whole farm is " + farm.Area + " ha");

        }

        [EventSubscribe("DoManagement")]
        private void OnDoManagement(object sender, EventArgs e)
        {
            GrazingSeasonIsOpen = true;
            if (DoNoGrazingWindow)
                GrazingSeasonIsOpen = !DateUtilities.WithinDates(NoGrazeStart, clock.Today, NoGrazeEnd);

            bool sellSomeStock = false;
            if (!GrazingSeasonIsOpen)
                sellSomeStock = true;

            // Calculate forage mass in the paddock
            HarvestableBiomass = 0.0;
            foreach (var forage in forages)
                foreach (var forageOrgan in forage.Organs)
                    if (forageOrgan.IsAboveGround)
                        HarvestableBiomass += forageOrgan.Live.Wt + forageOrgan.Dead.Wt;
            
            HarvestableBiomass *= 10;  // Convert to kg/ha

            if (clock.Today == clock.StartDate)
                HarvestableBiomassYesterday = HarvestableBiomass;

            double deltaHarvestableBiomass = Math.Max(0.0, HarvestableBiomass - HarvestableBiomassYesterday);

            if (HarvestableBiomass <= PostGrazingDM)
                sellSomeStock = true;

            if (CurrentLocation == "Away")
                sellSomeStock = false;

            // The 0.03 is the propostion of body mass that the stock might eat
            double minFodder = Math.Max(PreGrazingDM, Math.Max(0.0, (0.03 * MinGrazingDays * NumStock * Weight) - (deltaHarvestableBiomass * MinGrazingDays))); 
            HarvestableBiomassYesterday = HarvestableBiomass;

            if (CurrentLocation == "Away" && (HarvestableBiomass >= PreGrazingDM) && HarvestableBiomass >= (PostGrazingDM + minFodder) && GrazingSeasonIsOpen)
            {
                CurrentLocation = paddocks[0].Name;
                CurrentLocationNum = paddocks[0].Index;
                BuyStock();
                stock.Move(CurrentLocation);
                summary.WriteMessage(this, "     Buying stock ");
            }

            if (sellSomeStock)
            {
                CurrentLocation = "Away";
                CurrentLocationNum = -1;
                SellStock();
                summary.WriteMessage(this, "     Selling stock ");
            }

            if (CurrentLocation != "Away")
            {
                if (SupplementEveryDay > 0)
                {
                    double silageOnHand = supplement.Stores[2 - 1].Stored;
                    if (silageOnHand < SupplementEveryDay * stock.NumberAll)
                    {
                        supplement.Buy(SupplementEveryDay * 30.0 * stock.NumberAll, SupplementName);  // i.e. 1 months worth
                        summary.WriteMessage(this, "SupplementEveryDay: Buying " + SupplementName + " of total amount : " + (SupplementEveryDay * 90 * stock.NumberAll) + " kg DM");
                    }
                    supplement.Feed(SupplementName, SupplementEveryDay * stock.NumberAll, CurrentLocation, SupplementFirst);
                }

                if (SupplementOnPastureMass > 0 && HarvestableBiomass <= TriggerPastureMass)
                {
                    double silageOnHand = supplement.Stores[2 - 1].Stored;
                    if (silageOnHand < SupplementOnPastureMass * stock.NumberAll)
                    {
                        supplement.Buy(SupplementOnPastureMass * 30.0 * stock.NumberAll, SupplementName);  // i.e. 1 months worth
                        summary.WriteMessage(this, "SupplementOnBiomass: Buying " + SupplementName + " of total amount : " + (SupplementOnPastureMass * 90 * stock.NumberAll) + " kg DM");
                    }
                    supplement.Feed(SupplementName, SupplementOnPastureMass * stock.NumberAll, CurrentLocation, SupplementFirst);
                }
            }
        }


        public void BuyStock()
        {
            CurrentGroupNum = stock.NoGroups + 1;
            StockBuy purchase = new StockBuy();
            purchase.Genotype = Genotype;
            purchase.Number = NumStock;
            purchase.Sex = Sex;
            purchase.Age = Age;       // age in months
            purchase.Weight = Weight;  // live weight in kg
            purchase.UseTag = CurrentGroupNum + 1;
            purchase.MatedTo = purchase.Genotype;
            purchase.Pregnant = Pregnant;  // days pregnant, 0 = non pregnant, 1 = pregnant
            purchase.Lactating = Lactating;  // 0 for dry, 1 for lactating
            purchase.NumYoung = YoungNumber;
            purchase.YoungWt = YoungWt;

            stock.Buy(purchase);
        }

        public void SellStock()
        {
            int NumGroups = stock.NoGroups;

            NumGroups = stock.NoGroups;
            for (int gg = 1; gg <= NumGroups; gg++)
            {
                stock.Sell(stock.Number[gg - 1]);
            }
        }
    }
}
```
    Report GrazingReport: EventNames=[Clock].EndOfDay
      VariableNames:
        [Clock].Today as Date
        Mean of [Stock].NumberAll from [Report].DayAfterLastOutput to [Clock].Today as NumStock
        Mean of [Stock].IntakeAll.Weight from [Report].DayAfterLastOutput to [Clock].Today as AveDMIntake
        Mean of [Stock].MEIntakeAll from [Report].DayAfterLastOutput to [Clock].Today as AveMEIntake
        Mean of [Stock].WeightAll from [Report].DayAfterLastOutput to [Clock].Today as AveBodyMass
        Mean of [Stock].CondScoreAll from [Report].DayAfterLastOutput to [Clock].Today as AveConditionScore
        Mean of [Stock].MilkWtAll from [Report].DayAfterLastOutput to [Clock].Today as AveMilkWeight4pcCorr
        Mean of ([Stock].MilkWtAll * 0.04 * 1.8) from [Report].DayAfterLastOutput to [Clock].Today as AveMilkSolids // note the "0.04" is to convert the 4% fat corrected to dry milk fat, the "1.8" is on the assumption that protein is 80% of the fat content
        Last of [GrazeForageCrop].Script.HarvestableBiomass from [Report].DayAfterLastOutput to [Clock].Today as HarvestableBiomass
        Last of [Supplement].stores[2].Stored from [Report].DayAfterLastOutput to [Clock].Today as SupplementRemaining
        Last of [Field].Sorghum.AboveGround.Wt * 10.0 from [Report].DayAfterLastOutput to [Clock].Today as SorghumMass
        Last of [Field].Sorghum.Leaf.LAI from [Report].DayAfterLastOutput to [Clock].Today as SorghumLAI
        Last of [Field].Sorghum.AboveGround.N * 10.0 from [Report].DayAfterLastOutput to [Clock].Today as SorghumN
        //Last of [GrazeForageCrop].Script.CurrentLocation from [Report].DayAfterLastOutput to [Clock].Today as StockLocation
        [GrazeForageCrop].Script.CurrentLocation as StockLocation
    Memo Memo1
      The first plots shows the location of the stock (on the paddock or ‘away’), the grazable biomass in the paddock and the supplement remaining in the store. The second plot shows average body mass and average dry matter intake. Note how body mass resets to a consistent value at the start of each grazing event. This is because a new mob of animals is bought at the start of each grazing event.

      The shaded area behind the plots shows the location of the stock (get this to show but adding a "ShadedBarsOnGraph" model to a Graph|Series). Clicking on one of the shaded areas will pop up the name of the location.
    Zone Field: Area=1; Slope=0; AspectAngle=0; Altitude=50
      Manager SowingRule
        StartDate = 1-nov
        EndDate = 31-jan
        MinESW = 50
        MinRain = 30
        RainDays = 5
        mustSow = yes
        SowingFreq = 3
        CultivarName = Buster
        SowingDepth = 10
        RowSpacing = 150
        Population = 200
        Amount = 60
        CropAge = 0
```csharp
using Models.Interfaces;
using System.Linq;
using System;
using Models.Core;
using Models.PMF;
using Models.Soils;
using Models.Utilities;
using APSIM.Shared.Utilities;
using Models.Climate;

namespace Models
{
    [Serializable]
    public class Script : Model
    {
        [Link] private Clock Clock;
        [Link] private Fertiliser Fertiliser;
        [Link] private Summary Summary;
        [Link(ByName = true)] private Plant sorghum;
        [Link] private Soil Soil;
        private Accumulator accumulatedRain;
        [Link]
        private ISoilWater waterBalance;

        [Separator("======= Sowing conditions =======")]
        [Description("Start of sowing window (dd-mmm)")] public string StartDate { get; set;}
        [Description("End of sowing window (dd-mmm)")] public string EndDate { get; set;}
        [Description("Minimum extractable soil water for sowing (mm)")] public double MinESW { get; set;}
        [Description("Accumulated rainfall required for sowing (mm)")] public double MinRain { get; set;}
        [Description("Duration of rainfall accumulation (d)")] public int RainDays { get; set;}
        [Description("Must sow at the end of the window?")] public answerType mustSow { get; set; }
        [Description("Frequency of sowing (years)")] public int SowingFreq { get; set; }
    

        [Separator("======= Sowing data =======")]
        [Description("Cultivar to be sown")]
        [Display(Type = DisplayType.CultivarName)]
        public string CultivarName { get; set;}
        [Description("Sowing depth (mm)")] public double SowingDepth { get; set;}        
        [Description("Row spacing (mm)")] public double RowSpacing { get; set;}    
        [Description("Plant population (/m2)")] public double Population { get; set;}    

        [Separator("======= Sowing fertiliser =======")]
        [Description("Amount of fertiliser to be applied (kg/ha)")] public double Amount { get; set;}

        public double CropAge { get; set; }

           public enum answerType
        {
            /// <summary>a positive answer</summary>
            yes,
            /// <summary>a negative answer</summary>
            no
        }

        
        [EventSubscribe("StartOfSimulation")]
        private void OnSimulationCommencing(object sender, EventArgs e)
        {
            accumulatedRain = new Accumulator(this, "[Weather].Rain", RainDays);
            CropAge = SowingFreq + 1.0;
        }
        

        [EventSubscribe("DoManagement")]
        private void OnDoManagement(object sender, EventArgs e)
        {
            accumulatedRain.Update();
            CropAge += 1.0 / 365.25;

            bool doSowing = false;
            if (DateUtilities.WithinDates(StartDate,Clock.Today,EndDate) && !sorghum.IsAlive)
                doSowing = true;
            if ((MathUtilities.Sum(waterBalance.ESW) < MinESW) || (accumulatedRain.Sum < MinRain))
                doSowing = false;
            if ((mustSow == answerType.yes) && (DateUtilities.DatesEqual(EndDate, Clock.Today)))
                doSowing = true;
            if (CropAge < SowingFreq)
                doSowing = false;
            
            if (doSowing)
            {
               sorghum.Sow(population:Population, cultivar:CultivarName, depth:SowingDepth, rowSpacing:RowSpacing);
               Fertiliser.Apply(Amount: Amount, Type: Fertiliser.Types.NO3N);    
               CropAge = 0.0;
            }
        
        }
        
    }
}
```
      Manager AutomaticIrrigation
        allowIrrigation = True
        seasonStart = 15-Sep
        seasonEnd = 30-Apr
        seasonsAllocation = 10000
        triggerDeficit = 75
        targetDeficit = 95
        returndays = 3
        maximumAmount = 15
        depthPAWC = 500
        TopSWdeficit = 0
        TopSWC = 0
        DaysSinceIrrigation = 0
        AmountToApply = 0
        SeasonAppliedAmount = 0
```csharp
using Models.Interfaces;
using System.Linq;
using System;
using Models.Core;
using Models.PMF;
using Models.Soils;
using System.Xml.Serialization;
using APSIM.Shared.Utilities;
using Models.PMF.Phen;

        
namespace Models
{
    [Serializable] 
    [System.Xml.Serialization.XmlInclude(typeof(Model))]
    public class Script : Model
    {
        [Link] private ISummary summary;
        [Link] private Irrigation Irrigation;
        [Link] private Clock Clock;
        [Link] private Soil Soil;
        [Link(ByName = true)] private Plant sorghum;
        private DateTime StartDate;
        private DateTime EndDate;
        private double TopDUL;
        private double TopLL;
        private int nLayers;
        [Link]
        private IPhysical soilPhysical;
        [Link]
        private ISoilWater waterBalance;
        //Communication to other modules
       
        //User inputs from properties tab
        [Description("Turn irrigation on?")]
        public bool allowIrrigation { get; set; }
        [Description("Start of irrigation season (dd-MMM)")]
        public string seasonStart { get; set; }
        [Description("End of irrigation season (dd-MMM)")]
        public string seasonEnd { get; set; }
        [Description("Season allocation (mm)")]
        public double seasonsAllocation { get; set; }
        [Description("Deficit to trigger irrigation (% PAWC)")]
        public double triggerDeficit { get; set; }
        [Description("Deficit to stop irrigaton (% PAWC)")]
        public double targetDeficit { get; set; }
        [Description("Minimum days for irrigation to return")]
        public double returndays { get; set; }
        [Description("Maximum irrigation application (mm/day)")]
        public double maximumAmount { get; set; }
        [Description("Depth to calculate PAWC (mm)")]
        public double depthPAWC { get; set; }
       
        //Class members
        [XmlIgnore] public double TopSWdeficit { get; set; }
        [XmlIgnore] public double TopSWC { get; set; }
        [XmlIgnore] public double DaysSinceIrrigation { get; set; }
        [XmlIgnore] public double AmountToApply { get; set; }
        [XmlIgnore] public double SeasonAppliedAmount { get; set; }
        
        private bool IrrigationIsAllowed { get; set; }
        private bool SeasonIsOpen { get; set; }
        private bool CropIsActive { get; set; }
        private bool IrrigatorIsAvailable { get; set; }
        private bool SoilIsDry { get; set; }

    
        //Calculate static soil variables
        [EventSubscribe("StartOfSimulation")]
        private void OnStartOfSimulation(object sender, EventArgs e)
        {   
            //Set the season dates
            StartDate = DateTime.Parse(seasonStart + "-" + Clock.Today.Year.ToString());
            EndDate = DateTime.Parse(seasonEnd + "-" + Clock.Today.Year.ToString());
            
            //Can we irrigate at all?
            IrrigationIsAllowed = false; 
            if (allowIrrigation)
                IrrigationIsAllowed = true; 

            //Calculate soil water variables
            double depthFromSurface = 0.0;
            double fracLayer = 0.0;
            nLayers = soilPhysical.Thickness.Length;
            for (int layer = 0; layer < nLayers; layer++)
            {
                fracLayer = Math.Min(1.0, (depthPAWC - depthFromSurface) / soilPhysical.Thickness[layer]);
                TopLL += soilPhysical.LL15mm[layer] * fracLayer;
                TopDUL += soilPhysical.DULmm[layer] * fracLayer;
                depthFromSurface += soilPhysical.Thickness[layer];
                if (depthFromSurface >= depthPAWC)
                    layer = nLayers;
            }
        }
             
        //Determine daily requirement for irrigation
        [EventSubscribe("StartOfDay")]
        private void OnStartOfDay(object sender, EventArgs e)
        {
            //Can we irrigate today?          
            SeasonIsOpen = isBetween(Clock.Today, StartDate, EndDate);

            //Is there a crop in the ground that needs irrigation?
            CropIsActive = false;
            if ((sorghum != null) && (sorghum.IsAlive))
                CropIsActive = true;
          
            //Is the irrigator available?
            IrrigatorIsAvailable = false;
            DaysSinceIrrigation += 1;
            if (DaysSinceIrrigation >= returndays)
                IrrigatorIsAvailable = true;
          
            //Is the soil dry enough to require irrigation?
            SoilIsDry = false;
            double depthFromSurface = 0.0;
            double fracLayer = 0.0;
            TopSWC = 0.0;
            for (int layer = 0; layer < nLayers; layer++)
            {
                fracLayer = Math.Min(1.0, (depthPAWC - depthFromSurface) / soilPhysical.Thickness[layer]);
                TopSWC += waterBalance.SWmm[layer] * fracLayer;
                depthFromSurface += soilPhysical.Thickness[layer];
                if (depthFromSurface >= depthPAWC)
                    layer = nLayers;
            }
            
            TopSWdeficit = TopSWC - TopDUL;
            if (Math.Max(0.0, -TopSWdeficit) >= (TopDUL - TopLL) * (100 - triggerDeficit) / 100)
                SoilIsDry = true;
                
            //Are all the conditions ratifying irrigation
            if (IrrigationIsAllowed && SeasonIsOpen && CropIsActive && IrrigatorIsAvailable && SoilIsDry)
            {
                //Lets bloody well irrigate then!!!!
                AmountToApply = TopDUL * targetDeficit / 100 - TopSWC;
                //AmountToApply = Math.Max(0.0, Math.Min(AmountToApply, seasonsAllocation - SeasonAppliedAmount));
                AmountToApply = maximumAmount;
                Irrigation.Apply(AmountToApply);
                DaysSinceIrrigation = 0;
                SeasonAppliedAmount += AmountToApply;
            }
        }
        
        ///Checks whether theDate is between iniDate and endDate (non-year specific)
        private bool isBetween(DateTime theDay, DateTime iniDate, DateTime endDate)
        {
            bool result = false;
            if (iniDate.DayOfYear < endDate.DayOfYear)
            {
                // period is within one year, ex: summer in the northern hemisphere
                if ((theDay.DayOfYear >= iniDate.DayOfYear) && (theDay.DayOfYear <= endDate.DayOfYear))
                    result = true;
            }
            else
            {
                // period goes over the end of the year, ex: summer in the southern hemisphere
                if ((theDay.DayOfYear >= iniDate.DayOfYear) || (theDay.DayOfYear <= endDate.DayOfYear))
                    result = true;
            }
            
            return result;
        }
    }
}
```
      Manager Fertilise on fixed dates
        EachYear = True
        Dates = 20-sep,20-nov,20-jan,20-mar
        UseCritNThreshold = False
        CritNThreshold = 50
        CritNDepth = 75
        Depth = 50
        Amount = 30
        FertiliserType = UreaN
```csharp
using Models.Interfaces;
using System.Linq;
using APSIM.Shared.Utilities;
using Models.PMF;
using Models.Soils;
using Models.Core;
using System;
using Models.Soils.Nutrients;

namespace Models
{
    [Serializable]
    public class Script : Model
    {
        [Link] private Clock clock;
        [Link] private Fertiliser fertiliser;
        [Link] private ISummary summary;
        [Link] private Soil soil;
        private Nutrient nutrient;
        private SoilNitrogen soilN;
        [Link]
        private IPhysical soilPhysical;


        [Separator("Fertiliser will be applied on the date(s) below")]
        [Description("Apply fertiliser on the same day(s) each year? If no, then must include the year of appliaction below")]
        public bool EachYear { get; set; }

        [Description("Dates for one or more fertiliser applications (dd-mmm or dd-mmm-yyyy) as a list with a comma between dates")]
        public string[] Dates { get; set; }

        [Separator("Test for the mineral N in the soil and don't apply the fertiliser if greater than X kgN/ha is stored in the soil above a depth of Y mm")]
        [Description("Use a critical soil mineral N to prevent application above a threshold?")]
        public bool UseCritNThreshold { get; set; }

        [Description("Don't add fertiliser if N in the soil to the depth below exceeds (kg/ha)")]
        public double CritNThreshold { get; set; }

        [Description("Depth to which the amount of N in the soil should be calculated (mm)")]
        public double CritNDepth { get; set; }

        [Separator("Fertiliser application details")]
        [Description("Depth at which to apply the fertiliser (mm)")]
        public double Depth { get; set; }

        [Description("Amount of fertiliser to apply (kg N /ha) per application")]
        public double Amount { get; set; }

        [Description("Fertiliser type - select from the list")]
        public Fertiliser.Types FertiliserType { get; set; }


        [EventSubscribe("StartOfSimulation")]
        private void FindSoilNOrNutrient(object sender, EventArgs e)
        {
            nutrient = this.FindInScope<Nutrient>() as Nutrient;
            soilN = this.FindInScope<SoilNitrogen>() as SoilNitrogen;

            if (nutrient == null && soilN == null)
                throw new Exception(string.Format("Error in script {0}: Unable to find nutrient or soilN.", Name));
        }

        [EventSubscribe("DoManagement")]
        private void OnDoManagement(object sender, EventArgs e)
        {
            if (OnApplicationDate())
            {
                if (NContentBelowThreshold())
                    fertiliser.Apply(Amount, FertiliserType, Depth);
                else
                    summary.WriteMessage(this, "Skipping fertiliser application due to soil mineral N content being above critical threshold.");
            }
        }

        /// <summary>Checks if today's date is one of the specified fertiliser application dates.</summary>
        private bool OnApplicationDate()
        {
            if (EachYear)
                return Dates.Any(d => DateUtilities.DatesEqual(d, clock.Today));
            
            DateTime[] dates = Dates.Select(d => DateTime.ParseExact(d, "d-MMM-yyyy", null)).ToArray();
            return dates.Any(d => SameDate(d, clock.Today));
        }

        /// <summary>Checks if N content in soil is below critical threshold.</summary>
        private bool NContentBelowThreshold()
        {
            if (!UseCritNThreshold)
                return true;
            
            double[] weights = GetLayerWeights();
            double cumSoilN = 0;

            for (int i = 0; i < soilPhysical.Thickness.Length; i++)
            {
                if (nutrient != null)
                    cumSoilN += weights[i] * nutrient.MineralN[i];
                else if (soilN != null)
                    cumSoilN += weights[i] * soilN.mineral_n[i];
            }

            return cumSoilN <= CritNThreshold;
        }

        private double[] GetLayerWeights()
        {
            double[] weights = new double[soilPhysical.Thickness.Length];
            double cumDepth = 0;

            for (int i = 0; i < soilPhysical.Thickness.Length; i++)
            {
                cumDepth += soilPhysical.Thickness[i];
                if (cumDepth < CritNDepth)
                    weights[i] = 1;
                else if (cumDepth - soilPhysical.Thickness[i] <= CritNDepth)
                    weights[i] = (CritNDepth - (cumDepth - soilPhysical.Thickness[i])) / soilPhysical.Thickness[i];
                else
                    weights[i] = 0;
            }

            return weights;
        }

        private bool SameDate(DateTime d1, DateTime d2)
        {
            return d1.Year == d2.Year && d1.DayOfYear == d2.DayOfYear;
        }
    }
}
```
      Irrigation
      Fertiliser
      SurfaceOrganicMatter: InitialResidueName=grass; InitialResidueType=grass; InitialResidueMass=500; InitialStandingFraction=0; InitialCPR=0; InitialCNR=40
      Soil HRS: same as Continuous_Sorghum.Paddock.HRS
      Plant Sorghum
  Simulation Sorghum Maize Intercrop
    Clock
    Summary
    Weather: FileName=%root%/Examples/WeatherFiles/Gatton.met
    SoilArbitrator
    Zone Paddock: Area=1; Slope=0; AspectAngle=0; Altitude=50
      Report SorghumHarvesting: EventNames=[Sorghum].Harvesting
        VariableNames:
          [Clock].Today
          [Sorghum].AboveGround.Wt
          [Sorghum].Grain.Wt
          [Sorghum].Leaf.LAI
      Report MaizeHarvesting: EventNames=[Maize].Harvesting
        VariableNames:
          [Clock].Today
          [Maize].AboveGround.Wt
          [Maize].Grain.Wt
          [Maize].Leaf.LAI
      Manager Fertilise at sowing
        FertiliserType = UreaN
        Amount = 500
```csharp
using Models.PMF;
using Models.Core;
using System;
namespace Models
{
    [Serializable]
    public class Script : Model
    {
        [Link] Clock Clock;
        [Link] Fertiliser Fertiliser;

        [Description("Type of fertiliser to apply? ")] 
        public Fertiliser.Types FertiliserType { get; set; }
    
        [Description("Amount of fertiliser to be applied (kg/ha)")]
        public double Amount { get; set; }
        
        [EventSubscribe("Sowing")]
        private void OnSowing(object sender, EventArgs e)
        {
            Fertiliser.Apply(Amount: Amount, Type: FertiliserType);
        }
    }
}
```
      Folder Manager folder
        Manager SowSorghum
          Crop = [Sorghum]
          StartDate = 1-nov
          EndDate = 10-jan
          MinESW = 100
          MinRain = 25
          RainDays = 7
          CultivarName = Buster
          SowingDepth = 30
          RowSpacing = 500
          Population = 6
```csharp
using Models.Interfaces;
using APSIM.Shared.Utilities;
using Models.Utilities;
using Models.Soils;
using Models.PMF;
using Models.PMF.Organs;
using Models.Core;
using System;
using Models.Climate;

namespace Models
{
    [Serializable]
    public class Script : Model
    {
        [Link] private Clock Clock;
        [Link] private Fertiliser Fertiliser;
        [Link] private Summary Summary;
        [Link] private Soil Soil;
        private Accumulator accumulatedRain;
        [Link] private ISoilWater waterBalance;

		[Link(Type = LinkType.Path, Path = "[Sorghum].Leaf")] SorghumLeaf leaf;	

        [Description("Crop")]
        public IPlant Crop { get; set; }

        [Description("Start of sowing window (d-mmm)")]
        public string StartDate { get; set; }

        [Description("End of sowing window (d-mmm)")]
        public string EndDate { get; set; }

        [Description("Minimum extractable soil water for sowing (mm)")]
        public double MinESW { get; set; }

        [Description("Accumulated rainfall required for sowing (mm)")]
        public double MinRain { get; set; }

        [Description("Duration of rainfall accumulation (d)")]
        public int RainDays { get; set; }

        [Display(Type = DisplayType.CultivarName)]
        [Description("Cultivar to be sown")]
        public string CultivarName { get; set; }

        [Description("Sowing depth (mm)")]
        public double SowingDepth { get; set; }

        [Description("Row spacing (mm)")]
        public double RowSpacing { get; set; }

        [Description("Plant population (/m2)")]
        public double Population { get; set; }
        
        
        [EventSubscribe("StartOfSimulation")]
        private void OnSimulationCommencing(object sender, EventArgs e)
        {
            accumulatedRain = new Accumulator(this, "[Weather].Rain", RainDays);
            leaf.UseMicroClimate = true;
        }

        [EventSubscribe("DoManagement")]
        private void OnDoManagement(object sender, EventArgs e)
        {
            accumulatedRain.Update();
            
            if (DateUtilities.WithinDates(StartDate, Clock.Today, EndDate) &&
                !Crop.IsAlive &&
                MathUtilities.Sum(waterBalance.ESW) > MinESW &&
                accumulatedRain.Sum > MinRain)
            {
                Crop.Sow(population: Population, cultivar: CultivarName, depth: SowingDepth, rowSpacing: RowSpacing);    
            }
        }
    }
}
```
        Manager SowMaize
          Crop = [Maize]
          StartDate = 1-nov
          EndDate = 10-jan
          MinESW = 100
          MinRain = 25
          RainDays = 7
          CultivarName = Katumani
          SowingDepth = 30
          RowSpacing = 500
          Population = 6
          script: same as in Continuous_Sorghum.Paddock.Manager folder.Sow using a variable rule
        Manager Harvesting rule
```csharp
using Models.PMF;
using Models.Core;
using System;
using System.Collections.Generic;

namespace Models
{
    [Serializable]

    public class Script : Model
    {
        [Link]
        private Clock clock;

        [Link]
        private List<IPlant> plants;

        [EventSubscribe("DoManagement")]
        private void OnDoCalculations(object sender, EventArgs e)
        {
        	foreach (IPlant plant in plants)
        	{
            	if (plant.IsReadyForHarvesting)
            	{
            	    plant.Harvest();
            	    plant.EndCrop();
            	}
            }
        }
    }
}
```
        Manager AutomaticIrrigation
          allowIrrigation = True
          seasonStart = 1-sep
          seasonEnd = 30-mar
          seasonsAllocation = 10000
          triggerDeficit = 50
          targetDeficit = 95
          returndays = 3
          maximumAmount = 30
          depthPAWC = 650
          TopSWdeficit = 0
          TopSWC = 0
          DaysSinceIrrigation = 0
          AmountToApply = 0
          SeasonAppliedAmount = 0
```csharp
using Models.Interfaces;
using System;
using Models.Core;
using Models.PMF;
using Models.Soils;
using APSIM.Shared.Utilities;

namespace Models
{
    [Serializable] 
    public class Script : Model
    {
        [Link] private ISummary summary;
        [Link] private Irrigation Irrigation;
        [Link] private Clock Clock;
        [Link] private Soil Soil;
        [Link(IsOptional = true)] private IPlant existingCrop;
        private DateTime StartDate;
        private DateTime EndDate;
        private double TopDUL;
        private double TopLL;
        private int nLayers;
        [Link]
        private IPhysical soilPhysical;
        [Link]
        private ISoilWater waterBalance;
        //Communication to other modules
       
        //User inputs from properties tab
        [Description("Turn irrigation on?")]
        public bool allowIrrigation { get; set; }
        [Description("Start of irrigation season (dd-MMM)")]
        public string seasonStart { get; set; }
        [Description("End of irrigation season (dd-MMM)")]
        public string seasonEnd { get; set; }
        [Description("Season allocation (mm)")]
        public double seasonsAllocation { get; set; }
        [Description("Deficit to trigger irrigation (% PAWC)")]
        public double triggerDeficit { get; set; }
        [Description("Deficit to stop irrigaton (% PAWC)")]
        public double targetDeficit { get; set; }
        [Description("Minimum days for irrigation to return")]
        public double returndays { get; set; }
        [Description("Maximum irrigation application (mm/day)")]
        public double maximumAmount { get; set; }
        [Description("Depth to calculate PAWC (mm)")]
        public double depthPAWC { get; set; }

        //Class members
        public double TopSWdeficit { get; set; }
        public double TopSWC { get; set; }
        public double DaysSinceIrrigation { get; set; }
        public double AmountToApply { get; set; }
        public double SeasonAppliedAmount { get; set; }
        
        private bool IrrigationIsAllowed { get; set; }
        private bool SeasonIsOpen { get; set; }
        private bool CropIsActive { get; set; }
        private bool IrrigatorIsAvailable { get; set; }
        private bool SoilIsDry { get; set; }

    
        //Calculate static soil variables
        [EventSubscribe("StartOfSimulation")]
        private void OnStartOfSimulation(object sender, EventArgs e)
        {   
            //Set the season dates
            StartDate = DateTime.Parse(seasonStart + "-" + Clock.Today.Year.ToString());
            EndDate = DateTime.Parse(seasonEnd + "-" + Clock.Today.Year.ToString());
            
            //Can we irrigate at all?
            IrrigationIsAllowed = false; 
            if (allowIrrigation)
                IrrigationIsAllowed = true; 

            //Calculate soil water variables
            double depthFromSurface = 0.0;
            double fracLayer = 0.0;
            nLayers = soilPhysical.Thickness.Length;
            for (int layer = 0; layer < nLayers; layer++)
            {
                fracLayer = Math.Min(1.0, (depthPAWC - depthFromSurface) / soilPhysical.Thickness[layer]);
                TopLL += soilPhysical.LL15mm[layer] * fracLayer;
                TopDUL += soilPhysical.DULmm[layer] * fracLayer;
                depthFromSurface += soilPhysical.Thickness[layer];
                if (depthFromSurface >= depthPAWC)
                    layer = nLayers;
            }
        }
             
        //Determine daily requirement for irrigation
        [EventSubscribe("StartOfDay")]
        private void OnStartOfDay(object sender, EventArgs e)
        {
            //Can we irrigate today?          
            SeasonIsOpen = isBetween(Clock.Today, StartDate, EndDate);
            if (!SeasonIsOpen)
                SeasonAppliedAmount = 0;

            //Is there a crop in the ground that needs irrigation?
            CropIsActive = false;
            if ((existingCrop != null) && (existingCrop.IsAlive))
                CropIsActive = true;
            //if ((existingCrop.Phenology.Stage >= 3.0) && (existingCrop.Phenology.Stage < 6.0))
          
            //Is the irrigator available?
            IrrigatorIsAvailable = false;
            DaysSinceIrrigation += 1;
            if (DaysSinceIrrigation >= returndays)
                IrrigatorIsAvailable = true;
          
            //Is the soil dry enough to require irrigation?
            SoilIsDry = false;
            double depthFromSurface = 0.0;
            double fracLayer = 0.0;
            TopSWC = 0.0;
            for (int layer = 0; layer < nLayers; layer++)
            //for (int layer = 0; depthFromSurface < depthPAWC + soilPhysical.Thickness[layer]; layer++)
            {
                fracLayer = Math.Min(1.0, (depthPAWC - depthFromSurface) / soilPhysical.Thickness[layer]);
                TopSWC += waterBalance.SWmm[layer] * fracLayer;
                depthFromSurface += soilPhysical.Thickness[layer];
                if (depthFromSurface >= depthPAWC)
                    layer = nLayers;
            }
            
            TopSWdeficit = TopSWC - TopDUL;
            if (Math.Max(0.0, -TopSWdeficit) >= (TopDUL - TopLL) * (100 - triggerDeficit) / 100)
                SoilIsDry = true;
                
            //Are all the conditions ratifying irrigation
            if (IrrigationIsAllowed && SeasonIsOpen && /*CropIsActive &&*/ IrrigatorIsAvailable && SoilIsDry)
            {
                //Lets bloody well irrigate then!!!!
                AmountToApply = TopDUL * targetDeficit / 100 - TopSWC;
                AmountToApply = Math.Max(0.0, Math.Min(AmountToApply, seasonsAllocation - SeasonAppliedAmount));
                AmountToApply = Math.Min(AmountToApply,maximumAmount);
                Irrigation.Apply(AmountToApply);
                DaysSinceIrrigation = 0;
                SeasonAppliedAmount += AmountToApply;
            }
        }
        
        ///Checks whether theDate is between iniDate and endDate (non-year specific)
        private bool isBetween(DateTime theDay, DateTime iniDate, DateTime endDate)
        {
            bool result = false;
            if (iniDate.DayOfYear < endDate.DayOfYear)
            {
                // period is within one year, ex: summer in the northern hemisphere
                if ((theDay.DayOfYear >= iniDate.DayOfYear) && (theDay.DayOfYear <= endDate.DayOfYear))
                    result = true;
            }
            else
            {
                // period goes over the end of the year, ex: summer in the southern hemisphere
                if ((theDay.DayOfYear >= iniDate.DayOfYear) || (theDay.DayOfYear <= endDate.DayOfYear))
                    result = true;
            }
            
            return result;
        }
    }
}
```
      Operations
        1997-01-09  [Irrigation].Apply(52);
        1997-01-16  [Irrigation].Apply(36);
        1997-01-21  [Irrigation].Apply(18);
        1997-01-29  [Irrigation].Apply(20);
        1997-02-07  [Irrigation].Apply(14);
        1997-03-13  [Irrigation].Apply(30);
        1997-03-21  [Irrigation].Apply(45);
        1997-04-10  [Irrigation].Apply(27);
        1997-04-17  [Irrigation].Apply(42);
        1997-05-02  [Irrigation].Apply(27);
        1996-12-20  [Fertiliser].Apply(33, Fertiliser.Types.NO3N, 50);
        1996-12-23  [Fertiliser].Apply(0, Fertiliser.Types.NO3N, 50);
        1996-12-23  [Fertiliser].Apply(119, Fertiliser.Types.NO3N, 50);
        1997-02-12  [Fertiliser].Apply(59, Fertiliser.Types.NO3N, 50);
        1997-03-21  [Fertiliser].Apply(59, Fertiliser.Types.NO3N, 50);
      Irrigation
      Fertiliser
      MicroClimate: a_interception=0; b_interception=1; c_interception=0; d_interception=0; soil_albedo=0.13; SoilHeatFluxFraction=0.4; MinimumHeightDiffForNewLayer=0; NightInterceptionFraction=0.5; ReferenceHeight=2
      Soil HRS: SoilType=HMM; Site=HRS; NearestTown=Unknown; Region=SE Queensland; NaturalVegetation=Unknown; Latitude=0; Longitude=0
        Physical
          Thickness  BD    AirDry  LL15   DUL   SAT
          100        1.34  0.08    0.226  0.42  0.45
          100        1.34  0.19    0.226  0.42  0.45
          200        1.33  0.23    0.258  0.46  0.48
          200        1.38  0.26    0.27   0.46  0.47
          200        1.4   0.26    0.268  0.43  0.45
          200        1.55  0.28    0.304  0.4   0.41
          200        1.59  0.25    0.335  0.37  0.38
          200        1.63  0.28    0.33   0.33  0.37
          200        1.66  0.3     0.32   0.32  0.37
          200        1.68  0.31    0.33   0.33  0.36
          SoilCrop SorghumSoil
            LL=[0.226, 0.226, 0.258, 0.27, 0.268, 0.304, 0.335, 0.33, 0.32, 0.33]
            KL=[0.07, 0.07, 0.07, 0.07, 0.06, 0.06, 0.06, 0.05, 0.05, 0.04]
            XF=[1, 1, 1, 1, 1, 1, 1, 1, 1, 1]
          SoilCrop MaizeSoil
            LL=[0.226, 0.226, 0.258, 0.27, 0.268, 0.304, 0.335, 0.33, 0.32, 0.33]
            KL=[0.07, 0.07, 0.07, 0.07, 0.06, 0.06, 0.06, 0.05, 0.05, 0.04]
            XF=[1, 1, 1, 1, 1, 1, 1, 1, 1, 1]
        WaterBalance SoilWater: same as Continuous_Sorghum.Paddock.HRS.SoilWater
        SoilNitrogen: same as Continuous_Sorghum.Paddock.HRS.SoilNitrogen
        Organic: same as Continuous_Sorghum.Paddock.HRS.Organic
        Chemical: same as Continuous_Sorghum.Paddock.HRS.Chemical
        Sample Initial water: same as Continuous_Sorghum.Paddock.HRS.Initial water
        CERESSoilTemperature Temperature
      Plant Sorghum
      Plant Maize
      SurfaceOrganicMatter: InitialResidueName=wheat_stubble; InitialResidueType=wheat; InitialResidueMass=0; InitialStandingFraction=0; InitialCPR=0; InitialCNR=80
  Experiment IrrigationByNRate
    Factors
      Permutation
        Memo
          Factor setup is maybe a bit counter-intuitive - we could do it without the CompositeFactors. The reason it was done this way is so that the graph series names come out better when varying by irrigation/fertiliser.
        Factor Cv (disabled): Specification=[SowingRule].Script.Cultivar = Buster,M35-1
        Factor Irrigation
          CompositeFactor Low: Specifications=[AutomaticIrrigation].Script.allowIrrigation = false
          CompositeFactor High: Specifications=[AutomaticIrrigation].Script.allowIrrigation = true
        Factor Fertiliser
          CompositeFactor Low: Specifications=[SowingFertiliser].Script.Amount = 0
          CompositeFactor Medium: Specifications=[SowingFertiliser].Script.Amount = 50
          CompositeFactor High: Specifications=[SowingFertiliser].Script.Amount = 100
    Simulation BaseSimulation
      Clock: Start=1995-11-28; End=1996-05-01
      Summary
      Weather: FileName=%root%/Examples/WeatherFiles/Dalby.met
      SoilArbitrator
      Zone Paddock: Area=1; Slope=0; AspectAngle=0; Altitude=50
        Report: EventNames=[Clock].DoReport
          VariableNames:
            [Clock].Today
            [Sorghum].AboveGround.Wt
            [Sorghum].Grain.Wt
            [Sorghum].Leaf.LAI
        Manager SowingFertiliser
          Crop = [Sorghum]
          FertiliserType = UreaN
          Amount = 0
          script: same as in Continuous_Sorghum.Paddock.Fertilise at sowing
        Folder Manager folder
          Manager SowingRule
            Date = 11/29/1995 00:00:00
            Density = 16
            Depth = 20
            Cultivar = Buster
            RowSpacing = 500
            RowConfiguration = solid
            Ftn = 0
```csharp
using APSIM.Shared.Utilities;
using Models.PMF;
using Models.Core;
using System;

namespace Models
{
    [Serializable]
    public class Script : Model
    {
        [Description("Enter sowing date (dd/mm/yyyy) : ")]
        public DateTime Date { get; set; }

        [Description("Enter sowing density  (plants/m2) : ")]
        public double Density { get; set; }

        [Description("Enter sowing depth  (mm) : ")]
        public double Depth { get; set; }

        [Description("Enter cultivar : ")]
        [Display(Type = DisplayType.CultivarName)]
        public string Cultivar { get; set; } // QL41xQL36

        [Description("Enter row spacing (mm) : ")]
        public double RowSpacing { get; set; }

        [Description("Enter skip row configuration : ")]
        public RowConfigurationType RowConfiguration { get; set; }

        [Description("Enter Fertile Tiller No. : ")]
        public double Ftn { get; set; }

        public enum RowConfigurationType 
        {
            solid, single, _double /*replaces double*/
        }

        [Link]
        private Zone paddock;

        [Link]
        private Clock clock;

        [Link]
        private IPlant crop;

        [EventSubscribe("DoManagement")]
        private void OnDoManagement(object sender, EventArgs e)
        {
            if (clock.Today == Date /* && isFallow */)
            {
                double population = Density * paddock.Area;
                crop.Sow(Cultivar, population, Depth, RowSpacing, budNumber: Ftn, rowConfig: (double)RowConfiguration + 1);
                /*
                if (paddock_is_fallow() = 1 and today = date('[date]')) then
                      [crop] sow plants =[density], sowing_depth = [depth], cultivar = [cultivar], row_spacing = [row_spacing], skip = [RowConfiguration], tiller_no_fertile = [ftn] ()
                endif
                */
            }
        }
    }
}
```
          Manager Harvesting rule
```csharp
using Models.PMF;
using Models.Core;
using System;

namespace Models
{
    [Serializable]

    public class Script : Model
    {
        [Link]
        private Clock clock;

        [Link]
        private IPlant crop;

        [EventSubscribe("DoManagement")]
        private void OnDoCalculations(object sender, EventArgs e)
        {
            if (crop.IsReadyForHarvesting)
            {
                crop.Harvest();
                crop.EndCrop();
            }
            /*
                

           if [crop].StageName = 'harvest_ripe' or [crop].plant_status = 'dead' then
              [crop]  harvest
              [crop]  end_crop
           endif

            
            */
        }
    }
}
```
          Manager AutomaticIrrigation
            allowIrrigation = True
            seasonStart = 1-sep
            seasonEnd = 30-mar
            seasonsAllocation = 10000
            triggerDeficit = 50
            targetDeficit = 95
            returndays = 3
            maximumAmount = 30
            depthPAWC = 650
            TopSWdeficit = 0
            TopSWC = 0
            DaysSinceIrrigation = 0
            AmountToApply = 0
            SeasonAppliedAmount = 0
```csharp
using Models.Interfaces;
using System;
using Models.Core;
using Models.PMF;
using Models.Soils;
using APSIM.Shared.Utilities;

namespace Models
{
    [Serializable] 
    public class Script : Model
    {
        [Link] private ISummary summary;
        [Link] private Irrigation Irrigation;
        [Link] private Clock Clock;
        [Link] private Soil Soil;
        [Link(IsOptional = true)] private IPlant existingCrop;
        private DateTime StartDate;
        private DateTime EndDate;
        private double TopDUL;
        private double TopLL;
        private int nLayers;
        [Link]
        private IPhysical soilPhysical;
        [Link]
        private ISoilWater waterBalance;
        //Communication to other modules
       
        //User inputs from properties tab
        [Description("Turn irrigation on?")]
        public bool allowIrrigation { get; set; }
        [Description("Start of irrigation season (dd-MMM)")]
        public string seasonStart { get; set; }
        [Description("End of irrigation season (dd-MMM)")]
        public string seasonEnd { get; set; }
        [Description("Season allocation (mm)")]
        public double seasonsAllocation { get; set; }
        [Description("Deficit to trigger irrigation (% PAWC)")]
        public double triggerDeficit { get; set; }
        [Description("Deficit to stop irrigaton (% PAWC)")]
        public double targetDeficit { get; set; }
        [Description("Minimum days for irrigation to return")]
        public double returndays { get; set; }
        [Description("Maximum irrigation application (mm/day)")]
        public double maximumAmount { get; set; }
        [Description("Depth to calculate PAWC (mm)")]
        public double depthPAWC { get; set; }

        //Class members
        public double TopSWdeficit { get; set; }
        public double TopSWC { get; set; }
        public double DaysSinceIrrigation { get; set; }
        public double AmountToApply { get; set; }
        public double SeasonAppliedAmount { get; set; }
        
        private bool IrrigationIsAllowed { get; set; }
        private bool SeasonIsOpen { get; set; }
        private bool CropIsActive { get; set; }
        private bool IrrigatorIsAvailable { get; set; }
        private bool SoilIsDry { get; set; }

    
        //Calculate static soil variables
        [EventSubscribe("StartOfSimulation")]
        private void OnStartOfSimulation(object sender, EventArgs e)
        {   
            //Set the season dates
            StartDate = DateTime.Parse(seasonStart + "-" + Clock.Today.Year.ToString());
            EndDate = DateTime.Parse(seasonEnd + "-" + Clock.Today.Year.ToString());
            
            //Can we irrigate at all?
            IrrigationIsAllowed = false; 
            if (allowIrrigation)
                IrrigationIsAllowed = true; 

            //Calculate soil water variables
            double depthFromSurface = 0.0;
            double fracLayer = 0.0;
            nLayers = soilPhysical.Thickness.Length;
            for (int layer = 0; layer < nLayers; layer++)
            {
                fracLayer = Math.Min(1.0, (depthPAWC - depthFromSurface) / soilPhysical.Thickness[layer]);
                TopLL += soilPhysical.LL15mm[layer] * fracLayer;
                TopDUL += soilPhysical.DULmm[layer] * fracLayer;
                depthFromSurface += soilPhysical.Thickness[layer];
                if (depthFromSurface >= depthPAWC)
                    layer = nLayers;
            }
        }
             
        //Determine daily requirement for irrigation
        [EventSubscribe("StartOfDay")]
        private void OnStartOfDay(object sender, EventArgs e)
        {
            //Can we irrigate today?          
            SeasonIsOpen = isBetween(Clock.Today, StartDate, EndDate);
            if (!SeasonIsOpen)
                SeasonAppliedAmount = 0;

            //Is there a crop in the ground that needs irrigation?
            CropIsActive = false;
            if ((existingCrop != null) && (existingCrop.IsAlive))
                CropIsActive = true;
            //if ((existingCrop.Phenology.Stage >= 3.0) && (existingCrop.Phenology.Stage < 6.0))
          
            //Is the irrigator available?
            IrrigatorIsAvailable = false;
            DaysSinceIrrigation += 1;
            if (DaysSinceIrrigation >= returndays)
                IrrigatorIsAvailable = true;
          
            //Is the soil dry enough to require irrigation?
            SoilIsDry = false;
            double depthFromSurface = 0.0;
            double fracLayer = 0.0;
            TopSWC = 0.0;
            for (int layer = 0; layer < nLayers; layer++)
            //for (int layer = 0; depthFromSurface < depthPAWC + soilPhysical.Thickness[layer]; layer++)
            {
                fracLayer = Math.Min(1.0, (depthPAWC - depthFromSurface) / soilPhysical.Thickness[layer]);
                TopSWC += waterBalance.SWmm[layer] * fracLayer;
                depthFromSurface += soilPhysical.Thickness[layer];
                if (depthFromSurface >= depthPAWC)
                    layer = nLayers;
            }
            
            TopSWdeficit = TopSWC - TopDUL;
            if (Math.Max(0.0, -TopSWdeficit) >= (TopDUL - TopLL) * (100 - triggerDeficit) / 100)
                SoilIsDry = true;
                
            //Are all the conditions ratifying irrigation
            if (IrrigationIsAllowed && SeasonIsOpen && CropIsActive && IrrigatorIsAvailable && SoilIsDry)
            {
                //Lets bloody well irrigate then!!!!
                AmountToApply = TopDUL * targetDeficit / 100 - TopSWC;
                AmountToApply = Math.Max(0.0, Math.Min(AmountToApply, seasonsAllocation - SeasonAppliedAmount));
                AmountToApply = Math.Min(AmountToApply,maximumAmount);
                Irrigation.Apply(AmountToApply);
                DaysSinceIrrigation = 0;
                SeasonAppliedAmount += AmountToApply;
            }
        }
        
        ///Checks whether theDate is between iniDate and endDate (non-year specific)
        private bool isBetween(DateTime theDay, DateTime iniDate, DateTime endDate)
        {
            bool result = false;
            if (iniDate.DayOfYear < endDate.DayOfYear)
            {
                // period is within one year, ex: summer in the northern hemisphere
                if ((theDay.DayOfYear >= iniDate.DayOfYear) && (theDay.DayOfYear <= endDate.DayOfYear))
                    result = true;
            }
            else
            {
                // period goes over the end of the year, ex: summer in the southern hemisphere
                if ((theDay.DayOfYear >= iniDate.DayOfYear) || (theDay.DayOfYear <= endDate.DayOfYear))
                    result = true;
            }
            
            return result;
        }
    }
}
```
        Irrigation
        Fertiliser
        MicroClimate: a_interception=0; b_interception=1; c_interception=0; d_interception=0; soil_albedo=0.13; SoilHeatFluxFraction=0.4; MinimumHeightDiffForNewLayer=0; NightInterceptionFraction=0.5; ReferenceHeight=2
        Soil GLH Field: SoilType=GLHSoil; Site=Cooper Lab; NearestTown=Unknown; Region=Gatton; NaturalVegetation=Unknown; Latitude=0; Longitude=0
          Physical
            Thickness  BD    AirDry  LL15  DUL   SAT
            200        1.32  0.1     0.3   0.41  0.46
            200        1.3   0.15    0.3   0.43  0.48
            200        1.23  0.28    0.35  0.46  0.51
            300        1.27  0.28    0.32  0.44  0.49
            300        1.37  0.28    0.29  0.4   0.45
            300        1.35  0.3     0.31  0.41  0.46
            300        1.35  0.3     0.31  0.38  0.43
            SoilCrop SorghumSoil: LL=[0.3, 0.3, 0.35, 0.32, 0.29, 0.31, 0.31]; KL=[0.08, 0.08, 0.08, 0.08, 0.06, 0.04, 0.02]; XF=[1, 1, 1, 1, 1, 1, 1]
          WaterBalance SoilWater: SummerDate=1-Nov; SummerU=6; SummerCona=3.5; WinterDate=1-Apr; WinterU=6; WinterCona=3.5; DiffusConst=88; DiffusSlope=35.4; Salb=0.13; CN2Bare=91; CNRed=20; CNCov=0.8; Thickness=[200, 200, 200, 300, 300, 300, 300]; SWCON=[0.5, 0.5, 0.5, 0.5, 0.5, 0.5, 0.5]
          SoilNitrogen: same as Continuous_Sorghum.Paddock.HRS.SoilNitrogen
          Organic: FOMCNRatio=30
            Thickness  Carbon  SoilCNRatio  FBiom  FInert  FOM
            200        1.3     12.5         0.03   0.31    514.709
            200        0.65    12.5         0.01   0.38    368.805
            200        0.32    12.5         0      0.47    264.26
            300        0.11    12.5         0      0.7     160.282
            300        0.11    12.5         0      0.9     97.2159
            300        0.11    12.5         0      0.95    58.9644
            300        0.11    12.5         0      0.95    35.7637
          Chemical
            Thickness  NO3N   NH4N  PH
            200        9      0.1   8.2
            200        2.48   0.1   8.7
            200        2.79   0.1   8.9
            300        1.28   0.1   8.1
            300        2.98   0.1   8
            300        2.965  0.1   8
            300        1.387  0.1   8
          Sample Initial water: Thickness=[200, 200, 200, 300, 300, 300, 300]; SW=[0.385, 0.47, 0.467, 0.459, 0.394, 0.399, 0.38]; SWUnits=Volumetric; OCUnits=Total; PHUnits=Water
          CERESSoilTemperature Temperature
        Plant Sorghum
        SurfaceOrganicMatter: InitialResidueName=wheat_stubble; InitialResidueType=wheat; InitialResidueMass=0; InitialStandingFraction=0; InitialCPR=0; InitialCNR=80
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