Simulations: Version=154
  DataStore
    SimulationStats: TableName=SowHarvestReport; FieldNamesToSplitOn=[SimulationName, SowingDate, Management]; CalcCount=true; CalcTotal=true; CalcMean=true; CalcMedian=true; CalcMin=true; CalcMax=true; CalcStdDev=true; CalcPercentiles=true
  Folder Replacements
    Plant Sorghum: PlantType=Sorghum; IsEnding=false; DaysAfterEnding=0
      Memo Introduction
        Hammer, G.L., McLean, G, Brider, J, Holzworth, D

        The APSIM-sorghum model is based on a framework of the physiological determinants of crop growth and development (Charles-Edwards, 1982) and is focused at organ scale. It generates the phenotype of a crop as a consequence of underlying physiological processes (Fig. 1) by using the concept of supply and demand balances for light, carbon, water, and nitrogen (Hammer et al., 2001b).
        The approach is focused around quantifying capture and use of radiation, water, and nitrogen within a framework that predicts the dynamics of crop development and the realized growth of major organs based on their potential growth and whether the supply of carbohydrate and nitrogen can satisfy this potential. Demand for resources is defined by potential organ growth and potential supply by resource capture (Monteith, 1977; Passioura, 1983; Monteith, 1986) (Fig. 1).

        Arbitration rules and organ level responses are invoked when resource capture cannot satisfy demand. The APSIM-sorghum model retains some features and concepts of earlier models (Sinclair, 1986; Rosenthal et al., 1989; Birch et al., 1990; Sinclair and Amir, 1992; Chapman et al., 1993; Hammer and Muchow, 1994), but has been adapted and redesigned to generate a more explanatory approach to the modeling of the underlying physiology (Hammer et al., 2006).

        ![Schematic representation of crop growth and development dynamics (a) and crop nitrogen dynamics (b) in Agricultural Production System sIMulator (APSIM)-sorghum model. Connection points between the two schematics are shown by theshaded boxes. After Hammer et al. (2010). SLN, specific leaf nitrogen](SorghumModel.png)

        **Crop Nitrogen Dynamics**

        Crop N dynamics are modeled based on a physiological approach that accounts for the fact that the bulk of reduced N present in leaves is associated with photosynthesis structures and enzymes (Grindlay, 1997) (Fig. 1b). The rate of light-saturated net photosynthesis has been shown to be a linear function of the amount of leaf N per unit leaf area (specific leaf nitrogen [SLN]), until a species-specific maximum rate of photosynthesis has been reached (Sinclair and Horie,1989; Anten et al., 1995; Grindlay, 1997). Expressing crop N demand relative to canopy expansion thus provides a physiological link between crop N status, light interception, and dry mater accumulation. In addition, the cardinal SLN values for new leaf growth and for leaf death in response to N deficiency are independent of growth stage (van Oosterom et al., 2010a).

        During the pre-anthesis period, only stems (including rachis) and leaves are expanding, and their N demand is met in a hierarchical fashion (van Oosterom etal., 2010a). First, structural N demand of the stem (and rachis) is met, as structural stem mass is required to support leaf growth. Structural stem N demand is represented by the minimum stem N concentration. If insuﬃcient N has been taken up to meet structural stem N requirement, N can be translocated from leaves by dilution or, in extreme cases of early season N deficiency, by leaf senescence. Second, the N demand of expanding new leaves will be met, and this is determined from their critical SLN. Any additional N uptake will first be allocated to leaves to meet their target SLN and then to stem. For leaves, this N uptake represents "luxury" uptake that can occur after full expansion of a leaf, and which does not aﬀect growth and development (van Oosterom et al., 2010a). This hierarchical allocation of N is consistent with observations that under N stress are relatively larger proportion of N is allocated to the leaves (van Oosterom et al.,2010a). Hence, pre-anthesis N allocation ratios are a consequence of model dynamics, rather than a model input.

        After anthesis, grain becomes the major sink for N, and grain N demand is determined as the product of grain number and N demand per grain. During the first part of grain filling, N demand per grain is constant and independent of grain growth rate and N status of the crop (van Oosterom et al., 2010b). At this time endosperm cells are dividing, so that the accumulation of structural (metabolic) proteins in the grain is the key driver. During the second half of grain filling,grain N demand is linked with grain growth rate as cell division and simultaneous storage of carbohydrate and proteins assumes a greater role (Martre et al.,2006). Grain protein content can thus vary depending on the N supply–demand balance and the carbohydrate supply to the grain. Grain N demand is initially met through stem (plus rachis) N translocation, and if this becomes insuﬃcient,then N translocation from leaf can occur. Maximum N translocation rates from stem and per unit leaf area are a function of the N status of these organs, so that sink demand determines the amount of leaf area that is senescing at any one time(van Oosterom et al., 2010b). The source regulation of N translocation follows a first-order kinetic relationship that is representative of enzyme activity. Leaf SLN thus declines to its structural (minimum) level, and the amount of leaf area senesced, in the absence of other factors that can aﬀect senescence, such as water limitation and shading, depends on the N supply–demand balance.

        The daily rate of crop N uptake is the minimum of demand for N by the crop and potential supply of N from the soil and senescing leaves, capped at a maximum N uptake rate (van Oosterom et al., 2010a). Potential N supply from the soil depends on the available soil N through the profile and on the extent to which roots have explored the soil. N supply from the soil is calculated from the combination of passive uptake, through massﬂow of N taken up with the transpiration stream, and active uptake (van Keulen and Seligman, 1987). Soil N transformations and their modeling in APSIM have been detailed by Probert et al. (1998).
      OrganArbitrator Arbitrator
        BiomassTypeArbitrator DMArbitration
          Folder PotentialPartitioningMethods
            ReallocationMethod
            AllocateFixationMethod
            RetranslocationMethod
            SendPotentialDMAllocationsMethod
          Folder AllocationMethods
            DryMatterAllocationsMethod
          PrioritythenRelativeAllocation ArbitrationMethod
        BiomassTypeArbitrator NArbitration
          Folder PotentialPartitioningMethods
            ReallocationMethod
          Folder ActualPartitioningMethods
            AllocateFixationMethod
            C4RetranslocationMethod
          Folder AllocationMethods
            NitrogenAllocationsMethod
          SorghumArbitratorN ArbitrationMethod
          AllocateUptakesMethod
        C4WaterUptakeMethod WaterUptakeMethod: SDRatio=0
        C4NitrogenUptakeMethod NitrogenUptakeMethod
          Constant MaxNUptakeRate: FixedValue=0.029
          Constant MaxDiffusion: FixedValue=2
          Constant NSupplyFraction: FixedValue=5
          Constant NUptakeCease: FixedValue=570
        VariableReference SDRatio: VariableName=[Arbitrator].WaterUptakeMethod.SDRatio
        VariableReference WDemand: VariableName=[Arbitrator].WaterUptakeMethod.WDemand
        VariableReference WSupply: VariableName=[Arbitrator].WaterUptakeMethod.WSupply
        VariableReference WAllocated: VariableName=[Arbitrator].WaterUptakeMethod.WAllocated
        VariableReference WatSupply: VariableName=[Arbitrator].WaterUptakeMethod.WatSupply
        BoundFunction SDRatioBound
          VariableReference SDRatio: VariableName=[Arbitrator].WaterUptakeMethod.SDRatio
          Constant Lower: FixedValue=0
          Constant Upper: FixedValue=1.1
      Phenology
        Memo
          Phenology is simulated through a number of development stages by using a thermal time approach (Muchow and Carberry, 1990; Hammer and Muchow, 1994),
          with the temperature response characterized by a base (Tb), optimum (Topt), and maximum (Tm) temperature. Hammer et al. (1993) and Carberry et al. (1993) reported values of Tb, Topt, and Tm for sorghum of 11, 32, and 42°C, respectively.
          The thermal time target for the phase between emergence and panicle initiation is also a function of day length (Hammer et al., 1989; Ravi Kumar et al., 2009), and its duration, when divided by the plastochron (°Cd per leaf), determines total leaf number once an allowance for leaf initials in the embryo has been included.
          Total leaf number multiplied by the phyllochron (°Cd per leaf) determines the thermal time to reach flag leaf stage, which is thus an emergent property of the model. The duration of the phases between the stages of flag leaf, anthesis, and start and end of grain filling are also simulated through thermal time targets (Muchow and Carberry, 1990; Hammer and Muchow, 1994; Ravi Kumar et al., 2009). Drought stress and N stress can both reduce the leaf appearance rate and hence delay phenology during the vegetative stages (Craufurd et al., 1993; van Oosterom et al., 2010a).
        PhaseLookup ThermalTime
          PhaseLookupValue BeforeFlowering: Start=Germination; End=Flowering
            VariableReference DltTT: VariableName=[Phenology].DltTT
          PhaseLookupValue PostFlowering: Start=Flowering; End=Maturity
            VariableReference DltTTFM: VariableName=[Phenology].DltTTFM
          PhaseLookupValue MaturityToRipe: Start=Maturity; End=HarvestRipe
            VariableReference DltTT: VariableName=[Phenology].DltTT
        MultiplyFunction DltTT
          HourlyInterpolation ThermalTime: agregationMethod=0
            XYPairs Response: X=[11, 30, 42]; Y=[0, 19, 0]
            ThreeHourSin InterpolationMethod
          PhaseLookup Stress
            PhaseLookupValue SowingToEndJuvenile: Start=Sowing; End=EndJuvenile
              VariableReference PhenoWaterStress: VariableName=[Phenology].PhenoWaterStress
            PhaseLookupValue EndJuveToFlag: Start=EndJuvenile; End=FlagLeaf
              MinimumFunction
                VariableReference PhenoWaterStress: VariableName=[Phenology].PhenoWaterStress
                VariableReference NitrogenPhenoStress: VariableName=[Leaf].NitrogenPhenoStress
            PhaseLookupValue FlagToFlowering: Start=FlagLeaf; End=Flowering
              VariableReference PhenoWaterStress: VariableName=[Phenology].PhenoWaterStress
            PhaseLookupValue PostFlowering: Start=Flowering; End=HarvestRipe
              Constant: FixedValue=1
        WeightedTemperatureFunction DltTTFM: MaximumTemperatureWeighting=0.5
          XYPairs: X=[5.7, 23.5]; Y=[0, 17.8]
        GerminatingPhase Germinating: Start=Sowing; End=Germination
        EmergingPhase Emerging: Start=Germination; End=Emergence; TTForTimeStep=0
          VariableReference ThermalTime: VariableName=[Phenology].ThermalTime
          AddFunction Target
            Constant ShootLag: FixedValue=15
            MultiplyFunction DepthxRate
              VariableReference SowingDepth: VariableName=[Plant].SowingData.Depth
              Constant ShootRate: FixedValue=0.6
        GenericPhase Juvenile: Start=Emergence; End=EndJuvenile
          Constant Target: FixedValue=100
          VariableReference Progression: VariableName=[Phenology].ThermalTime
        GenericPhase JuvenileToFloralInit: Start=EndJuvenile; End=FloralInitiation
          VariableReference Progression: VariableName=[Phenology].ThermalTime
          VariableReference Target: VariableName=[Phenology].TTTargetPhotoSensitive
        GenericPhase FloralInitToFlagLeaf: Start=FloralInitiation; End=FlagLeaf
          VariableReference Progression: VariableName=[Phenology].ThermalTime
          SubtractFunction Target
            VariableReference TTEmergToFlag: VariableName=[Phenology].TTEmergToFlagLeaf
            VariableReference TTJuvenile: VariableName=[Phenology].Juvenile.Target
            VariableReference TTJuvToFloralInit: VariableName=[Phenology].JuvenileToFloralInit.Target
        GenericPhase FlagLeafToFlowering: Start=FlagLeaf; End=Flowering
          Constant Target: FixedValue=170
          VariableReference Progression: VariableName=[Phenology].ThermalTime
        GenericPhase FloweringToGrainFilling: Start=Flowering; End=StartGrainFill
          Constant Target: FixedValue=80
          VariableReference Progression: VariableName=[Phenology].DltTTFM
        GenericPhase GrainFilling: Start=StartGrainFill; End=EndGrainFill
          VariableReference Progression: VariableName=[Phenology].DltTTFM
          SubtractFunction Target
            VariableReference FlowerToMaturity: VariableName=[Phenology].TTFlowerToMaturity
            VariableReference FlowerToGrainFill: VariableName=[Phenology].FloweringToGrainFilling.Target
            VariableReference GrainFillToMaturity: VariableName=[Phenology].TTGrainFillToMaturity
        GenericPhase Maturing: Start=EndGrainFill; End=Maturity
          VariableReference Progression: VariableName=[Phenology].DltTTFM
          VariableReference Target: VariableName=[Phenology].TTGrainFillToMaturity
        GenericPhase MaturityToHarvestRipe: Start=Maturity; End=HarvestRipe
          VariableReference Progression: VariableName=[Phenology].ThermalTime
          Constant Target: FixedValue=1
        EndPhase ReadyForHarvesting: Start=HarvestRipe; End=Unused
          VariableReference ThermalTime: VariableName=[Phenology].ThermalTime
        PhotoperiodFunction Photoperiod: Twilight=-2.2; DayLength=0
        OnEventFunction FloweringDAS: SetEvent=Flowering; ReSetEvent=never
          Memo
            A function is used to provide flowering date as days after sowing(DAS).
          Constant PreEventValue: FixedValue=0
          VariableReference PostEventValue: VariableName=[Plant].DaysAfterSowing
        OnEventFunction MaturityDAS: SetEvent=Maturity; ReSetEvent=never
          Memo
            A function is used to provide maturity date as days after sowing(DAS).
          Constant PreEventValue: FixedValue=0
          VariableReference PostEventValue: VariableName=[Plant].DaysAfterSowing
        Constant TTEndJuvToInit: FixedValue=160
        Constant TTFlowerToMaturity: FixedValue=761
        MultiplyFunction TTGrainFillToMaturity
          VariableReference FlowerToMaturity: VariableName=[Phenology].TTFlowerToMaturity
          Constant Proportion: FixedValue=0.05
        PhaseLookup TTTargetPhotoSensitive
          PhaseLookupValue: Start=Sowing; End=Emergence
            VariableReference PreEventValue: VariableName=[Phenology].TTEndJuvToInit
          PhaseLookupValue EmergenceToEndJuve: Start=Emergence; End=EndJuvenile
            AddFunction Add
              VariableReference PhotoModifier: VariableName=[Phenology].PhotoModifier
              VariableReference TTEndJuvToInit: VariableName=[Phenology].TTEndJuvToInit
          PhaseLookupValue EndJuveToMaturity: Start=EndJuvenile; End=HarvestRipe
            OnEventFunction TTTargetPhoto: SetEvent=EndJuvenile; ReSetEvent=never
              VariableReference PreEventValue: VariableName=[Phenology].TTEndJuvToInit
              AddFunction PostEventValue
                VariableReference PhotoModifier: VariableName=[Phenology].PhotoModifier
                VariableReference TTEndJuvToInit: VariableName=[Phenology].TTEndJuvToInit
        LinearInterpolationFunction PhotoModifier
          XYPairs: X=[11.5, 13.5]; Y=[0, 23]
          VariableReference XValue: VariableName=[Phenology].Photoperiod
        AddFunction TTEmergToFlagLeaf
          MultiplyFunction LeafAppearingPhase1
            SubtractFunction NoLeavesRate1
              VariableReference FinalLeafNo: VariableName=[Leaf].FinalLeafNo
              VariableReference LeafNoAtEmergence: VariableName=[Leaf].Parameters.LeafNoAtEmergence
              VariableReference LeafNoRateChange: VariableName=[Leaf].Parameters.noRateChange1
            VariableReference LeafAppearanceRate1: VariableName=[Leaf].Parameters.appearanceRate1
          MultiplyFunction LeafAppearingPhase2
            VariableReference LeafAppearanceRate2: VariableName=[Leaf].Parameters.appearanceRate2
            VariableReference LeafNoRateChange: VariableName=[Leaf].Parameters.noRateChange1
        AddFunction TTEmergToFloralInit
          VariableReference TTTargetJuvenille: VariableName=[Phenology].Juvenile.Target
          VariableReference TTTargetJuvToFI: VariableName=[Phenology].JuvenileToFloralInit.Target
        AddFunction TTToFlowering
          VariableReference GerminatingTarget: VariableName=[Emerging].Target
          VariableReference TTEmergToFlagLeaf: VariableName=[TTEmergToFlagLeaf]
          VariableReference FlagLeafToFlowering: VariableName=[FlagLeafToFlowering].Target
        AccumulateFunction TTFromEmergence: StartStageName=Emergence; EndStageName=Maturity; FractionRemovedOnCut=0; FractionRemovedOnHarvest=0; FractionRemovedOnGraze=0; FractionRemovedOnPrune=0
          VariableReference ThermalTime: VariableName=[Phenology].CurrentPhase.ProgressionForTimeStep
        AccumulateFunction TTFMFromFlowering: StartStageName=Flowering; EndStageName=Maturity; FractionRemovedOnCut=0; FractionRemovedOnHarvest=0; FractionRemovedOnGraze=0; FractionRemovedOnPrune=0
          VariableReference ThermalTime: VariableName=[Phenology].CurrentPhase.ProgressionForTimeStep
        AccumulateFunction TTFMSgfToMaturity: StartStageName=StartGrainFill; EndStageName=Maturity; FractionRemovedOnCut=0; FractionRemovedOnHarvest=0; FractionRemovedOnGraze=0; FractionRemovedOnPrune=0
          VariableReference ThermalTime: VariableName=[Phenology].CurrentPhase.ProgressionForTimeStep
        LinearInterpolationFunction PhenoWaterStress
          XYPairs: X=[0, 0.7, 1]; Y=[0, 1, 1]
          VariableReference XValue: VariableName=[Arbitrator].SDRatio
        LinearInterpolationFunction PhenoNitrogenStress
          Memo
            Don't use this variable for reporting as this function will be re-evaluated at the end of the day and will therefore be evaluated using todays SLN value.
            When phenology is calculated, it will be using yesterday's SLN.
            Leaf(NitrogenPhenoStress)is used to ensure consistency.

            Original function: phenoStress = (0.5 + 0.5 / 0.3 * (SLN - 0.7));

            Bound by Min of 0.5, Max of 1.0
          XYPairs: X=[0, 0.7, 1]; Y=[0.5, 0.5, 1]
          VariableReference XValue: VariableName=[Leaf].SLN
      ReproductiveOrgan Grain: GrowthRespiration=0; MaintenanceRespiration=0
        Biomass Live
        Biomass Dead
        Memo Introduction
          Maximum grain number is a function of the change in plant biomass between panicle initiation and start grain ﬁlling (Rosenthal et al., 1989), while grain size is determined by grain growth rate, eﬀective grain ﬁlling period, and redistribution of assimilates post-anthesis (Heiniger et al., 1997b). If grain mass demand for a day exceeds the daily increase in biomass, the shortfall will ﬁrst be met through translocation from stem and, if that is insuﬃcient to meet demand of the grain, through translocation from leaves, accelerating their senescence. Conversely, if the daily increase in biomass exceeds the grain mass demand, the excess biomass production is allocated to the stem.
        Constant InitialGrainProportion: FixedValue=0.05
        Constant MaximumPotentialGrainSize: FixedValue=0.3
        Constant MinimumNConc: FixedValue=0.008
        PhaseLookup MaximumNConc
          PhaseLookupValue InitialPhase: Start=Flowering; End=StartGrainFill
            Constant InitialNconc: FixedValue=0.05
          PhaseLookupValue LinearPhase: Start=StartGrainFill; End=Maturity
            Constant FinalNconc: FixedValue=0.0175
        Constant WaterContent: FixedValue=0.13
        PhaseLookup NFillingRate
          Memo
            First half of the Grainfilling Period is calculated using Grain Filling Rate.
            2nd half is calculated using the maximum N Concentration of todays Biomass

            Amount of N filled per day is limited by the Target N Concentration at all times.
          PhaseLookupValue GrainFilling: Start=StartGrainFill; End=Maturity
            LessThanFunction
              DivideFunction gfFract
                VariableReference TTGrainFillToMaturity: VariableName=[Phenology].TTFMSgfToMaturity
                AddFunction TTTargetSgfToNow
                  VariableReference GrainFilling: VariableName=[Phenology].GrainFilling.Target
                  VariableReference Maturity: VariableName=[Phenology].Maturing.Target
              Constant GrainFillFraction: FixedValue=0.5; Units=g/g
              MinimumFunction InitialGrainFilling
                MultiplyFunction FillingRate
                  VariableReference NumberFunction: VariableName=[Grain].NumberFunction
                  VariableReference ThermalTime: VariableName=[Phenology].DltTTFM
                  DivideFunction
                    Constant GrainFillRate: FixedValue=0.001; Units=mg/grain/dd
                    Constant Thousand: FixedValue=1000; Units=mg/g
                MultiplyFunction FinalGrainFilling
                  VariableReference dltDmGreen: VariableName=[Grain].potentialDMAllocation.Structural
                  VariableReference maxNConc: VariableName=[Grain].MaximumNConc
              MultiplyFunction FinalGrainFilling
                VariableReference dltDmGreen: VariableName=[Grain].potentialDMAllocation.Structural
                VariableReference maxNConc: VariableName=[Grain].MaximumNConc
        Constant DMPerSeed: FixedValue=0.00083
        OnEventFunction FinalGrainNum: SetEvent=StartGrainFill; ReSetEvent=Germination
          Constant PreEventValue: FixedValue=0
          DivideFunction PostEventValue
            DivideFunction GrowthRate
              MaximumFunction PlantGrowth
                Memo
                  Maximum function here prevents grain from returning negative dm demand in the event that plant growth is negative.
                SubtractFunction PlantGrowthSinceFloralInit
                  VariableReference TotalBiomass: VariableName=[Sorghum].Total.Wt
                  OnEventFunction GreenWtAtFI: SetEvent=FloralInitiation; ReSetEvent=Germination
                    Constant PreEventValue: FixedValue=0
                    VariableReference PostEventValue: VariableName=[Sorghum].Total.Wt
                      Memo
                        Definitely [Sorghum].Total.Wt
                Constant Zero: FixedValue=0
              AccumulateFunction DaysFIToStartGrainFill: StartStageName=FloralInitiation; EndStageName=StartGrainFill; FractionRemovedOnCut=0; FractionRemovedOnHarvest=0; FractionRemovedOnGraze=0; FractionRemovedOnPrune=0
                Constant One: FixedValue=1
            VariableReference DMPerSeed: VariableName=[Grain].DMPerSeed
        GrainNumberFunction NumberFunction
          VariableReference PotentialGrainNumber: VariableName=[Grain].FinalGrainNum
          MinimumFunction GrowthRateFactor
            DivideFunction GrowthRate
              VariableReference TTStartGrainToNow: VariableName=[Phenology].TTFMSgfToMaturity
              Constant RampTT: FixedValue=100
            Constant One: FixedValue=1
          DecumulateFunction StressFactor: InitialValue=1; MinValue=0; StartStageName=FlagLeaf; ResetStageName=Emergence
            MultiplyFunction
              Memo
                Stress is accumulated during the specified window.
              ThermalTimeWindowFunction StressWindow
                SubtractFunction TTWindowStart
                  VariableReference TTToFlowering: VariableName=[Phenology].TTToFlowering
                  Constant PreAnthesis: FixedValue=50
                AddFunction TTWindowEnd
                  VariableReference TTToFlowering: VariableName=[Phenology].TTToFlowering
                  Constant PostAnthesis: FixedValue=100
                VariableReference ThermalTime: VariableName=[Phenology].TTFromEmergence
                VariableReference dltThermalTime: VariableName=[Phenology].DLTTTFM
              LinearInterpolationFunction SevereHeatResponse
                XYPairs: X=[0, 32, 33, 36, 38]; Y=[0, 0, 0.14, 0.23, 0.65]
                VariableReference XValue: VariableName=[Weather].MaxT
        DivideFunction DMCaryopsis
          VariableReference DMFixationSupply: VariableName=[Arbitrator].DM.TotalFixationSupply
          VariableReference GrainNumber: VariableName=[Grain].NumberFunction
          VariableReference ThermalTime: VariableName=[Phenology].DltTTFM
        MinimumFunction PotGrainFillRate
          MultiplyFunction
            AddFunction
              MultiplyFunction
                VariableReference DMCaryopsis: VariableName=[Grain].DMCaryopsis
                Constant: FixedValue=0.4026
              Constant: FixedValue=3.19e-05
            Constant: FixedValue=1000
          Constant MaxGrainFillRate: FixedValue=0.09
        PhaseLookup DMDemandFunction
          PhaseLookupValue SowingToMaturity: Start=Sowing; End=Maturity
            MultiplyFunction DMDemandFunction
              VariableReference GrainFillRate: VariableName=[Grain].PotGrainFillRate
              VariableReference ThermalTime: VariableName=[Phenology].DltTTFM
              VariableReference GrainNumber: VariableName=[Grain].NumberFunction
              Constant: FixedValue=0.001
        BiomassRemoval BiomassRemovalDefaults
          OrganBiomassRemovalType Harvest: FractionLiveToRemove=1; FractionDeadToRemove=0; FractionLiveToResidue=0; FractionDeadToResidue=0
          OrganBiomassRemovalType Cut: FractionLiveToRemove=1; FractionDeadToRemove=0; FractionLiveToResidue=0; FractionDeadToResidue=0
          OrganBiomassRemovalType Prune: FractionLiveToRemove=0; FractionDeadToRemove=0; FractionLiveToResidue=0.8; FractionDeadToResidue=0
          OrganBiomassRemovalType Graze: FractionLiveToRemove=0.6; FractionDeadToRemove=0; FractionLiveToResidue=0.2; FractionDeadToResidue=0
        Constant DMConversionEfficiency: FixedValue=1
        Constant RemobilisationCost: FixedValue=0
        Constant CarbonConcentration: FixedValue=0.4
        BiomassDemand DMDemandPriorityFactors
          Constant Structural: FixedValue=1
          Constant Metabolic: FixedValue=1
          Constant Storage: FixedValue=1
        BiomassDemand NDemandPriorityFactors: same as Replacements.Sorghum.Grain.DMDemandPriorityFactors
      Root: GrowthRespiration=0; MaintenanceRespiration=0
        RootShapeSemiCircleSorghum RootShape
        LinearInterpolationFunction KLModifier
          Memo
            The parameter KL is is described by Meinke et al (1993) to combine elements of soil conductivity (K) with root length (L) in determining root water uptake.  Peake et al (2013) demonstrated that in sorghum KL varied with plant population through impacts on root length density.  Here we adjust KL linearly with plant population.
          XYPairs: X=[0, 10]; Y=[1, 1]
          VariableReference XValue: VariableName=[Sorghum].Population
        Constant SoilWaterEffect: FixedValue=1
          Memo
            No effect of soil water content on root growth is currently captured in the model.
        Constant TemperatureEffect: FixedValue=1
          Memo
            No effect of temperature on root growth is currently captured in the model.
        Constant MaxDailyNUptake: FixedValue=20
          Memo
            Maximum daily N uptake is set to an arbitrarily high value.
        Constant SenescenceRate: FixedValue=0.002
          Memo
            Jones and Kiniry (1986) used a constant root senescence fraction in the CERES-Sorghum model.
        Constant MaximumNConc: FixedValue=0.02
        Constant MinimumNConc: FixedValue=0.002
        VariableReference CriticalNConc: VariableName=[Root].MinimumNConc
        Constant MaximumRootDepth: FixedValue=1000000
        MultiplyFunction RootFrontVelocity
          PhaseLookup PotentialRootFrontVelocity
            Memo
              Hammer et al (2009) used a constant extraction front velocity of 2.5cm per day in their analysis of historical sorghum yield trends in the US corn belt.
            PhaseLookupValue PreGrainFill: Start=Germination; End=StartGrainFill
              Constant Function: FixedValue=27
            PhaseLookupValue GrainfillToMaturity: Start=StartGrainFill; End=Maturity
              Constant Function: FixedValue=0
          LinearInterpolationFunction RootDepthStressFactor
            XYPairs: X=[0, 0.25]; Y=[0, 1]
            VariableReference XValue: VariableName=[Root].SWAvailabilityRatio
        PhaseLookupValue NitrogenDemandSwitch: Start=Germination; End=Maturity
          Constant: FixedValue=1
        LinearInterpolationFunction KNO3
          XYPairs: X=[0, 0.003]; Y=[0.03, 0.03]
          VariableReference XValue: VariableName=[Root].LengthDensity
        LinearInterpolationFunction NUptakeSWFactor
          XYPairs: X=[0, 0.2, 1]; Y=[1, 1, 1]
          VariableReference XValue: VariableName=[Root].RWC
        LinearInterpolationFunction KNH4
          XYPairs: X=[0, 0.003]; Y=[0.03, 0.03]
          VariableReference XValue: VariableName=[Root].LengthDensity
        Constant SpecificRootLength: FixedValue=100000; Units=m/g
        BiomassRemoval BiomassRemovalDefaults
          OrganBiomassRemovalType Harvest: FractionLiveToRemove=0; FractionDeadToRemove=0; FractionLiveToResidue=0.2; FractionDeadToResidue=0
          OrganBiomassRemovalType Cut: FractionLiveToRemove=0; FractionDeadToRemove=0; FractionLiveToResidue=0.3; FractionDeadToResidue=0
          OrganBiomassRemovalType Prune: FractionLiveToRemove=0; FractionDeadToRemove=0; FractionLiveToResidue=0.1; FractionDeadToResidue=0
          OrganBiomassRemovalType Graze: FractionLiveToRemove=0; FractionDeadToRemove=0; FractionLiveToResidue=0.15; FractionDeadToResidue=0
        Constant DMConversionEfficiency: FixedValue=1
        Constant MaintenanceRespirationFunction: FixedValue=1
        Constant RemobilisationCost: FixedValue=0
        Constant CarbonConcentration: FixedValue=0.4
        BiomassDemandAndPriority DMDemands
          MultiplyFunction Structural
            PhaseLookup ratioRootShoot
              Memo
                This is a straight lookup table not an lineaer relationship
              PhaseLookupValue BetweenEmergenceAndFloralInit: Start=Emergence; End=FloralInitiation
                Constant rootFraction: FixedValue=1; Units=0-1
              PhaseLookupValue BetweenFloralInitAndFlowering: Start=FloralInitiation; End=Flowering
                Constant rootFraction: FixedValue=0.33; Units=0-1
              PhaseLookupValue BetweenFloweringAndGrainFill: Start=Flowering; End=StartGrainFill
                Constant rootFraction: FixedValue=0.087; Units=0-1
              PhaseLookupValue BetweenGrainFillAndHarvest: Start=StartGrainFill; End=HarvestRipe
                Constant rootFraction: FixedValue=0; Units=0-1
            VariableReference LeafSupplyFunction: VariableName=[Leaf].DMSupplyFunction
          Constant Metabolic: FixedValue=0
          Constant Storage: FixedValue=0
          Constant QStructuralPriority: FixedValue=1
          Constant QMetabolicPriority: FixedValue=1
          Constant QStoragePriority: FixedValue=1
        BiomassDemandAndPriority NDemands
          MaximumFunction Structural
            Constant zero: FixedValue=0
            SubtractFunction NRequiredToMaintainMinConcenctration
              MultiplyFunction NRequired
                VariableReference MinNconc: VariableName=[Root].minimumNconc
                AddFunction CurrentDM
                  VariableReference dltDmGreen: VariableName=[Root].potentialDMAllocation.Structural
                  VariableReference dmGreen: VariableName=[Root].Live.Wt
              VariableReference nGreen: VariableName=[Root].Live.N
          Constant Metabolic: FixedValue=0
          Constant Storage: FixedValue=0
          Constant QStructuralPriority: FixedValue=1
          Constant QMetabolicPriority: FixedValue=1
          Constant QStoragePriority: FixedValue=1
        ProtectedDivideFunction SWAvailabilityRatio: NumeratorErrVal=0; DenominatorErrVal=10
          VariableReference extractable: VariableName=[Soil].SoilWater.ESW
          SubtractFunction capacity
            VariableReference dulDep: VariableName=[Soil].Physical.DULmm
            VariableReference llDep: VariableName=[Soil].Physical.LL15mm
        BiomassDemand InitialWt
          Constant Structural: FixedValue=0.1; Units=g/plant
          Constant Metabolic: FixedValue=0
          Constant Storage: FixedValue=0
      SorghumLeaf Leaf: InitialDMWeight=0.1; InitialLAI=200; InitialSLN=1.5; NewLeafSLN=1; SenescedLeafSLN=0.3; NDilutionIntercept=-0.0017; NDilutionSlope=0.0043; CanopyWidth=1000; Gsmax350=0.009; LeafInitialisationStage=Emergence; MicroClimatePresent=false; KDead=0.03; PhosphorusStress=1
        zero: TilleringMethod, FertileTillerNumber, Albedo, R50, MicroClimateSetting, BaseHeight, Width, PotentialEP, DltLAI, DltPotentialLAI, DltStressedLAI, LAI, SLN, SLN0, CoverGreen, CoverDead, Height, WaterDemand, BiomassRUE, BiomassTE, LAIDead, NitrogenPhotoStress, NitrogenPhenoStress, SowingDensity, LossFromExpansionStress, SenescedLai, DltRetranslocatedN, DltSenescedN, DltSenescedLaiN, DltSenescedLai, DltSenescedLaiLight, DltSenescedLaiWater, DltSenescedLaiFrost, DltSenescedLaiAge
        LeafCulms: dltLeafNo=0; TilleringMethod=0; FinalLeafNo=0; dltPotentialLAI=0; dltStressedLAI=0
          DynamicTillering: CurrentTillerNumber=0; DltTillerNumber=0
            C4LeafArea AreaCalc
              VariableReference A0: VariableName=[Leaf].Parameters.A0
              VariableReference A1: VariableName=[Leaf].Parameters.A1
              VariableReference B0: VariableName=[Leaf].Parameters.B0
              VariableReference B1: VariableName=[Leaf].Parameters.B1
              VariableReference aX0: VariableName=[Leaf].Parameters.aX0
              VariableReference aMaxS: VariableName=[Leaf].Parameters.aMaxSlope
              VariableReference aMaxI: VariableName=[Leaf].Parameters.aMaxIntercept
              VariableReference largestLeafPlateau: VariableName=[Leaf].Parameters.largestLeafPlateau
              VariableReference leafNoCorrection: VariableName=[Leaf].Parameters.leafNoCorrection
            VariableReference slaMax: VariableName=[Leaf].Parameters.slaMax
            VariableReference tillerSdIntercept: VariableName=[Leaf].Parameters.tillerSdIntercept
            VariableReference tillerSdSlope: VariableName=[Leaf].Parameters.tillerSdSlope
            VariableReference tillerSlaBound: VariableName=[Leaf].Parameters.tillerSlaBound
            VariableReference maxLAIForTillerAddition: VariableName=[Leaf].Parameters.maxLAIForTillerAddition
            VariableReference maxDailyTillerReduction: VariableName=[Leaf].Parameters.maxDailyTillerReduction
          FixedTillering: FertileTillerNumber=0; CurrentTillerNumber=0
            C4LeafArea AreaCalc: same as Replacements.Sorghum.Leaf.LeafCulms.DynamicTillering.AreaCalc
            VariableReference slaMax: VariableName=[Leaf].Parameters.slaMax
          MinimumFunction ExpansionStress
            LinearInterpolationFunction WaterStressEffect
              XYPairs: X=[0.1, 1.1]; Y=[0, 1]
              VariableReference XValue: VariableName=[Arbitrator].SDRatio
            Constant NitrogenStressEffect: FixedValue=1
            Constant PhosphorusStressEffect: FixedValue=1
          VariableReference appearanceRate1: VariableName=[Leaf].Parameters.appearanceRate1
          VariableReference appearanceRate2: VariableName=[Leaf].Parameters.appearanceRate2
          VariableReference appearanceRate3: VariableName=[Leaf].Parameters.appearanceRate3
          VariableReference noRateChange1: VariableName=[Leaf].Parameters.noRateChange1
          VariableReference noRateChange2: VariableName=[Leaf].Parameters.noRateChange2
          VariableReference leafNoAtEmergence: VariableName=[Leaf].Parameters.leafNoAtEmergence
          VariableReference MaxVerticalTillerAdjustment: VariableName=[Leaf].Parameters.MaxVerticalTillerAdjustment
          VariableReference VerticalTillerAdjustment: VariableName=[Leaf].Parameters.VerticalTillerAdjustment
        MultiplyFunction ExtinctionCoefficientFunction
          LinearInterpolationFunction PotentialExtinctionCoeff
            XYPairs: X=[200, 500, 1000]; Y=[0.7, 0.4, 0.4]
            VariableReference XValue: VariableName=[Sorghum].SowingData.RowSpacing
        RUEModel Photosynthesis
          Constant RUE: FixedValue=1.25
          WeightedTemperatureFunction FT: MaximumTemperatureWeighting=0.5
            XYPairs: X=[0, 8, 20, 35, 50]; Y=[0, 0, 1, 1, 0]
          VariableReference FN: VariableName=[Leaf].NitrogenPhotoStress
          VariableReference RadnInt: VariableName=[Leaf].RadiationIntercepted
          Constant FVPD: FixedValue=1
          Constant FW: FixedValue=1
          RUECO2Function FCO2: PhotosyntheticPathway=C4
            Memo
              When pathway is set to "C4", this model modifier will be have the same as the `double Plant::rue_cow_modifier()` function in the APSIM Classic sorghum model.
        MinimumFunction FRGR
          VariableReference RUE_FT: VariableName=[Leaf].Photosynthesis.FT
          MinimumFunction Others
            VariableReference RUE_FN: VariableName=[Leaf].Photosynthesis.FN
            VariableReference RUE_FVPD: VariableName=[Leaf].Photosynthesis.FVPD
        LinearInterpolationFunction HeightFunction
          XYPairs: X=[0, 80]; Y=[0, 2000]
          Memo
            [Stem].Live.Wt is in the wrong units - it's out by a factor of 10 vs old apsim.

            To overcome this, we re-scale the x-values.
          VariableReference XValue: VariableName=[Stem].dmGreenStem
        SubtractFunction DMRemaining
          VariableReference DMFixationSupply: VariableName=[Leaf].DMSupplyFunction
          VariableReference LeafDMDemand: VariableName=[Leaf].DMDemands.Structural.DMDemandFunction
          Memo
            Referenced from Rachis DMDemands
        TEWaterDemandFunction WaterDemandFunction
          Constant SVPFrac: FixedValue=0.75
          Constant TranspirationEfficiencyCoefficient: FixedValue=0.009
          VariableReference Photosynthesis: VariableName=[Leaf].Photosynthesis
        MultiplyFunction DMSupplyFixation
          PhaseLookup ratioRootShoot
            PhaseLookupValue BetweenEmergenceAndFloralInit: Start=Emergence; End=FloralInitiation
              Constant rootFraction: FixedValue=2; Units=0-1
            PhaseLookupValue BetweenFloralInitAndFlowering: Start=FloralInitiation; End=Flowering
              Constant rootFraction: FixedValue=1.33; Units=0-1
            Memo
              This is a straight lookup table not an lineaer relationship
            PhaseLookupValue BetweenFloweringAndGrainFill: Start=Flowering; End=StartGrainFill
              Constant rootFraction: FixedValue=1.087; Units=0-1
            PhaseLookupValue BetweenGrainFillAndHarvestRipe: Start=StartGrainFill; End=HarvestRipe
              Constant rootFraction: FixedValue=1; Units=0-1
          VariableReference DMSupplyFunction: VariableName=[Leaf].DMSupplyFunction
        MinimumFunction DMSupplyFunction
          VariableReference BiomassTE: VariableName=[Leaf].BiomassTE
          VariableReference BiomassRUE: VariableName=[Leaf].BiomassRUE
        MultiplyFunction PotentialBiomassTEFunction
          DivideFunction TE
            VariableReference TECoeff
              VariableName=[Leaf].WaterDemandFunction.TranspirationEfficiencyCoefficient
            VariableReference VPD: VariableName=[Leaf].WaterDemandFunction.VPD
            Constant g2mm: FixedValue=0.001
          VariableReference WaterSupply: VariableName=[Arbitrator].WatSupply
          LinearInterpolationFunction CO2Modifier
            XYPairs: X=[0, 350]; Y=[1, 1]
            VariableReference XValue: VariableName=[Weather].CO2
        BiomassDemand DMDemands
          MultiplyFunction Structural
            PhaseLookup DMDemandFunction
              PhaseLookupValue BetweenEmergenceAndFlag: Start=Emergence; End=FlagLeaf
                MinimumFunction
                  MultiplyFunction
                    DivideFunction LeafPartitioningCoefficient
                      Constant One: FixedValue=1
                      AddFunction
                        Constant One: FixedValue=1
                        MultiplyFunction
                          VariableReference PartitionRate: VariableName=[Leaf].Parameters.PartitionRate
                          PowerFunction: Exponent=2
                            VariableReference LeafNumber: VariableName=[Leaf].LeafNo
                    VariableReference DMSupplyFunction: VariableName=[Leaf].DMSupplyFunction
                  DivideFunction dltDmLeafMax
                    VariableReference DltStressedLAI: VariableName=[Leaf].DltStressedLAI
                    MultiplyFunction
                      VariableReference SlaMin: VariableName=[Leaf].Parameters.SlaMin
                      Constant smm2sm: FixedValue=1e-06
            Constant StructuralFraction: FixedValue=1; Units=0-1
          Constant Metabolic: FixedValue=0
          StorageDMDemandFunction Storage
            SubtractFunction StorageFraction
              Constant One: FixedValue=1
              VariableReference StructuralFraction: VariableName=[Leaf].DMDemands.Structural.StructuralFraction
        BiomassDemand NDemands
          PhaseLookup Structural
            PhaseLookupValue BetweenEmergenceAndFlower: Start=Emergence; End=Flowering
              MultiplyFunction NewLeafNDemand
                VariableReference dltLAI: VariableName=[Leaf].DltLAI
                VariableReference newLeafSLN: VariableName=[Leaf].NewLeafSLN
          MaximumFunction Metabolic
            SubtractFunction
              MultiplyFunction nRequired
                SubtractFunction laiToday
                  Memo
                    laiToday = lai + dltLai - dltSlai
                  AddFunction
                    VariableReference LAI: VariableName=[Leaf].LAI
                    VariableReference DltLAI: VariableName=[Leaf].DltLAI
                  VariableReference dltSlai: VariableName=[Leaf].DltSenescedLai
                VariableReference TargetSLN: VariableName=[Leaf].TargetSLN
              VariableReference nGreen: VariableName=[Leaf].Live.N
            Constant Zero: FixedValue=0
          Constant Storage: FixedValue=0
        PhaseLookup DltLAIFunction
          Memo
            // dh - this is actually calculated in LeafCulms_Fixed::areaActual(void).
            // This version of the function is slightly different to Leaf::areaActual(void)
            // in that the end stage is flag, not maturity.

            if(stage >= endJuv && stage < flag)
                dltLAI = Min(dltStressedLAI,dltDmGreen * slaMax * smm2sm);
            else
                dltLAI = dltStressedLAI;
          PhaseLookupValue BetweenEndJuvenileAndMaturity: Start=EndJuvenile; End=FlagLeaf
            MinimumFunction MinFunction
              VariableReference DltStressedLAI: VariableName=[Leaf].dltStressedLAI
              MultiplyFunction LimitedSLN
                AddFunction dltDMGreen
                  VariableReference Structural: VariableName=[Leaf].DMPotentialAllocation.Structural
                  VariableReference Metabolic: VariableName=[Leaf].DMPotentialAllocation.Metabolic
                Constant slaMax: FixedValue=45000
                Constant smm2sm: FixedValue=1e-06
          PhaseLookupValue BetweenEmergenceAndEndJuvenile: Start=Emergence; End=EndJuvenile
            VariableReference DltStressedLAI: VariableName=[Leaf].dltStressedLAI
          PhaseLookupValue AllOtherTimes: Start=FlagLeaf; End=HarvestRipe
            VariableReference DltStressedLAI: VariableName=[Leaf].dltStressedLAI
        LiveOnEventFunction TargetSLN: SetEvent=FlagLeaf; ReSetEvent=Germination
          Constant PreEventValue: FixedValue=1.5
          VariableReference PostEventValue: VariableName=[Leaf].SlnAtFlag
        OnEventFunction MinPlantWt: SetEvent=Flowering
          Constant PreEventValue: FixedValue=0
          MultiplyFunction PostEventValue
            DivideFunction
              VariableReference LiveWt: VariableName=[Leaf].Live.Wt
              VariableReference Density: VariableName=[Sorghum].SowingData.Population
                Memo
                  This assumes paddock area is 1ha...
            SubtractFunction
              Constant base: FixedValue=1
              Constant RetranslocationFactor: FixedValue=0.15
        OnEventFunction SlnAtFlag: SetEvent=FlagLeaf; ReSetEvent=Germination
          Memo
            This seems like a terrible idea...
          VariableReference PreEventValue: VariableName=[Leaf].SLN
          VariableReference PostEventValue: VariableName=[Leaf].SLN
        OnEventFunction LaiAnth: SetEvent=Flowering
          Constant PreEventValue: FixedValue=0
          VariableReference PostEventValue: VariableName=[Leaf].LAI
          Memo
            Used as an output variable for Predicted/Observed
        MaximumFunction NPhotoStressFunction
          Memo
            photoStress = (2.0/(1.0 + exp(-6.05*(SLN-0.41)))-1.0);
          Constant Zero: FixedValue=0
          SubtractFunction
            DivideFunction
              Constant Two: FixedValue=2
              ExponentialFunction: A=1; B=1; C=-6.05
                SubtractFunction
                  VariableReference SLN: VariableName=[Leaf].SLN
                  Constant point41: FixedValue=0.41
            Constant One: FixedValue=1
        DivideFunction StomatalConductanceCO2Modifier
          VariableReference FCO2: VariableName=[Leaf].Photosynthesis.FCO2
          ExpressionFunction RelativeCO2Gradient
            Expression=([IWeather].CO2 - [Leaf].CO2internal)/(350 - [Leaf].CO2internal)
        ExpressionFunction CO2internal: Expression=(163 - [IWeather].MeanT)/(5 - 0.1*[IWeather].MeanT)
        BiomassRemoval BiomassRemovalDefaults
          OrganBiomassRemovalType Harvest: FractionLiveToRemove=0; FractionDeadToRemove=0; FractionLiveToResidue=0.3; FractionDeadToResidue=0
          OrganBiomassRemovalType Cut: FractionLiveToRemove=0.8; FractionDeadToRemove=0; FractionLiveToResidue=0; FractionDeadToResidue=0
          OrganBiomassRemovalType Prune: FractionLiveToRemove=0; FractionDeadToRemove=0; FractionLiveToResidue=0.6; FractionDeadToResidue=0
          OrganBiomassRemovalType Graze: FractionLiveToRemove=0.6; FractionDeadToRemove=0; FractionLiveToResidue=0.1; FractionDeadToResidue=0
        LightSenescenceFunction LightSenescence
          Constant senRadnCrit: FixedValue=2; Units=Mj/m^2
            Memo
              radiation level for onset of light senescence
          Constant SenLightTimeConst: FixedValue=10
            Memo
              delay factor for light senescence
        WaterSenescenceFunction WaterSenescence
          Constant SenWaterTimeConst: FixedValue=10
          Constant SenThreshold: FixedValue=0.25
          ProtectedDivideFunction SDRatio: NumeratorErrVal=0; DenominatorErrVal=1
            VariableReference WaterSupply: VariableName=[Arbitrator].WatSupply
            VariableReference WaterDemand: VariableName=[Arbitrator].WDemand
        FrostSenescenceFunction FrostSenescence
          Constant FrostKill: FixedValue=1
          Constant FrostKillSevere: FixedValue=-3.5
        AgeSenescenceFunction AgeSenescence
          Constant LeafNoDeadIntercept: FixedValue=0
            Memo
              Intercept for age-based slai calculation

              Not used by sorghum - so set to 0.
              Is used by maize
          Constant LeafNoDeadSlope: FixedValue=0
            Memo
              Slope for age-based slai calculation

              Not used by sorghum - so set to 0.
              Is used by maize
        LiveOnEventFunction NumberOfLeaves: SetEvent=FloralInitiation; ReSetEvent=Germination
          BoundFunction PreEventValue
            Constant Lower: FixedValue=10
            Constant Upper: FixedValue=40
            AddFunction
              DivideFunction LeavesInitiated
                VariableReference TTFloralInit: VariableName=[Phenology].TTEmergToFloralInit
                VariableReference leafInitRate: VariableName=[NumberOfLeaves].leafInitRate
              VariableReference leafNumSeed: VariableName=[NumberOfLeaves].leafNumSeed
          VariableReference PostEventValue: VariableName=[LeafCulms].FinalLeafNo
          VariableReference leafInitRate: VariableName=[Leaf].Parameters.LeafInitRate
          VariableReference leafNumSeed: VariableName=[Leaf].Parameters.LeafNumSeed
        Folder Parameters
          Constant PartitionRate: FixedValue=0.006; Units=(0-1)
            Memo
              coefficient of sigmoidal function between leaf partition fraction and internode no**2

              partition_rate_leaf in Classic

              referenced in LeafPartitioningCoefficient
          Constant leafInitRate: FixedValue=21.6; Units=oCd
            Memo Description
              Degree days to initiate each leaf primordium until floral init (deg day)
          Constant leafNumSeed: FixedValue=4
          Constant LeafNoAtEmergence: FixedValue=1
          Constant appearanceRate1: FixedValue=41
          Constant appearanceRate2: FixedValue=20
          Constant appearanceRate3: FixedValue=20
          Constant leafNoCorrection: FixedValue=1.52
          Constant noRateChange1: FixedValue=3.5
          Constant noRateChange2: FixedValue=3.5
          Constant aMaxVert: FixedValue=0.3
          Constant aTillerVert: FixedValue=0.05
          Constant A0: FixedValue=-0.009
            Memo
              bellCurveParams[0]
          Constant A1: FixedValue=-0.2
            Memo
              bellCurveParams[1]
          Constant B0: FixedValue=0.0006
            Memo
              bellCurveParams[2]
          Constant B1: FixedValue=-0.43
            Memo
              bellCurveParams[3]
          Constant AMaxA: FixedValue=0
            Memo
              Required by maize. Not used in sorghum, but it's a nonoptional link.
          Constant AMaxB: FixedValue=0
            Memo
              Required by maize. Not used in sorghum, but it's a nonoptional link.
          Constant AMaxC: FixedValue=0
            Memo
              Required by maize. Not used in sorghum, but it's a nonoptional link.
          Constant aX0: FixedValue=0.687
          Constant aMaxSlope: FixedValue=22.25
          Constant aMaxIntercept: FixedValue=92.45
          Constant minLeafNo: FixedValue=10
          Constant maxLeafNo: FixedValue=40
          Constant slaMax: FixedValue=45000
          Constant SlaMin: FixedValue=8000
            Memo
              Called by DMDemands
          Constant MaxVerticalTillerAdjustment: FixedValue=0.3
          Constant VerticalTillerAdjustment: FixedValue=0.05
          Constant largestLeafPlateau: FixedValue=49.25
          Constant tillerSdIntercept: FixedValue=0.329
          Constant tillerSdSlope: FixedValue=0.3
          Constant tillerSlaBound: FixedValue=30; Units=%
          Constant maxLAIForTillerAddition: FixedValue=0.325
          Constant maxDailyTillerReduction: FixedValue=0.3
      GenericOrgan Rachis: IsAboveGround=true
        Constant InitialNConcFunction: FixedValue=0
        Constant NReallocationFactor: FixedValue=0
        RetranslocateAvailableN RetranslocateNitrogen
          MaximumFunction RetranslocateFunction
            MinimumFunction
              MultiplyFunction availableDilnN
                DivideFunction
                  MultiplyFunction dltStemNConc
                    AddFunction
                      MultiplyFunction
                        Constant dilnNSlope: FixedValue=0.0062
                        MultiplyFunction stemNConc
                          DivideFunction divide
                            VariableReference nGreen: VariableName=[Rachis].Live.N
                            AddFunction DMToday
                              VariableReference dltDmGreen: VariableName=[Rachis].potentialDMAllocation.Structural
                              VariableReference dmGreen: VariableName=[Rachis].Live.Wt
                          Constant Percentage: FixedValue=100
                      Constant dilnNInt: FixedValue=-0.001
                    VariableReference ThermalTime: VariableName=[Phenology].DltTT
                  Constant: FixedValue=100
                AddFunction DMToday
                  VariableReference dltDmGreen: VariableName=[Rachis].potentialDMAllocation.Structural
                  VariableReference dmGreen: VariableName=[Rachis].Live.Wt
              SubtractFunction
                VariableReference NGreen: VariableName=[Rachis].Live.N
                VariableReference StructuralN: VariableName=[Rachis].NDemands.Structural
            Constant Zero: FixedValue=0
          Constant RetranslocateDMFunction: FixedValue=0
        DivideFunction NRetranslocationFactor
          MaximumFunction NRetranslocationAmount
            MinimumFunction
              MultiplyFunction availableDilnN
                DivideFunction
                  MultiplyFunction dltStemNConc
                    AddFunction: same as Replacements.Sorghum.Rachis.RetranslocateNitrogen.RetranslocateFunction.MinimumFunction.availableDilnN.DivideFunction.dltStemNConc.AddFunction
                    VariableReference ThermalTime: VariableName=[Phenology].ThermalTime
                  Constant: FixedValue=100
                AddFunction DMToday
                  VariableReference dltDmGreen: VariableName=[Rachis].potentialDMAllocation.Structural
                  VariableReference dmGreen: VariableName=[Rachis].Live.Wt
              SubtractFunction
                VariableReference NGreen: VariableName=[Rachis].Live.N
                VariableReference StructuralN: VariableName=[Rachis].NDemands.Structural
            Constant Zero: FixedValue=0
        Constant SenescenceRate: FixedValue=0; Units=/d
        LinearInterpolationFunction ExpansionStress
          XYPairs: X=[0, 0.6]; Y=[1, 1]
          VariableReference XValue: VariableName=[Sorghum].Leaf.Fw
        Constant DetachmentRateFunction: FixedValue=0; Units=/d
        Constant MaintenanceRespirationFunction: FixedValue=0; Units=0-1
        Constant DMConversionEfficiency: FixedValue=1; Units=0-1
        BiomassRemoval BiomassRemovalDefaults
          OrganBiomassRemovalType Harvest: FractionLiveToRemove=0.5; FractionDeadToRemove=0; FractionLiveToResidue=0.1; FractionDeadToResidue=0
          OrganBiomassRemovalType Cut: FractionLiveToRemove=0.8; FractionDeadToRemove=0; FractionLiveToResidue=0; FractionDeadToResidue=0
          OrganBiomassRemovalType Prune: FractionLiveToRemove=0; FractionDeadToRemove=0; FractionLiveToResidue=0.6; FractionDeadToResidue=0
          OrganBiomassRemovalType Graze: FractionLiveToRemove=0.6; FractionDeadToRemove=0; FractionLiveToResidue=0.2; FractionDeadToResidue=0
        Constant DMReallocationFactor: FixedValue=0
        Constant DMRetranslocationFactor: FixedValue=0
        Constant RemobilisationCost: FixedValue=0
        Constant CarbonConcentration: FixedValue=0.4
        BiomassDemandAndPriority DMDemands
          MultiplyFunction Structural
            PhaseLookup DMDemandFunction
              PhaseLookupValue BetweenFIAndFlower: Start=FloralInitiation; End=Flowering
                MultiplyFunction
                  VariableReference DMRemainingAfterLeaf: VariableName=[Leaf].DMRemaining
                  VariableReference Stem2FlowerFrac: VariableName=[Stem].StemToFlowerFrac
              PhaseLookupValue BetweenFlagAndFlowering: Start=FlagLeaf; End=Flowering
                MultiplyFunction
                  VariableReference DMFixationSupply: VariableName=[Arbitrator].DM.TotalSupplyFunction
                  VariableReference Stem2FlowerFrac: VariableName=[Stem].StemToFlowerFrac
            Constant StructuralFraction: FixedValue=1
          Constant Metabolic: FixedValue=0
          Constant Storage: FixedValue=0
          Constant QStructuralPriority: FixedValue=1
          Constant QMetabolicPriority: FixedValue=1
          Constant QStoragePriority: FixedValue=1
        BiomassDemandAndPriority NDemands
          MaximumFunction Structural
            Constant zero: FixedValue=0
            SubtractFunction
              MultiplyFunction requiredN
                VariableReference MinNconc: VariableName=[Rachis].minimumNconc
                AddFunction
                  VariableReference dltDmGreen: VariableName=[Rachis].potentialDMAllocation.Structural
                  VariableReference dmGreen: VariableName=[Rachis].Live.Wt
                VariableReference NitrogenDemandSwitch: VariableName=[Rachis].nitrogenDemandSwitch
              VariableReference nGreen: VariableName=[Rachis].Live.N
          MaximumFunction Metabolic
            Constant zero: FixedValue=0
            SubtractFunction
              MultiplyFunction RequiredN
                VariableReference CritNconc: VariableName=[Rachis].criticalNConc
                AddFunction
                  VariableReference dltDmGreen: VariableName=[Rachis].potentialDMAllocation.Structural
                  VariableReference dmGreen: VariableName=[Rachis].Live.Wt
                VariableReference NitrogenDemandSwitch: VariableName=[Rachis].nitrogenDemandSwitch
              VariableReference nGreen: VariableName=[Rachis].Live.N
          StorageNDemandFunction Storage
            VariableReference NitrogenDemandSwitch: VariableName=[Rachis].nitrogenDemandSwitch
            VariableReference MaxNconc: VariableName=[Rachis].maximumNconc
          Constant QStructuralPriority: FixedValue=1
          Constant QMetabolicPriority: FixedValue=1
          Constant QStoragePriority: FixedValue=1
        Constant MinimumNConc: FixedValue=0.003
        Constant CriticalNConc: FixedValue=0.01
        Constant MaximumNConc: FixedValue=0.008
        PhaseLookupValue NitrogenDemandSwitch: Start=Emergence; End=StartGrainFill
          Constant: FixedValue=1
        BiomassDemand InitialWt
          Constant Structural: FixedValue=0; Units=g/plant
          Constant Metabolic: FixedValue=0
          Constant Storage: FixedValue=0
        Constant Photosynthesis: FixedValue=0
      GenericOrgan Stem: IsAboveGround=true
        Constant initialNConcFunction: FixedValue=0.01
        Constant NReallocationFactor: FixedValue=0
        RetranslocateAvailableN RetranslocateNitrogen
          MaximumFunction RetranslocateFunction
            MinimumFunction
              MultiplyFunction availableDilnN
                DivideFunction
                  MultiplyFunction dltStemNConc
                    AddFunction
                      MultiplyFunction
                        Constant dilnNSlope: FixedValue=0.0062
                        MultiplyFunction stemNConcPct
                          DivideFunction divide
                            VariableReference nGreen: VariableName=[Stem].Live.N
                            AddFunction DMToday
                              VariableReference dltDmGreen: VariableName=[Stem].potentialDMAllocation.Structural
                              VariableReference dmGreen: VariableName=[Stem].Live.Wt
                          Constant Percentage: FixedValue=100
                      Constant dilnNInt: FixedValue=-0.001
                    VariableReference ThermalTime: VariableName=[Phenology].DltTT
                  Constant: FixedValue=100
                AddFunction DMToday
                  VariableReference dltDmGreen: VariableName=[Stem].potentialDMAllocation.Structural
                  VariableReference dmGreen: VariableName=[Stem].Live.Wt
              SubtractFunction
                VariableReference NGreen: VariableName=[Stem].Live.N
                MultiplyFunction
                  AddFunction DMToday
                    VariableReference dltDmGreen: VariableName=[Stem].potentialDMAllocation.Structural
                    VariableReference dmGreen: VariableName=[Stem].Live.Wt
                  VariableReference StructuralN: VariableName=[Stem].CriticalNConc
            Constant Zero: FixedValue=0
          MaximumFunction RetranslocateDMFunction
            MultiplyFunction StemWtAvail
              SubtractFunction
                AddFunction DMToday
                  VariableReference dltDmGreen: VariableName=[Stem].potentialDMAllocation.Structural
                  VariableReference dmGreen: VariableName=[Stem].Live.Wt
                MultiplyFunction
                  OnEventFunction PlantMinDM: SetEvent=Flowering
                    Constant PreEventValue: FixedValue=0
                    MultiplyFunction PostEventValue
                      DivideFunction dmPlantStem
                        VariableReference dmGreen: VariableName=[Stem].Live.Wt
                        VariableReference density: VariableName=[Plant].SowingData.Population
                      SubtractFunction
                        Constant One: FixedValue=1
                        Constant translocFrac: FixedValue=0.2
                  VariableReference density: VariableName=[Plant].SowingData.Population
              Constant retransRate: FixedValue=0.15
            Constant Zero: FixedValue=0
        DivideFunction NRetranslocationFactor
          MaximumFunction NRetranslocationAmount
            MinimumFunction
              MultiplyFunction availableDilnN
                DivideFunction
                  MultiplyFunction dltStemNConc
                    AddFunction: same as Replacements.Sorghum.Stem.RetranslocateNitrogen.RetranslocateFunction.MinimumFunction.availableDilnN.DivideFunction.dltStemNConc.AddFunction
                    VariableReference ThermalTime: VariableName=[Phenology].ThermalTime
                  Constant: FixedValue=100
                AddFunction DMToday
                  VariableReference dltDmGreen: VariableName=[Stem].potentialDMAllocation.Structural
                  VariableReference dmGreen: VariableName=[Stem].Live.Wt
              SubtractFunction
                VariableReference NGreen: VariableName=[Stem].Live.N
                MultiplyFunction
                  AddFunction DMToday
                    VariableReference dltDmGreen: VariableName=[Stem].potentialDMAllocation.Structural
                    VariableReference dmGreen: VariableName=[Stem].Live.Wt
                  VariableReference StructuralN: VariableName=[Stem].MinimumNconc
            Constant Zero: FixedValue=0
          VariableReference dmGreen: VariableName=[Stem].Live.Wt
        DivideFunction DMRetranslocationFactor
          MaximumFunction DMRetranslocationAmount
            MultiplyFunction StemWtAvail
              SubtractFunction
                AddFunction DMToday
                  VariableReference dltDmGreen: VariableName=[Stem].potentialDMAllocation.Structural
                  VariableReference dmGreen: VariableName=[Stem].Live.Wt
                MultiplyFunction
                  OnEventFunction PlantMinDM: SetEvent=Flowering
                    Constant PreEventValue: FixedValue=0
                    MultiplyFunction PostEventValue: same as Replacements.Sorghum.Stem.RetranslocateNitrogen.RetranslocateDMFunction.StemWtAvail.SubtractFunction.MultiplyFunction.PlantMinDM.PostEventValue
                  VariableReference density: VariableName=[Plant].SowingData.Population
              Constant retransRate: FixedValue=0.15
            Constant Zero: FixedValue=0
          VariableReference dmGreen: VariableName=[Stem].Live.Wt
        Constant StemToFlowerFrac: FixedValue=0.3
        Constant SenescenceRate: FixedValue=0; Units=/d
        Constant DetachmentRateFunction: FixedValue=0; Units=/d
        Constant MaintenanceRespirationFunction: FixedValue=0; Units=0-1
        Constant DMConversionEfficiency: FixedValue=1; Units=0-1
        BiomassRemoval BiomassRemovalDefaults: same as Replacements.Sorghum.Rachis.BiomassRemovalDefaults
        Constant DMReallocationFactor: FixedValue=0
        Constant RemobilisationCost: FixedValue=0
        Constant CarbonConcentration: FixedValue=0.4
        BiomassDemandAndPriority DMDemands
          MultiplyFunction Structural
            MaximumFunction DMDemandFunction
              SubtractFunction DMDemandFunction
                VariableReference DMSupplyFunction: VariableName=[Leaf].DMSupplyFunction
                VariableReference LeafDemand: VariableName=[Leaf].DMDemand.Structural
                VariableReference RachisDemand: VariableName=[Rachis].DMDemand.Structural
                VariableReference GrainDemand: VariableName=[Grain].DMDemand.Structural
              Constant Zero: FixedValue=0
            Constant StructuralFraction: FixedValue=1
          Constant Metabolic: FixedValue=0
          Constant Storage: FixedValue=0
          Constant QStructuralPriority: FixedValue=1
          Constant QMetabolicPriority: FixedValue=1
          Constant QStoragePriority: FixedValue=1
        BiomassDemandAndPriority NDemands
          MaximumFunction Structural
            Constant zero: FixedValue=0
            SubtractFunction
              MultiplyFunction RequiredN
                VariableReference CriticalNconc: VariableName=[Stem].CriticalNConc
                AddFunction
                  VariableReference dltDmGreen: VariableName=[Stem].potentialDMAllocation.Structural
                  VariableReference dmGreen: VariableName=[Stem].Live.Wt
                VariableReference NitrogenDemandSwitch: VariableName=[Stem].nitrogenDemandSwitch
              VariableReference nGreen: VariableName=[Stem].Live.N
          MaximumFunction Metabolic
            Constant zero: FixedValue=0
            SubtractFunction
              MultiplyFunction RequiredN
                VariableReference MinimumNconc: VariableName=[Stem].MinimumNConc
                AddFunction
                  VariableReference dltDmGreen: VariableName=[Stem].potentialDMAllocation.Structural
                  VariableReference dmGreen: VariableName=[Stem].Live.Wt
                VariableReference NitrogenDemandSwitch: VariableName=[Stem].nitrogenDemandSwitch
              VariableReference nGreen: VariableName=[Stem].Live.N
          Constant Storage: FixedValue=0
          Constant QStructuralPriority: FixedValue=1
          Constant QMetabolicPriority: FixedValue=1
          Constant QStoragePriority: FixedValue=1
        LinearInterpolationFunction CriticalNConc
          XYPairs: X=[3, 5, 7, 10]; Y=[0.012, 0.012, 0.005, 0.0015]
          VariableReference XValue: VariableName=[Phenology].Stage
        LinearInterpolationFunction MinimumNconc
          XYPairs: X=[3, 5, 7, 10]; Y=[0.055, 0.016, 0.01, 0.005]
          VariableReference XValue: VariableName=[Phenology].Stage
        LinearInterpolationFunction MaximumNconc
          XYPairs: X=[3, 5, 7, 10]; Y=[0.055, 0.016, 0.01, 0.005]
          VariableReference XValue: VariableName=[Phenology].Stage
        Constant NitrogenDemandSwitch: FixedValue=1
        DivideFunction dmGreenStem
          VariableReference StemWt: VariableName=[Stem].Live.Wt
          VariableReference Destiny: VariableName=[Leaf].SowingDensity
        BiomassDemand InitialWt
          MultiplyFunction Structural
            Constant InitialPlantWt: FixedValue=0.1; Units=g/plant
            VariableReference Population: VariableName=[Plant].Population
          Constant Metabolic: FixedValue=0
          Constant Storage: FixedValue=0
        Constant Photosynthesis: FixedValue=0
      AddFunction TotalPlantDemand
        VariableReference LeafDemand: VariableName=[Leaf].DMDemands.Structural.DMDemandFunction
        VariableReference StemDemand: VariableName=[Stem].DMDemands.Structural.DMDemandFunction
        VariableReference RachisDemand: VariableName=[Rachis].DMDemands.Structural.DMDemandFunction
        VariableReference GrainDemand: VariableName=[Grain].DMDemands.Structural.DMDemandFunction
      CompositeBiomass AboveGround: OrganNames=[Leaf, Stem, Rachis, Grain]; IncludeLive=true; IncludeDead=true
      CompositeBiomass AboveGroundLive: OrganNames=[Leaf, Stem, Grain, Rachis]; IncludeLive=true; IncludeDead=false
        Memo
          The AboveGroundLive composite biomass object includes the Live pools of all organs occurring above the soil surface to allow output for total dry matter and Nutrient contents, including total structural, non-structural and metabolic pools.
      CompositeBiomass AboveGroundDead: OrganNames=[Leaf, Stem, Grain, Rachis]; IncludeLive=false; IncludeDead=true
        Memo
          The AboveGroundDead composite biomass object includes the Dead pools of all organs occurring above the soil surface to allow output for total dry matter and Nutrient contents, including total structural, non-structural and metabolic pools.
      CompositeBiomass BelowGround: OrganNames=[Root]; IncludeLive=true; IncludeDead=true
      CompositeBiomass Total: OrganNames=[Leaf, Stem, Root, Rachis, Grain]; IncludeLive=true; IncludeDead=true
      CompositeBiomass TotalLive: OrganNames=[Leaf, Stem, Root, Rachis, Grain]; IncludeLive=true; IncludeDead=false
      CompositeBiomass TotalDead: OrganNames=[Leaf, Stem, Root, Rachis, Grain]; IncludeLive=false; IncludeDead=true
      CultivarFolder Cultivars
        CultivarFolder Australia
          Cultivar Buster
            Command:
              [Leaf].Parameters.aX0.FixedValue = 0.786
              [Leaf].Parameters.aMaxSlope.FixedValue = 46.312
              [Leaf].Parameters.aMaxIntercept.FixedValue = -321.13
          Cultivar early
            Command:
              [Phenology].TTEndJuvToInit.FixedValue = 114
              [Leaf].Parameters.aMaxIntercept.FixedValue = -321.13
              [Leaf].Parameters.aMaxSlope.FixedValue = 46.312
              [Leaf].Parameters.aX0.FixedValue = 0.786
          Cultivar medium
            Command:
              [Phenology].TTEndJuvToInit.FixedValue = 157
              [Leaf].Parameters.aMaxIntercept.FixedValue = -321.13
              [Leaf].Parameters.aMaxSlope.FixedValue = 46.312
              [Leaf].Parameters.aX0.FixedValue = 0.786
          Cultivar late
            Command:
              [Phenology].TTEndJuvToInit.FixedValue = 201
              [Leaf].Parameters.aMaxIntercept.FixedValue = -321.13
              [Leaf].Parameters.aMaxSlope.FixedValue = 46.312
              [Leaf].Parameters.aX0.FixedValue = 0.786
          Cultivar ATX623xRTX430
            Command:
              [Phenology].PhotoModifier.XYPairs.Y[2] = 26
              [Phenology].TTEndJuvToInit.FixedValue = 202
              [Leaf].Parameters.aMaxSlope.FixedValue = 0
              [Leaf].Parameters.aMaxIntercept.FixedValue = 450
              [Leaf].Parameters.tillerSdIntercept.FixedValue = -0.265
              [Leaf].Parameters.tillerSdSlope.FixedValue = 0.247
          Cultivar A35xQL36
            Command:
              [Phenology].PhotoModifier.XYPairs.X[1] = 11.8
              [Phenology].PhotoModifier.XYPairs.X[2] = 14
              [Phenology].PhotoModifier.XYPairs.Y[2] = 87.34
              [Phenology].TTEndJuvToInit.FixedValue = 134.4
              [Leaf].Parameters.aMaxSlope.FixedValue = 0
              [Leaf].Parameters.aMaxIntercept.FixedValue = 450
              [Leaf].Parameters.tillerSdIntercept.FixedValue = -0.265
              [Leaf].Parameters.tillerSdSlope.FixedValue = 0.247
          Cultivar QL41xQL36
            Command:
              [Phenology].PhotoModifier.XYPairs.Y[2] = 25
              [Phenology].TTEndJuvToInit.FixedValue = 179
              [Leaf].Parameters.aMaxSlope.FixedValue = 0
              [Leaf].Parameters.aMaxIntercept.FixedValue = 450
              [Leaf].Parameters.tillerSdIntercept.FixedValue = -0.265
              [Leaf].Parameters.tillerSdSlope.FixedValue = 0.247
          Cultivar QL39xQL36
            Command:
              [Phenology].PhotoModifier.XYPairs.X[1] = 11.8
              [Phenology].PhotoModifier.XYPairs.X[2] = 14
              [Phenology].PhotoModifier.XYPairs.Y[2] = 87.34
              [Phenology].TTEndJuvToInit.FixedValue = 114.4
              [Leaf].Parameters.aMaxIntercept.FixedValue = -321.13
              [Leaf].Parameters.aMaxSlope.FixedValue = 46.312
              [Leaf].Parameters.aX0.FixedValue = 0.786
              [Leaf].Parameters.tillerSdIntercept.FixedValue = -0.265
              [Leaf].Parameters.tillerSdSlope.FixedValue = 0.247
          Cultivar M35-1
            Command:
              [Phenology].PhotoModifier.XYPairs.Y[2] = 122
              [Phenology].TTEndJuvToInit.FixedValue = 252
              [Grain].DMPerSeed.FixedValue = 0.001427844
              [Arbitrator].NitrogenUptakeMethod.NUptakeCease.FixedValue = 10
              [Leaf].TargetSLN.PreEventValue.FixedValue = 1.2
              [Leaf].Parameters.PartitionRate.FixedValue = 0.018
              [Leaf].Parameters.leafInitRate.FixedValue = 26.1
              [Leaf].Parameters.aMaxSlope.FixedValue = 8.9
              [Leaf].Parameters.aMaxIntercept.FixedValue = 245.3
              [Leaf].Parameters.tillerSdIntercept.FixedValue = -1.363
              [Leaf].Parameters.tillerSdSlope.FixedValue = 0.206
          Cultivar CSH13R
            Command:
              [Phenology].PhotoModifier.XYPairs.Y[2] = 34
              [Phenology].TTEndJuvToInit.FixedValue = 228
              [Grain].DMPerSeed.FixedValue = 0.0015
              [Leaf].Photosynthesis.RUE.FixedValue = 1.6
              [Leaf].Parameters.PartitionRate.FixedValue = 0.018
              [Leaf].TargetSLN.PreEventValue.FixedValue = 1.2
              [Leaf].Parameters.leafInitRate.FixedValue = 23.2
              [Leaf].Parameters.tillerSdIntercept.FixedValue = -0.818
              [Leaf].Parameters.tillerSdSlope.FixedValue = 0.159
          Cultivar dekalb_DK55
            Command:
              [Phenology].PhotoModifier.XYPairs.X[1] = 11
              [Phenology].PhotoModifier.XYPairs.X[2] = 13
              [Phenology].PhotoModifier.XYPairs.Y[2] = 0
              [Phenology].TTEndJuvToInit.FixedValue = 205
              [Phenology].FlagLeafToFlowering.Target.FixedValue = 100
              [Phenology].FloweringToGrainFilling.Target.FixedValue = 30
              [Phenology].TTFlowerToMaturity.FixedValue = 695
              [Leaf].Parameters.aMaxIntercept.FixedValue = -321.13
              [Leaf].Parameters.aMaxSlope.FixedValue = 46.312
              [Leaf].Parameters.aX0.FixedValue = 0.786
          Cultivar texas_RS610
            Command:
              [Phenology].PhotoModifier.XYPairs.X[1] = 12.3
              [Phenology].PhotoModifier.XYPairs.X[2] = 14.6
              [Phenology].PhotoModifier.XYPairs.Y[2] = 88.32
              [Phenology].TTEndJuvToInit.FixedValue = 120
              [Phenology].FlagLeafToFlowering.Target.FixedValue = 100
              [Phenology].FloweringToGrainFilling.Target.FixedValue = 30
              [Phenology].TTFlowerToMaturity.FixedValue = 695
              [Leaf].Parameters.aMaxIntercept.FixedValue = -321.13
              [Leaf].Parameters.aMaxSlope.FixedValue = 46.312
              [Leaf].Parameters.aX0.FixedValue = 0.786
          Cultivar pioneer_s34
            Command:
              [Phenology].PhotoModifier.XYPairs.X[1] = 12.3
              [Phenology].PhotoModifier.XYPairs.X[2] = 14.6
              [Phenology].PhotoModifier.XYPairs.Y[2] = 57.5
              [Phenology].TTEndJuvToInit.FixedValue = 115
              [Phenology].FlagLeafToFlowering.Target.FixedValue = 100
              [Phenology].FloweringToGrainFilling.Target.FixedValue = 30
              [Phenology].TTFlowerToMaturity.FixedValue = 695
              [Leaf].Parameters.aMaxIntercept.FixedValue = -321.13
              [Leaf].Parameters.aMaxSlope.FixedValue = 46.312
              [Leaf].Parameters.aX0.FixedValue = 0.786
          Cultivar texas_671
            Command:
              [Phenology].PhotoModifier.XYPairs.X[1] = 12.3
              [Phenology].PhotoModifier.XYPairs.X[2] = 14.6
              [Phenology].PhotoModifier.XYPairs.Y[2] = 34.96
              [Phenology].TTEndJuvToInit.FixedValue = 159
              [Phenology].FlagLeafToFlowering.Target.FixedValue = 100
              [Phenology].FloweringToGrainFilling.Target.FixedValue = 30
              [Phenology].TTFlowerToMaturity.FixedValue = 695
              [Leaf].Parameters.aMaxIntercept.FixedValue = -321.13
              [Leaf].Parameters.aMaxSlope.FixedValue = 46.312
              [Leaf].Parameters.aX0.FixedValue = 0.786
          Cultivar Scorpio
            Command:
              [Phenology].PhotoModifier.XYPairs.Y[2] = 0
              [Phenology].TTEndJuvToInit.FixedValue = 130
              [Phenology].FlagLeafToFlowering.Target.FixedValue = 120
              [Phenology].TTFlowerToMaturity.FixedValue = 810
              [Grain].DMPerSeed.FixedValue = 0.00065
              [Leaf].Parameters.aX0.FixedValue = 0.83
              [Leaf].Parameters.aMaxSlope.FixedValue = 2.3
              [Leaf].Parameters.aMaxIntercept.FixedValue = 514
              [Leaf].Photosynthesis.RUE.FixedValue = 1.75
          Cultivar Apollo
            Command:
              [Phenology].PhotoModifier.XYPairs.Y[2] = 0
              [Phenology].TTEndJuvToInit.FixedValue = 185
              [Phenology].FlagLeafToFlowering.Target.FixedValue = 130
              [Phenology].TTFlowerToMaturity.FixedValue = 810
              [Leaf].Parameters.aX0.FixedValue = 0.71
              [Leaf].Parameters.aMaxSlope.FixedValue = 37
              [Leaf].Parameters.aMaxIntercept.FixedValue = -101
              [Leaf].Photosynthesis.RUE.FixedValue = 1.75
          Cultivar Bazley: same as Replacements.Sorghum.Cultivars.Australia.Apollo
          Cultivar Taurus
            Command:
              [Phenology].PhotoModifier.XYPairs.Y[2] = 15
              [Phenology].TTEndJuvToInit.FixedValue = 118
              [Phenology].FlagLeafToFlowering.Target.FixedValue = 150
              [Phenology].TTFlowerToMaturity.FixedValue = 810
              [Grain].DMPerSeed.FixedValue = 0.00065
              [Leaf].Parameters.aX0.FixedValue = 0.8
              [Leaf].Parameters.aMaxSlope.FixedValue = 1
              [Leaf].Parameters.aMaxIntercept.FixedValue = 451
          Cultivar P85G33
            Command:
              [Phenology].PhotoModifier.XYPairs.Y[2] = 0
              [Phenology].TTEndJuvToInit.FixedValue = 118
              [Phenology].FlagLeafToFlowering.Target.FixedValue = 150
              [Phenology].TTFlowerToMaturity.FixedValue = 810
              [Grain].DMPerSeed.FixedValue = 0.0006
              [Leaf].Parameters.aX0.FixedValue = 0.86
              [Leaf].Parameters.aMaxSlope.FixedValue = 0
              [Leaf].Parameters.aMaxIntercept.FixedValue = 542
          Cultivar P84G22
            Command:
              [Phenology].PhotoModifier.XYPairs.Y[2] = 0
              [Phenology].FlagLeafToFlowering.Target.FixedValue = 140
              [Phenology].TTFlowerToMaturity.FixedValue = 810
              [Grain].DMPerSeed.FixedValue = 0.0006
              [Leaf].Parameters.aX0.FixedValue = 0.81
              [Leaf].Parameters.aMaxSlope.FixedValue = 0
              [Leaf].Parameters.aMaxIntercept.FixedValue = 578
          Cultivar P84G99
            Command:
              [Phenology].PhotoModifier.XYPairs.Y[2] = 0
              [Phenology].TTEndJuvToInit.FixedValue = 135
              [Phenology].FlagLeafToFlowering.Target.FixedValue = 140
              [Phenology].TTFlowerToMaturity.FixedValue = 810
              [Grain].DMPerSeed.FixedValue = 0.0005
              [Leaf].Parameters.aX0.FixedValue = 0.84
              [Leaf].Parameters.aMaxSlope.FixedValue = 0
              [Leaf].Parameters.aMaxIntercept.FixedValue = 495
          Cultivar P86G56
            Command:
              [Phenology].PhotoModifier.XYPairs.Y[2] = 20
              [Phenology].TTEndJuvToInit.FixedValue = 138
              [Phenology].FlagLeafToFlowering.Target.FixedValue = 150
              [Phenology].TTFlowerToMaturity.FixedValue = 810
              [Grain].DMPerSeed.FixedValue = 0.0005
              [Leaf].Parameters.aX0.FixedValue = 0.84
              [Leaf].Parameters.aMaxSlope.FixedValue = 0
              [Leaf].Parameters.aMaxIntercept.FixedValue = 495
          Cultivar MR43
            Command:
              [Phenology].PhotoModifier.XYPairs.Y[2] = 15
              [Phenology].TTEndJuvToInit.FixedValue = 118
              [Phenology].FlagLeafToFlowering.Target.FixedValue = 150
              [Phenology].TTFlowerToMaturity.FixedValue = 810
              [Leaf].Parameters.aX0.FixedValue = 0.71
              [Leaf].Parameters.aMaxSlope.FixedValue = 37
              [Leaf].Parameters.aMaxIntercept.FixedValue = -101
          Cultivar N_14NUS01
            Command:
              [Phenology].PhotoModifier.XYPairs.Y[2] = 0
              [Phenology].TTEndJuvToInit.FixedValue = 180
              [Phenology].FlagLeafToFlowering.Target.FixedValue = 140
              [Phenology].TTFlowerToMaturity.FixedValue = 810
              [Grain].DMPerSeed.FixedValue = 0.0007
              [Leaf].Parameters.aX0.FixedValue = 0.82
              [Leaf].Parameters.aMaxSlope.FixedValue = 8.5
              [Leaf].Parameters.aMaxIntercept.FixedValue = 378
          Cultivar N_14NUS02
            Command:
              [Phenology].PhotoModifier.XYPairs.Y[2] = 20
              [Phenology].TTEndJuvToInit.FixedValue = 174
              [Phenology].FlagLeafToFlowering.Target.FixedValue = 150
              [Phenology].TTFlowerToMaturity.FixedValue = 810
              [Grain].DMPerSeed.FixedValue = 0.0006
              [Leaf].Parameters.aX0.FixedValue = 0.82
              [Leaf].Parameters.aMaxSlope.FixedValue = 8.5
              [Leaf].Parameters.aMaxIntercept.FixedValue = 378
          Cultivar N_14NUS03
            Command:
              [Phenology].PhotoModifier.XYPairs.Y[2] = 15
              [Phenology].TTEndJuvToInit.FixedValue = 110
              [Phenology].FlagLeafToFlowering.Target.FixedValue = 100
              [Phenology].TTFlowerToMaturity.FixedValue = 810
              [Grain].DMPerSeed.FixedValue = 0.00045
              [Leaf].Parameters.aX0.FixedValue = 0.84
              [Leaf].Parameters.aMaxSlope.FixedValue = 9.3
              [Leaf].Parameters.aMaxIntercept.FixedValue = 384
          Cultivar N_14NUS04
            Command:
              [Phenology].PhotoModifier.XYPairs.Y[2] = 0
              [Phenology].TTEndJuvToInit.FixedValue = 120
              [Phenology].FlagLeafToFlowering.Target.FixedValue = 120
              [Phenology].TTFlowerToMaturity.FixedValue = 810
              [Grain].DMPerSeed.FixedValue = 0.00045
              [Leaf].Parameters.aX0.FixedValue = 0.81
              [Leaf].Parameters.aMaxSlope.FixedValue = 0
              [Leaf].Parameters.aMaxIntercept.FixedValue = 445
      Constant MortalityRate: FixedValue=0
      Constant SeedMortalityRate: FixedValue=0
  Folder RowConfiguration
    Experiment RowConfiguration
      DisabledSimNames=[RowConfigurationRow250Skip2, RowConfigurationRow250Skip1, RowConfigurationRowSpacing250RowConfiguration2, RowConfigurationRowSpacing250RowConfiguration1, RowConfigurationRowSpacing250RowConfiguration0]
      Factors
        Permutation
          Factor Row
            Specification=[SowingRule].Script.RowSpacing = 250, 500, 600, 750, 1000, 1200, 1500
          Factor Skip
            CompositeFactor Solid: Specifications=[SowingRule].Script.RowConfiguration = 0
            CompositeFactor SingleSkip: Specifications=[SowingRule].Script.RowConfiguration = 1
            CompositeFactor DoubleSkip: Specifications=[SowingRule].Script.RowConfiguration = 2
      Simulation RowConfigurationBase
        Clock: Start=1995-10-01; End=1996-01-01
        Summary
        Weather: FileName=%root%/Examples/WeatherFiles/Dalby.met
        SoilArbitrator
        Zone Paddock: Area=1; Slope=0; AspectAngle=0; Altitude=50
          Report: EventNames=[Sorghum].Flowering
            VariableNames:
              [Clock].Today
              [Sorghum].AboveGround.Wt
              [Sorghum].Grain.Wt
              [Sorghum].Leaf.LAI
              [Sorghum].SowingData.SkipDensityScale
              [Sorghum].Leaf.CoverGreen
              [Sorghum].Phenology.Stage
          Manager SowingFertiliser
            Crop = [Sorghum]
            FertiliserType = UreaN
            Amount = 180
```csharp
using Models.Soils;
using System;
using Models.Core;
using Models.PMF;
namespace Models
{
    [Serializable]
    public class Script : Model
    {
        [Link] Clock Clock;
        [Link] Fertiliser Fertiliser;
        
        [Description("Crop to be fertilised")]
        public IPlant Crop { get; set; }

        [Description("Type of fertiliser to apply? ")] 
        public Fertiliser.Types FertiliserType { get; set; }
    
        [Description("Amount of fertiliser to be applied (kg/ha)")]
        public double Amount { get; set; }
        
        [EventSubscribe("Sowing")]
        private void OnSowing(object sender, EventArgs e)
        {
            Model crop = sender as Model;
            if (Crop != null && crop.Name.ToLower() == (Crop as IModel).Name.ToLower())
                Fertiliser.Apply(Amount: Amount, Type: FertiliserType);
        }
    }
}
```
          Folder Manager folder
            Manager SowingRule
              Date = 10/01/1995 00:00:00
              Density = 12
              Depth = 20
              Cultivar = Buster
              RowSpacing = 500
              RowConfiguration = Solid
              TilleringMethod = FixedTillering
              Ftn = 0
```csharp
using Models.Soils;
using System;
using Models.Core;
using Models.PMF;
using APSIM.Shared.Utilities;

namespace Models
{
    [Serializable]
    public class Script : Model
    {
        [Description("Enter sowing date (dd/mm/yyyy) : ")]
        public DateTime Date { get; set; }

        [Description("Enter sowing density  (plants/m2) : ")]
        public double Density { get; set; }

        [Description("Enter sowing depth  (mm) : ")]
        public double Depth { get; set; }

        [Description("Enter cultivar : ")]
        [Display(Type = DisplayType.CultivarName)]
        public string Cultivar { get; set; } // QL41xQL36

        [Description("Enter row spacing (mm) : ")]
        public double RowSpacing { get; set; }

        [Description("Enter skip row configuration : ")]
        public RowConfigurationType RowConfiguration { get; set; }

        [Description("Tillering Method")]
        public TilleringMethodType TilleringMethod { get; set; } = 0;

        [Description("Enter Fertile Tiller No. : ")]
        public double Ftn { get; set; }

        public enum TilleringMethodType 
        {
            RuleOfThumb = -1,
            FixedTillering = 0,
            DynamicTillering = 1
        }
        public enum RowConfigurationType 
        {
            Solid, SingleSkip, DoubleSkip
        }

        [Link]
        private Zone paddock;

        [Link]
        private Clock clock;

        [Link]
        private Plant crop;

        [EventSubscribe("DoManagement")]
        private void OnDoManagement(object sender, EventArgs e)
        {
            if (clock.Today == Date /* && isFallow */)
            {
                double population = Density * paddock.Area;
                crop.Sow(cultivar:Cultivar, population:population, depth:Depth, rowSpacing:RowSpacing, rowConfig: (double)RowConfiguration, tillering:(int)TilleringMethod, ftn:Ftn);
            }
        }
    }

}
```
            Manager Harvesting rule
```csharp
using Models.Soils;
using System;
using Models.Core;
using Models.PMF;

namespace Models
{
    [Serializable]

    public class Script : Model
    {
        [Link]
        private Clock clock;

        [Link]
        private IPlant crop;

        [EventSubscribe("DoManagement")]
        private void OnDoCalculations(object sender, EventArgs e)
        {
            if (crop.IsReadyForHarvesting)
            {
                crop.Harvest();
                crop.EndCrop();
            }
            
            /*
                

           if [crop].StageName = 'harvest_ripe' or [crop].plant_status = 'dead' then
              [crop]  harvest
              [crop]  end_crop
           endif

            
            */
        }
    }
}
```
            Manager AutomaticIrrigation
              allowIrrigation = True
              seasonStart = 1-sep
              seasonEnd = 30-mar
              seasonsAllocation = 10000
              triggerDeficit = 50
              targetDeficit = 95
              returndays = 3
              maximumAmount = 30
              depthPAWC = 650
```csharp
using Models.Interfaces;
using System;
using Models.Core;
using Models.PMF;
using Models.Soils;
using APSIM.Shared.Utilities;

namespace Models
{
    [Serializable] 
    public class Script : Model
    {
        [Link] private ISummary summary;
        [Link] private Irrigation Irrigation;
        [Link] private Clock Clock;
        [Link] private Soil Soil;
        [Link(IsOptional = true)] private IPlant existingCrop;
        private DateTime StartDate;
        private DateTime EndDate;
        private double TopDUL;
        private double TopLL;
        private int nLayers;
        [Link]
        private IPhysical soilPhysical;
        [Link]
        private ISoilWater waterBalance;
        //Communication to other modules
       
        //User inputs from properties tab
        [Description("Turn irrigation on?")]
        public bool allowIrrigation { get; set; }
        [Description("Start of irrigation season (dd-MMM)")]
        public string seasonStart { get; set; }
        [Description("End of irrigation season (dd-MMM)")]
        public string seasonEnd { get; set; }
        [Description("Season allocation (mm)")]
        public double seasonsAllocation { get; set; }
        [Description("Deficit to trigger irrigation (% PAWC)")]
        public double triggerDeficit { get; set; }
        [Description("Deficit to stop irrigaton (% PAWC)")]
        public double targetDeficit { get; set; }
        [Description("Minimum days for irrigation to return")]
        public double returndays { get; set; }
        [Description("Maximum irrigation application (mm/day)")]
        public double maximumAmount { get; set; }
        [Description("Depth to calculate PAWC (mm)")]
        public double depthPAWC { get; set; }

        //Class members
        public double TopSWdeficit { get; set; }
        public double TopSWC { get; set; }
        public double DaysSinceIrrigation { get; set; }
        public double AmountToApply { get; set; }
        public double SeasonAppliedAmount { get; set; }
        
        private bool IrrigationIsAllowed { get; set; }
        private bool SeasonIsOpen { get; set; }
        private bool CropIsActive { get; set; }
        private bool IrrigatorIsAvailable { get; set; }
        private bool SoilIsDry { get; set; }

    
        //Calculate static soil variables
        [EventSubscribe("StartOfSimulation")]
        private void OnStartOfSimulation(object sender, EventArgs e)
        {   
            //Set the season dates
            StartDate = DateTime.Parse(seasonStart + "-" + Clock.Today.Year.ToString());
            EndDate = DateTime.Parse(seasonEnd + "-" + Clock.Today.Year.ToString());
            
            //Can we irrigate at all?
            IrrigationIsAllowed = false; 
            if (allowIrrigation)
                IrrigationIsAllowed = true; 

            //Calculate soil water variables
            double depthFromSurface = 0.0;
            double fracLayer = 0.0;
            nLayers = soilPhysical.Thickness.Length;
            for (int layer = 0; layer < nLayers; layer++)
            {
                fracLayer = Math.Min(1.0, (depthPAWC - depthFromSurface) / soilPhysical.Thickness[layer]);
                TopLL += soilPhysical.LL15mm[layer] * fracLayer;
                TopDUL += soilPhysical.DULmm[layer] * fracLayer;
                depthFromSurface += soilPhysical.Thickness[layer];
                if (depthFromSurface >= depthPAWC)
                    layer = nLayers;
            }
        }
             
        //Determine daily requirement for irrigation
        [EventSubscribe("StartOfDay")]
        private void OnStartOfDay(object sender, EventArgs e)
        {
            //Can we irrigate today?          
            SeasonIsOpen = isBetween(Clock.Today, StartDate, EndDate);
            if (!SeasonIsOpen)
                SeasonAppliedAmount = 0;

            //Is there a crop in the ground that needs irrigation?
            CropIsActive = false;
            if ((existingCrop != null) && (existingCrop.IsAlive))
                CropIsActive = true;
            //if ((existingCrop.Phenology.Stage >= 3.0) && (existingCrop.Phenology.Stage < 6.0))
          
            //Is the irrigator available?
            IrrigatorIsAvailable = false;
            DaysSinceIrrigation += 1;
            if (DaysSinceIrrigation >= returndays)
                IrrigatorIsAvailable = true;
          
            //Is the soil dry enough to require irrigation?
            SoilIsDry = false;
            double depthFromSurface = 0.0;
            double fracLayer = 0.0;
            TopSWC = 0.0;
            for (int layer = 0; layer < nLayers; layer++)
            //for (int layer = 0; depthFromSurface < depthPAWC + soilPhysical.Thickness[layer]; layer++)
            {
                fracLayer = Math.Min(1.0, (depthPAWC - depthFromSurface) / soilPhysical.Thickness[layer]);
                TopSWC += waterBalance.SWmm[layer] * fracLayer;
                depthFromSurface += soilPhysical.Thickness[layer];
                if (depthFromSurface >= depthPAWC)
                    layer = nLayers;
            }
            
            TopSWdeficit = TopSWC - TopDUL;
            if (Math.Max(0.0, -TopSWdeficit) >= (TopDUL - TopLL) * (100 - triggerDeficit) / 100)
                SoilIsDry = true;
                
            //Are all the conditions ratifying irrigation
            if (IrrigationIsAllowed && SeasonIsOpen && CropIsActive && IrrigatorIsAvailable && SoilIsDry)
            {
                //Lets bloody well irrigate then!!!!
                AmountToApply = TopDUL * targetDeficit / 100 - TopSWC;
                AmountToApply = Math.Max(0.0, Math.Min(AmountToApply, seasonsAllocation - SeasonAppliedAmount));
                AmountToApply = Math.Min(AmountToApply,maximumAmount);
                Irrigation.Apply(AmountToApply);
                DaysSinceIrrigation = 0;
                SeasonAppliedAmount += AmountToApply;
            }
        }
        
        ///Checks whether theDate is between iniDate and endDate (non-year specific)
        private bool isBetween(DateTime theDay, DateTime iniDate, DateTime endDate)
        {
            bool result = false;
            if (iniDate.DayOfYear < endDate.DayOfYear)
            {
                // period is within one year, ex: summer in the northern hemisphere
                if ((theDay.DayOfYear >= iniDate.DayOfYear) && (theDay.DayOfYear <= endDate.DayOfYear))
                    result = true;
            }
            else
            {
                // period goes over the end of the year, ex: summer in the southern hemisphere
                if ((theDay.DayOfYear >= iniDate.DayOfYear) || (theDay.DayOfYear <= endDate.DayOfYear))
                    result = true;
            }
            
            return result;
        }
    }
}
```
          Irrigation
          Fertiliser
          MicroClimate: a_interception=0; b_interception=1; c_interception=0; d_interception=0; SoilHeatFluxFraction=0.4; MinimumHeightDiffForNewLayer=0; NightInterceptionFraction=0.5; ReferenceHeight=2
          Soil GLH Field: SoilType=GLHSoil; Site=Cooper Lab; NearestTown=Unknown; Region=Gatton; NaturalVegetation=Unknown; Latitude=0; Longitude=0
            Physical
              Thickness  BD    AirDry  LL15  DUL   SAT
              200        1.32  0.1     0.3   0.41  0.46
              200        1.3   0.15    0.3   0.43  0.48
              200        1.23  0.28    0.35  0.46  0.51
              300        1.27  0.28    0.32  0.44  0.49
              300        1.37  0.28    0.29  0.4   0.45
              300        1.35  0.3     0.31  0.41  0.46
              300        1.35  0.3     0.31  0.38  0.43
              SoilCrop SorghumSoil: LL=[0.3, 0.3, 0.35, 0.32, 0.29, 0.31, 0.31]; KL=[0.08, 0.08, 0.08, 0.08, 0.06, 0.04, 0.02]; XF=[1, 1, 1, 1, 1, 1, 1]
            WaterBalance SoilWater: SummerDate=1-Nov; SummerU=6; SummerCona=3.5; WinterDate=1-Apr; WinterU=6; WinterCona=3.5; DiffusConst=88; DiffusSlope=35.4; Salb=0.13; CN2Bare=91; CNRed=20; CNCov=0.8; PSIDul=-100; Thickness=[200, 200, 200, 300, 300, 300, 300]; SWCON=[0.5, 0.5, 0.5, 0.5, 0.5, 0.5, 0.5]
            Nutrient
            Organic: FOMCNRatio=30; CarbonUnits=Total
              Thickness  Carbon  SoilCNRatio  FBiom  FInert  FOM
              200        1.3     12.5         0.03   0.31    514.709
              200        0.65    12.5         0.01   0.38    368.805
              200        0.32    12.5         0      0.47    264.26
              300        0.11    12.5         0      0.7     160.282
              300        0.11    12.5         0      0.9     97.2159
              300        0.11    12.5         0      0.95    58.9644
              300        0.11    12.5         0      0.95    35.7637
            Chemical: Thickness=[200, 200, 200, 300, 300, 300, 300]; PH=[8.2, 8.7, 8.9, 8.1, 8, 8, 8]; PHUnits=Water
            Water: Thickness=[200, 200, 200, 300, 300, 300, 300]; InitialValues=[0.385, 0.47, 0.467, 0.459, 0.394, 0.399, 0.38]; FilledFromTop=false
            CERESSoilTemperature Temperature
            Solute NO3: Thickness=[200, 200, 200, 300, 300, 300, 300]; InitialValues=[9, 2.48, 2.79, 1.28, 2.98, 2.965, 1.387]; InitialValuesUnits=ppm; WaterTableConcentration=0; D0=0
            Solute NH4: Thickness=[200, 200, 200, 300, 300, 300, 300]; InitialValues=[0.1, 0.1, 0.1, 0.1, 0.1, 0.1, 0.1]; InitialValuesUnits=ppm; WaterTableConcentration=0; D0=0
            Solute Urea: Thickness=[200, 200, 200, 300, 300, 300, 300]; InitialValues=[0, 0, 0, 0, 0, 0, 0]; InitialValuesUnits=kg/ha; WaterTableConcentration=0; D0=0
          Plant Sorghum: IsEnding=false; DaysAfterEnding=0
          SurfaceOrganicMatter: InitialResidueName=wheat_stubble; InitialResidueType=wheat; InitialResidueMass=0; InitialStandingFraction=0; InitialCPR=0; InitialCNR=80
  Folder SowingDensity
    Experiment DensityYieldResponse
      Factors
        Permutation
          Memo
            Factor setup is maybe a bit counter-intuitive - we could do it without the CompositeFactors. The reason it was done this way is so that the graph series names come out better when varying by irrigation/fertiliser.
          Factor Management
            CompositeFactor HighN_Irr
              Specifications:
                [AutomaticIrrigation].Script.allowIrrigation = true
                [FertiliseDates].Script.Amount = 80
            CompositeFactor LowN_Irr
              Specifications:
                [AutomaticIrrigation].Script.allowIrrigation = true
                [FertiliseDates].Script.Amount = 0
            CompositeFactor HighN_Dry
              Specifications:
                [AutomaticIrrigation].Script.allowIrrigation = false
                [FertiliseDates].Script.Amount = 80
            CompositeFactor LowN_Dry
              Specifications:
                [AutomaticIrrigation].Script.allowIrrigation = false
                [FertiliseDates].Script.Amount = 0
          Factor Density
            CompositeFactor 2: Specifications=[SowingRule].Script.Density = 2
            CompositeFactor 4: Specifications=[SowingRule].Script.Density = 4
            CompositeFactor 8: Specifications=[SowingRule].Script.Density = 8
            CompositeFactor 12: Specifications=[SowingRule].Script.Density = 12
            CompositeFactor 16: Specifications=[SowingRule].Script.Density = 16
            CompositeFactor 20: Specifications=[SowingRule].Script.Density = 20
            CompositeFactor 24: Specifications=[SowingRule].Script.Density = 24
            CompositeFactor 28: Specifications=[SowingRule].Script.Density = 28
            CompositeFactor 32: Specifications=[SowingRule].Script.Density = 32
      Simulation BaseSimulation
        Clock: Start=1997-09-15; End=1998-03-01
        Summary
        Weather: FileName=%root%/Examples/WeatherFiles/Dalby.met
        SoilArbitrator
        Zone Paddock: Area=1; Slope=0; AspectAngle=0; Altitude=50
          Manager SowingFertiliser
            Crop = [Sorghum]
            FertiliserType = UreaN
            Amount = 30
            script: same as in RowConfiguration.RowConfiguration.RowConfigurationBase.Paddock.SowingFertiliser
          Folder Manager folder
            Manager SowingRule
              Date = 09/15/1997 00:00:00
              Density = 16
              Depth = 20
              Cultivar = Buster
              RowSpacing = 750
              RowConfiguration = Solid
              TilleringMethod = FixedTillering
              Ftn = 0
```csharp
using Models.Soils;
using System;
using Models.Core;
using Models.PMF;
using APSIM.Shared.Utilities;

namespace Models
{
    [Serializable]
    public class Script : Model
    {
        [Description("Enter sowing date (dd/mm/yyyy) : ")]
        public DateTime Date { get; set; }

        [Description("Enter sowing density  (plants/m2) : ")]
        public double Density { get; set; }

        [Description("Enter sowing depth  (mm) : ")]
        public double Depth { get; set; }

        [Description("Enter cultivar : ")]
        [Display(Type = DisplayType.CultivarName)]
        public string Cultivar { get; set; }

        [Description("Enter row spacing (mm) : ")]
        public double RowSpacing { get; set; }

        [Description("Enter skip row configuration : ")]
        public RowConfigurationType RowConfiguration { get; set; }

        [Description("Tillering Method")]
        public TilleringMethodType TilleringMethod { get; set; } = 0;

        [Description("Enter Fertile Tiller No. : ")]
        public double Ftn { get; set; }

        public enum TilleringMethodType 
        {
            RuleOfThumb = -1,
            FixedTillering = 0,
            DynamicTillering = 1
        }
        public enum RowConfigurationType 
        {
            Solid, SingleSkip, DoubleSkip
        }

        [Link]
        private Zone paddock;

        [Link]
        private Clock clock;

        [Link]
        private Plant crop;

        [EventSubscribe("DoManagement")]
        private void OnDoManagement(object sender, EventArgs e)
        {
            if (clock.Today == Date /* && isFallow */)
            {
                double population = Density * paddock.Area;
                crop.Sow(cultivar:Cultivar, population:population, depth:Depth, rowSpacing:RowSpacing, rowConfig: (double)RowConfiguration, tillering:(int)TilleringMethod, ftn:Ftn);
            }
        }
    }
}
```
            Manager Harvesting rule
              script: same as in RowConfiguration.RowConfiguration.RowConfigurationBase.Paddock.Manager folder.Harvesting rule
            Manager AutomaticIrrigation: same as RowConfiguration.RowConfiguration.RowConfigurationBase.Paddock.Manager folder.AutomaticIrrigation
            Manager FertiliseDates
              EachYear = True
              Dates = 30-oct, 30-nov
              Depth = 50
              Amount = 50
              FertiliserType = UreaN
```csharp
using Models.Interfaces;
using System.Linq;
using APSIM.Shared.Utilities;
using Models.PMF;
using Models.Soils;
using Models.Core;
using System;
using Models.Soils.Nutrients;

namespace Models
{
    [Serializable]
    public class Script : Model
    {
        [Link] private Clock clock;
        [Link] private Fertiliser fertiliser;
        [Link] private ISummary summary;
        [Link] private Soil soil;
        private Nutrient nutrient;
        private SoilNitrogen soilN;
        [Link]
        private IPhysical soilPhysical;


        [Separator("Fertiliser will be applied on the date(s) below")]
        [Description("Apply fertiliser on the same day(s) each year? If no, then must include the year of appliaction below")]
        public bool EachYear { get; set; }

        [Description("Dates for one or more fertiliser applications (dd-mmm or dd-mmm-yyyy) as a list with a comma between dates")]
        public string[] Dates { get; set; }

        [Separator("Fertiliser application details")]
        [Description("Depth at which to apply the fertiliser (mm)")]
        public double Depth { get; set; }

        [Description("Amount of fertiliser to apply (kg N /ha) per application")]
        public double Amount { get; set; }

        [Description("Fertiliser type - select from the list")]
        public Fertiliser.Types FertiliserType { get; set; }

        [EventSubscribe("DoManagement")]
        private void OnDoManagement(object sender, EventArgs e)
        {
            if (OnApplicationDate())
            {
                fertiliser.Apply(Amount, FertiliserType, Depth);
            }
        }

        /// <summary>Checks if today's date is one of the specified fertiliser application dates.</summary>
        private bool OnApplicationDate()
        {
            if (EachYear)
                return Dates.Any(d => DateUtilities.DatesEqual(d, clock.Today));
            
            DateTime[] dates = Dates.Select(d => DateTime.ParseExact(d, "d-MMM-yyyy", null)).ToArray();
            return dates.Any(d => SameDate(d, clock.Today));
        }

        private bool SameDate(DateTime d1, DateTime d2)
        {
            return d1.Year == d2.Year && d1.DayOfYear == d2.DayOfYear;
        }
    }
}
```
          Irrigation
          Fertiliser
          MicroClimate: a_interception=0; b_interception=1; c_interception=0; d_interception=0; SoilHeatFluxFraction=0.4; MinimumHeightDiffForNewLayer=0; NightInterceptionFraction=0.5; ReferenceHeight=2
          Soil GLH Field: same as RowConfiguration.RowConfiguration.RowConfigurationBase.Paddock.GLH Field
          Plant Sorghum: IsEnding=false; DaysAfterEnding=0
          SurfaceOrganicMatter: InitialResidueName=wheat_stubble; InitialResidueType=wheat; InitialResidueMass=0; InitialStandingFraction=0; InitialCPR=0; InitialCNR=80
          Report HarvestReport: EventNames=[Sorghum].Harvesting
            VariableNames:
              [Clock].Today
              [Sorghum].AboveGround.Wt
              [Sorghum].Grain.Wt
              [Sorghum].Leaf.LAI
              [Sorghum].SowingData.Population
          Report DailyReport: EventNames=[Clock].DoReport
            VariableNames:
              [Clock].Today
              [Sorghum].AboveGround.Wt
              [Sorghum].Grain.Wt
              [Sorghum].Leaf.LAI
  Folder Intercropping
    Simulation Sorghum Maize Intercrop
      Clock
      Summary
      Weather: FileName=%root%/Examples/WeatherFiles/Gatton.met
      SoilArbitrator
      Zone Paddock: Area=1; Slope=0; AspectAngle=0; Altitude=50
        Report SorghumHarvesting: EventNames=[Sorghum].Harvesting
          VariableNames:
            [Clock].Today
            [Sorghum].AboveGround.Wt
            [Sorghum].Grain.Wt
            [Sorghum].Leaf.LAI
        Report MaizeHarvesting: EventNames=[Maize].Harvesting
          VariableNames:
            [Clock].Today
            [Maize].AboveGround.Wt
            [Maize].Grain.Wt
            [Maize].Leaf.LAI
        Manager Fertilise at sowing
          FertiliserType = UreaN
          Amount = 500
```csharp
using Models.Soils;
using System;
using Models.Core;
using Models.PMF;
namespace Models
{
    [Serializable]
    public class Script : Model
    {
        [Link] Clock Clock;
        [Link] Fertiliser Fertiliser;

        [Description("Type of fertiliser to apply? ")] 
        public Fertiliser.Types FertiliserType { get; set; }
    
        [Description("Amount of fertiliser to be applied (kg/ha)")]
        public double Amount { get; set; }
        
        [EventSubscribe("Sowing")]
        private void OnSowing(object sender, EventArgs e)
        {
            Fertiliser.Apply(Amount: Amount, Type: FertiliserType);
        }
    }
}
```
        Folder Manager folder
          Manager SowSorghum
            Crop = [Sorghum]
            StartDate = 1-nov
            EndDate = 10-jan
            MinESW = 100
            MinRain = 25
            RainDays = 7
            CultivarName = Buster
            SowingDepth = 30
            RowSpacing = 500
            Population = 6
```csharp
using Models.Interfaces;
using APSIM.Shared.Utilities;
using Models.Utilities;
using Models.Soils;
using Models.PMF;
using Models.PMF.Organs;
using Models.Core;
using System;
using Models.Climate;

namespace Models
{
    [Serializable]
    public class Script : Model
    {
        [Link] private Clock Clock;
        [Link] private Fertiliser Fertiliser;
        [Link] private Summary Summary;
        [Link] private Soil Soil;
        private Accumulator accumulatedRain;
        [Link]
        private ISoilWater waterBalance;
        [Link]
        private Zone paddock;
        
        [Description("Crop")]
        public Plant Crop { get; set; }

        [Description("Start of sowing window (d-mmm)")]
        public string StartDate { get; set; }

        [Description("End of sowing window (d-mmm)")]
        public string EndDate { get; set; }

        [Description("Minimum extractable soil water for sowing (mm)")]
        public double MinESW { get; set; }

        [Description("Accumulated rainfall required for sowing (mm)")]
        public double MinRain { get; set; }

        [Description("Duration of rainfall accumulation (d)")]
        public int RainDays { get; set; }

        [Display(Type = DisplayType.CultivarName)]
        [Description("Cultivar to be sown")]
        public string CultivarName { get; set; }

        [Description("Sowing depth (mm)")]
        public double SowingDepth { get; set; }

        [Description("Row spacing (mm)")]
        public double RowSpacing { get; set; }

        [Description("Plant population (/m2)")]
        public double Population { get; set; }
        
        [EventSubscribe("StartOfSimulation")]
        private void OnSimulationCommencing(object sender, EventArgs e)
        {
            accumulatedRain = new Accumulator(this, "[Weather].Rain", RainDays);
        }

        [EventSubscribe("DoManagement")]
        private void OnDoManagement(object sender, EventArgs e)
        {
            accumulatedRain.Update();
            
            if (DateUtilities.WithinDates(StartDate, Clock.Today, EndDate) &&
                !Crop.IsAlive &&
                MathUtilities.Sum(waterBalance.ESW) > MinESW &&
                accumulatedRain.Sum > MinRain)
            {
                //planting multiple crops will need 
                var sorghumLeaf = (Crop.Leaf as SorghumLeaf);
                sorghumLeaf.MicroClimateSetting = 1;
                
                double population = Population * paddock.Area;
                Crop.Sow(cultivar:CultivarName, population:population, depth:SowingDepth, rowSpacing:RowSpacing);
            }
        }
    }
}
```
          Manager SowMaize
            Crop = [Maize]
            StartDate = 1-nov
            EndDate = 10-jan
            MinESW = 100
            MinRain = 25
            RainDays = 7
            CultivarName = Katumani
            SowingDepth = 30
            RowSpacing = 500
            Population = 6
```csharp
using Models.Interfaces;
using APSIM.Shared.Utilities;
using Models.Utilities;
using Models.Soils;
using Models.PMF;
using Models.Core;
using System;
using Models.Climate;

namespace Models
{
    [Serializable]
    public class Script : Model
    {
        [Link] private Clock Clock;
        [Link] private Fertiliser Fertiliser;
        [Link] private Summary Summary;
        [Link] private Soil Soil;
        private Accumulator accumulatedRain;
        [Link]
        private ISoilWater waterBalance;
        
        [Description("Crop")]
        public IPlant Crop { get; set; }

        [Description("Start of sowing window (d-mmm)")]
        public string StartDate { get; set; }

        [Description("End of sowing window (d-mmm)")]
        public string EndDate { get; set; }

        [Description("Minimum extractable soil water for sowing (mm)")]
        public double MinESW { get; set; }

        [Description("Accumulated rainfall required for sowing (mm)")]
        public double MinRain { get; set; }

        [Description("Duration of rainfall accumulation (d)")]
        public int RainDays { get; set; }

        [Display(Type = DisplayType.CultivarName)]
        [Description("Cultivar to be sown")]
        public string CultivarName { get; set; }

        [Description("Sowing depth (mm)")]
        public double SowingDepth { get; set; }

        [Description("Row spacing (mm)")]
        public double RowSpacing { get; set; }

        [Description("Plant population (/m2)")]
        public double Population { get; set; }
        
        
        [EventSubscribe("StartOfSimulation")]
        private void OnSimulationCommencing(object sender, EventArgs e)
        {
            accumulatedRain = new Accumulator(this, "[Weather].Rain", RainDays);
        }

        [EventSubscribe("DoManagement")]
        private void OnDoManagement(object sender, EventArgs e)
        {
            accumulatedRain.Update();
            
            if (DateUtilities.WithinDates(StartDate, Clock.Today, EndDate) &&
                !Crop.IsAlive &&
                MathUtilities.Sum(waterBalance.ESW) > MinESW &&
                accumulatedRain.Sum > MinRain)
            {
                Crop.Sow(population: Population, cultivar: CultivarName, depth: SowingDepth, rowSpacing: RowSpacing);    
            }
        }
    }
}
```
          Manager Harvesting rule
```csharp
using Models.Soils;
using System.Collections.Generic;
using System;
using Models.Core;
using Models.PMF;

namespace Models
{
    [Serializable]

    public class Script : Model
    {
        [Link]
        private Clock clock;

        [Link]
        private List<IPlant> plants;

        [EventSubscribe("DoManagement")]
        private void OnDoCalculations(object sender, EventArgs e)
        {
            foreach (IPlant plant in plants)
            {
                if (plant.IsReadyForHarvesting)
                {
                    plant.Harvest();
                    plant.EndCrop();
                }
            }
        }
    }
}
```
          Manager AutomaticIrrigation
            allowIrrigation = True
            seasonStart = 1-sep
            seasonEnd = 30-mar
            seasonsAllocation = 10000
            triggerDeficit = 50
            targetDeficit = 95
            returndays = 3
            maximumAmount = 30
            depthPAWC = 650
```csharp
using Models.Interfaces;
using System;
using Models.Core;
using Models.PMF;
using Models.Soils;
using APSIM.Shared.Utilities;

namespace Models
{
    [Serializable] 
    public class Script : Model
    {
        [Link] private ISummary summary;
        [Link] private Irrigation Irrigation;
        [Link] private Clock Clock;
        [Link] private Soil Soil;
        [Link(IsOptional = true)] private IPlant existingCrop;
        private DateTime StartDate;
        private DateTime EndDate;
        private double TopDUL;
        private double TopLL;
        private int nLayers;
        [Link]
        private IPhysical soilPhysical;
        [Link]
        private ISoilWater waterBalance;
        //Communication to other modules
       
        //User inputs from properties tab
        [Description("Turn irrigation on?")]
        public bool allowIrrigation { get; set; }
        [Description("Start of irrigation season (dd-MMM)")]
        public string seasonStart { get; set; }
        [Description("End of irrigation season (dd-MMM)")]
        public string seasonEnd { get; set; }
        [Description("Season allocation (mm)")]
        public double seasonsAllocation { get; set; }
        [Description("Deficit to trigger irrigation (% PAWC)")]
        public double triggerDeficit { get; set; }
        [Description("Deficit to stop irrigaton (% PAWC)")]
        public double targetDeficit { get; set; }
        [Description("Minimum days for irrigation to return")]
        public double returndays { get; set; }
        [Description("Maximum irrigation application (mm/day)")]
        public double maximumAmount { get; set; }
        [Description("Depth to calculate PAWC (mm)")]
        public double depthPAWC { get; set; }

        //Class members
        public double TopSWdeficit { get; set; }
        public double TopSWC { get; set; }
        public double DaysSinceIrrigation { get; set; }
        public double AmountToApply { get; set; }
        public double SeasonAppliedAmount { get; set; }
        
        private bool IrrigationIsAllowed { get; set; }
        private bool SeasonIsOpen { get; set; }
        private bool CropIsActive { get; set; }
        private bool IrrigatorIsAvailable { get; set; }
        private bool SoilIsDry { get; set; }

    
        //Calculate static soil variables
        [EventSubscribe("StartOfSimulation")]
        private void OnStartOfSimulation(object sender, EventArgs e)
        {   
            //Set the season dates
            StartDate = DateTime.Parse(seasonStart + "-" + Clock.Today.Year.ToString());
            EndDate = DateTime.Parse(seasonEnd + "-" + Clock.Today.Year.ToString());
            
            //Can we irrigate at all?
            IrrigationIsAllowed = false; 
            if (allowIrrigation)
                IrrigationIsAllowed = true; 

            //Calculate soil water variables
            double depthFromSurface = 0.0;
            double fracLayer = 0.0;
            nLayers = soilPhysical.Thickness.Length;
            for (int layer = 0; layer < nLayers; layer++)
            {
                fracLayer = Math.Min(1.0, (depthPAWC - depthFromSurface) / soilPhysical.Thickness[layer]);
                TopLL += soilPhysical.LL15mm[layer] * fracLayer;
                TopDUL += soilPhysical.DULmm[layer] * fracLayer;
                depthFromSurface += soilPhysical.Thickness[layer];
                if (depthFromSurface >= depthPAWC)
                    layer = nLayers;
            }
        }
             
        //Determine daily requirement for irrigation
        [EventSubscribe("StartOfDay")]
        private void OnStartOfDay(object sender, EventArgs e)
        {
            //Can we irrigate today?          
            SeasonIsOpen = isBetween(Clock.Today, StartDate, EndDate);
            if (!SeasonIsOpen)
                SeasonAppliedAmount = 0;

            //Is there a crop in the ground that needs irrigation?
            CropIsActive = false;
            if ((existingCrop != null) && (existingCrop.IsAlive))
                CropIsActive = true;
            //if ((existingCrop.Phenology.Stage >= 3.0) && (existingCrop.Phenology.Stage < 6.0))
          
            //Is the irrigator available?
            IrrigatorIsAvailable = false;
            DaysSinceIrrigation += 1;
            if (DaysSinceIrrigation >= returndays)
                IrrigatorIsAvailable = true;
          
            //Is the soil dry enough to require irrigation?
            SoilIsDry = false;
            double depthFromSurface = 0.0;
            double fracLayer = 0.0;
            TopSWC = 0.0;
            for (int layer = 0; layer < nLayers; layer++)
            //for (int layer = 0; depthFromSurface < depthPAWC + soilPhysical.Thickness[layer]; layer++)
            {
                fracLayer = Math.Min(1.0, (depthPAWC - depthFromSurface) / soilPhysical.Thickness[layer]);
                TopSWC += waterBalance.SWmm[layer] * fracLayer;
                depthFromSurface += soilPhysical.Thickness[layer];
                if (depthFromSurface >= depthPAWC)
                    layer = nLayers;
            }
            
            TopSWdeficit = TopSWC - TopDUL;
            if (Math.Max(0.0, -TopSWdeficit) >= (TopDUL - TopLL) * (100 - triggerDeficit) / 100)
                SoilIsDry = true;
                
            //Are all the conditions ratifying irrigation
            if (IrrigationIsAllowed && SeasonIsOpen && /*CropIsActive &&*/ IrrigatorIsAvailable && SoilIsDry)
            {
                //Lets bloody well irrigate then!!!!
                AmountToApply = TopDUL * targetDeficit / 100 - TopSWC;
                AmountToApply = Math.Max(0.0, Math.Min(AmountToApply, seasonsAllocation - SeasonAppliedAmount));
                AmountToApply = Math.Min(AmountToApply,maximumAmount);
                Irrigation.Apply(AmountToApply);
                DaysSinceIrrigation = 0;
                SeasonAppliedAmount += AmountToApply;
            }
        }
        
        ///Checks whether theDate is between iniDate and endDate (non-year specific)
        private bool isBetween(DateTime theDay, DateTime iniDate, DateTime endDate)
        {
            bool result = false;
            if (iniDate.DayOfYear < endDate.DayOfYear)
            {
                // period is within one year, ex: summer in the northern hemisphere
                if ((theDay.DayOfYear >= iniDate.DayOfYear) && (theDay.DayOfYear <= endDate.DayOfYear))
                    result = true;
            }
            else
            {
                // period goes over the end of the year, ex: summer in the southern hemisphere
                if ((theDay.DayOfYear >= iniDate.DayOfYear) || (theDay.DayOfYear <= endDate.DayOfYear))
                    result = true;
            }
            
            return result;
        }
    }
}
```
        Operations
          1997-01-09  [Irrigation].Apply(52);
          1997-01-16  [Irrigation].Apply(36);
          1997-01-21  [Irrigation].Apply(18);
          1997-01-29  [Irrigation].Apply(20);
          1997-02-07  [Irrigation].Apply(14);
          1997-03-13  [Irrigation].Apply(30);
          1997-03-21  [Irrigation].Apply(45);
          1997-04-10  [Irrigation].Apply(27);
          1997-04-17  [Irrigation].Apply(42);
          1997-05-02  [Irrigation].Apply(27);
          1996-12-20  [Fertiliser].Apply(33, Fertiliser.Types.NO3N, 50);
          1996-12-23  [Fertiliser].Apply(0, Fertiliser.Types.NO3N, 50);
          1996-12-23  [Fertiliser].Apply(119, Fertiliser.Types.NO3N, 50);
          1997-02-12  [Fertiliser].Apply(59, Fertiliser.Types.NO3N, 50);
          1997-03-21  [Fertiliser].Apply(59, Fertiliser.Types.NO3N, 50);
        Irrigation
        Fertiliser
        MicroClimate: a_interception=0; b_interception=1; c_interception=0; d_interception=0; SoilHeatFluxFraction=0.4; MinimumHeightDiffForNewLayer=0; NightInterceptionFraction=0.5; ReferenceHeight=2
        Soil HRS: SoilType=HMM; Site=HRS; NearestTown=Unknown; Region=SE Queensland; NaturalVegetation=Unknown; Latitude=0; Longitude=0
          Physical
            Thickness  BD    AirDry  LL15   DUL   SAT
            100        1.34  0.08    0.226  0.42  0.45
            100        1.34  0.19    0.226  0.42  0.45
            200        1.33  0.23    0.258  0.46  0.48
            200        1.38  0.26    0.27   0.46  0.47
            200        1.4   0.26    0.268  0.43  0.45
            200        1.55  0.28    0.304  0.4   0.41
            200        1.59  0.25    0.335  0.37  0.38
            200        1.63  0.28    0.33   0.33  0.37
            200        1.66  0.3     0.32   0.32  0.37
            200        1.68  0.31    0.33   0.33  0.36
            SoilCrop SorghumSoil
              LL=[0.226, 0.226, 0.258, 0.27, 0.268, 0.304, 0.335, 0.33, 0.32, 0.33]
              KL=[0.07, 0.07, 0.07, 0.07, 0.06, 0.06, 0.06, 0.05, 0.05, 0.04]
              XF=[1, 1, 1, 1, 1, 1, 1, 1, 1, 1]
            SoilCrop MaizeSoil
              LL=[0.226, 0.226, 0.258, 0.27, 0.268, 0.304, 0.335, 0.33, 0.32, 0.33]
              KL=[0.07, 0.07, 0.07, 0.07, 0.06, 0.06, 0.06, 0.05, 0.05, 0.04]
              XF=[1, 1, 1, 1, 1, 1, 1, 1, 1, 1]
          WaterBalance SoilWater: SummerDate=1-Nov; SummerU=1.5; SummerCona=6.5; WinterDate=1-Apr; WinterU=1.5; WinterCona=6.5; DiffusConst=40; DiffusSlope=16; Salb=0.2; CN2Bare=85; CNRed=20; CNCov=0.8; PSIDul=-100; Thickness=[100, 100, 200, 200, 200, 200, 200, 200, 200, 200]; SWCON=[0.3, 0.3, 0.3, 0.3, 0.3, 0.3, 0.3, 0.3, 0.3, 0.3]
          Nutrient
          Organic: FOMCNRatio=50; CarbonUnits=Total
            Thickness  Carbon  SoilCNRatio  FBiom  FInert  FOM
            100        1.19    12.5         0.05   0.45    260.587
            100        0.59    12.5         0.02   0.6     220.582
            200        0.45    12.5         0.01   0.75    158.054
            200        0.3     12.5         0.01   0.9     113.251
            200        0.2     12.5         0.01   0.9     81.1478
            200        0.16    12.5         0.01   0.9     58.1449
            200        0.17    12.5         0.01   0.9     41.6626
            200        0.17    12.5         0.05   0.9     29.8526
            200        0.17    12.5         0.02   0.9     21.3903
            200        0.17    12.5         0.01   0.9     15.3268
          Chemical: Thickness=[100, 100, 200, 200, 200, 200, 200, 200, 200, 200]; PH=[6.3, 6.4, 6.5, 6.6, 6.6, 6.5, 6.5, 6.5, 6.5, 6.5]; PHUnits=Water
          Water: Thickness=[100, 100, 200, 200, 200, 200, 200, 200, 200, 200]; FilledFromTop=false
            InitialValues=[0.235, 0.252, 0.27, 0.3, 0.268, 0.304, 0.335, 0.33, 0.32, 0.33]
          CERESSoilTemperature Temperature
          Solute NO3: Thickness=[100, 100, 200, 200, 200, 200, 200, 200, 200, 200]; InitialValuesUnits=ppm; WaterTableConcentration=0; D0=0
            InitialValues=[10.4, 1.633, 1.233, 0.9, 1.1, 1.467, 3.633, 5.667, 5.8, 7.267]
          Solute NH4: Thickness=[100, 100, 200, 200, 200, 200, 200, 200, 200, 200]; InitialValues=[0.1, 0.1, 0.1, 0.1, 0.1, 0.1, 0.1, 0.1, 0.1, 0.1]; InitialValuesUnits=ppm; WaterTableConcentration=0; D0=0
          Solute Urea: Thickness=[100, 100, 200, 200, 200, 200, 200, 200, 200, 200]; InitialValues=[0, 0, 0, 0, 0, 0, 0, 0, 0, 0]; InitialValuesUnits=kg/ha; WaterTableConcentration=0; D0=0
        Plant Sorghum: IsEnding=false; DaysAfterEnding=0
        Plant Maize
        SurfaceOrganicMatter: InitialResidueName=wheat_stubble; InitialResidueType=wheat; InitialResidueMass=0; InitialStandingFraction=0; InitialCPR=0; InitialCNR=80
  Folder SowingDate
    Experiment SowingDateResponse
      Factors
        Permutation
          Factor Management
            CompositeFactor HighN_Irr: Specifications=[AutomaticIrrigation].Script.allowIrrigation = true
            CompositeFactor LowN_Irr (disabled)
              Specifications:
                [AutomaticIrrigation].Script.allowIrrigation = true
                [FertiliseDates].Script.Amount = 0
            CompositeFactor HighN_Dry: Specifications=[AutomaticIrrigation].Script.allowIrrigation = false
            CompositeFactor LowN_Dry (disabled)
              Specifications:
                [AutomaticIrrigation].Script.allowIrrigation = false
                [FertiliseDates].Script.Amount = 0
          Factor SowingDate
            CompositeFactor Jul: Specifications=[SowingRule].Script.Date = 15-jul
            CompositeFactor Aug: Specifications=[SowingRule].Script.Date = 15-Aug
            CompositeFactor Sep: Specifications=[SowingRule].Script.Date = 15-Sep
            CompositeFactor Oct: Specifications=[SowingRule].Script.Date = 15-Oct
            CompositeFactor Nov: Specifications=[SowingRule].Script.Date = 15-Nov
            CompositeFactor Dec: Specifications=[SowingRule].Script.Date = 15-Dec
            CompositeFactor Jan: Specifications=[SowingRule].Script.Date = 15-Jan
      Simulation SowingDateSimulation
        Clock: Start=1970-09-15; End=1999-05-01
        Summary
        Weather: FileName=%root%/Examples/WeatherFiles/Dalby.met
        SoilArbitrator
        Zone Paddock: Area=1; Slope=0; AspectAngle=0; Altitude=50
          Manager SowingFertiliser
            Crop = [Sorghum]
            FertiliserType = UreaN
            Amount = 200
            script: same as in RowConfiguration.RowConfiguration.RowConfigurationBase.Paddock.SowingFertiliser
          Manager Fertilise topup
            Crop = [Sorghum]
            FertiliserType = NO3N
            Threshold = 200
```csharp
using Models.Soils;
using Models.Soils.Nutrients;
using System;
using Models.Core;
using Models.PMF;
using APSIM.Shared.Utilities;
namespace Models
{
    [Serializable]
    public class Script : Model
    {
        [Link] Clock Clock;
        [Link] Fertiliser Fertiliser;
        [Link] Nutrient SoilN;
		
		[Description("Crop")]
        public IPlant Crop { get; set; }
        
        [Description("Type of fertiliser to apply? ")] 
        public Fertiliser.Types FertiliserType { get; set; }
    
        [Description("Threshold amount of NO3 to topup to (kg/ha)")]
        public double Threshold { get; set;}
        
        [EventSubscribe("DoManagement")]
        private void OnDoManagement(object sender, EventArgs e)
        {
            if(Crop.IsAlive)
            {
	            double Amount = Threshold - MathUtilities.Sum(SoilN.NO3.kgha);
	            Fertiliser.Apply(Amount: Amount, Type: FertiliserType);
	        }
        }
    }
}
```
          Folder Manager folder
            Manager SowingRule
              Date = 07/01/2020 00:00:00
              Density = 12
              Depth = 20
              Cultivar = Buster
              RowSpacing = 750
              RowConfiguration = Solid
              TilleringMethod = FixedTillering
              Ftn = 0
```csharp
using Models.Soils;
using Models.PMF.Organs;
using System;
using Models.Core;
using Models.PMF;
using APSIM.Shared.Utilities;

namespace Models
{
    [Serializable]
    public class Script : Model
    {
        [Description("Enter sowing date (dd/mm/yyyy) : ")]
        public DateTime Date { get; set; }

        [Description("Enter sowing density  (plants/m2) : ")]
        public double Density { get; set; }

        [Description("Enter sowing depth  (mm) : ")]
        public double Depth { get; set; }

        [Description("Enter cultivar : ")]
        [Display(Type = DisplayType.CultivarName)]
        public string Cultivar { get; set; }

        [Description("Enter row spacing (mm) : ")]
        public double RowSpacing { get; set; }

        [Description("Enter skip row configuration : ")]
        public RowConfigurationType RowConfiguration { get; set; }

        [Description("Tillering Method")]
        public TilleringMethodType TilleringMethod { get; set; } = 0;

        [Description("Enter Fertile Tiller No. : ")]
        public double Ftn { get; set; }

        public enum TilleringMethodType 
        {
            RuleOfThumb = -1,
            FixedTillering = 0,
            DynamicTillering = 1
        }
        public enum RowConfigurationType 
        {
            Solid, SingleSkip, DoubleSkip
        }

        [Link]
        private Zone paddock;

        [Link]
        private Clock clock;

        [Link]
        private Plant crop;

        [EventSubscribe("DoManagement")]
        private void OnDoManagement(object sender, EventArgs e)
        {
            if(SameDate(Date, clock.Today))
            {
                double population = Density * paddock.Area;
                crop.Sow(cultivar:Cultivar, population:population, depth:Depth, rowSpacing:RowSpacing, rowConfig: (double)RowConfiguration, tillering:(int)TilleringMethod, ftn:Ftn);
            }
        }

        private bool SameDate(DateTime d1, DateTime d2)
        {
            return d1.DayOfYear == d2.DayOfYear;
        }
    }
}
```
            Manager Harvesting rule: same as SowingDensity.DensityYieldResponse.BaseSimulation.Paddock.Manager folder.Harvesting rule
            Manager AutomaticIrrigation
              allowIrrigation = True
              seasonStart = 1-Jul
              seasonEnd = 30-mar
              seasonsAllocation = 10000
              triggerDeficit = 50
              targetDeficit = 95
              returndays = 3
              maximumAmount = 30
              depthPAWC = 650
              script: same as in RowConfiguration.RowConfiguration.RowConfigurationBase.Paddock.Manager folder.AutomaticIrrigation
            Manager Irrigate at sowing
              Crop = [Sorghum]
              Amount = 30
              Depth = 0
              Efficiency = 1
              WillRunoff = False
```csharp
using Models.Soils;
using System;
using Models.Core;
using Models.PMF;
namespace Models
{
    [Serializable]
    public class Script : Model
    {
        [Link] Clock Clock;
        [Link] Irrigation Irrigation;
        
        [Description("Crop to be irrigated")]
        public IPlant Crop { get; set; }

        [Description("Amount of irrigation to be applied (mm)")] 
        public double Amount { get; set; }
        
        [Description("Depth in the soil to apply the  irrigation (mm)")] 
        public double Depth { get; set; }
        
        [Description("Efficiency of irrigation (0-1)")] 
        public double Efficiency { get; set; }
        
        [Description("Will the irrigation runoff?")] 
        public bool WillRunoff { get; set; }
        
        [EventSubscribe("Sowing")]
        private void OnSowing(object sender, EventArgs e)
        {
            Model crop = sender as Model;
            if (Crop != null && crop.Name.ToLower() == (Crop as IModel).Name.ToLower())
                Irrigation.Apply(amount: Amount, depth: Depth, efficiency: Efficiency, willRunoff: WillRunoff);
        }
    }
}
```
            Manager Reset on sowing
              ResetWater = Yes
              ResetNutrients = Yes
              ResetSOM = Yes
```csharp
using Models.Soils.Nutrients;
using APSIM.Shared.Utilities;
using Models.Surface;
using Models.Utilities;
using Models.Soils.Nutrients;
using Models.Soils;
using Models.PMF;
using Models.Core;
using System;
using Models.Interfaces;

namespace Models
{
    [Serializable]
    public class Script : Model
    {
        [Link] private Plant Wheat;
        [Link] private ISoilWater SoilWater;
        [Link] private Nutrient nutrient;
        [Link] private SurfaceOrganicMatter SOM;
        [Link] private Summary Summary;

        [Description("Reset Water? (Yes or No)")]
        public string ResetWater {get;set;}

        [Description("Reset Soil Nutrients? (Yes or No)")]
        public string ResetNutrients {get;set;}

        [Description("Reset Surface Organic Matter? (Yes or No)")]
        public string ResetSOM {get;set;}

        [EventSubscribe("Sowing")]
        private void OnSowing(object sender, EventArgs e)
        {
            if (ResetWater == "Yes")
            {
                Summary.WriteMessage(this, "Reset Water", MessageType.Diagnostic);
                SoilWater.Reset();
            }
            if (ResetNutrients == "Yes")
            {
                Summary.WriteMessage(this, "Reset Nutrients", MessageType.Diagnostic);
                nutrient.Reset();
            }
            if (ResetSOM == "Yes")
            {
                Summary.WriteMessage(this, "Reset Surface OM", MessageType.Diagnostic);
                SOM.Reset();
            }
        }
    }
}
```
          Irrigation
          Fertiliser
          MicroClimate: a_interception=0; b_interception=1; c_interception=0; d_interception=0; SoilHeatFluxFraction=0.4; MinimumHeightDiffForNewLayer=0; NightInterceptionFraction=0.5; ReferenceHeight=2
          Soil GLH Field: same as RowConfiguration.RowConfiguration.RowConfigurationBase.Paddock.GLH Field
          Plant Sorghum: IsEnding=false; DaysAfterEnding=0
          SurfaceOrganicMatter: InitialResidueName=wheat_stubble; InitialResidueType=wheat; InitialResidueMass=0; InitialStandingFraction=0; InitialCPR=0; InitialCNR=80
          Report SowHarvestReport: EventNames=[Sorghum].Harvesting
            VariableNames:
              [Clock].Today
              [Sorghum].AboveGround.Wt
              [Sorghum].Grain.Wt
              [Sorghum].Leaf.LAI
              [Sorghum].SowingData.Population
          Report SowDailyReport: EventNames=[Clock].DoReport
            VariableNames:
              [Clock].Today
              [Sorghum].AboveGround.Wt
              [Sorghum].Grain.Wt
              [Sorghum].Leaf.LAI
  Folder CO2AndTranspirationEfficiency
    Experiment CO2TE
      Memo
        This test examines the impact of a doubling of CO2 from historical (350ppm) on Transpiration Efficiency.  [Reyenga1999] suggest an increase of approximately 37% in Transpiration Efficiency over this range in CO2 concentration.
        In this test, a series of wheat crops are simulated for Dalby, Queensland, Australia.  Nitrogen limitation is removed.  The slope of plots of biomass production vs crop water use is used to quantify a gross seasonal TE.  The change in slope should approximate the response suggested by [Reyenga1999].
      Factors
        Factor CO2: Specification=[SetCO2]
          Manager 350ppm
            CO2 = 350
```csharp
using Models.Soils;
using System.Xml.Serialization;
using Models;
using Models.PMF;
using System.Text;
using System.Collections.Generic;
using APSIM.Shared.Utilities;
using Models.Core;
using System;
using Models.Climate;

namespace Models
{
    [Serializable] 
    [System.Xml.Serialization.XmlInclude(typeof(Model))]
    public class Script : Model
    {
        [Link] Weather Met;
        [Link] Clock Clock;
    
        [Description("CO2 conc")]
        public double CO2 { get; set; }
    
        
        [EventSubscribe("PreparingNewWeatherData")]
        private void OnPreparingNewWeatherData(object sender, EventArgs e)
        {
            Met.CO2 = CO2;        
        }
    }
}
```
          Manager 700ppm
            CO2 = 700
            script: same as in CO2AndTranspirationEfficiency.CO2TE.Factors.CO2.350ppm
      Simulation CO2TEBaseSimulation
        Clock: Start=1900-01-01; End=2000-12-31
        Summary summaryfile
        Weather: FileName=%root%\Examples\WeatherFiles\Dalby.met
        SoilArbitrator Soil Arbitrator
        Zone Field: Area=1; Slope=0; AspectAngle=0; Altitude=50
          Fertiliser
          SurfaceOrganicMatter: InitialResidueName=wheat_stubble; InitialResidueType=wheat; InitialResidueMass=500; InitialStandingFraction=0; InitialCPR=0; InitialCNR=100
          MicroClimate: a_interception=0; b_interception=1; c_interception=0; d_interception=0; SoilHeatFluxFraction=0.4; MinimumHeightDiffForNewLayer=0; NightInterceptionFraction=0.5; ReferenceHeight=2
          Report SensibilityReport: EventNames=[Sorghum].Harvesting
            VariableNames:
              [Clock].Today.Date
              [Sorghum].Grain.Wt
              [Sorghum].AboveGround.Wt
              Sum of [Sorghum].Leaf.Transpiration from [Sorghum].Sowing to [Sorghum].Harvesting as CropET
          Plant Sorghum: IsEnding=false; DaysAfterEnding=0
          Manager SetCO2
            CO2 = 0
```csharp
using Models.Soils;
using System.Xml.Serialization;
using Models;
using Models.PMF;
using System.Text;
using System.Collections.Generic;
using APSIM.Shared.Utilities;
using Models.Core;
using System;
using Models.Climate;

namespace Models
{
    [Serializable] 
    [System.Xml.Serialization.XmlInclude(typeof(Model))]
    public class Script : Model
    {
        [Link] Weather Met;
        [Link] Clock Clock;
        [Link] Zone zone;
    
        [Description("CO2 conc")]
        public double CO2 { get; set; }
    
        
        [EventSubscribe("PreparingNewWeatherData")]
        private void OnPreparingNewWeatherData(object sender, EventArgs e)
        {
            zone.Set("Weather.CO2", CO2);
        }
    }
}
```
          Manager SowingRule
            StartDate = 1-may
            EndDate = 10-jul
            MinESW = 100
            MinRain = 25
            RainDays = 7
            CultivarName = Buster
            SowingDepth = 30
            RowSpacing = 250
            Population = 120
```csharp
using Models.Interfaces;
using System;
using Models.Core;
using Models.PMF;
using Models.Soils;
using Models.Soils.Nutrients;
using Models.Utilities;
using APSIM.Shared.Utilities;
using Models.Climate;

namespace Models
{
    [Serializable]
    public class Script : Model
    {
        [Link] private Clock Clock;
        [Link] private Fertiliser Fertiliser;
        [Link] private Summary Summary;
        [Link] private Plant Sorghum;
        [Link] private Soil Soil;
        [Link] private Zone paddock;
        private Accumulator accumulatedRain;
        [Link]
        private ISoilWater waterBalance;
        
        [Description("Start of sowing window (d-mmm)")]
        public string StartDate { get; set;}
        [Description("End of sowing window (d-mmm)")]
        public string EndDate { get; set;}
        [Description("Minimum extractable soil water for sowing (mm)")]
        public double MinESW { get; set;}
        [Description("Accumulated rainfall required for sowing (mm)")]
        public double MinRain { get; set;}
        [Description("Duration of rainfall accumulation (d)")]
        public int RainDays { get; set;}
        [Description("Cultivar to be sown")]
        [Display(Type=DisplayType.CultivarName)]
        public string CultivarName { get; set;}
        [Description("Sowing depth (mm)")]
        public double SowingDepth { get; set;}        
        [Description("Row spacing (mm)")]
        public double RowSpacing { get; set;}    
        [Description("Plant population (/m2)")]
        public double Population { get; set;}    
        
        
        [EventSubscribe("StartOfSimulation")]
        private void OnSimulationCommencing(object sender, EventArgs e)
        {
            accumulatedRain = new Accumulator(this, "[Weather].Rain", RainDays);
        }
        

        [EventSubscribe("DoManagement")]
        private void OnDoManagement(object sender, EventArgs e)
        {
            accumulatedRain.Update();
            
            if (DateUtilities.WithinDates(StartDate,Clock.Today,EndDate) &&
                !Sorghum.IsAlive &&
                MathUtilities.Sum(waterBalance.ESW) > MinESW &&
                accumulatedRain.Sum > MinRain)
            {
                double population = Population * paddock.Area;
                Sorghum.Sow(cultivar:CultivarName, population:population, depth:SowingDepth, rowSpacing:RowSpacing);
            }
        }
        
    }
}
```
          Manager Harvest
```csharp
using Models.Soils.Nutrients;
using System;
using Models.Core;
using Models.PMF;
using Models.Soils;
using Models.Soils.Nutrients;
using Models.Utilities;
using APSIM.Shared.Utilities;

namespace Models
{
    [Serializable]
    public class Script : Model
    {
        [Link] Plant Sorghum;

        [EventSubscribe("DoManagement")]
        private void OnDoManagement(object sender, EventArgs e)
        {
            if (Sorghum.IsReadyForHarvesting)
            {
               Sorghum.Harvest();
               Sorghum.EndCrop();    
            }
        
        }
        
    }
}
```
          Manager SowingFertiliser
            Amount = 300
            CropName = Sorghum
```csharp
using Models.Soils;
using System;
using Models.Core;
using Models.PMF;
namespace Models
{
    [Serializable]
    public class Script : Model
    {
        [Link] Clock Clock;
        [Link] Fertiliser Fertiliser;
        [Link] Summary Summary;
        
        
        [Description("Amount of fertiliser to be applied (kg/ha)")]
        public double Amount { get; set;}
        
        [Description("Crop to be fertilised")]
        public string CropName { get; set;}
        
        
        

        [EventSubscribe("Sowing")]
        private void OnSowing(object sender, EventArgs e)
        {
            Model crop = sender as Model;
            if (crop.Name.ToLower()==CropName.ToLower())
                Fertiliser.Apply(Amount: Amount, Type: Fertiliser.Types.NO3N);
        }
        
    }
}
```
          Soil: SoilType=HMM; Site=HRS; NearestTown=Unknown; Region=SE Queensland; NaturalVegetation=Unknown; Latitude=0; Longitude=0
            Physical
              Thickness  BD    AirDry  LL15   DUL   SAT
              100        1.34  0.08    0.226  0.42  0.45
              100        1.34  0.19    0.226  0.42  0.45
              200        1.33  0.23    0.258  0.46  0.48
              200        1.38  0.26    0.27   0.46  0.47
              200        1.4   0.26    0.268  0.43  0.45
              200        1.55  0.28    0.304  0.4   0.41
              200        1.59  0.25    0.335  0.37  0.38
              200        1.63  0.28    0.33   0.33  0.37
              200        1.66  0.3     0.32   0.32  0.37
              200        1.68  0.31    0.33   0.33  0.36
              SoilCrop SorghumSoil
                LL=[0.226, 0.226, 0.258, 0.27, 0.268, 0.304, 0.335, 0.33, 0.32, 0.33]
                KL=[0.07, 0.07, 0.07, 0.07, 0.06, 0.06, 0.06, 0.05, 0.05, 0.04]
                XF=[1, 1, 1, 1, 1, 1, 1, 1, 1, 1]
            WaterBalance SoilWater: same as Intercropping.Sorghum Maize Intercrop.Paddock.HRS.SoilWater
            Nutrient
            Organic: same as Intercropping.Sorghum Maize Intercrop.Paddock.HRS.Organic
            Chemical: Thickness=[100, 100, 200, 200, 200, 200, 200, 200, 200, 200]; PH=[6.3, 6.4, 6.5, 6.6, 6.6, 6.5, 6.5, 6.5, 6.5, 6.5]; PHUnits=Water
            Water: Thickness=[100, 100, 200, 200, 200, 200, 200, 200, 200, 200]; FilledFromTop=false
              InitialValues=[0.235, 0.252, 0.27, 0.3, 0.268, 0.304, 0.335, 0.33, 0.32, 0.33]
            CERESSoilTemperature Temperature
            Solute NO3: same as Intercropping.Sorghum Maize Intercrop.Paddock.HRS.NO3
            Solute NH4: Thickness=[100, 100, 200, 200, 200, 200, 200, 200, 200, 200]; InitialValues=[0.1, 0.1, 0.1, 0.1, 0.1, 0.1, 0.1, 0.1, 0.1, 0.1]; InitialValuesUnits=ppm; WaterTableConcentration=0; D0=0
            Solute Urea: Thickness=[100, 100, 200, 200, 200, 200, 200, 200, 200, 200]; InitialValues=[0, 0, 0, 0, 0, 0, 0, 0, 0, 0]; InitialValuesUnits=kg/ha; WaterTableConcentration=0; D0=0
          Report DailyReport
            VariableNames:
              GrainTempFactor
              GrainTempFactor
  Folder Forage
    Simulation Forage Crop Grazing (disabled)
      Memo
        “Forage Crop Grazing” is a simple single-paddock simulation. The paddock contains a sorghum crop that is irrigated and fertilised. The sorghum is sown in summer of the first year and is rejuvenated thereafter at the frequency set on the sowing rule in the paddock. In this simulation a new mob of animals are ‘bought’ every time the sorghum (or any forage crop or crops) are ready to be grazed.
        The user sets the characteristics of the stock, the grazing rules and if/how any supplementary feeding is done.

        **Stock Type Information**

        This section contains parameters for the genotype (e.g. Jersey, Small merino), reproductive type (e.g. Castrated male), age, weight, and fertility status. Every time the crop is to be grazed the animals of these characteristics are brought into the simulation. They will change status while grazing but will reset at each grazing event (they exit the simulation between grazing events).

        **Grazing event information**

        The stock parameters controlling the grazing event are the stocking rate (the numbers of animals bought will be controlled by this and the paddock area) and their location when the simulation is initialised.

        There are several parameters to control the timing of grazing events. Initially the paddock is assessed for the amount of grazable herbage at which the animals can enter and graze the cropand at which they must leave.

        The biomass is the sum of all the grazable components in the paddock. There is an option to set a rough minimum number of days that it might be anticipated that the animals might stay on the paddock if they enter. This is designed to prevent many, very short-duration, grazing events. The estimate is based on a potential intake of 3% of body mass per day and is applied as an additional amount of biomass above the post-grazing biomass. Apart from the biomass based rules there is also an optional no-grazing window. Note that there is no control of grazing based on growth stage (as there might be for a cereal crop for example).

        **Supplementary feeding**

        The management script also allows for optional supplementary feeding. A specified supplement can be feed every day and/or when the biomass in the grazed paddock falls below a set value. The supplement can be fed before grazing (i.e. as an intake priority) or animals can choose between offered supplement and forage depending on digestibility and availability (see the Stock Science Documentation for more information). Every time that a supplement about to be fed out the script buys sufficient supplement to last about a month.

        **Reporting Outputs**

        There are several example outputs included in the Report model. The documentation for the Report model for the general syntax which here is set up to accommodate means, sums or last values of the reporting interval. In this short example the reporting interval is every day but for longer simulations it might be desirable to set up reporting at the end of each month or grazing event for example.

        The first plots shows the location of the stock (on the paddock or ‘away’), the grazable biomass in the paddock and the supplement remaining in the store. The second plot shows average body mass and average dry matter intake. Note how body mass resets to a consistent value at the start of each grazing event. This is because a new mob of animals is bought at the start of each grazing event.

        The shaded area behind the plots shows the location of the stock (get this to show but adding a "ShadedBarsOnGraph" model to a Graph|Series). Clicking on one of the shaded areas will pop up the name of the location.
      Clock: Start=2010-09-01; End=2012-08-31
      Weather: FileName=%root%/Examples/WeatherFiles/Gatton.met
      Summary
      SoilArbitrator Soil Arbitrator
      MicroClimate: a_interception=0; b_interception=1; c_interception=0; d_interception=0; SoilHeatFluxFraction=0.4; MinimumHeightDiffForNewLayer=0; NightInterceptionFraction=0.5; ReferenceHeight=2
      Supplement: SpoilageTime=0
        Stores:
          Name    Stored  IsRoughage  DMContent  DMD   MEContent  CPConc  ProtDg  PConc   SConc   EEConc  ADIP2CP  AshAlk  MaxPassage
          fodder  0       true        0.85       0     0          0       0       0       0       0       0        0       0
          silage  0       true        1          0.75  12         0.18    0.8     0.0032  0.0024  0.02    0.06     0.6     0
      Stock: RandSeed=9999
        GenotypeCross Small Merino: AnimalType=Sheep; PureBredBreed=Small Merino; MatureDeathRate=0.02; WeanerDeathRate=0.02; Conception=[0, 0.54, 0.41, 0]; Generation=0; SRW=40; PotFleeceWt=3.6; MaxFibreDiam=19; FleeceYield=0.7; PeakMilk=0
      Forages
        Parameters:
          Name                          IsLive  DigestibilityString  FractionConsumable  MinimumAmount  UseDigestibilityFromModel
          SurfaceOrganicMatter.Residue  true    0.7                  1                   100            false
          SurfaceOrganicMatter.Residue  false   0.3                  1                   0              false
      Manager GrazeForageCrop
        Genotype = Friesian
        Sex = Female
        Age = 12
        Weight = 280
        Pregnant = 0
        Lactating = 0
        YoungNumber = 0
        YoungWt = 0
        StockingRate = 50
        CurrentLocation = Away
        PreGrazingDM = 2000
        MinGrazingDays = 7
        PostGrazingDM = 1500
        DoNoGrazingWindow = False
        NoGrazeStart = 1-Jun
        NoGrazeEnd = 31-Jul
        SupplementName = silage
        SupplementFirst = False
        SupplementEveryDay = 0
        SupplementOnPastureMass = 2
        TriggerPastureMass = 2100
```csharp
using Models.PMF.Interfaces;
using System.Diagnostics;
using Models.AgPasture;
using System.Linq;
using System.Collections.Generic;
using System.Collections;
using Models.Soils;
using Models.PMF;
using System.Xml.Serialization;
using APSIM.Shared.Utilities;
using Models.GrazPlan;
using Models.Utilities;
using Models.Core;
using Models;
using System;

namespace Models
{

    [Serializable]
    public class Script : Model
    {
        [Link] Clock clock;
        [Link] Stock stock;
        [Link] Supplement supplement;
        [Link] List<Zone> paddocks;
        [Link] ISummary summary;
        [Link] Simulation farm;
        [Link] List<IPlantDamage> forages = null;

        private int CurrentGroupNum = 1;    // animal group number
        private int CurrentLocationNum { get; set; }

        [Separator("Stock type info, the same type of stock are brought onto the paddock at each grazing")]

        [Description("Stock: genotype (e.g. Small Merino, Angus, Friesian):")] 
        [Display(Values="GetGenotypes")]
        public string Genotype { get; set; }

        [Description("Stock: sex (Female, Male, Castrate):")] 
        public ReproductiveType Sex { get; set; }

        [Description("Stock: age (months):")] 
        public double Age { get; set; }

        [Description("Stock: weight (kg liveweight /head):")] 
        public double Weight { get; set; }

        [Description("Stock: fertility status (0 if non-pregnant or days since conception):")] 
        public int Pregnant { get; set; }

        [Description("Stock: lactation status (0 if non-lactating or days since parturition):")]
        public int Lactating { get; set; }

        [Description("Stock: number of unweaned young:")]
        public int YoungNumber { get; set; }

        [Description("Stock: weight of unweaned young:")] 
        public double YoungWt { get; set; }

        [Separator("Grazing event information")]

        [Description("Paddock stocking rate (head/ha): ")] 
        public double StockingRate { get; set; }

        [Description("Initial location of the cows (give either the paddock name or 'Away'): ")] 
        public string CurrentLocation { get; set; }

        [Description("Standing biomass at which to bring the stock into the simulation (kg DM/ha): ")] 
        public double PreGrazingDM { get; set; }

        [Description("Don't move the stock onto the crop unless there is approx. X days of grazable forage available: ")] 
        public int MinGrazingDays { get; set; }

        [Description("Standing biomass at which to exit  stock from the simulation (kg DM/ha): ")] 
        public double PostGrazingDM { get; set; }

        [Description("Implement a no-grazing window? (tick for yes): ")] 
        public bool DoNoGrazingWindow { get; set; }

        [Description("Start of the no-grazing window (dd-MMM)")] 
        public string NoGrazeStart { get; set; }

        [Description("End of the no-grazing window (dd-MMM)")] 
        public string NoGrazeEnd { get; set; }

        [Separator("Supplementary feeding")]

        [Description("Name of the supplement to feed: ")] 
        public string SupplementName { get; set; }

        [Description("Feed the supplement first (i.e. before the new forage is available to the stock)?: ")] 
        public bool SupplementFirst { get; set; }

        [Description("Amount of supplementary feeding offered every day (kg DM /head /day): ")] 
        public double SupplementEveryDay { get; set; }

        [Description("Additional amount of supplement offered when available biomass is low (kg DM /head /day): ")] 
        public double SupplementOnPastureMass { get; set; }

        [Description("Trigger biomass for above rule (kg DM /ha): ")] 
        public double TriggerPastureMass { get; set; }

        public int NumStock { get; set; }
        public bool GrazingSeasonIsOpen { get; set; } // number of cows on the whole farm
        public double HarvestableBiomass { get; set; }
        public double HarvestableBiomassYesterday { get; set; }

        // Return a list of genotypes to the properties tab.
        public string[] GetGenotypes()
        {
            if (stock != null)
                return stock.Genotypes.Names.ToArray();
            return null;
        }

        [EventSubscribe("StartOfSimulation")]
        private void OnStartOfSimulation(object sender, EventArgs e)
        {

            //Debugger.Break();

            summary.WriteMessage(this, "Initialising the paddock information", MessageType.Diagnostic);

            NumStock = (int)(Math.Round(StockingRate * farm.Area, 0));

            if (CurrentLocation.ToLower() != "away")
            {
                BuyStock();
                stock.Move(CurrentLocation);
                summary.WriteMessage(this, " The Stock have been moved to " + CurrentLocation, MessageType.Diagnostic);
            }

            summary.WriteMessage(this, "     The number of animals has been rounded to " + NumStock + " from " + (StockingRate * farm.Area), MessageType.Diagnostic);
            summary.WriteMessage(this, "     The animals will begin in " + CurrentLocation + " which is paddock number " + CurrentLocationNum + " in the simulation", MessageType.Diagnostic);
            summary.WriteMessage(this, "     The area of the whole farm is " + farm.Area + " ha", MessageType.Diagnostic);

        }

        [EventSubscribe("DoManagement")]
        private void OnDoManagement(object sender, EventArgs e)
        {
            GrazingSeasonIsOpen = true;
            if (DoNoGrazingWindow)
                GrazingSeasonIsOpen = !DateUtilities.WithinDates(NoGrazeStart, clock.Today, NoGrazeEnd);

            bool sellSomeStock = false;
            if (!GrazingSeasonIsOpen)
                sellSomeStock = true;

            // Calculate forage mass in the paddock
            HarvestableBiomass = 0.0;
            foreach (var forage in forages)
                foreach (var forageOrgan in forage.Organs)
                    if (forageOrgan.IsAboveGround)
                        HarvestableBiomass += forageOrgan.Live.Wt + forageOrgan.Dead.Wt;
            
            HarvestableBiomass *= 10;  // Convert to kg/ha

            if (clock.Today == clock.StartDate)
                HarvestableBiomassYesterday = HarvestableBiomass;

            double deltaHarvestableBiomass = Math.Max(0.0, HarvestableBiomass - HarvestableBiomassYesterday);

            if (HarvestableBiomass <= PostGrazingDM)
                sellSomeStock = true;

            if (CurrentLocation == "Away")
                sellSomeStock = false;

            // The 0.03 is the propostion of body mass that the stock might eat
            double minFodder = Math.Max(PreGrazingDM, Math.Max(0.0, (0.03 * MinGrazingDays * NumStock * Weight) - (deltaHarvestableBiomass * MinGrazingDays))); 
            HarvestableBiomassYesterday = HarvestableBiomass;

            if (CurrentLocation == "Away" && (HarvestableBiomass >= PreGrazingDM) && HarvestableBiomass >= (PostGrazingDM + minFodder) && GrazingSeasonIsOpen)
            {
                CurrentLocation = paddocks[0].Name;
                CurrentLocationNum = paddocks[0].Index;
                BuyStock();
                stock.Move(CurrentLocation);
                summary.WriteMessage(this, "     Buying stock ", MessageType.Diagnostic);
            }

            if (sellSomeStock)
            {
                CurrentLocation = "Away";
                CurrentLocationNum = -1;
                SellStock();
                summary.WriteMessage(this, "     Selling stock ", MessageType.Diagnostic);
            }

            if (CurrentLocation != "Away")
            {
                if (SupplementEveryDay > 0)
                {
                    double silageOnHand = supplement.Stores[2 - 1].Stored;
                    if (silageOnHand < SupplementEveryDay * stock.NumberAll)
                    {
                        supplement.Buy(SupplementEveryDay * 30.0 * stock.NumberAll, SupplementName);  // i.e. 1 months worth
                        summary.WriteMessage(this, "SupplementEveryDay: Buying " + SupplementName + " of total amount : " + (SupplementEveryDay * 90 * stock.NumberAll) + " kg DM", MessageType.Diagnostic);
                    }
                    supplement.Feed(SupplementName, SupplementEveryDay * stock.NumberAll, CurrentLocation, SupplementFirst);
                }

                if (SupplementOnPastureMass > 0 && HarvestableBiomass <= TriggerPastureMass)
                {
                    double silageOnHand = supplement.Stores[2 - 1].Stored;
                    if (silageOnHand < SupplementOnPastureMass * stock.NumberAll)
                    {
                        supplement.Buy(SupplementOnPastureMass * 30.0 * stock.NumberAll, SupplementName);  // i.e. 1 months worth
                        summary.WriteMessage(this, "SupplementOnBiomass: Buying " + SupplementName + " of total amount : " + (SupplementOnPastureMass * 90 * stock.NumberAll) + " kg DM", MessageType.Diagnostic);
                    }
                    supplement.Feed(SupplementName, SupplementOnPastureMass * stock.NumberAll, CurrentLocation, SupplementFirst);
                }
            }
        }


        public void BuyStock()
        {
            CurrentGroupNum = stock.NoGroups + 1;
            StockBuy purchase = new StockBuy();
            purchase.Genotype = Genotype;
            purchase.Number = NumStock;
            purchase.Sex = Sex;
            purchase.Age = Age;       // age in months
            purchase.Weight = Weight;  // live weight in kg
            purchase.UseTag = CurrentGroupNum + 1;
            purchase.MatedTo = purchase.Genotype;
            purchase.Pregnant = Pregnant;  // days pregnant, 0 = non pregnant, 1 = pregnant
            purchase.Lactating = Lactating;  // 0 for dry, 1 for lactating
            purchase.NumYoung = YoungNumber;
            purchase.YoungWt = YoungWt;

            stock.Buy(purchase);
        }

        public void SellStock()
        {
            int NumGroups = stock.NoGroups;

            NumGroups = stock.NoGroups;
            for (int gg = 1; gg <= NumGroups; gg++)
            {
                stock.Sell(stock.Number[gg - 1]);
            }
        }
    }
}
```
      Zone Field: Area=1; Slope=0; AspectAngle=0; Altitude=50
        Manager SowingRule
          StartDate = 1-nov
          EndDate = 31-jan
          MinESW = 50
          MinRain = 30
          RainDays = 5
          mustSow = yes
          SowingFreq = 3
          CultivarName = Buster
          SowingDepth = 10
          RowSpacing = 150
          Population = 200
          Amount = 60
```csharp
using Models.Interfaces;
using System.Linq;
using System;
using Models.Core;
using Models.PMF;
using Models.Soils;
using Models.Utilities;
using APSIM.Shared.Utilities;
using Models.Climate;

namespace Models
{
    [Serializable]
    public class Script : Model
    {
        [Link] private Clock Clock;
        [Link] private Fertiliser Fertiliser;
        [Link] private Summary Summary;
        [Link(ByName = true)] private Plant sorghum;
        [Link] private Soil Soil;
        private Accumulator accumulatedRain;
        [Link]
        private ISoilWater waterBalance;

        [Separator("======= Sowing conditions =======")]
        [Description("Start of sowing window (dd-mmm)")] public string StartDate { get; set;}
        [Description("End of sowing window (dd-mmm)")] public string EndDate { get; set;}
        [Description("Minimum extractable soil water for sowing (mm)")] public double MinESW { get; set;}
        [Description("Accumulated rainfall required for sowing (mm)")] public double MinRain { get; set;}
        [Description("Duration of rainfall accumulation (d)")] public int RainDays { get; set;}
        [Description("Must sow at the end of the window?")] public answerType mustSow { get; set; }
        [Description("Frequency of sowing (years)")] public int SowingFreq { get; set; }
    

        [Separator("======= Sowing data =======")]
        [Description("Cultivar to be sown")]
        [Display(Type = DisplayType.CultivarName)]
        public string CultivarName { get; set;}
        [Description("Sowing depth (mm)")] public double SowingDepth { get; set;}        
        [Description("Row spacing (mm)")] public double RowSpacing { get; set;}    
        [Description("Plant population (/m2)")] public double Population { get; set;}    

        [Separator("======= Sowing fertiliser =======")]
        [Description("Amount of fertiliser to be applied (kg/ha)")] public double Amount { get; set;}

        public double CropAge { get; set; }

           public enum answerType
        {
            /// <summary>a positive answer</summary>
            yes,
            /// <summary>a negative answer</summary>
            no
        }

        
        [EventSubscribe("StartOfSimulation")]
        private void OnSimulationCommencing(object sender, EventArgs e)
        {
            accumulatedRain = new Accumulator(this, "[Weather].Rain", RainDays);
            CropAge = SowingFreq + 1.0;
        }
        

        [EventSubscribe("DoManagement")]
        private void OnDoManagement(object sender, EventArgs e)
        {
            accumulatedRain.Update();
            CropAge += 1.0 / 365.25;

            bool doSowing = false;
            if (DateUtilities.WithinDates(StartDate,Clock.Today,EndDate) && !sorghum.IsAlive)
                doSowing = true;
            if ((MathUtilities.Sum(waterBalance.ESW) < MinESW) || (accumulatedRain.Sum < MinRain))
                doSowing = false;
            if ((mustSow == answerType.yes) && (DateUtilities.DatesEqual(EndDate, Clock.Today)))
                doSowing = true;
            if (CropAge < SowingFreq)
                doSowing = false;
            
            if (doSowing)
            {
               sorghum.Sow(population:Population, cultivar:CultivarName, depth:SowingDepth, rowSpacing:RowSpacing);
               Fertiliser.Apply(Amount: Amount, Type: Fertiliser.Types.NO3N);    
               CropAge = 0.0;
            }
        
        }
        
    }
}
```
        Manager AutomaticIrrigation
          allowIrrigation = True
          seasonStart = 15-Sep
          seasonEnd = 30-Apr
          seasonsAllocation = 10000
          triggerDeficit = 75
          targetDeficit = 95
          returndays = 3
          maximumAmount = 15
          depthPAWC = 500
```csharp
using Newtonsoft.Json;
using Models.PMF.Phen;
using APSIM.Shared.Utilities;
using System.Xml.Serialization;
using Models.Soils;
using Models.PMF;
using Models.Core;
using System;
using System.Linq;
using Models.Interfaces;

        
namespace Models
{
    [Serializable] 
    [System.Xml.Serialization.XmlInclude(typeof(Model))]
    public class Script : Model
    {
        [Link] private ISummary summary;
        [Link] private Irrigation Irrigation;
        [Link] private Clock Clock;
        [Link] private Soil Soil;
        [Link(ByName = true)] private Plant sorghum;
        private DateTime StartDate;
        private DateTime EndDate;
        private double TopDUL;
        private double TopLL;
        private int nLayers;
        [Link]
        private IPhysical soilPhysical;
        [Link]
        private ISoilWater waterBalance;
        //Communication to other modules
       
        //User inputs from properties tab
        [Description("Turn irrigation on?")]
        public bool allowIrrigation { get; set; }
        [Description("Start of irrigation season (dd-MMM)")]
        public string seasonStart { get; set; }
        [Description("End of irrigation season (dd-MMM)")]
        public string seasonEnd { get; set; }
        [Description("Season allocation (mm)")]
        public double seasonsAllocation { get; set; }
        [Description("Deficit to trigger irrigation (% PAWC)")]
        public double triggerDeficit { get; set; }
        [Description("Deficit to stop irrigaton (% PAWC)")]
        public double targetDeficit { get; set; }
        [Description("Minimum days for irrigation to return")]
        public double returndays { get; set; }
        [Description("Maximum irrigation application (mm/day)")]
        public double maximumAmount { get; set; }
        [Description("Depth to calculate PAWC (mm)")]
        public double depthPAWC { get; set; }
       
        //Class members
        [JsonIgnore] public double TopSWdeficit { get; set; }
        [JsonIgnore] public double TopSWC { get; set; }
        [JsonIgnore] public double DaysSinceIrrigation { get; set; }
        [JsonIgnore] public double AmountToApply { get; set; }
        [JsonIgnore] public double SeasonAppliedAmount { get; set; }
        
        private bool IrrigationIsAllowed { get; set; }
        private bool SeasonIsOpen { get; set; }
        private bool CropIsActive { get; set; }
        private bool IrrigatorIsAvailable { get; set; }
        private bool SoilIsDry { get; set; }

    
        //Calculate static soil variables
        [EventSubscribe("StartOfSimulation")]
        private void OnStartOfSimulation(object sender, EventArgs e)
        {   
            //Set the season dates
            StartDate = DateTime.Parse(seasonStart + "-" + Clock.Today.Year.ToString());
            EndDate = DateTime.Parse(seasonEnd + "-" + Clock.Today.Year.ToString());
            
            //Can we irrigate at all?
            IrrigationIsAllowed = false; 
            if (allowIrrigation)
                IrrigationIsAllowed = true; 

            //Calculate soil water variables
            double depthFromSurface = 0.0;
            double fracLayer = 0.0;
            nLayers = soilPhysical.Thickness.Length;
            for (int layer = 0; layer < nLayers; layer++)
            {
                fracLayer = Math.Min(1.0, (depthPAWC - depthFromSurface) / soilPhysical.Thickness[layer]);
                TopLL += soilPhysical.LL15mm[layer] * fracLayer;
                TopDUL += soilPhysical.DULmm[layer] * fracLayer;
                depthFromSurface += soilPhysical.Thickness[layer];
                if (depthFromSurface >= depthPAWC)
                    layer = nLayers;
            }
        }
             
        //Determine daily requirement for irrigation
        [EventSubscribe("StartOfDay")]
        private void OnStartOfDay(object sender, EventArgs e)
        {
            //Can we irrigate today?          
            SeasonIsOpen = isBetween(Clock.Today, StartDate, EndDate);

            //Is there a crop in the ground that needs irrigation?
            CropIsActive = false;
            if ((sorghum != null) && (sorghum.IsAlive))
                CropIsActive = true;
          
            //Is the irrigator available?
            IrrigatorIsAvailable = false;
            DaysSinceIrrigation += 1;
            if (DaysSinceIrrigation >= returndays)
                IrrigatorIsAvailable = true;
          
            //Is the soil dry enough to require irrigation?
            SoilIsDry = false;
            double depthFromSurface = 0.0;
            double fracLayer = 0.0;
            TopSWC = 0.0;
            for (int layer = 0; layer < nLayers; layer++)
            {
                fracLayer = Math.Min(1.0, (depthPAWC - depthFromSurface) / soilPhysical.Thickness[layer]);
                TopSWC += waterBalance.SWmm[layer] * fracLayer;
                depthFromSurface += soilPhysical.Thickness[layer];
                if (depthFromSurface >= depthPAWC)
                    layer = nLayers;
            }
            
            TopSWdeficit = TopSWC - TopDUL;
            if (Math.Max(0.0, -TopSWdeficit) >= (TopDUL - TopLL) * (100 - triggerDeficit) / 100)
                SoilIsDry = true;
                
            //Are all the conditions ratifying irrigation
            if (IrrigationIsAllowed && SeasonIsOpen && CropIsActive && IrrigatorIsAvailable && SoilIsDry)
            {
                //Lets bloody well irrigate then!!!!
                AmountToApply = TopDUL * targetDeficit / 100 - TopSWC;
                //AmountToApply = Math.Max(0.0, Math.Min(AmountToApply, seasonsAllocation - SeasonAppliedAmount));
                AmountToApply = maximumAmount;
                Irrigation.Apply(AmountToApply);
                DaysSinceIrrigation = 0;
                SeasonAppliedAmount += AmountToApply;
            }
        }
        
        ///Checks whether theDate is between iniDate and endDate (non-year specific)
        private bool isBetween(DateTime theDay, DateTime iniDate, DateTime endDate)
        {
            bool result = false;
            if (iniDate.DayOfYear < endDate.DayOfYear)
            {
                // period is within one year, ex: summer in the northern hemisphere
                if ((theDay.DayOfYear >= iniDate.DayOfYear) && (theDay.DayOfYear <= endDate.DayOfYear))
                    result = true;
            }
            else
            {
                // period goes over the end of the year, ex: summer in the southern hemisphere
                if ((theDay.DayOfYear >= iniDate.DayOfYear) || (theDay.DayOfYear <= endDate.DayOfYear))
                    result = true;
            }
            
            return result;
        }
    }
}
```
        Manager Fertilise on fixed dates
          EachYear = True
          Dates = 20-sep, 20-nov, 20-jan, 20-mar
          UseCritNThreshold = False
          CritNThreshold = 50
          CritNDepth = 75
          Depth = 50
          Amount = 30
          FertiliserType = UreaN
```csharp
using Models.Interfaces;
using System.Linq;
using APSIM.Shared.Utilities;
using Models.PMF;
using Models.Soils;
using Models.Core;
using System;
using Models.Soils.Nutrients;

namespace Models
{
    [Serializable]
    public class Script : Model
    {
        [Link] private Clock clock;
        [Link] private Fertiliser fertiliser;
        [Link] private ISummary summary;
        [Link] private Soil soil;
        private Nutrient nutrient;
        private SoilNitrogen soilN;
        [Link]
        private IPhysical soilPhysical;


        [Separator("Fertiliser will be applied on the date(s) below")]
        [Description("Apply fertiliser on the same day(s) each year? If no, then must include the year of appliaction below")]
        public bool EachYear { get; set; }

        [Description("Dates for one or more fertiliser applications (dd-mmm or dd-mmm-yyyy) as a list with a comma between dates")]
        public string[] Dates { get; set; }

        [Separator("Test for the mineral N in the soil and don't apply the fertiliser if greater than X kgN/ha is stored in the soil above a depth of Y mm")]
        [Description("Use a critical soil mineral N to prevent application above a threshold?")]
        public bool UseCritNThreshold { get; set; }

        [Description("Don't add fertiliser if N in the soil to the depth below exceeds (kg/ha)")]
        public double CritNThreshold { get; set; }

        [Description("Depth to which the amount of N in the soil should be calculated (mm)")]
        public double CritNDepth { get; set; }

        [Separator("Fertiliser application details")]
        [Description("Depth at which to apply the fertiliser (mm)")]
        public double Depth { get; set; }

        [Description("Amount of fertiliser to apply (kg N /ha) per application")]
        public double Amount { get; set; }

        [Description("Fertiliser type - select from the list")]
        public Fertiliser.Types FertiliserType { get; set; }


        [EventSubscribe("StartOfSimulation")]
        private void FindSoilNOrNutrient(object sender, EventArgs e)
        {
            nutrient = this.FindInScope<Nutrient>() as Nutrient;
            soilN = this.FindInScope<SoilNitrogen>() as SoilNitrogen;

            if (nutrient == null && soilN == null)
                throw new Exception(string.Format("Error in script {0}: Unable to find nutrient or soilN.", Name));
        }

        [EventSubscribe("DoManagement")]
        private void OnDoManagement(object sender, EventArgs e)
        {
            if (OnApplicationDate())
            {
                if (NContentBelowThreshold())
                    fertiliser.Apply(Amount, FertiliserType, Depth);
                else
                    summary.WriteMessage(this, "Skipping fertiliser application due to soil mineral N content being above critical threshold.", MessageType.Diagnostic);
            }
        }

        /// <summary>Checks if today's date is one of the specified fertiliser application dates.</summary>
        private bool OnApplicationDate()
        {
            if (EachYear)
                return Dates.Any(d => DateUtilities.DatesEqual(d, clock.Today));
            
            DateTime[] dates = Dates.Select(d => DateTime.ParseExact(d, "d-MMM-yyyy", null)).ToArray();
            return dates.Any(d => SameDate(d, clock.Today));
        }

        /// <summary>Checks if N content in soil is below critical threshold.</summary>
        private bool NContentBelowThreshold()
        {
            if (!UseCritNThreshold)
                return true;
            
            double[] weights = GetLayerWeights();
            double cumSoilN = 0;

            for (int i = 0; i < soilPhysical.Thickness.Length; i++)
            {
                if (nutrient != null)
                    cumSoilN += weights[i] * nutrient.MineralN[i];
                else if (soilN != null)
                    cumSoilN += weights[i] * soilN.mineral_n[i];
            }

            return cumSoilN <= CritNThreshold;
        }

        private double[] GetLayerWeights()
        {
            double[] weights = new double[soilPhysical.Thickness.Length];
            double cumDepth = 0;

            for (int i = 0; i < soilPhysical.Thickness.Length; i++)
            {
                cumDepth += soilPhysical.Thickness[i];
                if (cumDepth < CritNDepth)
                    weights[i] = 1;
                else if (cumDepth - soilPhysical.Thickness[i] <= CritNDepth)
                    weights[i] = (CritNDepth - (cumDepth - soilPhysical.Thickness[i])) / soilPhysical.Thickness[i];
                else
                    weights[i] = 0;
            }

            return weights;
        }

        private bool SameDate(DateTime d1, DateTime d2)
        {
            return d1.Year == d2.Year && d1.DayOfYear == d2.DayOfYear;
        }
    }
}
```
        Irrigation
        Fertiliser
        SurfaceOrganicMatter: InitialResidueName=grass; InitialResidueType=grass; InitialResidueMass=500; InitialStandingFraction=0; InitialCPR=0; InitialCNR=40
        Soil HRS: SoilType=HMM; Site=HRS; NearestTown=Unknown; Region=SE Queensland; NaturalVegetation=Unknown; Latitude=0; Longitude=0
          Physical
            Thickness  BD    AirDry  LL15   DUL   SAT
            100        1.34  0.08    0.226  0.42  0.45
            100        1.34  0.19    0.226  0.42  0.45
            200        1.33  0.23    0.258  0.46  0.48
            200        1.38  0.26    0.27   0.46  0.47
            200        1.4   0.26    0.268  0.43  0.45
            200        1.55  0.28    0.304  0.4   0.41
            200        1.59  0.25    0.335  0.37  0.38
            200        1.63  0.28    0.33   0.33  0.37
            200        1.66  0.3     0.32   0.32  0.37
            200        1.68  0.31    0.33   0.33  0.36
            SoilCrop SorghumSoil
              LL=[0.226, 0.226, 0.258, 0.27, 0.268, 0.304, 0.335, 0.33, 0.32, 0.33]
              KL=[0.07, 0.07, 0.07, 0.07, 0.06, 0.06, 0.06, 0.05, 0.05, 0.04]
              XF=[1, 1, 1, 1, 1, 1, 1, 1, 1, 1]
          WaterBalance SoilWater: SummerDate=1-Nov; SummerU=1.5; SummerCona=6.5; WinterDate=1-Apr; WinterU=1.5; WinterCona=6.5; DiffusConst=40; DiffusSlope=16; Salb=0.2; CN2Bare=85; CNRed=20; CNCov=0.8; PSIDul=-100; Thickness=[100, 100, 200, 200, 200, 200, 200, 200, 200, 200]; SWCON=[0.3, 0.3, 0.3, 0.3, 0.3, 0.3, 0.3, 0.3, 0.3, 0.3]
          Organic: FOMCNRatio=50; CarbonUnits=Total
            Thickness  Carbon  SoilCNRatio  FBiom  FInert  FOM
            100        1.19    12.5         0.05   0.45    260.587
            100        0.59    12.5         0.02   0.6     220.582
            200        0.45    12.5         0.01   0.75    158.054
            200        0.3     12.5         0.01   0.9     113.251
            200        0.2     12.5         0.01   0.9     81.1478
            200        0.16    12.5         0.01   0.9     58.1449
            200        0.17    12.5         0.01   0.9     41.6626
            200        0.17    12.5         0.05   0.9     29.8526
            200        0.17    12.5         0.02   0.9     21.3903
            200        0.17    12.5         0.01   0.9     15.3268
          Chemical: Thickness=[100, 100, 200, 200, 200, 200, 200, 200, 200, 200]; PH=[6.3, 6.4, 6.5, 6.6, 6.6, 6.5, 6.5, 6.5, 6.5, 6.5]; PHUnits=Water
          Water: Thickness=[100, 100, 200, 200, 200, 200, 200, 200, 200, 200]; FilledFromTop=false
            InitialValues=[0.235, 0.252, 0.27, 0.3, 0.268, 0.304, 0.335, 0.33, 0.32, 0.33]
          CERESSoilTemperature Temperature
          SoilNitrogen: fom_types=[default, manure, mucuna, lablab, shemp, stable]; fract_carb=[0.2, 0.3, 0.54, 0.57, 0.45, 0]; fract_cell=[0.7, 0.3, 0.37, 0.37, 0.47, 0.1]; fract_lign=[0.1, 0.4, 0.09, 0.06, 0.08, 0.9]; NPartitionApproach=0
          SoilNitrogenNO3 NO3: Thickness=[100, 100, 200, 200, 200, 200, 200, 200, 200, 200]; InitialValuesUnits=ppm; WaterTableConcentration=0; D0=0
            InitialValues=[10.4, 1.633, 1.233, 0.9, 1.1, 1.467, 3.633, 5.667, 5.8, 7.267]
          SoilNitrogenNH4 NH4: Thickness=[100, 100, 200, 200, 200, 200, 200, 200, 200, 200]; InitialValues=[0.1, 0.1, 0.1, 0.1, 0.1, 0.1, 0.1, 0.1, 0.1, 0.1]; InitialValuesUnits=ppm; WaterTableConcentration=0; D0=0
          SoilNitrogenUrea Urea: Thickness=[100, 100, 200, 200, 200, 200, 200, 200, 200, 200]; InitialValues=[0, 0, 0, 0, 0, 0, 0, 0, 0, 0]; InitialValuesUnits=kg/ha; WaterTableConcentration=0; D0=0
        Plant Sorghum: IsEnding=false; DaysAfterEnding=0
      Report GrazingReport: EventNames=[Clock].EndOfDay
        VariableNames:
          [Clock].Today as Date
          Mean of [Stock].NumberAll from [Report].DayAfterLastOutput to [Clock].Today as NumStock
          Mean of [Stock].IntakeAll.Weight from [Report].DayAfterLastOutput to [Clock].Today as AveDMIntake
          Mean of [Stock].MEIntakeAll from [Report].DayAfterLastOutput to [Clock].Today as AveMEIntake
          Mean of [Stock].WeightAll from [Report].DayAfterLastOutput to [Clock].Today as AveBodyMass
          Mean of [Stock].CondScoreAll from [Report].DayAfterLastOutput to [Clock].Today as AveConditionScore
          Mean of [Stock].MilkWtAll from [Report].DayAfterLastOutput to [Clock].Today as AveMilkWeight4pcCorr
          Mean of ([Stock].MilkWtAll * 0.04 * 1.8) from [Report].DayAfterLastOutput to [Clock].Today as AveMilkSolids // note the "0.04" is to convert the 4% fat corrected to dry milk fat, the "1.8" is on the assumption that protein is 80% of the fat content
          Last of [GrazeForageCrop].Script.HarvestableBiomass from [Report].DayAfterLastOutput to [Clock].Today as HarvestableBiomass
          Last of [Supplement].stores[2].Stored from [Report].DayAfterLastOutput to [Clock].Today as SupplementRemaining
          Last of [Field].Sorghum.AboveGround.Wt * 10.0 from [Report].DayAfterLastOutput to [Clock].Today as SorghumMass
          Last of [Field].Sorghum.Leaf.LAI from [Report].DayAfterLastOutput to [Clock].Today as SorghumLAI
          Last of [Field].Sorghum.AboveGround.N * 10.0 from [Report].DayAfterLastOutput to [Clock].Today as SorghumN
          //Last of [GrazeForageCrop].Script.CurrentLocation from [Report].DayAfterLastOutput to [Clock].Today as StockLocation
          [GrazeForageCrop].Script.CurrentLocation as StockLocation
      Memo Memo1
        The first plots shows the location of the stock (on the paddock or ‘away’), the grazable biomass in the paddock and the supplement remaining in the store. The second plot shows average body mass and average dry matter intake. Note how body mass resets to a consistent value at the start of each grazing event. This is because a new mob of animals is bought at the start of each grazing event.

        The shaded area behind the plots shows the location of the stock (get this to show but adding a "ShadedBarsOnGraph" model to a Graph|Series). Clicking on one of the shaded areas will pop up the name of the location.
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