Simulations: Version=101
  DataStore
  Memo
    This sensibility test explores dual-purpose wheat in a high rainfall livestock system in south-eastern Australia.

    It is based on:

    _Sprague SJ, Kirkegaard JA, Dove H, Graham JM, McDonald SE, Kelman WM (2015) **Integrating dual-purpose wheat and canola into high-rainfall livestock systems in south-eastern Australia. 1. Crop forage and grain yield.** Crop and Pasture Science 66(4), 365-376._

    **Simulation 1**

    _Sheep grazing wheat and fed in feedlot_

    In this example simulation sheep are bought and sold on specified date.
    They are fed supplement in a feedlot at a set rate, but graze a wheat crop when crop biomass >= 2.4 t/ha.
    Sheep are moved from the wheat crop and back to feedlot when crop biomass reaches 0.5 t/ha or crop zadok = 31.

    _Activities in this manager:_

    1. Buy animals at start of year & put in feedlot
    2. Move animals from feedlot to crop when ready to graze
    3. Move animals from crop to feedlot
    4. Shear all animals on specified date
    5. Sell all animals at end of year

    _NOTES_

    1. When the animals are in the feedlot and an animal dies during the day, the supplement has already been fed into the feedlot
       based on the number of animals in the feedlot at the start of the day. This means the remaining animals have access to slightly
       more supplement and causes a spike in supp intake graph.
    2. When sheep are culled for age + purchased to maintain stocking rate, several groups of sheep are created.
       This causes irregular amounts of supplement to be fed.

    **Experiment**

    The experiment shows the impact of grazing on the wheat crop. It uses the same _WheatSheepFeedlot_ simulation and has two experiment treatments, grazing on and off.

    The graph at the bottom shows wheat biomass with and without grazing.
  Simulation WheatSheepFeedlot
    Memo
      Di Mayberry (10/5/18)

      **Sheep grazing wheat and fed in feedlot**

      In this example simulation sheep are bought and sold on specified date.
      They are fed supplement in a feedlot at a set rate, but graze a wheat crop when crop biomass >= 2.4 t/ha.
      Sheep are moved from the wheat crop and back to feedlot when crop biomass reaches 0.5 t/ha or crop zadok = 31.

      Based on _Sprague SJ, Kirkegaard JA, Dove H, Graham JM, McDonald SE, Kelman WM (2015) Integrating dual-purpose wheat and canola into high-rainfall livestock systems in south-eastern Australia. 1. Crop forage and grain yield. Crop and Pasture Science 66(4), 365-376._

      **Activities in this manager:**

      1. Buy animals at start of year & put in feedlot
      2. Move animals from feedlot to crop when ready to graze
      3. Move animals from crop to feedlot
      4. Shear all animals on specified date
      5. Sell all animals at end of year

      **NOTES**

      1. When the animals are in the feedlot and an animal dies during the day, the supplement has already been fed into the feedlot
         based on the number of animals in the feedlot at the start of the day. This means the remaining animals have access to slightly
         more supplement and causes a spike in supp intake graph.
      2. When sheep are culled for age + purchased to maintain stocking rate, several groups of sheep are created.
         This causes irregular amounts of supplement to be fed.
    Clock: Start=2000-01-01; End=2012-12-31
    Summary SummaryFile
    Weather
      FileName=C:\Users\holzworthdp\Repos\ApsimX\Tests\WeatherFiles\Ginninderra.met
    SoilArbitrator
    Stock: RandSeed=9999
    Supplement: SpoilageTime=0
      Stores:
        Name            Stored  IsRoughage  DMContent  DMD  MEContent  CPConc  ProtDg  PConc   SConc   EEConc  ADIP2CP  AshAlk  MaxPassage
        fodder          0       true        0.85       0    0          0       0       0       0       0       0        0       0
        wheat, crushed  500     false       1          0.9  13.8       0.14    0.92    0.0038  0.0014  0.02    0.02     0.18    0
    Manager ManageStock
      DateToBuy = 1-Jan
      NumberToBuy = 50
      GenotypeToBuy = Small Merino
      ReproductiveStatusToBuy = Female
      AgeToBuy = 12
      WeightToBuy = 30
      DateToSell = 20-Dec
      AgeToSell = 3
      DateToShear = 15-Dec
      FieldZone = [WheatSheep]
      FeedlotZone = [Feedlot]
      ExpressionToMoveAnimalsToField = Wheat.Phenology.Zadok > 0 && Wheat.Phenology.Zadok < 31 && Wheat.AboveGround.Wt >= 240
      ExpressionToMoveAnimalsToFeedlot = Wheat.Phenology.Zadok >= 31 || Wheat.AboveGround.Wt <= 50
```csharp
/*-------------------------------------------------------------------------------------
Sheep grazing wheat when conditions are suitable, and in feedlot the rest of the time.
---------------------------------------------------------------------------------------

In this example simulation sheep are bought and sold on specified date.
They are fed supplement in a feedlot at a set rate, but graze a wheat crop when crop biomass >= 2.4 t/ha.
Sheep are moved from the wheat crop and back to feedlot when crop biomass reaches 0.5 t/ha or crop zadok = 31.

Based on Sprague SJ, Kirkegaard JA, Dove H, Graham JM, McDonald SE, Kelman WM (2015) Integrating dual-purpose wheat and canola into high-rainfall livestock systems in south-eastern Australia. 1. Crop forage and grain yield. Crop and Pasture Science 66(4), 365-376. 

Activities in this manager:
1. Buy animals at start of year & put in feedlot
2. Move animals from feedlot to crop when ready to graze
3. Move animals from crop to feedlot 
4. Shear all animals on specified date
5. Sell all animals at end of year

NOTES
1. When the animals are in the feedlot and an animal dies during the day, the supplement has already been fed into the feedlot
   based on the number of animals in the feedlot at the start of the day. This means the remaining animals have access to slightly
   more supplement and causes a spike in supp intake graph.
2. When sheep are culled for age + purchased to maintain stocking rate, several groups of sheep are created.
   This causes irregular amounts of supplement to be fed.
--------------------------------------------------------------------------------------*/


using APSIM.Shared.Utilities;
using Models.GrazPlan;
using Models.Utilities;
using Models.Soils;
using Models.PMF;
using Models.PMF.Phen;
using Models.Core;
using Models.Functions;
using System;
using System.Linq;

namespace Models
{
    [Serializable]
    public class Script : Model
    {
        [Link] Clock Clock;
        [Link] Stock Animals;
        [Link] Summary Summary;
        [Link] Plant Wheat;
        [Link] Soil Soil; 
        [Link] Zone Paddock;
        [Link] ScriptCompiler compiler = null;

        [NonSerialized]
        private CSharpExpressionFunction expressionMoveAnimalsToField;
        [NonSerialized]
        private CSharpExpressionFunction expressionMoveAnimalsToFeedlot;

        [Separator("Buy properties")]
        [Description("Date to buy animals (dd-mmm)")]
        public string DateToBuy { get; set; }

        [Description("Number of animals to buy")]
        public int NumberToBuy { get; set; }

        [Description("Genotype of animals to buy")]
        public string GenotypeToBuy { get; set; }

        [Description("Reproductive status of animals to buy")]
        public ReproductiveType ReproductiveStatusToBuy { get; set; }

        [Description("Age of animals to buy (months)")]
        public int AgeToBuy { get; set; }

        [Description("Weight of animals to buy (kg)")]
        public double WeightToBuy { get; set; }

        [Separator("Sell properties")]
        [Description("Date to potentially sell animals (dd-mmm)")]
        public string DateToSell { get; set; }

        [Description("Age to sell animals (years)")]
        public double AgeToSell { get; set; }

        [Separator("Shear properties")]
        [Description("Date to shear animals (dd-mmm)")]
        public string DateToShear { get; set; }


        [Separator("Moving animals to field")]
   		[Description("Name of field to move animals to")]
		[Display(Type=DisplayType.Model, ModelType=typeof(Zone))]
		public IModel FieldZone { get; set; }

   		[Description("Name of zone representing the feedlot")]
		[Display(Type=DisplayType.Model, ModelType=typeof(Zone))]
		public IModel FeedlotZone { get; set; }

   		[Description("Criteria to move animals to field")]
		public string ExpressionToMoveAnimalsToField { get; set; }

   		[Description("Criteria to move animals to feedlot")]
		public string ExpressionToMoveAnimalsToFeedlot { get; set; }


		// ============================================================
		// Called once at beginning of simulation run
		// ============================================================
        [EventSubscribe("StartOfSimulation")]
        private void OnStartOfSimulation(object sender, EventArgs e)
        {
	        if (string.IsNullOrEmpty(ExpressionToMoveAnimalsToField))
		        throw new Exception("You must specify a criteria for moving animals to the field");
	        expressionMoveAnimalsToField = new CSharpExpressionFunction();
	        expressionMoveAnimalsToField.Parent = this;
	        expressionMoveAnimalsToField.Expression = "Convert.ToDouble(" + ExpressionToMoveAnimalsToField + ")";
	        expressionMoveAnimalsToField.SetCompiler(compiler);
	        expressionMoveAnimalsToField.CompileExpression();

	        if (string.IsNullOrEmpty(ExpressionToMoveAnimalsToFeedlot))
		        throw new Exception("You must specify a criteria for moving animals to the feedlot");
	        expressionMoveAnimalsToFeedlot = new CSharpExpressionFunction();
	        expressionMoveAnimalsToFeedlot.Parent = this;
	        expressionMoveAnimalsToFeedlot.Expression = "Convert.ToDouble(" + ExpressionToMoveAnimalsToFeedlot + ")";
	        expressionMoveAnimalsToFeedlot.SetCompiler(compiler);
	        expressionMoveAnimalsToFeedlot.CompileExpression();
        }


		// ============================================================
		// Called every day to perform management actions
		// ============================================================
        [EventSubscribe("DoManagement")]
        private void OnDoManagement(object sender, EventArgs e)
        {
        	// purchase animals annually
            if (NumberToBuy > 0 && DateUtilities.DatesEqual(DateToBuy, Clock.Today))
            {
                StockBuy purchase = new StockBuy();
                purchase.Genotype = GenotypeToBuy;
                purchase.Number = NumberToBuy;
                purchase.Sex = ReproductiveStatusToBuy;
                purchase.Age = AgeToBuy;
                purchase.Weight = WeightToBuy;

                Animals.Buy(purchase);
                var newAnimalGroup = Animals.AnimalGroups.Last();         // Get the group of animals just bought.
                Animals.Move(FeedlotZone.Name, newAnimalGroup);           // Paddock where animals go after purchase
            }

            if (Animals.NumberAll > 0)
            {
	            // Determine where the animals are currently.
	            bool animalsAreInFeedlot = Animals.AnimalGroups.FirstOrDefault(group => group.PaddOccupied.Name == FeedlotZone.Name) != null;

	            if (animalsAreInFeedlot)
	            {
	           		// Animals are in feedlot. Determine if they can be moved to paddock.
	            	if (expressionMoveAnimalsToField.Value() == 1)
	            		Animals.Move(FieldZone.Name);
	            }
	            else
	            {
	            	// Animals are in paddock. Determine if they need to be moved to feedlot.
	            	if (expressionMoveAnimalsToFeedlot.Value() == 1)
	                	Animals.Move(FeedlotZone.Name);
	            }

		        // Shear all animals on specified date
	            if (DateUtilities.DatesEqual(DateToShear, Clock.Today))
	                Animals.Shear(shearAdults:true, shearYoung:true);

	            // Sell cast for age animals on specified date
	            if (DateUtilities.DatesEqual(DateToSell, Clock.Today))
	            {
	                // split older animals into a new group
                    Animals.SplitByAge(Convert.ToInt32(365 * AgeToSell));

	                // sell older animals
	                foreach (var animalGroup in Animals.AnimalGroups)
	                    if (animalGroup.NoAnimals > 0 && animalGroup.AgeDays >= 365 * AgeToSell)
	                        Animals.Sell(animalGroup.NoAnimals, animalGroup);
	            }
            }
        }
    }
}
```
    Manager ManageSupplement
      FeedlotZone = [Feedlot]
      SupplementAmount = 0.5
      SupplementType = wheat, crushed
```csharp
using APSIM.Shared.Utilities;
using Models.GrazPlan;
using Models.Utilities;
using Models.Soils;
using Models.PMF;
using Models.Core;
using System;
using System.Linq;
using System.Diagnostics;

namespace Models
{
	[Description(
	"<b>Sheep grazing wheat when conditions are suitable, and in feedlot fed supplement the rest of the time.</b>" +
	"<li>When animals are in feedlot, they are fed a set amount each day.</li>" +
	"<li>Will restock the supplement store when the store reaches a minimum level.</li>"
	)]
	[Serializable]
	public class ManageSupplement : Model
	{
	    [Link] Clock clock;
		[Link] Stock animals;
		[Link] Supplement supplement;

		[Description("Name of zone representing the feedlot")]
		[Display(Type=DisplayType.Model, ModelType=typeof(Zone))]
		public IModel FeedlotZone { get; set; }

		[Description("The amount of suppliment to feed each animal each day (kg)")]
		public double SupplementAmount { get; set; }

		[Description("The type of suppliment to feed the animals")]
		public string SupplementType { get; set; }

		// ============================================================
		// Called every day to perform management actions
		// ============================================================
		[EventSubscribe("DoManagement")]
		private void OnDoManagement(object sender, EventArgs e)
		{
			if (clock.Today == new DateTime(1992,1,31))
				Debugger.Break();

			// Determine how many animals are in feedlot.
			var animalGroupsInFeedlot = animals.AnimalGroups.Where(group => group.PaddOccupied.Name == FeedlotZone.Name);
			var totalNumAnimalsInFeedlot = animalGroupsInFeedlot.Sum(group => group.NoAnimals);

			// If there are animals in feedlot then feed them.
			if (totalNumAnimalsInFeedlot > 0)
				supplement.Feed(SupplementType, SupplementAmount * totalNumAnimalsInFeedlot, FeedlotZone.Name);     

			// Restock the supplement store if amount falls below 500 kg/ha
			if (supplement.Stores[1].Stored <= 500)       
				supplement.Buy(5000, SupplementType);
		}
	}
}
```
    Report ReportSupplement: EventNames=[Clock].EndOfDay
      VariableNames:
        [Clock].Today
        [Stock].Paddock as StockLocation
        [Stock].NumberAll
        [stock].IntakeAll.Weight as Intake //(kg)
        [Supplement].Name
        [Supplement].stores[2].Stored as SupplementStored // (kg)
        [Stock].SuppIntakeAll.Weight as SupplementIntake //(kg)
        [stock].SuppEaten as TotalSuppIntake //(kg)
        [stock].SuppIntake
    Report ReportStock: EventNames=[Clock].EndOfDay
      VariableNames:
        [Clock].Today
        [Stock].Paddock
        [Stock].Number as No_sheep
        [Stock].NumberAll
        [Stock].NumberAll / [WheatSheep].Area as Stockrate //(sheep/ha)
        [Stock].Weight as SheepWeight // (kg)
        [Stock].Age/30.4 as SheepAge //(month)
        [Stock].NoGroups
    Report ReportBiomass: EventNames=[Clock].EndOfDay
      VariableNames:
        [Clock].Today
        [WheatSheep].Wheat.AboveGround.Wt*10 as TotalBiomass
        [WheatSheep].Wheat.Grain.Wt*10 as TotalYield
        [WheatSheep].Wheat.Phenology.Zadok.Stage as Zadok
    Zone WheatSheep: Area=1; Slope=0; AspectAngle=0; Altitude=50
      Fertiliser
      Soil: ASCOrder=Podzolic; SoilType=?; Site=Canberra; NearestTown=Canberra; Region=Gungahlin District; State=Australian Capital Territory; Country=Australia; ApsoilNumber=580-YP; Latitude=-35.201; Longitude=149.082
        DataSource=YP. Ginnenderra Experiment Station (GES). Data provided by James Hunt, based on measurements by John Kirkegaard, characterisation done by Julianne Lilley. Ginnenderra Experiment Station
        Physical
          Thickness  BD    AirDry  LL15   DUL   SAT
          100        1.42  0.04    0.059  0.21  0.408
          100        1.42  0.04    0.064  0.21  0.408
          200        1.48  0.05    0.085  0.21  0.427
          100        1.48  0.06    0.114  0.21  0.427
          200        1.48  0.08    0.13   0.21  0.427
          100        1.48  0.08    0.137  0.21  0.427
          200        1.48  0.09    0.141  0.21  0.427
          300        1.48  0.11    0.15   0.21  0.427
          300        1.48  0.11    0.161  0.21  0.427
          200        1.48  0.11    0.174  0.21  0.427
          200        1.48  0.11    0.174  0.21  0.427
          SoilCrop WheatSoil
            LL=[0.059, 0.064, 0.085, 0.114, 0.13, 0.137, 0.141, 0.15, 0.161, 0.174, 0.174]
            KL=[0.08, 0.08, 0.06, 0.05, 0.04, 0.03, 0.03, 0.02, 0.02, 0.01, 0.01]
            XF=[1, 1, 1, 1, 1, 1, 1, 1, 0.7, 0.4, 0]
        WaterBalance SoilWater: SummerDate=1-Nov; SummerU=6; SummerCona=2; WinterDate=1-Apr; WinterU=2; WinterCona=2; DiffusConst=88; DiffusSlope=35.4; Salb=0.13; CN2Bare=72; CNRed=20; CNCov=0.8; Thickness=[100, 100, 200, 100, 200, 100, 200, 300, 300, 200, 200]; SWCON=[0.8, 0.8, 0.8, 0.8, 0.8, 0.8, 0.8, 0.8, 0.6, 0.6, 0.6]
        SoilNitrogen: fom_types=[default, manure, mucuna, lablab, shemp, stable]; fract_carb=[0.2, 0.3, 0.54, 0.57, 0.45, 0]; fract_cell=[0.7, 0.3, 0.37, 0.37, 0.47, 0.1]; fract_lign=[0.1, 0.4, 0.09, 0.06, 0.08, 0.9]
          SoilNitrogenNO3 NO3
          SoilNitrogenNH4 NH4
          SoilNitrogenUrea Urea
          SoilNitrogenPlantAvailableNO3 PlantAvailableNO3
          SoilNitrogenPlantAvailableNH4 PlantAvailableNH4
        Organic: FOMCNRatio=80
          Thickness  Carbon  SoilCNRatio  FBiom  FInert  FOM
          100        2.2     10           0.06   0       671.213
          100        0.5     10           0.05   0       577.718
          200        0.3     10           0.03   0.3     427.984
          100        0.2     10           0.02   0.4     368.37
          200        0.2     10           0.02   0.5     272.895
          100        0.15    10           0.01   0.6     234.883
          200        0.15    10           0.01   0.8     174.005
          300        0.1     10           0.01   0.9     110.951
          300        0.08    10           0.01   1       70.7453
          200        0.06    10           0.01   1       52.4094
          200        0.04    10           0.01   1       38.8259
        Chemical
          Thickness  NO3N      NH4N       PH
          100        0.377074  0.0377074  5.1
          100        0.377074  0.0377074  5.1
          200        0.377074  0.0377074  5.3
          100        0.377074  0.0377074  5.3
          200        0.377074  0.0377074  5.9
          100        0.377074  0.0377074  5.9
          200        0.377074  0.0377074  6.4
          300        0.377074  0.0377074  6.4
          300        0.377074  0.0377074  6.8
          200        0.377074  0.0377074  6.8
          200        1         0.2        6.8
        InitialWater: PercentMethod=0; FractionFull=1
        Sample InitialN: Depth=[0-180]; Thickness=[1800]; SWUnits=Volumetric; OCUnits=Total; PHUnits=Water
        CERESSoilTemperature
      SurfaceOrganicMatter: InitialResidueName=wheat_stubble; InitialResidueType=wheat; InitialResidueMass=500; InitialStandingFraction=0; InitialCPR=0; InitialCNR=100
      Plant Wheat
      MicroClimate: a_interception=0; b_interception=1; c_interception=0; d_interception=0; soil_albedo=0.3; SoilHeatFluxFraction=0.4; MinimumHeightDiffForNewLayer=0; NightInterceptionFraction=0.5; ReferenceHeight=2
      Manager SowingRule
        StartDate = 1-mar
        EndDate = 30-mar
        MinESW = 0
        MinRain = 0
        RainDays = 0
        CultivarName = MacKellar
        SowingDepth = 30
        RowSpacing = 180
        Population = 200
```csharp
using APSIM.Shared.Utilities;
using Models.Utilities;
using Models.Soils;
using Models.PMF;
using Models.Core;
using System;

namespace Models
{
    [Serializable]
    public class Script : Model
    {
        [Link] Clock Clock;
        [Link] Fertiliser Fertiliser;
        [Link] Summary Summary;
        [Link] Plant Wheat;
        [Link] Soil Soil; 
        Accumulator accumulatedRain;
        
        [Description("Start of sowing window (d-mmm)")]
        public string StartDate { get; set;}
        [Description("End of sowing window (d-mmm)")]
        public string EndDate { get; set;}
        [Description("Minimum extractable soil water for sowing (mm)")]
        public double MinESW { get; set;}
        [Description("Accumulated rainfall required for sowing (mm)")]
        public double MinRain { get; set;}
        [Description("Duration of rainfall accumulation (d)")]
        public int RainDays { get; set;}
        [Description("Cultivar to be sown")]
        [Display(Type=DisplayType.CultivarName)]
        public string CultivarName { get; set;}
        [Description("Sowing depth (mm)")]
        public double SowingDepth { get; set;}        
        [Description("Row spacing (mm)")]
        public double RowSpacing { get; set;}    
        [Description("Plant population (/m2)")]
        public double Population { get; set;}    
        
        
        [EventSubscribe("StartOfSimulation")]
        private void OnSimulationCommencing(object sender, EventArgs e)
        {
            accumulatedRain = new Accumulator(this, "[Weather].Rain", RainDays);
        }
        

        [EventSubscribe("DoManagement")]
        private void OnDoManagement(object sender, EventArgs e)
        {
            accumulatedRain.Update();
            
            if (DateUtilities.WithinDates(StartDate,Clock.Today,EndDate) &&
                !Wheat.IsAlive &&
                MathUtilities.Sum(Soil.SoilWater.ESW) > MinESW &&
                accumulatedRain.Sum > MinRain)
            {
               Wheat.Sow(population:Population, cultivar:CultivarName, depth:SowingDepth, rowSpacing:RowSpacing);    
            }
        
        }
        
    }
}
```
      Manager SowingFertiliser
        Amount = 130
        CropName = wheat
```csharp
using Models.PMF;
using Models.Core;
using System;
namespace Models
{
    [Serializable]
    public class Script : Model
    {
        [Link] Clock Clock;
        [Link] Fertiliser Fertiliser;
        [Link] Summary Summary;
        
        
        [Description("Amount of fertiliser to be applied (kg/ha)")]
        public double Amount { get; set;}
        
        [Description("Crop to be fertilised")]
        public string CropName { get; set;}
        
        
        

        [EventSubscribe("Sowing")]
        private void OnSowing(object sender, EventArgs e)
        {
            Model crop = sender as Model;
            if (crop.Name.ToLower()==CropName.ToLower())
                Fertiliser.Apply(Amount: Amount, Type: Fertiliser.Types.NO3N);
        }
        
    }
}
```
      Manager Harvest
```csharp
using APSIM.Shared.Utilities;
using Models.Utilities;
using Models.Soils;
using Models.PMF;
using Models.Core;
using System;

namespace Models
{
    [Serializable]
    public class Script : Model
    {
        [Link] Plant Wheat;

        [EventSubscribe("DoManagement")]
        private void OnDoManagement(object sender, EventArgs e)
        {
            if (Wheat.IsReadyForHarvesting)
            {
               Wheat.Harvest();
               Wheat.EndCrop();    
            }
        
        }
        
    }
}
```
    Zone Feedlot: Area=10; Slope=0; AspectAngle=0; Altitude=50
      Soil: same as WheatSheepFeedlot.WheatSheep.Soil
      SurfaceOrganicMatter: InitialResidueName=wheat_stubble; InitialResidueType=wheat; InitialResidueMass=0; InitialStandingFraction=0; InitialCPR=0; InitialCNR=100
      MicroClimate: a_interception=0; b_interception=1; c_interception=0; d_interception=0; soil_albedo=0.3; SoilHeatFluxFraction=0.4; MinimumHeightDiffForNewLayer=0; NightInterceptionFraction=0.5; ReferenceHeight=2
      Report: VariableNames=[Clock].Today
  Experiment Grazing
    Factors
      CompositeFactor On: Specifications=[ManageStock].Enabled=true
      CompositeFactor Off: Specifications=[ManageStock].Enabled=false
    Simulation WheatSheepFeedlotBase
      Memo: same as WheatSheepFeedlot.Memo
      Clock: Start=2000-01-01; End=2012-12-31
      Summary SummaryFile
      Weather
        FileName=C:\Users\holzworthdp\Repos\ApsimX\Tests\WeatherFiles\Ginninderra.met
      SoilArbitrator
      Stock: RandSeed=9999
      Supplement: same as WheatSheepFeedlot.Supplement
      Manager ManageStock: same as WheatSheepFeedlot.ManageStock
      Manager ManageSupplement: same as WheatSheepFeedlot.ManageSupplement
      Report ReportSupplement: same as WheatSheepFeedlot.ReportSupplement
      Report ReportStock: EventNames=[Clock].EndOfDay
        VariableNames:
          [Clock].Today
          [Stock].Paddock
          [Stock].Number as No_sheep
          [Stock].NumberAll
          [Stock].NumberAll / [WheatSheep].Area as Stockrate //(sheep/ha)
          [Stock].Weight as SheepWeight // (kg)
          [Stock].Age/30.4 as SheepAge //(month)
          [Stock].NoGroups
      Report ReportBiomass: EventNames=[Clock].EndOfDay
        VariableNames:
          [Clock].Today
          [WheatSheep].Wheat.AboveGround.Wt*10 as TotalBiomass
          [WheatSheep].Wheat.Grain.Wt*10 as TotalYield
          [WheatSheep].Wheat.Phenology.Zadok.Stage as Zadok
      Zone WheatSheep: same as WheatSheepFeedlot.WheatSheep
      Zone Feedlot: same as WheatSheepFeedlot.Feedlot
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