Simulations: Version=101
  DataStore
  Folder Sensibility
    Memo
      This sensibility test explores dual-purpose wheat in a high rainfall livestock system in south-eastern Australia.

      It is based on:

      _Sprague SJ, Kirkegaard JA, Dove H, Graham JM, McDonald SE, Kelman WM (2015) **Integrating dual-purpose wheat and canola into high-rainfall livestock systems in south-eastern Australia. 1. Crop forage and grain yield.** Crop and Pasture Science 66(4), 365-376._

      _Sheep grazing wheat and fed in feedlot_

      In this example simulation sheep are bought and sold on specified date.
      They are fed supplement in a feedlot at a set rate, but graze a wheat crop when crop biomass >= 2.4 t/ha.
      Sheep are moved from the wheat crop and back to feedlot when crop biomass reaches 0.5 t/ha or crop zadok = 31.

      _Activities in this manager:_

      1. Buy animals at start of year & put in feedlot
      2. Move animals from feedlot to crop when ready to graze
      3. Move animals from crop to feedlot
      4. Shear all animals on specified date
      5. Sell all animals at end of year

      _NOTES_

      1. When the animals are in the feedlot and an animal dies during the day, the supplement has already been fed into the feedlot
         based on the number of animals in the feedlot at the start of the day. This means the remaining animals have access to slightly
         more supplement and causes a spike in supp intake graph.
      2. When sheep are culled for age + purchased to maintain stocking rate, several groups of sheep are created.
         This causes irregular amounts of supplement to be fed.
    Simulation WheatSheepFeedlot
      Clock: Start=2000-01-01; End=2012-06-30
      Summary SummaryFile
      Weather
        FileName=C:\Users\holzworthdp\Repos\ApsimX\Tests\WeatherFiles\Ginninderra.met
      SoilArbitrator
      Stock: RandSeed=9999
      Supplement: SpoilageTime=0
        Stores:
          Name            Stored  IsRoughage  DMContent  DMD  MEContent  CPConc  ProtDg  PConc   SConc   EEConc  ADIP2CP  AshAlk  MaxPassage
          fodder          0       true        0.85       0    0          0       0       0       0       0       0        0       0
          wheat, crushed  500     false       1          0.9  13.8       0.14    0.92    0.0038  0.0014  0.02    0.02     0.18    0
      Manager ManageStock
        Buying = True
        Genotype = Small Merino
        Sex = Female
        BuyDate = 1-Jan
        BuyAge = 12
        BuyWeight = 30
        BuyLactating = 0
        NumAntoBuy = 50
        Selling = True
        SaleFirstDate = 20-Dec
        SaleLastDate = 20-Dec
        SellPolicy = CulledForAge
        SaleAge = 36
        SaleWeight = -
        SalePercentAnimals = 100
        PaddockToMoveAnimalsTo = [WheatSheep]
        GrazingWindowStartDate = 1-Jan
        GrazingWindowEndDate = 31-Dec
        ExpressionToMoveAnimalsToField = Wheat.Phenology.Zadok > 0 && Wheat.Phenology.Zadok < 31 && Wheat.AboveGround.Wt >= 240
        ExpressionToMoveAnimalsToFeedlot = Wheat.Phenology.Zadok >= 31 || Wheat.AboveGround.Wt <= 50
        ShearDate = 15-dec
        Dummy =
        NumberSold = 0
        EventName =
```csharp
/*-------------------------------------------------------------------------------------
Sheep grazing wheat when conditions are suitable, and in feedlot the rest of the time.
---------------------------------------------------------------------------------------

In this example simulation sheep are bought and sold on specified date.
They are fed supplement in a feedlot at a set rate, but graze a wheat crop when crop biomass >= 2.4 t/ha.
Sheep are moved from the wheat crop and back to feedlot when crop biomass reaches 0.5 t/ha or crop zadok = 31.

Based on Sprague SJ, Kirkegaard JA, Dove H, Graham JM, McDonald SE, Kelman WM (2015) Integrating dual-purpose wheat and canola into high-rainfall livestock systems in south-eastern Australia. 1. Crop forage and grain yield. Crop and Pasture Science 66(4), 365-376. 

Activities in this manager:
1. Buy animals at start of year & put in feedlot
2. Move animals from feedlot to crop when ready to graze
3. Move animals from crop to feedlot 
4. Shear all animals on specified date
5. Sell all animals at end of year

ERRORS TO FIX
1. When an animal dies, extra supplement is fed (see spikes in supp intake graph)
2. When sheep are culled for age + purchased to maintain stocking rate, several groups of sheep are created.
This causes irregular amounts of supplement to be fed.
--------------------------------------------------------------------------------------*/


using System.Linq;
using System;
using System.Collections.Generic;
using Models.Core;
using Models.PMF;
using Models.Functions;
using Models.Soils;
using Models.Utilities;
using Models.GrazPlan;
using APSIM.Shared.Utilities;
using System.Diagnostics;

namespace Models
{
	[Serializable]
	public class Script : Model
	{
		[Link] Clock clock;
		[Link] Stock Animals;
		[Link] Supplement Feed;
		[Link] Summary Summary;
		[Link] IPlant plant;
		[Link] Soil Soil;
		[Link] Zone Paddock;
		[Link] ScriptCompiler compiler;

		private CSharpExpressionFunction expressionMoveAnimalsToField;
		private CSharpExpressionFunction expressionMoveAnimalsToFeedlot;

		public enum SellPolicyType
		{
			Date,
			PercentageHerdWhenAverageWeightGreaterThan,
			PercentageHerdWhenAverageAgeGreaterThan,
			CulledForAge,
			CulledForWeight
		}

		////////////////////////////////////////////////////////
		[Separator("Buying of animals")]

		[Description("Buy animals?")] 
		public bool Buying { get; set; }

		[Description("Stock: genotype (e.g. Small Merino, Angus, Friesian):")] 
		[Display(Values = "GetGenotypes")]
		public string Genotype { get; set; }

		[Description("Stock: sex (Female, Male, Castrate):")] 
		public ReproductiveType Sex { get; set; }

		[Description("Date to buy animals (dd-mmm)")] 
		[Display(EnabledCallback = "BuyingEnabled")]
		public string BuyDate { get; set; }

		[Description("Age of bought animals (months): ")] 
		[Display(EnabledCallback = "BuyingEnabled")]
		public double BuyAge { get; set; }

		[Description("Weight of bought animals (kg): ")] 
		[Display(EnabledCallback = "BuyingEnabled")]
		public double BuyWeight { get; set; }

		[Description("Zero denotes not lactating; 1 or more denotes the time (days) since parturition:")] 
		[Display(EnabledCallback = "BuyingEnabled")]
		public int BuyLactating { get; set; }

		[Description("Number of animals to buy: ")] 
		[Display(EnabledCallback = "BuyingEnabled")]
		public int NumAntoBuy { get; set; }

		////////////////////////////////////////////////////////
		[Separator("Selling of animals")]

		[Description("Selling animals?")] 
		public bool Selling { get; set; }

		[Description("First date to consider selling animals (dd-mmm)")] 
		public string SaleFirstDate { get; set; }

		[Description("Last date to consider selling animals (dd-mmm)")] 
		public string SaleLastDate { get; set; }

		[Description("Selling policy ")] 
		[Display(EnabledCallback = "SellingEnabled")]
		public SellPolicyType SellPolicy { get; set; }

		[Description("Age at which to sell (months): ")] 
		[Display(EnabledCallback = "SellingAgeEnabled")]
		public int SaleAge { get; set; }

		[Description("Weight at which to sell (kg): ")] 
		[Display(EnabledCallback = "SellingWeightEnabled")]
		public double SaleWeight { get; set; }

		[Description("Percentage of animals to sell (%)")] 
		[Display(EnabledCallback = "SellingEnabled")]
		public double SalePercentAnimals { get; set; }

		////////////////////////////////////////////////////////
		[Separator("Rule for moving animals into and out of paddock")]

		[Description("Name of paddock to move animals in to:")] 
		[Display(Type = DisplayType.Model, ModelType = typeof(Zone))]
		public IModel PaddockToMoveAnimalsTo { get; set; }

		[Description("First date to consider moving animals:")] 
		public string GrazingWindowStartDate { get; set; }

		[Description("Last date to consider moving animals:")] 
		public string GrazingWindowEndDate { get; set; }

   		[Description("Criteria to move animals to field")]
		public string ExpressionToMoveAnimalsToField { get; set; }

   		[Description("Criteria to move animals to feedlot")]
		public string ExpressionToMoveAnimalsToFeedlot { get; set; }


		////////////////////////////////////////////////////////
		[Separator("Shearing")]
		[Description("Date to shear animals (dd-mmm)")] 
		public string ShearDate { get; set; }

		[Description(" ")] 
		public string Dummy { get; set; }

		////////////////////////////////////////////////////////////////////////////
		// Callback properties to control disabling of properties.
		////////////////////////////////////////////////////////////////////////////
		public bool BuyingEnabled { get { return Buying; } }

		public bool SellingEnabled { get { return Selling; } }

		public bool SellingAgeEnabled
		{ 
			get
			{ 
				return Selling &&
				(SellPolicy == SellPolicyType.PercentageHerdWhenAverageAgeGreaterThan || SellPolicy == SellPolicyType.CulledForAge);
			} 
		}

		public bool SellingWeightEnabled
		{ 
			get
			{ 
				return Selling &&
				(SellPolicy == SellPolicyType.PercentageHerdWhenAverageWeightGreaterThan || SellPolicy == SellPolicyType.CulledForWeight);
			} 
		}

		////////////////////////////////////////////////////////////////////////////
		// Outputs
		////////////////////////////////////////////////////////////////////////////
		// <summary>Number of animals sold.</summary>
		public int NumberSold { get; set; }

		// <summary>Description of something that has happened.</summary>
		public string EventName { get; set; }

		// <summary>Return a list of genotypes to the properties tab.</summary>
		public string[] GetGenotypes()
		{
			if (Animals != null)
				return Animals.Genotypes.Names.ToArray();
			return null;
		}



		// ============================================================
		// Called once at beginning of simulation run
		// ============================================================
        [EventSubscribe("StartOfSimulation")]
        private void OnStartOfSimulation(object sender, EventArgs e)
        {
	        if (string.IsNullOrEmpty(ExpressionToMoveAnimalsToField))
		        throw new Exception("You must specify a criteria for moving animals to the field");
	        expressionMoveAnimalsToField = new CSharpExpressionFunction();
	        expressionMoveAnimalsToField.Parent = this;
	        expressionMoveAnimalsToField.Expression = "Convert.ToDouble(" + ExpressionToMoveAnimalsToField + ")";
	        expressionMoveAnimalsToField.SetCompiler(compiler);
	        expressionMoveAnimalsToField.CompileExpression();

	        if (string.IsNullOrEmpty(ExpressionToMoveAnimalsToFeedlot))
		        throw new Exception("You must specify a criteria for moving animals to the feedlot");
	        expressionMoveAnimalsToFeedlot = new CSharpExpressionFunction();
	        expressionMoveAnimalsToFeedlot.Parent = this;
	        expressionMoveAnimalsToFeedlot.Expression = "Convert.ToDouble(" + ExpressionToMoveAnimalsToFeedlot + ")";
	        expressionMoveAnimalsToFeedlot.SetCompiler(compiler);
	        expressionMoveAnimalsToFeedlot.CompileExpression();
        }



		// ============================================================
		// Management that happens every day.
		// ============================================================
		[EventSubscribe("DoManagement")]
		private void OnDoManagement(object sender, EventArgs e)
		{
			EventName = string.Empty;

			// Buy animals
			if (Buying && DateUtilities.DatesAreEqual(BuyDate, clock.Today))
			{
				var purchase = new StockBuy();
				purchase.Genotype = Genotype;   // "small merino"
				purchase.Number = NumAntoBuy;
				purchase.Sex = Sex;               // "wethers"
				purchase.Age = BuyAge;
				purchase.Weight = BuyWeight;
				purchase.Lactating = BuyLactating;
				Animals.Buy(purchase);
				Animals.Move("Feedlot");
				EventName = NumAntoBuy + " animals bought";
			}

			// Sell animals
			if (SellingEnabled && DateUtilities.WithinDates(SaleFirstDate, clock.Today, SaleLastDate))
			{ 
				if (SellPolicy == SellPolicyType.PercentageHerdWhenAverageWeightGreaterThan || 
				    SellPolicy == SellPolicyType.PercentageHerdWhenAverageAgeGreaterThan)
				{
					bool doSell = false;
					if (SellPolicy == SellPolicyType.Date)
						doSell = true;
					else if (SellPolicy == SellPolicyType.PercentageHerdWhenAverageWeightGreaterThan && Animals.WeightAll >= SaleWeight)
						doSell = true;
					else if (SellPolicy == SellPolicyType.PercentageHerdWhenAverageAgeGreaterThan && Animals.AgeMonthsAll >= SaleAge)
						doSell = true;

					if (doSell)
					{
						NumberSold = Convert.ToInt32(Animals.NumberAll * SalePercentAnimals / 100.0);
						Animals.Sell(NumberSold);
						EventName = NumberSold + " animals sold";
					}
				}
				else
				{
					IEnumerable<AnimalGroup> animalsToSell;
					if (SellPolicy == SellPolicyType.CulledForAge)
					{
						// split older animals into a new group
		        	    animalsToSell = Animals.SplitByAge(Convert.ToInt32(SaleAge * 30)); // months to days
		        	}
		        	else
		        	{
						// split heavier animals into a new group
		        	    animalsToSell = Animals.SplitByWeight(SaleWeight);
	        	    }

	        	    var numberSellableAnimals = animalsToSell.Sum(g => g.NoAnimals);
	        	    var numberAnimalsToSell = Convert.ToInt32(numberSellableAnimals * SalePercentAnimals / 100.0);
	        	    if (numberAnimalsToSell > 0)
                    	Animals.Sell(numberAnimalsToSell, animalsToSell);
				}
			}


			// Determine whether the animals are in the feedlot.
            bool animalsAreInFeedlot = Animals.AnimalGroups.FirstOrDefault(group => group.PaddOccupied.Name == "Feedlot") != null;
            bool inGrazingWindow = DateUtilities.WithinDates(GrazingWindowStartDate, clock.Today, GrazingWindowEndDate);

            if (animalsAreInFeedlot)
            {
           		// Animals are in feedlot. Determine if they can be moved to paddock.
            	if (inGrazingWindow && expressionMoveAnimalsToField.Value() == 1)
            	{
            		Animals.Move(PaddockToMoveAnimalsTo.Name);
            		EventName = "Animals moved to paddock";
        		}
            }
            else
            {
            	// Animals are in paddock. Determine if they need to be moved to feedlot.
            	if (!inGrazingWindow || expressionMoveAnimalsToFeedlot.Value() == 1)
            	{
                	Animals.Move("Feedlot");
                	EventName = "Animals moved to feedlot";
            	}
        	}

			// Shear all animals on specified date
			if (DateUtilities.DatesEqual(ShearDate, clock.Today))
			{
				Animals.Shear(shearAdults: true, shearYoung: true);
				EventName = "Animals shorn";
			}
		}
	}
}
```
      Manager ManageSupplement
        FeedlotZone = [Feedlot]
        SupplementAmount = 0.5
        SupplementType = wheat, crushed
```csharp
using APSIM.Shared.Utilities;
using Models.GrazPlan;
using Models.Utilities;
using Models.Soils;
using Models.PMF;
using Models.Core;
using System;
using System.Linq;

namespace Models
{
	[Description(
	"<b>Sheep grazing wheat when conditions are suitable, and in feedlot fed supplement the rest of the time.</b>" +
	"<li>When animals are in feedlot, they are fed a set amount each day.</li>" +
	"<li>Will restock the supplement store when the store reaches a minimum level.</li>"
	)]
	[Serializable]
	public class ManageSupplement : Model
	{
	    [Link] Clock clock;
		[Link] Stock animals;
		[Link] Supplement supplement;

		[Description("Name of zone representing the feedlot")]
		[Display(Type=DisplayType.Model, ModelType=typeof(Zone))]
		public IModel FeedlotZone { get; set; }

		[Description("The amount of suppliment to feed each animal each day (kg)")]
		public double SupplementAmount { get; set; }

		[Description("The type of suppliment to feed the animals")]
		public string SupplementType { get; set; }

		// ============================================================
		// Called every day to perform management actions
		// ============================================================
		[EventSubscribe("DoManagement")]
		private void OnDoManagement(object sender, EventArgs e)
		{
			// Determine how many animals are in feedlot.
			var animalGroupsInFeedlot = animals.AnimalGroups.Where(group => group.PaddOccupied.Name == FeedlotZone.Name);
			var totalNumAnimalsInFeedlot = animalGroupsInFeedlot.Sum(group => group.NoAnimals);

			// If there are animals in feedlot then feed them.
			if (totalNumAnimalsInFeedlot > 0)
				supplement.Feed(SupplementType, SupplementAmount * totalNumAnimalsInFeedlot, FeedlotZone.Name);     

			// Restock the supplement store if amount falls below 500 kg/ha
			if (supplement.Stores[1].Stored <= 500)       
				supplement.Buy(5000, SupplementType);
		}
	}
}
```
      Report ReportSupplement: EventNames=[Clock].EndOfDay
        VariableNames:
          [Clock].Today
          [Stock].Paddock as StockLocation
          [Stock].NumberAll
          [stock].IntakeAll.Weight as Intake //(kg)
          [Supplement].Name
          [Supplement].stores[2].Stored as SupplementStored // (kg)
          [Stock].SuppIntakeAll.Weight as SupplementIntake //(kg)
          [stock].SuppEaten as TotalSuppIntake //(kg)
          [stock].SuppIntake
      Report ReportStock: EventNames=[Clock].EndOfDay
        VariableNames:
          [Clock].Today
          [Stock].Paddock
          [Stock].Number as No_sheep
          [Stock].NumberAll
          [Stock].NumberAll / [WheatSheep].Area as Stockrate //(sheep/ha)
          [Stock].Weight as SheepWeight // (kg)
          [Stock].Age/30.4 as SheepAge //(month)
          [Stock].NoGroups
      Report ReportBiomass: EventNames=[Clock].EndOfDay
        VariableNames:
          [Clock].Today
          [WheatSheep].Wheat.AboveGround.Wt*10 as TotalBiomass
          [WheatSheep].Wheat.Grain.Wt*10 as TotalYield
          [WheatNotGrazed].Wheat.AboveGround.Wt*10 as TotalBiomassUngrazed
          [WheatNotGrazed].Wheat.Grain.Wt*10 as TotalYieldUngrazed
          [WheatSheep].Wheat.Phenology.Zadok.Stage as Zadok
      Zone WheatSheep: Area=1; Slope=0; AspectAngle=0; Altitude=50
        Fertiliser
        Soil: ASCOrder=Podzolic; SoilType=?; Site=Canberra; NearestTown=Canberra; Region=Gungahlin District; State=Australian Capital Territory; Country=Australia; ApsoilNumber=580-YP; Latitude=-35.201; Longitude=149.082
          DataSource=YP. Ginnenderra Experiment Station (GES). Data provided by James Hunt, based on measurements by John Kirkegaard, characterisation done by Julianne Lilley. Ginnenderra Experiment Station
          Physical
            Thickness  BD    AirDry  LL15   DUL   SAT
            100        1.42  0.04    0.059  0.21  0.408
            100        1.42  0.04    0.064  0.21  0.408
            200        1.48  0.05    0.085  0.21  0.427
            100        1.48  0.06    0.114  0.21  0.427
            200        1.48  0.08    0.13   0.21  0.427
            100        1.48  0.08    0.137  0.21  0.427
            200        1.48  0.09    0.141  0.21  0.427
            300        1.48  0.11    0.15   0.21  0.427
            300        1.48  0.11    0.161  0.21  0.427
            200        1.48  0.11    0.174  0.21  0.427
            200        1.48  0.11    0.174  0.21  0.427
            SoilCrop WheatSoil
              LL=[0.059, 0.064, 0.085, 0.114, 0.13, 0.137, 0.141, 0.15, 0.161, 0.174, 0.174]
              KL=[0.08, 0.08, 0.06, 0.05, 0.04, 0.03, 0.03, 0.02, 0.02, 0.01, 0.01]
              XF=[1, 1, 1, 1, 1, 1, 1, 1, 0.7, 0.4, 0]
          WaterBalance SoilWater: SummerDate=1-Nov; SummerU=6; SummerCona=2; WinterDate=1-Apr; WinterU=2; WinterCona=2; DiffusConst=88; DiffusSlope=35.4; Salb=0.13; CN2Bare=72; CNRed=20; CNCov=0.8; Thickness=[100, 100, 200, 100, 200, 100, 200, 300, 300, 200, 200]; SWCON=[0.8, 0.8, 0.8, 0.8, 0.8, 0.8, 0.8, 0.8, 0.6, 0.6, 0.6]
          SoilNitrogen: fom_types=[default, manure, mucuna, lablab, shemp, stable]; fract_carb=[0.2, 0.3, 0.54, 0.57, 0.45, 0]; fract_cell=[0.7, 0.3, 0.37, 0.37, 0.47, 0.1]; fract_lign=[0.1, 0.4, 0.09, 0.06, 0.08, 0.9]
            SoilNitrogenNO3 NO3
            SoilNitrogenNH4 NH4
            SoilNitrogenUrea Urea
            SoilNitrogenPlantAvailableNO3 PlantAvailableNO3
            SoilNitrogenPlantAvailableNH4 PlantAvailableNH4
          Organic: FOMCNRatio=80
            Thickness  Carbon  SoilCNRatio  FBiom  FInert  FOM
            100        2.2     10           0.06   0       671.213
            100        0.5     10           0.05   0       577.718
            200        0.3     10           0.03   0.3     427.984
            100        0.2     10           0.02   0.4     368.37
            200        0.2     10           0.02   0.5     272.895
            100        0.15    10           0.01   0.6     234.883
            200        0.15    10           0.01   0.8     174.005
            300        0.1     10           0.01   0.9     110.951
            300        0.08    10           0.01   1       70.7453
            200        0.06    10           0.01   1       52.4094
            200        0.04    10           0.01   1       38.8259
          Chemical
            Thickness  NO3N      NH4N       PH
            100        0.377074  0.0377074  5.1
            100        0.377074  0.0377074  5.1
            200        0.377074  0.0377074  5.3
            100        0.377074  0.0377074  5.3
            200        0.377074  0.0377074  5.9
            100        0.377074  0.0377074  5.9
            200        0.377074  0.0377074  6.4
            300        0.377074  0.0377074  6.4
            300        0.377074  0.0377074  6.8
            200        0.377074  0.0377074  6.8
            200        1         0.2        6.8
          InitialWater: PercentMethod=0; FractionFull=1
          Sample InitialN: Depth=[0-180]; Thickness=[1800]; SWUnits=Volumetric; OCUnits=Total; PHUnits=Water
          CERESSoilTemperature
        SurfaceOrganicMatter: InitialResidueName=wheat_stubble; InitialResidueType=wheat; InitialResidueMass=500; InitialStandingFraction=0; InitialCPR=0; InitialCNR=100
        Plant Wheat
        MicroClimate: a_interception=0; b_interception=1; c_interception=0; d_interception=0; soil_albedo=0.3; SoilHeatFluxFraction=0.4; MinimumHeightDiffForNewLayer=0; NightInterceptionFraction=0.5; ReferenceHeight=2
        Manager SowingRule
          StartDate = 1-mar
          EndDate = 30-mar
          MinESW = 0
          MinRain = 0
          RainDays = 0
          CultivarName = MacKellar
          SowingDepth = 30
          RowSpacing = 180
          Population = 200
```csharp
using APSIM.Shared.Utilities;
using Models.Utilities;
using Models.Soils;
using Models.PMF;
using Models.Core;
using System;

namespace Models
{
    [Serializable]
    public class Script : Model
    {
        [Link] Clock Clock;
        [Link] Fertiliser Fertiliser;
        [Link] Summary Summary;
        [Link] Plant Wheat;
        [Link] Soil Soil; 
        Accumulator accumulatedRain;
        
        [Description("Start of sowing window (d-mmm)")]
        public string StartDate { get; set;}
        [Description("End of sowing window (d-mmm)")]
        public string EndDate { get; set;}
        [Description("Minimum extractable soil water for sowing (mm)")]
        public double MinESW { get; set;}
        [Description("Accumulated rainfall required for sowing (mm)")]
        public double MinRain { get; set;}
        [Description("Duration of rainfall accumulation (d)")]
        public int RainDays { get; set;}
        [Description("Cultivar to be sown")]
        [Display(Type=DisplayType.CultivarName)]
        public string CultivarName { get; set;}
        [Description("Sowing depth (mm)")]
        public double SowingDepth { get; set;}        
        [Description("Row spacing (mm)")]
        public double RowSpacing { get; set;}    
        [Description("Plant population (/m2)")]
        public double Population { get; set;}    
        
        
        [EventSubscribe("StartOfSimulation")]
        private void OnSimulationCommencing(object sender, EventArgs e)
        {
            accumulatedRain = new Accumulator(this, "[Weather].Rain", RainDays);
        }
        

        [EventSubscribe("DoManagement")]
        private void OnDoManagement(object sender, EventArgs e)
        {
            accumulatedRain.Update();
            
            if (DateUtilities.WithinDates(StartDate,Clock.Today,EndDate) &&
                !Wheat.IsAlive &&
                MathUtilities.Sum(Soil.SoilWater.ESW) > MinESW &&
                accumulatedRain.Sum > MinRain)
            {
               Wheat.Sow(population:Population, cultivar:CultivarName, depth:SowingDepth, rowSpacing:RowSpacing);    
            }
        
        }
        
    }
}
```
        Manager SowingFertiliser
          Amount = 130
          CropName = wheat
```csharp
using Models.PMF;
using Models.Core;
using System;
namespace Models
{
    [Serializable]
    public class Script : Model
    {
        [Link] Clock Clock;
        [Link] Fertiliser Fertiliser;
        [Link] Summary Summary;
        
        
        [Description("Amount of fertiliser to be applied (kg/ha)")]
        public double Amount { get; set;}
        
        [Description("Crop to be fertilised")]
        public string CropName { get; set;}
        
        
        

        [EventSubscribe("Sowing")]
        private void OnSowing(object sender, EventArgs e)
        {
            Model crop = sender as Model;
            if (crop.Name.ToLower()==CropName.ToLower())
                Fertiliser.Apply(Amount: Amount, Type: Fertiliser.Types.NO3N);
        }
        
    }
}
```
        Manager Harvest
```csharp
using APSIM.Shared.Utilities;
using Models.Utilities;
using Models.Soils;
using Models.PMF;
using Models.Core;
using System;

namespace Models
{
    [Serializable]
    public class Script : Model
    {
        [Link] Plant Wheat;

        [EventSubscribe("DoManagement")]
        private void OnDoManagement(object sender, EventArgs e)
        {
            if (Wheat.IsReadyForHarvesting)
            {
               Wheat.Harvest();
               Wheat.EndCrop();    
            }
        
        }
        
    }
}
```
      Zone Feedlot: Area=10; Slope=0; AspectAngle=0; Altitude=50
        Soil: same as Sensibility.WheatSheepFeedlot.WheatSheep.Soil
        SurfaceOrganicMatter: InitialResidueName=wheat_stubble; InitialResidueType=wheat; InitialResidueMass=0; InitialStandingFraction=0; InitialCPR=0; InitialCNR=100
        MicroClimate: a_interception=0; b_interception=1; c_interception=0; d_interception=0; soil_albedo=0.3; SoilHeatFluxFraction=0.4; MinimumHeightDiffForNewLayer=0; NightInterceptionFraction=0.5; ReferenceHeight=2
        Report: VariableNames=[Clock].Today
      Zone WheatNotGrazed: same as Sensibility.WheatSheepFeedlot.WheatSheep
  Folder MassBalanceCheck
    Simulation MassBalanceForage
      Memo
        This simulation checks the mass balance of animal / **plant** interactions. The plant model used is a PMF Slurp model that doesn't simulate plant growth. This makes it much easier to check mass balance.

        The checks are done in the MassBalanceCalculations manager script.

        The script first calculates the amount of pasture removed:

        	PastureRemoved = StartOfDayPasture - EndOfDayPasture;

        and the weight gain of the animals on a day.

        	LiveWeightGain = EndOfDayAnimal - StartOfDayAnimal;

        It then calculates two balance terms that should be zero. The first checks that pasture removed = animal intake.

        	LostWt = PastureRemoved.Wt - Intake.Wt;

        The second checks that N in the pasture removed = excreta N + the N retained by the animal.

        	LostN = PastureRemoved.N - (Excreta.N + LiveWeightGain.N);

        A check is then made (on day 1 of the simulation) that the faeces from the animal is added to the surface organic matter (som) model:

        	if (!MathUtilities.FloatsAreEqual(animals.FaecesAll.Weight, som.Wt))
        		throw new Exception("Mass balance error: The animal faeces weight on day 1 is not equal to surface organic matter weight.");

        A check is then made (on day 1 of the simulation) that the urine from the animal is added to the soil urea pool:

        	if (!MathUtilities.FloatsAreEqual(animals.UrineNAll, MathUtilities.Sum(urea.kgha)))
        		throw new Exception("Mass balance error: The animal urine on day 1 is not equal to soil urea amount.");

        These last checks are only done on day 1 because flows in and out of SOM and Urea pools make it difficult to calculate mass balance. The assumption is that if it works on day 1 it works for all other days.
      Clock: Start=2000-01-01; End=2000-05-31
      Summary SummaryFile
      Weather: FileName=%root%\Examples\WeatherFiles\lincoln.met
      SoilArbitrator
      Stock: RandSeed=9999
        GenotypeCross NZFriesianCross: DamBreed=Friesian; SireBreed=Jersey; MatureDeathRate=0; WeanerDeathRate=0; Conception=[0, 1, 0, 0]; Generation=1; SRW=550; PotFleeceWt=0; MaxFibreDiam=0; FleeceYield=0; PeakMilk=35
      Supplement: SpoilageTime=0
        Stores:
          Name            Stored  IsRoughage  DMContent  DMD  MEContent  CPConc  ProtDg  PConc   SConc   EEConc  ADIP2CP  AshAlk  MaxPassage
          fodder          0       true        0.85       0    0          0       0       0       0       0       0        0       0
          wheat, crushed  500000  false       1          0.9  13.8       0.14    0.92    0.0038  0.0014  0.02    0.02     0.18    0
          silage          50000   true        1          0.7  10         0.25    0.8     0.0032  0.0024  0.02    0.06     0.6     0
      Manager GrazeForageCrop
        Genotype = NZFriesianCross
        Sex = Female
        Age = 6
        Weight = 100
        Pregnant = 0
        Lactating = 0
        YoungNumber = 0
        YoungWt = 0
        StockingRate = 1
        CurrentLocation = Paddock
        PreGrazingDM = 2800
        PostGrazingDM = 50
        MinGrazingDays = 0
        DoNoGrazingWindow = False
        NoGrazeStart = 15-jun
        NoGrazeEnd = 31-jul
        SupplementName = silage
        SupplementFirst = False
        SupplementEveryDay = 0
        SupplementOnPastureMass = 0
        TriggerPastureMass = 2100
        NumStock = 0
        GrazingSeasonIsOpen = False
        HarvestableBiomass = 0
```csharp
using Models.PMF.Interfaces;
using System.Diagnostics;
using Models.AgPasture;
using System.Linq;
using System.Collections.Generic;
using System.Collections;
using Models.Soils;
using Models.PMF;
using System.Xml.Serialization;
using APSIM.Shared.Utilities;
using Models.GrazPlan;
using Models.Utilities;
using Models.Core;
using Models;
using System;

namespace Models
{

    [Serializable]
    public class Script : Model
    {
        [Link] Clock clock;
        [Link] Stock stock;
        [Link] Supplement supplement;
        [Link] List<Zone> paddocks;
        [Link] ISummary summary;
        [Link] Simulation farm;
        [Link] List<IPlantDamage> forages = null;

        private int CurrentGroupNum = 1;    // animal group number
        private int CurrentLocationNum { get; set; }

        [Separator("Stock type info, the same type of stock are brought onto the paddock at each grazing")]

        [Description("Stock: genotype (e.g. Small Merino, Angus, Friesian):")] 
        [Display(Values="GetGenotypes")]
        public string Genotype { get; set; }

        [Description("Stock: sex (Female, Male, Castrate):")] 
        public ReproductiveType Sex { get; set; }

        [Description("Stock: age (months):")] 
        public double Age { get; set; }

        [Description("Stock: weight (kg liveweight /head):")] 
        public double Weight { get; set; }

        [Description("Stock: fertility status (0 if non-pregnant or days since conception):")] 
        public int Pregnant { get; set; }

        [Description("Stock: lactation status (0 if non-lactating or days since parturition):")]
        public int Lactating { get; set; }

        [Description("Stock: number of unweaned young:")]
        public int YoungNumber { get; set; }

        [Description("Stock: weight of unweaned young:")] 
        public double YoungWt { get; set; }

        [Separator("Grazing event information")]

        [Description("Paddock stocking rate (head/ha): ")] 
        public double StockingRate { get; set; }

        [Description("Initial location of the cows (give either the paddock name or 'Away'): ")] 
        public string CurrentLocation { get; set; }

        [Description("Standing biomass at which to bring the stock into the simulation (kg DM/ha): ")] 
        public double PreGrazingDM { get; set; }

        [Description("Standing biomass at which to exit  stock from the simulation (kg DM/ha): ")] 
        public double PostGrazingDM { get; set; }

        [Description("Don't move the stock onto the crop unless there is approx. X days of grazable forage available: ")] 
        public int MinGrazingDays { get; set; }

        [Description("Implement a no-grazing window? (tick for yes): ")] 
        public bool DoNoGrazingWindow { get; set; }

        [Description("Start of the no-grazing window (dd-MMM)")] 
        public string NoGrazeStart { get; set; }

        [Description("End of the no-grazing window (dd-MMM)")] 
        public string NoGrazeEnd { get; set; }

        [Separator("Supplementary feeding")]

        [Description("Name of the supplement to feed: ")] 
        public string SupplementName { get; set; }

        [Description("Feed the supplement first (i.e. before the new forage is available to the stock)?: ")] 
        public bool SupplementFirst { get; set; }

        [Description("Amount of supplementary feeding offered every day (kg DM /head /day): ")] 
        public double SupplementEveryDay { get; set; }

        [Description("Additional amount of supplement offered when available biomass is low (kg DM /head /day): ")] 
        public double SupplementOnPastureMass { get; set; }

        [Description("Trigger biomass for above rule (kg DM /ha): ")] 
        public double TriggerPastureMass { get; set; }

        public int NumStock { get; set; }
        public bool GrazingSeasonIsOpen { get; set; } // number of cows on the whole farm
        public double HarvestableBiomass { get; set; }

        // Return a list of genotypes to the properties tab.
        public string[] GetGenotypes()
        {
            if (stock != null)
                return stock.Genotypes.Names.ToArray();
            return null;
        }

        [EventSubscribe("StartOfSimulation")]
        private void OnStartOfSimulation(object sender, EventArgs e)
        {

            //Debugger.Break();

            summary.WriteMessage(this, "Initialising the paddock information");

            NumStock = (int)(Math.Round(StockingRate * farm.Area, 0));

            if ((CurrentLocation.ToLower() != "away") && (NumStock > 0))
            {
                BuyStock();
                stock.Move(CurrentLocation);
                summary.WriteMessage(this, " The Stock have been moved to " + CurrentLocation);
            }

            summary.WriteMessage(this, "     The number of animals has been rounded to " + NumStock + " from " + (StockingRate * farm.Area));
            summary.WriteMessage(this, "     The animals will begin in " + CurrentLocation + " which is paddock number " + CurrentLocationNum + " in the simulation");
            summary.WriteMessage(this, "     The area of the whole farm is " + farm.Area + " ha");

        }

        [EventSubscribe("DoManagement")]
        private void OnDoManagement(object sender, EventArgs e)
        {
            GrazingSeasonIsOpen = true;
            if (DoNoGrazingWindow)
                GrazingSeasonIsOpen = !DateUtilities.WithinDates(NoGrazeStart, clock.Today, NoGrazeEnd);

            bool sellSomeStock = false;
            if (!GrazingSeasonIsOpen)
                sellSomeStock = true;

            // Calculate forage mass in the paddock
            HarvestableBiomass = 0.0;
            foreach (var forage in forages)
                foreach (var forageOrgan in forage.Organs)
                    if (forageOrgan.IsAboveGround)
                        HarvestableBiomass += forageOrgan.Live.Wt + forageOrgan.Dead.Wt;
            HarvestableBiomass *= 10;  // Convert to kg/ha

            if (HarvestableBiomass <= PostGrazingDM)
                sellSomeStock = true;

            if (CurrentLocation == "Away")
                sellSomeStock = false;

            double minFodder = 0.03 * MinGrazingDays * NumStock * Weight; // The 0.03 is the propostion of body mass that the stock might eat
            if (CurrentLocation == "Away" && NumStock > 0 && (HarvestableBiomass >= PreGrazingDM) && HarvestableBiomass >= (PostGrazingDM + minFodder) && GrazingSeasonIsOpen)
            {
                CurrentLocation = paddocks[0].Name;
                CurrentLocationNum = paddocks[0].Index;
                BuyStock();
                stock.Move(CurrentLocation);
                summary.WriteMessage(this, "     Buying stock ");
            }

            if (sellSomeStock)
            {
                CurrentLocation = "Away";
                CurrentLocationNum = -1;
                SellStock();
                summary.WriteMessage(this, "     Selling stock ");
            }

            if (CurrentLocation != "Away")
            {
                if (SupplementEveryDay > 0)
                {
                    double silageOnHand = supplement.Stores[2 - 1].Stored;
                    if (silageOnHand < SupplementEveryDay * stock.NumberAll)
                    {
                        supplement.Buy(SupplementEveryDay * 30.0 * stock.NumberAll, SupplementName);  // i.e. 1 months worth
                        summary.WriteMessage(this, "SupplementEveryDay: Buying " + SupplementName + " of total amount : " + (SupplementEveryDay * 90 * stock.NumberAll) + " kg DM");
                    }
                    supplement.Feed(SupplementName, SupplementEveryDay * stock.NumberAll, CurrentLocation, SupplementFirst);
                }

                if (SupplementOnPastureMass > 0 && HarvestableBiomass <= TriggerPastureMass)
                {
                    double silageOnHand = supplement.Stores[2 - 1].Stored;
                    if (silageOnHand < SupplementOnPastureMass * stock.NumberAll)
                    {
                        supplement.Buy(SupplementOnPastureMass * 30.0 * stock.NumberAll, SupplementName);  // i.e. 1 months worth
                        summary.WriteMessage(this, "SupplementOnBiomass: Buying " + SupplementName + " of total amount : " + (SupplementOnPastureMass * 90 * stock.NumberAll) + " kg DM");
                    }
                    supplement.Feed(SupplementName, SupplementOnPastureMass * stock.NumberAll, CurrentLocation, SupplementFirst);
                }
            }
        }


        public void BuyStock()
        {
            CurrentGroupNum = stock.NoGroups + 1;
            StockBuy purchase = new StockBuy();
            purchase.Genotype = Genotype;
            purchase.Number = NumStock;
            purchase.Sex = Sex;
            purchase.Age = Age;       // age in months
            purchase.Weight = Weight;  // live weight in kg
            purchase.UseTag = CurrentGroupNum + 1;
            purchase.MatedTo = purchase.Genotype;
            purchase.Pregnant = Pregnant;  // days pregnant, 0 = non pregnant, 1 = pregnant
            purchase.Lactating = Lactating;  // 0 for dry, 1 for lactating
            purchase.NumYoung = YoungNumber;
            purchase.YoungWt = YoungWt;

            stock.Buy(purchase);
        }

        public void SellStock()
        {
            int NumGroups = stock.NoGroups;

            NumGroups = stock.NoGroups;
            for (int gg = 1; gg <= NumGroups; gg++)
            {
                stock.Sell(stock.Number[gg - 1]);
            }
        }
    }
}
```
      Manager MassBalanceCalculations
        StartOfDayPasture =
        EndOfDayPasture =
        StartOfDaySupplement =
        EndOfDaySupplement =
        StartOfDayAnimal =
        EndOfDayAnimal =
        PastureRemoved =
        SupplementRemoved =
        LiveWeightGain =
        Intake =
        Excreta =
        LostN = 0
        LostWt = 0
```csharp
using Models.Surface;
using Models.PMF.Interfaces;
using System.Diagnostics;
using Models.AgPasture;
using System.Linq;
using System.Collections.Generic;
using System.Collections;
using Models.Soils;
using Models.PMF.Organs;
using Models.PMF;
using System.Xml.Serialization;
using APSIM.Shared.Utilities;
using Models.GrazPlan;
using Models.Interfaces;
using Models.Utilities;
using Models.Core;
using Models;
using System;

namespace Models
{

    [Serializable]
    public class Script : Model
    {
        [Link] Clock clock;
        [Link] IOrganDamage[] forages;
        [Link] Stock animals;
        [Link] Zone paddocks;
        [Link] ISummary summary;
        [Link] Simulation farm;
        [Link] Supplement supplement;
        [Link] SurfaceOrganicMatter som;
        [Link(ByName=true)] ISolute urea;

        public BiomassAndN StartOfDayPasture { get; set; }
        public BiomassAndN EndOfDayPasture { get; set; }
        public BiomassAndN StartOfDaySupplement { get; set; }
        public BiomassAndN EndOfDaySupplement { get; set; }
        public BiomassAndN StartOfDayAnimal { get; set; }
        public BiomassAndN EndOfDayAnimal { get; set; }
        public BiomassAndN PastureRemoved { get; set; }
        public BiomassAndN SupplementRemoved { get; set; }
        public BiomassAndN LiveWeightGain { get; set; }
        public BiomassAndN Intake { get; set; }
        public BiomassAndN Excreta { get; set; }

        public double LostN { get; set; } 
        public double LostWt { get; set; } 

        // Start of simulation
        [EventSubscribe("StartOfSimulation")]
        private void OnStart(object sender, EventArgs e)
        {
            forages = forages.Where(forage => forage.IsAboveGround && !(forage is SurfaceOrganicMatter)).ToArray();
        }

        // Start of day
        [EventSubscribe("StartOfDay")]
        private void OnDoManagement(object sender, EventArgs e)
        {
            StartOfDaySupplement = new BiomassAndN() 
            { 
                Wt = supplement.Stores.Sum(supp => supp.Stored),
                N = supplement.Stores[1].CPConc / 6.25 * supplement.Stores.Sum(supp => supp.Stored),
            };
            StartOfDayPasture = new BiomassAndN() 
            { 
                Wt = forages.Sum(forage => forage.Live.Wt * 10),
                N = forages.Sum(forage => forage.Live.N * 10),
            };
            StartOfDayAnimal = new BiomassAndN() 
            { 
                Wt = animals.WeightAll,
                N = 0,
            };
        }

        // End of day
        [EventSubscribe("DoManagementCalculations")]
        private void OnDoManagementCalculations(object sender, EventArgs e)
        {
            EndOfDaySupplement = new BiomassAndN() 
            { 
                Wt = supplement.Stores.Sum(supp => supp.Stored),
                N = supplement.Stores[1].CPConc / 6.25 * supplement.Stores.Sum(supp => supp.Stored),
            };
            EndOfDayPasture = new BiomassAndN() 
            { 
                Wt = forages.Sum(forage => forage.Live.Wt * 10),
                N = forages.Sum(forage => forage.Live.N * 10),
            };
            EndOfDayAnimal = new BiomassAndN() 
            { 
                Wt = animals.WeightAll,
                N = animals.RetainedNAll,    // kg/d
            };

            Intake = new BiomassAndN()
            {
                Wt = animals.IntakeAll.Weight,
                N = animals.IntakeAll.N,
            };
            Excreta = new BiomassAndN()
            {
                Wt = animals.FaecesAll.Weight,
                N = animals.FaecesAll.N + animals.UrineNAll,
            };

            PastureRemoved = StartOfDayPasture - EndOfDayPasture;
            SupplementRemoved = StartOfDaySupplement - EndOfDaySupplement;
            LiveWeightGain = EndOfDayAnimal - StartOfDayAnimal;

            // balance calculations
            LostWt = PastureRemoved.Wt - Intake.Wt; 
            LostN = PastureRemoved.N - (Excreta.N + LiveWeightGain.N);  

            if (!MathUtilities.FloatsAreEqual(LostWt, 0))
                throw new Exception("Mass balance error: Forage mass removed is not equal to animal intake.");
            if (!MathUtilities.FloatsAreEqual(LostN, 0))
                throw new Exception("Mass balance error: N balance error.");

            if (clock.Today.DayOfYear == 1)
            {
                if (!MathUtilities.FloatsAreEqual(animals.FaecesAll.Weight, som.Wt))
                    throw new Exception("Mass balance error: The animal faeces weight on day 1 is not equal to surface organic matter weight.");
                if (!MathUtilities.FloatsAreEqual(animals.UrineNAll, MathUtilities.Sum(urea.kgha)))
                    throw new Exception("Mass balance error: The animal urine on day 1 is not equal to soil urea amount.");
            }

        }
    }

    // Helper class for containing a mass and and N concentration.
    [Serializable]
    public class BiomassAndN
    {
        public double Wt { get; set; }
        public double N { get; set; }
        public static BiomassAndN operator +(BiomassAndN a, BiomassAndN b)
        {
            return new BiomassAndN()
            {
                Wt = a.Wt + b.Wt,
                N = a.N + b.N,
            };

        }
        public static BiomassAndN operator -(BiomassAndN a, BiomassAndN b)
        {
            return new BiomassAndN()
            {
                Wt = a.Wt - b.Wt,
                N = a.N - b.N,
            };
        }
    }
}
```
      Report: EventNames=[Clock].EndOfDay
        VariableNames:
          [Clock].Today as Date
          [Stock].NumberAll
          [Stock].WeightAll
          [MassBalanceCalculations].Script.SupplementRemoved as SupplementRemoved
          [MassBalanceCalculations].Script.PastureRemoved as PastureRemoved
          [MassBalanceCalculations].Script.Intake as Intake
          [MassBalanceCalculations].Script.Excreta as Excreta
          [MassBalanceCalculations].Script.LiveWeightGain as LiveWeightGain
          [MassBalanceCalculations].Script.LostN as LostN
          [MassBalanceCalculations].Script.LostWt as LostWt
          [SurfaceOrganicMatter].Wt
          [SurfaceOrganicMatter].N
          [Stock].FaecesAll
          [Stock].UrineNAll
          sum([Urea].kgha) as SoilUrea
      Zone Paddock: Area=1; Slope=0; AspectAngle=0; Altitude=50
        Manager SlurpSetup
```csharp
using System.Linq;
using System;
using Models.Core;
using Models.PMF;
using Models.PMF.Organs;
using System.Data;
    
namespace Models
{
    [Serializable]
    public class Script : Model
    {
        [Link] Plant slurp;

        [EventSubscribe("StartOfSimulation")]
        private void OnStartOfSimulation(object sender, EventArgs e)
        {
            var slurpLeaf = Apsim.Child(slurp, typeof(SimpleLeaf)) as SimpleLeaf;

            double wt = 500; // g/m2
            slurpLeaf.Live.StructuralWt = wt;
            slurpLeaf.Live.StorageWt = 0;
            slurpLeaf.Live.StructuralN = wt * slurpLeaf.MinNconc;
            slurpLeaf.Live.StorageN = wt * slurpLeaf.MaxNconc - slurpLeaf.Live.StructuralN;
        }
    }
}
```
        Plant Slurp
        SurfaceOrganicMatter: InitialResidueName=wheat_stubble; InitialResidueType=wheat; InitialResidueMass=0; InitialStandingFraction=0; InitialCPR=0; InitialCNR=100
        Soil: ASCOrder=Vertosol; ASCSubOrder=Black; SoilType=Clay; Site=Norwin; NearestTown=Norwin; Region=Darling Downs and Granite Belt; State=Queensland; Country=Australia; NaturalVegetation=Qld. Bluegrass, possible Qld. Blue gum; ApsoilNumber=900; Latitude=-27.581836; Longitude=151.320206; LocationAccuracy=+/- 20m
          DataSource=CSIRO Sustainable Ecosystems, Toowoomba; Characteriesd as part of the GRDC funded project"Doing it better, doing it smarter, managing soil water in Australian agriculture' 2011
          Comments=OC, CLL for all crops estimated-based on Bongeen Mywybilla Soil No1
          Physical
            Thickness  BD       AirDry    LL15      DUL       SAT       KS
            150        1.01056  0.13025   0.2605    0.521     0.588655  20
            150        1.07146  0.198689  0.248362  0.496723  0.565677  20
            300        1.09394  0.28      0.28      0.488438  0.557193  20
            300        1.15861  0.28      0.28      0.480297  0.532787  20
            300        1.17301  0.28      0.28      0.471584  0.527354  20
            300        1.16287  0.28      0.28      0.457071  0.53118   20
            300        1.1875   0.28      0.28      0.452332  0.521888  20
            SoilCrop SlurpSoil: LL=[0.261, 0.248, 0.28, 0.306, 0.36, 0.392, 0.446]; KL=[0.06, 0.06, 0.06, 0.04, 0.04, 0.02, 0.01]; XF=[1, 1, 1, 1, 1, 1, 1]
          WaterBalance SoilWater: SummerDate=1-Nov; SummerU=5; SummerCona=5; WinterDate=1-Apr; WinterU=5; WinterCona=5; DiffusConst=40; DiffusSlope=16; Salb=0.12; CN2Bare=73; CNRed=20; CNCov=0.8; Thickness=[150, 150, 300, 300, 300, 300, 300]; SWCON=[0.3, 0.3, 0.3, 0.3, 0.3, 0.3, 0.3]
          SoilNitrogen: same as Sensibility.WheatSheepFeedlot.WheatSheep.Soil.SoilNitrogen
          Organic: FOMCNRatio=40
            Thickness  Carbon  SoilCNRatio  FBiom  FInert  FOM
            150        1.2     12           0.04   0.4     347.129
            150        0.96    12           0.02   0.6     270.344
            300        0.6     12           0.02   0.8     163.972
            300        0.3     12           0.02   1       99.4541
            300        0.18    12           0.01   1       60.322
            300        0.12    12           0.01   1       36.5871
            300        0.12    12           0.01   1       22.1912
          Chemical
            Thickness  NO3N  NH4N  PH
            150        1     0.1   8
            150        1     0.1   8
            300        1     0.1   8
            300        1     0.1   8
            300        1     0.1   8
            300        1     0.1   8
            300        1     0.1   8
          InitialWater: PercentMethod=1; FractionFull=1
          Sample InitialN: Thickness=[150, 150, 300, 300, 300, 300, 300]; SWUnits=Volumetric; OCUnits=Total; PHUnits=Water
          CERESSoilTemperature
    Simulation MassBalanceFeedlot
      Memo
        This simulation checks the mass balance of animal / **supplement** interactions. The checks are done in the MassBalanceCalculations manager script.

        The script first calculates the amount of pasture removed:

        	PastureRemoved = StartOfDayPasture - EndOfDayPasture;

        and the weight gain of the animals on a day.

        	LiveWeightGain = EndOfDayAnimal - StartOfDayAnimal;

        It then calculates two balance terms that should be zero. The first checks that supplement removed = animal intake.

        	LostWt = SupplementRemoved.Wt - Intake.Wt;

        The second checks that N in the pasture removed = excreta N + the N retained by the animal.

        	LostN = PastureRemoved.N - (Excreta.N + LiveWeightGain.N);

        A check is then made (on day 1 of the simulation) that the faeces from the animal is added to the surface organic matter (som) model:

        	if (!MathUtilities.FloatsAreEqual(animals.FaecesAll.Weight, som.Wt))
        		throw new Exception("Mass balance error: The animal faeces weight on day 1 is not equal to surface organic matter weight.");

        A check is then made (on day 1 of the simulation) that the urine from the animal is added to the soil urea pool:

        	if (!MathUtilities.FloatsAreEqual(animals.UrineNAll, MathUtilities.Sum(urea.kgha)))
        		throw new Exception("Mass balance error: The animal urine on day 1 is not equal to soil urea amount.");

        These last checks are only done on day 1 because flows in and out of SOM and Urea pools make it difficult to calculate mass balance. The assumption is that if it works on day 1 it works for all other days.
      Clock: Start=2000-01-01; End=2000-05-31
      Summary SummaryFile
      Weather: FileName=%root%\Examples\WeatherFiles\lincoln.met
      SoilArbitrator
      Stock: same as MassBalanceCheck.MassBalanceForage.Stock
      Supplement: SpoilageTime=0
        Stores:
          Name    Stored  IsRoughage  DMContent  DMD  MEContent  CPConc  ProtDg  PConc   SConc   EEConc  ADIP2CP  AshAlk  MaxPassage
          fodder  0       true        0.85       0    0          0       0       0       0       0       0        0       0
          silage  50000   true        1          0.7  10         0.25    0.8     0.0032  0.0024  0.02    0.06     0.6     0
      Manager ManageStock
```csharp
using System.Linq;
using System;
using Models.Core;
using Models.Utilities;
using Models.GrazPlan;
using APSIM.Shared.Utilities;

namespace Models
{
    [Serializable]
    public class Script : Model
    {
        [Link] Clock Calendar;
        [Link] Stock Animals;
        [Link] Supplement Feed;

        private double sale_age = 3.0;
        private int no_to_buy;
        private int group_count;
        private int g;
        
        [EventSubscribe("DoManagement")]
        private void OnDoManagement(object sender, EventArgs e)
        {
            // purchase animals annually
            if (DateUtilities.DatesEqual("01 JAN", Calendar.Today))
            {
                g = Animals.NoGroups + 1;
                no_to_buy = 1;
                
                StockBuy purchase = new StockBuy();
                purchase.Genotype = "small merino";
                purchase.Number = no_to_buy;
                purchase.Sex = ReproductiveType.Castrate;
                purchase.Age = 12;
                purchase.Weight = 45.0;
                purchase.UseTag = g + 1;
                
                Animals.Buy(purchase);
                Animals.Move("Feedlot");
            }

            // Shearing all animals
            if (DateUtilities.DatesEqual("15 Dec", Calendar.Today))
            {
                Animals.Shear(shearAdults:true, shearYoung:true);
            }
            
            // Sell cast for age animals
            if (DateUtilities.DatesEqual("20 Dec", Calendar.Today))
            {
                group_count = Animals.NoGroups;
                for (g = 1; g <= group_count; g++)
                    Animals.SplitByAge(Convert.ToInt32(365 * sale_age));                   // older animals into a new group

                foreach (var animalGroup in Animals.AnimalGroups)
                {
                    if (animalGroup.AgeDays >= 365 * sale_age)
                        Animals.Sell(animalGroup.NoAnimals, animalGroup);
                }
            }
            
            if (Animals.NumberAll > 0)
                Feed.Feed("silage", 0.8 * Animals.NumberAll, "Feedlot");
        }
    }
}
```
      Manager MassBalanceCalculations
        StartOfDayPasture =
        EndOfDayPasture =
        StartOfDaySupplement =
        EndOfDaySupplement =
        StartOfDayAnimal =
        EndOfDayAnimal =
        PastureRemoved =
        SupplementRemoved =
        LiveWeightGain =
        Intake =
        Excreta =
        LostN = 0
        LostWt = 0
```csharp
using Models.Surface;
using Models.PMF.Interfaces;
using System.Diagnostics;
using Models.AgPasture;
using System.Linq;
using System.Collections.Generic;
using System.Collections;
using Models.Soils;
using Models.PMF.Organs;
using Models.PMF;
using System.Xml.Serialization;
using APSIM.Shared.Utilities;
using Models.GrazPlan;
using Models.Interfaces;
using Models.Utilities;
using Models.Core;
using Models;
using System;

namespace Models
{

    [Serializable]
    public class Script : Model
    {
        [Link] Clock clock;
        [Link] IOrganDamage[] forages;
        [Link] Stock animals;
        [Link] Zone paddocks;
        [Link] ISummary summary;
        [Link] Simulation farm;
        [Link] Supplement supplement;
        [Link] SurfaceOrganicMatter som;
        [Link(ByName=true)] ISolute urea;

        public BiomassAndN StartOfDayPasture { get; set; }
        public BiomassAndN EndOfDayPasture { get; set; }
        public BiomassAndN StartOfDaySupplement { get; set; }
        public BiomassAndN EndOfDaySupplement { get; set; }
        public BiomassAndN StartOfDayAnimal { get; set; }
        public BiomassAndN EndOfDayAnimal { get; set; }
        public BiomassAndN PastureRemoved { get; set; }
        public BiomassAndN SupplementRemoved { get; set; }
        public BiomassAndN LiveWeightGain { get; set; }
        public BiomassAndN Intake { get; set; }
        public BiomassAndN Excreta { get; set; }
       
        public double LostN { get; set; } 
        public double LostWt { get; set; } 



        // Start of simulation
        [EventSubscribe("StartOfSimulation")]
        private void OnStart(object sender, EventArgs e)
        {
            forages = forages.Where(forage => forage.IsAboveGround && !(forage is SurfaceOrganicMatter)).ToArray();
        }

        // Start of day
        [EventSubscribe("StartOfDay")]
        private void OnDoManagement(object sender, EventArgs e)
        {
            StartOfDaySupplement = new BiomassAndN() 
            { 
                Wt = supplement.Stores.Sum(supp => supp.Stored),
                N = supplement.Stores[1].CPConc / 6.25 * supplement.Stores.Sum(supp => supp.Stored),
            };
            StartOfDayPasture = new BiomassAndN() 
            { 
                Wt = forages.Sum(forage => forage.Live.Wt * 10),
                N = forages.Sum(forage => forage.Live.N * 10),
            };
            StartOfDayAnimal = new BiomassAndN() 
            { 
                Wt = animals.WeightAll,
                N = 0,
            };
        }

        // End of day
        [EventSubscribe("DoManagementCalculations")]
        private void OnDoManagementCalculations(object sender, EventArgs e)
        {
            EndOfDaySupplement = new BiomassAndN() 
            { 
                Wt = supplement.Stores.Sum(supp => supp.Stored),
                N = supplement.Stores[1].CPConc / 6.25 * supplement.Stores.Sum(supp => supp.Stored),
            };
            EndOfDayPasture = new BiomassAndN() 
            { 
                Wt = forages.Sum(forage => forage.Live.Wt * 10),
                N = forages.Sum(forage => forage.Live.N * 10),
            };
            EndOfDayAnimal = new BiomassAndN() 
            { 
                Wt = animals.WeightAll,
                N = animals.RetainedNAll,   // kg/d
            };

            Intake = new BiomassAndN()
            {
                Wt = animals.IntakeAll.Weight,
                N = animals.IntakeAll.N,
            };
            Excreta = new BiomassAndN()
            {
                Wt = animals.FaecesAll.Weight,
                N = animals.FaecesAll.N + animals.UrineNAll,
            };

            PastureRemoved = StartOfDayPasture - EndOfDayPasture;
            SupplementRemoved = StartOfDaySupplement - EndOfDaySupplement;
            LiveWeightGain = EndOfDayAnimal - StartOfDayAnimal;
            //  do a balance calc
            LostN = SupplementRemoved.N - (Excreta.N + LiveWeightGain.N);  
            LostWt = SupplementRemoved.Wt - animals.IntakeAll.Weight; 

            if (!MathUtilities.FloatsAreEqual(LostWt, 0))
                throw new Exception("Mass balance between supplement and stock has not been maintained: " + LostWt.ToString());
            if (!MathUtilities.FloatsAreEqual(LostN, 0))
                throw new Exception("Nitrogen mass balance between supplement and stock has not been maintained: " + LostN.ToString());

            if (clock.Today.DayOfYear == 1)
            {
                if (!MathUtilities.FloatsAreEqual(animals.FaecesAll.Weight, som.Wt))
                    throw new Exception("Mass balance error: The animal faeces weight on day 1 is not equal to surface organic matter weight.");
                if (!MathUtilities.FloatsAreEqual(animals.UrineNAll, MathUtilities.Sum(urea.kgha)))
                    throw new Exception("Mass balance error: The animal urine on day 1 is not equal to soil urea amount.");
            }
        }
    }

    // Helper class for containing a mass and and N concentration.
    [Serializable]
    public class BiomassAndN
    {
        public double Wt { get; set; }
        public double N { get; set; }
        public static BiomassAndN operator +(BiomassAndN a, BiomassAndN b)
        {
            return new BiomassAndN()
            {
                Wt = a.Wt + b.Wt,
                N = a.N + b.N,
            };

        }
        public static BiomassAndN operator -(BiomassAndN a, BiomassAndN b)
        {
            return new BiomassAndN()
            {
                Wt = a.Wt - b.Wt,
                N = a.N - b.N,
            };
        }
    }
}
```
      Report: same as MassBalanceCheck.MassBalanceForage.Report
      Zone Feedlot: Area=1; Slope=0; AspectAngle=0; Altitude=50
        SurfaceOrganicMatter: InitialResidueName=wheat_stubble; InitialResidueType=wheat; InitialResidueMass=0; InitialStandingFraction=0; InitialCPR=0; InitialCNR=100
        Soil: same as MassBalanceCheck.MassBalanceForage.Paddock.Soil
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