Simulations: Version=126
  DataStore
  Memo Stock Model Examples
    #Stock Model Example Simulations

    Contributors:

    * Neville Herrman (CSIRO)
    * Dean Holzworth (CSIRO)
    * Di Mayberry (CSIRO)
    * Mark Liefferring (AgResearch
    * Val Snow (AgResearch)

    Funding Acknowledgements:

    * CSIRO ???? fund
    * AgResearch Strategic Science Investment Fund
    * APSIM Initiative Development Fund

    This simulation file contains examples of how to use Stock is a variety of settings. Each simulation has a variety of Managers that are explained in this PDF and/or as in-text comments in the Manager scripts. The intention is that they can form starting points for new simulations and as such may not make much practical sense.
    Included are:

    *  Agistment grazing of a forage crop with supplements offered
    *  A simple rotation of stock around five paddocks
    *  Feedlot sheep tactically grazing a wheat crop
  Folder Agistment Grazing Example
    Memo Agistment Grazing Described
      “Agistment Grazing” refers to a practise of bringing stock onto and then off a paddock based on a set of criteria. The location and management of the stock when not on the paddock are ignored. Practical examples of this might be grazing dairy heifers on a dry stock farm, or periodic grazing of an experiment trial using sheep from a nearby farm.

      Because we are not concerned with the disposition of the stock while not grazing the forage crop, this a single-paddock simulation. The paddock contains a forage crop, in this example we use plantain, that is irrigated and fertilised. The forage is sown in spring of the first year and is rejuvenated thereafter at the frequency set on the sowing rule in the paddock. In this simulation a new mob of animals are bought every time the forage is ready to be grazed and sold after each grazing event (note that here bought and sold only refer to acquiring and  disposing of animals not the financial transactions of such actions). The user sets the characteristics of the stock, the grazing rules and if/how any supplementary feeding is done.

      This example includes:

      * setting several commonly-needed stock characteristics
      * buying stock
      * finding out the current location of the stock
      * changing the location of the stock
      * feeding supplements based on a range of criteria
      * selling stock
    Simulation Agistment Grazing
      Clock: Start=2010-09-01; End=2012-08-31
      Weather: FileName=%root%\Examples\WeatherFiles\lincoln.met
      Summary
      SoilArbitrator Soil Arbitrator
      MicroClimate: a_interception=0; b_interception=1; c_interception=0; d_interception=0; soil_albedo=0.23; SoilHeatFluxFraction=0.4; MinimumHeightDiffForNewLayer=0; NightInterceptionFraction=0.5; ReferenceHeight=2
      Supplement: SpoilageTime=0
        Stores:
          Name    Stored  IsRoughage  DMContent  DMD   MEContent  CPConc  ProtDg  PConc   SConc   EEConc  ADIP2CP  AshAlk  MaxPassage
          fodder  0       true        0.85       0     0          0       0       0       0       0       0        0       0
          silage  0       true        1          0.75  12         0.18    0.8     0.0032  0.0024  0.02    0.06     0.6     0
      Memo SupplementMemo
        **Supplement store**

        The script GrazeForageCrop allows for optional supplementary feeding. In order to support that feeding it is necessary to include the Supplement model in the simulation. All the buying and feeding out is handled in GrazeForageCrop but here we name the supplement (“silage”) and give it some properties including the quality parameters of the supplement.

        In the quality parameters, note that we set the dry matter percentage to 100. This is does not affect the feeding quality of the supplement but means that all buy, sell, feed, etc. commands are given on a dry matter rather than wet matter basis. Once these quality parameters are set against a named supplement they are retained and all that is needed is to buy, sell or feed the named supplement.
      Stock: RandSeed=9999
      Memo Stock Memo
        **Stock**

        All the paramters for Stock are set in GrazeForageCrop.
      Manager GrazeForageCrop
        Genotype = Friesian
        Sex = Female
        Age = 12
        Weight = 180
        Pregnant = 0
        Lactating = 0
        YoungNumber = 0
        YoungWt = 0
        StockingRate = 50
        CurrentLocation = Away
        PreGrazingDM = 2000
        MinGrazingDays = 7
        PostGrazingDM = 1500
        DoNoGrazingWindow = False
        NoGrazeStart = 1-Jun
        NoGrazeEnd = 31-Jul
        SupplementName = silage
        SupplementFirst = False
        SupplementEveryDay = 2
        SupplementOnPastureMass = 2
        TriggerPastureMass = 2500
        NumStock = 0
        GrazingSeasonIsOpen = False
        HarvestableBiomass = 0
        HarvestableBiomassYesterday = 0
```csharp
using Models.PMF.Interfaces;
using System.Diagnostics;
using Models.AgPasture;
using System.Linq;
using System.Collections.Generic;
using System.Collections;
using Models.Soils;
using Models.PMF;
using System.Xml.Serialization;
using APSIM.Shared.Utilities;
using Models.GrazPlan;
using Models.Utilities;
using Models.Core;
using Models;
using System;

namespace Models
{

    [Serializable]
    public class Script : Model
    {
        [Link] Clock clock;
        [Link] Stock stock;
        [Link] Supplement supplement;
        [Link] List<Zone> paddocks;
        [Link] ISummary summary;
        [Link] Simulation farm;
        [Link] List<IPlantDamage> forages = null;

        private int CurrentGroupNum = 1;    // animal group number
        private int CurrentLocationNum { get; set; }

        [Separator("Stock type info, the same type of stock are brought onto the paddock at each grazing")]

        [Description("Stock: genotype (e.g. Small Merino, Angus, Friesian):")] 
        [Display(Values="GetGenotypes")]
        public string Genotype { get; set; }

        [Description("Stock: sex (Female, Male, Castrate):")] 
        public ReproductiveType Sex { get; set; }

        [Description("Stock: age (months):")] 
        public double Age { get; set; }

        [Description("Stock: weight (kg liveweight /head):")] 
        public double Weight { get; set; }

        [Description("Stock: fertility status (0 if non-pregnant or days since conception):")] 
        public int Pregnant { get; set; }

        [Description("Stock: lactation status (0 if non-lactating or days since parturition):")]
        public int Lactating { get; set; }

        [Description("Stock: number of unweaned young:")]
        public int YoungNumber { get; set; }

        [Description("Stock: weight of unweaned young:")] 
        public double YoungWt { get; set; }

        [Separator("Grazing event information")]

        [Description("Paddock stocking rate (head/ha): ")] 
        public double StockingRate { get; set; }

        [Description("Initial location of the stock (give either the paddock name or 'Away'): ")] 
        public string CurrentLocation { get; set; }

        [Description("Standing biomass at which to bring the stock into the simulation (kg DM/ha): ")] 
        public double PreGrazingDM { get; set; }

        [Description("Require > X days of grazable forage before moving stock: ")] 
        [Tooltip("To prevent stock being moved too often, require that there be a minimum number of grazing-days of forage available before moving the stock on. The forage needed is very simply set as 3% of the stock liveweight")] 
        public int MinGrazingDays { get; set; }

        [Description("Standing biomass at which to exit  stock from the simulation (kg DM/ha): ")] 
        public double PostGrazingDM { get; set; }

        [Description("Implement a no-grazing window? (tick for yes): ")] 
        public bool DoNoGrazingWindow { get; set; }

        [Description("Start of the no-grazing window (dd-MMM)")] 
        public string NoGrazeStart { get; set; }

        [Description("End of the no-grazing window (dd-MMM)")] 
        public string NoGrazeEnd { get; set; }

        [Separator("Supplementary feeding")]

        [Description("Name of the supplement to feed: ")] 
        public string SupplementName { get; set; }

        [Description("Feed the supplement first (i.e. before the new forage is available to the stock)?: ")] 
        public bool SupplementFirst { get; set; }

        [Description("Amount of supplementary feeding offered every day (kg DM /head /day): ")] 
        public double SupplementEveryDay { get; set; }

        [Description("Additional amount of supplement offered when available biomass is low (kg DM /head /day): ")] 
        public double SupplementOnPastureMass { get; set; }

        [Description("Trigger biomass for above rule (kg DM /ha): ")] 
        public double TriggerPastureMass { get; set; }

        public int NumStock { get; set; }
        public bool GrazingSeasonIsOpen { get; set; } // number of stock on the whole farm
        public double HarvestableBiomass { get; set; }
        public double HarvestableBiomassYesterday { get; set; }

        // Return a list of genotypes to the properties tab.
        public string[] GetGenotypes()
        {
            if (stock != null)
                return stock.Genotypes.Names.ToArray();
            return null;
        }

        [EventSubscribe("StartOfSimulation")]
        private void OnStartOfSimulation(object sender, EventArgs e)
        {

            //Debugger.Break();

            summary.WriteMessage(this, "Initialising the paddock information");

            NumStock = (int)(Math.Round(StockingRate * farm.Area, 0));

            if (CurrentLocation.ToLower() != "away")
            {
                BuyStock();
                stock.Move(CurrentLocation);
                summary.WriteMessage(this, " The Stock have been moved to " + CurrentLocation);
            }

            summary.WriteMessage(this, "     The number of animals has been rounded to " + NumStock + " from " + (StockingRate * farm.Area));
            summary.WriteMessage(this, "     The animals will begin in " + CurrentLocation + " which is paddock number " + CurrentLocationNum + " in the simulation");
            summary.WriteMessage(this, "     The area of the whole farm is " + farm.Area + " ha");

        }

        [EventSubscribe("DoManagement")]
        private void OnDoManagement(object sender, EventArgs e)
        {
            GrazingSeasonIsOpen = true;
            if (DoNoGrazingWindow)
                GrazingSeasonIsOpen = !DateUtilities.WithinDates(NoGrazeStart, clock.Today, NoGrazeEnd);

            bool sellSomeStock = false;
            if (!GrazingSeasonIsOpen)
                sellSomeStock = true;

            // Calculate forage mass in the paddock
            HarvestableBiomass = 0.0;
            foreach (var forage in forages)
                foreach (var forageOrgan in forage.Organs)
                    if (forageOrgan.IsAboveGround)
                        HarvestableBiomass += forageOrgan.Live.Wt + forageOrgan.Dead.Wt;
            
            HarvestableBiomass *= 10;  // Convert to kg/ha

            if (clock.Today == clock.StartDate)
                HarvestableBiomassYesterday = HarvestableBiomass;

            double deltaHarvestableBiomass = Math.Max(0.0, HarvestableBiomass - HarvestableBiomassYesterday);

            if (HarvestableBiomass <= PostGrazingDM)
                sellSomeStock = true;

            if (CurrentLocation == "Away")
                sellSomeStock = false;

            // The 0.03 is the propostion of body mass that the stock might eat
            double minFodder = Math.Max(PreGrazingDM, Math.Max(0.0, (0.03 * MinGrazingDays * NumStock * Weight) - (deltaHarvestableBiomass * MinGrazingDays))); 
            HarvestableBiomassYesterday = HarvestableBiomass;

            if (CurrentLocation == "Away" && (HarvestableBiomass >= PreGrazingDM) && HarvestableBiomass >= (PostGrazingDM + minFodder) && GrazingSeasonIsOpen)
            {
                CurrentLocation = paddocks[0].Name;
                CurrentLocationNum = paddocks[0].Index;
                BuyStock();
                stock.Move(CurrentLocation);
                summary.WriteMessage(this, "     Buying stock ");
            }

            if (sellSomeStock)
            {
                CurrentLocation = "Away";
                CurrentLocationNum = -1;
                SellStock();
                summary.WriteMessage(this, "     Selling stock ");
            }

            if (CurrentLocation != "Away")
            {
                if (SupplementEveryDay > 0)
                {
                    double silageOnHand = supplement.Stores[2 - 1].Stored;
                    if (silageOnHand < SupplementEveryDay * stock.NumberAll)
                    {
                        supplement.Buy(SupplementEveryDay * 30.0 * stock.NumberAll, SupplementName);  // i.e. 1 months worth
                        summary.WriteMessage(this, "SupplementEveryDay: Buying " + SupplementName + " of total amount : " + (SupplementEveryDay * 90 * stock.NumberAll) + " kg DM");
                    }
                    supplement.Feed(SupplementName, SupplementEveryDay * stock.NumberAll, CurrentLocation, SupplementFirst);
                }

                if (SupplementOnPastureMass > 0 && HarvestableBiomass <= TriggerPastureMass)
                {
                    double silageOnHand = supplement.Stores[2 - 1].Stored;
                    if (silageOnHand < SupplementOnPastureMass * stock.NumberAll)
                    {
                        supplement.Buy(SupplementOnPastureMass * 30.0 * stock.NumberAll, SupplementName);  // i.e. 1 months worth
                        summary.WriteMessage(this, "SupplementOnBiomass: Buying " + SupplementName + " of total amount : " + (SupplementOnPastureMass * 90 * stock.NumberAll) + " kg DM");
                    }
                    supplement.Feed(SupplementName, SupplementOnPastureMass * stock.NumberAll, CurrentLocation, SupplementFirst);
                }
            }
        }


        public void BuyStock()
        {
            CurrentGroupNum = stock.NoGroups + 1;
            StockBuy purchase = new StockBuy();
            purchase.Genotype = Genotype;
            purchase.Number = NumStock;
            purchase.Sex = Sex;
            purchase.Age = Age;       // age in months
            purchase.Weight = Weight;  // live weight in kg
            purchase.UseTag = CurrentGroupNum + 1;
            purchase.MatedTo = purchase.Genotype;
            purchase.Pregnant = Pregnant;  // days pregnant, 0 = non pregnant, 1 = pregnant
            purchase.Lactating = Lactating;  // 0 for dry, 1 for lactating
            purchase.NumYoung = YoungNumber;
            purchase.YoungWt = YoungWt;

            stock.Buy(purchase);
        }

        public void SellStock()
        {
            int NumGroups = stock.NoGroups;

            NumGroups = stock.NoGroups;
            for (int gg = 1; gg <= NumGroups; gg++)
            {
                stock.Sell(stock.Number[gg - 1]);
            }
        }
    }
}
```
      Memo GrazeForageCrop Memo
        **GrazeForageCrop**

        This is a Manager script that undertakes several duties.

        The first stack of parameters in GrazeForageCrop sets the type of animals that will be bought and then managed during the simulation. The available options are accessible using a combination of dropdown boxes and data entry fields.

        The middle stack of parameters sets:

        * The paddock stocking rate – the number of head bought is this times the area of the paddock (click on “Field” to set this away from its default of 1 ha).
        * At the start of the simulation the stock can be on the simulated paddock (enter the name of the paddock) absent from the simulation (enter “Away”). If the paddock name is given the stock will be bought at the beginning of the first day and drafted to the paddock.
        * The third parameter sets the forage crop biomass that triggers the buying of stock and drafting them onto the paddock. If there are multiple forage species in the paddock the biomass will be the sum of all.
        * When forage crop growth rates closely match animal demand, the simulation can oscillate with stock bought just above the grazing trigger and then during that day they graze below the exit value and are sold with the pattern repeating a few days later. To prevent this it is desirable to set a minimum gazing duration. Here this is done very simply by assuming a maximum intake of 3% of liveweight per day.
        * The fifth parameter is the biomass at which t terminate the grazing event and sell the stock.
        * The last three parameters allow the user to set a no-grazing window of time that overrides the parameters above. To enable this set a tick in the box and enter the date range as dd-mmm. The same window is used each year. Windows can cross year boundaries (e.g. 15-Dec to 10-Jan).

        The final stack of parameters set some options for supplementary feeding. As noted above, a type of silage has been set up in the supplement store. In this stack of parameters:

        * Give the name (case matters) of the supplement type.
        * Indicate if the supplement is to be fed before the stock have access to the crop. The alternative is that it is available day-long and the stock can select between supplement and crop. Ticking the box for feeding first will increase the intake of supplement and decrease the intake of crop. The magnitude of this will depend on the stock, the total feed on offer and the qualities of the supplement and crop.
        * The third parameter allows the user to feed the stock supplement on a per head basis every day regardless of the amount of forage crop available.
        * The last two parameters allow for feeding only when the forage crop biomass is low with an additional amount of supplement per head per day when the crop biomass is below a given value.
      Report: EventNames=[Clock].EndOfDay
        VariableNames:
          [Clock].Today as Date
          Mean of [Stock].NumberAll from [Report].DayAfterLastOutput to [Clock].Today as NumStock
          Mean of [Stock].IntakeAll.Weight from [Report].DayAfterLastOutput to [Clock].Today as AveDMIntake
          Mean of [Stock].MEIntakeAll from [Report].DayAfterLastOutput to [Clock].Today as AveMEIntake
          Mean of [Stock].WeightAll from [Report].DayAfterLastOutput to [Clock].Today as AveBodyMass
          Mean of [Stock].CondScoreAll from [Report].DayAfterLastOutput to [Clock].Today as AveConditionScore
          Mean of [Stock].MilkWtAll from [Report].DayAfterLastOutput to [Clock].Today as AveMilkWeight4pcCorr
          Mean of ([Stock].MilkWtAll * 0.04 * 1.8) from [Report].DayAfterLastOutput to [Clock].Today as AveMilkSolids // note the "0.04" is to convert the 4% fat corrected to dry milk fat, the "1.8" is on the assumption that protein is 80% of the fat content
          Last of [GrazeForageCrop].Script.HarvestableBiomass from [Report].DayAfterLastOutput to [Clock].Today as HarvestableBiomass
          Last of [Supplement].stores[2].Stored from [Report].DayAfterLastOutput to [Clock].Today as SupplementRemaining
          Last of [Field].Plantain.AboveGround.Wt * 10.0 from [Report].DayAfterLastOutput to [Clock].Today as PlantainMass
          //Last of [GrazeForageCrop].Script.CurrentLocation from [Report].DayAfterLastOutput to [Clock].Today as StockLocation
          [GrazeForageCrop].Script.CurrentLocation as StockLocation
          Mean of [Stock].PastIntakeAll.Weight from [Report].DayAfterLastOutput to [Clock].Today as AvePlantainIntake
          Mean of ([Stock].SuppIntakeAll.Weight + [Stock].PastIntakeAll.Weight)  from [Report].DayAfterLastOutput to [Clock].Today as AveSilagePlusPlantainIntake
          Mean of ([Stock].PastIntakeAll.N / ([Stock].PastIntakeAll.Weight + 0.001)) from [Report].DayAfterLastOutput to [Clock].Today as AvePlantainNContent
          Mean of [Field].Plantain.AboveGround.NConc
          Mean of [Stock].MEIntakeAll / ([Stock].IntakeAll.Weight + 0.001) from [Report].DayAfterLastOutput to [Clock].Today as AveMEConcIntake
      Memo Memo1
        The first plot shows the location of the stock (on the paddock or ‘away’), the grazable biomass in the paddock and the supplement remaining in the store. The second plot shows average body mass and average dry matter intake. Note how body mass resets to a consistent value at the start of each grazing event. This is because a new mob of animals is bought at the start of each grazing event.

        The shaded area behind the plots shows the location of the stock (get this to show but adding a "ShadedBarsOnGraph" model to a Graph|Series). Click-and-holding on one of the shaded areas will pop up the name of the location.
      Zone Field: Area=1; Slope=0; AspectAngle=0; Altitude=50
        Manager SowingRule
          StartDate = 1-oct
          EndDate = 30-oct
          MinESW = 50
          MinRain = 30
          RainDays = 5
          mustSow = yes
          SowingFreq = 3
          CultivarName = Tonic
          SowingDepth = 10
          RowSpacing = 150
          Population = 200
          Amount = 60
          CropAge = 0
```csharp
using Models.Interfaces;
using System.Linq;
using System;
using Models.Core;
using Models.PMF;
using Models.Soils;
using Models.Utilities;
using APSIM.Shared.Utilities;
using Models.Climate;

namespace Models
{
    [Serializable]
    public class Script : Model
    {
        [Link] private Clock Clock;
        [Link] private Fertiliser Fertiliser;
        [Link] private Summary Summary;
        [Link] private Plant Plantain;
        [Link] private Soil Soil;
        private Accumulator accumulatedRain;
        [Link]
        private ISoilWater waterBalance;

        [Separator("======= Sowing conditions =======")]
        [Description("Start of sowing window (dd-mmm)")] public string StartDate { get; set;}
        [Description("End of sowing window (dd-mmm)")] public string EndDate { get; set;}
        [Description("Minimum extractable soil water for sowing (mm)")] public double MinESW { get; set;}
        [Description("Accumulated rainfall required for sowing (mm)")] public double MinRain { get; set;}
        [Description("Duration of rainfall accumulation (d)")] public int RainDays { get; set;}
        [Description("Must sow at the end of the window?")] public answerType mustSow { get; set; }
        [Description("Frequency of sowing (years)")] public int SowingFreq { get; set; }
    

        [Separator("======= Sowing data =======")]
        [Description("Cultivar to be sown")] public string CultivarName { get; set;}
        [Description("Sowing depth (mm)")] public double SowingDepth { get; set;}        
        [Description("Row spacing (mm)")] public double RowSpacing { get; set;}    
        [Description("Plant population (/m2)")] public double Population { get; set;}    

        [Separator("======= Sowing fertiliser =======")]
        [Description("Amount of fertiliser to be applied (kg/ha)")] public double Amount { get; set;}


        public double CropAge { get; set; }

           public enum answerType
        {
            /// <summary>a positive answer</summary>
            yes,
            /// <summary>a negative answer</summary>
            no
        }

        
        [EventSubscribe("StartOfSimulation")]
        private void OnSimulationCommencing(object sender, EventArgs e)
        {
            accumulatedRain = new Accumulator(this, "[Weather].Rain", RainDays);
            CropAge = SowingFreq + 1.0;
        }
        

        [EventSubscribe("DoManagement")]
        private void OnDoManagement(object sender, EventArgs e)
        {
            accumulatedRain.Update();
            CropAge += 1.0 / 365.25;

            bool doSowing = false;
            if (DateUtilities.WithinDates(StartDate,Clock.Today,EndDate) && !Plantain.IsAlive)
                doSowing = true;
            if ((MathUtilities.Sum(waterBalance.ESW) < MinESW) || (accumulatedRain.Sum < MinRain))
                doSowing = false;
            if ((mustSow == answerType.yes) && (DateUtilities.DatesEqual(EndDate, Clock.Today)))
                doSowing = true;
            if (CropAge < SowingFreq)
                doSowing = false;
            
            if (doSowing)
            {
               Plantain.Sow(population:Population, cultivar:CultivarName, depth:SowingDepth, rowSpacing:RowSpacing);
               Fertiliser.Apply(Amount: Amount, Type: Fertiliser.Types.NO3N);    
               CropAge = 0.0;
            }
        
        }
        
    }
}
```
        Manager AutomaticIrrigation
          allowIrrigation = yes
          seasonStart = 15-Sep
          seasonEnd = 30-Apr
          seasonsAllocation = 10000
          triggerDeficit = 75
          targetDeficit = 95
          returndays = 3
          maximumAmount = 15
          depthPAWC = 500
          TopSWdeficit = 0
          TopSWC = 0
          DaysSinceIrrigation = 0
          AmountToApply = 0
          SeasonAppliedAmount = 0
```csharp
using Models.Interfaces;
using System.Linq;
using System;
using Models.Core;
using Models.PMF;
using Models.Soils;
using System.Xml.Serialization;
using APSIM.Shared.Utilities;
using Models.PMF.Phen;

        
namespace Models
{
    [Serializable] 
    [System.Xml.Serialization.XmlInclude(typeof(Model))]
    public class Script : Model
    {
        [Link] private ISummary summary;
        [Link] private Irrigation Irrigation;
        [Link] private Clock Clock;
        [Link] private Soil Soil;
        [Link(IsOptional = true)] private Plant existingCrop;
        private DateTime StartDate;
        private DateTime EndDate;
        private double TopDUL;
        private double TopLL;
        private int nLayers;
        [Link(IsOptional = true)]
        private Phenology phenology;
        [Link]
        private IPhysical soilPhysical;
        [Link]
        private ISoilWater waterBalance;
        //Communication to other modules
       
        //User inputs from properties tab
        [Description("Turn irrigation on?")]
        public answerType allowIrrigation { get; set; }
        [Description("Start of irrigation season (dd-MMM)")]
        public string seasonStart { get; set; }
        [Description("End of irrigation season (dd-MMM)")]
        public string seasonEnd { get; set; }
        [Description("Season allocation (mm)")]
        public double seasonsAllocation { get; set; }
        [Description("Deficit to trigger irrigation (% PAWC)")]
        public double triggerDeficit { get; set; }
        [Description("Deficit to stop irrigaton (% PAWC)")]
        public double targetDeficit { get; set; }
        [Description("Minimum days for irrigation to return")]
        public double returndays { get; set; }
        [Description("Maximum irrigation application (mm/day)")]
        public double maximumAmount { get; set; }
        [Description("Depth to calculate PAWC (mm)")]
        public double depthPAWC { get; set; }
       
        public enum answerType
        {
            /// <summary>a positive answer</summary>
            yes,
            /// <summary>a negative answer</summary>
            no
        }

        //Class members
        [XmlIgnore] public double TopSWdeficit { get; set; }
        [XmlIgnore] public double TopSWC { get; set; }
        [XmlIgnore] public double DaysSinceIrrigation { get; set; }
        [XmlIgnore] public double AmountToApply { get; set; }
        [XmlIgnore] public double SeasonAppliedAmount { get; set; }
        
        private bool IrrigationIsAllowed { get; set; }
        private bool SeasonIsOpen { get; set; }
        private bool CropIsActive { get; set; }
        private bool IrrigatorIsAvailable { get; set; }
        private bool SoilIsDry { get; set; }

    
        //Calculate static soil variables
        [EventSubscribe("StartOfSimulation")]
        private void OnStartOfSimulation(object sender, EventArgs e)
        {   
            //Set the season dates
            StartDate = DateTime.Parse(seasonStart + "-" + Clock.Today.Year.ToString());
            EndDate = DateTime.Parse(seasonEnd + "-" + Clock.Today.Year.ToString());
            
            //Can we irrigate at all?
            IrrigationIsAllowed = false; 
            if (allowIrrigation == answerType.yes)
                IrrigationIsAllowed = true; 

            //Calculate soil water variables
            double depthFromSurface = 0.0;
            double fracLayer = 0.0;
            nLayers = soilPhysical.Thickness.Length;
            for (int layer = 0; layer < nLayers; layer++)
            {
                fracLayer = Math.Min(1.0, (depthPAWC - depthFromSurface) / soilPhysical.Thickness[layer]);
                TopLL += soilPhysical.LL15mm[layer] * fracLayer;
                TopDUL += soilPhysical.DULmm[layer] * fracLayer;
                depthFromSurface += soilPhysical.Thickness[layer];
                if (depthFromSurface >= depthPAWC)
                    layer = nLayers;
            }
        }
             
        //Determine daily requirement for irrigation
        [EventSubscribe("StartOfDay")]
        private void OnStartOfDay(object sender, EventArgs e)
        {
            //Can we irrigate today?          
            SeasonIsOpen = isBetween(Clock.Today, StartDate, EndDate);

            //Is there a crop in the ground that needs irrigation?
            CropIsActive = false;
            if ((existingCrop != null) && (existingCrop.IsAlive))
                CropIsActive = true;
            //if ((phenology.Stage >= 3.0) && (phenology.Stage < 6.0))
          
            //Is the irrigator available?
            IrrigatorIsAvailable = false;
            DaysSinceIrrigation += 1;
            if (DaysSinceIrrigation >= returndays)
                IrrigatorIsAvailable = true;
          
            //Is the soil dry enough to require irrigation?
            SoilIsDry = false;
            double depthFromSurface = 0.0;
            double fracLayer = 0.0;
            TopSWC = 0.0;
            for (int layer = 0; layer < nLayers; layer++)
            {
                fracLayer = Math.Min(1.0, (depthPAWC - depthFromSurface) / soilPhysical.Thickness[layer]);
                TopSWC += waterBalance.SWmm[layer] * fracLayer;
                depthFromSurface += soilPhysical.Thickness[layer];
                if (depthFromSurface >= depthPAWC)
                    layer = nLayers;
            }
            
            TopSWdeficit = TopSWC - TopDUL;
            if (Math.Max(0.0, -TopSWdeficit) >= (TopDUL - TopLL) * (100 - triggerDeficit) / 100)
                SoilIsDry = true;
                
            //Are all the conditions ratifying irrigation
            if (IrrigationIsAllowed && SeasonIsOpen && CropIsActive && IrrigatorIsAvailable && SoilIsDry)
            {
                //Lets bloody well irrigate then!!!!
                AmountToApply = TopDUL * targetDeficit / 100 - TopSWC;
                //AmountToApply = Math.Max(0.0, Math.Min(AmountToApply, seasonsAllocation - SeasonAppliedAmount));
                AmountToApply = maximumAmount;
                Irrigation.Apply(AmountToApply);
                DaysSinceIrrigation = 0;
                SeasonAppliedAmount += AmountToApply;
            }
        }
        
        ///Checks whether theDate is between iniDate and endDate (non-year specific)
        private bool isBetween(DateTime theDay, DateTime iniDate, DateTime endDate)
        {
            bool result = false;
            if (iniDate.DayOfYear < endDate.DayOfYear)
            {
                // period is within one year, ex: summer in the northern hemisphere
                if ((theDay.DayOfYear >= iniDate.DayOfYear) && (theDay.DayOfYear <= endDate.DayOfYear))
                    result = true;
            }
            else
            {
                // period goes over the end of the year, ex: summer in the southern hemisphere
                if ((theDay.DayOfYear >= iniDate.DayOfYear) || (theDay.DayOfYear <= endDate.DayOfYear))
                    result = true;
            }
            
            return result;
        }
    }
}
```
        Manager Fertilise on fixed dates
          EachYear = True
          Dates = 20-sep, 20-nov, 20-jan, 20-mar
          UseCritNThreshold = False
          CritNThreshold = 50
          CritNDepth = 75
          Depth = 50
          Amount = 30
          FertiliserType = UreaN
```csharp
using Models.Interfaces;
using System.Linq;
using APSIM.Shared.Utilities;
using Models.PMF;
using Models.Soils;
using Models.Core;
using System;
using Models.Soils.Nutrients;

namespace Models
{
    [Serializable]
    public class Script : Model
    {
        [Link] private Clock clock;
        [Link] private Fertiliser fertiliser;
        [Link] private ISummary summary;
        [Link] private Soil soil;
        private Nutrient nutrient;
        private SoilNitrogen soilN;
        [Link]
        private IPhysical soilPhysical;


        [Separator("Fertiliser will be applied on the date(s) below")]
        [Description("Apply fertiliser on the same day(s) each year? If no, then must include the year of appliaction below")]
        public bool EachYear { get; set; }

        [Description("Dates for one or more fertiliser applications (dd-mmm or dd-mmm-yyyy) as a list with a comma between dates")]
        public string[] Dates { get; set; }

        [Separator("Test for the mineral N in the soil and don't apply the fertiliser if greater than X kgN/ha is stored in the soil above a depth of Y mm")]
        [Description("Use a critical soil mineral N to prevent application above a threshold?")]
        public bool UseCritNThreshold { get; set; }

        [Description("Don't add fertiliser if N in the soil to the depth below exceeds (kg/ha)")]
        public double CritNThreshold { get; set; }

        [Description("Depth to which the amount of N in the soil should be calculated (mm)")]
        public double CritNDepth { get; set; }

        [Separator("Fertiliser application details")]
        [Description("Depth at which to apply the fertiliser (mm)")]
        public double Depth { get; set; }

        [Description("Amount of fertiliser to apply (kg N /ha) per application")]
        public double Amount { get; set; }

        [Description("Fertiliser type - select from the list")]
        public Fertiliser.Types FertiliserType { get; set; }


        [EventSubscribe("StartOfSimulation")]
        private void FindSoilNOrNutrient(object sender, EventArgs e)
        {
            nutrient = this.FindInScope<Nutrient>() as Nutrient;
            soilN = this.FindInScope<SoilNitrogen>() as SoilNitrogen;

            if (nutrient == null && soilN == null)
                throw new Exception(string.Format("Error in script {0}: Unable to find nutrient or soilN.", Name));
        }

        [EventSubscribe("DoManagement")]
        private void OnDoManagement(object sender, EventArgs e)
        {
            if (OnApplicationDate())
            {
                if (NContentBelowThreshold())
                    fertiliser.Apply(Amount, FertiliserType, Depth);
                else
                    summary.WriteMessage(this, "Skipping fertiliser application due to soil mineral N content being above critical threshold.");
            }
        }

        /// <summary>Checks if today's date is one of the specified fertiliser application dates.</summary>
        private bool OnApplicationDate()
        {
            if (EachYear)
                return Dates.Any(d => DateUtilities.DatesEqual(d, clock.Today));
            
            DateTime[] dates = Dates.Select(d => DateTime.ParseExact(d, "d-MMM-yyyy", null)).ToArray();
            return dates.Any(d => SameDate(d, clock.Today));
        }

        /// <summary>Checks if N content in soil is below critical threshold.</summary>
        private bool NContentBelowThreshold()
        {
            if (!UseCritNThreshold)
                return true;
            
            double[] weights = GetLayerWeights();
            double cumSoilN = 0;

            for (int i = 0; i < soilPhysical.Thickness.Length; i++)
            {
                if (nutrient != null)
                    cumSoilN += weights[i] * nutrient.MineralN[i];
                else if (soilN != null)
                    cumSoilN += weights[i] * soilN.mineral_n[i];
            }

            return cumSoilN <= CritNThreshold;
        }

        private double[] GetLayerWeights()
        {
            double[] weights = new double[soilPhysical.Thickness.Length];
            double cumDepth = 0;

            for (int i = 0; i < soilPhysical.Thickness.Length; i++)
            {
                cumDepth += soilPhysical.Thickness[i];
                if (cumDepth < CritNDepth)
                    weights[i] = 1;
                else if (cumDepth - soilPhysical.Thickness[i] <= CritNDepth)
                    weights[i] = (CritNDepth - (cumDepth - soilPhysical.Thickness[i])) / soilPhysical.Thickness[i];
                else
                    weights[i] = 0;
            }

            return weights;
        }

        private bool SameDate(DateTime d1, DateTime d2)
        {
            return d1.Year == d2.Year && d1.DayOfYear == d2.DayOfYear;
        }
    }
}
```
        Irrigation
        Fertiliser
        SurfaceOrganicMatter: InitialResidueName=grass; InitialResidueType=grass; InitialResidueMass=500; InitialStandingFraction=0; InitialCPR=0; InitialCNR=40
        Soil: SoilType=Generic medium texture; Region=Canterbury; Country=New Zealand; Latitude=0; Longitude=0
          Chemical
            Thickness  NO3N      NH4N       PH
            150        9.43396   0.377358   6
            150        6.59293   0.240729   6
            200        3.6821    0.113604   6
            250        2.19178   0.0547945  6
            250        2.19178   0.0547945  6
            500        0.740741  0.0296296  6
          Physical
            Thickness  ParticleSizeClay  BD    AirDry  LL15  DUL   SAT   KS
            150        20                1.3   0.05    0.15  0.36  0.45  4500
            150        20                1.4   0.17    0.17  0.34  0.42  2500
            200        20                1.5   0.19    0.19  0.33  0.38  200
            250        15                1.6   0.17    0.17  0.3   0.36  1500
            250        10                1.45  0.1     0.1   0.2   0.38  5000
            500        10                1.35  0.1     0.1   0.2   0.39  10000
            SoilCrop PlantainSoil: LL=[0.15, 0.17, 0.19, 0.17, 0.1, 0.1]; KL=[0.1, 0.08, 0.05, 0.02, 0.01, 0.01]; XF=[1, 1, 1, 1, 1, 0.5]
          WaterBalance SoilWater: SummerDate=21-Sep; SummerU=6; SummerCona=3.5; WinterDate=23-Mar; WinterU=6; WinterCona=2.5; DiffusConst=88; DiffusSlope=35; Salb=0.2; CN2Bare=0.7; CNRed=20; CNCov=0.8; Thickness=[150, 150, 200, 250, 250, 500]; SWCON=[0.45, 0.35, 0.1, 0.15, 0.3, 0.2]
          SoilNitrogen: fom_types=[default, manure, mucuna, lablab, shemp, stable]; fract_carb=[0.2, 0.3, 0.54, 0.57, 0.45, 0]; fract_cell=[0.7, 0.3, 0.37, 0.37, 0.47, 0.1]; fract_lign=[0.1, 0.4, 0.09, 0.06, 0.08, 0.9]; NPartitionApproach=0
            SoilNitrogenNO3 NO3
            SoilNitrogenNH4 NH4
            SoilNitrogenUrea Urea
            SoilNitrogenPlantAvailableNO3 PlantAvailableNO3
            SoilNitrogenPlantAvailableNH4 PlantAvailableNH4
          Organic: FOMCNRatio=40
            Thickness  Carbon  SoilCNRatio  FBiom  FInert  FOM
            150        2.5     12           0.04   0.4     358.617
            150        1.25    12           0.025  0.6     265.67
            200        0.5     12           0.015  0.8     178.084
            250        0.2     12           0.01   0.9     108.013
            250        0.15    12           0.008  0.95    65.5135
            500        0.1     12           0.008  0.98    24.1011
          InitialWater Initial water: PercentMethod=1; FractionFull=0.9
          CERESSoilTemperature Temperature
        Plant Plantain
  Folder Simple Rotational Grazing Example
    Memo Simple Rotational Grazing Explained
      “Simple Rotational Grazing” is an example of a simple 5-paddock set-duration rotation.

      Stock are bought (see the Manager component “BuyStock”) as the simulation initialises and they remain in the simulation for the duration (not continually bought and sold). This component has a user input of the desired whole-farm stocking rate. It scans the simulation for all the paddocks and sums their areas to give the area of the whole farm and then buys sufficient head of stock to achieve the user input of stocking rate. The user also sets the type of stock to buy.

      The Manager component “TargetRotationLength” moves the stock between paddocks, optionally harvests unutilised herbage and also optionally feeds silage to the stock.

      The scripts provide examples of:

      * setting several commonly-needed stock characteristics
      * buying stock
      * finding out the current location of the stock
      * changing the location of the stock
      * feeding supplements based on a range of criteria
      * harvesting excess biomass
    Simulation A Simple Rotational Grazing
      Clock: Start=2001-07-01; End=2003-06-30
      Summary SummaryFile
      SoilArbitrator
      MicroClimate: a_interception=0; b_interception=0; c_interception=0; d_interception=0; soil_albedo=0.23; SoilHeatFluxFraction=0.4; MinimumHeightDiffForNewLayer=0; NightInterceptionFraction=0.5; ReferenceHeight=2
      Weather: FileName=%root%\Examples\WeatherFiles\lincoln.met
      Stock: RandSeed=9999
      Supplement: SpoilageTime=0
        Stores:
          Name                Stored  IsRoughage  DMContent  DMD   MEContent  CPConc  ProtDg  PConc   SConc   EEConc  ADIP2CP  AshAlk  MaxPassage
          fodder              0       true        0.85       0     0          0       0       0       0       0       0        0       0
          silage_highquality  0       true        1          0.85  12         0.16    0.7     0.0032  0.0024  0.02    0.06     0.6     0
      Manager BuyStock
        Genotype = Angus
        Sex = Castrate
        Age = 12
        Weight = 100
        Pregnant = 0
        Lactating = 0
        YoungNumber = 0
        YoungWt = 0
        StockingRate = 5
        NumStock = 0
```csharp
using Models.PMF.Interfaces;
using System.Diagnostics;
using Models.AgPasture;
using System.Linq;
using System.Collections.Generic;
using System.Collections;
using Models.Soils;
using Models.PMF;
using System.Xml.Serialization;
using APSIM.Shared.Utilities;
using Models.GrazPlan;
using Models.Utilities;
using Models.Core;
using Models;
using System;

namespace Models
{

    [Serializable]
    public class Script : Model
    {
        [Link] Clock clock;
        [Link] Stock stock;
        [Link] Supplement supplement;
        [Link] List<Zone> paddocks;
        [Link] ISummary summary;
        [Link] Simulation farm;
        [Link] List<IPlantDamage> forages = null;

        private int CurrentGroupNum = 1;    // animal group number
        private int CurrentLocationNum { get; set; }

        [Separator("Stock type info - these stock are bought at the start of the simulation")]

        [Description("Whole-farm stocking rate (head/ha): ")] 
        public double StockingRate { get; set; } 

        [Description("Stock: genotype (e.g. Small Merino, Angus, Friesian):")] 
        [Display(Values="GetGenotypes")]
        public string Genotype { get; set; }

        [Description("Stock: sex (Female, Male, Castrate):")] 
        public ReproductiveType Sex { get; set; }

        [Description("Stock: age (months):")] 
        public double Age { get; set; }

        [Description("Stock: weight (kg liveweight /head):")] 
        public double Weight { get; set; }

        [Description("Stock: fertility status (0 if non-pregnant or days since conception):")] 
        public int Pregnant { get; set; }

        [Description("Stock: lactation status (0 if non-lactating or days since parturition):")]
        public int Lactating { get; set; }

        [Description("Stock: number of unweaned young:")]
        public int YoungNumber { get; set; }

        [Description("Stock: weight of unweaned young:")] 
        public double YoungWt { get; set; }

		public int NumStock { get; set; }

        // Return a list of genotypes to the properties tab.
        public string[] GetGenotypes()
        {
            if (stock != null)
                return stock.Genotypes.Names.ToArray();
            return null;
        }

        [EventSubscribe("StartOfSimulation")]
        private void OnStartOfSimulation(object sender, EventArgs e)
        {

            //Debugger.Break();

            summary.WriteMessage(this, "Initialising the paddock information");

            NumStock = (int)(Math.Round(StockingRate * farm.Area, 0));

            BuyStock();
            summary.WriteMessage(this, "     Number of stock bought is " + NumStock);
            summary.WriteMessage(this, "     The number of animals has been rounded to " + NumStock + " from " + (StockingRate * farm.Area));
            summary.WriteMessage(this, "     The area of the whole farm is " + farm.Area + " ha");

        }

        public void BuyStock()
        {
            CurrentGroupNum = stock.NoGroups + 1;
            StockBuy purchase = new StockBuy();
            purchase.Genotype = Genotype;
            purchase.Number = NumStock;
            purchase.Sex = Sex;
            purchase.Age = Age;       // age in months
            purchase.Weight = Weight;  // live weight in kg
            purchase.UseTag = CurrentGroupNum + 1;
            purchase.MatedTo = purchase.Genotype;
            purchase.Pregnant = Pregnant;  // days pregnant, 0 = non pregnant, 1 = pregnant
            purchase.Lactating = Lactating;  // 0 for dry, 1 for lactating
            purchase.NumYoung = YoungNumber;
            purchase.YoungWt = YoungWt;

            stock.Buy(purchase);
        }

    }
}
```
      Manager TargetRotationLength
        DoVerbose = False
        InitialLocation = [Paddock01]
        TargetRotationLength = 20
        PostGrazingResidual = 1500
        PostCuttingResidual = 1000
        HarvestExcessHerbage = True
        SilageEveryDay = 0
        SilageOnPastureMass = 10
        TriggerPastureMass = 2000
        NumCows = 3
        pastLocationName =
        newLocationName =
        CurrentLocationNum = 0
        CurrentLocationName =
        NumPaddocks = 0
        StockingRate = 4
        SilageHarvested = 0
        listOfPaddockInfo =
```csharp
using System.Diagnostics;
using Models.AgPasture;
using System.Collections.Generic;
using System.Collections;
using Models.Soils;
using Models.PMF;
using System.Xml.Serialization;
using APSIM.Shared.Utilities;
using Models.GrazPlan;
using Models.Utilities;
using Models.Core;
using System;
using System.Linq;

namespace Models
{

    [Serializable]
    public class Script : Model
    {
        [Link] Clock Clock;
        [Link] Stock Cows;
        [Link] Supplement Supplement;
        [Link] Zone[] Paddocks;
        [Link] ISummary summary = null;
        [Link] Simulation Farm;

        //List<AgPasture.PastureSpecies> Pasture = new List<AgPasture.PastureSpecies>();

        [Serializable]
        public class PaddockInfo
        {
            public string paddockName;
            public double totalBiomass;
            public double harvestableBiomass;
            public int paddockNum;
            public double paddockArea;
        }

        [Description("Do verbose reporting from this script (tick for yes): ")] 
        public bool DoVerbose { get; set; }

        [Separator("Whole farm and initial location")]

        [Description("Initial location of the cows (paddock name):")] 
        [Display(Type=DisplayType.Model, ModelType=typeof(Zone))]
        public IModel InitialLocation { get; set; }

        [Separator("Settings for the rotation")]

        [Description("Target rotation length (days/paddock): ")] 
        public int TargetRotationLength { get; set; }

        [Description("Post-grazing residual to trigger pasture conservation (kgDM/ha): ")] 
        public double PostGrazingResidual { get; set; }

        [Description("Post-cutting residual (kgDM/ha): ")] 
        public double PostCuttingResidual { get; set; }

        [Description("Harvest excess herbage above residual when cows leave the paddock?: ")] 
        public bool HarvestExcessHerbage { get; set; }

        [Separator("Settings for supplementary feeding")]

        [Description("Baseline (i.e. every day) feeding of silage (kgDM/head/day): ")] 
        public double SilageEveryDay { get; set; }

        [Description("Low pre-grazing pasture mass feeding (additional to baseline) of silage (kgDM/head/day): ")] 
        public double SilageOnPastureMass { get; set; }

        [Description("Trigger pre-grazing pasture mass for the rule above (kgDM/ha): ")] 
        public double TriggerPastureMass { get; set; }

        public int NumCows { get; set; } // number of cows on the whole farm
        public string pastLocationName { get; set; }  // 
        public string newLocationName { get; set; }  // 
        public int CurrentLocationNum { get; set; }  // name of the paddock that the cows are currently in
        public string CurrentLocationName { get; set; }
        public int NumPaddocks { get; set; }
        public double StockingRate { get; set; } // [Description("Whole-farm stocking rate (head/ha): ")] 
        public double SilageHarvested { get; set; } // RAmount of silage harvested (kg DM /ha)

        //public double[] HarvestableBiomass { get; set; }

        private int group_count; // how many groups are there in the simulation
        private int g = 1;      // index to the groups of animals

        //private int DaysPerPaddock;
        private int DaysInThisPaddock;
        private bool MoveToday = false;
        public double BiomassInCurrentPaddock;

        public event BiomassRemovedDelegate BiomassRemoved;
        public List<PaddockInfo> listOfPaddockInfo { get; set; }


        [EventSubscribe("StartOfSimulation")]
        private void OnStartOfSimulation(object sender, EventArgs e)
        {
            summary.WriteMessage(this, "Initialising the paddock information");
            listOfPaddockInfo = new List<PaddockInfo>();
            CurrentLocationName = InitialLocation.Name;

            GetPaddockInfo();
            //HarvestableBiomass = Farm.

            NumCows = (int)(Math.Round(StockingRate * Farm.Area, 0));

            //SetInitialCowStuff();

            if (NumCows > 0)
                Cows.Move(CurrentLocationName);

            summary.WriteMessage(this, "     The number of animals has been rounded to " + NumCows + " from " + (StockingRate * Farm.Area));
            summary.WriteMessage(this, "     The animals will begin in " + CurrentLocationName + " which is paddock number " + CurrentLocationNum + " in the simulation");
            summary.WriteMessage(this, "     The area of the whole farm is " + Farm.Area + " ha");

            DaysInThisPaddock = -1;
            SilageHarvested = 0.0;
        }

        [EventSubscribe("DoManagement")]
        private void OnDoManagement(object sender, EventArgs e)
        {
            UpdatePaddockInfo();
            SilageHarvested = 0.0;

            // WTF is this?
            if ((Cows.LactatingAll > 2) && (Cows.NoSucklingAll > 0))
                WeanCalves();
            if ((Cows.LactatingAll > 4) && (Cows.LactatingAll < 6))
                SellCalves();

            MoveToday = false;
            // how many days in this paddock?  Ready to move?
            DaysInThisPaddock += 1;
            if (DaysInThisPaddock >= TargetRotationLength)
            {
                MoveToday = true;

                pastLocationName = CurrentLocationName;
                if (CurrentLocationNum < NumPaddocks - 1)
                {
                    CurrentLocationNum += 1;
                    newLocationName = listOfPaddockInfo[CurrentLocationNum].paddockName;
                }
                else
                {
                    CurrentLocationNum = 0;
                    newLocationName = listOfPaddockInfo[CurrentLocationNum].paddockName;
                }
                CurrentLocationName = listOfPaddockInfo[CurrentLocationNum].paddockName;


                if (HarvestExcessHerbage)
                {
                    foreach (Zone paddock in Paddocks)
                    {
                        if (paddock.Name == pastLocationName)
                        {
                            double pastPaddockBiomass = 0.0;
                            foreach (PastureSpecies plant in paddock.FindAllChildren<PastureSpecies>().OfType<IModel>().ToList())
                                pastPaddockBiomass += plant.AboveGroundWt;
                            if (pastPaddockBiomass > PostGrazingResidual)  //why the 250? Because don't harvest very small amounts ...
                            {
                                foreach (PastureSpecies plant in paddock.FindAllChildren<PastureSpecies>().OfType<IModel>().ToList())
                                {
                                    plant.RemoveBiomass(amount: (plant.AboveGroundWt / pastPaddockBiomass * PostCuttingResidual), type: "SetResidueAmount");  
                                	SilageHarvested += plant.AboveGroundWt / pastPaddockBiomass * PostCuttingResidual;
                                }


                            }
                        }
                    }
                }

                if (NumCows > 0)
                    Cows.Move(listOfPaddockInfo[CurrentLocationNum].paddockName);
                   
                if (DoVerbose)
                    summary.WriteMessage(this, "moving Stock to " + listOfPaddockInfo[CurrentLocationNum].paddockName);

                DaysInThisPaddock = 0;
            }

            if (SilageEveryDay > 0)
            {
            // see how much supplement there is - buy more if needed
            // Stores 1 is from a pasture component so bought supplements start at 2
                double silageOnHand = Supplement.Stores[2 - 1].Stored;
                if (silageOnHand < SilageEveryDay * Cows.NumberAll)
                {
                    Supplement.Buy(SilageEveryDay * 180 * Cows.NumberAll, "silage_highquality");  // i.e. 6 months worth
                    summary.WriteMessage(this, "SilageEveryDay: Buying silage_highquality of total amount : " + (SilageEveryDay * 180 * Cows.NumberAll) + " kg DM");
                }
                Supplement.Feed("silage_highquality", SilageEveryDay * Cows.NumberAll, CurrentLocationName, false);
            }

            if ((SilageOnPastureMass > 0) && (listOfPaddockInfo[CurrentLocationNum].harvestableBiomass < TriggerPastureMass))
            {
                double silageOnHand = Supplement.Stores[2 - 1].Stored;
                if (silageOnHand < SilageOnPastureMass * Cows.NumberAll)
                {
                    Supplement.Buy(SilageOnPastureMass * 180 * Cows.NumberAll, "silage_highquality");
                    summary.WriteMessage(this, "SilageOnPastureMass: Buying silage_highquality of total amount : " + (SilageOnPastureMass * 180 * Cows.NumberAll) + " kg DM");
                }
                Supplement.Feed("silage_highquality", SilageOnPastureMass * Cows.NumberAll, CurrentLocationName, false);
            }

            // capture the pre-grazing biomass before the DoStock event
            BiomassInCurrentPaddock = listOfPaddockInfo[CurrentLocationNum].harvestableBiomass;

        } // End of Do Management

        [EventSubscribe("DoReportCalculations")]
        private void DoManagementCalculations(object sender, EventArgs e)
        {
            //this is after Stock have eaten
            UpdatePaddockInfo();


        }

        public void WeanCalves()
        {
                Cows.Wean(Cows.NumberAll, weanMales:true, weanFemales:true);
        }

        public void SellCalves()
        {
            double weanAge = 0.25 * 365;

            Cows.SplitByAge(Convert.ToInt32(weanAge));

              foreach (var animalGroup in Cows.AnimalGroups)
              {
                  if (animalGroup.AgeDays < weanAge)
                      Cows.Sell(animalGroup.NoAnimals);
              }
        }


        public void GetPaddockInfo()
        {
            NumPaddocks = 0;
            CurrentLocationNum = 0;

            foreach (Zone paddock in Paddocks)
            {
                NumPaddocks += 1;

                PaddockInfo paddockInfo = new PaddockInfo();

                paddockInfo.paddockName = paddock.Name;
                paddockInfo.paddockNum = NumPaddocks - 1;
                paddockInfo.paddockArea = paddock.Area;

                foreach (PastureSpecies plant in paddock.FindAllChildren<PastureSpecies>().OfType<IModel>().ToList())
                {
                    paddockInfo.harvestableBiomass += plant.Harvestable.Wt;
                    paddockInfo.totalBiomass += plant.AboveGroundWt;
                }


                listOfPaddockInfo.Add(paddockInfo);

                if (paddock.Name == CurrentLocationName)
                    CurrentLocationNum = paddockInfo.paddockNum;

                summary.WriteMessage(this, "     Paddock " + NumPaddocks + " is called " + paddock.Name + ", has an area of " + paddock.Area + " ha and an initial harvestable biomass of " + paddockInfo.harvestableBiomass + " kg DM / ha");

            }

        }

        public void UpdatePaddockInfo()
        {
            int ii = -1;

            foreach (Zone paddock in Paddocks)
            {
                ii += 1;
                listOfPaddockInfo[ii].harvestableBiomass = 0.0;
                foreach (PastureSpecies plant in paddock.FindAllChildren<PastureSpecies>().OfType<IModel>().ToList())
                {
                    listOfPaddockInfo[ii].harvestableBiomass += plant.Harvestable.Wt;
                    listOfPaddockInfo[ii].totalBiomass += plant.AboveGroundWt;
                }

            }

        }


    }
}
```
      Report ReportFarm: EventNames=[Clock].EndOfDay
        VariableNames:
          [Clock].Today
          [TargetRotationLength].Script.CurrentLocationNum as CurrentLocNum
          [Stock].PastIntakeAll.Weight as IntakePast
          [Stock].SuppIntakeAll.Weight as IntakeSupp
          [Stock].IntakeAll.Weight as IntakePastSupp
          //[Stock].Paddock as StockInPaddockName
          [TargetRotationLength].Script.CurrentLocationNum as StockInPaddockNum
          [Stock].NumberAll
          [Stock].BaseWtAll
          [Stock].CondScoreAll
          [Stock].IntakeAll.Weight * [Stock].NumberAll as TotalIntake
          //([Paddock00].AGPRyegrass.HerbageGrowthWt + [Paddock00].AGPWhiteClover.HerbageGrowthWt) * [Paddock00].Area + ([Paddock01].AGPRyegrass.HerbageGrowthWt + [Paddock01].AGPWhiteClover.HerbageGrowthWt) * [Paddock01].Area + ([Paddock02].AGPRyegrass.HerbageGrowthWt + [Paddock02].AGPWhiteClover.HerbageGrowthWt) * [Paddock02].Area as TotalGrowth
          [Supplement].Stores[2].Stored
          [Stock].Paddock
          [TargetRotationLength].Script.SilageHarvested as SilageHarvested
      Memo Memo1
        These plots (working left to right and top to bottom) show:

        * The liveweight and condition score of the stock. By the end of the simulation the stock (Angus steers – see the BuyStock component) are reaching their mature liveweight and gains have levelled off. The blue shaded background shows the location of the stock at any time with different intensities of blue for different paddocks. Click and hold on the shading to see the location value.
        * The pasture intake (on a per head basis) and total intake. Total intake is greater than the pasture intake when there is silage supplementation.
        * The standing pasture biomass in each of the paddocks (the lines) with the head count of the stock as symbols. The decline in head count is because there are some deaths. The farm us under-stocked in the second year with paddocks accumulating high biomass values.
        * Growth rates in the paddocks and an accumulation of harvested silage
      Zone Paddock01: Area=10; Slope=0; AspectAngle=0; Altitude=50
        Irrigation
        Fertiliser
        SurfaceOrganicMatter: InitialResidueName=Sward; InitialResidueType=grass; InitialResidueMass=1000; InitialStandingFraction=0; InitialCPR=0; InitialCNR=15
        PastureSpecies AGPRyegrass: InitialShootDM=2100; InitialRootDM=450; InitialRootDepth=750
        PastureSpecies AGPWhiteClover: InitialShootDM=700; InitialRootDM=150; InitialRootDepth=350
        Soil LismoreSoil: SoilType=NZ_Sedimentary; LocalName=Lismore; Site=Winchmore; NearestTown=Ashburton; Region=Canterbury; Country=New Zealand; Latitude=-48.48; Longitude=0
          Chemical
            Thickness  NO3N  NH4N  PH
            150        5     0.1   6
            150        2.5   0.1   6
            200        1     0.1   6
            150        0.75  0.1   6
            250        0.5   0.1   6
            300        0.5   0.1   6
            300        0.5   0.1   6
          Physical
            Thickness  ParticleSizeClay  BD    AirDry  LL15   DUL    SAT   KS
            150        20                1.3   0.05    0.15   0.36   0.45  5000
            150        15                1.35  0.12    0.14   0.34   0.43  2500
            200        12                1     0.055   0.055  0.19   0.25  3000
            150        8                 0.53  0.015   0.015  0.065  0.15  10000
            250        6                 0.31  0.01    0.01   0.04   0.11  17500
            300        5                 0.3   0.01    0.01   0.03   0.11  20000
            300        5                 0.3   0.01    0.01   0.03   0.11  20000
            SoilCrop AGPRyegrassSoil: LL=[0.15, 0.14, 0.06, 0.02, 0.01, 0.01, 0.01]; KL=[0.1, 0.1, 0.08, 0.04, 0.01, 0, 0]; XF=[1, 1, 1, 1, 1, 0, 0]
            SoilCrop AGPWhiteCloverSoil: LL=[0.15, 0.14, 0.06, 0.02, 0.01, 0.01, 0.01]; KL=[0.1, 0.1, 0.08, 0.04, 0.01, 0, 0]; XF=[1, 1, 1, 1, 1, 0, 0]
          WaterBalance SoilWater: SummerDate=1-Nov; SummerU=6; SummerCona=3.5; WinterDate=1-apr; WinterU=2; WinterCona=2; DiffusConst=88; DiffusSlope=35; Salb=0.13; CN2Bare=73; CNRed=20; CNCov=0.8; DischargeWidth=0; CatchmentArea=0
            Thickness  SWCON  KLAT
            150        0.5    0
            150        0.52   0
            200        0.55   0
            150        0.6    0
            250        0.65   0
            300        0.65   0
            300        0.65   0
          SoilNitrogen: same as Agistment Grazing Example.Agistment Grazing.Field.Soil.SoilNitrogen
          Organic: FOMCNRatio=40
            Thickness  Carbon  SoilCNRatio  FBiom  FInert  FOM
            150        3       12           0.04   0.5     331.337
            150        1       12           0.02   0.7     245.461
            200        0.6     12           0.02   0.83    164.537
            150        0.4     12           0.01   0.9     121.892
            250        0.25    12           0.01   0.95    73.9313
            300        0.15    12           0      0.99    40.5743
            300        0.1     12           0      0.99    22.2677
          InitialWater Initial water: PercentMethod=1; FractionFull=0.95
          CERESSoilTemperature Temperature
        Report PdkReport: EventNames=[Clock].EndOfDay
          VariableNames:
            [Clock].Today
            [AGPRyegrass].AboveGroundWt + [AGPWhiteClover].AboveGroundWt as PaddockBiomass
            [AGPRyegrass].HerbageGrowthWt + [AGPWhiteClover].HerbageGrowthWt as PastureGrowthRate
            ([AGPRyegrass].HerbageGrowthWt + [AGPWhiteClover].HerbageGrowthWt) * [Zone].Area as PaddockFeedAccum  // why did I have this?
      Zone Paddock02: Area=10; Slope=0; AspectAngle=0; Altitude=50
        Irrigation
        Fertiliser
        SurfaceOrganicMatter: InitialResidueName=Sward; InitialResidueType=grass; InitialResidueMass=1000; InitialStandingFraction=0; InitialCPR=0; InitialCNR=15
        PastureSpecies AGPRyegrass: InitialShootDM=1950; InitialRootDM=450; InitialRootDepth=750
        PastureSpecies AGPWhiteClover: InitialShootDM=650; InitialRootDM=150; InitialRootDepth=350
        Soil LismoreSoil: same as Simple Rotational Grazing Example.A Simple Rotational Grazing.Paddock01.LismoreSoil
        Report PdkReport: same as Simple Rotational Grazing Example.A Simple Rotational Grazing.Paddock01.PdkReport
      Zone Paddock03: Area=10; Slope=0; AspectAngle=0; Altitude=50
        Irrigation
        Fertiliser
        SurfaceOrganicMatter: InitialResidueName=Sward; InitialResidueType=grass; InitialResidueMass=1000; InitialStandingFraction=0; InitialCPR=0; InitialCNR=15
        PastureSpecies AGPRyegrass: InitialShootDM=1800; InitialRootDM=450; InitialRootDepth=750
        PastureSpecies AGPWhiteClover: InitialShootDM=600; InitialRootDM=150; InitialRootDepth=350
        Soil LismoreSoil: same as Simple Rotational Grazing Example.A Simple Rotational Grazing.Paddock01.LismoreSoil
        Report PdkReport: same as Simple Rotational Grazing Example.A Simple Rotational Grazing.Paddock01.PdkReport
      Zone Paddock04: Area=10; Slope=0; AspectAngle=0; Altitude=50
        Irrigation
        Fertiliser
        SurfaceOrganicMatter: InitialResidueName=Sward; InitialResidueType=grass; InitialResidueMass=1000; InitialStandingFraction=0; InitialCPR=0; InitialCNR=15
        PastureSpecies AGPRyegrass: InitialShootDM=1650; InitialRootDM=450; InitialRootDepth=750
        PastureSpecies AGPWhiteClover: InitialShootDM=550; InitialRootDM=150; InitialRootDepth=350
        Soil LismoreSoil: same as Simple Rotational Grazing Example.A Simple Rotational Grazing.Paddock01.LismoreSoil
        Report PdkReport: same as Simple Rotational Grazing Example.A Simple Rotational Grazing.Paddock01.PdkReport
      Zone Paddock05: Area=10; Slope=0; AspectAngle=0; Altitude=50
        Irrigation
        Fertiliser
        SurfaceOrganicMatter: InitialResidueName=Sward; InitialResidueType=grass; InitialResidueMass=1000; InitialStandingFraction=0; InitialCPR=0; InitialCNR=15
        PastureSpecies AGPRyegrass: InitialShootDM=1500; InitialRootDM=450; InitialRootDepth=750
        PastureSpecies AGPWhiteClover: InitialShootDM=500; InitialRootDM=150; InitialRootDepth=350
        Soil LismoreSoil: same as Simple Rotational Grazing Example.A Simple Rotational Grazing.Paddock01.LismoreSoil
        Report PdkReport: same as Simple Rotational Grazing Example.A Simple Rotational Grazing.Paddock01.PdkReport
  Folder Wheat Feedlot Sheep Grazing Example
    Simulation WheatSheepFeedlot
      Memo
        **Sheep grazing wheat and fed in feedlot**

        In this example simulation sheep are bought and sold on specified date.
        They are fed supplement in a feedlot at a set rate, but graze a wheat crop when crop biomass >= 2.4 t/ha.
        Sheep are moved from the wheat crop and back to feedlot when crop biomass reaches 0.5 t/ha or crop zadok = 31.

        Based on _Sprague SJ, Kirkegaard JA, Dove H, Graham JM, McDonald SE, Kelman WM (2015) Integrating dual-purpose wheat and canola into high-rainfall livestock systems in south-eastern Australia. 1. Crop forage and grain yield. Crop and Pasture Science 66(4), 365-376._

        **Activities in this manager:**

        1. Buy animals at start of year & put in feedlot
        2. Move animals from feedlot to crop when ready to graze
        3. Move animals from crop to feedlot
        4. Shear all animals on specified date
        5. Sell all animals at end of year

        **NOTES**

        1. When the animals are in the feedlot and an animal dies during the day, the supplement has already been fed into the feedlot
           based on the number of animals in the feedlot at the start of the day. This means the remaining animals have access to slightly
           more supplement and causes a spike in supp intake graph.
        2. When sheep are culled for age + purchased to maintain stocking rate, several groups of sheep are created.
           This causes irregular amounts of supplement to be fed.
      Clock: Start=1992-01-01; End=1996-06-30
      Summary SummaryFile
      Weather: FileName=%root%\Examples\WeatherFiles\WaggaWagga.met
      SoilArbitrator
      Stock: RandSeed=9999
      Supplement: SpoilageTime=0
        Stores:
          Name            Stored  IsRoughage  DMContent  DMD  MEContent  CPConc  ProtDg  PConc   SConc   EEConc  ADIP2CP  AshAlk  MaxPassage
          fodder          0       true        0.85       0    0          0       0       0       0       0       0        0       0
          wheat, crushed  500     false       1          0.9  13.8       0.14    0.92    0.0038  0.0014  0.02    0.02     0.18    0
      Manager ManageStock
        Buying = True
        Genotype = Small Merino
        Sex = Female
        BuyDate = 1-Jan
        BuyAge = 12
        BuyWeight = 30
        BuyLactating = 0
        NumAntoBuy = 50
        Selling = True
        SaleFirstDate = 20-Dec
        SaleLastDate = 20-Dec
        SellPolicy = CulledForAge
        SaleAge = 36
        SaleWeight = -
        SalePercentAnimals = 100
        PaddockToMoveAnimalsTo = [WheatSheep]
        GrazingWindowStartDate = 1-Jan
        GrazingWindowEndDate = 31-Dec
        ExpressionToMoveAnimalsToField = Wheat.Phenology.Zadok > 0 && Wheat.Phenology.Zadok < 31 && Wheat.AboveGround.Wt >= 240
        ExpressionToMoveAnimalsToFeedlot = Wheat.Phenology.Zadok >= 31 || Wheat.AboveGround.Wt <= 50
        ShearDate = 15-dec
        Dummy =
        NumberSold = 0
        EventName =
        CurrentLocation =
```csharp
/*-------------------------------------------------------------------------------------
Sheep grazing wheat when conditions are suitable, and in feedlot the rest of the time.
---------------------------------------------------------------------------------------

In this script animals are bought and sold within a specified date window.
They are fed supplement in a feedlot at a set rate, but graze a wheat crop when a criteria is met.
Animals are moved from the wheat crop and back to feedlot when a second criteria is met.

Based on Sprague SJ, Kirkegaard JA, Dove H, Graham JM, McDonald SE, Kelman WM (2015) Integrating dual-purpose wheat and canola into high-rainfall livestock systems in south-eastern Australia. 1. Crop forage and grain yield. Crop and Pasture Science 66(4), 365-376. 

Activities in this manager:
1. Buy animals at start of year & put in feedlot
2. Move animals from feedlot to crop when ready to graze
3. Move animals from crop to feedlot 
4. Shear all animals on specified date
5. Sell all animals at end of year

NOTES
1. When the animals are in the feedlot and an animal dies during the day, the supplement has already been fed into the feedlot
   based on the number of animals in the feedlot at the start of the day. This means the remaining animals have access to slightly
   more supplement and causes a spike in supp intake graph
2. When sheep are culled for age + purchased to maintain stocking rate, several groups of sheep are created.
   This causes irregular amounts of supplement to be fed.
--------------------------------------------------------------------------------------*/


using System.Linq;
using System;
using System.Collections.Generic;
using Models.Core;
using Models.PMF;
using Models.Functions;
using Models.Soils;
using Models.Utilities;
using Models.GrazPlan;
using APSIM.Shared.Utilities;
using System.Diagnostics;

namespace Models
{
    [Serializable]
    [Description(
        "<p><b>Animals grazing a crop when conditions are suitable, and in feedlot the rest of the time.</b></p>" +
        "In this script animals are bought and sold within a specified date window. " +
        "They are fed supplement in a feedlot at a set rate, but graze a wheat crop when a criteria is met. " +
        "Animals are moved from the wheat crop and back to feedlot when a second criteria is met.")]    
    public class Script : Model
    {
        [Link] Clock clock;
        [Link] Stock Animals;
        [Link] Supplement Feed;
        [Link] Summary Summary;
        [Link] IPlant plant;
        [Link] Soil Soil;
        [Link] Zone Paddock;
        [Link] ScriptCompiler compiler;

        private CSharpExpressionFunction expressionMoveAnimalsToField;
        private CSharpExpressionFunction expressionMoveAnimalsToFeedlot;

        public enum SellPolicyType
        {
            Date,
            PercentageHerdWhenAverageWeightGreaterThan,
            PercentageHerdWhenAverageAgeGreaterThan,
            CulledForAge,
            CulledForWeight,
            SellYoung
        }

        ////////////////////////////////////////////////////////
        [Separator("Buying of animals")]

        [Description("Buy animals?")] 
        public bool Buying { get; set; }

        [Description("Stock: genotype (e.g. Small Merino, Angus, Friesian):")] 
        [Display(Values = "GetGenotypes")]
        public string Genotype { get; set; }

        [Description("Stock: sex (Female, Male, Castrate):")] 
        public ReproductiveType Sex { get; set; }

        [Description("Date to buy animals (dd-mmm)")] 
        [Display(EnabledCallback = "BuyingEnabled")]
        public string BuyDate { get; set; }

        [Description("Age of bought animals (months): ")] 
        [Display(EnabledCallback = "BuyingEnabled")]
        public double BuyAge { get; set; }

        [Description("Weight of bought animals (kg): ")] 
        [Display(EnabledCallback = "BuyingEnabled")]
        public double BuyWeight { get; set; }

        [Description("Zero denotes not lactating; 1 or more denotes the time (days) since parturition:")] 
        [Display(EnabledCallback = "BuyingEnabled")]
        public int BuyLactating { get; set; }

        [Description("Number of animals to buy: ")] 
        [Display(EnabledCallback = "BuyingEnabled")]
        public int NumAntoBuy { get; set; }

        ////////////////////////////////////////////////////////
        [Separator("Selling of animals")]

        [Description("Selling animals?")] 
        public bool Selling { get; set; }

        [Description("First date to consider selling animals (dd-mmm)")] 
        public string SaleFirstDate { get; set; }

        [Description("Last date to consider selling animals (dd-mmm)")] 
        public string SaleLastDate { get; set; }

        [Description("Selling policy ")] 
        [Display(EnabledCallback = "SellingEnabled")]
        public SellPolicyType SellPolicy { get; set; }

        [Description("Age at which to sell (months): ")] 
        [Display(EnabledCallback = "SellingAgeEnabled")]
        public int SaleAge { get; set; }

        [Description("Weight at which to sell (kg): ")] 
        [Display(EnabledCallback = "SellingWeightEnabled")]
        public double SaleWeight { get; set; }

        [Description("Percentage of animals to sell (%)")] 
        [Display(EnabledCallback = "SellingEnabled")]
        public double SalePercentAnimals { get; set; }

        ////////////////////////////////////////////////////////
        [Separator("Rule for moving animals into and out of paddock")]

        [Description("Name of paddock to move animals in to:")] 
        [Display(Type = DisplayType.Model, ModelType = typeof(Zone))]
        public IModel PaddockToMoveAnimalsTo { get; set; }

        [Description("First date to consider moving animals:")] 
        public string GrazingWindowStartDate { get; set; }

        [Description("Last date to consider moving animals:")] 
        public string GrazingWindowEndDate { get; set; }

        [Description("Criteria to move animals to field")]
        public string ExpressionToMoveAnimalsToField { get; set; }

        [Description("Criteria to move animals to feedlot")]
        public string ExpressionToMoveAnimalsToFeedlot { get; set; }


        ////////////////////////////////////////////////////////
        [Separator("Shearing")]
        [Description("Date to shear animals (dd-mmm)")] 
        public string ShearDate { get; set; }

        [Description(" ")] 
        public string Dummy { get; set; }

        ////////////////////////////////////////////////////////////////////////////
        // Callback properties to control disabling of properties.
        ////////////////////////////////////////////////////////////////////////////
        public bool BuyingEnabled { get { return Buying; } }

        public bool SellingEnabled { get { return Selling; } }

        public bool SellingAgeEnabled
        { 
            get
            { 
                return Selling &&
                (SellPolicy == SellPolicyType.PercentageHerdWhenAverageAgeGreaterThan || SellPolicy == SellPolicyType.CulledForAge);
            } 
        }

        public bool SellingWeightEnabled
        { 
            get
            { 
                return Selling &&
                (SellPolicy == SellPolicyType.PercentageHerdWhenAverageWeightGreaterThan || SellPolicy == SellPolicyType.CulledForWeight);
            } 
        }

        ////////////////////////////////////////////////////////////////////////////
        // Outputs
        ////////////////////////////////////////////////////////////////////////////
        // <summary>Number of animals sold.</summary>
        public int NumberSold { get; set; }

        // <summary>Description of something that has happened.</summary>
        public string EventName { get; set; }

        // <summary>Return a list of genotypes to the properties tab.</summary>
        public string[] GetGenotypes()
        {
            if (Animals != null)
                return Animals.Genotypes.Names.ToArray();
            return null;
        }

        public string CurrentLocation { get; set; }  // location of the sheep



        // ============================================================
        // Called once at beginning of simulation run
        // ============================================================
        [EventSubscribe("StartOfSimulation")]
        private void OnStartOfSimulation(object sender, EventArgs e)
        {
            if (string.IsNullOrEmpty(ExpressionToMoveAnimalsToField))
                throw new Exception("You must specify a criteria for moving animals to the field");
            expressionMoveAnimalsToField = new CSharpExpressionFunction();
            expressionMoveAnimalsToField.Parent = this;
            expressionMoveAnimalsToField.Expression = "Convert.ToDouble(" + ExpressionToMoveAnimalsToField + ")";
            expressionMoveAnimalsToField.SetCompiler(compiler);
            expressionMoveAnimalsToField.CompileExpression();

            if (string.IsNullOrEmpty(ExpressionToMoveAnimalsToFeedlot))
                throw new Exception("You must specify a criteria for moving animals to the feedlot");
            expressionMoveAnimalsToFeedlot = new CSharpExpressionFunction();
            expressionMoveAnimalsToFeedlot.Parent = this;
            expressionMoveAnimalsToFeedlot.Expression = "Convert.ToDouble(" + ExpressionToMoveAnimalsToFeedlot + ")";
            expressionMoveAnimalsToFeedlot.SetCompiler(compiler);
            expressionMoveAnimalsToFeedlot.CompileExpression();

            CurrentLocation = "";
        }



        // ============================================================
        // Management that happens every day.
        // ============================================================
        [EventSubscribe("DoManagement")]
        private void OnDoManagement(object sender, EventArgs e)
        {
            EventName = string.Empty;

            // Buy animals
            if (Buying && DateUtilities.DatesAreEqual(BuyDate, clock.Today))
            {
                var purchase = new StockBuy();
                purchase.Genotype = Genotype;   // "small merino"
                purchase.Number = NumAntoBuy;
                purchase.Sex = Sex;               // "wethers"
                purchase.Age = BuyAge;
                purchase.Weight = BuyWeight;
                purchase.Lactating = BuyLactating;
                Animals.Buy(purchase);
                Animals.Move("Feedlot");
                EventName = NumAntoBuy + " animals bought";

                CurrentLocation = "Feedlot";
            }

            // Sell animals
            if (SellingEnabled && DateUtilities.WithinDates(SaleFirstDate, clock.Today, SaleLastDate))
            { 
                if (SellPolicy == SellPolicyType.PercentageHerdWhenAverageWeightGreaterThan || 
                    SellPolicy == SellPolicyType.PercentageHerdWhenAverageAgeGreaterThan)
                {
                    bool doSell = false;
                    if (SellPolicy == SellPolicyType.Date)
                        doSell = true;
                    else if (SellPolicy == SellPolicyType.PercentageHerdWhenAverageWeightGreaterThan && Animals.WeightAll >= SaleWeight)
                        doSell = true;
                    else if (SellPolicy == SellPolicyType.PercentageHerdWhenAverageAgeGreaterThan && Animals.AgeMonthsAll >= SaleAge)
                        doSell = true;

                    if (doSell)
                    {
                        NumberSold = Convert.ToInt32(Animals.NumberAll * SalePercentAnimals / 100.0);
                        Animals.Sell(NumberSold);
                        EventName = NumberSold + " animals sold";
                    }
                }
                else
                {
                    IEnumerable<AnimalGroup> animalsToSell = null;
                    if (SellPolicy == SellPolicyType.CulledForAge)
                    {
                        // split older animals into a new group
                        animalsToSell = Animals.SplitByAge(Convert.ToInt32(SaleAge * 30)); // months to days
                    }
                    else if (SellPolicy == SellPolicyType.CulledForWeight)
                    {
                        // split heavier animals into a new group
                        animalsToSell = Animals.SplitByWeight(SaleWeight);
                    }
                    else if (SellPolicy == SellPolicyType.SellYoung)
                    {
                        // split young (offspring) into new groups
                        animalsToSell = Animals.SplitByYoung();
                    }
                    if (animalsToSell != null)
                    {
                        var numberSellableAnimals = animalsToSell.Sum(g => g.NoAnimals);
                        var numberAnimalsToSell = Convert.ToInt32(numberSellableAnimals * SalePercentAnimals / 100.0);
                        if (numberAnimalsToSell > 0)
                            Animals.Sell(numberAnimalsToSell, animalsToSell);
                    }
                }
            }


            // Determine whether the animals are in the feedlot.
            bool animalsAreInFeedlot = Animals.AnimalGroups.FirstOrDefault(group => group.PaddOccupied.Name == "Feedlot") != null;
            bool inGrazingWindow = DateUtilities.WithinDates(GrazingWindowStartDate, clock.Today, GrazingWindowEndDate);

            if (animalsAreInFeedlot)
            {
                   // Animals are in feedlot. Determine if they can be moved to paddock.
                if (inGrazingWindow && expressionMoveAnimalsToField.Value() == 1)
                {
                    Animals.Move(PaddockToMoveAnimalsTo.Name);
                    EventName = "Animals moved to paddock";
                    CurrentLocation = "Paddock";
                }
            }
            else
            {
                // Animals are in paddock. Determine if they need to be moved to feedlot.
                if (!inGrazingWindow || expressionMoveAnimalsToFeedlot.Value() == 1)
                {
                    Animals.Move("Feedlot");
                    CurrentLocation = "Feedlot";
                    EventName = "Animals moved to feedlot";
                }
            }

            // Shear all animals on specified date
            if (DateUtilities.DatesEqual(ShearDate, clock.Today))
            {
                Animals.Shear(shearAdults: true, shearYoung: true);
                EventName = "Animals shorn";
            }
        }
    }
}
```
      Manager ManageSupplement
        FeedlotZone = [Feedlot]
        SupplementAmount = 0.5
        SupplementType = wheat, crushed
        SupplementMinAmount = 500
        SupplementMaxAmount = 5000
```csharp
using APSIM.Shared.Utilities;
using Models.GrazPlan;
using Models.Utilities;
using Models.Soils;
using Models.PMF;
using Models.Core;
using System;
using System.Linq;

namespace Models
{
    [Description(
    "<b>Supplement store management.</b>" +
    "<li> When animals are in feedlot, they are fed a set amount each day.</li>" +
    "<li> Will restock the supplement store when the store reaches a minimum level.</li>"
    )]
    [Serializable]
    public class ManageSupplement : Model
    {
        [Link] Clock clock;
        [Link] Stock animals;
        [Link] Supplement supplement;

        [Description("Name of zone representing the feedlot")]
        [Display(Type=DisplayType.Model, ModelType=typeof(Zone))]
        public IModel FeedlotZone { get; set; }

        [Description("The amount of supplement to feed each animal each day (kg DM /head /day)")]
        public double SupplementAmount { get; set; }

        [Description("The type of supplement to feed the animals")]
        public string SupplementType { get; set; }

        [Description("Amount of supplement remaining before the store is replenished - i.e. to trigger a buy supplement event (kg DM)")]
        public double SupplementMinAmount { get; set; }

        [Description("Maximum supplement store - top up the store to this value when buying (kg DM)")]
        public double SupplementMaxAmount { get; set; }

        // ============================================================
        // Called every day to perform management actions
        // ============================================================
        [EventSubscribe("DoManagement")]
        private void OnDoManagement(object sender, EventArgs e)
        {
            // Determine how many animals are in feedlot.
            var animalGroupsInFeedlot = animals.AnimalGroups.Where(group => group.PaddOccupied.Name == FeedlotZone.Name);
            var totalNumAnimalsInFeedlot = animalGroupsInFeedlot.Sum(group => group.NoAnimals);

            // If there are animals in feedlot then feed them.
            if (totalNumAnimalsInFeedlot > 0)
                supplement.Feed(SupplementType, SupplementAmount * totalNumAnimalsInFeedlot, FeedlotZone.Name);     

            // Restock the supplement store if amount falls below SupplementMinAmount kg DM
            if (supplement.Stores[1].Stored <= SupplementMinAmount)       
                supplement.Buy(SupplementMaxAmount - supplement.Stores[1].Stored, SupplementType);
        }
    }
}
```
      Report ReportStock: EventNames=[Clock].EndOfDay
        VariableNames:
          [Clock].Today
          [ManageStock].Script.CurrentLocation as CurrentLocation
          [Stock].NumberAll as TotalHeadCount
          [Stock].NumberAll / [WheatSheep].Area as Stockrate //(sheep/ha)
          [Stock].Weight as SheepWeight // (kg)
          [Stock].AgeMonths as SheepAgeMonths //(month)
          [Stock].NoGroups
          [Stock].SuppIntakeAll.Weight as IntakeOfSupplementOnFeedlot
          [Stock].PastIntakeAll.Weight as IntakeOfWheatOnPaddock
          [Stock].PastIntakeAll.Weight * [Stock].NumberAll as BiomassRemovedBySheep
          [Supplement].stores[2].Stored as SupplementStored // (kg)
      Report ReportBiomass: EventNames=[Clock].EndOfDay
        VariableNames:
          [Clock].Today
          [ManageStock].Script.CurrentLocation as CurrentLocation
          [WheatSheep].Wheat.AboveGround.Wt*10 as TotalBiomass
          [WheatSheep].Wheat.Grain.Wt*10 as TotalYield
          [WheatNotGrazed].Wheat.AboveGround.Wt*10 as TotalBiomassUngrazed
          [WheatNotGrazed].Wheat.Grain.Wt*10 as TotalYieldUngrazed
          [WheatSheep].Wheat.Phenology.Zadok.Stage as Zadok
      Zone WheatSheep: Area=1; Slope=0; AspectAngle=0; Altitude=50
        Fertiliser
        Soil: ASCOrder=Podzolic; SoilType=?; Site=Canberra; NearestTown=Canberra; Region=Gungahlin District; State=Australian Capital Territory; Country=Australia; ApsoilNumber=580-YP; Latitude=-35.201; Longitude=149.082
          DataSource=YP. Ginnenderra Experiment Station (GES). Data provided by James Hunt, based on measurements by John Kirkegaard, characterisation done by Julianne Lilley. Ginnenderra Experiment Station
          Physical
            Thickness  BD    AirDry  LL15   DUL   SAT
            100        1.42  0.04    0.059  0.21  0.408
            100        1.42  0.04    0.064  0.21  0.408
            200        1.48  0.05    0.085  0.21  0.427
            100        1.48  0.06    0.114  0.21  0.427
            200        1.48  0.08    0.13   0.21  0.427
            100        1.48  0.08    0.137  0.21  0.427
            200        1.48  0.09    0.141  0.21  0.427
            300        1.48  0.11    0.15   0.21  0.427
            300        1.48  0.11    0.161  0.21  0.427
            200        1.48  0.11    0.174  0.21  0.427
            200        1.48  0.11    0.174  0.21  0.427
            SoilCrop WheatSoil
              LL=[0.059, 0.064, 0.085, 0.114, 0.13, 0.137, 0.141, 0.15, 0.161, 0.174, 0.174]
              KL=[0.08, 0.08, 0.06, 0.05, 0.04, 0.03, 0.03, 0.02, 0.02, 0.01, 0.01]
              XF=[1, 1, 1, 1, 1, 1, 1, 1, 0.7, 0.4, 0]
          WaterBalance SoilWater: SummerDate=1-Nov; SummerU=6; SummerCona=2; WinterDate=1-Apr; WinterU=2; WinterCona=2; DiffusConst=88; DiffusSlope=35.4; Salb=0.13; CN2Bare=72; CNRed=20; CNCov=0.8; Thickness=[100, 100, 200, 100, 200, 100, 200, 300, 300, 200, 200]; SWCON=[0.8, 0.8, 0.8, 0.8, 0.8, 0.8, 0.8, 0.8, 0.6, 0.6, 0.6]
          SoilNitrogen: same as Agistment Grazing Example.Agistment Grazing.Field.Soil.SoilNitrogen
          Organic: FOMCNRatio=80
            Thickness  Carbon  SoilCNRatio  FBiom  FInert  FOM
            100        2.2     10           0.06   0       671.213
            100        0.5     10           0.05   0       577.718
            200        0.3     10           0.03   0.3     427.984
            100        0.2     10           0.02   0.4     368.37
            200        0.2     10           0.02   0.5     272.895
            100        0.15    10           0.01   0.6     234.883
            200        0.15    10           0.01   0.8     174.005
            300        0.1     10           0.01   0.9     110.951
            300        0.08    10           0.01   1       70.7453
            200        0.06    10           0.01   1       52.4094
            200        0.04    10           0.01   1       38.8259
          Chemical
            Thickness  NO3N      NH4N       PH
            100        0.377074  0.0377074  5.1
            100        0.377074  0.0377074  5.1
            200        0.377074  0.0377074  5.3
            100        0.377074  0.0377074  5.3
            200        0.377074  0.0377074  5.9
            100        0.377074  0.0377074  5.9
            200        0.377074  0.0377074  6.4
            300        0.377074  0.0377074  6.4
            300        0.377074  0.0377074  6.8
            200        0.377074  0.0377074  6.8
            200        1         0.2        6.8
          InitialWater: PercentMethod=0; FractionFull=1
          CERESSoilTemperature Temperature
        SurfaceOrganicMatter: InitialResidueName=wheat_stubble; InitialResidueType=wheat; InitialResidueMass=500; InitialStandingFraction=0; InitialCPR=0; InitialCNR=100
        Plant Wheat
        MicroClimate: a_interception=0; b_interception=1; c_interception=0; d_interception=0; soil_albedo=0.3; SoilHeatFluxFraction=0.4; MinimumHeightDiffForNewLayer=0; NightInterceptionFraction=0.5; ReferenceHeight=2
        Manager SowingRule
          StartDate = 1-mar
          EndDate = 30-mar
          MinESW = 0
          MinRain = 0
          RainDays = 0
          CultivarName = MacKellar
          SowingDepth = 30
          RowSpacing = 180
          Population = 200
```csharp
using Models.Interfaces;
using APSIM.Shared.Utilities;
using Models.Utilities;
using Models.Soils;
using Models.PMF;
using Models.Core;
using System;
using Models.Climate;

namespace Models
{
    [Serializable]
    public class Script : Model
    {
        [Link] private Clock Clock;
        [Link] private Fertiliser Fertiliser;
        [Link] private Summary Summary;
        [Link] private Plant Wheat;
        [Link] private Soil Soil;
        private Accumulator accumulatedRain;
        [Link]
        private ISoilWater waterBalance;
        
        [Description("Start of sowing window (d-mmm)")]
        public string StartDate { get; set;}
        [Description("End of sowing window (d-mmm)")]
        public string EndDate { get; set;}
        [Description("Minimum extractable soil water for sowing (mm)")]
        public double MinESW { get; set;}
        [Description("Accumulated rainfall required for sowing (mm)")]
        public double MinRain { get; set;}
        [Description("Duration of rainfall accumulation (d)")]
        public int RainDays { get; set;}
        [Description("Cultivar to be sown")]
        [Display(Type=DisplayType.CultivarName)]
        public string CultivarName { get; set;}
        [Description("Sowing depth (mm)")]
        public double SowingDepth { get; set;}        
        [Description("Row spacing (mm)")]
        public double RowSpacing { get; set;}    
        [Description("Plant population (/m2)")]
        public double Population { get; set;}    
        
        
        [EventSubscribe("StartOfSimulation")]
        private void OnSimulationCommencing(object sender, EventArgs e)
        {
            accumulatedRain = new Accumulator(this, "[Weather].Rain", RainDays);
        }
        

        [EventSubscribe("DoManagement")]
        private void OnDoManagement(object sender, EventArgs e)
        {
            accumulatedRain.Update();
            
            if (DateUtilities.WithinDates(StartDate,Clock.Today,EndDate) &&
                !Wheat.IsAlive &&
                MathUtilities.Sum(waterBalance.ESW) > MinESW &&
                accumulatedRain.Sum > MinRain)
            {
               Wheat.Sow(population:Population, cultivar:CultivarName, depth:SowingDepth, rowSpacing:RowSpacing);    
            }
        
        }
        
    }
}
```
        Manager SowingFertiliser
          Amount = 130
          CropName = wheat
```csharp
using Models.PMF;
using Models.Core;
using System;
namespace Models
{
    [Serializable]
    public class Script : Model
    {
        [Link] Clock Clock;
        [Link] Fertiliser Fertiliser;
        [Link] Summary Summary;
        
        
        [Description("Amount of fertiliser to be applied (kg/ha)")]
        public double Amount { get; set;}
        
        [Description("Crop to be fertilised")]
        public string CropName { get; set;}
        
        
        

        [EventSubscribe("Sowing")]
        private void OnSowing(object sender, EventArgs e)
        {
            Model crop = sender as Model;
            if (crop.Name.ToLower()==CropName.ToLower())
                Fertiliser.Apply(Amount: Amount, Type: Fertiliser.Types.NO3N);
        }
        
    }
}
```
        Manager Harvest
```csharp
using APSIM.Shared.Utilities;
using Models.Utilities;
using Models.Soils;
using Models.PMF;
using Models.Core;
using System;

namespace Models
{
    [Serializable]
    public class Script : Model
    {
        [Link] Plant Wheat;

        [EventSubscribe("DoManagement")]
        private void OnDoManagement(object sender, EventArgs e)
        {
            if (Wheat.IsReadyForHarvesting)
            {
               Wheat.Harvest();
               Wheat.EndCrop();    
            }
        
        }
        
    }
}
```
      Zone Feedlot: Area=10; Slope=0; AspectAngle=0; Altitude=50
        Soil: same as Wheat Feedlot Sheep Grazing Example.WheatSheepFeedlot.WheatSheep.Soil
        SurfaceOrganicMatter: InitialResidueName=wheat_stubble; InitialResidueType=wheat; InitialResidueMass=0; InitialStandingFraction=0; InitialCPR=0; InitialCNR=100
        MicroClimate: a_interception=0; b_interception=1; c_interception=0; d_interception=0; soil_albedo=0.3; SoilHeatFluxFraction=0.4; MinimumHeightDiffForNewLayer=0; NightInterceptionFraction=0.5; ReferenceHeight=2
        Report: VariableNames=[Clock].Today
      Zone WheatNotGrazed: same as Wheat Feedlot Sheep Grazing Example.WheatSheepFeedlot.WheatSheep
      Memo Memo1
        These plots (working left to right and top to bottom) show:

        * The background colour shows the total head count while the two lines show the age of the stock in each group. Because the sheep are bought at 12 months and culled for age at 36 months (see the ManageStock component) there are two groups of sheep. Stock automatically manages groups so when you report characteristics of a particular group through a simulation you cannot guarantee that you are reporting about the same animals. Here when the sheep in group 1 are sold at 36 months of age at the end of 1993, the sheep previously in group 2 (the sheep bought at 12 months of age at the start of 1993) then become group 1. This is a point to be wary of when reporting from more complex stock management simulations. Tags (see the main documentation) can assist here.
        * This plot shows the liveweight of the two groups against a background of their location.
        * The yellow area shows the biomass of the wheat in the ungrazed paddock while the lines show the biomass of the grazed wheat and (on the right axis) the daily intake of the sheep while on the wheat crop.
        * The yellow area in the background shows the grain yield of the wheat in the ungrazed paddock while the line shows the yield of the grazed wheat. The background shows the location of the sheep. Note that there was no yield in 1995.
        * Feed intake per head per day and type of feed.
        * Remaining supplement stores against a background of the location of the sheep.
  Folder TagsExample
    Simulation UsingTags
      Memo: same as Wheat Feedlot Sheep Grazing Example.WheatSheepFeedlot.Memo
      Clock: Start=1992-01-01; End=1996-06-30
      Summary SummaryFile
      Weather: FileName=C:\aaUnderVC\apsimNextGen\Examples\WeatherFiles\lincoln.met
      SoilArbitrator
      Stock: RandSeed=9999
      Supplement: same as Wheat Feedlot Sheep Grazing Example.WheatSheepFeedlot.Supplement
      Manager ManageStockUsingTags
        Buying = True
        Genotype = Small Merino
        Sex = Female
        BuyDate = 1-Jan
        BuyAge = 12
        BuyWeight = 30
        BuyLactating = 0
        NumAntoBuy = 200
        Selling = True
        SaleFirstDate = 20-Dec
        SaleLastDate = 20-Dec
        SellPolicy = CulledForAge
        PaddockToMoveAnimalsTo = [Pasture]
        GrazingWindowStartDate = 1-Jan
        GrazingWindowEndDate = 31-Dec
        ExpressionToMoveAnimalsToField = (AGPRyegrass.AboveGroundWt + AGPWhiteClover.AboveGroundWt)  >= 2200
        ExpressionToMoveAnimalsToFeedlot = (AGPRyegrass.AboveGroundWt + AGPWhiteClover.AboveGroundWt)  <= 1500
        ShearDate = 15-dec
        Dummy =
        NumberSold = 0
        EventName =
        CurrentLocation =
```csharp
/*-------------------------------------------------------------------------------------
TBA
---------------------------------------------------------------------------------------


--------------------------------------------------------------------------------------*/


using System.Linq;
using System;
using System.Collections.Generic;
using Models.Core;
using Models.PMF;
using Models.Functions;
using Models.Soils;
using Models.Utilities;
using Models.GrazPlan;
using APSIM.Shared.Utilities;
using System.Diagnostics;

namespace Models
{
    [Serializable]
    [Description(
        "<p><b>An example of managing stock using tags.</b></p>")]    
    public class Script : Model
    {
        [Link] Clock clock;
        [Link] Stock Animals;
        [Link] Supplement Feed;
        [Link] Summary Summary;
        [Link] IPlant plant;
        [Link] Soil Soil;
        [Link] Zone Paddock;
        [Link] ScriptCompiler compiler;

        private CSharpExpressionFunction expressionMoveAnimalsToField;
        private CSharpExpressionFunction expressionMoveAnimalsToFeedlot;

        public enum SellPolicyType
        {
            Date,
            PercentageHerdWhenAverageWeightGreaterThan,
            PercentageHerdWhenAverageAgeGreaterThan,
            CulledForAge,
            CulledForWeight,
            SellYoung
        }

        ////////////////////////////////////////////////////////
        [Separator("Buying of animals")]

        [Description("Buy animals and assign a tag of the year bought?")] 
        public bool Buying { get; set; }

        [Description("Stock: genotype (e.g. Small Merino, Angus, Friesian):")] 
        [Display(Values = "GetGenotypes")]
        public string Genotype { get; set; }

        [Description("Stock: sex (Female, Male, Castrate):")] 
        public ReproductiveType Sex { get; set; }

        [Description("Date to buy animals (dd-mmm)")] 
        [Display(EnabledCallback = "BuyingEnabled")]
        public string BuyDate { get; set; }

        [Description("Age of bought animals (months): ")] 
        [Display(EnabledCallback = "BuyingEnabled")]
        public double BuyAge { get; set; }

        [Description("Weight of bought animals (kg): ")] 
        [Display(EnabledCallback = "BuyingEnabled")]
        public double BuyWeight { get; set; }

        [Description("Zero denotes not lactating; 1 or more denotes the time (days) since parturition:")] 
        [Display(EnabledCallback = "BuyingEnabled")]
        public int BuyLactating { get; set; }

        [Description("Number of animals to buy: ")] 
        [Display(EnabledCallback = "BuyingEnabled")]
        public int NumAntoBuy { get; set; }

        ////////////////////////////////////////////////////////
        [Separator("Selling of animals")]

        [Description("Sell animals that were bought the previous year?")] 
        public bool Selling { get; set; }

        [Description("First date to consider selling animals (dd-mmm)")] 
        public string SaleFirstDate { get; set; }

        [Description("Last date to consider selling animals (dd-mmm)")] 
        public string SaleLastDate { get; set; }

        [Description("Selling policy ")] 
        [Display(EnabledCallback = "SellingEnabled")]
        public SellPolicyType SellPolicy { get; set; }

        /*[Description("Age at which to sell (months): ")] 
        [Display(EnabledCallback = "SellingAgeEnabled")]
        public int SaleAge { get; set; }

        [Description("Weight at which to sell (kg): ")] 
        [Display(EnabledCallback = "SellingWeightEnabled")]
        public double SaleWeight { get; set; }

        [Description("Percentage of animals to sell (%)")] 
        [Display(EnabledCallback = "SellingEnabled")]
        public double SalePercentAnimals { get; set; } */

        ////////////////////////////////////////////////////////
        [Separator("Rule for moving animals into and out of paddock")]

        [Description("Name of paddock to move animals in to:")] 
        [Display(Type = DisplayType.Model, ModelType = typeof(Zone))]
        public IModel PaddockToMoveAnimalsTo { get; set; }

        [Description("First date to consider moving animals:")] 
        public string GrazingWindowStartDate { get; set; }

        [Description("Last date to consider moving animals:")] 
        public string GrazingWindowEndDate { get; set; }

        [Description("Criteria to move animals to field")]
        public string ExpressionToMoveAnimalsToField { get; set; }

        [Description("Criteria to move animals to feedlot")]
        public string ExpressionToMoveAnimalsToFeedlot { get; set; }


        ////////////////////////////////////////////////////////
        [Separator("Shearing")]
        [Description("Date to shear animals (dd-mmm)")] 
        public string ShearDate { get; set; }

        [Description(" ")] 
        public string Dummy { get; set; }

        ////////////////////////////////////////////////////////////////////////////
        // Callback properties to control disabling of properties.
        ////////////////////////////////////////////////////////////////////////////
        public bool BuyingEnabled { get { return Buying; } }

        public bool SellingEnabled { get { return Selling; } }

        public bool SellingAgeEnabled
        { 
            get
            { 
                return Selling &&
                (SellPolicy == SellPolicyType.PercentageHerdWhenAverageAgeGreaterThan || SellPolicy == SellPolicyType.CulledForAge);
            } 
        }

        public bool SellingWeightEnabled
        { 
            get
            { 
                return Selling &&
                (SellPolicy == SellPolicyType.PercentageHerdWhenAverageWeightGreaterThan || SellPolicy == SellPolicyType.CulledForWeight);
            } 
        }

        ////////////////////////////////////////////////////////////////////////////
        // Outputs
        ////////////////////////////////////////////////////////////////////////////
        // <summary>Number of animals sold.</summary>
        public int NumberSold { get; set; }

        // <summary>Description of something that has happened.</summary>
        public string EventName { get; set; }

        // <summary>Return a list of genotypes to the properties tab.</summary>
        public string[] GetGenotypes()
        {
            if (Animals != null)
                return Animals.Genotypes.Names.ToArray();
            return null;
        }

        public string CurrentLocation { get; set; }  // location of the sheep



        // ============================================================
        // Called once at beginning of simulation run
        // ============================================================
        [EventSubscribe("StartOfSimulation")]
        private void OnStartOfSimulation(object sender, EventArgs e)
        {
            if (string.IsNullOrEmpty(ExpressionToMoveAnimalsToField))
                throw new Exception("You must specify a criteria for moving animals to the field");
            expressionMoveAnimalsToField = new CSharpExpressionFunction();
            expressionMoveAnimalsToField.Parent = this;
            expressionMoveAnimalsToField.Expression = "Convert.ToDouble(" + ExpressionToMoveAnimalsToField + ")";
            expressionMoveAnimalsToField.SetCompiler(compiler);
            expressionMoveAnimalsToField.CompileExpression();

            if (string.IsNullOrEmpty(ExpressionToMoveAnimalsToFeedlot))
                throw new Exception("You must specify a criteria for moving animals to the feedlot");
            expressionMoveAnimalsToFeedlot = new CSharpExpressionFunction();
            expressionMoveAnimalsToFeedlot.Parent = this;
            expressionMoveAnimalsToFeedlot.Expression = "Convert.ToDouble(" + ExpressionToMoveAnimalsToFeedlot + ")";
            expressionMoveAnimalsToFeedlot.SetCompiler(compiler);
            expressionMoveAnimalsToFeedlot.CompileExpression();

            CurrentLocation = "";
        }



        // ============================================================
        // Management that happens every day.
        // ============================================================
        [EventSubscribe("DoManagement")]
        private void OnDoManagement(object sender, EventArgs e)
        {
            EventName = string.Empty;

            // Buy animals
            if (Buying && DateUtilities.DatesAreEqual(BuyDate, clock.Today))
            {
                var purchase = new StockBuy();
                purchase.Genotype = Genotype;   // "small merino"
                purchase.Number = NumAntoBuy;
                purchase.Sex = Sex;               // "wethers"
                purchase.Age = BuyAge;
                purchase.Weight = BuyWeight;
                purchase.Lactating = BuyLactating;

                purchase.UseTag = clock.Today.Year - clock.StartDate.Year + 1;   // give the new stock a tag value starting at 1 and incrementing each year

                Animals.Buy(purchase);
                Animals.Move("Feedlot");
                EventName = NumAntoBuy + " animals bought";

                CurrentLocation = "Feedlot";

            }

            // Sell animals
            if (SellingEnabled && DateUtilities.WithinDates(SaleFirstDate, clock.Today, SaleLastDate))
            { 
               IEnumerable<AnimalGroup> animalsToSell = null;

               // put all the animals with the tag of last year into the sell list
               animalsToSell = Animals.ByTag((clock.Today.Year - clock.StartDate.Year + 1) - 1);

               if (animalsToSell != null)
               {
                  var numberSellableAnimals = animalsToSell.Sum(g => g.NoAnimals);
                  var numberAnimalsToSell = Convert.ToInt32(numberSellableAnimals);
                  if (numberAnimalsToSell > 0)
                      Animals.Sell(numberAnimalsToSell, animalsToSell);
                }
            }


            // Determine whether the animals are in the feedlot.
            bool animalsAreInFeedlot = Animals.AnimalGroups.FirstOrDefault(group => group.PaddOccupied.Name == "Feedlot") != null;
            bool inGrazingWindow = DateUtilities.WithinDates(GrazingWindowStartDate, clock.Today, GrazingWindowEndDate);

            if (animalsAreInFeedlot)  // change this to "if this year's tag in the feedlot"
            {
                // Animals are in feedlot. Determine if they can be moved to paddock.
                if (inGrazingWindow && expressionMoveAnimalsToField.Value() == 1)
                {
                	foreach (var g in Animals.ByTag(clock.Today.Year - clock.StartDate.Year + 2))
                    {
                    	if (g.PaddOccupied.Name == "Feedlot")
                    	{
                    		Animals.Move(PaddockToMoveAnimalsTo.Name, g);
                    		EventName = "Animals moved to pasture";
                    		CurrentLocation = "Paddock";
                    	}
                    }
                }
            }
            else
            {
                // Animals are in paddock. Determine if they need to be moved to feedlot.
                if (!inGrazingWindow || expressionMoveAnimalsToFeedlot.Value() == 1)
                {
                    Animals.Move("Feedlot");
                    CurrentLocation = "Feedlot";
                    EventName = "Animals moved to feedlot";
                }
            }

            // Shear all animals on specified date
            if (DateUtilities.DatesEqual(ShearDate, clock.Today))
            {
                Animals.Shear(shearAdults: true, shearYoung: true);
                EventName = "Animals shorn";
            }
        }
    }
}
```
      Manager ManageSupplement: same as Wheat Feedlot Sheep Grazing Example.WheatSheepFeedlot.ManageSupplement
      Report ReportStockTags: EventNames=[Clock].EndOfDay
        VariableNames:
          [Clock].Today
          //[ManageStock].Script.CurrentLocation as CurrentLocation
          [Stock].NumberAll as TotalHeadCount
          [Stock].NumberAll / [Pasture].Area as Stockrate //(sheep/ha)
          [Stock].Weight as SheepWeight // (kg)
          [Stock].AgeMonths as SheepAgeMonths //(month)
          [Stock].NoGroups
          [Stock].SuppIntakeAll.Weight as IntakeOfSupplementOnFeedlot
          [Stock].PastIntakeAll.Weight as IntakeOfpasture
          [Stock].PastIntakeAll.Weight * [Stock].NumberAll as BiomassRemovedBySheep
          [Supplement].stores[2].Stored as SupplementStored // (kg)
          [Stock].WeightTag
      Zone Feedlot: same as Wheat Feedlot Sheep Grazing Example.WheatSheepFeedlot.Feedlot
      Zone Pasture: Area=1; Slope=0; AspectAngle=0; Altitude=50
        SimpleGrazing (disabled): GrazingRotationType=0; SimpleGrazingFrequencyString=21; SimpleMinGrazable=0; SimpleGrazingResidual=1500; FlexibleGrazePostDM=0; FractionDefoliatedNToSoil=[0.7]; FractionExcretedNToDung=[0.45]; DepthUrineIsAdded=250; FractionPopulationDecline=0; TramplingOn=false; MaximumPropLitterMovedToSoil=0.1; PastureConsumedAtMaximumRateOfLitterRemoval=1200
          PreGrazeDMArray=[1000, 1000, 1000, 1000, 1000, 1000, 1000, 1000, 1000, 1000, 1000, 1000]
          PostGrazeDMArray=[2000, 2000, 2000, 2000, 2000, 2000, 2000, 2000, 2000, 2000, 2000, 2000]
        Manager FertiliseFixedDates
          EachYear = True
          Dates = 5-jan, 5-feb, 5-mar, 5-apr, 5-aug, 5-sep, 5-oct, 5-nov, 5-dec
          UseCritNThreshold = False
          CritNThreshold = 50
          CritNDepth = 75
          Depth = 50
          Amount = 5
          FertiliserType = UreaN
          script: same as in Agistment Grazing Example.Agistment Grazing.Field.Fertilise on fixed dates
        Manager AutomaticIrrigation
          allowIrrigation = True
          seasonStart = 1-sep
          seasonEnd = 30-apr
          seasonsAllocation = 10000
          triggerDeficit = 75
          targetDeficit = 95
          returndays = 3
          maximumAmount = 30
          depthPAWC = 300
          TopSWdeficit = 0
          TopSWC = 0
          DaysSinceIrrigation = 0
          AmountToApply = 0
          SeasonAppliedAmount = 0
```csharp
using Models.Interfaces;
using System;
using Models.Core;
using Models.PMF;
using Models.Soils;
using System.Xml.Serialization;
using APSIM.Shared.Utilities;


        
namespace Models
{
    [Serializable] 
    [System.Xml.Serialization.XmlInclude(typeof(Model))]
    public class Script : Model
    {
        [Link] private ISummary summary;
        [Link] private Irrigation Irrigation;
        [Link] private Clock Clock;
        [Link] private Soil Soil;
        [Link(IsOptional = true)] private IPlant existingCrop;
        private DateTime StartDate;
        private DateTime EndDate;
        private double TopDUL;
        private double TopLL;
        private int nLayers;
        [Link]
        private IPhysical soilPhysical;
        [Link]
        private ISoilWater waterBalance;
        //Communication to other modules
       
        //User inputs from properties tab
        [Description("Turn irrigation on?")]
        public bool allowIrrigation { get; set; }
        [Description("Start of irrigation season (dd-MMM)")]
        public string seasonStart { get; set; }
        [Description("End of irrigation season (dd-MMM)")]
        public string seasonEnd { get; set; }
        [Description("Season allocation (mm)")]
        public double seasonsAllocation { get; set; }
        [Description("Deficit to trigger irrigation (% PAWC)")]
        public double triggerDeficit { get; set; }
        [Description("Deficit to stop irrigaton (% PAWC)")]
        public double targetDeficit { get; set; }
        [Description("Minimum days for irrigation to return")]
        public double returndays { get; set; }
        [Description("Maximum irrigation application (mm/day)")]
        public double maximumAmount { get; set; }
        [Description("Depth to calculate PAWC (mm)")]
        public double depthPAWC { get; set; }

        //Class members
        [XmlIgnore] public double TopSWdeficit { get; set; }
        [XmlIgnore] public double TopSWC { get; set; }
        [XmlIgnore] public double DaysSinceIrrigation { get; set; }
        [XmlIgnore] public double AmountToApply { get; set; }
        [XmlIgnore] public double SeasonAppliedAmount { get; set; }
        
        private bool IrrigationIsAllowed { get; set; }
        private bool SeasonIsOpen { get; set; }
        private bool CropIsActive { get; set; }
        private bool IrrigatorIsAvailable { get; set; }
        private bool SoilIsDry { get; set; }

    
        //Calculate static soil variables
        [EventSubscribe("StartOfSimulation")]
        private void OnStartOfSimulation(object sender, EventArgs e)
        {   
            //Set the season dates
            StartDate = DateTime.Parse(seasonStart + "-" + Clock.Today.Year.ToString());
            EndDate = DateTime.Parse(seasonEnd + "-" + Clock.Today.Year.ToString());
            
            //Can we irrigate at all?
            IrrigationIsAllowed = false; 
            if (allowIrrigation)
                IrrigationIsAllowed = true; 

            //Calculate soil water variables
            double depthFromSurface = 0.0;
            double fracLayer = 0.0;
            nLayers = soilPhysical.Thickness.Length;
            for (int layer = 0; layer < nLayers; layer++)
            {
                fracLayer = Math.Min(1.0, (depthPAWC - depthFromSurface) / soilPhysical.Thickness[layer]);
                TopLL += soilPhysical.LL15mm[layer] * fracLayer;
                TopDUL += soilPhysical.DULmm[layer] * fracLayer;
                depthFromSurface += soilPhysical.Thickness[layer];
                if (depthFromSurface >= depthPAWC)
                    layer = nLayers;
            }
        }
             
        //Determine daily requirement for irrigation
        [EventSubscribe("StartOfDay")]
        private void OnStartOfDay(object sender, EventArgs e)
        {
            //Can we irrigate today?          
            SeasonIsOpen = isBetween(Clock.Today, StartDate, EndDate);
            if (!SeasonIsOpen)
                SeasonAppliedAmount = 0;

            //Is there a crop in the ground that needs irrigation?
            CropIsActive = false;
            if ((existingCrop != null) && (existingCrop.IsAlive))
                CropIsActive = true;
            //if ((existingCrop.Phenology.Stage >= 3.0) && (existingCrop.Phenology.Stage < 6.0))
          
            //Is the irrigator available?
            IrrigatorIsAvailable = false;
            DaysSinceIrrigation += 1;
            if (DaysSinceIrrigation >= returndays)
                IrrigatorIsAvailable = true;
          
            //Is the soil dry enough to require irrigation?
            SoilIsDry = false;
            double depthFromSurface = 0.0;
            double fracLayer = 0.0;
            TopSWC = 0.0;
            for (int layer = 0; layer < nLayers; layer++)
            //for (int layer = 0; depthFromSurface < depthPAWC + soilPhysical.Thickness[layer]; layer++)
            {
                fracLayer = Math.Min(1.0, (depthPAWC - depthFromSurface) / soilPhysical.Thickness[layer]);
                TopSWC += waterBalance.SWmm[layer] * fracLayer;
                depthFromSurface += soilPhysical.Thickness[layer];
                if (depthFromSurface >= depthPAWC)
                    layer = nLayers;
            }
            
            TopSWdeficit = TopSWC - TopDUL;
            if (Math.Max(0.0, -TopSWdeficit) >= (TopDUL - TopLL) * (100 - triggerDeficit) / 100)
                SoilIsDry = true;
                
            //Are all the conditions ratifying irrigation
            if (IrrigationIsAllowed && SeasonIsOpen && CropIsActive && IrrigatorIsAvailable && SoilIsDry)
            {
                //Lets bloody well irrigate then!!!!
                AmountToApply = TopDUL * targetDeficit / 100 - TopSWC;
                AmountToApply = Math.Max(0.0, Math.Min(AmountToApply, seasonsAllocation - SeasonAppliedAmount));
                Irrigation.Apply(AmountToApply);
                DaysSinceIrrigation = 0;
                SeasonAppliedAmount += AmountToApply;
            }
        }
        
        ///Checks whether theDate is between iniDate and endDate (non-year specific)
        private bool isBetween(DateTime theDay, DateTime iniDate, DateTime endDate)
        {
            bool result = false;
            if (iniDate.DayOfYear < endDate.DayOfYear)
            {
                // period is within one year, ex: summer in the northern hemisphere
                if ((theDay.DayOfYear >= iniDate.DayOfYear) && (theDay.DayOfYear <= endDate.DayOfYear))
                    result = true;
            }
            else
            {
                // period goes over the end of the year, ex: summer in the southern hemisphere
                if ((theDay.DayOfYear >= iniDate.DayOfYear) || (theDay.DayOfYear <= endDate.DayOfYear))
                    result = true;
            }
            
            return result;
        }
    }
}
```
        MicroClimate: a_interception=0; b_interception=1; c_interception=0; d_interception=0; soil_albedo=0.23; SoilHeatFluxFraction=0.4; MinimumHeightDiffForNewLayer=0; NightInterceptionFraction=0.5; ReferenceHeight=2
        Irrigation
        Fertiliser
        SurfaceOrganicMatter: InitialResidueName=Sward; InitialResidueType=grass; InitialResidueMass=1000; InitialStandingFraction=0; InitialCPR=0; InitialCNR=15
        Soil: SoilType=NZ_Sedimentary; LocalName=Lismore; Site=Winchmore; NearestTown=Ashburton; Region=Canterbury; Country=New Zealand; Latitude=-48.48; Longitude=0
          Chemical: same as Simple Rotational Grazing Example.A Simple Rotational Grazing.Paddock01.LismoreSoil.Chemical
          Physical: same as Simple Rotational Grazing Example.A Simple Rotational Grazing.Paddock01.LismoreSoil.Physical
          WaterBalance SoilWater: same as Simple Rotational Grazing Example.A Simple Rotational Grazing.Paddock01.LismoreSoil.SoilWater
          Organic: same as Simple Rotational Grazing Example.A Simple Rotational Grazing.Paddock01.LismoreSoil.Organic
          InitialWater Initial water: PercentMethod=1; FractionFull=0.95
          CERESSoilTemperature Temperature
          Nutrient
        PastureSpecies AGPRyegrass: InitialShootDM=1500; InitialRootDM=450; InitialRootDepth=750
        PastureSpecies AGPWhiteClover: InitialShootDM=500; InitialRootDM=150; InitialRootDepth=350
        Report Pasture: EventNames=[Clock].EndOfDay
          VariableNames:
            [Clock].Today
            [AGPRyegrass].AboveGroundWt + [AGPWhiteClover].AboveGroundWt as PastureBiomass
            [Irrigation].IrrigationApplied
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