Simulations: Version=56
  Memo TitlePage
    # The APSIM-PMF White Clover Model

    _Rogerio Cichota, Plant and Food Research, New Zealand_

    ##Preamble

    White clover (*Trifolium repens*) is a herbaceous perennial herb in the Fabaceae family (former Leguminosae) native of Europe and west Asia.  It can now be be found in swards around the world in places with temperate and subtropical climates ([ThomasChapter1987]; [BrockEtAl1989]).  The plant aboveground consists of prostrate segmented stolons, from which tri-foliate leaves grow on top of a 5-15 cm petiole.  From the axils of each leaf emerges either a flower stalk (peduncle) or a branching stolon.  Roots are quite thick and relatively shallow; the initial taproot dies after a year or so, but roots can also grow from each branching stolon.  These rooted stolon behave and can become independent plants. Cultivated varieties are commonly classified into small-, medium- and large-leaved cultivars, which besides leaf size also reflects variations in plant height and proportion of stolons ([CaradusEtAl1989]).  The inflorescence is typically of white colour and grows about one third higher than the leaves.  As a legume, white clover can host N-fixing bacteria (*Rhizobium*) in a symbiotic relationship. N fixation by rhyzobia can tranfer large quantities of N from the atmosphere into the soil.  This is a major reason why white clover is typically sown alongside grasses in pastures.  Nonetheless, white clover is also a valuable forage, producing very high quality feed and is highly palatable to ruminants.

    **Objective:**  The model presented here was built to simulate the growth of white clover as a forage crop.  The current model focus on describing biomass accumulation and regrowth after defoliation in monocultural swards.  The model was developed using the Plant Modelling Framework (PMF) and thus, it is readily possible to use the WhiteClover model in mixed swards, but this usage has not been properly tested yet and should be done with caution.
    The simulation of variations in N concentration over the growing season can also be considered as incipient and only reasonably good. The model should be updated and its performance revised in the future when more data becomes available.

    ## Generic background
  Replacements
    Plant WhiteClover: CropType=WhiteClover; IsEnding=false; DaysAfterEnding=0
      Memo GeneralDescription
        ## Presentation

        This model has been built using APSIM's Plant Modelling Framework (PMF), as introduced in [brown_plant_2014] and described in more detail in www.apsim.info.  It aims to simulate the development and growth of white clover (*Trifolium repens*) as a forage crop.  The model focus primarily on describing the vegetative growth with only a simplified account of the reproductive phase.  Only an inflorescence organ is defined, so flowers and seeds and their development are not considered separately.  This was done because the reproductive phase of white clover stands is quite long and undefined: different plants may start flowering at different times and single plants may have flower buds as well as ripen seed at the same time (e.g. [HydeEtAl1959]; [Thomas1987Chapter]; [MedeirosAndSteiner2000]); more details in the phenology section below.  With more comprehensive data, the implementation of this phase and the reproductive organs may be revisited in the future.  The white clover model simulates the aboveground plant structure, including the photosynthesis process, using the SimpleLeaf procedure of PMF, which does not consider explicitly leaf age or their placement in the canopy.  The model describes a perennial crop, with phenology rewinding to the vegetative stage at the end of the reproductive phase.

        ##Inclusion in APSIM simulations
        To include white clover in a simulation the procedure is the same as any other APSIM crop:

         * The white clover object can be dragged or copied from the Crop folder in the toolbox into a Field in any simulation;

         * To become active and grow, the white clover crop needs to be sown using a manager script with a sowing rule. e.g.:
        <pre><code class='language-cs'>
            WhiteClover.Sow(cultivar: Huia, population: 450, depth: 5, rowSpacing: 100);
        </code></pre>
        If a specified cultivar is not available, a fatal error will be thrown.

        ###Harvest and biomass removal
        White clover biomass can be removed by raising one of the valid methods: Harvest, Cut, Graze, or Prune; this is done using a manager script, similarly to other crops.  The proportion of the biomass of each organ that is removed from the system and/or added to the residue pools may be specified; otherwise defaults will be used.  Note that the sum of fractions removed and added to the residue should be <= 1.0.  To specify the proportions for removal in a manager script, use a RemovalFractions class as shown below:
        <pre><code class='language-cs'>
        [EventSubscribe("Commencing")]
        private void OnSimulationCommencing(object sender, EventArgs e)
        {
          RemoveFraction = new RemovalFractions(WhiteClover.Organs);
        }
        [EventSubscribe("DoManagement")]
        private void OnDoManagement(object sender, EventArgs e)
        {
          if (Clock.Today.Date == HarvestDate)
          {
            RemoveFraction.SetFractionToRemove("Leaf", 0.80, "Live");
            RemoveFraction.SetFractionToRemove("Petiole", 0.50, "Live");
            RemoveFraction.SetFractionToResidue("Leaf", 0.05, "Live");
            RemoveFraction.SetFractionToResidue("Petiole", 0.01, "Live");
            WhiteClover.Harvest(RemoveFraction);
          }
        }
        </code></pre>

        The default values for the fractions (%) to be removed or transferred to residue are shown below in the description of each organ.

        ###Crop termination
        To fully terminate a crop the EndCrop event should be raised:
        <pre><code class='language-cs'>
         WhiteClover.EndCrop();
        </code></pre>
        Once a crop has been ended the field is open to be used by another APSIM plant model, or another white clover crop.  Note that ending white clover is not necessary before sowing another crop, competition for resources will take place between crops when there is more than one in the field.
      Phenology
        Memo Description
          The duration of each phenological phase in white clover is controlled either by the accumulation of thermal time or photoperiod.
        AirTemperatureFunction ThermalTime
          Memo Description
            The thermal time is used to control many of the phenological changes in white clover.  It is calculated from the daily average temperature using three cardinal temperatures: minimum, maximum, and optimum.  Plant development accelerates as temperature increases from minimum to optimum and slows down after that, ceasing completely at maximum temperature.  There is little information about these thresholds for white clover. The minimum, or base, temperature is quite variable among cultivars, varying from -1.0 to 5<sup>o</sup>C ([BlackEtAl2006]; [MonksEtAl2009]; [MootEtAll2000]). Even less data is found for the other parameters, and they are quite variable too; optimum temperature is around 28<sup>o</sup>C and 38<sup>o</sup>C for maximum temperature ([BlackEtAl2006]; [MonksEtAl2009]).
          XYPairs: X=[4, 25, 36.5]; Y=[0, 22, 0]
        PhotoperiodFunction Photoperiod: Twilight=-6; DayLength=0
        PhotoperiodDeltaFunction PhotoperiodVariation: Twilight=-6
        GerminatingPhase Germinating: Start=Sowing; End=Germination
          Memo Description
            Germination in most clover species is very variable (e.g. [HamptonEtAl1987]; [MurrayThesis2012]), with about 70-90% of seeds germinating for white clover. Temperatures between 5 and 20<sup>o</sup>C affect the speed of germination but not the final percentage ([HamptonEtAl1987]).  The model does not consider variable germination rate, thus the population should be adjusted by the user when sowing to account for less than 100% germination.
        EmergingPhase Emerging: ShootLag=50; ShootRate=15; Start=Germination; End=Emergence; TTForTimeStep=0
          Memo Description
            White clover has small seeds and these need to be placed near the soil surface to emerge successfully.  Best emergence rates occur when seeds are sown at depth of 5mm ([Hyde1950]; [MurrayAndClements1993]), and few plants will emerge from seeds deeper than 40mm.  Variations in germination rate due to depth are not currently simulated by the model, however the sowing depth does affect timing of emergence, in combination with temperature.  This is controlled by the parameter ShootRate, which is the shoot elongation rate as function of thermal time (mm/oCd).
            Emergence of white clover occurs a few days after germination ([Hyde1950]; [MootEtAll2000]), but this is quite variable (taking 5-20 days).  Both temperature and depth of seed are important factors.  Thermal time for the emergence of white clover (cv. Huia and Nomad) has been reported as being approximately 150oCd ([MootEtAll2000]; [MurrayThesis2012]), and there seem to be no significant variations between NZ cultivars ([HamptonEtAl1987]).
          VariableReference ThermalTime: VariableName=[Phenology].ThermalTime
        GenericPhase Vegetative: Start=Emergence; End=Induction
          Memo Description
            During this phase, white clover plants partition biomass to leaf+petiole, stolon, and root+taproot organs. Initially, this phase starts when plants emerge, but it is also triggered as phenology resets after the end of the reproductive phase.  The vegetative phase ends when the inductive phase starts.
            White clover is typically described as either short day or short-long day species ([Thomas1961]; [ChapterThomas1980]), which means induction is caused by exposure to short daylight lengths but reproductive growth may also be triggered by a period with long photoperiod.  Exposure to cold temperature can also lead to induction with subsequent initiation of inflorescence development when days become warmer and longer ([Thomas1981_SLD]; [BeattyThesis1959]). The variability in response of induction to environmental conditions are considerably large in white clover. In most stands at least some plants will show reproductive growth regardless of environmental conditions. The variations show some trend when contrasting large- to short-leaved cultivars or for cultivars from different origins (especially latitude), but the effect of genotypes within each group was not found to be significant (e.g. [ChapterThomas1980]; [Thomas1982_Comparison]; [Norris1984_daylength]; [BeattyThesis1959]).
            Inducing daylight length seem to be 12 hours or less, while temperatures need to be below about 10<sup>o</sup>C ([Thomas1979_Natural]; [Thomas1981_SLD]; [Thomas1982_Comparison]; [Norris1984_daylength]; [Norris1985_Temperature]). The base white clover model uses the accumulation of days under either low temperature or short photoperiod to trigger the end of the vegetative phase.
          Constant Target: FixedValue=15; Units=days
          AddFunction Progression
            LinearInterpolationFunction ShortDays: XProperty=[Phenology].Photoperiod
              XYPairs: X=[6, 8, 10, 12, 14, 16]; Y=[1, 1, 0.7, 0.1, 0, 0]
            LinearInterpolationFunction LowTemperatures: XProperty=[Phenology].ThermalTime
              XYPairs: X=[0, 2, 5, 8, 11, 15]; Y=[0, 0, 1, 1, 0, 0]
        GenericPhase Inductive: Start=Induction; End=Flowering
          Memo Description
            During this phase the white clover plants await for the environmental cue to start the reproductive growth. Physiological and metabolic processes remain the same as for the vegetative phase; plants partition biomass to leaf+petiole, stolon, and root+taproot organs. The inductive phase starts when plants accumulate a given number of days under inductive conditions, i.e. low temperatures and/or short daylight lengths ([Thomas1979_Natural]; [Norris1984_daylength]; [Norris1985_Temperature]).  The phase ends when the plants start reproduction growth, with the emergence of flower buds.
            There is a large level of variation in white clover plants and their flowering response to environmental conditions, with some plants reaching reproductive growth in almost any stand ([Thomas1979_Natural]; [BeattyThesis1959]). Nonetheless, in natural conditions reproductive growth is typically triggered by long daylight lengths, with reported values around 14 hours ([ChapterThomas1980]; [Thomas1981_SLD];[Norris1984_daylength]).  The accumulation of days under long photoperiod is used by the model to trigger the end of the inductive phase.
          Constant Target: FixedValue=10; Units=days
          LinearInterpolationFunction Progression: XProperty=[Phenology].Photoperiod
            XYPairs: X=[10, 11.5, 14, 15]; Y=[0, 0, 1, 1]
        GenericPhase Reproductive: Start=Flowering; End=Ripening
          Memo Description
            During this phase the plant is partitioning biomass to all organs, including reproductive organs (peduncles, inflorescence, and seeds). The current model does not describe the flower and seeds development explicitly, only a generic organ referred to as *inflorescence* is defined. The main reason for this is the variability and complex phenology of reproduction of white clover; with seeds maturing while new flowers are still being initiated over summer and early autumn (e.g. [HydeEtAl1959]; [Thomas1987Chapter]; [MedeirosAndSteiner2000]). Also due to their similarities and the fact that a population is described in the model (instead of single plants), peduncles and petioles are simulated as a single organ.
            Flower emergence typically starts in spring, peaks at the beginning of summer and continues until autumn ([ChapterThomas1980]; [MacfarlaneAndSheath1984]; [MarshalEtAl1993_Production]). The actual periods vary for different cultivars, and some have flowers nearly all year (albeit with low frequency over winter).  A drop in flower numbers in mid-summer and subsequent increase in early autumn has been shown in some cultivars and has been linked to water deficit or inhibition due to long days ([ChapterThomas1980]; [MacfarlaneAndSheath1984]).  Management practices, such as applying N fertiliser, irrigation and defoliations, have, in general, a positive impact on flower and seed production ([ChapterThomas1980]; [MedeirosAndSteiner2000]; [BissuelBelaygueEtAl2002_flower]), but there is large variation in the responses, depending on the cultivars as well as the extent and timing of the intervention. Currently, the model does not account for the effect of this practices explicitly, although it is expected that some effects are captured by changes in biomass allocation caused by actions such as irrigation of application of fertilisers.
          Constant Target: FixedValue=30; Units=days
          LinearInterpolationFunction Progression: XProperty=[Phenology].Photoperiod
            XYPairs: X=[10, 11.5, 14, 15]; Y=[1, 1, 0, 0]
        GotoPhase PhenologyRewind: Start=Ripening; End=Ripening; PhaseNameToGoto=Vegetative
      OrganArbitrator Arbitrator
        RelativeAllocation NArbitrator
          Memo Description
            Controls the allocation of N to each of the plant's organs. Partitioning is based on:
        RelativeAllocation DMArbitrator
          Memo Description
            Controls the allocation of biomass to each of the plant's organs. Partitioning is based on:
      SimpleLeaf Leaf: CohortsInitialised=false; Albedo=0.18; Gsmax350=0.015; R50=150; MicroClimatePresent=true; LeafInitialisationStage=Emergence
        zero: ApicalCohortNo, InitialisedCohortNo, TipsAtEmergence, CohortsAtInitialisation, AppearedCohortNo, PlantAppearedLeafNo, Height, FRGR, PotentialEP, WaterDemand, KDead, LAIDead
        Memo Description
          This organ represents all the leaves in the plant and has only a basic representation of the canopy structure, with all leaves considered to be distributed in one layer.  The total leaf biomass is used to determine the height of the canopy, using a function that can vary for different cultivars but that currently it is not affected by competition with other plants.
        MultiplyFunction InitialWtFunction
          Memo Description
            It is assumed that approximately 1/3 of the seed biomass is allocated to shoot upon emergence.  The weight of white clover seeds varies between 0.5 and 0.8 g/1000 seeds ([Thomas1987Chapter]; [BissuelBelaygueEtAl2002_seed]; [MurrayThesis2012]).
          Constant InitialOrganWt: FixedValue=0.0002; Units=g/plant
          VariableReference Population: VariableName=[Plant].Population
        Constant CarbonConcentration: FixedValue=0.4; Units=gC/gDM
          Memo Description
            This is the default value for PMF.
        Constant MinimumNConc: FixedValue=0.025; Units=gN/gDM
          Memo Description
            This is the lowest N concentration that leaves can have and still be able to grow.  It represents the N content for structural tissues and is the concentration of dead material.  Specific values for white clover were not found, but typical values for dead clover leaves are around 1.5-3.0% ([Brougham1958_LeafDev]; [WilmanAndMehdi1984]; [WarembourgEtAl1997]).
        Constant CriticalNConc: FixedValue=0.045; Units=gN/gDM
          Memo Description
            This is the N concentration that the organ muast have to fully function, growth penalty incurr if N level fall below this threshold.  Values for this parameter have not been clearly identified for white clover, typical concentration values for non stressed plants can be used instead, these vary between 3.5 and 4.5% ([WilmanAndMehdi1984]; [CaradusEtAl1993_PEffect]; [HoghJensenEtAl2002]).
        Constant MaximumNConc: FixedValue=0.06; Units=gN/gDM
          Memo Description
            This represents the maximum limit for N concentration in leaves.  The N content above CriticalNConc is not essential for growth and can be remobilised for new growth when uptake is insuficient.  Literature data suggest that value for maximum N concentration for whit clover leaves is about 6.0-7.0% ([RysAndPhung1985]; [CaradusEtAl1993_PEffect]; [HoghJensenEtAl2002]).
        Constant NitrogenDemandSwitch: FixedValue=1
        RUEModel Photosynthesis
          Memo Description
            There has been a number of studies on the photosynthetesis rate of white clover (e.g. [McCreeTroughton1966]; [WoledgeEtAl1991_Photo]; [MalinowskiEtAl1998]; [HerautBronEtAl2000]; [HofmannEtAl2007]), including its variation due to water and N deficiency, shading and CO<sub>2</sub> changes. The values and trends for CO<sub>2</sub> assimilation rates are generally consistent across the various studies and these have been used to help defining the limiting factor for photoynthesis in the model. Reported values RUE for white clover are in general around 2.5-3.0 g DM/MJ ([FaurieEtAl1996]; [ManderscheidEtAl1997]; [NassiriThesis1998]).
          Constant RUE: FixedValue=1.25; Units=g/MJ
          RUECO2Function FCO2: PhotosyntheticPathway=C3
          LinearInterpolationFunction FN: XProperty=[Leaf].FNmetabolic
            XYPairs: X=[0, 0.5, 1, 1.5]; Y=[0, 0.5, 1, 1]
          WeightedTemperatureFunction FT: MaximumTemperatureWeighting=0.75
            XYPairs: X=[0, 4, 10, 16.5, 19, 27, 34, 36.5]; Y=[0, 0, 0.15, 0.7, 1, 1, 0.1, 0]
          LinearInterpolationFunction FW: XProperty=[Leaf].Fw
            XYPairs: X=[0, 0.8, 1, 1.5]; Y=[0, 0.8, 1, 1]
          LinearInterpolationFunction FVPD: XProperty=[Leaf].Photosynthesis.VPD
            XYPairs: X=[0, 10, 12.5, 40]; Y=[1, 1, 0.95, 0]
          VariableReference RadnInt: VariableName=[Leaf].RadIntTot
            Memo Description
              The value of radiation intercepted by this plant as computed by the MicroClimate model.
        DivideFunction FRGRFunction
          Memo Description
            This parameter represents the Fractional Growth Rate.  It is needed by the MicroClimate model, where it is used to compute the effect of growth rate on transpiration.
          VariableReference Photosynthesis: VariableName=[Leaf].Photosynthesis
          MultiplyFunction PotentialPhotosynthesis
            VariableReference RUE: VariableName=[Leaf].Photosynthesis.RUE
            MaximumFunction Radiation
              VariableReference RadnInt: VariableName=[Leaf].RadIntTot
              Constant MinRadn: FixedValue=1e-05
        PhaseLookup TargetBiomassProportion
          Memo note
            This is the 'ideal' proportion of biomass for this organ within the above ground biomass (not total).
          PhaseLookupValue VegetativeInductive: Start=Emergence; End=Flowering
            Constant TargetProportion: FixedValue=0.42; Units=g/g
          PhaseLookupValue Reproductive: Start=Flowering; End=Ripening
            MultiplyFunction TargetProportion
              VariableReference BaseProportion
                VariableName=[Leaf].TargetBiomassProportion.VegetativeInductive.TargetProportion
              SubtractFunction InflorescenceFactor
                Constant One: FixedValue=1
                MultiplyFunction ReductionDueFlowering
                  Constant MaximumReductionInFLeaf: FixedValue=0.5; Units=g/g
                    Memo note
                      This is the maximum relative reduction of leaf proportion, reached when inflorescence proportion is at its maximum.
                  VariableReference FloweringIntensity
                    VariableName=[Inflorescence].TargetBiomassProportion.Reproductive.TargetProportion.PhotoPeriodFactor
        BiomassDemand DMDemands
          Memo Description
            The DM demands calculated here represent potential values, or a weighting factors, which are used by the OrganArbitrator to compute the allocated DM for all organs.  The potential demand is computed as the sum of a *Base* and a *Deficit* demand.  The *Base* demand is simply defined by the target proportion of leaf biomass, whereas the *Deficit* demand is defined by the difference between the actual and the targeted proportions.  This approach is used to ensure promptly regrowth of aboveground organs after a defoliation; it relies in the assumption that a target biomass proportion for each organ exists.  The *TargetBiomassProportion* is calculated based on a target shoot-to-root ratio and a biomass proportion for each organ above or below ground, these are defined elsewhere in this documentation and may vary with growth stage and environmental conditions.
          MultiplyFunction Structural
            Memo Description
              The partitioning of daily demand towards structural biomass is based on the structural fraction:
            AddFunction DMDemandFunction
              PartitionFractionDemandFunction BaseBiomassDemand
                MultiplyFunction PartitionFraction
                  VariableReference TargetAboveGroundProp: VariableName=[TargetAboveGroundFraction]
                  VariableReference TargetOrganProp: VariableName=[Leaf].TargetBiomassProportion
              MaximumFunction DeficitBiomassDemand
                Constant Zero: FixedValue=0
                SubtractFunction Deficit
                  MultiplyFunction TargetBiomass
                    VariableReference TargetAboveGroundProp: VariableName=[TargetAboveGroundFraction]
                    VariableReference TargetOrganProp: VariableName=[Leaf].TargetBiomassProportion
                    VariableReference TotalBiomass: VariableName=[TotalLive].Wt
                  VariableReference CurrentBiomass: VariableName=[Leaf].Live.Wt
            Constant StructuralFraction: FixedValue=0.95; Units=g/g
          Constant Metabolic: FixedValue=0; Units=g/g
            Memo Description
              Currently there is no metabolic biomass in SimpleLeaf
          StorageDMDemandFunction Storage
            SubtractFunction StorageFraction
              Constant One: FixedValue=1
              VariableReference StructuralFraction: VariableName=[Leaf].DMDemands.Structural.StructuralFraction
        BiomassDemand NDemands
          Memo Description
            These N demands also represent potential values that are used by the OrganArbitrator to get the total plant N demand.  This and any source of N in the plant are used to determine soil N demand, and eventually the actual amounts allocated to each pool in each organ.
          MultiplyFunction Structural
            VariableReference MinNconc: VariableName=[Leaf].minimumNconc
            VariableReference PotentialDMAllocation: VariableName=[Leaf].potentialDMAllocation.Structural
          MultiplyFunction Metabolic
            SubtractFunction MetabolicNconc
              VariableReference CritNconc: VariableName=[Leaf].criticalNConc
              VariableReference MinNconc: VariableName=[Leaf].minimumNconc
            VariableReference PotentialDMAllocation: VariableName=[Leaf].potentialDMAllocation.Structural
          StorageNDemandFunction Storage
            VariableReference NitrogenDemandSwitch: VariableName=[Leaf].nitrogenDemandSwitch
            VariableReference MaxNconc: VariableName=[Leaf].maximumNconc
        Constant DMConversionEfficiency: FixedValue=1; Units=0-1
          Memo Description
            This is the default value for PMF.
        Constant MaintenanceRespirationFunction: FixedValue=0; Units=0-1
          Memo Description
            This is the default value for PMF.
        MultiplyFunction LAIFunction
          Memo Description
            The leaf area index (LAI) for green leaves is defined based on biomass and the specific leaf area (SLA). The value for SLA for white clover is assumed to be constant in the current model, although the data indicates that age and some environmental factors (shading and nutrient status) have some effect on this value.  Variation due to age are ignored because the model simulates a population, as is intented to describe swards over long term, thus it should represent leaves of varing ages at the same time.  The nutritional effects are generally not linked to N, which currently is the only nutrient simulated in APSIM, thus can be ignored.  The effects of shading, as well as water deficiency, only occur when these conditions are mantained for some time, the model may have to be revised in the future to account for these factors, prefereably with some experimental data.  Available data suggest that SLA of white clover varies between 0.020 and 0.045 m2/g, with mean values for the cultivar Huia being around 0.030 m2/g ([Woledge1986_LeafAge]; [ChapmanAndRobson1992]; [KangAndBringk1995]; [HerautBronEtAl2000]; [CastleEtAl2002]; [NicholsEtAl2014_Drought]).
          Constant SpecificLeafArea: FixedValue=0.03; Units=m^2/g
          VariableReference LiveLeafWeight: VariableName=[Leaf].Live.Wt
        MultiplyFunction LaiDeadFunction
          Memo Description
            No specific data for LAI or SLA of dead leaves were found for chicory. The value of SLA is thus assumed to be the same as that of live leaves (this is consistent for the model as very little biomass reallocation of biomass occurs during senescence).
          VariableReference SpecificLeafArea: VariableName=[Leaf].LAIFunction.SpecificLeafArea
          VariableReference DeadLeafWeight: VariableName=[Leaf].Dead.Wt
        Constant ExtinctionCoefficientFunction: FixedValue=0.9; Units=0-1
          Memo Description
            Due to the near horizontal placement of its leaves, white clover has a high capacity for light interception. Values for the light extinction coefficient reported in the literature are quite variable, depending on which radiation was considered (total, direct, or PAR) to and whether plants were in mixed swards or in monoculture; these vary from 0.70 up to 1.0 ([LantingaEtAl1999]; [SonohatEtAl2002]; [denHollanderEtAl2007]).
        Constant ExtinctionCoefficientDead: FixedValue=0.1; Units=0-1
        LinearInterpolationFunction HeightFunction: XProperty=[WhiteClover].Leaf.Live.Wt
          Memo Description
            The average height of white clover is assumed here as a simple function of leaf biomass.  Generically, the petiole length determines the height, but the development of this organ is linked to leaf growth, so a general function as used here should be sufficient to simulate the average height.  Inflorescence are ignored as the plant height is mostly used for computing light interception and transpiration.  The petiole length varies with cultivar, being tipically between 5 and 15 cm ([Brougham1958_LeafDev]; [McCreeTroughton1966]; [BissuelBelaygueEtAl2002_flower]; [denHollanderEtAl2007]), and this has been found to be correlated to leaf size.  The inflorescence is typically one third higher than the leaves.  Sward population and competition with other plant may have an influence on the relationship between biomass and height, but this is not currently accounted for by the model.
          XYPairs: X=[10, 50, 100, 350, 500]; Y=[20, 75, 110, 140, 150]
        MultiplyFunction SenescenceRate
          Memo Description
            White clover has a relatively high rate of leaf senescence, with leaf area estabilising when LAI reaches about 5.0 ([Brougham1958_LeafDev]; [HartChapter1987]; [NicholsEtAl2014_Drought]).  Generic relationships to enviromental factors, such as temperature and soil moisture, are assumed based on other plant models.
          Constant ReferenceRate: FixedValue=0.05; Units=/day
          LinearInterpolationFunction StageFactor: XProperty=[Phenology].Stage
            XYPairs: X=[3, 4, 5, 6]; Y=[0.5, 1, 1, 1]
          LinearInterpolationFunction CoverFactor: XProperty=[Leaf].LAI
            XYPairs: X=[0, 2, 4, 5, 7]; Y=[0, 0.1, 0.5, 0.5, 1.5]
          WeightedTemperatureFunction TemperatureFactor: MaximumTemperatureWeighting=0.5
            XYPairs: X=[-20, -5, 0, 5, 17, 28, 37.5]; Y=[1.5, 0.25, 0.1, 0.1, 1, 1, 1.5]
          LinearInterpolationFunction SoilMoistureFactor: XProperty=[Leaf].Fw
            XYPairs: X=[0, 0.5, 1]; Y=[2, 1, 1]
        MultiplyFunction DetachmentRateFunction
          Memo Description
            A generic relationship between detachment and soil moisture is assumed.  It implies that under dry conditions the detachment rate decreases due to the lower level of activity of decomposing microorganisms.
          Constant ReferenceRate: FixedValue=0.1; Units=/day
          LinearInterpolationFunction SoilMoistureFactor: XProperty=[Leaf].Fw
            XYPairs: X=[0, 0.5, 1]; Y=[0.5, 0.5, 1]
        Constant DMRetranslocationFactor: FixedValue=0; Units=/day
        Constant DMReallocationFactor: FixedValue=1; Units=/day
          Memo Description
            This is the default value for PMF.
        MultiplyFunction NRetranslocationFactor
          Memo Description
            A generic relationship between retranslocation and environmental factors is assumed, this is done so that retranslocation is favoured when conditions are good for growth.  Retranslocation from leaves is enabled any time.
          Constant ReferenceRate: FixedValue=0.1; Units=/day
          WeightedTemperatureFunction TemperatureFactor: MaximumTemperatureWeighting=0.5
            XYPairs: X=[0, 2.5, 7.5, 15, 18, 27, 35, 37.5]; Y=[0, 0, 0.15, 0.7, 1, 1, 0.1, 0]
          LinearInterpolationFunction SoilMoistureFactor: XProperty=[Leaf].Fw
            XYPairs: X=[0, 0.5, 1]; Y=[0, 1, 1]
        Constant NReallocationFactor: FixedValue=1; Units=/day
          Memo Description
            This is the default value for PMF.
        Constant RemobilisationCost: FixedValue=0; Units=g/m^2
          Memo Description
            This is the default value for PMF.
        Constant StomatalConductanceCO2Modifier: FixedValue=1; Units=0-1
        BiomassRemoval BiomassRemovalDefaults
          OrganBiomassRemovalType Cut: FractionLiveToRemove=0.8; FractionDeadToRemove=0.2; FractionLiveToResidue=0; FractionDeadToResidue=0
          OrganBiomassRemovalType Graze: FractionLiveToRemove=0.7; FractionDeadToRemove=0.1; FractionLiveToResidue=0.1; FractionDeadToResidue=0.2
          OrganBiomassRemovalType Harvest: FractionLiveToRemove=0.1; FractionDeadToRemove=0.1; FractionLiveToResidue=0.1; FractionDeadToResidue=0.1
          OrganBiomassRemovalType Prune: FractionLiveToRemove=0; FractionDeadToRemove=0; FractionLiveToResidue=0; FractionDeadToResidue=0
      GenericOrgan Petiole
        Memo Description
          Note that this represents all the petioles as well as the flower peduncles in the plant, an approach taken due to the apparent similarities between them and lack of specific data to parameterise them separately.  There are no distinctions between ages or placement in the canopy either.
        MultiplyFunction InitialWtFunction
          Constant InitialOrganWt: FixedValue=3e-05; Units=g/plant
          VariableReference Population: VariableName=[Plant].Population
        Constant CarbonConcentration: FixedValue=0.4; Units=gC/gDM
        Constant MinimumNConc: FixedValue=0.025; Units=gN/gDM
        Constant CriticalNConc: FixedValue=0.0275; Units=gN/gDM
        Constant MaximumNConc: FixedValue=0.035; Units=gN/gDM
        Constant NitrogenDemandSwitch: FixedValue=1
        PhaseLookup TargetBiomassProportion
          Memo note
            This is the 'ideal' proportion of biomass for this organ within the above ground biomass (not total).
          PhaseLookupValue VegetativeInductive: Start=Emergence; End=Flowering
            MultiplyFunction TargetProportion
              Constant ProportionToLeaves: FixedValue=0.75; Units=g/g
              VariableReference TargetLeafProportion: VariableName=[Leaf].TargetBiomassProportion
          PhaseLookupValue Reproductive: Start=Flowering; End=Ripening
            AddFunction TargetProportion
              MultiplyFunction TargetFromLeaf
                VariableReference ProportionToLeaves
                  VariableName=[Petiole].TargetBiomassProportion.VegetativeInductive.TargetProportion.ProportionToLeaves
                VariableReference TargetLeafProportion: VariableName=[Leaf].TargetBiomassProportion
              MultiplyFunction TargetFromInflorescence
                Constant ProportionToInflorescence: FixedValue=0.4; Units=g/g
                VariableReference TargetInflorescenceProportion: VariableName=[Inflorescence].TargetBiomassProportion
        BiomassDemand DMDemands
          Memo Description: same as Replacements.WhiteClover.Leaf.DMDemands.Description
          MultiplyFunction Structural
            AddFunction DMDemandFunction
              PartitionFractionDemandFunction BaseBiomassDemand
                MultiplyFunction PartitionFraction
                  VariableReference TargetAboveGroundProp: VariableName=[TargetAboveGroundFraction]
                  VariableReference TargetOrganProp: VariableName=[Petiole].TargetBiomassProportion
              MaximumFunction DeficitBiomassDemand
                Constant Zero: FixedValue=0
                SubtractFunction Deficit
                  MultiplyFunction TargetBiomass
                    VariableReference TargetAboveGroundProp: VariableName=[TargetAboveGroundFraction]
                    VariableReference TargetOrganProp: VariableName=[Petiole].TargetBiomassProportion
                    VariableReference TotalBiomass: VariableName=[TotalLive].Wt
                  VariableReference CurrentBiomass: VariableName=[Petiole].Live.Wt
            Constant StructuralFraction: FixedValue=1; Units=g/g
          Constant Metabolic: FixedValue=0; Units=g/g
          StorageDMDemandFunction Storage
            SubtractFunction StorageFraction
              Constant One: FixedValue=1
              VariableReference StructuralFraction: VariableName=[Petiole].DMDemands.Structural.StructuralFraction
        BiomassDemand NDemands
          Memo Description
            These N demands also represent potential values that are used by the OrganArbitrator to get the total plant N demand.  This and any source of N in the plant are used to determine soil N demand, and eventually the actual amounts allocated to each pool in each organ.
          MultiplyFunction Structural
            VariableReference MinNconc: VariableName=[Petiole].minimumNconc
            VariableReference PotentialDMAllocation: VariableName=[Petiole].potentialDMAllocation.Structural
          MultiplyFunction Metabolic
            SubtractFunction MetabolicNconc
              VariableReference CritNconc: VariableName=[Petiole].criticalNConc
              VariableReference MinNconc: VariableName=[Petiole].minimumNconc
            VariableReference PotentialDMAllocation: VariableName=[Petiole].potentialDMAllocation.Structural
          StorageNDemandFunction Storage
            VariableReference NitrogenDemandSwitch: VariableName=[Petiole].nitrogenDemandSwitch
            VariableReference MaxNconc: VariableName=[Petiole].maximumNconc
        Constant DMConversionEfficiency: FixedValue=1; Units=0-1
        Constant MaintenanceRespirationFunction: FixedValue=0; Units=0-1
        MultiplyFunction SenescenceRate
          Memo Description
            The reference senescence rate is adjusted using generic relationships to environmental factors, such as temperature and soil moisture.  These are based on general knowledge from other plant models.
          VariableReference ReferenceRate: VariableName=[Leaf].SenescenceRate.ReferenceRate
          LinearInterpolationFunction StageFactor: XProperty=[Phenology].Stage
            XYPairs: X=[3, 4, 5.5, 5.8, 6]; Y=[0.5, 1, 1, 1.5, 1.5]
          LinearInterpolationFunction CoverFactor: XProperty=[Leaf].LAI
            XYPairs: X=[0, 2, 4, 5, 7]; Y=[0, 0.1, 0.5, 0.5, 1.5]
          WeightedTemperatureFunction TemperatureFactor: MaximumTemperatureWeighting=0.5
            XYPairs: X=[-20, -5, 0, 5, 17, 28, 37.5]; Y=[1.5, 0.25, 0.1, 0.1, 1, 1, 1.5]
          LinearInterpolationFunction SoilMoistureFactor: XProperty=[Leaf].Fw
            XYPairs: X=[0, 0.5, 1]; Y=[2, 1, 1]
        MultiplyFunction DetachmentRateFunction
          Memo Description
            A generic relationship between detachment and soil moisture is assumed.  It implies that under dry conditions the detachment rate decreases due to the lower level of activity of decomposing microorganisms.
          Constant ReferenceRate: FixedValue=0.1; Units=/day
          LinearInterpolationFunction SoilMoistureFactor: XProperty=[Leaf].Fw
            XYPairs: X=[0, 0.5, 0.75, 1]; Y=[0.1, 0.1, 0.25, 1]
        Constant DMRetranslocationFactor: FixedValue=0; Units=/day
        Constant DMReallocationFactor: FixedValue=0; Units=/day
        Constant NRetranslocationFactor: FixedValue=0.05; Units=/day
        Constant NReallocationFactor: FixedValue=1; Units=/day
        Constant RemobilisationCost: FixedValue=0; Units=g/m^2
        BiomassRemoval BiomassRemovalDefaults
          OrganBiomassRemovalType Cut: FractionLiveToRemove=0.5; FractionDeadToRemove=0.5; FractionLiveToResidue=0; FractionDeadToResidue=0
          OrganBiomassRemovalType Graze: FractionLiveToRemove=0.5; FractionDeadToRemove=0.3; FractionLiveToResidue=0.1; FractionDeadToResidue=0.1
          OrganBiomassRemovalType Harvest: FractionLiveToRemove=0.1; FractionDeadToRemove=0.2; FractionLiveToResidue=0.1; FractionDeadToResidue=0.1
          OrganBiomassRemovalType Prune: FractionLiveToRemove=0; FractionDeadToRemove=0; FractionLiveToResidue=0; FractionDeadToResidue=0
      GenericOrgan Stolon
        Memo Description
          This organt is parameterised to represent all the stolons in the plant, without distinction between ages or placement in the canopy.
        MultiplyFunction InitialWtFunction
          Constant InitialOrganWt: FixedValue=2e-05; Units=g/plant
          VariableReference Population: VariableName=[Plant].Population
        Constant CarbonConcentration: FixedValue=0.4; Units=gC/gDM
        Constant MinimumNConc: FixedValue=0.02; Units=gN/gDM
        Constant CriticalNConc: FixedValue=0.025; Units=gN/gDM
        Constant MaximumNConc: FixedValue=0.03; Units=gN/gDM
        Constant NitrogenDemandSwitch: FixedValue=1
        PhaseLookup TargetBiomassProportion
          Memo note
            This is the 'ideal' proportion of biomass for this organ within the above ground biomass (not total).
          PhaseLookupValue AllPhases: Start=Emergence; End=Ripening
            SubtractFunction TargetProportion
              Constant One: FixedValue=1
              VariableReference TargetLeafProportion: VariableName=[Leaf].TargetBiomassProportion
              VariableReference TargetPetioleProportion: VariableName=[Petiole].TargetBiomassProportion
              VariableReference TargetInflorescenceProportion: VariableName=[Inflorescence].TargetBiomassProportion
        BiomassDemand DMDemands
          Memo Description: same as Replacements.WhiteClover.Leaf.DMDemands.Description
          MultiplyFunction Structural
            AddFunction DMDemandFunction
              PartitionFractionDemandFunction BaseBiomassDemand
                MultiplyFunction PartitionFraction
                  VariableReference TargetAboveGroundProp: VariableName=[TargetAboveGroundFraction]
                  VariableReference TargetOrganProp: VariableName=[Stolon].TargetBiomassProportion
              MaximumFunction DeficitBiomassDemand
                Constant Zero: FixedValue=0
                SubtractFunction Deficit
                  MultiplyFunction TargetBiomass
                    VariableReference TargetAboveGroundProp: VariableName=[TargetAboveGroundFraction]
                    VariableReference TargetOrganProp: VariableName=[Stolon].TargetBiomassProportion
                    VariableReference TotalBiomass: VariableName=[TotalLive].Wt
                  VariableReference CurrentBiomass: VariableName=[Stolon].Live.Wt
            Constant StructuralFraction: FixedValue=0.65; Units=g/g
          Constant Metabolic: FixedValue=0; Units=g/g
          StorageDMDemandFunction Storage
            SubtractFunction StorageFraction
              Constant One: FixedValue=1
              VariableReference StructuralFraction: VariableName=[Stolon].DMDemands.Structural.StructuralFraction
        BiomassDemand NDemands
          Memo Description
            These N demands also represent potential values that are used by the OrganArbitrator to get the total plant N demand.  This and any source of N in the plant are used to determine soil N demand, and eventually the actual amounts allocated to each pool in each organ.
          MultiplyFunction Structural
            VariableReference MinNconc: VariableName=[Stolon].minimumNconc
            VariableReference PotentialDMAllocation: VariableName=[Stolon].potentialDMAllocation.Structural
          MultiplyFunction Metabolic
            SubtractFunction MetabolicNconc
              VariableReference CritNconc: VariableName=[Stolon].criticalNConc
              VariableReference MinNconc: VariableName=[Stolon].minimumNconc
            VariableReference PotentialDMAllocation: VariableName=[Stolon].potentialDMAllocation.Structural
          StorageNDemandFunction Storage
            VariableReference NitrogenDemandSwitch: VariableName=[Stolon].nitrogenDemandSwitch
            VariableReference MaxNconc: VariableName=[Stolon].maximumNconc
        Constant DMConversionEfficiency: FixedValue=1; Units=0-1
        Constant MaintenanceRespirationFunction: FixedValue=0; Units=0-1
        MultiplyFunction SenescenceRate
          Memo Description
            The reference senescence rate is adjusted using generic relationships to environmental factors, such as temperature and soil moisture.  These are based on general knowledge from other plant models.
          Constant ReferenceRate: FixedValue=0.01; Units=/day
          LinearInterpolationFunction StageFactor: XProperty=[Phenology].Stage
            XYPairs: X=[3, 4, 6]; Y=[0.5, 1, 1]
          WeightedTemperatureFunction TemperatureFactor: MaximumTemperatureWeighting=0.5
            XYPairs: X=[-20, -5, 0, 5, 17, 30, 37.5]; Y=[1.5, 0.25, 0.1, 0.1, 1, 1, 1.25]
          LinearInterpolationFunction SoilMoistureFactor: XProperty=[Leaf].Fw
            XYPairs: X=[0, 0.5, 1]; Y=[2, 1, 1]
        MultiplyFunction DetachmentRateFunction
          Memo Description
            A generic relationship between detachment and soil moisture is assumed.  It implies that under dry conditions the detachment rate decreases due to the lower level of activity of decomposing microorganisms.
          Constant ReferenceRate: FixedValue=0.05; Units=/day
          LinearInterpolationFunction SoilMoistureFactor: XProperty=[Leaf].Fw
            XYPairs: X=[0, 0.5, 0.75, 1]; Y=[0.1, 0.1, 0.25, 1]
          LinearInterpolationFunction PhotoPeriodFactor: XProperty=[Phenology].PhotoperiodVariation
            XYPairs: X=[0, 0.015, 0.03, 0.04, 0.05]; Y=[0, 0.1, 0.5, 1, 1]
        MultiplyFunction DMRetranslocationFactor
          Memo Description
            A generic relationship between retranslocation and environmental factors is assumed, this is done so that retranslocation is enhanced when conditions are good for growth. Plus retranslocation is only allowed when days are increasing, thus helping growth in spring and allowing for some replenishing in late summer and autumn.
          Constant ReferenceRate: FixedValue=0.05; Units=/day
          WeightedTemperatureFunction TemperatureFactor: MaximumTemperatureWeighting=0.5
            XYPairs: X=[0, 2.5, 7.5, 15, 18, 27, 35, 37.5]; Y=[0, 0, 0.15, 0.7, 1, 1, 0.1, 0]
          LinearInterpolationFunction SoilMoistureFactor: XProperty=[Leaf].Fw
            XYPairs: X=[0, 0.5, 1]; Y=[0, 1, 1]
          LinearInterpolationFunction PhotoPeriodFactor: XProperty=[Phenology].PhotoperiodVariation
            XYPairs: X=[-0.02, -0.01, 0, 0.01, 0.02, 0.04, 0.05]; Y=[0, 0.05, 0.1, 0.25, 0.5, 1, 1]
        Constant DMReallocationFactor: FixedValue=1; Units=/day
        MultiplyFunction NRetranslocationFactor
          Memo Description
            A generic relationship between retranslocation and environmental factors is assumed, this is done so that retranslocation is enhanced when conditions are good for growth. Plus retranslocation is only allowed when days are increasing, thus helping growth in spring and allowing for some replenishing in late summer and autumn.
          Constant ReferenceRate: FixedValue=0.1; Units=/day
          WeightedTemperatureFunction TemperatureFactor: MaximumTemperatureWeighting=0.5
            XYPairs: X=[0, 2.5, 7.5, 15, 18, 27, 35, 37.5]; Y=[0, 0, 0.15, 0.7, 1, 1, 0.1, 0]
          LinearInterpolationFunction SoilMoistureFactor: XProperty=[Leaf].Fw
            XYPairs: X=[0, 0.5, 1]; Y=[0, 1, 1]
          LinearInterpolationFunction PhotoPeriodFactor: XProperty=[Phenology].PhotoperiodVariation
            XYPairs: X=[-0.02, -0.01, 0, 0.01, 0.02, 0.04, 0.05]; Y=[0, 0.05, 0.1, 0.25, 0.5, 1, 1]
        Constant NReallocationFactor: FixedValue=1; Units=/day
        Constant RemobilisationCost: FixedValue=0; Units=g/m^2
        BiomassRemoval BiomassRemovalDefaults
          OrganBiomassRemovalType Cut: FractionLiveToRemove=0; FractionDeadToRemove=0; FractionLiveToResidue=0; FractionDeadToResidue=0
          OrganBiomassRemovalType Graze: FractionLiveToRemove=0.1; FractionDeadToRemove=0; FractionLiveToResidue=0.1; FractionDeadToResidue=0.2
          OrganBiomassRemovalType Harvest: FractionLiveToRemove=0; FractionDeadToRemove=0; FractionLiveToResidue=0; FractionDeadToResidue=0
          OrganBiomassRemovalType Prune: FractionLiveToRemove=0; FractionDeadToRemove=0; FractionLiveToResidue=0; FractionDeadToResidue=0
      GenericOrgan Inflorescence
        Memo Description
          Note that this organ represents all the reproductive parts of the plant: flowers, pods, seeds, etc.  No distinction is made between ages or placement in the canopy.
          The main reason for grouping all flowers and seeds together is the complexity of the reproductive phase of white clover.  There are variations in phenology between plants in the same sward, and even in the same plant there can be new flowers being initiated while others contain mature seeds (e.g. [HydeEtAl1959]; [Thomas1987Chapter]; [MedeirosAndSteiner2000]).  A comprehensive and specific dataset is necessary to support the implementation of distinct organs within the inflorescence, this may be revisited in the future.
        Constant InitialWtFunction: FixedValue=0; Units=g/m^2
        Constant CarbonConcentration: FixedValue=0.4; Units=gC/gDM
        LinearInterpolationFunction MinimumNConc: XProperty=[Phenology].Stage
          Memo Description
            The N concentration in the inflorescence of is relatively low compared to other organs (typical values about 2.0%), but the seed N content is considerably higher (about 4.5%).  The model currently does not separate inflorescence from seeds, thus it uses variable thresholds to account for the fact that the proportion of seed increases with time during the reproductive phase.
          XYPairs: X=[5, 5.1, 5.5, 5.75, 6]; Y=[0.025, 0.03, 0.04, 0.045, 0.045]
        LinearInterpolationFunction CriticalNConc: XProperty=[Phenology].Stage
          XYPairs: X=[5, 5.1, 5.5, 5.75, 6]; Y=[0.025, 0.03, 0.04, 0.045, 0.045]
        LinearInterpolationFunction MaximumNConc: XProperty=[Phenology].Stage
          XYPairs: X=[5, 5.1, 5.5, 5.75, 6]; Y=[0.03, 0.035, 0.042, 0.045, 0.045]
        Constant NitrogenDemandSwitch: FixedValue=1
        PhaseLookup TargetBiomassProportion
          Memo note
            This is the 'ideal' proportion of biomass for this organ within the above ground biomass (not total).
          PhaseLookupValue VegetativeInductive: Start=Emergence; End=Flowering
            Constant TargetProportion: FixedValue=0; Units=g/g
          PhaseLookupValue Reproductive: Start=Flowering; End=Ripening
            MultiplyFunction TargetProportion
              Constant BaseProportion: FixedValue=0.4; Units=g/g
              LinearInterpolationFunction PhotoPeriodFactor: XProperty=[Phenology].Photoperiod
                XYPairs: X=[11, 12, 13, 14, 15, 16, 18, 20]; Y=[0, 0, 0.025, 0.2, 0.6, 0.8, 0.95, 1]
        BiomassDemand DMDemands
          Memo Description: same as Replacements.WhiteClover.Leaf.DMDemands.Description
          MultiplyFunction Structural
            AddFunction DMDemandFunction
              PartitionFractionDemandFunction BaseBiomassDemand
                MultiplyFunction PartitionFraction
                  VariableReference TargetAboveGroundProp: VariableName=[TargetAboveGroundFraction]
                  VariableReference TargetOrganProp: VariableName=[Inflorescence].TargetBiomassProportion
              MaximumFunction DeficitBiomassDemand
                Constant Zero: FixedValue=0
                SubtractFunction Deficit
                  MultiplyFunction TargetBiomass
                    VariableReference TargetAboveGroundProp: VariableName=[Inflorescence].TargetAboveGroundFraction
                    VariableReference TargetOrganProp: VariableName=[TargetBiomassProportion]
                    VariableReference TotalBiomass: VariableName=[TotalLive].Wt
                  VariableReference CurrentBiomass: VariableName=[Inflorescence].Live.Wt
            Constant StructuralFraction: FixedValue=1; Units=g/g
          Constant Metabolic: FixedValue=0; Units=g/g
          StorageDMDemandFunction Storage
            SubtractFunction StorageFraction
              Constant One: FixedValue=1
              VariableReference StructuralFraction: VariableName=[Inflorescence].DMDemands.Structural.StructuralFraction
        BiomassDemand NDemands
          Memo Description
            These N demands also represent potential values that are used by the OrganArbitrator to get the total plant N demand.  This and any source of N in the plant are used to determine soil N demand, and eventually the actual amounts allocated to each pool in each organ.
          MultiplyFunction Structural
            VariableReference MinNconc: VariableName=[Inflorescence].minimumNconc
            VariableReference PotentialDMAllocation: VariableName=[Inflorescence].potentialDMAllocation.Structural
          MultiplyFunction Metabolic
            SubtractFunction MetabolicNconc
              VariableReference CritNconc: VariableName=[Inflorescence].criticalNConc
              VariableReference MinNconc: VariableName=[Inflorescence].minimumNconc
            VariableReference PotentialDMAllocation: VariableName=[Inflorescence].potentialDMAllocation.Structural
          StorageNDemandFunction Storage
            VariableReference NitrogenDemandSwitch: VariableName=[Inflorescence].nitrogenDemandSwitch
            VariableReference MaxNconc: VariableName=[Inflorescence].maximumNconc
        Constant DMConversionEfficiency: FixedValue=1; Units=0-1
        Constant MaintenanceRespirationFunction: FixedValue=0; Units=0-1
        MultiplyFunction SenescenceRate
          Memo Description
            The reference senescence rate is adjusted using generic relationships to environmental factors, such as temperature and soil moisture.  These are based on general knowledge from other plant models.
          Constant ReferenceRate: FixedValue=0.1; Units=/day
          LinearInterpolationFunction StageFactor: XProperty=[Phenology].Stage
            XYPairs: X=[3, 4.99, 5, 5.5, 6]; Y=[2, 1, 0.5, 0.65, 1]
          WeightedTemperatureFunction TemperatureFactor: MaximumTemperatureWeighting=0.5
            XYPairs: X=[-20, -5, 0, 5, 17, 28, 37.5]; Y=[1.5, 0.5, 0.25, 0.1, 0.75, 1, 1.5]
          LinearInterpolationFunction SoilMoistureFactor: XProperty=[Leaf].Fw
            XYPairs: X=[0, 0.5, 1]; Y=[2, 1, 1]
        MultiplyFunction DetachmentRateFunction
          Memo Description
            A generic relationship between detachment and soil moisture is assumed.  It implies that under dry conditions the detachment rate decreases due to the lower level of activity of decomposing microorganisms.
          Constant ReferenceRate: FixedValue=0.1; Units=/day
          LinearInterpolationFunction SoilMoistureFactor: XProperty=[Leaf].Fw
            XYPairs: X=[0, 0.5, 1]; Y=[0, 0.5, 1]
        Constant DMRetranslocationFactor: FixedValue=0; Units=/day
        Constant DMReallocationFactor: FixedValue=1; Units=/day
        Constant NRetranslocationFactor: FixedValue=0; Units=/day
        Constant NReallocationFactor: FixedValue=1; Units=/day
        Constant RemobilisationCost: FixedValue=0; Units=g/m^2
        BiomassRemoval BiomassRemovalDefaults
          OrganBiomassRemovalType Cut: FractionLiveToRemove=0.8; FractionDeadToRemove=0.6; FractionLiveToResidue=0; FractionDeadToResidue=0
          OrganBiomassRemovalType Graze: FractionLiveToRemove=0.6; FractionDeadToRemove=0.2; FractionLiveToResidue=0.2; FractionDeadToResidue=0.3
          OrganBiomassRemovalType Harvest: FractionLiveToRemove=0.8; FractionDeadToRemove=0.8; FractionLiveToResidue=0.1; FractionDeadToResidue=0.1
          OrganBiomassRemovalType Prune: FractionLiveToRemove=0; FractionDeadToRemove=0; FractionLiveToResidue=0; FractionDeadToResidue=0
      Nodule
        Memo Description
          Note that this represents all the nodules containing the symbiotic N-fixing bacteria (*Rhizobium*) of the plant, without distinction between ages or placement in the root system.
          Nodules are considered plant organs that result from the infection of fine roots by *Rhizobium* bacteria ([CrushChapter1987]; [HirschEtAl1997]; [PuppoEtAl2005]; [RusselleEtAl2008]). These structures are composed by a mixture of infected and non infected plant cells that behave as isolated organs, but under control of the host plant.  This is a symbiotic relationship whereby the plant supplies carbon and energy to the the bacteria which in turn provide the plant with N fixed from the air.  Nodules of white clover are of indeterminate type, these are more complex than determinate types, including a meristematic zone and have a much longer life span ([PuppoEtAl2005]; [RusselleEtAl2008]).  Different strains of the *Rhizobium* bacteria can vary on their capacity to infect white clover (with some plant cultivars also showing selection to different strains) as well as on their effectiveness to fix N<sub>2</sub> from the air.  However, the model currently does not simulate variations in nodule development nor on N fixation rate due to varying bacteria strains.
          The host plant controls the supply of sugars and oxygen to the nodules, thus regulating the N fixation rate and by extention on the nodule's growth and senescence ([PuppoEtAl2005]; [RusselleEtAl2008]; [HaagEtAl2013]). The model simulates this interaction by linking the respective processes in the nodules to the plants N status.
        Constant InitialWtFunction: FixedValue=1e-06; Units=g/m^2
        Constant CarbonConcentration: FixedValue=0.4; Units=gC/gDM
        Constant MinimumNConc: FixedValue=0.05; Units=gN/gDM
        Constant CriticalNConc: FixedValue=0.55; Units=gN/gDM
        Constant MaximumNConc: FixedValue=0.55; Units=gN/gDM
        Constant NitrogenDemandSwitch: FixedValue=1
        PhaseLookup TargetBiomassProportion
          Memo note
            This is the 'ideal' proportion of biomass for this organ within the below ground biomass (not total).
          Memo Description
            The growth and senescence of nodules in white clover roots is regulated by the host plant, this is done in tandem with the plants need for N fixation by controlling the supply of sugars and oxygen to the nodules ([CrushChapter1987]; [VlassakEtAl1997]; [PuppoEtAl2005]; [RusselleEtAl2008]; [HaagEtAl2013]).  The aproach used in the white clover model to simulate this regulation is to define a base, or mean, target proportion of nodules in the below ground biomass and modify it according to the plants N status.  Thus nodule growth demand is inversely proportional to the plant's N deficiency factor.
            *Rhizobium* bacteria are ubiquitous in soils (e.g. [CrushChapter1987]; [VlassakEtAl1997]; [RusselleEtAl2008]), although strains vary widelly in infection capacities and fixation efficiencies.  Thus, in typical growing conditions nearly all white clover plants will have some nodulation, add to this the fact that the model simulates a population instead of a single plant, the model assumes that nodule biomass never goes below a minimum threshold, as propotion of below ground biomass. This also ensures a prompt minimum capacity for N fixation.

            *Rhizobium* bacteria are ubiquitous in soils (e.g. [CrushChapter1987]; [VlassakEtAl1997]; [RusselleEtAl2008]), thus, in typical growing conditions, nearly all white clover plants will have some nodulation.  This ensures that some N fixation always will happen, even though bacteria strains can vary widelly in infection capacities and fixation efficiencies.  Considering this and the fact that the model simulates a population instead of a single plant, it is assumed in the WhiteClover model that the nodule's biomass never goes below a minimum threshold, a propotion of belowground biomass. This also ensures a prompt minimum capacity for N fixation.
          PhaseLookupValue AllPhases: Start=Emergence; End=Ripening
            MultiplyFunction TargetProportion
              Constant BaseProportion: FixedValue=0.05; Units=g/g
              LinearInterpolationFunction NDeficiencyFactor: XProperty=[Leaf].FNmetabolic
                XYPairs: X=[0, 0.5, 0.75, 0.9, 1]; Y=[1.65, 1, 1, 0.75, 0.2]
        BiomassDemand DMDemands
          Memo Description: same as Replacements.WhiteClover.Leaf.DMDemands.Description
          MultiplyFunction Structural
            AddFunction DMDemandFunction
              PartitionFractionDemandFunction BaseBiomassDemand
                MultiplyFunction PartitionFraction
                  SubtractFunction TargetBelowGroundProp
                    Constant One: FixedValue=1
                    VariableReference TargetAboveGroundProp: VariableName=[TargetAboveGroundFraction]
                  VariableReference TargetOrganProp: VariableName=[Nodule].TargetBiomassProportion
              MaximumFunction DeficitBiomassDemand
                Constant Zero: FixedValue=0
                SubtractFunction Deficit
                  MultiplyFunction TargetBiomass
                    SubtractFunction TargetBelowGroundProp
                      Constant One: FixedValue=1
                      VariableReference TargetAboveGroundProp: VariableName=[TargetAboveGroundFraction]
                    VariableReference TargetOrganProp: VariableName=[Nodule].TargetBiomassProportion
                    VariableReference TotalBiomass: VariableName=[TotalLive].Wt
                  VariableReference CurrentBiomass: VariableName=[Nodule].Live.Wt
            Constant StructuralFraction: FixedValue=1; Units=g/g
          Constant Metabolic: FixedValue=0; Units=g/g
          StorageDMDemandFunction Storage
            SubtractFunction StorageFraction
              Constant One: FixedValue=1
              VariableReference StructuralFraction: VariableName=[Nodule].DMDemands.Structural.StructuralFraction
        BiomassDemand NDemands
          Memo Description
            These N demands also represent potential values that are used by the OrganArbitrator to get the total plant N demand.  This and any source of N in the plant are used to determine soil N demand, and eventually the actual amounts allocated to each pool in each organ.
          MultiplyFunction Structural
            VariableReference MinNconc: VariableName=[Nodule].minimumNconc
            VariableReference PotentialDMAllocation: VariableName=[Nodule].potentialDMAllocation.Structural
          MultiplyFunction Metabolic
            SubtractFunction MetabolicNconc
              VariableReference CritNconc: VariableName=[Nodule].criticalNConc
              VariableReference MinNconc: VariableName=[Nodule].minimumNconc
            VariableReference PotentialDMAllocation: VariableName=[Nodule].potentialDMAllocation.Structural
          StorageNDemandFunction Storage
            VariableReference NitrogenDemandSwitch: VariableName=[Nodule].nitrogenDemandSwitch
            VariableReference MaxNconc: VariableName=[Nodule].maximumNconc
        Constant DMConversionEfficiency: FixedValue=1; Units=0-1
        MultiplyFunction FixationRate
          Memo Description
            The rate of N fixation in nodules is highly regulated by the host plant, but in its basis it is defined by the presence and quantity of symbiont bacteria.  The whiteclover model uses an approach whereby the basic fixation rate is directly proportional to the biomass of nodules ([RysAndPhung1985]; [LedgardEtAl1990]; [HoghJensenEtAl2002]; [RusselleEtAl2008]; [FloraThesis2013]).  This is then regulated by environmental factors and the plant itself ([CrushChapter1987]; [RusselleEtAl2008]). The plants control N fixation by limiting the supply of sugars and oxygen to the nodules ([PuppoEtAl2005]; [RusselleEtAl2008]; [HaagEtAl2013]). In the model, this is simulated as a function of N deficiency over the whole plant, with fixation rate being inversely proportional to the plant's N deficiency factor.  The mechanism regulating N fixation is quite responsive, with fixation nearly ceasing soon after fertilisation or defoliation (e.g. [CarrollGresshoff1983]; [RusselleEtAl2008]) and this is captured in the model by a prompt reduction of the N deficiency factor.  By linking potential fixation to nodule's biomass, the model is also capable of describing both an upper limit for fixation (due to nodule growth being limited due to the competition for biomass among organs) and the temporal lag between the inception of N stress and an elevated N fixation rate (nodules need to grow before they can start fixing N).
          Constant MaxFixationRate: FixedValue=0.05; Units=gN/gDM nodule/day
          VariableReference NoduleBiomass: VariableName=[Nodule].Live.Wt
          LinearInterpolationFunction NDeficiencyFactor: XProperty=[Leaf].FNmetabolic
            XYPairs: X=[0, 0.5, 0.75, 0.9, 1]; Y=[1, 1, 0.9, 0.5, 0]
          MinimumFunction EnvironmentalFactor
            WeightedTemperatureFunction TemperatureFactor: MaximumTemperatureWeighting=0.5
              XYPairs: X=[0, 2, 7.5, 15, 27, 36]; Y=[0, 0, 0.25, 1, 1, 0]
            LinearInterpolationFunction SoilMoistureFactor: XProperty=[Root].SoilWaterScale
              XYPairs: X=[0, 0.2, 0.5, 1, 1.5, 2]; Y=[0.05, 0.2, 1, 1, 1, 0]
        MultiplyFunction FixationMetabolicCost
          Memo Description
            The cost of symbiotic N fixation in general has been extensively studied. The theoretical cost at enzyme level is around 5-8 gC/gN, or about 33% higher than NO3 uptake (e.g. [MinchinAndWitty2005]; [PuppoEtAl2005]; [RusselleEtAl2008]), or 2.8-4.8 gC/gN for the whole nodule apparatus. Measured value are typically a bit higher than these.
          Constant SpecificFixationCost: FixedValue=5; Units=gC/gNFixed
          VariableReference FixedN: VariableName=[Nodule].NFixed
        Constant MaintenanceRespirationFunction: FixedValue=0; Units=0-1
        MultiplyFunction SenescenceRate
          Memo Description
            The reference senescence rate is adjusted according to enviromental factors, temperature and soil water status.
          Constant ReferenceRate: FixedValue=0.005; Units=/day
          WeightedTemperatureFunction TemperatureFactor: MaximumTemperatureWeighting=0.5
            XYPairs: X=[-5, 0, 5, 16, 28, 37.5]; Y=[0.5, 0.1, 0.1, 1, 1, 1.5]
          LinearInterpolationFunction SoilMoistureFactor: XProperty=[Leaf].Fw
            XYPairs: X=[0, 0.25, 1]; Y=[2, 1, 1]
          LinearInterpolationFunction SoilAerationFactor: XProperty=[Root].SoilWaterScale
            XYPairs: X=[1, 1.5, 2]; Y=[1, 1, 2]
        Constant DetachmentRateFunction: FixedValue=1; Units=/day
        Constant DMRetranslocationFactor: FixedValue=0; Units=/day
        Constant DMReallocationFactor: FixedValue=1; Units=/day
        Constant NRetranslocationFactor: FixedValue=0; Units=/day
        Constant NReallocationFactor: FixedValue=1; Units=/day
        Constant RemobilisationCost: FixedValue=0; Units=g/m^2
        BiomassRemoval BiomassRemovalDefaults
          OrganBiomassRemovalType Cut: FractionLiveToRemove=0; FractionDeadToRemove=0; FractionLiveToResidue=0.025; FractionDeadToResidue=0
          OrganBiomassRemovalType Graze: FractionLiveToRemove=0; FractionDeadToRemove=0; FractionLiveToResidue=0.025; FractionDeadToResidue=0
          OrganBiomassRemovalType Harvest: FractionLiveToRemove=0; FractionDeadToRemove=0; FractionLiveToResidue=0.025; FractionDeadToResidue=0
          OrganBiomassRemovalType Prune: FractionLiveToRemove=0; FractionDeadToRemove=0; FractionLiveToResidue=0; FractionDeadToResidue=0
      GenericOrgan Taproot
        Memo Description
          Note that this represents the taproots of all the plant in the population.  These are primarily considered as storage organs, its researves can be made available to boost plant growth in spring and/or following a defoliation.
          Taproots in white clover are generally efemerous.  They develop from seeds and are ubiquitous in young plants, but these generally die out about a year after germination and adult plants are often described as having no taproots ([HartChapter1987]; [BrockEtAl2000]).  However, some secondary roots can be taproot-like, especially in especific cultivars, e.g. ladino ([ThomasChapter1987]; [CaradusAndWoodfield1998]). Given that, and because the model simulates the a whole population, it is assumed that taproots are always present, but typically constitute a minor fraction of the root systems in most cultivars.
        MultiplyFunction InitialWtFunction
          Constant InitialOrganWt: FixedValue=5e-05; Units=g/plant
          VariableReference Population: VariableName=[Plant].Population
        Constant CarbonConcentration: FixedValue=0.4; Units=gC/gDM
        Constant MinimumNConc: FixedValue=0.025; Units=gN/gDM
        Constant CriticalNConc: FixedValue=0.025; Units=gN/gDM
        Constant MaximumNConc: FixedValue=0.03; Units=gN/gDM
        Constant NitrogenDemandSwitch: FixedValue=1
        PhaseLookup TargetBiomassProportion
          Memo Description
            The targeted biomass proportion in below ground organs is linked to the variations in nodule growth. This means that if the plant experiences N deficiency it will favour the growth of the N fixing nodules instead of root and taproot. Note that this reffers only to the relative propotions of below ground organs, plant can still alter the shoot-to-root ratio so that more roots as well as noduels are growth in conditions of N deficiency.
          Memo note
            This is the 'ideal' proportion of biomass for this organ within the above ground biomass (not total).
          PhaseLookupValue AllPhases: Start=Emergence; End=Ripening
            MultiplyFunction TargetProportion
              Constant BaseProportion: FixedValue=0.1; Units=g/g
              SubtractFunction VariationInOrgan
                Constant One: FixedValue=1
                DivideFunction VariationInNodule
                  SubtractFunction DeltaNoduleProp
                    VariableReference ActualNoduleProp: VariableName=[Nodule].TargetBiomassProportion
                    VariableReference BaseNoduleProp
                      VariableName=[Nodule].TargetBiomassProportion.AllPhases.TargetProportion.BaseProportion
                  AddFunction RootsBaseProp
                    VariableReference TaprootBaseProp
                      VariableName=[Taproot].TargetBiomassProportion.AllPhases.TargetProportion.BaseProportion
                    VariableReference RootBaseProp
                      VariableName=[Root].TargetBiomassProportion.AllPhases.TargetProportion.BaseProportion
        BiomassDemand DMDemands
          Memo Description
            The DM demand as calculated here is a potential value, or a weighting factor, which is used by the OrganArbitrator to compute the allocated DM for all organs.  The potential demand is computed as the sum of a base and a deficit demands.  The base demand is simply defined by the target proportion of leaf biomass, whereas the deficit demand is defined by the difference between the actual and targeted proportions.  This approach ensures promptly regrowth of aboveground organs after defoliation, but relies in the assumption that a target biomass proportion for each organ exist.  The target proportion is calculated based on a target shoot-to-root ratio and then a biomass proportion for each organ, these are defined elsewhere in this documentation and may vary with growth stage and environmental conditions.
          MultiplyFunction Structural
            AddFunction DMDemandFunction
              Memo Description
                The DM demand as defined here is a weighting factor, actual values are computed by the OrganArbitrator. The value is computed as the sum of a base demand, simply based on the potential partition according to the target proportions, and a deficit demand, which diverts more biomass to organs that deviate from their targeted proportions. This ensures faster regrowth of above ground organs after defoliation. The target proportion may vary with growth stage and environmental conditions.
              PartitionFractionDemandFunction BaseBiomassDemand
                MultiplyFunction PartitionFraction
                  SubtractFunction TargetBelowGroundProp
                    Constant One: FixedValue=1
                    VariableReference TargetAboveGroundProp: VariableName=[TargetAboveGroundFraction]
                  VariableReference TargetOrganProp: VariableName=[Taproot].TargetBiomassProportion
              MaximumFunction DeficitBiomassDemand
                Constant Zero: FixedValue=0
                SubtractFunction Deficit
                  MultiplyFunction TargetBiomass
                    SubtractFunction TargetBelowGroundProp
                      Constant One: FixedValue=1
                      VariableReference TargetAboveGroundProp: VariableName=[TargetAboveGroundFraction]
                    VariableReference TargetOrganProp: VariableName=[Taproot].TargetBiomassProportion
                    VariableReference TotalBiomass: VariableName=[TotalLive].Wt
                  VariableReference CurrentBiomass: VariableName=[Taproot].Live.Wt
            Constant StructuralFraction: FixedValue=0.75; Units=g/g
          Constant Metabolic: FixedValue=0; Units=g/g
          StorageDMDemandFunction Storage
            SubtractFunction StorageFraction
              Constant One: FixedValue=1
              VariableReference StructuralFraction: VariableName=[Taproot].DMDemands.Structural.StructuralFraction
        BiomassDemand NDemands
          Memo Description
            These N demands also represent potential values that are used by the OrganArbitrator to get the total plant N demand.  This and any source of N in the plant are used to determine soil N demand, and eventually the actual amounts allocated to each pool in each organ.
          MultiplyFunction Structural
            VariableReference MinNconc: VariableName=[Taproot].minimumNconc
            VariableReference PotentialDMAllocation: VariableName=[Taproot].potentialDMAllocation.Structural
          MultiplyFunction Metabolic
            SubtractFunction MetabolicNconc
              VariableReference CritNconc: VariableName=[Taproot].criticalNConc
              VariableReference MinNconc: VariableName=[Taproot].minimumNconc
            VariableReference PotentialDMAllocation: VariableName=[Taproot].potentialDMAllocation.Structural
          StorageNDemandFunction Storage
            VariableReference NitrogenDemandSwitch: VariableName=[Taproot].nitrogenDemandSwitch
            VariableReference MaxNconc: VariableName=[Taproot].maximumNconc
        Constant DMConversionEfficiency: FixedValue=1; Units=0-1
        Constant MaintenanceRespirationFunction: FixedValue=0; Units=0-1
        MultiplyFunction SenescenceRate
          Memo Description
            The reference senescence rate is adjusted according to environmental factors, temperature and soil water status.
          Constant ReferenceRate: FixedValue=0.01; Units=/day
          WeightedTemperatureFunction TemperatureFactor: MaximumTemperatureWeighting=0.5
            XYPairs: X=[-2, 5, 17, 30, 37.5]; Y=[0, 0.1, 1, 1, 1.25]
          LinearInterpolationFunction SoilMoistureFactor: XProperty=[Leaf].Fw
            XYPairs: X=[0, 0.5, 1]; Y=[1, 1, 1]
          LinearInterpolationFunction SoilAerationFactor: XProperty=[Root].SoilWaterScale
            XYPairs: X=[1, 1.25, 1.75, 2]; Y=[1, 1, 1.5, 2]
        Constant DetachmentRateFunction: FixedValue=1; Units=/day
        MultiplyFunction DMRetranslocationFactor
          Memo Description
            A generic relationship between retranslocation and environmental factors is assumed, this is done so that retranslocation is enhanced when conditions are good for growth. Plus retranslocation is only allowed when days are increasing, thus helping growth in spring and allowing for some replenishing in late summer and autumn.
          Constant ReferenceRate: FixedValue=0.05; Units=/day
          WeightedTemperatureFunction TemperatureFactor: MaximumTemperatureWeighting=0.5
            XYPairs: X=[0, 2.5, 7.5, 15, 18, 27, 35, 37.5]; Y=[0, 0, 0.15, 0.7, 1, 1, 0.1, 0]
          LinearInterpolationFunction SoilMoistureFactor: XProperty=[Leaf].Fw
            XYPairs: X=[0, 0.5, 1]; Y=[0, 1, 1]
          LinearInterpolationFunction PhotoPeriodFactor: XProperty=[Phenology].PhotoperiodVariation
            XYPairs: X=[0, 0.015, 0.03, 0.04, 0.05]; Y=[0, 0.1, 0.5, 1, 1]
        Constant DMReallocationFactor: FixedValue=0; Units=/day
        MultiplyFunction NRetranslocationFactor
          Memo Description
            A generic relationship between retranslocation and environmental factors is assumed, this is done so that retranslocation is enhanced when conditions are good for growth. Plus retranslocation is only allowed when days are increasing, thus helping growth in spring and allowing for some replenishing in late summer and autumn.
          Constant ReferenceRate: FixedValue=0.1; Units=/day
          WeightedTemperatureFunction TemperatureFactor: MaximumTemperatureWeighting=0.5
            XYPairs: X=[0, 2.5, 7.5, 15, 18, 27, 35, 37.5]; Y=[0, 0, 0.15, 0.7, 1, 1, 0.1, 0]
          LinearInterpolationFunction SoilMoistureFactor: XProperty=[Leaf].Fw
            XYPairs: X=[0, 0.5, 1]; Y=[0, 1, 1]
          LinearInterpolationFunction PhotoPeriodFactor: XProperty=[Phenology].PhotoperiodVariation
            XYPairs: X=[0, 0.015, 0.03, 0.04, 0.05]; Y=[0, 0.1, 0.5, 1, 1]
        Constant NReallocationFactor: FixedValue=1; Units=/day
        Constant RemobilisationCost: FixedValue=0; Units=g/m^2
        BiomassRemoval BiomassRemovalDefaults
          OrganBiomassRemovalType Cut: FractionLiveToRemove=0; FractionDeadToRemove=0; FractionLiveToResidue=0.1; FractionDeadToResidue=0
          OrganBiomassRemovalType Graze: FractionLiveToRemove=0; FractionDeadToRemove=0; FractionLiveToResidue=0.1; FractionDeadToResidue=0
          OrganBiomassRemovalType Harvest: FractionLiveToRemove=0; FractionDeadToRemove=0; FractionLiveToResidue=0.1; FractionDeadToResidue=0
          OrganBiomassRemovalType Prune: FractionLiveToRemove=0; FractionDeadToRemove=0; FractionLiveToResidue=0; FractionDeadToResidue=0
      Root: GrowthRespiration=0; MaintenanceRespiration=0; RootAngle=45; SWAvailabilityRatio=0
        Memo Description
          Note that this organs is parameterised to represents all the fine roots of the plant.  The root organ is reponsible for uptake but can also supply both N and DM from its non-structural biomass, although this typically represents only a small contribution to plant growth and only happen upon senescence.  The taproot organ is used for simulating biomass storage and remobilisation.  The root depth increases through time, as described below, but currently it does not retreat in case of root depth, something that will have to be revisited in the future.
        Constant InitialDM: FixedValue=0.00035; Units=g/plant
          Memo Description
            It is assumed that approximately 2/3 of the seed biomass is allocated to roots upon emergence.  The weight of white clover seeds varies between 0.5 and 0.8 g/1000 seeds ([Thomas1987Chapter]; [BissuelBelaygueEtAl2002_seed]; [MurrayThesis2012]).
        Constant CarbonConcentration: FixedValue=0.4; Units=gC/gDM
        Constant MinimumNConc: FixedValue=0.025; Units=gN/gDM
        Constant CriticalNConc: FixedValue=0.025; Units=gN/gDM
        Constant MaximumNConc: FixedValue=0.03; Units=gN/gDM
        PhaseBasedSwitch NitrogenDemandSwitch: Start=Germination; End=Ripening
        PhaseLookup TargetBiomassProportion
          Memo Description
            The targeted biomass proportion in below ground organs is linked to the variations in nodule growth. This means that if the plant experiences N deficiency it will favour the growth of the N fixing nodules instead of root and taproot. Note that this refers only to the relative propotions of below ground organs, plant can still alter the shoot-to-root ratio so that more roots as well as nodules are growth in conditions of N deficiency.
          Memo note
            This is the 'ideal' proportion of biomass for this organ within the above ground biomass (not total).
          PhaseLookupValue AllPhases: Start=Emergence; End=Ripening
            MultiplyFunction TargetProportion
              Constant BaseProportion: FixedValue=0.8; Units=g/g
              SubtractFunction VariationInOrgan: same as Replacements.WhiteClover.Taproot.TargetBiomassProportion.AllPhases.TargetProportion.VariationInOrgan
        BiomassDemand DMDemands
          Memo Description: same as Replacements.WhiteClover.Taproot.DMDemands.Description
          MultiplyFunction Structural
            AddFunction DMDemandFunction
              PartitionFractionDemandFunction BaseBiomassDemand
                MultiplyFunction PartitionFraction
                  SubtractFunction TargetBelowGroundProp
                    Constant One: FixedValue=1
                    VariableReference TargetAboveGroundProp: VariableName=[TargetAboveGroundFraction]
                  VariableReference TargetOrganProp: VariableName=[Root].TargetBiomassProportion
              MaximumFunction DeficitBiomassDemand
                Constant Zero: FixedValue=0
                SubtractFunction Deficit
                  MultiplyFunction TargetBiomass
                    SubtractFunction TargetBelowGroundProp
                      Constant One: FixedValue=1
                      VariableReference TargetAboveGroundProp: VariableName=[TargetAboveGroundFraction]
                    VariableReference TargetOrganProp: VariableName=[Root].TargetBiomassProportion
                    VariableReference TotalBiomass: VariableName=[TotalLive].Wt
                  VariableReference CurrentBiomass: VariableName=[Root].Live.Wt
            Constant StructuralFraction: FixedValue=1; Units=g/g
          Constant Metabolic: FixedValue=0
          StorageDMDemandFunction Storage
            SubtractFunction StorageFraction
              Constant One: FixedValue=1
              VariableReference StructuralFraction: VariableName=[Root].DMDemands.Structural.StructuralFraction
        BiomassDemand NDemands
          Memo Description
            These N demands also represent potential values that are used by the OrganArbitrator to get the total plant N demand.  This and any source of N in the plant are used to determine soil N demand, and eventually the actual amounts allocated to each pool in each organ.
          MultiplyFunction Structural
            VariableReference MinNconc: VariableName=[Root].minimumNconc
            VariableReference PotentialDMAllocation: VariableName=[Root].potentialDMAllocation.Structural
          MultiplyFunction Metabolic
            SubtractFunction MetabolicNconc
              VariableReference CritNconc: VariableName=[Root].criticalNConc
              VariableReference MinNconc: VariableName=[Root].minimumNconc
            VariableReference PotentialDMAllocation: VariableName=[Root].potentialDMAllocation.Structural
          StorageNDemandFunction Storage
            VariableReference NitrogenDemandSwitch: VariableName=[Root].nitrogenDemandSwitch
            VariableReference MaxNconc: VariableName=[Root].maximumNconc
        Constant DMConversionEfficiency: FixedValue=1; Units=0-1
        Constant MaintenanceRespirationFunction: FixedValue=0; Units=0-1
        PhaseLookup RootFrontVelocity
          PhaseLookupValue PreEmergence: Start=Germination; End=Emergence
            Constant ReferenceVelocity: FixedValue=4.5; Units=mm/day
          PhaseLookupValue VegetativeInductive: Start=Emergence; End=Flowering
            MultiplyFunction GrowthVelocity
              Constant ReferenceVelocity: FixedValue=9; Units=mm/day
              MinimumFunction EnvironmentalFactor
                WeightedTemperatureFunction TemperatureFactor: MaximumTemperatureWeighting=0.5
                  XYPairs: X=[0, 2, 15, 28, 35]; Y=[0, 0, 1, 1, 0]
                Constant SoilMoistureFactor: FixedValue=1
                Constant SoilAerationFactor: FixedValue=1
          PhaseLookupValue Reproductive: Start=Flowering; End=Ripening
            MultiplyFunction GrowthVelocity
              Constant ReferenceVelocity: FixedValue=5; Units=mm/day
              MinimumFunction EnvironmentalFactor: same as Replacements.WhiteClover.Root.RootFrontVelocity.VegetativeInductive.GrowthVelocity.EnvironmentalFactor
        Constant MaximumRootDepth: FixedValue=750; Units=mm
        Constant SpecificRootLength: FixedValue=90; Units=m/g
        MultiplyFunction SenescenceRate
          Memo Description
            The reference senescence rate is adjusted according to environmental factors, temperature and soil water status.
          Constant ReferenceRate: FixedValue=0.02; Units=/day
          WeightedTemperatureFunction TemperatureFactor: MaximumTemperatureWeighting=0.5
            XYPairs: X=[-2, 5, 17, 30, 37.5]; Y=[0, 0.1, 1, 1, 1.25]
          LinearInterpolationFunction SoilMoistureFactor: XProperty=[Leaf].Fw
            XYPairs: X=[0, 0.5, 1]; Y=[1, 1, 1]
          LinearInterpolationFunction SoilAerationFactor: XProperty=[Root].SoilWaterScale
            XYPairs: X=[1, 1.25, 1.75, 2]; Y=[1, 1, 1.5, 2]
        MultiplyFunction DMRetranslocationFactor: same as Replacements.WhiteClover.Taproot.DMRetranslocationFactor
        Constant DMReallocationFactor: FixedValue=1; Units=/day
        MultiplyFunction NRetranslocationFactor: same as Replacements.WhiteClover.Taproot.NRetranslocationFactor
        Constant NReallocationFactor: FixedValue=1; Units=/day
        Constant RemobilisationCost: FixedValue=0; Units=g/m^2
        LinearInterpolationFunction KLModifier: XProperty=[Root].LengthDensity
          Memo
            No adjustment of KL are considered for white clover in the current model.  More analyses, preferably with support from data specific to this issue, are needed to improve the description of this relationship.
            The KLModifier allows for a dynamic adjustment of the KL factor (defined in the soil node).
          XYPairs: X=[0, 1]; Y=[1, 1]
        LinearInterpolationFunction KNH4: XProperty=[Root].LengthDensity
          XYPairs: X=[0, 0.003]; Y=[0.01, 0.02]
        LinearInterpolationFunction KNO3: XProperty=[Root].LengthDensity
          XYPairs: X=[0, 0.003]; Y=[0.02, 0.03]
        LinearInterpolationFunction NUptakeSWFactor: XProperty=[Root].SoilWaterScale
          XYPairs: X=[0, 0.75, 1]; Y=[0, 1, 1]
        Constant MaxDailyNUptake: FixedValue=10; Units=gN/m^2
        SoilWaterScale
        BiomassRemoval BiomassRemovalDefaults
          OrganBiomassRemovalType Cut: FractionLiveToRemove=0; FractionDeadToRemove=0; FractionLiveToResidue=0.05; FractionDeadToResidue=0
          OrganBiomassRemovalType Graze: FractionLiveToRemove=0; FractionDeadToRemove=0; FractionLiveToResidue=0.05; FractionDeadToResidue=0
          OrganBiomassRemovalType Harvest: FractionLiveToRemove=0; FractionDeadToRemove=0; FractionLiveToResidue=0.05; FractionDeadToResidue=0
          OrganBiomassRemovalType Prune: FractionLiveToRemove=0; FractionDeadToRemove=0; FractionLiveToResidue=0; FractionDeadToResidue=0
      CompositeBiomass AboveGround: DMDOfStructural=0.6
        Propertys=[[Leaf].Live, [Leaf].Dead, [Stolon].Live, [Stolon].Dead, [Petiole].Live, [Petiole].Dead, [Inflorescence].Live, [Inflorescence].Dead]
      CompositeBiomass AboveGroundLive: DMDOfStructural=0.6
        Propertys=[[Leaf].Live, [Stolon].Live, [Petiole].Live, [Inflorescence].Live]
      CompositeBiomass AboveGroundDead: DMDOfStructural=0.6
        Propertys=[[Leaf].Dead, [Stolon].Dead, [Petiole].Dead, [Inflorescence].Dead]
      CompositeBiomass BelowGround: DMDOfStructural=0.6
        Propertys=[[Root].Live, [Root].Dead, [Taproot].Live, [Taproot].Dead, [Nodule].Live, [Nodule].Dead]
      CompositeBiomass BelowGroundLive: Propertys=[[Root].Live, [Taproot].Live, [Nodule].Live]; DMDOfStructural=0.6
      CompositeBiomass BelowGroundDead: Propertys=[[Root].Dead, [Taproot].Dead, [Nodule].Dead]; DMDOfStructural=0.6
      CompositeBiomass Total: DMDOfStructural=0.6
        Propertys=[[Leaf].Live, [Leaf].Dead, [Stolon].Live, [Stolon].Dead, [Petiole].Live, [Petiole].Dead, [Inflorescence].Live, [Inflorescence].Dead, [Root].Live, [Root].Dead, [Taproot].Live, [Taproot].Dead, [Nodule].Live, [Nodule].Dead]
      CompositeBiomass TotalLive: DMDOfStructural=0.6
        Propertys=[[Leaf].Live, [Stolon].Live, [Petiole].Live, [Inflorescence].Live, [Root].Live, [Taproot].Live, [Nodule].Live]
      CompositeBiomass TotalDead: DMDOfStructural=0.6
        Propertys=[[Leaf].Dead, [Stolon].Dead, [Petiole].Dead, [Inflorescence].Dead, [Root].Dead, [Taproot].Dead, [Nodule].Dead]
      PhaseLookup ShootRootRatio
        PhaseLookupValue AllPhases: Start=Emergence; End=Ripening
          DivideFunction CurrentSR
            VariableReference AboveGroundDM: VariableName=[AboveGroundLive].Wt
            VariableReference BelowGroundDM: VariableName=[BelowGroundLive].Wt
      PhaseLookup TargetShootRootRatio
        Memo Description
          The target shoot-to-root ratio is used to alter the allocation of biomass when the balance between the various organs is disturbed, such as after a defoliation.
          Published data for the shoot-to-root ratio in white clover show a considerable variability, with values between 1.5 to 8.0 for a wide range of conditions ([HartChapter1987]; [GourleyEtAl1993]; [AlmeidaEtAl1999]; [NeergaardAndGorissen2004]; [denHollanderEtAl2007]; [MurrayThesis2012]; [CrushEtAl2015]). For typical enviromental conditions the data suggest a mean value around 2.5-3.5 for adult plants.  This value can be affected by environmental conditions, with water or nutrient deficiency inducing greater root growth, while low light conditions lead to a higher allocation above ground. The current model does not explicitly consider these variations, this should be upgraded when more specific data becomes available.
        PhaseLookupValue AllPhases: Start=Emergence; End=Ripening
          MultiplyFunction TargetSR
            Constant MeanSR: FixedValue=3; Units=g/g
            LinearInterpolationFunction PhotoPeriodFactor: XProperty=[Phenology].Photoperiod
              XYPairs: X=[0, 6, 13, 20, 24]; Y=[0.33, 0.75, 1, 1.25, 1.65]
      DivideFunction TargetAboveGroundFraction
        Memo Description
          The model attempts to keep the proportion of the plant biomass above and below ground at a given value.  The 'target' value is the 'ideal' relative proportion of biomass above and below ground for the plant at a given growth phase. This is in accord with the biomass allocation plasticity approach (e.g. [Wilson_1988]; [LevangBrilz_2002]). The approach ensures that biomass allocation is shifted to the appropriate organs when the balance is disturbed, especially important for recovery after defoliation.  Studies have show that white clover, unlike most plants, has a relatively fixed proportion of biomass above ground, even during reproductive phase (e.g. [ChapterThomas1980]). The model uses the target shoot-to-root ratio to compute the proportion of biomass above ground (e.g. [JohnsonAndThornley1987]).
        VariableReference TargetSR: VariableName=[TargetShootRootRatio]
        AddFunction TotalRatio
          Constant One: FixedValue=1
          VariableReference TargetSR: VariableName=[TargetShootRootRatio]
      CultivarFolder Cultivars
        Cultivar Huia
          Memo Description
            This is an old and traditional cultivar and the *base* white clover cultivar in the model.  It is the oldest selected strain from New Zealand, released in 1957, developed from wild plants growing in Hawkes Bay and Canterbury regions ([CaradusEtAl1996]).  Huia is a *medium-leaf* cultivar developed for generic usage and has an average performance, it can produce good yields and is reasonably persistent under grazing.  However, it has a relatively low stolon density, has low growth rates over winter, and is susceptible to some pests.  The Huia cultivar has been mostly superseded by modern cultivars that have greater production potential, more resistance to pests, and that were developed for more specific uses (e.g. for dairying or for hill country conditions).
        Cultivar Kopu
          Command:
            [Phenology].ThermalTime.XYPairs.X = 2.5,25,37.5
            [Phenology].ThermalTime.XYPairs.X = 0,22.5,0
            [Leaf].Photosynthesis.FT.XYPairs.X = 0,2.5,7.5,15,18,27,35,37.5
            [Leaf].TargetBiomassProportion.VegetativeInductive.TargetProportion.FixedValue = 0.45
            [Leaf].HeightFunction.XYPairs.Y = 20,75,110,140,150
            [Petiole].TargetBiomassProportion.VegetativeInductive.TargetProportion.ProportionToLeaves.FixedValue = 0.667
            [Stolon].BiomassRemovalDefaults.Graze.FractionLiveToRemove = 0.2
            [Taproot].TargetBiomassProportion.AllPhases.TargetProportion.BaseProportion.FixedValue = 0.1
            [Root].MaximumRootDepth.FixedValue = 750
            [Root].SpecificRootLength.FixedValue = 100
            [TargetShootRootRatio].AllPhases.TargetSR.MeanSR.FixedValue = 3.0
          Memo Description
            This is a *large-leaf* cultivar developed in New Zealand from crossings between local varieties and north-american ladino genotypes.  It succeeded Pitau and Kopu cultivars, being more persistent than these due to greater stolon density; it has also greater resistance to nematodes and clover root weevil.  As a *large-leaf* cultivar, Kopu2 has leaves that are 25-50% larger than Huia, with corresponding longer petioles; it has a semi-prostrate growth habit, enabling higher harvest index than *medium-leaf* cultivars.  Kopu2 has been shown to produce high yields, especially in early season, being more winter active that the previous cultivars; it is intended for lowland pastures under rotational cattle grazing.
        Cultivar Tahora
          Command:
            [Phenology].ThermalTime.XYPairs.X = 0,21,32
            [Phenology].ThermalTime.XYPairs.X = 0,21,0
            [Leaf].Photosynthesis.FT.XYPairs.X = -1,0,5,12.5,15.5,24.5,32.5,35
            [Leaf].TargetBiomassProportion.VegetativeInductive.TargetProportion.FixedValue = 0.4
            [Leaf].HeightFunction.XYPairs.Y = 20,50,75,97.5,104
            [Petiole].TargetBiomassProportion.VegetativeInductive.TargetProportion.ProportionToLeaves.FixedValue = 0.85
            [Stolon].BiomassRemovalDefaults.Graze.FractionLiveToRemove = 0.05
            [Taproot].TargetBiomassProportion.AllPhases.TargetProportion.BaseProportion.FixedValue = 0.05
            [Root].MaximumRootDepth.FixedValue = 500
            [Root].SpecificRootLength.FixedValue = 100
          Memo Description
            This is a *small-leaf* cultivar developed in New Zealand for use in mixed grazed swards of hill country farms, it was released in 1987 ([WiddupAndBarrett2011]).  Tahora was bred from white clover ecotypes growing in moist hill country, so it can be sensitive to drought.  The version Tahora 2 is a bit more tollerant than the original and has been used over a wide range of conditions.  Tahora shows high persistence under grazing, it has a prostrate growth habit, with a dense stolons structure that provide many growing points for fast recovery after defoliation.  The stolons spread well and the plant develops a finely branched fibrous root system, enabling it to compete well with most grasses.  This cultivar has also short petioles, which results in a relatively low harvest index; the performance of Tahora in yield trials showed it can produce as much as Huia, but considerably less than modern cultivars.
        Cultivar Apex
          Command:
            [Phenology].ThermalTime.XYPairs.X = 2.5,25,37.5
            [Phenology].ThermalTime.XYPairs.X = 0,22.5,0
            [Leaf].Photosynthesis.FT.XYPairs.X = 0,2.5,7.5,15,18,27,35,37.5
            [Leaf].TargetBiomassProportion.VegetativeInductive.TargetProportion.FixedValue = 0.45
            [Leaf].HeightFunction.XYPairs.Y = 20,65,100,130,135
            [Petiole].TargetBiomassProportion.VegetativeInductive.TargetProportion.ProportionToLeaves.FixedValue = 0.7
            [Stolon].BiomassRemovalDefaults.Graze.FractionLiveToRemove = 0.05
            [Taproot].TargetBiomassProportion.AllPhases.TargetProportion.BaseProportion.FixedValue = 0.1
            [Root].MaximumRootDepth.FixedValue = 950
            [Root].SpecificRootLength.FixedValue = 100
          Memo Description
            This is a *medium-leaf*, cultivar bred in New Zealand and it also known as Crusader.  It was bred for improved persistence, being able to cope with drought and it is also resistant to several diseases and tolerant to clever root weevil.  The plants have a semi-prostrate growth habit, with high stolon density.  Leaf size is about the same as Huia's and thus plant height and harvest index are assumed to be similar.  Nonetheless, production levels are significantly greater all year round than those of Huia or Sustain, but especially over winter.  The cultivar is considered well suited for all grazing systems.
    Manager Defoliate
      Crop =
      cutPasture_StartDate = 2050-05-20
      cutPasture_EndDate = 2100-12-31
      defoliateType = Graze
      interval2Cut = 21
      durationOfCut = 1
      removeAmountType = DMToRemove
      herbageAmount = 500
      fracDM2Remove = 1
      fracN2Remove = 1
      urineDepth = 10
      fracN2Dung = 0.4
      fracPopDecline = 0.01
```csharp
// Defoliates on a regular cycle or one-off via a schedule
// currently defoliates by the amount specified spread evenly over the specified period

using System;
using Models.Core;
using System.Collections.Generic;
using System.Text;
using Models;
using Models.Soils;
using Models.PMF;
using System.Xml.Serialization;
using APSIM.Shared.Utilities;

namespace Models
{
    [Serializable]
    public class Script : Model
    {
        [Link] Zone zone;
        [Link] Clock Clock;
        [Link] Plant WhiteClover;
        [Link] Fertiliser fertiliser;
        [Link] ISummary summary = null;

        [Description("Choose the crop to harvest:")]
        public IPlant Crop { get; set; }

        [Description("Enter the date to start the rotation (dd/mm/yyyy):")]
        public DateTime cutPasture_StartDate { get; set; }

        [Description("Enter the date to end the rotation (dd/mm/yyyy):")]
        public DateTime cutPasture_EndDate { get; set; }

        [Description("Select type of defoliation:")]
        public defoliationTypes defoliateType { get; set; }

        [Description("Enter the interval between defoliations (days):")]
        public int interval2Cut { get; set; }

        [Description("Enter the number of days to defoliate over (days):")]
        public int durationOfCut { get; set; }

        [Description("Choose what amount is being defined:")]
        public removeAmountTypes removeAmountType { get; set; }

        [Description("Enter the amount to use (kgDM/ha):")]
        public double herbageAmount { get; set; }

        [Description("Enter the fraction of DM that is removed from the field (0-1):")]
        public double fracDM2Remove { get; set; }

        [Description("Enter the fraction of N that is removed from the field (0-1):")]
        public double fracN2Remove { get; set; }

        [Description("Enter the depth down to which urine will applied (mm):")]
        public double urineDepth { get; set; }

        [Description("Enter the proportion of N returned in dung (0-1):")]
        public double fracN2Dung { get; set; }

        [Description("Enter the fraction of population decline due to defoliation (0-1):")]
        public double fracPopDecline { get; set; }

        //fraction of each plant part returned as residue (0-1), wastage
        private double leafResidueFrac = 0.01;
        private double stolonResidueFrac = 0.01;
        private double petioleResidueFrac = 0.01;
        private double flowerResidueFrac = 0.01;
        private double minLeafAmount = 5.0;

        //maximum fraction of stolons to remove
        private double stolonMaxRemovalFrac = 0.10;

        //Outputs
        //Pasture DM defoliated today (kg/ha)
        [XmlIgnore] public double DefoliatedDM{ get; set; }
        //N defoliate today
        [XmlIgnore] public double DefoliatedN{ get; set; }
        //N concentration in today's defoliated material
        [XmlIgnore] public double DefoliatedNConc{ get; set; }
        //Pasture DM harvested today (kg/ha)
        [XmlIgnore] public double HarvestedDM{ get; set; }
        //N harvested today
        [XmlIgnore] public double HarvestedN{ get; set; }
        //N concentration in today's harvested material
        [XmlIgnore] public double HarvestedNConc{ get; set; }
        //DM removed from the paddock
        [XmlIgnore] public double RemovedDM{ get; set; }
        //N removed from the paddock
        [XmlIgnore] public double RemovedN{ get; set; }
        //N concentration in today's removed material
        [XmlIgnore] public double RemovedNConc{ get; set; }
        //DM returned to the paddock
        [XmlIgnore] public double ReturnedDM{ get; set; }
        //N returned to the paddock
        [XmlIgnore] public double ReturnedN{ get; set; }
        //N concentration in today's returned material
        [XmlIgnore] public double ReturnedNConc{ get; set; }
        //N returned as dung (SurfaceOM)
        [XmlIgnore] public double NReturnedInDung{ get; set; }
        //N returned as urine (urea)
        [XmlIgnore] public double NReturnedInUrine{ get; set; }
        //Number of days after last harvest
        [XmlIgnore] public int DaysAfterCut{ get; set; }
        //Total standing DM (Leaf + Stem/Sheath) before cut
        [XmlIgnore] public double PreHarvestDM{ get; set; }
        //Total standing DM (Leaf + Stem/Sheath) after cut
        [XmlIgnore] public double PostHarvestDM{ get; set; }

        //Pasture DM harvested this rotation (kg/ha)
        [XmlIgnore] public double RotationHarvestedDM{ get; set; }
        //Pasture DM to be harvested this rotation (kg/ha)
        [XmlIgnore] public double RotationHarvestingDM{ get; set; }

        //Internal variables
        private RemovalFractions removalFractions;
        //The fraction of urine to be applied in each layer
        private double[] FracLayer;
        // total herbage to remove in g/m2 per day
        private double herbageToRemove;
        // counter
        private int daysCutting = 0;
        // type of defoliation (Cut or Graze)
        private string defoliationType;
        // type of DM amount (ResidualDM or DMToRemove)
        private string amountType;
        // auxiliary
        private bool aCutHasHappened = false;
        private bool isStillCutting = false;
        private double cumAmountHarvested;

        // event to add residue / dung to surface OM
        public event BiomassRemovedDelegate BiomassRemoved;

        [EventSubscribe("Commencing")]
        private void OnSimulationCommencing(object sender, EventArgs e)
        {
            removalFractions = new RemovalFractions();
            DaysAfterCut = 0;
            resetVariables();
            if (defoliateType == defoliationTypes.Cut)
                defoliationType = "Cut";
            else
                defoliationType = "Graze";

            if (removeAmountType == removeAmountTypes.ResidualDM)
                amountType = "ResidualDM";
            else
                amountType = "DMToRemove";

            // make sure that rotation start when startDate<simulationStartDay
            if ((Clock.Today > cutPasture_StartDate) && (Clock.Today < cutPasture_EndDate))
                cutPasture_StartDate = Clock.Today;
        }

        [EventSubscribe("DoManagement")]
        private void OnDoManagement(object sender, EventArgs e)
        {
            if (Clock.Today == cutPasture_StartDate)
                DaysAfterCut = interval2Cut;

            if ((Clock.Today >= cutPasture_StartDate) && (Clock.Today <= cutPasture_EndDate))
            {
                // Check whether we should start cutting
                if ((WhiteClover.IsEmerged) && (DaysAfterCut > 0) && (DaysAfterCut == interval2Cut))
                {
                    Defoliate(defoliationType, herbageAmount * 0.1, amountType, durationOfCut);
                }
            }

            // Check whether we need to continue cutting
            //if ((daysCutting > 0) && (daysCutting <= durationOfCut))
            if (isStillCutting)
            {
                // reset outputs
                resetVariables();

                removeDM(herbageToRemove, defoliationType);
                returnExcreta();
                cumAmountHarvested += HarvestedDM;
                daysCutting += 1;
            }

            // reset outputs
            if (daysCutting < 0)
            {
                resetVariables();
                daysCutting = 0;
            }
        }

        [EventSubscribe("DoManagementCalculations")]
        private void OnDoManagementCalculations(object sender, EventArgs e)
        {
            if ((daysCutting > 0) && (daysCutting < durationOfCut))
                isStillCutting = true;

            if (daysCutting == durationOfCut)
            {
                PostHarvestDM = (double)zone.Get("WhiteClover.AboveGround.Wt");
                RotationHarvestedDM = cumAmountHarvested;
                aCutHasHappened = true;
                isStillCutting = false;
                daysCutting = -1;
                WhiteClover.Population = WhiteClover.Population * (1.0 - fracPopDecline);
            }

            if (aCutHasHappened && (daysCutting == 0))
                DaysAfterCut += 1;
        }

        public enum removeAmountTypes
        {
            /// <summary>Setting DM amount to remove</summary>
            DMToRemove,
            /// <summary>Setting residual DM amount</summary>
            ResidualDM
        }

        public enum defoliationTypes
        {
            /// <summary>Cut</summary>
            Cut,
            /// <summary>Graze</summary>
            Graze
        }

        // resets the values of all outputs
        private void resetVariables()
        {
            DefoliatedDM = 0.0;
            DefoliatedN = 0.0;
            DefoliatedNConc = 0.0;
            HarvestedDM = 0.0;
            HarvestedN = 0.0;
            HarvestedNConc = 0.0;
            RemovedDM = 0.0;
            RemovedN = 0.0;
            RemovedNConc = 0.0;
            ReturnedDM = 0.0;
            ReturnedN = 0.0;
            ReturnedNConc = 0.0;
            NReturnedInDung = 0.0;
            NReturnedInUrine = 0.0;
            RotationHarvestedDM = 0.0;
            RotationHarvestingDM = 0.0;
        }

        // Perform the basic calculations for defoliation
        public void Defoliate(string defoliationType, double amountDM, string amountType, int duration)
        {
            // get the existing plant amount
            PreHarvestDM = (double)zone.Get("WhiteClover.AboveGround.Wt");

            // check duration
            if (duration <= 0)
                throw new Exception("Duration of graze/cut rotation is zero or negative");
            
            // check amount to remove
            if ((amountType == "DMToRemove") && (PreHarvestDM > 0.0))
            {
                summary.WriteMessage(this, "   Defoliating " + (10.0 * amountDM).ToString("#0.0") + "kg/ha over " + duration + " days");
                herbageToRemove = amountDM / duration;
            }
            else if ((amountType == "ResidualDM") && (PreHarvestDM > amountDM))
            {
                summary.WriteMessage(this, "   Defoliating down to approximately " + (10.0 * amountDM).ToString("#0.0") + "kg/ha over " + duration + " days");
                herbageToRemove = (PreHarvestDM - amountDM) / duration;
            }
            else
            {
                herbageToRemove = 0.0;
                summary.WriteMessage(this, "   Defoliation will not happend because there is not enough plant material");
                return;
            }

            RotationHarvestingDM = herbageToRemove * duration;
            durationOfCut = duration;
            // first defoliation
            removeDM(herbageToRemove, defoliationType);
            returnExcreta();
            cumAmountHarvested = HarvestedDM;
            daysCutting = 1;
            DaysAfterCut = 0;
        }

        private void removeDM(double removeAmount, string removeType)
        {
            // get the existing biomass
            double leafLiveWt = (double)zone.Get("WhiteClover.Leaf.Live.Wt");
            double stolonLiveWt = (double)zone.Get("WhiteClover.Stolon.Live.Wt");
            double petioleLiveWt = (double)zone.Get("WhiteClover.Petiole.Live.Wt");
            double flowerLiveWt = (double)zone.Get("WhiteClover.Inflorescence.Live.Wt");
            double leafDeadWt = (double)zone.Get("WhiteClover.Leaf.Dead.Wt");
            double stolonDeadWt = (double)zone.Get("WhiteClover.Stolon.Dead.Wt");
            double petioleDeadWt = (double)zone.Get("WhiteClover.Petiole.Dead.Wt");
            double flowerDeadWt = (double)zone.Get("WhiteClover.Inflorescence.Dead.Wt");
            double leafLiveN = (double)zone.Get("WhiteClover.Leaf.Live.N");
            double stolonLiveN = (double)zone.Get("WhiteClover.Stolon.Live.N");
            double petioleLiveN = (double)zone.Get("WhiteClover.Petiole.Live.N");
            double flowerLiveN = (double)zone.Get("WhiteClover.Inflorescence.Live.N");
            double leafDeadN = (double)zone.Get("WhiteClover.Leaf.Dead.N");
            double stolonDeadN = (double)zone.Get("WhiteClover.Stolon.Dead.N");
            double petioleDeadN = (double)zone.Get("WhiteClover.Petiole.Dead.N");
            double flowerDeadN = (double)zone.Get("WhiteClover.Inflorescence.Dead.N");

            double existingWt = leafLiveWt + leafDeadWt + (stolonLiveWt + stolonDeadWt)*stolonMaxRemovalFrac + petioleLiveWt + petioleDeadWt + flowerLiveWt + flowerDeadWt;
            double existingN = leafLiveN + leafDeadN + (stolonLiveN + stolonDeadN)*stolonMaxRemovalFrac + petioleLiveN + petioleDeadN + flowerLiveN + flowerDeadN;

            // Can we harvest anything?
            double removingWt = Math.Min(existingWt, removeAmount);
            if (removingWt > 0.0)
            {
                // get the fractions to remove for each organ (will override the default values)
                // the default is [WhiteClover].Leaf.BiomassRemovalDefaults.Cut.FractionRemoved, or equivalent
                // >> double leafFracToRemove = removeAmount * (leafLiveWt + leafDeadWt) / existingWt / existingWt;
                double fracToRemove = removingWt / existingWt;
                double stolonFracToRemove = ((stolonLiveWt + stolonDeadWt) > 0.0) ? fracToRemove : 0.0;
                if(stolonFracToRemove>stolonMaxRemovalFrac)
                {
                    stolonFracToRemove = stolonMaxRemovalFrac;
                    fracToRemove += 2.0*(stolonFracToRemove-stolonMaxRemovalFrac)/6.0;
                }

                double leafFracToRemove = 0.0;
                if ((leafLiveWt + leafDeadWt) > 0.0)
                {
                    if (leafLiveWt < minLeafAmount)
                    {
                        // leafWt cannot go below a minimum
                        leafFracToRemove = (removingWt + leafLiveWt - minLeafAmount) / existingWt;
                        fracToRemove += Math.Max(0.0,fracToRemove-leafFracToRemove)/4.0;
                    }
                    else
                        leafFracToRemove = fracToRemove;
                }

                double petioleFracToRemove = ((petioleLiveWt + petioleDeadWt) > 0.0) ? fracToRemove : 0.0;
                double flowerFracToRemove = ((flowerLiveWt + flowerDeadWt) > 0.0) ? fracToRemove : 0.0;

                // get the fractions to residue (i.e. wastage - will override the default values)
                // the default is [WhiteClover].Leaf.BiomassRemovalDefaults.Cut.FractionToResidue, or equivalent
                double leafFracToResidue = leafResidueFrac * leafFracToRemove;
                double stolonFracToResidue = stolonResidueFrac * stolonFracToRemove;
                double petioleFracToResidue = petioleResidueFrac * petioleFracToRemove;
                double flowerFracToResidue = flowerResidueFrac * flowerFracToRemove;

                // correct the values to defoliate (so our removing = remove + residue)
                leafFracToRemove -= leafFracToResidue;
                stolonFracToRemove -= stolonFracToResidue;
                petioleFracToRemove -= petioleFracToResidue;
                flowerFracToRemove -= flowerFracToResidue;

                // set removal fractions (these overrides the default removals in the plant)
                removalFractions.SetFractionToRemove("Leaf", leafFracToRemove, "Live");
                removalFractions.SetFractionToResidue("Leaf", leafFracToResidue, "Live");
                removalFractions.SetFractionToRemove("Leaf", leafFracToRemove, "Dead");
                removalFractions.SetFractionToResidue("Leaf", leafFracToResidue, "Dead");
                removalFractions.SetFractionToRemove("Stolon", stolonFracToRemove, "Live");
                removalFractions.SetFractionToResidue("Stolon", stolonFracToResidue, "Live");
                removalFractions.SetFractionToRemove("Stolon", stolonFracToRemove, "Dead");
                removalFractions.SetFractionToResidue("Stolon", stolonFracToResidue, "Dead");
                removalFractions.SetFractionToRemove("Petiole", petioleFracToRemove, "Live");
                removalFractions.SetFractionToResidue("Petiole", petioleFracToResidue, "Live");
                removalFractions.SetFractionToRemove("Petiole", petioleFracToRemove, "Dead");
                removalFractions.SetFractionToResidue("Petiole", petioleFracToResidue, "Dead");
                removalFractions.SetFractionToRemove("Inflorescence", flowerFracToRemove, "Live");
                removalFractions.SetFractionToResidue("Inflorescence", flowerFracToResidue, "Live");
                removalFractions.SetFractionToRemove("Inflorescence", flowerFracToRemove, "Dead");
                removalFractions.SetFractionToResidue("Inflorescence", flowerFracToResidue, "Dead");

                removalFractions.SetFractionToRemove("Root", 0.0);
                removalFractions.SetFractionToResidue("Root", 0.0);
                removalFractions.SetFractionToRemove("Taproot", 0.0);
                removalFractions.SetFractionToResidue("Taproot", 0.0);
                removalFractions.SetFractionToRemove("Nodule", 0.0);
                removalFractions.SetFractionToResidue("Nodule", 0.0);

                // Actually do the biomass removal
                WhiteClover.RemoveBiomass(removeType, removalFractions);

                // get the new existing plant amount
                double postHarvestWt = (double)zone.Get("WhiteClover.AboveGround.Wt");
                double postHarvestN = (double)zone.Get("WhiteClover.AboveGround.N");

                // get total defoliation (total plant stuff lost)
                DefoliatedDM = existingWt - postHarvestWt;
                DefoliatedN = existingN - postHarvestN;
                if (DefoliatedDM > 0.0)
                    DefoliatedNConc = DefoliatedN/DefoliatedDM;

                // get total harvested (plant stuff removed from plants)
                HarvestedDM = (double)zone.Get("WhiteClover.Leaf.Removed.Wt")
                + (double)zone.Get("WhiteClover.Stolon.Removed.Wt")
                + (double)zone.Get("WhiteClover.Petiole.Removed.Wt")
                + (double)zone.Get("WhiteClover.Inflorescence.Removed.Wt");
                HarvestedN = (double)zone.Get("WhiteClover.Leaf.Removed.N")
                + (double)zone.Get("WhiteClover.Stolon.Removed.N")
                + (double)zone.Get("WhiteClover.Petiole.Removed.N")
                + (double)zone.Get("WhiteClover.Inflorescence.Removed.N");
                if (HarvestedDM > 0.0)
                    HarvestedNConc = HarvestedN/HarvestedDM;

                // get amounts actually removed from field and that to be returned (residue or dung/urine)
                RemovedDM = HarvestedDM * fracDM2Remove;
                RemovedN = HarvestedN * fracN2Remove;
                if (RemovedDM > 0.0)
                    RemovedNConc = RemovedN/RemovedDM;
                ReturnedDM = HarvestedDM - RemovedDM;
                ReturnedN = HarvestedN - RemovedN;
                if (ReturnedDM > 0.0)
                    ReturnedNConc = ReturnedN/ReturnedDM;
                NReturnedInDung = ReturnedN * fracN2Dung;
                NReturnedInUrine = ReturnedN - NReturnedInDung;
            }
            else
            {
            }
        }

        // Return dung and urine
        private void returnExcreta()
        {
            if ((ReturnedDM > 0.0) || (NReturnedInDung > 0.0))
            {
                PMF.BiomassRemovedType BiomassDung = new PMF.BiomassRemovedType();
                string[] type = new string[] { "RuminantDung_PastureFed" };
                float[] dltdm = new float[] { (Single)ReturnedDM };
                float[] dltn = new float[] { (Single)NReturnedInDung };
                float[] dltp = new float[] { 0 };
                float[] fraction = new float[] { 1 };     // fraction is always 1.0 here

                BiomassDung.crop_type = "RuminantDung_PastureFed";
                BiomassDung.dm_type = type;
                BiomassDung.dlt_crop_dm = dltdm;
                BiomassDung.dlt_dm_n = dltn;
                BiomassDung.dlt_dm_p = dltp;
                BiomassDung.fraction_to_residue = fraction;
                BiomassRemoved.Invoke(BiomassDung);
            }

            if (NReturnedInUrine > 0.0)
            {
                fertiliser.Apply(NReturnedInUrine * 10, Fertiliser.Types.UreaN, urineDepth);
            }
        }
    }
}
```
    Manager ExtraVariables
```csharp
using Models.Interfaces;
using System;
using Models.Core;
using System.Collections.Generic;
using System.Text;
using Models.Soils;
using Models.PMF;
using Models;
using System.Xml.Serialization;
using APSIM.Shared.Utilities;
using Models.Interfaces;

namespace Models
{
    [Serializable] 
    public class Script : Model
    {
        [Link] private Clock Clock;
        [Link] private Weather Met;
        [Link] private Fertiliser Fert;
        [Link] private Irrigation Irrig;
        [Link] private Plant WhiteClover;
        [Link] private Zone zone;
        [Link] private ISummary summary;
        private DateTime YearStartDate;
        private double yesterdayNconc;
        [ScopedLinkByName]
        private ISolute Urea;
        [ScopedLinkByName]
        private ISolute NO3;
        [ScopedLinkByName]
        private ISolute NH4;
        [ScopedLinkByName]
        private SoilNitrogen SoilNitrogen;
        [Link] Soils.Soil Soil;
        [Link] Models.Surface.SurfaceOrganicMatter SOM;
                    
        [XmlIgnore] public bool InitialDay { get; set; }
        
        [XmlIgnore] public double AccumPlantN { get; set; }
        [XmlIgnore] public double AccumMineralisation { get; set; }
        [XmlIgnore] public double AccumDenit { get; set; }
        [XmlIgnore] public double AccumFert { get; set; }
        [XmlIgnore] public double AccumLeach { get; set; }
        [XmlIgnore] public double AccumDetach { get; set; }
        [XmlIgnore] public double DeltaSoilOMN { get; set; }
        [XmlIgnore] public double DeltaSurfaceOMN { get; set; }
        [XmlIgnore] public double DeltaSoilMineralN { get; set; }
        [XmlIgnore] public double SoilNitrogenContent { get; set; }
        
        [XmlIgnore] public double AccumEO { get; set; }
        [XmlIgnore] public double AccumEP { get; set; }
        [XmlIgnore] public double AccumES { get; set; }
        [XmlIgnore] public double AccumDrainage { get; set; }
        [XmlIgnore] public double AccumRunoff { get; set; }
        [XmlIgnore] public double AccumOutflowLat { get; set; }
        [XmlIgnore] public double AccumIrrigation { get; set; }
        [XmlIgnore] public double AccumRainfall { get; set; }
        [XmlIgnore] public double SoilWaterDeficit { get; set; }
    
        [XmlIgnore] public double  InitialSoilOMN { get; set; }
        [XmlIgnore] public double  InitialSurfaceOMN { get; set; }
        [XmlIgnore] public double  InitialMineralN { get; set; }
        
        [XmlIgnore] public double SWC { get; set; }
        [XmlIgnore] public double DUL { get; set; }
        [XmlIgnore] public double OutFlowLat { get; set; }

        [XmlIgnore] public double FomN { get; set; }
        [XmlIgnore] public double BiomN { get; set; }
        [XmlIgnore] public double HumN { get; set; }
        [XmlIgnore] public double OrganicN { get; set; }
        [XmlIgnore] public double NO3N { get; set; }
        [XmlIgnore] public double NH4N { get; set; }
        [XmlIgnore] public double UreaN { get; set; }
        [XmlIgnore] public double MineralN { get; set; }
        [XmlIgnore] public double DltNMinRes { get; set; }
        [XmlIgnore] public double DltNMinTot { get; set; }
        
        [XmlIgnore] public double LeafFraction { get; set; }
        [XmlIgnore] public double StolonFraction { get; set; }
        [XmlIgnore] public double PetioleFraction { get; set; }
        [XmlIgnore] public double InflorescenceFraction { get; set; }

        [XmlIgnore] public double ShootRootRatio { get; set; }

        [XmlIgnore] public double AccumHarvestedWt { get; set; }
        [XmlIgnore] public double AccumHarvestedN { get; set; }
        [XmlIgnore] public double HerbageNConc { get; set; }


        [EventSubscribe("Commencing")]
        private void OnSimulationCommencing(object sender, EventArgs e)
        {
            InitialDay = true;
        }
        
        [EventSubscribe("StartOfDay")]
        private void OnStartOfDay(object sender, EventArgs e)
        {
            yesterdayNconc =  MathUtilities.Divide((double)zone.Get("WhiteClover.Leaf.N")+(double)zone.Get("WhiteClover.Petiole.N"), (double)zone.Get("WhiteClover.Leaf.Wt")+(double)zone.Get("WhiteClover.Petiole.Wt"), 0.0);
        }

        [EventSubscribe("DoManagement")]
        private void OnDoManagement(object sender, EventArgs e)
        {
            //!!!!!! Nitrogen balance components !!!!!!
            //!!!!!!^^^^^^^^^^^^^^^^^^^^^^^^^^^^^!!!!!!
            FomN = MathUtilities.Sum(SoilNitrogen.FOMN);
            HumN = MathUtilities.Sum(SoilNitrogen.HumicN);
            BiomN = MathUtilities.Sum(SoilNitrogen.MicrobialN);
            OrganicN = FomN + HumN + BiomN;
            NO3N = MathUtilities.Sum(NO3.kgha);
            NH4N = MathUtilities.Sum(NH4.kgha);
            UreaN = MathUtilities.Sum(Urea.kgha);
            MineralN = NO3N + NH4N + UreaN; 
            DltNMinRes = MathUtilities.Sum(SoilNitrogen.dlt_n_min_res);
            DltNMinTot = MathUtilities.Sum(SoilNitrogen.MineralisedN);
            int layers = Soil.Thickness.Length;
            if (InitialDay == true)
            {
                InitialSurfaceOMN = SOM.N;
                InitialSoilOMN = OrganicN;
                InitialMineralN = MineralN;
                InitialDay = false;

                // check whether we're in the north or south hemisphere
                if (Met.Latitude >= 0.0)
                    YearStartDate = DateTime.Parse("01/01/2000");
                else
                    YearStartDate = DateTime.Parse("01/07/2000");
            }
            DeltaSurfaceOMN = SOM.N - InitialSurfaceOMN;
            AccumLeach = AccumLeach - Soil.SoilWater.LeachNH4 - Soil.SoilWater.LeachNO3 - Soil.SoilWater.LeachUrea; //Fails
            AccumMineralisation += MathUtilities.Sum(SoilNitrogen.MineralisedN);
            AccumDenit -= MathUtilities.Sum(SoilNitrogen.Denitrification);
            AccumPlantN -= (double)zone.Get("WhiteClover.Root.NUptake");
            DeltaSoilOMN = OrganicN - InitialSoilOMN;
            DeltaSoilMineralN = MineralN - InitialMineralN;
            SoilNitrogenContent = MineralN;

            //!!!!!! Water balance components !!!!!!
            //!!!!!!^^^^^^^^^^^^^^^^^^^^^^^^^^!!!!!!

            AccumRainfall += Met.Rain;
            //AccumEP -= (double)zone.Get("[WhiteClover].Leaf.Transpiration");
            AccumEP -= (double)zone.Get("WhiteClover.Root.WaterUptake");
            SoilWaterDeficit = (SWC - DUL);
            double OutFlowLat = MathUtilities.Sum(Soil.SoilWater.LateralOutflow);
            AccumOutflowLat -= OutFlowLat;
            
            //!!!!!! Stem and leaf fraction !!!!!!
            if ((double)zone.Get("WhiteClover.AboveGround.Wt") > 0.0)
            {
                LeafFraction = (double)zone.Get("WhiteClover.Leaf.Wt") / (double)zone.Get("WhiteClover.AboveGround.Wt");
                StolonFraction = (double)zone.Get("WhiteClover.Stolon.Wt") / (double)zone.Get("WhiteClover.AboveGround.Wt");
                PetioleFraction = (double)zone.Get("WhiteClover.Petiole.Wt") / (double)zone.Get("WhiteClover.AboveGround.Wt");
                InflorescenceFraction = (double)zone.Get("WhiteClover.Inflorescence.Wt") / (double)zone.Get("WhiteClover.AboveGround.Wt");
            }
            else
            {
                LeafFraction = 0.0;
                StolonFraction = 0.0;
                PetioleFraction = 0.0;
            }
            
            //!!!!!! Plant DM components !!!!!!
            //!!!!!!^^^^^^^^^^^^^^^^^^^^^^^^^^!!!!!!
            ShootRootRatio = MathUtilities.Divide((double)zone.Get("WhiteClover.AboveGroundLive.Wt"), (double)zone.Get("WhiteClover.BelowGroundLive.Wt"), 0.0);
            HerbageNConc = yesterdayNconc;
        }
        
        [EventSubscribe("DoManagementCalculations")]
        private void OnDoManagementCalculations(object sender, EventArgs e)
        {
            FomN = MathUtilities.Sum(SoilNitrogen.FOMN);
            HumN = MathUtilities.Sum(SoilNitrogen.HumicN);
            BiomN = MathUtilities.Sum(SoilNitrogen.MicrobialN);
            AccumFert += Fert.NitrogenApplied;
            AccumIrrigation += Irrig.IrrigationApplied;
            
            
            AccumEO -= Soil.SoilWater.Eo;
            AccumES -= Soil.SoilWater.Es; 
            AccumDrainage -= Soil.SoilWater.Drainage;
            AccumRunoff -= Soil.SoilWater.Runoff;
            SWC = MathUtilities.Sum(Soil.SoilWater.SWmm);
            DUL = MathUtilities.Sum(Soil.DULmm);

            //!!!!!! Plant Harvest !!!!!!
            if (Clock.Today.DayOfYear == YearStartDate.DayOfYear)
            {
                AccumHarvestedWt = (double)zone.Get("[Defoliate].Script.DefoliatedDM");
                AccumHarvestedN = (double)zone.Get("[Defoliate].Script.DefoliatedN");
            }
            else
            {
                AccumHarvestedWt += (double)zone.Get("[Defoliate].Script.DefoliatedDM");
                AccumHarvestedN += (double)zone.Get("[Defoliate].Script.DefoliatedN");
            }
        }
    }
}
```
    Report: EventNames=[Clock].DoReport
      VariableNames:
        [Clock].Today as Date
        [Clock].Today.DayOfYear as DayOfYear
        [Weather].Radn as SolarRadiation
        [MicroClimate].NetRadiation
        [WhiteClover].Leaf.RadIntTot as InterceptedRadiation
        [Weather].MeanT
        [Weather].Rain as Rainfall
        [Irrigation].IrrigationApplied as IrrigationApplied
        [MicroClimate].PrecipitationInterception as PrecipitationInterception
        [MicroClimate].PetTotal
        [Soil].SoilWater.Eo as Eo
        [Soil].SoilWater.Es as Evaporation
        [WhiteClover].Leaf.Transpiration as Transpiration
        [Soil].SoilWater.pond as PondedWater
        [Soil].SoilWater.Drainage as Drainage
        [Soil].SoilWater.Runoff as Runoff
        sum([Soil].SoilWater.LateralOutflow) as LateralFlow
        sum([Soil].SoilWater.SWmm) as TotalSWC
        sum([Soil].SATmm) as TotalSAT
        sum([Soil].DULmm) as TotalDUL
        sum([Soil].LL15mm) as TotalLL15
        [Soil].SoilWater.SW[1] as SWCTopLayer
        [Soil].DUL[1] as DULTopLayer
        [Fertiliser].NitrogenApplied as FertiliserN
        sum([Soil].SoilNitrogen.Denitrification) as DenitrifiedN
        ([Soil].SoilWater.LeachNH4 + [Soil].SoilWater.LeachNO3) as LeachedN
        (-1*[WhiteClover].Root.NUptake) as UptakeN
        sum([Soil].SoilNitrogen.MineralisedN) as MineralisedSoilN
        sum([Soil].SoilNitrogen.dlt_n_min_res) as MineralisedSurfOMN
        ([WhiteClover].Leaf.Detached.N+[WhiteClover].Petiole.Detached.N+[WhiteClover].Stolon.Detached.N+[WhiteClover].Inflorescence.Detached.N) as DetachedAGN
        ([WhiteClover].Nodule.Detached.N+[WhiteClover].Taproot.Detached.N+[WhiteClover].Root.Detached.N) as DetachedBGN
        (10*([WhiteClover].Leaf.Detached.N+[WhiteClover].Petiole.Detached.N+[WhiteClover].Stolon.Detached.N+[WhiteClover].Inflorescence.Detached.N+[WhiteClover].Nodule.Detached.N+[WhiteClover].Taproot.Detached.N+[WhiteClover].Root.Detached.N)) as DetachedTotalN
        (10*[WhiteClover].Nodule.NFixed) as WhiteClover.Nodule.NFixed
        (sum([Soil].SoilNitrogen.Urea.kgha) + sum([Soil].SoilNitrogen.NH4.kgha) + sum([Soil].SoilNitrogen.NO3.kgha)) as SoilNContent
        sum([Soil].SoilNitrogen.Urea.kgha) as SoilUrea
        sum([Soil].SoilNitrogen.NH4.kgha) as SoilNH4
        sum([Soil].SoilNitrogen.NO3.kgha) as SoilNO3
        (sum([Soil].SoilNitrogen.NH4.kgha[1:4])+sum([Soil].SoilNitrogen.NO3.kgha[1:4])) as TopSoilN
        [SurfaceOrganicMatter].N as TotalSurfOMN
        sum([Soil].SoilNitrogen.FOMN) as TotalFOMN
        sum([Soil].SoilNitrogen.HumicN) as TotalHumicN
        sum([Soil].SoilNitrogen.MicrobialN as TotalMicrobialN
        ([WhiteClover].Total.N) as TotalPlantN
        [Defoliate].Script.RotationHarvestedDM as RotationHarvestedWt
        [Defoliate].Script.PreHarvestDM
        [Defoliate].Script.PostHarvestDM
        [Defoliate].Script.DefoliatedDM
        [Defoliate].Script.HarvestedDM
        [Defoliate].Script.RemovedDM
        [Defoliate].Script.DefoliatedN as NTakenOff
        [Defoliate].Script.HarvestedN
        (10*[Defoliate].Script.RemovedN) as Defoliate.Script.RemovedN
        [Defoliate].Script.NReturnedInDung
        [Defoliate].Script.NReturnedInUrine
        [Defoliate].Script.DefoliatedDM as HarvestedWt
        [Defoliate].Script.DaysAfterCut
        [Defoliate].Script.DefoliatedNConc
        [Defoliate].Script.RemovedNConc
        [ExtraVariables].Script.AccumHarvestedWt as CumulativeHarvestedWt
        [ExtraVariables].Script.AccumHarvestedN as CumulativeNTakenOff
        [WhiteClover].Phenology.ThermalTime
        [WhiteClover].Phenology.Photoperiod
        [WhiteClover].Phenology.PhotoperiodVariation
        [WhiteClover].Phenology.Vernalisation.TodaysVernalisation
        [WhiteClover].Phenology.Vernalisation.DaysVernalised
        [WhiteClover].Phenology.CurrentPhaseName
        [WhiteClover].Phenology.Stage
        [WhiteClover].Population
        [WhiteClover].Root.LengthDensity
        [WhiteClover].Leaf.ExtinctionCoefficientFunction
        [WhiteClover].Arbitrator.DM.TotalFixationSupply
        [WhiteClover].Arbitrator.DM.TotalPlantDemand
        [WhiteClover].Arbitrator.DM.Allocated
        [WhiteClover].Arbitrator.DM.SinkLimitation
        [WhiteClover].Arbitrator.DM.NutrientLimitation
        [WhiteClover].Arbitrator.FDM
        [WhiteClover].Leaf.DMSupply.Total
        [WhiteClover].Petiole.DMSupply.Total
        [WhiteClover].Stolon.DMSupply.Total
        [WhiteClover].Inflorescence.DMSupply.Total
        [WhiteClover].Nodule.DMSupply.Total
        [WhiteClover].Taproot.DMSupply.Total
        [WhiteClover].Root.DMSupply.Total
        [WhiteClover].Leaf.DMDemand.Total
        [WhiteClover].Petiole.DMDemand.Total
        [WhiteClover].Stolon.DMDemand.Total
        [WhiteClover].Inflorescence.DMDemand.Total
        [WhiteClover].Nodule.DMDemand.Total
        [WhiteClover].Taproot.DMDemand.Total
        [WhiteClover].Root.DMDemand.Total
        ([WhiteClover].Leaf.DMSupply.Total+[WhiteClover].Petiole.DMSupply.Total+[WhiteClover].Stolon.DMSupply.Total+[WhiteClover].Inflorescence.DMSupply.Total+[WhiteClover].Nodule.DMSupply.Total+[WhiteClover].Taproot.DMSupply.Total+[WhiteClover].Root.DMSupply.Total) as WhiteClover.Total.Supply.Wt
        ([WhiteClover].Leaf.DMDemand.Total+[WhiteClover].Petiole.DMDemand.Total+[WhiteClover].Stolon.DMDemand.Total+[WhiteClover].Inflorescence.DMDemand.Total+[WhiteClover].Nodule.DMDemand.Total+[WhiteClover].Taproot.DMDemand.Total+[WhiteClover].Root.DMDemand.Total) as WhiteClover.Total.Demand.Wt
        [WhiteClover].Arbitrator.N.TotalPlantSupply
        [WhiteClover].Arbitrator.N.TotalPlantDemand
        [WhiteClover].Arbitrator.N.Allocated
        [WhiteClover].Arbitrator.N.SinkLimitation
        [WhiteClover].Arbitrator.N.NutrientLimitation
        [WhiteClover].Arbitrator.FN
        [WhiteClover].Arbitrator.N.TotalFixationSupply
        [WhiteClover].Arbitrator.N.TotalReallocationSupply
        [WhiteClover].Arbitrator.N.TotalRetranslocationSupply
        [WhiteClover].Arbitrator.N.TotalUptakeSupply
        [WhiteClover].Arbitrator.N.TotalReallocation
        [WhiteClover].Arbitrator.N.TotalRetranslocation
        [WhiteClover].Arbitrator.WSupply
        [WhiteClover].Arbitrator.WDemand
        [WhiteClover].Arbitrator.WAllocated
        [WhiteClover].Arbitrator.FW
        [WhiteClover].Root.NSupplyUptake
        [WhiteClover].Root.NSupply.Uptake
        [WhiteClover].Root.NUptake
        [WhiteClover].Root.NTakenUp
        [WhiteClover].Leaf.NSupply.Total
        [WhiteClover].Petiole.NSupply.Total
        [WhiteClover].Stolon.NSupply.Total
        [WhiteClover].Inflorescence.NSupply.Total
        [WhiteClover].Nodule.NSupply.Total
        [WhiteClover].Taproot.NSupply.Total
        [WhiteClover].Root.NSupply.Total
        [WhiteClover].Leaf.NDemand.Total
        [WhiteClover].Petiole.NDemand.Total
        [WhiteClover].Stolon.NDemand.Total
        [WhiteClover].Inflorescence.NDemand.Total
        [WhiteClover].Nodule.NDemand.Total
        [WhiteClover].Taproot.NDemand.Total
        [WhiteClover].Root.NDemand.Total
        ([WhiteClover].Leaf.NSupply.Total+[WhiteClover].Petiole.NSupply.Total+[WhiteClover].Stolon.NSupply.Total+[WhiteClover].Inflorescence.NSupply.Total+[WhiteClover].Nodule.NSupply.Total+[WhiteClover].Taproot.NSupply.Total+[WhiteClover].Root.NSupply.Total) as WhiteClover.Total.Supply.N
        ([WhiteClover].Leaf.NDemand.Total+[WhiteClover].Petiole.NDemand.Total+[WhiteClover].Stolon.NDemand.Total+[WhiteClover].Inflorescence.NDemand.Total+[WhiteClover].Nodule.NDemand.Total+[WhiteClover].Taproot.NDemand.Total+[WhiteClover].Root.NDemand.Total) as WhiteClover.Total.Demand.N
        [WhiteClover].ShootRootRatio
        [WhiteClover].TargetShootRootRatio
        [WhiteClover].TargetAboveGroundFraction
        ([WhiteClover].AboveGroundLive.Wt/([WhiteClover].TotalLive.Wt+0.000001)) as WhiteClover.AboveGroundFraction
        ([WhiteClover].Leaf.Live.Wt / ([WhiteClover].AboveGroundLive.Wt + 0.000001)) as WhiteClover.Leaf.BiomassProportion
        ([WhiteClover].Stolon.Live.Wt / ([WhiteClover].AboveGroundLive.Wt + 0.000001)) as WhiteClover.Stolon.BiomassProportion
        ([WhiteClover].Petiole.Live.Wt / ([WhiteClover].AboveGroundLive.Wt + 0.000001)) as WhiteClover.Petiole.BiomassProportion
        ([WhiteClover].Inflorescence.Live.Wt / ([WhiteClover].AboveGroundLive.Wt + 0.000001)) as WhiteClover.Inflorescence.BiomassProportion
        ([WhiteClover].Nodule.Live.Wt / ([WhiteClover].BelowGround.Wt + 0.000001)) as WhiteClover.Nodule.BiomassProportion
        ([WhiteClover].Taproot.Live.Wt / ([WhiteClover].BelowGround.Wt + 0.000001)) as WhiteClover.Taproot.BiomassProportion
        ([WhiteClover].Root.Live.Wt / ([WhiteClover].BelowGround.Wt + 0.000001)) as WhiteClover.Root.BiomassProportion
        [WhiteClover].Leaf.TargetBiomassProportion
        [WhiteClover].Petiole.TargetBiomassProportion
        [WhiteClover].Stolon.TargetBiomassProportion
        [WhiteClover].Inflorescence.TargetBiomassProportion
        [WhiteClover].Nodule.TargetBiomassProportion
        [WhiteClover].Taproot.TargetBiomassProportion
        [WhiteClover].Root.TargetBiomassProportion
        [WhiteClover].Leaf.DMDemands.Structural.DMDemandFunction as WhiteClover.Leaf.AdjustedOrganProportion
        [WhiteClover].Petiole.DMDemands.Structural.DMDemandFunction as WhiteClover.Petiole.AdjustedOrganProportion
        [WhiteClover].Stolon.DMDemands.Structural.DMDemandFunction as WhiteClover.Stolon.AdjustedOrganProportion
        [WhiteClover].Inflorescence.DMDemands.Structural.DMDemandFunction as WhiteClover.Inflorescence.AdjustedOrganProportion
        [WhiteClover].Nodule.DMDemands.Structural.DMDemandFunction as WhiteClover.Nodule.AdjustedOrganProportion
        [WhiteClover].Taproot.DMDemands.Structural.DMDemandFunction as WhiteClover.Taproot.AdjustedOrganProportion
        [WhiteClover].Root.DMDemands.Structural.DMDemandFunction as WhiteClover.Root.AdjustedOrganProportion
        [WhiteClover].Leaf.DMDemands.Structural.DMDemandFunction.BaseBiomassDemand
        [WhiteClover].Leaf.DMDemands.Structural.DMDemandFunction.DeficitBiomassDemand
        [WhiteClover].Petiole.DMDemands.Structural.DMDemandFunction.BaseBiomassDemand
        [WhiteClover].Petiole.DMDemands.Structural.DMDemandFunction.DeficitBiomassDemand
        [WhiteClover].Stolon.DMDemands.Structural.DMDemandFunction.BaseBiomassDemand
        [WhiteClover].Stolon.DMDemands.Structural.DMDemandFunction.DeficitBiomassDemand
        [WhiteClover].Inflorescence.DMDemands.Structural.DMDemandFunction.BaseBiomassDemand
        [WhiteClover].Inflorescence.DMDemands.Structural.DMDemandFunction.DeficitBiomassDemand
        [WhiteClover].Nodule.DMDemands.Structural.DMDemandFunction.BaseBiomassDemand
        [WhiteClover].Nodule.DMDemands.Structural.DMDemandFunction.DeficitBiomassDemand
        [WhiteClover].Taproot.DMDemands.Structural.DMDemandFunction.BaseBiomassDemand
        [WhiteClover].Taproot.DMDemands.Structural.DMDemandFunction.DeficitBiomassDemand
        [WhiteClover].Root.DMDemands.Structural.DMDemandFunction.BaseBiomassDemand
        [WhiteClover].Root.DMDemands.Structural.DMDemandFunction.DeficitBiomassDemand
        ([WhiteClover].Leaf.DMDemands.Structural.DMDemandFunction+[WhiteClover].Petiole.DMDemands.Structural.DMDemandFunction+[WhiteClover].Stolon.DMDemands.Structural.DMDemandFunction+[WhiteClover].Inflorescence.DMDemands.Structural.DMDemandFunction+[WhiteClover].Nodule.DMDemands.Structural.DMDemandFunction+[WhiteClover].Taproot.DMDemands.Structural.DMDemandFunction+[WhiteClover].Root.DMDemands.Structural.DMDemandFunction) as TotalDMDemanded
        ([WhiteClover].Leaf.Allocated.Wt/([WhiteClover].Arbitrator.DM.Allocated+0.000001)) as WhiteClover.Leaf.FractionDMAllocated
        ([WhiteClover].Petiole.Allocated.Wt/([WhiteClover].Arbitrator.DM.Allocated+0.000001)) as WhiteClover.Petiole.FractionDMAllocated
        ([WhiteClover].Stolon.Allocated.Wt/([WhiteClover].Arbitrator.DM.Allocated+0.000001)) as WhiteClover.Stolon.FractionDMAllocated
        ([WhiteClover].Inflorescence.Allocated.Wt/([WhiteClover].Arbitrator.DM.Allocated+0.000001)) as WhiteClover.Inflorescence.FractionDMAllocated
        ([WhiteClover].Nodule.Allocated.Wt/([WhiteClover].Arbitrator.DM.Allocated+0.000001)) as WhiteClover.Nodule.FractionDMAllocated
        ([WhiteClover].Taproot.Allocated.Wt/([WhiteClover].Arbitrator.DM.Allocated+0.000001)) as WhiteClover.Taproot.FractionDMAllocated
        ([WhiteClover].Root.Allocated.Wt/([WhiteClover].Arbitrator.DM.Allocated+0.000001)) as WhiteClover.Root.FractionDMAllocated
        [WhiteClover].Leaf.DMPotentialAllocation.Total
        [WhiteClover].Petiole.DMPotentialAllocation.Total
        [WhiteClover].Stolon.DMPotentialAllocation.Total
        [WhiteClover].Inflorescence.DMPotentialAllocation.Total
        [WhiteClover].Nodule.DMPotentialAllocation.Total
        [WhiteClover].Taproot.DMPotentialAllocation.Total
        [WhiteClover].Root.DMPotentialAllocation.Total
        ([WhiteClover].Leaf.DMPotentialAllocation.Total+[WhiteClover].Petiole.DMPotentialAllocation.Total+[WhiteClover].Stolon.DMPotentialAllocation.Total+[WhiteClover].Inflorescence.DMPotentialAllocation.Total+[WhiteClover].Nodule.DMPotentialAllocation.Total+[WhiteClover].Taproot.DMPotentialAllocation.Total+[WhiteClover].Root.DMPotentialAllocation.Total) as WhiteClover.Total.PotAllocation.Wt
        [WhiteClover].Total.Wt
        [WhiteClover].Total.N
        [WhiteClover].Total.NConc
        [WhiteClover].TotalLive.Wt
        [WhiteClover].AboveGround.Wt
        [WhiteClover].BelowGround.Wt
        [WhiteClover].AboveGround.N
        [WhiteClover].BelowGround.N
        [WhiteClover].AboveGroundLive.Wt
        [WhiteClover].BelowGroundLive.Wt
        [WhiteClover].AboveGroundLive.NConc
        [WhiteClover].BelowGroundLive.NConc
        [ExtraVariables].Script.HerbageNConc as HerbageNConc
        (([WhiteClover].Leaf.N+[WhiteClover].Petiole.N)/(([WhiteClover].Leaf.Wt+[WhiteClover].Petiole.Wt+0.000001)) as HerbageStandingNConc
        [WhiteClover].Leaf.Wt
        [WhiteClover].Leaf.Live.Wt
        [WhiteClover].Leaf.Live.N
        [WhiteClover].Leaf.Live.NConc
        [WhiteClover].Leaf.Dead.Wt
        [WhiteClover].Leaf.Dead.NConc
        [WhiteClover].Leaf.CoverTotal
        [WhiteClover].Leaf.CoverGreen
        [WhiteClover].Leaf.CoverDead
        [WhiteClover].Leaf.LAITotal
        [WhiteClover].Leaf.LAI
        [WhiteClover].Leaf.LAIDead
        [WhiteClover].Leaf.Height
        [WhiteClover].Leaf.PotentialBiomass
        [WhiteClover].Leaf.Transpiration
        [WhiteClover].Leaf.Fw
        [WhiteClover].Leaf.Fn
        [WhiteClover].Leaf.FNmetabolic
        [WhiteClover].Leaf.Photosynthesis.FCO2
        [WhiteClover].Leaf.Photosynthesis.FN
        [WhiteClover].Leaf.Photosynthesis.FT
        [WhiteClover].Leaf.Photosynthesis.FW
        [WhiteClover].Leaf.Photosynthesis.FVPD
        [WhiteClover].Leaf.FRGR
        [WhiteClover].Petiole.Live.Wt
        [WhiteClover].Petiole.Live.N
        [WhiteClover].Petiole.Live.NConc
        [WhiteClover].Petiole.Dead.Wt
        [WhiteClover].Petiole.Dead.NConc
        [WhiteClover].Stolon.Live.Wt
        [WhiteClover].Stolon.Live.N
        [WhiteClover].Stolon.Live.NConc
        [WhiteClover].Stolon.Dead.Wt
        [WhiteClover].Stolon.Dead.NConc
        [WhiteClover].Inflorescence.Live.Wt
        [WhiteClover].Inflorescence.Live.N
        [WhiteClover].Inflorescence.Live.NConc
        [WhiteClover].Inflorescence.Dead.Wt
        [WhiteClover].Inflorescence.Dead.NConc
        [WhiteClover].Nodule.Live.Wt
        [WhiteClover].Nodule.Live.N
        [WhiteClover].Nodule.Live.NConc
        [WhiteClover].Nodule.Dead.Wt
        [WhiteClover].Nodule.Dead.NConc
        [WhiteClover].Taproot.Live.Wt
        [WhiteClover].Taproot.Live.N
        [WhiteClover].Taproot.Live.NConc
        [WhiteClover].Taproot.Dead.Wt
        [WhiteClover].Taproot.Dead.NConc
        [WhiteClover].Root.Live.Wt
        [WhiteClover].Root.Live.N
        [WhiteClover].Root.Live.NConc
        [WhiteClover].Root.Dead.Wt
        [WhiteClover].Root.Dead.NConc
        [WhiteClover].Root.Depth
        [WhiteClover].Root.WaterDemand
        [WhiteClover].Root.WaterUptake
        [WhiteClover].Leaf.Live.StructuralWt
        [WhiteClover].Leaf.Live.MetabolicWt
        [WhiteClover].Leaf.Live.StorageWt
        [WhiteClover].Leaf.Live.StructuralN
        [WhiteClover].Leaf.Live.MetabolicN
        [WhiteClover].Leaf.Live.StorageN
        [WhiteClover].Leaf.Dead.StructuralWt
        [WhiteClover].Leaf.Dead.MetabolicWt
        [WhiteClover].Leaf.Dead.StorageWt
        [WhiteClover].Leaf.Dead.StructuralN
        [WhiteClover].Leaf.Dead.MetabolicN
        [WhiteClover].Leaf.Dead.StorageN
        [WhiteClover].Petiole.Live.StructuralWt
        [WhiteClover].Petiole.Live.MetabolicWt
        [WhiteClover].Petiole.Live.StorageWt
        [WhiteClover].Petiole.Live.StructuralN
        [WhiteClover].Petiole.Live.MetabolicN
        [WhiteClover].Petiole.Live.StorageN
        [WhiteClover].Stolon.Live.StructuralWt
        [WhiteClover].Stolon.Live.MetabolicWt
        [WhiteClover].Stolon.Live.StorageWt
        [WhiteClover].Stolon.Live.StructuralN
        [WhiteClover].Stolon.Live.MetabolicN
        [WhiteClover].Stolon.Live.StorageN
        [WhiteClover].Inflorescence.Live.StructuralWt
        [WhiteClover].Inflorescence.Live.MetabolicWt
        [WhiteClover].Inflorescence.Live.StorageWt
        [WhiteClover].Inflorescence.Live.StructuralN
        [WhiteClover].Inflorescence.Live.MetabolicN
        [WhiteClover].Inflorescence.Live.StorageN
        [WhiteClover].Nodule.Live.StructuralWt
        [WhiteClover].Nodule.Live.MetabolicWt
        [WhiteClover].Nodule.Live.StorageWt
        [WhiteClover].Nodule.Live.StructuralN
        [WhiteClover].Nodule.Live.MetabolicN
        [WhiteClover].Nodule.Live.StorageN
        [WhiteClover].Taproot.Live.StructuralWt
        [WhiteClover].Taproot.Live.MetabolicWt
        [WhiteClover].Taproot.Live.StorageWt
        [WhiteClover].Taproot.Live.StructuralN
        [WhiteClover].Taproot.Live.MetabolicN
        [WhiteClover].Taproot.Live.StorageN
        [WhiteClover].Root.Live.StructuralWt
        [WhiteClover].Root.Live.MetabolicWt
        [WhiteClover].Root.Live.StorageWt
        [WhiteClover].Root.Live.StructuralN
        [WhiteClover].Root.Live.MetabolicN
        [WhiteClover].Root.Live.StorageN
        [WhiteClover].Leaf.Live.StructuralNConc
        [WhiteClover].Root.Live.StructuralNConc
        [WhiteClover].Leaf.Allocated.Wt
        [WhiteClover].Petiole.Allocated.Wt
        [WhiteClover].Stolon.Allocated.Wt
        [WhiteClover].Inflorescence.Allocated.Wt
        [WhiteClover].Nodule.Allocated.Wt
        [WhiteClover].Taproot.Allocated.Wt
        [WhiteClover].Root.Allocated.Wt
        [WhiteClover].Leaf.Senesced.Wt
        [WhiteClover].Petiole.Senesced.Wt
        [WhiteClover].Stolon.Senesced.Wt
        [WhiteClover].Inflorescence.Senesced.Wt
        [WhiteClover].Nodule.Senesced.Wt
        [WhiteClover].Taproot.Senesced.Wt
        [WhiteClover].Root.Senesced.Wt
        [WhiteClover].Leaf.Detached.Wt
        [WhiteClover].Petiole.Detached.Wt
        [WhiteClover].Stolon.Detached.Wt
        [WhiteClover].Inflorescence.Detached.Wt
        [WhiteClover].Nodule.Detached.Wt
        [WhiteClover].Taproot.Detached.Wt
        [WhiteClover].Root.Detached.Wt
        [WhiteClover].Leaf.Removed.Wt
        [WhiteClover].Petiole.Removed.Wt
        [WhiteClover].Stolon.Removed.Wt
        [WhiteClover].Inflorescence.Removed.Wt
        [WhiteClover].Nodule.Removed.Wt
        [WhiteClover].Taproot.Removed.Wt
        [WhiteClover].Root.Removed.Wt
        ([WhiteClover].Leaf.Allocated.Wt+[WhiteClover].Petiole.Allocated.Wt+[WhiteClover].Stolon.Allocated.Wt+[WhiteClover].Inflorescence.Allocated.Wt+[WhiteClover].Nodule.Allocated.Wt+[WhiteClover].Taproot.Allocated.Wt+[WhiteClover].Root.Allocated.Wt) as WhiteClover.Total.Allocated.Wt
        ([WhiteClover].Leaf.Senesced.Wt+[WhiteClover].Petiole.Senesced.Wt+[WhiteClover].Stolon.Senesced.Wt+[WhiteClover].Inflorescence.Senesced.Wt+[WhiteClover].Nodule.Senesced.Wt+[WhiteClover].Taproot.Senesced.Wt+[WhiteClover].Root.Senesced.Wt) as WhiteClover.Total.Senesced.Wt
        ([WhiteClover].Leaf.Detached.Wt+[WhiteClover].Petiole.Detached.Wt+[WhiteClover].Stolon.Detached.Wt+[WhiteClover].Inflorescence.Detached.Wt+[WhiteClover].Nodule.Detached.Wt+[WhiteClover].Taproot.Detached.Wt+[WhiteClover].Root.Detached.Wt) as WhiteClover.Total.Detached.Wt
        ([WhiteClover].Leaf.Removed.Wt+[WhiteClover].Petiole.Removed.Wt+[WhiteClover].Stolon.Removed.Wt+[WhiteClover].Inflorescence.Removed.Wt+[WhiteClover].Nodule.Removed.Wt+[WhiteClover].Taproot.Removed.Wt+[WhiteClover].Root.Removed.Wt) as WhiteClover.Total.Removed.Wt
        [WhiteClover].Leaf.Allocated.N
        [WhiteClover].Petiole.Allocated.N
        [WhiteClover].Stolon.Allocated.N
        [WhiteClover].Inflorescence.Allocated.N
        [WhiteClover].Nodule.Allocated.N
        [WhiteClover].Taproot.Allocated.N
        [WhiteClover].Root.Allocated.N
        [WhiteClover].Leaf.Senesced.N
        [WhiteClover].Petiole.Senesced.N
        [WhiteClover].Stolon.Senesced.N
        [WhiteClover].Inflorescence.Senesced.N
        [WhiteClover].Nodule.Senesced.N
        [WhiteClover].Taproot.Senesced.N
        [WhiteClover].Root.Senesced.N
        [WhiteClover].Leaf.Detached.N
        [WhiteClover].Petiole.Detached.N
        [WhiteClover].Stolon.Detached.N
        [WhiteClover].Inflorescence.Detached.N
        [WhiteClover].Nodule.Detached.N
        [WhiteClover].Taproot.Detached.N
        [WhiteClover].Root.Detached.N
        [WhiteClover].Leaf.Removed.N
        [WhiteClover].Petiole.Removed.N
        [WhiteClover].Stolon.Removed.N
        [WhiteClover].Inflorescence.Removed.N
        [WhiteClover].Nodule.Removed.N
        [WhiteClover].Taproot.Removed.N
        [WhiteClover].Root.Removed.N
        ([WhiteClover].Leaf.Allocated.N+[WhiteClover].Petiole.Allocated.N+[WhiteClover].Stolon.Allocated.N+[WhiteClover].Inflorescence.Allocated.N+[WhiteClover].Nodule.Allocated.N+[WhiteClover].Taproot.Allocated.N+[WhiteClover].Root.Allocated.N) as WhiteClover.Total.Allocated.N
        ([WhiteClover].Leaf.Senesced.N+[WhiteClover].Petiole.Senesced.N+[WhiteClover].Stolon.Senesced.N+[WhiteClover].Inflorescence.Senesced.N+[WhiteClover].Nodule.Senesced.N+[WhiteClover].Taproot.Senesced.N+[WhiteClover].Root.Senesced.N) as WhiteClover.Total.Senesced.N
        ([WhiteClover].Leaf.Detached.N+[WhiteClover].Petiole.Detached.N+[WhiteClover].Stolon.Detached.N+[WhiteClover].Inflorescence.Detached.N+[WhiteClover].Nodule.Detached.N+[WhiteClover].Taproot.Detached.N+[WhiteClover].Root.Detached.N) as WhiteClover.Total.Detached.N
        ([WhiteClover].Leaf.Removed.N+[WhiteClover].Petiole.Removed.N+[WhiteClover].Stolon.Removed.N+[WhiteClover].Inflorescence.Removed.N+[WhiteClover].Nodule.Removed.N+[WhiteClover].Taproot.Removed.N+[WhiteClover].Root.Removed.N) as WhiteClover.Total.Removed.N
  DataStore
    ExcelInput Observed: FileName=Observed.xlsx; SheetNames=[Observed]
    ExcelInput ObservedMeans: FileName=Observed.xlsx; SheetNames=[ObservedMeans]
    PredictedObserved: PredictedTableName=Report; ObservedTableName=Observed; FieldNameUsedForMatch=Date
      Tests: POName=PredictedObserved
        AcceptedStats:
          Name                        n    Slope       Intercept  SEslope    SEintercept  R2          RMSE        NSE        ME           MAE         RSR
          CumulativeHarvestedWt       588  0.795178    113.814    0.03018    19.95        0.542263    256.099     0.424242   -2.60269     198.718     0.758142
          CumulativeNTakenOff         498  0.680333    4.09215    0.0274783  0.753111     0.552753    10.6729     0.472836   -3.30239     7.91333     0.725331
          HarvestedWt                 582  -0.0777377  181.277    0.0310379  4.99151      0.0106999   101.135     -0.857686  27.507       82.525      1.3618
          HerbageNConc                660  0.244251    0.0292903  0.0249988  0.00111277   0.126699    0.00672131  -0.566643  -0.00410467  0.00552725  1.25071
          NRate                       750  1           0          0          0            1           0           1          0            0           0
          NTakenOff                   498  -0.0520513  6.4214     0.0324875  0.21093      0.00514883  3.61772     -0.639537  0.271437     2.90444     1.27916
          RotationHarvestedWt         588  -0.0735546  178.649    0.0306001  4.90296      0.00976369  100.055     -0.825553  26.1106      81.5287     1.34998
          WhiteClover.AboveGround.Wt  162  0.424634    109.601    0.0634236  8.84965      0.218848    76.6438     -0.317721  39.107       59.2757     1.14437
        AcceptedStatsName=Name n Slope Intercept SEslope SEintercept R2 RMSE NSE ME MAE RSR
        Memo Note
          Where:
           - n: The number of PO (predicted-observed) pairs for the given variable;
           - Slope: The slope of the straight line linear regression. A perfect fit would have a value of 1;
           - Intercept: The intercept of the straight line linear regression. A perfect fit would have a value of 0;
           - SEslope: Standard error in the slope;
           - SEintercept: Standard error in the intercept.;
           - R2: The value for the coefficient of determination. It varies between 0 and 1, where 1 is a perfect fit;
           - RMSE: Root Mean Squared Error. 0 is a perfect fit. Values less than half the standard deviation of the observed data are acceptable;
           - NSE: Nash-Sutcliffe Efficiency. Indicates how well the PO data fits the 1:1 line. Ranges from -∞ to 1 with 1 being the optimal value while values  between 0 and 1 are generally viewed as acceptable. Values < 0 indicate unacceptable model performance;
           - ME: Mean Error between predicted and observed values. 0 is a perfect fit;
           - MAE: Mean Absolute Error. 0 is a perfect fit. Values less than half the standard deviation of the observed data are acceptable;
           - RSR: Ratio between the RMSE and the standard deviation of observations. 0 is a perfect fit;
    PredictedObserved PredictedObservedMeans: PredictedTableName=Report; ObservedTableName=ObservedMeans; FieldNameUsedForMatch=Date
      Tests: POName=PredictedObservedMeans
        AcceptedStats:
          Name                               n    Slope       Intercept  SEslope    SEintercept  R2           RMSE        NSE        ME           MAE        RSR
          CumulativeHarvestedWt              162  0.844837    84.5486    0.0558112  35.9564      0.588838     232.84      0.477503   -2.02338     183.07     0.720605
          CumulativeNTakenOff                132  0.722646    2.96025    0.0509111  1.3512       0.607816     9.62958     0.53177    -3.28086     7.33015    0.681677
          HarvestedWt                        162  -0.0519694  175.12     0.0636112  10.0018      0.00415432   94.5416     -0.900876  26.2743      76.753     1.37446
          HerbageNConc                       186  0.290509    0.0271952  0.0521192  0.00232256   0.144459     0.00635314  -0.811285  -0.0042435   0.0053289  1.34222
          NRate                              216  1           0          0          0            1            0           1          0            0          0
          NTakenOff                          132  -0.0167873  6.10316    0.0699225  0.441679     0.000443191  3.28928     -0.677122  0.222516     2.64537    1.29012
          RotationHarvestedWt                162  -0.051452   173.369    0.0629753  9.9018       0.00415468   93.7392     -0.868756  24.5964      75.9957    1.3628
          WhiteClover.AboveGround.Wt         54   0.476313    100.224    0.112952   15.5528      0.254829     70.7281     -0.267043  36.061       53.4428    1.11516
          WhiteClover.AboveGroundLive.NConc  186  0.183366    0.0288858  0.0473695  0.0021109    0.0753048    0.00879542  -2.47155   -0.00730056  0.0076042  1.85819
        AcceptedStatsName=Name n Slope Intercept SEslope SEintercept R2 RMSE NSE ME MAE RSR
        Memo Note: same as DataStore.PredictedObserved.Tests.Note
  Folder Validation
    Memo Note
      The performance of the white clover model is evaluated in simulations based on experiments conducted in New Zealand.
    Folder New Zealand
      Experiment FRNLLincoln
        Memo Presentation
          ###Presentation###

          The simulation setup was based on a field trial performed at Lincoln University Research Dairy Farm, New Zealand, between 2014 and 2016.  The experiment was part of the FRNL (Forages for Reduced Nitrogen Leaching) program (for more details see [MartinEtAl2017]).  Here only plots with pure white clover are used.
          The experiment consisted of six fertiliser treatments with four replicates.  The nominal N rates were 0, 50, 100, 200, 350 and 500 kg/ha/yr, but the actual amounts applied varied as each application was linked to a defoliation event, the plan was to have 10 defoliation per year, but this was not possible, with seven events actually happening for white clover.  The plots were mown at a height of about 4 cm and the harvested herbage was removed from the plots.  The measurements comprised of dry matter yield and quality indicators (here herbage N content is used).
          Data and general management of the experiment was supplied by Grant Edwards, Lincoln University.

          The soil at the experimental site was a Templeton fine sandy loam (an Immature Pallic soil, USDA: Udic Haplustept), the required parameters were inferred based on data from the New Zealand National Soils Database (Landcare Research).
          Weather data was obtained from nearby Broadfield weather station (NIWA).
        Factors
          Factor NRate: Specification=[NRate]
            Operations 0
            Operations 50
              2014-10-23  [Fertiliser].Apply(Amount: 5.6, Type: Fertiliser.Types.UreaN, Depth: 10)
              2014-11-26  [Fertiliser].Apply(Amount: 5.6, Type: Fertiliser.Types.UreaN, Depth: 10)
              2014-12-30  [Fertiliser].Apply(Amount: 5.6, Type: Fertiliser.Types.UreaN, Depth: 10)
              2015-02-05  [Fertiliser].Apply(Amount: 5.6, Type: Fertiliser.Types.UreaN, Depth: 10)
              2015-03-10  [Fertiliser].Apply(Amount: 5.6, Type: Fertiliser.Types.UreaN, Depth: 10)
              2015-04-17  [Fertiliser].Apply(Amount: 5.6, Type: Fertiliser.Types.UreaN, Depth: 10)
              2015-06-09  [Fertiliser].Apply(Amount: 5.6, Type: Fertiliser.Types.UreaN, Depth: 10)
              2015-10-06  [Fertiliser].Apply(Amount: 5.6, Type: Fertiliser.Types.UreaN, Depth: 10)
              2015-11-16  [Fertiliser].Apply(Amount: 5.6, Type: Fertiliser.Types.UreaN, Depth: 10)
              2015-12-16  [Fertiliser].Apply(Amount: 5.6, Type: Fertiliser.Types.UreaN, Depth: 10)
              2016-01-25  [Fertiliser].Apply(Amount: 5.6, Type: Fertiliser.Types.UreaN, Depth: 10)
              2016-02-26  [Fertiliser].Apply(Amount: 5.6, Type: Fertiliser.Types.UreaN, Depth: 10)
              2016-04-09  [Fertiliser].Apply(Amount: 5.6, Type: Fertiliser.Types.UreaN, Depth: 10)
              2016-05-24  [Fertiliser].Apply(Amount: 5.6, Type: Fertiliser.Types.UreaN, Depth: 10)
              2016-10-05  [Fertiliser].Apply(Amount: 5.6, Type: Fertiliser.Types.UreaN, Depth: 10)
              2016-11-10  [Fertiliser].Apply(Amount: 5.6, Type: Fertiliser.Types.UreaN, Depth: 10)
              2016-12-16  [Fertiliser].Apply(Amount: 5.6, Type: Fertiliser.Types.UreaN, Depth: 10)
            Operations 100
              2014-10-23  [Fertiliser].Apply(Amount: 11.1, Type: Fertiliser.Types.UreaN, Depth: 10)
              2014-11-26  [Fertiliser].Apply(Amount: 11.1, Type: Fertiliser.Types.UreaN, Depth: 10)
              2014-12-30  [Fertiliser].Apply(Amount: 11.1, Type: Fertiliser.Types.UreaN, Depth: 10)
              2015-02-05  [Fertiliser].Apply(Amount: 11.1, Type: Fertiliser.Types.UreaN, Depth: 10)
              2015-03-10  [Fertiliser].Apply(Amount: 11.1, Type: Fertiliser.Types.UreaN, Depth: 10)
              2015-04-17  [Fertiliser].Apply(Amount: 11.1, Type: Fertiliser.Types.UreaN, Depth: 10)
              2015-06-09  [Fertiliser].Apply(Amount: 11.1, Type: Fertiliser.Types.UreaN, Depth: 10)
              2015-10-06  [Fertiliser].Apply(Amount: 11.1, Type: Fertiliser.Types.UreaN, Depth: 10)
              2015-11-16  [Fertiliser].Apply(Amount: 11.1, Type: Fertiliser.Types.UreaN, Depth: 10)
              2015-12-16  [Fertiliser].Apply(Amount: 11.1, Type: Fertiliser.Types.UreaN, Depth: 10)
              2016-01-25  [Fertiliser].Apply(Amount: 11.1, Type: Fertiliser.Types.UreaN, Depth: 10)
              2016-02-26  [Fertiliser].Apply(Amount: 11.1, Type: Fertiliser.Types.UreaN, Depth: 10)
              2016-04-09  [Fertiliser].Apply(Amount: 11.1, Type: Fertiliser.Types.UreaN, Depth: 10)
              2016-05-24  [Fertiliser].Apply(Amount: 11.1, Type: Fertiliser.Types.UreaN, Depth: 10)
              2016-10-05  [Fertiliser].Apply(Amount: 11.1, Type: Fertiliser.Types.UreaN, Depth: 10)
              2016-11-10  [Fertiliser].Apply(Amount: 11.1, Type: Fertiliser.Types.UreaN, Depth: 10)
              2016-12-16  [Fertiliser].Apply(Amount: 11.1, Type: Fertiliser.Types.UreaN, Depth: 10)
            Operations 200
              2014-10-23  [Fertiliser].Apply(Amount: 22.2, Type: Fertiliser.Types.UreaN, Depth: 10)
              2014-11-26  [Fertiliser].Apply(Amount: 22.2, Type: Fertiliser.Types.UreaN, Depth: 10)
              2014-12-30  [Fertiliser].Apply(Amount: 22.2, Type: Fertiliser.Types.UreaN, Depth: 10)
              2015-02-05  [Fertiliser].Apply(Amount: 22.2, Type: Fertiliser.Types.UreaN, Depth: 10)
              2015-03-10  [Fertiliser].Apply(Amount: 22.2, Type: Fertiliser.Types.UreaN, Depth: 10)
              2015-04-17  [Fertiliser].Apply(Amount: 22.2, Type: Fertiliser.Types.UreaN, Depth: 10)
              2015-06-09  [Fertiliser].Apply(Amount: 22.2, Type: Fertiliser.Types.UreaN, Depth: 10)
              2015-10-06  [Fertiliser].Apply(Amount: 22.2, Type: Fertiliser.Types.UreaN, Depth: 10)
              2015-11-16  [Fertiliser].Apply(Amount: 22.2, Type: Fertiliser.Types.UreaN, Depth: 10)
              2015-12-16  [Fertiliser].Apply(Amount: 22.2, Type: Fertiliser.Types.UreaN, Depth: 10)
              2016-01-25  [Fertiliser].Apply(Amount: 22.2, Type: Fertiliser.Types.UreaN, Depth: 10)
              2016-02-26  [Fertiliser].Apply(Amount: 22.2, Type: Fertiliser.Types.UreaN, Depth: 10)
              2016-04-09  [Fertiliser].Apply(Amount: 22.2, Type: Fertiliser.Types.UreaN, Depth: 10)
              2016-05-24  [Fertiliser].Apply(Amount: 22.2, Type: Fertiliser.Types.UreaN, Depth: 10)
              2016-10-05  [Fertiliser].Apply(Amount: 22.2, Type: Fertiliser.Types.UreaN, Depth: 10)
              2016-11-10  [Fertiliser].Apply(Amount: 22.2, Type: Fertiliser.Types.UreaN, Depth: 10)
              2016-12-16  [Fertiliser].Apply(Amount: 22.2, Type: Fertiliser.Types.UreaN, Depth: 10)
            Operations 350
              2014-10-23  [Fertiliser].Apply(Amount: 38.9, Type: Fertiliser.Types.UreaN, Depth: 10)
              2014-11-26  [Fertiliser].Apply(Amount: 38.9, Type: Fertiliser.Types.UreaN, Depth: 10)
              2014-12-30  [Fertiliser].Apply(Amount: 38.9, Type: Fertiliser.Types.UreaN, Depth: 10)
              2015-02-05  [Fertiliser].Apply(Amount: 38.9, Type: Fertiliser.Types.UreaN, Depth: 10)
              2015-03-10  [Fertiliser].Apply(Amount: 38.9, Type: Fertiliser.Types.UreaN, Depth: 10)
              2015-04-17  [Fertiliser].Apply(Amount: 38.9, Type: Fertiliser.Types.UreaN, Depth: 10)
              2015-06-09  [Fertiliser].Apply(Amount: 38.9, Type: Fertiliser.Types.UreaN, Depth: 10)
              2015-10-06  [Fertiliser].Apply(Amount: 38.9, Type: Fertiliser.Types.UreaN, Depth: 10)
              2015-11-16  [Fertiliser].Apply(Amount: 38.9, Type: Fertiliser.Types.UreaN, Depth: 10)
              2015-12-16  [Fertiliser].Apply(Amount: 38.9, Type: Fertiliser.Types.UreaN, Depth: 10)
              2016-01-25  [Fertiliser].Apply(Amount: 38.9, Type: Fertiliser.Types.UreaN, Depth: 10)
              2016-02-26  [Fertiliser].Apply(Amount: 38.9, Type: Fertiliser.Types.UreaN, Depth: 10)
              2016-04-09  [Fertiliser].Apply(Amount: 38.9, Type: Fertiliser.Types.UreaN, Depth: 10)
              2016-05-24  [Fertiliser].Apply(Amount: 38.9, Type: Fertiliser.Types.UreaN, Depth: 10)
              2016-10-05  [Fertiliser].Apply(Amount: 38.9, Type: Fertiliser.Types.UreaN, Depth: 10)
              2016-11-10  [Fertiliser].Apply(Amount: 38.9, Type: Fertiliser.Types.UreaN, Depth: 10)
              2016-12-16  [Fertiliser].Apply(Amount: 38.9, Type: Fertiliser.Types.UreaN, Depth: 10)
            Operations 500
              2014-10-23  [Fertiliser].Apply(Amount: 55.6, Type: Fertiliser.Types.UreaN, Depth: 10)
              2014-11-26  [Fertiliser].Apply(Amount: 55.6, Type: Fertiliser.Types.UreaN, Depth: 10)
              2014-12-30  [Fertiliser].Apply(Amount: 55.6, Type: Fertiliser.Types.UreaN, Depth: 10)
              2015-02-05  [Fertiliser].Apply(Amount: 55.6, Type: Fertiliser.Types.UreaN, Depth: 10)
              2015-03-10  [Fertiliser].Apply(Amount: 55.6, Type: Fertiliser.Types.UreaN, Depth: 10)
              2015-04-17  [Fertiliser].Apply(Amount: 55.6, Type: Fertiliser.Types.UreaN, Depth: 10)
              2015-06-09  [Fertiliser].Apply(Amount: 55.6, Type: Fertiliser.Types.UreaN, Depth: 10)
              2015-10-06  [Fertiliser].Apply(Amount: 55.6, Type: Fertiliser.Types.UreaN, Depth: 10)
              2015-11-16  [Fertiliser].Apply(Amount: 55.6, Type: Fertiliser.Types.UreaN, Depth: 10)
              2015-12-16  [Fertiliser].Apply(Amount: 55.6, Type: Fertiliser.Types.UreaN, Depth: 10)
              2016-01-25  [Fertiliser].Apply(Amount: 55.6, Type: Fertiliser.Types.UreaN, Depth: 10)
              2016-02-26  [Fertiliser].Apply(Amount: 55.6, Type: Fertiliser.Types.UreaN, Depth: 10)
              2016-04-09  [Fertiliser].Apply(Amount: 55.6, Type: Fertiliser.Types.UreaN, Depth: 10)
              2016-05-24  [Fertiliser].Apply(Amount: 55.6, Type: Fertiliser.Types.UreaN, Depth: 10)
              2016-10-05  [Fertiliser].Apply(Amount: 55.6, Type: Fertiliser.Types.UreaN, Depth: 10)
              2016-11-10  [Fertiliser].Apply(Amount: 55.6, Type: Fertiliser.Types.UreaN, Depth: 10)
              2016-12-16  [Fertiliser].Apply(Amount: 55.6, Type: Fertiliser.Types.UreaN, Depth: 10)
        Simulation FRNLLincoln
          Clock: StartDate=2014-02-01; EndDate=2016-12-31
          Weather: FileName=Lincoln-Broadfields.met
          Summary summaryfile
          SoilArbitrator Soil Arbitrator
          Zone Field: Area=1; Slope=0
            Folder Management
              Operations Sowing
                2014-03-20  [WhiteClover].Sow(population: 500, cultivar: "Kopu", depth: 5, rowSpacing: 150)
              Operations IrrigationSchedule
                2014-10-31  [Irrigation].Apply(amount: 7, efficiency: 0.8)
                2014-11-03  [Irrigation].Apply(amount: 7, efficiency: 0.8)
                2014-11-05  [Irrigation].Apply(amount: 8, efficiency: 0.8)
                2014-11-07  [Irrigation].Apply(amount: 8, efficiency: 0.8)
                2014-11-10  [Irrigation].Apply(amount: 7, efficiency: 0.8)
                2014-11-11  [Irrigation].Apply(amount: 7, efficiency: 0.8)
                2014-11-12  [Irrigation].Apply(amount: 8, efficiency: 0.8)
                2014-11-17  [Irrigation].Apply(amount: 9, efficiency: 0.8)
                2014-11-18  [Irrigation].Apply(amount: 7, efficiency: 0.8)
                2014-11-19  [Irrigation].Apply(amount: 7, efficiency: 0.8)
                2014-11-24  [Irrigation].Apply(amount: 8, efficiency: 0.8)
                2014-11-25  [Irrigation].Apply(amount: 9, efficiency: 0.8)
                2014-11-27  [Irrigation].Apply(amount: 10, efficiency: 0.8)
                2014-12-01  [Irrigation].Apply(amount: 8, efficiency: 0.8)
                2014-12-02  [Irrigation].Apply(amount: 8, efficiency: 0.8)
                2014-12-04  [Irrigation].Apply(amount: 7, efficiency: 0.8)
                2014-12-08  [Irrigation].Apply(amount: 7, efficiency: 0.8)
                2014-12-09  [Irrigation].Apply(amount: 7, efficiency: 0.8)
                2014-12-12  [Irrigation].Apply(amount: 8, efficiency: 0.8)
                2014-12-15  [Irrigation].Apply(amount: 10, efficiency: 0.8)
                2014-12-17  [Irrigation].Apply(amount: 10, efficiency: 0.8)
                2014-12-19  [Irrigation].Apply(amount: 7, efficiency: 0.8)
                2014-12-20  [Irrigation].Apply(amount: 7, efficiency: 0.8)
                2014-12-21  [Irrigation].Apply(amount: 8, efficiency: 0.8)
                2014-12-22  [Irrigation].Apply(amount: 10, efficiency: 0.8)
                2014-12-25  [Irrigation].Apply(amount: 8, efficiency: 0.8)
                2014-12-26  [Irrigation].Apply(amount: 8, efficiency: 0.8)
                2014-12-27  [Irrigation].Apply(amount: 7, efficiency: 0.8)
                2014-12-28  [Irrigation].Apply(amount: 10, efficiency: 0.8)
                2014-12-29  [Irrigation].Apply(amount: 8, efficiency: 0.8)
                2014-12-30  [Irrigation].Apply(amount: 8, efficiency: 0.8)
                2015-01-02  [Irrigation].Apply(amount: 7, efficiency: 0.8)
                2015-01-05  [Irrigation].Apply(amount: 10, efficiency: 0.8)
                2015-01-08  [Irrigation].Apply(amount: 8, efficiency: 0.8)
                2015-01-09  [Irrigation].Apply(amount: 9, efficiency: 0.8)
                2015-01-12  [Irrigation].Apply(amount: 7, efficiency: 0.8)
                2015-01-13  [Irrigation].Apply(amount: 7, efficiency: 0.8)
                2015-01-16  [Irrigation].Apply(amount: 8, efficiency: 0.8)
                2015-01-19  [Irrigation].Apply(amount: 7, efficiency: 0.8)
                2015-01-20  [Irrigation].Apply(amount: 7, efficiency: 0.8)
                2015-01-21  [Irrigation].Apply(amount: 8, efficiency: 0.8)
                2015-01-26  [Irrigation].Apply(amount: 10, efficiency: 0.8)
                2015-01-27  [Irrigation].Apply(amount: 10, efficiency: 0.8)
                2015-01-29  [Irrigation].Apply(amount: 8, efficiency: 0.8)
                2015-02-02  [Irrigation].Apply(amount: 10, efficiency: 0.8)
                2015-02-04  [Irrigation].Apply(amount: 8, efficiency: 0.8)
                2015-02-05  [Irrigation].Apply(amount: 7, efficiency: 0.8)
                2015-02-09  [Irrigation].Apply(amount: 8, efficiency: 0.8)
                2015-02-11  [Irrigation].Apply(amount: 7, efficiency: 0.8)
                2015-02-12  [Irrigation].Apply(amount: 10, efficiency: 0.8)
                2015-02-16  [Irrigation].Apply(amount: 10, efficiency: 0.8)
                2015-02-17  [Irrigation].Apply(amount: 10, efficiency: 0.8)
                2015-02-18  [Irrigation].Apply(amount: 8, efficiency: 0.8)
                2015-02-24  [Irrigation].Apply(amount: 10, efficiency: 0.8)
                2015-02-26  [Irrigation].Apply(amount: 7, efficiency: 0.8)
                2015-02-27  [Irrigation].Apply(amount: 8, efficiency: 0.8)
                2015-03-02  [Irrigation].Apply(amount: 7, efficiency: 0.8)
                2015-03-03  [Irrigation].Apply(amount: 7, efficiency: 0.8)
                2015-03-05  [Irrigation].Apply(amount: 8, efficiency: 0.8)
                2015-03-10  [Irrigation].Apply(amount: 8, efficiency: 0.8)
                2015-03-12  [Irrigation].Apply(amount: 9, efficiency: 0.8)
                2015-03-13  [Irrigation].Apply(amount: 7, efficiency: 0.8)
                2015-03-16  [Irrigation].Apply(amount: 10, efficiency: 0.8)
                2015-03-19  [Irrigation].Apply(amount: 9, efficiency: 0.8)
                2015-03-20  [Irrigation].Apply(amount: 8, efficiency: 0.8)
                2015-03-23  [Irrigation].Apply(amount: 9, efficiency: 0.8)
                2015-03-24  [Irrigation].Apply(amount: 7, efficiency: 0.8)
                2015-03-26  [Irrigation].Apply(amount: 10, efficiency: 0.8)
                2015-03-30  [Irrigation].Apply(amount: 7, efficiency: 0.8)
                2015-04-02  [Irrigation].Apply(amount: 10, efficiency: 0.8)
                2015-04-03  [Irrigation].Apply(amount: 8, efficiency: 0.8)
                2015-04-06  [Irrigation].Apply(amount: 7, efficiency: 0.8)
                2015-04-08  [Irrigation].Apply(amount: 10, efficiency: 0.8)
                2015-04-17  [Irrigation].Apply(amount: 10, efficiency: 0.8)
                2015-05-20  [Irrigation].Apply(amount: 10, efficiency: 0.8)
                2015-06-09  [Irrigation].Apply(amount: 10, efficiency: 0.8)
                2015-09-09  [Irrigation].Apply(amount: 10, efficiency: 0.8)
                2015-09-30  [Irrigation].Apply(amount: 10, efficiency: 0.8)
                2015-10-02  [Irrigation].Apply(amount: 8, efficiency: 0.8)
                2015-10-06  [Irrigation].Apply(amount: 10, efficiency: 0.8)
                2015-10-09  [Irrigation].Apply(amount: 10, efficiency: 0.8)
                2015-10-12  [Irrigation].Apply(amount: 8, efficiency: 0.8)
                2015-10-13  [Irrigation].Apply(amount: 7, efficiency: 0.8)
                2015-10-16  [Irrigation].Apply(amount: 10, efficiency: 0.8)
                2015-10-20  [Irrigation].Apply(amount: 10, efficiency: 0.8)
                2015-10-21  [Irrigation].Apply(amount: 8, efficiency: 0.8)
                2015-10-23  [Irrigation].Apply(amount: 7, efficiency: 0.8)
                2015-10-26  [Irrigation].Apply(amount: 7, efficiency: 0.8)
                2015-10-27  [Irrigation].Apply(amount: 9, efficiency: 0.8)
                2015-11-02  [Irrigation].Apply(amount: 10, efficiency: 0.8)
                2015-11-03  [Irrigation].Apply(amount: 8, efficiency: 0.8)
                2015-11-04  [Irrigation].Apply(amount: 9, efficiency: 0.8)
                2015-11-06  [Irrigation].Apply(amount: 9, efficiency: 0.8)
                2015-11-09  [Irrigation].Apply(amount: 10, efficiency: 0.8)
                2015-11-11  [Irrigation].Apply(amount: 7, efficiency: 0.8)
                2015-11-16  [Irrigation].Apply(amount: 10, efficiency: 0.8)
                2015-11-18  [Irrigation].Apply(amount: 9, efficiency: 0.8)
                2015-11-20  [Irrigation].Apply(amount: 7, efficiency: 0.8)
                2015-11-23  [Irrigation].Apply(amount: 10, efficiency: 0.8)
                2015-11-24  [Irrigation].Apply(amount: 8, efficiency: 0.8)
                2015-11-25  [Irrigation].Apply(amount: 7, efficiency: 0.8)
                2015-11-27  [Irrigation].Apply(amount: 9, efficiency: 0.8)
                2015-11-30  [Irrigation].Apply(amount: 7, efficiency: 0.8)
                2015-12-01  [Irrigation].Apply(amount: 7, efficiency: 0.8)
                2015-12-04  [Irrigation].Apply(amount: 9, efficiency: 0.8)
                2015-12-07  [Irrigation].Apply(amount: 10, efficiency: 0.8)
                2015-12-09  [Irrigation].Apply(amount: 9, efficiency: 0.8)
                2015-12-10  [Irrigation].Apply(amount: 9, efficiency: 0.8)
                2015-12-22  [Irrigation].Apply(amount: 8, efficiency: 0.8)
                2015-12-24  [Irrigation].Apply(amount: 9, efficiency: 0.8)
                2015-12-26  [Irrigation].Apply(amount: 8, efficiency: 0.8)
                2015-12-29  [Irrigation].Apply(amount: 7, efficiency: 0.8)
                2015-12-31  [Irrigation].Apply(amount: 7, efficiency: 0.8)
                2016-01-01  [Irrigation].Apply(amount: 10, efficiency: 0.8)
                2016-01-07  [Irrigation].Apply(amount: 10, efficiency: 0.8)
                2016-01-09  [Irrigation].Apply(amount: 7, efficiency: 0.8)
                2016-01-11  [Irrigation].Apply(amount: 7, efficiency: 0.8)
                2016-01-12  [Irrigation].Apply(amount: 7, efficiency: 0.8)
                2016-01-13  [Irrigation].Apply(amount: 9, efficiency: 0.8)
                2016-01-15  [Irrigation].Apply(amount: 10, efficiency: 0.8)
                2016-01-21  [Irrigation].Apply(amount: 7, efficiency: 0.8)
                2016-01-25  [Irrigation].Apply(amount: 8, efficiency: 0.8)
                2016-01-30  [Irrigation].Apply(amount: 7, efficiency: 0.8)
                2016-02-02  [Irrigation].Apply(amount: 10, efficiency: 0.8)
                2016-02-03  [Irrigation].Apply(amount: 10, efficiency: 0.8)
                2016-02-05  [Irrigation].Apply(amount: 9, efficiency: 0.8)
                2016-02-08  [Irrigation].Apply(amount: 10, efficiency: 0.8)
                2016-02-11  [Irrigation].Apply(amount: 10, efficiency: 0.8)
                2016-02-12  [Irrigation].Apply(amount: 7, efficiency: 0.8)
                2016-02-15  [Irrigation].Apply(amount: 8, efficiency: 0.8)
                2016-02-16  [Irrigation].Apply(amount: 8, efficiency: 0.8)
                2016-02-22  [Irrigation].Apply(amount: 7, efficiency: 0.8)
                2016-02-23  [Irrigation].Apply(amount: 7, efficiency: 0.8)
                2016-02-25  [Irrigation].Apply(amount: 7, efficiency: 0.8)
                2016-02-26  [Irrigation].Apply(amount: 7, efficiency: 0.8)
                2016-03-01  [Irrigation].Apply(amount: 7, efficiency: 0.8)
                2016-03-02  [Irrigation].Apply(amount: 8, efficiency: 0.8)
                2016-03-04  [Irrigation].Apply(amount: 10, efficiency: 0.8)
                2016-03-07  [Irrigation].Apply(amount: 9, efficiency: 0.8)
                2016-03-08  [Irrigation].Apply(amount: 4, efficiency: 0.8)
                2016-03-10  [Irrigation].Apply(amount: 8, efficiency: 0.8)
                2016-03-14  [Irrigation].Apply(amount: 8, efficiency: 0.8)
                2016-03-15  [Irrigation].Apply(amount: 10, efficiency: 0.8)
                2016-03-18  [Irrigation].Apply(amount: 9, efficiency: 0.8)
                2016-03-21  [Irrigation].Apply(amount: 10, efficiency: 0.8)
                2016-03-22  [Irrigation].Apply(amount: 9, efficiency: 0.8)
                2016-03-23  [Irrigation].Apply(amount: 9, efficiency: 0.8)
                2016-03-28  [Irrigation].Apply(amount: 8, efficiency: 0.8)
                2016-04-02  [Irrigation].Apply(amount: 10, efficiency: 0.8)
                2016-04-08  [Irrigation].Apply(amount: 10, efficiency: 0.8)
                2016-05-04  [Irrigation].Apply(amount: 10, efficiency: 0.8)
                2016-08-31  [Irrigation].Apply(amount: 10, efficiency: 0.8)
                2016-09-30  [Irrigation].Apply(amount: 7, efficiency: 0.8)
                2016-10-01  [Irrigation].Apply(amount: 8, efficiency: 0.8)
                2016-10-05  [Irrigation].Apply(amount: 10, efficiency: 0.8)
                2016-10-12  [Irrigation].Apply(amount: 10, efficiency: 0.8)
                2016-10-18  [Irrigation].Apply(amount: 10, efficiency: 0.8)
                2016-10-19  [Irrigation].Apply(amount: 8, efficiency: 0.8)
                2016-10-27  [Irrigation].Apply(amount: 10, efficiency: 0.8)
                2016-10-31  [Irrigation].Apply(amount: 9, efficiency: 0.8)
                2016-11-01  [Irrigation].Apply(amount: 8, efficiency: 0.8)
                2016-11-03  [Irrigation].Apply(amount: 8, efficiency: 0.8)
                2016-11-08  [Irrigation].Apply(amount: 7, efficiency: 0.8)
                2016-11-10  [Irrigation].Apply(amount: 8, efficiency: 0.8)
                2016-11-11  [Irrigation].Apply(amount: 9, efficiency: 0.8)
                2016-11-14  [Irrigation].Apply(amount: 7, efficiency: 0.8)
                2016-11-21  [Irrigation].Apply(amount: 7, efficiency: 0.8)
                2016-11-22  [Irrigation].Apply(amount: 8, efficiency: 0.8)
                2016-11-23  [Irrigation].Apply(amount: 7, efficiency: 0.8)
                2016-11-24  [Irrigation].Apply(amount: 7, efficiency: 0.8)
                2016-11-28  [Irrigation].Apply(amount: 8, efficiency: 0.8)
                2016-11-29  [Irrigation].Apply(amount: 9, efficiency: 0.8)
              Operations NRate
              Manager Defoliate
                Message =
```csharp
using System;
using Models.Core;
using System.Collections.Generic;
using System.Text;
using Models;
using Models.Soils;
using Models.PMF;
using System.Xml.Serialization;
using APSIM.Shared.Utilities;

namespace Models
{
    [Serializable]
    public class Script : Model
    {
        [Description("This script is set in 'Replacements':")]
        public string Message { get; set; }
    }
}
```
              Operations DefoliationSchedule
                2014-10-23  [Defoliate].Script.Defoliate(defoliationType: "Cut", amountDM: 40, amountType: "ResidualDM", duration: 1)
                2014-11-25  [Defoliate].Script.Defoliate(defoliationType: "Cut", amountDM: 40, amountType: "ResidualDM", duration: 1)
                2014-12-30  [Defoliate].Script.Defoliate(defoliationType: "Cut", amountDM: 40, amountType: "ResidualDM", duration: 1)
                2015-02-04  [Defoliate].Script.Defoliate(defoliationType: "Cut", amountDM: 40, amountType: "ResidualDM", duration: 1)
                2015-03-10  [Defoliate].Script.Defoliate(defoliationType: "Cut", amountDM: 40, amountType: "ResidualDM", duration: 1)
                2015-04-16  [Defoliate].Script.Defoliate(defoliationType: "Cut", amountDM: 40, amountType: "ResidualDM", duration: 1)
                2015-06-09  [Defoliate].Script.Defoliate(defoliationType: "Cut", amountDM: 40, amountType: "ResidualDM", duration: 1)
                2015-10-06  [Defoliate].Script.Defoliate(defoliationType: "Cut", amountDM: 40, amountType: "ResidualDM", duration: 1)
                2015-11-16  [Defoliate].Script.Defoliate(defoliationType: "Cut", amountDM: 40, amountType: "ResidualDM", duration: 1)
                2015-12-16  [Defoliate].Script.Defoliate(defoliationType: "Cut", amountDM: 40, amountType: "ResidualDM", duration: 1)
                2016-01-25  [Defoliate].Script.Defoliate(defoliationType: "Cut", amountDM: 40, amountType: "ResidualDM", duration: 1)
                2016-02-24  [Defoliate].Script.Defoliate(defoliationType: "Cut", amountDM: 40, amountType: "ResidualDM", duration: 1)
                2016-04-09  [Defoliate].Script.Defoliate(defoliationType: "Cut", amountDM: 40, amountType: "ResidualDM", duration: 1)
                2016-05-24  [Defoliate].Script.Defoliate(defoliationType: "Cut", amountDM: 40, amountType: "ResidualDM", duration: 1)
                2016-10-03  [Defoliate].Script.Defoliate(defoliationType: "Cut", amountDM: 40, amountType: "ResidualDM", duration: 1)
                2016-11-10  [Defoliate].Script.Defoliate(defoliationType: "Cut", amountDM: 40, amountType: "ResidualDM", duration: 1)
                2016-12-16  [Defoliate].Script.Defoliate(defoliationType: "Cut", amountDM: 40, amountType: "ResidualDM", duration: 1)
              Manager ExtraVariables
```csharp
// This will be replaced by the "ExtraVariables" section in "Replacements"

using System;
using Models.Core;

namespace Models
{
    [Serializable] 
    public class Script : Model
    {
    }
}
```
            MicroClimate: a_interception=0; b_interception=1; c_interception=0; d_interception=0; soil_albedo=0.23; SoilHeatFluxFraction=0.4; NightInterceptionFraction=0.5; ReferenceHeight=2
            Irrigation
            Fertiliser
            SurfaceOrganicMatter: InitialResidueName=grass; InitialResidueType=grass; InitialResidueMass=500; InitialStandingFraction=0; InitialCPR=0; InitialCNR=40; FractionFaecesAdded=0.5
            Soil: SoilType=Udic Haplustept (US),  Immature Pallic Soil (NZ); LocalName=Paparua Deep Sandy Loam; Site=LURDF; NearestTown=Lincoln; Region=Canterbury; Country=New Zealand; Latitude=0; Longitude=0
              DataSource=Adapted based on data from the NZ National Soils Database plus published data (Carey et al, 2002; Schwaertzel et al, 2011; Woods et al, 2016)
              Comments=Different references name the soil at the site as either Templeton sandy loam or Paparua sandy loam (very similar soils)
              Analysis: PHUnits=Water; BoronUnits=0
                Thickness  Rocks  PH  CEC   ParticleSizeSand  ParticleSizeSilt  ParticleSizeClay
                100        0      6   13.5  44.1              38.1              17.8
                120        0      6   11.4  43.3              38.8              17.8
                150        0      6   9.2   47.2              36.9              15.9
                230        0      6   6.2   45.9              40                14.1
                130        0      6   5.4   68.5              24.3              7.3
                250        0      6   5.8   60.1              30.2              9.6
                220        0      6   5.4   75.4              17.7              7
                300        0      6   5.6   70.2              20.3              9.5
              Water
                Thickness  BD     AirDry  LL15   DUL    SAT    KS
                100        1.154  0.051   0.151  0.338  0.512  2559.2
                120        1.295  0.14    0.146  0.328  0.469  2142.3
                150        1.441  0.129   0.129  0.279  0.427  1019.5
                230        1.544  0.111   0.111  0.271  0.394  310.6
                130        1.505  0.08    0.08   0.244  0.413  434.9
                250        1.504  0.072   0.072  0.234  0.406  791
                220        1.517  0.085   0.085  0.254  0.401  744.1
                300        1.479  0.082   0.082  0.257  0.413  411.2
                SoilCrop WhiteCloverSoil: LL=[0.151, 0.146, 0.129, 0.111, 0.08, 0.072, 0.085, 0.082]; KL=[0.12, 0.11, 0.08, 0.05, 0.02, 0.005, 0, 0]; XF=[1, 1, 1, 1, 1, 1, 1, 1]
              SoilWater: SummerDate=1-Oct; SummerU=9; SummerCona=4; WinterDate=1-apr; WinterU=6; WinterCona=3; DiffusConst=88; DiffusSlope=35; Salb=0.15; CN2Bare=70; CNRed=20; CNCov=0.8; slope=0; discharge_width=0; catchment_area=0; max_pond=0; Thickness=[100, 120, 150, 230, 130, 250, 220, 300]; SWCON=[0.59, 0.59, 0.55, 0.48, 0.53, 0.5, 0.51, 0.45]; ResidueInterception=0
              SoilNitrogen: fom_types=[default, manure, mucuna, lablab, shemp, stable]; fract_carb=[0.2, 0.3, 0.54, 0.57, 0.45, 0]; fract_cell=[0.7, 0.3, 0.37, 0.37, 0.47, 0.1]; fract_lign=[0.1, 0.4, 0.09, 0.06, 0.08, 0.9]
                SoilNitrogenNO3 NO3
                SoilNitrogenNH4 NH4
                SoilNitrogenUrea Urea
                SoilNitrogenPlantAvailableNO3 PlantAvailableNO3
                SoilNitrogenPlantAvailableNH4 PlantAvailableNH4
              SoilOrganicMatter: RootCN=40; EnrACoeff=7.4; EnrBCoeff=0.2; OCUnits=Total
                Thickness  OC    SoilCN  FBiom  FInert  RootWt
                100        2.94  11.3    0.08   0.3     297.215
                120        2.17  11.3    0.055  0.45    233.798
                150        0.99  11.3    0.015  0.72    173.202
                230        0.35  11.3    0.009  0.87    109.339
                130        0.24  11.3    0.008  0.95    84.3062
                250        0.2   11.3    0.007  0.99    51.1343
                220        0.15  11.3    0.005  0.995   32.9324
                300        0.1   11.3    0.005  0.995   18.0737
              CERESSoilTemperature
              InitialWater Initial water: PercentMethod=1; FractionFull=0.75
              Sample Initial nitrogen: NO3Units=kg/ha; NH4Units=kg/ha; SWUnits=Volumetric; OCUnits=Total; PHUnits=Water
                Thickness  NO3  NH4
                150        20   2.5
                150        15   1.5
                450        2.5  0.5
                250        0.5  0.2
                500        0.5  0.1
            Plant WhiteClover: CropType=WhiteClover; IsEnding=false; DaysAfterEnding=0
            Report: EventNames=[Clock].DoReport
      Experiment FRNLRuakura
        Memo
          ###Presentation###

          This simulation setup was based on field trials performed at DairyNZ's Scott Farm, in Ruakura, New Zealand, between 2014 and 2016.  The experiment was part of the FRNL (Forages for Reduced Nitrogen Leaching) program and the data is basically unpublished (references will be added when this come about).  Here only plots with pure white clover are used.
          The experiment was set up with six fertiliser treatments and three replicates, with nominal N rates of 0, 50, 100, 200, 350 and 500 kg/ha/yr (actual rate varied).  The swards were mown at a a height of approximately 4 cm and the herbage was removed from the plots.  The measurements comprised of herbage yield and quality indicators (here N content is used).
          Observed data supplied by Grant Edwards, Lincoln University.

          The soil at the experimental site was a Horotiu silt loam (an Orthic Allophanic soil; USDA: Typic Udivitrand), the parameters required were inferred using data from the New Zealand National Soils Database (Landcare Research).
          Weather data was obtained from nearby Ruakura weather station (NIWA).
        Factors
          Factor NRate: Specification=[NRate]
            Operations 0
            Operations 50
              2014-12-22  [Fertiliser].Apply(Amount: 5, Type: Fertiliser.Types.UreaN, Depth: 10)
              2015-01-19  [Fertiliser].Apply(Amount: 5, Type: Fertiliser.Types.UreaN, Depth: 10)
              2015-03-03  [Fertiliser].Apply(Amount: 5, Type: Fertiliser.Types.UreaN, Depth: 10)
              2015-04-21  [Fertiliser].Apply(Amount: 5, Type: Fertiliser.Types.UreaN, Depth: 10)
              2015-06-10  [Fertiliser].Apply(Amount: 5, Type: Fertiliser.Types.UreaN, Depth: 10)
              2015-09-09  [Fertiliser].Apply(Amount: 5, Type: Fertiliser.Types.UreaN, Depth: 10)
              2015-10-19  [Fertiliser].Apply(Amount: 5, Type: Fertiliser.Types.UreaN, Depth: 10)
              2015-11-19  [Fertiliser].Apply(Amount: 5, Type: Fertiliser.Types.UreaN, Depth: 10)
              2015-12-22  [Fertiliser].Apply(Amount: 5, Type: Fertiliser.Types.UreaN, Depth: 10)
              2016-02-03  [Fertiliser].Apply(Amount: 5, Type: Fertiliser.Types.UreaN, Depth: 10)
              2016-05-06  [Fertiliser].Apply(Amount: 5, Type: Fertiliser.Types.UreaN, Depth: 10)
              2016-07-12  [Fertiliser].Apply(Amount: 5, Type: Fertiliser.Types.UreaN, Depth: 10)
              2016-09-14  [Fertiliser].Apply(Amount: 5, Type: Fertiliser.Types.UreaN, Depth: 10)
            Operations 100
              2014-12-22  [Fertiliser].Apply(Amount: 10, Type: Fertiliser.Types.UreaN, Depth: 10)
              2015-01-19  [Fertiliser].Apply(Amount: 10, Type: Fertiliser.Types.UreaN, Depth: 10)
              2015-03-03  [Fertiliser].Apply(Amount: 10, Type: Fertiliser.Types.UreaN, Depth: 10)
              2015-04-21  [Fertiliser].Apply(Amount: 10, Type: Fertiliser.Types.UreaN, Depth: 10)
              2015-06-10  [Fertiliser].Apply(Amount: 10, Type: Fertiliser.Types.UreaN, Depth: 10)
              2015-09-09  [Fertiliser].Apply(Amount: 10, Type: Fertiliser.Types.UreaN, Depth: 10)
              2015-10-19  [Fertiliser].Apply(Amount: 10, Type: Fertiliser.Types.UreaN, Depth: 10)
              2015-11-19  [Fertiliser].Apply(Amount: 10, Type: Fertiliser.Types.UreaN, Depth: 10)
              2015-12-22  [Fertiliser].Apply(Amount: 10, Type: Fertiliser.Types.UreaN, Depth: 10)
              2016-02-03  [Fertiliser].Apply(Amount: 10, Type: Fertiliser.Types.UreaN, Depth: 10)
              2016-05-06  [Fertiliser].Apply(Amount: 10, Type: Fertiliser.Types.UreaN, Depth: 10)
              2016-07-12  [Fertiliser].Apply(Amount: 10, Type: Fertiliser.Types.UreaN, Depth: 10)
              2016-09-14  [Fertiliser].Apply(Amount: 10, Type: Fertiliser.Types.UreaN, Depth: 10)
            Operations 200
              2014-12-22  [Fertiliser].Apply(Amount: 20, Type: Fertiliser.Types.UreaN, Depth: 10)
              2015-01-19  [Fertiliser].Apply(Amount: 20, Type: Fertiliser.Types.UreaN, Depth: 10)
              2015-03-03  [Fertiliser].Apply(Amount: 20, Type: Fertiliser.Types.UreaN, Depth: 10)
              2015-04-21  [Fertiliser].Apply(Amount: 20, Type: Fertiliser.Types.UreaN, Depth: 10)
              2015-06-10  [Fertiliser].Apply(Amount: 20, Type: Fertiliser.Types.UreaN, Depth: 10)
              2015-09-09  [Fertiliser].Apply(Amount: 20, Type: Fertiliser.Types.UreaN, Depth: 10)
              2015-10-19  [Fertiliser].Apply(Amount: 20, Type: Fertiliser.Types.UreaN, Depth: 10)
              2015-11-19  [Fertiliser].Apply(Amount: 20, Type: Fertiliser.Types.UreaN, Depth: 10)
              2015-12-22  [Fertiliser].Apply(Amount: 20, Type: Fertiliser.Types.UreaN, Depth: 10)
              2016-02-03  [Fertiliser].Apply(Amount: 20, Type: Fertiliser.Types.UreaN, Depth: 10)
              2016-05-06  [Fertiliser].Apply(Amount: 20, Type: Fertiliser.Types.UreaN, Depth: 10)
              2016-07-12  [Fertiliser].Apply(Amount: 20, Type: Fertiliser.Types.UreaN, Depth: 10)
              2016-09-14  [Fertiliser].Apply(Amount: 20, Type: Fertiliser.Types.UreaN, Depth: 10)
            Operations 350
              2014-12-22  [Fertiliser].Apply(Amount: 35, Type: Fertiliser.Types.UreaN, Depth: 10)
              2015-01-19  [Fertiliser].Apply(Amount: 35, Type: Fertiliser.Types.UreaN, Depth: 10)
              2015-03-03  [Fertiliser].Apply(Amount: 35, Type: Fertiliser.Types.UreaN, Depth: 10)
              2015-04-21  [Fertiliser].Apply(Amount: 35, Type: Fertiliser.Types.UreaN, Depth: 10)
              2015-06-10  [Fertiliser].Apply(Amount: 35, Type: Fertiliser.Types.UreaN, Depth: 10)
              2015-09-09  [Fertiliser].Apply(Amount: 35, Type: Fertiliser.Types.UreaN, Depth: 10)
              2015-10-19  [Fertiliser].Apply(Amount: 35, Type: Fertiliser.Types.UreaN, Depth: 10)
              2015-11-19  [Fertiliser].Apply(Amount: 35, Type: Fertiliser.Types.UreaN, Depth: 10)
              2015-12-22  [Fertiliser].Apply(Amount: 35, Type: Fertiliser.Types.UreaN, Depth: 10)
              2016-02-03  [Fertiliser].Apply(Amount: 35, Type: Fertiliser.Types.UreaN, Depth: 10)
              2016-05-06  [Fertiliser].Apply(Amount: 35, Type: Fertiliser.Types.UreaN, Depth: 10)
              2016-07-12  [Fertiliser].Apply(Amount: 35, Type: Fertiliser.Types.UreaN, Depth: 10)
              2016-09-14  [Fertiliser].Apply(Amount: 35, Type: Fertiliser.Types.UreaN, Depth: 10)
            Operations 500
              2014-12-22  [Fertiliser].Apply(Amount: 50, Type: Fertiliser.Types.UreaN, Depth: 10)
              2015-01-19  [Fertiliser].Apply(Amount: 50, Type: Fertiliser.Types.UreaN, Depth: 10)
              2015-03-03  [Fertiliser].Apply(Amount: 50, Type: Fertiliser.Types.UreaN, Depth: 10)
              2015-04-21  [Fertiliser].Apply(Amount: 50, Type: Fertiliser.Types.UreaN, Depth: 10)
              2015-06-10  [Fertiliser].Apply(Amount: 50, Type: Fertiliser.Types.UreaN, Depth: 10)
              2015-09-09  [Fertiliser].Apply(Amount: 50, Type: Fertiliser.Types.UreaN, Depth: 10)
              2015-10-19  [Fertiliser].Apply(Amount: 50, Type: Fertiliser.Types.UreaN, Depth: 10)
              2015-11-19  [Fertiliser].Apply(Amount: 50, Type: Fertiliser.Types.UreaN, Depth: 10)
              2015-12-22  [Fertiliser].Apply(Amount: 50, Type: Fertiliser.Types.UreaN, Depth: 10)
              2016-02-03  [Fertiliser].Apply(Amount: 50, Type: Fertiliser.Types.UreaN, Depth: 10)
              2016-05-06  [Fertiliser].Apply(Amount: 50, Type: Fertiliser.Types.UreaN, Depth: 10)
              2016-07-12  [Fertiliser].Apply(Amount: 50, Type: Fertiliser.Types.UreaN, Depth: 10)
              2016-09-14  [Fertiliser].Apply(Amount: 50, Type: Fertiliser.Types.UreaN, Depth: 10)
        Simulation FRNLRuakura
          Clock: StartDate=2014-09-01; EndDate=2016-12-31
          Weather: FileName=Ruakura.met
          Summary summaryfile
          SoilArbitrator Soil Arbitrator
          Zone Field: Area=1; Slope=0
            Folder Management
              Operations Sowing
                2014-10-24  [WhiteClover].Sow(population: 500, cultivar: "Kopu", depth: 5, rowSpacing: 150)
              Operations NRate
              Operations BaseFertiliser
                2014-10-13  [Fertiliser].Apply(Amount: 26.4, Type: Fertiliser.Types.UreaN, Depth: 10)
                2014-12-23  [Fertiliser].Apply(Amount: 3.9, Type: Fertiliser.Types.UreaN, Depth: 10)
              Manager Defoliate: same as Validation.New Zealand.FRNLLincoln.FRNLLincoln.Field.Management.Defoliate
              Operations DefoliationSchedule
                2015-01-14  [Defoliate].Script.Defoliate(defoliationType: "Cut", amountDM: 60, amountType: "ResidualDM", duration: 1)
                2015-03-02  [Defoliate].Script.Defoliate(defoliationType: "Cut", amountDM: 60, amountType: "ResidualDM", duration: 1)
                2015-04-20  [Defoliate].Script.Defoliate(defoliationType: "Cut", amountDM: 60, amountType: "ResidualDM", duration: 1)
                2015-06-08  [Defoliate].Script.Defoliate(defoliationType: "Cut", amountDM: 60, amountType: "ResidualDM", duration: 1)
                2015-09-03  [Defoliate].Script.Defoliate(defoliationType: "Cut", amountDM: 60, amountType: "ResidualDM", duration: 1)
                2015-10-14  [Defoliate].Script.Defoliate(defoliationType: "Cut", amountDM: 60, amountType: "ResidualDM", duration: 1)
                2015-11-17  [Defoliate].Script.Defoliate(defoliationType: "Cut", amountDM: 60, amountType: "ResidualDM", duration: 1)
                2015-12-21  [Defoliate].Script.Defoliate(defoliationType: "Cut", amountDM: 60, amountType: "ResidualDM", duration: 1)
                2016-02-02  [Defoliate].Script.Defoliate(defoliationType: "Cut", amountDM: 60, amountType: "ResidualDM", duration: 1)
                2016-05-02  [Defoliate].Script.Defoliate(defoliationType: "Cut", amountDM: 60, amountType: "ResidualDM", duration: 1)
                2016-07-11  [Defoliate].Script.Defoliate(defoliationType: "Cut", amountDM: 60, amountType: "ResidualDM", duration: 1)
                2016-09-12  [Defoliate].Script.Defoliate(defoliationType: "Cut", amountDM: 60, amountType: "ResidualDM", duration: 1)
                2016-10-18  [Defoliate].Script.Defoliate(defoliationType: "Cut", amountDM: 60, amountType: "ResidualDM", duration: 1)
                2016-11-22  [Defoliate].Script.Defoliate(defoliationType: "Cut", amountDM: 60, amountType: "ResidualDM", duration: 1)
                2016-12-15  [Defoliate].Script.Defoliate(defoliationType: "Cut", amountDM: 60, amountType: "ResidualDM", duration: 1)
              Manager ExtraVariables
                script: same as in Validation.New Zealand.FRNLLincoln.FRNLLincoln.Field.Management.ExtraVariables
            MicroClimate: a_interception=0; b_interception=1; c_interception=0; d_interception=0; soil_albedo=0.23; SoilHeatFluxFraction=0.4; NightInterceptionFraction=0.5; ReferenceHeight=2
            Irrigation
            Fertiliser
            SurfaceOrganicMatter: InitialResidueName=grass; InitialResidueType=grass; InitialResidueMass=500; InitialStandingFraction=0; InitialCPR=0; InitialCNR=40; FractionFaecesAdded=0.5
            Soil: SoilType=Typic Udivitrand (US), Typic Orthic Allophanic Soil (NZ); LocalName=Horotiu Silt Loam; Site=Ruakura; NearestTown=Hamilton; Region=Waikato; Country=New Zealand; Latitude=0; Longitude=0
              DataSource=Based primarily on data from Close et al (2003), complemented with NZ NSD.
              Analysis: PHUnits=Water; BoronUnits=0
                Thickness  Rocks  PH  CEC   ParticleSizeSand  ParticleSizeSilt  ParticleSizeClay
                200        0      6   23.1  47                33                20
                200        0      6   17.2  64.5              17                18.5
                130        2      6   12.4  76                13                11
                140        5      6   10    84                9.5               6.5
                380        5      6   7.2   86.3              8.6               5.1
                230        19     6   3.1   88.6              7.6               3.8
                220        33     6   1.6   91.2              6.4               2.4
              Water
                Thickness  BD     AirDry  LL15   DUL    SAT    KS
                200        0.88   0.07    0.22   0.421  0.587  507.8
                200        0.85   0.21    0.219  0.327  0.623  4445.1
                130        1.009  0.177   0.177  0.314  0.572  7262
                140        1.055  0.139   0.139  0.291  0.536  11928
                380        1.055  0.125   0.125  0.182  0.504  25031
                230        0.839  0.102   0.102  0.123  0.439  28410.4
                220        0.695  0.083   0.083  0.101  0.363  42658.3
                SoilCrop WhiteCloverSoil: LL=[0.22, 0.219, 0.177, 0.139, 0.125, 0.102, 0.083]; KL=[0.1, 0.08, 0.05, 0.035, 0.005, 0, 0]; XF=[1, 1, 1, 1, 1, 1, 0.5]
              SoilWater: SummerDate=1-Oct; SummerU=9; SummerCona=4; WinterDate=1-Apr; WinterU=6; WinterCona=3; DiffusConst=88; DiffusSlope=35; Salb=0.15; CN2Bare=70; CNRed=20; CNCov=0.8; slope=0; discharge_width=0; catchment_area=0; max_pond=0; Thickness=[200, 200, 130, 140, 380, 230, 220]; SWCON=[0.48, 0.59, 0.61, 0.6, 0.63, 0.7, 0.71]; ResidueInterception=0
              SoilNitrogen: same as Validation.New Zealand.FRNLLincoln.FRNLLincoln.Field.Soil.SoilNitrogen
              SoilOrganicMatter: RootCN=40; EnrACoeff=7.4; EnrBCoeff=0.2; OCUnits=Total
                Thickness  OC    SoilCN  FBiom  FInert  RootWt
                200        8     12.5    0.075  0.7     338.974
                200        1.88  12.5    0.013  0.79    227.221
                130        0.93  12.5    0.009  0.9     175.199
                140        0.43  12.5    0.008  0.94    132.413
                380        0.13  12.5    0.007  0.96    61.9249
                230        0.1   12.5    0.005  0.99    39.0922
                220        0.07  12.5    0.005  0.995   25.1768
              CERESSoilTemperature
              InitialWater Initial water: PercentMethod=1; FractionFull=0.9
              Sample Initial nitrogen: NO3Units=kg/ha; NH4Units=kg/ha; SWUnits=Volumetric; OCUnits=Total; PHUnits=Water
                Thickness  NO3  NH4
                200        15   0.88
                200        7    0.34
                600        5    0.609708
                500        3.2  0.48267
            Plant WhiteClover: CropType=WhiteClover; IsEnding=false; DaysAfterEnding=0
            Report: EventNames=[Clock].DoReport
      Memo SubTitle
        ## All data from New Zealand
      Memo Discussion
        ##Discussion##

        The results show that the model was able to capture the general growth pattern and the cumulative amounts of herbage harvested.  Given the large uncertainties that measurements of plant biomass have, it is generally more appropriate to compare season cumulative values instead of values for individual measurements.  The experimental results showed no significant effect of N fertilisation on biomass accumulation, which was expected as white clover can compensate for those variations through biological N fixation.
        The values for N content were also highly variable, and they did show some response to fertilisation.  The model results also shows similar response, but the general pattern was not we described by the model.  The way the model computes demand and remobilisation of N seems to be a specific part of the model that still needs improvement.
  Memo Acknowledgements
    # Acknowledgements
    This model was developed with support and datasets provided by the Forages for Reduced Nitrogen Leaching (FRNL) programme, funded by the New Zealand Ministry of Business, Innovation and Employment.  The programme is a partnership between DairyNZ, AgResearch, Plant & Food Research, Lincoln University, the Foundation for Arable Research, and Landcare Research.
    It should be recognised that the model was also build upon the work of several people, especially at AgResearch, that have been developing the understanding and modelling of pastural systems over many years.  The author is also thankfull to Ellen Hume for her help on gathering plant parameters and organising the dataset.
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