Simulations: Version=183
  DataStore
    ExcelInput ProfileSWC: SheetNames=[ProfileSWC]
      FileNames=[%root%\Tests\Validation\Slurp\ShallowSoilTest\SoilWaterContent.xlsx]
    ExcelInput LayerSWC: SheetNames=[LayerSWC]
      FileNames=[%root%\Tests\Validation\Slurp\ShallowSoilTest\SoilWaterContent.xlsx]
    ExcelInput Cover: SheetNames=[Cover]
      FileNames=[%root%\Tests\Validation\Slurp\ShallowSoilTest\CoverDataObs.xlsx]
    Input
      FileNames=[%root%\Tests\Validation\Slurp\ShallowSoilTest\CoverInterpolated.csv]
    PredictedObserved ProfileWater: PredictedTableName=Report; ObservedTableName=ProfileSWC; FieldNameUsedForMatch=SimulationName; FieldName2UsedForMatch=Clock.Today; AllColumns=false
      Tests: POName=ProfileWater
        AcceptedStats:
          {Name=PSWC, n=448, Slope=0.755295, Intercept=46.6419, SEslope=0.0326356, SEintercept=7.32217, R2=0.545645, RMSE=34.8308, NSE=0.442165, ME=-7.0615, MAE=26.9238, RSR=0.746049, RMR=0}
        AcceptedStatsName=Name n Slope Intercept SEslope SEintercept R2 RMSE NSE ME MAE RSR
    PredictedObserved CanopyCover: PredictedTableName=Report; ObservedTableName=Cover; FieldNameUsedForMatch=SimulationName; FieldName2UsedForMatch=Clock.Today; AllColumns=false
      Tests: POName=CanopyCover
        AcceptedStats:
          {Name=Slurp.Leaf.CoverTotal, n=824, Slope=1.01351, Intercept=-0.0419308, SEslope=0.00703231, SEintercept=0.00556681, R2=0.961932, RMSE=0.0684226, NSE=0.947707, ME=-0.0320311, MAE=0.0331172, RSR=0.228538, RMR=0}
        AcceptedStatsName=Name n Slope Intercept SEslope SEintercept R2 RMSE NSE ME MAE RSR
  Simulation SlurpTestBase
    Memo
      This is a simple test that plants SLURP, changes its leaf area index and potential biomass production on one occasion and presents some graphs of Plant, N and Water balance components to show things are working.
    Weather: FileName=%root%/Examples/WeatherFiles/NZ_Lincoln
    Clock: Start=1998-10-14; End=1999-05-01
    Summary
    SoilArbitrator Soil Arbitrator
    Zone Field: Area=1; Slope=0; AspectAngle=0; Altitude=50
      Soil: Latitude=0; Longitude=0
        Chemical: Thickness=[100, 200, 300, 300, 300, 300]; PH=[6.6, 6.2, 5.7, 5.5, 5.5, 5.5]; PHUnits=Water
        Water: Thickness=[100, 200, 300, 300, 300, 300]; InitialValues=[0.33, 0.33, 0.31, 0.3, 0.3, 0.3]; InitialPAWmm=357; RelativeTo=LL15; FilledFromTop=false
        Physical
          Thickness  BD   AirDry  LL15  DUL   SAT
          100        1.2  0.08    0.13  0.33  0.5
          200        1.2  0.13    0.13  0.33  0.5
          300        1.2  0.1     0.1   0.31  0.44
          300        1.2  0.06    0.06  0.3   0.46
          300        1.2  0.04    0.04  0.3   0.44
          300        1.2  0.02    0.02  0.3   0.44
          SoilCrop SlurpSoil: LL=[0.13, 0.13, 0.1, 0.08, 0.11, 0.11]; KL=[0.06, 0.06, 0.06, 0.06, 0.06, 0.06]; XF=[1, 1, 1, 1, 1, 1]
          SoilCrop PotatoSoil: LL=[0.13, 0.13, 0.27, 0.27, 0.3, 0.3]; KL=[0.1, 0.06, 0.03, 0.01, 0, 0]; XF=[1, 1, 0.1, 0, 0, 0]
        WaterBalance SoilWater: SummerDate=1-Nov; SummerU=9; SummerCona=4.4; WinterDate=1-Apr; WinterU=9; WinterCona=4.4; DiffusConst=88; DiffusSlope=35.4; Salb=0.18; CN2Bare=68; CNRed=20; CNCov=0.8; DischargeWidth=0; CatchmentArea=0; PSIDul=-100
          Thickness  SWCON  KLAT
          100        0.55   0
          200        0.55   0
          300        0.55   0
          300        0.55   0
          300        0.55   0
          300        0.55   0
        Organic: FOMCNRatio=30; CarbonUnits=Total
          Thickness  Carbon  SoilCNRatio  FBiom  FInert  FOM
          100        1.82    11.5         0.025  0.3     1243.93
          200        1.47    11.5         0.025  0.4     833.832
          300        1.2     11.5         0.015  0.75    457.617
          300        1.03    11.5         0.01   0.9     251.145
          300        0.47    11.5         0.01   0.96    137.831
          300        0.47    11.5         0.01   0.96    75.6435
        CERESSoilTemperature Temperature
        Nutrient
        Solute NO3: Thickness=[100, 200, 300, 300, 300, 300]; InitialValues=[14.1667, 12.5, 1.38889, 1.38889, 0, 0]; InitialValuesUnits=ppm; WaterTableConcentration=0; D0=0; DepthConstant=0; MaxDepthSoluteAccessible=0; RunoffEffectivenessAtMovingSolute=0; MaxEffectiveRunoff=0
        Solute NH4: Thickness=[100, 200, 300, 300, 300, 300]; InitialValues=[0, 0, 0, 0, 0, 0]; InitialValuesUnits=ppm; WaterTableConcentration=0; D0=0; DepthConstant=0; MaxDepthSoluteAccessible=0; RunoffEffectivenessAtMovingSolute=0; MaxEffectiveRunoff=0
        Solute Urea: Thickness=[100, 200, 300, 300, 300, 300]; InitialValues=[0, 0, 0, 0, 0, 0]; InitialValuesUnits=kg/ha; WaterTableConcentration=0; D0=0; DepthConstant=0; MaxDepthSoluteAccessible=0; RunoffEffectivenessAtMovingSolute=0; MaxEffectiveRunoff=0
      Plant Slurp
      MicroClimate: a_interception=0; b_interception=1; c_interception=0; d_interception=0; SoilHeatFluxFraction=0.4; MinimumHeightDiffForNewLayer=0; NightInterceptionFraction=0.5; ReferenceHeight=2
      Irrigation
      Fertiliser
      Manager SlurpSowingRule
        CultivarName = StaticCrop
        InitialRootDepth = 600
        SowingDate = 1998-10-14
```csharp
using Models.Soils;
using System;
using Models.Core;
using Models.PMF;
using APSIM.Shared.Utilities;
        
namespace Models
{
    [Serializable] 
    [System.Xml.Serialization.XmlInclude(typeof(Model))]
    public class Script : Model
    {
        [Link] Plant Slurp;
        [Link] Clock Clock;

        [Description("Cultivar")]
        public string CultivarName { get; set; }
        [Description("Initial Root Depth")]
        public double InitialRootDepth { get; set; }
        [Description("Sowing Date")]
        public DateTime SowingDate { get; set; }

               
        [EventSubscribe("DoManagement")]
        private void OnDoManagement(object sender, EventArgs e)
        {
            if (Clock.Today.Date == SowingDate)
                Slurp.Sow(cultivar: CultivarName, population: 1, depth: InitialRootDepth, rowSpacing: 150);
            //Potato.Sow(... Contains the following arguements:
            //Population  double  Optional  Seeds sowing/m2.  Default is zero
            //Cultivar    string  Required  "NameOfCultivar"
            //Depth       double  Optional  Depth (mm) seed sown.   Default is 100mm 
            //MaxCover    double  Optional  Proportion (0-1) of the ground row crop will cover.   Default is 1.0
            //BudNumber   double  Optional  Number of mainstems per seed sown.  Default is 1.0
            //RowSpacing  double  Optional  Spaceing (mm) between drill rows when crop is sown.  Default is 150mm
            //CropClass   string  Optional  Crop class to instantiate when crop is sown.  Default is "Plant"
        }
    }
}
```
      Manager ExtraVariables
        InitialDay = False
        AccumPlantN = 0
        AccumMineralisation = 0
        AccumDenit = 0
        AccumFert = 0
        AccumLeach = 0
        AccumDetach = 0
        DeltaSoilOMN = 0
        DeltaSurfaceOMN = 0
        DeltaSoilMineralN = 0
        nutrientContent = 0
        AccumEO = 0
        AccumEP = 0
        AccumES = 0
        AccumDrainage = 0
        AccumRunoff = 0
        AccumOutflowLat = 0
        AccumIrrigation = 0
        AccumRainfall = 0
        SoilWaterDeficit = 0
        InitialSoilOMN = 0
        InitialSurfaceOMN = 0
        InitialMineralN = 0
        SWC = 0
        DUL = 0
        OutFlowLat = 0
        FomN = 0
        BiomN = 0
        HumN = 0
        OrganicN = 0
        NO3N = 0
        NH4N = 0
        UreaN = 0
        MineralN = 0
        DltNMinRes = 0
        DltNMinTot = 0
```csharp
using Newtonsoft.Json;
using Models.PMF.Organs;
using Models.Soils.Nutrients;
using Models.Interfaces;
using System;
using Models.Core;
using System.Collections.Generic;
using System.Text;
using Models.Soils;
using Models.PMF;
using Models;
using System.Xml.Serialization;
using APSIM.Shared.Utilities;
using Models.Climate;

namespace Models
{
    [Serializable] 
    public class Script : Model
    {
        [Link] private Clock Clock;
        [Link] private Weather Met;
        [Link] private Fertiliser Fert;
        [Link] private Irrigation Irrig;
        [Link] private Plant Slurp;
        [Link] private Zone zone;
        [Link(ByName = true)]
        private ISolute Urea;
        [Link(ByName = true)]
        private ISolute NO3;
        [Link(ByName = true)]
        private ISolute NH4;
        [Link(ByName = true)]
        private INutrient nutrient;
        [Link(Type = LinkType.Path, Path = "[SurfaceOrganicMatter].SurfaceResidue.Decomposition")]
        private OrganicFlow decomposition;
        [Link] private Soils.Soil Soil;
        [Link] private Models.Surface.SurfaceOrganicMatter SOM;
        [Link(Type = LinkType.Path, Path = "[Slurp].Root")]
        private Root root;
        [Link]
        private IPhysical soilPhysical;
        [Link]
        private ISoilWater waterBalance;
                    
        [JsonIgnore] public bool InitialDay { get; set; }
        
        [JsonIgnore] public double AccumPlantN { get; set; }
        [JsonIgnore] public double AccumMineralisation { get; set; }
        [JsonIgnore] public double AccumDenit { get; set; }
        [JsonIgnore] public double AccumFert { get; set; }
        [JsonIgnore] public double AccumLeach { get; set; }
        [JsonIgnore] public double AccumDetach { get; set; }
        [JsonIgnore] public double DeltaSoilOMN { get; set; }
        [JsonIgnore] public double DeltaSurfaceOMN { get; set; }
        [JsonIgnore] public double DeltaSoilMineralN { get; set; }
        [JsonIgnore] public double SoilNitrogenContent { get; set; }
        
        [JsonIgnore] public double AccumEO { get; set; }
        [JsonIgnore] public double AccumEP { get; set; }
        [JsonIgnore] public double AccumES { get; set; }
        [JsonIgnore] public double AccumDrainage { get; set; }
        [JsonIgnore] public double AccumRunoff { get; set; }
        [JsonIgnore] public double AccumOutflowLat { get; set; }
        [JsonIgnore] public double AccumIrrigation { get; set; }
        [JsonIgnore] public double AccumRainfall { get; set; }
        [JsonIgnore] public double SoilWaterDeficit { get; set; }
    
        [JsonIgnore] public double  InitialSoilOMN { get; set; }
        [JsonIgnore] public double  InitialSurfaceOMN { get; set; }
        [JsonIgnore] public double  InitialMineralN { get; set; }
        
        [JsonIgnore] public double SWC { get; set; }
        [JsonIgnore] public double DUL { get; set; }
        [JsonIgnore] public double OutFlowLat { get; set; }

        [JsonIgnore] public double FomN { get; set; }
        [JsonIgnore] public double BiomN { get; set; }
        [JsonIgnore] public double HumN { get; set; }
        [JsonIgnore] public double OrganicN { get; set; }
        [JsonIgnore] public double NO3N { get; set; }
        [JsonIgnore] public double NH4N { get; set; }
        [JsonIgnore] public double UreaN { get; set; }
        [JsonIgnore] public double MineralN { get; set; }
        [JsonIgnore] public double DltNMinRes { get; set; }
        [JsonIgnore] public double DltNMinTot { get; set; }
        
        [EventSubscribe("StartOfSimulation")]
        private void OnSimulationCommencing(object sender, EventArgs e)
        {
            InitialDay = true;
        }
        
        [EventSubscribe("DoManagement")]
        private void OnDoManagement(object sender, EventArgs e)
        {
            //!!!!!! Nitrogen balance components !!!!!!
            //!!!!!!^^^^^^^^^^^^^^^^^^^^^^^^^^^^^!!!!!!
            FomN = MathUtilities.Sum(nutrient.FOM.N);
            HumN = MathUtilities.Sum(nutrient.Humic.N);
            BiomN = MathUtilities.Sum(nutrient.Microbial.N);
            OrganicN = FomN + HumN + BiomN;
            NO3N = MathUtilities.Sum(NO3.kgha);
            NH4N = MathUtilities.Sum(NH4.kgha);
            UreaN = MathUtilities.Sum(Urea.kgha);
            MineralN = NO3N + NH4N + UreaN; 
            DltNMinRes = MathUtilities.Sum(decomposition.MineralisedN);
            DltNMinTot = MathUtilities.Sum(nutrient.MineralisedN);
            int layers = soilPhysical.Thickness.Length;
            if (InitialDay == true)
            {
                InitialSurfaceOMN = SOM.N;
                InitialSoilOMN = OrganicN;
                InitialMineralN = MineralN;
                InitialDay = false;
            }
            AccumFert += Fert.NitrogenApplied;
            DeltaSurfaceOMN = SOM.N - InitialSurfaceOMN;
            AccumLeach = AccumLeach - waterBalance.LeachNH4 - waterBalance.LeachNO3 - waterBalance.LeachUrea; //Fails
            AccumMineralisation += MathUtilities.Sum(nutrient.MineralisedN);
            AccumDenit -= MathUtilities.Sum(nutrient.DenitrifiedN);
            AccumPlantN -= (double)zone.Get("Slurp.Root.NUptake");
            DeltaSoilOMN = OrganicN - InitialSoilOMN;
            DeltaSoilMineralN = MineralN - InitialMineralN;
            SoilNitrogenContent = MineralN;
            
            //!!!!!! Water balance components !!!!!!
            //!!!!!!^^^^^^^^^^^^^^^^^^^^^^^^^^!!!!!!

            AccumIrrigation += Irrig.IrrigationApplied;
            AccumRainfall += Met.Rain;
            //AccumEP -= (double)zone.Get("[Slurp].Leaf.Transpiration");
            AccumEP -= (double)zone.Get("Slurp.Root.WaterUptake");
            SoilWaterDeficit = (SWC - DUL);
            double OutFlowLat = MathUtilities.Sum(waterBalance.LateralOutflow);
            AccumOutflowLat -= OutFlowLat;
        }
        
        [EventSubscribe("DoManagementCalculations")]
        private void OnDoManagementCalculations(object sender, EventArgs e)
        {
            FomN = MathUtilities.Sum(nutrient.FOM.N);
            HumN = MathUtilities.Sum(nutrient.Humic.N);
            BiomN = MathUtilities.Sum(nutrient.Microbial.N);
            
            
            AccumEO -= waterBalance.Eo;
            AccumES -= waterBalance.Es; 
            AccumDrainage -= waterBalance.Drainage;
            AccumRunoff -= waterBalance.Runoff;
            SWC = MathUtilities.Sum(waterBalance.SWmm);
            DUL = MathUtilities.Sum(soilPhysical.DULmm);
        }
    }
}
```
      SurfaceOrganicMatter surface organic matter: InitialResidueName=wheat; InitialResidueType=wheat; InitialResidueMass=2000; InitialStandingFraction=0; InitialCPR=0; InitialCNR=80
      Operations
        1998-10-02  [Irrigation].Apply(40);
        1998-10-26  [Irrigation].Apply(70);
        1998-12-15  [Irrigation].Apply(70);
        1998-12-29  [Irrigation].Apply(10);
        1998-12-30  [Irrigation].Apply(55);
        1999-01-07  [Irrigation].Apply(50);
        1999-01-21  [Irrigation].Apply(40);
        1999-02-10  [Irrigation].Apply(28);
        1999-02-19  [Irrigation].Apply(15);
        1999-03-09  [Irrigation].Apply(25);
        1998-12-29  [Fertiliser].Apply(50, Fertiliser.Types.UreaN, 10);
      Report: EventNames=[Clock].DoReport
        VariableNames:
          [Clock].Today
          [ExtraVariables].Script.AccumPlantN
          [ExtraVariables].Script.AccumMineralisation
          [ExtraVariables].Script.AccumDenit
          [ExtraVariables].Script.AccumFert
          [ExtraVariables].Script.AccumLeach
          [ExtraVariables].Script.AccumDetach
          [ExtraVariables].Script.DeltaSoilOMN
          [ExtraVariables].Script.DeltaSurfaceOMN
          [ExtraVariables].Script.DeltaSoilMineralN
          [Slurp].Root.NSupply
          [Soil].SoilWater.Eo
          [Soil].SoilWater.Es
          [ExtraVariables].Script.SWC
          [ExtraVariables].Script.DUL
          [Soil].SoilWater.Drainage
          [Soil].SoilWater.Runoff
          [ExtraVariables].Script.OutFlowLat
          [Soil].SoilWater.pond
          [ExtraVariables].Script.AccumEO
          [ExtraVariables].Script.AccumEP
          [ExtraVariables].Script.AccumES
          [ExtraVariables].Script.AccumDrainage
          [ExtraVariables].Script.AccumRunoff
          [ExtraVariables].Script.AccumRainfall
          [ExtraVariables].Script.AccumIrrigation
          [ExtraVariables].Script.AccumOutflowLat
          [ExtraVariables].Script.SoilWaterDeficit
          [Slurp].Leaf.Live.Wt
          [Slurp].Root.Live.Wt
          [Slurp].Leaf.Live.N
          [Slurp].Root.Live.N
          [Slurp].Leaf.Live.NConc
          [Slurp].Root.Live.NConc
          [Slurp].Root.WaterUptake
          [Slurp].Leaf.Transpiration
          [Slurp].Leaf.WaterDemand
          [Slurp].Root.Depth
          [Slurp].Leaf.CoverTotal
          [Slurp].Leaf.CoverDead
          [Slurp].Leaf.LAI
          [Slurp].Leaf.Height
          [Soil].Water.MM
          [Soil].NO3.kgha
          [ExtraVariables].Script.SoilNitrogenContent
          [Slurp].Arbitrator.N.TotalPlantDemand
          [ExtraVariables].Script.FomN
          [ExtraVariables].Script.HumN
          [ExtraVariables].Script.BiomN
          [ExtraVariables].Script.DltNMinRes
          [ExtraVariables].Script.DltNMinTot
          [Slurp].Leaf.Fw
          [Slurp].Leaf.Fn
      Manager ResetProduction
        OverRidePath = Slurp.Leaf.Photosynthesis.FixedValue
        OverRideInterger = 2
        ChangeDate = 1998-11-14
```csharp
using Models.Soils;
using System;
using Models.Core;
using System.Collections.Generic;
using System.Text;
using Models.PMF;
using Models;
using System.Xml.Serialization;
using APSIM.Shared.Utilities;

namespace Models
{
    [Serializable] 
    public class Script : Model
    {
        [Link] Plant Plant;
        [Link] Clock Clock;
        [Link] Zone zone;
        
        [Description("Path for coefficient to be Overwritten")]
        public string OverRidePath { get; set; }
        [Description("Value for new coefficient Interger")]
        public int OverRideInterger { get; set; }
        [Description("Sowing Date")]
        public DateTime ChangeDate { get; set; }
        
        [EventSubscribe("DoManagement")]
        private void OnDoManagement(object sender, EventArgs e)
        {
            if (Clock.Today.Date == ChangeDate)
            {
                object ResetValue = OverRideInterger;
                zone.Set(OverRidePath, ResetValue);
            }
        }
    }
}
```
      Manager ResetLAI
        OverRidePath = Slurp.Leaf.Area.FixedValue
        OverRideInterger = 3
        ChangeDate = 1999-01-01
        script: same as in SlurpTestBase.Field.ResetProduction
  Experiment Tests
    Memo
      This test has combinations of different Soils and Climate with Slurp run over 10 years and an automatic irrigation rule included.  This demonstrats that simulations including Slurp can generate sensible patterns in irrgation, drainage, runoff and potential water stress index
    Factors
      Permutation
        Factor Climate
          CompositeFactor P087073
            Specifications:
              [Weather].FileName = %root%\Tests\Validation\Slurp\Weather\P087073.met
              [Clock].StartDate = 1980-03-01
          CompositeFactor P108081
            Specifications:
              [Weather].FileName = %root%\Tests\Validation\Slurp\Weather\P108081.met
              [Clock].StartDate = 1980-03-01
          CompositeFactor P128077
            Specifications:
              [Weather].FileName = %root%\Tests\Validation\Slurp\Weather\P128077.met
              [Clock].StartDate = 1980-03-01
        Factor Soil: Specification=[Soil]
          Soil XL: SoilType=NZ_sedementary; Region=Plains; State=Canterbury; Country=New Zealand; Latitude=0; Longitude=0
            DataSource=Generic profile descriptions provided by Trevor Webb and data for functional horizions based on SWAMP project results
            Comments=Bulk density values were measured on the fine earth fraction so values entered into apsim soil are adjusted down to account for stone content (assuming stones are inert from all soil process so their mass and volume is removed from model paramaters).  SAT, DUL, LL15 and Air dry have been adjusted down to account for stone content.  OC has not been adjusted so the model will get the correct carbon and N amounts using the adjusted BD.
            Physical
              Thickness  BD      AirDry  LL15   DUL      SAT     KS
              80         0.77    0.0165  0.033  0.1925   0.2365  1000
              50         0.63    0.0135  0.027  0.1575   0.1935  1000
              200        0.4225  0.013   0.013  0.04225  0.13    1000
              270        0.42    0.01    0.01   0.04     0.13    1000
              400        0.2     0.008   0.008  0.022    0.1     1000
              500        0.2     1e-05   0.01   0.02     0.1     1000
              SoilCrop SLURPSoil: LL=[0.033, 0.027, 0.013, 0.013, 0.008, 0.008]; KL=[0.2, 0.2, 0.2, 0.2, 0.2, 0.2]; XF=[1, 1, 1, 1, 1, 1]
            Chemical: Thickness=[80, 50, 200, 670, 500]; PH=[6, 6, 6, 6, 6]; PHUnits=Water
            WaterBalance SoilWater: SummerDate=1-Oct; SummerU=9; SummerCona=4.4; WinterDate=1-Apr; WinterU=6; WinterCona=3; DiffusConst=88; DiffusSlope=35; Salb=0.13; CN2Bare=60; CNRed=20; CNCov=0.8; PSIDul=-100; Thickness=[80, 50, 200, 670, 500]; SWCON=[0.9, 0.9, 0.9, 0.9, 0.9]
            Organic: FOMCNRatio=40; CarbonUnits=Total
              Thickness  Carbon    SoilCNRatio  FBiom      FInert    FOM
              80         3.18052   11           0.0414651  0.437     366.487
              50         3.18052   11           0.0313037  0.536744  331.611
              200        1.53923   11           0.0200631  0.681609  222.285
              670        0.217285  11           0.01074    0.913661  58.2045
              500        0.20005   11           0.0100221  0.985071  21.4122
            Water: Thickness=[80, 50, 200, 270, 400, 500]; InitialValues=[0.1925, 0.1575, 0.04225, 0.04, 0.022, 0.02]; InitialPAWmm=43.835; RelativeTo=LL15; FilledFromTop=true
            CERESSoilTemperature Temperature
            Nutrient
            Solute NO3: Thickness=[80, 50, 200, 670, 500]; InitialValues=[40.5844, 63.4921, 17.7515, 5.17063, 1]; InitialValuesUnits=ppm; WaterTableConcentration=0; D0=0; DepthConstant=0; MaxDepthSoluteAccessible=0; RunoffEffectivenessAtMovingSolute=0; MaxEffectiveRunoff=0
            Solute NH4: Thickness=[80, 50, 200, 670, 500]; InitialValues=[1.62338, 3.1746, 1.18343, 0.517063, 0.2]; InitialValuesUnits=ppm; WaterTableConcentration=0; D0=0; DepthConstant=0; MaxDepthSoluteAccessible=0; RunoffEffectivenessAtMovingSolute=0; MaxEffectiveRunoff=0
            Solute Urea: Thickness=[80, 50, 200, 670, 500]; InitialValues=[0, 0, 0, 0, 0]; InitialValuesUnits=kg/ha; WaterTableConcentration=0; D0=0; DepthConstant=0; MaxDepthSoluteAccessible=0; RunoffEffectivenessAtMovingSolute=0; MaxEffectiveRunoff=0
          Soil L: SoilType=NZ_sedementary; Region=Plains; State=Canterbury; Country=New Zealand; Latitude=0; Longitude=0
            DataSource=Generic profile descriptions provided by Trevor Webb and data for functional horizions based on SWAMP project results
            Comments=Bulk density values were measured on the fine earth fraction so values entered into apsim soil are adjusted down to account for stone content (assuming stones are inert from all soil process so their mass and volume is removed from model paramaters).  SAT, DUL, LL15 and Air dry have been adjusted down to account for stone content.  OC has not been adjusted so the model will get the correct carbon and N amounts using the adjusted BD.
            Physical
              Thickness  BD      AirDry   LL15    DUL     SAT       KS
              200        1.3105  0.07675  0.1535  0.3735  0.456165  600
              150        1.474   0.152    0.152   0.32    0.41292   600
              250        0.775   0.05     0.07    0.2     0.2       600
              100        0.455   0.014    0.014   0.0455  0.14      600
              300        0.2     0.008    0.008   0.022   0.1       600
              500        0.2     0.008    0.008   0.022   0.1       600
              SoilCrop SLURPSoil: LL=[0.154, 0.152, 0.05, 0.014, 0.008, 0.008]; KL=[0.1, 0.1, 0.1, 0.1, 0.1, 0.1]; XF=[1, 1, 1, 1, 1, 1]
            Chemical: Thickness=[200, 150, 150, 200, 300, 500]; PH=[6, 6, 6, 6, 6, 6]; PHUnits=Water
            WaterBalance SoilWater: SummerDate=1-Oct; SummerU=9; SummerCona=4.4; WinterDate=1-Apr; WinterU=6; WinterCona=3; DiffusConst=88; DiffusSlope=35; Salb=0.13; CN2Bare=67; CNRed=20; CNCov=0.8; PSIDul=-100; Thickness=[200, 150, 150, 200, 300, 500]; SWCON=[0.496442, 0.56107, 0.471266, 0.650598, 0.6506, 0.6506]
            Organic: FOMCNRatio=40; CarbonUnits=Total
              Thickness  Carbon    SoilCNRatio  FBiom      FInert    FOM
              200        2.88977   11           0.0319525  0.493608  340.869
              150        0.971538  11           0.017682   0.700441  252.522
              150        0.80854   11           0.0131233  0.808993  187.073
              200        0.800258  11           0.0110929  0.887009  125.399
              300        0.800002  11           0.0102439  0.946627  68.8202
              500        0.8       11           0.0100221  0.983924  25.3176
            Water: Thickness=[200, 150, 250, 100, 300, 500]; InitialValues=[0.3735, 0.32, 0.2, 0.0455, 0.022, 0.022]; InitialPAWmm=116.05; RelativeTo=LL15; FilledFromTop=true
            CERESSoilTemperature Temperature
            Nutrient
            Solute NO3: Thickness=[200, 150, 150, 200, 300, 500]; InitialValues=[19.0218, 4.99349, 3.04201, 3.04201, 3.04201, 1]; InitialValuesUnits=ppm; WaterTableConcentration=0; D0=0; DepthConstant=0; MaxDepthSoluteAccessible=0; RunoffEffectivenessAtMovingSolute=0; MaxEffectiveRunoff=0
            Solute NH4: Thickness=[200, 150, 150, 200, 300, 500]; InitialValues=[0.886587, 0.346419, 0.304201, 0.304201, 0.304201, 0.2]; InitialValuesUnits=ppm; WaterTableConcentration=0; D0=0; DepthConstant=0; MaxDepthSoluteAccessible=0; RunoffEffectivenessAtMovingSolute=0; MaxEffectiveRunoff=0
            Solute Urea: Thickness=[200, 150, 150, 200, 300, 500]; InitialValues=[0, 0, 0, 0, 0, 0]; InitialValuesUnits=kg/ha; WaterTableConcentration=0; D0=0; DepthConstant=0; MaxDepthSoluteAccessible=0; RunoffEffectivenessAtMovingSolute=0; MaxEffectiveRunoff=0
          Soil M: SoilType=NZ_sedementary; Region=Plains; State=Canterbury; Country=New Zealand; Latitude=0; Longitude=0
            DataSource=Generic profile descriptions provided by Trevor Webb and data for functional horizions based on SWAMP project results
            Comments=Bulk density values were measured on the fine earth fraction so values entered into apsim soil are adjusted down to account for stone content (assuming stones are inert from all soil process so their mass and volume is removed from model paramaters).  SAT, DUL, LL15 and Air dry have been adjusted down to account for stone content.  OC has not been adjusted so the model will get the correct carbon and N amounts using the adjusted BD.
            Organic: FOMCNRatio=40; CarbonUnits=Total
              Thickness  Carbon    SoilCNRatio  FBiom      FInert    FOM
              250        2.36763   11           0.0288947  0.449328  476.783
              300        0.493357  11           0.0136287  0.758676  261.664
              300        0.226613  11           0.0105998  0.901885  143.604
              300        0.202414  11           0.0100992  0.960109  78.8117
              350        0.200179  11           0.0100141  0.984954  39.1367
            Organic Organic0: same as Tests.Factors.Permutation.Soil.M.Organic
            Physical
              Thickness  BD      AirDry   LL15    DUL     SAT       KS
              250        1.3105  0.07675  0.1535  0.3735  0.456165  400
              350        1.524   0.201    0.201   0.332   0.39432   400
              250        1.65    0.201    0.201   0.3375  0.358515  400
              300        0.39    0.012    0.012   0.039   0.12      400
              350        0.39    0.012    0.012   0.039   0.12      400
              SoilCrop SLURPSoil: LL=[0.1535, 0.201, 0.201, 0.012, 0.012]; KL=[0.1, 0.1, 0.1, 0.1, 0.1]; XF=[1, 0.449329, 0.090718, 1, 1]
            Chemical: Thickness=[250, 300, 300, 300, 350]; PH=[6, 6, 6, 6, 6]; PHUnits=Water
            WaterBalance SoilWater: SummerDate=1-Oct; SummerU=9; SummerCona=4.4; WinterDate=1-Apr; WinterU=6; WinterCona=3; DiffusConst=88; DiffusSlope=35; Salb=0.13; CN2Bare=70; CNRed=20; CNCov=0.8; PSIDul=-100; Thickness=[250, 300, 300, 300, 350]; SWCON=[0.496442, 0.365575, 0.0968316, 0.650598, 0.650598]
            Water: Thickness=[250, 350, 250, 300, 350]; InitialValues=[0.3735, 0.332, 0.3375, 0.039, 0.039]; InitialPAWmm=152.525; RelativeTo=LL15; FilledFromTop=true
            CERESSoilTemperature Temperature
            Nutrient
            Solute NO3: Thickness=[250, 300, 300, 300, 350]; InitialValues=[16.3142, 2.26376, 1.13317, 1.06659, 1]; InitialValuesUnits=ppm; WaterTableConcentration=0; D0=0; DepthConstant=0; MaxDepthSoluteAccessible=0; RunoffEffectivenessAtMovingSolute=0; MaxEffectiveRunoff=0
            Solute NH4: Thickness=[250, 300, 300, 300, 350]; InitialValues=[0.782386, 0.178617, 0.113317, 0.156659, 0.2]; InitialValuesUnits=ppm; WaterTableConcentration=0; D0=0; DepthConstant=0; MaxDepthSoluteAccessible=0; RunoffEffectivenessAtMovingSolute=0; MaxEffectiveRunoff=0
            Solute Urea: Thickness=[250, 300, 300, 300, 350]; InitialValues=[0, 0, 0, 0, 0]; InitialValuesUnits=kg/ha; WaterTableConcentration=0; D0=0; DepthConstant=0; MaxDepthSoluteAccessible=0; RunoffEffectivenessAtMovingSolute=0; MaxEffectiveRunoff=0
    Simulation SoilXClimateBase
      Weather: FileName=%root%/Tests/Validation/Slurp/Weather/P087073.met
      Clock: Start=1980-03-01; End=1990-03-01
      Summary
      SoilArbitrator Soil Arbitrator
      Zone Field: Area=1; Slope=0; AspectAngle=0; Altitude=50
        Plant Slurp
        SurfaceOrganicMatter surface organic matter: InitialResidueName=wheat; InitialResidueType=wheat; InitialResidueMass=2000; InitialStandingFraction=0; InitialCPR=0; InitialCNR=80
        MicroClimate: a_interception=0; b_interception=1; c_interception=0; d_interception=0; SoilHeatFluxFraction=0.4; MinimumHeightDiffForNewLayer=0; NightInterceptionFraction=0.5; ReferenceHeight=2
        Irrigation
        Fertiliser
        Manager SowPasture
          CultivarName = Pasture
          InitialRootDepth = 10
          SowingDate = 1980-03-01
```csharp
using Models.Soils;
using System;
using Models.Core;
using Models.PMF;
using System.Xml.Serialization;
namespace Models
{
    [Serializable] 
    [System.Xml.Serialization.XmlInclude(typeof(Model))]
    public class Script : Model
    {
        [Link] Plant SLURP;
        [Link] Clock Clock;
        [Link] Fertiliser Fert;

        [Description("Cultivar")]
        public string CultivarName { get; set; }
        [Description("Initial Root Depth")]
        public double InitialRootDepth { get; set; }
        [Description("Sowing Date (dd/mm)")]
        public DateTime SowingDate { get; set; }
        
            
        //Calculate static soil variables
        [EventSubscribe("StartOfSimulation")]
        private void OnStartOfSimulation(object sender, EventArgs e)
        {
                   
        }
                       
        [EventSubscribe("DoManagement")]
        private void OnDoManagement(object sender, EventArgs e)
        {
            if (Clock.Today.Date == SowingDate)
            {
                SLURP.Sow(cultivar: "Pasture", population: 1, depth: InitialRootDepth, rowSpacing: 150);
            }
            
            if ((Clock.Today.Month == 7) && (Clock.Today.Day == 1))
            {
                SLURP.Harvest(); //Slurp doesn't do anything on harvest but we can use this event to trigger a report at the end of each year.
            }
        }
    }
}
```
        Manager ExtraVariables
```csharp
using Newtonsoft.Json;
using Models.PMF.Organs;
using APSIM.Shared.Utilities;
using System.Xml.Serialization;
using Models;
using Models.PMF;
using Models.Soils;
using System.Text;
using System.Collections.Generic;
using Models.Core;
using System;
using Models.Climate;
using Models.Interfaces;

namespace Models
{
    [Serializable] 
    public class Script : Model
    {
        [Link] private Clock Clock;
        [Link] private Soils.Soil Soil;
        [Link] private Models.Surface.SurfaceOrganicMatter SOM;
        [Link] private Weather Met;
        [Link] private Fertiliser Fert;
        [Link] private Irrigation Irrig;
        [Link] private Plant SLURP;
        [Link] private Zone zone;
        [Link(Type = LinkType.Path, Path = "[Slurp].Root")]
        private Root root;
        [Link]
        private IPhysical soilPhysical;
        [Link]
        private ISoilWater waterBalance;
        //Link] waterBalance SoilWater;
                    
        [JsonIgnore] private bool ZeroTomorrow { get; set; }

        [JsonIgnore] public double AccumEO { get; set; }
        [JsonIgnore] public double AccumEP { get; set; }
        [JsonIgnore] public double AccumES { get; set; }
        [JsonIgnore] public double AccumDrainage { get; set; }
        [JsonIgnore] public double AccumRunoff { get; set; }
        [JsonIgnore] public double AccumIrrigation { get; set; }
        [JsonIgnore] public double AccumRainfall { get; set; }
        
        [JsonIgnore] private double AccumDays { get; set; }
        [JsonIgnore] private double AccumTemp { get; set; }
        [JsonIgnore] private double AccumRadn { get; set; }
        [JsonIgnore] private double AccumFW { get; set; }
        
        [JsonIgnore] public double MeanTemp { get; set; }
        [JsonIgnore] public double MeanRadn { get; set; }
        [JsonIgnore] public double MeanFW { get; set; }
        
        [JsonIgnore] public double DUL { get; set; }
        [JsonIgnore] public double SWD { get; set; }
        [JsonIgnore] public double SWC { get; set; }
        

        
        [EventSubscribe("StartOfSimulation")]
        private void OnSimulationCommencing(object sender, EventArgs e)
        {
            ZeroTomorrow = false;
        }
        
        [EventSubscribe("StartOfDay")]
        private void OnStartOfDay(object sender, EventArgs e)
        {

        }
        
        [EventSubscribe("DoManagement")]
        private void OnDoManagement(object sender, EventArgs e)
        {
            AccumRainfall += Met.Rain;
            AccumEP -= (double)zone.Get("Slurp.Root.WaterUptake");
            
            SWD = (SWC - DUL);
        }
        
        [EventSubscribe("DoManagementCalculations")]
        private void OnDoManagementCalculations(object sender, EventArgs e)
        {
            if ((Clock.Today.Month == 7) && (Clock.Today.Day == 1))
            {
                AccumEO = 0;
                AccumEP = 0;
                AccumES = 0;
                AccumDrainage = 0;   
                AccumRunoff = 0;  
                AccumIrrigation = 0;   
                AccumRainfall = 0;  
        
                AccumDays = 0;  
                AccumTemp = 0;   
                AccumRadn = 0;   
                AccumFW = 0;  
                
                ZeroTomorrow = false;
            }
            
            AccumIrrigation += Irrig.IrrigationApplied;
            AccumEO -= waterBalance.Eo;
            AccumES -= waterBalance.Es; 
            AccumDrainage -= waterBalance.Drainage;
            AccumRunoff -= waterBalance.Runoff;
            
            if (SLURP.IsAlive == true)
            {
                AccumDays += 1;
                AccumTemp += ((Met.MinT + Met.MaxT) / 2);
                AccumRadn += Met.Radn;
                AccumFW += (double)zone.Get("Slurp.Leaf.Fw");
            }
            
            MeanTemp = AccumTemp / AccumDays;
            MeanRadn = AccumRadn / AccumDays;
            MeanFW = AccumFW / AccumDays;
            
            SWC = MathUtilities.Sum(waterBalance.SWmm);
            DUL = MathUtilities.Sum(soilPhysical.DULmm);
        }
    }
}
```
        Manager GrowAndGrazeCanopy
          MaxLAI = 5
          LAIRate = 0.012
          MaximumHeight = 400
          LAI = 0
```csharp
using Models.Soils;
using System.IO;
using APSIM.Shared.Utilities;
using System.Xml.Serialization;
using Models;
using Models.PMF;
using System.Text;
using System.Collections.Generic;
using Models.Core;
using System;
using Models.Climate;
      

namespace Models
{
    [Serializable] 
    public class Script : Model
    {
        [Link] Clock Clock;
        [Link] Zone zone;
        [Link] Simulation simulation;
        [Link] Summary Summary;
        [Link] Weather Met;
   
        
        [Description("Maximum LAI achieved by pasture")]
        public  double MaxLAI { get; set; }
        [Description("Leaf Area Expansion Rate")]
        public double LAIRate { get; set; }
        //[Description("Extinction coefficient")]
        //public  double Ext_coef { get; set; }
        [Description("Maximum height of the crop at full cover")]
        public double MaximumHeight { get; set; }
        
        public double LAI { get; set; }
        public double ResidualFactor;
        
        [EventSubscribe("StartOfSimulation")]
        private void OnStartOfSimulation(object sender, EventArgs e)
        {
            LAI = 0;
            ResidualFactor = 0.4;
        }
      
        [EventSubscribe("StartOfDay")]
        private void OnStartOfDay(object sender, EventArgs e)
        {
            LAI += LAIRate * (Met.MaxT + Met.MinT) / 2;
                
            if (LAI > MaxLAI)
            {
                LAI *= ResidualFactor;
                Summary.WriteMessage(this, "Defoliation today reduced LAI to " + LAI, MessageType.Diagnostic);
            }
            object LeafLAI = LAI;
            zone.Set("Slurp.Leaf.Area.FixedValue", LeafLAI);
            object Height = MaximumHeight * (LAI / MaxLAI);
            zone.Set("Slurp.Leaf.HeightFunction.FixedValue", Height);  
        }
    }
}
```
        Manager IrrigationControl
          Irrigation_Yes_No = yes
          Season_Start = 1-Oct
          Season_End = 30-Apr
          Season_Allocation = 1000
          Refull_Frac = 0.9
          Trigger_Frac = 0.5
          Return_days = 3
          Maximum_Irrigation_Amount = 40
          Top_Depth = 600
```csharp
using Newtonsoft.Json;
using Models.PMF.Organs;
using System;
using Models.Core;
using Models.PMF;
using Models.Soils;
using System.Xml.Serialization;
using APSIM.Shared.Utilities;
using Models.Interfaces;

        
namespace Models
{
    [Serializable] 
    [System.Xml.Serialization.XmlInclude(typeof(Model))]
    public class Script : Model
    {
        [Link] private ISummary summary;
        [Link] private Irrigation Irrigation;
        [Link] private Clock Clock;
        [Link] private Soil Soil;
        [Link] private Plant SLURP;
        [Link]
        private Root root;
        [Link]
        private IPhysical soilPhysical;
        [Link]
        private ISoilWater waterBalance;
        //Communication to other modules
       
        //User inputs from properties tab
        [Description("Irrigation on (yes or no)")]
        public string Irrigation_Yes_No { get; set; }
        [Description("SeasonStart (dd-MMM)")]
        public string Season_Start { get; set; }
        [Description("SeasonEnd (dd-MMM)")]
        public string Season_End { get; set; }
        [Description("Season Allocation (mm)")]
        public double Season_Allocation { get; set; }
        [Description("% PAWC to refill soil to (0-1)")]
        public double Refull_Frac { get; set; }
        [Description("% PAWC to trigger irrigation (0-1)")]
        public double Trigger_Frac { get; set; }
        [Description("Minimum days for irrigation to return")]
        public double Return_days { get; set; }
        [Description("Maximum irrigation application (mm)")]
        public double Maximum_Irrigation_Amount { get; set; }
        [Description("Depth to calculate PAWC (mm)")]
        public double Top_Depth { get; set; }
       
        //Class members
        [JsonIgnore] private bool IrrigationIsAvailable { get; set; }
        [JsonIgnore] public bool SeasonIsOpen { get; set; }
        [JsonIgnore] private bool CropIsActive { get; set; }
        [JsonIgnore] private bool IrrigatorIsAvailable { get; set; }
        [JsonIgnore] private bool SoilIsDry { get; set; }
        [JsonIgnore] public double Top_DUL { get; set; }
        [JsonIgnore] public double Top_Refull { get; set; }
        [JsonIgnore] public double Top_Trigger { get; set; }
        [JsonIgnore] public double Top_LL { get; set; }
        [JsonIgnore] public double Top_SW { get; set; }
        [JsonIgnore] public double Accumulated_depth { get; set; }
        [JsonIgnore] public double Days_since_irrigation { get; set; }
        [JsonIgnore] public double Amount_to_apply { get; set; }
        [JsonIgnore] public double Season_Application { get; set; }
        [JsonIgnore] public double Top_PAWC { get; set; }
        
        //Variables for date logic testing
        [JsonIgnore] public string StartString { get; set; }
        [JsonIgnore] public string EndString { get; set; }
        [JsonIgnore] public DateTime StartDate { get; set; }
        [JsonIgnore] public DateTime EndDate { get; set; }
        [JsonIgnore] public int TodayYear { get; set; }
        [JsonIgnore] public int TodayMonth { get; set; }
        [JsonIgnore] public int StartMonth { get; set; }
        [JsonIgnore] public int EndMonth { get; set; }
        [JsonIgnore] public int TodayDay { get; set; }
        [JsonIgnore] public int StartDay { get; set; }
        [JsonIgnore] public int EndDay { get; set; }
       
    
        //Calculate static soil variables
        [EventSubscribe("StartOfSimulation")]
        private void OnStartOfSimulation(object sender, EventArgs e)
        {   
            //Calculated soil water variables
            Accumulated_depth = 0;
            for (int layer = 0; Accumulated_depth < Top_Depth; layer++)
            {
                Top_LL += soilPhysical.LL15mm[layer];
                Top_DUL += soilPhysical.DULmm[layer];
                Top_PAWC += (soilPhysical.DULmm[layer] - soilPhysical.LL15mm[layer]);
                Accumulated_depth += soilPhysical.Thickness[layer];
            }
            Top_Refull = Top_LL + (Top_DUL - Top_LL) * Refull_Frac;
        }
       
      
        //Determine daily requirement for irrigation
        [EventSubscribe("StartOfDay")]
        private void OnStartOfDay(object sender, EventArgs e)
        { 
            //Reset irriation use at the start of the season
            if ((Clock.Today.Month == 7) && (Clock.Today.Day == 1))
            {
                Season_Application = 0;
            }
            
            //Can we irrigate?
            IrrigationIsAvailable = false; 
            if (Irrigation_Yes_No == "yes")
                IrrigationIsAvailable = true; 
    
            //Are we Allowed to Irrigate?
            TodayYear = Clock.Today.Year;
            StartString = Season_Start + "-" + TodayYear.ToString();
            EndString = Season_End + "-" + TodayYear.ToString();
            StartDate = DateTime.Parse(StartString);
            EndDate = DateTime.Parse(EndString);
            TodayMonth = Clock.Today.Month;
            TodayDay = Clock.Today.Day;
            StartDay = StartDate.Day;
            StartMonth = StartDate.Month;
            EndDay = EndDate.Day;
            EndMonth = EndDate.Month;
          
            SeasonIsOpen = false;
            //if we are in the spring and after the start date then yes
            if ((Clock.Today.Month > 6) && (Clock.Today >= StartDate))
                SeasonIsOpen = true;
            //if we are in the autumn and before the end date then yes
            if ((Clock.Today.Month <= 6) && (Clock.Today <= EndDate))
                SeasonIsOpen = true;
              
            //Is the irrigator available?
            IrrigatorIsAvailable = false;
            Days_since_irrigation += 1;
            if (Days_since_irrigation >= Return_days)
                IrrigatorIsAvailable = true;
          
            //Is the soil dry enough to require irrigation?
            SoilIsDry = false;
            double CurrentRootDepth = 0;
            double RootDepth = root.Depth;
            CurrentRootDepth = Math.Max(RootDepth, CurrentRootDepth);
          
            double RelativeRootDepth = Math.Min(1.0, CurrentRootDepth / Top_Depth);
            //Top_Trigger = Math.Min(Top_Refull, Top_DUL - (Top_DUL - Top_LL) * RelativeRootDepth * (1 - Trigger_Frac)); 
            Top_Trigger = Top_LL + (Top_DUL - Top_LL) * Trigger_Frac; 
            
            Accumulated_depth = 0;
            Top_SW = 0;
            for (int layer = 0; Accumulated_depth < Top_Depth; layer++)
            {
                Top_SW += waterBalance.SWmm[layer];
                Accumulated_depth += soilPhysical.Thickness[layer];
            }
            double Top_SWThisAfternoon = Top_SW - waterBalance.Eo;
            if (Top_SWThisAfternoon <= Top_Trigger)
                SoilIsDry = true;
                
            //Lets bloody well irrigate then!!!!
            if ((IrrigationIsAvailable) && (SeasonIsOpen) && (IrrigatorIsAvailable) && (SoilIsDry)) //The conditions are rife for irrigation
            {
                Amount_to_apply = Math.Min(Top_Refull - (Top_SW - waterBalance.Eo), Maximum_Irrigation_Amount);
                Amount_to_apply = Math.Min(Amount_to_apply, Season_Allocation - Season_Application); 
                Amount_to_apply = Math.Max(Amount_to_apply, 0.0);
                Irrigation.Apply(Amount_to_apply);
                Days_since_irrigation = 0;
                Season_Application += Amount_to_apply;
                summary.WriteMessage(this, "Automatic Irrigation", MessageType.Diagnostic);
            
            }
        }
        
        [EventSubscribe("Harvesting")]
        private void OnHarvesting(object sender, EventArgs e)
        {
            Season_Application = 0;
        }
    }
}
```
        Soil: SoilType=NZ_sedementary; Region=Plains; State=Canterbury; Country=New Zealand; Latitude=0; Longitude=0
          DataSource=Generic profile descriptions provided by Trevor Webb and data for functional horizions based on SWAMP project results
          Comments=Bulk density values were measured on the fine earth fraction so values entered into apsim soil are adjusted down to account for stone content (assuming stones are inert from all soil process so their mass and volume is removed from model paramaters).  SAT, DUL, LL15 and Air dry have been adjusted down to account for stone content.  OC has not been adjusted so the model will get the correct carbon and N amounts using the adjusted BD.
          Physical
            Thickness  BD      AirDry  LL15   DUL      SAT     KS
            80         0.77    0.0165  0.033  0.1925   0.2365  100
            50         0.63    0.0135  0.027  0.1575   0.1935  100
            200        0.4225  0.013   0.013  0.04225  0.13    100
            670        0.2     0.008   0.008  0.022    0.1     100
            500        0.2     0.008   0.008  0.022    0.1     100
            SoilCrop SLURPSoil: LL=[0.033, 0.027, 0.013, 0.008, 0.008]; KL=[0.2, 0.2, 0.2, 0.2, 0.2]; XF=[1, 1, 1, 1, 1]
          Chemical: Thickness=[80, 50, 200, 670, 500]; PH=[6, 6, 6, 6, 6]; PHUnits=Water
          WaterBalance SoilWater: SummerDate=1-Oct; SummerU=9; SummerCona=4.4; WinterDate=1-Apr; WinterU=6; WinterCona=3; DiffusConst=88; DiffusSlope=35; Salb=0.13; CN2Bare=73; CNRed=20; CNCov=0.8; PSIDul=-100; Thickness=[80, 50, 200, 670, 500]; SWCON=[0.7, 0.7, 0.7, 0.7, 0.7]
          Organic: same as Tests.Factors.Permutation.Soil.XL.Organic
          Water: Thickness=[80, 50, 200, 670, 500]; InitialValues=[0.1925, 0.1575, 0.04225, 0.022, 0.022]; InitialPAWmm=41.515; RelativeTo=LL15; FilledFromTop=true
          CERESSoilTemperature Temperature
          Nutrient
          Solute NO3: Thickness=[80, 50, 200, 670, 500]; InitialValues=[40.5844, 63.4921, 17.7515, 7.46269, 1]; InitialValuesUnits=ppm; WaterTableConcentration=0; D0=0; DepthConstant=0; MaxDepthSoluteAccessible=0; RunoffEffectivenessAtMovingSolute=0; MaxEffectiveRunoff=0
          Solute NH4: Thickness=[80, 50, 200, 670, 500]; InitialValues=[1.62338, 3.1746, 1.18343, 0.746269, 0.2]; InitialValuesUnits=ppm; WaterTableConcentration=0; D0=0; DepthConstant=0; MaxDepthSoluteAccessible=0; RunoffEffectivenessAtMovingSolute=0; MaxEffectiveRunoff=0
          Solute Urea: Thickness=[80, 50, 200, 670, 500]; InitialValues=[0, 0, 0, 0, 0]; InitialValuesUnits=kg/ha; WaterTableConcentration=0; D0=0; DepthConstant=0; MaxDepthSoluteAccessible=0; RunoffEffectivenessAtMovingSolute=0; MaxEffectiveRunoff=0
        Report AnnualSummary: EventNames=[Slurp].Harvesting
          VariableNames:
            [Clock].Today
            [ExtraVariables].Script.AccumEO as AccumEO
            [ExtraVariables].Script.AccumEP as AccumEP
            [ExtraVariables].Script.AccumES as AccumES
            [ExtraVariables].Script.AccumDrainage as AccumDrainage
            [ExtraVariables].Script.AccumRunoff as AccumRunoff
            [ExtraVariables].Script.AccumRainfall as AccumRainfall
            [ExtraVariables].Script.AccumIrrigation as AccumIrrigation
            [ExtraVariables].Script.MeanTemp as MeanTemp
            [ExtraVariables].Script.MeanRadn as MeanRadn
            [ExtraVariables].Script.MeanFW as MeanFW
            [IrrigationControl].Script.Top_PAWC as PAWC_60
  Experiment LandP
    Memo
      In this test we run Slurp against a dataset of Soil water content measured over 3 years under lucerne with different irrigation treatments applied.  Slurp was able to reproduce the tempeoral patterns of the 4 different irrigation treatments with adequate accuracy.
    Factors
      Permutation
        Factor Irrigation
          CompositeFactor TwoPerWeek
            Specifications:
              [IrrigationEvents]
              [SetCropVariables].Script.Irrigation = High
            Operations IrrigationEvents
              2011-11-07  [Irrigation].Apply(30);
              2011-11-25  [Irrigation].Apply(13.6);
              2011-11-28  [Irrigation].Apply(20.1);
              2011-11-29  [Irrigation].Apply(16.4);
              2011-12-05  [Irrigation].Apply(27);
              2011-12-15  [Irrigation].Apply(8);
              2011-12-26  [Irrigation].Apply(22.5);
              2011-12-29  [Irrigation].Apply(16.5);
              2012-01-05  [Irrigation].Apply(22.8);
              2012-01-09  [Irrigation].Apply(17.8);
              2012-01-12  [Irrigation].Apply(9.1);
              2012-01-16  [Irrigation].Apply(18.3);
              2012-01-19  [Irrigation].Apply(18.6);
              2012-01-23  [Irrigation].Apply(22.5);
              2012-01-30  [Irrigation].Apply(8);
              2012-02-02  [Irrigation].Apply(12);
              2012-02-07  [Irrigation].Apply(16.5);
              2012-02-09  [Irrigation].Apply(13.3);
              2012-02-13  [Irrigation].Apply(12.2);
              2012-02-20  [Irrigation].Apply(13.3);
              2012-02-23  [Irrigation].Apply(8.8);
              2012-03-29  [Irrigation].Apply(10);
              2012-04-02  [Irrigation].Apply(6.5);
              2012-04-05  [Irrigation].Apply(5);
              2012-04-10  [Irrigation].Apply(6.9);
              2012-04-26  [Irrigation].Apply(4.6);
              2012-04-30  [Irrigation].Apply(6.9);
              2012-05-03  [Irrigation].Apply(3.2);
              2012-11-01  [Irrigation].Apply(18);
              2012-11-15  [Irrigation].Apply(12);
              2012-11-22  [Irrigation].Apply(12);
              2012-11-26  [Irrigation].Apply(12);
              2012-11-29  [Irrigation].Apply(12);
              2012-12-03  [Irrigation].Apply(6);
              2012-12-06  [Irrigation].Apply(12);
              2012-12-13  [Irrigation].Apply(12);
              2012-12-17  [Irrigation].Apply(20.8);
              2012-12-20  [Irrigation].Apply(12);
              2012-12-24  [Irrigation].Apply(12);
              2012-12-27  [Irrigation].Apply(9);
              2012-12-31  [Irrigation].Apply(12);
              2013-01-03  [Irrigation].Apply(12);
              2013-01-07  [Irrigation].Apply(18);
              2013-01-10  [Irrigation].Apply(18);
              2013-01-14  [Irrigation].Apply(21);
              2013-01-21  [Irrigation].Apply(15);
              2013-01-24  [Irrigation].Apply(15);
              2013-01-28  [Irrigation].Apply(15);
              2013-01-31  [Irrigation].Apply(15);
              2013-02-04  [Irrigation].Apply(18);
              2013-02-07  [Irrigation].Apply(6);
              2013-02-11  [Irrigation].Apply(18.7);
              2013-02-14  [Irrigation].Apply(13.5);
              2013-02-18  [Irrigation].Apply(15);
              2013-02-21  [Irrigation].Apply(15);
              2013-02-25  [Irrigation].Apply(15);
              2013-02-28  [Irrigation].Apply(32);
              2013-03-07  [Irrigation].Apply(12);
              2013-03-11  [Irrigation].Apply(9);
              2013-03-14  [Irrigation].Apply(9);
              2013-03-28  [Irrigation].Apply(18);
              2013-04-04  [Irrigation].Apply(9);
              2013-04-11  [Irrigation].Apply(9);
              2013-10-24  [Irrigation].Apply(9);
              2013-10-31  [Irrigation].Apply(15);
              2013-11-04  [Irrigation].Apply(6);
              2013-11-07  [Irrigation].Apply(9);
              2013-11-11  [Irrigation].Apply(9);
              2013-11-14  [Irrigation].Apply(9);
              2013-11-18  [Irrigation].Apply(12);
              2013-11-21  [Irrigation].Apply(12);
              2013-11-25  [Irrigation].Apply(9);
              2013-12-02  [Irrigation].Apply(9);
              2013-12-05  [Irrigation].Apply(12);
              2013-12-09  [Irrigation].Apply(6);
              2013-12-12  [Irrigation].Apply(11);
              2013-12-17  [Irrigation].Apply(15);
              2013-12-23  [Irrigation].Apply(7);
              2014-01-06  [Irrigation].Apply(14);
              2014-01-09  [Irrigation].Apply(12.6);
              2014-01-13  [Irrigation].Apply(15.7);
              2014-01-16  [Irrigation].Apply(14.7);
              2014-01-20  [Irrigation].Apply(17.5);
              2014-01-23  [Irrigation].Apply(7.5);
              2014-01-30  [Irrigation].Apply(10);
              2014-02-03  [Irrigation].Apply(12);
              2014-02-05  [Irrigation].Apply(10);
              2014-02-10  [Irrigation].Apply(9);
              2014-02-17  [Irrigation].Apply(10);
              2014-02-20  [Irrigation].Apply(10);
          CompositeFactor OnePerWeek
            Specifications:
              [IrrigationEvents]
              [SetCropVariables].Script.Irrigation = Med
            Operations IrrigationEvents
              2011-11-07  [Irrigation].Apply(30);
              2011-11-25  [Irrigation].Apply(13.6);
              2011-11-29  [Irrigation].Apply(36.5);
              2011-12-15  [Irrigation].Apply(34.9);
              2011-12-29  [Irrigation].Apply(41.8);
              2012-01-05  [Irrigation].Apply(22.8);
              2012-01-12  [Irrigation].Apply(26.9);
              2012-01-19  [Irrigation].Apply(36.8);
              2012-02-02  [Irrigation].Apply(19.8);
              2012-02-09  [Irrigation].Apply(30);
              2012-02-16  [Irrigation].Apply(13);
              2012-02-23  [Irrigation].Apply(14.3);
              2012-03-29  [Irrigation].Apply(10);
              2012-04-05  [Irrigation].Apply(11.4);
              2012-04-26  [Irrigation].Apply(11.5);
              2012-05-03  [Irrigation].Apply(10.1);
              2012-11-01  [Irrigation].Apply(18);
              2012-11-15  [Irrigation].Apply(12);
              2012-11-29  [Irrigation].Apply(24);
              2012-12-13  [Irrigation].Apply(21);
              2012-12-27  [Irrigation].Apply(33);
              2013-01-10  [Irrigation].Apply(42);
              2013-01-24  [Irrigation].Apply(39);
              2013-02-07  [Irrigation].Apply(30);
              2013-02-21  [Irrigation].Apply(42);
              2013-02-28  [Irrigation].Apply(20);
              2013-03-07  [Irrigation].Apply(30);
              2013-04-04  [Irrigation].Apply(27);
              2013-04-18  [Irrigation].Apply(15);
              2013-10-24  [Irrigation].Apply(12);
              2013-11-07  [Irrigation].Apply(24);
              2013-11-21  [Irrigation].Apply(33);
              2013-12-05  [Irrigation].Apply(30);
              2013-12-19  [Irrigation].Apply(17);
              2014-01-02  [Irrigation].Apply(12.7);
              2014-01-16  [Irrigation].Apply(40.9);
              2014-01-30  [Irrigation].Apply(35);
              2014-02-13  [Irrigation].Apply(25);
              2014-02-27  [Irrigation].Apply(32);
          CompositeFactor ThreeWeekly
            Specifications:
              [IrrigationEvents]
              [SetCropVariables].Script.Irrigation = Low
            Operations IrrigationEvents
              2011-11-07  [Irrigation].Apply(30);
              2011-11-29  [Irrigation].Apply(47.6);
              2011-12-15  [Irrigation].Apply(34.9);
              2011-12-29  [Irrigation].Apply(41.8);
              2012-01-12  [Irrigation].Apply(49.8);
              2012-01-26  [Irrigation].Apply(36.8);
              2012-02-09  [Irrigation].Apply(49.6);
              2012-02-23  [Irrigation].Apply(34.3);
              2012-04-05  [Irrigation].Apply(21.4);
              2012-05-03  [Irrigation].Apply(23.7);
              2012-11-01  [Irrigation].Apply(18);
              2012-11-22  [Irrigation].Apply(12);
              2012-12-13  [Irrigation].Apply(27);
              2013-01-03  [Irrigation].Apply(42);
              2013-01-24  [Irrigation].Apply(45);
              2013-02-14  [Irrigation].Apply(90.6);
              2013-02-28  [Irrigation].Apply(20);
              2013-03-07  [Irrigation].Apply(30);
              2013-03-28  [Irrigation].Apply(18);
              2013-04-18  [Irrigation].Apply(15);
              2013-10-24  [Irrigation].Apply(12);
              2013-11-14  [Irrigation].Apply(33);
              2013-12-05  [Irrigation].Apply(36);
              2014-01-16  [Irrigation].Apply(44.7);
              2014-02-05  [Irrigation].Apply(33.5);
              2014-02-27  [Irrigation].Apply(32);
          CompositeFactor None
            Specifications:
              [IrrigationEvents]
              [SetCropVariables].Script.Irrigation = Rain
            Operations IrrigationEvents
              2013-02-28  [Irrigation].Apply(20);
        Factor CoverType
          CompositeFactor Lucerne
            Specifications:
              [SlurpSowingRule].Script.SowingDate=2011-03-10
              [SlurpSowingRule].Script.CultivarName=Lucerne
              [SetCropVariables].Script.MaximumHeight = 600
              [SetCropVariables].Script.Cover = Lucerne
          CompositeFactor Pasture
            Specifications:
              [SlurpSowingRule].Script.SowingDate=2011-03-24
              [SlurpSowingRule].Script.CultivarName=Pasture
              [SetCropVariables].Script.MaximumHeight = 400
              [SetCropVariables].Script.Cover = Ryegrass
    Simulation LandPBase
      Weather: FileName=%root%/Examples/WeatherFiles/NZ_Lincoln
      Clock: Start=2011-03-01; End=2014-05-01
      Summary
      SoilArbitrator Soil Arbitrator
      Zone Field: Area=1; Slope=0; AspectAngle=0; Altitude=50
        Soil: Latitude=0; Longitude=0
          Chemical: Thickness=[100, 200, 300, 300, 300, 300]; PH=[6.6, 6.2, 5.7, 5.5, 5.5, 5.5]; PHUnits=Water
          Water: InitialPAWmm=240; RelativeTo=LL15; FilledFromTop=false
            Thickness=[150, 150, 100, 200, 200, 200, 200, 200, 200, 200, 200, 200, 400]
            InitialValues=[0.33, 0.33, 0.31, 0.15, 0.1, 0.06, 0.15, 0.1, 0.13, 0.13, 0.13, 0.13, 0.13]
          Physical
            Thickness  BD   AirDry  LL15  DUL   SAT
            150        1.2  0.05    0.1   0.33  0.5
            150        1.2  0.1     0.1   0.33  0.5
            100        1.2  0.12    0.12  0.31  0.44
            200        1.2  0.06    0.06  0.15  0.46
            200        1.2  0.04    0.04  0.1   0.44
            200        1.2  0.02    0.02  0.06  0.44
            200        1.2  0.06    0.06  0.15  0.46
            200        1.2  0.04    0.04  0.1   0.44
            200        1.2  0.06    0.06  0.13  0.44
            200        1.2  0.06    0.06  0.13  0.44
            200        1.2  0.06    0.06  0.13  0.44
            200        1.2  0.06    0.06  0.13  0.44
            400        1.2  0.06    0.06  0.13  0.44
            SoilCrop SlurpSoil
              LL=[0.1, 0.1, 0.12, 0.06, 0.04, 0.02, 0.06, 0.04, 0.06, 0.06, 0.06, 0.06, 0.06]
              KL=[0.06, 0.06, 0.06, 0.06, 0.06, 0.06, 0.06, 0.06, 0.06, 0.06, 0.06, 0.06, 0.06]
              XF=[1, 1, 1, 1, 1, 1, 1, 1, 1, 1, 1, 1, 1]
          WaterBalance SoilWater: SummerDate=1-Nov; SummerU=9; SummerCona=4.4; WinterDate=1-Apr; WinterU=9; WinterCona=4.4; DiffusConst=88; DiffusSlope=35.4; Salb=0.18; CN2Bare=68; CNRed=20; CNCov=0.8; DischargeWidth=0; CatchmentArea=0; PSIDul=-100
            Thickness  SWCON  KLAT
            150        0.55   0
            150        0.55   0
            100        0.55   0
            200        0.55   0
            200        0.55   0
            200        0.55   0
            200        0.55   0
            200        0.55   0
            200        0.55   0
            200        0.55   0
            200        0.55   0
            200        0.55   0
            400        0.55   0
          Organic: same as SlurpTestBase.Field.Soil.Organic
          CERESSoilTemperature Temperature
          Nutrient
          Solute NO3: Thickness=[100, 200, 300, 300, 300, 300]; InitialValues=[180.833, 12.5, 1.38889, 1.38889, 0, 0]; InitialValuesUnits=ppm; WaterTableConcentration=0; D0=0; DepthConstant=0; MaxDepthSoluteAccessible=0; RunoffEffectivenessAtMovingSolute=0; MaxEffectiveRunoff=0
          Solute NH4: same as SlurpTestBase.Field.Soil.NH4
          Solute Urea: same as SlurpTestBase.Field.Soil.Urea
        Plant Slurp
        MicroClimate: a_interception=0; b_interception=1; c_interception=0; d_interception=0; SoilHeatFluxFraction=0.4; MinimumHeightDiffForNewLayer=0; NightInterceptionFraction=0.5; ReferenceHeight=2
        Irrigation
        Fertiliser
        SurfaceOrganicMatter surface organic matter: InitialResidueName=wheat; InitialResidueType=wheat; InitialResidueMass=2000; InitialStandingFraction=0; InitialCPR=0; InitialCNR=80
        Operations IrrigationEvents
          1998-10-02  [Irrigation].Apply(40);
          1998-10-26  [Irrigation].Apply(70);
          1998-12-15  [Irrigation].Apply(70);
          1998-12-29  [Irrigation].Apply(10);
          1998-12-30  [Irrigation].Apply(55);
          1999-01-07  [Irrigation].Apply(50);
          1999-01-21  [Irrigation].Apply(40);
          1999-02-10  [Irrigation].Apply(28);
          1999-02-19  [Irrigation].Apply(15);
          1999-03-09  [Irrigation].Apply(25);
          1998-12-29  [Fertiliser].Apply(150, Fertiliser.Types.UreaN, 10);
          2011-11-07  [Irrigation].Apply(30);
          2011-11-25  [Irrigation].Apply(13.6);
          2011-11-28  [Irrigation].Apply(20.1);
        Manager ExtraVariables
```csharp
using Newtonsoft.Json;
using Models.PMF.Organs;
using APSIM.Shared.Utilities;
using System.Xml.Serialization;
using Models;
using Models.PMF;
using Models.Soils;
using System.Text;
using System.Collections.Generic;
using Models.Core;
using System;
using Models.Climate;
using Models.Interfaces;

namespace Models
{
    [Serializable] 
    public class Script : Model
    {
        [Link] private Clock Clock;
        [Link] private Soils.Soil Soil;
        [Link] private Models.Surface.SurfaceOrganicMatter SOM;
        [Link] private Weather Met;
        [Link] private Fertiliser Fert;
        [Link] private Irrigation Irrig;
        [Link] private Plant Slurp;
        [Link] private Zone zone;
        [Link(Type = LinkType.Path, Path = "[Slurp].Root")]
        private Root root;
        [Link]
        private ISoilWater waterBalance;
                    
        [JsonIgnore] public bool InitialDay { get; set; }
    
        
        [JsonIgnore] public double AccumEO { get; set; }
        [JsonIgnore] public double AccumEP { get; set; }
        [JsonIgnore] public double AccumES { get; set; }
        [JsonIgnore] public double AccumDrainage { get; set; }
        [JsonIgnore] public double AccumRunoff { get; set; }
        [JsonIgnore] public double AccumOutflowLat { get; set; }
        [JsonIgnore] public double AccumIrrigation { get; set; }
        [JsonIgnore] public double AccumRainfall { get; set; }
        [JsonIgnore] public double SoilWaterDeficit { get; set; }
    
        [JsonIgnore] public double OutFlowLat { get; set; }

        [EventSubscribe("StartOfSimulation")]
        private void OnSimulationCommencing(object sender, EventArgs e)
        {
            InitialDay = true;
        }
        
        [EventSubscribe("DoManagement")]
        private void OnDoManagement(object sender, EventArgs e)
        {
            //!!!!!! Water balance components !!!!!!
            //!!!!!!^^^^^^^^^^^^^^^^^^^^^^^^^^!!!!!!

            AccumIrrigation += Irrig.IrrigationApplied;
            AccumRainfall += Met.Rain;
            AccumEP -= (double)zone.Get("Slurp.Root.WaterUptake");
            double OutFlowLat = MathUtilities.Sum(waterBalance.LateralOutflow);
            AccumOutflowLat -= OutFlowLat;
        }
        
        [EventSubscribe("DoManagementCalculations")]
        private void OnDoManagementCalculations(object sender, EventArgs e)
        {
            AccumEO -= waterBalance.Eo;
            AccumES -= waterBalance.Es; 
            AccumDrainage -= waterBalance.Drainage;
            AccumRunoff -= waterBalance.Runoff;
        }
    }
}
```
        Manager SlurpSowingRule
          CultivarName = Lucerne
          InitialRootDepth = 15
          SowingDate = 2011-03-14
          script: same as in SlurpTestBase.Field.SlurpSowingRule
        Report: EventNames=[Clock].DoReport
          VariableNames:
            [Clock].Today
            [Soil].SoilWater.Eo
            [Soil].SoilWater.Es
            [Soil].SoilWater.Drainage
            [Soil].SoilWater.Runoff
            [ExtraVariables].Script.OutFlowLat
            [Soil].SoilWater.pond
            [ExtraVariables].Script.AccumEO
            [ExtraVariables].Script.AccumEP
            [ExtraVariables].Script.AccumES
            [ExtraVariables].Script.AccumDrainage
            [ExtraVariables].Script.AccumRunoff
            [ExtraVariables].Script.AccumRainfall
            [ExtraVariables].Script.AccumIrrigation
            [ExtraVariables].Script.AccumOutflowLat
            [ExtraVariables].Script.SoilWaterDeficit
            [Slurp].Root.WaterUptake
            [Slurp].Leaf.Transpiration
            [Slurp].Leaf.WaterDemand
            [Slurp].Root.Depth
            [Slurp].Leaf.CoverTotal
            [Slurp].Leaf.LAI
            [Slurp].Leaf.Height
            [Soil].Water.Volumetric
            sum([Soil].Water.MM[1:9]) as PSWC
            [SetCropVariables].Script.Treatment
            [SetCropVariables].Script.Cover as Cover
        Manager SetCropVariables
          CoverFile = %root%\Tests\Validation\Slurp\ShallowSoilTest\CoverInterpolated.csv
          Ext_coef = 0.8
          MaximumHeight = 600
          Cover =
          Irrigation =
          Treatment =
          leaflai = 0
```csharp
using Models.Soils;
using System.Data;
using APSIM.Shared.Utilities;
using System.Xml.Serialization;
using Models;
using Models.PMF;
using System.Text;
using System.Collections.Generic;
using Models.Core;
using System;
using Newtonsoft.Json;

namespace Models
{
    [Serializable] 
    //[System.Xml.Serialization.XmlInclude(typeof(Model))]
    public class Script : Model
    {
        [Link] Plant SCRUM;
        [Link] Clock Clock;
        [Link] Zone zone;
        [Link] Simulation Simulation;
        
        [Description("File of Yields")]
        public string CoverFile { get; set; }
        [Description("Extinction coefficient")]
        public  double Ext_coef { get; set; }
        [Description("Maximum height of the crop at full cover")]
        public double MaximumHeight { get; set; }
        
        [JsonIgnore] private DataTable Covers { get; set; }

        public string Cover { get; set; }
        public string Irrigation { get; set; }
        public string Treatment { get; set; }
        
        private double CoverRead { get; set; }
        public double leaflai { get; private set; }
                
        [EventSubscribe("StartOfSimulation")]
        private void OnStartOfSimulation(object sender, EventArgs e)
        {
            
            Treatment = Cover + "_" + Irrigation;
            
            string fullFileName = PathUtilities.GetAbsolutePath(CoverFile, Simulation.FileName);
            
            ApsimTextFile textFile = new ApsimTextFile();
            textFile.Open(fullFileName);
            Covers = textFile.ToTable();
            textFile.Close();
        }
        
        [EventSubscribe("StartOfDay")]
        private void OnStartOfDay(object sender, EventArgs e)
        {
            foreach (DataRow row in Covers.Rows)
            {
                DateTime TodayDate = Convert.ToDateTime(row["Date"]);
                if (TodayDate.Date == Clock.Today.Date)
                {
                    CoverRead = Convert.ToDouble(row[Treatment]);
                }
            }
        
            if ((bool)zone.Get("Slurp.IsAlive") == true)
            {
                //Only assign cover valuse if crop is emerged
                
                if (CoverRead == 1)
                    leaflai = Math.Log(0.01) / -Ext_coef;
                else
                {
                    if (CoverRead > 0)
                        leaflai = Math.Log(1 - CoverRead) / -Ext_coef;
                    else
                        leaflai = 0;
                }
                //Summary.WriteMessage(this, "LAI " + leaflai, MessageType.Diagnostic);
                object LAIResetValue = leaflai;
                zone.Set("Slurp.Leaf.Area.FixedValue", LAIResetValue);  
                object HeightResetValue = CoverRead * MaximumHeight;
                zone.Set("Slurp.Leaf.HeightFunction.FixedValue", HeightResetValue);  
            }
        }
    }
}
```
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