folder Soils: version=37; creator=Apsim 7.10-r4220
  Soil: Latitude=-27.18; Longitude=151.26; YearOfSampling=0
    Water
      Thickness  BD     AirDry  LL15   DUL    SAT
      100        1.011  0.13    0.261  0.521  0.589
      150        1.071  0.199   0.248  0.497  0.566
      250        1.094  0.28    0.28   0.488  0.557
      250        1.159  0.28    0.28   0.48   0.533
      250        1.173  0.28    0.28   0.472  0.527
      250        1.163  0.28    0.28   0.457  0.531
      250        1.187  0.28    0.28   0.452  0.522
      BD source: Field measured and checked for sensibility
      AirDry, LL15, DUL source: Estimated based on local knowledge
      SAT source: Calculated from measured, estimated or calculated BD
      SoilCrop Wheat: LL=[0.261, 0.248, 0.28, 0.306, 0.36, 0.392, 0.446]; KL=[0.06, 0.06, 0.06, 0.04, 0.04, 0.02, 0.01]; XF=[1, 1, 1, 1, 1, 1, 1]
    SoilWater: SummerCona=3; SummerU=4; SummerDate=1-Nov; WinterCona=3; WinterU=4; WinterDate=1-Apr; DiffusConst=40; DiffusSlope=16; Salb=0.1; CN2Bare=65; CNRed=20; CNCov=0.8; Thickness=[100, 150, 250, 250, 250, 250, 250]; SWCON=[0.3, 0.3, 0.3, 0.3, 0.3, 0.3, 0.3]
    SoilOrganicMatter: RootCN=70; RootWt=5250; SoilCN=17.2; EnrACoeff=7.4; EnrBCoeff=0.2; OCUnits=Total
      Thickness  OC     FBiom  FInert
      100        4.4    0.04   0.4
      150        0.55   0.02   0.6
      250        0.543  0.02   0.8
      250        0.37   0.02   1
      250        0.267  0.01   1
      250        0.268  0.01   1
      250        0.218  0.01   1
      OC source: Measured
    Analysis: Thickness=[100, 150, 250, 250, 250, 250, 250]; PH=[8, 8, 8, 8, 8, 8, 8]; PHUnits=Water; BoronUnits=HotWater
      PH source: Measured
