Simulations: Version=111
  Simulation ICRISAT_BM8asdf
    Weather: FileName=%root%\Examples\WeatherFiles\lincoln.met
    Clock: Start=2000-01-01; End=2000-02-01
    Summary summaryfile
    SoilArbitrator Soil Arbitrator
    Zone Field: Area=1; Slope=0; AspectAngle=0; Altitude=50
      MicroClimate: a_interception=0; b_interception=1; c_interception=0; d_interception=0; soil_albedo=0.13; SoilHeatFluxFraction=0.4; MinimumHeightDiffForNewLayer=0; NightInterceptionFraction=0.5; ReferenceHeight=2
      SurfaceOrganicMatter: InitialResidueName=wheat; InitialResidueType=wheat; InitialResidueMass=1500; InitialStandingFraction=0; InitialCPR=0; InitialCNR=76
      Report: VariableNames=[Clock].Today; EventNames=[Clock].DoReport
      Soil Vertosol_9_PAWC180: ASCOrder=Vertosol; SoilType=Clay; Site=Generic-Qld; State=Generic; Country=Australia; NaturalVegetation=NA; ApsoilNumber=521-GENERIC; Latitude=-27.183286; Longitude=151.263748; LocationAccuracy=Regional Soil Type; DataSource=Generic soil. CSIRO Sustainable Ecosystems, Toowoomba
        Comments=Generic soil developed by Allan Peake. 'Typical Vertosol' soil properties have been calculated as the average of vertosols with similar characteristics from within the Apsoil database. Groupings were made on the basis of bulk density. Measured BD, DUL and CLL for the groups were then averaged to derive the characteristics of the typical Vertosols. They can then be used in conjunction with measured soil water to simplify the selection of appropriate Vertosols, for paddocks where full soil characterisations have not yet been completed. For more information see Peake et al. 2010: ‘A rapid method for estimating the plant available water capacity of Vertosols’, 2010 Australian Agronomy Conference. Typical Vertosols are different to 'Generic' soil types elsewhere in the Apsoil database, which are representative of certain soil types and districts, but have not been calculated from large numbers of similar, characterised soils.
        Physical
          Thickness  BD    AirDry  LL15   DUL    SAT
          150        1.44  0.101   0.201  0.378  0.428
          150        1.43  0.167   0.209  0.379  0.429
          300        1.43  0.224   0.224  0.38   0.43
          300        1.46  0.224   0.224  0.368  0.418
          300        1.48  0.224   0.224  0.363  0.413
          300        1.49  0.224   0.224  0.357  0.407
          300        1.49  0.224   0.224  0.357  0.407
          SoilCrop ChickpeaSoil: LL=[0.201, 0.209, 0.224, 0.244, 0.31, 0.34, 0.357]; KL=[0.045, 0.045, 0.045, 0.03, 0.025, 0.02, 0.01]; XF=[1, 1, 1, 1, 1, 1, 1]
            LL source: Field measured and checked for sensibility
          SoilCrop CottonSoil: LL=[0.201, 0.209, 0.224, 0.244, 0.279, 0.31, 0.341]; KL=[0.1, 0.1, 0.1, 0.1, 0.09, 0.07, 0.05]; XF=[1, 1, 1, 1, 1, 1, 1]
            LL source: Field measured and checked for sensibility
          SoilCrop SorghumSoil: LL=[0.201, 0.209, 0.224, 0.244, 0.279, 0.31, 0.341]; KL=[0.07, 0.07, 0.07, 0.05, 0.05, 0.04, 0.03]; XF=[1, 1, 1, 1, 1, 1, 1]
            LL source: Field measured and checked for sensibility
        WaterBalance SoilWater: SummerDate=1-Apr; SummerU=2; SummerCona=4.5; WinterDate=1-May; WinterU=2; WinterCona=4.5; DiffusConst=40; DiffusSlope=16; Salb=0.13; CN2Bare=78; CNRed=20; CNCov=0.8; Thickness=[150, 150, 300, 300, 300, 300, 300]; SWCON=[0.3, 0.3, 0.3, 0.3, 0.3, 0.3, 0.3]
        SoilNitrogen: fom_types=[default, manure, mucuna, lablab, shemp, stable]; fract_carb=[0.2, 0.3, 0.54, 0.57, 0.45, 0]; fract_cell=[0.7, 0.3, 0.37, 0.37, 0.47, 0.1]; fract_lign=[0.1, 0.4, 0.09, 0.06, 0.08, 0.9]; NPartitionApproach=0
          SoilNitrogenNO3 NO3
          SoilNitrogenNH4 NH4
          SoilNitrogenUrea Urea
          SoilNitrogenPlantAvailableNO3 PlantAvailableNO3
          SoilNitrogenPlantAvailableNH4 PlantAvailableNH4
        Organic: FOMCNRatio=40
          Thickness  Carbon   SoilCNRatio  FBiom  FInert  FOM
          150        1.235    12           0.04   0.4     347.129
          150        0.988    12           0.02   0.6     270.344
          300        0.6175   12           0.02   0.8     163.972
          300        0.30875  12           0.02   1       99.4541
          300        0.18525  12           0.01   1       60.322
          300        0.1235   12           0.01   1       36.5871
          300        0.1235   12           0.01   1       22.1912
        Chemical: Thickness=[150, 150, 300, 300, 300, 300, 300]; PH=[8.1, 8.7, 8.9, 8, 7, 6.4, 5.8]
        Sample Initial water: Thickness=[150, 150, 300, 300, 300, 300, 300]; SW=[0.339, 0.346, 0.373, 0.4, 0.396, 0.396, 0.396]; SWUnits=Volumetric; OCUnits=Total; PHUnits=Water
        CERESSoilTemperature
        Sample Initial nitrogen: Thickness=[150, 150, 300, 300, 300, 300, 300]; SWUnits=Volumetric; OCUnits=Total; PHUnits=Water
  DataStore
