Simulations: Version=218
  DataStore
  Simulation SingleRun
    Clock: Start=2001-01-10; End=2001-04-01
      CLEMEvents: TimeStep=1; CustomTimeStep=0; EcologicalIndicatorsCalculationInterval=12; EcologicalIndicatorsCalculationMonth=7
    Summary summaryfile
    RandomNumberGenerator: Seed=1
    ZoneCLEM CLEM: UserType=2; FarmMultiplier=1; DescriptiveSummaryFormatStyle=0; BuildTransactionCategoryFromTree=false; UseModelNameAsTransactionCategory=false; Area=0; Slope=0; AspectAngle=0; Altitude=50
      ResourcesHolder Resources
        RuminantHerd Ruminants: TransactionStyle=0
          RuminantType Sheep
            RuminantInitialCohorts InitialCohorts: WeightWarningOccurred=true; ManagedPastureName=Not specified
              RuminantTypeCohort Male: Sex=1; AgeDetails={Parts=[0, 0, 259]}; AgeSD=0; Number=1; Weight=37.3; WeightSD=0; InitialFatProteinStyle=2; InitialFatProteinValues=[236.1388, 93.1554, 10.5434]; Suckling=false; Sire=false; ProportionFleecePresent=0; ManagedPastureName=Not specified
                SetAttributeWithValue Castrated: AttributeName=Castrated; Category=1; Value=0; MinimumValue=0; MaximumValue=100; StandardDeviation=0; UseStandardDeviationSign=false; InheritanceStyle=0; GenotypeStandardDeviation=0; Mandatory=false
            RuminantParametersHolder Parameters: DisplaySummaryParameters=true
              RuminantParametersBreeding Breeding: OestrusCycleLength=20; DaysInHeat=2; ProportionOffspringMale=0.5; DaysLastBirthToStartOestrus=20; MaximumMaleMatingsPerDay=5; AllowFreemartins=false; ConceptionDuringLactationProbability=1; DystociaCoefficients=[1.4, 9.815]
              RuminantParametersGeneral General: Breed=Crossbred; NaturalWeaningAge={Parts=[0]}; MinimumSizeForMaturityFemale=0.6; MinimumSizeForMaturityMale=0.6; GestationLength={Parts=[0, 0, 150]}; MultipleBirthRate=[0.3, 0.05]; SRWFemale=58.3333; SRWCastrateMaleMultiplier=1.2; SRWMaleMultiplier=1.4; BirthScalar=[0.1, 0.085, 0.07]; EffectRelativeSizeBirthWeight_CP4=0.33; BaseAnimalEquivalent=50; RelBCToScoreRate=0.15; BCScoreRange=[0, 3, 5]; ProportionEBWFatFemale=0.25; ProportionEBWFatMale=0.25; ProportionEBWFatMax=0.45; GutFillMinimum=0.04; AgeGrowthRateCoefficientProvisionStyle=0; AgeGrowthRateCoefficient_CN1=0.0157; CN1EstimatedWeaningWeight=0; CN1EstimatedWeaningAge={Parts=[0]}; SRWGrowthScalar_CN2=0.27; SlowGrowthFactor_CN3=0.4; MJEnergyPerKgFat=39.6; MJEnergyPerKgProtein=23.8; IncludeWool=true
              RuminantParametersGrazing Grazing: GreenDietMax=0.98; GreenDietCoefficient=0.15; GreenDietZero=0.04; IntakeCoefficientBiomass=0.01; StrictFeedingLimits=true
              RuminantParametersGrowPF GrowPFParams
                RuminantParametersGrowPFCACRD CACRD: RumenDegradabilityIntercept_CRD1=0.3; RumenDegradabilitySlope_CRD2=0.25; RumenDegradabilityConcentrateSlope_CRD3=0.1; RumenDegradableProteinIntercept_CRD4=0.007; RumenDegradableProteinSlope_CRD5=0.005; RumenDegradableProteinExponent_CRD6=0.35; ProteinShortfallAlleviationScalar=0; MilkProteinDigestibility_CA5=0.92; MicrobialProteinDigestibility_CA7=0.6; FaecalProteinFromMCP_CA8=0.25
                RuminantParametersGrowPFCD CD: BasalMortalityRate_CD1=5.53e-05; EffectBCOnMortality1_CD2=0.3; EffectBCOnMortality2_CD3=0.6; CriticalFatToEBMForSurvival=0.05; RelativeDifferenceWeightDyingIndividuals_CD12=0.1; UpperLimitForMortalityInWeaners_CD13=0.0001
                RuminantParametersGrowPFCG CG: EfficiencyOfDPLSUseForWool_CG1=0.6; EfficiencyOfDPLSUseFromFeed_CG2=0.7; EfficiencyOfDPLSUseFromMilk_CG3=0.8; GainCurvature_CG4=6; GainMidpoint_CG5=0.4; ConditionNoEffect_CG6=0.9; ConditionMaxEffect_CG7=0.97; GrowthEnergyIntercept1_CG8b=6.7; GrowthEnergyIntercept2_CG9=20.3; GrowthEnergySlope1_CG10=2; GrowthEnergySlope2_CG11=13.8; ProteinGainIntercept1_CG12b=0.21; ProteinGainIntercept2_CG13=0.14; ProteinGainSlope1_CG14b=0.004; ProteinGainSlope2_CG15=0.115; BreedGrowthEfficiencyScalar=1; BreedLactationEfficiencyScalar=1; BreedMainenanceEfficiencyScalar=1; ProteinContentOfFatFreeTissueGainWetBasis=0.21; ProteinContentOfFatFreeTissueGainWetBasisAtBirth=0.1373; DaysUntilStandardProteinContentOfFatFreeTissueGainWetBasis=30; DietaryProteinEnergyReleaseEfficiency=0.4; DietaryProteinEnergyReleaseEfficiencyWhenNetEnergyDeficit=0.8; FatPercentToProportionEDeficitTakenFromBodyFatIntercept=0.875; FatPercentToProportionEDeficitTakenFromBodyFatSlope=0.033
                RuminantParametersGrowPFCI CI: IntakeReductionFromInsufficientRDPIntake=1; IgnoreFeedQualityIntakeAdjustment=false; RelativeSizeScalar_CI1=0.04; RelativeSizeQuadratic_CI2=1.7; RumenDevelopmentCurvature_CI3=0.5; RumenDevelopmentAge_CI4=25; PeakLactationIntakeDay_CI8=28; LactationResponseCurvature_CI9=1.4; EffectLevelsMilkProdOnIntake_CI10=0.6; BasalMilkRelSRW_CI11=0.05; LactationConditionLossAdjustment_CI12=0.15; LactationConditionLossThreshold_CI13=0.02; LactationConditionLossThresholdDecay_CI14=0.002; ConditionAtParturitionAdjustment_CI15=0.5; PeakLactationIntakeLevel_CI19=[0.655, 0.884, 1.114]; RelativeConditionEffect_CI20=1; DigestibilityPeak_CR1=0.8; DigestibilitySlope_CR3=1.25; QualityIntakeSubsititutionFactorNonLactating_CR11=10.5; QualityIntakeSubsititutionFactorLactating_CR20=11.5; MethaneEmissionsParameter1=0.0184; MethaneEmissionsParameter2=13; MethaneEmissionsParameter3=7.52; MethaneEmissionsParameter4=23.7; MethaneEmissionsParameter5=3.36
                RuminantParametersGrowPFCKCL CKCL: ELactationEfficiencyIntercept_CK5=0.4; ELactationEfficiencyCoefficient_CK6=0.02; ExpectedPeakYield=10; PeakYieldScalar_CL0=[0.486, 0.778, 0.934]; MetabolisabilityOfMilk_CL5=0.94; EnergyContentMilk_CL6=4.7; LactationEnergyDeficit_CL7=1.17; MilkConsumptionLimit1_CL12=0.3; MilkConsumptionLimit2_CL13=0.41; MilkConsumptionLimit3_CL14=0.071; ProteinPercentMilk_CL15=4.5; AdjustmentOfPotentialYieldReduction_CL16=0.7; PotentialYieldReduction_CL17=0.01; PotentialYieldReduction2_CL18=0.1; PotentialLactationYieldParameter_CL19=1.6; PotentialYieldMEIEffect_CL20=4; PotentialYieldLactationEffect_CL21=0.008; PotentialYieldLactationEffect2_CL22=0.012; PotentialYieldConditionEffect_CL23=3; PotentialYieldConditionEffect2_CL24=0.6
                RuminantParametersGrowPFCM CM: HPVisceraFL_CM1=0.09; FHPScalar_CM2=0.26; MainExponentForAge_CM3=8e-05; AgeEffectMin_CM4=0.84; MilkScalar_CM5=0.23; GrazingEnergyFromMetabolicScalar_CM6=0.02; EFPFromMilkDiet_CM11=0.00046; BreedEUPFactor1_CM12=0.0147; BreedEUPFactor2_CM13=0.03375; DermalLoss_CM14=0
                RuminantParametersGrowPFCP CP: FetalNormWeightParameter_CP2=1.304; FetalNormWeightParameter2_CP3=2.625; EffectFetalRelativeSizeOnBirthWeight_CP4=0.33; ConceptusWeightRatio_CP5=1.43; ConceptusWeightParameter_CP6=3.38; ConceptusWeightParameter2_CP7=0.91; ConceptusEnergyContent_CP8=4.33; ConceptusEnergyParameter_CP9=4.37; ConceptusEnergyParameter2_CP10=0.965; ConceptusProteinContent_CP11=0.134; ConceptusProteinParameter_CP12=4.56; ConceptusProteinParameter2_CP13=0.9; FetalGrowthPoorCondition_CP14=[1.5, 1.75, 2]; ToxaemiaCoefficients=[0.2, 29.44]
                RuminantParametersGrowPFCW CW: StandardFleeceWeight=3; EnergyContentCleanWool_CW1=24; BasalCleanWoolGrowth_CW2=0.004; CleanToGreasyCRatio_CW3=0.7; LagFactorForWool_CW4=0.04; WoolGrowthProportionAtBirth_CW5=0.25; DPLSLimitationForWoolGrowth_CW7=1.35; MEILimitationOnWoolGrowth_CW8=0.016; PregLactationAdjustment_CW9=1; AgeFactorExponent_CW12=0.025
              RuminantParametersGrowMortality Mortality: MortalityCoefficient=2.5; MortalityIntercept=0.05; MortalityExponent=3; JuvenileMortalityCoefficient=3; JuvenileMortalityMaximum=0.2; JuvenileMortalityExponent=1.8
              RuminantParametersLactation Lactation: MilkingDays=300; MilkPeakYield=4; MilkCurveSuckling_CL3=0.6; MilkCurveNonSuckling_CL4=0.11; MilkOffsetDay=4; MilkPeakDay=45
              RuminantParametersGrowOddy GrowOddyParams: MaintenanceFactor=1.4; pm=0.226; e0=0.249; cs1=0.676; cs2=2.061; cs3=0.53; bm=0.019; bv=0.185; pv=0.05; km=0.7; kp=0.4; kf=0.7; lf=0; lp=0; kl=0.5; kc=0.133; pPrpM=0.21; pPrpV=0.157; leanM=0.75; shrink=0.86; pMusc=0.85; pMuscBirth=0.85
              RuminantParametersGrowSCA07 SCA07: MaintenanceFactor=1.4
      ActivitiesHolder Activities
        RuminantActivityGrowPF: ReportUnfed=false; OnPartialResourcesAvailableAction=0
        RuminantActivityGrowOddy (disabled)
        RuminantActivityGrowSCA07 (disabled)
