Simulations: Version=221
  DataStore
  Simulation StandAlone
    Clock: Start=2002-06-01; End=2022-06-30
      CLEMEvents: TimeStep=30; CustomTimeStep=0; EcologicalIndicatorsCalculationInterval=12; EcologicalIndicatorsCalculationMonth=7
    Summary summaryfile
      Memo
        Lots of good info here in the log. Check it from time to time.
    RandomNumberGenerator: Seed=1
    ZoneCLEM CLEM: UserType=1; FarmMultiplier=1; DescriptiveSummaryFormatStyle=0; BuildTransactionCategoryFromTree=false; UseModelNameAsTransactionCategory=false; Area=0; Slope=0; AspectAngle=0; Altitude=50
      FileSQLitePasture: FileName=sturtalluv_kid_Native_inputs.db; TableName=Native_Inputs; RegionColumnName=Region; LandIdColumnName=Soil; GrassBAColumnName=GrassBA; LandConColumnName=LandCon; StkRateColumnName=StkRate; YearColumnName=Year; MonthColumnName=Month; GrowthColumnName=Growth; ErosionColumnName=SoilLoss; RunoffColumnName=RunOff; RainfallColumnName=Rainfall; CoverColumnName=Cover; TBAColumnName=TreeBA; MissingDataAction=1
      ResourcesHolder Resources
        Land: UnitsOfArea=hectares; UnitsOfAreaToHaConversion=1
          LandType WholeProperty: LandArea=65000; PortionBuildings=0; ProportionOfTotalArea=1; SoilType=1
            Notes:
              Now equivalent to area of pasture.
              DPIF = 100,000 ha.
              DPIF Roper = 65% used.
              DPIF Sturt = 83% used.
            Memo DPIF_Areas
              Reduced just to get the sim working. Bring back to realistic size when runnning. See also 'Resources.LandType' ‘Land Area’and set the same (and ask Adam what the difference is).

              DPIF = 100,000 ha.
              DPIF Roper = 65% used.
              DPIF Sturt = 83% used.
        GrazeFoodStore
          GrazeFoodStoreType NativePasture: TypeOfFeed=4; GrossEnergyContent=18.4; MetabolisableEnergyContent=8.2; NitrogenPercent=0; GreenNitrogenPercent=2; DecayNitrogen=0.4; MinimumNitrogen=0.4; RumenDegradableProteinPercent=58; DMDStyle=1; DryMatterDigestibility=41.4; GreenDMD=58; NToDMDCoefficient=11.03; NToDMDIntercept=41.4; DecayDMD=0.12; MinimumDMD=42; DetachRate=0.03; CarryoverDetachRate=0.12; AcidDetergentInsolubleProtein=0.0798; CrudeProteinPercent=0; FatPercent=1.9; GutFillHighQuality=0.08; GutFillLowQuality=0.2; StartingAmount=2000; FirstMonthOfGrowSeason=11; LastMonthOfGrowSeason=5; NumberMonthsForInitialBiomass=5
            Notes=11/1/23 was running with 0.13 and 1.9 before sending to Adam
      ActivitiesHolder Activities
        PastureActivityManage GrowPasture: LandTypeNameToUse=Land.WholeProperty; AreaRequested=20000; UseAreaAvailable=false; FeedTypeName=GrazeFoodStore.NativePasture; PastureDataReader=FileSQLitePasture; StartingStockingRate=5; OnPartialResourcesAvailableAction=0
          Notes=DPIF = 100,000 ha. DPIF Roper = 65% used. DPIF Sturt = 83% used.
          Relationship Relationship_LandCondition: Identifier=Utilisation % to change in Land condition index; XValues=[0, 20, 30, 100]; YValues=[-0.625, -0.125, 0, 0.75]; CalculationMethod=1; NameOfXVariable=% utilisation; NameOfYVariable=Change in LC index
            RelationshipRunningValue LC: StartingValue=5; Minimum=4.5; Maximum=5.5; Notes=Aim for an average of 1900 kg/ha growth
          Relationship Relationship_GrassBasalArea: Identifier=Utilisation % to change in Grass basal area; XValues=[0, 20, 30, 100]; YValues=[1, 0, -0.1, -0.15]; CalculationMethod=1; NameOfXVariable=%Utilisation; NameOfYVariable=Change in GBA
            RelationshipRunningValue GBA: StartingValue=1.6; Minimum=1.5; Maximum=1.7; Notes=Aim for an average of 1900 kg/ha growth
