Simulations: Version=185
  Memo
    Simulation of the inability of "slope effects on weather" to differentiate paddocks (zones) with different aspects (or slopes) wihtin a simulation, but it works OK when they are separated into two simulations.
  DataStore
  Simulation Ballantrae_sites1
    SoilArbitrator
    Weather: Latitude=-40.3; Tav=12.3; Amp=10.4
      FileName=%root%/Tests/UnitTests/Climate/Resources/Ballantrae1972-2024.met
    MicroClimate: a_interception=0; b_interception=0; c_interception=0; d_interception=0; SoilHeatFluxFraction=0; MinimumHeightDiffForNewLayer=0; NightInterceptionFraction=0; ReferenceHeight=2
    Clock: Start=2015-07-01; End=2024-06-30
    Summary summaryfile
    Forages
      Parameters:
        Name                          LiveDigestibility  DeadDigestibility  LiveFractionConsumable  DeadFractionConsumable  LiveMinimumBiomass  DeadMinimumBiomass
        SurfaceOrganicMatter.Residue  0.7                0.3                0                       0                       100                 0
        AGPRyegrass.Leaf              FromModel          FromModel          1                       1                       100                 0
        AGPRyegrass.Stem              FromModel          FromModel          1                       1                       100                 0
        AGPRyegrass.Stolon            FromModel          FromModel          1                       1                       100                 0
        AGPWhiteClover.Leaf           FromModel          FromModel          1                       1                       100                 0
        AGPWhiteClover.Stem           FromModel          FromModel          1                       1                       100                 0
        AGPWhiteClover.Stolon         FromModel          FromModel          1                       1                       100                 0
        AGPBrownTop.Leaf              FromModel          FromModel          1                       1                       100                 0
        AGPBrownTop.Stem              FromModel          FromModel          1                       1                       100                 0
        AGPBrownTop.Stolon            FromModel          FromModel          1                       1                       100                 0
    Zone Site4_30_180: Area=1; Slope=30; AspectAngle=180; Altitude=300
      SlopeEffectsOnWeather: SurroundsAlbedo=0.2; A_diffuseRadn=-3.664; B_diffuseRadn=7.011; TurbidityCoefficient=0.95; a_ki=0.98; b_ki=0.00146; c_ki=0.075; d_ki=0.4; a_pw=2.1; b_pw=0.14; aT0=1.61; bT=0.88; cT=0.12; FN=0.81; FM=0.5; RainMeasured=-0.1; WindSpeedMeasured=-0.1; VPMeasured=-0.1
        zero: FracRadnDirect, dRain, dWind, dVapPressure, RadnMeasured, RadnDirect, RadnDiffuse, RadnReflected, ExtraterrestrialRadn, MaxDirSunlightLength, ActualDirSunlightLength, ClearnessIndex, DiffuseRadnFraction, DirRadnRatio, DiffRadnRatio, FracRadnDiffuse, FracRadnReflected, TminMeasured, TmaxMeasured, dltTmin, dltTmax, AtmosphericPressure
      SimpleGrazing: GrazingRotationType=2; SimpleGrazingFrequencyString=21; SimpleMinGrazable=1600; SimpleGrazingResidual=1500; FlexibleGrazePostDM=0; FractionDefoliatedBiomassToSoil=[0.1]; FractionDefoliatedNToSoil=[0.6]; FractionExcretedNToDung=[0.35]; CNRatioDung=0; DepthUrineIsAdded=30; SendDungElsewhere=0; SendUrineElsewhere=0; FractionPopulationDecline=0; TramplingOn=true; MaximumPropLitterMovedToSoil=0.1; PastureConsumedAtMaximumRateOfLitterRemoval=1200
        PreGrazeDMArray=[2600, 2500, 2500, 2500, 2500, 2500, 2500, 2500, 2600, 2700, 2800, 2700]
        PostGrazeDMArray=[1500, 1500, 1500, 1500, 1400, 1400, 1400, 1400, 1500, 1500, 1600, 1500]
      Operations
        2015-07-01  [AGPWhiteClover].GlfSoilFertility=0.8
        2015-01-31  [SimpleGrazing].GrazeToResidual(1200)
        2015-03-31  [SimpleGrazing].GrazeToResidual(1200)
        2015-05-31  [SimpleGrazing].GrazeToResidual(1200)
        2015-08-31  [SimpleGrazing].GrazeToResidual(1200)
        2015-10-30  [SimpleGrazing].GrazeToResidual(1200)
        2015-12-15  [SimpleGrazing].GrazeToResidual(1200)
        2016-01-31  [SimpleGrazing].GrazeToResidual(1200)
        2016-03-31  [SimpleGrazing].GrazeToResidual(1200)
        2016-05-31  [SimpleGrazing].GrazeToResidual(1200)
        2016-08-31  [SimpleGrazing].GrazeToResidual(1200)
        2016-10-30  [SimpleGrazing].GrazeToResidual(1200)
        2016-12-15  [SimpleGrazing].GrazeToResidual(1200)
        2017-01-31  [SimpleGrazing].GrazeToResidual(1200)
        2017-03-31  [SimpleGrazing].GrazeToResidual(1200)
        2017-05-31  [SimpleGrazing].GrazeToResidual(1200)
        2017-08-31  [SimpleGrazing].GrazeToResidual(1200)
        2017-10-30  [SimpleGrazing].GrazeToResidual(1200)
        2017-12-15  [SimpleGrazing].GrazeToResidual(1200)
        2018-01-31  [SimpleGrazing].GrazeToResidual(1200)
        2018-03-31  [SimpleGrazing].GrazeToResidual(1200)
        2018-05-31  [SimpleGrazing].GrazeToResidual(1200)
        2018-08-31  [SimpleGrazing].GrazeToResidual(1200)
        2018-10-30  [SimpleGrazing].GrazeToResidual(1200)
        2018-12-15  [SimpleGrazing].GrazeToResidual(1200)
        2019-01-31  [SimpleGrazing].GrazeToResidual(1200)
        2019-03-31  [SimpleGrazing].GrazeToResidual(1200)
        2019-05-31  [SimpleGrazing].GrazeToResidual(1200)
        2019-08-31  [SimpleGrazing].GrazeToResidual(1200)
        2019-10-30  [SimpleGrazing].GrazeToResidual(1200)
        2019-12-15  [SimpleGrazing].GrazeToResidual(1200)
        2020-04-29  [SimpleGrazing].GrazeToResidual(1200)
        2020-07-30  [SimpleGrazing].GrazeToResidual(1200)
        2020-09-22  [SimpleGrazing].GrazeToResidual(1200)
        2020-11-11  [SimpleGrazing].GrazeToResidual(1200)
        2021-01-12  [SimpleGrazing].GrazeToResidual(1200)
        2021-03-01  [SimpleGrazing].GrazeToResidual(1200)
        2021-05-25  [SimpleGrazing].GrazeToResidual(1200)
        2021-08-10  [SimpleGrazing].GrazeToResidual(1200)
        2021-10-12  [SimpleGrazing].GrazeToResidual(1200)
        2021-12-20  [SimpleGrazing].GrazeToResidual(1200)
        2022-02-24  [SimpleGrazing].GrazeToResidual(1200)
        2022-05-12  [SimpleGrazing].GrazeToResidual(1200)
        2022-08-16  [SimpleGrazing].GrazeToResidual(1200)
        2022-12-05  [SimpleGrazing].GrazeToResidual(1200)
        2023-02-20  [SimpleGrazing].GrazeToResidual(1200)
        2023-04-27  [SimpleGrazing].GrazeToResidual(1200)
        2023-07-20  [SimpleGrazing].GrazeToResidual(1200)
        2023-10-31  [SimpleGrazing].GrazeToResidual(1200)
        2024-01-18  [SimpleGrazing].GrazeToResidual(1200)
        2024-03-14  [SimpleGrazing].GrazeToResidual(1200)
      SurfaceOrganicMatter: InitialResidueName=grass; InitialResidueType=grass; InitialResidueMass=1000; InitialStandingFraction=0; InitialCPR=0; InitialCNR=80
      Fertiliser
      Manager Manage species present
        TheSpecies = AGPRyegrass
```csharp
using APSIM.Shared.Utilities;
using Models.Utilities;
using Models.Soils;
using Models.PMF;
using Models.Core;
using System;
using System.Linq;
using System.Collections.Generic;

namespace Models
{
    [Serializable] 
    public class Script : Model
    {
        
        [Link] Clock clock;
        [Link] private IPlant[] plants;

        [Separator("This manager removes one or more species from the simulation using an 'EndCrop' command on the first day of the simulation")]

        [Description("Species to remove from the simulation. Comma delimited, case matters, can be blank")]
        public string[] TheSpecies { get; set; }        
        
        [EventSubscribe("DoManagement")]
        private void OnDoManagement(object sender, EventArgs e)
        {
            if (clock.Today == clock.StartDate)
				foreach (var plant in plants)
              		if (TheSpecies != null && TheSpecies.Length > 0 && TheSpecies.Contains(plant.Name))
                		plant.EndCrop();
        }
    }
}
```
      PastureSpecies AGPRyegrass: doyGermination=275; daysEmergenceToAnthesis=120; daysAnthesisToMaturity=85; degreesDayForAnthesis=1100; degreesDayForMaturity=900; daysAnnualsFactor=45; CanopyType=PastureSpecies; InitialShootDM=1500; InitialRootDM=450; InitialRootDepth=200; initialDMFractionsGrasses=[0.15, 0.25, 0.25, 0.05, 0.05, 0.1, 0.1, 0.05, 0, 0, 0]; initialDMFractionsForbs=[0.2, 0.2, 0.15, 0.05, 0.1, 0.15, 0.1, 0.05, 0, 0, 0]; PhotosyntheticEfficiency=0.01; PhotosynthesisCurveFactor=0.8; FractionPAR=0.5; ReferenceCO2=380; CO2EffectScaleFactor=700; CO2EffectOffsetFactor=600; CO2EffectMinimum=0.7; CO2EffectExponent=2; ReproSeasonDurationCoeff=2; ReproSeasonShouldersLengthFactor=1; ReproSeasonOnsetDurationFactor=0.6; RelativeTurnoverEmerging=2; DetachmentDroughtCoefficient=3; DetachmentDroughtEffectMin=0.1; TurnoverStockFactor=0.01; TurnoverDefoliationEffectMin=0.025; MinimumGreenLeafProp=0.8; MinimumGreenRootProp=0.5
        initialDMFractionsLegumes=[0.16, 0.23, 0.22, 0.05, 0.03, 0.05, 0.05, 0.01, 0.04, 0.08, 0.08]
        LinearInterpolationFunction FVPDFunction
      PastureSpecies AGPWhiteClover: doyGermination=275; daysEmergenceToAnthesis=120; daysAnthesisToMaturity=85; degreesDayForAnthesis=1100; degreesDayForMaturity=900; daysAnnualsFactor=45; CanopyType=PastureSpecies; InitialShootDM=500; InitialRootDM=150; InitialRootDepth=60; initialDMFractionsGrasses=[0.15, 0.25, 0.25, 0.05, 0.05, 0.1, 0.1, 0.05, 0, 0, 0]; initialDMFractionsForbs=[0.2, 0.2, 0.15, 0.05, 0.1, 0.15, 0.1, 0.05, 0, 0, 0]; PhotosyntheticEfficiency=0.01; PhotosynthesisCurveFactor=0.8; FractionPAR=0.5; ReferenceCO2=380; CO2EffectScaleFactor=700; CO2EffectOffsetFactor=600; CO2EffectMinimum=0.7; CO2EffectExponent=2; ReproSeasonDurationCoeff=2; ReproSeasonShouldersLengthFactor=1; ReproSeasonOnsetDurationFactor=0.6; RelativeTurnoverEmerging=2; DetachmentDroughtCoefficient=3; DetachmentDroughtEffectMin=0.1; TurnoverStockFactor=0.01; TurnoverDefoliationEffectMin=0.025; MinimumGreenLeafProp=0.8; MinimumGreenRootProp=0.5
        initialDMFractionsLegumes=[0.16, 0.23, 0.22, 0.05, 0.03, 0.05, 0.05, 0.01, 0.04, 0.08, 0.08]
        LinearInterpolationFunction FVPDFunction
      PastureSpecies AGPBrownTop: doyGermination=275; daysEmergenceToAnthesis=120; daysAnthesisToMaturity=85; degreesDayForAnthesis=1100; degreesDayForMaturity=900; daysAnnualsFactor=45; CanopyType=PastureSpecies; InitialShootDM=1500; InitialRootDM=500; InitialRootDepth=200; initialDMFractionsGrasses=[0.15, 0.25, 0.25, 0.05, 0.05, 0.1, 0.1, 0.05, 0, 0, 0]; initialDMFractionsForbs=[0.2, 0.2, 0.15, 0.05, 0.1, 0.15, 0.1, 0.05, 0, 0, 0]; PhotosyntheticEfficiency=0.01; PhotosynthesisCurveFactor=0.8; FractionPAR=0.5; ReferenceCO2=380; CO2EffectScaleFactor=700; CO2EffectOffsetFactor=600; CO2EffectMinimum=0.7; CO2EffectExponent=2; ReproSeasonDurationCoeff=2; ReproSeasonShouldersLengthFactor=1; ReproSeasonOnsetDurationFactor=0.6; RelativeTurnoverEmerging=2; DetachmentDroughtCoefficient=3; DetachmentDroughtEffectMin=0.1; TurnoverStockFactor=0.01; TurnoverDefoliationEffectMin=0.025; MinimumGreenLeafProp=0.8; MinimumGreenRootProp=0.5; ResourceName=AGPBrowntop
        initialDMFractionsLegumes=[0.16, 0.23, 0.22, 0.05, 0.03, 0.05, 0.05, 0.01, 0.04, 0.08, 0.08]
        LinearInterpolationFunction FVPDFunction
      Report AnnualReport: EventNames=30-jun
        VariableNames:
          [Clock].Today.Year as Year
          // to combine cumulative outputs across calendar years to derive for a growing season (July-June)
          Sum of [AGPRyegrass].HerbageGrowthWt from [AnnualReport].DayAfterLastOutput to [Clock].Today as GrowYearRgHA // Net ryegrass growth for the growing year July-June (kgDM/ha)
          Sum of [AGPBrownTop].HerbageGrowthWt from [AnnualReport].DayAfterLastOutput to [Clock].Today as GrowYearBtHA // Net browntop growth for the growing year July-June (kgDM/ha)
          Sum of [AGPWhiteClover].HerbageGrowthWt from [AnnualReport].DayAfterLastOutput to [Clock].Today as GrowYearWcHA // Net white clover growth for the growing year July-June (kgDM/ha)
          Sum of ([AGPRyegrass].HerbageGrowthWt + [AGPBrownTop].HerbageGrowthWt + [AGPWhiteClover].HerbageGrowthWt) from [AnnualReport].DayAfterLastOutput to [Clock].Today as GrowYearHA // Net growth for the growing year July-June (kgDM/ha)
          Sum of ([AGPRyegrass].HarvestedWt + [AGPBrownTop].HarvestedWt + [AGPWhiteClover].HarvestedWt) from [AnnualReport].DayAfterLastOutput to [Clock].Today as GrowYearHarvest // cumulative harvesed DM from AGP for the growing year July-June (kgDM/ha)
      Report SiteReport: EventNames=[Clock].EndOfDay
        VariableNames:
          [Clock].Today as Date
          [AGPWhiteClover].GlfSoilFertility as GlfP // growth limiting factor for P fertility
          [Weather].Radn as Radn // Radiation to check aspect and slope effects
          [Soil].Temperature.AverageSoilTemperature[1] as SurfT // Surface layer soil temperature to check aspect and slope effects
          [SlopeEffectsOnWeather].RadnDirect as RadnD
      Soil: LocalName=Matamau Silt Loam; Site=Ballantrae; NearestTown=Woodville; Region=Hawke's Bay; Country=New Zealand; NaturalVegetation=Forest; Latitude=-40.325; Longitude=175.825; LocationAccuracy=5 km; DataSource=Alec Mackay
        Physical
          Thickness  ParticleSizeSand  ParticleSizeSilt  ParticleSizeClay  Rocks  BD    AirDry  LL15   DUL    SAT    KS
          20         21                50                29                0      0.92  0.055   0.167  0.446  0.576  11984
          40         17                58                25                0      1.12  0.057   0.173  0.438  0.523  3618
          80         16                60                24                0      1.27  0.06    0.181  0.432  0.481  514
          60         15                60                25                0      1.32  0.06    0.179  0.406  0.467  353
          400        15                60                25                0      1.45  0.06    0.182  0.396  0.45   233
          400        15                60                25                0      1.45  0.06    0.182  0.396  0.45   233
          SoilCrop AGPRyegrassSoil: LL=[0.177, 0.183, 0.191, 0.189, 0.192, 0.192]; KL=[0.06, 0.06, 0.06, 0.06, 0, 0]; XF=[1, 1, 1, 1, 0, 0]
          SoilCrop AGPWhiteCloverSoil: LL=[0.197, 0.203, 0.211, 0.209, 0.212, 0.212]; KL=[0.06, 0.06, 0, 0, 0, 0]; XF=[1, 1, 0, 0, 0, 0]
          SoilCrop AGPBrownTopSoil: LL=[0.167, 0.173, 0.181, 0.179, 0.182, 0.182]; KL=[0.06, 0.06, 0.06, 0.06, 0, 0]; XF=[1, 1, 1, 1, 0, 0]
        WaterBalance SoilWater: SummerDate=1-Nov; SummerU=9.12; SummerCona=3; WinterDate=1-Apr; WinterU=9.12; WinterCona=3; DiffusConst=0; DiffusSlope=0; Salb=0.13; CN2Bare=80; CNRed=20; CNCov=0.8; PSIDul=-100; Thickness=[50, 80, 200, 120, 170, 380]; SWCON=[0.4, 0.4, 0.6, 0.6, 0.7, 0.7]
        Organic: FOMCNRatio=10; CarbonUnits=Total
          Thickness  Carbon  SoilCNRatio  FBiom  FInert  FOM
          20         5       11           0.08   0.45    36
          40         2       11           0.07   0.34    31
          80         1       11           0.02   0.51    21
          60         0.5     11           0.02   0.87    15
          400        0.2     11           0.01   0.96    2
          400        0.1     11           0.01   0.96    2
        Chemical: Thickness=[20, 40, 80, 60, 400, 400]; PH=[6.5, 6.5, 6.5, 6.5, 6.5, 6.5]; PHUnits=Water
        Water: Thickness=[20, 40, 80, 60, 400, 400]; InitialValues=[0.399, 0.335, 0.308, 0.268, 0.198, 0.198]; InitialPAWmm=39.42; RelativeTo=LL15; FilledFromTop=true
        CERESSoilTemperature Temperature
        Solute NO3: Thickness=[20, 40, 80, 60, 400, 400]; InitialValues=[15, 15, 7, 7, 4, 4]; InitialValuesUnits=ppm; WaterTableConcentration=0; D0=0; DepthConstant=0; MaxDepthSoluteAccessible=0; RunoffEffectivenessAtMovingSolute=0; MaxEffectiveRunoff=0
        Solute NH4: Thickness=[20, 40, 80, 60, 400, 400]; InitialValues=[1, 1, 0.5, 0.5, 0.3, 0.3]; InitialValuesUnits=ppm; WaterTableConcentration=0; D0=0; DepthConstant=0; MaxDepthSoluteAccessible=0; RunoffEffectivenessAtMovingSolute=0; MaxEffectiveRunoff=0
        Solute Urea: Thickness=[20, 40, 80, 60, 400, 400]; InitialValues=[0, 0, 0, 0, 0, 0]; InitialValuesUnits=kg/ha; WaterTableConcentration=0; D0=0; DepthConstant=0; MaxDepthSoluteAccessible=0; RunoffEffectivenessAtMovingSolute=0; MaxEffectiveRunoff=0
        Nutrient
    Zone Site4_30_0: Area=1; Slope=30; AspectAngle=0; Altitude=300
      SlopeEffectsOnWeather: same as Ballantrae_sites1.Site4_30_180.SlopeEffectsOnWeather
      SimpleGrazing: same as Ballantrae_sites1.Site4_30_180.SimpleGrazing
      Operations: same as Ballantrae_sites1.Site4_30_180.Operations
      SurfaceOrganicMatter: InitialResidueName=grass; InitialResidueType=grass; InitialResidueMass=1000; InitialStandingFraction=0; InitialCPR=0; InitialCNR=80
      Fertiliser
      Manager Manage species present: same as Ballantrae_sites1.Site4_30_180.Manage species present
      PastureSpecies AGPRyegrass: same as Ballantrae_sites1.Site4_30_180.AGPRyegrass
      PastureSpecies AGPWhiteClover: same as Ballantrae_sites1.Site4_30_180.AGPWhiteClover
      PastureSpecies AGPBrownTop: same as Ballantrae_sites1.Site4_30_180.AGPBrownTop
      Report AnnualReport: same as Ballantrae_sites1.Site4_30_180.AnnualReport
      Report SiteReport: same as Ballantrae_sites1.Site4_30_180.SiteReport
      Soil: same as Ballantrae_sites1.Site4_30_180.Soil
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