Simulations: Version=172
  DataStore
  Simulation
    Clock: Start=2000-01-01; End=2000-01-01
    Summary
    Manager Manager1
```csharp
using Newtonsoft.Json;
using APSIM.Shared.Utilities;
using Models.Interfaces;
using Models.Soils;
using Models.PMF;
using Models.Core;
using System.Xml.Serialization;
using System;
using System.Linq;
using Models.Soils.Nutrients;
using Models.Climate;
using System.Diagnostics;

namespace Models
{
    [Serializable]
    public class Script : Model
    {
        [Link] Summary summary;
        [Link(ByName=true)] MScript1 mscript;
        
		[EventSubscribe("DoManagement")]
        private void OnDoManagement(object sender, EventArgs e)
        {
        	mscript.Test();
        }
    }
}
```
    Manager Manager2
```csharp
using Newtonsoft.Json;
using APSIM.Shared.Utilities;
using Models.Interfaces;
using Models.Soils;
using Models.PMF;
using Models.Core;
using System.Xml.Serialization;
using System;
using System.Linq;
using Models.Soils.Nutrients;
using Models.Climate;
using System.Diagnostics;

namespace Models
{
    [Serializable]
    public class MScript1 : Model
    {
        [Link] Summary summary;
        
        public void Test()
        {
    		summary.WriteMessage(this, "Correct Manager Called", MessageType.All);
        }
    }
}
```
  Simulation Simulation2
    Clock: Start=2000-01-01; End=2000-01-01
    Summary
    Manager Manager1
```csharp
using Newtonsoft.Json;
using APSIM.Shared.Utilities;
using Models.Interfaces;
using Models.Soils;
using Models.PMF;
using Models.Core;
using System.Xml.Serialization;
using System;
using System.Linq;
using Models.Soils.Nutrients;
using Models.Climate;
using System.Diagnostics;

namespace Models
{
    [Serializable]
    public class Script : Model
    {
        [Link] Summary summary;
        [Link(ByName=true)] MScript2 MScript2;
        
		[EventSubscribe("DoManagement")]
        private void OnDoManagement(object sender, EventArgs e)
        {
        	MScript2.Test();
        }
    }
}
```
    Manager Manager2
```csharp
using Newtonsoft.Json;
using APSIM.Shared.Utilities;
using Models.Interfaces;
using Models.Soils;
using Models.PMF;
using Models.Core;
using System.Xml.Serialization;
using System;
using System.Linq;
using Models.Soils.Nutrients;
using Models.Climate;
using System.Diagnostics;

namespace Models
{
    [Serializable]
    public class MScript2 : Model
    {
        [Link] Summary summary;
        
        public void Test()
        {
    		summary.WriteMessage(this, "Correct Manager Called", MessageType.All);
        }
    }
}
```
