Simulations: Version=171
  DataStore
  Simulation
    Clock: Start=2000-01-01; End=2000-01-01
    Summary
    Manager Manager1
```csharp
using Newtonsoft.Json;
using APSIM.Shared.Utilities;
using Models.Interfaces;
using Models.Soils;
using Models.PMF;
using Models.Core;
using System.Xml.Serialization;
using System;
using System.Linq;
using Models.Soils.Nutrients;
using Models.Climate;
using System.Diagnostics;

namespace Models
{
    [Serializable]
    public class Script : Model
    {
        [Link] Summary summary;
        [Link(ByName=true)] MScript mscript;
        
		[EventSubscribe("DoManagement")]
        private void OnDoManagement(object sender, EventArgs e)
        {
        	mscript.Test();
        }
    }
}
```
    Manager Manager2
```csharp
using Newtonsoft.Json;
using APSIM.Shared.Utilities;
using Models.Interfaces;
using Models.Soils;
using Models.PMF;
using Models.Core;
using System.Xml.Serialization;
using System;
using System.Linq;
using Models.Soils.Nutrients;
using Models.Climate;
using System.Diagnostics;

namespace Models
{
    [Serializable]
    public class MScript : Model
    {
        [Link] Summary summary;
        
        public void Test()
        {
    		summary.WriteMessage(this, "Manager Called", MessageType.All);
        }
    }
}
```
  Simulation Simulation2
    Clock: Start=2000-01-01; End=2000-01-01
    Summary
    Manager Manager1
```csharp
using Newtonsoft.Json;
using APSIM.Shared.Utilities;
using Models.Interfaces;
using Models.Soils;
using Models.PMF;
using Models.Core;
using System.Xml.Serialization;
using System;
using System.Linq;
using Models.Soils.Nutrients;
using Models.Climate;
using System.Diagnostics;

namespace Models
{
    [Serializable]
    public class Script : Model
    {
        [Link] Summary summary;
        [Link(ByName=true)] Manager Manager2;
        
		[EventSubscribe("DoManagement")]
        private void OnDoManagement(object sender, EventArgs e)
        {
        	MScript script = Manager2.ScriptModel as MScript;
        	script.Test();
        }
    }
}
```
    Manager Manager2: same as Simulation.Manager2
