folder Soils: version=37; creator=Apsim 7.10-r4221
  Soil Loam (Tekowai Exp Station No706): SoilType=Other; Site=Tekowai Expt Station; NearestTown=Mackay; Region=Central Coast and Whitsundays; State=Queensland; Country=Australia; ApsoilNumber=706; Latitude=-21.165; Longitude=149.119; LocationAccuracy=Regional Soil Type; YearOfSampling=0; DataSource=CSIRO Sustainable Ecosystems, Brisbane
    Comments=Loam - MK-01; Thorburn et al., (2004a); Robertson and Thorburn (2007) Management of sugarcane harvest residues - consequences for soil carbon and nitrogen. Aust. J. Soil Res. 48, 13-23
    Water
      Thickness  BD    AirDry  LL15  DUL   SAT
      100        1.51  0.05    0.17  0.3   0.38
      150        1.5   0.05    0.17  0.31  0.38
      250        1.49  0.05    0.17  0.31  0.39
      250        1.64  0.05    0.18  0.27  0.33
      250        1.67  0.05    0.22  0.26  0.32
      250        1.65  0.05    0.22  0.26  0.33
      250        1.66  0.05    0.22  0.26  0.33
      BD source: Field measured and checked for sensibility
      AirDry, LL15, DUL source: Estimated based on local knowledge
      SAT source: Calculated from measured, estimated or calculated BD
      SoilCrop sugar: LL=[0.17, 0.17, 0.17, 0.18, 0.22, 0.22, 0.22]; KL=[0.08, 0.08, 0.08, 0.08, 0.06, 0.04, 0.02]; XF=[1, 1, 1, 1, 1, 0, 0]
        LL source: Estimated based on local knowledge
    SoilWater: SummerCona=3; SummerU=4; SummerDate=1-Nov; WinterCona=3; WinterU=4; WinterDate=1-Apr; DiffusConst=40; DiffusSlope=16; Salb=0.1; CN2Bare=65; CNRed=20; CNCov=0.8; Thickness=[100, 150, 250, 250, 250, 250, 250]; SWCON=[0.4, 0.4, 0.4, 0.4, 0.4, 0.4, 0.4]
    SoilOrganicMatter: RootCN=70; RootWt=5250; SoilCN=17.2; EnrACoeff=7.4; EnrBCoeff=0.2; OCUnits=Total
      Thickness  OC     FBiom  FInert
      100        4.417  0.1    0.2
      150        0.55   0.07   0.4
      250        0.543  0.05   0.55
      250        0.37   0.025  0.85
      250        0.267  0.015  0.95
      250        0.268  0.01   0.95
      250        0.218  0.01   0.99
      OC source: Measured
    Analysis: Thickness=[100, 150, 250, 250, 250, 250, 250]; PH=[5, 5, 5, 5.5, 6, 6, 6]; PHUnits=Water; BoronUnits=HotWater
      PH source: Measured
  Soil Cracking clay (Eton No821): SoilType=Other; Site=Eton; NearestTown=Mackay; Region=Central Coast and Whitsundays; State=Queensland; Country=Australia; ApsoilNumber=821; Latitude=-21.244; Longitude=148.958; LocationAccuracy=Regional Soil Type; YearOfSampling=0; DataSource=CSIRO Sustainable Ecosystems, Brisbane
    Comments=Clay - MK-02; Weier 1998 The potential for N losses via denitrification beneath a green cane trash blanket. Proc.Aust.Soc.Sugar Cane Technol.,20,169-175; Thorburn etal 2010 Opportunities for and potential consequences of reducing nitrous oxide emissions from sugarcane crops. Proc.Int.Soc. Sugar Cane TEchnol.,Vol.27
    Water
      Thickness  BD     AirDry  LL15   DUL    SAT
      100        1.29   0.07    0.211  0.398  0.513
      100        1.39   0.07    0.211  0.398  0.475
      200        1.351  0.07    0.257  0.442  0.475
      300        1.29   0.07    0.245  0.43   0.48
      300        1.38   0.07    0.21   0.4    0.45
      300        1.49   0.07    0.21   0.36   0.41
      300        1.52   0.07    0.21   0.35   0.4
      400        1.55   0.07    0.21   0.34   0.39
      BD source: Field measured and checked for sensibility
      AirDry, LL15, DUL source: Estimated based on local knowledge
      SAT source: Calculated from measured, estimated or calculated BD
      SoilCrop sugar: LL=[0.211, 0.211, 0.257, 0.245, 0.21, 0.21, 0.21, 0.21]; KL=[0.08, 0.08, 0.08, 0.08, 0.06, 0.04, 0.02, 0.02]; XF=[1, 1, 1, 1, 1, 0, 0, 0]
        LL source: Estimated based on local knowledge
    SoilWater: SummerCona=4.5; SummerU=9; SummerDate=1-Nov; WinterCona=4.5; WinterU=9; WinterDate=1-Apr; DiffusConst=40; DiffusSlope=16; Salb=0.12; CN2Bare=73; CNRed=20; CNCov=0.8; Thickness=[100, 100, 200, 300, 300, 300, 300, 400]; SWCON=[0.5, 0.15, 0.4, 0.7, 0.7, 0.7, 0.7, 0.7]
    SoilOrganicMatter: RootCN=70; RootWt=5000; SoilCN=12.4; EnrACoeff=7.4; EnrBCoeff=0.2; OCUnits=Total
      Thickness  OC    FBiom  FInert
      100        1.62  0.04   0.25
      100        1.77  0.03   0.3
      200        1.52  0.03   0.6
      300        1.24  0.02   0.8
      300        0.64  0.02   1
      300        0.24  0.01   1
      300        0.2   0.01   1
      400        0.1   0.01   1
      OC source: Measured
    Analysis: Thickness=[100, 100, 200, 300, 300, 300, 300, 400]; PH=[5.7, 6, 6, 6, 6, 6, 6, 6]; PHUnits=Water; BoronUnits=HotWater
      PH source: Measured
