Simulations: Version=56
  Simulation
    Clock: StartDate=2019-01-01; EndDate=2019-01-02
    Summary
    Zone Field: Area=1; Slope=0
      Report: VariableNames=[Clock].Today; EventNames=[Clock].DoReport
      Manager Tool1
```csharp
using System;
using Models.Core;
using Models.Core.Run;
using Models.PMF;
using Models.Storage;

namespace Models
{
	[Serializable]
	public class Script : Model, IPostSimulationTool
	{
		public void Run(IDataStore storage)
		{
			throw new Exception("exception thrown from Tool1");
		}
	}
}
```
      Manager Tool2
        HasBeenRun = False
```csharp
using System;
using Models.Core;
using Models.Core.Run;
using Models.Storage;

namespace Models
{
	[Serializable]
	public class Script : Model, IPostSimulationTool
	{
		[Description("Has this tool been run?")]
		public bool HasBeenRun { get; set; }

		public void Run(IDataStore storage)
		{
			HasBeenRun = true;
		}
	}
}
```
  DataStore
