Simulations: Version=101
  DataStore
  Experiment
    Factors
      Permutation
        Factor IsWorking: Specification=[Manager].Script.IsWorking = true
        Factor Constant: Specification=[Constant]
          Constant One: FixedValue=1
    Simulation
      Clock: Start=1900-01-01; End=1901-01-01
      Summary
      Zone Field: Area=1; Slope=0; AspectAngle=0; Altitude=50
        Manager
          IsWorking = False
```csharp
using Models.Core;
using Models.Functions;
using System;

namespace Models
{
    [Serializable]
    public class Script : Model
    {
    	// An exception will be thrown if this is false.
    	// It is set to true by the factorial
    	public bool IsWorking { get; set; }

        [EventSubscribe("StartOfSimulation")]
        private void OnSimulationCommencing(object sender, EventArgs e)
        {
            // Need to remember that the script is a child of the manager
            // which is a child of the paddock.
            IModel paddock = Parent.Parent;
            if (!IsWorking)
            	throw new Exception("Failed to override property value via factor in field " + paddock.Name);

            IFunction constant = paddock.Children[1] as IFunction;
            if (constant.Value() != 1)
            	throw new Exception("Failed to override model value via factor in field " + paddock.Name);
        }
    }
}
```
        Constant: FixedValue=0
      Zone Field2: Area=2; Slope=0; AspectAngle=0; Altitude=50
        Manager
          IsWorking = False
```csharp
using Models.Core;
using Models.Functions;
using System;

namespace Models
{
    [Serializable]
    public class Script : Model
    {
    	// An exception will be thrown if this is false.
    	// It is set to true by the factorial
    	public bool IsWorking { get; set; }

        [EventSubscribe("StartOfSimulation")]
        private void OnSimulationCommencing(object sender, EventArgs e)
        {
            if (!IsWorking)
            	throw new Exception("Failed to override property value via factor");

            // Need to remember that the script is a child of the manager
            // which is a child of the paddock.
            IModel paddock = Parent.Parent;
            IFunction constant = paddock.Children[1] as IFunction;
            if (constant.Value() != 1)
            	throw new Exception("Failed to override model value via factor in field " + paddock.Name);
        }
    }
}
```
        Constant: FixedValue=0
        Zone Field3: Area=1; Slope=0; AspectAngle=0; Altitude=50
          Manager: same as Experiment.Simulation.Field2.Manager
          Constant: FixedValue=0
        Zone Field4: same as Experiment.Simulation.Field2.Field3
