Simulations: Version=100
  DataStore
  Experiment
    Factors
      Permutation
        Factor X: Specification=[Manager].Script.X = true
        Factor Y: Specification=[Manager].Script.Y = true
        Factor Z: Specification=[Manager].Script.Z = true
    Simulation
      Clock: Start=2020-01-01; End=2020-01-02
      Summary SummaryFile
      Manager
        X = False
        Y = False
```csharp
using System;
using Models.Core;
using System.Xml.Serialization;

namespace Models
{
	[Serializable]
	public class Script : Model
	{
		[Description("X")]
		public bool X { get; set; }

		public bool Y { get; set; }

		[XmlIgnore]
		public bool Z { get; set ; }

		[EventSubscribe("DoManagement")]
		private void Test(object sender, EventArgs e)
		{
			if (!X)
				throw new Exception("X was not set to true");
			if (!Y)
				throw new Exception("Y was not set to true");
			if (!Z)
				throw new Exception("Z was not set to true");
		}
	}
}
```
