Simulations: Version=204
  DataStore
  Experiment SetDatesSameAsModel
    Factors
      CompositeFactor NoSets
      CompositeFactor Germ: Specifications=[SetPhaseCompletionDates].Script.GermDate = 3-Jan-2000
      CompositeFactor Emerg
        Specifications:
          //[SetPhaseCompletionDates].Script.GermDate = 10-Jan-2000
          [SetPhaseCompletionDates].Script.EmergDate = 9-Jan-2000
      CompositeFactor Vern
        Specifications:
          //[SetPhaseCompletionDates].Script.GermDate = 10-Jan-2000
          [SetPhaseCompletionDates].Script.EmergDate = 9-Jan-2000
          [SetPhaseCompletionDates].Script.VernDate = 21-Jan-2000
      CompositeFactor TS
        Specifications:
          //[SetPhaseCompletionDates].Script.GermDate = 10-Jan-2000
          [SetPhaseCompletionDates].Script.EmergDate = 9-Jan-2000
          [SetPhaseCompletionDates].Script.VernDate = 21-Jan-2000
          [SetPhaseCompletionDates].Script.TSDate = 6-Feb-2000
      CompositeFactor Flag
        Specifications:
          //[SetPhaseCompletionDates].Script.GermDate = 10-Jan-2000
          [SetPhaseCompletionDates].Script.EmergDate = 9-Jan-2000
          [SetPhaseCompletionDates].Script.VernDate = 21-Jan-2000
          [SetPhaseCompletionDates].Script.TSDate = 6-Feb-2000
          [SetPhaseCompletionDates].Script.FlagDate = 3-Mar-2000
      CompositeFactor Anth
        Specifications:
          //[SetPhaseCompletionDates].Script.GermDate = 10-Jan-2000
          [SetPhaseCompletionDates].Script.EmergDate = 9-Jan-2000
          [SetPhaseCompletionDates].Script.VernDate = 21-Jan-2000
          [SetPhaseCompletionDates].Script.TSDate = 6-Feb-2000
          [SetPhaseCompletionDates].Script.FlagDate = 3-Mar-2000
          [SetPhaseCompletionDates].Script.AnthDate = 17-Mar-2000
      CompositeFactor Ripe
        Specifications:
          //[SetPhaseCompletionDates].Script.GermDate = 10-Jan-2000
          [SetPhaseCompletionDates].Script.EmergDate = 9-Jan-2000
          [SetPhaseCompletionDates].Script.VernDate = 21-Jan-2000
          [SetPhaseCompletionDates].Script.TSDate = 6-Feb-2000
          [SetPhaseCompletionDates].Script.FlagDate = 3-Mar-2000
          [SetPhaseCompletionDates].Script.AnthDate = 17-Mar-2000
          [SetPhaseCompletionDates].Script.RipeDate = 7-May-2000
    Simulation SetDates
      Clock: Start=2000-01-01; End=2000-07-30
      Summary SummaryFile
      Weather: FileName=%root%/Examples/WeatherFiles/AU_Dalby.met
      SoilArbitrator
      Zone Field: Area=1; Slope=0; AspectAngle=0; Altitude=50
        Report: EventNames=[Clock].DoReport
          VariableNames:
            [Clock].Today
            [Wheat].Phenology.Zadok.Stage
            [Wheat].Phenology.CurrentStageName
            [Wheat].AboveGround.Wt
            [Wheat].AboveGround.N
            [Wheat].Grain.Total.Wt*10 as Yield
            [Wheat].Grain.Protein
            [Wheat].Grain.Size
            [Wheat].Grain.Number
            [Wheat].Grain.Total.Wt
            [Wheat].Grain.Total.N
            [Wheat].Total.Wt
            [Wheat].Phenology.Stage
            [Wheat].Phenology.HaunStage
            [Wheat].LAI
        Fertiliser
        Soil: ASCOrder=Vertosol; ASCSubOrder=Black; SoilType=Clay; Site=Norwin; NearestTown=Norwin; Region=Darling Downs and Granite Belt; State=Queensland; Country=Australia; NaturalVegetation=Qld. Bluegrass, possible Qld. Blue gum; ApsoilNumber=900; Latitude=-27.581836; Longitude=151.320206; LocationAccuracy=+/- 20m
          DataSource=CSIRO Sustainable Ecosystems, Toowoomba; Characteriesd as part of the GRDC funded project"Doing it better, doing it smarter, managing soil water in Australian agriculture' 2011
          Comments=OC, CLL for all crops estimated-based on Bongeen Mywybilla Soil No1
          Physical
            Thickness  BD       AirDry    LL15      DUL       SAT       KS
            150        1.01056  0.13025   0.2605    0.521     0.588655  20
            150        1.07146  0.198689  0.248362  0.496723  0.565677  20
            300        1.09394  0.28      0.28      0.488438  0.557193  20
            300        1.15861  0.28      0.28      0.480297  0.532787  20
            300        1.17301  0.28      0.28      0.471584  0.527354  20
            300        1.16287  0.28      0.28      0.457071  0.53118   20
            300        1.1875   0.28      0.28      0.452332  0.521888  20
            SoilCrop WheatSoil: LL=[0.261, 0.248, 0.28, 0.306, 0.36, 0.392, 0.446]; KL=[0.06, 0.06, 0.06, 0.04, 0.04, 0.02, 0.01]; XF=[1, 1, 1, 1, 1, 1, 1]
          WaterBalance SoilWater: SummerDate=1-Nov; SummerU=5; SummerCona=5; WinterDate=1-Apr; WinterU=5; WinterCona=5; DiffusConst=40; DiffusSlope=16; Salb=0.12; CN2Bare=73; CNRed=20; CNCov=0.8; PSIDul=-100; Thickness=[150, 150, 300, 300, 300, 300, 300]; SWCON=[0.3, 0.3, 0.3, 0.3, 0.3, 0.3, 0.3]
          Organic: FOMCNRatio=40; CarbonUnits=Total
            Thickness  Carbon  SoilCNRatio  FBiom  FInert  FOM
            150        1.2     12           0.04   0.4     347.129
            150        0.96    12           0.02   0.6     270.344
            300        0.6     12           0.02   0.8     163.972
            300        0.3     12           0.02   1       99.4541
            300        0.18    12           0.01   1       60.322
            300        0.12    12           0.01   1       36.5871
            300        0.12    12           0.01   1       22.1912
          Chemical: Thickness=[150, 150, 300, 300, 300, 300, 300]; PH=[8, 8, 8, 8, 8, 8, 8]; PHUnits=Water
          Water: Thickness=[150, 150, 300, 300, 300, 300, 300]; InitialValues=[0.2605, 0.248362, 0.28, 0.28, 0.28, 0.28, 0.28]; FilledFromTop=false
          Nutrient
          Solute NO3: Thickness=[150, 150, 300, 300, 300, 300, 300]; InitialValues=[1, 1, 1, 1, 1, 1, 1]; InitialValuesUnits=ppm; WaterTableConcentration=0; D0=0; DepthConstant=0; MaxDepthSoluteAccessible=0; RunoffEffectivenessAtMovingSolute=0; MaxEffectiveRunoff=0
          Solute NH4: Thickness=[150, 150, 300, 300, 300, 300, 300]; InitialValues=[0.1, 0.1, 0.1, 0.1, 0.1, 0.1, 0.1]; InitialValuesUnits=ppm; WaterTableConcentration=0; D0=0; DepthConstant=0; MaxDepthSoluteAccessible=0; RunoffEffectivenessAtMovingSolute=0; MaxEffectiveRunoff=0
          Solute Urea: Thickness=[150, 150, 300, 300, 300, 300, 300]; InitialValues=[0, 0, 0, 0, 0, 0, 0]; InitialValuesUnits=kg/ha; WaterTableConcentration=0; D0=0; DepthConstant=0; MaxDepthSoluteAccessible=0; RunoffEffectivenessAtMovingSolute=0; MaxEffectiveRunoff=0
          SoilTemperature Temperature
        SurfaceOrganicMatter: InitialResidueName=wheat_stubble; InitialResidueType=wheat; InitialResidueMass=500; InitialStandingFraction=0; InitialCPR=0; InitialCNR=100
        Plant Wheat
        MicroClimate: a_interception=0; b_interception=1; c_interception=0; d_interception=0; SoilHeatFluxFraction=0.4; MinimumHeightDiffForNewLayer=0; NightInterceptionFraction=0.5; ReferenceHeight=2
        Manager SowingFertiliser
          Amount = 160
          CropName = wheat
```csharp
using Models.Soils;
using System;
using Models.Core;
using Models.PMF;
namespace Models
{
    [Serializable]
    public class Script : Model
    {
        [Link] Clock Clock;
        [Link] Fertiliser Fertiliser;
        [Link] Summary Summary;
        
        
        [Description("Amount of fertiliser to be applied (kg/ha)")]
        public double Amount { get; set;}
        
        [Description("Crop to be fertilised")]
        public string CropName { get; set;}
        
        
        

        [EventSubscribe("Sowing")]
        private void OnSowing(object sender, EventArgs e)
        {
            Model crop = sender as Model;
            if (crop.Name.ToLower()==CropName.ToLower())
                Fertiliser.Apply(amount: Amount, type: "NO3N");
        }
        
    }
}
```
        Manager Harvest
```csharp
using Models.Soils.Nutrients;
using System;
using Models.Core;
using Models.PMF;
using Models.Soils;
using Models.Soils.Nutrients;
using Models.Utilities;
using APSIM.Shared.Utilities;

namespace Models
{
    [Serializable]
    public class Script : Model
    {
        [Link] Plant Wheat;

        [EventSubscribe("DoManagement")]
        private void OnDoManagement(object sender, EventArgs e)
        {
            if (Wheat.IsReadyForHarvesting)
            {
               Wheat.Harvest();
               Wheat.EndCrop();    
            }
        
        }
        
    }
}
```
        Manager SowingRule
          SowDate = 2-Jan
          CultivarName = Hartog
          SowingDepth = 60
          RowSpacing = 250
          Population = 120
```csharp
using Models.Soils.Nutrients;
using System;
using Models.Core;
using Models.PMF;
using Models.Soils;
using Models.Soils.Nutrients;
using Models.Utilities;
using APSIM.Shared.Utilities;

namespace Models
{
    [Serializable]
    public class Script : Model
    {
        [Link] Clock Clock;
        [Link] Fertiliser Fertiliser;
        [Link] Summary Summary;
        [Link] Plant Wheat;
        [Link] Soil Soil; 
        Accumulator accumulatedRain;
        
        [Description("Sowing Date (d-mmm)")]
        public string SowDate { get; set;}
        [Description("Cultivar to be sown")]
        [Display(Type=DisplayType.CultivarName, PlantName = "Wheat")]
        public string CultivarName { get; set;}
        [Description("Sowing depth (mm)")]
        public double SowingDepth { get; set;} 
        [Description("Row spacing (mm)")]
        public double RowSpacing { get; set;}    
        [Description("Plant population (/m2)")]
        public double Population { get; set;}    


        [EventSubscribe("DoManagement")]
        private void OnDoManagement(object sender, EventArgs e)
        {
            if (DateUtilities.DatesEqual(SowDate,Clock.Today))
            {
               Wheat.Sow(population:Population, cultivar:CultivarName, depth:SowingDepth, rowSpacing:RowSpacing);    
            }
        
        }
        
    }
}
```
        Manager SetPhaseCompletionDates
          GermDate =
          EmergDate =
          VernDate =
          TSDate =
          FlagDate =
          AnthDate =
          RipeDate =
```csharp
using Models.Soils.Nutrients;
using System;
using Models.Core;
using Models.PMF;
using Models.Soils;
using Models.Soils.Nutrients;
using Models.Utilities;
using APSIM.Shared.Utilities;

namespace Models
{
    [Serializable]
    public class Script : Model
    {
        [Link] Plant Wheat;
        
        [Description("Germination Date (d-mmm)")]
        public string GermDate { get; set;} 
        [Description("Emergence Date (d-mmm)")]
        public string EmergDate { get; set;}
        [Description("Vernalisation Date (d-mmm)")]
        public string VernDate { get; set;}
        [Description("Terminal Spikelet Date (d-mmm)")]
        public string TSDate { get; set;}
        [Description("FlagLeaf Date (d-mmm)")]
        public string FlagDate { get; set;}
        [Description("Anthesis Date (d-mmm)")]
        public string AnthDate { get; set;}
        [Description("Ripe Date (d-mmm)")]
        public string RipeDate { get; set;}
        
        [EventSubscribe("PlantSowing")]
        private void OnPlantSowing(object sender, SowingParameters data)
        {
            if (!String.IsNullOrEmpty(GermDate))
            {
               Wheat.Phenology.SetPhaseCompletionDate(GermDate,"Germinating");
            }
            if (!String.IsNullOrEmpty(EmergDate))
            {
               Wheat.Phenology.SetPhaseCompletionDate(EmergDate,"Emerging");
            }
            if (!String.IsNullOrEmpty(VernDate))
            {
               Wheat.Phenology.SetPhaseCompletionDate(VernDate,"LeavesInitiating");
            }
            if (!String.IsNullOrEmpty(TSDate))
            {
               Wheat.Phenology.SetPhaseCompletionDate(TSDate,"SpikeletsDifferentiating");
            }
            if (!String.IsNullOrEmpty(FlagDate))
            {
               Wheat.Phenology.SetPhaseCompletionDate(FlagDate,"StemElongating");
            }
            if (!String.IsNullOrEmpty(AnthDate))
            {
               Wheat.Phenology.SetPhaseCompletionDate(AnthDate,"Flowering");
            }
            if (!String.IsNullOrEmpty(RipeDate))
            {
               Wheat.Phenology.SetPhaseCompletionDate(RipeDate,"GrainRipening");
            }
        }
    }
}
```
  Experiment SetDatesLater
    Factors
      CompositeFactor NoSets
      CompositeFactor Germ: Specifications=[SetPhaseCompletionDates].Script.GermDate = 4-Jan
      CompositeFactor Emerg
        Specifications:
          [SetPhaseCompletionDates].Script.GermDate = 4-Jan
          [SetPhaseCompletionDates].Script.EmergDate = 14-Jan
      CompositeFactor Vern
        Specifications:
          [SetPhaseCompletionDates].Script.GermDate = 4-Jan
          [SetPhaseCompletionDates].Script.EmergDate = 14-Jan
          [SetPhaseCompletionDates].Script.VernDate = 31-Jan
      CompositeFactor TS
        Specifications:
          [SetPhaseCompletionDates].Script.GermDate = 4-Jan
          [SetPhaseCompletionDates].Script.EmergDate = 14-Jan
          [SetPhaseCompletionDates].Script.VernDate = 31-Jan
          [SetPhaseCompletionDates].Script.TSDate = 25-Feb
      CompositeFactor Flag
        Specifications:
          [SetPhaseCompletionDates].Script.GermDate = 4-Jan
          [SetPhaseCompletionDates].Script.EmergDate = 14-Jan
          [SetPhaseCompletionDates].Script.VernDate = 31-Jan
          [SetPhaseCompletionDates].Script.TSDate = 25-Feb
          [SetPhaseCompletionDates].Script.FlagDate = 13-Mar
      CompositeFactor Anth
        Specifications:
          [SetPhaseCompletionDates].Script.GermDate = 4-Jan
          [SetPhaseCompletionDates].Script.EmergDate = 14-Jan
          [SetPhaseCompletionDates].Script.VernDate = 31-Jan
          [SetPhaseCompletionDates].Script.TSDate = 25-Feb
          [SetPhaseCompletionDates].Script.FlagDate = 13-Mar
          [SetPhaseCompletionDates].Script.AnthDate = 2-Apr
      CompositeFactor Ripe
        Specifications:
          [SetPhaseCompletionDates].Script.GermDate = 4-Jan
          [SetPhaseCompletionDates].Script.EmergDate = 14-Jan
          [SetPhaseCompletionDates].Script.VernDate = 31-Jan
          [SetPhaseCompletionDates].Script.TSDate = 25-Feb
          [SetPhaseCompletionDates].Script.FlagDate = 13-Mar
          [SetPhaseCompletionDates].Script.AnthDate = 2-Apr
          [SetPhaseCompletionDates].Script.RipeDate = 2-Jun
    Simulation SetDatesLater
      Clock: Start=2000-01-01; End=2000-07-30
      Summary SummaryFile
      Weather: FileName=%root%/Examples/WeatherFiles/AU_Dalby.met
      SoilArbitrator
      Zone Field: Area=1; Slope=0; AspectAngle=0; Altitude=50
        Report: EventNames=[Clock].DoReport
          VariableNames:
            [Clock].Today
            [Wheat].Phenology.Zadok.Stage
            [Wheat].Phenology.CurrentStageName
            [Wheat].AboveGround.Wt
            [Wheat].AboveGround.N
            [Wheat].Grain.Total.Wt*10 as Yield
            [Wheat].Grain.Protein
            [Wheat].Grain.Size
            [Wheat].Grain.Number
            [Wheat].Grain.Total.Wt
            [Wheat].Grain.Total.N
            [Wheat].Total.Wt
            [Wheat].Phenology.Stage
            [Wheat].Phenology.HaunStage
            [Wheat].LAI
            [Wheat].Leaf.Fw
            [Wheat].Stem.Wt
        Fertiliser
        Soil: same as SetDatesSameAsModel.SetDates.Field.Soil
        SurfaceOrganicMatter: InitialResidueName=wheat_stubble; InitialResidueType=wheat; InitialResidueMass=500; InitialStandingFraction=0; InitialCPR=0; InitialCNR=100
        Plant Wheat
        MicroClimate: a_interception=0; b_interception=1; c_interception=0; d_interception=0; SoilHeatFluxFraction=0.4; MinimumHeightDiffForNewLayer=0; NightInterceptionFraction=0.5; ReferenceHeight=2
        Manager SowingFertiliser: same as SetDatesSameAsModel.SetDates.Field.SowingFertiliser
        Manager Harvest: same as SetDatesSameAsModel.SetDates.Field.Harvest
        Manager SowingRule: same as SetDatesSameAsModel.SetDates.Field.SowingRule
        Manager SetPhaseCompletionDates: same as SetDatesSameAsModel.SetDates.Field.SetPhaseCompletionDates
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