Simulations: Version=67
  Simulation Base
    Clock: Start=2019-01-01; End=2019-03-01
    Summary
    Zone Field: Area=1; Slope=0
      Report: EventNames=[Clock].StartOfWeek
        VariableNames:
          [Clock].Today
          sum of [Clock].Today.DayOfYear from [Report].DateOfLastOutput to [Clock].Today as sum
          avg of [Clock].Today.DayOfYear from [Report].DateOfLastOutput to [Clock].Today as avg
          min of [Clock].Today.DayOfYear from [Report].DateOfLastOutput to [Clock].Today as min
          max of [Clock].Today.DayOfYear from [Report].DateOfLastOutput to [Clock].Today as max
          first of [Clock].Today.DayOfYear from [Report].DateOfLastOutput to [Clock].Today as first
          last of [Clock].Today.DayOfYear from [Report].DateOfLastOutput to [Clock].Today as last
          diff of [Clock].Today.DayOfYear from [Report].DateOfLastOutput to [Clock].Today as diff
  DataStore
