Simulations: Version=67
  Memo
    The old unit test was only testing that the simulation ran - not if it was doing the right thing. Have added something to address that here. I don't think that a statistical test is suitable - this is an absolute. Use a Manager to fail the simulation if there are differences.

    - I added a daily aggregation to make sure it wasn't causing a problem - and it does - the sum is wrong
    	- but only when using the original test item [Clocl].Today.DayOfYear - using a Weather variable is giveing a sensible result
  DataStore
  Simulation Base
    Clock: Start=1981-11-16; End=1984-03-05
    Weather: FileName=%root%\Tests\WeatherFiles\Goond.met
    Summary
    Zone Field: Area=1; Slope=0
      Report: EventNames=[Clock].EndOfDay
        VariableNames:
          [Clock].Today
          [Weather].MaxT
      Report ReportDaily: EventNames=[Clock].EndOfDay
        VariableNames:
          [Clock].Today
          [Weather].MaxT
          sum of [Weather].MaxT from [ReportDaily].DateOfLastOutput to [Clock].Today as sumD
          avg of [Weather].MaxT from [ReportDaily].DateOfLastOutput to [Clock].Today as meanD
          min of [Weather].MaxT from [ReportDaily].DateOfLastOutput to [Clock].Today as minD
          max of [Weather].MaxT from [ReportDaily].DateOfLastOutput to [Clock].Today as maxD
          first of [Weather].MaxT from [ReportDaily].DateOfLastOutput to [Clock].Today as firstD
          last of [Weather].MaxT from [ReportDaily].DateOfLastOutput to [Clock].Today as lastD
          diff of [Weather].MaxT from [ReportDaily].DateOfLastOutput to [Clock].Today as diffD
      Report ReportWeekly: EventNames=[Clock].EndOfWeek
        VariableNames:
          [Clock].Today
          [Weather].MaxT
          sum of [Weather].MaxT from [ReportWeekly].DateOfLastOutput to [Clock].Today as sumW
          avg of [Weather].MaxT from [ReportWeekly].DateOfLastOutput to [Clock].Today as meanW
          min of [Weather].MaxT from [ReportWeekly].DateOfLastOutput to [Clock].Today as minW
          max of [Weather].MaxT from [ReportWeekly].DateOfLastOutput to [Clock].Today as maxW
          first of [Weather].MaxT from [ReportWeekly].DateOfLastOutput to [Clock].Today as firstW
          last of [Weather].MaxT from [ReportWeekly].DateOfLastOutput to [Clock].Today as lastW
          diff of [Weather].MaxT from [ReportWeekly].DateOfLastOutput to [Clock].Today as diffW
      Report ReportMonthly: EventNames=[Clock].EndOfMonth
        VariableNames:
          [Clock].Today
          [Weather].MaxT
          sum of [Weather].MaxT from [ReportMonthly].DateOfLastOutput to [Clock].Today as sumM
          avg of [Weather].MaxT from [ReportMonthly].DateOfLastOutput to [Clock].Today as meanM
          min of [Weather].MaxT from [ReportMonthly].DateOfLastOutput to [Clock].Today as minM
          max of [Weather].MaxT from [ReportMonthly].DateOfLastOutput to [Clock].Today as maxM
          first of [Weather].MaxT from [ReportMonthly].DateOfLastOutput to [Clock].Today as firstM
          last of [Weather].MaxT from [ReportMonthly].DateOfLastOutput to [Clock].Today as lastM
          diff of [Weather].MaxT from [ReportMonthly].DateOfLastOutput to [Clock].Today as diffM
      Report ReportYearly: EventNames=[Clock].EndOfYear
        VariableNames:
          [Clock].Today
          [Weather].MaxT
          sum of [Weather].MaxT from [ReportYearly].DateOfLastOutput to [Clock].Today as sumY
          avg of [Weather].MaxT from [ReportYearly].DateOfLastOutput to [Clock].Today as meanY
          min of [Weather].MaxT from [ReportYearly].DateOfLastOutput to [Clock].Today as minY
          max of [Weather].MaxT from [ReportYearly].DateOfLastOutput to [Clock].Today as maxY
          first of [Weather].MaxT from [ReportYearly].DateOfLastOutput to [Clock].Today as firstY
          last of [Weather].MaxT from [ReportYearly].DateOfLastOutput to [Clock].Today as lastY
          diff of [Weather].MaxT from [ReportYearly].DateOfLastOutput to [Clock].Today as diffY
      Report ReportSimulation: EventNames=[Clock].EndOfSimulation
        VariableNames:
          [Clock].Today
          [Weather].MaxT
          sum of [Weather].MaxT from [ReportSimulation].DateOfLastOutput to [Clock].Today as sumS
          avg of [Weather].MaxT from [ReportSimulation].DateOfLastOutput to [Clock].Today as meanS
          min of [Weather].MaxT from [ReportSimulation].DateOfLastOutput to [Clock].Today as minS
          max of [Weather].MaxT from [ReportSimulation].DateOfLastOutput to [Clock].Today as maxS
          first of [Weather].MaxT from [ReportSimulation].DateOfLastOutput to [Clock].Today as firstS
          last of [Weather].MaxT from [ReportSimulation].DateOfLastOutput to [Clock].Today as lastS
          diff of [Weather].MaxT from [ReportSimulation].DateOfLastOutput to [Clock].Today as diffS
      Report ReportYearlyV2: EventNames=[Clock].EndOfYear
        VariableNames:
          [Clock].Today
          [Weather].MaxT
          sum of [Weather].MaxT from 15-Jun to [Clock].Today as sumY2
          avg of [Weather].MaxT from 15-Jun to [Clock].Today as meanY2
          min of [Weather].MaxT from 15-Jun to [Clock].Today as minY2
          max of [Weather].MaxT from 15-Jun to [Clock].Today as maxY2
          first of [Weather].MaxT from 15-Jun to [Clock].Today as firstY2
          last of [Weather].MaxT from 15-Jun to [Clock].Today as lastY2
          diff of [Weather].MaxT from 15-Jun to [Clock].Today as diffY2
      Report ReportSimulationV2: EventNames=[Clock].EndOfSimulation
        VariableNames:
          [Clock].Today
          [Weather].MaxT
          sum of [Weather].MaxT from 1-Jan-1982 to [Clock].Today as sumS2
          avg of [Weather].MaxT from 1-Jan-1982 to [Clock].Today as meanS2
          min of [Weather].MaxT from 1-Jan-1982 to [Clock].Today as minS2
          max of [Weather].MaxT from 1-Jan-1982 to [Clock].Today as maxS2
          first of [Weather].MaxT from 1-Jan-1982 to [Clock].Today as firstS2
          last of [Weather].MaxT from 1-Jan-1982 to [Clock].Today as lastS2
          diff of [Weather].MaxT from 1-Jan-1982 to [Clock].Today as diffS2
