Simulations: Area=0
  Simulation Continuous Wheat: Area=0
    WeatherFile met: FileName=\Examples\MetFiles\Goond.met
    Clock: StartDate=1940-01-01; EndDate=1950-12-31
    Summary summaryfile
    Zone paddock: Area=100
      Soil: SoilType=Black Vertosol; LocalName=Waco; Site=Jimbour; NearestTown=Jimbour, Q 4352; Region=South East Queensland; NaturalVegetation=Grassland, mainly Qld bluegrass; Latitude=0; Longitude=0
        InitialWater Initial water: FractionFull=1; PercentMethod=FilledFromTop
        Water
          Thickness  BD    AirDry  LL15  DUL   SAT
          150        1.02  0.15    0.29  0.54  0.59
          150        1.03  0.26    0.29  0.53  0.58
          300        1.02  0.29    0.29  0.54  0.59
          300        1.02  0.29    0.29  0.54  0.58
          300        1.06  0.3     0.3   0.52  0.57
          300        1.11  0.31    0.31  0.5   0.55
          300        1.12  0.32    0.32  0.5   0.55
          300        1.15  0.33    0.33  0.48  0.53
          300        1.18  0.34    0.34  0.47  0.52
          300        1.2   0.35    0.35  0.46  0.51
          300        1.25  0.36    0.36  0.44  0.49
          SoilCrop Barley
            LL=[0.29, 0.29, 0.32, 0.38, 0.39, 0.39, 0.41, 0.48, 0.47, 0.46, 0.44]
            KL=[0.1, 0.1, 0.08, 0.06, 0.04, 0.02, 0.01, 0, 0, 0, 0]
            XF=[1, 1, 1, 1, 1, 1, 1, 0, 0, 0, 0]
          SoilCrop Chickpea
            LL=[0.29, 0.29, 0.36, 0.43, 0.51, 0.5, 0.5, 0.48, 0.47, 0.46, 0.44]
            KL=[0.1, 0.1, 0.08, 0.06, 0.04, 0.02, 0.01, 0, 0, 0, 0]
            XF=[1, 1, 1, 1, 1, 1, 1, 0, 0, 0, 0]
          SoilCrop Lucerne
            LL=[0.29, 0.29, 0.29, 0.29, 0.3, 0.31, 0.32, 0.33, 0.34, 0.35, 0.36]
            KL=[0.1, 0.1, 0.1, 0.1, 0.09, 0.09, 0.09, 0.09, 0.09, 0.09, 0.09]
            XF=[1, 1, 1, 1, 1, 1, 1, 1, 1, 1, 1]
          SoilCrop Maize
            LL=[0.29, 0.29, 0.34, 0.34, 0.37, 0.4, 0.42, 0.48, 0.47, 0.46, 0.44]
            KL=[0.1, 0.1, 0.1, 0.08, 0.06, 0.04, 0.02, 0, 0, 0, 0]
            XF=[1, 1, 1, 1, 1, 1, 1, 0, 0, 0, 0]
          SoilCrop Perennial Grass
            LL=[0.29, 0.29, 0.39, 0.41, 0.4, 0.4, 0.41, 0.41, 0.4, 0.4, 0.42]
            KL=[0.1, 0.1, 0.1, 0.1, 0.09, 0.07, 0.05, 0, 0, 0, 0]
            XF=[1, 1, 1, 1, 1, 1, 1, 0, 0, 0, 0]
          SoilCrop Sorghum
            LL=[0.29, 0.29, 0.35, 0.38, 0.4, 0.4, 0.4, 0.48, 0.47, 0.46, 0.44]
            KL=[0.1, 0.1, 0.1, 0.08, 0.06, 0.04, 0.02, 0, 0, 0, 0]
            XF=[1, 1, 1, 1, 1, 1, 1, 0, 0, 0, 0]
          SoilCrop Wheat
            LL=[0.29, 0.29, 0.32, 0.32, 0.35, 0.38, 0.41, 0.48, 0.47, 0.46, 0.44]
            KL=[0.1, 0.1, 0.08, 0.06, 0.04, 0.02, 0.01, 0, 0, 0, 0]
            XF=[1, 1, 1, 1, 1, 1, 1, 0, 0, 0, 0]
        SoilWater: min_crit_temp=5; max_crit_temp=35; max_albedo=0.23; A_to_evap_fact=0.44; canopy_eos_coef=1.7; sw_top_crit=0.9; sumes1_max=100; sumes2_max=25; solute_flow_eff=[1]; solute_flux_eff=[1]; gravity_gradient=2E-05; specific_bd=2.65; hydrol_effective_depth=450; immobile_solutes=[nh4]; canopy_fact=[1, 1, 0, 0]; canopy_fact_height=[0, 600, 1800, 30000]; canopy_fact_default=0.5; act_evap_method=ritchie; irrigation_will_runoff=false; irrigation_layer=0; SummerCona=3.5; SummerU=6; SummerDate=1-Nov; WinterCona=3.5; WinterU=6; WinterDate=1-Apr; DiffusConst=40; DiffusSlope=16; Salb=0.13; slope=0; discharge_width=0; catchment_area=0; max_pond=0; CN2Bare=73; CNRed=20; CNCov=0.8
          Thickness  SWCON  KLAT
          150        0.3    0
          150        0.3    0
          300        0.3    0
          300        0.3    0
          300        0.3    0
          300        0.3    0
          300        0.3    0
          300        0.3    0
          300        0.3    0
          300        0.3    0
          300        0.3    0
          mobile_solutes=[no3, urea, cl, br, org_n, org_c_pool1, org_c_pool2, org_c_pool3]
        SoilNitrogen: NPartitionApproach=BasedOnLayerConcentration; wnmm_n_alpha=0.002; wnmm_dn_alpha=0.5; nemis_dn_km=22; nemis_dn_pot=7.194; cent_n_soilt_ave=15; cent_n_maxt_ave=25; cent_n_wfps_ave=0.7; cent_n_max_rate=0.1; ini_FOMtype=default; fom_type=[default, manure, mucuna, lablab, shemp, stable]; fract_carb=[0.2, 0.3, 0.54, 0.57, 0.45, 0]; fract_cell=[0.7, 0.3, 0.37, 0.37, 0.47, 0.1]; fract_lign=[0.1, 0.4, 0.09, 0.06, 0.08, 0.9]; ef_res=0.4; fr_res_biom=0.9; min_depth=100; rd_carb=[0.2, 0.1]; rd_cell=[0.05, 0.25]; rd_lign=[0.0095, 0.003]; ef_fom=0.4; fr_fom_biom=0.9; cnrf_coeff=0.693; cnrf_optcn=25; rd_biom=[0.0081, 0.004]; ef_biom=0.4; fr_biom_biom=0.6; rd_hum=[0.00015, 7E-05]; ef_hum=0.4; opt_temp=[32, 32]; wfmin_index=[0, 0.5, 1, 2]; wfmin_values=[0, 1, 1, 0.5]; soiltype=standard; allow_simpleSoilTemp=no; profile_reduction=no; use_organic_solutes=no; c_in_fom=0.4; minPatchArea=1; mcn=8
          zero: n2o_approach, ureappm_min, nh4ppm_min, no3ppm_min, fom_min, oc2om_factor, ini_pH, WarningThreshold, FatalThreshold, potHydrol_min, potHydrol_parmA, potHydrol_parmB, potHydrol_parmC, potHydrol_parmD, nitrification_pot, nh4_at_half_pot, dnit_rate_coeff, dnit_nitrf_loss, dnit_k1, dnit_wf_power, actC_parmB, actC_parmA, N2N2O_parmA, N2N2O_parmB, root_depth
        SoilOrganicMatter: RootCN=0; RootWt=0; SoilCN=0; EnrACoeff=0; EnrBCoeff=0; OCUnits=Total
          Thickness  OC    FBiom  FInert
          150        1.04  0.025  0.4
          150        0.89  0.02   0.6
          300        0.89  0.015  0.8
          300        0.89  0.01   0.9
          300        0.77  0.01   0.95
          300        0.45  0.01   0.95
          300        0.27  0.01   0.95
          300        0.22  0.01   0.95
          300        0.16  0.01   0.95
          300        0.13  0.01   0.95
          300        0.12  0.01   0.95
        Analysis: Thickness=[150, 150, 300, 300, 300, 300, 300, 300, 300, 300, 300]; PH=[8.4, 8.8, 9, 9.2, 9.2, 9.1, 9, 9, 8.9, 8.9, 8.9]; PHUnits=Water; BoronUnits=HotWater
        Sample Initial nitrogen: NO3Units=ppm; NH4Units=ppm; SWUnits=Volumetric; OCUnits=Total; PHUnits=Water
          Thickness  NO3    NH4
          150        6.503  0.599004
          150        2.101  0.100001
          300        2.101  0.100001
          300        1.701  0.100001
          300        1.701  0.100001
          300        1.701  0.100001
          300        1.701  0.100001
          300        1.701  0.100001
          300        1.701  0.100001
          300        1.701  0.100001
          300        1.701  0.100001
      SurfaceOrganicMatter: crit_residue_wt=2000; opt_temp=20; cum_eos_max=20; cnrf_coeff=0.277; cnrf_optcn=25; c_fract=0.4; leach_rain_tot=25; min_rain_to_leach=10; crit_min_surfom_orgC=0.004; default_cpr=0; default_standing_fraction=0; standing_extinct_coeff=0.5; fractionFaecesAdded=0.5; PoolName=wheat; type=wheat; mass=1000; standing_fraction=0; cnr=80
      Fertiliser
      Plant wheat
        Phenology
          StageBasedInterpolation StageCode: Proportional=false
          AirTemperatureFunction ThermalTime
        Arbitrator
        Structure: PrimaryBudNo=0
          AirTemperatureFunction ThermalTime
          PhaseLookupValue MainStemPrimordiaInitiationRate
          PhaseLookupValue MainStemNodeAppearanceRate
          Constant MainStemFinalNodeNumber: Value=0
          Constant ShadeInducedBranchMortality: Value=0
          Constant DroughtInducedBranchMortality: Value=0
          LinearInterpolationFunction HeightModel
          MultiplyFunction BranchingRate
        Leaf: CurrentExpandingLeaf=0; StartFractionExpanded=0; FractionNextleafExpanded=0; _ExpandedNodeNo=0; MaxCover=0; KDead=0
          Biomass Live
          MultiplyFunction ExtinctionCoeff
          LinearInterpolationFunction FrostFraction
          AirTemperatureFunction ThermalTime
          RUEModel Photosynthesis
            Constant RUE: Value=0
            RUECO2Function FCO2
            LinearInterpolationFunction FN
            WeightedTemperatureFunction FT: MaximumTemperatureWeighting=0
            LinearInterpolationFunction FW
            LinearInterpolationFunction FVPD
          InitialLeafValues LeafCohortParameters
            LinearInterpolationFunction MaxArea
            LinearInterpolationFunction GrowthDuration
            LinearInterpolationFunction LagDuration
            LinearInterpolationFunction SenescenceDuration
            LinearInterpolationFunction DetachmentLagDuration
            LinearInterpolationFunction DetachmentDuration
            LinearInterpolationFunction SpecificLeafAreaMax
            LinearInterpolationFunction SpecificLeafAreaMin
            LinearInterpolationFunction MaximumNConc
            LinearInterpolationFunction MinimumNConc
            LinearInterpolationFunction InitialNConc
            LinearInterpolationFunction NReallocationFactor
            LinearInterpolationFunction NRetranslocationFactor
            LinearInterpolationFunction ExpansionStress
            LinearInterpolationFunction CriticalNConc
            LinearInterpolationFunction DMRetranslocationFactor
            LinearInterpolationFunction ShadeInducedSenescenceRate
            LinearInterpolationFunction NonStructuralFraction
            Constant StructuralFraction: Value=0
      Folder Manager folder: Area=0
        Manager Sowing rule
```csharp
using System;
using Models.Core;
using Models.PMF;
namespace Models
{
	[Serializable]
	[System.Xml.Serialization.XmlInclude(typeof(Model))]
	public class Script : Model
	{
		[Link] Clock TimeClock;
		[EventSubscribe("StartOfDay")]
		private void OnStartOfDay(object sender, EventArgs e)
		{
			/*
				
      if (paddock_is_fallow() = 1 and FallowIn <> 'yes' and (NextCrop = 0 or NextCrop = '[crop]')) then
         if (date_within('[date1], [date2]') = 1) then
            if (rain[[rainnumdays]] >= [raincrit] AND esw >= [esw_amount]) OR
                ('[must_sow]' = 'yes' AND today = date('[date2]'))) THEN
               ChooseNextCrop = 'yes'   ! for rotations
               [crop] sow plants =[density], sowing_depth = [depth], cultivar = [cultivar], row_spacing = [row_spacing], crop_class = [class]
            endif
            if today = date('[date2]') then
               ChooseNextCrop = 'yes'
            endif
         endif
      endif
            
			*/
		}
		public override void OnCommencing()
		{
			/*
				
            nextcrop = 0
            fallowin = 0
            
			*/
		}
	}
}
```
        Manager Sowing fertiliser
```csharp
using System;
using Models.Core;
using Models.PMF;
namespace Models
{
	[Serializable]
	[System.Xml.Serialization.XmlInclude(typeof(Model))]
	public class Script : Model
	{
		[Link] Clock TimeClock;
		[EventSubscribe("StartOfDay")]
		private void OnStartOfDay(object sender, EventArgs e)  /* unknown event type found here */ 
		{
			/*
				
        [fertmodule] apply amount = [fert_amount_sow] (kg/ha), depth = 50 (mm), type = [fert_type_sow]
            
			*/
		}
	}
}
```
        Manager Harvesting rule
```csharp
using System;
using Models.Core;
using Models.PMF;
namespace Models
{
	[Serializable]
	[System.Xml.Serialization.XmlInclude(typeof(Model))]
	public class Script : Model
	{
		[Link] Clock TimeClock;
		[EventSubscribe("EndOfDay")]
		private void OnEndOfDay(object sender, EventArgs e)
		{
			/*
				

           if [crop].StageName = 'harvest_ripe' or [crop].plant_status = 'dead' then
              [crop]  harvest
              [crop]  end_crop
           endif

            
			*/
		}
	}
}
```
      Report outputfile
        Variables:
          [Clock].Today
          biomass
          yield
          grain_protein
          grain_size
          esw
  DataStore
