Simulations: Version=100
  DataStore
  Simulation Bork
    Clock: Start=2020-01-01; End=2020-01-02
    Summary
    Manager
```csharp
using System.Data;
using System.IO;
using APSIM.Shared.Utilities;
using System.Xml.Serialization;
using Models;
using Models.PMF;
using System.Text;
using System.Collections.Generic;
using Models.Core;
using System;
      

namespace Models
{
    [Serializable] 
    public class Script : Model
    {
    	public string Test { get; set; }

        [EventSubscribe("StartOfSimulation")]
        private void OnStartOfSimulation(object sender, EventArgs e)
        {
            Test = "Hello";
        }
    }
}
```
    Manager Manager1
```csharp
using Models.Core;
using System;

namespace Models
{
	[Serializable] 
	public class Script : Model
	{
		[Link]
		private Simulation sim;

		[EventSubscribe("StartOfDay")]
		private void OnStartOfSimulation(object sender, EventArgs e)
		{
			string test = (string)Apsim.Get(sim, "Manager.Script.Test");
			if (test != "Hello")
				throw new Exception("bork");
		}
	}
}
```
