folder simulations: version=37; creator=Apsim 7.10-r4158
  factorial Factorials: active=0
    settings
  simulation Double Crop Maize-wheat (silage)
    manager2 FertiliseOnFixedDates
      # Fertiliser will be applied on the date(s) below
      SameDays = yes  # Apply fertiliser on the same day(s) each year? (yes/no) - if "no" then must include the year of application below
      FertDatesStr = 1-dec 7-jan 1-feb 21-feb  # Dates for one or more fertiliser applications (dd-mmm or dd-mmm-yyyy) as a list with a space between dates
      # Test for the mineral N in the soil and don't apply the fertiliser if greater than X kgN/ha is stored in the soil above a depth of Y mm
      UseSoilN = no  # Use a critical soil mineral N to prevent application above a threshold? (yes/no)
      FertAmtCriteria = 50  # Don't add fertiliser if N in the soil to the depth below exceeds (kg/ha)
      FertDepthCriteria = 75  # Depth to which the amount of N in the soil should be calculated (mm)
      # Fertiliser application details
      FertDepth = 30  # Depth at which to apply the fertiliser (mm)
      FertAmt = 222  # Annual fertiliser addition (kg N /ha) - assumes an even split between applications (if more than one application date)
      FertType = urea_n  # Fertiliser type - select from the list
```vb
Imports System
Imports ModelFramework

Public Class Script 
   <Link()> Dim MyPaddock As Paddock
   <Link()> Dim Fert As Fertiliser

   'Parameters - user inputs from the Properties tab
   <Param> Private FertDatesStr() As String     'The array of fertiliser "dates" as a atring array of dd-mmm's 
   <Param> Private SameDays As String           'Yes/No as to whether the fertiliser should be applied every year - if no then will only be on the dd-mmm-yyyy in FertDates
   <Param> Private UseSoilN As String           'Yes/No as to whether to use the soil mineral N stored to further control the fertiliser application
   <Param> Private FertAmtCriteria As Single    'Don't apply fertiliser if the N stored in the soil is greater than this.  Disregard the test if the value is -ve
   <Param> Private FertDepthCriteria As Single  'Depth in the soil to calculate the N storage
   <Param> Private FertDepth As Single          'Depth in the soil that the fertilser will be applied
   <Param> Private FertAmt As Single            'Total annual application - needs to be split up between the various application dates listed
   <Param> Private FertType As String           'Type of fertliser to apply

   'Inputs - got by this Manager from elsewhere in APSIM
   <Input> Private Today As DateTime            'Today's date from APSIM 
   <Input> Private dlayer As Single()           'Array of soil layer thicknesses - for calculation of mineral N in the soil
   <Input> Private no3 As Single()              'Array of nitrate-N (kg N /ha) for each soil layer - for calculation of mineral N in the soil
   <Input> Private nh4 As Single()              'Array of ammonium-N (kg N /ha) for each soil layer - for calculation of mineral N in the soil
   <Input> Private urea As Single()             'Array of urea-N (kg N /ha) for each soil layer - for calculation of mineral N in the soil

   'Outputs - calculated by this Manager and available to be output by the user
   <Output> Private Add_fert As Boolean         'Test to see if Today is a day that fertiliser should be added
   <Output> Private FertCriteriaOK As Boolean   'Test to see if the criteria related to the amount of mineral N in the soil is satisfied
   <Output> Private CumSoilN As Single          'Mineral-N stored in the soil to a depth of FertDepthCriteria

   'Other variables that are calculated but not needed for outputs
   Private FertDates As Date()                  'Array to hold the application dates once converted to dates from the string
   Private LayerWeights As Single()             'Weigthing of each layer for FertAmtCriteria calculation


   <EventHandler()> Public Sub OnInit2()
      '"OnInit2" is an event handler gets called once at the start of the simulation 

      'Get the right length for the array of dates and then convert the strings of dd-mmm into proper dates - VB will assume the current year if it is not already supplied
      ReDim FertDates(FertDatesStr.length - 1)
      For i As Integer = 0 To FertDatesStr.Length - 1
         FertDates(i) = Date.Parse(FertDatesStr(i))
      Next

      'Calculate the application amount per application (user input was the total annaul application)
      FertAmt = FertAmt / FertDatesStr.length

   End Sub

   <EventHandler()> Public Sub OnPrepare()
      '"OnPrepare" is an event handler gets called once at the start of every day (before Prepare and Post) 

      'By default no fertiliser added today
      'Run through all the dates and see if any of the dd-mmm's match those for Today, if so then will add fertiliser provided that other criteria are met
      'If the use has selected "no" to applying on the same dates each year then also test for the current year
      Add_Fert = False                                                                     
      For i As Integer = 0 To FertDates.length - 1
         If SameDays.ToLower = "yes" Then
            If (FertDates(i).Day = Today.Day) And (FertDates(i).Month = Today.Month) Then
               Add_Fert = True
            End If         
         Else
            If (FertDates(i).Day = Today.Day) And (FertDates(i).Month = Today.Month) And (FertDates(i).Year = Today.Year) Then
               Add_Fert = True
            End If         
         End If
      Next

      'If the user has decided not to user a soil minerla N criteria then FertCriteriaOK is always true
      If UseSoilN.ToLower = "no" Then
         FertCriteriaOK = True
      Else
         CumSoilN = 0.0
         FertCriteriaOK = False

         'Set the number of elements in the LayerWeights array to equal the number of soil layers - do this here because erosion can change the layering
         'Then move through the array and assign a LayerWeighting from 0 to 1 quantifying what proportion of the soil and mineral N in this layer is above FertDepthCriteria
         ReDim LayerWeights(dlayer.length - 1)                
         Dim CumDepth As Single = 0.0
         For i As Integer = 0 To dlayer.Length - 1     
            CumDepth += dlayer(i)                      
            If CumDepth <= FertDepthCriteria Then
               LayerWeights(i) = 1.0                   
            ElseIf (CumDepth - dlayer(i)) <= FertDepthCriteria Then
               LayerWeights(i) = (FertDepthCriteria - (CumDepth - dlayer(i))) / dlayer(i)
            Else
               LayerWeights(i) = 0.0
            End If
         Next

         'Add up the no3, nh4 and urea (all already in kg N /ha) in each layer and multiply by the layer weighting to get the total mineral N to the set depth
         For i As Integer = 0 To dlayer.Length - 1     
            CumSoilN += (no3(i) + nh4(i) + urea(i)) * LayerWeights(i)                         
         Next

         'If there is less mineral N in the soil than FertAmtCriteria then it is OK to add fertiliser
         If CumSoilN <= FertAmtCriteria Then
            FertCriteriaOK = True                             
         End If
      End If

      'Only add the fertiliser if both conditions are true
      '"Fert.Apply" send the command to apply the specified amount of fertiliser at the specified depth of the specified type of fertiliser
      If Add_Fert And FertCriteriaOK Then
         Fert.Apply(FertAmt, FertDepth, FertType)
      End If

   End Sub

End Class
```
