Simulations: Version=160
  DataStore
  Simulation Lindhof_Base
    Clock: Start=1961-01-01; End=1962-04-30
    Weather
      FileName=C:\Work\Repos\ApsimInitiative\ApsimX\Examples\WeatherFiles\lincoln.met
    MicroClimate: a_interception=0; b_interception=0; c_interception=0; d_interception=0; SoilHeatFluxFraction=0; MinimumHeightDiffForNewLayer=0; NightInterceptionFraction=0; ReferenceHeight=2
    SoilArbitrator
    Forages
      Parameters:
        Name                          IsLive  DigestibilityString  FractionConsumable  MinimumAmount  UseDigestibilityFromModel
        AGPRyegrass.Leaf              true    0.7                  1                   100            false
        AGPRyegrass.Leaf              false   0.3                  1                   0              false
        AGPRyegrass.Stem              true    0.7                  1                   100            false
        AGPRyegrass.Stem              false   0.3                  1                   0              false
        AGPRyegrass.Stolon            true    0.7                  1                   100            false
        AGPRyegrass.Stolon            false   0.3                  1                   0              false
        AGPWhiteClover.Leaf           true    0.7                  1                   100            false
        AGPWhiteClover.Leaf           false   0.3                  1                   0              false
        AGPWhiteClover.Stem           true    0.7                  1                   100            false
        AGPWhiteClover.Stem           false   0.3                  1                   0              false
        AGPWhiteClover.Stolon         true    0.7                  1                   100            false
        AGPWhiteClover.Stolon         false   0.3                  1                   0              false
        SurfaceOrganicMatter.Residue  true    0.7                  1                   100            false
        SurfaceOrganicMatter.Residue  false   0.3                  1                   0              false
    Summary summaryfile
    Zone ZoneHot: Area=1; Slope=0; AspectAngle=0; Altitude=50
      Manager ModifyNutrientSoilTempFunctions
        BaseTemp = 10
        OptTemp = 45
        DoLignin = True
        DoCellulose = True
        DoCarbohydrate = True
        DoMicrobial = True
        DoHumic = True
        DoNitrification = True
```csharp
using Models.Soils;
using System;
using System.Linq;
using Models.Core;
using Models.PMF;
using APSIM.Shared.Utilities;
using Models.Utilities;
using Models.Surface;
using Models.Functions;

namespace Models
{
    [Serializable]
    public class Script : Model
    {
        [Link] Clock Clock;
        [Link(Type = LinkType.Path, Path="[Nutrient].FOMLignin.Decomposition.Rate.TF")] private CERESMineralisationTemperatureFactor TFLignin;
		[Link(Type = LinkType.Path, Path="[Nutrient].FOMCellulose.Decomposition.Rate.TF")] private CERESMineralisationTemperatureFactor TFCellulose;
		[Link(Type = LinkType.Path, Path="[Nutrient].FOMCarbohydrate.Decomposition.Rate.TF")] private CERESMineralisationTemperatureFactor TFCarbohydrate;
		[Link(Type = LinkType.Path, Path="[Nutrient].Microbial.Decomposition.Rate.TF")] private CERESMineralisationTemperatureFactor TFMicrobial;
		[Link(Type = LinkType.Path, Path="[Nutrient].Humic.Decomposition.Rate.TF")] private CERESMineralisationTemperatureFactor TFHumic;
		[Link(Type = LinkType.Path, Path="[Nutrient].Nitrification.Rate.CERESMineralisationTemperatureFactor")] private CERESMineralisationTemperatureFactor TFNitrification;
		
		
        [Description("New base temperature for decomposition (oC)")] public double BaseTemp { get; set; }
        [Description("New optimum temperature for decomposition (oC)")] public double OptTemp { get; set; }
        
        
        [Separator("To which soil organic matter fractions should the above values apply?")]

        [Description("Apply these to the FOM Lignin fraction?")] public bool DoLignin { get; set; }
        [Description("Apply these to the FOM Cellulose fraction?")] public bool DoCellulose { get; set; }
        [Description("Apply these to the FOM Carbohydrate fraction?")] public bool DoCarbohydrate { get; set; }
        [Description("Apply these to the Microbial fraction?")] public bool DoMicrobial { get; set; }
        [Description("Apply these to the Humic fraction?")] public bool DoHumic { get; set; }
        [Description("Apply these to the Nitrification rate?")] public bool DoNitrification { get; set; }



        [EventSubscribe("StartOfSimulation")]
        private void OnStartOfSimulation(object sender, EventArgs e)
        {
   			if (DoLignin)
   			{
   				TFLignin.MineralisationSTBase = BaseTemp;
        		TFLignin.MineralisationSTOpt = OptTemp;
        	}

   			if (DoCellulose)
   			{
   				TFCellulose.MineralisationSTBase = BaseTemp;
        		TFCellulose.MineralisationSTOpt = OptTemp;
        	}

   			if (DoCarbohydrate)
   			{
   				TFCarbohydrate.MineralisationSTBase = BaseTemp;
        		TFCarbohydrate.MineralisationSTOpt = OptTemp;
        	}

   			if (DoMicrobial)
   			{
   				TFMicrobial.MineralisationSTBase = BaseTemp;
        		TFMicrobial.MineralisationSTOpt = OptTemp;
        	}

   			if (DoHumic)
   			{
   				TFHumic.MineralisationSTBase = BaseTemp;
        		TFHumic.MineralisationSTOpt = OptTemp;
        	}

   			if (DoNitrification)
   			{
   				TFNitrification.MineralisationSTBase = BaseTemp;
        		TFNitrification.MineralisationSTOpt = OptTemp;
        	}

        }
    }
}
```
      SurfaceOrganicMatter: InitialResidueName=grass; InitialResidueType=grass; InitialResidueMass=1500; InitialStandingFraction=0; InitialCPR=0; InitialCNR=20
      Soil Lindhof: ASCOrder=NA; ASCSubOrder=NA; SoilType=Haplic Cambisols; Site=NA; NearestTown=NA; Region=NA; State=NA; Country=Germany; NaturalVegetation=NA; ApsoilNumber=9999; Latitude=54.375; Longitude=10.125; LocationAccuracy=+- 250 m; YearOfSampling=2019; DataSource=ISRIC SoilGrids
        Water: Thickness=[220, 80, 110, 230, 160, 100, 100]; InitialValues=[0.374, 0.376, 0.316, 0.322, 0.339, 0.375, 0.33]; InitialPAWmm=124.05; RelativeTo=LL15; FilledFromTop=true
        Physical
          Thickness  ParticleSizeClay  ParticleSizeSand  ParticleSizeSilt  BD    AirDry  LL15   DUL    SAT    KS
          220        12.2              61.9              25.9              1.64  0.176   0.22   0.374  0.381  69.232
          80         13.2              60.3              26.5              1.65  0.173   0.216  0.35   0.377  69.232
          110        17.7              52.2              30.1              1.78  0.259   0.259  0.316  0.328  65.331
          230        19.1              50.8              30                1.73  0.222   0.222  0.322  0.347  58.176
          160        18.9              50.9              30.1              1.73  0.274   0.274  0.339  0.347  54.898
          100        14.5              56.9              28.6              1.61  0.231   0.231  0.375  0.392  54.898
          100        7                 87.7              5.2               1.58  0.097   0.097  0.33   0.404  54.898
          SoilCrop AGPRyegrassSoil: LL=[0.22, 0.216, 0.259, 0.222, 0.274, 0.231, 0.097]; KL=[0.1, 0.1, 0.1, 0.1, 0.1, 0.1, 0.1]; XF=[1, 1, 1, 0.5, 0, 0, 0]
          SoilCrop AGPWhiteCloverSoil: LL=[0.22, 0.216, 0.259, 0.222, 0.274, 0.231, 0.097]; KL=[0.1, 0.1, 0.1, 0.1, 0.1, 0.1, 0.1]; XF=[1, 1, 0, 0, 0, 0, 0]
        WaterBalance SoilWater: SummerDate=1-may; SummerU=9; SummerCona=4.4; WinterDate=1-oct; WinterU=2; WinterCona=3; DiffusConst=199.52; DiffusSlope=20.3; Salb=0.13; CN2Bare=73; CNRed=20; CNCov=0; DischargeWidth=5; CatchmentArea=10; PSIDul=-100; Thickness=[150, 150, 150, 150, 200, 200, 200, 200, 300, 300]
          SWCON=[0.45, 0.476, 0.482, 0.477, 0.428, 0.426, 0.426, 0.427, 0.366, 0.368]
        Organic: FOMCNRatio=40; CarbonUnits=Total
          Thickness  Carbon  SoilCNRatio  FBiom  FInert  FOM
          220        1.2     12.5         0.08   0.574   325.325
          80         1.3     12.5         0.08   0.591   255.91
          110        0.3     12.5         0.079  0.612   183.98
          190        0.2     12.5         0.03   0.85    40
          200        0.2     12.5         0.001  0.99    0
          100        0.2     12.5         0.001  0.99    0
          100        0.2     12.5         0.001  0.99    0
        Chemical: Thickness=[220, 80, 110, 230, 160, 100, 100]; PH=[5.5, 5.6, 5.8, 5.7, 5.8, 5.7, 5.6]; PHUnits=Water
        Nutrient
        Solute NO3: Thickness=[220, 80, 110, 230, 160, 100, 100]; InitialValues=[0.272, 0.183, 0.114, 0.065, 0.018, 0.007, 0.007]; InitialValuesUnits=ppm; WaterTableConcentration=0; D0=0; DepthConstant=0; MaxDepthSoluteAccessible=0; RunoffEffectivenessAtMovingSolute=0; MaxEffectiveRunoff=0
        Solute NH4: Thickness=[220, 80, 110, 230, 160, 100, 100]; InitialValues=[0.055, 0.037, 0.022, 0.012, 0.003, 0.001, 0.001]; InitialValuesUnits=ppm; WaterTableConcentration=0; D0=0; DepthConstant=0; MaxDepthSoluteAccessible=0; RunoffEffectivenessAtMovingSolute=0; MaxEffectiveRunoff=0
        Solute Urea: Thickness=[220, 80, 110, 230, 160, 100, 100]; InitialValues=[0, 0, 0, 0, 0, 0, 0]; InitialValuesUnits=kg/ha; WaterTableConcentration=0; D0=0; DepthConstant=0; MaxDepthSoluteAccessible=0; RunoffEffectivenessAtMovingSolute=0; MaxEffectiveRunoff=0
        SoilTemperature
      Report Results: EventNames=[Clock].DoReport
        VariableNames:
          [Clock].Today as Date
          sum([Nutrient].TotalN) as SoilTotalN
          [Nutrient].MineralisedN[1] as Mineralisation
          [Soil].SoilTemperature.AverageSoilTemp[1] as St1
          [Soil].Nutrient.Nitrification.Rate.CERESMineralisationTemperatureFactor.MineralisationSTBase as BaseST
          [Soil].Nutrient.Nitrification.Rate.CERESMineralisationTemperatureFactor.MineralisationSTOpt as OptST
          [Soil].Nutrient.Nitrification.Rate.CERESMineralisationTemperatureFactor.Value(1)  as TF
    Zone ZoneCold: Area=1; Slope=0; AspectAngle=0; Altitude=50
      Manager ModifyNutrientSoilTempFunctions
        BaseTemp = -10
        OptTemp = 15
        DoLignin = True
        DoCellulose = True
        DoCarbohydrate = True
        DoMicrobial = True
        DoHumic = True
        DoNitrification = True
```csharp
using Models.Soils;
using System;
using System.Linq;
using Models.Core;
using Models.PMF;
using APSIM.Shared.Utilities;
using Models.Utilities;
using Models.Surface;
using Models.Functions;

namespace Models
{
    [Serializable]
    public class Script : Model
    {
        [Link] Clock Clock;
        [Link(Path="[Nutrient].FOMLignin.Decomposition.Rate.TF")] private CERESMineralisationTemperatureFactor TFLignin;
		[Link(Path="[Nutrient].FOMCellulose.Decomposition.Rate.TF")] private CERESMineralisationTemperatureFactor TFCellulose;
		[Link(Path="[Nutrient].FOMCarbohydrate.Decomposition.Rate.TF")] private CERESMineralisationTemperatureFactor TFCarbohydrate;
		[Link(Path="[Nutrient].Microbial.Decomposition.Rate.TF")] private CERESMineralisationTemperatureFactor TFMicrobial;
		[Link(Path="[Nutrient].Humic.Decomposition.Rate.TF")] private CERESMineralisationTemperatureFactor TFHumic;
		[Link(Path="[Nutrient].Nitrification.Rate.CERESMineralisationTemperatureFactor")] private CERESMineralisationTemperatureFactor TFNitrification;
		
		
        [Description("New base temperature for decomposition (oC)")] public double BaseTemp { get; set; }
        [Description("New optimum temperature for decomposition (oC)")] public double OptTemp { get; set; }
        
        
        [Separator("To which soil organic matter fractions should the above values apply?")]

        [Description("Apply these to the FOM Lignin fraction?")] public bool DoLignin { get; set; }
        [Description("Apply these to the FOM Cellulose fraction?")] public bool DoCellulose { get; set; }
        [Description("Apply these to the FOM Carbohydrate fraction?")] public bool DoCarbohydrate { get; set; }
        [Description("Apply these to the Microbial fraction?")] public bool DoMicrobial { get; set; }
        [Description("Apply these to the Humic fraction?")] public bool DoHumic { get; set; }
        [Description("Apply these to the Nitrification rate?")] public bool DoNitrification { get; set; }



        [EventSubscribe("StartOfSimulation")]
        private void OnStartOfSimulation(object sender, EventArgs e)
        {
   			if (DoLignin)
   			{
   				TFLignin.MineralisationSTBase = BaseTemp;
        		TFLignin.MineralisationSTOpt = OptTemp;
        	}

   			if (DoCellulose)
   			{
   				TFCellulose.MineralisationSTBase = BaseTemp;
        		TFCellulose.MineralisationSTOpt = OptTemp;
        	}

   			if (DoCarbohydrate)
   			{
   				TFCarbohydrate.MineralisationSTBase = BaseTemp;
        		TFCarbohydrate.MineralisationSTOpt = OptTemp;
        	}

   			if (DoMicrobial)
   			{
   				TFMicrobial.MineralisationSTBase = BaseTemp;
        		TFMicrobial.MineralisationSTOpt = OptTemp;
        	}

   			if (DoHumic)
   			{
   				TFHumic.MineralisationSTBase = BaseTemp;
        		TFHumic.MineralisationSTOpt = OptTemp;
        	}

   			if (DoNitrification)
   			{
   				TFNitrification.MineralisationSTBase = BaseTemp;
        		TFNitrification.MineralisationSTOpt = OptTemp;
        	}

        }
    }
}
```
      SurfaceOrganicMatter: InitialResidueName=grass; InitialResidueType=grass; InitialResidueMass=1500; InitialStandingFraction=0; InitialCPR=0; InitialCNR=20
      Soil Lindhof: same as Lindhof_Base.ZoneHot.Lindhof
      Report Results: EventNames=[Clock].DoReport
        VariableNames:
          [Clock].Today as Date
          sum([Nutrient].TotalN) as SoilTotalN
          [Nutrient].MineralisedN[1] as Mineralisation
          [Soil].SoilTemperature.AverageSoilTemp[1] as St1
          [Soil].Nutrient.Nitrification.Rate.CERESMineralisationTemperatureFactor.MineralisationSTBase as BaseST
          [Soil].Nutrient.Nitrification.Rate.CERESMineralisationTemperatureFactor.MineralisationSTOpt as OptST
          [Soil].Nutrient.Nitrification.Rate.CERESMineralisationTemperatureFactor.Value(1)  as TF
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