Simulations: Version=150
  DataStore
    ExcelInput ObservedAveAnnual: FileNames=[ObservedAll.xlsx]; SheetNames=[ObservedAveragedAnnual]
    ExcelInput ObservedAnnual: FileNames=[ObservedAll.xlsx]; SheetNames=[ObservedAnnual]
    ExcelInput ObservedAverageSeason: FileNames=[ObservedAll.xlsx]; SheetNames=[ObservedAverageSeason]
    PredictedObserved AveAnnual: PredictedTableName=SummaryReport; ObservedTableName=ObservedAveragedAnnual; FieldNameUsedForMatch=Date; AllColumns=false
    PredictedObserved Annual: PredictedTableName=AnnualReport; ObservedTableName=ObservedAnnual; FieldNameUsedForMatch=Date; AllColumns=false
    PredictedObserved AveSeason: PredictedTableName=SeasonalReport; ObservedTableName=ObservedAverageSeason; FieldNameUsedForMatch=Season; AllColumns=false
  Memo
    AgPasture is a model developed to simulate pasture growth in the APSIM framework. It was initially based on the plant physiological model of [thornley1990plant], as were the models SGS/DairyMod/EcoMod, presented by [johnson_dairymod_2008]. Today in AgPasture, the plant processes were adapted from EcoMod but all environmental factors and partition of resources is done by other models in the APSIM framework.The main purpose of AgPasture is to simulate mixed pastures but based on individual calculations for each species of photosynthesis, respiration, dry matter accumulation and partitioning and tissue turnover as presented by [li_modelling_2011]. It simulates pastures composed by C3 and C4 grasses, legumes and forbs. Now AgPasture has the sward component that is responsible for integrating the outputs obtained for each species and controlling management aspects, such as grazing.
    The base species in AgPasture is a generic temperate C3 grass parameterised as a generic ryegrass. All simulations are based on an stablished pasture, so there is no development from seeds. The proportion of species in the sward varies according to environmental effects, water and nutrient extraction ability and effects of harvests (cutting or grazing) on each of the species in the sward. Each species is described as a set of organs (Figure 1) and these organs are described by tissue pools (Figure 2).

    ![Description of plant species in AgPasture with the indication of a general class for plant parts.](AgPasturePlantSpecies.png)

    ![Tissue dynamics in AgPasture, from new growth until senescence.](AgPastureTissueDynamics.png)

    The water demand is calculated by the MicroClimate model (originally micromet; [snow_apsimmicromet_2004]). Water availability is then calculated according to the root distribution and the KL parameter in the soil. The communication wih the soil is mediated by SoilArbitrator, which is lso responsible to balance resource competition between plants. Similarly, SoilArbitrator mediates nitrogen availability. AgPasture receives this information and calculates plant potential growth through net photosynthesis and a series of growth limiting factors (GLF), related to water, nitrogen, temperature, fertility (to account for nutrient limitations, other than nitrogen) and a generic factor (to account for the effects of diseases, for example) are used to reach the actual plant growth. This actual plant growth is what is used for the further processes of tissue turnover and dry matter allocation presented in Figure 3. Dry matter transfer across tissues, how turnover rates act, and nitrogen balance are presented in Figure 4. In general, AgPasture calculates the turnover rates (γ) for each tissue pool of all plant organs. The rates are then passed on to each organ and the amounts to be potentially turned over (dDM) are calculated for each tissue pool. For nitrogen, basically AgPasture uses the nitrogen taken up from the soil and fixed by legumes. This nitrogen amount will then be available for new growth. The process of nitrogen uptake aims for the maximum concentration of nitrogen in new growth (Nmax*). This is not always achieved and the current nitrogen concentration will be added to the pool of tissue 0, which actively contributes with dry matter and nitrogen transfer for older tissues. The same happens for tissues 1 and 2. One of the modifications done in AgPasture for APSIMX is the definition of an adequate nitrogen concentration in these pools. Now tissues have a target concentration of nitrogen  and any extra nitrogen is put through the remobilisable nitrogen pool ([vogeler2016deriving]). The rate of nitrogen remobilisation is defined by kL, which mainly shows that the priority is the first leaf. When the first leaf becomes deficient, the remobilisation of extra nitrogen aims to fulfill the nitrogen need for this pool. At the same time, a minimum concentration of nitrogen is always transferred to the pool of tissue 3, resulting in a constant nitrogen concentration of this pool. This is then added to the litter pool. where dry matter that comes from the shoot is added to the surface organic matter pool whereas dry matter from roots goes to the soil fresh organic matter pool. The amount of nitrogen remobilisable that was not used is then added to the litter pool.

    ![Description of growth calculations done by AgPasture, from photosynthesis up to the partitioning of growth between shoot and root.](AgPastureGrowth.png)

    ![Nitrogen balance and dry matter transfer in AgPasture.](AgPastureBalance.png)

    AgPasture does not account for phenological development, therefore it does not simulate reproductive growth and seed production. Instead, the model mimics changes in growth rate and dry matter allocation by using a simple function (based on latitude and some species specific parameters) that changes in the shoot:root ratio of plants during this "reproductive period". Another limitation of the model is the lack of carbon remobilisation, which makes it difficult to simulate the proper remobilisation of reserves in the plant. More details are given in the supplementary documentation for AgPasture.
    Biomass removal can be simulated by the Graze (Figure 5) and RemoveBiomass (Figure 6) methods. The Graze method is a simple way to present the amount of biomass to be removed. It uses a parameter 'Amount', which sets up the amount of dry matter to be removed, and a parameter 'Type', which defines how the value of 'Amount' is interpreted. 'Type' can be set as 'ResidueAmount', where the target amount of dry matter is a value for the residual amount of biomass that will be left after harvest, or it can be set as 'RemoveAMount', where the target amount of dry matter is the value to be removed by the harvest. Both methods are dependent on a minimum above ground green dry matter that is set as a default of 100 kg DM/ha and can never be removed. Then a function 'RemoveDM' is responsible for the dry matter removal and partitions the amount to be removed among organs and pools. This is dependent on default preference values, which are currently set as 1. A series of checks is done to guarantee that mass balance is not affected by the removal of dry matter. The 'RemoveBiomass' method is more elaborate and allows to control the amount of each organ and pool that will be removed. The fractions to be removed can be set through a 'RemovalType' or a 'RemovalData' parameter. The 'RemovalType' is based on default fractions for organs (leaves, stems and stolons) with fractions for live and dead pools of dry matter to be removed and residual dry matter. The 'RemovalData' is optional and allows the fractions to be removed to be set up by the user.

    ![Graze method of biomass removal in AgPasture.](AgPastureGraze.png)

    ![Description of the RemoveBiomass method in AgPasture](AgPastureRemoveBiomass.png)

    Figure 6. RemoveBiomass method of biomass removal in AgPasture.

    Root distribution in AgPasture is give by a simple function, it follows an uniform distribution down to a certain depth, which can be set up by the user. From this depth on, the root system decreases following an exponential decline until no roots are present at the given maximum rooting depth (Figure 7).

    ![Example of a shallow, mid and deep distribution of roots in AgPasture.](AgPastureRootDistribution.png)
  Folder Validation
    Memo
      The validation of biomass production, N status, and relative species composition of AgPasture is done using a series of simulations based on a number of datasets.  The base validation uses the 'Radcliffe trials', a series of dataset of yield measured in exclusion cages on grass-clover pastures across New Zealand. The second set comprises of two long term dataset that contain more detailed informatin on management and pasture yield for each harvest, these are a subset of the 'Winchmore' irrigation and fertility trials, with data from ryegrass-clover mixed pastures under rainfed and irrigated conditions, and another set based on production trials in 'Ruakura' [mccall2003pasture]. The third set of simulations is based on a fertilisty trial conducted in 'Lincoln' and 'Ruakura' for the Forages for Reducing Nitorgen Leaching programme (FRNL); this encompases two years of biomass and N uptake measurements under six N fertilisation rates for monocultures of ryegrass and white clover, plus a mix of the two (only in Ruakura).
    Experiment Radcliffe
      Memo
        The dataset used for this simulation is called the 'Radcliffe trials' because it was obtained from experiments done based on the methodology described by [radcliffe1974seasonal]. This comprises a series of measurements on grass-clover pastures to evaluate pasture production across New Zealand. The data was obtained using exclusion cages set up in grazed pastures, with biomass harvested at variable intervals; in few locations plant composition was also determined. The data is presented summarised as the average annual production of dry matter per hectare. This validation set has experiments done in 33 locations, with some comprising two sets due to irrigation, lanscape factors, or different periods of observation. In total, there 37 sets are being used as a validation set for this simulation. Locations such as 'Arrowtown', 'Cromwell', 'PoolburnI', 'Awamoko', 'LowerWaitakiPlains', 'WinchmoreRedcliff' and 'WinchmoreIrrig' are irrigated trials, whereas the remaining locations are rainfed; in none of them N fertiliser was used. Note that in our simulations growth conditions that are not climate or nitrogen driven, are assumed to be non-limiting (i.e. soil fertility, pH, etc. are taken as near optimum and no pests or disease occured), this is a considerable leap of faith in some locations.  Furthermore, the model is not considering variations in cultivars and the presence of weeds and other forages besides ryegrass and clover, plus pasplaum for the north-most locations (such variations in species composition are likely to have occured).

        Two more data sets were added to the classic 'Radcliffe trials' with annual average production based on long term data of ryegrass-clover mixtured pasture production trials in 'Ruakura' and two areas in Winchmore ('WinchmoreDland', which is a dryland trial, and 'WinchmoreIrrig', which is an irrigated trial). More information about the 'Ruakura' data set can be found in [mccall2003pasture].
      Factors
        Factor Location
          CompositeFactor Ahaura
            Specifications:
              [Clock].StartDate=1974-06-01
              [Clock].EndDate=1980-06-01
              [Weather]
              [ClimateController]
              [Soil]
              [Cutting]
            Weather: FileName=VCS_Ahaura.met
            Manager ClimateController
              AllowControl = True
              EnableDate = 01/01/1974 00:00:00
              WithinYearControl = False
              ControlStart =
              ControlEnd =
              RainfallMultiplier = 0.88
              RainfallAddition = 0
              RadiationMultiplier = 1
              RadiationAddition = 0
              MinTMultiplier = 1
              MinTAddition = 0
              MaxTMultiplier = 1
              MaxTAddition = 0
              WindMultiplier = 1
              WindAddition = 0
              VPMultiplier = 1
              VPAddition = 0
```csharp
using Newtonsoft.Json;
using System;
using System.Xml.Serialization;
using Models.Core;
using Models.PMF;
using Models.Soils;
using Models.Soils.Nutrients;
using APSIM.Shared.Utilities;
using Models.Climate;

namespace Models
{
    [Serializable]
    public class Script : Model
    {
        // - Links to APSIM models
        [Link] Zone zone;
        [Link] Clock clock;
        [Link] Weather weather;
        [Link] ISummary summary = null;

        // - Paramters for this manager
        [Description("Enable? Set to 'No' to completely disable this manager")] public bool AllowControl { get; set; }

        [Separator("General settings")]
        [Description("Start the climate controls beginning on date (dd/mmm/yyyy): ")] public DateTime EnableDate { get; set; }
        [Description("Implement climate control only during part of the year?")] public bool WithinYearControl { get; set; }
        [Description("Within each year, the first day to start the climate controls is (dd-mmm)")] public string ControlStart { get; set; }
        [Description("Within each year, end last day of climate control is (dd-mmm)")] public string ControlEnd { get; set; }

        [Separator("Rainfall")]
        [Description("Rainfall multiplier (-): ")] public double RainfallMultiplier { get; set; }
        [Description("Rainfall addition (mm): ")] public double RainfallAddition { get; set; }

        [Separator("Radiation")]
        [Description("Radiation multiplier (-): ")] public double RadiationMultiplier { get; set; }
        [Description("Radiation addition (MJ/m2): ")] public double RadiationAddition { get; set; }

        [Separator("Minimum temperature")]
        [Description("Minimum temperature multiplier (-): ")] public double MinTMultiplier { get; set; }
        [Description("Minimum temperature addition (C): ")] public double MinTAddition { get; set; }

        [Separator("Maximum temperature")]
        [Description("Maximum temperature multiplier (-): ")] public double MaxTMultiplier { get; set; }
        [Description("Maximum temperature addition (C): ")] public double MaxTAddition { get; set; }

        [Separator("Wind speed")]
        [Description("Wind speed multiplier (-): ")] public double WindMultiplier { get; set; }
        [Description("Wind speed addition (m/s): ")] public double WindAddition { get; set; }

        [Separator("Vapour pressure")]
        [Description("Vapour pressure multiplier (-): ")] public double VPMultiplier { get; set; }
        [Description("Vapour pressure addition (hPa): ")] public double VPAddition { get; set; }

        [JsonIgnore] public bool DoControl { get; set; }
        [JsonIgnore] public int DoControlInt { get; set; }

        [EventSubscribe("PreparingNewWeatherData")] private void OnDoManagement(object sender, EventArgs e)
        {
            // Check if this manager is enabled
            if ((AllowControl) && (clock.Today >= EnableDate))
            {
                DoControl = true;
                if (WithinYearControl)
                    DoControl = DateUtilities.WithinDates(ControlStart, clock.Today, ControlEnd); 
            }

            if (DoControl)
                DoControlInt = 1;
            else
                DoControlInt = 0;

            if (DoControl)
            {
                // do the weather alterations 
                weather.Rain = RainfallMultiplier * weather.Rain + RainfallAddition;
                weather.Radn = RadiationMultiplier * weather.Radn + RadiationAddition;
                weather.MinT = MinTMultiplier * weather.MinT + MinTAddition;
                weather.MaxT = MaxTMultiplier * weather.MaxT + MaxTAddition;
                weather.Wind = WindMultiplier * weather.Wind + WindAddition;
                weather.VP = VPMultiplier * weather.VP + VPAddition;
            }
        }
    }
}
```
            Operations Cutting
              1974-06-14  [SimpleGrazing].GrazeToResidual(1000)
              1974-07-12  [SimpleGrazing].GrazeToResidual(1000)
              1974-08-09  [SimpleGrazing].GrazeToResidual(1000)
              1974-09-06  [SimpleGrazing].GrazeToResidual(1000)
              1974-10-04  [SimpleGrazing].GrazeToResidual(1000)
              1974-11-01  [SimpleGrazing].GrazeToResidual(1000)
              1974-11-30  [SimpleGrazing].GrazeToResidual(1000)
              1974-12-28  [SimpleGrazing].GrazeToResidual(1000)
              1975-01-25  [SimpleGrazing].GrazeToResidual(1000)
              1975-02-22  [SimpleGrazing].GrazeToResidual(1000)
              1975-03-22  [SimpleGrazing].GrazeToResidual(1000)
              1975-04-19  [SimpleGrazing].GrazeToResidual(1000)
              1975-05-17  [SimpleGrazing].GrazeToResidual(1000)
              1975-06-14  [SimpleGrazing].GrazeToResidual(1000)
              1975-07-12  [SimpleGrazing].GrazeToResidual(1000)
              1975-08-09  [SimpleGrazing].GrazeToResidual(1000)
              1975-09-06  [SimpleGrazing].GrazeToResidual(1000)
              1975-10-04  [SimpleGrazing].GrazeToResidual(1000)
              1975-11-01  [SimpleGrazing].GrazeToResidual(1000)
              1975-11-30  [SimpleGrazing].GrazeToResidual(1000)
              1975-12-28  [SimpleGrazing].GrazeToResidual(1000)
              1976-01-25  [SimpleGrazing].GrazeToResidual(1000)
              1976-02-22  [SimpleGrazing].GrazeToResidual(1000)
              1976-03-22  [SimpleGrazing].GrazeToResidual(1000)
              1976-04-19  [SimpleGrazing].GrazeToResidual(1000)
              1976-05-17  [SimpleGrazing].GrazeToResidual(1000)
              1976-06-14  [SimpleGrazing].GrazeToResidual(1000)
              1976-07-12  [SimpleGrazing].GrazeToResidual(1000)
              1976-08-09  [SimpleGrazing].GrazeToResidual(1000)
              1976-09-06  [SimpleGrazing].GrazeToResidual(1000)
              1976-10-04  [SimpleGrazing].GrazeToResidual(1000)
              1976-11-01  [SimpleGrazing].GrazeToResidual(1000)
              1976-11-30  [SimpleGrazing].GrazeToResidual(1000)
              1976-12-28  [SimpleGrazing].GrazeToResidual(1000)
              1977-01-25  [SimpleGrazing].GrazeToResidual(1000)
              1977-02-22  [SimpleGrazing].GrazeToResidual(1000)
              1977-03-22  [SimpleGrazing].GrazeToResidual(1000)
              1977-04-19  [SimpleGrazing].GrazeToResidual(1000)
              1977-05-17  [SimpleGrazing].GrazeToResidual(1000)
              1977-06-14  [SimpleGrazing].GrazeToResidual(1000)
              1977-07-12  [SimpleGrazing].GrazeToResidual(1000)
              1977-08-09  [SimpleGrazing].GrazeToResidual(1000)
              1977-09-06  [SimpleGrazing].GrazeToResidual(1000)
              1977-10-04  [SimpleGrazing].GrazeToResidual(1000)
              1977-11-01  [SimpleGrazing].GrazeToResidual(1000)
              1977-11-30  [SimpleGrazing].GrazeToResidual(1000)
              1977-12-28  [SimpleGrazing].GrazeToResidual(1000)
              1978-01-25  [SimpleGrazing].GrazeToResidual(1000)
              1978-02-22  [SimpleGrazing].GrazeToResidual(1000)
              1978-03-22  [SimpleGrazing].GrazeToResidual(1000)
              1978-04-19  [SimpleGrazing].GrazeToResidual(1000)
              1978-05-17  [SimpleGrazing].GrazeToResidual(1000)
              1978-06-14  [SimpleGrazing].GrazeToResidual(1000)
              1978-07-12  [SimpleGrazing].GrazeToResidual(1000)
              1978-08-09  [SimpleGrazing].GrazeToResidual(1000)
              1978-09-06  [SimpleGrazing].GrazeToResidual(1000)
              1978-10-04  [SimpleGrazing].GrazeToResidual(1000)
              1978-11-01  [SimpleGrazing].GrazeToResidual(1000)
              1978-11-30  [SimpleGrazing].GrazeToResidual(1000)
              1978-12-28  [SimpleGrazing].GrazeToResidual(1000)
              1979-01-25  [SimpleGrazing].GrazeToResidual(1000)
              1979-02-22  [SimpleGrazing].GrazeToResidual(1000)
              1979-03-22  [SimpleGrazing].GrazeToResidual(1000)
              1979-04-19  [SimpleGrazing].GrazeToResidual(1000)
              1979-05-17  [SimpleGrazing].GrazeToResidual(1000)
              1979-06-14  [SimpleGrazing].GrazeToResidual(1000)
              1979-07-12  [SimpleGrazing].GrazeToResidual(1000)
              1979-08-09  [SimpleGrazing].GrazeToResidual(1000)
              1979-09-06  [SimpleGrazing].GrazeToResidual(1000)
              1979-10-04  [SimpleGrazing].GrazeToResidual(1000)
              1979-11-01  [SimpleGrazing].GrazeToResidual(1000)
              1979-11-30  [SimpleGrazing].GrazeToResidual(1000)
              1979-12-28  [SimpleGrazing].GrazeToResidual(1000)
              1980-01-25  [SimpleGrazing].GrazeToResidual(1000)
              1980-02-22  [SimpleGrazing].GrazeToResidual(1000)
              1980-03-22  [SimpleGrazing].GrazeToResidual(1000)
              1980-04-19  [SimpleGrazing].GrazeToResidual(1000)
              1980-05-17  [SimpleGrazing].GrazeToResidual(1000)
            Soil Ahaura: SoilType=Umbric Andosol (ANu); Country=New Zealand; Latitude=-38.617; Longitude=176.117
              DataSource=Romero, C.C., Hoogenboom, G., Baigorria, G.A., Koo, J., Gijsman, A.J., Wood, S., 2012. Reanalysis of a global soil database for crop and environmental modeling. Environmental Modelling & Software 35, 163-170.  https://harvestchoice.wufoo.com/forms/download-wisol.
              Comments=Some values (e.g. soil-crop parameters) have been modified based on expected local soil conditions and/or root distribution
              Physical
                Thickness  BD   AirDry  LL15  DUL  SAT
                150        1.3  0.12    0.15  0.3  0.46
                150        1.3  0.12    0.15  0.3  0.46
                300        1.3  0.03    0.04  0.1  0.14
                400        1.3  0.03    0.04  0.1  0.14
                200        1.3  0.03    0.04  0.1  0.14
                300        1.3  0.03    0.04  0.1  0.14
                300        1.3  0.03    0.04  0.1  0.14
                200        1.3  0.03    0.04  0.1  0.14
                SoilCrop AGPRyegrassSoil: LL=[0.15, 0.15, 0.04, 0.04, 0.04, 0.04, 0.04, 0.04]; KL=[0.125, 0.1, 0.035, 0.01, 0, 0, 0, 0]; XF=[1, 1, 1, 1, 1, 1, 1, 1]
                SoilCrop AGPWhiteCloverSoil: LL=[0.15, 0.15, 0.04, 0.04, 0.04, 0.04, 0.04, 0.04]; KL=[0.115, 0.08, 0.008, 0, 0, 0, 0, 0]; XF=[1, 1, 1, 1, 1, 1, 1, 1]
                SoilCrop AGPPaspalumSoil: LL=[0.15, 0.15, 0.04, 0.04, 0.04, 0.04, 0.04, 0.04]; KL=[0.105, 0.09, 0.045, 0.02, 0.01, 0, 0, 0]; XF=[1, 1, 1, 1, 1, 1, 1, 1]
              WaterBalance SoilWater: SummerDate=1-Nov; SummerU=8.24; SummerCona=3; WinterDate=1-Apr; WinterU=8.24; WinterCona=3; DiffusConst=0; DiffusSlope=0; Salb=0.13; CN2Bare=68; CNRed=0; CNCov=0; Thickness=[150, 150, 300, 400, 200, 300, 300, 200]; SWCON=[0.4, 0.6, 0.8, 0.9, 0.9, 0.9, 0.9, 0.9]
              Organic: FOMCNRatio=40
                Thickness  Carbon      SoilCNRatio  FBiom       FInert      FOM
                150        4.7         14.99        0.0610103   0.600742    0
                150        4.7         14.99        0.0307392   0.74542179  0
                300        0.60823079  14.99        0.0153764   0.87037987  0
                400        0.22482454  14.99        0.01065838  0.954641    0
                200        0.202252    14.99        0.0101088   0.981558    0
                300        0.200305    14.99        0.0100243   0.991289    0
                300        0.200028    14.99        0.010004    0.996458    0
                200        0.200004    14.99        0.0100009   0.998327    0
              Chemical
                Thickness  NO3N    NH4N   PH
                150        14.652  0.855  6
                150        14.652  0.855  6
                300        7.326   0.855  6
                400        7.326   0.855  6
                200        7.326   0.855  6
                300        7.326   0.855  5.3
                300        7.326   0.855  5.3
                200        1       0.2    5.3
              Nutrient
              CERESSoilTemperature Temperature
              InitialWater Initial Water: PercentMethod=0; FractionFull=0.56; RelativeTo=LL15
          CompositeFactor Arrowtown
            Specifications:
              [Clock].StartDate=1975-06-01
              [Clock].EndDate=1981-06-01
              [Weather]
              [ClimateController]
              [Soil]
              [IrrigationSchedule]
              [Cutting]
            Weather: FileName=VCS_Arrowtown.met
            Manager ClimateController
              AllowControl = True
              EnableDate = 01/01/1975 00:00:00
              WithinYearControl = False
              ControlStart =
              ControlEnd =
              RainfallMultiplier = 0.98
              RainfallAddition = 0
              RadiationMultiplier = 1
              RadiationAddition = 0
              MinTMultiplier = 1
              MinTAddition = 0
              MaxTMultiplier = 1
              MaxTAddition = 0
              WindMultiplier = 1
              WindAddition = 0
              VPMultiplier = 1
              VPAddition = 0
              script: same as in Validation.Radcliffe.Factors.Location.Ahaura.ClimateController
            Operations IrrigationSchedule
              1975-12-01  [Irrigation].Apply(100);
              1976-02-01  [Irrigation].Apply(100);
              1976-12-01  [Irrigation].Apply(100);
              1977-02-01  [Irrigation].Apply(100);
              1977-12-01  [Irrigation].Apply(100);
              1978-02-01  [Irrigation].Apply(100);
              1978-12-01  [Irrigation].Apply(100);
              1979-02-01  [Irrigation].Apply(100);
              1979-12-01  [Irrigation].Apply(100);
              1980-02-01  [Irrigation].Apply(100);
              1980-12-01  [Irrigation].Apply(100);
              1981-02-01  [Irrigation].Apply(100);
            Operations Cutting
              1975-06-14  [SimpleGrazing].GrazeToResidual(1000)
              1975-06-28  [SimpleGrazing].GrazeToResidual(1000)
              1975-07-12  [SimpleGrazing].GrazeToResidual(1000)
              1975-07-26  [SimpleGrazing].GrazeToResidual(1000)
              1975-08-09  [SimpleGrazing].GrazeToResidual(1000)
              1975-08-23  [SimpleGrazing].GrazeToResidual(1000)
              1975-09-06  [SimpleGrazing].GrazeToResidual(1000)
              1975-09-20  [SimpleGrazing].GrazeToResidual(1000)
              1975-10-04  [SimpleGrazing].GrazeToResidual(1000)
              1975-10-18  [SimpleGrazing].GrazeToResidual(1000)
              1975-11-01  [SimpleGrazing].GrazeToResidual(1000)
              1975-11-15  [SimpleGrazing].GrazeToResidual(1000)
              1975-11-30  [SimpleGrazing].GrazeToResidual(1000)
              1975-12-14  [SimpleGrazing].GrazeToResidual(1000)
              1975-12-28  [SimpleGrazing].GrazeToResidual(1000)
              1976-01-11  [SimpleGrazing].GrazeToResidual(1000)
              1976-01-25  [SimpleGrazing].GrazeToResidual(1000)
              1976-02-08  [SimpleGrazing].GrazeToResidual(1000)
              1976-02-22  [SimpleGrazing].GrazeToResidual(1000)
              1976-03-08  [SimpleGrazing].GrazeToResidual(1000)
              1976-03-22  [SimpleGrazing].GrazeToResidual(1000)
              1976-04-05  [SimpleGrazing].GrazeToResidual(1000)
              1976-04-19  [SimpleGrazing].GrazeToResidual(1000)
              1976-05-03  [SimpleGrazing].GrazeToResidual(1000)
              1976-05-17  [SimpleGrazing].GrazeToResidual(1000)
              1976-05-31  [SimpleGrazing].GrazeToResidual(1000)
              1976-06-14  [SimpleGrazing].GrazeToResidual(1000)
              1976-06-28  [SimpleGrazing].GrazeToResidual(1000)
              1976-07-12  [SimpleGrazing].GrazeToResidual(1000)
              1976-07-26  [SimpleGrazing].GrazeToResidual(1000)
              1976-08-09  [SimpleGrazing].GrazeToResidual(1000)
              1976-08-23  [SimpleGrazing].GrazeToResidual(1000)
              1976-09-06  [SimpleGrazing].GrazeToResidual(1000)
              1976-09-20  [SimpleGrazing].GrazeToResidual(1000)
              1976-10-04  [SimpleGrazing].GrazeToResidual(1000)
              1976-10-18  [SimpleGrazing].GrazeToResidual(1000)
              1976-11-01  [SimpleGrazing].GrazeToResidual(1000)
              1976-11-15  [SimpleGrazing].GrazeToResidual(1000)
              1976-11-30  [SimpleGrazing].GrazeToResidual(1000)
              1976-12-14  [SimpleGrazing].GrazeToResidual(1000)
              1976-12-28  [SimpleGrazing].GrazeToResidual(1000)
              1977-01-11  [SimpleGrazing].GrazeToResidual(1000)
              1977-01-25  [SimpleGrazing].GrazeToResidual(1000)
              1977-02-08  [SimpleGrazing].GrazeToResidual(1000)
              1977-02-22  [SimpleGrazing].GrazeToResidual(1000)
              1977-03-08  [SimpleGrazing].GrazeToResidual(1000)
              1977-03-22  [SimpleGrazing].GrazeToResidual(1000)
              1977-04-05  [SimpleGrazing].GrazeToResidual(1000)
              1977-04-19  [SimpleGrazing].GrazeToResidual(1000)
              1977-05-03  [SimpleGrazing].GrazeToResidual(1000)
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            Soil Arrowtown: SoilType=Haplic Podzol (PZh); Country=New Zealand; Latitude=-41.65; Longitude=172.667
              DataSource=Romero, C.C., Hoogenboom, G., Baigorria, G.A., Koo, J., Gijsman, A.J., Wood, S., 2012. Reanalysis of a global soil database for crop and environmental modeling. Environmental Modelling & Software 35, 163-170.  https://harvestchoice.wufoo.com/forms/download-wisol.
              Comments=Some values (e.g. soil-crop parameters) have been modified based on expected local soil conditions and/or root distribution
              Physical
                Thickness  BD    AirDry  LL15   DUL    SAT
                150        0.99  0.046   0.092  0.402  0.576
                150        1.19  0.0592  0.074  0.313  0.511
                300        1.19  0.066   0.066  0.219  0.516
                300        1.25  0.062   0.062  0.27   0.496
                300        1.33  0.045   0.045  0.243  0.467
                300        1.33  0.045   0.045  0.243  0.467
                300        1.33  0.045   0.045  0.243  0.467
                200        1.33  0.045   0.045  0.243  0.467
                SoilCrop AGPRyegrassSoil: LL=[0.092, 0.074, 0.066, 0.062, 0.045, 0.045, 0.045, 0.045]; KL=[0.125, 0.1, 0.035, 0.01, 0.003, 0, 0, 0]; XF=[1, 1, 1, 1, 1, 1, 1, 1]
                SoilCrop AGPWhiteCloverSoil: LL=[0.092, 0.074, 0.066, 0.062, 0.045, 0.045, 0.045, 0.045]; KL=[0.115, 0.08, 0.008, 0, 0, 0, 0, 0]; XF=[1, 1, 1, 1, 1, 1, 1, 1]
                SoilCrop AGPPaspalumSoil: LL=[0.092, 0.074, 0.066, 0.062, 0.045, 0.045, 0.045, 0.045]; KL=[0.105, 0.09, 0.045, 0.021, 0.01, 0, 0, 0]; XF=[1, 1, 1, 1, 1, 1, 1, 1]
              WaterBalance SoilWater: SummerDate=1-Nov; SummerU=8.08; SummerCona=3; WinterDate=1-Apr; WinterU=8.08; WinterCona=3; DiffusConst=0; DiffusSlope=0; Salb=0.14; CN2Bare=83; CNRed=0; CNCov=0; Thickness=[150, 150, 300, 300, 300, 300, 300, 200]; SWCON=[0.4, 0.4, 0.5, 0.6, 0.6, 0.6, 0.6, 0.6]
              Organic: FOMCNRatio=40
                Thickness  Carbon  SoilCNRatio  FBiom  FInert  FOM
                150        4.7     12           0.061  0.601   0
                150        4.7     12           0.031  0.745   0
                300        0.608   12           0.015  0.87    0
                300        0.225   12           0.011  0.955   0
                300        0.202   12           0.01   0.9812  0
                300        0.2     12           0.01   0.991   0
                300        0.2     12           0.01   0.997   0
                200        0.2     12           0.01   0.998   0
              Chemical
                Thickness  NO3N    NH4N   PH
                150        14.652  0.855  6
                150        14.652  0.855  6
                300        7.326   0.855  6
                300        7.326   0.855  6
                300        7.326   0.855  6
                300        7.326   0.855  6
                300        7.326   0.855  6
                200        0.1     0.1    6
              Nutrient
              CERESSoilTemperature Temperature
              InitialWater Initial Water: PercentMethod=0; FractionFull=0.56; RelativeTo=LL15
          CompositeFactor Awamoko
            Specifications:
              [Clock].StartDate=1979-06-01
              [Clock].EndDate=1985-06-01
              [Weather]
              [ClimateController]
              [Soil]
              [IrrigationSchedule]
              [Cutting]
            Weather: FileName=VCS_Awamoko.met
            Manager ClimateController
              AllowControl = True
              EnableDate = 01/01/1979 00:00:00
              WithinYearControl = False
              ControlStart =
              ControlEnd =
              RainfallMultiplier = 0.95
              RainfallAddition = 0
              RadiationMultiplier = 1
              RadiationAddition = 0
              MinTMultiplier = 1
              MinTAddition = 0
              MaxTMultiplier = 1
              MaxTAddition = 0
              WindMultiplier = 1
              WindAddition = 0
              VPMultiplier = 1
              VPAddition = 0
              script: same as in Validation.Radcliffe.Factors.Location.Ahaura.ClimateController
            Operations IrrigationSchedule
              1978-09-01  [Irrigation].Apply(75);
              1978-09-21  [Irrigation].Apply(75);
              1978-10-11  [Irrigation].Apply(75);
              1978-10-31  [Irrigation].Apply(75);
              1978-11-20  [Irrigation].Apply(75);
              1978-12-10  [Irrigation].Apply(75);
              1978-12-30  [Irrigation].Apply(75);
              1979-01-19  [Irrigation].Apply(75);
              1979-02-08  [Irrigation].Apply(75);
              1979-02-28  [Irrigation].Apply(75);
              1979-03-20  [Irrigation].Apply(75);
              1979-04-09  [Irrigation].Apply(75);
              1979-04-29  [Irrigation].Apply(75);
              1979-05-19  [Irrigation].Apply(75);
              1979-09-01  [Irrigation].Apply(75);
              1979-09-21  [Irrigation].Apply(75);
              1979-10-11  [Irrigation].Apply(75);
              1979-10-31  [Irrigation].Apply(75);
              1979-11-20  [Irrigation].Apply(75);
              1979-12-10  [Irrigation].Apply(75);
              1979-12-30  [Irrigation].Apply(75);
              1980-01-19  [Irrigation].Apply(75);
              1980-02-08  [Irrigation].Apply(75);
              1980-02-28  [Irrigation].Apply(75);
              1980-03-19  [Irrigation].Apply(75);
              1980-04-08  [Irrigation].Apply(75);
              1980-04-28  [Irrigation].Apply(75);
              1980-05-18  [Irrigation].Apply(75);
              1980-09-01  [Irrigation].Apply(75);
              1980-09-21  [Irrigation].Apply(75);
              1980-10-11  [Irrigation].Apply(75);
              1980-10-31  [Irrigation].Apply(75);
              1980-11-20  [Irrigation].Apply(75);
              1980-12-10  [Irrigation].Apply(75);
              1980-12-30  [Irrigation].Apply(75);
              1981-01-19  [Irrigation].Apply(75);
              1981-02-08  [Irrigation].Apply(75);
              1981-02-28  [Irrigation].Apply(75);
              1981-03-20  [Irrigation].Apply(75);
              1981-04-09  [Irrigation].Apply(75);
              1981-04-29  [Irrigation].Apply(75);
              1981-05-19  [Irrigation].Apply(75);
              1981-09-01  [Irrigation].Apply(75);
              1981-09-21  [Irrigation].Apply(75);
              1981-10-11  [Irrigation].Apply(75);
              1981-10-31  [Irrigation].Apply(75);
              1981-11-20  [Irrigation].Apply(75);
              1981-12-10  [Irrigation].Apply(75);
              1981-12-30  [Irrigation].Apply(75);
              1982-01-19  [Irrigation].Apply(75);
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            Operations Cutting
              1979-06-14  [SimpleGrazing].GrazeToResidual(1000)
              1979-06-28  [SimpleGrazing].GrazeToResidual(1000)
              1979-07-12  [SimpleGrazing].GrazeToResidual(1000)
              1979-07-26  [SimpleGrazing].GrazeToResidual(1000)
              1979-08-09  [SimpleGrazing].GrazeToResidual(1000)
              1979-08-23  [SimpleGrazing].GrazeToResidual(1000)
              1979-09-06  [SimpleGrazing].GrazeToResidual(1000)
              1979-09-20  [SimpleGrazing].GrazeToResidual(1000)
              1979-10-04  [SimpleGrazing].GrazeToResidual(1000)
              1979-10-18  [SimpleGrazing].GrazeToResidual(1000)
              1979-11-01  [SimpleGrazing].GrazeToResidual(1000)
              1979-11-15  [SimpleGrazing].GrazeToResidual(1000)
              1979-11-30  [SimpleGrazing].GrazeToResidual(1000)
              1979-12-14  [SimpleGrazing].GrazeToResidual(1000)
              1979-12-28  [SimpleGrazing].GrazeToResidual(1000)
              1980-01-11  [SimpleGrazing].GrazeToResidual(1000)
              1980-01-25  [SimpleGrazing].GrazeToResidual(1000)
              1980-02-08  [SimpleGrazing].GrazeToResidual(1000)
              1980-02-22  [SimpleGrazing].GrazeToResidual(1000)
              1980-03-08  [SimpleGrazing].GrazeToResidual(1000)
              1980-03-22  [SimpleGrazing].GrazeToResidual(1000)
              1980-04-05  [SimpleGrazing].GrazeToResidual(1000)
              1980-04-19  [SimpleGrazing].GrazeToResidual(1000)
              1980-05-03  [SimpleGrazing].GrazeToResidual(1000)
              1980-05-17  [SimpleGrazing].GrazeToResidual(1000)
              1980-05-31  [SimpleGrazing].GrazeToResidual(1000)
              1980-06-14  [SimpleGrazing].GrazeToResidual(1000)
              1980-06-28  [SimpleGrazing].GrazeToResidual(1000)
              1980-07-12  [SimpleGrazing].GrazeToResidual(1000)
              1980-07-26  [SimpleGrazing].GrazeToResidual(1000)
              1980-08-09  [SimpleGrazing].GrazeToResidual(1000)
              1980-08-23  [SimpleGrazing].GrazeToResidual(1000)
              1980-09-06  [SimpleGrazing].GrazeToResidual(1000)
              1980-09-20  [SimpleGrazing].GrazeToResidual(1000)
              1980-10-04  [SimpleGrazing].GrazeToResidual(1000)
              1980-10-18  [SimpleGrazing].GrazeToResidual(1000)
              1980-11-01  [SimpleGrazing].GrazeToResidual(1000)
              1980-11-15  [SimpleGrazing].GrazeToResidual(1000)
              1980-11-30  [SimpleGrazing].GrazeToResidual(1000)
              1980-12-14  [SimpleGrazing].GrazeToResidual(1000)
              1980-12-28  [SimpleGrazing].GrazeToResidual(1000)
              1981-01-11  [SimpleGrazing].GrazeToResidual(1000)
              1981-01-25  [SimpleGrazing].GrazeToResidual(1000)
              1981-02-08  [SimpleGrazing].GrazeToResidual(1000)
              1981-02-22  [SimpleGrazing].GrazeToResidual(1000)
              1981-03-08  [SimpleGrazing].GrazeToResidual(1000)
              1981-03-22  [SimpleGrazing].GrazeToResidual(1000)
              1981-04-05  [SimpleGrazing].GrazeToResidual(1000)
              1981-04-19  [SimpleGrazing].GrazeToResidual(1000)
              1981-05-03  [SimpleGrazing].GrazeToResidual(1000)
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            Soil Awamoko: SoilType=Umbric Andosol (ANu); Country=New Zealand; Latitude=-37.967; Longitude=175.767
              DataSource=Romero, C.C., Hoogenboom, G., Baigorria, G.A., Koo, J., Gijsman, A.J., Wood, S., 2012. Reanalysis of a global soil database for crop and environmental modeling. Environmental Modelling & Software 35, 163-170.  https://harvestchoice.wufoo.com/forms/download-wisol.
              Comments=Some values (e.g. soil-crop parameters) have been modified based on expected local soil conditions and/or root distribution
              Physical
                Thickness  BD    AirDry  LL15   DUL   SAT
                180        0.73  0.05    0.148  0.35  0.656
                120        0.7   0.05    0.147  0.35  0.691
                210        0.69  0.03    0.088  0.25  0.699
                230        0.77  0.03    0.1    0.2   0.672
                160        0.77  0.03    0.1    0.2   0.672
                SoilCrop AGPRyegrassSoil: LL=[0.148, 0.147, 0.088, 0.1, 0.1]; KL=[0.125, 0.09, 0.045, 0.015, 0.007]; XF=[1, 1, 1, 1, 0.5]
                SoilCrop AGPWhiteCloverSoil: LL=[0.148, 0.147, 0.088, 0.1, 0.1]; KL=[0.115, 0.07, 0.008, 0, 0]; XF=[1, 1, 1, 1, 0.5]
                SoilCrop AGPPaspalumSoil: LL=[0.148, 0.147, 0.088, 0.1, 0.1]; KL=[0.105, 0.085, 0.05, 0.025, 0.015]; XF=[1, 1, 1, 1, 0.5]
              WaterBalance SoilWater: SummerDate=1-Nov; SummerU=9.12; SummerCona=3; WinterDate=1-Apr; WinterU=9.12; WinterCona=3; DiffusConst=0; DiffusSlope=0; Salb=0.13; CN2Bare=73; CNRed=0; CNCov=0; Thickness=[180, 120, 210, 230]; SWCON=[0.5, 0.5, 0.5, 0.7]
              Organic: FOMCNRatio=40
                Thickness  Carbon  SoilCNRatio  FBiom  FInert  FOM
                180        7.472   12           0.057  0.618   0
                120        2.39    12           0.029  0.757   0
                210        0.7851  12           0.017  0.852   0
                230        0.301   12           0.012  0.923   0
              Chemical
                Thickness  NO3N  NH4N  PH
                180        0.1   0.1   5.6
                120        0.1   0.1   6.2
                210        0.1   0.1   6.2
                230        0.1   0.1   6.4
              Nutrient
              CERESSoilTemperature Temperature
              InitialWater Initial Water: PercentMethod=0; FractionFull=1
          CompositeFactor Cromwell
            Specifications:
              [Clock].StartDate=1980-06-01
              [Clock].EndDate=1991-06-01
              [Weather]
              [ClimateController]
              [Soil]
              [AutomaticIrrigation]
              [Cutting]
            Weather: FileName=VCS_Cromwell.met
            Manager ClimateController
              AllowControl = True
              EnableDate = 01/01/1980 00:00:00
              WithinYearControl = False
              ControlStart =
              ControlEnd =
              RainfallMultiplier = 0.79
              RainfallAddition = 0
              RadiationMultiplier = 1
              RadiationAddition = 0
              MinTMultiplier = 1
              MinTAddition = 0
              MaxTMultiplier = 1
              MaxTAddition = 0
              WindMultiplier = 1
              WindAddition = 0
              VPMultiplier = 1
              VPAddition = 0
              script: same as in Validation.Radcliffe.Factors.Location.Ahaura.ClimateController
            Manager AutomaticIrrigation
              allowIrrigation = True
              seasonStart = 20-Dec
              seasonEnd = 30-Mar
              seasonsAllocation = 100000
              triggerDeficit = 50
              targetDeficit = 95
              returndays = 1
              maximumAmount = 30
              depthPAWC = 650
```csharp
using Newtonsoft.Json;
using Models.PMF.Phen;
using System;
using Models.Core;
using Models.PMF;
using Models.Soils;
using System.Xml.Serialization;
using APSIM.Shared.Utilities;
using Models.Interfaces;



        
namespace Models
{
    [Serializable] 
    [System.Xml.Serialization.XmlInclude(typeof(Model))]
    public class Script : Model
    {
        [Link] private ISummary summary;
        [Link] private Irrigation Irrigation;
        [Link] private Clock Clock;
        [Link] private Soil Soil;
        [Link(IsOptional = true)] private IPlant existingCrop;
        private DateTime StartDate;
        private DateTime EndDate;
        private double TopDUL;
        private double TopLL;
        private int nLayers;
        [Link(IsOptional = true)]
        private Phenology phenology;
        [Link]
        private IPhysical soilPhysical;
        [Link]
        private ISoilWater waterBalance;
        //Communication to other modules
       
        //User inputs from properties tab
        [Description("Turn irrigation on?")]
        public bool allowIrrigation { get; set; }
        [Description("Start of irrigation season (dd-MMM)")]
        public string seasonStart { get; set; }
        [Description("End of irrigation season (dd-MMM)")]
        public string seasonEnd { get; set; }
        [Description("Season allocation (mm)")]
        public double seasonsAllocation { get; set; }
        [Description("Deficit to trigger irrigation (% PAWC)")]
        public double triggerDeficit { get; set; }
        [Description("Deficit to stop irrigaton (% PAWC)")]
        public double targetDeficit { get; set; }
        [Description("Minimum days for irrigation to return")]
        public double returndays { get; set; }
        [Description("Maximum irrigation application (mm/day)")]
        public double maximumAmount { get; set; }
        [Description("Depth to calculate PAWC (mm)")]
        public double depthPAWC { get; set; }

        //Class members
        [JsonIgnore] public double TopSWdeficit { get; set; }
        [JsonIgnore] public double TopSWC { get; set; }
        [JsonIgnore] public double DaysSinceIrrigation { get; set; }
        [JsonIgnore] public double AmountToApply { get; set; }
        [JsonIgnore] public double SeasonAppliedAmount { get; set; }
        
        private bool IrrigationIsAllowed { get; set; }
        private bool SeasonIsOpen { get; set; }
        private bool CropIsActive { get; set; }
        private bool IrrigatorIsAvailable { get; set; }
        private bool SoilIsDry { get; set; }

    
        //Calculate static soil variables
        [EventSubscribe("StartOfSimulation")]
        private void OnStartOfSimulation(object sender, EventArgs e)
        {   
            //Set the season dates
            StartDate = DateTime.Parse(seasonStart + "-" + Clock.Today.Year.ToString());
            EndDate = DateTime.Parse(seasonEnd + "-" + Clock.Today.Year.ToString());
            
            //Can we irrigate at all?
            IrrigationIsAllowed = false; 
            if (allowIrrigation)
                IrrigationIsAllowed = true; 

            //Calculate soil water variables
            double depthFromSurface = 0.0;
            double fracLayer = 0.0;
            nLayers = soilPhysical.Thickness.Length;
            for (int layer = 0; layer < nLayers; layer++)
            {
                fracLayer = Math.Min(1.0, (depthPAWC - depthFromSurface) / soilPhysical.Thickness[layer]);
                TopLL += soilPhysical.LL15mm[layer] * fracLayer;
                TopDUL += soilPhysical.DULmm[layer] * fracLayer;
                depthFromSurface += soilPhysical.Thickness[layer];
                if (depthFromSurface >= depthPAWC)
                    layer = nLayers;
            }
        }
             
        //Determine daily requirement for irrigation
        [EventSubscribe("StartOfDay")]
        private void OnStartOfDay(object sender, EventArgs e)
        {
            //Can we irrigate today?          
            SeasonIsOpen = isBetween(Clock.Today, StartDate, EndDate);
            if (!SeasonIsOpen)
                SeasonAppliedAmount = 0;

            //Is there a crop in the ground that needs irrigation?
            CropIsActive = false;
            if ((existingCrop != null) && (existingCrop.IsAlive))
                CropIsActive = true;
            //if ((phenology.Stage >= 3.0) && (phenology.Stage < 6.0))
          
            //Is the irrigator available?
            IrrigatorIsAvailable = false;
            DaysSinceIrrigation += 1;
            if (DaysSinceIrrigation >= returndays)
                IrrigatorIsAvailable = true;
          
            //Is the soil dry enough to require irrigation?
            SoilIsDry = false;
            double depthFromSurface = 0.0;
            double fracLayer = 0.0;
            TopSWC = 0.0;
            for (int layer = 0; layer < nLayers; layer++)
            //for (int layer = 0; depthFromSurface < depthPAWC + soilPhysical.Thickness[layer]; layer++)
            {
                fracLayer = Math.Min(1.0, (depthPAWC - depthFromSurface) / soilPhysical.Thickness[layer]);
                TopSWC += waterBalance.SWmm[layer] * fracLayer;
                depthFromSurface += soilPhysical.Thickness[layer];
                if (depthFromSurface >= depthPAWC)
                    layer = nLayers;
            }
            
            TopSWdeficit = TopSWC - TopDUL;
            if (Math.Max(0.0, -TopSWdeficit) >= (TopDUL - TopLL) * (100 - triggerDeficit) / 100)
                SoilIsDry = true;
                
            //Are all the conditions ratifying irrigation
            if (IrrigationIsAllowed && SeasonIsOpen && CropIsActive && IrrigatorIsAvailable && SoilIsDry)
            {
                //Lets bloody well irrigate then!!!!
                AmountToApply = TopDUL * targetDeficit / 100 - TopSWC;
                AmountToApply = Math.Max(0.0, Math.Min(AmountToApply, seasonsAllocation - SeasonAppliedAmount));
                AmountToApply = Math.Min(AmountToApply,maximumAmount);
                Irrigation.Apply(AmountToApply);
                DaysSinceIrrigation = 0;
                SeasonAppliedAmount += AmountToApply;
            }
        }
        
        ///Checks whether theDate is between iniDate and endDate (non-year specific)
        private bool isBetween(DateTime theDay, DateTime iniDate, DateTime endDate)
        {
            bool result = false;
            if (iniDate.DayOfYear < endDate.DayOfYear)
            {
                // period is within one year, ex: summer in the northern hemisphere
                if ((theDay.DayOfYear >= iniDate.DayOfYear) && (theDay.DayOfYear <= endDate.DayOfYear))
                    result = true;
            }
            else
            {
                // period goes over the end of the year, ex: summer in the southern hemisphere
                if ((theDay.DayOfYear >= iniDate.DayOfYear) || (theDay.DayOfYear <= endDate.DayOfYear))
                    result = true;
            }
            
            return result;
        }
    }
}
```
            Operations Cutting
              1980-06-14  [SimpleGrazing].GrazeToResidual(1000)
              1980-06-28  [SimpleGrazing].GrazeToResidual(1000)
              1980-07-12  [SimpleGrazing].GrazeToResidual(1000)
              1980-07-26  [SimpleGrazing].GrazeToResidual(1000)
              1980-08-09  [SimpleGrazing].GrazeToResidual(1000)
              1980-08-23  [SimpleGrazing].GrazeToResidual(1000)
              1980-09-06  [SimpleGrazing].GrazeToResidual(1000)
              1980-09-20  [SimpleGrazing].GrazeToResidual(1000)
              1980-10-04  [SimpleGrazing].GrazeToResidual(1000)
              1980-10-18  [SimpleGrazing].GrazeToResidual(1000)
              1980-11-01  [SimpleGrazing].GrazeToResidual(1000)
              1980-11-15  [SimpleGrazing].GrazeToResidual(1000)
              1980-11-30  [SimpleGrazing].GrazeToResidual(1000)
              1980-12-14  [SimpleGrazing].GrazeToResidual(1000)
              1980-12-28  [SimpleGrazing].GrazeToResidual(1000)
              1981-01-11  [SimpleGrazing].GrazeToResidual(1000)
              1981-01-25  [SimpleGrazing].GrazeToResidual(1000)
              1981-02-08  [SimpleGrazing].GrazeToResidual(1000)
              1981-02-22  [SimpleGrazing].GrazeToResidual(1000)
              1981-03-08  [SimpleGrazing].GrazeToResidual(1000)
              1981-03-22  [SimpleGrazing].GrazeToResidual(1000)
              1981-04-05  [SimpleGrazing].GrazeToResidual(1000)
              1981-04-19  [SimpleGrazing].GrazeToResidual(1000)
              1981-05-03  [SimpleGrazing].GrazeToResidual(1000)
              1981-05-17  [SimpleGrazing].GrazeToResidual(1000)
              1981-05-31  [SimpleGrazing].GrazeToResidual(1000)
              1981-06-14  [SimpleGrazing].GrazeToResidual(1000)
              1981-06-28  [SimpleGrazing].GrazeToResidual(1000)
              1981-07-12  [SimpleGrazing].GrazeToResidual(1000)
              1981-07-26  [SimpleGrazing].GrazeToResidual(1000)
              1981-08-09  [SimpleGrazing].GrazeToResidual(1000)
              1981-08-23  [SimpleGrazing].GrazeToResidual(1000)
              1981-09-06  [SimpleGrazing].GrazeToResidual(1000)
              1981-09-20  [SimpleGrazing].GrazeToResidual(1000)
              1981-10-04  [SimpleGrazing].GrazeToResidual(1000)
              1981-10-18  [SimpleGrazing].GrazeToResidual(1000)
              1981-11-01  [SimpleGrazing].GrazeToResidual(1000)
              1981-11-15  [SimpleGrazing].GrazeToResidual(1000)
              1981-11-30  [SimpleGrazing].GrazeToResidual(1000)
              1981-12-14  [SimpleGrazing].GrazeToResidual(1000)
              1981-12-28  [SimpleGrazing].GrazeToResidual(1000)
              1982-01-11  [SimpleGrazing].GrazeToResidual(1000)
              1982-01-25  [SimpleGrazing].GrazeToResidual(1000)
              1982-02-08  [SimpleGrazing].GrazeToResidual(1000)
              1982-02-22  [SimpleGrazing].GrazeToResidual(1000)
              1982-03-08  [SimpleGrazing].GrazeToResidual(1000)
              1982-03-22  [SimpleGrazing].GrazeToResidual(1000)
              1982-04-05  [SimpleGrazing].GrazeToResidual(1000)
              1982-04-19  [SimpleGrazing].GrazeToResidual(1000)
              1982-05-03  [SimpleGrazing].GrazeToResidual(1000)
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            Soil Cromwell: SoilType=Umbric Andosol (ANu); Country=New Zealand; Latitude=-38.617; Longitude=176.117
              DataSource=Romero, C.C., Hoogenboom, G., Baigorria, G.A., Koo, J., Gijsman, A.J., Wood, S., 2012. Reanalysis of a global soil database for crop and environmental modeling. Environmental Modelling & Software 35, 163-170.  https://harvestchoice.wufoo.com/forms/download-wisol.
              Comments=Some values (e.g. soil-crop parameters) have been modified based on expected local soil conditions and/or root distribution
              Physical
                Thickness  BD    AirDry  LL15   DUL    SAT
                150        1.47  0.0255  0.051  0.202  0.394
                150        1.49  0.0392  0.049  0.153  0.388
                300        1.55  0.048   0.048  0.142  0.37
                300        1.55  0.048   0.048  0.142  0.37
                300        1.55  0.048   0.048  0.142  0.37
                300        1.55  0.048   0.048  0.142  0.37
                300        1.55  0.048   0.048  0.142  0.37
                200        1.55  0.048   0.048  0.142  0.37
                SoilCrop AGPRyegrassSoil: LL=[0.051, 0.049, 0.048, 0.048, 0.048, 0.048, 0.048, 0.048]; KL=[0.125, 0.1, 0.035, 0.01, 0.003, 0, 0, 0]; XF=[1, 1, 1, 1, 1, 1, 1, 1]
                SoilCrop AGPWhiteCloverSoil: LL=[0.051, 0.049, 0.048, 0.048, 0.048, 0.048, 0.048, 0.048]; KL=[0.115, 0.08, 0.007, 0, 0, 0, 0, 0]; XF=[1, 1, 1, 1, 1, 1, 1, 1]
                SoilCrop AGPPaspalumSoil: LL=[0.051, 0.049, 0.048, 0.048, 0.048, 0.048, 0.048, 0.048]; KL=[0.105, 0.09, 0.045, 0.021, 0.01, 0, 0, 0]; XF=[1, 1, 1, 1, 1, 1, 1, 1]
              WaterBalance SoilWater: SummerDate=1-Nov; SummerU=8.24; SummerCona=3; WinterDate=1-Apr; WinterU=8.24; WinterCona=3; DiffusConst=0; DiffusSlope=0; Salb=0.13; CN2Bare=68; CNRed=0; CNCov=0; Thickness=[150, 150, 300, 300, 300, 300, 300, 200]; SWCON=[0.6, 0.6, 0.8, 0.8, 0.8, 0.8, 0.8, 0.8]
              Organic: FOMCNRatio=40
                Thickness  Carbon  SoilCNRatio  FBiom  FInert  FOM
                150        4.7     12           0.061  0.601   0
                150        4.7     12           0.031  0.745   0
                300        0.608   12           0.015  0.87    0
                300        0.225   12           0.011  0.955   0
                300        0.202   12           0.01   0.982   0
                300        0.2     12           0.01   0.991   0
                300        0.2     12           0.01   0.997   0
                200        0.2     12           0.01   0.998   0
              Chemical
                Thickness  NO3N    NH4N   PH
                150        14.652  0.855  6
                150        14.652  0.855  6
                300        7.326   0.855  6
                300        7.326   0.855  6
                300        7.326   0.855  6
                300        7.326   0.855  6
                300        7.326   0.855  6
                200        1       0.2    6
              Nutrient
              CERESSoilTemperature Temperature
              InitialWater Initial Water: PercentMethod=0; FractionFull=0.56; RelativeTo=LL15
          CompositeFactor Dargaville
            Specifications:
              [Clock].StartDate=1979-06-01
              [Clock].EndDate=1991-06-01
              [AGPPaspalum].Enabled=false
              [Weather]
              [ClimateController]
              [Soil]
              [Cutting]
              [Report].Enabled=false
            Weather: FileName=VCS_Dargaville.met
            Manager ClimateController
              AllowControl = True
              EnableDate = 01/01/1979 00:00:00
              WithinYearControl = False
              ControlStart =
              ControlEnd =
              RainfallMultiplier = 1.05
              RainfallAddition = 0
              RadiationMultiplier = 1
              RadiationAddition = 0
              MinTMultiplier = 1
              MinTAddition = 0
              MaxTMultiplier = 1
              MaxTAddition = 0
              WindMultiplier = 1
              WindAddition = 0
              VPMultiplier = 1
              VPAddition = 0
              script: same as in Validation.Radcliffe.Factors.Location.Ahaura.ClimateController
            Operations Cutting
              1979-06-14  [SimpleGrazing].GrazeToResidual(1000)
              1979-06-28  [SimpleGrazing].GrazeToResidual(1000)
              1979-07-12  [SimpleGrazing].GrazeToResidual(1000)
              1979-07-26  [SimpleGrazing].GrazeToResidual(1000)
              1979-08-09  [SimpleGrazing].GrazeToResidual(1000)
              1979-08-23  [SimpleGrazing].GrazeToResidual(1000)
              1979-09-06  [SimpleGrazing].GrazeToResidual(1000)
              1979-09-20  [SimpleGrazing].GrazeToResidual(1000)
              1979-10-04  [SimpleGrazing].GrazeToResidual(1000)
              1979-10-18  [SimpleGrazing].GrazeToResidual(1000)
              1979-11-01  [SimpleGrazing].GrazeToResidual(1000)
              1979-11-15  [SimpleGrazing].GrazeToResidual(1000)
              1979-11-30  [SimpleGrazing].GrazeToResidual(1000)
              1979-12-14  [SimpleGrazing].GrazeToResidual(1000)
              1979-12-28  [SimpleGrazing].GrazeToResidual(1000)
              1980-01-11  [SimpleGrazing].GrazeToResidual(1000)
              1980-01-25  [SimpleGrazing].GrazeToResidual(1000)
              1980-02-08  [SimpleGrazing].GrazeToResidual(1000)
              1980-02-22  [SimpleGrazing].GrazeToResidual(1000)
              1980-03-08  [SimpleGrazing].GrazeToResidual(1000)
              1980-03-22  [SimpleGrazing].GrazeToResidual(1000)
              1980-04-05  [SimpleGrazing].GrazeToResidual(1000)
              1980-04-19  [SimpleGrazing].GrazeToResidual(1000)
              1980-05-03  [SimpleGrazing].GrazeToResidual(1000)
              1980-05-17  [SimpleGrazing].GrazeToResidual(1000)
              1980-05-31  [SimpleGrazing].GrazeToResidual(1000)
              1980-06-14  [SimpleGrazing].GrazeToResidual(1000)
              1980-06-28  [SimpleGrazing].GrazeToResidual(1000)
              1980-07-12  [SimpleGrazing].GrazeToResidual(1000)
              1980-07-26  [SimpleGrazing].GrazeToResidual(1000)
              1980-08-09  [SimpleGrazing].GrazeToResidual(1000)
              1980-08-23  [SimpleGrazing].GrazeToResidual(1000)
              1980-09-06  [SimpleGrazing].GrazeToResidual(1000)
              1980-09-20  [SimpleGrazing].GrazeToResidual(1000)
              1980-10-04  [SimpleGrazing].GrazeToResidual(1000)
              1980-10-18  [SimpleGrazing].GrazeToResidual(1000)
              1980-11-01  [SimpleGrazing].GrazeToResidual(1000)
              1980-11-15  [SimpleGrazing].GrazeToResidual(1000)
              1980-11-30  [SimpleGrazing].GrazeToResidual(1000)
              1980-12-14  [SimpleGrazing].GrazeToResidual(1000)
              1980-12-28  [SimpleGrazing].GrazeToResidual(1000)
              1981-01-11  [SimpleGrazing].GrazeToResidual(1000)
              1981-01-25  [SimpleGrazing].GrazeToResidual(1000)
              1981-02-08  [SimpleGrazing].GrazeToResidual(1000)
              1981-02-22  [SimpleGrazing].GrazeToResidual(1000)
              1981-03-08  [SimpleGrazing].GrazeToResidual(1000)
              1981-03-22  [SimpleGrazing].GrazeToResidual(1000)
              1981-04-05  [SimpleGrazing].GrazeToResidual(1000)
              1981-04-19  [SimpleGrazing].GrazeToResidual(1000)
              1981-05-03  [SimpleGrazing].GrazeToResidual(1000)
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            Soil Dargaville: SoilType=Gleyic Acrisol (ACg); Country=New Zealand; Latitude=-37.433; Longitude=175.217
              DataSource=Romero, C.C., Hoogenboom, G., Baigorria, G.A., Koo, J., Gijsman, A.J., Wood, S., 2012. Reanalysis of a global soil database for crop and environmental modeling. Environmental Modelling & Software 35, 163-170.  https://harvestchoice.wufoo.com/forms/download-wisol.
              Comments=Some values (e.g. soil-crop parameters) have been modified based on expected local soil conditions and/or root distribution
              Physical
                Thickness  BD    AirDry  LL15  DUL   SAT
                150        0.87  0.05    0.1   0.45  0.48
                150        1.01  0.05    0.1   0.45  0.48
                300        1.01  0.07    0.12  0.35  0.4
                400        1.01  0.1     0.15  0.21  0.3
                200        1.3   0.1     0.15  0.2   0.3
                SoilCrop AGPRyegrassSoil: LL=[0.1, 0.1, 0.12, 0.15, 0.15]; KL=[0.125, 0.1, 0.035, 0.01, 0]; XF=[1, 1, 1, 0.5, 0]
                SoilCrop AGPWhiteCloverSoil: LL=[0.1, 0.1, 0.12, 0.15, 0.15]; KL=[0.115, 0.08, 0.007, 0, 0]; XF=[1, 1, 1, 0, 0]
                SoilCrop AGPPaspalumSoil: LL=[0.1, 0.1, 0.12, 0.15, 0.15]; KL=[0.105, 0.09, 0.045, 0.02, 0.01]; XF=[1, 1, 1, 0, 0]
              WaterBalance SoilWater: SummerDate=1-Nov; SummerU=7.7; SummerCona=3; WinterDate=1-Apr; WinterU=7.7; WinterCona=3; DiffusConst=0; DiffusSlope=0; Salb=0.13; CN2Bare=80; CNRed=0; CNCov=0; Thickness=[150, 150, 300, 400, 200, 300, 300, 200]; SWCON=[0.4, 0.4, 0.3, 0.3, 0.3, 0.3, 0.3, 0.3]
              Organic: FOMCNRatio=40
                Thickness  Carbon  SoilCNRatio  FBiom   FInert  FOM
                150        4.7     11.93        0.061   0.601   0
                150        4.7     11.93        0.031   0.745   0
                300        0.6     11.93        0.0153  0.87    0
                400        0.25    11.93        0.011   0.955   0
                200        0.202   11.93        0.01    0.982   0
                300        0.2     11.93        0.01    0.992   0
                300        0.2     11.93        0.01    0.997   0
                200        0.2     11.93        0.01    0.998   0
              Chemical
                Thickness  NO3N    NH4N   PH
                150        14.652  0.855  6
                150        14.652  0.855  6
                300        7.326   0.855  6
                400        7.326   0.855  6
                200        7.326   0.855  6
                300        7.326   0.855  6
                300        7.326   0.855  6
                200        1       0.2    6
              Nutrient
              CERESSoilTemperature Temperature
              InitialWater Initial Water: PercentMethod=0; FractionFull=1; RelativeTo=LL15
          CompositeFactor Flockhouse
            Specifications:
              [Clock].StartDate=1981-06-01
              [Clock].EndDate=1988-06-01
              [Weather]
              [ClimateController]
              [Soil]
              [Cutting]
            Weather: FileName=VCS_FlockHouse.met
            Manager ClimateController
              AllowControl = True
              EnableDate = 01/01/1981 00:00:00
              WithinYearControl = False
              ControlStart =
              ControlEnd =
              RainfallMultiplier = 1.05
              RainfallAddition = 0
              RadiationMultiplier = 1
              RadiationAddition = 0
              MinTMultiplier = 1
              MinTAddition = 0
              MaxTMultiplier = 1
              MaxTAddition = 0
              WindMultiplier = 1
              WindAddition = 0
              VPMultiplier = 1
              VPAddition = 0
              script: same as in Validation.Radcliffe.Factors.Location.Ahaura.ClimateController
            Operations Cutting
              1981-06-14  [SimpleGrazing].GrazeToResidual(1000)
              1981-06-28  [SimpleGrazing].GrazeToResidual(1000)
              1981-07-12  [SimpleGrazing].GrazeToResidual(1000)
              1981-07-26  [SimpleGrazing].GrazeToResidual(1000)
              1981-08-09  [SimpleGrazing].GrazeToResidual(1000)
              1981-08-23  [SimpleGrazing].GrazeToResidual(1000)
              1981-09-06  [SimpleGrazing].GrazeToResidual(1000)
              1981-09-20  [SimpleGrazing].GrazeToResidual(1000)
              1981-10-04  [SimpleGrazing].GrazeToResidual(1000)
              1981-10-18  [SimpleGrazing].GrazeToResidual(1000)
              1981-11-01  [SimpleGrazing].GrazeToResidual(1000)
              1981-11-15  [SimpleGrazing].GrazeToResidual(1000)
              1981-11-30  [SimpleGrazing].GrazeToResidual(1000)
              1981-12-14  [SimpleGrazing].GrazeToResidual(1000)
              1981-12-28  [SimpleGrazing].GrazeToResidual(1000)
              1982-01-11  [SimpleGrazing].GrazeToResidual(1000)
              1982-01-25  [SimpleGrazing].GrazeToResidual(1000)
              1982-02-08  [SimpleGrazing].GrazeToResidual(1000)
              1982-02-22  [SimpleGrazing].GrazeToResidual(1000)
              1982-03-08  [SimpleGrazing].GrazeToResidual(1000)
              1982-03-22  [SimpleGrazing].GrazeToResidual(1000)
              1982-04-05  [SimpleGrazing].GrazeToResidual(1000)
              1982-04-19  [SimpleGrazing].GrazeToResidual(1000)
              1982-05-03  [SimpleGrazing].GrazeToResidual(1000)
              1982-05-17  [SimpleGrazing].GrazeToResidual(1000)
              1982-05-31  [SimpleGrazing].GrazeToResidual(1000)
              1982-06-14  [SimpleGrazing].GrazeToResidual(1000)
              1982-06-28  [SimpleGrazing].GrazeToResidual(1000)
              1982-07-12  [SimpleGrazing].GrazeToResidual(1000)
              1982-07-26  [SimpleGrazing].GrazeToResidual(1000)
              1982-08-09  [SimpleGrazing].GrazeToResidual(1000)
              1982-08-23  [SimpleGrazing].GrazeToResidual(1000)
              1982-09-06  [SimpleGrazing].GrazeToResidual(1000)
              1982-09-20  [SimpleGrazing].GrazeToResidual(1000)
              1982-10-04  [SimpleGrazing].GrazeToResidual(1000)
              1982-10-18  [SimpleGrazing].GrazeToResidual(1000)
              1982-11-01  [SimpleGrazing].GrazeToResidual(1000)
              1982-11-15  [SimpleGrazing].GrazeToResidual(1000)
              1982-11-30  [SimpleGrazing].GrazeToResidual(1000)
              1982-12-14  [SimpleGrazing].GrazeToResidual(1000)
              1982-12-28  [SimpleGrazing].GrazeToResidual(1000)
              1983-01-11  [SimpleGrazing].GrazeToResidual(1000)
              1983-01-25  [SimpleGrazing].GrazeToResidual(1000)
              1983-02-08  [SimpleGrazing].GrazeToResidual(1000)
              1983-02-22  [SimpleGrazing].GrazeToResidual(1000)
              1983-03-08  [SimpleGrazing].GrazeToResidual(1000)
              1983-03-22  [SimpleGrazing].GrazeToResidual(1000)
              1983-04-05  [SimpleGrazing].GrazeToResidual(1000)
              1983-04-19  [SimpleGrazing].GrazeToResidual(1000)
              1983-05-03  [SimpleGrazing].GrazeToResidual(1000)
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            Soil Flockhouse: SoilType=Umbric Andosol (ANu); Country=New Zealand; Latitude=-38.617; Longitude=176.117
              DataSource=Romero, C.C., Hoogenboom, G., Baigorria, G.A., Koo, J., Gijsman, A.J., Wood, S., 2012. Reanalysis of a global soil database for crop and environmental modeling. Environmental Modelling & Software 35, 163-170.  https://harvestchoice.wufoo.com/forms/download-wisol.
              Comments=Some values (e.g. soil-crop parameters) have been modified based on expected local soil conditions and/or root distribution
              Physical
                Thickness  BD    AirDry  LL15  DUL   SAT
                150        1.18  0.05    0.1   0.23  0.3
                150        1.42  0.08    0.1   0.23  0.3
                300        1.42  0.13    0.13  0.15  0.28
                400        1.42  0.13    0.13  0.15  0.18
                200        1.42  0.13    0.13  0.15  0.18
                SoilCrop AGPRyegrassSoil: LL=[0.1, 0.1, 0.13, 0.13, 0.13]; KL=[0.125, 0.1, 0.035, 0.01, 0]; XF=[1, 1, 1, 0.5, 0]
                SoilCrop AGPWhiteCloverSoil: LL=[0.1, 0.1, 0.13, 0.13, 0.13]; KL=[0.115, 0.08, 0.007, 0, 0]; XF=[1, 1, 1, 0.2, 0]
                SoilCrop AGPPaspalumSoil: LL=[0.1, 0.1, 0.13, 0.13, 0.13]; KL=[0.105, 0.09, 0.045, 0.02, 0.01]; XF=[1, 1, 1, 0.5, 0]
              WaterBalance SoilWater: SummerDate=1-Nov; SummerU=8.24; SummerCona=3; WinterDate=1-Apr; WinterU=8.24; WinterCona=3; DiffusConst=0; DiffusSlope=0; Salb=0.13; CN2Bare=68; CNRed=0; CNCov=0; Thickness=[150, 150, 300, 400, 200, 300, 300, 200]; SWCON=[0.6, 0.6, 0.7, 0.8, 0.8, 0.8, 0.8, 0.8]
              Organic: same as Validation.Radcliffe.Factors.Location.Ahaura.Ahaura.Organic
              Chemical: same as Validation.Radcliffe.Factors.Location.Ahaura.Ahaura.Chemical
              Nutrient
              CERESSoilTemperature Temperature
              InitialWater Initial Water: PercentMethod=0; FractionFull=1; RelativeTo=LL15
          CompositeFactor Hamilton
            Specifications:
              [Clock].StartDate=1974-06-01
              [Clock].EndDate=1990-06-01
              [Weather]
              [ClimateController]
              [Soil]
              [Cutting]
            Weather: FileName=VCS_Hamilton.met
            Manager ClimateController
              AllowControl = True
              EnableDate = 01/01/1974 00:00:00
              WithinYearControl = False
              ControlStart =
              ControlEnd =
              RainfallMultiplier = 1
              RainfallAddition = 0
              RadiationMultiplier = 1
              RadiationAddition = 0
              MinTMultiplier = 1
              MinTAddition = 0
              MaxTMultiplier = 1
              MaxTAddition = 0
              WindMultiplier = 1
              WindAddition = 0
              VPMultiplier = 1
              VPAddition = 0
              script: same as in Validation.Radcliffe.Factors.Location.Ahaura.ClimateController
            Operations Cutting
              1974-06-14  [SimpleGrazing].GrazeToResidual(1000)
              1974-06-28  [SimpleGrazing].GrazeToResidual(1000)
              1974-07-12  [SimpleGrazing].GrazeToResidual(1000)
              1974-07-26  [SimpleGrazing].GrazeToResidual(1000)
              1974-08-09  [SimpleGrazing].GrazeToResidual(1000)
              1974-08-23  [SimpleGrazing].GrazeToResidual(1000)
              1974-09-06  [SimpleGrazing].GrazeToResidual(1000)
              1974-09-20  [SimpleGrazing].GrazeToResidual(1000)
              1974-10-04  [SimpleGrazing].GrazeToResidual(1000)
              1974-10-18  [SimpleGrazing].GrazeToResidual(1000)
              1974-11-01  [SimpleGrazing].GrazeToResidual(1000)
              1974-11-15  [SimpleGrazing].GrazeToResidual(1000)
              1974-11-30  [SimpleGrazing].GrazeToResidual(1000)
              1974-12-14  [SimpleGrazing].GrazeToResidual(1000)
              1974-12-28  [SimpleGrazing].GrazeToResidual(1000)
              1975-01-11  [SimpleGrazing].GrazeToResidual(1000)
              1975-01-25  [SimpleGrazing].GrazeToResidual(1000)
              1975-02-08  [SimpleGrazing].GrazeToResidual(1000)
              1975-02-22  [SimpleGrazing].GrazeToResidual(1000)
              1975-03-08  [SimpleGrazing].GrazeToResidual(1000)
              1975-03-22  [SimpleGrazing].GrazeToResidual(1000)
              1975-04-05  [SimpleGrazing].GrazeToResidual(1000)
              1975-04-19  [SimpleGrazing].GrazeToResidual(1000)
              1975-05-03  [SimpleGrazing].GrazeToResidual(1000)
              1975-05-17  [SimpleGrazing].GrazeToResidual(1000)
              1975-05-31  [SimpleGrazing].GrazeToResidual(1000)
              1975-06-14  [SimpleGrazing].GrazeToResidual(1000)
              1975-06-28  [SimpleGrazing].GrazeToResidual(1000)
              1975-07-12  [SimpleGrazing].GrazeToResidual(1000)
              1975-07-26  [SimpleGrazing].GrazeToResidual(1000)
              1975-08-09  [SimpleGrazing].GrazeToResidual(1000)
              1975-08-23  [SimpleGrazing].GrazeToResidual(1000)
              1975-09-06  [SimpleGrazing].GrazeToResidual(1000)
              1975-09-20  [SimpleGrazing].GrazeToResidual(1000)
              1975-10-04  [SimpleGrazing].GrazeToResidual(1000)
              1975-10-18  [SimpleGrazing].GrazeToResidual(1000)
              1975-11-01  [SimpleGrazing].GrazeToResidual(1000)
              1975-11-15  [SimpleGrazing].GrazeToResidual(1000)
              1975-11-30  [SimpleGrazing].GrazeToResidual(1000)
              1975-12-14  [SimpleGrazing].GrazeToResidual(1000)
              1975-12-28  [SimpleGrazing].GrazeToResidual(1000)
              1976-01-11  [SimpleGrazing].GrazeToResidual(1000)
              1976-01-25  [SimpleGrazing].GrazeToResidual(1000)
              1976-02-08  [SimpleGrazing].GrazeToResidual(1000)
              1976-02-22  [SimpleGrazing].GrazeToResidual(1000)
              1976-03-08  [SimpleGrazing].GrazeToResidual(1000)
              1976-03-22  [SimpleGrazing].GrazeToResidual(1000)
              1976-04-05  [SimpleGrazing].GrazeToResidual(1000)
              1976-04-19  [SimpleGrazing].GrazeToResidual(1000)
              1976-05-03  [SimpleGrazing].GrazeToResidual(1000)
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            Soil Hamilton: SoilType=Black Vertosol; Site=Dalby; NearestTown=Dalby, Q 4405; Region=Darling Downs; State=Queensland; ApsoilNumber=27; Latitude=-27.12; Longitude=151.305; LocationAccuracy=+/-20m; DataSource=CSIRO Sustainable Ecosystems, Toowoomba
              Comments=This was just copied from the original simulation done in the older APSIM
              Physical
                Thickness  BD   AirDry  LL15  DUL   SAT
                150        1.3  0.1     0.2   0.35  0.45
                150        1.3  0.1     0.21  0.35  0.45
                300        1.3  0.1     0.25  0.38  0.45
                300        1.3  0.1     0.25  0.37  0.4
                300        1.3  0.1     0.3   0.35  0.4
                300        1.3  0.1     0.3   0.35  0.4
                300        1.3  0.1     0.3   0.35  0.4
                200        1.3  0.1     0.3   0.35  0.4
                SoilCrop AGPRyegrassSoil: LL=[0.2, 0.21, 0.25, 0.25, 0.3, 0.3, 0.3, 0.3]; KL=[0.125, 0.1, 0.035, 0.01, 0.003, 0, 0, 0]; XF=[1, 1, 1, 1, 1, 0, 0, 0]
                SoilCrop AGPWhiteCloverSoil: LL=[0.2, 0.21, 0.25, 0.25, 0.3, 0.3, 0.3, 0.3]; KL=[0.115, 0.08, 0.007, 0, 0, 0, 0, 0]; XF=[1, 1, 1, 1, 1, 0, 0, 0]
                SoilCrop AGPPaspalumSoil: LL=[0.2, 0.21, 0.25, 0.25, 0.3, 0.3, 0.3, 0.3]; KL=[0.105, 0.09, 0.045, 0.021, 0.01, 0, 0, 0]; XF=[1, 1, 1, 1, 1, 0, 0, 0]
              WaterBalance SoilWater: SummerDate=1-Nov; SummerU=6; SummerCona=3.5; WinterDate=1-apr; WinterU=2; WinterCona=2; DiffusConst=88; DiffusSlope=35; Salb=0.13; CN2Bare=73; CNRed=20; CNCov=0.8; DischargeWidth=0; CatchmentArea=0
                Thickness  SWCON  KLAT
                150        0.4    0
                150        0.4    0
                300        0.5    0
                300        0.5    0
                300        0.5    0
                300        0.5    0
                300        0.5    0
                200        0.5    0
              Organic: FOMCNRatio=40
                Thickness  Carbon      SoilCNRatio  FBiom       FInert      FOM
                150        4.7         12           0.0610103   0.600742    0
                150        4.7         12           0.0307392   0.74542179  0
                300        0.60823079  12           0.0153764   0.87037987  0
                300        0.22482454  12           0.01065838  0.954641    0
                300        0.202252    12           0.0101088   0.981558    0
                300        0.200305    12           0.0100243   0.991289    0
                300        0.200028    12           0.010004    0.996458    0
                200        0.200004    12           0.0100009   0.998327    0
              Chemical
                Thickness  NO3N    NH4N   PH
                150        14.652  0.855  6
                150        14.652  0.855  6
                300        7.326   0.855  6
                300        7.326   0.855  6
                300        7.326   0.855  6
                300        7.326   0.855  6
                300        7.326   0.855  5.3
                200        1       0.2    5.3
              Nutrient
              CERESSoilTemperature Temperature
              InitialWater Initial water: PercentMethod=0; FractionFull=0.56
          CompositeFactor Hindon
            Specifications:
              [Clock].StartDate=1975-06-01
              [Clock].EndDate=1986-06-01
              [Weather]
              [ClimateController]
              [Soil]
              [Cutting]
            Weather: FileName=VCS_Hindon.met
            Manager ClimateController
              AllowControl = True
              EnableDate = 01/01/1975 00:00:00
              WithinYearControl = False
              ControlStart =
              ControlEnd =
              RainfallMultiplier = 0.92
              RainfallAddition = 0
              RadiationMultiplier = 1
              RadiationAddition = 0
              MinTMultiplier = 1
              MinTAddition = 0
              MaxTMultiplier = 1
              MaxTAddition = 0
              WindMultiplier = 1
              WindAddition = 0
              VPMultiplier = 1
              VPAddition = 0
              script: same as in Validation.Radcliffe.Factors.Location.Ahaura.ClimateController
            Operations Cutting
              1975-06-14  [SimpleGrazing].GrazeToResidual(1000)
              1975-06-28  [SimpleGrazing].GrazeToResidual(1000)
              1975-07-12  [SimpleGrazing].GrazeToResidual(1000)
              1975-07-26  [SimpleGrazing].GrazeToResidual(1000)
              1975-08-09  [SimpleGrazing].GrazeToResidual(1000)
              1975-08-23  [SimpleGrazing].GrazeToResidual(1000)
              1975-09-06  [SimpleGrazing].GrazeToResidual(1000)
              1975-09-20  [SimpleGrazing].GrazeToResidual(1000)
              1975-10-04  [SimpleGrazing].GrazeToResidual(1000)
              1975-10-18  [SimpleGrazing].GrazeToResidual(1000)
              1975-11-01  [SimpleGrazing].GrazeToResidual(1000)
              1975-11-15  [SimpleGrazing].GrazeToResidual(1000)
              1975-11-30  [SimpleGrazing].GrazeToResidual(1000)
              1975-12-14  [SimpleGrazing].GrazeToResidual(1000)
              1975-12-28  [SimpleGrazing].GrazeToResidual(1000)
              1976-01-11  [SimpleGrazing].GrazeToResidual(1000)
              1976-01-25  [SimpleGrazing].GrazeToResidual(1000)
              1976-02-08  [SimpleGrazing].GrazeToResidual(1000)
              1976-02-22  [SimpleGrazing].GrazeToResidual(1000)
              1976-03-08  [SimpleGrazing].GrazeToResidual(1000)
              1976-03-22  [SimpleGrazing].GrazeToResidual(1000)
              1976-04-05  [SimpleGrazing].GrazeToResidual(1000)
              1976-04-19  [SimpleGrazing].GrazeToResidual(1000)
              1976-05-03  [SimpleGrazing].GrazeToResidual(1000)
              1976-05-17  [SimpleGrazing].GrazeToResidual(1000)
              1976-05-31  [SimpleGrazing].GrazeToResidual(1000)
              1976-06-14  [SimpleGrazing].GrazeToResidual(1000)
              1976-06-28  [SimpleGrazing].GrazeToResidual(1000)
              1976-07-12  [SimpleGrazing].GrazeToResidual(1000)
              1976-07-26  [SimpleGrazing].GrazeToResidual(1000)
              1976-08-09  [SimpleGrazing].GrazeToResidual(1000)
              1976-08-23  [SimpleGrazing].GrazeToResidual(1000)
              1976-09-06  [SimpleGrazing].GrazeToResidual(1000)
              1976-09-20  [SimpleGrazing].GrazeToResidual(1000)
              1976-10-04  [SimpleGrazing].GrazeToResidual(1000)
              1976-10-18  [SimpleGrazing].GrazeToResidual(1000)
              1976-11-01  [SimpleGrazing].GrazeToResidual(1000)
              1976-11-15  [SimpleGrazing].GrazeToResidual(1000)
              1976-11-30  [SimpleGrazing].GrazeToResidual(1000)
              1976-12-14  [SimpleGrazing].GrazeToResidual(1000)
              1976-12-28  [SimpleGrazing].GrazeToResidual(1000)
              1977-01-11  [SimpleGrazing].GrazeToResidual(1000)
              1977-01-25  [SimpleGrazing].GrazeToResidual(1000)
              1977-02-08  [SimpleGrazing].GrazeToResidual(1000)
              1977-02-22  [SimpleGrazing].GrazeToResidual(1000)
              1977-03-08  [SimpleGrazing].GrazeToResidual(1000)
              1977-03-22  [SimpleGrazing].GrazeToResidual(1000)
              1977-04-05  [SimpleGrazing].GrazeToResidual(1000)
              1977-04-19  [SimpleGrazing].GrazeToResidual(1000)
              1977-05-03  [SimpleGrazing].GrazeToResidual(1000)
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            Soil Hindon: SoilType=Haplic Podzol (PZh); Country=New Zealand; Latitude=-41.65; Longitude=172.667
              DataSource=Romero, C.C., Hoogenboom, G., Baigorria, G.A., Koo, J., Gijsman, A.J., Wood, S., 2012. Reanalysis of a global soil database for crop and environmental modeling. Environmental Modelling & Software 35, 163-170.  https://harvestchoice.wufoo.com/forms/download-wisol.
              Comments=Some values (e.g. soil-crop parameters) have been modified based on expected local soil conditions and/or root distribution
              Physical
                Thickness  BD   AirDry  LL15  DUL   SAT
                150        1.3  0.12    0.15  0.35  0.45
                150        1.3  0.12    0.15  0.35  0.45
                300        1.3  0.03    0.04  0.3   0.35
                400        1.3  0.03    0.04  0.1   0.14
                200        1.3  0.03    0.04  0.1   0.14
                300        1.3  0.03    0.04  0.1   0.14
                300        1.3  0.03    0.04  0.1   0.14
                200        1.3  0.03    0.04  0.1   0.14
                SoilCrop AGPRyegrassSoil: LL=[0.15, 0.15, 0.04, 0.04, 0.04, 0.04, 0.04, 0.04]; KL=[0.125, 0.1, 0.035, 0.01, 0, 0, 0, 0]; XF=[1, 1, 1, 1, 1, 1, 1, 1]
                SoilCrop AGPWhiteCloverSoil: LL=[0.15, 0.15, 0.04, 0.04, 0.04, 0.04, 0.04, 0.04]; KL=[0.115, 0.08, 0.007, 0, 0, 0, 0, 0]; XF=[1, 1, 1, 1, 1, 1, 1, 1]
                SoilCrop AGPPaspalumSoil: LL=[0.15, 0.15, 0.04, 0.04, 0.04, 0.04, 0.04, 0.04]; KL=[0.105, 0.09, 0.045, 0.02, 0.01, 0, 0, 0]; XF=[1, 1, 1, 1, 1, 1, 1, 1]
              WaterBalance SoilWater: SummerDate=1-Nov; SummerU=8.08; SummerCona=3; WinterDate=1-Apr; WinterU=8.08; WinterCona=3; DiffusConst=0; DiffusSlope=0; Salb=0.14; CN2Bare=83; CNRed=0; CNCov=0; Thickness=[150, 150, 300, 400, 200, 300, 300, 200]; SWCON=[0.3, 0.3, 0.3, 0.3, 0.3, 0.3, 0.3, 0.3]
              Nutrient
              Organic: FOMCNRatio=40
                Thickness  Carbon      SoilCNRatio  FBiom       FInert      FOM
                150        4.7         18.79        0.0610103   0.600742    0
                150        4.7         18.79        0.0307392   0.74542179  0
                300        0.60823079  18.79        0.0153764   0.87037987  0
                400        0.22482454  18.79        0.01065838  0.954641    0
                200        0.202252    18.79        0.0101088   0.981558    0
                300        0.200305    18.79        0.0100243   0.991289    0
                300        0.200028    18.79        0.010004    0.996458    0
                200        0.200004    18.79        0.0100009   0.998327    0
              Chemical: same as Validation.Radcliffe.Factors.Location.Ahaura.Ahaura.Chemical
              InitialWater Initial Water: PercentMethod=0; FractionFull=0.56; RelativeTo=LL15
              Sample Initial nitrogen: Thickness=[150, 150, 300, 300, 300, 300, 300]; SWUnits=Volumetric; OCUnits=Total; PHUnits=Water
              CERESSoilTemperature Temperature
          CompositeFactor InvermayHillSite
            Specifications:
              [Clock].StartDate=1981-06-01
              [Clock].EndDate=2000-06-01
              [Weather]
              [ClimateController]
              [Soil]
              [Cutting]
            Weather: FileName=VCS_Dunedin.met
            Manager ClimateController
              AllowControl = True
              EnableDate = 01/01/1981 00:00:00
              WithinYearControl = False
              ControlStart =
              ControlEnd =
              RainfallMultiplier = 0.93
              RainfallAddition = 0
              RadiationMultiplier = 1
              RadiationAddition = 0
              MinTMultiplier = 1
              MinTAddition = 0
              MaxTMultiplier = 1
              MaxTAddition = 0
              WindMultiplier = 1
              WindAddition = 0
              VPMultiplier = 1
              VPAddition = 0
              script: same as in Validation.Radcliffe.Factors.Location.Ahaura.ClimateController
            Operations Cutting
              1981-06-14  [SimpleGrazing].GrazeToResidual(1000)
              1981-06-28  [SimpleGrazing].GrazeToResidual(1000)
              1981-07-12  [SimpleGrazing].GrazeToResidual(1000)
              1981-07-26  [SimpleGrazing].GrazeToResidual(1000)
              1981-08-09  [SimpleGrazing].GrazeToResidual(1000)
              1981-08-23  [SimpleGrazing].GrazeToResidual(1000)
              1981-09-06  [SimpleGrazing].GrazeToResidual(1000)
              1981-09-20  [SimpleGrazing].GrazeToResidual(1000)
              1981-10-04  [SimpleGrazing].GrazeToResidual(1000)
              1981-10-18  [SimpleGrazing].GrazeToResidual(1000)
              1981-11-01  [SimpleGrazing].GrazeToResidual(1000)
              1981-11-15  [SimpleGrazing].GrazeToResidual(1000)
              1981-11-30  [SimpleGrazing].GrazeToResidual(1000)
              1981-12-14  [SimpleGrazing].GrazeToResidual(1000)
              1981-12-28  [SimpleGrazing].GrazeToResidual(1000)
              1982-01-11  [SimpleGrazing].GrazeToResidual(1000)
              1982-01-25  [SimpleGrazing].GrazeToResidual(1000)
              1982-02-08  [SimpleGrazing].GrazeToResidual(1000)
              1982-02-22  [SimpleGrazing].GrazeToResidual(1000)
              1982-03-08  [SimpleGrazing].GrazeToResidual(1000)
              1982-03-22  [SimpleGrazing].GrazeToResidual(1000)
              1982-04-05  [SimpleGrazing].GrazeToResidual(1000)
              1982-04-19  [SimpleGrazing].GrazeToResidual(1000)
              1982-05-03  [SimpleGrazing].GrazeToResidual(1000)
              1982-05-17  [SimpleGrazing].GrazeToResidual(1000)
              1982-05-31  [SimpleGrazing].GrazeToResidual(1000)
              1982-06-14  [SimpleGrazing].GrazeToResidual(1000)
              1982-06-28  [SimpleGrazing].GrazeToResidual(1000)
              1982-07-12  [SimpleGrazing].GrazeToResidual(1000)
              1982-07-26  [SimpleGrazing].GrazeToResidual(1000)
              1982-08-09  [SimpleGrazing].GrazeToResidual(1000)
              1982-08-23  [SimpleGrazing].GrazeToResidual(1000)
              1982-09-06  [SimpleGrazing].GrazeToResidual(1000)
              1982-09-20  [SimpleGrazing].GrazeToResidual(1000)
              1982-10-04  [SimpleGrazing].GrazeToResidual(1000)
              1982-10-18  [SimpleGrazing].GrazeToResidual(1000)
              1982-11-01  [SimpleGrazing].GrazeToResidual(1000)
              1982-11-15  [SimpleGrazing].GrazeToResidual(1000)
              1982-11-30  [SimpleGrazing].GrazeToResidual(1000)
              1982-12-14  [SimpleGrazing].GrazeToResidual(1000)
              1982-12-28  [SimpleGrazing].GrazeToResidual(1000)
              1983-01-11  [SimpleGrazing].GrazeToResidual(1000)
              1983-01-25  [SimpleGrazing].GrazeToResidual(1000)
              1983-02-08  [SimpleGrazing].GrazeToResidual(1000)
              1983-02-22  [SimpleGrazing].GrazeToResidual(1000)
              1983-03-08  [SimpleGrazing].GrazeToResidual(1000)
              1983-03-22  [SimpleGrazing].GrazeToResidual(1000)
              1983-04-05  [SimpleGrazing].GrazeToResidual(1000)
              1983-04-19  [SimpleGrazing].GrazeToResidual(1000)
              1983-05-03  [SimpleGrazing].GrazeToResidual(1000)
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            Soil InvermayHill: SoilType=Haplic Podzol (PZh); Country=New Zealand; Latitude=-41.65; Longitude=172.667
              DataSource=Romero, C.C., Hoogenboom, G., Baigorria, G.A., Koo, J., Gijsman, A.J., Wood, S., 2012. Reanalysis of a global soil database for crop and environmental modeling. Environmental Modelling & Software 35, 163-170.  https://harvestchoice.wufoo.com/forms/download-wisol.
              Comments=Some values (e.g. soil-crop parameters) have been modified based on expected local soil conditions and/or root distribution
              Physical
                Thickness  BD   AirDry  LL15  DUL   SAT
                150        1.3  0.11    0.15  0.3   0.5
                150        1.3  0.11    0.15  0.3   0.5
                300        1.3  0.11    0.15  0.24  0.45
                400        1.3  0.09    0.12  0.25  0.45
                200        1.3  0.09    0.12  0.25  0.45
                300        1.3  0.09    0.12  0.2   0.45
                300        1.3  0.09    0.12  0.2   0.4
                200        1.3  0.09    0.12  0.2   0.4
                SoilCrop AGPRyegrassSoil: LL=[0.15, 0.15, 0.15, 0.12, 0.12, 0.12, 0.12, 0.12]; KL=[0.125, 0.1, 0.035, 0.01, 0, 0, 0, 0]; XF=[1, 1, 1, 1, 1, 1, 1, 1]
                SoilCrop AGPWhiteCloverSoil: LL=[0.15, 0.15, 0.15, 0.12, 0.12, 0.12, 0.12, 0.12]; KL=[0.115, 0.08, 0.007, 0, 0, 0, 0, 0]; XF=[1, 1, 1, 1, 1, 1, 1, 1]
                SoilCrop AGPPaspalumSoil: LL=[0.15, 0.15, 0.15, 0.12, 0.12, 0.12, 0.12, 0.12]; KL=[0.105, 0.09, 0.045, 0.02, 0.01, 0, 0, 0]; XF=[1, 1, 1, 1, 1, 1, 1, 1]
              WaterBalance SoilWater: same as Validation.Radcliffe.Factors.Location.Hindon.Hindon.SoilWater
              Organic: same as Validation.Radcliffe.Factors.Location.Hindon.Hindon.Organic
              Chemical
                Thickness  NO3N    NH4N   PH
                150        14.652  0.855  8.2
                150        14.652  0.855  8.5
                300        7.326   0.855  8.6
                400        7.326   0.855  8.6
                200        7.326   0.855  7.4
                300        7.326   0.855  5.3
                300        7.326   0.855  5.3
                200        1       0.2    5.3
              Nutrient
              CERESSoilTemperature Temperature
              InitialWater Initial Water: PercentMethod=0; FractionFull=0.56; RelativeTo=LL15
          CompositeFactor InvermayTaieriPlain
            Specifications:
              [Clock].StartDate=1979-06-01
              [Clock].EndDate=1990-06-01
              [Weather]
              [ClimateController]
              [Soil]
              [Cutting]
            Weather: FileName=VCS_Dunedin.met
            Manager ClimateController
              AllowControl = True
              EnableDate = 01/01/1979 00:00:00
              WithinYearControl = False
              ControlStart =
              ControlEnd =
              RainfallMultiplier = 0.9
              RainfallAddition = 0
              RadiationMultiplier = 1
              RadiationAddition = 0
              MinTMultiplier = 1
              MinTAddition = 0
              MaxTMultiplier = 1
              MaxTAddition = 0
              WindMultiplier = 1
              WindAddition = 0
              VPMultiplier = 1
              VPAddition = 0
              script: same as in Validation.Radcliffe.Factors.Location.Ahaura.ClimateController
            Operations Cutting
              1979-06-14  [SimpleGrazing].GrazeToResidual(1000)
              1979-06-28  [SimpleGrazing].GrazeToResidual(1000)
              1979-07-12  [SimpleGrazing].GrazeToResidual(1000)
              1979-07-26  [SimpleGrazing].GrazeToResidual(1000)
              1979-08-09  [SimpleGrazing].GrazeToResidual(1000)
              1979-08-23  [SimpleGrazing].GrazeToResidual(1000)
              1979-09-06  [SimpleGrazing].GrazeToResidual(1000)
              1979-09-20  [SimpleGrazing].GrazeToResidual(1000)
              1979-10-04  [SimpleGrazing].GrazeToResidual(1000)
              1979-10-18  [SimpleGrazing].GrazeToResidual(1000)
              1979-11-01  [SimpleGrazing].GrazeToResidual(1000)
              1979-11-15  [SimpleGrazing].GrazeToResidual(1000)
              1979-11-30  [SimpleGrazing].GrazeToResidual(1000)
              1979-12-14  [SimpleGrazing].GrazeToResidual(1000)
              1979-12-28  [SimpleGrazing].GrazeToResidual(1000)
              1980-01-11  [SimpleGrazing].GrazeToResidual(1000)
              1980-01-25  [SimpleGrazing].GrazeToResidual(1000)
              1980-02-08  [SimpleGrazing].GrazeToResidual(1000)
              1980-02-22  [SimpleGrazing].GrazeToResidual(1000)
              1980-03-08  [SimpleGrazing].GrazeToResidual(1000)
              1980-03-22  [SimpleGrazing].GrazeToResidual(1000)
              1980-04-05  [SimpleGrazing].GrazeToResidual(1000)
              1980-04-19  [SimpleGrazing].GrazeToResidual(1000)
              1980-05-03  [SimpleGrazing].GrazeToResidual(1000)
              1980-05-17  [SimpleGrazing].GrazeToResidual(1000)
              1980-05-31  [SimpleGrazing].GrazeToResidual(1000)
              1980-06-14  [SimpleGrazing].GrazeToResidual(1000)
              1980-06-28  [SimpleGrazing].GrazeToResidual(1000)
              1980-07-12  [SimpleGrazing].GrazeToResidual(1000)
              1980-07-26  [SimpleGrazing].GrazeToResidual(1000)
              1980-08-09  [SimpleGrazing].GrazeToResidual(1000)
              1980-08-23  [SimpleGrazing].GrazeToResidual(1000)
              1980-09-06  [SimpleGrazing].GrazeToResidual(1000)
              1980-09-20  [SimpleGrazing].GrazeToResidual(1000)
              1980-10-04  [SimpleGrazing].GrazeToResidual(1000)
              1980-10-18  [SimpleGrazing].GrazeToResidual(1000)
              1980-11-01  [SimpleGrazing].GrazeToResidual(1000)
              1980-11-15  [SimpleGrazing].GrazeToResidual(1000)
              1980-11-30  [SimpleGrazing].GrazeToResidual(1000)
              1980-12-14  [SimpleGrazing].GrazeToResidual(1000)
              1980-12-28  [SimpleGrazing].GrazeToResidual(1000)
              1981-01-11  [SimpleGrazing].GrazeToResidual(1000)
              1981-01-25  [SimpleGrazing].GrazeToResidual(1000)
              1981-02-08  [SimpleGrazing].GrazeToResidual(1000)
              1981-02-22  [SimpleGrazing].GrazeToResidual(1000)
              1981-03-08  [SimpleGrazing].GrazeToResidual(1000)
              1981-03-22  [SimpleGrazing].GrazeToResidual(1000)
              1981-04-05  [SimpleGrazing].GrazeToResidual(1000)
              1981-04-19  [SimpleGrazing].GrazeToResidual(1000)
              1981-05-03  [SimpleGrazing].GrazeToResidual(1000)
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            Soil InvermayPlain: SoilType=Haplic Podzol (PZh); Country=New Zealand; Latitude=-41.65; Longitude=172.667
              DataSource=Romero, C.C., Hoogenboom, G., Baigorria, G.A., Koo, J., Gijsman, A.J., Wood, S., 2012. Reanalysis of a global soil database for crop and environmental modeling. Environmental Modelling & Software 35, 163-170.  https://harvestchoice.wufoo.com/forms/download-wisol.
              Comments=Some values (e.g. soil-crop parameters) have been modified based on expected local soil conditions and/or root distribution
              Physical
                Thickness  BD   AirDry  LL15  DUL   SAT
                150        1.3  0.11    0.13  0.3   0.48
                150        1.3  0.11    0.13  0.3   0.48
                300        1.3  0.11    0.13  0.3   0.48
                300        1.3  0.09    0.12  0.25  0.45
                300        1.3  0.09    0.12  0.25  0.45
                300        1.3  0.09    0.12  0.25  0.45
                300        1.3  0.09    0.12  0.25  0.4
                200        1.3  0.09    0.12  0.25  0.4
                SoilCrop AGPRyegrassSoil: LL=[0.13, 0.13, 0.13, 0.12, 0.12, 0.12, 0.12, 0.12]; KL=[0.125, 0.1, 0.035, 0.01, 0.003, 0, 0, 0]; XF=[1, 1, 1, 1, 1, 1, 1, 1]
                SoilCrop AGPWhiteCloverSoil: LL=[0.13, 0.13, 0.13, 0.12, 0.12, 0.12, 0.12, 0.12]; KL=[0.115, 0.08, 0.007, 0, 0, 0, 0, 0]; XF=[1, 1, 1, 1, 1, 1, 1, 1]
                SoilCrop AGPPaspalumSoil: LL=[0.13, 0.13, 0.13, 0.12, 0.12, 0.12, 0.12, 0.12]; KL=[0.105, 0.09, 0.045, 0.021, 0.01, 0, 0, 0]; XF=[1, 1, 1, 1, 1, 1, 1, 1]
              WaterBalance SoilWater: SummerDate=1-Nov; SummerU=8.08; SummerCona=3; WinterDate=1-Apr; WinterU=8.08; WinterCona=3; DiffusConst=0; DiffusSlope=0; Salb=0.14; CN2Bare=83; CNRed=0; CNCov=0; Thickness=[150, 150, 300, 300, 300, 300, 300, 200]; SWCON=[0.3, 0.3, 0.5, 0.5, 0.5, 0.5, 0.5, 0.5]
              Organic: FOMCNRatio=40
                Thickness  Carbon      SoilCNRatio  FBiom       FInert      FOM
                150        4.7         18.79        0.0610103   0.600742    0
                150        4.7         18.79        0.0307392   0.74542179  0
                300        0.60823079  18.79        0.0153764   0.87037987  0
                300        0.22482454  18.79        0.01065838  0.954641    0
                300        0.202252    18.79        0.0101088   0.981558    0
                300        0.200305    18.79        0.0100243   0.991289    0
                300        0.200028    18.79        0.010004    0.996458    0
                200        0.200004    18.79        0.0100009   0.998327    0
              Chemical
                Thickness  NO3N    NH4N   PH
                150        14.652  0.855  6
                150        14.652  0.855  6
                300        7.326   0.855  6
                300        7.326   0.855  6
                300        7.326   0.855  6
                300        7.326   0.855  5.3
                300        7.326   0.855  5.3
                200        1       0.2    5.3
              Nutrient
              CERESSoilTemperature Temperature
              InitialWater Initial Water: PercentMethod=0; FractionFull=0.56; RelativeTo=LL15
          CompositeFactor Kowhitirangi
            Specifications:
              [Clock].StartDate=1974-06-01
              [Clock].EndDate=1980-06-01
              [Weather]
              [ClimateController]
              [Soil]
              [Cutting]
            Weather: FileName=VCS_Kowhitirangi.met
            Manager ClimateController
              AllowControl = True
              EnableDate = 01/01/1974 00:00:00
              WithinYearControl = False
              ControlStart =
              ControlEnd =
              RainfallMultiplier = 1.1
              RainfallAddition = 0
              RadiationMultiplier = 1
              RadiationAddition = 0
              MinTMultiplier = 1
              MinTAddition = 0
              MaxTMultiplier = 1
              MaxTAddition = 0
              WindMultiplier = 1
              WindAddition = 0
              VPMultiplier = 1
              VPAddition = 0
              script: same as in Validation.Radcliffe.Factors.Location.Ahaura.ClimateController
            Operations Cutting: same as Validation.Radcliffe.Factors.Location.Ahaura.Cutting
            Soil Kowhitirangi: SoilType=Gleyic Podzol (PZg); Country=New Zealand; Latitude=-42.467; Longitude=171.2
              DataSource=Romero, C.C., Hoogenboom, G., Baigorria, G.A., Koo, J., Gijsman, A.J., Wood, S., 2012. Reanalysis of a global soil database for crop and environmental modeling. Environmental Modelling & Software 35, 163-170.  https://harvestchoice.wufoo.com/forms/download-wisol.
              Comments=Some values (e.g. soil-crop parameters) have been modified based on expected local soil conditions and/or root distribution
              Physical
                Thickness  BD   AirDry  LL15  DUL   SAT
                150        1.3  0.11    0.12  0.3   0.5
                150        1.3  0.11    0.12  0.3   0.45
                300        1.3  0.09    0.12  0.25  0.45
                300        1.3  0.09    0.12  0.25  0.4
                300        1.3  0.09    0.12  0.25  0.4
                300        1.3  0.09    0.12  0.25  0.4
                300        1.3  0.09    0.12  0.25  0.4
                200        1.3  0.09    0.12  0.25  0.4
                SoilCrop AGPRyegrassSoil: LL=[0.12, 0.12, 0.12, 0.12, 0.12, 0.12, 0.12, 0.12]; KL=[0.125, 0.1, 0.035, 0.01, 0.003, 0, 0, 0]; XF=[1, 1, 1, 1, 1, 1, 1, 1]
                SoilCrop AGPWhiteCloverSoil: LL=[0.12, 0.12, 0.12, 0.12, 0.12, 0.12, 0.12, 0.12]; KL=[0.115, 0.08, 0.007, 0, 0, 0, 0, 0]; XF=[1, 1, 1, 1, 1, 1, 1, 1]
                SoilCrop AGPPaspalumSoil: LL=[0.12, 0.12, 0.12, 0.12, 0.12, 0.12, 0.12, 0.12]; KL=[0.105, 0.09, 0.045, 0.021, 0.01, 0, 0, 0]; XF=[1, 1, 1, 1, 1, 1, 1, 1]
              WaterBalance SoilWater: SummerDate=1-Nov; SummerU=8.72; SummerCona=3; WinterDate=1-Apr; WinterU=8.72; WinterCona=3; DiffusConst=0; DiffusSlope=0; Salb=0.13; CN2Bare=80; CNRed=0; CNCov=0; Thickness=[150, 150, 300, 300, 300, 300, 300, 200]; SWCON=[0.4, 0.6, 0.8, 0.8, 0.8, 0.8, 0.8, 0.8]
              Organic: FOMCNRatio=40
                Thickness  Carbon      SoilCNRatio  FBiom       FInert      FOM
                150        4.7         37.94        0.0610103   0.600742    0
                150        4.7         37.94        0.0307392   0.74542179  0
                300        0.60823079  37.94        0.0153764   0.87037987  0
                300        0.22482454  37.94        0.01065838  0.954641    0
                300        0.202252    37.94        0.0101088   0.981558    0
                300        0.200305    37.94        0.0100243   0.991289    0
                300        0.200028    37.94        0.010004    0.996458    0
                200        0.200004    37.94        0.0100009   0.998327    0
              Chemical: same as Validation.Radcliffe.Factors.Location.InvermayTaieriPlain.InvermayPlain.Chemical
              Nutrient
              CERESSoilTemperature Temperature
              InitialWater Initial Water: PercentMethod=0; FractionFull=0.56; RelativeTo=LL15
          CompositeFactor LowerWaitakiPlains
            Specifications:
              [Clock].StartDate=1973-06-01
              [Clock].EndDate=1979-06-01
              [Weather]
              [ClimateController]
              [Soil]
              [IrrigationSchedule]
              [Cutting]
            Weather: FileName=VCS_Oamaru.met
            Manager ClimateController
              AllowControl = True
              EnableDate = 01/01/1973 00:00:00
              WithinYearControl = False
              ControlStart =
              ControlEnd =
              RainfallMultiplier = 1
              RainfallAddition = 0
              RadiationMultiplier = 1
              RadiationAddition = 0
              MinTMultiplier = 1
              MinTAddition = 0
              MaxTMultiplier = 1
              MaxTAddition = 0
              WindMultiplier = 1
              WindAddition = 0
              VPMultiplier = 1
              VPAddition = 0
              script: same as in Validation.Radcliffe.Factors.Location.Ahaura.ClimateController
            Operations IrrigationSchedule
              1973-10-11  [Irrigation].Apply(50);
              1973-10-31  [Irrigation].Apply(50);
              1973-11-20  [Irrigation].Apply(50);
              1973-12-10  [Irrigation].Apply(50);
              1973-12-30  [Irrigation].Apply(50);
              1974-01-19  [Irrigation].Apply(50);
              1974-02-08  [Irrigation].Apply(50);
              1974-10-11  [Irrigation].Apply(50);
              1974-10-31  [Irrigation].Apply(50);
              1974-11-20  [Irrigation].Apply(50);
              1974-12-10  [Irrigation].Apply(50);
              1974-12-30  [Irrigation].Apply(50);
              1975-01-19  [Irrigation].Apply(50);
              1975-02-08  [Irrigation].Apply(50);
              1975-10-11  [Irrigation].Apply(50);
              1975-10-31  [Irrigation].Apply(50);
              1975-11-20  [Irrigation].Apply(50);
              1975-12-10  [Irrigation].Apply(50);
              1975-12-30  [Irrigation].Apply(50);
              1976-01-19  [Irrigation].Apply(50);
              1976-02-08  [Irrigation].Apply(50);
              1976-10-11  [Irrigation].Apply(50);
              1976-10-31  [Irrigation].Apply(50);
              1976-11-20  [Irrigation].Apply(50);
              1976-12-10  [Irrigation].Apply(50);
              1976-12-30  [Irrigation].Apply(50);
              1977-01-19  [Irrigation].Apply(50);
              1977-02-08  [Irrigation].Apply(50);
              1977-10-11  [Irrigation].Apply(50);
              1977-10-31  [Irrigation].Apply(50);
              1977-11-20  [Irrigation].Apply(50);
              1977-12-10  [Irrigation].Apply(50);
              1977-12-30  [Irrigation].Apply(50);
              1978-01-19  [Irrigation].Apply(50);
              1978-02-08  [Irrigation].Apply(50);
              1978-10-11  [Irrigation].Apply(50);
              1978-10-31  [Irrigation].Apply(50);
              1978-11-20  [Irrigation].Apply(50);
              1978-12-10  [Irrigation].Apply(50);
              1978-12-30  [Irrigation].Apply(50);
              1979-01-19  [Irrigation].Apply(50);
              1979-02-08  [Irrigation].Apply(50);
            Operations Cutting
              1973-06-14  [SimpleGrazing].GrazeToResidual(1000)
              1973-06-28  [SimpleGrazing].GrazeToResidual(1000)
              1973-07-12  [SimpleGrazing].GrazeToResidual(1000)
              1973-07-26  [SimpleGrazing].GrazeToResidual(1000)
              1973-08-09  [SimpleGrazing].GrazeToResidual(1000)
              1973-08-23  [SimpleGrazing].GrazeToResidual(1000)
              1973-09-06  [SimpleGrazing].GrazeToResidual(1000)
              1973-09-20  [SimpleGrazing].GrazeToResidual(1000)
              1973-10-04  [SimpleGrazing].GrazeToResidual(1000)
              1973-10-18  [SimpleGrazing].GrazeToResidual(1000)
              1973-11-01  [SimpleGrazing].GrazeToResidual(1000)
              1973-11-15  [SimpleGrazing].GrazeToResidual(1000)
              1973-11-30  [SimpleGrazing].GrazeToResidual(1000)
              1973-12-14  [SimpleGrazing].GrazeToResidual(1000)
              1973-12-28  [SimpleGrazing].GrazeToResidual(1000)
              1974-01-11  [SimpleGrazing].GrazeToResidual(1000)
              1974-01-25  [SimpleGrazing].GrazeToResidual(1000)
              1974-02-08  [SimpleGrazing].GrazeToResidual(1000)
              1974-02-22  [SimpleGrazing].GrazeToResidual(1000)
              1974-03-08  [SimpleGrazing].GrazeToResidual(1000)
              1974-03-22  [SimpleGrazing].GrazeToResidual(1000)
              1974-04-05  [SimpleGrazing].GrazeToResidual(1000)
              1974-04-19  [SimpleGrazing].GrazeToResidual(1000)
              1974-05-03  [SimpleGrazing].GrazeToResidual(1000)
              1974-05-17  [SimpleGrazing].GrazeToResidual(1000)
              1974-05-31  [SimpleGrazing].GrazeToResidual(1000)
              1974-06-14  [SimpleGrazing].GrazeToResidual(1000)
              1974-06-28  [SimpleGrazing].GrazeToResidual(1000)
              1974-07-12  [SimpleGrazing].GrazeToResidual(1000)
              1974-07-26  [SimpleGrazing].GrazeToResidual(1000)
              1974-08-09  [SimpleGrazing].GrazeToResidual(1000)
              1974-08-23  [SimpleGrazing].GrazeToResidual(1000)
              1974-09-06  [SimpleGrazing].GrazeToResidual(1000)
              1974-09-20  [SimpleGrazing].GrazeToResidual(1000)
              1974-10-04  [SimpleGrazing].GrazeToResidual(1000)
              1974-10-18  [SimpleGrazing].GrazeToResidual(1000)
              1974-11-01  [SimpleGrazing].GrazeToResidual(1000)
              1974-11-15  [SimpleGrazing].GrazeToResidual(1000)
              1974-11-30  [SimpleGrazing].GrazeToResidual(1000)
              1974-12-14  [SimpleGrazing].GrazeToResidual(1000)
              1974-12-28  [SimpleGrazing].GrazeToResidual(1000)
              1975-01-11  [SimpleGrazing].GrazeToResidual(1000)
              1975-01-25  [SimpleGrazing].GrazeToResidual(1000)
              1975-02-08  [SimpleGrazing].GrazeToResidual(1000)
              1975-02-22  [SimpleGrazing].GrazeToResidual(1000)
              1975-03-08  [SimpleGrazing].GrazeToResidual(1000)
              1975-03-22  [SimpleGrazing].GrazeToResidual(1000)
              1975-04-05  [SimpleGrazing].GrazeToResidual(1000)
              1975-04-19  [SimpleGrazing].GrazeToResidual(1000)
              1975-05-03  [SimpleGrazing].GrazeToResidual(1000)
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            Soil LowerWaitaki: SoilType=Umbric Andosol (ANu); Country=New Zealand; Latitude=-37.967; Longitude=175.767
              DataSource=Romero, C.C., Hoogenboom, G., Baigorria, G.A., Koo, J., Gijsman, A.J., Wood, S., 2012. Reanalysis of a global soil database for crop and environmental modeling. Environmental Modelling & Software 35, 163-170.  https://harvestchoice.wufoo.com/forms/download-wisol.
              Comments=Some values (e.g. soil-crop parameters) have been modified based on expected local soil conditions and/or root distribution
              Physical
                Thickness  BD    AirDry  LL15   DUL   SAT
                100        0.79  0.0965  0.193  0.4   0.406
                100        0.89  0.0952  0.119  0.37  0.376
                100        0.87  0.122   0.122  0.35  0.358
                100        1.04  0.114   0.114  0.22  0.228
                200        1.42  0.058   0.058  0.06  0.068
                300        1.42  0.058   0.058  0.06  0.068
                SoilCrop AGPRyegrassSoil: LL=[0.193, 0.119, 0.122, 0.114, 0.058, 0.058]; KL=[0.12, 0.115, 0.077, 0.05, 0.01, 0]; XF=[1, 1, 1, 1, 1, 0.2]
                SoilCrop AGPWhiteCloverSoil: LL=[0.193, 0.119, 0.122, 0.114, 0.058, 0.058]; KL=[0.11, 0.105, 0.05, 0.005, 0, 0]; XF=[1, 1, 1, 1, 1, 0.2]
                SoilCrop AGPPaspalumSoil: LL=[0.193, 0.119, 0.122, 0.114, 0.058, 0.058]; KL=[0.1, 0.1, 0.077, 0.06, 0.038, 0.02]; XF=[1, 1, 1, 1, 1, 0.2]
              WaterBalance SoilWater: SummerDate=1-Nov; SummerU=9.12; SummerCona=3; WinterDate=1-Apr; WinterU=9.12; WinterCona=3; DiffusConst=0; DiffusSlope=0; Salb=0.13; CN2Bare=73; CNRed=0; CNCov=0; Thickness=[180, 120, 210, 230, 260]; SWCON=[0.5, 0.5, 0.5, 0.5, 0.5]
              Organic: FOMCNRatio=40
                Thickness  Carbon  SoilCNRatio  FBiom   FInert   FOM
                180        7.472   12           0.0566  0.618    0
                120        2.39    12           0.0289  0.7566   0
                210        0.785   12           0.017   0.8516   0
                230        0.301   12           0.0118  0.92332  0
                260        0.214   12           0.0104  0.9632   0
              Chemical
                Thickness  NO3N  NH4N  PH
                180        0.1   0.1   5.6
                120        0.1   0.1   6.2
                210        0.1   0.1   6.2
                230        0.1   0.1   6.4
                260        0.1   0.1   6.4
              Nutrient
              CERESSoilTemperature Temperature
              InitialWater Initial water: PercentMethod=0; FractionFull=1
          CompositeFactor Manutuke
            Specifications:
              [Clock].StartDate=1975-06-01
              [Clock].EndDate=2002-06-01
              [Weather]
              [ClimateController]
              [Soil]
              [Cutting]
            Weather: FileName=VCS_Manutuke.met
            Manager ClimateController
              AllowControl = True
              EnableDate = 01/01/1975 00:00:00
              WithinYearControl = False
              ControlStart =
              ControlEnd =
              RainfallMultiplier = 0.94
              RainfallAddition = 0
              RadiationMultiplier = 1
              RadiationAddition = 0
              MinTMultiplier = 1
              MinTAddition = 0
              MaxTMultiplier = 1
              MaxTAddition = 0
              WindMultiplier = 1
              WindAddition = 0
              VPMultiplier = 1
              VPAddition = 0
              script: same as in Validation.Radcliffe.Factors.Location.Ahaura.ClimateController
            Operations Cutting
              1975-06-14  [SimpleGrazing].GrazeToResidual(1000)
              1975-06-28  [SimpleGrazing].GrazeToResidual(1000)
              1975-07-12  [SimpleGrazing].GrazeToResidual(1000)
              1975-07-26  [SimpleGrazing].GrazeToResidual(1000)
              1975-08-09  [SimpleGrazing].GrazeToResidual(1000)
              1975-08-23  [SimpleGrazing].GrazeToResidual(1000)
              1975-09-06  [SimpleGrazing].GrazeToResidual(1000)
              1975-09-20  [SimpleGrazing].GrazeToResidual(1000)
              1975-10-04  [SimpleGrazing].GrazeToResidual(1000)
              1975-10-18  [SimpleGrazing].GrazeToResidual(1000)
              1975-11-01  [SimpleGrazing].GrazeToResidual(1000)
              1975-11-15  [SimpleGrazing].GrazeToResidual(1000)
              1975-11-30  [SimpleGrazing].GrazeToResidual(1000)
              1975-12-14  [SimpleGrazing].GrazeToResidual(1000)
              1975-12-28  [SimpleGrazing].GrazeToResidual(1000)
              1976-01-11  [SimpleGrazing].GrazeToResidual(1000)
              1976-01-25  [SimpleGrazing].GrazeToResidual(1000)
              1976-02-08  [SimpleGrazing].GrazeToResidual(1000)
              1976-02-22  [SimpleGrazing].GrazeToResidual(1000)
              1976-03-08  [SimpleGrazing].GrazeToResidual(1000)
              1976-03-22  [SimpleGrazing].GrazeToResidual(1000)
              1976-04-05  [SimpleGrazing].GrazeToResidual(1000)
              1976-04-19  [SimpleGrazing].GrazeToResidual(1000)
              1976-05-03  [SimpleGrazing].GrazeToResidual(1000)
              1976-05-17  [SimpleGrazing].GrazeToResidual(1000)
              1976-05-31  [SimpleGrazing].GrazeToResidual(1000)
              1976-06-14  [SimpleGrazing].GrazeToResidual(1000)
              1976-06-28  [SimpleGrazing].GrazeToResidual(1000)
              1976-07-12  [SimpleGrazing].GrazeToResidual(1000)
              1976-07-26  [SimpleGrazing].GrazeToResidual(1000)
              1976-08-09  [SimpleGrazing].GrazeToResidual(1000)
              1976-08-23  [SimpleGrazing].GrazeToResidual(1000)
              1976-09-06  [SimpleGrazing].GrazeToResidual(1000)
              1976-09-20  [SimpleGrazing].GrazeToResidual(1000)
              1976-10-04  [SimpleGrazing].GrazeToResidual(1000)
              1976-10-18  [SimpleGrazing].GrazeToResidual(1000)
              1976-11-01  [SimpleGrazing].GrazeToResidual(1000)
              1976-11-15  [SimpleGrazing].GrazeToResidual(1000)
              1976-11-30  [SimpleGrazing].GrazeToResidual(1000)
              1976-12-14  [SimpleGrazing].GrazeToResidual(1000)
              1976-12-28  [SimpleGrazing].GrazeToResidual(1000)
              1977-01-11  [SimpleGrazing].GrazeToResidual(1000)
              1977-01-25  [SimpleGrazing].GrazeToResidual(1000)
              1977-02-08  [SimpleGrazing].GrazeToResidual(1000)
              1977-02-22  [SimpleGrazing].GrazeToResidual(1000)
              1977-03-08  [SimpleGrazing].GrazeToResidual(1000)
              1977-03-22  [SimpleGrazing].GrazeToResidual(1000)
              1977-04-05  [SimpleGrazing].GrazeToResidual(1000)
              1977-04-19  [SimpleGrazing].GrazeToResidual(1000)
              1977-05-03  [SimpleGrazing].GrazeToResidual(1000)
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            Soil Manutuke: SoilType=Humic Nitisol (NTu); Country=New Zealand; Latitude=-37.767; Longitude=175.3
              DataSource=Romero, C.C., Hoogenboom, G., Baigorria, G.A., Koo, J., Gijsman, A.J., Wood, S., 2012. Reanalysis of a global soil database for crop and environmental modeling. Environmental Modelling & Software 35, 163-170.  https://harvestchoice.wufoo.com/forms/download-wisol.
              Comments=Some values (e.g. soil-crop parameters) have been modified based on expected local soil conditions and/or root distribution
              Physical
                Thickness  BD   AirDry  LL15  DUL   SAT
                150        1.3  0.11    0.15  0.35  0.48
                150        1.3  0.11    0.15  0.35  0.48
                300        1.3  0.09    0.15  0.3   0.48
                300        1.3  0.09    0.12  0.3   0.45
                300        1.3  0.09    0.12  0.3   0.45
                300        1.3  0.09    0.12  0.3   0.45
                300        1.3  0.09    0.12  0.3   0.45
                200        1.3  0.09    0.12  0.3   0.45
                SoilCrop AGPRyegrassSoil: LL=[0.15, 0.15, 0.15, 0.12, 0.12, 0.12, 0.12, 0.12]; KL=[0.125, 0.1, 0.035, 0.01, 0.003, 0, 0, 0]; XF=[1, 1, 1, 1, 1, 1, 1, 1]
                SoilCrop AGPWhiteCloverSoil: LL=[0.15, 0.15, 0.15, 0.12, 0.12, 0.12, 0.12, 0.12]; KL=[0.115, 0.08, 0.007, 0, 0, 0, 0, 0]; XF=[1, 1, 1, 1, 1, 1, 1, 1]
                SoilCrop AGPPaspalumSoil: LL=[0.15, 0.15, 0.15, 0.12, 0.12, 0.12, 0.12, 0.12]; KL=[0.105, 0.09, 0.045, 0.021, 0.01, 0, 0, 0]; XF=[1, 1, 1, 1, 1, 1, 1, 1]
              WaterBalance SoilWater: SummerDate=1-Nov; SummerU=10.4; SummerCona=3; WinterDate=1-Apr; WinterU=10.4; WinterCona=3; DiffusConst=0; DiffusSlope=0; Salb=0.13; CN2Bare=83; CNRed=0; CNCov=0; Thickness=[150, 150, 300, 300, 300, 300, 300, 200]; SWCON=[0.4, 0.4, 0.6, 0.6, 0.6, 0.7, 0.7, 0.7]
              Organic: FOMCNRatio=40
                Thickness  Carbon      SoilCNRatio  FBiom       FInert      FOM
                150        4.7         10.8         0.0610103   0.600742    0
                150        4.7         10.8         0.0307392   0.74542179  0
                300        0.60823079  10.8         0.0153764   0.87037987  0
                300        0.22482454  10.8         0.01065838  0.954641    0
                300        0.202252    10.8         0.0101088   0.981558    0
                300        0.200305    10.8         0.0100243   0.991289    0
                300        0.200028    10.8         0.010004    0.996458    0
                200        0.200004    10.8         0.0100009   0.998327    0
              Chemical: same as Validation.Radcliffe.Factors.Location.InvermayTaieriPlain.InvermayPlain.Chemical
              Nutrient
              CERESSoilTemperature Temperature
              InitialWater Initial Water: PercentMethod=0; FractionFull=0.56; RelativeTo=LL15
          CompositeFactor Maraekakaho
            Specifications:
              [Clock].StartDate=1973-06-01
              [Clock].EndDate=1981-06-01
              [Weather]
              [ClimateController]
              [Soil]
              [Cutting]
            Weather: FileName=VCS_Maraekakaho.met
            Manager ClimateController
              AllowControl = True
              EnableDate = 01/01/1973 00:00:00
              WithinYearControl = False
              ControlStart =
              ControlEnd =
              RainfallMultiplier = 1.05
              RainfallAddition = 0
              RadiationMultiplier = 1
              RadiationAddition = 0
              MinTMultiplier = 1
              MinTAddition = 0
              MaxTMultiplier = 1
              MaxTAddition = 0
              WindMultiplier = 1
              WindAddition = 0
              VPMultiplier = 1
              VPAddition = 0
              script: same as in Validation.Radcliffe.Factors.Location.Ahaura.ClimateController
            Operations Cutting
              1973-06-14  [SimpleGrazing].GrazeToResidual(1000)
              1973-06-28  [SimpleGrazing].GrazeToResidual(1000)
              1973-07-12  [SimpleGrazing].GrazeToResidual(1000)
              1973-07-26  [SimpleGrazing].GrazeToResidual(1000)
              1973-08-09  [SimpleGrazing].GrazeToResidual(1000)
              1973-08-23  [SimpleGrazing].GrazeToResidual(1000)
              1973-09-06  [SimpleGrazing].GrazeToResidual(1000)
              1973-09-20  [SimpleGrazing].GrazeToResidual(1000)
              1973-10-04  [SimpleGrazing].GrazeToResidual(1000)
              1973-10-18  [SimpleGrazing].GrazeToResidual(1000)
              1973-11-01  [SimpleGrazing].GrazeToResidual(1000)
              1973-11-15  [SimpleGrazing].GrazeToResidual(1000)
              1973-11-30  [SimpleGrazing].GrazeToResidual(1000)
              1973-12-14  [SimpleGrazing].GrazeToResidual(1000)
              1973-12-28  [SimpleGrazing].GrazeToResidual(1000)
              1974-01-11  [SimpleGrazing].GrazeToResidual(1000)
              1974-01-25  [SimpleGrazing].GrazeToResidual(1000)
              1974-02-08  [SimpleGrazing].GrazeToResidual(1000)
              1974-02-22  [SimpleGrazing].GrazeToResidual(1000)
              1974-03-08  [SimpleGrazing].GrazeToResidual(1000)
              1974-03-22  [SimpleGrazing].GrazeToResidual(1000)
              1974-04-05  [SimpleGrazing].GrazeToResidual(1000)
              1974-04-19  [SimpleGrazing].GrazeToResidual(1000)
              1974-05-03  [SimpleGrazing].GrazeToResidual(1000)
              1974-05-17  [SimpleGrazing].GrazeToResidual(1000)
              1974-05-31  [SimpleGrazing].GrazeToResidual(1000)
              1974-06-14  [SimpleGrazing].GrazeToResidual(1000)
              1974-06-28  [SimpleGrazing].GrazeToResidual(1000)
              1974-07-12  [SimpleGrazing].GrazeToResidual(1000)
              1974-07-26  [SimpleGrazing].GrazeToResidual(1000)
              1974-08-09  [SimpleGrazing].GrazeToResidual(1000)
              1974-08-23  [SimpleGrazing].GrazeToResidual(1000)
              1974-09-06  [SimpleGrazing].GrazeToResidual(1000)
              1974-09-20  [SimpleGrazing].GrazeToResidual(1000)
              1974-10-04  [SimpleGrazing].GrazeToResidual(1000)
              1974-10-18  [SimpleGrazing].GrazeToResidual(1000)
              1974-11-01  [SimpleGrazing].GrazeToResidual(1000)
              1974-11-15  [SimpleGrazing].GrazeToResidual(1000)
              1974-11-30  [SimpleGrazing].GrazeToResidual(1000)
              1974-12-14  [SimpleGrazing].GrazeToResidual(1000)
              1974-12-28  [SimpleGrazing].GrazeToResidual(1000)
              1975-01-11  [SimpleGrazing].GrazeToResidual(1000)
              1975-01-25  [SimpleGrazing].GrazeToResidual(1000)
              1975-02-08  [SimpleGrazing].GrazeToResidual(1000)
              1975-02-22  [SimpleGrazing].GrazeToResidual(1000)
              1975-03-08  [SimpleGrazing].GrazeToResidual(1000)
              1975-03-22  [SimpleGrazing].GrazeToResidual(1000)
              1975-04-05  [SimpleGrazing].GrazeToResidual(1000)
              1975-04-19  [SimpleGrazing].GrazeToResidual(1000)
              1975-05-03  [SimpleGrazing].GrazeToResidual(1000)
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            Soil Maraekakaho: SoilType=Umbric Andosol (ANu); Country=New Zealand; Latitude=-38.617; Longitude=176.117
              DataSource=Romero, C.C., Hoogenboom, G., Baigorria, G.A., Koo, J., Gijsman, A.J., Wood, S., 2012. Reanalysis of a global soil database for crop and environmental modeling. Environmental Modelling & Software 35, 163-170.  https://harvestchoice.wufoo.com/forms/download-wisol.
              Comments=Some values (e.g. soil-crop parameters) have been modified based on expected local soil conditions and/or root distribution
              Physical
                Thickness  BD   AirDry  LL15  DUL   SAT
                150        1.3  0.12    0.15  0.35  0.5
                150        1.3  0.12    0.15  0.25  0.5
                300        1.3  0.12    0.15  0.2   0.5
                400        1.3  0.04    0.06  0.13  0.45
                200        1.3  0.04    0.06  0.13  0.45
                300        1.3  0.04    0.06  0.13  0.4
                300        1.3  0.04    0.06  0.13  0.4
                200        1.3  0.04    0.06  0.13  0.4
                SoilCrop AGPRyegrassSoil: LL=[0.15, 0.15, 0.15, 0.06, 0.06, 0.06, 0.06, 0.06]; KL=[0.125, 0.1, 0.035, 0.01, 0, 0, 0, 0]; XF=[1, 1, 1, 1, 1, 1, 1, 1]
                SoilCrop AGPWhiteCloverSoil: LL=[0.15, 0.15, 0.15, 0.06, 0.06, 0.06, 0.06, 0.06]; KL=[0.115, 0.08, 0.007, 0, 0, 0, 0, 0]; XF=[1, 1, 1, 1, 1, 1, 1, 1]
                SoilCrop AGPPaspalumSoil: LL=[0.15, 0.15, 0.15, 0.06, 0.06, 0.06, 0.06, 0.06]; KL=[0.105, 0.09, 0.045, 0.02, 0.01, 0, 0, 0]; XF=[1, 1, 1, 1, 1, 1, 1, 1]
              WaterBalance SoilWater: SummerDate=1-Nov; SummerU=8.24; SummerCona=3; WinterDate=1-Apr; WinterU=8.24; WinterCona=3; DiffusConst=0; DiffusSlope=0; Salb=0.13; CN2Bare=68; CNRed=0; CNCov=0; Thickness=[150, 150, 300, 400, 200, 300, 300, 200]; SWCON=[0.4, 0.6, 0.6, 0.5, 0.5, 0.3, 0.3, 0.3]
              Organic: same as Validation.Radcliffe.Factors.Location.Ahaura.Ahaura.Organic
              Chemical: same as Validation.Radcliffe.Factors.Location.Ahaura.Ahaura.Chemical
              Nutrient
              CERESSoilTemperature Temperature
              InitialWater Initial Water: PercentMethod=0; FractionFull=0.56; RelativeTo=LL15
          CompositeFactor Marton1
            Specifications:
              [Clock].StartDate=1973-06-01
              [Clock].EndDate=1985-06-01
              [Weather]
              [ClimateController]
              [Soil]
              [Cutting]
            Weather: FileName=VCS_Marton.met
            Manager ClimateController
              AllowControl = True
              EnableDate = 01/01/1973 00:00:00
              WithinYearControl = False
              ControlStart =
              ControlEnd =
              RainfallMultiplier = 0.92
              RainfallAddition = 0
              RadiationMultiplier = 1
              RadiationAddition = 0
              MinTMultiplier = 1
              MinTAddition = 0
              MaxTMultiplier = 1
              MaxTAddition = 0
              WindMultiplier = 1
              WindAddition = 0
              VPMultiplier = 1
              VPAddition = 0
              script: same as in Validation.Radcliffe.Factors.Location.Ahaura.ClimateController
            Operations Cutting
              1973-06-14  [SimpleGrazing].GrazeToResidual(1000)
              1973-06-28  [SimpleGrazing].GrazeToResidual(1000)
              1973-07-12  [SimpleGrazing].GrazeToResidual(1000)
              1973-07-26  [SimpleGrazing].GrazeToResidual(1000)
              1973-08-09  [SimpleGrazing].GrazeToResidual(1000)
              1973-08-23  [SimpleGrazing].GrazeToResidual(1000)
              1973-09-06  [SimpleGrazing].GrazeToResidual(1000)
              1973-09-20  [SimpleGrazing].GrazeToResidual(1000)
              1973-10-04  [SimpleGrazing].GrazeToResidual(1000)
              1973-10-18  [SimpleGrazing].GrazeToResidual(1000)
              1973-11-01  [SimpleGrazing].GrazeToResidual(1000)
              1973-11-15  [SimpleGrazing].GrazeToResidual(1000)
              1973-11-30  [SimpleGrazing].GrazeToResidual(1000)
              1973-12-14  [SimpleGrazing].GrazeToResidual(1000)
              1973-12-28  [SimpleGrazing].GrazeToResidual(1000)
              1974-01-11  [SimpleGrazing].GrazeToResidual(1000)
              1974-01-25  [SimpleGrazing].GrazeToResidual(1000)
              1974-02-08  [SimpleGrazing].GrazeToResidual(1000)
              1974-02-22  [SimpleGrazing].GrazeToResidual(1000)
              1974-03-08  [SimpleGrazing].GrazeToResidual(1000)
              1974-03-22  [SimpleGrazing].GrazeToResidual(1000)
              1974-04-05  [SimpleGrazing].GrazeToResidual(1000)
              1974-04-19  [SimpleGrazing].GrazeToResidual(1000)
              1974-05-03  [SimpleGrazing].GrazeToResidual(1000)
              1974-05-17  [SimpleGrazing].GrazeToResidual(1000)
              1974-05-31  [SimpleGrazing].GrazeToResidual(1000)
              1974-06-14  [SimpleGrazing].GrazeToResidual(1000)
              1974-06-28  [SimpleGrazing].GrazeToResidual(1000)
              1974-07-12  [SimpleGrazing].GrazeToResidual(1000)
              1974-07-26  [SimpleGrazing].GrazeToResidual(1000)
              1974-08-09  [SimpleGrazing].GrazeToResidual(1000)
              1974-08-23  [SimpleGrazing].GrazeToResidual(1000)
              1974-09-06  [SimpleGrazing].GrazeToResidual(1000)
              1974-09-20  [SimpleGrazing].GrazeToResidual(1000)
              1974-10-04  [SimpleGrazing].GrazeToResidual(1000)
              1974-10-18  [SimpleGrazing].GrazeToResidual(1000)
              1974-11-01  [SimpleGrazing].GrazeToResidual(1000)
              1974-11-15  [SimpleGrazing].GrazeToResidual(1000)
              1974-11-30  [SimpleGrazing].GrazeToResidual(1000)
              1974-12-14  [SimpleGrazing].GrazeToResidual(1000)
              1974-12-28  [SimpleGrazing].GrazeToResidual(1000)
              1975-01-11  [SimpleGrazing].GrazeToResidual(1000)
              1975-01-25  [SimpleGrazing].GrazeToResidual(1000)
              1975-02-08  [SimpleGrazing].GrazeToResidual(1000)
              1975-02-22  [SimpleGrazing].GrazeToResidual(1000)
              1975-03-08  [SimpleGrazing].GrazeToResidual(1000)
              1975-03-22  [SimpleGrazing].GrazeToResidual(1000)
              1975-04-05  [SimpleGrazing].GrazeToResidual(1000)
              1975-04-19  [SimpleGrazing].GrazeToResidual(1000)
              1975-05-03  [SimpleGrazing].GrazeToResidual(1000)
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            Soil Marton: SoilType=Haplic Podzol (PZh); Country=New Zealand; Latitude=-41.65; Longitude=172.667
              DataSource=Romero, C.C., Hoogenboom, G., Baigorria, G.A., Koo, J., Gijsman, A.J., Wood, S., 2012. Reanalysis of a global soil database for crop and environmental modeling. Environmental Modelling & Software 35, 163-170.  https://harvestchoice.wufoo.com/forms/download-wisol.
              Comments=Some values (e.g. soil-crop parameters) have been modified based on expected local soil conditions and/or root distribution
              Physical
                Thickness  BD   AirDry  LL15  DUL   SAT
                150        1.3  0.11    0.15  0.3   0.48
                150        1.3  0.11    0.15  0.28  0.48
                300        1.3  0.11    0.15  0.25  0.48
                400        1.3  0.09    0.12  0.2   0.45
                200        1.3  0.09    0.12  0.3   0.45
                300        1.3  0.09    0.12  0.3   0.45
                300        1.3  0.09    0.12  0.3   0.45
                200        1.3  0.09    0.12  0.3   0.5
                SoilCrop AGPRyegrassSoil: LL=[0.15, 0.15, 0.15, 0.12, 0.12, 0.12, 0.12, 0.12]; KL=[0.125, 0.1, 0.035, 0.01, 0, 0, 0, 0]; XF=[1, 1, 1, 1, 1, 1, 1, 1]
                SoilCrop AGPWhiteCloverSoil: LL=[0.15, 0.15, 0.15, 0.12, 0.12, 0.12, 0.12, 0.12]; KL=[0.115, 0.08, 0.007, 0, 0, 0, 0, 0]; XF=[1, 1, 1, 1, 1, 1, 1, 1]
                SoilCrop AGPPaspalumSoil: LL=[0.15, 0.15, 0.15, 0.12, 0.12, 0.12, 0.12, 0.12]; KL=[0.105, 0.09, 0.045, 0.02, 0.01, 0, 0, 0]; XF=[1, 1, 1, 1, 1, 1, 1, 1]
              WaterBalance SoilWater: SummerDate=1-Nov; SummerU=8.08; SummerCona=3; WinterDate=1-Apr; WinterU=8.08; WinterCona=3; DiffusConst=0; DiffusSlope=0; Salb=0.14; CN2Bare=83; CNRed=0; CNCov=0; Thickness=[150, 150, 300, 400, 200, 300, 300, 200]; SWCON=[0.4, 0.4, 0.5, 0.6, 0.6, 0.6, 0.6, 0.6]
              Organic: same as Validation.Radcliffe.Factors.Location.Hindon.Hindon.Organic
              Chemical
                Thickness  NO3N    NH4N   PH
                150        14.652  0.855  6
                150        14.652  0.855  6
                300        7.326   0.855  6
                400        7.326   0.855  6
                200        7.326   0.855  6
                300        7.326   0.855  5.3
                300        7.326   0.855  5.3
                200        0.1     0.1    5.3
              Nutrient
              CERESSoilTemperature Temperature
              InitialWater Initial Water: PercentMethod=0; FractionFull=0.56; RelativeTo=LL15
          CompositeFactor Marton2
            Specifications:
              [Clock].StartDate=1985-06-01
              [Clock].EndDate=1996-06-01
              [Weather]
              [ClimateController]
              [Soil]
              [Cutting]
            Weather: FileName=VCS_Marton.met
            Manager ClimateController
              AllowControl = True
              EnableDate = 01/01/1985 00:00:00
              WithinYearControl = False
              ControlStart =
              ControlEnd =
              RainfallMultiplier = 1.05
              RainfallAddition = 0
              RadiationMultiplier = 1
              RadiationAddition = 0
              MinTMultiplier = 1
              MinTAddition = 0
              MaxTMultiplier = 1
              MaxTAddition = 0
              WindMultiplier = 1
              WindAddition = 0
              VPMultiplier = 1
              VPAddition = 0
              script: same as in Validation.Radcliffe.Factors.Location.Ahaura.ClimateController
            Operations Cutting
              1985-06-14  [SimpleGrazing].GrazeToResidual(1000)
              1985-06-28  [SimpleGrazing].GrazeToResidual(1000)
              1985-07-12  [SimpleGrazing].GrazeToResidual(1000)
              1985-07-26  [SimpleGrazing].GrazeToResidual(1000)
              1985-08-09  [SimpleGrazing].GrazeToResidual(1000)
              1985-08-23  [SimpleGrazing].GrazeToResidual(1000)
              1985-09-06  [SimpleGrazing].GrazeToResidual(1000)
              1985-09-20  [SimpleGrazing].GrazeToResidual(1000)
              1985-10-04  [SimpleGrazing].GrazeToResidual(1000)
              1985-10-18  [SimpleGrazing].GrazeToResidual(1000)
              1985-11-01  [SimpleGrazing].GrazeToResidual(1000)
              1985-11-15  [SimpleGrazing].GrazeToResidual(1000)
              1985-11-30  [SimpleGrazing].GrazeToResidual(1000)
              1985-12-14  [SimpleGrazing].GrazeToResidual(1000)
              1985-12-28  [SimpleGrazing].GrazeToResidual(1000)
              1986-01-11  [SimpleGrazing].GrazeToResidual(1000)
              1986-01-25  [SimpleGrazing].GrazeToResidual(1000)
              1986-02-08  [SimpleGrazing].GrazeToResidual(1000)
              1986-02-22  [SimpleGrazing].GrazeToResidual(1000)
              1986-03-08  [SimpleGrazing].GrazeToResidual(1000)
              1986-03-22  [SimpleGrazing].GrazeToResidual(1000)
              1986-04-05  [SimpleGrazing].GrazeToResidual(1000)
              1986-04-19  [SimpleGrazing].GrazeToResidual(1000)
              1986-05-03  [SimpleGrazing].GrazeToResidual(1000)
              1986-05-17  [SimpleGrazing].GrazeToResidual(1000)
              1986-05-31  [SimpleGrazing].GrazeToResidual(1000)
              1986-06-14  [SimpleGrazing].GrazeToResidual(1000)
              1986-06-28  [SimpleGrazing].GrazeToResidual(1000)
              1986-07-12  [SimpleGrazing].GrazeToResidual(1000)
              1986-07-26  [SimpleGrazing].GrazeToResidual(1000)
              1986-08-09  [SimpleGrazing].GrazeToResidual(1000)
              1986-08-23  [SimpleGrazing].GrazeToResidual(1000)
              1986-09-06  [SimpleGrazing].GrazeToResidual(1000)
              1986-09-20  [SimpleGrazing].GrazeToResidual(1000)
              1986-10-04  [SimpleGrazing].GrazeToResidual(1000)
              1986-10-18  [SimpleGrazing].GrazeToResidual(1000)
              1986-11-01  [SimpleGrazing].GrazeToResidual(1000)
              1986-11-15  [SimpleGrazing].GrazeToResidual(1000)
              1986-11-30  [SimpleGrazing].GrazeToResidual(1000)
              1986-12-14  [SimpleGrazing].GrazeToResidual(1000)
              1986-12-28  [SimpleGrazing].GrazeToResidual(1000)
              1987-01-11  [SimpleGrazing].GrazeToResidual(1000)
              1987-01-25  [SimpleGrazing].GrazeToResidual(1000)
              1987-02-08  [SimpleGrazing].GrazeToResidual(1000)
              1987-02-22  [SimpleGrazing].GrazeToResidual(1000)
              1987-03-08  [SimpleGrazing].GrazeToResidual(1000)
              1987-03-22  [SimpleGrazing].GrazeToResidual(1000)
              1987-04-05  [SimpleGrazing].GrazeToResidual(1000)
              1987-04-19  [SimpleGrazing].GrazeToResidual(1000)
              1987-05-03  [SimpleGrazing].GrazeToResidual(1000)
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            Soil Marton: SoilType=Haplic Podzol (PZh); Country=New Zealand; Latitude=-41.65; Longitude=172.667
              DataSource=Romero, C.C., Hoogenboom, G., Baigorria, G.A., Koo, J., Gijsman, A.J., Wood, S., 2012. Reanalysis of a global soil database for crop and environmental modeling. Environmental Modelling & Software 35, 163-170.  https://harvestchoice.wufoo.com/forms/download-wisol.
              Comments=Some values (e.g. soil-crop parameters) have been modified based on expected local soil conditions and/or root distribution
              Physical: same as Validation.Radcliffe.Factors.Location.Marton1.Marton.Physical
              WaterBalance SoilWater: same as Validation.Radcliffe.Factors.Location.Marton1.Marton.SoilWater
              Organic: FOMCNRatio=40
                Thickness  Carbon  SoilCNRatio  FBiom  FInert  FOM
                150        4.7     18.79        0.061  0.601   0
                150        4.7     18.79        0.031  0.745   0
                300        0.608   18.79        0.015  0.87    0
                400        0.225   18.79        0.011  0.955   0
                200        0.202   18.79        0.01   0.982   0
                300        0.2     18.79        0.01   0.991   0
                300        0.2     18.79        0.01   0.996   0
                200        0.2     18.79        0.01   0.998   0
              Chemical: same as Validation.Radcliffe.Factors.Location.Marton1.Marton.Chemical
              Nutrient
              CERESSoilTemperature Temperature
              InitialWater Initial Water: PercentMethod=0; FractionFull=0.56; RelativeTo=LL15
          CompositeFactor Masterton
            Specifications:
              [Clock].StartDate=1978-06-01
              [Clock].EndDate=1983-06-01
              [Weather]
              [ClimateController]
              [Soil]
              [Cutting]
            Weather: FileName=VCS_Masterton.met
            Manager ClimateController
              AllowControl = True
              EnableDate = 01/01/1978 00:00:00
              WithinYearControl = False
              ControlStart =
              ControlEnd =
              RainfallMultiplier = 0.95
              RainfallAddition = 0
              RadiationMultiplier = 1
              RadiationAddition = 0
              MinTMultiplier = 1
              MinTAddition = 0
              MaxTMultiplier = 1
              MaxTAddition = 0
              WindMultiplier = 1
              WindAddition = 0
              VPMultiplier = 1
              VPAddition = 0
              script: same as in Validation.Radcliffe.Factors.Location.Ahaura.ClimateController
            Operations Cutting
              1978-06-14  [SimpleGrazing].GrazeToResidual(1000)
              1978-06-28  [SimpleGrazing].GrazeToResidual(1000)
              1978-07-12  [SimpleGrazing].GrazeToResidual(1000)
              1978-07-26  [SimpleGrazing].GrazeToResidual(1000)
              1978-08-09  [SimpleGrazing].GrazeToResidual(1000)
              1978-08-23  [SimpleGrazing].GrazeToResidual(1000)
              1978-09-06  [SimpleGrazing].GrazeToResidual(1000)
              1978-09-20  [SimpleGrazing].GrazeToResidual(1000)
              1978-10-04  [SimpleGrazing].GrazeToResidual(1000)
              1978-10-18  [SimpleGrazing].GrazeToResidual(1000)
              1978-11-01  [SimpleGrazing].GrazeToResidual(1000)
              1978-11-15  [SimpleGrazing].GrazeToResidual(1000)
              1978-11-30  [SimpleGrazing].GrazeToResidual(1000)
              1978-12-14  [SimpleGrazing].GrazeToResidual(1000)
              1978-12-28  [SimpleGrazing].GrazeToResidual(1000)
              1979-01-11  [SimpleGrazing].GrazeToResidual(1000)
              1979-01-25  [SimpleGrazing].GrazeToResidual(1000)
              1979-02-08  [SimpleGrazing].GrazeToResidual(1000)
              1979-02-22  [SimpleGrazing].GrazeToResidual(1000)
              1979-03-08  [SimpleGrazing].GrazeToResidual(1000)
              1979-03-22  [SimpleGrazing].GrazeToResidual(1000)
              1979-04-05  [SimpleGrazing].GrazeToResidual(1000)
              1979-04-19  [SimpleGrazing].GrazeToResidual(1000)
              1979-05-03  [SimpleGrazing].GrazeToResidual(1000)
              1979-05-17  [SimpleGrazing].GrazeToResidual(1000)
              1979-05-31  [SimpleGrazing].GrazeToResidual(1000)
              1979-06-14  [SimpleGrazing].GrazeToResidual(1000)
              1979-06-28  [SimpleGrazing].GrazeToResidual(1000)
              1979-07-12  [SimpleGrazing].GrazeToResidual(1000)
              1979-07-26  [SimpleGrazing].GrazeToResidual(1000)
              1979-08-09  [SimpleGrazing].GrazeToResidual(1000)
              1979-08-23  [SimpleGrazing].GrazeToResidual(1000)
              1979-09-06  [SimpleGrazing].GrazeToResidual(1000)
              1979-09-20  [SimpleGrazing].GrazeToResidual(1000)
              1979-10-04  [SimpleGrazing].GrazeToResidual(1000)
              1979-10-18  [SimpleGrazing].GrazeToResidual(1000)
              1979-11-01  [SimpleGrazing].GrazeToResidual(1000)
              1979-11-15  [SimpleGrazing].GrazeToResidual(1000)
              1979-11-30  [SimpleGrazing].GrazeToResidual(1000)
              1979-12-14  [SimpleGrazing].GrazeToResidual(1000)
              1979-12-28  [SimpleGrazing].GrazeToResidual(1000)
              1980-01-11  [SimpleGrazing].GrazeToResidual(1000)
              1980-01-25  [SimpleGrazing].GrazeToResidual(1000)
              1980-02-08  [SimpleGrazing].GrazeToResidual(1000)
              1980-02-22  [SimpleGrazing].GrazeToResidual(1000)
              1980-03-08  [SimpleGrazing].GrazeToResidual(1000)
              1980-03-22  [SimpleGrazing].GrazeToResidual(1000)
              1980-04-05  [SimpleGrazing].GrazeToResidual(1000)
              1980-04-19  [SimpleGrazing].GrazeToResidual(1000)
              1980-05-03  [SimpleGrazing].GrazeToResidual(1000)
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            Soil Masterton: SoilType=Humic Nitisol (NTu); Country=New Zealand; Latitude=-37.767; Longitude=175.3
              DataSource=Romero, C.C., Hoogenboom, G., Baigorria, G.A., Koo, J., Gijsman, A.J., Wood, S., 2012. Reanalysis of a global soil database for crop and environmental modeling. Environmental Modelling & Software 35, 163-170.  https://harvestchoice.wufoo.com/forms/download-wisol.
              Comments=Some values (e.g. soil-crop parameters) have been modified based on expected local soil conditions and/or root distribution
              Physical
                Thickness  BD   AirDry  LL15  DUL   SAT
                150        1.3  0.11    0.15  0.35  0.5
                150        1.3  0.11    0.15  0.35  0.5
                300        1.3  0.11    0.15  0.35  0.5
                400        1.3  0.09    0.12  0.28  0.45
                200        1.3  0.09    0.12  0.3   0.45
                300        1.3  0.09    0.12  0.3   0.45
                300        1.3  0.09    0.12  0.3   0.45
                200        1.3  0.09    0.12  0.3   0.45
                SoilCrop AGPRyegrassSoil: LL=[0.15, 0.15, 0.15, 0.12, 0.12, 0.12, 0.12, 0.12]; KL=[0.125, 0.1, 0.035, 0.01, 0, 0, 0, 0]; XF=[1, 1, 1, 1, 1, 1, 1, 1]
                SoilCrop AGPWhiteCloverSoil: LL=[0.15, 0.15, 0.15, 0.12, 0.12, 0.12, 0.12, 0.12]; KL=[0.115, 0.08, 0.007, 0, 0, 0, 0, 0]; XF=[1, 1, 1, 1, 1, 1, 1, 1]
                SoilCrop AGPPaspalumSoil: LL=[0.15, 0.15, 0.15, 0.12, 0.12, 0.12, 0.12, 0.12]; KL=[0.105, 0.09, 0.045, 0.02, 0.01, 0, 0, 0]; XF=[1, 1, 1, 1, 1, 1, 1, 1]
              WaterBalance SoilWater: SummerDate=1-Nov; SummerU=10.4; SummerCona=3; WinterDate=1-Apr; WinterU=10.4; WinterCona=3; DiffusConst=0; DiffusSlope=0; Salb=0.13; CN2Bare=83; CNRed=0; CNCov=0; Thickness=[150, 150, 300, 400, 200, 300, 300, 200]; SWCON=[0.4, 0.4, 0.5, 0.6, 0.6, 0.6, 0.6, 0.6]
              Organic: FOMCNRatio=40
                Thickness  Carbon      SoilCNRatio  FBiom       FInert      FOM
                150        4.7         10.8         0.0610103   0.600742    0
                150        4.7         10.8         0.0307392   0.74542179  0
                300        0.60823079  10.8         0.0153764   0.87037987  0
                400        0.22482454  10.8         0.01065838  0.954641    0
                200        0.202252    10.8         0.0101088   0.981558    0
                300        0.200305    10.8         0.0100243   0.991289    0
                300        0.200028    10.8         0.010004    0.996458    0
                200        0.200004    10.8         0.0100009   0.998327    0
              Chemical
                Thickness  NO3N    NH4N   PH
                150        14.652  0.855  6
                150        14.652  0.855  6
                300        7.326   0.855  6
                400        7.326   0.855  6
                200        7.326   0.855  6
                300        7.326   0.855  6
                300        7.326   0.855  5.3
                200        1       0.2    5.3
              Nutrient
              CERESSoilTemperature Temperature
              InitialWater Initial Water: PercentMethod=0; FractionFull=0.56; RelativeTo=LL15
          CompositeFactor MonaBush
            Specifications:
              [Clock].StartDate=1976-06-01
              [Clock].EndDate=1982-06-01
              [Weather]
              [ClimateController]
              [Soil]
              [Cutting]
            Weather: FileName=VCS_Invercargill.met
            Manager ClimateController
              AllowControl = True
              EnableDate = 01/01/1976 00:00:00
              WithinYearControl = False
              ControlStart =
              ControlEnd =
              RainfallMultiplier = 1.01
              RainfallAddition = 0
              RadiationMultiplier = 1
              RadiationAddition = 0
              MinTMultiplier = 1
              MinTAddition = 0
              MaxTMultiplier = 1
              MaxTAddition = 0
              WindMultiplier = 1
              WindAddition = 0
              VPMultiplier = 1
              VPAddition = 0
              script: same as in Validation.Radcliffe.Factors.Location.Ahaura.ClimateController
            Operations Cutting
              1976-06-14  [SimpleGrazing].GrazeToResidual(1000)
              1976-06-28  [SimpleGrazing].GrazeToResidual(1000)
              1976-07-12  [SimpleGrazing].GrazeToResidual(1000)
              1976-07-26  [SimpleGrazing].GrazeToResidual(1000)
              1976-08-09  [SimpleGrazing].GrazeToResidual(1000)
              1976-08-23  [SimpleGrazing].GrazeToResidual(1000)
              1976-09-06  [SimpleGrazing].GrazeToResidual(1000)
              1976-09-20  [SimpleGrazing].GrazeToResidual(1000)
              1976-10-04  [SimpleGrazing].GrazeToResidual(1000)
              1976-10-18  [SimpleGrazing].GrazeToResidual(1000)
              1976-11-01  [SimpleGrazing].GrazeToResidual(1000)
              1976-11-15  [SimpleGrazing].GrazeToResidual(1000)
              1976-11-30  [SimpleGrazing].GrazeToResidual(1000)
              1976-12-14  [SimpleGrazing].GrazeToResidual(1000)
              1976-12-28  [SimpleGrazing].GrazeToResidual(1000)
              1977-01-11  [SimpleGrazing].GrazeToResidual(1000)
              1977-01-25  [SimpleGrazing].GrazeToResidual(1000)
              1977-02-08  [SimpleGrazing].GrazeToResidual(1000)
              1977-02-22  [SimpleGrazing].GrazeToResidual(1000)
              1977-03-08  [SimpleGrazing].GrazeToResidual(1000)
              1977-03-22  [SimpleGrazing].GrazeToResidual(1000)
              1977-04-05  [SimpleGrazing].GrazeToResidual(1000)
              1977-04-19  [SimpleGrazing].GrazeToResidual(1000)
              1977-05-03  [SimpleGrazing].GrazeToResidual(1000)
              1977-05-17  [SimpleGrazing].GrazeToResidual(1000)
              1977-05-31  [SimpleGrazing].GrazeToResidual(1000)
              1977-06-14  [SimpleGrazing].GrazeToResidual(1000)
              1977-06-28  [SimpleGrazing].GrazeToResidual(1000)
              1977-07-12  [SimpleGrazing].GrazeToResidual(1000)
              1977-07-26  [SimpleGrazing].GrazeToResidual(1000)
              1977-08-09  [SimpleGrazing].GrazeToResidual(1000)
              1977-08-23  [SimpleGrazing].GrazeToResidual(1000)
              1977-09-06  [SimpleGrazing].GrazeToResidual(1000)
              1977-09-20  [SimpleGrazing].GrazeToResidual(1000)
              1977-10-04  [SimpleGrazing].GrazeToResidual(1000)
              1977-10-18  [SimpleGrazing].GrazeToResidual(1000)
              1977-11-01  [SimpleGrazing].GrazeToResidual(1000)
              1977-11-15  [SimpleGrazing].GrazeToResidual(1000)
              1977-11-30  [SimpleGrazing].GrazeToResidual(1000)
              1977-12-14  [SimpleGrazing].GrazeToResidual(1000)
              1977-12-28  [SimpleGrazing].GrazeToResidual(1000)
              1978-01-11  [SimpleGrazing].GrazeToResidual(1000)
              1978-01-25  [SimpleGrazing].GrazeToResidual(1000)
              1978-02-08  [SimpleGrazing].GrazeToResidual(1000)
              1978-02-22  [SimpleGrazing].GrazeToResidual(1000)
              1978-03-08  [SimpleGrazing].GrazeToResidual(1000)
              1978-03-22  [SimpleGrazing].GrazeToResidual(1000)
              1978-04-05  [SimpleGrazing].GrazeToResidual(1000)
              1978-04-19  [SimpleGrazing].GrazeToResidual(1000)
              1978-05-03  [SimpleGrazing].GrazeToResidual(1000)
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            Soil MonaBush: SoilType=Eutric Gleysol (GLe); Country=New Zealand; Latitude=-43.3; Longitude=172.367
              DataSource=Romero, C.C., Hoogenboom, G., Baigorria, G.A., Koo, J., Gijsman, A.J., Wood, S., 2012. Reanalysis of a global soil database for crop and environmental modeling. Environmental Modelling & Software 35, 163-170.  https://harvestchoice.wufoo.com/forms/download-wisol.
              Comments=Some values (e.g. soil-crop parameters) have been modified based on expected local soil conditions and/or root distribution
              Physical
                Thickness  BD   AirDry  LL15  DUL   SAT
                150        1.3  0.11    0.15  0.4   0.48
                150        1.3  0.11    0.15  0.38  0.48
                300        1.3  0.11    0.15  0.35  0.48
                300        1.3  0.09    0.12  0.35  0.48
                300        1.3  0.09    0.12  0.3   0.4
                300        1.3  0.09    0.12  0.3   0.4
                300        1.3  0.09    0.12  0.3   0.4
                200        1.3  0.09    0.12  0.3   0.4
                SoilCrop AGPRyegrassSoil: LL=[0.15, 0.15, 0.15, 0.12, 0.12, 0.12, 0.12, 0.12]; KL=[0.125, 0.1, 0.035, 0.01, 0.003, 0, 0, 0]; XF=[1, 1, 1, 1, 1, 1, 1, 1]
                SoilCrop AGPWhiteCloverSoil: LL=[0.15, 0.15, 0.15, 0.12, 0.12, 0.12, 0.12, 0.12]; KL=[0.115, 0.08, 0.007, 0, 0, 0, 0, 0]; XF=[1, 1, 1, 1, 1, 1, 1, 1]
                SoilCrop AGPPaspalumSoil: LL=[0.15, 0.15, 0.15, 0.12, 0.12, 0.12, 0.12, 0.12]; KL=[0.105, 0.09, 0.045, 0.021, 0.01, 0, 0, 0]; XF=[1, 1, 1, 1, 1, 1, 1, 1]
              WaterBalance SoilWater: SummerDate=1-Nov; SummerU=9.76; SummerCona=3; WinterDate=1-Apr; WinterU=9.76; WinterCona=3; DiffusConst=0; DiffusSlope=0; Salb=0.13; CN2Bare=73; CNRed=0; CNCov=0; Thickness=[150, 150, 300, 300, 300, 300, 300, 200]; SWCON=[0.4, 0.4, 0.5, 0.5, 0.5, 0.5, 0.5, 0.5]
              Organic: FOMCNRatio=40
                Thickness  Carbon    SoilCNRatio  FBiom     FInert    FOM
                150        4.7       13.68        0.06101   0.6007    0
                150        4.7       13.68        0.030739  0.7454    0
                300        0.608     13.68        0.01537   0.87038   0
                300        0.2248    13.68        0.01065   0.9546    0
                300        0.20225   13.68        0.010109  0.98155   0
                300        0.200305  13.68        0.01      0.991289  0
                300        0.2       13.68        0.01      0.996458  0
                200        0.2       13.68        0.01      0.99832   0
              Chemical: same as Validation.Radcliffe.Factors.Location.Arrowtown.Arrowtown.Chemical
              Nutrient
              CERESSoilTemperature Temperature
              InitialWater Initial Water: PercentMethod=0; FractionFull=0.56; RelativeTo=LL15
          CompositeFactor Motueka
            Specifications:
              [Clock].StartDate=1978-06-01
              [Clock].EndDate=1983-06-01
              [Weather]
              [ClimateController]
              [Soil]
              [Cutting]
            Weather: FileName=VCS_Motueka.met
            Manager ClimateController
              AllowControl = True
              EnableDate = 01/01/1978 00:00:00
              WithinYearControl = False
              ControlStart =
              ControlEnd =
              RainfallMultiplier = 0.88
              RainfallAddition = 0
              RadiationMultiplier = 1
              RadiationAddition = 0
              MinTMultiplier = 1
              MinTAddition = 0
              MaxTMultiplier = 1
              MaxTAddition = 0
              WindMultiplier = 1
              WindAddition = 0
              VPMultiplier = 1
              VPAddition = 0
              script: same as in Validation.Radcliffe.Factors.Location.Ahaura.ClimateController
            Operations Cutting: same as Validation.Radcliffe.Factors.Location.Masterton.Cutting
            Soil Motueka: SoilType=Haplic Podzol (PZh); Country=New Zealand; Latitude=-41.65; Longitude=172.667
              DataSource=Romero, C.C., Hoogenboom, G., Baigorria, G.A., Koo, J., Gijsman, A.J., Wood, S., 2012. Reanalysis of a global soil database for crop and environmental modeling. Environmental Modelling & Software 35, 163-170.  https://harvestchoice.wufoo.com/forms/download-wisol.
              Comments=Some values (e.g. soil-crop parameters) have been modified based on expected local soil conditions and/or root distribution
              Physical
                Thickness  BD   AirDry  LL15  DUL   SAT
                150        1.3  0.12    0.15  0.35  0.45
                150        1.3  0.12    0.15  0.35  0.45
                300        1.3  0.12    0.15  0.35  0.45
                300        1.3  0.04    0.06  0.13  0.45
                300        1.3  0.04    0.06  0.13  0.45
                300        1.3  0.04    0.06  0.13  0.45
                300        1.3  0.04    0.06  0.13  0.45
                200        1.3  0.04    0.06  0.13  0.45
                SoilCrop AGPRyegrassSoil: LL=[0.15, 0.15, 0.15, 0.06, 0.06, 0.06, 0.06, 0.06]; KL=[0.125, 0.1, 0.035, 0.01, 0.003, 0, 0, 0]; XF=[1, 1, 1, 1, 1, 1, 1, 1]
                SoilCrop AGPWhiteCloverSoil: LL=[0.15, 0.15, 0.15, 0.06, 0.06, 0.06, 0.06, 0.06]; KL=[0.115, 0.08, 0.007, 0, 0, 0, 0, 0]; XF=[1, 1, 1, 1, 1, 1, 1, 1]
                SoilCrop AGPPaspalumSoil: LL=[0.15, 0.15, 0.15, 0.06, 0.06, 0.06, 0.06, 0.06]; KL=[0.105, 0.09, 0.045, 0.021, 0.01, 0, 0, 0]; XF=[1, 1, 1, 1, 1, 1, 1, 1]
              WaterBalance SoilWater: SummerDate=1-Nov; SummerU=8.08; SummerCona=3; WinterDate=1-Apr; WinterU=8.08; WinterCona=3; DiffusConst=0; DiffusSlope=0; Salb=0.14; CN2Bare=83; CNRed=0; CNCov=0; Thickness=[150, 150, 300, 300, 300, 300, 300, 200]; SWCON=[0.4, 0.4, 0.6, 0.6, 0.6, 0.5, 0.5, 0.5]
              Organic: same as Validation.Radcliffe.Factors.Location.Hamilton.Hamilton.Organic
              Chemical
                Thickness  NO3N    NH4N   PH
                150        14.652  0.855  6
                150        14.652  0.855  6
                300        7.326   0.855  6
                300        7.326   0.855  6
                300        7.326   0.855  6
                300        7.326   0.855  6
                300        7.326   0.855  6
                200        1       0.2    5
              Nutrient
              CERESSoilTemperature Temperature
              InitialWater Initial Water: PercentMethod=0; FractionFull=0.56; RelativeTo=LL15
          CompositeFactor Palmerston
            Specifications:
              [Clock].StartDate=1978-06-01
              [Clock].EndDate=1984-06-01
              [Weather]
              [ClimateController]
              [Soil]
              [Cutting]
            Weather: FileName=VCS_Palmerston.met
            Manager ClimateController
              AllowControl = True
              EnableDate = 01/01/1978 00:00:00
              WithinYearControl = False
              ControlStart =
              ControlEnd =
              RainfallMultiplier = 1.09
              RainfallAddition = 0
              RadiationMultiplier = 1
              RadiationAddition = 0
              MinTMultiplier = 1
              MinTAddition = 0
              MaxTMultiplier = 1
              MaxTAddition = 0
              WindMultiplier = 1
              WindAddition = 0
              VPMultiplier = 1
              VPAddition = 0
              script: same as in Validation.Radcliffe.Factors.Location.Ahaura.ClimateController
            Operations Cutting
              1978-06-14  [SimpleGrazing].GrazeToResidual(1000)
              1978-06-28  [SimpleGrazing].GrazeToResidual(1000)
              1978-07-12  [SimpleGrazing].GrazeToResidual(1000)
              1978-07-26  [SimpleGrazing].GrazeToResidual(1000)
              1978-08-09  [SimpleGrazing].GrazeToResidual(1000)
              1978-08-23  [SimpleGrazing].GrazeToResidual(1000)
              1978-09-06  [SimpleGrazing].GrazeToResidual(1000)
              1978-09-20  [SimpleGrazing].GrazeToResidual(1000)
              1978-10-04  [SimpleGrazing].GrazeToResidual(1000)
              1978-10-18  [SimpleGrazing].GrazeToResidual(1000)
              1978-11-01  [SimpleGrazing].GrazeToResidual(1000)
              1978-11-15  [SimpleGrazing].GrazeToResidual(1000)
              1978-11-30  [SimpleGrazing].GrazeToResidual(1000)
              1978-12-14  [SimpleGrazing].GrazeToResidual(1000)
              1978-12-28  [SimpleGrazing].GrazeToResidual(1000)
              1979-01-11  [SimpleGrazing].GrazeToResidual(1000)
              1979-01-25  [SimpleGrazing].GrazeToResidual(1000)
              1979-02-08  [SimpleGrazing].GrazeToResidual(1000)
              1979-02-22  [SimpleGrazing].GrazeToResidual(1000)
              1979-03-08  [SimpleGrazing].GrazeToResidual(1000)
              1979-03-22  [SimpleGrazing].GrazeToResidual(1000)
              1979-04-05  [SimpleGrazing].GrazeToResidual(1000)
              1979-04-19  [SimpleGrazing].GrazeToResidual(1000)
              1979-05-03  [SimpleGrazing].GrazeToResidual(1000)
              1979-05-17  [SimpleGrazing].GrazeToResidual(1000)
              1979-05-31  [SimpleGrazing].GrazeToResidual(1000)
              1979-06-14  [SimpleGrazing].GrazeToResidual(1000)
              1979-06-28  [SimpleGrazing].GrazeToResidual(1000)
              1979-07-12  [SimpleGrazing].GrazeToResidual(1000)
              1979-07-26  [SimpleGrazing].GrazeToResidual(1000)
              1979-08-09  [SimpleGrazing].GrazeToResidual(1000)
              1979-08-23  [SimpleGrazing].GrazeToResidual(1000)
              1979-09-06  [SimpleGrazing].GrazeToResidual(1000)
              1979-09-20  [SimpleGrazing].GrazeToResidual(1000)
              1979-10-04  [SimpleGrazing].GrazeToResidual(1000)
              1979-10-18  [SimpleGrazing].GrazeToResidual(1000)
              1979-11-01  [SimpleGrazing].GrazeToResidual(1000)
              1979-11-15  [SimpleGrazing].GrazeToResidual(1000)
              1979-11-30  [SimpleGrazing].GrazeToResidual(1000)
              1979-12-14  [SimpleGrazing].GrazeToResidual(1000)
              1979-12-28  [SimpleGrazing].GrazeToResidual(1000)
              1980-01-11  [SimpleGrazing].GrazeToResidual(1000)
              1980-01-25  [SimpleGrazing].GrazeToResidual(1000)
              1980-02-08  [SimpleGrazing].GrazeToResidual(1000)
              1980-02-22  [SimpleGrazing].GrazeToResidual(1000)
              1980-03-08  [SimpleGrazing].GrazeToResidual(1000)
              1980-03-22  [SimpleGrazing].GrazeToResidual(1000)
              1980-04-05  [SimpleGrazing].GrazeToResidual(1000)
              1980-04-19  [SimpleGrazing].GrazeToResidual(1000)
              1980-05-03  [SimpleGrazing].GrazeToResidual(1000)
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            Soil Palmerston: SoilType=Umbric Andosol (ANu); Country=New Zealand; Latitude=-37.967; Longitude=175.767
              DataSource=Romero, C.C., Hoogenboom, G., Baigorria, G.A., Koo, J., Gijsman, A.J., Wood, S., 2012. Reanalysis of a global soil database for crop and environmental modeling. Environmental Modelling & Software 35, 163-170.  https://harvestchoice.wufoo.com/forms/download-wisol.
              Comments=Some values (e.g. soil-crop parameters) have been modified based on expected local soil conditions and/or root distribution
              Physical
                Thickness  BD   AirDry  LL15  DUL   SAT
                150        1.3  0.09    0.12  0.28  0.45
                150        1.3  0.09    0.12  0.28  0.45
                300        1.3  0.09    0.12  0.28  0.45
                400        1.3  0.09    0.12  0.28  0.45
                200        1.3  0.08    0.1   0.24  0.45
                300        1.3  0.08    0.1   0.24  0.45
                300        1.3  0.08    0.1   0.24  0.45
                200        1.3  0.08    0.1   0.24  0.45
                SoilCrop AGPRyegrassSoil: LL=[0.12, 0.12, 0.12, 0.12, 0.1, 0.1, 0.1, 0.1]; KL=[0.125, 0.1, 0.035, 0.01, 0, 0, 0, 0]; XF=[1, 1, 1, 1, 1, 1, 1, 1]
                SoilCrop AGPWhiteCloverSoil: LL=[0.12, 0.12, 0.12, 0.12, 0.1, 0.1, 0.1, 0.1]; KL=[0.115, 0.08, 0.007, 0, 0, 0, 0, 0]; XF=[1, 1, 1, 1, 1, 1, 1, 1]
                SoilCrop AGPPaspalumSoil: LL=[0.12, 0.12, 0.12, 0.12, 0.1, 0.1, 0.1, 0.1]; KL=[0.105, 0.09, 0.045, 0.02, 0.01, 0, 0, 0]; XF=[1, 1, 1, 1, 1, 1, 1, 1]
              WaterBalance SoilWater: SummerDate=1-Nov; SummerU=9.12; SummerCona=3; WinterDate=1-Apr; WinterU=9.12; WinterCona=3; DiffusConst=0; DiffusSlope=0; Salb=0.13; CN2Bare=73; CNRed=0; CNCov=0; Thickness=[150, 150, 300, 400, 200, 300, 300, 200]; SWCON=[0.4, 0.4, 0.6, 0.6, 0.7, 0.7, 0.7, 0.7]
              Organic: FOMCNRatio=40
                Thickness  Carbon      SoilCNRatio  FBiom       FInert      FOM
                150        4.7         11.01        0.0610103   0.600742    0
                150        4.7         11.01        0.0307392   0.74542179  0
                300        0.60823079  11.01        0.0153764   0.87037987  0
                400        0.22482454  11.01        0.01065838  0.954641    0
                200        0.202252    11.01        0.0101088   0.981558    0
                300        0.200305    11.01        0.0100243   0.991289    0
                300        0.200028    11.01        0.010004    0.996458    0
                200        0.200004    11.01        0.0100009   0.998327    0
              Chemical: same as Validation.Radcliffe.Factors.Location.Ahaura.Ahaura.Chemical
              Nutrient
              CERESSoilTemperature Temperature
              InitialWater Initial Water: PercentMethod=0; FractionFull=0.56; RelativeTo=LL15
          CompositeFactor PoolburnD
            Specifications:
              [Clock].StartDate=1981-06-01
              [Clock].EndDate=1991-06-01
              [Weather]
              [ClimateController]
              [Soil]
              [Cutting]
            Weather: FileName=VCS_Poolburn.met
            Manager ClimateController
              AllowControl = True
              EnableDate = 01/01/1981 00:00:00
              WithinYearControl = False
              ControlStart =
              ControlEnd =
              RainfallMultiplier = 0.75
              RainfallAddition = 0
              RadiationMultiplier = 1
              RadiationAddition = 0
              MinTMultiplier = 1
              MinTAddition = 0
              MaxTMultiplier = 1
              MaxTAddition = 0
              WindMultiplier = 1
              WindAddition = 0
              VPMultiplier = 1
              VPAddition = 0
              script: same as in Validation.Radcliffe.Factors.Location.Ahaura.ClimateController
            Operations Cutting
              1981-06-14  [SimpleGrazing].GrazeToResidual(1000)
              1981-06-28  [SimpleGrazing].GrazeToResidual(1000)
              1981-07-12  [SimpleGrazing].GrazeToResidual(1000)
              1981-07-26  [SimpleGrazing].GrazeToResidual(1000)
              1981-08-09  [SimpleGrazing].GrazeToResidual(1000)
              1981-08-23  [SimpleGrazing].GrazeToResidual(1000)
              1981-09-06  [SimpleGrazing].GrazeToResidual(1000)
              1981-09-20  [SimpleGrazing].GrazeToResidual(1000)
              1981-10-04  [SimpleGrazing].GrazeToResidual(1000)
              1981-10-18  [SimpleGrazing].GrazeToResidual(1000)
              1981-11-01  [SimpleGrazing].GrazeToResidual(1000)
              1981-11-15  [SimpleGrazing].GrazeToResidual(1000)
              1981-11-30  [SimpleGrazing].GrazeToResidual(1000)
              1981-12-14  [SimpleGrazing].GrazeToResidual(1000)
              1981-12-28  [SimpleGrazing].GrazeToResidual(1000)
              1982-01-11  [SimpleGrazing].GrazeToResidual(1000)
              1982-01-25  [SimpleGrazing].GrazeToResidual(1000)
              1982-02-08  [SimpleGrazing].GrazeToResidual(1000)
              1982-02-22  [SimpleGrazing].GrazeToResidual(1000)
              1982-03-08  [SimpleGrazing].GrazeToResidual(1000)
              1982-03-22  [SimpleGrazing].GrazeToResidual(1000)
              1982-04-05  [SimpleGrazing].GrazeToResidual(1000)
              1982-04-19  [SimpleGrazing].GrazeToResidual(1000)
              1982-05-03  [SimpleGrazing].GrazeToResidual(1000)
              1982-05-17  [SimpleGrazing].GrazeToResidual(1000)
              1982-05-31  [SimpleGrazing].GrazeToResidual(1000)
              1982-06-14  [SimpleGrazing].GrazeToResidual(1000)
              1982-06-28  [SimpleGrazing].GrazeToResidual(1000)
              1982-07-12  [SimpleGrazing].GrazeToResidual(1000)
              1982-07-26  [SimpleGrazing].GrazeToResidual(1000)
              1982-08-09  [SimpleGrazing].GrazeToResidual(1000)
              1982-08-23  [SimpleGrazing].GrazeToResidual(1000)
              1982-09-06  [SimpleGrazing].GrazeToResidual(1000)
              1982-09-20  [SimpleGrazing].GrazeToResidual(1000)
              1982-10-04  [SimpleGrazing].GrazeToResidual(1000)
              1982-10-18  [SimpleGrazing].GrazeToResidual(1000)
              1982-11-01  [SimpleGrazing].GrazeToResidual(1000)
              1982-11-15  [SimpleGrazing].GrazeToResidual(1000)
              1982-11-30  [SimpleGrazing].GrazeToResidual(1000)
              1982-12-14  [SimpleGrazing].GrazeToResidual(1000)
              1982-12-28  [SimpleGrazing].GrazeToResidual(1000)
              1983-01-11  [SimpleGrazing].GrazeToResidual(1000)
              1983-01-25  [SimpleGrazing].GrazeToResidual(1000)
              1983-02-08  [SimpleGrazing].GrazeToResidual(1000)
              1983-02-22  [SimpleGrazing].GrazeToResidual(1000)
              1983-03-08  [SimpleGrazing].GrazeToResidual(1000)
              1983-03-22  [SimpleGrazing].GrazeToResidual(1000)
              1983-04-05  [SimpleGrazing].GrazeToResidual(1000)
              1983-04-19  [SimpleGrazing].GrazeToResidual(1000)
              1983-05-03  [SimpleGrazing].GrazeToResidual(1000)
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            Soil PoolburnD: SoilType=Umbric Andosol (ANu); Country=New Zealand; Latitude=-37.967; Longitude=175.767
              DataSource=Romero, C.C., Hoogenboom, G., Baigorria, G.A., Koo, J., Gijsman, A.J., Wood, S., 2012. Reanalysis of a global soil database for crop and environmental modeling. Environmental Modelling & Software 35, 163-170.  https://harvestchoice.wufoo.com/forms/download-wisol.
              Comments=Some values (e.g. soil-crop parameters) have been modified based on expected local soil conditions and/or root distribution
              Physical
                Thickness  BD    AirDry  LL15   DUL    SAT
                150        1.25  0.027   0.054  0.258  0.475
                150        1.4   0.066   0.073  0.207  0.425
                300        1.41  0.088   0.088  0.184  0.425
                300        1.56  0.091   0.091  0.178  0.366
                300        1.56  0.091   0.091  0.173  0.366
                300        1.56  0.091   0.091  0.173  0.366
                300        1.56  0.091   0.091  0.173  0.366
                200        1.56  0.091   0.091  0.173  0.366
                SoilCrop AGPRyegrassSoil: LL=[0.054, 0.073, 0.088, 0.091, 0.091, 0.091, 0.091, 0.091]; KL=[0.125, 0.1, 0.035, 0.01, 0.003, 0, 0, 0]; XF=[1, 1, 1, 1, 1, 0, 0, 0]
                SoilCrop AGPWhiteCloverSoil: LL=[0.054, 0.073, 0.088, 0.091, 0.091, 0.091, 0.091, 0.091]; KL=[0.115, 0.08, 0.007, 0, 0, 0, 0, 0]; XF=[1, 1, 1, 1, 1, 0, 0, 0]
                SoilCrop AGPPaspalumSoil: LL=[0.054, 0.073, 0.088, 0.091, 0.091, 0.091, 0.091, 0.091]; KL=[0.105, 0.09, 0.045, 0.021, 0.01, 0, 0, 0]; XF=[1, 1, 1, 1, 1, 0, 0, 0]
              WaterBalance SoilWater: SummerDate=1-Nov; SummerU=9.12; SummerCona=3; WinterDate=1-Apr; WinterU=9.12; WinterCona=3; DiffusConst=0; DiffusSlope=0; Salb=0.13; CN2Bare=73; CNRed=0; CNCov=0; Thickness=[150, 150, 300, 300, 300, 300, 300, 200]; SWCON=[0.4, 0.4, 0.7, 0.7, 0.7, 0.7, 0.7, 0.7]
              Organic: same as Validation.Radcliffe.Factors.Location.Cromwell.Cromwell.Organic
              Chemical: same as Validation.Radcliffe.Factors.Location.Cromwell.Cromwell.Chemical
              Nutrient
              CERESSoilTemperature Temperature
              InitialWater Initial Water: PercentMethod=0; FractionFull=0.56; RelativeTo=LL15
          CompositeFactor PoolburnI
            Specifications:
              [Clock].StartDate=1978-06-01
              [Clock].EndDate=1991-06-01
              [Weather]
              [ClimateController]
              [Soil]
              [AutomaticIrrigation]
              [Cutting]
            Weather: FileName=VCS_Poolburn.met
            Manager ClimateController
              AllowControl = True
              EnableDate = 01/01/1978 00:00:00
              WithinYearControl = False
              ControlStart =
              ControlEnd =
              RainfallMultiplier = 0.75
              RainfallAddition = 0
              RadiationMultiplier = 1
              RadiationAddition = 0
              MinTMultiplier = 1
              MinTAddition = 0
              MaxTMultiplier = 1
              MaxTAddition = 0
              WindMultiplier = 1
              WindAddition = 0
              VPMultiplier = 1
              VPAddition = 0
              script: same as in Validation.Radcliffe.Factors.Location.Ahaura.ClimateController
            Manager AutomaticIrrigation
              allowIrrigation = True
              seasonStart = 01-Nov
              seasonEnd = 15-Feb
              seasonsAllocation = 100000
              triggerDeficit = 25
              targetDeficit = 95
              returndays = 3
              maximumAmount = 20
              depthPAWC = 350
              script: same as in Validation.Radcliffe.Factors.Location.Cromwell.AutomaticIrrigation
            Operations Cutting
              1978-06-14  [SimpleGrazing].GrazeToResidual(1000)
              1978-06-28  [SimpleGrazing].GrazeToResidual(1000)
              1978-07-12  [SimpleGrazing].GrazeToResidual(1000)
              1978-07-26  [SimpleGrazing].GrazeToResidual(1000)
              1978-08-09  [SimpleGrazing].GrazeToResidual(1000)
              1978-08-23  [SimpleGrazing].GrazeToResidual(1000)
              1978-09-06  [SimpleGrazing].GrazeToResidual(1000)
              1978-09-20  [SimpleGrazing].GrazeToResidual(1000)
              1978-10-04  [SimpleGrazing].GrazeToResidual(1000)
              1978-10-18  [SimpleGrazing].GrazeToResidual(1000)
              1978-11-01  [SimpleGrazing].GrazeToResidual(1000)
              1978-11-15  [SimpleGrazing].GrazeToResidual(1000)
              1978-11-30  [SimpleGrazing].GrazeToResidual(1000)
              1978-12-14  [SimpleGrazing].GrazeToResidual(1000)
              1978-12-28  [SimpleGrazing].GrazeToResidual(1000)
              1979-01-11  [SimpleGrazing].GrazeToResidual(1000)
              1979-01-25  [SimpleGrazing].GrazeToResidual(1000)
              1979-02-08  [SimpleGrazing].GrazeToResidual(1000)
              1979-02-22  [SimpleGrazing].GrazeToResidual(1000)
              1979-03-08  [SimpleGrazing].GrazeToResidual(1000)
              1979-03-22  [SimpleGrazing].GrazeToResidual(1000)
              1979-04-05  [SimpleGrazing].GrazeToResidual(1000)
              1979-04-19  [SimpleGrazing].GrazeToResidual(1000)
              1979-05-03  [SimpleGrazing].GrazeToResidual(1000)
              1979-05-17  [SimpleGrazing].GrazeToResidual(1000)
              1979-05-31  [SimpleGrazing].GrazeToResidual(1000)
              1979-06-14  [SimpleGrazing].GrazeToResidual(1000)
              1979-06-28  [SimpleGrazing].GrazeToResidual(1000)
              1979-07-12  [SimpleGrazing].GrazeToResidual(1000)
              1979-07-26  [SimpleGrazing].GrazeToResidual(1000)
              1979-08-09  [SimpleGrazing].GrazeToResidual(1000)
              1979-08-23  [SimpleGrazing].GrazeToResidual(1000)
              1979-09-06  [SimpleGrazing].GrazeToResidual(1000)
              1979-09-20  [SimpleGrazing].GrazeToResidual(1000)
              1979-10-04  [SimpleGrazing].GrazeToResidual(1000)
              1979-10-18  [SimpleGrazing].GrazeToResidual(1000)
              1979-11-01  [SimpleGrazing].GrazeToResidual(1000)
              1979-11-15  [SimpleGrazing].GrazeToResidual(1000)
              1979-11-30  [SimpleGrazing].GrazeToResidual(1000)
              1979-12-14  [SimpleGrazing].GrazeToResidual(1000)
              1979-12-28  [SimpleGrazing].GrazeToResidual(1000)
              1980-01-11  [SimpleGrazing].GrazeToResidual(1000)
              1980-01-25  [SimpleGrazing].GrazeToResidual(1000)
              1980-02-08  [SimpleGrazing].GrazeToResidual(1000)
              1980-02-22  [SimpleGrazing].GrazeToResidual(1000)
              1980-03-08  [SimpleGrazing].GrazeToResidual(1000)
              1980-03-22  [SimpleGrazing].GrazeToResidual(1000)
              1980-04-05  [SimpleGrazing].GrazeToResidual(1000)
              1980-04-19  [SimpleGrazing].GrazeToResidual(1000)
              1980-05-03  [SimpleGrazing].GrazeToResidual(1000)
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            Soil Poolburn: SoilType=Umbric Andosol (ANu); Country=New Zealand; Latitude=-37.967; Longitude=175.767
              DataSource=Romero, C.C., Hoogenboom, G., Baigorria, G.A., Koo, J., Gijsman, A.J., Wood, S., 2012. Reanalysis of a global soil database for crop and environmental modeling. Environmental Modelling & Software 35, 163-170.  https://harvestchoice.wufoo.com/forms/download-wisol.
              Comments=Some values (e.g. soil-crop parameters) have been modified based on expected local soil conditions and/or root distribution
              Physical
                Thickness  BD     AirDry  LL15   DUL    SAT
                150        1.37   0.033   0.066  0.255  0.419
                150        1.455  0.048   0.06   0.253  0.431
                300        1.63   0.04    0.04   0.18   0.36
                300        1.7    0.077   0.077  0.18   0.308
                300        1.7    0.077   0.077  0.16   0.308
                300        1.7    0.077   0.077  0.16   0.308
                300        1.7    0.077   0.077  0.16   0.308
                200        1.7    0.077   0.077  0.16   0.308
                SoilCrop AGPRyegrassSoil: LL=[0.066, 0.06, 0.04, 0.077, 0.077, 0.077, 0.077, 0.077]; KL=[0.125, 0.1, 0.035, 0.01, 0.003, 0, 0, 0]; XF=[1, 1, 1, 1, 0, 0, 0, 0]
                SoilCrop AGPWhiteCloverSoil: LL=[0.066, 0.06, 0.04, 0.077, 0.077, 0.077, 0.077, 0.077]; KL=[0.115, 0.08, 0.007, 0, 0, 0, 0, 0]; XF=[1, 1, 1, 1, 0, 0, 0, 0]
                SoilCrop AGPPaspalumSoil: LL=[0.066, 0.06, 0.04, 0.077, 0.077, 0.077, 0.077, 0.077]; KL=[0.105, 0.09, 0.045, 0.021, 0.01, 0, 0, 0]; XF=[1, 1, 1, 1, 1, 0, 0, 0]
              WaterBalance SoilWater: SummerDate=1-Nov; SummerU=9.12; SummerCona=3; WinterDate=1-Apr; WinterU=9.12; WinterCona=3; DiffusConst=0; DiffusSlope=0; Salb=0.13; CN2Bare=73; CNRed=0; CNCov=0; Thickness=[150, 150, 300, 300, 300, 300, 300, 200]; SWCON=[0.4, 0.4, 0.6, 0.7, 0.7, 0.7, 0.7, 0.7]
              Organic: same as Validation.Radcliffe.Factors.Location.Cromwell.Cromwell.Organic
              Chemical: same as Validation.Radcliffe.Factors.Location.Cromwell.Cromwell.Chemical
              Nutrient
              CERESSoilTemperature Temperature
              InitialWater Initial Water: PercentMethod=0; FractionFull=0.56; RelativeTo=LL15
          CompositeFactor Ranui
            Specifications:
              [Clock].StartDate=1980-06-01
              [Clock].EndDate=1987-06-01
              [Weather]
              [ClimateController]
              [Soil]
              [Cutting]
            Weather: FileName=VCS_Ranui.met
            Manager ClimateController
              AllowControl = True
              EnableDate = 01/01/1980 00:00:00
              WithinYearControl = False
              ControlStart =
              ControlEnd =
              RainfallMultiplier = 0.75
              RainfallAddition = 0
              RadiationMultiplier = 1
              RadiationAddition = 0
              MinTMultiplier = 1
              MinTAddition = 0
              MaxTMultiplier = 1
              MaxTAddition = 0
              WindMultiplier = 1
              WindAddition = 0
              VPMultiplier = 1
              VPAddition = 0
              script: same as in Validation.Radcliffe.Factors.Location.Ahaura.ClimateController
            Operations Cutting
              1980-06-14  [SimpleGrazing].GrazeToResidual(1000)
              1980-06-28  [SimpleGrazing].GrazeToResidual(1000)
              1980-07-12  [SimpleGrazing].GrazeToResidual(1000)
              1980-07-26  [SimpleGrazing].GrazeToResidual(1000)
              1980-08-09  [SimpleGrazing].GrazeToResidual(1000)
              1980-08-23  [SimpleGrazing].GrazeToResidual(1000)
              1980-09-06  [SimpleGrazing].GrazeToResidual(1000)
              1980-09-20  [SimpleGrazing].GrazeToResidual(1000)
              1980-10-04  [SimpleGrazing].GrazeToResidual(1000)
              1980-10-18  [SimpleGrazing].GrazeToResidual(1000)
              1980-11-01  [SimpleGrazing].GrazeToResidual(1000)
              1980-11-15  [SimpleGrazing].GrazeToResidual(1000)
              1980-11-30  [SimpleGrazing].GrazeToResidual(1000)
              1980-12-14  [SimpleGrazing].GrazeToResidual(1000)
              1980-12-28  [SimpleGrazing].GrazeToResidual(1000)
              1981-01-11  [SimpleGrazing].GrazeToResidual(1000)
              1981-01-25  [SimpleGrazing].GrazeToResidual(1000)
              1981-02-08  [SimpleGrazing].GrazeToResidual(1000)
              1981-02-22  [SimpleGrazing].GrazeToResidual(1000)
              1981-03-08  [SimpleGrazing].GrazeToResidual(1000)
              1981-03-22  [SimpleGrazing].GrazeToResidual(1000)
              1981-04-05  [SimpleGrazing].GrazeToResidual(1000)
              1981-04-19  [SimpleGrazing].GrazeToResidual(1000)
              1981-05-03  [SimpleGrazing].GrazeToResidual(1000)
              1981-05-17  [SimpleGrazing].GrazeToResidual(1000)
              1981-05-31  [SimpleGrazing].GrazeToResidual(1000)
              1981-06-14  [SimpleGrazing].GrazeToResidual(1000)
              1981-06-28  [SimpleGrazing].GrazeToResidual(1000)
              1981-07-12  [SimpleGrazing].GrazeToResidual(1000)
              1981-07-26  [SimpleGrazing].GrazeToResidual(1000)
              1981-08-09  [SimpleGrazing].GrazeToResidual(1000)
              1981-08-23  [SimpleGrazing].GrazeToResidual(1000)
              1981-09-06  [SimpleGrazing].GrazeToResidual(1000)
              1981-09-20  [SimpleGrazing].GrazeToResidual(1000)
              1981-10-04  [SimpleGrazing].GrazeToResidual(1000)
              1981-10-18  [SimpleGrazing].GrazeToResidual(1000)
              1981-11-01  [SimpleGrazing].GrazeToResidual(1000)
              1981-11-15  [SimpleGrazing].GrazeToResidual(1000)
              1981-11-30  [SimpleGrazing].GrazeToResidual(1000)
              1981-12-14  [SimpleGrazing].GrazeToResidual(1000)
              1981-12-28  [SimpleGrazing].GrazeToResidual(1000)
              1982-01-11  [SimpleGrazing].GrazeToResidual(1000)
              1982-01-25  [SimpleGrazing].GrazeToResidual(1000)
              1982-02-08  [SimpleGrazing].GrazeToResidual(1000)
              1982-02-22  [SimpleGrazing].GrazeToResidual(1000)
              1982-03-08  [SimpleGrazing].GrazeToResidual(1000)
              1982-03-22  [SimpleGrazing].GrazeToResidual(1000)
              1982-04-05  [SimpleGrazing].GrazeToResidual(1000)
              1982-04-19  [SimpleGrazing].GrazeToResidual(1000)
              1982-05-03  [SimpleGrazing].GrazeToResidual(1000)
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            Soil Ranui: SoilType=Haplic Podzol (PZh); Country=New Zealand; Latitude=-41.65; Longitude=172.667
              DataSource=Romero, C.C., Hoogenboom, G., Baigorria, G.A., Koo, J., Gijsman, A.J., Wood, S., 2012. Reanalysis of a global soil database for crop and environmental modeling. Environmental Modelling & Software 35, 163-170.  https://harvestchoice.wufoo.com/forms/download-wisol.
              Comments=Some values (e.g. soil-crop parameters) have been modified based on expected local soil conditions and/or root distribution
              Physical
                Thickness  BD   AirDry  LL15   DUL   SAT
                150        1.3  0.12    0.15   0.33  0.45
                150        1.3  0.12    0.15   0.3   0.45
                300        1.3  0.12    0.135  0.25  0.35
                400        1.3  0.03    0.04   0.1   0.14
                200        1.3  0.03    0.04   0.1   0.14
                300        1.3  0.03    0.04   0.1   0.14
                300        1.3  0.03    0.04   0.1   0.14
                200        1.3  0.03    0.04   0.1   0.14
                SoilCrop AGPRyegrassSoil: LL=[0.15, 0.15, 0.135, 0.04, 0.04, 0.04, 0.04, 0.04]; KL=[0.125, 0.1, 0.035, 0.01, 0, 0, 0, 0]; XF=[1, 1, 1, 1, 0, 0, 0, 0]
                SoilCrop AGPWhiteCloverSoil: LL=[0.15, 0.15, 0.135, 0.04, 0.04, 0.04, 0.04, 0.04]; KL=[0.115, 0.08, 0.007, 0, 0, 0, 0, 0]; XF=[1, 1, 1, 1, 1, 1, 1, 1]
                SoilCrop AGPPaspalumSoil: LL=[0.15, 0.15, 0.135, 0.04, 0.04, 0.04, 0.04, 0.04]; KL=[0.105, 0.09, 0.045, 0.02, 0.01, 0, 0, 0]; XF=[1, 1, 1, 1, 0, 0, 0, 0]
              WaterBalance SoilWater: SummerDate=1-Nov; SummerU=8.08; SummerCona=3; WinterDate=1-Apr; WinterU=8.08; WinterCona=3; DiffusConst=0; DiffusSlope=0; Salb=0.14; CN2Bare=83; CNRed=0; CNCov=0; Thickness=[150, 150, 300, 400, 200, 300, 300, 200]; SWCON=[0.5, 0.5, 0.4, 0.3, 0.3, 0.3, 0.3, 0.3]
              Organic: same as Validation.Radcliffe.Factors.Location.Hindon.Hindon.Organic
              Chemical: same as Validation.Radcliffe.Factors.Location.InvermayHillSite.InvermayHill.Chemical
              Nutrient
              CERESSoilTemperature Temperature
              InitialWater Initial Water: PercentMethod=0; FractionFull=0.56; RelativeTo=LL15
          CompositeFactor Ruakura
            Specifications:
              [Clock].StartDate=1982-07-15
              [Clock].EndDate=1993-01-01
              [Weather]
              [ClimateController]
              [Soil]
              [Cutting]
            Weather: FileName=Ruakura.met
            Manager ClimateController
              AllowControl = False
              EnableDate = 01/01/1982 00:00:00
              WithinYearControl = False
              ControlStart =
              ControlEnd =
              RainfallMultiplier = 0
              RainfallAddition = 1.1
              RadiationMultiplier = 0
              RadiationAddition = 0
              MinTMultiplier = 0
              MinTAddition = 0
              MaxTMultiplier = 0
              MaxTAddition = 0
              WindMultiplier = 0
              WindAddition = 0
              VPMultiplier = 0
              VPAddition = 0
              script: same as in Validation.Radcliffe.Factors.Location.Ahaura.ClimateController
            Operations Cutting
              1982-07-15  [SimpleGrazing].GrazeToResidual(1000)
              1982-08-12  [SimpleGrazing].GrazeToResidual(1000)
              1982-09-09  [SimpleGrazing].GrazeToResidual(1000)
              1982-10-07  [SimpleGrazing].GrazeToResidual(1000)
              1982-11-04  [SimpleGrazing].GrazeToResidual(1000)
              1982-12-02  [SimpleGrazing].GrazeToResidual(1000)
              1982-12-30  [SimpleGrazing].GrazeToResidual(1000)
              1983-01-27  [SimpleGrazing].GrazeToResidual(1000)
              1983-02-24  [SimpleGrazing].GrazeToResidual(1000)
              1983-03-24  [SimpleGrazing].GrazeToResidual(1000)
              1983-04-21  [SimpleGrazing].GrazeToResidual(1000)
              1983-05-19  [SimpleGrazing].GrazeToResidual(1000)
              1983-06-16  [SimpleGrazing].GrazeToResidual(1000)
              1983-07-14  [SimpleGrazing].GrazeToResidual(1000)
              1983-08-11  [SimpleGrazing].GrazeToResidual(1000)
              1983-09-08  [SimpleGrazing].GrazeToResidual(1000)
              1983-10-06  [SimpleGrazing].GrazeToResidual(1000)
              1983-11-03  [SimpleGrazing].GrazeToResidual(1000)
              1983-12-01  [SimpleGrazing].GrazeToResidual(1000)
              1983-12-29  [SimpleGrazing].GrazeToResidual(1000)
              1984-01-26  [SimpleGrazing].GrazeToResidual(1000)
              1984-02-23  [SimpleGrazing].GrazeToResidual(1000)
              1984-03-22  [SimpleGrazing].GrazeToResidual(1000)
              1984-04-19  [SimpleGrazing].GrazeToResidual(1000)
              1984-05-17  [SimpleGrazing].GrazeToResidual(1000)
              1984-06-14  [SimpleGrazing].GrazeToResidual(1000)
              1984-07-12  [SimpleGrazing].GrazeToResidual(1000)
              1984-08-09  [SimpleGrazing].GrazeToResidual(1000)
              1984-09-06  [SimpleGrazing].GrazeToResidual(1000)
              1984-10-04  [SimpleGrazing].GrazeToResidual(1000)
              1984-11-01  [SimpleGrazing].GrazeToResidual(1000)
              1984-11-29  [SimpleGrazing].GrazeToResidual(1000)
              1984-12-27  [SimpleGrazing].GrazeToResidual(1000)
              1985-01-24  [SimpleGrazing].GrazeToResidual(1000)
              1985-02-21  [SimpleGrazing].GrazeToResidual(1000)
              1985-03-21  [SimpleGrazing].GrazeToResidual(1000)
              1985-04-18  [SimpleGrazing].GrazeToResidual(1000)
              1985-05-16  [SimpleGrazing].GrazeToResidual(1000)
              1985-06-13  [SimpleGrazing].GrazeToResidual(1000)
              1985-07-11  [SimpleGrazing].GrazeToResidual(1000)
              1985-08-08  [SimpleGrazing].GrazeToResidual(1000)
              1985-09-05  [SimpleGrazing].GrazeToResidual(1000)
              1985-10-03  [SimpleGrazing].GrazeToResidual(1000)
              1985-10-31  [SimpleGrazing].GrazeToResidual(1000)
              1985-11-28  [SimpleGrazing].GrazeToResidual(1000)
              1985-12-26  [SimpleGrazing].GrazeToResidual(1000)
              1986-01-23  [SimpleGrazing].GrazeToResidual(1000)
              1986-02-20  [SimpleGrazing].GrazeToResidual(1000)
              1986-03-20  [SimpleGrazing].GrazeToResidual(1000)
              1986-04-17  [SimpleGrazing].GrazeToResidual(1000)
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            Soil SoilRuakura: SoilType=Black Vertosol; Site=Dalby; NearestTown=Dalby, Q 4405; Region=Darling Downs; State=Queensland; ApsoilNumber=27; Latitude=-27.12; Longitude=151.305; LocationAccuracy=+/-20m; DataSource=CSIRO Sustainable Ecosystems, Toowoomba
              Comments=This was just copied from the original simulation done in the older APSIM
              Physical
                Thickness  BD    AirDry  LL15  DUL   SAT
                100        1.25  0.1     0.14  0.35  0.48
                200        1.31  0.1     0.14  0.35  0.48
                300        1.23  0.1     0.14  0.32  0.48
                300        1.24  0.1     0.14  0.32  0.48
                300        1.25  0.1     0.14  0.2   0.45
                300        1.26  0.1     0.14  0.2   0.45
                300        1.29  0.1     0.14  0.2   0.45
                SoilCrop AGPRyegrassSoil: LL=[0.14, 0.14, 0.14, 0.14, 0.14, 0.14, 0.14]; KL=[0.125, 0.1, 0.035, 0.01, 0.003, 0, 0]; XF=[1, 1, 1, 1, 1, 0, 0]
                SoilCrop AGPWhiteCloverSoil: LL=[0.14, 0.14, 0.14, 0.14, 0.14, 0.14, 0.14]; KL=[0.115, 0.08, 0.007, 0, 0, 0, 0]; XF=[1, 1, 1, 1, 1, 0, 0]
                SoilCrop AGPPaspalumSoil: LL=[0.14, 0.14, 0.14, 0.14, 0.14, 0.14, 0.14]; KL=[0.105, 0.09, 0.045, 0.021, 0.01, 0, 0]; XF=[1, 1, 1, 1, 1, 0, 0]
              WaterBalance SoilWater: SummerDate=1-Nov; SummerU=6; SummerCona=3.5; WinterDate=1-apr; WinterU=2; WinterCona=2; DiffusConst=88; DiffusSlope=35; Salb=0.13; CN2Bare=73; CNRed=20; CNCov=0.8; DischargeWidth=0; CatchmentArea=0
                Thickness  SWCON  KLAT
                100        0.3    0
                200        0.4    0
                300        0.4    0
                300        0.4    0
                300        0.4    0
                300        0.4    0
                300        0.4    0
              Organic: FOMCNRatio=40
                Thickness  Carbon  SoilCNRatio  FBiom  FInert  FOM
                100        8.2     12.5         0.08   0.58    366.247
                200        5.5     12.5         0.02   0.7     262.428
                300        1.7     12.5         0.01   0.9     159.17
                300        1.7     12.5         0.01   0.9     96.5418
                300        1.23    12.5         0.01   0       58.5555
                300        0.82    12.5         0.01   0       35.5157
                300        0.82    12.5         0.01   0       21.5414
              Chemical
                Thickness  NO3N     NH4N   PH
                100        7.619    0.132  6
                200        7.35725  0.132  6
                300        3.871    0.132  6
                300        3.84     0.132  6
                300        3.81     0.132  6
                300        3.779    0.132  6
                300        3.691    0.132  6
              Nutrient
              CERESSoilTemperature Temperature
              InitialWater Initial water: PercentMethod=0; FractionFull=0.93
          CompositeFactor SouthKaipara
            Specifications:
              [Clock].StartDate=1974-06-01
              [Clock].EndDate=1983-06-01
              [Weather]
              [ClimateController]
              [Soil]
              [Cutting]
            Weather: FileName=VCS_Kaipara.met
            Manager ClimateController
              AllowControl = True
              EnableDate = 01/01/1974 00:00:00
              WithinYearControl = False
              ControlStart =
              ControlEnd =
              RainfallMultiplier = 1.05
              RainfallAddition = 0
              RadiationMultiplier = 1
              RadiationAddition = 0
              MinTMultiplier = 1
              MinTAddition = 0
              MaxTMultiplier = 1
              MaxTAddition = 0
              WindMultiplier = 1
              WindAddition = 0
              VPMultiplier = 1
              VPAddition = 0
              script: same as in Validation.Radcliffe.Factors.Location.Ahaura.ClimateController
            Operations Cutting
              1974-06-14  [SimpleGrazing].GrazeToResidual(1000)
              1974-06-28  [SimpleGrazing].GrazeToResidual(1000)
              1974-07-12  [SimpleGrazing].GrazeToResidual(1000)
              1974-07-26  [SimpleGrazing].GrazeToResidual(1000)
              1974-08-09  [SimpleGrazing].GrazeToResidual(1000)
              1974-08-23  [SimpleGrazing].GrazeToResidual(1000)
              1974-09-06  [SimpleGrazing].GrazeToResidual(1000)
              1974-09-20  [SimpleGrazing].GrazeToResidual(1000)
              1974-10-04  [SimpleGrazing].GrazeToResidual(1000)
              1974-10-18  [SimpleGrazing].GrazeToResidual(1000)
              1974-11-01  [SimpleGrazing].GrazeToResidual(1000)
              1974-11-15  [SimpleGrazing].GrazeToResidual(1000)
              1974-11-30  [SimpleGrazing].GrazeToResidual(1000)
              1974-12-14  [SimpleGrazing].GrazeToResidual(1000)
              1974-12-28  [SimpleGrazing].GrazeToResidual(1000)
              1975-01-11  [SimpleGrazing].GrazeToResidual(1000)
              1975-01-25  [SimpleGrazing].GrazeToResidual(1000)
              1975-02-08  [SimpleGrazing].GrazeToResidual(1000)
              1975-02-22  [SimpleGrazing].GrazeToResidual(1000)
              1975-03-08  [SimpleGrazing].GrazeToResidual(1000)
              1975-03-22  [SimpleGrazing].GrazeToResidual(1000)
              1975-04-05  [SimpleGrazing].GrazeToResidual(1000)
              1975-04-19  [SimpleGrazing].GrazeToResidual(1000)
              1975-05-03  [SimpleGrazing].GrazeToResidual(1000)
              1975-05-17  [SimpleGrazing].GrazeToResidual(1000)
              1975-05-31  [SimpleGrazing].GrazeToResidual(1000)
              1975-06-14  [SimpleGrazing].GrazeToResidual(1000)
              1975-06-28  [SimpleGrazing].GrazeToResidual(1000)
              1975-07-12  [SimpleGrazing].GrazeToResidual(1000)
              1975-07-26  [SimpleGrazing].GrazeToResidual(1000)
              1975-08-09  [SimpleGrazing].GrazeToResidual(1000)
              1975-08-23  [SimpleGrazing].GrazeToResidual(1000)
              1975-09-06  [SimpleGrazing].GrazeToResidual(1000)
              1975-09-20  [SimpleGrazing].GrazeToResidual(1000)
              1975-10-04  [SimpleGrazing].GrazeToResidual(1000)
              1975-10-18  [SimpleGrazing].GrazeToResidual(1000)
              1975-11-01  [SimpleGrazing].GrazeToResidual(1000)
              1975-11-15  [SimpleGrazing].GrazeToResidual(1000)
              1975-11-30  [SimpleGrazing].GrazeToResidual(1000)
              1975-12-14  [SimpleGrazing].GrazeToResidual(1000)
              1975-12-28  [SimpleGrazing].GrazeToResidual(1000)
              1976-01-11  [SimpleGrazing].GrazeToResidual(1000)
              1976-01-25  [SimpleGrazing].GrazeToResidual(1000)
              1976-02-08  [SimpleGrazing].GrazeToResidual(1000)
              1976-02-22  [SimpleGrazing].GrazeToResidual(1000)
              1976-03-08  [SimpleGrazing].GrazeToResidual(1000)
              1976-03-22  [SimpleGrazing].GrazeToResidual(1000)
              1976-04-05  [SimpleGrazing].GrazeToResidual(1000)
              1976-04-19  [SimpleGrazing].GrazeToResidual(1000)
              1976-05-03  [SimpleGrazing].GrazeToResidual(1000)
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            Soil SouthKaipara: SoilType=Umbric Andosol (ANu); Country=New Zealand; Latitude=-38.617; Longitude=176.117
              DataSource=Romero, C.C., Hoogenboom, G., Baigorria, G.A., Koo, J., Gijsman, A.J., Wood, S., 2012. Reanalysis of a global soil database for crop and environmental modeling. Environmental Modelling & Software 35, 163-170.  https://harvestchoice.wufoo.com/forms/download-wisol.
              Comments=Some values (e.g. soil-crop parameters) have been modified based on expected local soil conditions and/or root distribution
              Physical
                Thickness  BD   AirDry  LL15  DUL   SAT
                150        1.3  0.18    0.22  0.32  0.48
                150        1.3  0.18    0.22  0.32  0.48
                300        1.3  0.16    0.22  0.3   0.48
                400        1.3  0.16    0.22  0.3   0.43
                SoilCrop AGPRyegrassSoil: LL=[0.22, 0.22, 0.22, 0.22]; KL=[0.125, 0.1, 0.035, 0.01]; XF=[1, 1, 1, 0.5]
                SoilCrop AGPWhiteCloverSoil: LL=[0.22, 0.22, 0.22, 0.22]; KL=[0.115, 0.08, 0.007, 0]; XF=[1, 1, 1, 0.5]
                SoilCrop AGPPaspalumSoil: LL=[0.22, 0.22, 0.22, 0.22]; KL=[0.105, 0.09, 0.045, 0.02]; XF=[1, 1, 1, 0.5]
              WaterBalance SoilWater: SummerDate=1-Nov; SummerU=8.24; SummerCona=3; WinterDate=1-Apr; WinterU=8.24; WinterCona=3; DiffusConst=0; DiffusSlope=0; Salb=0.13; CN2Bare=68; CNRed=0; CNCov=0; Thickness=[150, 150, 300, 400, -, 999999, 999999, 999999]; SWCON=[0.4, 0.4, 0.5, 0.3, -, -, -, -]
              Organic: same as Validation.Radcliffe.Factors.Location.Ahaura.Ahaura.Organic
              Chemical
                Thickness  NO3N    NH4N   PH
                150        14.652  0.855  8.2
                150        14.652  0.855  8.5
                300        7.326   0.855  8.6
                400        7.326   0.855  8.6
                200        7.326   0.855  7.4
                300        7.326   0.855  5.3
                300        7.326   0.855  5.3
                200        0.1     0.1    5.3
              Nutrient
              CERESSoilTemperature Temperature
              InitialWater Initial Water: PercentMethod=0; FractionFull=1; RelativeTo=LL15
          CompositeFactor Stratford
            Specifications:
              [Clock].StartDate=1973-06-01
              [Clock].EndDate=1981-06-01
              [Weather]
              [ClimateController]
              [Soil]
              [Cutting]
            Weather: FileName=VCS_Stratford.met
            Manager ClimateController
              AllowControl = True
              EnableDate = 01/01/1973 00:00:00
              WithinYearControl = False
              ControlStart =
              ControlEnd =
              RainfallMultiplier = 0.83
              RainfallAddition = 0
              RadiationMultiplier = 1
              RadiationAddition = 0
              MinTMultiplier = 1
              MinTAddition = 0
              MaxTMultiplier = 1
              MaxTAddition = 0
              WindMultiplier = 1
              WindAddition = 0
              VPMultiplier = 1
              VPAddition = 0
              script: same as in Validation.Radcliffe.Factors.Location.Ahaura.ClimateController
            Operations Cutting: same as Validation.Radcliffe.Factors.Location.Maraekakaho.Cutting
            Soil Stratford: SoilType=Haplic Podzol (PZh); Country=New Zealand; Latitude=-41.65; Longitude=172.667
              DataSource=Romero, C.C., Hoogenboom, G., Baigorria, G.A., Koo, J., Gijsman, A.J., Wood, S., 2012. Reanalysis of a global soil database for crop and environmental modeling. Environmental Modelling & Software 35, 163-170.  https://harvestchoice.wufoo.com/forms/download-wisol.
              Comments=Some values (e.g. soil-crop parameters) have been modified based on expected local soil conditions and/or root distribution
              Physical
                Thickness  BD   AirDry  LL15  DUL   SAT
                150        1.3  0.09    0.12  0.25  0.45
                150        1.3  0.09    0.12  0.25  0.45
                300        1.3  0.09    0.12  0.23  0.4
                300        1.3  0.09    0.12  0.23  0.4
                300        1.3  0.08    0.1   0.25  0.4
                300        1.3  0.08    0.1   0.25  0.4
                300        1.3  0.08    0.1   0.25  0.4
                200        1.3  0.08    0.1   0.25  0.4
                SoilCrop AGPRyegrassSoil: LL=[0.12, 0.12, 0.12, 0.12, 0.1, 0.1, 0.1, 0.1]; KL=[0.125, 0.1, 0.035, 0.01, 0.003, 0, 0, 0]; XF=[1, 1, 1, 1, 1, 1, 1, 1]
                SoilCrop AGPWhiteCloverSoil: LL=[0.12, 0.12, 0.12, 0.12, 0.1, 0.1, 0.1, 0.1]; KL=[0.115, 0.08, 0.007, 0, 0, 0, 0, 0]; XF=[1, 1, 1, 1, 1, 1, 1, 1]
                SoilCrop AGPPaspalumSoil: LL=[0.12, 0.12, 0.12, 0.12, 0.1, 0.1, 0.1, 0.1]; KL=[0.105, 0.09, 0.045, 0.021, 0.01, 0, 0, 0]; XF=[1, 1, 1, 1, 1, 1, 1, 1]
              WaterBalance SoilWater: SummerDate=1-Nov; SummerU=8.08; SummerCona=3; WinterDate=1-Apr; WinterU=8.08; WinterCona=3; DiffusConst=0; DiffusSlope=0; Salb=0.14; CN2Bare=83; CNRed=0; CNCov=0; Thickness=[150, 150, 300, 300, 300, 300, 300, 200]; SWCON=[0.4, 0.5, 0.8, 0.8, 0.8, 0.8, 0.8, 0.8]
              Organic: same as Validation.Radcliffe.Factors.Location.InvermayTaieriPlain.InvermayPlain.Organic
              Chemical
                Thickness  NO3N    NH4N   PH
                150        14.652  0.855  6
                150        14.652  0.855  6
                300        7.326   0.855  6
                300        7.326   0.855  6
                300        7.326   0.855  6
                300        7.326   0.855  5.3
                300        7.326   0.855  5.3
                200        0.1     0.1    5.3
              Nutrient
              CERESSoilTemperature Temperature
              InitialWater Initial Water: PercentMethod=0; FractionFull=0.56; RelativeTo=LL15
          CompositeFactor Waerengaokuri
            Specifications:
              [Clock].StartDate=1974-06-01
              [Clock].EndDate=1982-06-01
              [Weather]
              [ClimateController]
              [Soil]
              [Cutting]
            Weather: FileName=VCS_Waerengaokuri.met
            Manager ClimateController
              AllowControl = True
              EnableDate = 01/01/1974 00:00:00
              WithinYearControl = False
              ControlStart =
              ControlEnd =
              RainfallMultiplier = 1.19
              RainfallAddition = 0
              RadiationMultiplier = 1
              RadiationAddition = 0
              MinTMultiplier = 1
              MinTAddition = 0
              MaxTMultiplier = 1
              MaxTAddition = 0
              WindMultiplier = 1
              WindAddition = 0
              VPMultiplier = 1
              VPAddition = 0
              script: same as in Validation.Radcliffe.Factors.Location.Ahaura.ClimateController
            Operations Cutting
              1974-06-14  [SimpleGrazing].GrazeToResidual(1000)
              1974-06-28  [SimpleGrazing].GrazeToResidual(1000)
              1974-07-12  [SimpleGrazing].GrazeToResidual(1000)
              1974-07-26  [SimpleGrazing].GrazeToResidual(1000)
              1974-08-09  [SimpleGrazing].GrazeToResidual(1000)
              1974-08-23  [SimpleGrazing].GrazeToResidual(1000)
              1974-09-06  [SimpleGrazing].GrazeToResidual(1000)
              1974-09-20  [SimpleGrazing].GrazeToResidual(1000)
              1974-10-04  [SimpleGrazing].GrazeToResidual(1000)
              1974-10-18  [SimpleGrazing].GrazeToResidual(1000)
              1974-11-01  [SimpleGrazing].GrazeToResidual(1000)
              1974-11-15  [SimpleGrazing].GrazeToResidual(1000)
              1974-11-30  [SimpleGrazing].GrazeToResidual(1000)
              1974-12-14  [SimpleGrazing].GrazeToResidual(1000)
              1974-12-28  [SimpleGrazing].GrazeToResidual(1000)
              1975-01-11  [SimpleGrazing].GrazeToResidual(1000)
              1975-01-25  [SimpleGrazing].GrazeToResidual(1000)
              1975-02-08  [SimpleGrazing].GrazeToResidual(1000)
              1975-02-22  [SimpleGrazing].GrazeToResidual(1000)
              1975-03-08  [SimpleGrazing].GrazeToResidual(1000)
              1975-03-22  [SimpleGrazing].GrazeToResidual(1000)
              1975-04-05  [SimpleGrazing].GrazeToResidual(1000)
              1975-04-19  [SimpleGrazing].GrazeToResidual(1000)
              1975-05-03  [SimpleGrazing].GrazeToResidual(1000)
              1975-05-17  [SimpleGrazing].GrazeToResidual(1000)
              1975-05-31  [SimpleGrazing].GrazeToResidual(1000)
              1975-06-14  [SimpleGrazing].GrazeToResidual(1000)
              1975-06-28  [SimpleGrazing].GrazeToResidual(1000)
              1975-07-12  [SimpleGrazing].GrazeToResidual(1000)
              1975-07-26  [SimpleGrazing].GrazeToResidual(1000)
              1975-08-09  [SimpleGrazing].GrazeToResidual(1000)
              1975-08-23  [SimpleGrazing].GrazeToResidual(1000)
              1975-09-06  [SimpleGrazing].GrazeToResidual(1000)
              1975-09-20  [SimpleGrazing].GrazeToResidual(1000)
              1975-10-04  [SimpleGrazing].GrazeToResidual(1000)
              1975-10-18  [SimpleGrazing].GrazeToResidual(1000)
              1975-11-01  [SimpleGrazing].GrazeToResidual(1000)
              1975-11-15  [SimpleGrazing].GrazeToResidual(1000)
              1975-11-30  [SimpleGrazing].GrazeToResidual(1000)
              1975-12-14  [SimpleGrazing].GrazeToResidual(1000)
              1975-12-28  [SimpleGrazing].GrazeToResidual(1000)
              1976-01-11  [SimpleGrazing].GrazeToResidual(1000)
              1976-01-25  [SimpleGrazing].GrazeToResidual(1000)
              1976-02-08  [SimpleGrazing].GrazeToResidual(1000)
              1976-02-22  [SimpleGrazing].GrazeToResidual(1000)
              1976-03-08  [SimpleGrazing].GrazeToResidual(1000)
              1976-03-22  [SimpleGrazing].GrazeToResidual(1000)
              1976-04-05  [SimpleGrazing].GrazeToResidual(1000)
              1976-04-19  [SimpleGrazing].GrazeToResidual(1000)
              1976-05-03  [SimpleGrazing].GrazeToResidual(1000)
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            Soil Waerengaokuri: SoilType=Umbric Andosol (ANu); Country=New Zealand; Latitude=-37.967; Longitude=175.767
              DataSource=Romero, C.C., Hoogenboom, G., Baigorria, G.A., Koo, J., Gijsman, A.J., Wood, S., 2012. Reanalysis of a global soil database for crop and environmental modeling. Environmental Modelling & Software 35, 163-170.  https://harvestchoice.wufoo.com/forms/download-wisol.
              Comments=Some values (e.g. soil-crop parameters) have been modified based on expected local soil conditions and/or root distribution
              Physical
                Thickness  BD   AirDry  LL15  DUL   SAT
                150        1.3  0.09    0.12  0.2   0.45
                150        1.3  0.09    0.12  0.2   0.45
                300        1.3  0.09    0.12  0.2   0.45
                300        1.3  0.09    0.12  0.25  0.45
                300        1.3  0.08    0.1   0.24  0.45
                300        1.3  0.08    0.1   0.24  0.45
                300        1.3  0.08    0.1   0.24  0.45
                200        1.3  0.08    0.1   0.24  0.45
                SoilCrop AGPRyegrassSoil: LL=[0.12, 0.12, 0.12, 0.12, 0.1, 0.1, 0.1, 0.1]; KL=[0.125, 0.1, 0.035, 0.01, 0.003, 0, 0, 0]; XF=[1, 1, 1, 1, 1, 1, 1, 1]
                SoilCrop AGPWhiteCloverSoil: LL=[0.12, 0.12, 0.12, 0.12, 0.1, 0.1, 0.1, 0.1]; KL=[0.115, 0.08, 0.007, 0, 0, 0, 0, 0]; XF=[1, 1, 1, 1, 1, 1, 1, 1]
                SoilCrop AGPPaspalumSoil: LL=[0.12, 0.12, 0.12, 0.12, 0.1, 0.1, 0.1, 0.1]; KL=[0.105, 0.09, 0.045, 0.021, 0.01, 0, 0, 0]; XF=[1, 1, 1, 1, 1, 1, 1, 1]
              Nutrient
              Organic: FOMCNRatio=40
                Thickness  Carbon      SoilCNRatio  FBiom       FInert      FOM
                150        4.7         11.01        0.0610103   0.600742    0
                150        4.7         11.01        0.0307392   0.74542179  0
                300        0.60823079  11.01        0.0153764   0.87037987  0
                300        0.22482454  11.01        0.01065838  0.954641    0
                300        0.202252    11.01        0.0101088   0.981558    0
                300        0.200305    11.01        0.0100243   0.991289    0
                300        0.200028    11.01        0.010004    0.996458    0
                200        0.200004    11.01        0.0100009   0.998327    0
              Chemical: same as Validation.Radcliffe.Factors.Location.InvermayTaieriPlain.InvermayPlain.Chemical
              WaterBalance SoilWater: SummerDate=1-Nov; SummerU=9.12; SummerCona=3; WinterDate=1-Apr; WinterU=9.12; WinterCona=3; DiffusConst=0; DiffusSlope=0; Salb=0.13; CN2Bare=73; CNRed=0; CNCov=0; Thickness=[150, 150, 300, 300, 300, 300, 300, 200]; SWCON=[0.4, 0.5, 0.7, 0.7, 0.7, 0.7, 0.7, 0.7]
              CERESSoilTemperature Temperature
              InitialWater Initial Water: PercentMethod=0; FractionFull=0.56; RelativeTo=LL15
          CompositeFactor WaimateWest
            Specifications:
              [Clock].StartDate=1973-06-01
              [Clock].EndDate=1981-06-01
              [Weather]
              [ClimateController]
              [Soil]
              [Cutting]
            Weather: FileName=VCS_WaimateWest.met
            Manager ClimateController
              AllowControl = True
              EnableDate = 01/01/1973 00:00:00
              WithinYearControl = False
              ControlStart =
              ControlEnd =
              RainfallMultiplier = 0.95
              RainfallAddition = 0
              RadiationMultiplier = 1
              RadiationAddition = 0
              MinTMultiplier = 1
              MinTAddition = 0
              MaxTMultiplier = 1
              MaxTAddition = 0
              WindMultiplier = 1
              WindAddition = 0
              VPMultiplier = 1
              VPAddition = 0
              script: same as in Validation.Radcliffe.Factors.Location.Ahaura.ClimateController
            Operations Cutting: same as Validation.Radcliffe.Factors.Location.Maraekakaho.Cutting
            Soil Waimate: SoilType=Umbric Andosol (ANu); Country=New Zealand; Latitude=-37.967; Longitude=175.767
              DataSource=Romero, C.C., Hoogenboom, G., Baigorria, G.A., Koo, J., Gijsman, A.J., Wood, S., 2012. Reanalysis of a global soil database for crop and environmental modeling. Environmental Modelling & Software 35, 163-170.  https://harvestchoice.wufoo.com/forms/download-wisol.
              Comments=Some values (e.g. soil-crop parameters) have been modified based on expected local soil conditions and/or root distribution
              Physical
                Thickness  BD   AirDry  LL15  DUL   SAT
                150        1.3  0.09    0.12  0.3   0.5
                150        1.3  0.09    0.12  0.3   0.5
                300        1.3  0.09    0.1   0.28  0.45
                300        1.3  0.09    0.1   0.28  0.45
                300        1.3  0.08    0.1   0.24  0.45
                300        1.3  0.08    0.1   0.24  0.45
                300        1.3  0.08    0.1   0.24  0.45
                200        1.3  0.08    0.1   0.24  0.45
                SoilCrop AGPRyegrassSoil: LL=[0.12, 0.12, 0.1, 0.1, 0.1, 0.1, 0.1, 0.1]; KL=[0.125, 0.1, 0.035, 0.01, 0.003, 0, 0, 0]; XF=[1, 1, 1, 1, 1, 1, 1, 1]
                SoilCrop AGPWhiteCloverSoil: LL=[0.12, 0.12, 0.1, 0.1, 0.1, 0.1, 0.1, 0.1]; KL=[0.115, 0.08, 0.007, 0, 0, 0, 0, 0]; XF=[1, 1, 1, 1, 1, 1, 1, 1]
                SoilCrop AGPPaspalumSoil: LL=[0.12, 0.12, 0.1, 0.1, 0.1, 0.1, 0.1, 0.1]; KL=[0.105, 0.09, 0.045, 0.021, 0.01, 0, 0, 0]; XF=[1, 1, 1, 1, 1, 1, 1, 1]
              WaterBalance SoilWater: SummerDate=1-Nov; SummerU=9.12; SummerCona=3; WinterDate=1-Apr; WinterU=9.12; WinterCona=3; DiffusConst=0; DiffusSlope=0; Salb=0.13; CN2Bare=73; CNRed=0; CNCov=0; Thickness=[150, 150, 300, 300, 300, 300, 300, 200]; SWCON=[0.4, 0.4, 0.5, 0.6, 0.6, 0.6, 0.6, 0.6]
              Organic: same as Validation.Radcliffe.Factors.Location.Waerengaokuri.Waerengaokuri.Organic
              Chemical: same as Validation.Radcliffe.Factors.Location.InvermayTaieriPlain.InvermayPlain.Chemical
              Nutrient
              CERESSoilTemperature Temperature
              InitialWater Initial Water: PercentMethod=0; FractionFull=0.56; RelativeTo=LL15
          CompositeFactor WairakeiFlat
            Specifications:
              [Clock].StartDate=1974-06-01
              [Clock].EndDate=1981-06-01
              [Weather]
              [ClimateController]
              [Soil]
              [Cutting]
            Weather: FileName=VCS_Wairakei.met
            Manager ClimateController: same as Validation.Radcliffe.Factors.Location.Hamilton.ClimateController
            Operations Cutting
              1974-06-14  [SimpleGrazing].GrazeToResidual(1000)
              1974-06-28  [SimpleGrazing].GrazeToResidual(1000)
              1974-07-12  [SimpleGrazing].GrazeToResidual(1000)
              1974-07-26  [SimpleGrazing].GrazeToResidual(1000)
              1974-08-09  [SimpleGrazing].GrazeToResidual(1000)
              1974-08-23  [SimpleGrazing].GrazeToResidual(1000)
              1974-09-06  [SimpleGrazing].GrazeToResidual(1000)
              1974-09-20  [SimpleGrazing].GrazeToResidual(1000)
              1974-10-04  [SimpleGrazing].GrazeToResidual(1000)
              1974-10-18  [SimpleGrazing].GrazeToResidual(1000)
              1974-11-01  [SimpleGrazing].GrazeToResidual(1000)
              1974-11-15  [SimpleGrazing].GrazeToResidual(1000)
              1974-11-30  [SimpleGrazing].GrazeToResidual(1000)
              1974-12-14  [SimpleGrazing].GrazeToResidual(1000)
              1974-12-28  [SimpleGrazing].GrazeToResidual(1000)
              1975-01-11  [SimpleGrazing].GrazeToResidual(1000)
              1975-01-25  [SimpleGrazing].GrazeToResidual(1000)
              1975-02-08  [SimpleGrazing].GrazeToResidual(1000)
              1975-02-22  [SimpleGrazing].GrazeToResidual(1000)
              1975-03-08  [SimpleGrazing].GrazeToResidual(1000)
              1975-03-22  [SimpleGrazing].GrazeToResidual(1000)
              1975-04-05  [SimpleGrazing].GrazeToResidual(1000)
              1975-04-19  [SimpleGrazing].GrazeToResidual(1000)
              1975-05-03  [SimpleGrazing].GrazeToResidual(1000)
              1975-05-17  [SimpleGrazing].GrazeToResidual(1000)
              1975-06-14  [SimpleGrazing].GrazeToResidual(1000)
              1975-06-28  [SimpleGrazing].GrazeToResidual(1000)
              1975-07-12  [SimpleGrazing].GrazeToResidual(1000)
              1975-07-26  [SimpleGrazing].GrazeToResidual(1000)
              1975-08-09  [SimpleGrazing].GrazeToResidual(1000)
              1975-08-23  [SimpleGrazing].GrazeToResidual(1000)
              1975-09-06  [SimpleGrazing].GrazeToResidual(1000)
              1975-09-20  [SimpleGrazing].GrazeToResidual(1000)
              1975-10-04  [SimpleGrazing].GrazeToResidual(1000)
              1975-10-18  [SimpleGrazing].GrazeToResidual(1000)
              1975-11-01  [SimpleGrazing].GrazeToResidual(1000)
              1975-11-15  [SimpleGrazing].GrazeToResidual(1000)
              1975-11-30  [SimpleGrazing].GrazeToResidual(1000)
              1975-12-14  [SimpleGrazing].GrazeToResidual(1000)
              1975-12-28  [SimpleGrazing].GrazeToResidual(1000)
              1976-01-11  [SimpleGrazing].GrazeToResidual(1000)
              1976-01-25  [SimpleGrazing].GrazeToResidual(1000)
              1976-02-08  [SimpleGrazing].GrazeToResidual(1000)
              1976-02-22  [SimpleGrazing].GrazeToResidual(1000)
              1976-03-08  [SimpleGrazing].GrazeToResidual(1000)
              1976-03-22  [SimpleGrazing].GrazeToResidual(1000)
              1976-04-05  [SimpleGrazing].GrazeToResidual(1000)
              1976-04-19  [SimpleGrazing].GrazeToResidual(1000)
              1976-05-03  [SimpleGrazing].GrazeToResidual(1000)
              1976-05-17  [SimpleGrazing].GrazeToResidual(1000)
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            Soil WairakeiFlat: SoilType=Umbric Andosol (ANu); Country=New Zealand; Latitude=-38.617; Longitude=176.117
              DataSource=Romero, C.C., Hoogenboom, G., Baigorria, G.A., Koo, J., Gijsman, A.J., Wood, S., 2012. Reanalysis of a global soil database for crop and environmental modeling. Environmental Modelling & Software 35, 163-170.  https://harvestchoice.wufoo.com/forms/download-wisol.
              Comments=Some values (e.g. soil-crop parameters) have been modified based on expected local soil conditions and/or root distribution
              Physical
                Thickness  BD   AirDry  LL15  DUL    SAT
                150        1.3  0.08    0.1   0.2    0.4
                150        1.3  0.08    0.1   0.19   0.4
                300        1.3  0.08    0.1   0.155  0.4
                300        1.3  0.08    0.1   0.145  0.4
                300        1.3  0.08    0.1   0.145  0.4
                300        1.3  0.08    0.1   0.145  0.4
                300        1.3  0.08    0.1   0.147  0.4
                200        1.3  0.08    0.1   0.15   0.4
                SoilCrop AGPRyegrassSoil: LL=[0.1, 0.1, 0.1, 0.1, 0.1, 0.1, 0.1, 0.1]; KL=[0.125, 0.1, 0.035, 0.01, 0.003, 0, 0, 0]; XF=[1, 1, 1, 1, 1, 1, 1, 1]
                SoilCrop AGPWhiteCloverSoil: LL=[0.1, 0.1, 0.1, 0.1, 0.1, 0.1, 0.1, 0.1]; KL=[0.115, 0.08, 0.007, 0, 0, 0, 0, 0]; XF=[1, 1, 1, 1, 1, 1, 1, 1]
                SoilCrop AGPPaspalumSoil: LL=[0.1, 0.1, 0.1, 0.1, 0.1, 0.1, 0.1, 0.1]; KL=[0.105, 0.09, 0.045, 0.021, 0.01, 0, 0, 0]; XF=[1, 1, 1, 1, 1, 1, 1, 1]
              WaterBalance SoilWater: same as Validation.Radcliffe.Factors.Location.Cromwell.Cromwell.SoilWater
              Organic: FOMCNRatio=40
                Thickness  Carbon      SoilCNRatio  FBiom       FInert      FOM
                150        4.7         14.99        0.0610103   0.600742    0
                150        4.7         14.99        0.0307392   0.74542179  0
                300        0.60823079  14.99        0.0153764   0.87037987  0
                300        0.22482454  14.99        0.01065838  0.954641    0
                300        0.202252    14.99        0.0101088   0.981558    0
                300        0.200305    14.99        0.0100243   0.991289    0
                300        0.200028    14.99        0.010004    0.996458    0
                200        0.200004    14.99        0.0100009   0.998327    0
              Chemical: same as Validation.Radcliffe.Factors.Location.InvermayTaieriPlain.InvermayPlain.Chemical
              Nutrient
              CERESSoilTemperature Temperature
              InitialWater Initial Water: PercentMethod=0; FractionFull=0.56; RelativeTo=LL15
          CompositeFactor WairakeiHill
            Specifications:
              [Clock].StartDate=1974-06-01
              [Clock].EndDate=1981-06-01
              [Weather]
              [ClimateController]
              [Soil]
              [Cutting]
            Weather: FileName=VCS_Wairakei.met
            Manager ClimateController: same as Validation.Radcliffe.Factors.Location.Hamilton.ClimateController
            Operations Cutting: same as Validation.Radcliffe.Factors.Location.WairakeiFlat.Cutting
            Soil WairakeiHill: SoilType=Umbric Andosol (ANu); Country=New Zealand; Latitude=-38.617; Longitude=176.117
              DataSource=Romero, C.C., Hoogenboom, G., Baigorria, G.A., Koo, J., Gijsman, A.J., Wood, S., 2012. Reanalysis of a global soil database for crop and environmental modeling. Environmental Modelling & Software 35, 163-170.  https://harvestchoice.wufoo.com/forms/download-wisol.
              Comments=Some values (e.g. soil-crop parameters) have been modified based on expected local soil conditions and/or root distribution
              Physical
                Thickness  BD   AirDry  LL15  DUL    SAT
                150        1.3  0.08    0.1   0.2    0.4
                150        1.3  0.08    0.1   0.19   0.4
                300        1.3  0.08    0.1   0.185  0.4
                300        1.3  0.08    0.1   0.18   0.4
                300        1.3  0.08    0.1   0.18   0.4
                300        1.3  0.08    0.1   0.18   0.4
                300        1.3  0.08    0.1   0.18   0.4
                200        1.3  0.08    0.1   0.18   0.4
                SoilCrop AGPRyegrassSoil: LL=[0.1, 0.1, 0.1, 0.1, 0.1, 0.1, 0.1, 0.1]; KL=[0.125, 0.1, 0.035, 0.01, 0.003, 0, 0, 0]; XF=[1, 1, 1, 1, 1, 1, 1, 1]
                SoilCrop AGPWhiteCloverSoil: LL=[0.1, 0.1, 0.1, 0.1, 0.1, 0.1, 0.1, 0.1]; KL=[0.115, 0.08, 0.007, 0, 0, 0, 0, 0]; XF=[1, 1, 1, 1, 1, 1, 1, 1]
                SoilCrop AGPPaspalumSoil: LL=[0.1, 0.1, 0.1, 0.1, 0.1, 0.1, 0.1, 0.1]; KL=[0.105, 0.09, 0.045, 0.021, 0.01, 0, 0, 0]; XF=[1, 1, 1, 1, 1, 1, 1, 1]
              WaterBalance SoilWater: SummerDate=1-Nov; SummerU=8.24; SummerCona=3; WinterDate=1-Apr; WinterU=8.24; WinterCona=3; DiffusConst=0; DiffusSlope=0; Salb=0.13; CN2Bare=68; CNRed=0; CNCov=0; Thickness=[150, 150, 300, 300, 300, 300, 300, 200]; SWCON=[0.5, 0.5, 0.8, 0.8, 0.8, 0.8, 0.8, 0.8]
              Organic: same as Validation.Radcliffe.Factors.Location.WairakeiFlat.WairakeiFlat.Organic
              Chemical
                Thickness  NO3N    NH4N   PH
                150        14.652  0.855  8.2
                150        14.652  0.855  8.5
                300        7.326   0.855  8.6
                300        7.326   0.855  8.6
                300        7.326   0.855  7.4
                300        7.326   0.855  5.3
                300        7.326   0.855  5.3
                200        1       0.2    5.3
              Nutrient
              CERESSoilTemperature Temperature
              InitialWater Initial Water: PercentMethod=0; FractionFull=0.56; RelativeTo=LL15
          CompositeFactor Westport
            Specifications:
              [Clock].StartDate=1978-06-01
              [Clock].EndDate=1983-06-01
              [Weather]
              [ClimateController]
              [Soil]
              [Cutting]
            Weather: FileName=VCS_Westport.met
            Manager ClimateController
              AllowControl = True
              EnableDate = 01/01/1978 00:00:00
              WithinYearControl = False
              ControlStart =
              ControlEnd =
              RainfallMultiplier = 0.89
              RainfallAddition = 0
              RadiationMultiplier = 1
              RadiationAddition = 0
              MinTMultiplier = 1
              MinTAddition = 0
              MaxTMultiplier = 1
              MaxTAddition = 0
              WindMultiplier = 1
              WindAddition = 0
              VPMultiplier = 1
              VPAddition = 0
              script: same as in Validation.Radcliffe.Factors.Location.Ahaura.ClimateController
            Operations Cutting: same as Validation.Radcliffe.Factors.Location.Masterton.Cutting
            Soil Westport: SoilType=Umbric Andosol (ANu); Country=New Zealand; Latitude=-37.967; Longitude=175.767
              DataSource=Romero, C.C., Hoogenboom, G., Baigorria, G.A., Koo, J., Gijsman, A.J., Wood, S., 2012. Reanalysis of a global soil database for crop and environmental modeling. Environmental Modelling & Software 35, 163-170.  https://harvestchoice.wufoo.com/forms/download-wisol.
              Comments=Some values (e.g. soil-crop parameters) have been modified based on expected local soil conditions and/or root distribution
              Physical: same as Validation.Radcliffe.Factors.Location.Motueka.Motueka.Physical
              WaterBalance SoilWater: SummerDate=1-Nov; SummerU=9.12; SummerCona=3; WinterDate=1-Apr; WinterU=9.12; WinterCona=3; DiffusConst=0; DiffusSlope=0; Salb=0.13; CN2Bare=73; CNRed=0; CNCov=0; Thickness=[150, 150, 300, 300, 300, 300, 300, 200]; SWCON=[0.5, 0.5, 0.5, 0.5, 0.4, 0.3, 0.3, 0.3]
              Organic: same as Validation.Radcliffe.Factors.Location.Waerengaokuri.Waerengaokuri.Organic
              Chemical: same as Validation.Radcliffe.Factors.Location.Cromwell.Cromwell.Chemical
              Nutrient
              CERESSoilTemperature Temperature
              InitialWater Initial Water: PercentMethod=0; FractionFull=0.56; RelativeTo=LL15
          CompositeFactor WinchmoreDland
            Specifications:
              [Clock].StartDate=1966-01-01
              [Clock].EndDate=2003-12-01
              [Weather]
              [ClimateController]
              [Soil]
              [Cutting]
            Weather: FileName=WinchmoreMet.met
            Manager ClimateController
              AllowControl = False
              EnableDate = 01/01/1972 00:00:00
              WithinYearControl = False
              ControlStart =
              ControlEnd =
              RainfallMultiplier = 0
              RainfallAddition = 0
              RadiationMultiplier = 0
              RadiationAddition = 0
              MinTMultiplier = 0
              MinTAddition = 0
              MaxTMultiplier = 0
              MaxTAddition = 0
              WindMultiplier = 0
              WindAddition = 0
              VPMultiplier = 0
              VPAddition = 0
              script: same as in Validation.Radcliffe.Factors.Location.Ahaura.ClimateController
            Operations Cutting
              1966-09-02  [SimpleGrazing].GrazeToResidual(1000)
              1966-09-28  [SimpleGrazing].GrazeToResidual(1000)
              1966-10-21  [SimpleGrazing].GrazeToResidual(1000)
              1966-11-17  [SimpleGrazing].GrazeToResidual(1000)
              1966-12-15  [SimpleGrazing].GrazeToResidual(1000)
              1967-01-13  [SimpleGrazing].GrazeToResidual(1000)
              1967-02-10  [SimpleGrazing].GrazeToResidual(1000)
              1967-03-10  [SimpleGrazing].GrazeToResidual(1000)
              1967-04-11  [SimpleGrazing].GrazeToResidual(1000)
              1967-06-02  [SimpleGrazing].GrazeToResidual(1000)
              1967-09-13  [SimpleGrazing].GrazeToResidual(1000)
              1967-10-10  [SimpleGrazing].GrazeToResidual(1000)
              1967-11-07  [SimpleGrazing].GrazeToResidual(1000)
              1967-12-05  [SimpleGrazing].GrazeToResidual(1000)
              1968-01-05  [SimpleGrazing].GrazeToResidual(1000)
              1968-01-31  [SimpleGrazing].GrazeToResidual(1000)
              1968-03-06  [SimpleGrazing].GrazeToResidual(1000)
              1968-04-08  [SimpleGrazing].GrazeToResidual(1000)
              1968-06-05  [SimpleGrazing].GrazeToResidual(1000)
              1968-09-05  [SimpleGrazing].GrazeToResidual(1000)
              1968-10-10  [SimpleGrazing].GrazeToResidual(1000)
              1968-11-08  [SimpleGrazing].GrazeToResidual(1000)
              1968-12-03  [SimpleGrazing].GrazeToResidual(1000)
              1969-01-06  [SimpleGrazing].GrazeToResidual(1000)
              1969-02-04  [SimpleGrazing].GrazeToResidual(1000)
              1969-03-10  [SimpleGrazing].GrazeToResidual(1000)
              1969-04-15  [SimpleGrazing].GrazeToResidual(1000)
              1969-05-22  [SimpleGrazing].GrazeToResidual(1000)
              1969-09-16  [SimpleGrazing].GrazeToResidual(1000)
              1969-10-14  [SimpleGrazing].GrazeToResidual(1000)
              1969-11-19  [SimpleGrazing].GrazeToResidual(1000)
              1969-12-19  [SimpleGrazing].GrazeToResidual(1000)
              1970-01-20  [SimpleGrazing].GrazeToResidual(1000)
              1970-02-17  [SimpleGrazing].GrazeToResidual(1000)
              1970-03-24  [SimpleGrazing].GrazeToResidual(1000)
              1970-05-05  [SimpleGrazing].GrazeToResidual(1000)
              1970-06-09  [SimpleGrazing].GrazeToResidual(1000)
              1970-09-18  [SimpleGrazing].GrazeToResidual(1000)
              1970-10-14  [SimpleGrazing].GrazeToResidual(1000)
              1970-11-11  [SimpleGrazing].GrazeToResidual(1000)
              1970-12-10  [SimpleGrazing].GrazeToResidual(1000)
              1971-01-14  [SimpleGrazing].GrazeToResidual(1000)
              1971-02-09  [SimpleGrazing].GrazeToResidual(1000)
              1971-03-12  [SimpleGrazing].GrazeToResidual(1000)
              1971-04-23  [SimpleGrazing].GrazeToResidual(1000)
              1971-06-16  [SimpleGrazing].GrazeToResidual(1000)
              1971-09-10  [SimpleGrazing].GrazeToResidual(1000)
              1971-10-12  [SimpleGrazing].GrazeToResidual(1000)
              1971-11-09  [SimpleGrazing].GrazeToResidual(1000)
              1971-12-08  [SimpleGrazing].GrazeToResidual(1000)
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            Soil SoilWinchmore: SoilType=Black Vertosol; Site=Dalby; NearestTown=Dalby, Q 4405; Region=Darling Downs; State=Queensland; ApsoilNumber=27; Latitude=-27.12; Longitude=151.305; LocationAccuracy=+/-20m; DataSource=CSIRO Sustainable Ecosystems, Toowoomba
              Comments=This was just copied from the original simulation done in the older APSIM
              Physical
                Thickness  BD    AirDry  LL15   DUL    SAT
                100        1.25  0.06    0.124  0.3    0.45
                200        1.31  0.06    0.129  0.3    0.45
                300        1.23  0.03    0.077  0.13   0.15
                300        1.24  0.03    0.032  0.052  0.08
                300        1.25  0.03    0.035  0.036  0.08
                300        1.26  0.03    0.035  0.036  0.08
                300        1.29  0.03    0.035  0.05   0.08
                SoilCrop AGPRyegrassSoil: LL=[0.124, 0.129, 0.077, 0.032, 0.035, 0.035, 0.035]; KL=[0.125, 0.105, 0.035, 0.01, 0.003, 0, 0]; XF=[1, 1, 1, 1, 0, 0, 0]
                SoilCrop AGPWhiteCloverSoil: LL=[0.124, 0.129, 0.077, 0.032, 0.035, 0.035, 0.035]; KL=[0.115, 0.085, 0.007, 0, 0, 0, 0]; XF=[1, 1, 1, 1, 0, 0, 0]
                SoilCrop AGPPaspalumSoil: LL=[0.124, 0.129, 0.077, 0.032, 0.035, 0.035, 0.035]; KL=[0.105, 0.09, 0.045, 0.021, 0.01, 0, 0]; XF=[1, 1, 1, 1, 0, 0, 0]
              WaterBalance SoilWater: SummerDate=1-Nov; SummerU=6; SummerCona=3.5; WinterDate=1-apr; WinterU=2; WinterCona=2; DiffusConst=88; DiffusSlope=35; Salb=0.13; CN2Bare=73; CNRed=20; CNCov=0.8; DischargeWidth=0; CatchmentArea=0
                Thickness  SWCON  KLAT
                100        0.4    0
                200        0.5    0
                300        0.6    0
                300        0.6    0
                300        0.8    0
                300        0.8    0
                300        0.8    0
              Organic: FOMCNRatio=40
                Thickness  Carbon  SoilCNRatio  FBiom  FInert  FOM
                100        3.523   13.8         0.263  0.531   292.998
                200        1.39    13.8         0.161  0.664   209.942
                300        0.579   13.8         0.152  0.923   127.336
                300        0.604   13.8         0.102  0.988   77.2334
                300        0.404   13.8         0      1       46.8444
                300        0.391   13.8         0      1       28.4126
                300        0.391   13.8         0      1       17.2331
              Nutrient
              Chemical
                Thickness  NO3N     NH4N   PH
                100        7.619    0.132  5.9
                200        7.35725  0.132  5.9
                300        3.871    0.132  5.9
                300        3.84     0.132  5.9
                300        3.81     0.132  5.9
                300        3.779    0.132  5.9
                300        3.691    0.132  5.9
              CERESSoilTemperature Temperature
              InitialWater Initial water: PercentMethod=0; FractionFull=0.99
          CompositeFactor WinchmoreIrrig
            Specifications:
              [Clock].StartDate=1966-01-01
              [Clock].EndDate=2005-01-01
              [Weather]
              [ClimateController]
              [Soil]
              [AutomaticIrrigation]
              [Cutting]
            Weather: FileName=WinchmoreMet.met
            Manager ClimateController: same as Validation.Radcliffe.Factors.Location.WinchmoreDland.ClimateController
            Manager AutomaticIrrigation
              allowIrrigation = True
              seasonStart = 01-Sep
              seasonEnd = 30-Apr
              seasonsAllocation = 1000000000
              triggerDeficit = 50
              targetDeficit = 99
              returndays = 1
              maximumAmount = 30
              depthPAWC = 300
```csharp
using Newtonsoft.Json;
using Models.PMF.Phen;
using System;
using Models.Core;
using Models.PMF;
using Models.Soils;
using System.Xml.Serialization;
using APSIM.Shared.Utilities;
using Models.Interfaces;

        
namespace Models
{
    [Serializable] 
    [System.Xml.Serialization.XmlInclude(typeof(Model))]
    public class Script : Model
    {
        [Link] private ISummary summary;
        [Link] private Irrigation Irrigation;
        [Link] private Clock Clock;
        [Link] private Soil Soil;
        [Link(IsOptional = true)] private IPlant existingCrop;
        private DateTime StartDate;
        private DateTime EndDate;
        private double TopDUL;
        private double TopLL;
        private int nLayers;
        [Link(IsOptional = true)]
        private Phenology phenology;
        [Link]
        private IPhysical soilPhysical;
        [Link]
        private ISoilWater waterBalance;
        //Communication to other modules
       
        //User inputs from properties tab
        [Description("Turn irrigation on?")]
        public bool allowIrrigation { get; set; }
        [Description("Start of irrigation season (dd-MMM)")]
        public string seasonStart { get; set; }
        [Description("End of irrigation season (dd-MMM)")]
        public string seasonEnd { get; set; }
        [Description("Season allocation (mm)")]
        public double seasonsAllocation { get; set; }
        [Description("Deficit to trigger irrigation (% PAWC)")]
        public double triggerDeficit { get; set; }
        [Description("Deficit to stop irrigaton (% PAWC)")]
        public double targetDeficit { get; set; }
        [Description("Minimum days for irrigation to return")]
        public double returndays { get; set; }
        [Description("Maximum irrigation application (mm/day)")]
        public double maximumAmount { get; set; }
        [Description("Depth to calculate PAWC (mm)")]
        public double depthPAWC { get; set; }

        //Class members
        [JsonIgnore] public double TopSWdeficit { get; set; }
        [JsonIgnore] public double TopSWC { get; set; }
        [JsonIgnore] public double DaysSinceIrrigation { get; set; }
        [JsonIgnore] public double AmountToApply { get; set; }
        [JsonIgnore] public double SeasonAppliedAmount { get; set; }
        
        private bool IrrigationIsAllowed { get; set; }
        private bool SeasonIsOpen { get; set; }
        private bool CropIsActive { get; set; }
        private bool IrrigatorIsAvailable { get; set; }
        private bool SoilIsDry { get; set; }

    
        //Calculate static soil variables
        [EventSubscribe("StartOfSimulation")]
        private void OnStartOfSimulation(object sender, EventArgs e)
        {   
            //Set the season dates
            StartDate = DateTime.Parse(seasonStart + "-" + Clock.Today.Year.ToString());
            EndDate = DateTime.Parse(seasonEnd + "-" + Clock.Today.Year.ToString());
            
            //Can we irrigate at all?
            IrrigationIsAllowed = false; 
            if (allowIrrigation)
                IrrigationIsAllowed = true; 

            //Calculate soil water variables
            double depthFromSurface = 0.0;
            double fracLayer = 0.0;
            nLayers = soilPhysical.Thickness.Length;
            for (int layer = 0; layer < nLayers; layer++)
            {
                fracLayer = Math.Min(1.0, (depthPAWC - depthFromSurface) / soilPhysical.Thickness[layer]);
                TopLL += soilPhysical.LL15mm[layer] * fracLayer;
                TopDUL += soilPhysical.DULmm[layer] * fracLayer;
                depthFromSurface += soilPhysical.Thickness[layer];
                if (depthFromSurface >= depthPAWC)
                    layer = nLayers;
            }
        }
             
        //Determine daily requirement for irrigation
        [EventSubscribe("StartOfDay")]
        private void OnStartOfDay(object sender, EventArgs e)
        {
            //Can we irrigate today?          
            SeasonIsOpen = isBetween(Clock.Today, StartDate, EndDate);

            //Is there a crop in the ground that needs irrigation?
            CropIsActive = false;
            if ((existingCrop != null) && (existingCrop.IsAlive))
                CropIsActive = true;
            //if ((phenology.Stage >= 3.0) && (phenology.Stage < 6.0))
          
            //Is the irrigator available?
            IrrigatorIsAvailable = false;
            DaysSinceIrrigation += 1;
            if (DaysSinceIrrigation >= returndays)
                IrrigatorIsAvailable = true;
          
            //Is the soil dry enough to require irrigation?
            SoilIsDry = false;
            double depthFromSurface = 0.0;
            double fracLayer = 0.0;
            TopSWC = 0.0;
            for (int layer = 0; layer < nLayers; layer++)
            //for (int layer = 0; depthFromSurface < depthPAWC + soilPhysical.Thickness[layer]; layer++)
            {
                fracLayer = Math.Min(1.0, (depthPAWC - depthFromSurface) / soilPhysical.Thickness[layer]);
                TopSWC += waterBalance.SWmm[layer] * fracLayer;
                depthFromSurface += soilPhysical.Thickness[layer];
                if (depthFromSurface >= depthPAWC)
                    layer = nLayers;
            }
            
            TopSWdeficit = TopSWC - TopDUL;
            if (Math.Max(0.0, -TopSWdeficit) >= (TopDUL - TopLL) * (100 - triggerDeficit) / 100)
                SoilIsDry = true;
                
            //Are all the conditions ratifying irrigation
            if (IrrigationIsAllowed && SeasonIsOpen && CropIsActive && IrrigatorIsAvailable && SoilIsDry)
            {
                //Lets bloody well irrigate then!!!!
                AmountToApply = TopDUL * targetDeficit / 100 - TopSWC;
                AmountToApply = Math.Max(0.0, Math.Min(AmountToApply, seasonsAllocation - SeasonAppliedAmount));
                Irrigation.Apply(AmountToApply);
                DaysSinceIrrigation = 0;
                SeasonAppliedAmount += AmountToApply;
            }
        }
        
        ///Checks whether theDate is between iniDate and endDate (non-year specific)
        private bool isBetween(DateTime theDay, DateTime iniDate, DateTime endDate)
        {
            bool result = false;
            if (iniDate.DayOfYear < endDate.DayOfYear)
            {
                // period is within one year, ex: summer in the northern hemisphere
                if ((theDay.DayOfYear >= iniDate.DayOfYear) && (theDay.DayOfYear <= endDate.DayOfYear))
                    result = true;
            }
            else
            {
                // period goes over the end of the year, ex: summer in the southern hemisphere
                if ((theDay.DayOfYear >= iniDate.DayOfYear) || (theDay.DayOfYear <= endDate.DayOfYear))
                    result = true;
            }
            
            return result;
        }
    }
}
```
            Operations Cutting: same as Validation.Radcliffe.Factors.Location.WinchmoreDland.Cutting
            Soil SoilWinchmore: SoilType=Black Vertosol; Site=Dalby; NearestTown=Dalby, Q 4405; Region=Darling Downs; State=Queensland; ApsoilNumber=27; Latitude=-27.12; Longitude=151.305; LocationAccuracy=+/-20m; DataSource=CSIRO Sustainable Ecosystems, Toowoomba
              Comments=This was just copied from the original simulation done in the older APSIM
              Physical
                Thickness  BD     AirDry  LL15   DUL    SAT
                100        1.2    0.041   0.124  0.331  0.507
                200        1.28   0.043   0.129  0.318  0.484
                300        0.747  0.026   0.077  0.152  0.272
                300        0.378  0.011   0.032  0.052  0.142
                300        0.327  0.005   0.016  0.026  0.099
                300        0.316  0.004   0.013  0.022  0.092
                300        0.316  0.004   0.013  0.022  0.092
                SoilCrop AGPRyegrassSoil: LL=[0.124, 0.129, 0.077, 0.032, 0.016, 0.013, 0.013]; KL=[0.125, 0.105, 0.035, 0.01, 0.003, 0, 0]; XF=[1, 1, 1, 1, 0, 0, 0]
                SoilCrop AGPWhiteCloverSoil: LL=[0.124, 0.129, 0.077, 0.032, 0.016, 0.013, 0.013]; KL=[0.115, 0.085, 0.007, 0, 0, 0, 0]; XF=[1, 1, 1, 1, 0, 0, 0]
                SoilCrop AGPPaspalumSoil: LL=[0.124, 0.129, 0.077, 0.032, 0.016, 0.013, 0.013]; KL=[0.105, 0.09, 0.045, 0.021, 0.01, 0, 0]; XF=[1, 1, 1, 1, 0, 0, 0]
              WaterBalance SoilWater: same as Validation.Radcliffe.Factors.Location.WinchmoreDland.SoilWinchmore.SoilWater
              Organic: same as Validation.Radcliffe.Factors.Location.WinchmoreDland.SoilWinchmore.Organic
              Chemical: same as Validation.Radcliffe.Factors.Location.WinchmoreDland.SoilWinchmore.Chemical
              Nutrient
              CERESSoilTemperature Temperature
              InitialWater Initial water: PercentMethod=0; FractionFull=0.99
          CompositeFactor WinchmoreDRadcliffe
            Specifications:
              [Clock].StartDate=1977-06-01
              [Clock].EndDate=1990-06-01
              [Weather]
              [ClimateController]
              [Soil]
              [Cutting]
            Weather: FileName=WinchmoreMet.met
            Manager ClimateController
              AllowControl = True
              EnableDate = 01/01/1977 00:00:00
              WithinYearControl = False
              ControlStart =
              ControlEnd =
              RainfallMultiplier = 1.07
              RainfallAddition = 0
              RadiationMultiplier = 1
              RadiationAddition = 0
              MinTMultiplier = 1
              MinTAddition = 0
              MaxTMultiplier = 1
              MaxTAddition = 0
              WindMultiplier = 1
              WindAddition = 0
              VPMultiplier = 1
              VPAddition = 0
              script: same as in Validation.Radcliffe.Factors.Location.Ahaura.ClimateController
            Operations Cutting
              1977-06-14  [SimpleGrazing].GrazeToResidual(1000)
              1977-06-28  [SimpleGrazing].GrazeToResidual(1000)
              1977-07-12  [SimpleGrazing].GrazeToResidual(1000)
              1977-07-26  [SimpleGrazing].GrazeToResidual(1000)
              1977-08-09  [SimpleGrazing].GrazeToResidual(1000)
              1977-08-23  [SimpleGrazing].GrazeToResidual(1000)
              1977-09-06  [SimpleGrazing].GrazeToResidual(1000)
              1977-09-20  [SimpleGrazing].GrazeToResidual(1000)
              1977-10-04  [SimpleGrazing].GrazeToResidual(1000)
              1977-10-18  [SimpleGrazing].GrazeToResidual(1000)
              1977-11-01  [SimpleGrazing].GrazeToResidual(1000)
              1977-11-15  [SimpleGrazing].GrazeToResidual(1000)
              1977-11-30  [SimpleGrazing].GrazeToResidual(1000)
              1977-12-14  [SimpleGrazing].GrazeToResidual(1000)
              1977-12-28  [SimpleGrazing].GrazeToResidual(1000)
              1978-01-11  [SimpleGrazing].GrazeToResidual(1000)
              1978-01-25  [SimpleGrazing].GrazeToResidual(1000)
              1978-02-08  [SimpleGrazing].GrazeToResidual(1000)
              1978-02-22  [SimpleGrazing].GrazeToResidual(1000)
              1978-03-08  [SimpleGrazing].GrazeToResidual(1000)
              1978-03-22  [SimpleGrazing].GrazeToResidual(1000)
              1978-04-05  [SimpleGrazing].GrazeToResidual(1000)
              1978-04-19  [SimpleGrazing].GrazeToResidual(1000)
              1978-05-03  [SimpleGrazing].GrazeToResidual(1000)
              1978-05-17  [SimpleGrazing].GrazeToResidual(1000)
              1978-05-31  [SimpleGrazing].GrazeToResidual(1000)
              1978-06-14  [SimpleGrazing].GrazeToResidual(1000)
              1978-06-28  [SimpleGrazing].GrazeToResidual(1000)
              1978-07-12  [SimpleGrazing].GrazeToResidual(1000)
              1978-07-26  [SimpleGrazing].GrazeToResidual(1000)
              1978-08-09  [SimpleGrazing].GrazeToResidual(1000)
              1978-08-23  [SimpleGrazing].GrazeToResidual(1000)
              1978-09-06  [SimpleGrazing].GrazeToResidual(1000)
              1978-09-20  [SimpleGrazing].GrazeToResidual(1000)
              1978-10-04  [SimpleGrazing].GrazeToResidual(1000)
              1978-10-18  [SimpleGrazing].GrazeToResidual(1000)
              1978-11-01  [SimpleGrazing].GrazeToResidual(1000)
              1978-11-15  [SimpleGrazing].GrazeToResidual(1000)
              1978-11-30  [SimpleGrazing].GrazeToResidual(1000)
              1978-12-14  [SimpleGrazing].GrazeToResidual(1000)
              1978-12-28  [SimpleGrazing].GrazeToResidual(1000)
              1979-01-11  [SimpleGrazing].GrazeToResidual(1000)
              1979-01-25  [SimpleGrazing].GrazeToResidual(1000)
              1979-02-08  [SimpleGrazing].GrazeToResidual(1000)
              1979-02-22  [SimpleGrazing].GrazeToResidual(1000)
              1979-03-08  [SimpleGrazing].GrazeToResidual(1000)
              1979-03-22  [SimpleGrazing].GrazeToResidual(1000)
              1979-04-05  [SimpleGrazing].GrazeToResidual(1000)
              1979-04-19  [SimpleGrazing].GrazeToResidual(1000)
              1979-05-03  [SimpleGrazing].GrazeToResidual(1000)
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            Soil Winchmore: SoilType=Black Vertosol; Site=Dalby; NearestTown=Dalby, Q 4405; Region=Darling Downs; State=Queensland; ApsoilNumber=27; Latitude=-27.12; Longitude=151.305; LocationAccuracy=+/-20m; DataSource=CSIRO Sustainable Ecosystems, Toowoomba
              Comments=This was just copied from the original simulation done in the older APSIM
              Physical
                Thickness  BD    AirDry  LL15  DUL   SAT
                150        1.25  0.12    0.14  0.32  0.45
                150        1.31  0.12    0.14  0.32  0.45
                300        1.23  0.02    0.03  0.07  0.15
                400        1.24  0.01    0.02  0.05  0.08
                200        1.25  0.01    0.02  0.05  0.08
                300        1.26  0.01    0.02  0.05  0.08
                300        1.29  0.01    0.02  0.05  0.08
                200        1.29  0.01    0.01  0.05  0.08
                SoilCrop AGPRyegrassSoil: LL=[0.14, 0.14, 0.03, 0.02, 0.02, 0.02, 0.02, 0.02]; KL=[0.125, 0.1, 0.035, 0.01, 0, 0, 0, 0]; XF=[1, 1, 1, 1, 0, 0, 0, 0]
                SoilCrop AGPWhiteCloverSoil: LL=[0.14, 0.14, 0.03, 0.02, 0.02, 0.02, 0.02, 0.02]; KL=[0.115, 0.08, 0.007, 0, 0, 0, 0, 0]; XF=[1, 1, 1, 1, 0, 0, 0, 0]
                SoilCrop AGPPaspalumSoil: LL=[0.14, 0.14, 0.03, 0.02, 0.02, 0.02, 0.02, 0.02]; KL=[0.105, 0.09, 0.045, 0.02, 0.01, 0, 0, 0]; XF=[1, 1, 1, 1, 0, 0, 0, 0]
              WaterBalance SoilWater: SummerDate=1-Nov; SummerU=6; SummerCona=3.5; WinterDate=1-apr; WinterU=2; WinterCona=2; DiffusConst=88; DiffusSlope=35; Salb=0.13; CN2Bare=73; CNRed=20; CNCov=0.8; DischargeWidth=0; CatchmentArea=0
                Thickness  SWCON  KLAT
                150        0.4    0
                150        0.4    0
                300        0.5    0
                400        0.6    0
                200        0.6    0
                300        0.6    0
                300        0.6    0
                200        0.6    0
              Organic: FOMCNRatio=40
                Thickness  Carbon  SoilCNRatio  FBiom       FInert      FOM
                150        3.523   11.3         0.0610103   0.600742    0
                150        1.39    11.3         0.0307392   0.74542179  0
                300        0.579   11.3         0.0153764   0.87037987  0
                400        0.604   11.3         0.01065838  0.954641    0
                200        0.404   11.3         0.0101088   0.981558    0
                300        0.391   11.3         0.0100243   0.991289    0
                300        0.391   11.3         0.010004    0.996458    0
                200        0.391   11.3         0.0100009   0.998327    0
              Chemical: same as Validation.Radcliffe.Factors.Location.Marton1.Marton.Chemical
              Nutrient
              CERESSoilTemperature Temperature
              InitialWater Initial water: PercentMethod=0; FractionFull=0.56
          CompositeFactor WinchmoreIRadcliffe
            Specifications:
              [Clock].StartDate=1977-06-01
              [Clock].EndDate=1990-06-01
              [Weather]
              [ClimateController]
              [AutomaticIrrigation]
              [Soil]
              [Cutting]
            Weather: FileName=WinchmoreMet.met
            Manager ClimateController: same as Validation.Radcliffe.Factors.Location.WinchmoreDRadcliffe.ClimateController
            Manager AutomaticIrrigation
              allowIrrigation = True
              seasonStart = 28-Dec
              seasonEnd = 28-Feb
              seasonsAllocation = 10000
              triggerDeficit = 50
              targetDeficit = 95
              returndays = 5
              maximumAmount = 15
              depthPAWC = 100
              script: same as in Validation.Radcliffe.Factors.Location.WinchmoreIrrig.AutomaticIrrigation
            Operations Cutting: same as Validation.Radcliffe.Factors.Location.WinchmoreDRadcliffe.Cutting
            Soil SoilWinchmore: same as Validation.Radcliffe.Factors.Location.WinchmoreIrrig.SoilWinchmore
          CompositeFactor Windsor
            Specifications:
              [Clock].StartDate=1978-06-01
              [Clock].EndDate=1989-06-01
              [Weather]
              [ClimateController]
              [Soil]
              [Cutting]
            Weather: FileName=VCS_Windsor.met
            Manager ClimateController
              AllowControl = True
              EnableDate = 01/01/1978 00:00:00
              WithinYearControl = False
              ControlStart =
              ControlEnd =
              RainfallMultiplier = 0.86
              RainfallAddition = 0
              RadiationMultiplier = 1
              RadiationAddition = 0
              MinTMultiplier = 1
              MinTAddition = 0
              MaxTMultiplier = 1
              MaxTAddition = 0
              WindMultiplier = 1
              WindAddition = 0
              VPMultiplier = 1
              VPAddition = 0
              script: same as in Validation.Radcliffe.Factors.Location.Ahaura.ClimateController
            Operations Cutting
              1978-06-14  [SimpleGrazing].GrazeToResidual(1000)
              1978-06-28  [SimpleGrazing].GrazeToResidual(1000)
              1978-07-12  [SimpleGrazing].GrazeToResidual(1000)
              1978-07-26  [SimpleGrazing].GrazeToResidual(1000)
              1978-08-09  [SimpleGrazing].GrazeToResidual(1000)
              1978-08-23  [SimpleGrazing].GrazeToResidual(1000)
              1978-09-06  [SimpleGrazing].GrazeToResidual(1000)
              1978-09-20  [SimpleGrazing].GrazeToResidual(1000)
              1978-10-04  [SimpleGrazing].GrazeToResidual(1000)
              1978-10-18  [SimpleGrazing].GrazeToResidual(1000)
              1978-11-01  [SimpleGrazing].GrazeToResidual(1000)
              1978-11-15  [SimpleGrazing].GrazeToResidual(1000)
              1978-11-30  [SimpleGrazing].GrazeToResidual(1000)
              1978-12-14  [SimpleGrazing].GrazeToResidual(1000)
              1978-12-28  [SimpleGrazing].GrazeToResidual(1000)
              1979-01-11  [SimpleGrazing].GrazeToResidual(1000)
              1979-01-25  [SimpleGrazing].GrazeToResidual(1000)
              1979-02-08  [SimpleGrazing].GrazeToResidual(1000)
              1979-02-22  [SimpleGrazing].GrazeToResidual(1000)
              1979-03-08  [SimpleGrazing].GrazeToResidual(1000)
              1979-03-22  [SimpleGrazing].GrazeToResidual(1000)
              1979-04-05  [SimpleGrazing].GrazeToResidual(1000)
              1979-04-19  [SimpleGrazing].GrazeToResidual(1000)
              1979-05-03  [SimpleGrazing].GrazeToResidual(1000)
              1979-05-17  [SimpleGrazing].GrazeToResidual(1000)
              1979-05-31  [SimpleGrazing].GrazeToResidual(1000)
              1979-06-14  [SimpleGrazing].GrazeToResidual(1000)
              1979-06-28  [SimpleGrazing].GrazeToResidual(1000)
              1979-07-12  [SimpleGrazing].GrazeToResidual(1000)
              1979-07-26  [SimpleGrazing].GrazeToResidual(1000)
              1979-08-09  [SimpleGrazing].GrazeToResidual(1000)
              1979-08-23  [SimpleGrazing].GrazeToResidual(1000)
              1979-09-06  [SimpleGrazing].GrazeToResidual(1000)
              1979-09-20  [SimpleGrazing].GrazeToResidual(1000)
              1979-10-04  [SimpleGrazing].GrazeToResidual(1000)
              1979-10-18  [SimpleGrazing].GrazeToResidual(1000)
              1979-11-01  [SimpleGrazing].GrazeToResidual(1000)
              1979-11-15  [SimpleGrazing].GrazeToResidual(1000)
              1979-11-30  [SimpleGrazing].GrazeToResidual(1000)
              1979-12-14  [SimpleGrazing].GrazeToResidual(1000)
              1979-12-28  [SimpleGrazing].GrazeToResidual(1000)
              1980-01-11  [SimpleGrazing].GrazeToResidual(1000)
              1980-01-25  [SimpleGrazing].GrazeToResidual(1000)
              1980-02-08  [SimpleGrazing].GrazeToResidual(1000)
              1980-02-22  [SimpleGrazing].GrazeToResidual(1000)
              1980-03-08  [SimpleGrazing].GrazeToResidual(1000)
              1980-03-22  [SimpleGrazing].GrazeToResidual(1000)
              1980-04-05  [SimpleGrazing].GrazeToResidual(1000)
              1980-04-19  [SimpleGrazing].GrazeToResidual(1000)
              1980-05-03  [SimpleGrazing].GrazeToResidual(1000)
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            Soil Windsor: SoilType=Umbric Andosol (ANu); Country=New Zealand; Latitude=-37.967; Longitude=175.767
              DataSource=Romero, C.C., Hoogenboom, G., Baigorria, G.A., Koo, J., Gijsman, A.J., Wood, S., 2012. Reanalysis of a global soil database for crop and environmental modeling. Environmental Modelling & Software 35, 163-170.  https://harvestchoice.wufoo.com/forms/download-wisol.
              Comments=Some values (e.g. soil-crop parameters) have been modified based on expected local soil conditions and/or root distribution
              Physical
                Thickness  BD   AirDry  LL15  DUL   SAT
                150        1.3  0.09    0.12  0.28  0.45
                150        1.3  0.09    0.12  0.28  0.45
                300        1.3  0.09    0.12  0.28  0.45
                300        1.3  0.09    0.12  0.28  0.45
                300        1.3  0.08    0.1   0.24  0.45
                300        1.3  0.08    0.1   0.24  0.45
                300        1.3  0.08    0.1   0.24  0.45
                200        1.3  0.08    0.1   0.24  0.45
                SoilCrop AGPRyegrassSoil: LL=[0.12, 0.12, 0.12, 0.12, 0.1, 0.1, 0.1, 0.1]; KL=[0.125, 0.1, 0.035, 0.01, 0.003, 0, 0, 0]; XF=[1, 1, 1, 1, 1, 1, 1, 1]
                SoilCrop AGPWhiteCloverSoil: LL=[0.12, 0.12, 0.12, 0.12, 0.1, 0.1, 0.1, 0.1]; KL=[0.115, 0.08, 0.007, 0, 0, 0, 0, 0]; XF=[1, 1, 1, 1, 1, 1, 1, 1]
                SoilCrop AGPPaspalumSoil: LL=[0.12, 0.12, 0.12, 0.12, 0.1, 0.1, 0.1, 0.1]; KL=[0.105, 0.09, 0.045, 0.021, 0.01, 0, 0, 0]; XF=[1, 1, 1, 1, 1, 1, 1, 1]
              WaterBalance SoilWater: SummerDate=1-Nov; SummerU=9.12; SummerCona=3; WinterDate=1-Apr; WinterU=9.12; WinterCona=3; DiffusConst=0; DiffusSlope=0; Salb=0.13; CN2Bare=73; CNRed=0; CNCov=0; Thickness=[150, 150, 300, 300, 300, 300, 300, 200]; SWCON=[0.4, 0.5, 0.5, 0.6, 0.7, 0.7, 0.7, 0.7]
              Organic: same as Validation.Radcliffe.Factors.Location.Waerengaokuri.Waerengaokuri.Organic
              Chemical: same as Validation.Radcliffe.Factors.Location.InvermayTaieriPlain.InvermayPlain.Chemical
              Nutrient
              CERESSoilTemperature Temperature
              InitialWater Initial Water: PercentMethod=0; FractionFull=0.56
          CompositeFactor Winton
            Specifications:
              [Clock].StartDate=1980-06-01
              [Clock].EndDate=1991-06-01
              [Weather]
              [ClimateController]
              [Soil]
              [Cutting]
            Weather: FileName=VCS_Winton.met
            Manager ClimateController
              AllowControl = True
              EnableDate = 01/01/1980 00:00:00
              WithinYearControl = False
              ControlStart =
              ControlEnd =
              RainfallMultiplier = 1.01
              RainfallAddition = 0
              RadiationMultiplier = 1
              RadiationAddition = 0
              MinTMultiplier = 1
              MinTAddition = 0
              MaxTMultiplier = 1
              MaxTAddition = 0
              WindMultiplier = 1
              WindAddition = 0
              VPMultiplier = 1
              VPAddition = 0
              script: same as in Validation.Radcliffe.Factors.Location.Ahaura.ClimateController
            Operations Cutting
              1980-06-14  [SimpleGrazing].GrazeToResidual(1000)
              1980-06-28  [SimpleGrazing].GrazeToResidual(1000)
              1980-07-12  [SimpleGrazing].GrazeToResidual(1000)
              1980-07-26  [SimpleGrazing].GrazeToResidual(1000)
              1980-08-09  [SimpleGrazing].GrazeToResidual(1000)
              1980-08-23  [SimpleGrazing].GrazeToResidual(1000)
              1980-09-06  [SimpleGrazing].GrazeToResidual(1000)
              1980-09-20  [SimpleGrazing].GrazeToResidual(1000)
              1980-10-04  [SimpleGrazing].GrazeToResidual(1000)
              1980-10-18  [SimpleGrazing].GrazeToResidual(1000)
              1980-11-01  [SimpleGrazing].GrazeToResidual(1000)
              1980-11-15  [SimpleGrazing].GrazeToResidual(1000)
              1980-11-30  [SimpleGrazing].GrazeToResidual(1000)
              1980-12-14  [SimpleGrazing].GrazeToResidual(1000)
              1980-12-28  [SimpleGrazing].GrazeToResidual(1000)
              1981-01-11  [SimpleGrazing].GrazeToResidual(1000)
              1981-01-25  [SimpleGrazing].GrazeToResidual(1000)
              1981-02-08  [SimpleGrazing].GrazeToResidual(1000)
              1981-02-22  [SimpleGrazing].GrazeToResidual(1000)
              1981-03-08  [SimpleGrazing].GrazeToResidual(1000)
              1981-03-22  [SimpleGrazing].GrazeToResidual(1000)
              1981-04-05  [SimpleGrazing].GrazeToResidual(1000)
              1981-04-19  [SimpleGrazing].GrazeToResidual(1000)
              1981-05-03  [SimpleGrazing].GrazeToResidual(1000)
              1981-05-17  [SimpleGrazing].GrazeToResidual(1000)
              1981-05-31  [SimpleGrazing].GrazeToResidual(1000)
              1981-06-14  [SimpleGrazing].GrazeToResidual(1000)
              1981-06-28  [SimpleGrazing].GrazeToResidual(1000)
              1981-07-12  [SimpleGrazing].GrazeToResidual(1000)
              1981-07-26  [SimpleGrazing].GrazeToResidual(1000)
              1981-08-09  [SimpleGrazing].GrazeToResidual(1000)
              1981-08-23  [SimpleGrazing].GrazeToResidual(1000)
              1981-09-06  [SimpleGrazing].GrazeToResidual(1000)
              1981-09-20  [SimpleGrazing].GrazeToResidual(1000)
              1981-10-04  [SimpleGrazing].GrazeToResidual(1000)
              1981-10-18  [SimpleGrazing].GrazeToResidual(1000)
              1981-11-01  [SimpleGrazing].GrazeToResidual(1000)
              1981-11-15  [SimpleGrazing].GrazeToResidual(1000)
              1981-11-30  [SimpleGrazing].GrazeToResidual(1000)
              1981-12-14  [SimpleGrazing].GrazeToResidual(1000)
              1981-12-28  [SimpleGrazing].GrazeToResidual(1000)
              1982-01-11  [SimpleGrazing].GrazeToResidual(1000)
              1982-01-25  [SimpleGrazing].GrazeToResidual(1000)
              1982-02-08  [SimpleGrazing].GrazeToResidual(1000)
              1982-02-22  [SimpleGrazing].GrazeToResidual(1000)
              1982-03-08  [SimpleGrazing].GrazeToResidual(1000)
              1982-03-22  [SimpleGrazing].GrazeToResidual(1000)
              1982-04-05  [SimpleGrazing].GrazeToResidual(1000)
              1982-04-19  [SimpleGrazing].GrazeToResidual(1000)
              1982-05-03  [SimpleGrazing].GrazeToResidual(1000)
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            Soil Winton: SoilType=Eutric Gleysol (GLe); Country=New Zealand; Latitude=-43.3; Longitude=172.367
              DataSource=Romero, C.C., Hoogenboom, G., Baigorria, G.A., Koo, J., Gijsman, A.J., Wood, S., 2012. Reanalysis of a global soil database for crop and environmental modeling. Environmental Modelling & Software 35, 163-170.  https://harvestchoice.wufoo.com/forms/download-wisol.
              Comments=Some values (e.g. soil-crop parameters) have been modified based on expected local soil conditions and/or root distribution
              Physical
                Thickness  BD   AirDry  LL15  DUL   SAT
                150        1.3  0.11    0.15  0.45  0.48
                150        1.3  0.11    0.15  0.4   0.48
                300        1.3  0.11    0.15  0.3   0.48
                300        1.3  0.09    0.12  0.3   0.4
                300        1.3  0.09    0.12  0.3   0.4
                300        1.3  0.09    0.12  0.3   0.4
                300        1.3  0.09    0.12  0.3   0.4
                200        1.3  0.09    0.12  0.3   0.4
                SoilCrop AGPRyegrassSoil: LL=[0.15, 0.15, 0.15, 0.12, 0.12, 0.12, 0.12, 0.12]; KL=[0.125, 0.1, 0.035, 0.01, 0.003, 0, 0, 0]; XF=[1, 1, 1, 1, 1, 1, 1, 1]
                SoilCrop AGPWhiteCloverSoil: LL=[0.15, 0.15, 0.15, 0.12, 0.12, 0.12, 0.12, 0.12]; KL=[0.115, 0.08, 0.007, 0, 0, 0, 0, 0]; XF=[1, 1, 1, 1, 1, 1, 1, 1]
                SoilCrop AGPPaspalumSoil: LL=[0.15, 0.15, 0.15, 0.12, 0.12, 0.12, 0.12, 0.12]; KL=[0.105, 0.09, 0.045, 0.021, 0.01, 0, 0, 0]; XF=[1, 1, 1, 1, 1, 1, 1, 1]
              WaterBalance SoilWater: SummerDate=1-Nov; SummerU=9.76; SummerCona=3; WinterDate=1-Apr; WinterU=9.76; WinterCona=3; DiffusConst=0; DiffusSlope=0; Salb=0.13; CN2Bare=73; CNRed=0; CNCov=0; Thickness=[150, 150, 300, 300, 300, 300, 300, 200]; SWCON=[0.4, 0.4, 0.5, 0.6, 0.6, 0.6, 0.6, 0.6]
              Organic: FOMCNRatio=40
                Thickness  Carbon      SoilCNRatio  FBiom       FInert      FOM
                150        4.7         13.68        0.0610103   0.600742    39000
                150        4.7         13.68        0.0307392   0.74542179  29250
                300        0.60823079  13.68        0.0153764   0.87037987  19500
                300        0.22482454  13.68        0.01065838  0.954641    7800
                300        0.202252    13.68        0.0101088   0.981558    3900
                300        0.200305    13.68        0.0100243   0.991289    0
                300        0.200028    13.68        0.010004    0.996458    0
                200        0.200004    13.68        0.0100009   0.998327    0
              Chemical: same as Validation.Radcliffe.Factors.Location.Arrowtown.Arrowtown.Chemical
              Nutrient
              CERESSoilTemperature Temperature
              InitialWater Initial Water: PercentMethod=0; FractionFull=0.56
      Simulation RadcliffeBase
        Clock: Start=1972-01-01; End=1973-12-31
        Weather: FileName=%root%\Tests\WeatherFiles\lincoln.met
        Summary
        SoilArbitrator
        MicroClimate: a_interception=0; b_interception=0; c_interception=0; d_interception=0; SoilHeatFluxFraction=0.4; MinimumHeightDiffForNewLayer=0; NightInterceptionFraction=0.5; ReferenceHeight=2
        Forages
          Parameters:
            Name                          IsLive  DigestibilityString  FractionConsumable  MinimumAmount  UseDigestibilityFromModel
            SurfaceOrganicMatter.Residue  true    0                    0                   0              false
            SurfaceOrganicMatter.Residue  false   0                    0                   0              false
            AGPRyegrass.Leaf              true    0.7                  1                   80             false
            AGPRyegrass.Leaf              false   0.3                  1                   0              false
            AGPRyegrass.Stem              true    0.7                  1                   20             false
            AGPRyegrass.Stem              false   0.3                  1                   0              false
            AGPRyegrass.Stolon            true    0.7                  1                   0              false
            AGPRyegrass.Stolon            false   0.3                  1                   0              false
            AGPWhiteClover.Leaf           true    0.7                  1                   60             false
            AGPWhiteClover.Leaf           false   0.3                  1                   0              false
            AGPWhiteClover.Stem           true    0.7                  1                   15             false
            AGPWhiteClover.Stem           false   0.3                  1                   0              false
            AGPWhiteClover.Stolon         true    0.7                  1                   10             false
            AGPWhiteClover.Stolon         false   0.3                  1                   0              false
            AGPPaspalum.Leaf              true    0.7                  1                   40             false
            AGPPaspalum.Leaf              false   0.3                  1                   0              false
            AGPPaspalum.Stem              true    0.7                  1                   10             false
            AGPPaspalum.Stem              false   0.3                  1                   0              false
            AGPPaspalum.Stolon            true    0.7                  1                   0              false
            AGPPaspalum.Stolon            false   0.3                  1                   0              false
        Manager ClimateController
          AllowControl = True
          EnableDate = 01/01/1975 00:00:00
          WithinYearControl = False
          ControlStart =
          ControlEnd =
          RainfallMultiplier = 0
          RainfallAddition = 0.98
          RadiationMultiplier = 0
          RadiationAddition = 0
          MinTMultiplier = 0
          MinTAddition = 0
          MaxTMultiplier = 0
          MaxTAddition = 0
          WindMultiplier = 0
          WindAddition = 0
          VPMultiplier = 0
          VPAddition = 0
          script: same as in Validation.Radcliffe.Factors.Location.Ahaura.ClimateController
        Zone Field: Area=1; Slope=0; AspectAngle=0; Altitude=50
          Folder Management
            Manager AutomaticIrrigation
              allowIrrigation = False
              seasonStart = 15-Aug
              seasonEnd = 30-May
              seasonsAllocation = 10000
              triggerDeficit = 50
              targetDeficit = 99
              returndays = 1
              maximumAmount = 30
              depthPAWC = 300
              script: same as in Validation.Radcliffe.Factors.Location.WinchmoreIrrig.AutomaticIrrigation
            Operations IrrigationSchedule
            Operations Cutting
            Manager DoReporting
              EnableOnHarvest = False
              ReportNameHarvest = HarvestReport
              EnableOnAnnual = False
              ReportNameAnnual = AnnualReport
              ReportDateAnnual = 31-may
              EnableOnSeason = False
              ReportNameSeasonal =
              SummerEndDate = 28-feb
              AutumnEndDate = 31-may
              WinterEndDate = 31-aug
              SpringEndDate = 30-nov
              EnableOnSummary = True
              ReportNameSummary = SummaryReport
```csharp
using Newtonsoft.Json;
using Models.AgPasture;
using System;
using System.Xml.Serialization;
using System.Collections.Generic;
using System.Linq;
using Models.Core;
using Models.PMF;
using Models.Soils;
using APSIM.Shared.Utilities;
using Models.Utilities;
using Models.Interfaces;


namespace Models
{
    [Serializable]
    public class Script : Model
    {
        [Link] private Zone zone;
        [Link] private Simulation Simulation;
        [Link] private Clock Clock;
        [Link] private Fertiliser fertiliser;
        [Link] private Soil mySoil;
        [Link] private Irrigation Irrigation;
        [Link] private ISummary summary;
        // - Links to APSIM models
        //[Link] AgPasture.PastureSpecies Pasture;

        List<AgPasture.PastureSpecies> Pasture = new List<AgPasture.PastureSpecies>();

        //[Link(ByName = true)] Report HarvestReport;


        [Separator("NOTE WELL!! MUST start the sim the data after annual reporting and do a harvest on annual reporting day")]
        [Description("Do reporting on each harvest?    :")] public bool EnableOnHarvest { get; set; }
        [Description("Name of the component for harvest-based reporting    :")] public string ReportNameHarvest { get; set; }

        [Description("Do reporting at the end of each production year?    :")] public bool EnableOnAnnual { get; set; }
        [Description("Name of the component for annual reporting    :")] public string ReportNameAnnual { get; set; }
        [Description("Date for annual reporting - NOTE - must coincide with the end of one of the seasons below (dd-mmm)    :")] public string ReportDateAnnual { get; set; }

        [Description("Do the seasonal reporting)?    :")] public bool EnableOnSeason { get; set; }
        [Description("Name of the component for seasonal reporting    :")] public string ReportNameSeasonal { get; set; }
        [Description("Last day of summer for seasonal reporting (dd-mmm)")] public string SummerEndDate { get; set; }
        [Description("Last day of autumn for seasonal reporting (dd-mmm)")] public string AutumnEndDate { get; set; }
        [Description("Last day of winter for seasonal reporting (dd-mmm)")] public string WinterEndDate { get; set; }
        [Description("Last day of spring for seasonal reporting (dd-mmm)")] public string SpringEndDate { get; set; }

        [Description("Do the summary reporting (at the end of the simulation)?    :")] public bool EnableOnSummary { get; set; }
        [Description("Name of the component for summary (comparison to observed) reporting    :")] public string ReportNameSummary { get; set; }



        public double AnnualHarvestedWt { get; set; }
        public double AnnualIrrigated { get; set; }
        public double IntervalNHA { get; set; }

        private bool doAnnualReport = false;
        private bool doAnnualReportCalculations = false;
        private bool doSeasonalReport = false;
        private bool doSummerReport = false;
        private bool doAutumnReport = false;
        private bool doWinterReport = false;
        private bool doSpringReport = false;
        private bool doSummerReportCalculations = false;
        private bool doAutumnReportCalculations = false;
        private bool doWinterReportCalculations = false;
        private bool doSpringReportCalculations = false;

        [JsonIgnore][Units("kgDM/ha")] public double AveAnnHarvested { get; set; }
        [JsonIgnore][Units("kgDM/ha")] public double StdAnnHarvested { get; set; }
        [JsonIgnore][Units("kgDM/ha")] public double RngAnnHarvested { get; set; }

        [JsonIgnore][Units("kgDM/ha")] public double AveSummerHarvested { get; set; }
        [JsonIgnore][Units("kgDM/ha")] public double StdSummerHarvested { get; set; }
        [JsonIgnore][Units("kgDM/ha")] public double RngSummerHarvested { get; set; }
        [JsonIgnore][Units("kgDM/ha")] public double AveAutumnHarvested { get; set; }
        [JsonIgnore][Units("kgDM/ha")] public double StdAutumnHarvested { get; set; }
        [JsonIgnore][Units("kgDM/ha")] public double RngAutumnHarvested { get; set; }
        [JsonIgnore][Units("kgDM/ha")] public double AveWinterHarvested { get; set; }
        [JsonIgnore][Units("kgDM/ha")] public double StdWinterHarvested { get; set; }
        [JsonIgnore][Units("kgDM/ha")] public double RngWinterHarvested { get; set; }
        [JsonIgnore][Units("kgDM/ha")] public double AveSpringHarvested { get; set; }
        [JsonIgnore][Units("kgDM/ha")] public double StdSpringHarvested { get; set; }
        [JsonIgnore][Units("kgDM/ha")] public double RngSpringHarvested { get; set; }

        [JsonIgnore][Units("kgDM/ha")] public double[] AveSeasonalHarvested { get; set; }
        [JsonIgnore][Units("kgDM/ha")] public double[] StdSeasonalHarvested { get; set; }
        [JsonIgnore][Units("kgDM/ha")] public double[] RngSeasonalHarvested { get; set; }

        [JsonIgnore][Units("-")] public string Season { get; set; }
        [JsonIgnore][Units("-")] public double SeasonNHA  { get; set; }
        [JsonIgnore][Units("-")] public double SummerNHA  { get; set; }
        [JsonIgnore][Units("-")] public double AutumnNHA  { get; set; }
        [JsonIgnore][Units("-")] public double WinterNHA  { get; set; }
        [JsonIgnore][Units("-")] public double SpringNHA  { get; set; }

        [JsonIgnore][Units("kgDM/ha")] public List<double> AnnHarvested = new List<double>();
        [JsonIgnore][Units("kgDM/ha")] public List<double> SummerHarvested = new List<double>();
        [JsonIgnore][Units("kgDM/ha")] public List<double> AutumnHarvested = new List<double>();
        [JsonIgnore][Units("kgDM/ha")] public List<double> WinterHarvested = new List<double>();
        [JsonIgnore][Units("kgDM/ha")] public List<double> SpringHarvested = new List<double>();
        //List<double> harvestedWtSums = new List<double>();
        private int CountYears = 0;
        private bool GrazedToday;

        [EventSubscribe("StartOfSimulation")]
        private void OnStartOfSimulation(object sender, EventArgs e)
        {
            foreach (PastureSpecies species in zone.FindAllChildren<PastureSpecies>().OfType<IModel>().ToList())
                Pasture.Add(species);

            CountYears = 0;

            Season = "Unknown";
            SeasonNHA = 0.0;
            SummerNHA = 0.0;
            AutumnNHA = 0.0;
            WinterNHA = 0.0;
            SpringNHA = 0.0;
        }
        
        [EventSubscribe("StartOfYear")]
        private void OnStartOfYear(object sender, EventArgs e)
        {
        }

        [EventSubscribe("DoManagement")]
        private void OnDoManagement(object sender, EventArgs e)
        {
            GrazedToday = false;

            // Is this the day for annual reporting?
            doAnnualReportCalculations = false;  // this is to capture annual harvests etc for the final Summary report
            if (DateUtilities.DatesEqual(ReportDateAnnual, Clock.Today))
                doAnnualReportCalculations = true;

            doAnnualReport = false;
            if (DateUtilities.DatesEqual(ReportDateAnnual, Clock.Today) && (EnableOnAnnual))
                doAnnualReport = true;
            else if (DateUtilities.DatesEqual(ReportDateAnnual, Clock.Today.AddDays(-1)))
            {
                AnnualHarvestedWt = 0.0;
                AnnualIrrigated = 0.0;            
            }

            doSummerReport = false;
            doAutumnReport = false;
            doWinterReport = false;
            doSpringReport = false;
            doSummerReportCalculations = false;
            doAutumnReportCalculations = false;
            doWinterReportCalculations = false;
            doSpringReportCalculations = false;
            if (DateUtilities.DatesEqual(SummerEndDate, Clock.Today))
            {
                Season = "Summer";
                doSummerReport = true;
                doSummerReportCalculations = true;
            }
            else if (DateUtilities.DatesEqual(SummerEndDate, Clock.Today.AddDays(-1)))
                SeasonNHA = 0.0;  // could move this zeroing
            else if (DateUtilities.DatesEqual(AutumnEndDate, Clock.Today))
            {
                Season = "Autumn";
                doAutumnReport = true;
                doAutumnReportCalculations = true;
            }
            else if (DateUtilities.DatesEqual(AutumnEndDate, Clock.Today.AddDays(-1)))
                SeasonNHA = 0.0;
            else if (DateUtilities.DatesEqual(WinterEndDate, Clock.Today))
            {
                Season = "Winter";
                doWinterReport = true;
                doWinterReportCalculations = true;
            }
            else if (DateUtilities.DatesEqual(WinterEndDate, Clock.Today.AddDays(-1)))
                SeasonNHA = 0.0;
            else if (DateUtilities.DatesEqual(SpringEndDate, Clock.Today))
            {
                Season = "Spring";
                doSpringReport = true;
                doSpringReportCalculations = true;
            }
            else if (DateUtilities.DatesEqual(SpringEndDate, Clock.Today.AddDays(-1)))
                SeasonNHA = 0.0;
        }

        [EventSubscribe("Grazed")]
        private void OnGrazed(object sender, EventArgs e)
        {
            // Grazing happened today.
            GrazedToday = true;
        }

        [EventSubscribe("DoManagementCalculations")]
        private void OnDoManagementCalculations(object sender, EventArgs e)
        {
            foreach (PastureSpecies species in Pasture)
            {
                AnnualHarvestedWt += species.NetGrowthWt;
                IntervalNHA += species.NetGrowthWt;
                SeasonNHA += species.NetGrowthWt;
            }

            AnnualIrrigated += Irrigation.IrrigationApplied;

            if ((GrazedToday) && (EnableOnHarvest))
            {
                Models.Report harvestReport = this.FindInScope(ReportNameHarvest) as Models.Report;
                if (harvestReport == null)
                    throw new Exception(string.Format("Unable to locate report {0}.", ReportNameHarvest));
                harvestReport.DoOutput();
                IntervalNHA = 0.0;
            }

            if (EnableOnSeason && (doSummerReport || doAutumnReport || doWinterReport || doSpringReport))
            {
                Models.Report seasonalReport = this.FindInScope(ReportNameSeasonal) as Models.Report;
                if (seasonalReport == null)
                    throw new Exception(string.Format("Unable to locate report {0}.", ReportNameSeasonal));
                seasonalReport.DoOutput();
            }

            if (doAnnualReportCalculations)
                AnnHarvested.Add(AnnualHarvestedWt);
            if (doSummerReportCalculations)
                SummerHarvested.Add(SeasonNHA);
            if (doAutumnReportCalculations)
                AutumnHarvested.Add(SeasonNHA);
            if (doWinterReportCalculations)
                WinterHarvested.Add(SeasonNHA);
            if (doSpringReportCalculations)
                SpringHarvested.Add(SeasonNHA);

            if (doAnnualReport)
            {
                Models.Report annualReport = this.FindInScope(ReportNameAnnual) as Models.Report;
                if (annualReport == null)
                    throw new Exception(string.Format("Unable to locate annual report {0}.", ReportNameAnnual));
                annualReport.DoOutput();
            }

        }

        [EventSubscribe("EndOfSimulation")]
        private void OnEndOfSimulation(object sender, EventArgs e)
        {
            if (EnableOnSummary)
            {

                AveAnnHarvested = MathUtilities.Average(AnnHarvested);
                StdAnnHarvested = MathUtilities.SampleStandardDeviation(AnnHarvested);
                RngAnnHarvested = MathUtilities.Max(AnnHarvested) - MathUtilities.Min(AnnHarvested);

                AveSummerHarvested = MathUtilities.Average(SummerHarvested);
                StdSummerHarvested = MathUtilities.SampleStandardDeviation(SummerHarvested);
                RngSummerHarvested = MathUtilities.Max(SummerHarvested) - MathUtilities.Min(SummerHarvested);

                AveAutumnHarvested = MathUtilities.Average(AutumnHarvested);
                StdAutumnHarvested = MathUtilities.SampleStandardDeviation(AutumnHarvested);
                RngAutumnHarvested = MathUtilities.Max(AutumnHarvested) - MathUtilities.Min(AutumnHarvested);

                AveWinterHarvested = MathUtilities.Average(WinterHarvested);
                StdWinterHarvested = MathUtilities.SampleStandardDeviation(WinterHarvested);
                RngWinterHarvested = MathUtilities.Max(WinterHarvested) - MathUtilities.Min(WinterHarvested);

                AveSpringHarvested = MathUtilities.Average(SpringHarvested);
                StdSpringHarvested = MathUtilities.SampleStandardDeviation(SpringHarvested);
                RngSpringHarvested = MathUtilities.Max(SpringHarvested) - MathUtilities.Min(SpringHarvested);



                Models.Report summaryReport = this.FindInScope(ReportNameSummary) as Models.Report;
                if (summaryReport == null)
                    throw new Exception(string.Format("Unable to locate annual report {0}.", ReportNameSummary));
                summaryReport.DoOutput();
            }
        }


    }
}
```
          SimpleGrazing: GrazingRotationType=2; SimpleMinGrazable=3500; SimpleGrazingResidual=2000; FlexibleGrazePostDM=0; NoGrazingStartString=01-jun; NoGrazingEndString=15-sep; FractionDefoliatedNToSoil=[0.8]; FractionExcretedNToDung=[0.45]; DepthUrineIsAdded=250; FractionPopulationDecline=0; TramplingOn=false; MaximumPropLitterMovedToSoil=0.1; PastureConsumedAtMaximumRateOfLitterRemoval=1200
            PreGrazeDMArray=[1000, 1000, 1000, 1000, 1000, 1000, 1000, 1000, 1000, 1000, 1000, 1000]
            PostGrazeDMArray=[2000, 2000, 2000, 2000, 2000, 2000, 2000, 2000, 2000, 2000, 2000, 2000]
          Irrigation
          Fertiliser
          SurfaceOrganicMatter: InitialResidueName=Sward; InitialResidueType=grass; InitialResidueMass=1000; InitialStandingFraction=0; InitialCPR=0; InitialCNR=15
          Soil: SoilType=Umbric Andosol (ANu); Country=New Zealan; Latitude=-37.967; Longitude=175.767
            DataSource=Romero, C.C., Hoogenboom, G., Baigorria, G.A., Koo, J., Gijsman, A.J., Wood, S., 2012. Reanalysis of a global soil database for crop and environmental modeling. Environmental Modelling & Software 35, 163-170.  https://harvestchoice.wufoo.com/forms/download-wisol.
            Comments=You will need to add crops to this soil before running simulations.
            Physical
              Thickness  BD    AirDry  LL15   DUL   SAT
              180        0.73  0.05    0.148  0.35  0.656
              120        0.7   0.05    0.147  0.35  0.691
              210        0.69  0.03    0.088  0.25  0.699
              230        0.77  0.03    0.1    0.2   0.672
              SoilCrop AGPRyegrassSoil: LL=[0.14, 0.14, 0.14, 0.14]; KL=[0.1, 0.1, 0.1, 0.02]; XF=[1, 1, 1, 1]
              SoilCrop AGPWhiteCloverSoil: LL=[0.14, 0.14, 0.14, 0.14]; KL=[0.1, 0.1, 0.1, 0.02]; XF=[1, 1, 1, 1]
            WaterBalance SoilWater: same as Validation.Radcliffe.Factors.Location.Awamoko.Awamoko.SoilWater
            Nutrient
            Organic: FOMCNRatio=0
              Thickness  Carbon  SoilCNRatio  FBiom  FInert  FOM
              180        7.9     11.01        0.02   0.26    0
              120        2       11.01        0.02   1       0
              210        1       11.01        0.02   1       0
              230        0.5     11.01        0.01   1       0
            Chemical
              Thickness  NO3N  NH4N  PH
              180        0.1   0.1   5.6
              120        0.1   0.1   6.2
              210        0.1   0.1   6.2
              230        0.1   0.1   6.4
            InitialWater Initial Water: PercentMethod=0; FractionFull=1
            Sample Initial nitrogen: Thickness=[180, 120, 210, 230]; SWUnits=Volumetric; OCUnits=Total; PHUnits=Water
            CERESSoilTemperature Temperature
          PastureSpecies AGPRyegrass: InitialShootDM=1500; InitialRootDM=450; InitialRootDepth=400
          PastureSpecies AGPWhiteClover: InitialShootDM=500; InitialRootDM=150; InitialRootDepth=200
          PastureSpecies AGPPaspalum (disabled): InitialShootDM=1; InitialRootDM=1; InitialRootDepth=500
          Report DailyReport: EventNames=[Clock].EndOfDay
            VariableNames:
              [Clock].Today as Date
              ([AGPRyegrass].TotalWt + [AGPWhiteClover].TotalWt) as TotalPlantWt
              ([AGPRyegrass].AboveGroundWt + [AGPWhiteClover].AboveGroundWt) as TotalPlantWt
              ([AGPRyegrass].HarvestedWt + [AGPWhiteClover].HarvestedWt) as HarvestedWt
              Sum of ([AGPRyegrass].HarvestedWt + [AGPWhiteClover].HarvestedWt) from 1-Jul to [Clock].Today as HarvestedWtCum
              Sum of ([AGPRyegrass].HarvestedN + [AGPWhiteClover].HarvestedN) from 1-Jul to [Clock].Today as HarvestedNCum
              ([AGPWhiteClover].HarvestedWt / ([AGPWhiteClover].HarvestedWt + [AGPRyegrass].HarvestedWt + 0.000001)) as CloverContentHarvested
              [AGPRyegrass].AboveGroundLiveWt as AboveGroundLiveWt_Ryegrass
              [AGPWhiteClover].AboveGroundLiveWt as AboveGroundLiveWt_WClover
              [Irrigation].IrrigationApplied as Irrigation
              (sum([Soil].Nutrient.Urea.kgha) + sum([Soil].Nutrient.NH4.kgha) + sum([Soil].Nutrient.NO3.kgha)) as TotalSoilMinN
              Sum of [AGPWhiteClover].FixedN from 1-Jul to [Clock].Today as AnnualFixed
              Sum of ([SimpleGrazing].AmountUrineNReturned + [SimpleGrazing].AmountDungNReturned) from 1-Jul to [Clock].Today as ReturnedNCum
              ([AGPryegrass].SoilUptakeN + [AGPWhiteClover].SoilUptakeN) as TotalUptake
              Sum of ([AGPryegrass].SoilUptakeN + [AGPWhiteClover].SoilUptakeN) from 1-Jul to [Clock].Today as AnnualTotalUptake
          Report SeasonalReport: EventNames=[Clock].EndOfSimulation; GroupByVariableName=[Weather].Season
            VariableNames:
              [Clock].Today as Date
              [Clock].Today.Year as Year
              [Weather].Season as Season
              sum of [AGPWhiteClover].HarvestedWt from [Clock].StartOfSimulation to [Clock].EndOfSimulation as WhiteClover
              sum of [AGPRyegrass].HarvestedWt from [Clock].StartOfSimulation to [Clock].EndOfSimulation as Ryegrass
              mean of ([AGPWhiteClover].HarvestedWt / ([AGPWhiteClover].HarvestedWt + [AGPRyegrass].HarvestedWt + 0.000001)) on [SimpleGrazing].Grazed from [Clock].StartOfSimulation to [Clock].EndOfSimulation as PropCloverHarvested
          Report AnnualReport: EventNames=31-may
            VariableNames:
              [Clock].Today as Date
              sum of [AGPRyegrass].HarvestedWt+[AGPWhiteClover].HarvestedWt from [Annualreport].DayAfterLastOutput to [Clock].Today as AnnualHarvestedWt
              sum of [Irrigation].IrrigationApplied from [Annualreport].DayAfterLastOutput to [Clock].Today as AnnualIrrigation
          Report SummaryReport
            VariableNames:
              [Clock].Today as Date
              [DoReporting].Script.AveAnnHarvested as AveAnnualHarvestedWt
              [DoReporting].Script.StdAnnHarvested as StdAnnualHarvestedWt
              [DoReporting].Script.RngAnnHarvested as RngAnnualHarvestedWt
              [DoReporting].Script.AveSummerHarvested as AveSummerHarvested
              [DoReporting].Script.StdSummerHarvested as StdSummerHarvested
              [DoReporting].Script.RngSummerHarvested as RngSummerHarvested
              [DoReporting].Script.AveAutumnHarvested as AveAutumnHarvested
              [DoReporting].Script.StdAutumnHarvested as StdAutumnHarvested
              [DoReporting].Script.RngAutumnHarvested as RngAutumnHarvested
              [DoReporting].Script.AveWinterHarvested as AveWinterHarvested
              [DoReporting].Script.StdWinterHarvested as StdWinterHarvested
              [DoReporting].Script.RngWinterHarvested as RngWinterHarvested
              [DoReporting].Script.AveSpringHarvested as AveSpringHarvested
              [DoReporting].Script.StdSpringHarvested as StdSpringHarvested
              [DoReporting].Script.RngSpringHarvested as RngSpringHarvested
  Folder Sensibility
    Experiment Sensibility
      Factors
        Permutation
          Factor Location
            CompositeFactor Lincoln
              Specifications:
                [Weather]
                [Soil]
              Weather: FileName=%root%\Examples\WeatherFiles\lincoln.met
              Soil LincolnSoil: SoilType=NZ_Sedimentary; LocalName=Lismore; Site=Winchmore; NearestTown=Ashburton; Region=Canterbury; Country=New Zealand; Latitude=-48.48; Longitude=0
                Chemical
                  Thickness  NO3N  NH4N  PH
                  150        5     0.1   6
                  150        2.5   0.1   6
                  200        1     0.1   6
                  150        0.75  0.1   6
                  250        0.5   0.1   6
                  300        0.5   0.1   6
                  300        0.5   0.1   6
                Physical
                  Thickness  ParticleSizeClay  BD    AirDry  LL15   DUL    SAT   KS
                  150        20                1.3   0.05    0.15   0.36   0.45  5000
                  150        15                1.35  0.12    0.14   0.34   0.43  2500
                  200        12                1     0.055   0.055  0.19   0.25  3000
                  150        8                 0.53  0.015   0.015  0.065  0.15  10000
                  250        6                 0.31  0.01    0.01   0.04   0.11  17500
                  300        5                 0.3   0.01    0.01   0.03   0.11  20000
                  300        5                 0.3   0.01    0.01   0.03   0.11  20000
                  SoilCrop AGPRyegrassSoil: LL=[0.15, 0.14, 0.06, 0.02, 0.01, 0.01, 0.01]; KL=[0.1, 0.1, 0.08, 0.04, 0.01, 0, 0]; XF=[1, 1, 1, 1, 1, 0, 0]
                  SoilCrop AGPWhiteCloverSoil: LL=[0.15, 0.14, 0.06, 0.02, 0.01, 0.01, 0.01]; KL=[0.1, 0.1, 0.08, 0.04, 0.01, 0, 0]; XF=[1, 1, 1, 1, 1, 0, 0]
                WaterBalance SoilWater: SummerDate=1-Nov; SummerU=6; SummerCona=3.5; WinterDate=1-apr; WinterU=2; WinterCona=2; DiffusConst=88; DiffusSlope=35; Salb=0.13; CN2Bare=73; CNRed=20; CNCov=0.8; DischargeWidth=0; CatchmentArea=0
                  Thickness  SWCON  KLAT
                  150        0.5    0
                  150        0.52   0
                  200        0.55   0
                  150        0.6    0
                  250        0.65   0
                  300        0.65   0
                  300        0.65   0
                Organic: FOMCNRatio=40
                  Thickness  Carbon  SoilCNRatio  FBiom  FInert  FOM
                  150        3       12           0.04   0.5     331.337
                  150        1       12           0.02   0.7     245.461
                  200        0.6     12           0.02   0.83    164.537
                  150        0.4     12           0.01   0.9     121.892
                  250        0.25    12           0.01   0.95    73.9313
                  300        0.15    12           0      0.99    40.5743
                  300        0.1     12           0      0.99    22.2677
                InitialWater Initial water: PercentMethod=1; FractionFull=0.95
                Sample Initial nitrogen: Thickness=[150, 150, 200, 150, 250, 300, 300]; SWUnits=Volumetric; OCUnits=Total; PHUnits=Water
                CERESSoilTemperature Temperature
                Nutrient
            CompositeFactor Ruakura
              Specifications:
                [Weather]
                [Soil]
              Weather: FileName=%root%\Examples\WeatherFiles\VCS_Ruakura.met
              Soil RuakuraSoil: SoilType=Black Vertosol; Site=Dalby; NearestTown=Dalby, Q 4405; Region=Darling Downs; State=Queensland; ApsoilNumber=27; Latitude=-27.12; Longitude=151.305; LocationAccuracy=+/-20m; DataSource=CSIRO Sustainable Ecosystems, Toowoomba
                Comments=This was just copied from the original simulation done in the older APSIM
                Chemical: same as Validation.Radcliffe.Factors.Location.Ruakura.SoilRuakura.Chemical
                Physical
                  Thickness  BD    AirDry  LL15  DUL   SAT
                  100        1.25  0.1     0.14  0.35  0.48
                  200        1.31  0.1     0.14  0.35  0.48
                  300        1.23  0.1     0.14  0.32  0.48
                  300        1.24  0.1     0.14  0.32  0.48
                  300        1.25  0.1     0.14  0.2   0.45
                  300        1.26  0.1     0.14  0.2   0.45
                  300        1.29  0.1     0.14  0.2   0.45
                  SoilCrop AGPRyegrassSoil: LL=[0.14, 0.14, 0.14, 0.14, 0.14, 0.14, 0.14]; KL=[0.1, 0.1, 0.1, 0.02, 0.02, 0, 0]; XF=[1, 1, 1, 1, 1, 0, 0]
                  SoilCrop AGPWhiteCloverSoil: LL=[0.14, 0.14, 0.14, 0.14, 0.14, 0.14, 0.14]; KL=[0.1, 0.1, 0.1, 0.02, 0.02, 0, 0]; XF=[1, 1, 1, 1, 1, 0, 0]
                WaterBalance SoilWater: same as Validation.Radcliffe.Factors.Location.Ruakura.SoilRuakura.SoilWater
                SoilNitrogen: fom_types=[default, manure, mucuna, lablab, shemp, stable]; fract_carb=[0.2, 0.3, 0.54, 0.57, 0.45, 0]; fract_cell=[0.7, 0.3, 0.37, 0.37, 0.47, 0.1]; fract_lign=[0.1, 0.4, 0.09, 0.06, 0.08, 0.9]; NPartitionApproach=0
                  SoilNitrogenNO3 NO3
                  SoilNitrogenNH4 NH4
                  SoilNitrogenUrea Urea
                Organic: same as Validation.Radcliffe.Factors.Location.Ruakura.SoilRuakura.Organic
                InitialWater Initial water: PercentMethod=0; FractionFull=0.93
                Sample Initial nitrogen: Thickness=[150, 150, 300, 300, 300, 300, 300]; SWUnits=Volumetric; OCUnits=Total; PHUnits=Water
                CERESSoilTemperature Temperature
            CompositeFactor Dalby
              Specifications:
                [Weather]
                [Soil]
              Weather: FileName=%root%\Examples\WeatherFiles\Dalby.met
              Soil DalbySoil: ASCOrder=Vertosol; ASCSubOrder=Black; SoilType=Clay; Site=Norwin; NearestTown=Norwin; Region=Darling Downs and Granite Belt; State=Queensland; Country=Australia; NaturalVegetation=Qld. Bluegrass, possible Qld. Blue gum; ApsoilNumber=900; Latitude=-27.581836; Longitude=151.320206; LocationAccuracy=+/- 20m
                DataSource=CSIRO Sustainable Ecosystems, Toowoomba; Characteriesd as part of the GRDC funded project"Doing it better, doing it smarter, managing soil water in Australian agriculture' 2011
                Comments=OC, CLL for all crops estimated-based on Bongeen Mywybilla Soil No1
                Physical
                  Thickness  BD       AirDry    LL15      DUL       SAT       KS
                  150        1.01056  0.13025   0.2605    0.521     0.588655  20
                  150        1.07146  0.198689  0.248362  0.496723  0.565677  20
                  300        1.09394  0.28      0.28      0.488438  0.557193  20
                  300        1.15861  0.28      0.28      0.480297  0.532787  20
                  300        1.17301  0.28      0.28      0.471584  0.527354  20
                  300        1.16287  0.28      0.28      0.457071  0.53118   20
                  300        1.1875   0.28      0.28      0.452332  0.521888  20
                  SoilCrop AGPRyegrassSoil: LL=[0.261, 0.248, 0.28, 0.306, 0.36, 0.392, 0.446]; KL=[0.06, 0.06, 0.06, 0.04, 0.04, 0.02, 0.01]; XF=[1, 1, 1, 1, 1, 1, 1]
                  SoilCrop AGPWhiteCloverSoil: LL=[0.261, 0.248, 0.28, 0.306, 0.36, 0.392, 0.446]; KL=[0.06, 0.06, 0.06, 0.04, 0.04, 0.02, 0.01]; XF=[1, 1, 1, 1, 1, 1, 1]
                WaterBalance SoilWater: SummerDate=1-Nov; SummerU=5; SummerCona=5; WinterDate=1-Apr; WinterU=5; WinterCona=5; DiffusConst=40; DiffusSlope=16; Salb=0.12; CN2Bare=73; CNRed=20; CNCov=0.8; Thickness=[150, 150, 300, 300, 300, 300, 300]; SWCON=[0.3, 0.3, 0.3, 0.3, 0.3, 0.3, 0.3]
                Organic: FOMCNRatio=40
                  Thickness  Carbon  SoilCNRatio  FBiom  FInert  FOM
                  150        1.2     12           0.04   0.4     347.129
                  150        0.96    12           0.02   0.6     270.344
                  300        0.6     12           0.02   0.8     163.972
                  300        0.3     12           0.02   1       99.4541
                  300        0.18    12           0.01   1       60.322
                  300        0.12    12           0.01   1       36.5871
                  300        0.12    12           0.01   1       22.1912
                Chemical
                  Thickness  NO3N  NH4N  PH
                  150        1     0.1   8
                  150        1     0.1   8
                  300        1     0.1   8
                  300        1     0.1   8
                  300        1     0.1   8
                  300        1     0.1   8
                  300        1     0.1   8
                InitialWater: PercentMethod=1; FractionFull=1
                Sample InitialN: Thickness=[150, 150, 300, 300, 300, 300, 300]; SWUnits=Volumetric; OCUnits=Total; PHUnits=Water
                CERESSoilTemperature Temperature
                Nutrient
            CompositeFactor WaggaWagga
              Specifications:
                [Weather]
                [Soil]
              Weather: FileName=%root%\Examples\WeatherFiles\WaggaWagga.met
              Soil WaggaWaggaSoil: Latitude=0; Longitude=0
                InitialWater Initial water: PercentMethod=1; FractionFull=0.8
                Physical
                  Thickness  BD    AirDry  LL15  DUL   SAT
                  100        1.5   0.01    0.05  0.16  0.29
                  100        1.6   0.01    0.05  0.15  0.29
                  200        1.68  0.01    0.05  0.14  0.29
                  200        1.75  0.02    0.05  0.13  0.29
                  200        1.7   0.05    0.05  0.12  0.29
                  200        1.7   0.05    0.05  0.12  0.29
                  SoilCrop AGPRyegrassSoil: LL=[0.05, 0.05, 0.05, 0.05, 0.05, 0.05]; KL=[0.07, 0.07, 0.05, 0.02, 0.02, 0.02]; XF=[1, 1, 1, 1, 0.1, 0]
                  SoilCrop AGPWhiteCloverSoil: LL=[0.05, 0.05, 0.05, 0.05, 0.05, 0.05]; KL=[0.07, 0.07, 0.05, 0.02, 0.02, 0.02]; XF=[1, 1, 1, 1, 0.1, 0]
                WaterBalance SoilWater: SummerDate=1-Nov; SummerU=4; SummerCona=3.5; WinterDate=1-Apr; WinterU=4; WinterCona=3.5; DiffusConst=88; DiffusSlope=35.4; Salb=0.13; CN2Bare=65; CNRed=20; CNCov=0.8; DischargeWidth=0; CatchmentArea=0
                  Thickness  SWCON  KLAT
                  100        0.9    0
                  300        0.9    0
                  600        0.9    0
                  1000       0.6    0
                  1000       0.6    0
                  1000       0.6    0
                  1000       0.6    0
                  1000       0.6    0
                Organic: FOMCNRatio=60
                  Thickness  Carbon  SoilCNRatio  FBiom  FInert  FOM
                  100        2       14.5         0.04   0.4     0.29407
                  300        1       14.5         0.03   0.5     0.253108
                  600        0.5     14.5         0.02   0.5     0.187507
                  1000       0.2     14.5         0.01   0.5     0.113729
                  1000       0.12    14.5         0.01   0.9     0.06898
                  1000       0.1     14.5         0.01   0.99    0.0418385
                  1000       0.1     14.5         0.01   0.99    0.0253763
                  1000       0.1     14.5         0.01   0.99    0.0153915
                Chemical
                  Thickness  NO3N  NH4N  PH
                  100        10    10    5.8
                  300        5     5     5.7
                  600        2     2     5.7
                  1000       1     1     5.9
                  1000       1     1     5.7
                  1000       1     1     5.7
                  1000       1     1     5.7
                  1000       1     1     5.7
                Sample Initial nitrogen: Thickness=[100, 300, 600, 1000, 1000, 1000, 1000, 1000]; SWUnits=Volumetric; OCUnits=Total; PHUnits=Water
                CERESSoilTemperature Temperature
                Nutrient
          Factor Nitrogen: Specification=[FertiliseFixedDates].Script.Amount=0 to 450 step 50
          Factor Water: Specification=[AutomaticIrrigation].Script.allowIrrigation=false,true
      Simulation SensibilityBase
        Clock: Start=1992-07-01; End=1996-06-30
        Weather: FileName=%root%\Examples\WeatherFiles\lincoln.met
        SoilArbitrator
        Summary
        Zone Field: Area=1; Slope=0; AspectAngle=0; Altitude=50
          SimpleGrazing: GrazingRotationType=1; SimpleGrazingFrequencyString=21; SimpleMinGrazable=0; SimpleGrazingResidual=1500; FlexibleGrazePostDM=0; MaximumRotationLengthArray=[31, 29, 31, 30, 31, 30, 31, 31, 30, 31, 30, 31]; FractionDefoliatedNToSoil=[0.5]; FractionExcretedNToDung=[0.45]; DepthUrineIsAdded=250; FractionPopulationDecline=0; TramplingOn=false; MaximumPropLitterMovedToSoil=0.1; PastureConsumedAtMaximumRateOfLitterRemoval=1200
            PreGrazeDMArray=[2800, 2800, 2800, 2800, 2800, 2800, 2800, 2800, 2800, 2800, 2800, 2800]
            PostGrazeDMArray=[1500, 1500, 1500, 1500, 1250, 1250, 1250, 1250, 1500, 1500, 1500, 1500]
          Manager FertiliseFixedDates
            Amount = 10
            EachYear = True
            Dates = 5-jan,5-feb,5-oct,5-nov,5-dec
            UseCritNThreshold = False
            CritNThreshold = 50
            CritNDepth = 75
            Depth = 50
            FertiliserType = UreaN
```csharp
using Models.Interfaces;
using System.Linq;
using APSIM.Shared.Utilities;
using Models.PMF;
using Models.Soils;
using Models.Core;
using System;
using Models.Soils.Nutrients;

namespace Models
{
    [Serializable]
    public class Script : Model
    {
        [Link] private Clock clock;
        [Link] private Fertiliser fertiliser;
        [Link] private ISummary summary;
        [Link] private Soil soil;
        private Nutrient nutrient;
        private SoilNitrogen soilN;
        [Link]
        private IPhysical soilPhysical;


        [Separator("Fertiliser will be applied on the date(s) below")]
        [Description("Apply fertiliser on the same day(s) each year? If no, then must include the year of appliaction below")]
        public bool EachYear { get; set; }

        [Description("Dates for one or more fertiliser applications (dd-mmm or dd-mmm-yyyy) as a list with a comma between dates")]
        public string[] Dates { get; set; }

        [Separator("Test for the mineral N in the soil and don't apply the fertiliser if greater than X kgN/ha is stored in the soil above a depth of Y mm")]
        [Description("Use a critical soil mineral N to prevent application above a threshold?")]
        public bool UseCritNThreshold { get; set; }

        [Description("Don't add fertiliser if N in the soil to the depth below exceeds (kg/ha)")]
        public double CritNThreshold { get; set; }

        [Description("Depth to which the amount of N in the soil should be calculated (mm)")]
        public double CritNDepth { get; set; }

        [Separator("Fertiliser application details")]
        [Description("Depth at which to apply the fertiliser (mm)")]
        public double Depth { get; set; }

        [Description("Amount of fertiliser to apply (kg N /ha) per application")]
        public double Amount { get; set; }

        [Description("Fertiliser type - select from the list")]
        public Fertiliser.Types FertiliserType { get; set; }


        [EventSubscribe("StartOfSimulation")]
        private void FindSoilNOrNutrient(object sender, EventArgs e)
        {
            nutrient = this.FindInScope<Nutrient>() as Nutrient;
            soilN = this.FindInScope<SoilNitrogen>() as SoilNitrogen;

            if (nutrient == null && soilN == null)
                throw new Exception(string.Format("Error in script {0}: Unable to find nutrient or soilN.", Name));
        }

        [EventSubscribe("DoManagement")]
        private void OnDoManagement(object sender, EventArgs e)
        {
            if (OnApplicationDate())
            {
                if (NContentBelowThreshold())
                    fertiliser.Apply(Amount, FertiliserType, Depth);
                else
                    summary.WriteMessage(this, "Skipping fertiliser application due to soil mineral N content being above critical threshold.", MessageType.Diagnostic);
            }
        }

        /// <summary>Checks if today's date is one of the specified fertiliser application dates.</summary>
        private bool OnApplicationDate()
        {
            if (EachYear)
                return Dates.Any(d => DateUtilities.DatesEqual(d, clock.Today));
            
            DateTime[] dates = Dates.Select(d => DateTime.ParseExact(d, "d-MMM-yyyy", null)).ToArray();
            return dates.Any(d => SameDate(d, clock.Today));
        }

        /// <summary>Checks if N content in soil is below critical threshold.</summary>
        private bool NContentBelowThreshold()
        {
            if (!UseCritNThreshold)
                return true;
            
            double[] weights = GetLayerWeights();
            double cumSoilN = 0;

            for (int i = 0; i < soilPhysical.Thickness.Length; i++)
            {
                if (nutrient != null)
                    cumSoilN += weights[i] * nutrient.MineralN[i];
                else if (soilN != null)
                    cumSoilN += weights[i] * soilN.mineral_n[i];
            }

            return cumSoilN <= CritNThreshold;
        }

        private double[] GetLayerWeights()
        {
            double[] weights = new double[soilPhysical.Thickness.Length];
            double cumDepth = 0;

            for (int i = 0; i < soilPhysical.Thickness.Length; i++)
            {
                cumDepth += soilPhysical.Thickness[i];
                if (cumDepth < CritNDepth)
                    weights[i] = 1;
                else if (cumDepth - soilPhysical.Thickness[i] <= CritNDepth)
                    weights[i] = (CritNDepth - (cumDepth - soilPhysical.Thickness[i])) / soilPhysical.Thickness[i];
                else
                    weights[i] = 0;
            }

            return weights;
        }

        private bool SameDate(DateTime d1, DateTime d2)
        {
            return d1.Year == d2.Year && d1.DayOfYear == d2.DayOfYear;
        }
    }
}
```
          Manager AutomaticIrrigation
            allowIrrigation = True
            seasonStart = 1-sep
            seasonEnd = 30-apr
            seasonsAllocation = 10000
            triggerDeficit = 75
            targetDeficit = 95
            returndays = 3
            maximumAmount = 30
            depthPAWC = 300
            TopSWdeficit = 0
            TopSWC = 0
            DaysSinceIrrigation = 0
            AmountToApply = 0
            SeasonAppliedAmount = 0
            script: same as in Validation.Radcliffe.Factors.Location.WinchmoreIrrig.AutomaticIrrigation
          MicroClimate: a_interception=0; b_interception=1; c_interception=0; d_interception=0; SoilHeatFluxFraction=0.4; MinimumHeightDiffForNewLayer=0; NightInterceptionFraction=0.5; ReferenceHeight=2
          Irrigation
          Fertiliser
          SurfaceOrganicMatter: InitialResidueName=Sward; InitialResidueType=grass; InitialResidueMass=1000; InitialStandingFraction=0; InitialCPR=0; InitialCNR=15
          Soil: same as Sensibility.Sensibility.Factors.Permutation.Location.Lincoln.LincolnSoil
          PastureSpecies AGPRyegrass: InitialShootDM=1500; InitialRootDM=450; InitialRootDepth=750
          PastureSpecies AGPWhiteClover: InitialShootDM=500; InitialRootDM=150; InitialRootDepth=350
          Report ReportGrazing: EventNames=[SimpleGrazing].Grazed
            VariableNames:
              [Clock].Today as Date
              Sum of [SimpleGrazing].GrazedDM from 1-Jul to [Clock].Today as GrazedDM
          Report ReportAnnual: EventNames=[Clock].EndOfYear
            VariableNames:
              [Clock].Today as Date
              Sum of [SimpleGrazing].GrazedDM from 1-jul to [Clock].Today as GrazedDM
          Report: EventNames=[SimpleGrazing].Grazed
            VariableNames:
              [Clock].Today as Date
              [Fertiliser].NitrogenApplied
              [FertiliseFixedDates].Script.Amount
              //Sum of [FertiliseFixedDates].Script.Amount from 1-Jul to [Clock].Today as FertiliserNApplied_kgN_ha   // fertiliser applied
              //Sum of [Fertiliser].NitrogenApplied from 1-Jul to [Clock].Today as FertiliserNApplied_kgN_ha   // fertiliser applied
              //Sum of ([AGPRyegrass].HarvestedWt + [AGPWhiteClover].HarvestedWt) / 1000.0 from 1-Jul to [Clock].Today as HarvestedWt_t_ha   //the amount harvested (kg DM /ha)
        Forages
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