Simulations: Version=133
  DataStore
  Simulation SpeciesTable
    Memo
      Listed in the table below are the default values for all parameters for all AgPasture species.
    Clock: Start=1972-01-01; End=1972-01-01
    Weather: FileName=%root%\Tests\WeatherFiles\lincoln.met
    Summary
    SoilArbitrator
    MicroClimate: a_interception=0; b_interception=0; c_interception=0; d_interception=0; soil_albedo=0.23; SoilHeatFluxFraction=0.4; MinimumHeightDiffForNewLayer=0; NightInterceptionFraction=0.5; ReferenceHeight=2
    Zone Field: Area=1; Slope=0; AspectAngle=0; Altitude=50
      SurfaceOrganicMatter: InitialResidueName=Sward; InitialResidueType=grass; InitialResidueMass=1000; InitialStandingFraction=0; InitialCPR=0; InitialCNR=15
      Soil: SoilType=Umbric Andosol (ANu); Country=New Zealan; Latitude=-37.967; Longitude=175.767
        DataSource=Romero, C.C., Hoogenboom, G., Baigorria, G.A., Koo, J., Gijsman, A.J., Wood, S., 2012. Reanalysis of a global soil database for crop and environmental modeling. Environmental Modelling & Software 35, 163-170.  https://harvestchoice.wufoo.com/forms/download-wisol.
        Comments=You will need to add crops to this soil before running simulations.
        Physical
          Thickness  BD    AirDry  LL15   DUL   SAT
          180        0.73  0.05    0.148  0.35  0.656
          120        0.7   0.05    0.147  0.35  0.691
          210        0.69  0.03    0.088  0.25  0.699
          230        0.77  0.03    0.1    0.2   0.672
          SoilCrop RyegrassSoil: LL=[0.14, 0.14, 0.14, 0.14]; KL=[0.1, 0.1, 0.1, 0.02]; XF=[1, 1, 1, 1]
          SoilCrop WhiteCloverSoil: LL=[0.14, 0.14, 0.14, 0.14]; KL=[0.1, 0.1, 0.1, 0.02]; XF=[1, 1, 1, 1]
          SoilCrop BrowntopSoil: LL=[0.14, 0.14, 0.14, 0.14]; KL=[0.1, 0.1, 0.1, 0.02]; XF=[1, 1, 1, 1]
          SoilCrop CocksfootSoil: LL=[0.14, 0.14, 0.14, 0.14]; KL=[0.1, 0.1, 0.1, 0.02]; XF=[1, 1, 1, 1]
          SoilCrop KikuyuSoil: LL=[0.14, 0.14, 0.14, 0.14]; KL=[0.1, 0.1, 0.1, 0.02]; XF=[1, 1, 1, 1]
          SoilCrop LucerneSoil: LL=[0.14, 0.14, 0.14, 0.14]; KL=[0.1, 0.1, 0.1, 0.02]; XF=[1, 1, 1, 1]
          SoilCrop PaspalumSoil: LL=[0.14, 0.14, 0.14, 0.14]; KL=[0.1, 0.1, 0.1, 0.02]; XF=[1, 1, 1, 1]
          SoilCrop PhalarisSoil: LL=[0.14, 0.14, 0.14, 0.14]; KL=[0.1, 0.1, 0.1, 0.02]; XF=[1, 1, 1, 1]
          SoilCrop RedCloverSoil: LL=[0.14, 0.14, 0.14, 0.14]; KL=[0.1, 0.1, 0.1, 0.02]; XF=[1, 1, 1, 1]
          SoilCrop RhodesSoil: LL=[0.14, 0.14, 0.14, 0.14]; KL=[0.1, 0.1, 0.1, 0.02]; XF=[1, 1, 1, 1]
          SoilCrop TallFescueSoil: LL=[0.14, 0.14, 0.14, 0.14]; KL=[0.1, 0.1, 0.1, 0.02]; XF=[1, 1, 1, 1]
        WaterBalance SoilWater: SummerDate=1-Nov; SummerU=9.12; SummerCona=3; WinterDate=1-Apr; WinterU=9.12; WinterCona=3; DiffusConst=0; DiffusSlope=0; Salb=0.13; CN2Bare=73; CNRed=0; CNCov=0; Thickness=[180, 120, 210, 230]; SWCON=[0.5, 0.5, 0.5, 0.7]
        Nutrient
        Organic: FOMCNRatio=0
          Thickness  Carbon  SoilCNRatio  FBiom  FInert  FOM
          180        7.9     11.01        0.02   0.26    0
          120        2       11.01        0.02   1       0
          210        1       11.01        0.02   1       0
          230        0.5     11.01        0.01   1       0
        Chemical
          Thickness  NO3N  NH4N  PH
          180        0.1   0.1   5.6
          120        0.1   0.1   6.2
          210        0.1   0.1   6.2
          230        0.1   0.1   6.4
        InitialWater Initial Water: PercentMethod=0; FractionFull=1
        CERESSoilTemperature Temperature
      PastureSpecies Ryegrass: InitialShootDM=1500; InitialRootDM=450; InitialRootDepth=400; ResourceName=AGPRyegrass
      PastureSpecies WhiteClover: InitialShootDM=500; InitialRootDM=150; InitialRootDepth=200; ResourceName=AGPWhiteClover
      PastureSpecies Browntop: InitialShootDM=0; InitialRootDM=0; InitialRootDepth=0; ResourceName=AGPBrowntop
      PastureSpecies Cocksfoot: InitialShootDM=0; InitialRootDM=0; InitialRootDepth=0; ResourceName=AGPCocksfoot
      PastureSpecies Kikuyu: InitialShootDM=0; InitialRootDM=0; InitialRootDepth=0; ResourceName=AGPKikuyu
      PastureSpecies Lucerne: InitialShootDM=0; InitialRootDM=0; InitialRootDepth=0; ResourceName=AGPLucerne
      PastureSpecies Paspalum: InitialShootDM=0; InitialRootDM=0; InitialRootDepth=0; ResourceName=AGPPaspalum
      PastureSpecies Phalaris: InitialShootDM=0; InitialRootDM=0; InitialRootDepth=0; ResourceName=AGPPhalaris
      PastureSpecies RedClover: InitialShootDM=0; InitialRootDM=0; InitialRootDepth=0; ResourceName=AGPRedClover
      PastureSpecies Rhodes: InitialShootDM=0; InitialRootDM=0; InitialRootDepth=0; ResourceName=AGPRhodes
      PastureSpecies TallFescue: InitialShootDM=0; InitialRootDM=0; InitialRootDepth=0; ResourceName=AGPTallFescue
      Manager
```csharp
using System;
using System.Collections.Generic;
using System.Xml.Serialization;
using System.Text;
using System.IO;
using Models.Core;
using Models.PMF;
using Models.Soils;
using APSIM.Shared.Utilities;
using Models.Interfaces;
using System.Data;
using System.Linq;

namespace Models
{
    [Serializable]
    public class Script : Model, ICustomDocumentation
    {
        /// <summary>Writes documentation for this function by adding to the list of documentation tags.</summary>
        /// <param name="tags">The list of tags to add to.</param>
        /// <param name="headingLevel">The level (e.g. H2) of the headings.</param>
        /// <param name="indent">The level of indentation 1, 2, 3 etc.</param>
        public void Document(List<AutoDocumentation.ITag> tags, int headingLevel, int indent)
        {
        	IEnumerable<AgPasture.PastureSpecies> models = FindAllInScope<AgPasture.PastureSpecies>();
            tags.Add(new AutoDocumentation.PageSetup() { Portrait = false });

            DataTable table = new DataTable();
            table.Columns.Add("Parameter name");
            if (models.Any())
            {
                foreach (var model in models)
                    table.Columns.Add(model.Name);
				System.Diagnostics.Debugger.Break();
                var parameterNames = models.First().GetModelParameterNames();

                foreach (var parameterName in parameterNames)
                {
                    var row = table.NewRow();
                    row["Parameter name"] = parameterName;
                    foreach (var model in models)
                    {
                    	IVariable variable = model.FindByPath(parameterName);
                    	if (variable != null)
                    	{
		                    var value = variable.Value;
		                    // ReflectionUtilities.GetValueOfFieldOrProperty(parameterName, model);
		                    if (value != null)
		                    {
		                        if (value is double[])
		                            value = StringUtilities.BuildString(value as double[], "f4");
		                        row[model.Name] = value.ToString();
		                    }
		                }
                    }
                    table.Rows.Add(row);
                }
            }
            tags.Add(new AutoDocumentation.Table(table, indent, style:"Small"));
        }
    }
}
```
