Simulations: Version=80
  Memo TitlePage
    #The APSIM AgroforestrySystem Model#

    The APSIM Agroforestry model has been developed to facilitate the modelling of tree-crop and silvopastoral systems.  It has been tested on a range of datasets from constrasting agorforestry systems, soils and climates.  It makes use of APSIM's ability to simulate multiple zones within a production system [holzworth_apsim_2014] for simulating soil and plant processes at different locations within a windbreak, isolated tree or alley system.

    The role of this model is not to simulate tree production, but to simulate crop or pasture production in agroforestry systems by calculating tree-crop interactions via microclimate and soil effects.

    The proxy tree component of this model is intended also to be a guide for developing active trees for use in this model, as such trees would need to interact similarly with the crop or pasture component of the system.
  Replacements
    Soil MachakosSoil: Site=ICRAF Machakos Research Station; NearestTown=Machakos; Country=Kenya; Latitude=-1.55; Longitude=37.13
      Physical
        Thickness  BD    AirDry  LL15  DUL   SAT
        200        1.35  0.04    0.1   0.2   0.35
        200        1.35  0.04    0.1   0.2   0.35
        200        1.35  0.14    0.14  0.22  0.37
        200        1.4   0.15    0.17  0.24  0.37
        200        1.4   0.16    0.17  0.24  0.38
        200        1.4   0.16    0.17  0.24  0.38
        200        1.4   0.16    0.17  0.24  0.38
        200        1.4   0.16    0.17  0.24  0.38
        SoilCrop MaizeSoil: LL=[0.1, 0.1, 0.14, 0.17, 0.17, 0.17, 0.17, 0.17]; KL=[0.08, 0.08, 0.08, 0.08, 0.06, 0.04, 0.03, 0.02]; XF=[1, 1, 1, 1, 1, 1, 1, 1]
      SoilWater: SummerDate=1-Nov; SummerU=9; SummerCona=2.5; WinterDate=1-Apr; WinterU=9; WinterCona=2.5; DiffusConst=88; DiffusSlope=35.4; Salb=0.13; CN2Bare=65; CNRed=20; CNCov=0.8; max_pond=0; Thickness=[200, 1400]; SWCON=[0.7, 0.7]; PrecipitationInterception=0
      SoilNitrogen: fom_types=[default, manure, mucuna, lablab, shemp, stable]; fract_carb=[0.2, 0.3, 0.54, 0.57, 0.45, 0]; fract_cell=[0.7, 0.3, 0.37, 0.37, 0.47, 0.1]; fract_lign=[0.1, 0.4, 0.09, 0.06, 0.08, 0.9]
        SoilNitrogenNO3 NO3
        SoilNitrogenNH4 NH4
        SoilNitrogenUrea Urea
        SoilNitrogenPlantAvailableNO3 PlantAvailableNO3
        SoilNitrogenPlantAvailableNH4 PlantAvailableNH4
      Organic: FOMCNRatio=45
        Thickness  Carbon  SoilCNRatio  FBiom  FInert  FOM
        200        1.1     12           0.04   0.4     164.548
        200        0.8     12           0.02   0.5     113.092
        200        0.6     12           0.01   0.8     77.7268
        200        0.6     12           0.01   0.9     53.4208
        200        0.2     12           0.01   0.95    36.7156
        200        0.1     12           0.01   0.95    25.2342
        200        0.1     12           0.01   0.99    17.3432
        200        0.1     12           0.01   0.99    11.9198
      Chemical
        Thickness  NO3N  NH4N  PH
        200        5     0.1   6.5
        200        3     0.1   6.5
        200        2     0.1   6.5
        200        1     0.1   6.5
        200        0.5   0.1   6.5
        200        0.5   0.1   6.5
        200        0.5   0.1   6.5
        200        0.5   0.1   6.5
      Sample: Thickness=[200, 200, 200, 200, 200, 200, 200, 200]; SW=[0.13, 0.13, 0.16, 0.176, 0.17, 0.17, 0.17, 0.17]; SWUnits=Volumetric; OCUnits=Total; PHUnits=Water
      CERESSoilTemperature
  DataStore
    ExcelInput Observed: FileNames=[Observed.xlsx]; SheetNames=[ObservedWarraBlock1]
    ExcelInput ObservedMoora: FileNames=[Observed.xlsx]; SheetNames=[Moora, MooraET]
    PredictedObserved: PredictedTableName=DailyReport; ObservedTableName=ObservedWarraBlock1; FieldNameUsedForMatch=Zone; FieldName2UsedForMatch=Date
      Tests: POName=PredictedObserved
        AcceptedStats:
          Name       n    Slope      Intercept  SEslope    SEintercept  R2        RMSE     NSE        ME        MAE       RSR
          BiomassWt  9    0.479429   145.629    0.29486    131.082      0.27414   301.279  0.118353   -14.5488  203.036   0.88526
          Distance   103  0.996537   0.70538    0.0101368  0.273079     0.989658  1.77633  0.988109   0.631068  0.631068  0.108515
          GrainWt    7    0.0738547  60.399     0.240311   44.502       0.01854   160.329  -0.265048  -49.0815  108.143   1.04131
          SW90cm     96   0.729402   79.8121    0.0620934  15.7781      0.594808  34.0375  0.498981   12.2948   27.0844   0.704131
        AcceptedStatsName=Name n Slope Intercept SEslope SEintercept R2 RMSE NSE ME MAE RSR
    ExcelInput ObservedMachakos: FileNames=[OdhiamboObserved.xlsx]; SheetNames=[OBSCrop, OBSSW35cm, OBSSW55cm, OBSSW75cm]
    PredictedObserved PredictedObservedMoora: PredictedTableName=DailyReport; ObservedTableName=Moora; FieldNameUsedForMatch=Zone; FieldName2UsedForMatch=Date
  Folder Validation
    Folder Warra
      Memo
        This test evaluates the performance of the APSIM AgroforestrySystem model in simulating the crop and soil water data for the data of [HuthPhD2010].  Monitoring of tree-crop interactions was undertaken on a farm near the township of Warra, Qld (26.93<sup>o</sup>S, 150.93<sup>o</sup>E), where a belt of four rows of Eucalyptus argophloia at approximately 5 x 5 m spacing had been planted along the edge of fields used to grow wheat (*Triticum aestivum* L.), cotton (*Gossypium hirsutum* L.) and chickpeas (*Cicer arietinum* L.). The trees were about 7 years old and nearly 10 m high at the start of the study. Tree-crop interactions were monitored over 3 cropping seasons (two winters and one summer) in two bays on opposite sides of the eucalypt belt. Agronomic management in the two cropping bays varied as they were at different stages of a cropping rotation. The bay used in this model test was sown to wheat in the winter of 2004 and remained fallow during the ensuing summer and winter growing seasons. Prior to harvest of the crop, plant samples were taken from quadrats consisting of 1 m of each plant row in 5 linear transects out to 50 m from the shelterbelt [HuthRobertsonPoulton2010]. As germination failure was significant next to the trees, sampling positions were at 25, 30, 35, 40 and 50 m. The monitoring of soil moisture and its extraction by both trees and crops was undertaken using electromagnetic induction measurements [HuthPoulton2007] taken at 5 m intervals in four 50 m transects from the belt of trees.

        The simulations were developed using data from various sources. Rainfall data were obtained from an Australian Bureau of Meteorology rainfall station (No. 41291) situated on a farm 4.1 km from the study site. Soil properties were based on the data of [HuthRobertsonPoulton2010].

        NOTE: Yield predictions at this site are adequate, but an issue with simulating failed germination has been identified.  Data from the trial show complete germination failure out to a distance of 22 m from the trees.  The APSIM-Wheat model was not able to capture this germination failure, though much of the yield impact was captured through competition for water resources.
      Simulation Warra
        Clock: Start=2004-03-22; End=2005-10-04
        Summary SummaryFile
        Weather: FileName=warra.met
        SoilArbitrator Soil Arbitrator
        AgroforestrySystem WindbreakSystem: RainfallInterceptionFraction=0; RainShaddowWidth=0; Slope=0; AspectAngle=0; Altitude=50
          Manager SowingRule
            SowDate = 7/06/2004
            CultivarName = h45
            SowingDepth = 30
            RowSpacing = 250
            Population = 120
            Amount = 60
            CropName = wheat
```csharp
using System;
using System.Collections.Generic;
using Models.Core;
using Models.Agroforestry;
using Models.PMF;
using Models.Soils;
using Models.Utilities;
using Models.Zones;
using APSIM.Shared.Utilities;

namespace Models
{
    [Serializable]
    public class Script : Model
    {
        [Link] Clock Clock;
        [Link] Summary Summary;
        
        [Description("Sowing date (d-mmm-yyyy)")]
        public string SowDate { get; set; }
        [Description("Cultivar to be sown")]
        public string CultivarName { get; set; }
        [Description("Sowing depth (mm)")]
        public double SowingDepth { get; set; }
        [Description("Row spacing (mm)")]
        public double RowSpacing { get; set; }
        [Description("Plant population (/m2)")]
        public double Population { get; set; }
        [Description("Amount of fertiliser to be applied (kg/ha)")]
        public double Amount { get; set; }
        [Description("Crop to be fertilised")]
        public string CropName { get; set; }
        
        private List<IModel> Zones;
        private Plant Wheat;
        private Soil Soil;
        
        [EventSubscribe("Commencing")]
        private void OnSimulationCommencing(object sender, EventArgs e)
        {
            Zones = Apsim.FindAll(this, typeof(RectangularZone));
        }
        
        [EventSubscribe("DoManagement")]
        private void OnDoManagement(object sender, EventArgs e)
        {        
            
                foreach (Zone z in Zones)
                {
                    Wheat = Apsim.Find(z, typeof(Plant)) as Plant;    
                    Soil = Apsim.Find(z, typeof(Soil)) as Soil;
                            
                    if (DateUtilities.DMYtoDate(SowDate) == Clock.Today && Wheat != null && !Wheat.IsAlive)
                    {
                        Wheat.Sow(population: Population, cultivar: CultivarName, depth: SowingDepth, rowSpacing: RowSpacing);
                        Fertiliser Fertiliser = Apsim.Find(Wheat.Parent, typeof(Fertiliser)) as Fertiliser;
                        Fertiliser.Apply(Amount: Amount, Type: Fertiliser.Types.NO3N);
                    }
                    //else
                    //    throw new ApsimXException(null, "Cannot sow wheat on that date");
                    if (Wheat != null && Wheat.Phenology.DaysAfterSowing == 30 && Wheat.Phenology.Stage < 2)
                    {
                    Wheat.EndCrop();
                    }

                    if (Wheat != null && Wheat.IsReadyForHarvesting)
                    {
                        Wheat.Harvest();
                        Wheat.EndCrop();    
                    }
                }
        }
    }
}
```
          TreeProxy: RootRadius=0.02; NumberOfTrees=0; Kd=1e-07; BaseKL=0.05; KValue=0.5; Heights=[10000, 10000, 10000, 10000, 10000]; NDemands=[0.1, 0.1, 0.1, 0.1, 0.1]; ShadeModifiers=[1, 1, 1, 1, 1]
            Table=[[Parameter, 0, 0.5h, 1h, 1.5h, 2h, 2.5h, 3h, 4h, 5h, 6h], [Shade (%), Root Length Density (cm/cm3), Depth (cm), 0-5, 5-15, 15-30, 30-60, 60-90, 90-120, 120-150], [80, -, -, 1, 1, .6, .3, .2, .1, .1], [0, -, -, .6, .6, .3, .2, .1, .1, .1], [0, -, -, .3, .3, .1, .1, .1, .1, 0], [0, -, -, .2, .2, .1, .1, .05, .05, 0], [0, -, -, .02, .02, .02, .02, .01, 0, 0], [0, -, -, .01, .01, .01, 0, 0, 0, 0], [0, -, -, .01, .01, .01, 0, 0, 0, 0], [0, -, -, 0, 0, 0, 0, 0, 0, 0], [0, -, -, 0, 0, 0, 0, 0, 0, 0], [0, -, -, 0, 0, 0, 0, 0, 0, 0]]
            Dates=[1900-01-01, 1900-03-01, 1900-06-01, 1900-09-01, 1900-12-31]
          Report TreeReport: EventNames=[Clock].DoReport
            VariableNames:
              [Clock].Today as Date
              [TreeProxy].TreeWaterUptake
          RectangularZone TreeRow: Length=100; Width=5; Slope=0; AspectAngle=0; Altitude=50
            LocalMicroClimate
            MicroClimate: a_interception=0; b_interception=0; c_interception=0; d_interception=0; soil_albedo=0.23; SoilHeatFluxFraction=0.4; MinimumHeightDiffForNewLayer=0; NightInterceptionFraction=0.5; ReferenceHeight=2
            Report DailyReport: EventNames=[Clock].DoReport
              VariableNames:
                [Clock].Today as Date
                Parent.Distance as Distance
                [LocalMicroClimate].Wind
                sum([Soil].SoilNitrogen.NO3.kgha) as TotalNO3N
                sum([Soil].SoilNitrogen.NH4.kgha) as TotalNH4N
                sum([TreeProxy].WaterUptake) as WaterUptake
                sum([Soil].SoilWater.SWmm[1:4]) as SW90cm
                [TreeProxy].H
                [TreeProxy].SWDemand
                [TreeProxy].heightToday
                [Soil].SoilWater.Eo
                [TreeProxy].WaterStress
                [Soil].SoilWater.SW[1] as SurfaceSW
                [Soil].SoilWater.Es as Es
                sum([Soil].SoilWater.ESW) as ESW
                [Soil].SoilWater.Eo as Eo
                [Soil].SoilWater.t
            Fertiliser
            SurfaceOrganicMatter: InitialResidueName=wheat_stubble; InitialResidueType=wheat; InitialResidueMass=500; InitialStandingFraction=0; InitialCPR=0; InitialCNR=100; FractionFaecesAdded=1
            Soil: ASCOrder=Vertosol; ASCSubOrder=Grey; SoilType=Clay; Site=Warra; NearestTown=Warra, Q, 4411; Region=Darling Downs and Granite Belt; State=Queensland; Country=Australia; NaturalVegetation=Brigalow scrub; ApsoilNumber=19; Latitude=-26.897; Longitude=150.909; LocationAccuracy=+/- 20m; DataSource=0; Comments=CSIRO Sustainable Ecosystems, Toowoomba
              Physical
                Thickness  BD    AirDry  LL15  DUL   SAT   KS
                150        1.39  0.1     0.18  0.4   0.45  20
                150        1.35  0.17    0.19  0.41  0.46  20
                300        1.35  0.17    0.19  0.41  0.46  20
                300        1.43  0.17    0.2   0.38  0.43  20
                300        1.44  0.17    0.23  0.38  0.43  20
                300        1.45  0.17    0.25  0.37  0.42  20
              SoilWater: SummerDate=1-Nov; SummerU=6; SummerCona=3.5; WinterDate=1-Apr; WinterU=6; WinterCona=3.5; DiffusConst=20; DiffusSlope=8; Salb=0.12; CN2Bare=73; CNRed=20; CNCov=0.8; max_pond=0; Thickness=[150, 150, 300, 300, 300, 300]; SWCON=[0.3, 0.3, 0.3, 0.3, 0.3, 0.3]; PrecipitationInterception=0
              SoilNitrogen: same as Replacements.MachakosSoil.SoilNitrogen
              Organic: FOMCNRatio=40
                Thickness  Carbon  SoilCNRatio  FBiom  FInert  FOM
                150        0.915   12           0.04   0.4     390.598
                150        0.777   12           0.02   0.6     289.362
                300        0.346   12           0.02   0.8     158.805
                300        0.231   12           0.02   1       87.1541
                300        0.154   12           0.01   1       47.8312
                300        0.123   12           0.01   1       26.2503
              Chemical
                Thickness  NO3N  NH4N  PH
                150        1     0.1   8
                150        1     0.1   8
                300        1     0.1   8
                300        1     0.1   8
                300        1     0.1   8
                300        1     0.1   8
              Sample InitialN: Thickness=[150, 150, 300, 300, 300, 300]; SWUnits=Volumetric; OCUnits=Total; PHUnits=Water
              Fertiliser
              Sample: Thickness=[50, 100, 150, 300, 300, 300, 300]; SW=[0.2, 0.3, 0.29, 0.28, 0.26, 0.26, 0.29]; SWUnits=Volumetric; OCUnits=Total; PHUnits=Water
              CERESSoilTemperature
          RectangularZone 5m: Length=100; Width=5; Slope=0; AspectAngle=0; Altitude=50
            LocalMicroClimate
            MicroClimate: a_interception=0; b_interception=0; c_interception=0; d_interception=0; soil_albedo=0.23; SoilHeatFluxFraction=0.4; MinimumHeightDiffForNewLayer=0; NightInterceptionFraction=0.5; ReferenceHeight=2
            Report HarvestReport: EventNames=[Wheat].Harvesting
              VariableNames:
                [Clock].Today
                [Zone].Area
                Parent.Distance as Distance
                [Wheat].AboveGround.Wt as BiomassWt
                [Wheat].Grain.Wt as GrainWt
                [Wheat].Grain.Size as GrainSize
                [Wheat].Grain.Number as GrainNumber
            Report DailyReport: EventNames=[Clock].DoReport
              VariableNames:
                [Clock].Today as Date
                Parent.Distance as Distance
                [LocalMicroClimate].Wind
                sum([Soil].SoilNitrogen.NO3.kgha) as TotalNO3N
                sum([Soil].SoilNitrogen.NH4.kgha) as TotalNH4N
                sum([TreeProxy].WaterUptake) as WaterUptake
                sum([Soil].SoilWater.SWmm[1:4]) as SW90cm
                [TreeProxy].H
                [TreeProxy].SWDemand
                [TreeProxy].heightToday
                [Soil].SoilWater.Eo
                [TreeProxy].WaterStress
                [Soil].SoilWater.SW[1] as SurfaceSW
                [Wheat].AboveGround.Wt as BiomassWt
                [Wheat].Grain.Wt as GrainWt
                [Soil].SoilWater.Es as Es
                sum([Soil].SoilWater.ESW) as ESW
                [Soil].SoilWater.Eo as Eo
                [Soil].SoilWater.t
                [Wheat].Phenology.Stage
                [Wheat].Phenology.DaysAfterSowing
            Fertiliser
            SurfaceOrganicMatter: InitialResidueName=wheat_stubble; InitialResidueType=wheat; InitialResidueMass=500; InitialStandingFraction=0; InitialCPR=0; InitialCNR=100; FractionFaecesAdded=1
            Soil: ASCOrder=Vertosol; ASCSubOrder=Grey; SoilType=Clay; Site=Warra; NearestTown=Warra, Q, 4411; Region=Darling Downs and Granite Belt; State=Queensland; Country=Australia; NaturalVegetation=Brigalow scrub; ApsoilNumber=19; Latitude=-26.897; Longitude=150.909; LocationAccuracy=+/- 20m; DataSource=0; Comments=CSIRO Sustainable Ecosystems, Toowoomba
              Physical
                Thickness  BD    AirDry  LL15  DUL   SAT   KS
                150        1.39  0.1     0.18  0.4   0.45  20
                150        1.35  0.17    0.19  0.41  0.46  20
                300        1.35  0.17    0.19  0.41  0.46  20
                300        1.43  0.17    0.2   0.38  0.43  20
                300        1.44  0.17    0.23  0.38  0.43  20
                300        1.45  0.17    0.25  0.37  0.42  20
                SoilCrop WheatSoil: LL=[0.18, 0.19, 0.19, 0.2, 0.23, 0.25]; KL=[0.06, 0.06, 0.06, 0.06, 0.06, 0.06]; XF=[1, 1, 1, 1, 1, 1]
              SoilWater: same as Validation.Warra.Warra.WindbreakSystem.TreeRow.Soil.SoilWater
              SoilNitrogen: same as Replacements.MachakosSoil.SoilNitrogen
              Organic: same as Validation.Warra.Warra.WindbreakSystem.TreeRow.Soil.Organic
              Chemical
                Thickness  NO3N  NH4N  PH
                150        1     0.1   8
                150        1     0.1   8
                300        1     0.1   8
                300        1     0.1   8
                300        1     0.1   8
                300        1     0.1   8
              Sample: Thickness=[50, 100, 150, 300, 300, 300, 300]; SW=[0.2, 0.25, 0.3, 0.3, 0.31, 0.3, 0.3]; SWUnits=Volumetric; OCUnits=Total; PHUnits=Water
              CERESSoilTemperature
            Plant Wheat: CropType=Wheat; IsEnding=false; DaysAfterEnding=0
          RectangularZone 10m: Length=100; Width=5; Slope=0; AspectAngle=0; Altitude=50
            LocalMicroClimate
            MicroClimate: a_interception=0; b_interception=0; c_interception=0; d_interception=0; soil_albedo=0.23; SoilHeatFluxFraction=0.4; MinimumHeightDiffForNewLayer=0; NightInterceptionFraction=0.5; ReferenceHeight=2
            Report HarvestReport: EventNames=[Wheat].Harvesting
              VariableNames:
                [Clock].Today
                [Zone].Area
                Parent.Distance as Distance
                [Wheat].AboveGround.Wt as BiomassWt
                [Wheat].Grain.Wt as GrainWt
                [Wheat].Grain.Size as GrainSize
                [Wheat].Grain.Number as GrainNumber
            Report DailyReport: EventNames=[Clock].DoReport
              VariableNames:
                [Clock].Today as Date
                Parent.Distance as Distance
                [LocalMicroClimate].Wind
                sum([Soil].SoilNitrogen.NO3.kgha) as TotalNO3N
                sum([Soil].SoilNitrogen.NH4.kgha) as TotalNH4N
                sum([TreeProxy].WaterUptake) as WaterUptake
                sum([Soil].SoilWater.SWmm[1:4]) as SW90cm
                [TreeProxy].H
                [TreeProxy].SWDemand
                [TreeProxy].heightToday
                [Soil].SoilWater.Eo
                [TreeProxy].WaterStress
                [Soil].SoilWater.SW[1] as SurfaceSW
                [Wheat].AboveGround.Wt as BiomassWt
                [Wheat].Grain.Wt as GrainWt
                [Soil].SoilWater.Es as Es
                sum([Soil].SoilWater.ESW) as ESW
                [Soil].SoilWater.Eo as Eo
                [Soil].SoilWater.t
            Fertiliser
            SurfaceOrganicMatter: InitialResidueName=wheat_stubble; InitialResidueType=wheat; InitialResidueMass=500; InitialStandingFraction=0; InitialCPR=0; InitialCNR=100; FractionFaecesAdded=1
            Soil: ASCOrder=Vertosol; ASCSubOrder=Grey; SoilType=Clay; Site=Warra; NearestTown=Warra, Q, 4411; Region=Darling Downs and Granite Belt; State=Queensland; Country=Australia; NaturalVegetation=Brigalow scrub; ApsoilNumber=19; Latitude=-26.897; Longitude=150.909; LocationAccuracy=+/- 20m; DataSource=0; Comments=CSIRO Sustainable Ecosystems, Toowoomba
              Physical: same as Validation.Warra.Warra.WindbreakSystem.5m.Soil.Physical
              SoilWater: same as Validation.Warra.Warra.WindbreakSystem.TreeRow.Soil.SoilWater
              SoilNitrogen: same as Replacements.MachakosSoil.SoilNitrogen
              Organic: same as Validation.Warra.Warra.WindbreakSystem.TreeRow.Soil.Organic
              Chemical
                Thickness  NO3N  NH4N  PH
                150        1     0.1   8
                150        1     0.1   8
                300        1     0.1   8
                300        1     0.1   8
                300        1     0.1   8
                300        1     0.1   8
              Sample: Thickness=[50, 100, 150, 300, 300, 300, 300]; SW=[0.2, 0.3, 0.35, 0.33, 0.3, 0.26, 0.29]; SWUnits=Volumetric; OCUnits=Total; PHUnits=Water
              CERESSoilTemperature
            Plant Wheat: CropType=Wheat; IsEnding=false; DaysAfterEnding=0
          RectangularZone 15m: Length=100; Width=5; Slope=0; AspectAngle=0; Altitude=50
            LocalMicroClimate
            MicroClimate: a_interception=0; b_interception=0; c_interception=0; d_interception=0; soil_albedo=0.23; SoilHeatFluxFraction=0.4; MinimumHeightDiffForNewLayer=0; NightInterceptionFraction=0.5; ReferenceHeight=2
            Report HarvestReport: EventNames=[Wheat].Harvesting
              VariableNames:
                [Clock].Today
                [Zone].Area
                Parent.Distance as Distance
                [Wheat].AboveGround.Wt as BiomassWt
                [Wheat].Grain.Wt as GrainWt
                [Wheat].Grain.Size as GrainSize
                [Wheat].Grain.Number as GrainNumber
            Report DailyReport: same as Validation.Warra.Warra.WindbreakSystem.10m.DailyReport
            Fertiliser
            SurfaceOrganicMatter: InitialResidueName=wheat_stubble; InitialResidueType=wheat; InitialResidueMass=500; InitialStandingFraction=0; InitialCPR=0; InitialCNR=100; FractionFaecesAdded=1
            Soil: ASCOrder=Vertosol; ASCSubOrder=Grey; SoilType=Clay; Site=Warra; NearestTown=Warra, Q, 4411; Region=Darling Downs and Granite Belt; State=Queensland; Country=Australia; NaturalVegetation=Brigalow scrub; ApsoilNumber=19; Latitude=-26.897; Longitude=150.909; LocationAccuracy=+/- 20m; DataSource=0; Comments=CSIRO Sustainable Ecosystems, Toowoomba
              Physical: same as Validation.Warra.Warra.WindbreakSystem.5m.Soil.Physical
              SoilWater: same as Validation.Warra.Warra.WindbreakSystem.TreeRow.Soil.SoilWater
              SoilNitrogen: same as Replacements.MachakosSoil.SoilNitrogen
              Organic: same as Validation.Warra.Warra.WindbreakSystem.TreeRow.Soil.Organic
              Chemical
                Thickness  NO3N  NH4N  PH
                150        1     0.1   8
                150        1     0.1   8
                300        1     0.1   8
                300        1     0.1   8
                300        1     0.1   8
                300        1     0.1   8
              Sample: Thickness=[50, 100, 150, 300, 300, 300, 300]; SW=[0.2, 0.32, 0.34, 0.35, 0.38, 0.34, 0.32]; SWUnits=Volumetric; OCUnits=Total; PHUnits=Water
              CERESSoilTemperature
            Plant Wheat: CropType=Wheat; IsEnding=false; DaysAfterEnding=0
          RectangularZone 20m: Length=100; Width=10; Slope=0; AspectAngle=0; Altitude=50
            LocalMicroClimate
            MicroClimate: a_interception=0; b_interception=0; c_interception=0; d_interception=0; soil_albedo=0.23; SoilHeatFluxFraction=0.4; MinimumHeightDiffForNewLayer=0; NightInterceptionFraction=0.5; ReferenceHeight=2
            Report HarvestReport: EventNames=[Wheat].Harvesting
              VariableNames:
                [Clock].Today
                [Zone].Area
                Parent.Distance as Distance
                [Wheat].AboveGround.Wt as BiomassWt
                [Wheat].Grain.Wt as GrainWt
                [Wheat].Grain.Size as GrainSize
                [Wheat].Grain.Number as GrainNumber
            Report DailyReport: same as Validation.Warra.Warra.WindbreakSystem.10m.DailyReport
            Fertiliser
            SurfaceOrganicMatter: InitialResidueName=wheat_stubble; InitialResidueType=wheat; InitialResidueMass=500; InitialStandingFraction=0; InitialCPR=0; InitialCNR=100; FractionFaecesAdded=1
            Soil: ASCOrder=Vertosol; ASCSubOrder=Grey; SoilType=Clay; Site=Warra; NearestTown=Warra, Q, 4411; Region=Darling Downs and Granite Belt; State=Queensland; Country=Australia; NaturalVegetation=Brigalow scrub; ApsoilNumber=19; Latitude=-26.897; Longitude=150.909; LocationAccuracy=+/- 20m; DataSource=0; Comments=CSIRO Sustainable Ecosystems, Toowoomba
              Physical: same as Validation.Warra.Warra.WindbreakSystem.5m.Soil.Physical
              SoilWater: same as Validation.Warra.Warra.WindbreakSystem.TreeRow.Soil.SoilWater
              SoilNitrogen: same as Replacements.MachakosSoil.SoilNitrogen
              Organic: same as Validation.Warra.Warra.WindbreakSystem.TreeRow.Soil.Organic
              Chemical
                Thickness  NO3N  NH4N  PH
                150        1     0.1   8
                150        1     0.1   8
                300        1     0.1   8
                300        1     0.1   8
                300        1     0.1   8
                300        1     0.1   8
              Sample: Thickness=[50, 100, 150, 300, 300, 300, 300]; SW=[0.32, 0.32, 0.39, 0.39, 0.38, 0.36, 0.35]; SWUnits=Volumetric; OCUnits=Total; PHUnits=Water
              CERESSoilTemperature
            Plant Wheat: CropType=Wheat; IsEnding=false; DaysAfterEnding=0
          RectangularZone 30m: Length=100; Width=5; Slope=0; AspectAngle=0; Altitude=50
            LocalMicroClimate
            MicroClimate: a_interception=0; b_interception=0; c_interception=0; d_interception=0; soil_albedo=0.23; SoilHeatFluxFraction=0.4; MinimumHeightDiffForNewLayer=0; NightInterceptionFraction=0.5; ReferenceHeight=2
            Report HarvestReport: EventNames=[Wheat].Harvesting
              VariableNames:
                [Clock].Today
                [Zone].Area
                Parent.Distance as Distance
                [Wheat].AboveGround.Wt as BiomassWt
                [Wheat].Grain.Wt as GrainWt
                [Wheat].Grain.Size as GrainSize
                [Wheat].Grain.Number as GrainNumber
            Report DailyReport: same as Validation.Warra.Warra.WindbreakSystem.10m.DailyReport
            Fertiliser
            SurfaceOrganicMatter: InitialResidueName=wheat_stubble; InitialResidueType=wheat; InitialResidueMass=500; InitialStandingFraction=0; InitialCPR=0; InitialCNR=100; FractionFaecesAdded=1
            Soil: ASCOrder=Vertosol; ASCSubOrder=Grey; SoilType=Clay; Site=Warra; NearestTown=Warra, Q, 4411; Region=Darling Downs and Granite Belt; State=Queensland; Country=Australia; NaturalVegetation=Brigalow scrub; ApsoilNumber=19; Latitude=-26.897; Longitude=150.909; LocationAccuracy=+/- 20m; DataSource=0; Comments=CSIRO Sustainable Ecosystems, Toowoomba
              Physical
                Thickness  BD    AirDry  LL15  DUL   SAT
                150        1.39  0.1     0.18  0.4   0.45
                150        1.35  0.17    0.19  0.41  0.46
                300        1.35  0.17    0.19  0.41  0.46
                300        1.43  0.17    0.2   0.38  0.43
                300        1.44  0.17    0.23  0.38  0.43
                300        1.45  0.17    0.25  0.37  0.42
                SoilCrop WheatSoil: LL=[0.18, 0.19, 0.19, 0.2, 0.23, 0.25]; KL=[0.06, 0.06, 0.06, 0.06, 0.06, 0.06]; XF=[1, 1, 1, 1, 1, 1]
              SoilWater: same as Validation.Warra.Warra.WindbreakSystem.TreeRow.Soil.SoilWater
              SoilNitrogen: same as Replacements.MachakosSoil.SoilNitrogen
              Organic: same as Validation.Warra.Warra.WindbreakSystem.TreeRow.Soil.Organic
              Chemical
                Thickness  NO3N  NH4N  PH
                150        1     0.1   8
                150        1     0.1   8
                300        1     0.1   8
                300        1     0.1   8
                300        1     0.1   8
                300        1     0.1   8
              Sample: Thickness=[50, 100, 150, 300, 300, 300, 300]; SW=[0.32, 0.32, 0.38, 0.38, 0.38, 0.36, 0.35]; SWUnits=Volumetric; OCUnits=Total; PHUnits=Water
              CERESSoilTemperature
            Plant Wheat: CropType=Wheat; IsEnding=false; DaysAfterEnding=0
          RectangularZone 40m: Length=100; Width=10; Slope=0; AspectAngle=0; Altitude=50
            LocalMicroClimate
            MicroClimate: a_interception=0; b_interception=0; c_interception=0; d_interception=0; soil_albedo=0.23; SoilHeatFluxFraction=0.4; MinimumHeightDiffForNewLayer=0; NightInterceptionFraction=0.5; ReferenceHeight=2
            Report HarvestReport: EventNames=[Wheat].Harvesting
              VariableNames:
                [Clock].Today
                [Zone].Area
                Parent.Distance as Distance
                [Wheat].AboveGround.Wt as BiomassWt
                [Wheat].Grain.Wt as GrainWt
                [Wheat].Grain.Size as GrainSize
                [Wheat].Grain.Number as GrainNumber
            Report DailyReport: same as Validation.Warra.Warra.WindbreakSystem.10m.DailyReport
            Fertiliser
            SurfaceOrganicMatter: InitialResidueName=wheat_stubble; InitialResidueType=wheat; InitialResidueMass=500; InitialStandingFraction=0; InitialCPR=0; InitialCNR=100; FractionFaecesAdded=1
            Soil: ASCOrder=Vertosol; ASCSubOrder=Grey; SoilType=Clay; Site=Warra; NearestTown=Warra, Q, 4411; Region=Darling Downs and Granite Belt; State=Queensland; Country=Australia; NaturalVegetation=Brigalow scrub; ApsoilNumber=19; Latitude=-26.897; Longitude=150.909; LocationAccuracy=+/- 20m; DataSource=0; Comments=CSIRO Sustainable Ecosystems, Toowoomba
              Physical: same as Validation.Warra.Warra.WindbreakSystem.5m.Soil.Physical
              SoilWater: same as Validation.Warra.Warra.WindbreakSystem.TreeRow.Soil.SoilWater
              SoilNitrogen: same as Replacements.MachakosSoil.SoilNitrogen
              Organic: same as Validation.Warra.Warra.WindbreakSystem.TreeRow.Soil.Organic
              Chemical
                Thickness  NO3N  NH4N  PH
                150        1     0.1   8
                150        1     0.1   8
                300        1     0.1   8
                300        1     0.1   8
                300        1     0.1   8
                300        1     0.1   8
              Sample: Thickness=[50, 100, 150, 300, 300, 300, 300]; SW=[0.32, 0.32, 0.34, 0.35, 0.38, 0.34, 0.32]; SWUnits=Volumetric; OCUnits=Total; PHUnits=Water
              CERESSoilTemperature
            Plant Wheat: CropType=Wheat; IsEnding=false; DaysAfterEnding=0
          RectangularZone 50m: Length=100; Width=10; Slope=0; AspectAngle=0; Altitude=50
            LocalMicroClimate
            MicroClimate: a_interception=0; b_interception=0; c_interception=0; d_interception=0; soil_albedo=0.23; SoilHeatFluxFraction=0.4; MinimumHeightDiffForNewLayer=0; NightInterceptionFraction=0.5; ReferenceHeight=2
            Report HarvestReport: EventNames=[Wheat].Harvesting
              VariableNames:
                [Clock].Today
                [Zone].Area
                Parent.Distance as Distance
                [Wheat].AboveGround.Wt as BiomassWt
                [Wheat].Grain.Wt as GrainWt
                [Wheat].Grain.Size as GrainSize
                [Wheat].Grain.Number as GrainNumber
            Report DailyReport: same as Validation.Warra.Warra.WindbreakSystem.10m.DailyReport
            Fertiliser
            SurfaceOrganicMatter: InitialResidueName=wheat_stubble; InitialResidueType=wheat; InitialResidueMass=500; InitialStandingFraction=0; InitialCPR=0; InitialCNR=100; FractionFaecesAdded=1
            Soil: ASCOrder=Vertosol; ASCSubOrder=Grey; SoilType=Clay; Site=Warra; NearestTown=Warra, Q, 4411; Region=Darling Downs and Granite Belt; State=Queensland; Country=Australia; NaturalVegetation=Brigalow scrub; ApsoilNumber=19; Latitude=-26.897; Longitude=150.909; LocationAccuracy=+/- 20m; DataSource=0; Comments=CSIRO Sustainable Ecosystems, Toowoomba
              Physical
                Thickness  BD    AirDry  LL15  DUL   SAT   KS
                150        1.39  0.1     0.18  0.4   0.45  50
                150        1.35  0.17    0.19  0.41  0.46  50
                300        1.35  0.17    0.19  0.41  0.46  50
                300        1.43  0.17    0.2   0.38  0.43  50
                300        1.44  0.17    0.23  0.38  0.43  50
                300        1.45  0.17    0.25  0.37  0.42  50
                SoilCrop WheatSoil: LL=[0.18, 0.19, 0.19, 0.2, 0.23, 0.25]; KL=[0.06, 0.06, 0.06, 0.06, 0.06, 0.06]; XF=[1, 1, 1, 1, 1, 1]
              SoilWater: same as Validation.Warra.Warra.WindbreakSystem.TreeRow.Soil.SoilWater
              SoilNitrogen: same as Replacements.MachakosSoil.SoilNitrogen
              Organic: same as Validation.Warra.Warra.WindbreakSystem.TreeRow.Soil.Organic
              Chemical
                Thickness  NO3N  NH4N  PH
                150        1     0.1   8
                150        1     0.1   8
                300        1     0.1   8
                300        1     0.1   8
                300        1     0.1   8
                300        1     0.1   8
              Sample: Thickness=[50, 100, 150, 300, 300, 300, 300]; SW=[0.32, 0.32, 0.34, 0.35, 0.38, 0.34, 0.32]; SWUnits=Volumetric; OCUnits=Total; PHUnits=Water
              CERESSoilTemperature
            Plant Wheat: CropType=Wheat; IsEnding=false; DaysAfterEnding=0
    Folder Moora
      Memo
        Data from Western Australia [Lefroy2001] present results for the fodder tree tagasaste (*Chamaecytisus proliferus* Link.) at alley and plantation densities on a deep sand at Moora.  Alleys were planted as single rows of trees 30 m apart orientated north–south with 0.7 m between trees within a row.
        The soil was a coarse, very infertile acid sand with pH (CaCl2) 5.2 at the surface and 4.8 between 1 and 3 m. Water holding capacity was very low, with a drained upper limit of 0.10 and a lower limit of 0.03 m<sup>3</sup>/m<sup>3</sup>. A permanent fresh (<1 dS/m) perched watertable has developed over a clay layer approximately 10 m below the surface. Soil water content was measured with neutron probes at 20-cm intervals to a depth of 3.7 m from July 1996 to December 1998 at 2-week intervals in winter and monthly during summer.  Transpiration was measured using sapflow sensors.  The data shown here are for the alley-fallow plots, which had Tagastaste rows spaced at 30m with no crop planted in between.
      Simulation Moora
        Clock: Start=1996-09-17; End=1997-12-31
        Summary SummaryFile
        Weather: FileName=moora.met
        SoilArbitrator Soil Arbitrator
        AgroforestrySystem WindbreakSystem: RainfallInterceptionFraction=0.38; RainShaddowWidth=1; Slope=0; AspectAngle=0; Altitude=50
          TreeProxy: RootRadius=0.02; NumberOfTrees=143; Kd=1e-07; BaseKL=0.025; KValue=0.5; Dates=[1996-06-20, 1997-06-08, 1998-05-06]; Heights=[3000, 3000, 3000]; NDemands=[0.1, 0.1, 0.1]; ShadeModifiers=[1, 1, 1]
            Table=[[Parameter, 0, 0.5h, 1h, 1.5h, 2h, 2.5h, 3h, 4h, 5h, 6h], [Shade (%), Root Length Density (cm/cm3), Depth (cm), 0-10, 10-20, 20-30, 30-60, 60-90, 90-120, 120-150, 150-200, 200-250, 250-300, 300-370], [100, , , 1, 1, 1, 1, 1, 1, 1, 1, 1, 1, 1], [100, , , 1, 1, 1, 1, .8, .8, .8, .8, .8, .8, .8], [100, , , 1, 1, 1, 1, .3, .3, .3, .3, .3, .3, .3], [0, , , 1, 1, 1, 1, .3, .3, .1, .01, .01, .01, .01], [0, , , 1, 1, 1, 1, .3, .3, .1, 0, 0, 0, 0], [0, , , 1, 1, 1, 1, .3, .3, .1, 0, 0, 0, 0], [0, , , 1, 1, 1, 1, .3, .3, .1, 0, 0, 0, 0], [0, , , 1, 1, 1, 1, .3, .3, .1, 0, 0, 0, 0], [0, , , 1, 1, 1, 1, .3, .3, .1, 0, 0, 0, 0], [0, , , 1, 1, 1, 1, .3, .3, .1, 0, 0, 0, 0]]
          Report TreeReport: EventNames=[Clock].DoReport
            VariableNames:
              [Clock].Today
              [TreeProxy].TreeWaterUptake
              [TreeProxy].IndividualTreeWaterDemand
              [TreeProxy].IndividualTreeWaterUptake
          RectangularZone TreeRow: Length=100; Width=0.5; Slope=0; AspectAngle=0; Altitude=50
            LocalMicroClimate
            MicroClimate: a_interception=0; b_interception=0; c_interception=0; d_interception=0; soil_albedo=0.23; SoilHeatFluxFraction=0.4; MinimumHeightDiffForNewLayer=0; NightInterceptionFraction=0.5; ReferenceHeight=2
            Report DailyReport: EventNames=[Clock].DoReport
              VariableNames:
                [Clock].Today as Date
                Parent.Distance as Distance
                [LocalMicroClimate].Wind
                sum([Soil].SoilNitrogen.NO3.kgha) as TotalNO3N
                sum([Soil].SoilNitrogen.NH4.kgha) as TotalNH4N
                sum([TreeProxy].WaterUptake) as WaterUptake
                sum([Soil].SoilWater.SWmm[1:5]) as SW90cm
                [TreeProxy].H
                [TreeProxy].SWDemand
                [TreeProxy].heightToday
                [Soil].SoilWater.Eo
                [TreeProxy].WaterStress
                [Soil].SoilWater.SW[1] as SurfaceSW
                sum([Soil].SoilWater.ESW) as ESW
            Fertiliser
            SurfaceOrganicMatter: InitialResidueName=wheat_stubble; InitialResidueType=wheat; InitialResidueMass=500; InitialStandingFraction=0; InitialCPR=0; InitialCNR=100; FractionFaecesAdded=1
            Soil: ASCOrder=Vertosol; ASCSubOrder=Grey; SoilType=Clay; Site=Warra; NearestTown=Warra, Q, 4411; Region=Darling Downs and Granite Belt; State=Queensland; Country=Australia; NaturalVegetation=Brigalow scrub; ApsoilNumber=19; Latitude=-26.897; Longitude=150.909; LocationAccuracy=+/- 20m; DataSource=0; Comments=CSIRO Sustainable Ecosystems, Toowoomba
              Physical
                Thickness  BD   AirDry  LL15  DUL   SAT   KS
                100        1.8  0.01    0.02  0.08  0.32  200
                100        1.8  0.01    0.02  0.08  0.32  200
                100        1.8  0.01    0.02  0.08  0.32  200
                300        1.8  0.01    0.02  0.08  0.32  200
                300        1.8  0.01    0.02  0.08  0.32  200
                300        1.8  0.01    0.02  0.08  0.32  200
                300        1.8  0.01    0.02  0.08  0.32  200
                500        1.8  0.01    0.02  0.07  0.32  200
                500        1.8  0.01    0.02  0.07  0.32  200
                500        1.8  0.01    0.02  0.07  0.32  200
                700        1.8  0.01    0.02  0.07  0.32  200
              SoilWater: SummerDate=1-Nov; SummerU=4; SummerCona=2; WinterDate=1-Apr; WinterU=4; WinterCona=2; DiffusConst=88; DiffusSlope=35; Salb=0.12; CN2Bare=60; CNRed=20; CNCov=0.8; max_pond=0; Thickness=[150, 150, 300, 300, 300, 2500]; SWCON=[0.7, 0.7, 0.7, 0.7, 0.7, 0.7]; PrecipitationInterception=0
              SoilNitrogen: same as Replacements.MachakosSoil.SoilNitrogen
              Organic: same as Validation.Warra.Warra.WindbreakSystem.TreeRow.Soil.Organic
              Chemical
                Thickness  NO3N  NH4N  PH
                150        1     0.1   8
                150        1     0.1   8
                300        1     0.1   8
                300        1     0.1   8
                300        1     0.1   8
                300        1     0.1   8
              Sample InitialN: Thickness=[150, 150, 300, 300, 300, 300]; SWUnits=Volumetric; OCUnits=Total; PHUnits=Water
              Fertiliser
              Sample: Thickness=[50, 100, 150, 300, 300, 300, 2500]; SW=[0.02, 0.02, 0.02, 0.03, 0.05, 0.06, 0.07]; SWUnits=Volumetric; OCUnits=Total; PHUnits=Water
              CERESSoilTemperature
          RectangularZone 1m: Length=100; Width=1; Slope=0; AspectAngle=0; Altitude=50
            LocalMicroClimate
            MicroClimate: a_interception=0; b_interception=0; c_interception=0; d_interception=0; soil_albedo=0.23; SoilHeatFluxFraction=0.4; MinimumHeightDiffForNewLayer=0; NightInterceptionFraction=0.5; ReferenceHeight=2
            Report DailyReport: EventNames=[Clock].DoReport
              VariableNames:
                [Clock].Today as Date
                Parent.Distance as Distance
                [LocalMicroClimate].Wind
                sum([Soil].SoilWater.SWmm[1:4]) as SW90cm
                sum([Soil].SoilNitrogen.NO3.kgha) as TotalNO3N
                sum([Soil].SoilNitrogen.NH4.kgha) as TotalNH4N
                [Soil].SoilWater.SW[1] as SurfaceSW
                sum([Soil].SoilWater.ESW) as ESW
            Fertiliser
            SurfaceOrganicMatter: InitialResidueName=wheat_stubble; InitialResidueType=wheat; InitialResidueMass=500; InitialStandingFraction=0; InitialCPR=0; InitialCNR=100; FractionFaecesAdded=1
            Soil: ASCOrder=Vertosol; ASCSubOrder=Grey; SoilType=Clay; Site=Warra; NearestTown=Warra, Q, 4411; Region=Darling Downs and Granite Belt; State=Queensland; Country=Australia; NaturalVegetation=Brigalow scrub; ApsoilNumber=19; Latitude=-26.897; Longitude=150.909; LocationAccuracy=+/- 20m; DataSource=0; Comments=CSIRO Sustainable Ecosystems, Toowoomba
              Physical: same as Validation.Moora.Moora.WindbreakSystem.TreeRow.Soil.Physical
              SoilWater: same as Validation.Moora.Moora.WindbreakSystem.TreeRow.Soil.SoilWater
              SoilNitrogen: same as Replacements.MachakosSoil.SoilNitrogen
              Organic: same as Validation.Warra.Warra.WindbreakSystem.TreeRow.Soil.Organic
              Chemical
                Thickness  NO3N  NH4N  PH
                150        1     0.1   8
                150        1     0.1   8
                300        1     0.1   8
                300        1     0.1   8
                300        1     0.1   8
                300        1     0.1   8
              Sample: Thickness=[50, 100, 150, 300, 300, 300, 2500]; SW=[0.02, 0.02, 0.02, 0.03, 0.05, 0.06, 0.07]; SWUnits=Volumetric; OCUnits=Total; PHUnits=Water
              CERESSoilTemperature
          RectangularZone 2m: Length=100; Width=1; Slope=0; AspectAngle=0; Altitude=50
            LocalMicroClimate
            MicroClimate: a_interception=0; b_interception=0; c_interception=0; d_interception=0; soil_albedo=0.23; SoilHeatFluxFraction=0.4; MinimumHeightDiffForNewLayer=0; NightInterceptionFraction=0.5; ReferenceHeight=2
            Report DailyReport: same as Validation.Moora.Moora.WindbreakSystem.1m.DailyReport
            Fertiliser
            SurfaceOrganicMatter: InitialResidueName=wheat_stubble; InitialResidueType=wheat; InitialResidueMass=500; InitialStandingFraction=0; InitialCPR=0; InitialCNR=100; FractionFaecesAdded=1
            Soil: ASCOrder=Vertosol; ASCSubOrder=Grey; SoilType=Clay; Site=Warra; NearestTown=Warra, Q, 4411; Region=Darling Downs and Granite Belt; State=Queensland; Country=Australia; NaturalVegetation=Brigalow scrub; ApsoilNumber=19; Latitude=-26.897; Longitude=150.909; LocationAccuracy=+/- 20m; DataSource=0; Comments=CSIRO Sustainable Ecosystems, Toowoomba
              Physical: same as Validation.Moora.Moora.WindbreakSystem.TreeRow.Soil.Physical
              SoilWater: same as Validation.Moora.Moora.WindbreakSystem.TreeRow.Soil.SoilWater
              SoilNitrogen: same as Replacements.MachakosSoil.SoilNitrogen
              Organic: same as Validation.Warra.Warra.WindbreakSystem.TreeRow.Soil.Organic
              Chemical
                Thickness  NO3N  NH4N  PH
                150        1     0.1   8
                150        1     0.1   8
                300        1     0.1   8
                300        1     0.1   8
                300        1     0.1   8
                300        1     0.1   8
              Sample: Thickness=[50, 100, 150, 300, 300, 300, 2500]; SW=[0.04, 0.04, 0.04, 0.06, 0.08, 0.08, 0.07]; SWUnits=Volumetric; OCUnits=Total; PHUnits=Water
              CERESSoilTemperature
          RectangularZone 3m: Length=100; Width=1; Slope=0; AspectAngle=0; Altitude=50
            LocalMicroClimate
            MicroClimate: a_interception=0; b_interception=0; c_interception=0; d_interception=0; soil_albedo=0.23; SoilHeatFluxFraction=0.4; MinimumHeightDiffForNewLayer=0; NightInterceptionFraction=0.5; ReferenceHeight=2
            Report DailyReport: same as Validation.Moora.Moora.WindbreakSystem.1m.DailyReport
            Fertiliser
            SurfaceOrganicMatter: InitialResidueName=wheat_stubble; InitialResidueType=wheat; InitialResidueMass=500; InitialStandingFraction=0; InitialCPR=0; InitialCNR=100; FractionFaecesAdded=1
            Soil: ASCOrder=Vertosol; ASCSubOrder=Grey; SoilType=Clay; Site=Warra; NearestTown=Warra, Q, 4411; Region=Darling Downs and Granite Belt; State=Queensland; Country=Australia; NaturalVegetation=Brigalow scrub; ApsoilNumber=19; Latitude=-26.897; Longitude=150.909; LocationAccuracy=+/- 20m; DataSource=0; Comments=CSIRO Sustainable Ecosystems, Toowoomba
              Physical: same as Validation.Moora.Moora.WindbreakSystem.TreeRow.Soil.Physical
              SoilWater: same as Validation.Moora.Moora.WindbreakSystem.TreeRow.Soil.SoilWater
              SoilNitrogen: same as Replacements.MachakosSoil.SoilNitrogen
              Organic: same as Validation.Warra.Warra.WindbreakSystem.TreeRow.Soil.Organic
              Chemical
                Thickness  NO3N  NH4N  PH
                150        1     0.1   8
                150        1     0.1   8
                300        1     0.1   8
                300        1     0.1   8
                300        1     0.1   8
                300        1     0.1   8
              Sample: Thickness=[50, 100, 150, 300, 300, 300, 2500]; SW=[0.08, 0.08, 0.08, 0.08, 0.08, 0.08, 0.07]; SWUnits=Volumetric; OCUnits=Total; PHUnits=Water
              CERESSoilTemperature
          RectangularZone 4m: same as Validation.Moora.Moora.WindbreakSystem.3m
          RectangularZone 5_5m: Length=100; Width=2; Slope=0; AspectAngle=0; Altitude=50
            LocalMicroClimate
            MicroClimate: a_interception=0; b_interception=0; c_interception=0; d_interception=0; soil_albedo=0.23; SoilHeatFluxFraction=0.4; MinimumHeightDiffForNewLayer=0; NightInterceptionFraction=0.5; ReferenceHeight=2
            Report DailyReport: same as Validation.Moora.Moora.WindbreakSystem.1m.DailyReport
            Fertiliser
            SurfaceOrganicMatter: InitialResidueName=wheat_stubble; InitialResidueType=wheat; InitialResidueMass=500; InitialStandingFraction=0; InitialCPR=0; InitialCNR=100; FractionFaecesAdded=1
            Soil: same as Validation.Moora.Moora.WindbreakSystem.3m.Soil
          RectangularZone 8m: Length=100; Width=3; Slope=0; AspectAngle=0; Altitude=50
            LocalMicroClimate
            MicroClimate: a_interception=0; b_interception=0; c_interception=0; d_interception=0; soil_albedo=0.23; SoilHeatFluxFraction=0.4; MinimumHeightDiffForNewLayer=0; NightInterceptionFraction=0.5; ReferenceHeight=2
            Report DailyReport: same as Validation.Moora.Moora.WindbreakSystem.1m.DailyReport
            Fertiliser
            SurfaceOrganicMatter: InitialResidueName=wheat_stubble; InitialResidueType=wheat; InitialResidueMass=500; InitialStandingFraction=0; InitialCPR=0; InitialCNR=100; FractionFaecesAdded=1
            Soil: same as Validation.Moora.Moora.WindbreakSystem.3m.Soil
          RectangularZone 11_5m: Length=100; Width=4; Slope=0; AspectAngle=0; Altitude=50
            LocalMicroClimate
            MicroClimate: a_interception=0; b_interception=0; c_interception=0; d_interception=0; soil_albedo=0.23; SoilHeatFluxFraction=0.4; MinimumHeightDiffForNewLayer=0; NightInterceptionFraction=0.5; ReferenceHeight=2
            Report DailyReport: same as Validation.Moora.Moora.WindbreakSystem.1m.DailyReport
            Fertiliser
            SurfaceOrganicMatter: InitialResidueName=wheat_stubble; InitialResidueType=wheat; InitialResidueMass=500; InitialStandingFraction=0; InitialCPR=0; InitialCNR=100; FractionFaecesAdded=1
            Soil: same as Validation.Moora.Moora.WindbreakSystem.3m.Soil
          RectangularZone 16m: Length=100; Width=5; Slope=0; AspectAngle=0; Altitude=50
            LocalMicroClimate
            MicroClimate: a_interception=0; b_interception=0; c_interception=0; d_interception=0; soil_albedo=0.23; SoilHeatFluxFraction=0.4; MinimumHeightDiffForNewLayer=0; NightInterceptionFraction=0.5; ReferenceHeight=2
            Report DailyReport: same as Validation.Moora.Moora.WindbreakSystem.1m.DailyReport
            Fertiliser
            SurfaceOrganicMatter: InitialResidueName=wheat_stubble; InitialResidueType=wheat; InitialResidueMass=500; InitialStandingFraction=0; InitialCPR=0; InitialCNR=100; FractionFaecesAdded=1
            Soil: same as Validation.Moora.Moora.WindbreakSystem.3m.Soil
    Folder Machakos
      Memo
        This test evaluates performance of the APSIM AgroforestrySystem model in simulating crop and soil water data of [odhiambo1999tree;odhiambo2001roots;wilson1998comparison]. The experiment was conducted at ICRAF’s field station at Machakos, Kenya (1<sup>o</sup> 33’S and 37<sup>o</sup> 8’E) at a mean elevation of 1660 m. Bimodal annual rainfall averages 740 mm.

        Treatments were Gliricidia-maize, Grevillea-maize and sole maize. Grevillea and Gliricidia were planted in October 1993 as a single row in the middle of each 20 m x 18 m plot (1 m within-row spacing). Tree rows were oriented east-west to minimize shading effects on crops. Grevillea was pruned to 2.5. m height, but Gliricidia, which was grown as a hedgerow, was heavily cut back before each rainy season. Maize (‘Katumani composite’ ) was sown at the start of each ‘long’ season (March-July), and beans at the start of each ‘short’ season (October-February). Results were reported for two ‘long’ seasons 1996-1997, but beans failed during the intervening ‘short’ season. Tree heights during 1996-1997 were approximately 5-7 m for Grevillea and 4-5 m for Gliricidia.

        This experiment should not be confused with the CIRUS experiment reported by [Howard1997;lott2009understorey] and intervening papers and reports, but it was conducted at the same research station and over-lapped temporally.  This experiment was funded by DFID (Project T01065s5) led by Prof. Chin Ong (currently, University of Nottingham, UK). Some site data, including meteorological data, were used from these sources, or from data supplied by researchers from the two studies. For example, the met file was collated mainly from data collected using a Campbell weather station managed by Nick Jackson, and supplemented with data from a Delta-T weather station managed by James Lott. These weather station data were provided by Julia Wilson (Centre for Ecology and Hydrology, Natural Environment Research Council, UK). Watch Forcing Data [Weedon2011] interpolated data helped fill some data gaps.

        Soils are well-drained dark brown sandy clays. These soils are weakly to moderately leached with a pH of 6 to 6.5 and possess medium base saturation (50 to 80%) in the topsoil. Nitrogen and phosphorus contents were considered less than optimal, but like other nutrients, adequate for growth [mathuva1998improving].

        At the beginning of each wet season, 1 to 2 m deep trenches (depending on depth to bedrock) were dug at the margins of each plot to stop roots from one plot penetrating into and exploiting adjacent plots. All cultivations were by hand tools, which mimiced farmer practise and caused minimal disturbance to tree roots. Similarly, each season, weeds were controlled by cutting/uprooting them with hand tools on two occasions after crop germination. Key measurements reported include transects from the tree row out to 8 maize rows for: soil water, tree and crop root length density, tree growth, and maize germination, biomass and grain yield. Maize germination and growth was severely limited by low rainfall and tree competition for water.

        NOTE: Germination failure was an important factor in determining yield impacts of trees within this trial. The Maize model was not able to simulate changes in plant population density away from the tree row, but instead it was specifically coded into the model for this case. Also, we do not simulate the intervening bean crop between the two maize seasons. We add fertiliser to the second crop to provide N that would have been provided by the bean crop.
      Memo Memo re SW
        NOTE: Soil water data were obtained from digitising graphs of the measured data from the technical report for the trial [wilson1998comparison].  As such, exact dates for observations are not known and error in estimates of measurement dates will cause problems in the following graphs.  For example, where observations occur close to rainfall events.
      Folder Grevillea
        Simulation Grevillea
          Clock: Start=1996-03-01; End=1997-12-31
          Summary SummaryFile
          Weather: FileName=Machakos1992-1998 PS151007.met
          SoilArbitrator Soil Arbitrator
          AgroforestrySystem WindbreakSystem: RainfallInterceptionFraction=0; RainShaddowWidth=0; Slope=0; AspectAngle=0; Altitude=50
            Report TreeReport: EventNames=[Clock].DoReport
              VariableNames:
                [Clock].Today
                [TreeProxy].heightToday
                [TreeProxy].IndividualTreeWaterUptake
            TreeProxy: RootRadius=0.02; NumberOfTrees=20; Kd=1e-07; BaseKL=0.05; KValue=0; NDemands=[0, 0, 0, 0, 0, 0, 0, 0, 0, 0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]; ShadeModifiers=[1, 1, 1, 1, 1, 1, 1, 1, 1, 1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]
              Table=[[Parameter, 0, 0.5h, 1h, 1.5h, 2h, 2.5h, 3h, 4h, 5h, 6h], [Shade (%), Root Length Density (cm/cm3), Depth (cm), 0-20, 20-40, 40-60, 60-80, 80-100, 100-120, 120-140, 140-160], [50, , , 1.6, 1.2, 1.2, .5, .4, .3, .2, .2], [25, , , .4, .5, .4, .3, .2, .1, .1, .1], [0, , , .4, .2, .1, .1, 0, 0, 0, 0], [0, , , .4, .2, .1, .1, 0, 0, 0, 0], [0, , , 0, 0, 0, 0, 0, 0, 0, 0], [0, , , 0, 0, 0, 0, 0, 0, 0, 0], [0, , , 0, 0, 0, 0, 0, 0, 0, 0], [0, , , 0, 0, 0, 0, 0, 0, 0, 0], [0, , , 0, 0, 0, 0, 0, 0, 0, 0], [0, , , 0, 0, 0, 0, 0, 0, 0, 0]]
              Dates=[1993-12-15, 1994-01-15, 1994-02-15, 1994-03-15, 1994-04-15, 1994-05-15, 1994-06-15, 1994-07-15, 1994-08-15, 1994-09-15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]
              Heights=[921532000, 116466000, 13325000, 161306000, 191255000, 226862000, 256799000, 264161000, 262122000, 271355000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]
            RectangularZone TreeRow: Length=20; Width=0.5; Slope=0; AspectAngle=0; Altitude=50
              LocalMicroClimate
              MicroClimate: a_interception=0; b_interception=0; c_interception=0; d_interception=0; soil_albedo=0.23; SoilHeatFluxFraction=0.4; MinimumHeightDiffForNewLayer=0; NightInterceptionFraction=0.5; ReferenceHeight=2
              Report DailyReport: EventNames=[Clock].DoReport
                VariableNames:
                  [Clock].Today as Date
                  [Clock].Today.Year as Year
                  Parent.Distance as Distance
                  [LocalMicroClimate].Wind
                  [Soil].SoilWater.Es
                  sum([Soil].SoilNitrogen.NO3.kgha) as TotalNO3N
                  sum([Soil].SoilNitrogen.NH4.kgha) as TotalNH4N
                  sum([TreeProxy].WaterUptake) as WaterUptake
                  sum([Soil].SoilWater.SWmm[1:4]) as SW90cm
                  [Soil].SoilWater.SW[2] as SW35cm
                  [Soil].SoilWater.SW[3] as SW55cm
                  [Soil].SoilWater.SW[4] as SW75cm
                  [TreeProxy].H
                  [TreeProxy].SWDemand
                  [TreeProxy].heightToday
                  [Soil].SoilWater.Eo
                  [TreeProxy].WaterStress
                  [Soil].SoilWater.SW[1] as SurfaceSW
              Fertiliser
              SurfaceOrganicMatter: InitialResidueName=wheat_stubble; InitialResidueType=wheat; InitialResidueMass=500; InitialStandingFraction=0; InitialCPR=0; InitialCNR=100; FractionFaecesAdded=1
              Soil MachakosSoil: Site=ICRAF Machakos Research Station; NearestTown=Machakos; Country=Kenya; Latitude=-1.55; Longitude=37.13
                Physical
                  Thickness  BD    AirDry  LL15   DUL   SAT
                  200        1.35  0.04    0.1    0.2   0.35
                  200        1.35  0.14    0.1    0.2   0.35
                  200        1.35  0.14    0.14   0.29  0.37
                  200        1.4   0.15    0.174  0.29  0.37
                  200        1.4   0.16    0.174  0.29  0.38
                  200        1.4   0.16    0.174  0.29  0.38
                  200        1.4   0.16    0.174  0.29  0.38
                  200        1.4   0.16    0.174  0.29  0.38
                  SoilCrop MaizeSoil: LL=[0.1, 0.1, 0.14, 0.174, 0.17, 0.17, 0.17, 0.17]; KL=[0.08, 0.08, 0.08, 0.08, 0.06, 0.04, 0.03, 0.02]; XF=[1, 1, 1, 1, 1, 1, 1, 1]
                SoilWater: SummerDate=1-Nov; SummerU=9; SummerCona=2.5; WinterDate=1-Apr; WinterU=9; WinterCona=2.5; DiffusConst=88; DiffusSlope=35.4; Salb=0.13; CN2Bare=65; CNRed=20; CNCov=0.8; max_pond=0; Thickness=[200, 1400]; SWCON=[0.5, 0.5]; PrecipitationInterception=0
                SoilNitrogen: same as Replacements.MachakosSoil.SoilNitrogen
                Organic: same as Replacements.MachakosSoil.Organic
                Chemical
                  Thickness  NO3N  NH4N  PH
                  200        10    10    6.5
                  200        5     5     6.5
                  200        2     2     6.5
                  200        1     1     6.5
                  200        0.5   0.5   6.5
                  200        0.5   0.5   6.5
                  200        0.5   0.5   6.5
                  200        0.5   0.5   6.5
                Sample: Thickness=[200, 200, 200, 200, 200, 200, 200, 200]; SW=[0.1, 0.1, 0.14, 0.15, 0.16, 0.16, 0.16, 0.16]; SWUnits=Volumetric; OCUnits=Total; PHUnits=Water
                CERESSoilTemperature
            RectangularZone 1m: Length=20; Width=1; Slope=0; AspectAngle=0; Altitude=50
              LocalMicroClimate
              MicroClimate: a_interception=0; b_interception=0; c_interception=0; d_interception=0; soil_albedo=0.23; SoilHeatFluxFraction=0.4; MinimumHeightDiffForNewLayer=0; NightInterceptionFraction=0.5; ReferenceHeight=2
              Operations
                1996-03-13  [Maize].Sow(population:0.21, cultivar: "Katumani", depth: 30, rowSpacing: 1000);
                1996-03-13  [Fertiliser].Apply(Amount: 0, Type: Fertiliser.Types.NO3N)
                1997-03-01  [SurfaceOrganicMatter].Add(mass: 0, N: 30, P:0,type: "cowpea", name: "cowpea");
                1997-04-02  [Maize].Sow(population: 0.21, cultivar: "Katumani", depth: 30, rowSpacing: 1000);
                1997-04-02  [Fertiliser].Apply(Amount: 60, Type: Fertiliser.Types.NO3N)
              Report HarvestReport: EventNames=[Maize].Harvesting
                VariableNames:
                  [Clock].Today
                  [Clock].Today.Year as Year
                  [Zone].Area
                  Parent.Distance as Distance
                  [Maize].Phenology.CurrentStageName as Stage
                  [Maize].Grain.Live.Wt as GrainWt
                  [Maize].Stem.Live.Wt
                  [Maize].EarLive.Wt
                  [Maize].Leaf.Live.Wt
                  [Maize].Root.Live.Wt
                  [Maize].Husk.Live.Wt
                  [Maize].Rachis.Live.Wt
                  [Maize].EarLive.N
                  [Maize].Grain.Live.N
                  [Maize].Stem.Live.N
                  [Maize].Leaf.Live.N
                  [Maize].Root.Live.N
                  [Maize].Root.Depth
                  [Maize].AboveGround.N
                  [Maize].AboveGround.Wt as Biomass
                  [Maize].Total.N
                  [Maize].Total.Wt
                  max of [Maize].Leaf.LAI from [Maize].Sowing to [Maize].Harvesting as LAImax
                  [Maize].Grain.NumberFunction as GPSM
                  [Maize].Grain.Size as GrainSize
                  [Maize].Population
                  [Maize].Phenology.FloweringDAS as FloweringDAS
              Report DailyReport: EventNames=[Clock].DoReport
                VariableNames:
                  [Clock].Today as Date
                  [Clock].Today.Year as Year
                  Parent.Distance as Distance
                  [LocalMicroClimate].Wind
                  [Soil].SoilWater.Es
                  sum([Soil].SoilNitrogen.NO3.kgha) as TotalNO3N
                  sum([Soil].SoilNitrogen.NH4.kgha) as TotalNH4N
                  sum([TreeProxy].WaterUptake) as WaterUptake
                  sum([Soil].SoilWater.SWmm[1:4]) as SW90cm
                  [Soil].SoilWater.SW[2] as SW35cm
                  [Soil].SoilWater.SW[3] as SW55cm
                  [Soil].SoilWater.SW[4] as SW75cm
                  [TreeProxy].H
                  [TreeProxy].SWDemand
                  [TreeProxy].heightToday
                  [Soil].SoilWater.Eo
                  [TreeProxy].WaterStress
                  [Soil].SoilWater.SW[1] as SurfaceSW
                  [Maize].Leaf.Fw
                  [Maize].Leaf.Photosynthesis.FVPD
                  [Maize].Leaf.Photosynthesis.FT
                  [Maize].Leaf.Fn
                  [Maize].Root.Depth
                  [Maize].Grain.Live.Wt as GrainWt
              Fertiliser
              SurfaceOrganicMatter: InitialResidueName=wheat_stubble; InitialResidueType=wheat; InitialResidueMass=500; InitialStandingFraction=0; InitialCPR=0; InitialCNR=100; FractionFaecesAdded=1
              Plant Maize: CropType=Maize; IsEnding=false; DaysAfterEnding=0
              Manager Harvesting
```csharp
using System;
using Models.Core;
using System.Collections.Generic;
using System.Text;
using Models.Soils;
using Models.PMF;
using Models;
using System.Xml.Serialization;
using APSIM.Shared.Utilities;

namespace Models
{
    [Serializable] 
    public class Script : Model
    {
        [Link] Plant Maize;
        [Link] Zone zone;
                    
        
        [EventSubscribe("Commencing")]
        private void OnSimulationCommencing(object sender, EventArgs e)
        {
        }
        
        [EventSubscribe("DoManagement")]
        private void OnDoManagement(object sender, EventArgs e)
        {
            if (Maize.Phenology.CurrentPhaseName == "ReadyForHarvesting")
            {
                Maize.Harvest();
                Maize.EndCrop();
            }
        }
        
        [EventSubscribe("DoManagementCalculations")]
        private void OnDoManagementCalculations(object sender, EventArgs e)
        {
            
        }
    }
}
```
              Soil MachakosSoil: Site=ICRAF Machakos Research Station; NearestTown=Machakos; Country=Kenya; Latitude=-1.55; Longitude=37.13
                Physical
                  Thickness  BD    AirDry  LL15  DUL   SAT
                  200        1.35  0.04    0.1   0.2   0.35
                  200        1.35  0.14    0.1   0.2   0.35
                  200        1.35  0.14    0.14  0.29  0.37
                  200        1.4   0.15    0.15  0.29  0.37
                  200        1.4   0.16    0.16  0.29  0.38
                  200        1.4   0.16    0.16  0.29  0.38
                  200        1.4   0.16    0.16  0.29  0.38
                  200        1.4   0.16    0.16  0.29  0.38
                  SoilCrop MaizeSoil: LL=[0.1, 0.1, 0.14, 0.15, 0.16, 0.16, 0.16, 0.16]; KL=[0.08, 0.08, 0.08, 0.08, 0.06, 0.04, 0.03, 0.02]; XF=[1, 1, 1, 1, 1, 1, 1, 1]
                SoilWater: same as Validation.Machakos.Grevillea.Grevillea.WindbreakSystem.TreeRow.MachakosSoil.SoilWater
                SoilNitrogen: same as Replacements.MachakosSoil.SoilNitrogen
                Organic: same as Replacements.MachakosSoil.Organic
                Chemical: same as Validation.Machakos.Grevillea.Grevillea.WindbreakSystem.TreeRow.MachakosSoil.Chemical
                Sample: same as Validation.Machakos.Grevillea.Grevillea.WindbreakSystem.TreeRow.MachakosSoil.Sample
                CERESSoilTemperature
            RectangularZone 2m: Length=20; Width=1; Slope=0; AspectAngle=0; Altitude=50
              LocalMicroClimate
              MicroClimate: a_interception=0; b_interception=0; c_interception=0; d_interception=0; soil_albedo=0.23; SoilHeatFluxFraction=0.4; MinimumHeightDiffForNewLayer=0; NightInterceptionFraction=0.5; ReferenceHeight=2
              Operations
                1996-03-13  [Maize].Sow(population:0.58, cultivar: "Katumani", depth: 30, rowSpacing: 1000);
                1996-03-13  [Fertiliser].Apply(Amount: 0, Type: Fertiliser.Types.NO3N)
                1997-03-01  [SurfaceOrganicMatter].Add(mass: 0, N: 30, P:0,type: "cowpea", name: "cowpea");
                1997-04-02  [Maize].Sow(population: 0.58, cultivar: "Katumani", depth: 30, rowSpacing: 1000);
                1997-04-02  [Fertiliser].Apply(Amount: 60, Type: Fertiliser.Types.NO3N)
              Report HarvestReport: same as Validation.Machakos.Grevillea.Grevillea.WindbreakSystem.1m.HarvestReport
              Report DailyReport: same as Validation.Machakos.Grevillea.Grevillea.WindbreakSystem.1m.DailyReport
              Fertiliser
              SurfaceOrganicMatter: InitialResidueName=wheat_stubble; InitialResidueType=wheat; InitialResidueMass=500; InitialStandingFraction=0; InitialCPR=0; InitialCNR=100; FractionFaecesAdded=1
              Plant Maize: CropType=Maize; IsEnding=false; DaysAfterEnding=0
              Manager Harvesting
                script: same as in Validation.Machakos.Grevillea.Grevillea.WindbreakSystem.1m.Harvesting
              Soil MachakosSoil: Site=ICRAF Machakos Research Station; NearestTown=Machakos; Country=Kenya; Latitude=-1.55; Longitude=37.13
                Physical
                  Thickness  BD    AirDry  LL15  DUL   SAT
                  200        1.35  0.04    0.1   0.2   0.35
                  200        1.35  0.14    0.1   0.2   0.35
                  200        1.35  0.14    0.14  0.29  0.37
                  200        1.4   0.15    0.17  0.29  0.37
                  200        1.4   0.16    0.17  0.29  0.38
                  200        1.4   0.16    0.17  0.29  0.38
                  200        1.4   0.16    0.17  0.29  0.38
                  200        1.4   0.16    0.17  0.29  0.38
                  SoilCrop MaizeSoil: LL=[0.1, 0.1, 0.14, 0.17, 0.17, 0.17, 0.17, 0.17]; KL=[0.08, 0.08, 0.08, 0.08, 0.06, 0.04, 0.03, 0.02]; XF=[1, 1, 1, 1, 1, 1, 1, 1]
                SoilWater: same as Validation.Machakos.Grevillea.Grevillea.WindbreakSystem.TreeRow.MachakosSoil.SoilWater
                SoilNitrogen: same as Replacements.MachakosSoil.SoilNitrogen
                Organic: same as Replacements.MachakosSoil.Organic
                Chemical: same as Validation.Machakos.Grevillea.Grevillea.WindbreakSystem.TreeRow.MachakosSoil.Chemical
                Sample: Thickness=[200, 200, 200, 200, 200, 200, 200, 200]; SW=[0.1, 0.1, 0.14, 0.17, 0.17, 0.17, 0.17, 0.17]; SWUnits=Volumetric; OCUnits=Total; PHUnits=Water
                CERESSoilTemperature
            RectangularZone 3m: Length=20; Width=1; Slope=0; AspectAngle=0; Altitude=50
              LocalMicroClimate
              MicroClimate: a_interception=0; b_interception=0; c_interception=0; d_interception=0; soil_albedo=0.23; SoilHeatFluxFraction=0.4; MinimumHeightDiffForNewLayer=0; NightInterceptionFraction=0.5; ReferenceHeight=2
              Operations
                1996-03-13  [Maize].Sow(population: 1.45, cultivar: "Katumani", depth: 30, rowSpacing: 1000);
                1996-03-13  [Fertiliser].Apply(Amount: 0, Type: Fertiliser.Types.NO3N)
                1997-03-01  [SurfaceOrganicMatter].Add(mass: 0, N: 30, P:0,type: "cowpea", name: "cowpea");
                1997-04-02  [Maize].Sow(population: 1.45, cultivar: "Katumani", depth: 30, rowSpacing: 1000);
                1997-04-02  [Fertiliser].Apply(Amount: 60, Type: Fertiliser.Types.NO3N)
              Report HarvestReport: same as Validation.Machakos.Grevillea.Grevillea.WindbreakSystem.1m.HarvestReport
              Report DailyReport: same as Validation.Machakos.Grevillea.Grevillea.WindbreakSystem.1m.DailyReport
              Fertiliser
              SurfaceOrganicMatter: InitialResidueName=wheat_stubble; InitialResidueType=wheat; InitialResidueMass=500; InitialStandingFraction=0; InitialCPR=0; InitialCNR=100; FractionFaecesAdded=1
              Plant Maize: CropType=Maize; IsEnding=false; DaysAfterEnding=0
              Manager Harvesting: same as Validation.Machakos.Grevillea.Grevillea.WindbreakSystem.1m.Harvesting
              Soil MachakosSoil: same as Validation.Machakos.Grevillea.Grevillea.WindbreakSystem.1m.MachakosSoil
            RectangularZone 4m: Length=20; Width=1; Slope=0; AspectAngle=0; Altitude=50
              LocalMicroClimate
              MicroClimate: a_interception=0; b_interception=0; c_interception=0; d_interception=0; soil_albedo=0.23; SoilHeatFluxFraction=0.4; MinimumHeightDiffForNewLayer=0; NightInterceptionFraction=0.5; ReferenceHeight=2
              Operations
                1996-03-13  [Maize].Sow(population: 2.1, cultivar: "Katumani", depth: 30, rowSpacing: 1000);
                1996-03-13  [Fertiliser].Apply(Amount: 0, Type: Fertiliser.Types.NO3N)
                1997-03-01  [SurfaceOrganicMatter].Add(mass: 0, N: 30, P:0,type: "cowpea", name: "cowpea");
                1997-04-02  [Maize].Sow(population: 2.1, cultivar: "Katumani", depth: 30, rowSpacing: 1000);
                1997-04-02  [Fertiliser].Apply(Amount: 60, Type: Fertiliser.Types.NO3N)
              Report HarvestReport: same as Validation.Machakos.Grevillea.Grevillea.WindbreakSystem.1m.HarvestReport
              Report DailyReport: same as Validation.Machakos.Grevillea.Grevillea.WindbreakSystem.1m.DailyReport
              Fertiliser
              SurfaceOrganicMatter: InitialResidueName=wheat_stubble; InitialResidueType=wheat; InitialResidueMass=500; InitialStandingFraction=0; InitialCPR=0; InitialCNR=100; FractionFaecesAdded=1
              Plant Maize: CropType=Maize; IsEnding=false; DaysAfterEnding=0
              Manager Harvesting: same as Validation.Machakos.Grevillea.Grevillea.WindbreakSystem.1m.Harvesting
              Soil MachakosSoil: same as Validation.Machakos.Grevillea.Grevillea.WindbreakSystem.1m.MachakosSoil
            RectangularZone 5m: Length=20; Width=1; Slope=0; AspectAngle=0; Altitude=50
              LocalMicroClimate
              MicroClimate: a_interception=0; b_interception=0; c_interception=0; d_interception=0; soil_albedo=0.23; SoilHeatFluxFraction=0.4; MinimumHeightDiffForNewLayer=0; NightInterceptionFraction=0.5; ReferenceHeight=2
              Operations
                1996-03-13  [Maize].Sow(population: 2.29, cultivar: "Katumani", depth: 30, rowSpacing: 1000);
                1996-03-13  [Fertiliser].Apply(Amount: 0, Type: Fertiliser.Types.NO3N)
                1997-03-01  [SurfaceOrganicMatter].Add(mass: 0, N: 30, P:0,type: "cowpea", name: "cowpea");
                1997-04-02  [Maize].Sow(population: 2.29, cultivar: "Katumani", depth: 30, rowSpacing: 1000);
                1997-04-02  [Fertiliser].Apply(Amount: 60, Type: Fertiliser.Types.NO3N)
              Report HarvestReport: same as Validation.Machakos.Grevillea.Grevillea.WindbreakSystem.1m.HarvestReport
              Report DailyReport: same as Validation.Machakos.Grevillea.Grevillea.WindbreakSystem.1m.DailyReport
              Fertiliser
              SurfaceOrganicMatter: InitialResidueName=wheat_stubble; InitialResidueType=wheat; InitialResidueMass=500; InitialStandingFraction=0; InitialCPR=0; InitialCNR=100; FractionFaecesAdded=1
              Plant Maize: CropType=Maize; IsEnding=false; DaysAfterEnding=0
              Manager Harvesting: same as Validation.Machakos.Grevillea.Grevillea.WindbreakSystem.1m.Harvesting
              Soil MachakosSoil: same as Validation.Machakos.Grevillea.Grevillea.WindbreakSystem.1m.MachakosSoil
            RectangularZone 6m: Length=20; Width=1; Slope=0; AspectAngle=0; Altitude=50
              LocalMicroClimate
              MicroClimate: a_interception=0; b_interception=0; c_interception=0; d_interception=0; soil_albedo=0.23; SoilHeatFluxFraction=0.4; MinimumHeightDiffForNewLayer=0; NightInterceptionFraction=0.5; ReferenceHeight=2
              Operations
                1996-03-13  [Maize].Sow(population: 2.56, cultivar: "Katumani", depth: 30, rowSpacing: 1000);
                1996-03-13  [Fertiliser].Apply(Amount: 0, Type: Fertiliser.Types.NO3N)
                1997-03-01  [SurfaceOrganicMatter].Add(mass: 0, N: 30, P:0,type: "cowpea", name: "cowpea");
                1997-04-02  [Maize].Sow(population: 2.56, cultivar: "Katumani", depth: 30, rowSpacing: 1000);
                1997-04-02  [Fertiliser].Apply(Amount: 60, Type: Fertiliser.Types.NO3N)
              Report HarvestReport: same as Validation.Machakos.Grevillea.Grevillea.WindbreakSystem.1m.HarvestReport
              Report DailyReport: same as Validation.Machakos.Grevillea.Grevillea.WindbreakSystem.1m.DailyReport
              Fertiliser
              SurfaceOrganicMatter: InitialResidueName=wheat_stubble; InitialResidueType=wheat; InitialResidueMass=500; InitialStandingFraction=0; InitialCPR=0; InitialCNR=100; FractionFaecesAdded=1
              Plant Maize: CropType=Maize; IsEnding=false; DaysAfterEnding=0
              Manager Harvesting: same as Validation.Machakos.Grevillea.Grevillea.WindbreakSystem.1m.Harvesting
              Soil MachakosSoil: same as Validation.Machakos.Grevillea.Grevillea.WindbreakSystem.1m.MachakosSoil
            RectangularZone 7m: Length=20; Width=1; Slope=0; AspectAngle=0; Altitude=50
              LocalMicroClimate
              MicroClimate: a_interception=0; b_interception=0; c_interception=0; d_interception=0; soil_albedo=0.23; SoilHeatFluxFraction=0.4; MinimumHeightDiffForNewLayer=0; NightInterceptionFraction=0.5; ReferenceHeight=2
              Operations
                1996-03-13  [Maize].Sow(population: 2.8, cultivar: "Katumani", depth: 30, rowSpacing: 1000);
                1996-03-13  [Fertiliser].Apply(Amount: 0, Type: Fertiliser.Types.NO3N)
                1997-03-01  [SurfaceOrganicMatter].Add(mass: 0, N: 30, P:0,type: "cowpea", name: "cowpea");
                1997-04-02  [Maize].Sow(population: 2.8, cultivar: "Katumani", depth: 30, rowSpacing: 1000);
                1997-04-02  [Fertiliser].Apply(Amount: 60, Type: Fertiliser.Types.NO3N)
              Report HarvestReport: same as Validation.Machakos.Grevillea.Grevillea.WindbreakSystem.1m.HarvestReport
              Report DailyReport: same as Validation.Machakos.Grevillea.Grevillea.WindbreakSystem.1m.DailyReport
              Fertiliser
              SurfaceOrganicMatter: InitialResidueName=wheat_stubble; InitialResidueType=wheat; InitialResidueMass=500; InitialStandingFraction=0; InitialCPR=0; InitialCNR=100; FractionFaecesAdded=1
              Plant Maize: CropType=Maize; IsEnding=false; DaysAfterEnding=0
              Manager Harvesting: same as Validation.Machakos.Grevillea.Grevillea.WindbreakSystem.1m.Harvesting
              Soil MachakosSoil: same as Validation.Machakos.Grevillea.Grevillea.WindbreakSystem.1m.MachakosSoil
            RectangularZone 8m: Length=20; Width=1; Slope=0; AspectAngle=0; Altitude=50
              LocalMicroClimate
              MicroClimate: a_interception=0; b_interception=0; c_interception=0; d_interception=0; soil_albedo=0.23; SoilHeatFluxFraction=0.4; MinimumHeightDiffForNewLayer=0; NightInterceptionFraction=0.5; ReferenceHeight=2
              Operations
                1996-03-13  [Maize].Sow(population: 2.8, cultivar: "Katumani", depth: 30, rowSpacing: 1000);
                1996-03-13  [Fertiliser].Apply(Amount: 0, Type: Fertiliser.Types.NO3N)
                1997-02-01  [SurfaceOrganicMatter].Add(mass: 0, N: 30, P:0,type: "cowpea", name: "cowpea");
                1997-04-02  [Maize].Sow(population: 2.8, cultivar: "Katumani", depth: 30, rowSpacing: 1000);
                1997-04-02  [Fertiliser].Apply(Amount: 60, Type: Fertiliser.Types.NO3N)
              Report HarvestReport: same as Validation.Machakos.Grevillea.Grevillea.WindbreakSystem.1m.HarvestReport
              Report DailyReport: EventNames=[Clock].DoReport
                VariableNames:
                  [Clock].Today as Date
                  [Clock].Today.Year as Year
                  Parent.Distance as Distance
                  [LocalMicroClimate].Wind
                  [Soil].SoilWater.Es
                  sum([Soil].SoilNitrogen.NO3.kgha) as TotalNO3N
                  sum([Soil].SoilNitrogen.NH4.kgha) as TotalNH4N
                  sum([TreeProxy].WaterUptake) as WaterUptake
                  sum([Soil].SoilWater.SWmm[1:4]) as SW90cm
                  [Soil].SoilWater.SW[2] as SW35cm
                  [Soil].SoilWater.SW[3] as SW55cm
                  [Soil].SoilWater.SW[4] as SW75cm
                  [TreeProxy].H
                  [TreeProxy].SWDemand
                  [TreeProxy].heightToday
                  [Soil].SoilWater.Eo
                  [TreeProxy].WaterStress
                  [Soil].SoilWater.SW[1] as SurfaceSW
                  [Maize].Leaf.Fw
                  [Maize].Leaf.Photosynthesis.FVPD
                  [Maize].Leaf.Photosynthesis.FT
                  [Maize].Leaf.Fn
                  [Maize].Root.Depth
                  [Maize].Grain.Live.Wt as GrainWt
                  [Maize].Leaf.LAI
                  [Maize].Phenology.CurrentStageName as Stage
                  [Maize].Grain.Live.Wt as GrainWt
                  [Maize].Stem.Live.Wt
                  [Maize].EarLive.Wt
                  [Maize].Leaf.Live.Wt
                  [Maize].Root.Live.Wt
                  [Maize].Husk.Live.Wt
                  [Maize].Rachis.Live.Wt
                  [Maize].EarLive.N
                  [Maize].Grain.Live.N
                  [Maize].Stem.Live.N
                  [Maize].Leaf.Live.N
                  [Maize].Root.Live.N
                  [Maize].Root.Depth
                  [Maize].AboveGround.N
                  [Maize].AboveGround.Wt as Biomass
                  [Maize].Total.N
                  [Maize].Total.Wt
                  max of [Maize].Leaf.LAI from [Maize].Sowing to [Maize].Harvesting as LAImax
                  [Maize].Grain.NumberFunction as GPSM
                  [Maize].Grain.Size as GrainSize
                  [Maize].Population
                  [Maize].Phenology.FloweringDAS as FloweringDAS
                  [Maize].Rachis.CobNumber
                  [Maize].Rachis.Live.Wt
                  [Maize].Rachis.CobSize
                  [SurfaceOrganicMatter].Wt
              Fertiliser
              SurfaceOrganicMatter: InitialResidueName=wheat_stubble; InitialResidueType=wheat; InitialResidueMass=500; InitialStandingFraction=0; InitialCPR=0; InitialCNR=100; FractionFaecesAdded=1
              Plant Maize: CropType=Maize; IsEnding=false; DaysAfterEnding=0
              Manager Harvesting: same as Validation.Machakos.Grevillea.Grevillea.WindbreakSystem.1m.Harvesting
              Soil MachakosSoil: same as Validation.Machakos.Grevillea.Grevillea.WindbreakSystem.1m.MachakosSoil
      Folder Gliricidia
        Simulation Gliricidia
          Clock: Start=1996-03-01; End=1997-12-31
          Summary SummaryFile
          Weather: FileName=Machakos1992-1998 PS151007.met
          SoilArbitrator Soil Arbitrator
          AgroforestrySystem WindbreakSystem: RainfallInterceptionFraction=0; RainShaddowWidth=0; Slope=0; AspectAngle=0; Altitude=50
            Report TreeReport: EventNames=[Clock].DoReport
              VariableNames:
                [Clock].Today
                [TreeProxy].heightToday
            TreeProxy: RootRadius=0.02; NumberOfTrees=0; Kd=1e-07; BaseKL=0.05; KValue=0; ShadeModifiers=[1, 1, 1, 1, 1, 1, 1, 1, 1, 1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]
              Table=[[Parameter, 0, 0.5h, 1h, 1.5h, 2h, 2.5h, 3h, 4h, 5h, 6h], [Shade (%), Root Length Density (cm/cm3), Depth (cm), 0-20, 20-40, 40-60, 60-80, 80-100, 100-120, 120-140, 140-160], [50, -, -, 2, 2.5, 1.6, .5, .5, .5, .5, .5], [25, -, -, .9, 1, .9, .6, .6, .6, .6, .6], [0, -, -, .5, .4, .3, .3, .3, .2, .2, .2], [0, -, -, .4, .3, .2, .1, 0, 0, 0, 0], [0, -, -, .3, .2, .1, .1, 0, 0, 0, 0], [0, -, -, 0, 0, 0, 0, 0, 0, 0, 0], [0, -, -, 0, 0, 0, 0, 0, 0, 0, 0], [0, -, -, 0, 0, 0, 0, 0, 0, 0, 0], [0, -, -, 0, 0, 0, 0, 0, 0, 0, 0], [0, -, -, 0, 0, 0, 0, 0, 0, 0, 0]]
              Dates=[1993-12-15, 1994-01-15, 1994-02-15, 1994-03-15, 1994-04-15, 1994-05-15, 1994-06-15, 1994-07-15, 1994-08-15, 1994-09-15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]
              Heights=[865.064, 1070.66, 1295.08, 1537.99, 1931.48, 2155.9, 2304.36, 2378.09, 2376.41, 2450.14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]
              NDemands=[0.1, 0.1, 0.1, 0.1, 0.1, 0.1, 0.1, 0.1, 0.1, 0.1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]
            RectangularZone TreeRow: Length=20; Width=0.5; Slope=0; AspectAngle=0; Altitude=50
              LocalMicroClimate
              MicroClimate: a_interception=0; b_interception=0; c_interception=0; d_interception=0; soil_albedo=0.23; SoilHeatFluxFraction=0.4; MinimumHeightDiffForNewLayer=0; NightInterceptionFraction=0.5; ReferenceHeight=2
              Report DailyReport: EventNames=[Clock].DoReport
                VariableNames:
                  [Clock].Today as Date
                  Parent.Distance as Distance
                  [LocalMicroClimate].Wind
                  [Soil].SoilWater.Es
                  sum([Soil].SoilNitrogen.NO3.kgha) as TotalNO3N
                  sum([Soil].SoilNitrogen.NH4.kgha) as TotalNH4N
                  sum([TreeProxy].WaterUptake) as WaterUptake
                  sum([Soil].SoilWater.SWmm[1:4]) as SW90cm
                  [Soil].SoilWater.SW[2] as SW35cm
                  [Soil].SoilWater.SW[3] as SW55cm
                  [Soil].SoilWater.SW[4] as SW75cm
                  [TreeProxy].H
                  [TreeProxy].SWDemand
                  [TreeProxy].heightToday
                  [Soil].SoilWater.Eo
                  [TreeProxy].WaterStress
                  [Soil].SoilWater.SW[1] as SurfaceSW
              Fertiliser
              SurfaceOrganicMatter: InitialResidueName=wheat_stubble; InitialResidueType=wheat; InitialResidueMass=500; InitialStandingFraction=0; InitialCPR=0; InitialCNR=100; FractionFaecesAdded=1
              Soil MachakosSoil: same as Validation.Machakos.Grevillea.Grevillea.WindbreakSystem.TreeRow.MachakosSoil
            RectangularZone 1m: Length=20; Width=1; Slope=0; AspectAngle=0; Altitude=50
              LocalMicroClimate
              MicroClimate: a_interception=0; b_interception=0; c_interception=0; d_interception=0; soil_albedo=0.23; SoilHeatFluxFraction=0.4; MinimumHeightDiffForNewLayer=0; NightInterceptionFraction=0.5; ReferenceHeight=2
              Operations
                1996-03-13  [Maize].Sow(population: 0.21, cultivar: "Katumani", depth: 30, rowSpacing: 1000);
                1996-03-13  [Fertiliser].Apply(Amount: 0, Type: Fertiliser.Types.NO3N)
                1997-04-02  [Maize].Sow(population: 0.21, cultivar: "Katumani", depth: 30, rowSpacing: 1000);
                1997-04-02  [Fertiliser].Apply(Amount: 60, Type: Fertiliser.Types.NO3N)
              Report HarvestReport: same as Validation.Machakos.Grevillea.Grevillea.WindbreakSystem.1m.HarvestReport
              Report DailyReport: EventNames=[Clock].DoReport
                VariableNames:
                  [Clock].Today as Date
                  Parent.Distance as Distance
                  [LocalMicroClimate].Wind
                  [Soil].SoilWater.Es
                  sum([Soil].SoilNitrogen.NO3.kgha) as TotalNO3N
                  sum([Soil].SoilNitrogen.NH4.kgha) as TotalNH4N
                  sum([TreeProxy].WaterUptake) as WaterUptake
                  sum([Soil].SoilWater.SWmm[1:4]) as SW90cm
                  [Soil].SoilWater.SW[2] as SW35cm
                  [Soil].SoilWater.SW[3] as SW55cm
                  [Soil].SoilWater.SW[4] as SW75cm
                  [TreeProxy].H
                  [TreeProxy].SWDemand
                  [TreeProxy].heightToday
                  [Soil].SoilWater.Eo
                  [TreeProxy].WaterStress
                  [Soil].SoilWater.SW[1] as SurfaceSW
                  [Maize].Leaf.Fw
                  [Maize].Leaf.Photosynthesis.FVPD
                  [Maize].Leaf.Photosynthesis.FT
                  [Maize].Leaf.Fn
                  [Maize].Root.Depth
                  [Maize].Grain.Live.Wt as GrainWt
              Fertiliser
              SurfaceOrganicMatter: InitialResidueName=wheat_stubble; InitialResidueType=wheat; InitialResidueMass=500; InitialStandingFraction=0; InitialCPR=0; InitialCNR=100; FractionFaecesAdded=1
              Plant Maize: CropType=Maize; IsEnding=false; DaysAfterEnding=0
              Manager Harvesting: same as Validation.Machakos.Grevillea.Grevillea.WindbreakSystem.1m.Harvesting
              Soil MachakosSoil: same as Validation.Machakos.Grevillea.Grevillea.WindbreakSystem.1m.MachakosSoil
            RectangularZone 2m: Length=20; Width=1; Slope=0; AspectAngle=0; Altitude=50
              LocalMicroClimate
              MicroClimate: a_interception=0; b_interception=0; c_interception=0; d_interception=0; soil_albedo=0.23; SoilHeatFluxFraction=0.4; MinimumHeightDiffForNewLayer=0; NightInterceptionFraction=0.5; ReferenceHeight=2
              Operations
                1996-03-13  [Maize].Sow(population: 0.3, cultivar: "Katumani", depth: 30, rowSpacing: 1000);
                1996-03-13  [Fertiliser].Apply(Amount: 0, Type: Fertiliser.Types.NO3N)
                1997-04-02  [Maize].Sow(population: 0.3, cultivar: "Katumani", depth: 30, rowSpacing: 1000);
                1997-04-02  [Fertiliser].Apply(Amount: 60, Type: Fertiliser.Types.NO3N)
              Report HarvestReport: same as Validation.Machakos.Grevillea.Grevillea.WindbreakSystem.1m.HarvestReport
              Report DailyReport: same as Validation.Machakos.Gliricidia.Gliricidia.WindbreakSystem.1m.DailyReport
              Fertiliser
              SurfaceOrganicMatter: InitialResidueName=wheat_stubble; InitialResidueType=wheat; InitialResidueMass=500; InitialStandingFraction=0; InitialCPR=0; InitialCNR=100; FractionFaecesAdded=1
              Plant Maize: CropType=Maize; IsEnding=false; DaysAfterEnding=0
              Manager Harvesting: same as Validation.Machakos.Grevillea.Grevillea.WindbreakSystem.2m.Harvesting
              Soil MachakosSoil: same as Validation.Machakos.Grevillea.Grevillea.WindbreakSystem.2m.MachakosSoil
            RectangularZone 3m: Length=20; Width=1; Slope=0; AspectAngle=0; Altitude=50
              LocalMicroClimate
              MicroClimate: a_interception=0; b_interception=0; c_interception=0; d_interception=0; soil_albedo=0.23; SoilHeatFluxFraction=0.4; MinimumHeightDiffForNewLayer=0; NightInterceptionFraction=0.5; ReferenceHeight=2
              Operations
                1996-03-13  [Maize].Sow(population: 1.0, cultivar: "Katumani", depth: 30, rowSpacing: 1000);
                1996-03-13  [Fertiliser].Apply(Amount: 0, Type: Fertiliser.Types.NO3N)
                1997-04-02  [Maize].Sow(population: 1.0, cultivar: "Katumani", depth: 30, rowSpacing: 1000);
                1997-04-02  [Fertiliser].Apply(Amount: 60, Type: Fertiliser.Types.NO3N)
              Report HarvestReport: same as Validation.Machakos.Grevillea.Grevillea.WindbreakSystem.1m.HarvestReport
              Report DailyReport: same as Validation.Machakos.Gliricidia.Gliricidia.WindbreakSystem.1m.DailyReport
              Fertiliser
              SurfaceOrganicMatter: InitialResidueName=wheat_stubble; InitialResidueType=wheat; InitialResidueMass=500; InitialStandingFraction=0; InitialCPR=0; InitialCNR=100; FractionFaecesAdded=1
              Plant Maize: CropType=Maize; IsEnding=false; DaysAfterEnding=0
              Manager Harvesting: same as Validation.Machakos.Grevillea.Grevillea.WindbreakSystem.1m.Harvesting
              Soil MachakosSoil: same as Validation.Machakos.Grevillea.Grevillea.WindbreakSystem.1m.MachakosSoil
            RectangularZone 4m: Length=20; Width=1; Slope=0; AspectAngle=0; Altitude=50
              LocalMicroClimate
              MicroClimate: a_interception=0; b_interception=0; c_interception=0; d_interception=0; soil_albedo=0.23; SoilHeatFluxFraction=0.4; MinimumHeightDiffForNewLayer=0; NightInterceptionFraction=0.5; ReferenceHeight=2
              Operations
                1996-03-13  [Maize].Sow(population: 1.83, cultivar: "Katumani", depth: 30, rowSpacing: 1000);
                1996-03-13  [Fertiliser].Apply(Amount: 0, Type: Fertiliser.Types.NO3N)
                1997-04-02  [Maize].Sow(population: 1.83, cultivar: "Katumani", depth: 30, rowSpacing: 1000);
                1997-04-02  [Fertiliser].Apply(Amount: 60, Type: Fertiliser.Types.NO3N)
              Report HarvestReport: same as Validation.Machakos.Grevillea.Grevillea.WindbreakSystem.1m.HarvestReport
              Report DailyReport: same as Validation.Machakos.Gliricidia.Gliricidia.WindbreakSystem.1m.DailyReport
              Fertiliser
              SurfaceOrganicMatter: InitialResidueName=wheat_stubble; InitialResidueType=wheat; InitialResidueMass=500; InitialStandingFraction=0; InitialCPR=0; InitialCNR=100; FractionFaecesAdded=1
              Plant Maize: CropType=Maize; IsEnding=false; DaysAfterEnding=0
              Manager Harvesting: same as Validation.Machakos.Grevillea.Grevillea.WindbreakSystem.1m.Harvesting
              Soil MachakosSoil: same as Validation.Machakos.Grevillea.Grevillea.WindbreakSystem.1m.MachakosSoil
            RectangularZone 5m: Length=20; Width=1; Slope=0; AspectAngle=0; Altitude=50
              LocalMicroClimate
              MicroClimate: a_interception=0; b_interception=0; c_interception=0; d_interception=0; soil_albedo=0.23; SoilHeatFluxFraction=0.4; MinimumHeightDiffForNewLayer=0; NightInterceptionFraction=0.5; ReferenceHeight=2
              Operations
                1996-03-13  [Maize].Sow(population: 2.29, cultivar: "Katumani", depth: 30, rowSpacing: 1000);
                1996-03-13  [Fertiliser].Apply(Amount: 0, Type: Fertiliser.Types.NO3N)
                1997-04-02  [Maize].Sow(population: 2.29, cultivar: "Katumani", depth: 30, rowSpacing: 1000);
                1997-04-02  [Fertiliser].Apply(Amount: 60, Type: Fertiliser.Types.NO3N)
              Report HarvestReport: same as Validation.Machakos.Grevillea.Grevillea.WindbreakSystem.1m.HarvestReport
              Report DailyReport: same as Validation.Machakos.Gliricidia.Gliricidia.WindbreakSystem.1m.DailyReport
              Fertiliser
              SurfaceOrganicMatter: InitialResidueName=wheat_stubble; InitialResidueType=wheat; InitialResidueMass=500; InitialStandingFraction=0; InitialCPR=0; InitialCNR=100; FractionFaecesAdded=1
              Plant Maize: CropType=Maize; IsEnding=false; DaysAfterEnding=0
              Manager Harvesting: same as Validation.Machakos.Grevillea.Grevillea.WindbreakSystem.1m.Harvesting
              Soil MachakosSoil: same as Validation.Machakos.Grevillea.Grevillea.WindbreakSystem.1m.MachakosSoil
            RectangularZone 6m: Length=20; Width=1; Slope=0; AspectAngle=0; Altitude=50
              LocalMicroClimate
              MicroClimate: a_interception=0; b_interception=0; c_interception=0; d_interception=0; soil_albedo=0.23; SoilHeatFluxFraction=0.4; MinimumHeightDiffForNewLayer=0; NightInterceptionFraction=0.5; ReferenceHeight=2
              Operations
                1996-03-13  [Maize].Sow(population: 2.62, cultivar: "Katumani", depth: 30, rowSpacing: 1000);
                1996-03-13  [Fertiliser].Apply(Amount: 0, Type: Fertiliser.Types.NO3N)
                1997-04-02  [Maize].Sow(population: 2.62, cultivar: "Katumani", depth: 30, rowSpacing: 1000);
                1997-04-02  [Fertiliser].Apply(Amount: 60, Type: Fertiliser.Types.NO3N)
              Report HarvestReport: same as Validation.Machakos.Grevillea.Grevillea.WindbreakSystem.1m.HarvestReport
              Report DailyReport: same as Validation.Machakos.Gliricidia.Gliricidia.WindbreakSystem.1m.DailyReport
              Fertiliser
              SurfaceOrganicMatter: InitialResidueName=wheat_stubble; InitialResidueType=wheat; InitialResidueMass=500; InitialStandingFraction=0; InitialCPR=0; InitialCNR=100; FractionFaecesAdded=1
              Plant Maize: CropType=Maize; IsEnding=false; DaysAfterEnding=0
              Manager Harvesting: same as Validation.Machakos.Grevillea.Grevillea.WindbreakSystem.1m.Harvesting
              Soil MachakosSoil: same as Validation.Machakos.Grevillea.Grevillea.WindbreakSystem.1m.MachakosSoil
            RectangularZone 7m: Length=20; Width=1; Slope=0; AspectAngle=0; Altitude=50
              LocalMicroClimate
              MicroClimate: a_interception=0; b_interception=0; c_interception=0; d_interception=0; soil_albedo=0.23; SoilHeatFluxFraction=0.4; MinimumHeightDiffForNewLayer=0; NightInterceptionFraction=0.5; ReferenceHeight=2
              Operations
                1996-03-13  [Maize].Sow(population: 2.8, cultivar: "Katumani", depth: 30, rowSpacing: 1000);
                1996-03-13  [Fertiliser].Apply(Amount: 0, Type: Fertiliser.Types.NO3N)
                1997-04-02  [Maize].Sow(population: 2.8, cultivar: "Katumani", depth: 30, rowSpacing: 1000);
                1997-04-02  [Fertiliser].Apply(Amount: 60, Type: Fertiliser.Types.NO3N)
              Report HarvestReport: same as Validation.Machakos.Grevillea.Grevillea.WindbreakSystem.1m.HarvestReport
              Report DailyReport: same as Validation.Machakos.Gliricidia.Gliricidia.WindbreakSystem.1m.DailyReport
              Fertiliser
              SurfaceOrganicMatter: InitialResidueName=wheat_stubble; InitialResidueType=wheat; InitialResidueMass=500; InitialStandingFraction=0; InitialCPR=0; InitialCNR=100; FractionFaecesAdded=1
              Plant Maize: CropType=Maize; IsEnding=false; DaysAfterEnding=0
              Manager Harvesting: same as Validation.Machakos.Grevillea.Grevillea.WindbreakSystem.1m.Harvesting
              Soil MachakosSoil: same as Validation.Machakos.Grevillea.Grevillea.WindbreakSystem.1m.MachakosSoil
            RectangularZone 8m: Length=20; Width=1; Slope=0; AspectAngle=0; Altitude=50
              LocalMicroClimate
              MicroClimate: a_interception=0; b_interception=0; c_interception=0; d_interception=0; soil_albedo=0.23; SoilHeatFluxFraction=0.4; MinimumHeightDiffForNewLayer=0; NightInterceptionFraction=0.5; ReferenceHeight=2
              Operations: same as Validation.Machakos.Gliricidia.Gliricidia.WindbreakSystem.7m.Operations
              Report HarvestReport: same as Validation.Machakos.Grevillea.Grevillea.WindbreakSystem.1m.HarvestReport
              Report DailyReport: same as Validation.Machakos.Gliricidia.Gliricidia.WindbreakSystem.1m.DailyReport
              Fertiliser
              SurfaceOrganicMatter: InitialResidueName=wheat_stubble; InitialResidueType=wheat; InitialResidueMass=500; InitialStandingFraction=0; InitialCPR=0; InitialCNR=100; FractionFaecesAdded=1
              Plant Maize: CropType=Maize; IsEnding=false; DaysAfterEnding=0
              Manager Harvesting: same as Validation.Machakos.Grevillea.Grevillea.WindbreakSystem.1m.Harvesting
              Soil MachakosSoil: Site=ICRAF Machakos Research Station; NearestTown=Machakos; Country=Kenya; Latitude=-1.55; Longitude=37.13
                Physical: same as Validation.Machakos.Grevillea.Grevillea.WindbreakSystem.1m.MachakosSoil.Physical
                SoilWater: same as Validation.Machakos.Grevillea.Grevillea.WindbreakSystem.TreeRow.MachakosSoil.SoilWater
                SoilNitrogen: same as Replacements.MachakosSoil.SoilNitrogen
                Organic: same as Replacements.MachakosSoil.Organic
                Chemical
                  Thickness  NO3N  NH4N  PH
                  200        5     0.1   6.5
                  200        2     0.1   6.5
                  200        2     0.1   6.5
                  200        1     0.1   6.5
                  200        0.5   0.1   6.5
                  200        0.5   0.1   6.5
                  200        0.5   0.1   6.5
                  200        0.5   0.1   6.5
                Sample: same as Validation.Machakos.Grevillea.Grevillea.WindbreakSystem.TreeRow.MachakosSoil.Sample
                CERESSoilTemperature
  Folder Sensibility
    Memo
      Yield data from cereal and pulse crops [Bennell2008] have been collected from windbreak sites through the eastern agricultural districts of South Australia using a harvester equipped with a yield monitor. The yield response in the sheltered benefit zone was +3.7% for cereal yield averaged across zones (2.2H–9.7H) outside the competition zone. They found, for wheat, that the average width of expression of the competition zone to be 2 tree heights (2H) with a 4% increase in yields within the sheltered zone (2H-11H).

      This sensibility test assumes a tree windbreak with a of height of 10 m. The competition zone should therefore be evident out to 20m from the trees with only a marginal increase in yield at 20-110 m from the trees.
    Simulation South Australia
      Clock: Start=2000-01-01; End=2010-12-31
      Summary SummaryFile
      Weather: FileName=Roseworthy.met
      SoilArbitrator Soil Arbitrator
      AgroforestrySystem WindbreakSystem: RainfallInterceptionFraction=0; RainShaddowWidth=0; Slope=0; AspectAngle=0; Altitude=50
        Manager SowingRule
          StartDate = 15-may
          EndDate = 24-jun
          MinESW = 30
          ESWZoneName = 50m
          MinRain = 25
          RainDays = 7
          CultivarName = h45
          SowingDepth = 30
          RowSpacing = 250
          Population = 120
          Amount = 100
          CropName = wheat
```csharp
using System;
using System.Collections.Generic;
using Models.Core;
using Models.Agroforestry;
using Models.PMF;
using Models.Soils;
using Models.Utilities;
using Models.Zones;
using APSIM.Shared.Utilities;

namespace Models
{
    [Serializable]
    public class Script : Model
    {
        [Link] Clock Clock;
        [Link] Summary Summary;
        Accumulator accumulatedRain;
        
        [Description("Start of sowing window (d-mmm)")]
        public string StartDate { get; set; }
        [Description("End of sowing window (d-mmm)")]
        public string EndDate { get; set; }
        [Description("Minimum extractable soil water for sowing (mm)")]
        public double MinESW { get; set; }
        [Description("Name of Zone to use for minimum ESW condition")]
        public string ESWZoneName { get; set; }
        [Description("Accumulated rainfall required for sowing (mm)")]
        public double MinRain { get; set; }
        [Description("Duration of rainfall accumulation (d)")]
        public int RainDays { get; set; }
        [Description("Cultivar to be sown")]
        public string CultivarName { get; set; }
        [Description("Sowing depth (mm)")]
        public double SowingDepth { get; set; }
        [Description("Row spacing (mm)")]
        public double RowSpacing { get; set; }
        [Description("Plant population (/m2)")]
        public double Population { get; set; }
        [Description("Amount of fertiliser to be applied (kg/ha)")]
        public double Amount { get; set; }
        [Description("Crop to be fertilised")]
        public string CropName { get; set; }
        
        private Zone ESWZone;
        private List<IModel> Zones;
        private Plant Wheat;
        private Soil Soil;
        
        [EventSubscribe("Commencing")]
        private void OnSimulationCommencing(object sender, EventArgs e)
        {
            Zones = Apsim.FindAll(this, typeof(RectangularZone));
            foreach (Model m in Zones)
            {
                if (m.Name == ESWZoneName)
                {
                    ESWZone = m as Zone;
                    break;
                }
            }
            accumulatedRain = new Accumulator(this, "[Weather].Rain", RainDays);
        }
        
        [EventSubscribe("DoManagement")]
        private void OnDoManagement(object sender, EventArgs e)
        {        
            accumulatedRain.Update();
            
            Soil ESWSoil = Apsim.Find(ESWZone, typeof(Soil)) as Soil;
            
            foreach (Zone z in Zones)
            {
                Wheat = Apsim.Find(z, typeof(Plant)) as Plant;    
                Soil = Apsim.Find(z, typeof(Soil)) as Soil;
                        
                if (Wheat != null && DateUtilities.WithinDates(StartDate, Clock.Today, EndDate) &&
                    !Wheat.IsAlive &&
                    MathUtilities.Sum(ESWSoil.SoilWater.ESW) >= MinESW &&
                    accumulatedRain.Sum >= MinRain)
                {
                    Wheat.Sow(population: Population, cultivar: CultivarName, depth: SowingDepth, rowSpacing: RowSpacing);
                    Fertiliser Fertiliser = Apsim.Find(Wheat.Parent, typeof(Fertiliser)) as Fertiliser;
                    Fertiliser.Apply(Amount: Amount, Type: Fertiliser.Types.NO3N);
                }

                if (Wheat != null && Wheat.IsReadyForHarvesting)
                {
                    Wheat.Harvest();
                    Wheat.EndCrop();    
                }
            }
        }
    }
}
```
        TreeProxy: RootRadius=0.02; NumberOfTrees=0; Kd=1e-07; BaseKL=0.01; KValue=0; Heights=[10000, 10000, 10000, 10000, 10000]; NDemands=[1, 1, 1, 1, 1]; ShadeModifiers=[1, 1, 1, 1, 1]
          Table=[[Parameter, 0, 0.5h, 1h, 1.5h, 2h, 2.5h, 3h, 4h, 5h, 6h], [Shade (%), Root Length Density (cm/cm3), Depth (cm), 0-15, 15-30, 30-60, 60-90, 90-120, 120-150], [80, , , 3, 2, 1, .5, .1, .1], [0, , , 2, 1, .5, .5, .1, .1], [0, , , 1, .5, .2, .1, .1, 0], [0, , , .1, .1, .1, .1, .05, 0], [0, , , .02, .02, .02, .01, 0, 0], [0, , , .01, .01, 0, 0, 0, 0], [0, , , .005, .005, 0, 0, 0, 0], [0, , , 0, 0, 0, 0, 0, 0], [0, , , 0, 0, 0, 0, 0, 0], [0, , , 0, 0, 0, 0, 0, 0]]
          Dates=[1900-01-01, 1900-03-01, 1900-06-01, 1900-09-01, 1900-12-31]
        RectangularZone TreeRow: Length=100; Width=5; Slope=0; AspectAngle=0; Altitude=50
          LocalMicroClimate
          MicroClimate: a_interception=0; b_interception=0; c_interception=0; d_interception=0; soil_albedo=0.23; SoilHeatFluxFraction=0.4; MinimumHeightDiffForNewLayer=0; NightInterceptionFraction=0.5; ReferenceHeight=2
          Report DailyReport: EventNames=[Clock].DoReport
            VariableNames:
              [Clock].Today
              Parent.Distance as Distance
              [LocalMicroClimate].Wind
              sum([Soil].SoilNitrogen.NO3.kgha) as TotalNO3N
              sum([Soil].SoilNitrogen.NH4.kgha) as TotalNH4N
              sum([TreeProxy].WaterUptake) as WaterUptake
              sum([Soil].SoilWater.SWmm[1:4]) as SW90cm
              [TreeProxy].H
              [TreeProxy].SWDemand
              [TreeProxy].heightToday
              [Soil].SoilWater.Eo
              [TreeProxy].WaterStress
              [Soil].SoilWater.SW[1] as SurfaceSW
          Fertiliser
          SurfaceOrganicMatter: InitialResidueName=wheat_stubble; InitialResidueType=wheat; InitialResidueMass=500; InitialStandingFraction=0; InitialCPR=0; InitialCNR=100; FractionFaecesAdded=1
          Soil: SoilType=Clay; Site=Wolseley; NearestTown=Wolseley; Region=Upper South East; State=South Australia; Country=Australia; ApsoilNumber=344; Latitude=-36.389; Longitude=140.899; DataSource=APSoil
            Comments=Chemical data based on old soil pit sites/ CLL measured for wheat 2007
            Physical
              Thickness  BD    AirDry  LL15  DUL   SAT   KS
              100        1.4   0.05    0.05  0.33  0.44  20
              150        1.36  0.15    0.18  0.41  0.46  20
              250        1.33  0.21    0.21  0.42  0.47  20
              200        1.34  0.24    0.24  0.41  0.46  20
              300        1.31  0.23    0.23  0.43  0.48  20
              400        1.35  0.3     0.3   0.41  0.46  20
            SoilWater: SummerDate=1-Nov; SummerU=6; SummerCona=3.5; WinterDate=1-Apr; WinterU=6; WinterCona=3.5; DiffusConst=40; DiffusSlope=16; Salb=0.12; CN2Bare=75; CNRed=20; CNCov=0.8; max_pond=0; Thickness=[100, 150, 250, 200, 300, 400]; SWCON=[0.5, 0.5, 0.5, 0.5, 0.3, 0.3]; PrecipitationInterception=0
            SoilNitrogen: same as Replacements.MachakosSoil.SoilNitrogen
            Organic: FOMCNRatio=40
              Thickness  Carbon  SoilCNRatio  FBiom  FInert  FOM
              100        1.7     12           0.04   0.5     379.798
              150        0.8     12           0.02   0.6     275.396
              250        0.3     12           0.02   0.8     161.176
              200        0.2     12           0.02   1       104.996
              300        0.2     12           0.01   1       55.2058
              400        0.2     12           0.01   1       23.4278
            Chemical
              Thickness  NO3N  NH4N  PH
              100        1     0.1   7.8
              150        1     0.1   7.9
              250        1     0.1   8.3
              200        1     0.1   8.3
              300        1     0.1   8.3
              400        1     0.1   8.4
            InitialWater: PercentMethod=0; FractionFull=0.33
            Sample InitialN: Thickness=[150, 150, 300, 300, 300, 300]; SWUnits=Volumetric; OCUnits=Total; PHUnits=Water
            CERESSoilTemperature
        RectangularZone 5m: Length=100; Width=5; Slope=0; AspectAngle=0; Altitude=50
          LocalMicroClimate
          MicroClimate: a_interception=0; b_interception=0; c_interception=0; d_interception=0; soil_albedo=0.23; SoilHeatFluxFraction=0.4; MinimumHeightDiffForNewLayer=0; NightInterceptionFraction=0.5; ReferenceHeight=2
          Report HarvestReport: EventNames=[Wheat].Harvesting
            VariableNames:
              [Clock].Today
              [Clock].Today.Year as Year
              [Zone].Area
              Parent.Distance as Distance
              [Wheat].AboveGround.Wt as BiomassWt
              [Wheat].Grain.Wt as GrainWt
              [Wheat].Grain.Size as GrainSize
              [Wheat].Grain.Number as GrainNumber
          Report DailyReport: EventNames=[Clock].DoReport
            VariableNames:
              [Clock].Today
              [Clock].Today.Year as Year
              Parent.Distance as Distance
              [LocalMicroClimate].Wind
              sum([Soil].SoilWater.SWmm[1:4]) as SW90cm
              sum([Soil].SoilNitrogen.NO3.kgha) as TotalNO3N
              sum([Soil].SoilNitrogen.NH4.kgha) as TotalNH4N
              [Wheat].AboveGround.Wt as BiomassWt
              [Wheat].Grain.Wt as GrainWt
              [Soil].SoilWater.SW[1] as SurfaceSW
          Fertiliser
          SurfaceOrganicMatter: InitialResidueName=wheat_stubble; InitialResidueType=wheat; InitialResidueMass=500; InitialStandingFraction=0; InitialCPR=0; InitialCNR=100; FractionFaecesAdded=1
          Plant Wheat: CropType=Wheat; IsEnding=false; DaysAfterEnding=0
          Soil: SoilType=Clay; Site=Wolseley; NearestTown=Wolseley; Region=Upper South East; State=South Australia; Country=Australia; ApsoilNumber=344; Latitude=-36.389; Longitude=140.899; DataSource=APSoil
            Comments=Chemical data based on old soil pit sites/ CLL measured for wheat 2007
            Physical
              Thickness  BD    AirDry  LL15  DUL   SAT
              100        1.4   0.05    0.05  0.33  0.44
              150        1.36  0.15    0.18  0.41  0.46
              250        1.33  0.21    0.21  0.42  0.47
              200        1.34  0.24    0.24  0.41  0.46
              300        1.31  0.23    0.23  0.43  0.48
              400        1.35  0.3     0.3   0.41  0.46
              SoilCrop WheatSoil: LL=[0.05, 0.18, 0.21, 0.24, 0.23, 0.3]; KL=[0.06, 0.06, 0.06, 0.04, 0.04, 0.02]; XF=[1, 1, 1, 1, 1, 1]
            SoilWater: same as Sensibility.South Australia.WindbreakSystem.TreeRow.Soil.SoilWater
            SoilNitrogen: same as Replacements.MachakosSoil.SoilNitrogen
            Organic: same as Sensibility.South Australia.WindbreakSystem.TreeRow.Soil.Organic
            Chemical
              Thickness  NO3N  NH4N  PH
              100        1     0.1   7.8
              150        1     0.1   7.9
              250        1     0.1   8.3
              200        1     0.1   8.3
              300        1     0.1   8.3
              400        1     0.1   8.4
            InitialWater: PercentMethod=0; FractionFull=0.33
            Sample: Thickness=[150, 150, 300, 300, 300, 300]; SWUnits=Volumetric; OCUnits=Total; PHUnits=Water
            CERESSoilTemperature
        RectangularZone 10m: same as Sensibility.South Australia.WindbreakSystem.5m
        RectangularZone 15m: same as Sensibility.South Australia.WindbreakSystem.5m
        RectangularZone 20m: same as Sensibility.South Australia.WindbreakSystem.5m
        RectangularZone 25m: same as Sensibility.South Australia.WindbreakSystem.5m
        RectangularZone 30m: same as Sensibility.South Australia.WindbreakSystem.5m
        RectangularZone 40m: Length=100; Width=10; Slope=0; AspectAngle=0; Altitude=50
          LocalMicroClimate
          MicroClimate: a_interception=0; b_interception=0; c_interception=0; d_interception=0; soil_albedo=0.23; SoilHeatFluxFraction=0.4; MinimumHeightDiffForNewLayer=0; NightInterceptionFraction=0.5; ReferenceHeight=2
          Report HarvestReport: EventNames=[Wheat].Harvesting
            VariableNames:
              [Clock].Today
              [Clock].Today.Year as Year
              [Zone].Area
              Parent.Distance as Distance
              [Wheat].AboveGround.Wt as BiomassWt
              [Wheat].Grain.Wt as GrainWt
              [Wheat].Grain.Size as GrainSize
              [Wheat].Grain.Number as GrainNumber
          Report DailyReport: same as Sensibility.South Australia.WindbreakSystem.5m.DailyReport
          Fertiliser
          SurfaceOrganicMatter: InitialResidueName=wheat_stubble; InitialResidueType=wheat; InitialResidueMass=500; InitialStandingFraction=0; InitialCPR=0; InitialCNR=100; FractionFaecesAdded=1
          Plant Wheat: CropType=Wheat; IsEnding=false; DaysAfterEnding=0
          Soil: same as Sensibility.South Australia.WindbreakSystem.5m.Soil
        RectangularZone 50m: same as Sensibility.South Australia.WindbreakSystem.40m
        RectangularZone 75m: Length=100; Width=25; Slope=0; AspectAngle=0; Altitude=50
          LocalMicroClimate
          MicroClimate: a_interception=0; b_interception=0; c_interception=0; d_interception=0; soil_albedo=0.23; SoilHeatFluxFraction=0.4; MinimumHeightDiffForNewLayer=0; NightInterceptionFraction=0.5; ReferenceHeight=2
          Report HarvestReport: EventNames=[Wheat].Harvesting
            VariableNames:
              [Clock].Today
              [Clock].Today.Year as Year
              [Zone].Area
              Parent.Distance as Distance
              [Wheat].AboveGround.Wt as BiomassWt
              [Wheat].Grain.Wt as GrainWt
              [Wheat].Grain.Size as GrainSize
              [Wheat].Grain.Number as GrainNumber
          Report DailyReport: same as Sensibility.South Australia.WindbreakSystem.5m.DailyReport
          Fertiliser
          SurfaceOrganicMatter: InitialResidueName=wheat_stubble; InitialResidueType=wheat; InitialResidueMass=500; InitialStandingFraction=0; InitialCPR=0; InitialCNR=100; FractionFaecesAdded=1
          Plant Wheat: CropType=Wheat; IsEnding=false; DaysAfterEnding=0
          Soil: same as Sensibility.South Australia.WindbreakSystem.5m.Soil
        RectangularZone 100m: same as Sensibility.South Australia.WindbreakSystem.75m
        RectangularZone 150m: Length=100; Width=50; Slope=0; AspectAngle=0; Altitude=50
          LocalMicroClimate
          MicroClimate: a_interception=0; b_interception=0; c_interception=0; d_interception=0; soil_albedo=0.23; SoilHeatFluxFraction=0.4; MinimumHeightDiffForNewLayer=0; NightInterceptionFraction=0.5; ReferenceHeight=2
          Report HarvestReport: EventNames=[Wheat].Harvesting
            VariableNames:
              [Clock].Today
              [Clock].Today.Year as Year
              [Zone].Area
              Parent.Distance as Distance
              [Wheat].AboveGround.Wt as BiomassWt
              [Wheat].Grain.Wt as GrainWt
              [Wheat].Grain.Size as GrainSize
              [Wheat].Grain.Number as GrainNumber
          Report DailyReport: same as Sensibility.South Australia.WindbreakSystem.5m.DailyReport
          Fertiliser
          SurfaceOrganicMatter: InitialResidueName=wheat_stubble; InitialResidueType=wheat; InitialResidueMass=500; InitialStandingFraction=0; InitialCPR=0; InitialCNR=100; FractionFaecesAdded=1
          Plant Wheat: CropType=Wheat; IsEnding=false; DaysAfterEnding=0
          Soil: same as Sensibility.South Australia.WindbreakSystem.5m.Soil
        RectangularZone 200m: Length=100; Width=50; Slope=0; AspectAngle=0; Altitude=50
          LocalMicroClimate
          Report HarvestReport: EventNames=[Wheat].Harvesting
            VariableNames:
              [Clock].Today
              [Clock].Today.Year as Year
              [Zone].Area
              Parent.Distance as Distance
              [Wheat].AboveGround.Wt as BiomassWt
              [Wheat].Grain.Wt as GrainWt
              [Wheat].Grain.Size as GrainSize
              [Wheat].Grain.Number as GrainNumber
          Report DailyReport: same as Sensibility.South Australia.WindbreakSystem.5m.DailyReport
          Fertiliser
          SurfaceOrganicMatter: InitialResidueName=wheat_stubble; InitialResidueType=wheat; InitialResidueMass=500; InitialStandingFraction=0; InitialCPR=0; InitialCNR=100; FractionFaecesAdded=1
          Plant Wheat: CropType=Wheat; IsEnding=false; DaysAfterEnding=0
          MicroClimate: a_interception=0; b_interception=0; c_interception=0; d_interception=0; soil_albedo=0.23; SoilHeatFluxFraction=0.4; MinimumHeightDiffForNewLayer=0; NightInterceptionFraction=0.5; ReferenceHeight=2
          Soil: same as Sensibility.South Australia.WindbreakSystem.5m.Soil
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