Simulations: Version=219
  DataStore
  Simulation AgPastureCLEMExample
    Memo
      This adds a CLEM whole farm model to the APSIM\Examples\AgPasture simulation such that CLEM livestock interact with AgPasture models via the SimpleGrazing component.

      Changes
      - Adds CLEMEvents as child of Clock
      - Adds CLEM RandomNumbers
    Clock: Start=1980-07-01; End=1985-06-30
      CLEMEvents: TimeStep=30; CustomTimeStep=0; EcologicalIndicatorsCalculationInterval=12; EcologicalIndicatorsCalculationMonth=6
    Weather: FileName=%root%/Examples/WeatherFiles/NZ_Lincoln
    MicroClimate: a_interception=0; b_interception=1; c_interception=0; d_interception=0; SoilHeatFluxFraction=0.4; MinimumHeightDiffForNewLayer=0; NightInterceptionFraction=0.5; ReferenceHeight=2
    SoilArbitrator
    Forages
      Parameters:
        Name                          LiveDigestibility  DeadDigestibility  LiveFractionConsumable  DeadFractionConsumable  LiveMinimumBiomass  DeadMinimumBiomass
        SurfaceOrganicMatter.Residue  0.7                0.3                0                       0                       0                   0
        AGPRyegrass.Leaf              FromModel          FromModel          1                       1                       25                  0
        AGPRyegrass.Stem              FromModel          FromModel          1                       1                       10                  0
        AGPRyegrass.Stolon            FromModel          FromModel          1                       1                       0                   0
        AGPWhiteClover.Leaf           FromModel          FromModel          1                       1                       15                  0
        AGPWhiteClover.Stem           FromModel          FromModel          1                       1                       5                   0
        AGPWhiteClover.Stolon         FromModel          FromModel          1                       1                       5                   0
    Summary
    RandomNumberGenerator RandomNumbers: Seed=0
    ZoneCLEM CLEM: UserType=2; FarmMultiplier=1; DescriptiveSummaryFormatStyle=0; BuildTransactionCategoryFromTree=false; UseModelNameAsTransactionCategory=false; Area=0; Slope=0; AspectAngle=0; Altitude=50
      Memo
        # Notes
        ## Pasture
        * The Field is provided from the AgPasture example
        * This paddock is linked to the CLEM GrazeFoodStore by a GrazeFoodStoreAPSIMLink which CLEM can then treat as a pasture
        * No rotation or animal movelemt is applied in this simulation.

        ## Herd
        * The new GrowPF anaimal production sub-model is used.
          * The previous Grow component is also provided but disabled.
        * The max number of breeders in Activities\ManageHerd\Manage numbers will set the herd size with the initial cohorts scaled to this number
        * Breeders will be provided from heifers or purchased up to max breeders as needed in the Manage numbers activity
        * The herd will graze the paddock in which they are located
        * Hay is fed to fill any potential intake shortfall from grazing
        * Controlled mating is performed from January to May
          * No bulls are required in the herd for controlled mating and have been omitted.
          * Any female over 0.85 relative condition will conceive at mating (prob of conceiving = 1.0)
        * Weaning occurs in any month where suckling are at least 4 months old or 100kg.
        * Old breeders will be sold at 10 years old regardless of pregnancy or lactation status
          * This will occur in the Manage number activitiy based on its timer

        ## Initial simulation setup
        * Breeding turned off (Activity disabled)
        * Weaning turned off (Activity disabled as not needed as no sucklings in initial herd and not doing breeding)
        * Represents a breeder herd close to Maximum number of breeders.
        * Mortality is not included so breeders will persist until age at sale
          * Breeders may fall to unrealistic body condition
          * This is left to identify the ability of the pasture and management rules to support the numbers supplied
      ResourcesHolder Resources
        Finance Finances: FirstMonthOfFinancialYear=7
          FinanceType General account: OpeningBalance=100000; EnforceWithdrawalLimit=false; WithdrawalLimit=0; InterestRateCharged=7.5; InterestRatePaid=2
        RuminantHerd Ruminants: TransactionStyle=0
          RuminantType Bos indicus
            RuminantParametersHolder Parameters1: DisplaySummaryParameters=true
              RuminantParametersBreeding Breeding: OestrusCycleLength=20; DaysInHeat=2; ProportionOffspringMale=0.5; DaysLastBirthToStartOestrus=20; MaximumMaleMatingsPerDay=30; AllowFreemartins=false; ConceptionDuringLactationProbability=1; DystociaCoefficients=[0, 0]
              RuminantParametersGeneral General: Breed=Bos taurus; NaturalWeaningAge={Parts=[0]}; MinimumSizeForMaturityFemale=0.6; MinimumSizeForMaturityMale=0.6; GestationLength={Parts=[0, 9, 0]}; MultipleBirthRate=[0]; SRWFemale=460; SRWCastrateMaleMultiplier=1.2; SRWMaleMultiplier=1.4; BirthScalar=[0.07, 0.07]; EffectRelativeSizeBirthWeight_CP4=0.33; BaseAnimalEquivalent=450; RelBCToScoreRate=0.15; BCScoreRange=[0, 3, 5]; ProportionEBWFatFemale=0.25; ProportionEBWFatMale=0.25; ProportionEBWFatMax=0.45; GutFillMinimum=0.04; AgeGrowthRateCoefficientProvisionStyle=0; AgeGrowthRateCoefficient_CN1=0.015; CN1EstimatedWeaningWeight=0; CN1EstimatedWeaningAge={Parts=[0]}; SRWGrowthScalar_CN2=0.27; SlowGrowthFactor_CN3=0.4; MJEnergyPerKgFat=39.3; MJEnergyPerKgProtein=23.6; IncludeWool=false
              RuminantParametersGrazing Grazing: GreenDietMax=0.98; GreenDietCoefficient=0.15; GreenDietZero=0.04; IntakeCoefficientBiomass=0.01; StrictFeedingLimits=true
              RuminantParametersGrow GrowParams: MortalityBase=0.03; GrowthEnergyIntercept1=6.7; GrowthEnergyIntercept2=20.3; EMaintEfficiencyCoefficient=0.368; EMaintEfficiencyIntercept=0.503; EGrowthEfficiencyCoefficient=0.79; EGrowthEfficiencyIntercept=0; ELactationEfficiencyCoefficient=0.35; ELactationEfficiencyIntercept=0.42; EMaintExponent=8.2e-05; EMaintIntercept=0.09; EMaintCoefficient=0.26; EnergyMaintenanceMaximumAge={Parts=[6, 0, 0]}; Kme=1.2; GrowthEfficiency=1; IntakeCoefficient=0.02425; IntakeIntercept=1.7; ProteinCoefficient=130; ProteinDegradability=0.9; MilkIntakeCoefficient=0.1206; MilkIntakeIntercept=3.8146; MilkIntakeMaximum=20; MilkLWTFodderSubstitutionProportion=0.2; MaxJuvenileIntake=0.03; ProportionalDiscountDueToMilk=0.3; WoolCoefficient=0; CashmereCoefficient=0; LactatingPotentialModifierConstantA=0.32; LactatingPotentialModifierConstantB=61; LactatingPotentialModifierConstantC=1.7
              RuminantParametersGrowPF GrowPFParams
                RuminantParametersGrowPFCACRD CACRD: RumenDegradabilityIntercept_CRD1=0.3; RumenDegradabilitySlope_CRD2=0.25; RumenDegradabilityConcentrateSlope_CRD3=0.1; RumenDegradableProteinIntercept_CRD4=0.007; RumenDegradableProteinSlope_CRD5=0.005; RumenDegradableProteinExponent_CRD6=0.35; ProteinShortfallAlleviationScalar=0.5; MilkProteinDigestibility_CA5=0.92; MicrobialProteinDigestibility_CA7=0.6; FaecalProteinFromMCP_CA8=0.25
                RuminantParametersGrowPFCD CD: BasalMortalityRate_CD1=5.53e-05; EffectBCOnMortality1_CD2=0.3; EffectBCOnMortality2_CD3=0.6; CriticalFatToEBMForSurvival=0.05; RelativeDifferenceWeightDyingIndividuals_CD12=0.1; UpperLimitForMortalityInWeaners_CD13=0.0001
                RuminantParametersGrowPFCG CG: EfficiencyOfDPLSUseForWool_CG1=0.6; EfficiencyOfDPLSUseFromFeed_CG2=0.7; EfficiencyOfDPLSUseFromMilk_CG3=0.8; GainCurvature_CG4=6; GainMidpoint_CG5=0.4; ConditionNoEffect_CG6=0.9; ConditionMaxEffect_CG7=0.97; GrowthEnergyIntercept1_CG8b=6.7; GrowthEnergyIntercept2_CG9=16.5; GrowthEnergySlope1_CG10=2; GrowthEnergySlope2_CG11=13.8; ProteinGainIntercept1_CG12b=0.21; ProteinGainIntercept2_CG13=0.12; ProteinGainSlope1_CG14b=0.004; ProteinGainSlope2_CG15=0.115; BreedGrowthEfficiencyScalar=1; BreedLactationEfficiencyScalar=1; BreedMainenanceEfficiencyScalar=1; ProteinContentOfFatFreeTissueGainWetBasis=0.21; ProteinContentOfFatFreeTissueGainWetBasisAtBirth=0.1373; DaysUntilStandardProteinContentOfFatFreeTissueGainWetBasis=30; DietaryProteinEnergyReleaseEfficiency=0.5; DietaryProteinEnergyReleaseEfficiencyWhenNetEnergyDeficit=0.8; FatPercentToProportionEDeficitTakenFromBodyFatIntercept=0.875; FatPercentToProportionEDeficitTakenFromBodyFatSlope=0.033
                RuminantParametersGrowPFCI CI: IntakeReductionFromInsufficientRDPIntake=0.5; IgnoreFeedQualityIntakeAdjustment=false; RelativeSizeScalar_CI1=0.025; RelativeSizeQuadratic_CI2=1.7; RumenDevelopmentCurvature_CI3=0.22; RumenDevelopmentAge_CI4=60; PeakLactationIntakeDay_CI8=62; LactationResponseCurvature_CI9=1.7; EffectLevelsMilkProdOnIntake_CI10=0.6; BasalMilkRelSRW_CI11=0.05; LactationConditionLossAdjustment_CI12=0.15; LactationConditionLossThreshold_CI13=0.005; LactationConditionLossThresholdDecay_CI14=0.002; ConditionAtParturitionAdjustment_CI15=0.5; PeakLactationIntakeLevel_CI19=[0.416, 0.416]; RelativeConditionEffect_CI20=1.5; DigestibilityPeak_CR1=0.8; DigestibilitySlope_CR3=1.25; QualityIntakeSubsititutionFactorNonLactating_CR11=10.5; QualityIntakeSubsititutionFactorLactating_CR20=11.5; MethaneEmissionsParameter1=0.0184; MethaneEmissionsParameter2=13; MethaneEmissionsParameter3=7.52; MethaneEmissionsParameter4=23.7; MethaneEmissionsParameter5=3.36
                RuminantParametersGrowPFCKCL CKCL: ELactationEfficiencyIntercept_CK5=0.4; ELactationEfficiencyCoefficient_CK6=0.02; ExpectedPeakYield=20; PeakYieldScalar_CL0=[0.375, 0.375]; MetabolisabilityOfMilk_CL5=0.94; EnergyContentMilk_CL6=3.1; LactationEnergyDeficit_CL7=1.17; MilkConsumptionLimit1_CL12=0.42; MilkConsumptionLimit2_CL13=0.58; MilkConsumptionLimit3_CL14=0.036; ProteinPercentMilk_CL15=3.2; AdjustmentOfPotentialYieldReduction_CL16=0.7; PotentialYieldReduction_CL17=0.01; PotentialYieldReduction2_CL18=0.1; PotentialLactationYieldParameter_CL19=1.6; PotentialYieldMEIEffect_CL20=4; PotentialYieldLactationEffect_CL21=0.004; PotentialYieldLactationEffect2_CL22=0.006; PotentialYieldConditionEffect_CL23=3; PotentialYieldConditionEffect2_CL24=0.6
                RuminantParametersGrowPFCM CM: HPVisceraFL_CM1=0.09; FHPScalar_CM2=0.31; MainExponentForAge_CM3=8e-05; AgeEffectMin_CM4=0.84; MilkScalar_CM5=0.23; GrazingEnergyFromMetabolicScalar_CM6=0.0025; EFPFromMilkDiet_CM11=0.000526; BreedEUPFactor1_CM12=0.012; BreedEUPFactor2_CM13=0.0338; DermalLoss_CM14=0.00011
                RuminantParametersGrowPFCP CP: FetalNormWeightParameter_CP2=2.2; FetalNormWeightParameter2_CP3=1.77; EffectFetalRelativeSizeOnBirthWeight_CP4=0.33; ConceptusWeightRatio_CP5=1.8; ConceptusWeightParameter_CP6=2.42; ConceptusWeightParameter2_CP7=1.16; ConceptusEnergyContent_CP8=4.11; ConceptusEnergyParameter_CP9=343.5; ConceptusEnergyParameter2_CP10=0.0164; ConceptusProteinContent_CP11=0.134; ConceptusProteinParameter_CP12=6.22; ConceptusProteinParameter2_CP13=0.747; FetalGrowthPoorCondition_CP14=[1, 1.15]; ToxaemiaCoefficients=[0, 0]
              RuminantParametersGrowMortality Mortality: MortalityCoefficient=2.5; MortalityIntercept=0.05; MortalityExponent=3; JuvenileMortalityCoefficient=3; JuvenileMortalityMaximum=0.2; JuvenileMortalityExponent=1.8
              RuminantParametersLactation Lactation: MilkingDays=300; MilkPeakYield=4; MilkCurveSuckling_CL3=0.6; MilkCurveNonSuckling_CL4=0.11; MilkOffsetDay=4; MilkPeakDay=30
            RuminantInitialCohorts SingleMatureFemale: WeightWarningOccurred=false; ManagedPastureName=GrazeFoodStore.FieldLink
              RuminantTypeCohort Female3_4: Sex=0; AgeDetails={Parts=[3, 6, 0]}; AgeSD=0; Number=1; Weight=450; WeightSD=0; InitialFatProteinStyle=3; Suckling=false; Sire=false; ProportionFleecePresent=0
            RuminantConceptionByCondition ConceptionByCondition: ConditionBasedConceptionStyle=1; ConditionBasedConceptionCutOff=0.85; ConditionBasedConceptionProbability=1
        GrazeFoodStore
          GrazeFoodStoreAPSIMLink FieldLink: TypeOfFeed=3; PaddockName=Field; GrossEnergyContent=18.4; HighestDMD=58; LowestDMD=42; GutFillHighQuality=0.08; GutFillLowQuality=0.2; MetabolisableEnergyContent=8; FatPercent=1.9; RumenDegradableProteinPercent=58
        AnimalFoodStore
          AnimalFoodStoreType Hay: TypeOfFeed=1; GrossEnergyContent=18.4; MetabolisableEnergyContent=10; FatPercent=2; DryMatterDigestibility=60; CPContentStyle=0; UserNitrogenPercent=1.4; UserCrudeProteinPercent=9; GutFill=0.08; CrudeProteinPercent=0; NitrogenPercent=0; RumenDegradableProteinPercent=61.6; AcidDetergentInsolubleProtein=0.07296; StartingAmount=1000; Notes=Aust Feed Test, Unspecified pasture hay
            Transmutation Purchase: TransmutationPacketSize=1000; UseWholePackets=false; TransactionCategory=Transmutation
              Transmute: TransmuteResourceTypeName=Finances.General account; AmountPerPacket=100; TransmuteStyle=0; FinanceTypeForTransactionsName=No transactions
      ActivitiesHolder Activities
        RuminantActivityGrow Grow (disabled): EnergyGross=18.4; OnPartialResourcesAvailableAction=0; TransactionCategory=Livestock.Manage
        RuminantActivityGrowPF GrowPF: ReportUnfed=false; OnPartialResourcesAvailableAction=0
        RuminantActivityGrazeAll Graze all: HoursGrazed=8; TransactionCategory=Livestock.Grazing; OnPartialResourcesAvailableAction=2
        RuminantActivityFeed Feed hay: FeedTypeName=AnimalFoodStore.Hay; ProportionTramplingWastage=0; FeedStyle=4; StopFeedingWhenSatisfied=false; ForceFeed=false; TransactionCategory=Livestock.Feed; OnPartialResourcesAvailableAction=2
          RuminantFeedGroup Feed all: Value=1; Measure=Feed provided; FeedToSatisfy=0; TransactionCategory=Feed.[Product].[Ruminants]; RandomiseBeforeSorting=false
        RuminantActivityBreed Breed: InferStartupPregnancy=false; TransactionCategory=Livestock.Manage; OnPartialResourcesAvailableAction=0
          RuminantActivityControlledMating ControlledMating: MaximumAgeMating={Parts=[10, 0, 0]}; JoiningsPerMale=1; TransactionCategory=Livestock.Manage; OnPartialResourcesAvailableAction=0
            ActivityTimerCalendar MatingTimer: StartDetails={Parts=[0, 1, 0]}; EndDetails={Parts=[0, 5, 0]}; RepeatInterval={Parts=[1, 0, 0]}; WholeTimeStepMustBeInRange=false; Invert=false
        RuminantActivityWean Wean: Style=0; WeaningAge={Parts=[0, 4, 0]}; WeaningWeight=100; GrazeFoodStoreName=GrazeFoodStore.FieldLink; TransactionCategory=Livestock.Manage; OnPartialResourcesAvailableAction=0
          RuminantGroup All: RandomiseBeforeSorting=false
          Memo
            # Notes

            I haven't implemented a dairy weaning as this requires feeding the calves.
            Normally in grazing systems the calves are ready to switch to pasture but I guess ealry age weaning puts calves on milk.
            Milk can be in the AnimalFoodStore and either milked or purchased. This can then be fed to calves.
        RuminantActivityManage Manage numbers: ManageFemaleBreederNumbers=true; PerformFemaleDestocking=true; PerformFemaleStocking=true; PerformMaleDestocking=false; PerformMaleStocking=false; MaximumBreedersKept=10; MinimumBreedersKept=1000; MaxBreedersMultiplierToStop=2; MarkOldBreedersForSale=true; MaximumBreederAge={Parts=[10, 0, 0]}; MaximumProportionBreedersPerPurchase=1; ReturnPregnantMaxAgeToHerd=true; RetainFemaleReplacementBreedersFromSaleHerd=true; ManageMaleBreederNumbers=true; MaximumSiresKept=1; MarkOldSiresForSale=true; MaximumSireAge={Parts=[8, 0, 0]}; AllowSireReplacement=false; RestockSiresRelativeToBreeders=false; MaximumSiresPerPurchase=1; RetainMaleReplacementBreedersFromSaleHerd=true; GrowOutYoungMales=true; ContinuousGrowOutSales=true; MarkAgeWeightMalesForSale=true; CastrateMales=true; MaleSellingAge={Parts=[0, 4, 0]}; MaleSellingWeight=100; GrowOutYoungFemales=false; FemaleSellingAge={Parts=[2, 0, 0]}; FemaleSellingWeight=300; MarkAgeWeightFemalesForSale=false; GrazeFoodStoreNameSires=GrazeFoodStore.FieldLink; GrazeFoodStoreNameBreeders=GrazeFoodStore.FieldLink; GrazeFoodStoreNameGrowOutFemales=GrazeFoodStore.FieldLink; GrazeFoodStoreNameGrowOutMales=GrazeFoodStore.FieldLink; MinimumPastureBeforeRestock=0; AdjustBreedingFemalesAtStartup=true; AdjustOthersToFemaleBreedersPropAtStartup=true; AdjustBreedingMalesAtStartup=false; TransactionCategory=Livestock.Manage; OnPartialResourcesAvailableAction=0
          ActivityTimerCalendar every August: StartDetails={Parts=[0, 8, 0]}; EndDetails={Parts=[0, 8, 0]}; RepeatInterval={Parts=[1, 0, 0]}; WholeTimeStepMustBeInRange=false; Invert=false
          SpecifyRuminant Breeders: RuminantTypeName=Ruminants.Bos indicus; Proportion=1
            RuminantTypeCohort 24mth breeder: Sex=0; AgeDetails={Parts=[2, 0, 0]}; AgeSD=0; Number=0; Weight=0; WeightSD=0; InitialFatProteinStyle=3; Suckling=false; Sire=false; ProportionFleecePresent=0; ManagedPastureName=Not specified
          Memo
            # Notes

            * Individuals are placed in Paddock01 on purchase. These individuals may be out of sync with the rotation herd. This will need to be looked at further.
            * No bulls are included in the herd. It is assumed controlled mating uses AI or provides access to external bulls for this simulation.
        RuminantActivityBuySell Buy: ActivityStyle=Arrange purchases; BankAccountName=Finances.General account; TransactionCategory=Livestock.Manage; OnPartialResourcesAvailableAction=0
        RuminantActivityBuySell Sell: ActivityStyle=Arrange sales; BankAccountName=Finances.General account; TransactionCategory=Livestock.Manage; OnPartialResourcesAvailableAction=0
        SummariseRuminantHerd SummariseHerd: GroupStyle=0; AddGroupByLocation=false; IncludeTotalColumn=false
        ReportRuminantHerd ReportHerd: ReportAtStart=true; WithinTimeStepTiming=1
          RuminantGroup: RandomiseBeforeSorting=false
        ReportRuminantHerd IndGrow: ReportAtStart=false; WithinTimeStepTiming=1
          RuminantGroup idgt2199 (disabled): RandomiseBeforeSorting=false
            FilterByProperty gt2199: PropertyOfIndividual=ID; Operator=16; Value=2199
          RuminantGroup idlt2205 (disabled): RandomiseBeforeSorting=false
            FilterByProperty lt2205: PropertyOfIndividual=ID; Operator=21; Value=2205
          RuminantGroup id1: RandomiseBeforeSorting=false
            FilterByProperty ideq1: PropertyOfIndividual=ID; Operator=13; Value=1
      CLEMFolder Reports
        ReportActivitiesPerformed: IncludeFolders=true; HandleTimers=1; CreateHTML=false; RotateReport=false; AutoCreateHTML=false
        ReportResourceBalances: ResourceGroupsToReport=[GrazeFoodStore, AnimalFoodStore, Ruminants]; ReportAmount=true; ReportValue=false; ReportAnimalEquivalents=false; ReportAnimalWeight=false; ReportHerdTotals=false; ReportLandEntire=false; ReportLabourIndividuals=false
          VariableNames:
            Land
            GrazeFoodStore
            AnimalFoodStore
            Ruminants
        ReportResourceShortfalls: PropPastureShortfallOfDesiredIntake=0.03; EventNames=[Activities].ResourceShortfallOccurred
          VariableNames:
            [Clock].Today as Date
            [Activities].LastShortfallResourceRequest.ResourceTypeName as Resource
            [Activities].LastShortfallResourceRequest.ActivityModel.Name as Activity
            [Activities].LastShortfallResourceRequest.Reason as Reason
            [Activities].LastShortfallResourceRequest.Required as Required
            [Activities].LastShortfallResourceRequest.Available as Available
        ReportResourceLedger GrazeFoodStoreLedger: ResourceGroupsToReport=GrazeFoodStore; ReportStyle=0; ReportLossesAsNegative=false; IncludePrice=false; IncludeFinancialYear=false; IncludeConversions=false; TransactionCategoryLevels=0; ReportRuminantAge=0; IncludeRuminantAE=false; IncludeRuminantBreed=false; IncludeRuminantCategory=false; IncludeRuminantChangeDirection=false; IncludeRuminantClass=false; IncludeRuminantID=false; IncludeRuminantLocation=false; IncludeRuminantRelatesTo=false; IncludeRuminantSex=false; IncludeRuminantWeight=false; IncludeRuminantGrowthRate=false; VariableNames=GrazeFoodStore
        ReportResourceLedger AnimalFoodLedger: ResourceGroupsToReport=AnimalFoodStore; ReportStyle=0; ReportLossesAsNegative=false; IncludePrice=false; IncludeFinancialYear=false; IncludeConversions=false; TransactionCategoryLevels=0; ReportRuminantAge=0; IncludeRuminantAE=false; IncludeRuminantBreed=false; IncludeRuminantCategory=false; IncludeRuminantChangeDirection=false; IncludeRuminantClass=false; IncludeRuminantID=false; IncludeRuminantLocation=false; IncludeRuminantRelatesTo=false; IncludeRuminantSex=false; IncludeRuminantWeight=false; IncludeRuminantGrowthRate=false; VariableNames=AnimalFoodStore
        ReportResourceLedger FinancesLedger (disabled): ResourceGroupsToReport=Finances; ReportStyle=0; ReportLossesAsNegative=false; IncludePrice=false; IncludeFinancialYear=false; IncludeConversions=false; TransactionCategoryLevels=0; ReportRuminantAge=0; IncludeRuminantAE=false; IncludeRuminantBreed=false; IncludeRuminantCategory=false; IncludeRuminantChangeDirection=false; IncludeRuminantClass=false; IncludeRuminantID=false; IncludeRuminantLocation=false; IncludeRuminantRelatesTo=false; IncludeRuminantSex=false; IncludeRuminantWeight=false; IncludeRuminantGrowthRate=false; VariableNames=Finances
        ReportResourceLedger HerdLedger: ResourceGroupsToReport=Ruminants; ReportStyle=0; ReportLossesAsNegative=false; IncludePrice=false; IncludeFinancialYear=false; IncludeConversions=false; TransactionCategoryLevels=0; ReportRuminantAge=1; IncludeRuminantAE=false; IncludeRuminantBreed=false; IncludeRuminantCategory=true; IncludeRuminantChangeDirection=false; IncludeRuminantClass=true; IncludeRuminantID=true; IncludeRuminantLocation=false; IncludeRuminantRelatesTo=false; IncludeRuminantSex=true; IncludeRuminantWeight=false; IncludeRuminantGrowthRate=false; VariableNames=Ruminants
        Report HerdSummary: EventNames=[Activities].SummariseHerd.OnReportItemGenerated
          VariableNames:
            [Clock].Today
            [Activities].SummariseHerd.ReportDetails.Breed as Breed
            [Activities].SummariseHerd.ReportDetails.Herd as Herd
            [Activities].SummariseHerd.ReportDetails.Age as AgeGroup
            [Activities].SummariseHerd.ReportDetails.Sex as Sex
            [Activities].SummariseHerd.ReportDetails.Number as Num
            [Activities].SummariseHerd.ReportDetails.AverageWeight as AvgWt
            [Activities].SummariseHerd.ReportDetails.AverageWeightGain as AvgWtGn
            [Activities].SummariseHerd.ReportDetails.AverageIntake as AvgIntake
            [Activities].SummariseHerd.ReportDetails.AdultEquivalents as AE
            [Activities].SummariseHerd.ReportDetails.NumberPregnant as NoPregnant
            [Activities].SummariseHerd.ReportDetails.NumberOfBirths as Births
        ReportPasturePoolDetails: ReportPerHectare=true; ReportInTonnes=false; ReportTotal=true; ReportGrowth=false; ReportConsumed=true; ReportDetached=false; ReportNitrogen=true; ReportDMD=true; ReportAge=false; ReportPoolsTotal=false; ReportPoolsConsumed=false; ReportPoolsDetached=false; ReportPoolsNitrogen=false; ReportPoolsDMD=false
        ReportGrazingEfficiency: IncludePastureQualityLimiter=true; IncludePastureBiomassLimiter=true; IncludeGrazingTimeLimiter=true; IncludeCompetitionLimiter=true; IncludeIntakeGreenProportion=true; IncludeCombinedLimit=true
        Report IndGrowth: EventNames=[Activities].IndGrow.OnReportItemGenerated
          VariableNames:
            [CLEMEvents].Clock.Today.Date as Date
            [CLEMEvents].IntervalIndex as TimeStep
            [Activities].IndGrow.ReportDetails.Individual.Location as Location
            [Activities].IndGrow.ReportDetails.Individual.ID as UID
            [Activities].IndGrow.ReportDetails.Individual.AgeInDays as Age
            [Activities].IndGrow.ReportDetails.Individual.Weight.EmptyBodyMass as EBM
            [Activities].IndGrow.ReportDetails.Individual.Weight.EmptyBodyMassChange  as EBMChange
            [Activities].IndGrow.ReportDetails.Individual.Weight.Live as Wt
            [Activities].IndGrow.ReportDetails.Individual.Weight.LiveChange as WtChange
            [Activities].IndGrow.ReportDetails.Individual.Intake.SolidsDaily.MaximumExpected as In_MaxExp
            [Activities].IndGrow.ReportDetails.Individual.Intake.SolidsDaily.Expected as In_Expected
            [Activities].IndGrow.ReportDetails.Individual.Intake.SolidsDaily.Required as In_Required
            [Activities].IndGrow.ReportDetails.Individual.Intake.SolidsDaily.Received as In_Received
            [Activities].IndGrow.ReportDetails.Individual.Intake.SolidsDaily.Actual as In_Actual
            [Activities].IndGrow.ReportDetails.Individual.Intake.SolidsDaily.Unneeded as In_Unneeded
            [Activities].IndGrow.ReportDetails.Individual.Intake.DMD as DMD
            [Activities].IndGrow.ReportDetails.Individual.Intake.NitrogenPercent as NPct
            [Activities].IndGrow.ReportDetails.Individual.Intake.ME as ME
            [Activities].IndGrow.ReportDetails.Individual.Intake.GutFill as Gutfill
        Report IndEnergy: EventNames=[Activities].IndGrow.OnReportItemGenerated
          VariableNames:
            [CLEMEvents].Clock.Today.Date as Date
            [CLEMEvents].IntervalIndex as TimeStep
            [Activities].IndGrow.ReportDetails.Individual.ID as UID
            [Activities].IndGrow.ReportDetails.Individual.Energy.FromIntake as MEI
            [Activities].IndGrow.ReportDetails.Individual.Energy.ForBasalMetabolism as EBasal
            [Activities].IndGrow.ReportDetails.Individual.Energy.ForHPViscera as EViscera
            [Activities].IndGrow.ReportDetails.Individual.Energy.ToMove as EMove
            [Activities].IndGrow.ReportDetails.Individual.Energy.ToGraze as EGraze
            [Activities].IndGrow.ReportDetails.Individual.Energy.ForGrazing as ForGrazing
            [Activities].IndGrow.ReportDetails.Individual.Energy.ForMaintenance as ForMaint
            [Activities].IndGrow.ReportDetails.Individual.Energy.AfterMaintenance as AfterMaint
            [Activities].IndGrow.ReportDetails.Individual.Energy.ForFetus as EFetus
            [Activities].IndGrow.ReportDetails.Individual.Energy.AfterPregnancy as AfterPreg
            [Activities].IndGrow.ReportDetails.Individual.Energy.ForLactation as ELact
            [Activities].IndGrow.ReportDetails.Individual.Energy.AfterLactation as AfterLact
            [Activities].IndGrow.ReportDetails.Individual.Energy.ForWool as EWool
            [Activities].IndGrow.ReportDetails.Individual.Energy.AfterWool as AfterWool
            [Activities].IndGrow.ReportDetails.Individual.Energy.AvailableForGain as EGain
            [Activities].IndGrow.ReportDetails.Individual.Energy.ForGain as ENetForGain
            [Activities].IndGrow.ReportDetails.Individual.Energy.Fat.Change as EFatChange
            [Activities].IndGrow.ReportDetails.Individual.Energy.Protein.Change as EProtChange
            [Activities].IndGrow.ReportDetails.Individual.Energy.Fat.Change + [Activities].IndGrow.ReportDetails.Individual.Energy.Protein.Change as EFatProteinChange
            [Activities].IndGrow.ReportDetails.Individual.Energy.ForGain - ([Activities].IndGrow.ReportDetails.Individual.Energy.Fat.Change + [Activities].IndGrow.ReportDetails.Individual.Energy.Protein.Change) as EDifference
            [Activities].IndGrow.ReportDetails.Individual.Energy.Fat.Amount as EFat
            [Activities].IndGrow.ReportDetails.Individual.Energy.Protein.Amount as EProt
        Report FatProteinGrowth: EventNames=[Activities].IndGrow.OnReportItemGenerated
          VariableNames:
            [CLEMEvents].Clock.Today.Date as Date
            [CLEMEvents].IntervalIndex as TimeStep
            [Activities].IndGrow.ReportDetails.Individual.ID as ID
            [Activities].IndGrow.ReportDetails.Individual.SexAndClass as Sex
            [Activities].IndGrow.ReportDetails.Individual.BreedingStatus as Status
            [Activities].IndGrow.ReportDetails.Individual.Weight.Live as Live
            [Activities].IndGrow.ReportDetails.Individual.Weight.EmptyBodyMass as EBM
            [Activities].IndGrow.ReportDetails.Individual.Weight.StandardReferenceWeight as SRW
            [Activities].IndGrow.ReportDetails.Individual.BodyConditionScore as BCS
            [Activities].IndGrow.ReportDetails.Individual.Weight.EBF as EBF
            [Activities].IndGrow.ReportDetails.Individual.Weight.NormalisedForAge as Normalised
            [Activities].IndGrow.ReportDetails.Individual.Weight.Protein.MassAtSRW as Protein_Normal
            [Activities].IndGrow.ReportDetails.Individual.Weight.Protein.Amount as Protein_Amount
            [Activities].IndGrow.ReportDetails.Individual.Weight.Fat.Amount as Fat_Amount
            [Activities].IndGrow.ReportDetails.Individual.Weight.Protein.Change as Protein_Change
            [Activities].IndGrow.ReportDetails.Individual.Weight.Fat.Change as Fat_Change
            [Activities].IndGrow.ReportDetails.Individual.Energy.Protein.Change as Protein_EnergyChange
            [Activities].IndGrow.ReportDetails.Individual.Energy.Fat.Change as Fat_EnergyChange
            [Activities].IndGrow.ReportDetails.Individual.Intake.UsableDPLS as Protein_Intake
            [Activities].IndGrow.ReportDetails.Individual.Weight.Protein.ForMaintenance as Protein_Maintenance
            [Activities].IndGrow.ReportDetails.Individual.Weight.Protein.ForPregnancy as Protein_Pregnancy
            [Activities].IndGrow.ReportDetails.Individual.Weight.Protein.ForLactationActual as Protein_Lactation_Actual
            [Activities].IndGrow.ReportDetails.Individual.Weight.Protein.ForLactationTotalRequired as Protein_Lactation_TotalRequired
            [Activities].IndGrow.ReportDetails.Individual.Weight.Protein.ForLactationFromIntake as Protein_Lactation_FromIntake
            [Activities].IndGrow.ReportDetails.Individual.Weight.Protein.ForGain as Protein_ForGain
            [Activities].IndGrow.ReportDetails.Individual.Weight.Protein.AvailableForGain as Protein_Net
            [Activities].IndGrow.ReportDetails.Individual.Energy.FromIntake as Energy_Intake
            [Activities].IndGrow.ReportDetails.Individual.Energy.ForMaintenance as Energy_Maintenance
            [Activities].IndGrow.ReportDetails.Individual.Energy.ForWool as Energy_Wool
            [Activities].IndGrow.ReportDetails.Individual.Energy.ForGrazing as Energy_Grazing
            [Activities].IndGrow.ReportDetails.Individual.Energy.ForFetus as Energy_Pregnancy
            [Activities].IndGrow.ReportDetails.Individual.Energy.ForLactation as Energy_Lactation
            // ([Activities].IndGrow.Individual.Energy.ForLactation * [ReportIndividual].ReportDetails.Female.Milk.ProteinToReducedProteinScalar) as Energy_LactationReduction
            [Activities].IndGrow.ReportDetails.Individual.Energy.ForGain as Energy_ForGain
            [Activities].IndGrow.ReportDetails.Individual.Energy.AvailableForGain as Energy_Net
            [Activities].IndGrow.ReportDetails.Individual.Energy.Protein.Net as Energy_FromExcessCP
        Report IndBreedStatus: EventNames=[Activities].IndGrow.OnReportItemGenerated
          VariableNames:
            [CLEMEvents].Clock.Today.Date as Date
            [CLEMEvents].IntervalIndex as TimeStep
            [Activities].IndGrow.ReportDetails.Individual.ID as UID
            [Activities].IndGrow.ReportDetails.Female.BreedingStatus as Status
            [Activities].IndGrow.ReportDetails.Individual.Weight.RelativeCondition as RelCon
    Zone Field: Area=1; Slope=0; AspectAngle=0; Altitude=50
      SimpleGrazing: GrazingRotationType=2; SimpleGrazingFrequencyString=21; SimpleMinGrazable=0; SimpleGrazingResidual=1500; FlexibleGrazePostDM=0; IsCutAndCarry=false; FractionClippingsReturned=0; FractionIntakeNToAnimal=[0]; DungNConc=2.6; FractionOfDungUrineOffPaddock=[0.3]; DepthUrineIsAdded=250; ShowAdvancedExcretaOptions=false; SendDungElsewhere=0; SendUrineElsewhere=0; UsePatching=false; PseudoPatches=true; ZoneCount=25; UrineReturnPattern=2; PseudoRandomSeed=666; MaxEffectiveNConcentration=3.5; FractionPopulationDecline=0; TramplingOn=false; MaximumPropLitterMovedToSoil=0.1; PastureConsumedAtMaximumRateOfLitterRemoval=1200
        PreGrazeDMArray=[1000, 1000, 1000, 1000, 1000, 1000, 1000, 1000, 1000, 1000, 1000, 1000]
        PostGrazeDMArray=[2000, 2000, 2000, 2000, 2000, 2000, 2000, 2000, 2000, 2000, 2000, 2000]
      Manager FertiliseFixedDates
        EachYear = True
        Dates = 5-jan, 5-feb, 5-mar, 5-apr, 5-aug, 5-sep, 5-oct, 5-nov, 5-dec
        UseCritNThreshold = False
        CritNThreshold = 50
        CritNDepth = 75
        Depth = 50
        Amount = 15
        FertiliserType = UreaN
```csharp
using APSIM.Core;
using System;
using Models.Core;
using Models.Soils.Nutrients;
using Models.Soils;
using Models.PMF;
using APSIM.Shared.Utilities;
using System.Linq;
using Models.Interfaces;

namespace Models
{
    [Serializable]
    public class Script : Model, IStructureDependency
    {
        [Link] private Clock clock;
        [Link] private Fertiliser fertiliser;
        [Link] private ISummary summary;
        [Link] private Soil soil;
        private Nutrient nutrient;
        private Nutrient soilN;
        [Link]
        private IPhysical soilPhysical;
        [Link]
        private Nutrient Nutrient;
        [Link(Path="[SurfaceOrganicMatter].SurfaceResidue.Decomposition")]
        private OrganicFlow ResidueDecomposition;
        public IStructure Structure { private get; set; }
        
        


        [Separator("Fertiliser will be applied on the date(s) below")]
        [Description("Apply fertiliser on the same day(s) each year? If no, then must include the year of application below")]
        public bool EachYear { get; set; }

        [Description("Dates for one or more fertiliser applications (dd-mmm or dd-mmm-yyyy) as a list with a comma between dates")]
        public string[] Dates { get; set; }

        [Separator("Test for the mineral N in the soil and don't apply the fertiliser if greater than X kgN/ha is stored in the soil above a depth of Y mm")]
        [Description("Use a critical soil mineral N to prevent application above a threshold?")]
        public bool UseCritNThreshold { get; set; }

        [Description("Don't add fertiliser if N in the soil to the depth below exceeds (kg/ha)")]
        public double CritNThreshold { get; set; }

        [Description("Depth to which the amount of N in the soil should be calculated (mm)")]
        public double CritNDepth { get; set; }

        [Separator("Fertiliser application details")]
        [Description("Depth at which to apply the fertiliser (mm)")]
        public double Depth { get; set; }

        [Description("Amount of fertiliser to apply (kg N /ha) per application")]
        public double Amount { get; set; }

        [Description("Fertiliser type - select from the list")]
        [Display(Type = DisplayType.FertiliserType)]public string FertiliserType { get; set; }


        [EventSubscribe("StartOfSimulation")]
        private void FindSoilNOrNutrient(object sender, EventArgs e)
        {
            nutrient =  Structure.Find<Nutrient>() as Nutrient;
            soilN =  Structure.Find<Nutrient>() as Nutrient;

            if (nutrient == null && soilN == null)
                throw new Exception(string.Format("Error in script {0}: Unable to find nutrient or soilN.", Name));
        }

        [EventSubscribe("DoManagement")]
        private void OnDoManagement(object sender, EventArgs e)
        {
            if (OnApplicationDate())
            {
                if (NContentBelowThreshold())
                    fertiliser.Apply(Amount, FertiliserType, Depth);
                else
                    summary.WriteMessage(this, "Skipping fertiliser application due to soil mineral N content being above critical threshold.", MessageType.Diagnostic);
            }
        }

        /// <summary>Checks if today's date is one of the specified fertiliser application dates.</summary>
        private bool OnApplicationDate()
        {
            if (EachYear)
                return Dates.Any(d => DateUtilities.DatesEqual(d, clock.Today));
            
            DateTime[] dates = Dates.Select(d => DateTime.ParseExact(d, "d-MMM-yyyy", null)).ToArray();
            return dates.Any(d => SameDate(d, clock.Today));
        }

        /// <summary>Checks if N content in soil is below critical threshold.</summary>
        private bool NContentBelowThreshold()
        {
            if (!UseCritNThreshold)
                return true;
            
            double[] weights = GetLayerWeights();
            double cumSoilN = 0;

            for (int i = 0; i < soilPhysical.Thickness.Length; i++)
            {
                if (nutrient != null)
                    cumSoilN += weights[i] * nutrient.MineralN[i];
                else if (soilN != null)
                    cumSoilN += weights[i] * soilN.MineralN[i];
            }

            return cumSoilN <= CritNThreshold;
        }

        private double[] GetLayerWeights()
        {
            double[] weights = new double[soilPhysical.Thickness.Length];
            double cumDepth = 0;

            for (int i = 0; i < soilPhysical.Thickness.Length; i++)
            {
                cumDepth += soilPhysical.Thickness[i];
                if (cumDepth < CritNDepth)
                    weights[i] = 1;
                else if (cumDepth - soilPhysical.Thickness[i] <= CritNDepth)
                    weights[i] = (CritNDepth - (cumDepth - soilPhysical.Thickness[i])) / soilPhysical.Thickness[i];
                else
                    weights[i] = 0;
            }

            return weights;
        }

        private bool SameDate(DateTime d1, DateTime d2)
        {
            return d1.Year == d2.Year && d1.DayOfYear == d2.DayOfYear;
        }
    }
}
```
      Manager AutomaticIrrigation
        allowIrrigation = True
        seasonStart = 1-sep
        seasonEnd = 30-apr
        seasonsAllocation = 10000
        triggerDeficit = 75
        targetDeficit = 95
        returndays = 3
        maximumAmount = 30
        depthPAWC = 300
```csharp
using Newtonsoft.Json;
using APSIM.Shared.Utilities;
using System.Xml.Serialization;
using Models.Soils;
using Models.PMF;
using Models.Core;
using System;
using System.Linq;
using Models.Interfaces;


        
namespace Models
{
    [Serializable] 
    [System.Xml.Serialization.XmlInclude(typeof(Model))]
    public class Script : Model
    {
        [Link] private ISummary summary;
        [Link] private Irrigation Irrigation;
        [Link] private Clock Clock;
        [Link] private Soil Soil;
        [Link(IsOptional = true)] private IPlant existingCrop;
        private DateTime StartDate;
        private DateTime EndDate;
        private double TopDUL;
        private double TopLL;
        private int nLayers;
        [Link]
        private IPhysical soilPhysical;
        [Link]
        private ISoilWater waterBalance;
        //Communication to other modules
       
        //User inputs from properties tab
        [Description("Turn irrigation on?")]
        public bool allowIrrigation { get; set; }
        [Description("Start of irrigation season (dd-MMM)")]
        public string seasonStart { get; set; }
        [Description("End of irrigation season (dd-MMM)")]
        public string seasonEnd { get; set; }
        [Description("Season allocation (mm)")]
        public double seasonsAllocation { get; set; }
        [Description("Deficit to trigger irrigation (% PAWC)")]
        public double triggerDeficit { get; set; }
        [Description("Deficit to stop irrigaton (% PAWC)")]
        public double targetDeficit { get; set; }
        [Description("Minimum days for irrigation to return")]
        public double returndays { get; set; }
        [Description("Maximum irrigation application (mm/day)")]
        public double maximumAmount { get; set; }
        [Description("Depth to calculate PAWC (mm)")]
        public double depthPAWC { get; set; }

        //Class members
        [JsonIgnore] public double TopSWdeficit { get; set; }
        [JsonIgnore] public double TopSWC { get; set; }
        [JsonIgnore] public double DaysSinceIrrigation { get; set; }
        [JsonIgnore] public double AmountToApply { get; set; }
        [JsonIgnore] public double SeasonAppliedAmount { get; set; }
        
        private bool IrrigationIsAllowed { get; set; }
        private bool SeasonIsOpen { get; set; }
        private bool CropIsActive { get; set; }
        private bool IrrigatorIsAvailable { get; set; }
        private bool SoilIsDry { get; set; }

    
        //Calculate static soil variables
        [EventSubscribe("StartOfSimulation")]
        private void OnStartOfSimulation(object sender, EventArgs e)
        {   
            //Set the season dates
            StartDate = DateTime.Parse(seasonStart + "-" + Clock.Today.Year.ToString());
            EndDate = DateTime.Parse(seasonEnd + "-" + Clock.Today.Year.ToString());
            
            //Can we irrigate at all?
            IrrigationIsAllowed = false; 
            if (allowIrrigation)
                IrrigationIsAllowed = true; 

            //Calculate soil water variables
            double depthFromSurface = 0.0;
            double fracLayer = 0.0;
            nLayers = soilPhysical.Thickness.Length;
            for (int layer = 0; layer < nLayers; layer++)
            {
                fracLayer = Math.Min(1.0, (depthPAWC - depthFromSurface) / soilPhysical.Thickness[layer]);
                TopLL += soilPhysical.LL15mm[layer] * fracLayer;
                TopDUL += soilPhysical.DULmm[layer] * fracLayer;
                depthFromSurface += soilPhysical.Thickness[layer];
                if (depthFromSurface >= depthPAWC)
                    layer = nLayers;
            }
        }
             
        //Determine daily requirement for irrigation
        [EventSubscribe("StartOfDay")]
        private void OnStartOfDay(object sender, EventArgs e)
        {
            //Can we irrigate today?          
            SeasonIsOpen = isBetween(Clock.Today, StartDate, EndDate);
            if (!SeasonIsOpen)
                SeasonAppliedAmount = 0;

            //Is there a crop in the ground that needs irrigation?
            CropIsActive = false;
            if ((existingCrop != null) && (existingCrop.IsAlive))
                CropIsActive = true;
            //if ((existingCrop.Phenology.Stage >= 3.0) && (existingCrop.Phenology.Stage < 6.0))
          
            //Is the irrigator available?
            IrrigatorIsAvailable = false;
            DaysSinceIrrigation += 1;
            if (DaysSinceIrrigation >= returndays)
                IrrigatorIsAvailable = true;
          
            //Is the soil dry enough to require irrigation?
            SoilIsDry = false;
            double depthFromSurface = 0.0;
            double fracLayer = 0.0;
            TopSWC = 0.0;
            for (int layer = 0; layer < nLayers; layer++)
            //for (int layer = 0; depthFromSurface < depthPAWC + soilPhysical.Thickness[layer]; layer++)
            {
                fracLayer = Math.Min(1.0, (depthPAWC - depthFromSurface) / soilPhysical.Thickness[layer]);
                TopSWC += waterBalance.SWmm[layer] * fracLayer;
                depthFromSurface += soilPhysical.Thickness[layer];
                if (depthFromSurface >= depthPAWC)
                    layer = nLayers;
            }
            
            TopSWdeficit = TopSWC - TopDUL;
            if (Math.Max(0.0, -TopSWdeficit) >= (TopDUL - TopLL) * (100 - triggerDeficit) / 100)
                SoilIsDry = true;
                
            //Are all the conditions ratifying irrigation
            if (IrrigationIsAllowed && SeasonIsOpen && CropIsActive && IrrigatorIsAvailable && SoilIsDry)
            {
                //Lets bloody well irrigate then!!!!
                AmountToApply = TopDUL * targetDeficit / 100 - TopSWC;
                AmountToApply = Math.Max(0.0, Math.Min(AmountToApply, seasonsAllocation - SeasonAppliedAmount));
                Irrigation.Apply(AmountToApply);
                DaysSinceIrrigation = 0;
                SeasonAppliedAmount += AmountToApply;
            }
        }
        
        ///Checks whether theDate is between iniDate and endDate (non-year specific)
        private bool isBetween(DateTime theDay, DateTime iniDate, DateTime endDate)
        {
            bool result = false;
            if (iniDate.DayOfYear < endDate.DayOfYear)
            {
                // period is within one year, ex: summer in the northern hemisphere
                if ((theDay.DayOfYear >= iniDate.DayOfYear) && (theDay.DayOfYear <= endDate.DayOfYear))
                    result = true;
            }
            else
            {
                // period goes over the end of the year, ex: summer in the southern hemisphere
                if ((theDay.DayOfYear >= iniDate.DayOfYear) || (theDay.DayOfYear <= endDate.DayOfYear))
                    result = true;
            }
            
            return result;
        }
    }
}
```
      Irrigation
      Fertiliser
      SurfaceOrganicMatter: InitialResidueName=Sward; InitialResidueType=grass; InitialResidueMass=1000; InitialStandingFraction=0; InitialCPR=0; InitialCNR=15
      Soil: SoilType=NZ_Sedimentary; LocalName=Lismore; Site=Winchmore; NearestTown=Ashburton; Region=Canterbury; Country=New Zealand; Latitude=-48.48; Longitude=0
        Chemical: PHUnits=Water
          Thickness  PH  CEC
          150        6   13.966
          150        6   8.24825
          200        6   6.6176
          150        6   5.1934
          250        6   4.3688
          300        6   3.90025
          300        6   3.78775
          CEC source: Calculated
        Physical
          Thickness  ParticleSizeSand  ParticleSizeSilt  ParticleSizeClay  Rocks     BD    AirDry  LL15   DUL    SAT   KS
          150        28                52                20                0         1.3   0.05    0.15   0.36   0.45  5000
          150        29.75             55.25             15                0         1.35  0.12    0.14   0.34   0.43  2500
          200        30.8              57.2              12                0.568263  1     0.055   0.055  0.19   0.25  3000
          150        32.2              59.8              8                 0.798387  0.53  0.015   0.015  0.065  0.15  10000
          250        32.9              61.1              6                 0.866051  0.31  0.01    0.01   0.04   0.11  17500
          300        33.25             61.75             5                 0.866621  0.3   0.01    0.01   0.03   0.11  20000
          300        33.25             61.75             5                 0.866621  0.3   0.01    0.01   0.03   0.11  20000
          Rocks, ParticleSizeSand, ParticleSizeSilt source: Calculated
          SoilCrop AGPRyegrassSoil: LL=[0.15, 0.14, 0.06, 0.02, 0.01, 0.01, 0.01]; KL=[0.1, 0.1, 0.08, 0.04, 0.01, 0, 0]; XF=[1, 1, 1, 1, 1, 0, 0]
          SoilCrop AGPWhiteCloverSoil: LL=[0.15, 0.14, 0.06, 0.02, 0.01, 0.01, 0.01]; KL=[0.1, 0.1, 0.08, 0.04, 0.01, 0, 0]; XF=[1, 1, 1, 1, 1, 0, 0]
        WaterBalance SoilWater: SummerDate=1-Nov; SummerU=6; SummerCona=3.5; WinterDate=1-apr; WinterU=2; WinterCona=2; DiffusConst=88; DiffusSlope=35; Salb=0.13; CN2Bare=73; CNRed=20; CNCov=0.8; DischargeWidth=0; CatchmentArea=0; PSIDul=-100
          Thickness  SWCON  KLAT
          150        0.5    0
          150        0.52   0
          200        0.55   0
          150        0.6    0
          250        0.65   0
          300        0.65   0
          300        0.65   0
        Organic: FOMCNRatio=40; CarbonUnits=Total
          Thickness  Carbon  SoilCNRatio  FBiom  FInert  FOM
          150        3       12           0.04   0.5     331.337
          150        1       12           0.02   0.7     245.461
          200        0.6     12           0.02   0.83    164.537
          150        0.4     12           0.01   0.9     121.892
          250        0.25    12           0.01   0.95    73.9313
          300        0.15    12           0      0.99    40.5743
          300        0.1     12           0      0.99    22.2677
        Water: Thickness=[150, 150, 200, 150, 250, 300, 300]; InitialValues=[0.3495, 0.33, 0.18325, 0.0625, 0.0385, 0.029, 0.029]; FilledFromTop=false
        Nutrient
        Solute NO3: Thickness=[150, 150, 200, 150, 250, 300, 300]; InitialValues=[5, 2.5, 1, 0.75, 0.5, 0.5, 0.5]; InitialValuesUnits=ppm; WaterTableConcentration=0; D0=0; DepthConstant=0; MaxDepthSoluteAccessible=0; RunoffEffectivenessAtMovingSolute=0; MaxEffectiveRunoff=0
        Solute NH4: Thickness=[150, 150, 200, 150, 250, 300, 300]; InitialValues=[0.1, 0.1, 0.1, 0.1, 0.1, 0.1, 0.1]; InitialValuesUnits=ppm; WaterTableConcentration=0; D0=0; DepthConstant=0; MaxDepthSoluteAccessible=0; RunoffEffectivenessAtMovingSolute=0; MaxEffectiveRunoff=0
        Solute Urea: Thickness=[150, 150, 200, 150, 250, 300, 300]; InitialValues=[0, 0, 0, 0, 0, 0, 0]; InitialValuesUnits=kg/ha; WaterTableConcentration=0; D0=0; DepthConstant=0; MaxDepthSoluteAccessible=0; RunoffEffectivenessAtMovingSolute=0; MaxEffectiveRunoff=0
        SoilTemperature Temperature: InteractionsPerDay=8
      PastureSpecies AGPRyegrass: doyGermination=275; daysEmergenceToAnthesis=120; daysAnthesisToMaturity=85; degreesDayForAnthesis=1100; degreesDayForMaturity=900; daysAnnualsFactor=45; CanopyType=PastureSpecies; InitialShootDM=1500; InitialRootDM=450; InitialRootDepth=750; initialDMFractionsGrasses=[0.15, 0.25, 0.25, 0.05, 0.05, 0.1, 0.1, 0.05, 0, 0, 0]; initialDMFractionsForbs=[0.2, 0.2, 0.15, 0.05, 0.1, 0.15, 0.1, 0.05, 0, 0, 0]; PhotosyntheticEfficiency=0.01; PhotosynthesisCurveFactor=0.8; FractionPAR=0.5; ReferenceCO2=380; CO2EffectScaleFactor=700; CO2EffectOffsetFactor=600; CO2EffectMinimum=0.7; CO2EffectExponent=2; ReproSeasonDurationCoeff=2; ReproSeasonShouldersLengthFactor=1; ReproSeasonOnsetDurationFactor=0.6; RelativeTurnoverEmerging=2; DetachmentDroughtCoefficient=3; DetachmentDroughtEffectMin=0.1; TurnoverStockFactor=0.01; TurnoverDefoliationEffectMin=0.025; MinimumGreenLeafProp=0.8; MinimumGreenRootProp=0.5
        initialDMFractionsLegumes=[0.16, 0.23, 0.22, 0.05, 0.03, 0.05, 0.05, 0.01, 0.04, 0.08, 0.08]
        LinearInterpolationFunction FVPDFunction
      PastureSpecies AGPWhiteClover: doyGermination=275; daysEmergenceToAnthesis=120; daysAnthesisToMaturity=85; degreesDayForAnthesis=1100; degreesDayForMaturity=900; daysAnnualsFactor=45; CanopyType=PastureSpecies; InitialShootDM=500; InitialRootDM=150; InitialRootDepth=350; initialDMFractionsGrasses=[0.15, 0.25, 0.25, 0.05, 0.05, 0.1, 0.1, 0.05, 0, 0, 0]; initialDMFractionsForbs=[0.2, 0.2, 0.15, 0.05, 0.1, 0.15, 0.1, 0.05, 0, 0, 0]; PhotosyntheticEfficiency=0.01; PhotosynthesisCurveFactor=0.8; FractionPAR=0.5; ReferenceCO2=380; CO2EffectScaleFactor=700; CO2EffectOffsetFactor=600; CO2EffectMinimum=0.7; CO2EffectExponent=2; ReproSeasonDurationCoeff=2; ReproSeasonShouldersLengthFactor=1; ReproSeasonOnsetDurationFactor=0.6; RelativeTurnoverEmerging=2; DetachmentDroughtCoefficient=3; DetachmentDroughtEffectMin=0.1; TurnoverStockFactor=0.01; TurnoverDefoliationEffectMin=0.025; MinimumGreenLeafProp=0.8; MinimumGreenRootProp=0.5
        initialDMFractionsLegumes=[0.16, 0.23, 0.22, 0.05, 0.03, 0.05, 0.05, 0.01, 0.04, 0.08, 0.08]
        LinearInterpolationFunction FVPDFunction
      Report ReportExample: EventNames=[Clock].EndOfDay
        VariableNames:
          [Clock].Today as Date
          // These examples are set up for Ryegrass and WhiteClover so add in any other species as needed for your simulation
          // The format of AggregationType (variable) from [Report].DayAfterLastOutput to [Clock].Today is used so that when the reporting frequency is changed the outputs are still sensible
          // If the name of the Report component ("ReportExample") here is changed in the simulation tree then all the references to that name in the outputs below also need to be changed
          // If all you want is harvested pasture or net herbage growth and/or standing biomass ....
          Sum of ([AGPRyegrass].HarvestedWt + [AGPWhiteClover].HarvestedWt) from [ReportExample].DayAfterLastOutput to [Clock].Today as HarvestedWt   //the amount harvested (kg DM /ha)
          Sum of ([AGPRyegrass].NetGrowthWt + [AGPWhiteClover].NetGrowthWt) from [ReportExample].DayAfterLastOutput to [Clock].Today as NetGrowthWt   //the amount harvested (kg DM /ha)
          Mean of ([AGPRyegrass].AboveGroundWt + [AGPWhiteClover].AboveGroundWt) from [ReportExample].DayAfterLastOutput to [Clock].Today as StandingBiomass   //pasture biomass (could also be reported as Last rather than Mean) (kg DM /ha)
          // outputs that are used more frequently than others
          Sum of ([AGPRyegrass].WaterDemand + [AGPWhiteClover].WaterDemand) from [ReportExample].DayAfterLastOutput to [Clock].Today as WaterDemand   //how much soil water the pasture could use (mm)
          Sum of (sum([AGPRyegrass].WaterUptake) + Sum([AGPWhiteClover].WaterUptake)) from [ReportExample].DayAfterLastOutput to [Clock].Today as WaterUptake    //the amount of water actuially taken up from the soil (mm)
          Sum of ([AGPRyegrass].SoilDemandN + [AGPWhiteClover].SoilDemandN) from [ReportExample].DayAfterLastOutput to [Clock].Today as NDemand                   //N demand (kg N /ha)
          Sum of ([AGPRyegrass].SoilUptakeN + [AGPWhiteClover].SoilUptakeN) from [ReportExample].DayAfterLastOutput to [Clock].Today as NitrogenUptake       //N uptake from the soil (kg N /ha)
          Sum of [AGPWhiteClover].FixedN from [ReportExample].DayAfterLastOutput to [Clock].Today as NitrogenFixed       //N uptake from the soil (kg N /ha)
          Mean of ([AGPRyegrass].AboveGroundWt + [AGPWhiteClover].AboveGroundWt) from [ReportExample].DayAfterLastOutput to [Clock].Today as HerbageMass
          Mean of ([AGPRyegrass].LAIGreen + [AGPWhiteClover].LAIGreen) from [ReportExample].DayAfterLastOutput to [Clock].Today as LAIGreen
          Mean of ([AGPRyegrass].LAIDead + [AGPWhiteClover].LAIDead + [AGPRyegrass].LAIGreen + [AGPWhiteClover].LAIGreen) from [ReportExample].DayAfterLastOutput to [Clock].Today as LAITotal
          // outputs that indicate what conditions are limiting growth - each growth-limiting factor is 0 (full stress) to 1 (no stress) but there are two components and the values are added so 2 indicates no stress
          Mean of ([AGPRyegrass].GlfTemperature + [AGPWhiteClover].GlfTemperature) from [ReportExample].DayAfterLastOutput to [Clock].Today as GlfTemp       //stress from non-optimal temperature
          Mean of ([AGPRyegrass].GlfWaterSupply + [AGPWhiteClover].GlfWaterSupply) from [ReportExample].DayAfterLastOutput to [Clock].Today as GlfWater       //stress from water limitation
          Mean of ([AGPRyegrass].GlfNSupply + [AGPWhiteClover].GlfNSupply) from [ReportExample].DayAfterLastOutput to [Clock].Today as GlfNitrogen       //stress from N limitation
          // photsynthesis-related outputs - all these are in units of C not DM
          Sum of ([AGPRyegrass].GPP +[AGPWhiteClover].GPP) from [ReportExample].DayAfterLastOutput to [Clock].Today as GrossPrimaryProduction       //GPP (kg C /ha)
          Sum of ([AGPRyegrass].NPP +[AGPWhiteClover].NPP) from [ReportExample].DayAfterLastOutput to [Clock].Today as NettPrimaryProduction        //NPP (kg C /ha)
      Report: EventNames=[Clock].EndOfDay
        VariableNames:
          [Clock].Today as Date
          Sum of ([AGPRyegrass].HarvestedWt + [AGPWhiteClover].HarvestedWt) from 1-Jul to [Clock].Today as HarvestedWt   //the amount harvested (kg DM /ha)
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