Simulations: Version=222
  DataStore
    ExcelInput: FileNames=[CLEM Benchmark Oct 2026.xlsx]
      SheetNames=[obs_ReportExample, obs_Report, obs_ReportActivitiesPerformed, obs_HerdSummary, obs_ReportResourceBalances, obs_ReportResourceShortfalls, obs_GrazeFoodStoreLedger, obs_AnimalFoodLedger, obs_HerdLedger, obs_ReportPasturePoolDetails, obs_ReportGrazingEfficiency, obs_IndGrowth, obs_IndEnergy, obs_FatProteinGrowth, obs_IndBreedStatus]
    PredictedObserved Oct2026_ReportExample: PredictedTableName=ReportExample; ObservedTableName=obs_ReportExample; FieldNameUsedForMatch=SimulationName; FieldName2UsedForMatch=Date; AllColumns=false
      Tests: POName=Oct2026_ReportExample
        AcceptedStats:
          Name                    n     RMSE         ME            MAE          RMR          Slope  Intercept     R2  NSE  RSR          SEslope      SEintercept
          GlfNitrogen             1826  0            0             0            0            -      -             -   -    -            -            -
          GlfTemp                 1826  2.32843e-15  -3.99119e-17  1.72854e-15  1.85603e-15  1      -3.9968e-15   1   1    4.36525e-15  -            -
          GlfWater                1826  2.97958e-16  -9.87405e-17  1.18197e-16  1.49023e-16  1      0             1   1    2.99708e-14  0            0
          GrossPrimaryProduction  1826  9.56378e-14  1.95567e-15   3.69666e-14  3.40427e-15  1      1.42109e-14   1   1    2.12935e-15  -            -
          HarvestedWt             1826  1.54183e-14  -1.76746e-15  7.68209e-15  1.04007e-15  1      8.34888e-14   1   1    6.31268e-16  -            -
          HerbageMass             1826  1.43811e-12  2.87291e-14   6.59314e-13  1.75354e-15  1      0             1   1    9.95039e-16  3.70343e-10  6.15292e-07
          LAIGreen                1826  1.49871e-15  1.14458e-17   8.48947e-16  1.24144e-15  1      8.88178e-16   1   1    7.17915e-16  7.08203e-10  1.70749e-09
          LAITotal                1826  3.06708e-15  2.69013e-16   1.05234e-15  2.36686e-15  1      -8.88178e-16  1   1    1.34223e-15  3.23498e-10  8.49631e-10
          NDemand                 1826  1.23651e-15  -1.23831e-17  4.70569e-16  1.663e-15    1      2.22045e-16   1   1    7.225e-16    3.0542e-10   5.69773e-10
          NetGrowthWt             1826  7.35379e-14  -3.50267e-16  2.07882e-14  5.15673e-15  1      3.55271e-15   1   1    1.75128e-15  6.89942e-10  3.05888e-08
          NettPrimaryProduction   1826  1.7845e-14   -3.68053e-16  9.31179e-15  4.95833e-15  1      8.88178e-16   1   1    8.31842e-16  3.89852e-10  8.47789e-09
          NitrogenFixed           1826  8.41916e-17  6.86533e-20   2.18326e-17  3.43782e-15  1      -6.93889e-18  1   1    1.02665e-15  0            0
          NitrogenUptake          1826  1.22388e-15  -3.4939e-17   4.60137e-16  1.65296e-15  1      -2.22045e-16  1   1    7.18709e-16  0            0
          StandingBiomass         1826  1.43811e-12  2.87291e-14   6.59314e-13  1.75354e-15  1      0             1   1    9.95039e-16  3.70343e-10  6.15292e-07
          WaterDemand             1826  1.3386e-15   -1.25881e-17  6.36172e-16  1.74534e-15  1      -1.11022e-16  1   1    9.65899e-16  -            -
          WaterUptake             1826  1.32466e-15  -3.80009e-17  6.34256e-16  1.73667e-15  1      -1.11022e-16  1   1    9.68619e-16  -            -
        AcceptedStatsName=Name n Slope Intercept SEslope SEintercept R2 RMSE NSE ME MAE RSR RMR
    PredictedObserved Oct2026_Report: PredictedTableName=Report; ObservedTableName=obs_Report; FieldNameUsedForMatch=SimulationName; FieldName2UsedForMatch=Date; AllColumns=false
      Tests: POName=Oct2026_Report
        AcceptedStats:
          {Name=HarvestedWt, n=1826, Slope=1, Intercept=-9.09495e-13, R2=1, RMSE=8.17736e-12, NSE=1, ME=1.70076e-13, MAE=2.54098e-12, RSR=1.89985e-15, RMR=3.4542e-15}
        AcceptedStatsName=Name n Slope Intercept SEslope SEintercept R2 RMSE NSE ME MAE RSR RMR
    PredictedObserved Oct2026_ReportActivitiesPerformed: PredictedTableName=ReportActivitiesPerformed; ObservedTableName=obs_ReportActivitiesPerformed; FieldNameUsedForMatch=SimulationName; FieldName2UsedForMatch=Date; AllColumns=false
      Tests: POName=Oct2026_ReportActivitiesPerformed
        AcceptedStats:
          {Name=Type, n=5417, Slope=0.0554189, Intercept=0.118574, SEslope=0.0135685, SEintercept=0.00679865, R2=0.00307125, RMSE=0.666728, NSE=-0.889162, ME=0, MAE=0.222263, RSR=1.37434, RMR=5.31127}
        AcceptedStatsName=Name n Slope Intercept SEslope SEintercept R2 RMSE NSE ME MAE RSR RMR
    PredictedObserved Oct2026_HerdSummary: PredictedTableName=HerdSummary; ObservedTableName=obs_HerdSummary; FieldNameUsedForMatch=SimulationName; FieldName2UsedForMatch=Clock.Today; AllColumns=false
      Tests: POName=Oct2026_HerdSummary
        AcceptedStats:
          Name        n    Slope      Intercept  SEslope    SEintercept  R2          RMSE     NSE         ME            MAE       RSR      RMR
          AE          186  0.0847959  6.52801    0.0734555  0.664272     0.00719034  7.52083  -0.830408   -6.95979e-16  5.03962   1.34928  1.05439
          AgeGroup    186  0.0525983  2.99501    0.0736189  0.32352      0.00276658  4.20189  -0.894803   0             2.77419   1.37281  1.32917
          AvgIntake   186  0.426038   21.921     0.0666958  4.88136      0.181508    66.8915  -0.147925   1.46693e-14   41.7414   1.06853  1.75143
          AvgWt       186  0.0791087  305.176    0.0734899  31.8034      0.00625819  377.709  -0.841783   -1.81838e-14  253.552   1.35347  1.13976
          AvgWtGn     186  0.468005   1.38184    0.0651491  0.944533     0.219029    14.7127  -0.0639897  2.86509e-15   7.78311   1.02872  5.66424
          Births      186  0.477528   0.224719   0.0647725  0.134332     0.228033    2.0739   -0.0449438  0             0.430108  1.01947  4.82183
          NoPregnant  186  0.254245   3.20755    0.0712985  0.467594     0.0646407   6.04642  -0.491509   0             3.65591   1.21799  1.40579
          Num         186  -          -          -          -            -           0        -           0             0         -        0
        AcceptedStatsName=Name n Slope Intercept SEslope SEintercept R2 RMSE NSE ME MAE RSR RMR
    PredictedObserved Oct2026_ReportResourceBalances: PredictedTableName=ReportResourceBalances; ObservedTableName=obs_ReportResourceBalances; FieldNameUsedForMatch=SimulationName; FieldName2UsedForMatch=Date; AllColumns=false
      Tests: POName=Oct2026_ReportResourceBalances
        AcceptedStats:
          Name               n   Slope  Intercept   SEslope      SEintercept  R2  RMSE         NSE  ME           MAE          RSR          RMR
          Bos_indicus.Count  60  1      0           0            0            1   0            1    0            0            0            0
          FieldLink_Amount   60  1      0           2.3307e-09   2.28449e-06  1   9.85438e-13  1    1.02792e-13  3.70903e-13  1.10064e-15  2.37277e-15
          Hay_Amount         60  1      8.6402e-12  8.21944e-09  1.64566e-05  1   2.64803e-12  1    4.24431e-13  2.09184e-12  2.78761e-15  1.49884e-15
        AcceptedStatsName=Name n Slope Intercept SEslope SEintercept R2 RMSE NSE ME MAE RSR RMR
    PredictedObserved Oct2026_ReportResourceShortFalls: PredictedTableName=ReportResourceShortfalls; ObservedTableName=obs_ReportResourceShortfalls; FieldNameUsedForMatch=SimulationName; FieldName2UsedForMatch=Date; AllColumns=false
      Tests: POName=Oct2026_ReportResourceShortFalls
        AcceptedStats:
          Name       n   Slope  Intercept    SEslope      SEintercept  R2  RMSE         NSE  ME           MAE          RSR          RMR
          Available  57  1      0            0            0            1   0            1    0            0            0            0
          Required   57  1      4.54747e-13  2.79087e-09  3.00774e-06  1   1.35721e-12  1    1.12191e-13  6.90598e-13  1.72207e-15  1.82804e-15
        AcceptedStatsName=Name n Slope Intercept SEslope SEintercept R2 RMSE NSE ME MAE RSR RMR
    PredictedObserved Oct2026_GrazeFoodStoreLedger: PredictedTableName=GrazeFoodStoreLedger; ObservedTableName=obs_GrazeFoodStoreLedger; FieldNameUsedForMatch=SimulationName; FieldName2UsedForMatch=Date; AllColumns=false
      Tests: POName=Oct2026_GrazeFoodStoreLedger
        AcceptedStats:
          Name  n   RMSE         ME           MAE          Slope  Intercept  R2  NSE  RSR          RMR
          Gain  55  0            0            0            -      -          -   -    -            -
          Loss  55  1.46465e-12  4.90521e-13  6.73851e-13  1      0          1   1    2.00893e-15  3.2019e-15
        AcceptedStatsName=Name n Slope Intercept SEslope SEintercept R2 RMSE NSE ME MAE RSR RMR
    PredictedObserved Oct2026_AnimalFoodLedger: PredictedTableName=AnimalFoodLedger; ObservedTableName=obs_AnimalFoodLedger; FieldNameUsedForMatch=SimulationName; FieldName2UsedForMatch=Date; AllColumns=false
      Tests: POName=Oct2026_AnimalFoodLedger
        AcceptedStats:
          Name  n   Slope  Intercept     R2  RMSE         NSE  ME            MAE          RSR          RMR          SEslope    SEintercept
          Gain  86  1      -5.68434e-14  1   4.89638e-13  1    -1.71852e-14  2.21425e-13  1.17487e-15  1.75202e-15  -          -
          Loss  86  1      0             1   5.26088e-13  1    -4.80856e-14  1.68547e-13  1.80149e-15  2.1418e-15   1.749e-09  6.65132e-07
        AcceptedStatsName=Name n Slope Intercept SEslope SEintercept R2 RMSE NSE ME MAE RSR RMR
    PredictedObserved Oct2026_HerdLedger: PredictedTableName=HerdLedger; ObservedTableName=obs_HerdLedger; FieldNameUsedForMatch=SimulationName; FieldName2UsedForMatch=Date; AllColumns=false
      Tests: POName=Oct2026_HerdLedger
        AcceptedStats:
          Name  n    Slope     Intercept  SEslope    SEintercept  R2        RMSE     NSE       ME  MAE  RSR     RMR
          Age   800  1         0          0          0            1         0        1         0   0    0       0
          uID   800  0.947867  1.32938    0.0112806  0.320755     0.898452  4.06202  0.895735  0   3.3  0.3227  0.159295
        AcceptedStatsName=Name n Slope Intercept SEslope SEintercept R2 RMSE NSE ME MAE RSR RMR
    PredictedObserved Oct2026_ReportPasturePoolDetails: PredictedTableName=ReportPasturePoolDetails; ObservedTableName=obs_ReportPasturePoolDetails; FieldNameUsedForMatch=SimulationName; FieldName2UsedForMatch=Date; AllColumns=false
      Tests: POName=Oct2026_ReportPasturePoolDetails
        AcceptedStats:
          Name                  n   Slope  Intercept     SEslope      SEintercept  R2  RMSE         NSE  ME            MAE          RSR          RMR
          FieldLink.Amount      60  1      2.27374e-13   2.01217e-09  3.31823e-06  1   1.44021e-12  1    -1.81188e-14  6.18054e-13  9.81987e-16  1.85266e-15
          FieldLink.Consumable  60  1      0             2.02299e-09  3.28912e-06  1   1.44222e-12  1    -1.28868e-14  5.98182e-13  9.88645e-16  1.94315e-15
          FieldLink.Consumed    60  1      -5.68434e-14  -            -            1   1.35786e-12  1    1.47163e-13   6.27492e-13  1.81158e-15  3.0092e-15
          FieldLink.DMD         55  1      0             -            -            1   2.63433e-14  1    -4.9092e-15   2.2479e-14   8.15011e-15  3.15042e-16
          FieldLink.Nitrogen    55  1      3.23297e-13   3.67915e-08  1.66611e-07  1   2.6679e-15   1    1.00929e-15   2.2043e-15   5.50619e-15  5.92471e-16
        AcceptedStatsName=Name n Slope Intercept SEslope SEintercept R2 RMSE NSE ME MAE RSR RMR
    PredictedObserved Oct2026_ReportGrazingEfficiency: PredictedTableName=ReportGrazingEfficiency; ObservedTableName=obs_ReportGrazingEfficiency; FieldNameUsedForMatch=SimulationName; FieldName2UsedForMatch=Date; AllColumns=false
      Tests: POName=Oct2026_ReportGrazingEfficiency
        AcceptedStats:
          Name                n   Slope  Intercept    SEslope      SEintercept  R2  RMSE         NSE  ME            MAE          RSR          RMR
          BiomassLimiter      60  1      0            0            0            1   2.23773e-17  1    1.80411e-17   1.80411e-17  5.3937e-17   5.71352e-17
          CombinedLimiter     60  1      5.55112e-17  2.43834e-09  1.1821e-09   1   5.63687e-16  1    -1.09289e-16  1.38213e-16  1.34894e-15  2.24012e-15
          GrazingTimeLimiter  60  -      -            -            -            -   0            -    0             0            -            0
          PropDietGreen       60  1      0            0            0            1   0            1    0             0            0            0
          QualityLimiter      60  1      5.55112e-17  -            -            1   5.63067e-16  1    -9.49487e-17  1.38329e-16  1.3516e-15   2.21405e-15
          ShortfallLimiter    60  -      -            -            -            -   0            -    0             0            -            0
        AcceptedStatsName=Name n Slope Intercept SEslope SEintercept R2 RMSE NSE ME MAE RSR RMR
    PredictedObserved Oct2026_IndGrowth: PredictedTableName=IndGrowth; ObservedTableName=obs_IndGrowth; FieldNameUsedForMatch=SimulationName; FieldName2UsedForMatch=Date; AllColumns=false
      Tests: POName=Oct2026_IndGrowth
        AcceptedStats:
          Name         n   Slope  Intercept     SEslope      SEintercept  R2  RMSE         NSE       ME            MAE          RSR          RMR
          Age          60  1      0             0            0            1   0            1         0             0            0            0
          DMD          60  1      -3.97904e-13  -            -            1   2.68067e-14  1         -2.84217e-15  2.13163e-14  2.8736e-15   4.08993e-16
          EBM          60  1      -6.51426e-11  -            -            1   2.93905e-13  1         1.89478e-14   2.55795e-13  1.3016e-14   5.58899e-16
          EBMChange    60  1      -1.77636e-15  0            0            1   1.28431e-14  1         1.15463e-15   7.60133e-15  1.48594e-15  7.66771e-15
          Gutfill      60  1      0             -            -            1   8.21021e-18  0.961111  -1.61908e-18  4.85723e-18  0.195552     1.02628e-16
          In_Actual    60  1      -4.44089e-15  0            0            1   2.69306e-15  1         -2.29446e-16  2.27966e-15  1.72718e-15  9.06996e-16
          In_Expected  60  1      4.35207e-14   6.40716e-09  3.7784e-08   1   3.11813e-15  1         4.14483e-16   2.69414e-15  2.45092e-15  5.41282e-16
          In_MaxExp    60  1      3.18087e-10   5.83073e-07  4.70288e-06  1   2.93681e-15  1         0             2.42769e-15  1.48544e-13  3.64114e-16
          In_Received  60  1      4.35207e-14   6.40716e-09  3.7784e-08   1   3.11391e-15  1         4.44089e-16   2.69414e-15  2.4476e-15   5.4055e-16
          In_Required  60  -      -             -            -            -   0            -         0             0            -            -
          In_Unneeded  60  1      0             3.06756e-09  1.02952e-08  1   2.47373e-15  1         -3.07162e-16  1.91421e-15  1.31653e-15  8.86191e-16
          ME           60  1      -2.77112e-13  8.80478e-09  5.52844e-07  1   5.76153e-14  1         5.09222e-15   2.85401e-14  3.88962e-15  9.43791e-16
          NPct         60  1      -4.44089e-16  3.3166e-09   8.27485e-09  1   2.41764e-15  1         1.96139e-16   1.9725e-15   1.96736e-15  1.11046e-15
          TimeStep     60  1      0             0            0            1   0            1         0             0            0            0
          UID          60  -      -             -            -            -   0            -         0             0            -            0
          Wt           60  1      5.19549e-11   -            -            1   3.06814e-13  1         -1.89478e-15  2.70954e-13  1.15497e-14  5.29213e-16
          WtChange     60  1      5.21805e-15   -            -            1   1.91351e-14  1         4.65368e-15   1.1241e-14   1.14883e-15  -2.93147e-14
        AcceptedStatsName=Name n Slope Intercept SEslope SEintercept R2 RMSE NSE ME MAE RSR RMR
    PredictedObserved Oct2026_IndEnergy: PredictedTableName=IndEnergy; ObservedTableName=obs_IndEnergy; FieldNameUsedForMatch=SimulationName; FieldName2UsedForMatch=Date; AllColumns=false
      Tests: POName=Oct2026_IndEnergy
        AcceptedStats:
          Name               n   Slope  Intercept     SEslope      SEintercept  R2  RMSE         NSE  ME            MAE          RSR          RMR
          AfterLact          60  1      6.21725e-15   1.52039e-09  2.54497e-08  1   1.81033e-14  1    3.42689e-15   1.08358e-14  1.19382e-15  2.46196e-15
          AfterMaint         60  1      7.10543e-15   4.18889e-09  7.90106e-08  1   2.14801e-14  1    4.01623e-15   1.37446e-14  1.47506e-15  1.77013e-15
          AfterPreg          60  1      5.32907e-15   2.86815e-09  5.38991e-08  1   1.95033e-14  1    2.81442e-15   1.20293e-14  1.21312e-15  1.96025e-15
          AfterWool          60  1      6.21725e-15   1.52039e-09  2.54497e-08  1   1.81033e-14  1    3.42689e-15   1.08358e-14  1.19382e-15  2.46196e-15
          EBasal             60  1      -1.5298e-11   -            -            1   2.89352e-14  1    -2.96059e-15  2.54611e-14  1.99696e-14  6.66436e-16
          EDifference        60  1      -7.10543e-14  0            0            1   4.66944e-13  1    -7.95808e-14  2.04163e-13  1.68149e-15  -5.07991e-15
          EFat               60  1      -2.71029e-10  -            -            1   1.70919e-11  1    7.88229e-13   1.01863e-11  1.32647e-14  1.85575e-15
          EFatChange         60  1      -1.42109e-14  -            -            1   3.12777e-13  1    6.4541e-14    1.82965e-13  1.11891e-15  3.1446e-15
          EFatProteinChange  60  1      0             2.57273e-09  7.7153e-07   1   3.54407e-13  1    -1.15463e-14  2.15117e-13  1.23587e-15  3.72188e-15
          EFetus             60  1      0             2.53725e-09  1.13469e-08  1   8.03181e-15  1    1.69124e-15   2.3162e-15   2.04127e-15  3.67525e-15
          EGain              60  1      6.21725e-15   1.52039e-09  2.54497e-08  1   1.81033e-14  1    3.42689e-15   1.08358e-14  1.19382e-15  2.46196e-15
          EGraze             60  -      -             -            -            -   0            -    0             0            -            -
          ELact              60  1      1.33227e-15   2.24443e-09  9.9644e-09   1   7.19895e-15  1    -1.04361e-15  2.07982e-15  1.98219e-15  2.77295e-15
          EMove              60  -      -             -            -            -   0            -    0             0            -            -
          ENetForGain        60  1      -2.22045e-15  0            0            1   1.40023e-14  1    -3.10492e-15  7.41999e-15  1.54312e-15  4.23936e-15
          EProt              60  1      4.54747e-11   4.65343e-08  6.73556e-05  1   2.60175e-12  1    1.51582e-13   2.11458e-12  2.90093e-14  1.80088e-15
          EProtChange        60  1      1.77636e-15   1.75021e-09  1.77897e-08  1   1.23039e-14  1    1.76896e-15   5.94339e-15  1.32091e-15  -2.90041e-15
          EViscera           60  1      1.42109e-14   6.11443e-09  3.45527e-08  1   2.76265e-15  1    5.03301e-16   2.39808e-15  2.0723e-15   5.0283e-16
          EWool              60  -      -             -            -            -   0            -    0             0            -            -
          ForGrazing         60  -      -             -            -            -   0            -    0             0            -            -
          ForMaint           60  1      0             8.86691e-08  4.33795e-06  1   2.9454e-14   1    8.28967e-16   2.5698e-14   2.83192e-14  6.02183e-16
          MEI                60  1      -2.77112e-13  8.80478e-09  5.52844e-07  1   5.76153e-14  1    5.09222e-15   2.85401e-14  3.88962e-15  9.43791e-16
          TimeStep           60  1      0             0            0            1   0            1    0             0            0            0
          UID                60  -      -             -            -            -   0            -    0             0            -            0
        AcceptedStatsName=Name n Slope Intercept SEslope SEintercept R2 RMSE NSE ME MAE RSR RMR
    PredictedObserved Oct2026_FatProteinGrowth: PredictedTableName=FatProteinGrowth; ObservedTableName=obs_FatProteinGrowth; FieldNameUsedForMatch=SimulationName; FieldName2UsedForMatch=Date; AllColumns=false
      Tests: POName=Oct2026_FatProteinGrowth
        AcceptedStats:
          Name                 n   Slope  Intercept     SEslope      SEintercept  R2  RMSE         NSE  ME            MAE          RSR          RMR
          BCS                  60  1      8.10019e-13   4.73777e-08  2.21206e-07  1   2.69398e-15  1    -5.92119e-17  2.16123e-15  9.04019e-15  5.78154e-16
          EBF                  60  1      -1.61537e-14  -            -            1   2.62531e-16  1    1.66533e-17   2.22045e-16  5.24808e-15  5.9116e-16
          EBM                  60  1      -6.51426e-11  -            -            1   2.93905e-13  1    1.89478e-14   2.55795e-13  1.3016e-14   5.58899e-16
          Energy_ForGain       60  1      -2.22045e-15  0            0            1   1.40023e-14  1    -3.10492e-15  7.41999e-15  1.54312e-15  4.23936e-15
          Energy_FromExcessCP  60  -      -             -            -            -   0            -    0             0            -            -
          Energy_Grazing       60  -      -             -            -            -   0            -    0             0            -            -
          Energy_Intake        60  1      -2.77112e-13  8.80478e-09  5.52844e-07  1   5.76153e-14  1    5.09222e-15   2.85401e-14  3.88962e-15  9.43791e-16
          Energy_Lactation     60  1      1.33227e-15   2.24443e-09  9.9644e-09   1   7.19895e-15  1    -1.04361e-15  2.07982e-15  1.98219e-15  2.77295e-15
          Energy_Maintenance   60  1      0             8.86691e-08  4.33795e-06  1   2.9454e-14   1    8.28967e-16   2.5698e-14   2.83192e-14  6.02183e-16
          Energy_Net           60  1      6.21725e-15   1.52039e-09  2.54497e-08  1   1.81033e-14  1    3.42689e-15   1.08358e-14  1.19382e-15  2.46196e-15
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        AcceptedStatsName=Name n Slope Intercept SEslope SEintercept R2 RMSE NSE ME MAE RSR RMR
    PredictedObserved Oct2026_IndBreedStatus: PredictedTableName=IndBreedStatus; ObservedTableName=obs_IndBreedStatus; FieldNameUsedForMatch=SimulationName; FieldName2UsedForMatch=Date; AllColumns=false
      Tests: POName=Oct2026_IndBreedStatus
        AcceptedStats:
          Name      n   Slope  Intercept    R2  RMSE         NSE  ME           MAE         RSR          RMR          SEslope  SEintercept
          RelCon    60  1      8.88178e-16  1   2.89454e-15  1    4.51491e-16  2.4869e-15  5.90732e-14  2.31228e-15  -        -
          TimeStep  60  1      0            1   0            1    0            0           0            0            0        0
          UID       60  -      -            -   0            -    0            0           -            0            -        -
        AcceptedStatsName=Name n Slope Intercept SEslope SEintercept R2 RMSE NSE ME MAE RSR RMR
  Folder Replacements
    RandomNumberGenerator RandomNumbers: Seed=-1
  Virtual: FileName=AgPasture_CLEM.apsimx; ModelPaths=[[AgPastureCLEMExample]]
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