Simulations: Version=139
  DataStore
  Simulation IndividualAnimal
    Memo Individual Animal
      This is a simple simulation demonstrating how an individual animal is fed from an animal store and the resources and activities required to feed and grow the animal.

      ###Resources
      Ruminant Herd defines the individual animals at the start of the simulation, this holds the three models that define the ruminant herd. Firstly, 'ruminant type' determines the ruminant parameters for the breed being used in the simulation. Under this, 'ruminant initial cohorts' and 'ruminant type cohort' define the herd with inputs including gender, age, number of individuals and weight.

      In this case, animals are being fed from an 'animal food store', which is similar to having a barn or shed full of fodder on the farm. A 'food store type' is added for each different type of fodder, in this case it is just rice straw. The fodder's dry matter digestability, nitrogen content and the starting amount is defined by the user. In this example, if their is insufficient fodder then a 'transmutation' is used to purchase more rice straw (i.e. the transmutation converts money to fodder). In this transmutation, 10,000kg of fodder is purchased for $100 every time fodder levels are low.

      In this example, finances are required to purchase fodder. Under finances, the user can define the currency, this is a reference for the user and has no impact on the simulation. Under finance type, the bank balance and banking rules are defined.

      ###Activities
      'Ruminant activity feed' defines how the livestock are fed including the fodder source and the feeding style used, in this case fodder was supplied as a proportion of potential intake. The 'ruminant feed group' then defined that the animal was fed 100% of their potential intake.

      The only other essential activity is 'rumninant activity grow' which performs the growth and aging of the ruminants and defines the gross energy content of the forage.

      There are also two ruminant activities that generate reports called 'summarise ruminant herd' and 'report ruminant herd'. The outputs of these activities can be read in the reports and graphs section in the 'herd summary' and 'herd report' reports.

      ###Reports & Graphs
      Reports & graphs are stored in a 'CLEM Folder' to make it easier to select CLEM (rather than APSIM) functions. In this case, three blank reports are used to write herd reports, while pre-formed resource ledgers, balances and activity reports are also used.
    Clock: Start=1995-01-01; End=2009-12-31
    Summary summaryfile
    RandomNumberGenerator RandomNumbers: Seed=0; Iteration=0
    ZoneCLEM CLEM: FarmMultiplier=1; ClimateRegion=0; EcologicalIndicatorsCalculationInterval=12; EcologicalIndicatorsCalculationMonth=12; Area=0; Slope=0; AspectAngle=0; Altitude=50
      ResourcesHolder Resources
        RuminantHerd Ruminants: TransactionStyle=0
          RuminantType Bos indicus: Breed=Bos indicus; EMaintEfficiencyCoefficient=0.35; EMaintEfficiencyIntercept=0.503; EGrowthEfficiencyCoefficient=0.79; EGrowthEfficiencyIntercept=0; ELactationEfficiencyCoefficient=0.35; ELactationEfficiencyIntercept=0.42; EMaintExponent=8.2e-05; EMaintIntercept=0.09; EMaintCoefficient=0.26; EnergyMaintenanceMaximumAge=6; Kme=1; GrowthEnergyIntercept1=6.7; GrowthEnergyIntercept2=20.3; GrowthEfficiency=1.09; NaturalWeaningAge=0; SRWFemale=500; SRWMaleMultiplier=1.2; SRWBirth=0.08; AgeGrowthRateCoefficient=0.0115; SRWGrowthScalar=0.32; IntakeCoefficient=0.024; IntakeIntercept=1.7; OverfeedPotentialIntakeModifier=1; ProteinCoefficient=120; ProteinDegradability=0.9; BaseAnimalEquivalent=450; GreenDietMax=0.98; GreenDietCoefficient=0.15; GreenDietZero=0.04; IntakeCoefficientBiomass=0.006; StrictFeedingLimits=true; MilkIntakeCoefficient=0.1206; MilkIntakeIntercept=3.8146; MilkIntakeMaximum=20; MilkLWTFodderSubstitutionProportion=0.2; MaxJuvenileIntake=0.035; ProportionalDiscountDueToMilk=0.3; ProportionOfMaxWeightToSurvive=0.5; LactatingPotentialModifierConstantA=0.42; LactatingPotentialModifierConstantB=61; LactatingPotentialModifierConstantC=1.7; MaximumSizeOfIndividual=1.2; MortalityBase=0.03; MortalityCoefficient=2.5; MortalityIntercept=0.05; MortalityExponent=3; JuvenileMortalityCoefficient=3; JuvenileMortalityMaximum=0.2; JuvenileMortalityExponent=1.8; WoolCoefficient=0; CashmereCoefficient=0; MilkCurveSuckling=0.6; MilkCurveNonSuckling=0.11; MilkingDays=300; MilkPeakYield=20; MilkOffsetDay=4; MilkPeakDay=45; ProportionOffspringMale=0; InterParturitionIntervalIntercept=10.847; InterParturitionIntervalCoefficient=-0.7994; GestationLength=9; MinimumAge1stMating=24; MinimumSize1stMating=0.5; MinimumDaysBirthToConception=61; CriticalCowWeight=0.5; MaximumMaleMatingsPerDay=30; PrenatalMortality=0.079; MethaneProductionCoefficient=35.16
            RuminantInitialCohorts Initial cohorts: WeightWarningOccurred=false
              RuminantTypeCohort WeanerF: Sex=0; Age=8; Number=1; Weight=180; WeightSD=0; Suckling=false; Sire=false
        AnimalFoodStore
          AnimalFoodStoreType RiceStraw: Units=kg; DMD=45; Nitrogen=0.75; StartingAmount=10000
            Transmutation Purchase: ResourceInShortfall=AnimalFoodStore.RiceStraw; TransmutationPacketSize=10000; UseWholePackets=false; TransactionCategory=Transmutation
              Transmute Money: TransmuteResourceTypeName=Finances.General account; AmountPerPacket=100; TransmuteStyle=0; FinanceTypeForTransactionsName=No transactions
        Finance Finances: CurrencyName=Dollars
          FinanceType General account: OpeningBalance=10000; EnforceWithdrawalLimit=false; WithdrawalLimit=0; InterestRateCharged=7.5; InterestRatePaid=2
      ActivitiesHolder Activities
        ActivityFolder Manage herd: OnPartialResourcesAvailableAction=0
          RuminantActivityFeed Feed rice straw: FeedTypeName=AnimalFoodStore.RiceStraw; ProportionTramplingWastage=0; FeedStyle=3; StopFeedingWhenSatisfied=false; TransactionCategory=Livestock.Feed; OnPartialResourcesAvailableAction=2
            RuminantFeedGroup Feed all: Value=1
          RuminantActivityGrow Grow all ruminants: EnergyGross=18.8; MethaneStoreName=Use store named Methane if present; OnPartialResourcesAvailableAction=0; TransactionCategory=Livestock.Manage
        SummariseRuminantHerd SummariseHerd
        ReportRuminantHerd ReportHerd
      CLEMFolder Reports and Graphs
        Report HerdSummary: EventNames=[Activities].SummariseHerd.OnReportItemGenerated
          VariableNames:
            [Clock].Today
            [Activities].SummariseHerd.ReportDetails.Breed as Breed
            [Activities].SummariseHerd.ReportDetails.Herd as Herd
            [Activities].SummariseHerd.ReportDetails.Age as AgeGroupYears
            [Activities].SummariseHerd.ReportDetails.Sex as Sex
            [Activities].SummariseHerd.ReportDetails.Number as Num
            [Activities].SummariseHerd.ReportDetails.AverageWeight as AvgWt
            [Activities].SummariseHerd.ReportDetails.AverageWeightGain as AvgWtGn
            [Activities].SummariseHerd.ReportDetails.AverageIntake as AvgIntake
            [Activities].SummariseHerd.ReportDetails.AdultEquivalents as AE
            [Activities].SummariseHerd.ReportDetails.NumberPregnant as NoPregnant
            [Activities].SummariseHerd.ReportDetails.NumberOfBirths as Births
        Report HerdReport: EventNames=[Activities].ReportHerd.OnReportItemGenerated
          VariableNames:
            [Clock].Today
            [Activities].ReportHerd.ReportDetails.Individual.ID as UID
            [Activities].ReportHerd.ReportDetails.Individual.Weight as Weight
        Report HerdLedger: EventNames=[Resources].Ruminants.TransactionOccurred
          VariableNames:
            [Clock].Today as Date
            [Resources].Ruminants.LastTransaction.ExtraInformation.ID as UId
            [Resources].Ruminants.LastTransaction.ExtraInformation.Breed as Breed
            [Resources].Ruminants.LastTransaction.ExtraInformation.HerdName as Herd
            [Resources].Ruminants.LastTransaction.ExtraInformation.Sex as Sex
            [Resources].Ruminants.LastTransaction.ExtraInformation.Age as Age
            [Resources].Ruminants.LastTransaction.ExtraInformation.Weight as Weight
            [Resources].Ruminants.LastTransaction.ExtraInformation.SaleFlag as Reason
            [Resources].Ruminants.LastTransaction.ExtraInformation.PopulationChangeDirection as Change
        ReportResourceLedger FinancesLedger: ReportStyle=0; ResourceGroupsToReport=Finances; ReportLossesAsNegative=false; IncludePrice=false; IncludeConversions=false; VariableNames=Finances
        ReportResourceBalances: ResourceGroupsToReport=[AnimalFoodStore, Finances]; ReportAmount=true; ReportValue=false; ReportAnimalEquivalents=false; ReportAnimalWeight=false; ReportLandEntire=false; ReportLabourIndividuals=false; EventNames=[Clock].CLEMEndOfTimeStep
          VariableNames:
            [Clock].Today
            AnimalFoodStore
            Finances
            Ruminants
        ReportActivitiesPerformed: CreateHTML=false; RotateReport=false; AutoCreateHTML=false
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