Simulations: Version=201
  DataStore
    ExcelInput: FileNames=[ObsPloschuk2021.xlsx]
      SheetNames=[Harvest, LAI_at_end_treatment, RUE_at_end_treatment, TimeSeries]
    PredictedObserved: PredictedTableName=Report_Harvest; ObservedTableName=Harvest; FieldNameUsedForMatch=SimulationName; FieldName2UsedForMatch=Year; AllColumns=false
    PredictedObserved LAIPredObs: PredictedTableName=Report_Day; ObservedTableName=LAI_at_end_treatment; FieldNameUsedForMatch=SimulationName; FieldName2UsedForMatch=Clock.Today; AllColumns=false
    PredictedObserved RUEPredObs: PredictedTableName=Report_Day; ObservedTableName=RUE_at_end_treatment; FieldNameUsedForMatch=SimulationName; FieldName2UsedForMatch=Clock.Today; AllColumns=false
    PredictedObserved DailyPredObs: PredictedTableName=Report_Day; ObservedTableName=TimeSeries; FieldNameUsedForMatch=SimulationName; FieldName2UsedForMatch=Clock.Today; AllColumns=false
  Folder Replacements
    Report Report_Day: EventNames=[Clock].DoReport
      VariableNames:
        [Clock].Today
        [Clock].Today.Year as Year
        [Canola].DaysAfterSowing as DAS
        [Canola].Phenology.Stage as stage
        [Canola].Phenology.CurrentStageName
        [Canola].AboveGroundLive.Wt
        [Canola].AboveGround.Wt
        [Canola].AboveGround.Wt * 10 as Biomass_kgha
        [Canola].AboveGround.N * 10 as BiomassN_kgha
        [Canola].Grain.Wt
        [Canola].Grain.Wt * 10 * 1.15 as Yield_kgha
        [Canola].Grain.Wt * 10 * 0.0149/0.85 as Yield_buac
        [Canola].Leaf.Photosynthesis.RueAct
        [Canola].Leaf.Photosynthesis.RUE.Potential.FixedValue
        [Canola].Leaf.Photosynthesis.FT
        [Canola].Leaf.Photosynthesis.FN
        [Canola].Leaf.Photosynthesis.FCO2
        [Canola].Leaf.Photosynthesis.FVPD
        [paddock].Fertiliser.NitrogenApplied as Fert.applied
        Divide (GrainN_kgha, Yield_kgha)*100 as GrainN_conc
        Divide (StoverN_kgha, StoverDM_kgha)*100 as StoverN_conc
        [Canola].Population
        [Canola].Grain.Size * 1000 as GrainSize_mg
        [Canola].Grain.Number as GrainNumber_m2
        sum([Soil].NO3.kgha[1:5]) as NO3_0to30cm
        [Swim3].WaterTable
        [Swim3].SW[1]
        [Swim3].SW[3]
        [Swim3].Es
        [Swim3].WaterTable
        [Swim3].Pond
        [Swim3].Runoff
        [Swim3].Drainage
        [Swim3].SubsurfaceDrain
        [Irrigation].IrrigationApplied
        [Leaf].Transpiration + [Swim3].Es as evapotranspiration
        [Canola].DaysAfterSowing
        [Canola].Root.Depth
        [Canola].Leaf.LAI
        [Canola].Leaf.CoverGreen
        [Canola].Leaf.CoverTotal
        [Canola].Leaf.NodeNumber
        [Canola].Leaf.Live.N
        [Canola].Leaf.Live.NConc * 100 as leafGreennconc
        [Canola].Leaf.Live.Wt as leafGreenWt
        [Canola].Leaf.Dead.Wt as SenescedWt
        //[Canola].Phenology.FloweringDAS as flowering_date
        sum([NO3].kgha)
        [Canola].Total.NConc
        [Canola].TotalLive.NConc
        //([Swim3].PSI[4] * 0.75 + [Swim3].PSI[5] * 0.25) as PSI_15cm
        //([Swim3].PSI[5] * 0.5 + [Swim3].PSI[6] * 0.5) as PSI_30cm
        //([Swim3].PSI[6] * 0.5 + [Swim3].PSI[7] * 0.5) as PSI_45cm
        //([Swim3].PSI[7] * 0.5 + [Swim3].PSI[8] * 0.5) as PSI_60cm
        //([Swim3].PSI[7] * 0.75 + [Swim3].PSI[8] * 1) as PSI_60cm
        [Clock].Today.DayOfYear as day
        sum([Swim3].SWmm[1:4]) as sw_30cm
        sum([Physical].SATmm[1:4]) as sat_30cm
        sum([Physical].DULmm[1:4]) as dul_30cm
        sum([Swim3].SWmm[1:5]) as sw_90cm
        [Canola].Leaf.NodeNumber
        [Canola].Leaf.Transpiration
        [Canola].Leaf.Photosynthesis.FW as swdef_photo
        [Weather].Rain
        [Weather].Radn
        [Weather].VPD
        [Weather].MaxT
        [Weather].MinT
        [Weather].MeanT
        //sum of divide(1 - oxdef_fix, 1 - oxdef_fix) from [Clock].StartOfYear to [Clock].EndOfYear as OxdefFixDays
        [Canola].Root.WetRootFraction as wet_root_fr
        //[Canola].Grain.OxdefAccumulation as AccumulatedOx
        [Canola].Leaf.Transpiration + [Swim3].Es as evapotranspiration
        ((sum([Swim3].SWmm) - sum([Soil].Physical.LL15mm)) / (sum([Soil].Physical.SATmm) -  sum([Soil].Physical.LL15mm))) as SWRatio
        sum of [Irrigation].IrrigationApplied from [Canola].Sowing to [Canola].Harvesting as TotalIrrigation
    Report Report_Harvest: EventNames=[Canola].Harvesting
      VariableNames:
        [Clock].Today
        [Clock].Today.Year as Year
        [Canola].SowingDate as SowingDate
        //[Canola].Phenology.FloweringDAS as DTF
        [Canola].Phenology.MaturityDAS as DTM
        [Canola].Grain.Wt
        [Canola].Grain.Wt * 10 as Yield_kgha
        [Canola].Grain.N * 10 as GrainN_kgha
        [Canola].Grain.Wt * 10 * 0.0149/0.85 as Yield_buac
        [Canola].Grain.Wt/([Canola].AboveGround.Wt+0.00001) as HI
        [Canola].Grain.N/([Canola].AboveGround.N+0.00001) as NHI
        [Canola].AboveGround.Wt * 10 as Biomass_kgha
        [Canola].AboveGround.N * 10 as BiomassN_kgha
        (([Canola].AboveGround.Wt) - ([Canola].Grain.Wt))*10 as StoverDM_kgha
        (([Canola].AboveGround.N) - ([Canola].Grain.N))*10 as StoverN_kgha
        [Canola].LAI
        [Canola].Leaf.NConc * 100 as LeafNConc
        [Canola].Grain.HarvestIndex
        Divide (GrainN_kgha, Yield_kgha)*100 as GrainN_conc
        Divide (StoverN_kgha, StoverDM_kgha)*100 as StoverN_conc
        [Canola].Population
        [Canola].Grain.Size * 1000 as GrainSize_mg
        [Canola].Grain.Number
        sum([Soil].NO3.kgha[1:2]) as NO3_harvest_0to30cm
        sum([Soil].NO3.kgha[3:7]) as NO3_harvest_30to120cm
        //sum of [Swim].FlowNO3[11] from [Canola].Sowing to [Canola].Harvesting as GS_leaching_150cm
        [NO3].Flow[7] from [Canola].Sowing to [Canola].Harvesting as GS_leaching_120cm
        sum of sum([Soil].Nutrient.N2Oatm) from [Canola].Sowing to [Canola].Harvesting as GS_N20
        sum of sum([Soil].Nutrient.DenitrifiedN) from [Canola].Sowing to [Canola].Harvesting as GS_Denitrification
        sum of [Fertiliser].NitrogenApplied from [Canola].Sowing to [Canola].Harvesting as N_fertilizer
        sum of sum([Soil].Nutrient.MineralisedN + [SurfaceOrganicMatter].SurfaceResidue.Decomposition.MineralisedN) from [Canola].Sowing to [Canola].Harvesting as GS_NetNMineralization
        sum of [Irrigation].IrrigationApplied from [Canola].Sowing to [Canola].Harvesting as TotalIrrigation
        //[Structure].FinalLeafNumber
        //[Structure].AllLeavesAppeared
  Memo
    Ploschuk et al. 2021

    Ploschuk, Rocio Antonella, et al. “Early‐ and Late‐waterlogging Differentially Affect the Yield of Wheat, Barley, Oilseed Rape and Field Pea Through Changes in Leaf Area Index, Radiation Interception and Radiation Use Efficiency.” Journal of Agronomy and Crop Science, vol. 207, no. 3, Mar. 2021, pp. 504–20. https://doi.org/10.1111/jac.12486.

    **Study years** -> 2 [2017 & 2018]

    **Sowing dates** -> July 26 (2017) & July 24 (2018)

    **Experimental setup** -> Outdoor in plastic containers with size of 1 m3 (1*1*1m, depth).
    	              4 species (wheat, barley, oilseed rape, and field pea) * 3 treatments (Control; early wl; late wl) * 3 replicates

    **Planting density** -> Wheat & barley = 275 pl/m2
    	         oilseed rape & field pea = 100 pl/m2

    **Row to row & plant to plant spacing** -> Wheat and barley have 10 rows with 4 cm distance b/w plants
    	               oil seed rape and field pea have 9 rows with 10 cm distance b/w plants per container

    **Fertilizer application** -> 200 kg N/ha in three equal split doses at 15 days after sowing, with second and third dose at begining of recovery period  after early and late waterlogging treatments

    **Waterlogging treatments** ->

    			1. Control (daily watered to ensure no water stress)

    			2. Early waterlogging (vegetative stage) -> 43 & 56 DAS in 2017 and 2018, respectively

    			3. Late waterlogging (reproductive stage) -> wheat and barley [72 and 78 DAS in 2017 and 2018 respectively]
    					 	  oilseed rape and field pea [78 and 80 DAS in 2017 and 2018, respectively]

    **Duration of waterlogging** -> 14 days with water standing of 1-2 cm
  Folder Ploschuk 2021
    Experiment Exp_1
      Factors
        Factor _: Specification=[WL]
          Operations Control
          Operations Early_WL
            2017-09-07  [SwimSubsurfaceDrain].Open = false
            2017-09-07  [DumpWater].Script.Dump = true
            2017-09-21  [SwimSubsurfaceDrain].Open = true
            2017-09-21  [DumpWater].Script.Dump = false
            2018-09-18  [SwimSubsurfaceDrain].Open = false //2018-09-18
            2018-09-18  [DumpWater].Script.Dump = true //2018-09-18
            2018-10-02  [SwimSubsurfaceDrain].Open = true //2018-10-02
            2018-10-02  [DumpWater].Script.Dump = false //2018-10-02
          Operations Late_WL
            2017-10-07  [SwimSubsurfaceDrain].Open = false
            2017-10-07  [DumpWater].Script.Dump = true
            2017-10-21  [SwimSubsurfaceDrain].Open = true
            2017-10-21  [DumpWater].Script.Dump = false
            2018-10-10  [SwimSubsurfaceDrain].Open = false
            2018-10-10  [DumpWater].Script.Dump = true
            2018-10-24  [SwimSubsurfaceDrain].Open = true
            2018-10-24  [DumpWater].Script.Dump = false
      Simulation Base_Exp1
        Clock: Start=2017-01-01; End=2018-12-31
        Weather: FileName=./met/Argentina_01.met
        Summary summaryfile
        Zone paddock: Area=1; Slope=0; AspectAngle=0; Altitude=50
          Operations Sowing
            2017-07-26  [Canola].Sow(Hyola575,100,55,120) //this is cultivar name, density, depth, row space
            2018-07-24  [Canola].Sow(Hyola575,100,60,120)
          Manager Harvesting
            Crop = [Canola]
```csharp
using APSIM.Shared.Utilities;
using Models.Utilities;
using Models.Soils;
using Models.PMF;
using Models.Core;
using System;
using System.Linq;

namespace Models
{
    [Serializable] 
    public class Script : Model
    {
        [Description("Crop")]
        public IPlant Crop { get; set; }
        
        [EventSubscribe("DoManagement")]
        private void OnDoManagement(object sender, EventArgs e)
        {
            if (Crop.IsReadyForHarvesting)
            {
                Crop.Harvest();
                Crop.EndCrop();
            }
        }
    }
}
```
          SurfaceOrganicMatter: InitialResidueName=wheat; InitialResidueType=wheat; InitialResidueMass=500; InitialStandingFraction=0; InitialCPR=0; InitialCNR=100
          Report Report_Day: EventNames=[Clock].DoReport
          Soil Synthetic Soil Derived from ISRIC SoilGrids: ASCOrder=NA; ASCSubOrder=NA; SoilType=Luvic Phaeozems; Site=NA; NearestTown=NA; Region=NA; State=NA; Country=Argentina; NaturalVegetation=NA; ApsoilNumber=9999; Latitude=-34.625; Longitude=-58.375; LocationAccuracy=+- 250 m; YearOfSampling=2019; DataSource=ISRIC SoilGrids
            Water: Thickness=[150, 150, 150, 150, 200, 200, 200]; InitialValues=[0.475, 0.456, 0.44175, 0.43225, 0.43035, 0.4351, 0.437]; FilledFromTop=true
            Physical
              Thickness  ParticleSizeSand  ParticleSizeSilt  ParticleSizeClay  Rocks  BD     AirDry  LL15    DUL    SAT    KS
              150        50.7              23.7              26                0      1.181  0.076   0.1816  0.352  0.5    17.21
              150        50                22.5              27                0      1.248  0.075   0.18    0.342  0.48   15.325
              150        49                22                29                0      1.286  0.077   0.1864  0.347  0.465  12.152
              150        47                22                31                0      1.319  0.079   0.1896  0.348  0.455  9.636
              200        46.2              21.8              31.8              0      1.333  0.079   0.1896  0.346  0.453  8.833
              200        46.8              21.2              31.2              0      1.329  0.077   0.1864  0.341  0.458  9.36
              200        47                21.2              31                0      1.327  0.077   0.184   0.339  0.46   0.01
              Rocks source: Calculated
              SoilCrop WheatSoil: LL=[0.227, 0.225, 0.233, 0.247, 0.259, 0.269, 0.281]; KL=[0.06, 0.06, 0.06, 0.055, 0.048, 0.04, 0.032]; XF=[1, 1, 1, 1, 1, 1, 1]
              SoilCrop CanolaSoil: same as Ploschuk 2021.Exp_1.Base_Exp1.paddock.Synthetic Soil Derived from ISRIC SoilGrids.Physical.WheatSoil
              SoilCrop BarleySoil: LL=[0.227, 0.225, 0.233, 0.246, 0.257, 0.264, 0.275]; KL=[0.07, 0.07, 0.07, 0.065, 0.058, 0.049, 0.041]; XF=[1, 1, 1, 1, 1, 1, 1]
            Organic: FOMCNRatio=40; CarbonUnits=Total
              Thickness  Carbon  SoilCNRatio  FBiom  FInert  FOM
              150        2.764   10.2         0.04   0.367   60.6
              150        2.026   10.2         0.031  0.473   48.4
              150        1.26    10.2         0.014  0.739   38.7
              150        1.047   10.2         0.01   0.867   30.9
              200        0.904   10.2         0.01   0.99    22.9
              200        0.824   10.2         0.01   0.99    16.9
              200        0.752   10.2         0.01   0.99    12.6
            Chemical: PHUnits=Water
              Thickness  PH   CEC
              150        6.5  16.558
              150        6.5  15.117
              150        6.5  13.861
              150        6.6  13.782
              200        6.7  13.62
              200        6.8  13.32
              200        6.9  13.118
              CEC source: Calculated
            Nutrient
            Solute NO3: InitialValuesUnits=ppm; WaterTableConcentration=0; D0=0; DepthConstant=0; MaxDepthSoluteAccessible=0; RunoffEffectivenessAtMovingSolute=0; MaxEffectiveRunoff=0
              Thickness  InitialValues  Exco  FIP
              150        0              0     1
              150        0              0     1
              150        0              0     1
              150        0              0     1
              200        0              0     1
              200        0              0     1
              200        0              0     1
            Solute NH4: InitialValuesUnits=ppm; WaterTableConcentration=0; D0=0; DepthConstant=0; MaxDepthSoluteAccessible=0; RunoffEffectivenessAtMovingSolute=0; MaxEffectiveRunoff=0
              Thickness  InitialValues  Exco  FIP
              150        0              1     1
              150        0              1     1
              150        0              1     1
              150        0              1     1
              200        0              1     1
              200        0              1     1
              200        0              1     1
            Solute Urea: InitialValuesUnits=kg/ha; WaterTableConcentration=0; D0=0; DepthConstant=0; MaxDepthSoluteAccessible=0; RunoffEffectivenessAtMovingSolute=0; MaxEffectiveRunoff=0
              Thickness  InitialValues  Exco  FIP
              150        0              0     1
              150        0              0     1
              150        0              0     1
              150        0              0     1
              200        0              0     1
              200        0              0     1
              200        0              0     1
            SoilTemperature Temperature
            Swim3: Salb=0.13; CN2Bare=50; CNRed=20; CNCov=0.8; KDul=0.1; PSIDul=-100; VC=true; DTMin=0; DTMax=1440; MaxWaterIncrement=5; SpaceWeightingFactor=0.5; SoluteSpaceWeightingFactor=0.5; Dis=15; Disp=1; A=1; DTHC=0; DTHP=1; vcon1=7.28e-09; vcon2=7.26e-07; eo_time=06:00; eo_durn=720; default_rain_time=00:00; default_rain_duration=720; Diagnostics=false
              SwimSubsurfaceDrain: DrainDepth=1150; DrainSpacing=1000; DrainRadius=100; Klat=1000; ImpermDepth=1150; Open=true
          Plant Canola
          Irrigation
          Report Report_Harvest: VariableNames=[Clock].Today as Date; EventNames=[Canola].Harvesting
          Manager DumpWater
            ApplicationAmount = 100
```csharp
using System;
using Models.Core;
using Models.Interfaces;
using Models.PMF;
using APSIM.Shared.Utilities;

namespace Models
{
    [Serializable]
    public class Script : Model
    {
        [Link] IClock Clock;
        [Link] ISummary Summary;
        [Link] Irrigation Irrigation;
        
        [Description("Ammount of water to dump (mm).")]
        public double ApplicationAmount { get; set; }
        
        public bool Dump { get; set;} = false;

        [EventSubscribe("DoManagement")]
        private void DoDailyCalculations(object sender, EventArgs e)
        {
            if (!Dump)
                return;
            Irrigation.Apply(ApplicationAmount);
        }
    }
}
```
          Manager SWIMSetLowerBC
            LowerBCType = watertable
            LowerBCValue = 1100
```csharp
using Models.Climate;
using APSIM.Shared.Utilities;
using Models.Soils.Nutrients;
using Models.Soils;
using Models.PMF;
using Models.Core;
using System.Xml.Serialization;
using System;
using System.Linq;
using Models.AgPasture;
using Models.Interfaces;

namespace Models
{
    [Serializable] 
    [System.Xml.Serialization.XmlInclude(typeof(Model))]
    public class Script : Model
    {
        [Link] Clock clock;
        [Link] ISummary summary;
        [Link] private Swim3 swim;
        //[Link] private PastureSpecies ryegrass;
        //[Link] private SimpleGrazing grazing;
        
        public enum LowerBCTypeOptions {gradient,seepage,potential,watertable};

        [Separator("Sets the lower boundary condition type (and value if set to 'potential' for SWIM3. The change is applied at the beginning of the first day of the simulation.")]
        
        [Description("What lower boundary condition is wanted?")] public LowerBCTypeOptions LowerBCType { get; set; }


        [Display(VisibleCallback = "IsBCPotentialOrWater")]
        [Description("What should the lower BC potential be set to (should be positive for a watertable) (mm)?")] public double LowerBCValue { get; set; }
        
        public bool IsBCPotentialOrWater => LowerBCType == LowerBCTypeOptions.potential || LowerBCType == LowerBCTypeOptions.watertable;





        public double SoilWaterStart  { get; set; }
        public double SoilWaterEnd  { get; set; }

        [EventSubscribe("DoDailyInitialisation")]
        private void DoDailyInitialisation(object sender, EventArgs e)
        {
        }

        [EventSubscribe("DoReportCalculations")]
        private void DoReportCalculations(object sender, EventArgs e)
        {
        }

        [EventSubscribe("DoManagement")]
        private void DoDailyCalculations(object sender, EventArgs e)
        {
            if (clock.Today == clock.StartDate)
            {
                summary.WriteMessage(this, "Script is setting lower boundary condition to " + LowerBCType, MessageType.Diagnostic);
                if (LowerBCType == LowerBCTypeOptions.gradient)
                    swim.SetLowerBCForGradient(bbcGradient: 0.0);   // in cm/cm (ibbc=0) Note that this is the default setting
                else if (LowerBCType == LowerBCTypeOptions.potential)
                    swim.SetLowerBCForGivenPotential(bbcPotential: LowerBCValue /10.0 );    //  convert to cm (ibbc=1), DUL is -100 cm so values more positive will often result in inflow to the bottom of the soil profile. Input in mm so divide here.
                else if (LowerBCType == LowerBCTypeOptions.seepage)
                    swim.SetLowerBCForSeepage(bbcPotentialSeepage: 0.0);  // in cm (ibbc=3). This is for zero-tension lysimeters
                else if (LowerBCType == LowerBCTypeOptions.watertable)
                    swim.SetLowerBCForSeepage(LowerBCValue / 10.0);  // in cm (ibbc=4). This is for water tables
                else
                    throw new Exception("Wrong lower boundary condition type");
            }
        }
    }
}
```
          Operations WL
          Fertiliser
          Manager Fertilise topup
            FertiliserType = UreaGranular
            Threshold = 80
            FertiliseDepth = 50
```csharp
using APSIM.Numerics;
using Models.Soils.Nutrients;
using System.Linq;
using System;
using Models.Core;
using Models.PMF;
using Models.Soils.Nutrients;
using APSIM.Shared.Utilities;
using Models.Soils;
namespace Models
{
    [Serializable]
    public class Script : Model
    {
        [Link] Clock Clock;
        [Link] Fertiliser Fertiliser;
        [Link(ByName=true)] Solute NO3;

        [Description("Type of fertiliser to apply? ")] 
        [Display(Type = DisplayType.FertiliserType)]public string FertiliserType { get; set; }
    
        [Description("Threshold amount of NO3 to topup to (kg/ha)")]
        public double Threshold { get; set;}
        
        [Description("Fertilise depth (mm)")]
        public double FertiliseDepth { get; set; }
        
        [EventSubscribe("DoManagement")]
        private void OnDoManagement(object sender, EventArgs e)
        {
            double Amount = Threshold - MathUtilities.Sum(NO3.kgha);
            Fertiliser.Apply(amount: Amount, type: FertiliserType, depth: FertiliseDepth);
        }
    }
}
```
          Manager Reset on date
            ResetDate = 1-Jan
            OffsetDays = 0
            ResetWater = True
            ResetNutrients = True
            ResetSOM = True
```csharp
using Models.Soils.Nutrients;
using APSIM.Shared.Utilities;
using Models.Surface;
using Models.Utilities;
using Models.Soils.Nutrients;
using Models.Soils;
using Models.PMF;
using Models.Core;
using System;
using System.Linq;
using Models.Interfaces;

namespace Models
{
    [Serializable]
    public class Script : Model
    {
        [Link] private Clock Clock;
        [Link] private Plant Wheat;
        [Link] private ISoilWater SoilWater;
        [Link] private Nutrient nutrient;
        [Link] private SurfaceOrganicMatter SOM;
        [Link] private Summary Summary;

        [Description("Date to reset on:")]
        public string ResetDate {get;set;}
        
        [Description("Offset by Days (Negative is Days Before, Positive is Days After):")]
        public int OffsetDays {get;set;}

        [Description("Reset Water?")]
        public bool ResetWater {get;set;}

        [Description("Reset Soil Nutrients?")]
        public bool ResetNutrients {get;set;}

        [Description("Reset Surface Organic Matter?")]
        public bool ResetSOM {get;set;}

        [EventSubscribe("DoManagement")]
        private void OnDoManagement(object sender, EventArgs e)
        {
            DateTime offsetDate = DateUtilities.GetDate(ResetDate, Clock.Today).AddDays(OffsetDays);
            if (offsetDate.Equals(Clock.Today))
            {
                if (ResetWater)
                {
                    Summary.WriteMessage(this, "Reset Water", MessageType.Diagnostic);
                    SoilWater.Reset();
                }
                if (ResetNutrients)
                {
                    Summary.WriteMessage(this, "Reset Nitrogen", MessageType.Diagnostic);
                    nutrient.Reset();
                }
                if (ResetSOM)
                {
                    Summary.WriteMessage(this, "Reset Surface OM", MessageType.Diagnostic);
                    SOM.Reset();
                }
            }
        }
    }
}
```
        SoilArbitrator
        MicroClimate: a_interception=0; b_interception=1; c_interception=0; d_interception=0; SoilHeatFluxFraction=0.4; MinimumHeightDiffForNewLayer=0; NightInterceptionFraction=0.5; ReferenceHeight=2
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