Simulations: Version=212
  DataStore
    ExcelInput Observed: FileNames=[Observed.xlsx]; SheetNames=[ObservedHarvestData]
    ExcelInput ObservedTimeseries: FileNames=[Observed.xlsx]; SheetNames=[ObservedTimeseriesData]
    PredictedObserved: PredictedTableName=HarvestReport; ObservedTableName=ObservedHarvestData; FieldNameUsedForMatch=SimulationName; FieldName2UsedForMatch=Stage; AllColumns=false
    PredictedObserved PredictedObserved_Daily: PredictedTableName=Report; ObservedTableName=ObservedTimeseriesData; FieldNameUsedForMatch=SimulationName; FieldName2UsedForMatch=Clock.Today; AllColumns=false
  Folder Replacements
    Report IrrigWaterreport: EventNames=[Clock].DoReport
      VariableNames:
        [Clock].Today
        [Irrigation].IrrigationApplied
        [Soil].Water.Volumetric
        [Soil].SoilWater.Eo
        [Soil].SoilWater.Es
        [Soil].SoilWater.Drainage
        [Soil].SoilWater.Runoff
        [Soil].SoilWater.pond
        sum([Soil].Water.MM) as ProfileWater
        ([Soil].Water.MM[1]+[Soil].Water.MM[2]+[Soil].Water.MM[3]+[Soil].Water.MM[4]+[Soil].Water.MM[5]) as ProfWatTop5Layers
    Report RDDReport: EventNames=[Clock].DoReport
      VariableNames:
        [Clock].Today
        [Chickpea].Phenology.EndJuv_PhotoPeriod
        [Chickpea].Phenology.Budding.Target
        [Chickpea].Phenology.FloralInitiation.Target
        [Chickpea].Phenology.Flowering.Target
        [Chickpea].Phenology.AccumulatedTT
        [Chickpea].Phenology.FloweringDAS
        [Chickpea].Phenology.PodStartTT
        [Chickpea].Phenology.EndFloweringPodStartTT
        [Phenology].Stage
        [Phenology].CurrentStageName
    Report HarvestReport: EventNames=[Chickpea].Harvesting
      VariableNames:
        [Clock].Today
        [Chickpea].Phenology.CurrentStageName as Stage
        [Chickpea].Phenology.FloweringDAS as FloweringDAS
        [Chickpea].Phenology.MaturityDAS as MaturityDAS
        [Chickpea].Grain.Live.Wt as GrainWt
        [Chickpea].AboveGround.Wt
        [Chickpea].Grain.Size
        [Chickpea].Phenology.EmergenceDAS as EmergenceDAS
        [Chickpea].SowingData.Cultivar
        [Chickpea].Phenology.RadDegDays
        [Chickpea].Phenology.PoddingDAS as PoddingDAS
        [Chickpea].Grain.HarvestIndex as HI
    Report: EventNames=[Clock].DoReport
      VariableNames:
        [Clock].Today
        [Soil].Water.Volumetric
        [Soil].SoilWater.Eo
        [Soil].SoilWater.Es
        [Soil].SoilWater.Drainage
        [Soil].SoilWater.Runoff
        [Soil].SoilWater.pond
        sum([Soil].Water.MM) as ProfileWater
        [Soil].NO3.kgha
        [Chickpea].Leaf.LAI
        [Chickpea].Leaf.Fn
        [Chickpea].Leaf.Fw
        [Chickpea].Structure.LeafTipsAppeared
        [Chickpea].Structure.PlantTotalNodeNo
        [Chickpea].Leaf.SenescingCohortNo
        [Chickpea].Structure.TotalStemPopn
        [Chickpea].AboveGround.Wt
        [Chickpea].Leaf.Live.Wt
        [Chickpea].Leaf.Live.NConc
        [Chickpea].Leaf.NConc
        [Chickpea].Stem.Live.Wt
        [Chickpea].Leaf.SpecificArea
        [Chickpea].Shell.Live.Wt
        [Chickpea].Grain.Live.Wt
        [Chickpea].Nodule.NFixed
        [Chickpea].Nodule.Live.Wt
        [Chickpea].Arbitrator.DM.NutrientLimitation
        [Chickpea].Arbitrator.DM.SinkLimitation
        [Chickpea].Arbitrator.N.TotalPlantDemand
        [Chickpea].Arbitrator.N.TotalPlantSupply
        [Chickpea].Arbitrator.DM.TotalPlantDemand
        [Chickpea].Arbitrator.DM.TotalFixationSupply
        [Chickpea].Leaf.Live.MetabolicNConc
        [Chickpea].Leaf.Live.StructuralNConc
        [Chickpea].Leaf.Live.StorageNConc
        [Chickpea].Leaf.DeadCohortNo
        [Chickpea].Stem.DMDemand
        [Chickpea].Stem.NConc
        [Chickpea].Leaf.DMSupplyPhotosynthesis
        [Chickpea].SowingData.Cultivar
        [Chickpea].Leaf.Dead.Wt
        [Chickpea].Root.Live.Wt
        [Chickpea].Leaf.Senesced.Wt
        [Chickpea].Phenology.CurrentStageName
        [Chickpea].Phenology.Stage
        [Chickpea].Stem.Live.MetabolicWt
        [Chickpea].Root.KLModifier
        [Chickpea].Structure.BranchingRate
        [Chickpea].Leaf.PlantsenescedLeafNo
        [Chickpea].Leaf.DeadCohortNo
        sum([Soil].Water.MM)-[Soil].Water.MM[1] as ProfWat_less_toplayer
        [Chickpea].Leaf.CoverGreen
        [Soil].SoilWater.PAWmm
        [Soil].Physical.PAWCmm
        [Root].SurfaceWaterAvailability
        [Chickpea].Leaf.Photosynthesis
        [Chickpea].Leaf.Transpiration
        [Chickpea].Phenology.AccumulatedTT
        [Weather].MeanT
        [Chickpea].Structure.PhotoSynthPerBranch
        [Soil].SoilWater.ESW
        ([Soil].Water.MM[1]+[Soil].Water.MM[2]+[Soil].Water.MM[3]+[Soil].Water.MM[4]+[Soil].Water.MM[5]) as ProfWatTop5Layers
        [Chickpea].Leaf.CoverGreen
        [Chickpea].Leaf.CoverTotal
        [Chickpea].Pod.Wt
        [Weather].MinT
        [Weather].MaxT
        ([Chickpea].Shell.Wt+[Chickpea].Grain.Wt) as PodPlusGrain
        [Chickpea].Grain.DMDemand
        [Chickpea].Leaf.DMDemand
        [Chickpea].Stem.DMDemand
        [Chickpea].Root.DMDemand
        [Chickpea].Shell.DMDemand
        [Chickpea].Stem.Dead.Wt
        [Chickpea].Grain.HarvestIndex
        [Chickpea].Grain.DMSupply.Total
        [Chickpea].Leaf.DMSupply.Total
        [Chickpea].Stem.DMSupply.Total
        [Chickpea].Shell.DMSupply.Total
        [Chickpea].Grain.Allocated.Wt
        [Chickpea].Stem.Allocated.Wt
        [Chickpea].Leaf.Allocated.Wt
        [Chickpea].Shell.Allocated.Wt
        [Chickpea].Root.Allocated.Wt
        [Weather].MeanT as MeanTemp
        [Chickpea].Phenology.CurrentStageName as GStage
        [Chickpea].Cultivars.Australian cvv.HatTrick.Name
        [Soil].Water.MM[2]+[Soil].Water.MM[3]+[Soil].Water.MM[4]+[Soil].Water.MM[5] as SoilLayers2to5
        [Chickpea].Stem.Wt
        [Chickpea].Leaf.Wt
        [Chickpea].Phenology.EndBuddingMSLeafNo.PostEventValue
        [Chickpea].Phenology.EndBuddingMSLeafNo
        [Chickpea].Phenology.EndFloweringMSLeafNo.PostEventValue
        [Chickpea].Phenology.PoddingDAS
        [Chickpea].Phenology.EndJuv_PhotoPeriod
        [Chickpea].Phenology.StartPodInitTT
        [Chickpea].Leaf.LeafCohortParameters.MaxArea
        [Chickpea].Structure.EVCover_response
        [Chickpea].Structure.EVWaterStress
        [Chickpea].Structure.EVTempResponse
        [Chickpea].Structure.FICover_response
        [Chickpea].Structure.FIWaterStress
        [Chickpea].Structure.FITempResponse
        [Chickpea].Shell.Senesced.Wt
        [Chickpea].Shell.Dead.Wt
        [Phenology].EndFloweringNodeLeafArea
        [Leaf].LeafCohortParameters.MaxArea
    Report FactorialReport: EventNames=[Chickpea].Harvesting
      VariableNames:
        [Clock].Today
        [Chickpea].Phenology.CurrentStageName as Stage
        [Chickpea].SowingDate.Date as SowingDate
        [Chickpea].SowingDate.DayOfYear as SowingDOY
        [Chickpea].Phenology.BuddingDAS as BuddingDAS
        [Chickpea].Phenology.FloweringDAS as FloweringDAS
        [Chickpea].Phenology.MaturityDAS as MaturityDAS
        [Chickpea].Grain.Live.Wt as GrainWt
        [Chickpea].AboveGround.Wt
        [Chickpea].Structure.BranchNumber
        mean of [Chickpea].Leaf.Fn from [Chickpea].Sowing to [Chickpea].Harvesting as AvNStressIndex
        mean of [Chickpea].Leaf.Fw from [Chickpea].Sowing to [Chickpea].Harvesting as AvWaterStressIndex
        sum of [Irrigation].IrrigationApplied from [Chickpea].Sowing to [Chickpea].Harvesting as SumIrrig
        sum of ([Soil].Water.MM) from [Chickpea].Sowing to [Chickpea].Sowing as SowProfileWater
        [Chickpea].Phenology.PoddingDAS as PoddingDAS
        [Chickpea].Phenology.EmergenceDAS as EmergenceDAS
    Report SowingReport: EventNames=[Chickpea].Sowing
      VariableNames:
        [Clock].Today
        [Chickpea].SowingData.Cultivar
        [IWeather].Latitude
        [IWeather].Longitude
  Folder Validation
    Folder Combined Results
      Memo
        Simulation results for the combined datasets from the various growing regions are shown in the following graphs. The model is able to adequately capture the influence of growing conditions (e.g. soil, climate) and management (e.g. population, irrigation, sowing date).
    Folder 2019_PulseAdaptation
      Memo
        Data from the one year GRDC funded 'Pulse Adaptation' project led by Allan Peake, CSIRO team members included Fernanda Dreccer, Jeremy Whish, Tony Swan.

        Refer to project final report Peake et al (2020):  https://doi.org/10.25919/5f1f2438cd4e4
      Experiment Emerald19_
        Memo
          The experiment investigated chickpea for three times of sowing for nine cultivars at Emerald, Queensland, Australia. The soil was a light textured vertosol.  Emerald Site run by DAFQ, site leader was Doug Sands, assisted by Peter Agius. Definately no irrigation applied after 14th May, all trials were dryland.  Measurements were undertaken for biomass accumulation during the crop, and grain yield at crop maturity.

          May  10 chickpeas emerged about 19/5\
          June  3 chickpeas emerged about 15/6\
          June 27 chickpeas emerged 9-10/7

          Note: soil monitoring was only as deep as 120cm. A small amount of water in the 120-150cm layer may have been available to the crop that might improve simulation of TOS1 which slightly underpredicted biomass and yield of some cultivars.
        Factors
          Permutation
            Factor TOS
              CompositeFactor 1: Specifications=[Sowing].Script.SowDate = 10-May
              CompositeFactor 2: Specifications=[Sowing].Script.SowDate = 03-Jun
              CompositeFactor 3: Specifications=[Sowing].Script.SowDate = 27-Jun
            Factor Cv
              Specification=[Sowing].Script.CultivarName = HatTrick, Monarch, Drummond, Kalkee, Almaz, Seamer, CICA1521, Pistol, Kyabra
        Simulation Emerald19_
          Weather: FileName=Emerald2019Combo.met
          Clock: Start=2019-05-01; End=2019-10-31
          Summary summaryfile
          SoilArbitrator Soil Arbitrator
          Zone Field: Area=1; Slope=0; AspectAngle=0; Altitude=50
            MicroClimate: a_interception=0; b_interception=1; c_interception=0; d_interception=0; SoilHeatFluxFraction=0.4; MinimumHeightDiffForNewLayer=0; NightInterceptionFraction=0.5; ReferenceHeight=2
              Memo
                Albedo should be same as soil, ranging between 0.12 (dark clay) to 0.15 (light sand). Scope for larger values up to 0.19 on particularly light coloured sandy soils

                Height of 2m is for anemometer
            Irrigation
            Fertiliser
            SurfaceOrganicMatter: InitialResidueName=maize; InitialResidueType=maize; InitialResidueMass=500; InitialStandingFraction=0; InitialCPR=0; InitialCNR=65
            Report: EventNames=[Clock].DoReport
              VariableNames:
                [Clock].Today
                [Soil].Water.Volumetric
                [Soil].SoilWater.Eo
                [Soil].SoilWater.Es
                [Soil].SoilWater.Drainage
                [Soil].SoilWater.Runoff
                [Soil].SoilWater.pond
                sum([Soil].Water.MM) as ProfileWater
                [Soil].NO3.kgha
                [MicroClimate].net_radn
                [MicroClimate].peta
                [MicroClimate].petr
                [chickpea].
            Report HarvestReport: EventNames=[Chickpea].Harvesting
              VariableNames:
                [Clock].Today
                [Chickpea].Phenology.CurrentStageName as Stage
                [Chickpea].Phenology.FloweringDAS as FloweringDAS
                [Chickpea].Phenology.MaturityDAS as MaturityDAS
                [Chickpea].Grain.Live.Wt as GrainWt
                [Chickpea].AboveGround.Wt
            Manager Harvesting
```csharp
using Models.PMF.Phen;
using System;
using Models.Core;
using System.Collections.Generic;
using System.Text;
using Models.Soils;
using Models.PMF;
using Models;
using System.Xml.Serialization;
using APSIM.Shared.Utilities;

namespace Models
{
    [Serializable] 
    public class Script : Model
    {      
        [Link] private Plant Chickpea;
        [Link] private Zone zone;
        [Link(Type = LinkType.Path, Path = "[Chickpea].Phenology")]
        private Phenology phenology;
                    
        
        [EventSubscribe("StartOfSimulation")]
        private void OnSimulationCommencing(object sender, EventArgs e)
        {
        }       
        
        [EventSubscribe("DoManagement")]
        private void OnDoManagement(object sender, EventArgs e)
        {
        if (phenology.CurrentPhase.Name=="ReadyForHarvesting")
           {
           Chickpea.Harvest();
           Chickpea.EndCrop();
           }
        }
        
        [EventSubscribe("DoManagementCalculations")]
        private void OnDoManagementCalculations(object sender, EventArgs e)
        {
            
        }
    }
}
```
            Plant Chickpea
            Manager Sowing
              SowDate = 25-Apr
              CultivarName = Amethyst
              SowingDepth = 50
              RowSpacing = 500
              Population = 30
```csharp
using APSIM.Shared.Utilities;
using Models.Utilities;
using Models.Soils;
using Models.PMF;
using Models.Core;
using System;

namespace Models
{
    [Serializable]
    public class Script : Model
    {
        [Link] Clock Clock;
        [Link] Fertiliser Fertiliser;
        [Link] Summary Summary;
        [Link] Plant Canola;
        [Link] Soil Soil;
        Accumulator accumulatedRain;
        
        [Description("Sowing date (d-mmm)")]
        public string SowDate { get; set; }
        [Description("Cultivar to be sown")]
        public string CultivarName { get; set; }
        [Description("Sowing depth (mm)")]
        public double SowingDepth { get; set; }
        [Description("Row spacing (mm)")]
        public double RowSpacing { get; set; }
        [Description("Plant population (/m2)")]
        public double Population { get; set; }
        
        


        [EventSubscribe("DoManagement")]
        private void OnDoManagement(object sender, EventArgs e)
        {
        
            
            if (DateUtilities.WithinDates(SowDate, Clock.Today, SowDate))
            {
                Canola.Sow(population: Population, cultivar: CultivarName, depth: SowingDepth, rowSpacing: RowSpacing);    
            }
        
        }
        
    }
}
```
            Manager Reset on date
              ResetDate = 14-May
              ResetWater = Yes
              ResetSOM = No
```csharp
using Models.Interfaces;
using System;
using Models.Core;
using Models.PMF;
using Models.Soils;
using Models.Utilities;
using Models.Surface;
using APSIM.Shared.Utilities;

namespace Models
{
    [Serializable]
    public class Script : Model
    {
        [Link] private Clock Clock;
        [Link] private Plant Wheat;
        [Link] private ISoilWater SoilWater;
        [Link] private SurfaceOrganicMatter SOM;
        [Link] private Summary Summary;

        [Description("Date to reset on:")]
        public string ResetDate {get;set;}

        [Description("Reset Water? (Yes or No)")]
        public string ResetWater {get;set;}

        [Description("Reset Surface Organic Matter? (Yes or No)")]
        public string ResetSOM {get;set;}

        [EventSubscribe("DoManagement")]
        private void OnDoManagement(object sender, EventArgs e)
        {
            if (DateUtilities.WithinDates(ResetDate, Clock.Today, ResetDate))
            {
                if (ResetWater == "Yes")
                {
                    Summary.WriteMessage(this, "Reset Water", MessageType.Diagnostic);
                    SoilWater.Reset();
                }
                if (ResetSOM == "Yes")
                {
                    Summary.WriteMessage(this, "Reset Surface OM", MessageType.Diagnostic);
                    SOM.Reset();
                }
            }
        }
    }
}
```
            Soil Vertosol_No8: ASCOrder=Vertosol; SoilType=Clay; Site=Generic-Qld; State=Generic; Country=Australia; NaturalVegetation=NA; ApsoilNumber=519-GENERIC; Latitude=-27.183286; Longitude=151.263748; LocationAccuracy=Regional Soil Type; DataSource=Generic soil. CSIRO Sustainable Ecosystems, Toowoomba
              Comments=Generic soil developed by Allan Peake. 'Typical Vertosol' soil properties have been calculated as the average of vertosols with similar characteristics from within the Apsoil database. Groupings were made on the basis of bulk density. Measured BD, DUL and CLL for the groups were then averaged to derive the characteristics of the typical Vertosols. They can then be used in conjunction with measured soil water to simplify the selection of appropriate Vertosols, for paddocks where full soil characterisations have not yet been completed. For more information see Peake et al. 2010: ‘A rapid method for estimating the plant available water capacity of Vertosols’, 2010 Australian Agronomy Conference. Typical Vertosols are different to 'Generic' soil types elsewhere in the Apsoil database, which are representative of certain soil types and districts, but have not been calculated from large numbers of similar, characterised soils.
              Physical
                Thickness  BD    AirDry  LL15   DUL    SAT
                150        1.37  0.109   0.21   0.402  0.452
                150        1.35  0.18    0.224  0.411  0.461
                300        1.35  0.244   0.244  0.409  0.459
                300        1.41  0.244   0.244  0.388  0.438
                300        1.45  0.244   0.244  0.373  0.423
                300        1.5   0.244   0.244  0.354  0.404
                300        1.52  0.244   0.244  0.346  0.396
                SoilCrop ChickpeaSoil: LL=[0.21, 0.224, 0.244, 0.273, 0.312, 0.354, 0.346]; KL=[0.06, 0.06, 0.06, 0.045, 0.045, 0.02, 0.01]; XF=[1, 1, 1, 1, 1, 1, 1]
                  LL source: Field measured and checked for sensibility
              WaterBalance SoilWater: SummerDate=1-oct; SummerU=6; SummerCona=3.5; WinterDate=1-Apr; WinterU=4; WinterCona=2.5; DiffusConst=40; DiffusSlope=16; Salb=0.13; CN2Bare=73; CNRed=20; CNCov=0.8; PSIDul=-100; Thickness=[150, 150, 300, 300, 300, 300, 300]; SWCON=[0.3, 0.3, 0.3, 0.3, 0.3, 0.3, 0.3]
              Nutrient
              Organic: FOMCNRatio=40; CarbonUnits=Total
                Thickness  Carbon  SoilCNRatio  FBiom  FInert  FOM
                150        1.3     12           0.04   0.4     347.129
                150        1.04    12           0.02   0.6     270.344
                300        0.65    12           0.02   0.8     163.972
                300        0.325   12           0.02   1       99.4541
                300        0.195   12           0.01   1       60.322
                300        0.13    12           0.01   1       36.5871
                300        0.13    12           0.01   1       22.1912
              Chemical: Thickness=[150, 150, 300, 300, 300, 300, 300]; PH=[8.4, 8.6, 8.6, 8, 7.1, 6.5, 6.5]; PHUnits=Water
              Water: Thickness=[150, 150, 300, 300, 300, 300, 300]; InitialValues=[0.387, 0.381, 0.382, 0.367, 0.345, 0.315, 0.295]; FilledFromTop=false
              Solute NO3: InitialValuesUnits=ppm; WaterTableConcentration=0; D0=0; DepthConstant=0; MaxDepthSoluteAccessible=0; RunoffEffectivenessAtMovingSolute=0; MaxEffectiveRunoff=0
              Solute NH4: InitialValuesUnits=ppm; WaterTableConcentration=0; D0=0; DepthConstant=0; MaxDepthSoluteAccessible=0; RunoffEffectivenessAtMovingSolute=0; MaxEffectiveRunoff=0
              Solute Urea: Thickness=[150, 150, 300, 300, 300, 300, 300]; InitialValues=[0, 0, 0, 0, 0, 0, 0]; InitialValuesUnits=kg/ha; WaterTableConcentration=0; D0=0; DepthConstant=0; MaxDepthSoluteAccessible=0; RunoffEffectivenessAtMovingSolute=0; MaxEffectiveRunoff=0
              SoilTemperature Temperature
            Report RDDReport: EventNames=[Chickpea].Harvesting
              VariableNames:
                [Clock].Today
                [Chickpea].Phenology.RadDegDays
            Report SowingReport: EventNames=[Chickpea].Sowing
              VariableNames:
                [Clock].Today
                [Chickpea].SowingData.Cultivar
                [IWeather].Latitude
                [IWeather].Longitude
      Experiment Mildura19_
        Memo
          Trial conducted by Michael Moodie (Frontier Farming Systems) on behalf of pulse adaptaton project led by Allan Peake. Soil = red kandosol

          Time of sowing x cultivar trial

          Emergence observed approx 11 days after sowing for lentils, 14 days for Desi chickpea and 16 days Kabuli chickpea. Sowing depth 6cm.

          Trickle tape on the row was used to irrigated each sowing, so the irrigation was not evenly distributed. This concentration of water on the seed zone probably led to different growth patterns in the crop and makes the experiment more difficult to simulate.

          Simulating way too much biomass. Possible or even likely that there are issues with the way APSIM simulates potential ET in an arid environment such as Mildura. Also possible that we need a dynamic CLL - later times of sowing don't extract as much water. Or it may be possible that biomass samples at maturity were collected too late and much of the leaf was on the ground.
        Factors
          Memo
            **Factors at Emerald**

            ***Time of sowing***

            1. 1 May, 2019
            2. 18 May, 2019
            3. 7 June, 2019

            ***Cultivar***

            PBA Jumbo 2
            PBA Blitz
            PBA Ace
            PBA Hallmark XT
            PBA Greenfield
          Permutation
            Factor TOS
              CompositeFactor 1
                Specifications:
                  [Sowing].Script.SowDate = 1-May
                  [Sowing].Script.Population = 35
                  [Irrigate].Script.IrrigateDates = 2-May
              CompositeFactor 2
                Specifications:
                  [Sowing].Script.SowDate = 18-May
                  [Sowing].Script.Population = 27
                  [Irrigate].Script.IrrigateDates = 20-May
              CompositeFactor 3
                Specifications:
                  [Sowing].Script.SowDate = 07-Jun
                  [Sowing].Script.Population = 35
                  [Irrigate].Script.IrrigateDates = 09-Jun
            Factor Cv
              Specification=[Sowing].Script.CultivarName = HatTrick, Genesis90, Monarch, Almaz, Kalkee, Seamer, Striker, Slasher, CICA1521
        Simulation Mildura19
          Weather: FileName=MildurahPO.met
          Clock: Start=2019-04-30; End=2019-11-30
          Summary summaryfile
          SoilArbitrator Soil Arbitrator
          Zone Field: Area=1; Slope=0; AspectAngle=0; Altitude=50
            MicroClimate: a_interception=0; b_interception=1; c_interception=0; d_interception=0; SoilHeatFluxFraction=0.4; MinimumHeightDiffForNewLayer=0; NightInterceptionFraction=0.5; ReferenceHeight=2
            Irrigation
            Fertiliser
            SurfaceOrganicMatter: InitialResidueName=maize; InitialResidueType=maize; InitialResidueMass=500; InitialStandingFraction=0; InitialCPR=0; InitialCNR=65
            Report: EventNames=[Clock].DoReport
              VariableNames:
                [Clock].Today
                [Soil].Water.Volumetric
                [Soil].SoilWater.Eo
                [Soil].SoilWater.Es
                [Soil].SoilWater.Drainage
                [Soil].SoilWater.Runoff
                [Soil].SoilWater.pond
                sum([Soil].Water.MM) as ProfileWater
                [Soil].NO3.kgha
                [MicroClimate].net_radn
                [MicroClimate].peta
                [MicroClimate].petr
            Report HarvestReport: EventNames=[Chickpea].Harvesting
              VariableNames:
                [Clock].Today
                [Chickpea].Phenology.CurrentStageName as Stage
                [Chickpea].Phenology.FloweringDAS as FloweringDAS
                [Chickpea].Phenology.MaturityDAS as MaturityDAS
                [Chickpea].Grain.Live.Wt as GrainWt
                [Chickpea].AboveGround.Wt
                [Chickpea].Structure.BranchNumber
            Manager Harvesting: same as Validation.2019_PulseAdaptation.Emerald19_.Emerald19_.Field.Harvesting
            Manager Sowing
              SowDate = 1-jun
              CultivarName = HatTrick
              SowingDepth = 50
              RowSpacing = 280
              Population = 40
              script: same as in Validation.2019_PulseAdaptation.Emerald19_.Emerald19_.Field.Sowing
            Manager Irrigate
              IrrigateDates = 24-jan
              Amount = 13
              Depth = 0
              Efficiency = 1
              WillRunoff = False
```csharp
using Models.Soils;
using System;
using Models.Core;
using Models.PMF;
using APSIM.Shared.Utilities;
namespace Models
{
    [Serializable]
    public class Script : Model
    {
        [Link] Clock Clock;
        [Link] Irrigation Irrigation;
        
        [Separator("A component to apply irrigation on one or more dates on every year of the simulation")]

        [Description("Enter the irrigation dates as dd-mmm with comma separation (any year information entered will be ignored)")] 
        public string[] IrrigateDates { get; set; }
        
        [Description("Amount of irrigation to be applied (mm)")] 
        public double Amount { get; set; }
        
        [Description("Depth in the soil to apply the  irrigation (mm)")] 
        public double Depth { get; set; }
        
        [Description("Efficiency of irrigation (0-1)")] 
        public double Efficiency { get; set; }
        
        [Description("Will the irrigation runoff?")] 
        public bool WillRunoff { get; set; }
        
        [EventSubscribe("DoManagement")]
        private void OnDoManagement(object sender, EventArgs e)
        {
            foreach (string ddMMM in IrrigateDates)
            {
                if (DateUtilities.DatesEqual(ddMMM, Clock.Today))
                    Irrigation.Apply(amount: Amount, depth: Depth, efficiency: Efficiency, willRunoff: WillRunoff);
            }
        }
    }
}
```
            Soil: ASCOrder=Calcarosol; SoilType=Sandy loam; Site=Kerribee; NearestTown=Paringi; Region=Lower Western; State=New South Wales; Country=Australia; NaturalVegetation=Belah and mallee; ApsoilNumber=359; Latitude=-34.288; Longitude=142.371; LocationAccuracy=+/- 20m
              DataSource=Based on Soil Characterisation undertaken by Whitbread/Davoren GRDC Soil water project and Jeff Baldock MSF data
              Physical
                Thickness  ParticleSizeClay  BD     AirDry  LL15   DUL   SAT
                100        10.6              1.286  0.016   0.06   0.13  0.46
                200        15.2              1.486  0.048   0.06   0.13  0.39
                300        17.7              1.471  0.07    0.1    0.25  0.396
                300        21.9              1.59   0.1     0.168  0.31  0.38
                300        21.2              1.59   0.11    0.19   0.32  0.38
                300        22.1              1.626  0.11    0.19   0.32  0.38
                300        22.1              1.626  0.11    0.19   0.32  0.38
                SoilCrop ChickpeaSoil: LL=[0.06, 0.06, 0.1, 0.168, 0.19, 0.22, 0.25]; KL=[0.03, 0.03, 0.03, 0.025, 0.02, 0.0125, 0.008]; XF=[1, 1, 1, 1, 1, 0, 0]
              WaterBalance SoilWater: SummerDate=1-Oct; SummerU=2; SummerCona=4.5; WinterDate=1-Apr; WinterU=2; WinterCona=4; DiffusConst=140; DiffusSlope=35; Salb=0.15; CN2Bare=70; CNRed=20; CNCov=0.8; PSIDul=-100; Thickness=[100, 100, 200, 200, 200, 200, 200, 300]; SWCON=[0.7, 0.7, 0.5, 0.5, 0.5, 0.3, 0.3, 0.3]
              Nutrient
              Organic: FOMCNRatio=40; CarbonUnits=Total
                Thickness  Carbon    SoilCNRatio  FBiom  FInert    FOM
                100        0.47      13.8         0.04   0.5       301.302
                200        0.325     13.8         0.02   0.7       206.0215
                300        0.246667  13.8         0.02   0.933333  129.015
                300        0.213333  13.8         0.01   1         66.135
                300        0.2       13.8         0.01   1         38.8583
                300        0.2       13.8         0.01   1         18.322
                300        0.2       13.8         0.01   1         18.322
              Chemical: Thickness=[100, 200, 300, 300, 300, 300, 300]; PH=[7.1, 7.95, 8.16667, 8.43333, 8.5, 8.5, 8.5]; PHUnits=Water
              Water: Thickness=[100, 200, 300, 300, 300, 300, 300]; InitialValues=[0.105, 0.149, 0.225, 0.257, 0.255, 0.225, 0.19]; FilledFromTop=false
              Solute NO3: InitialValuesUnits=ppm; WaterTableConcentration=0; D0=0; DepthConstant=0; MaxDepthSoluteAccessible=0; RunoffEffectivenessAtMovingSolute=0; MaxEffectiveRunoff=0
              Solute NH4: InitialValuesUnits=ppm; WaterTableConcentration=0; D0=0; DepthConstant=0; MaxDepthSoluteAccessible=0; RunoffEffectivenessAtMovingSolute=0; MaxEffectiveRunoff=0
              Solute Urea: Thickness=[100, 200, 300, 300, 300, 300, 300]; InitialValues=[0, 0, 0, 0, 0, 0, 0]; InitialValuesUnits=kg/ha; WaterTableConcentration=0; D0=0; DepthConstant=0; MaxDepthSoluteAccessible=0; RunoffEffectivenessAtMovingSolute=0; MaxEffectiveRunoff=0
              SoilTemperature Temperature
            Plant Chickpea
            Report RDDReport: EventNames=[Chickpea].Harvesting
              VariableNames:
                [Clock].Today
                [Chickpea].Phenology.RadDegDays
            Report IrrigWaterreport: EventNames=[Chickpea].Harvesting
              VariableNames:
                [Clock].Today
                [Irrigation].IrrigationApplied
                [Soil].Water.Volumetric
                [Soil].SoilWater.Eo
                [Soil].SoilWater.Es
                [Soil].SoilWater.Drainage
                [Soil].SoilWater.Runoff
                [Soil].SoilWater.pond
                sum([Soil].Water.MM) as ProfileWater
                ([Soil].Water.MM[1]+[Soil].Water.MM[2]+[Soil].Water.MM[3]+[Soil].Water.MM[4]+[Soil].Water.MM[5]) as ProfWatTop5Layers
            Report SowingReport: EventNames=[Chickpea].Sowing
              VariableNames:
                [Clock].Today
                [Chickpea].SowingData.Cultivar
                [IWeather].Latitude
                [IWeather].Longitude
        Memo
          The observed data for early branches at Mildura is the tiller count, in units of number/m2
      Experiment Walgett19_
        Memo
          Experiment conducted by AMPS research on behalf of Pulse Adaptation project. Soil = unusual, area of lighter loamy soil, not a kandosol but not a vertosol. Perhaps an extremely light textured vertosol. Retains water very well and yields well in a dry season, stores water deeper than a typical vertosol and loses less to evaporation as a result. Lower yield potential in a good season.

          Time of sowing x cultivar experiment. Second TOS was lost for chickpea, seed uprooted overnight by wild pigs.

          **Plant population** - initial population averaged at 23 plants/m2; used 30 plants/m2 for the high population treatments.

          **Met file for Walgett** - trial site located at -30.538537,148.614925 near Come By Chance. Several options in SILO:

          * Bungle Gully, Come by Chance is approx 5 km from site
          * Come by Chance store is approx 20 km from site
          * Grid -30.55,148.60 is approx 2 km from site  --> this met file was selected as is the closest. Combined with TTag data from site

          A difficult site to simulate. Felt that the 1st 2 biomass cuts may have been taken on 1/2 the stated area (which would explain why obs=2xpredicted). However trial cooperator is adamant that cut areas were correct, and says he felt the crop growth pattern was unusual, with extremely rapid growth after emergence. Possibly could have been a residual herbicide effect stimulating unusual plant hormone responses. Also potential for nutrient deficiency as we still ended up over-simulating yield from TOS1 by a factor of 1.5 to 2, whereas TOS 2 was simulated accurately for yield when biomass was lower (i.e. less likely to experience nutrient deficiency). Field possibly short on K (but soil was unfortunately not tested for K).
        Factors
          Memo
            **Factors at Walgett for lentils**

            ***Time of sowing***

            1. 21 May, 2019
            2. 9 June, 2019
            3. 28 June, 2019

            Starting soil water measured on 19 May before first sowing so same reset to 19 May was simulated for all TOS.

            ***Cultivar***

            Almaz
            Boundary
            Genesis90
            HatTrick
            Kalkee
            Kyabra
            Monarch
            Seamer

            **Plant population**

            Planting density was unknown; initially set to:

            * 40 plants/m2 for 'usual' plantings, and
            * 55 plants/m2 for high density plantings

            High plant populations in field were only sown for HatTrick and Monarch. All cultivars were simulated at the two plant densities in the factorial but results are graphed only for the cultivars that have field data.
          Permutation
            Factor TOS
              CompositeFactor 1: Specifications=[Sowing].Script.SowDate = 21-May
              CompositeFactor 3: Specifications=[Sowing].Script.SowDate = 28-Jun
            Factor Cv
              Specification=[Sowing].Script.CultivarName = Almaz,Boundary,Genesis90,HatTrick,Kalkee,Kyabra,Monarch,Seamer,QuickKabuli
            Factor Pop
              CompositeFactor 23: Specifications=[Sowing].Script.Population = 23
              CompositeFactor 30: Specifications=[Sowing].Script.Population = 30
        Simulation Walgett19
          Weather: FileName=WalgettTTagCombo2019.met
          Clock: Start=2019-05-07; End=2019-11-30
          Summary summaryfile
          SoilArbitrator Soil Arbitrator
          Zone Field: Area=1; Slope=0; AspectAngle=0; Altitude=50
            MicroClimate: a_interception=0; b_interception=1; c_interception=0; d_interception=0; SoilHeatFluxFraction=0.4; MinimumHeightDiffForNewLayer=0; NightInterceptionFraction=0.5; ReferenceHeight=2
            Irrigation
            Fertiliser
            SurfaceOrganicMatter: InitialResidueName=wheat; InitialResidueType=wheat; InitialResidueMass=1500; InitialStandingFraction=0; InitialCPR=0; InitialCNR=80
            Report: EventNames=[Clock].DoReport
              VariableNames:
                [Clock].Today
                [Soil].Water.Volumetric
                [Soil].SoilWater.Eo
                [Soil].SoilWater.Es
                [Soil].SoilWater.Drainage
                [Soil].SoilWater.Runoff
                [Soil].SoilWater.pond
                sum([Soil].Water.MM) as ProfileWater
                [Soil].NO3.kgha
                [MicroClimate].net_radn
                [MicroClimate].peta
                [MicroClimate].petr
                [Chickpea].
            Report HarvestReport: same as Validation.2019_PulseAdaptation.Mildura19_.Mildura19.Field.HarvestReport
            Manager Harvesting: same as Validation.2019_PulseAdaptation.Emerald19_.Emerald19_.Field.Harvesting
            Plant Chickpea
            Manager Sowing
              SowDate = 25-Apr
              CultivarName = Amethyst
              SowingDepth = 50
              RowSpacing = 375
              Population = 23
              script: same as in Validation.2019_PulseAdaptation.Emerald19_.Emerald19_.Field.Sowing
            Manager Reset on date
              ResetDate = 19-May
              ResetWater = Yes
              ResetSOM = No
              script: same as in Validation.2019_PulseAdaptation.Emerald19_.Emerald19_.Field.Reset on date
            Report RDDReport: EventNames=[Chickpea].Harvesting
              VariableNames:
                [Clock].Today
                [Chickpea].Phenology.RadDegDays
            Soil Comeby: ASCOrder=Vertosol; SoilType=Clay; Site=Generic-Qld; State=Generic; Country=Australia; NaturalVegetation=NA; ApsoilNumber=523-GENERIC; Latitude=-27.183286; Longitude=151.263748; LocationAccuracy=Regional Soil Type; DataSource=Generic soil. CSIRO Sustainable Ecosystems, Toowoomba
              Comments=Generic soil developed by Allan Peake. 'Typical Vertosol' soil properties have been calculated as the average of vertosols with similar characteristics from within the Apsoil database. Groupings were made on the basis of bulk density. Measured BD, DUL and CLL for the groups were then averaged to derive the characteristics of the typical Vertosols. They can then be used in conjunction with measured soil water to simplify the selection of appropriate Vertosols, for paddocks where full soil characterisations have not yet been completed. For more information see Peake et al. 2010: ‘A rapid method for estimating the plant available water capacity of Vertosols’, 2010 Australian Agronomy Conference. Typical Vertosols are different to 'Generic' soil types elsewhere in the Apsoil database, which are representative of certain soil types and districts, but have not been calculated from large numbers of similar, characterised soils.
              Memo
                This soil is AP's TypVert 11 "Vertosol No11 (PAWC-136 No523-Generic)".
              Physical
                Thickness  BD    AirDry  LL15   DUL    SAT
                150        1.59  0.089   0.16   0.32   0.37
                150        1.62  0.14    0.17   0.308  0.358
                300        1.59  0.16    0.189  0.321  0.371
                300        1.58  0.19    0.195  0.322  0.372
                300        1.61  0.19    0.206  0.312  0.362
                300        1.64  0.19    0.215  0.301  0.351
                300        1.7   0.19    0.23   0.28   0.329
                SoilCrop ChickpeaSoil: LL=[0.16, 0.17, 0.189, 0.195, 0.206, 0.215, 0.23]; KL=[0.045, 0.045, 0.045, 0.033, 0.025, 0.02, 0.01]; XF=[1, 1, 1, 1, 1, 1, 1]
                  LL source: Field measured and checked for sensibility
                SoilCrop LentilSoil
                  LL=[0.119912, 0.195459, 0.192306, 0.194867, 0.201156, 0.25, 0.28]
                  KL=[0.033, 0.033, 0.033, 0.022, 0.018, 0.015, 0.075]
                  XF=[1, 1, 1, 1, 1, 1, 1]
                  LL source: Field measured and checked for sensibility
                SoilCrop WheatSoil: LL=[0.177, 0.175, 0.19, 0.22, 0.251, 0.278, 0.28]; KL=[0.06, 0.06, 0.06, 0.04, 0.04, 0.02, 0.02]; XF=[1, 1, 1, 1, 1, 1, 1]
                  LL source: Field measured and checked for sensibility
              WaterBalance SoilWater: SummerDate=1-Nov; SummerU=6; SummerCona=3.5; WinterDate=1-Apr; WinterU=4; WinterCona=2.5; DiffusConst=88; DiffusSlope=35; Salb=0.14; CN2Bare=73; CNRed=20; CNCov=0.8; PSIDul=-100; Thickness=[150, 150, 300, 300, 300, 300, 300]; SWCON=[0.3, 0.3, 0.3, 0.3, 0.3, 0.3, 0.3]
              Nutrient
              Organic: FOMCNRatio=40; CarbonUnits=Total
                Thickness  Carbon  SoilCNRatio  FBiom  FInert  FOM
                150        1.17    12           0.04   0.4     347.129
                150        0.936   12           0.02   0.6     270.344
                300        0.585   12           0.02   0.8     163.972
                300        0.2925  12           0.02   1       99.4541
                300        0.1755  12           0.01   1       60.322
                300        0.117   12           0.01   1       36.5871
                300        0.117   12           0.01   1       22.1912
              Chemical: Thickness=[150, 150, 300, 300, 300, 300, 300]; PH=[8.1, 8.7, 8.9, 8, 7, 6.4, 5.8]; PHUnits=Water
              Water: Thickness=[150, 150, 300, 300, 300, 300, 300]; FilledFromTop=false
                InitialValues=[0.19875, 0.281556, 0.304008, 0.303202, 0.296562, 0.297, 0.297]
              Solute NO3: InitialValuesUnits=ppm; WaterTableConcentration=0; D0=0; DepthConstant=0; MaxDepthSoluteAccessible=0; RunoffEffectivenessAtMovingSolute=0; MaxEffectiveRunoff=0
              Solute NH4: InitialValuesUnits=ppm; WaterTableConcentration=0; D0=0; DepthConstant=0; MaxDepthSoluteAccessible=0; RunoffEffectivenessAtMovingSolute=0; MaxEffectiveRunoff=0
              Solute Urea: same as Validation.2019_PulseAdaptation.Emerald19_.Emerald19_.Field.Vertosol_No8.Urea
              SoilTemperature Temperature
            Report SowingReport: EventNames=[Chickpea].Sowing
              VariableNames:
                [Clock].Today
                [Chickpea].SowingData.Cultivar
                [IWeather].Latitude
                [IWeather].Longitude
        Folder ProfileWater_Genesis90Only
          Memo
            Soil water measured only in HatTrick for Desi and Genesis90 for Kabuli Chickpeas.
        Folder ProfileWater_HatTrickOnly
          Memo
            Soil water measured only in HatTrick for Desi and Genesis90 for Kabuli Chickpeas.
      Experiment Greenethorpe_2019_
        Memo
          Greenthorpe main trial 2019, Pulse Adaptation project. Irrigated and rainfed treatments, 2-3 cultivars per species (Desi/Kabuli/Lentils). Split plot design. Soil = red-brown earth.

          Irrigation system was a little uneven but was the best we could do with little preparation time (individual sprinklers along a long hand-shift hose line), but plant cuts were taken from mostly uniform areas.

          Planting density information by TOS was available. It differed broadly by TOS and so average density for TOS used for all cvv.

          Initial SW across site is quite variable - questioned whether appropriate to model as factorial. Variability probably due to micro-environment variations at specific location for soil cores, so factorial design was retained. Would have been substantial variation in soil type up and down the steep slope. NMM calibration was from Farming systems site 5-6km away so not sure how trustworthy that data is.

          **Met file** - based on SILO but used local TTag at trial for max/minT, because trial is at a different point in the landscape (north slope) to the SILO station (east slope)
        Factors
          Memo
            **Factors at Greenethorpe**

            ***Time of sowing***

            1. 30 April, 2019
            2. 21 May, 2019
            3. 12 June, 2019

            Initial SW at TOS based on 15/4 measurement for all TOS; measurement of SW for irrig and dryland treatments averaged for TOS since first irrigation not applied until after this measurement.

            ***Cultivar***

            **Desi:**
            HatTrick
            Striker
            Slasher

            *Not at site:*
            Kyabra
            Drummond
            Seamer
            Boundary
            Pistol

            *Kabuli:*
            Monarch
            Genesis90

            *Not at site:*
            Kalkee
            Almaz
          Permutation
            Factor TOS
              CompositeFactor 1: Specifications=[Sowing].Script.SowDate = 30-Apr
              CompositeFactor 2: Specifications=[Sowing].Script.SowDate = 21-May
              CompositeFactor 3: Specifications=[Sowing].Script.SowDate = 12-Jun
            Factor Cv
              Specification=[Sowing].Script.CultivarName = Genesis90, HatTrick, Monarch, Slasher, Striker,QuickKabuli
            Factor Irr
              CompositeFactor 0
                Specifications:
                  [IrrigateFixedDates].Script.Amount = 0.0
                  [IrrigateOnSow_TOS2only].Script.Amount = 0.0
              CompositeFactor 1
                Specifications:
                  [IrrigateFixedDates].Script.Amount = 10.0
                  [IrrigateOnSow_TOS2only].Script.Amount = 15.0
        Simulation Greenethorpe_2019_
          Weather: FileName=GreenethorpeTTagTemp.met
          Clock: Start=2019-04-10; End=2019-12-30
          Summary summaryfile
          SoilArbitrator Soil Arbitrator
          Zone Field: Area=1; Slope=0; AspectAngle=0; Altitude=50
            MicroClimate: a_interception=0; b_interception=1; c_interception=0; d_interception=0; SoilHeatFluxFraction=0.4; MinimumHeightDiffForNewLayer=0; NightInterceptionFraction=0.5; ReferenceHeight=2
            Irrigation
            Fertiliser
            SurfaceOrganicMatter: InitialResidueName=maize; InitialResidueType=maize; InitialResidueMass=500; InitialStandingFraction=0; InitialCPR=0; InitialCNR=65
            Report: same as Validation.2019_PulseAdaptation.Walgett19_.Walgett19.Field.Report
            Report HarvestReport: EventNames=[Chickpea].Harvesting
              VariableNames:
                [Clock].Today
                [Chickpea].Phenology.CurrentStageName as Stage
                [Chickpea].Phenology.FloweringDAS as FloweringDAS
                [Chickpea].Phenology.MaturityDAS as MaturityDAS
                [Chickpea].Grain.Live.Wt as GrainWt
                [Chickpea].AboveGround.Wt
            Manager Harvesting: same as Validation.2019_PulseAdaptation.Emerald19_.Emerald19_.Field.Harvesting
            Plant Chickpea
            Manager Sowing
              SowDate = 30-Apr
              CultivarName = Amethyst
              SowingDepth = 50
              RowSpacing = 230
              Population = 46
              script: same as in Validation.2019_PulseAdaptation.Emerald19_.Emerald19_.Field.Sowing
            Manager Reset on date
              ResetDate = 15-apr
              ResetWater = Yes
              ResetSOM = No
              script: same as in Validation.2019_PulseAdaptation.Emerald19_.Emerald19_.Field.Reset on date
            Manager Fertilise at sowing
              Crop = [Chickpea]
              FertiliserType = UreaN
              Amount = 4
```csharp
using Models.Soils;
using System;
using Models.Core;
using Models.PMF;
namespace Models
{
    [Serializable]
    public class Script : Model
    {
        [Link] Clock Clock;
        [Link] Fertiliser Fertiliser;
        
        [Description("Crop to be fertilised")]
        public IPlant Crop { get; set; }

        [Description("Type of fertiliser to apply? ")] [Display(Type = DisplayType.FertiliserType)]public string FertiliserType { get; set; }

    
        [Description("Amount of fertiliser to be applied (kg/ha)")]
        public double Amount { get; set; }
        
        [EventSubscribe("Sowing")]
        private void OnSowing(object sender, EventArgs e)
        {
            Model crop = sender as Model;
            if (Crop != null && crop.Name.ToLower() == (Crop as IModel).Name.ToLower())
                Fertiliser.Apply(amount: Amount, type: FertiliserType);
        }
        
    }
}
```
            Manager IrrigateOnSow_TOS2only
              IrrigateDates = 21-may
              Amount = 15
              Depth = 0
              Efficiency = 0.8
              WillRunoff = False
              script: same as in Validation.2019_PulseAdaptation.Mildura19_.Mildura19.Field.Irrigate
            Manager IrrigateFixedDates
              IrrigateDates = 13-aug, 14-aug, 15-aug, 26-aug, 31-aug, 03-sep, 25-sep, 30-sep, 1-oct
              Amount = 10
              Depth = 0
              Efficiency = 0.8
              WillRunoff = True
              script: same as in Validation.2019_PulseAdaptation.Mildura19_.Mildura19.Field.Irrigate
            Soil: SoilType=SNSW; Site=Front paddock; NearestTown=Young; Region=Southern NSW; State=NSW; Country=Australia; Latitude=0; Longitude=0; DataSource=Kirkegaard/Lilley
              Memo
                The soil for Greenethorpe was developed by Julianne Lilley:

                "Hi Elizabeth,

                Laura and I did a bit of playing around with this soil as I initially adapted something from a Young soil that I had characterised. The simulation I took it from was called Y:\WORK\OCP modelling\Greenethorpe_Iandra\greenethorpe_2013 and was saved on 16 jan 2019 , so this may be the last file we used. Jeremy has also been simulating at the Iandra site, so he may be worth asking, but I know he is not back at work yet.  Anyway this soil will be a good place to start.

                Cheers
                Julianne"

                **Chickpea soil properties** set same as for lentil.
              Physical
                Thickness  BD    AirDry  LL15   DUL    SAT
                100        1.5   0.08    0.08   0.25   0.28
                100        1.53  0.08    0.102  0.211  0.241
                200        1.56  0.1     0.156  0.232  0.262
                200        1.54  0.1     0.213  0.287  0.317
                200        1.54  0.15    0.241  0.311  0.341
                200        1.6   0.15    0.253  0.35   0.369
                200        1.62  0.15    0.258  0.35   0.369
                200        1.71  0.15    0.256  0.35   0.355
                200        1.69  0.15    0.268  0.35   0.357
                200        1.77  0.15    0.268  0.33   0.332
                200        1.7   0.15    0.268  0.335  0.344
                SoilCrop LentilSoil
                  LL=[0.102, 0.102, 0.156, 0.213, 0.241, 0.253, 0.258, 0.256, 0.268, 0.268, 0.268]
                  KL=[0.045, 0.045, 0.045, 0.045, 0.03, 0.02, 0.02, 0.02, 0.02, 0.01, 0.01]
                  XF=[1, 1, 1, 1, 1, 1, 0, 0, 0, 0, 0]
                  LL source: Field measured and checked for sensibility
                SoilCrop ChickpeaSoil
                  LL=[0.102, 0.102, 0.156, 0.213, 0.241, 0.253, 0.258, 0.256, 0.268, 0.268, 0.268]
                  KL=[0.06, 0.06, 0.04, 0.025, 0.008, 0.005, 0, 0, 0, 0, 0]
                  XF=[1, 1, 1, 1, 0.3, 0.1, 0, 0, 0, 0, 0]
                  LL source: Field measured and checked for sensibility
              WaterBalance SoilWater: SummerDate=1-Nov; SummerU=4; SummerCona=2.5; WinterDate=1-Apr; WinterU=2; WinterCona=2; DiffusConst=88; DiffusSlope=35; Salb=0.13; CN2Bare=73; CNRed=20; CNCov=0.8; PSIDul=-100; Thickness=[100, 100, 200, 200, 200, 200, 200, 200, 200, 200, 200]; SWCON=[0.3, 0.3, 0.3, 0.3, 0.3, 0.3, 0.3, 0.3, 0.3, 0.3, 0.3]
              Nutrient
              Organic: FOMCNRatio=40; CarbonUnits=Total
                Thickness  Carbon  SoilCNRatio  FBiom  FInert  FOM
                100        1       12           0.06   0.01    347.129
                100        0.35    12           0.05   0.01    270.344
                200        0.22    12           0.035  0.35    163.972
                200        0.22    12           0.015  0.425   99.4541
                200        0.18    12           0.01   0.55    60.322
                200        0.135   12           0.01   0.75    36.5871
                200        0.105   12           0.01   0.95    22.1912
                200        0.1     12           0.01   0.99    22.191
                200        0.1     12           0.01   0.99    22.191
                200        0.07    12           0.01   0.99    22.191
                200        0.045   12           0.01   0.99    22.191
              Chemical: Thickness=[100, 100, 200, 200, 200, 200, 200, 200, 200, 200, 200]; PH=[5.8, 5.9, 6.7, 7.05, 7.25, 7.4, 7.7, 8.1, 8.35, 8.45, 8.5]; PHUnits=Water
              Water: Thickness=[100, 100, 200, 200, 200, 200, 200, 200, 200, 200, 200]; FilledFromTop=false
                InitialValues=[0.218604, 0.218604, 0.262, 0.297604, 0.28928167, 0.265772, 0.253469, 0.256987, 0.24218885, 0.246785, 0.247]
              Solute NO3: InitialValuesUnits=ppm; WaterTableConcentration=0; D0=0; DepthConstant=0; MaxDepthSoluteAccessible=0; RunoffEffectivenessAtMovingSolute=0; MaxEffectiveRunoff=0
              Solute NH4: InitialValuesUnits=ppm; WaterTableConcentration=0; D0=0; DepthConstant=0; MaxDepthSoluteAccessible=0; RunoffEffectivenessAtMovingSolute=0; MaxEffectiveRunoff=0
              Solute Urea: Thickness=[100, 100, 200, 200, 200, 200, 200, 200, 200, 200, 200]; InitialValues=[0, 0, 0, 0, 0, 0, 0, 0, 0, 0, 0]; InitialValuesUnits=kg/ha; WaterTableConcentration=0; D0=0; DepthConstant=0; MaxDepthSoluteAccessible=0; RunoffEffectivenessAtMovingSolute=0; MaxEffectiveRunoff=0
              SoilTemperature Temperature
            Report RDDReport: EventNames=[Chickpea].Harvesting
              VariableNames:
                [Clock].Today
                [Chickpea].Phenology.RadDegDays
            Report SowingReport: EventNames=[Chickpea].Sowing
              VariableNames:
                [Clock].Today
                [Chickpea].SowingData.Cultivar
                [IWeather].Latitude
                [IWeather].Longitude
      Experiment GreenethorpePhen19_
        Memo
          Greenethorpe phenology trial: sown as small 2m single row observation plots. Conducted at site 5-6km north of Iandra Castle farming systems site.

          Trial was sown by hand, so sowing depth was variable and not recorded, establishment date also variable for the same reason. The important data for this trial is the rate of leaf appearance rather than the actual leaf number which is only simulated correctly where observed emergence date matches the simulation.

          Some herbicide damage was observed on early sown plots and may have affected some data.

          Experiment was situated at the bottom NW corner of the main trial, so temperature would not have been the same as the bulk of plots in the main trial (due to substantial slope). Experiment was on a north facing slope.

          * all treatments are irrigated - "JW: For greenethorpe simulate unlimited. We tried to keep it unlimited but there would have been some stress no measure of water just applied when ever we were out there."
          * this experiment used different sowing dates to the other Greenethorpe trial so is simulated separately
          * there are only 2 sowing dates
          * only treatments without lights used (there were some artificially lit experiments at Gatton)
          * phenology measurements are recorded only up until the time of flowering
        Factors
          Memo
            **Factors at Greenethorpe phenology trial**

            ***Time of sowing - only two done for the phelology trial***

            1. 18 April, 2019
            2. 21 May, 2019

            ***Cultivar***

            **Desi:**
            Boundary
            Drummond
            HatTrick
            Kalkee  (in data as Genesis_Kalkee)
            Kyabra
            Slasher
            Striker

            *Not at site:*

            Seamer
            Pistol

            *Kabuli:*

            Genesis90
            Monarch

            *Not at site:*

            Almaz
          Permutation
            Factor TOS
              CompositeFactor 1: Specifications=[Sowing].Script.SowDate = 18-Apr
              CompositeFactor 2: Specifications=[Sowing].Script.SowDate = 21-May
            Factor Cv
              Specification=[Sowing].Script.CultivarName = Boundary, Drummond, Genesis90, HatTrick, Kalkee, Kyabra, Monarch, Slasher, Striker,QuickKabuli
        Simulation GreenethorpePhen19
          Weather: FileName=GreenethorpeTTagTemp.met
          Clock: Start=2019-04-04; End=2019-12-30
          Summary summaryfile
          SoilArbitrator Soil Arbitrator
          Zone Field: Area=1; Slope=0; AspectAngle=0; Altitude=50
            MicroClimate: a_interception=0; b_interception=1; c_interception=0; d_interception=0; SoilHeatFluxFraction=0.4; MinimumHeightDiffForNewLayer=0; NightInterceptionFraction=0.5; ReferenceHeight=2
            Irrigation
            Fertiliser
            SurfaceOrganicMatter: InitialResidueName=maize; InitialResidueType=maize; InitialResidueMass=500; InitialStandingFraction=0; InitialCPR=0; InitialCNR=65
            Report: EventNames=[Clock].DoReport
              VariableNames:
                [Clock].Today
                [Soil].Water.Volumetric
                [Soil].SoilWater.Eo
                [Soil].SoilWater.Es
                [Soil].SoilWater.Drainage
                [Soil].SoilWater.Runoff
                [Soil].SoilWater.pond
                sum([Soil].Water.MM) as ProfileWater
                [Soil].NO3.kgha
                [MicroClimate].net_radn
                [MicroClimate].peta
                [MicroClimate].petr
                [Lentil].
            Report HarvestReport: EventNames=[Chickpea].Harvesting
              VariableNames:
                [Clock].Today
                [Lentil].Phenology.CurrentStageName as Stage
                [Lentil].Phenology.FloweringDAS as FloweringDAS
                [Lentil].Phenology.MaturityDAS as MaturityDAS
                [Lentil].Grain.Live.Wt as GrainWt
                [Lentil].AboveGround.Wt
            Manager Harvesting: same as Validation.2019_PulseAdaptation.Emerald19_.Emerald19_.Field.Harvesting
            Plant Chickpea
            Manager Sowing
              SowDate = 30-Apr
              CultivarName = Amethyst
              SowingDepth = 50
              RowSpacing = 230
              Population = 35
              script: same as in Validation.2019_PulseAdaptation.Emerald19_.Emerald19_.Field.Sowing
            Manager Automatic irrigation based on water deficit
              Crop = [Chickpea]
              AutoIrrigationOn = True
              FASWThreshold = 0.9
              FASWDepth = 600
              weeks = 1
              afterSowing = 1
```csharp
using APSIM.Numerics;
using APSIM.Shared.Utilities;
using System.Xml.Serialization;
using Models;
using Models.PMF;
using Models.Soils;
using System.Text;
using System.Collections.Generic;
using Models.Core;
using System;
using Models.Interfaces;

namespace Models
{
    [Serializable] 
    public class Script : Model
    {
        [Link] private Zone zone;
        [Link] private Irrigation irrigation;
        [Link] private Soil soil;
        [Link]
        private IPhysical soilPhysical;
        [Link]
        private ISoilWater waterBalance;
        public double FASW { get; set; }
        public double WaterDeficit  { get; set; }
    

        [Description("Crop to irrigate")]
        public IPlant Crop { get; set; }
        
        [Description("Auto irrigation on?")]
        public bool AutoIrrigationOn { get; set; }

        [Description("Threshold fraction available water (0-1)")]
        public double FASWThreshold { get; set; }

        [Description("Soil depth (mm) to which fraction available water is calculated")]
        public double FASWDepth { get; set; }

        [Description("Minimum weeks between irrigations")]
        public double weeks { get; set; }

        [Description("Minimum days after sowing for first irrigation")]
        public int afterSowing { get; set; }

        private double irrigationGap = 0;    // gap between irrigations

        [EventSubscribe("DoManagement")]
        private void OnDoManagement(object sender, EventArgs e)
        {
            if (AutoIrrigationOn && Crop.IsAlive)
            {
                   irrigationGap += 1;                // increment gap between irrigations
                CalculateFASW();                // calc FASW and WaterDeficit
                if ((FASW < FASWThreshold) && (irrigationGap >= weeks * 7))
                {
                    irrigation.Apply(WaterDeficit, depth: 0);
                    irrigationGap = 0;            // reset
                }
            }
            else
            {
                irrigationGap = weeks * 7 - afterSowing - 1;    // allow irrigation a number of days after it becomes alive/sown
            }
        }

        // Calculate the fraction of the potential available sw
        // Calculate the deficit amount from DUL
        private void CalculateFASW()
        {
            double[] LL15 = MathUtilities.Multiply(soilPhysical.LL15, soilPhysical.Thickness);
            double[] DUL = MathUtilities.Multiply(soilPhysical.DUL, soilPhysical.Thickness);
        
            int nlayr = GetLayerIndex(FASWDepth);
            double cumdep = MathUtilities.Sum(soilPhysical.Thickness, 0, nlayr, 0.0);    // tricky function that sums up to before nlayr

            double part_layer = MathUtilities.Divide((FASWDepth - cumdep), soilPhysical.Thickness[nlayr], 0.0);

            // note that results may be strange if swdep < ll15
            double avail_sw = (MathUtilities.Sum(waterBalance.SWmm, 0, nlayr, 0.0) + part_layer * waterBalance.SWmm[nlayr])
                            - (MathUtilities.Sum(LL15, 0, nlayr, 0.0) + part_layer * LL15[nlayr]);

            double pot_avail_sw = (MathUtilities.Sum(DUL, 0, nlayr, 0.0) + part_layer * DUL[nlayr])
                                - (MathUtilities.Sum(LL15, 0, nlayr, 0.0) + part_layer * LL15[nlayr]);
            
            FASW = MathUtilities.Divide(avail_sw, pot_avail_sw, 0.0);
            WaterDeficit = MathUtilities.Constrain(pot_avail_sw - avail_sw, 0.0, 100000);
        }

        // Get index of the layer that has this depth in it 
        private int GetLayerIndex(double pointDepth)
        {
            double[] cumThickness = soilPhysical.ThicknessCumulative;
            int layerIdx = 0;
            while ((layerIdx < cumThickness.Length) && (pointDepth > cumThickness[layerIdx]))
            {
                layerIdx += 1;
            }

            return layerIdx;
        }
    }
}
```
            Soil: SoilType=SNSW; Site=Front paddock; NearestTown=Young; Region=Southern NSW; State=NSW; Country=Australia; Latitude=0; Longitude=0; DataSource=Kirkegaard/Lilley
              Memo
                The soil for Greenethorpe was developed by Julianne Lilley:

                "Hi Elizabeth,

                Laura and I did a bit of playing around with this soil as I initially adapted something from a Young soil that I had characterised. The simulation I took it from was called Y:\WORK\OCP modelling\Greenethorpe_Iandra\greenethorpe_2013 and was saved on 16 jan 2019 , so this may be the last file we used. Jeremy has also been simulating at the Iandra site, so he may be worth asking, but I know he is not back at work yet.  Anyway this soil will be a good place to start.

                Cheers
                Julianne"

                **NOTE** chickpea kl values set same as lentil for starters.
              Physical
                Thickness  BD    AirDry  LL15   DUL    SAT
                100        1.5   0.08    0.08   0.25   0.28
                100        1.53  0.08    0.102  0.211  0.241
                200        1.56  0.1     0.156  0.232  0.262
                200        1.54  0.1     0.213  0.287  0.317
                200        1.54  0.15    0.241  0.311  0.341
                200        1.6   0.15    0.253  0.35   0.369
                200        1.62  0.15    0.258  0.35   0.369
                200        1.68  0.15    0.256  0.35   0.355
                200        1.69  0.15    0.268  0.35   0.357
                200        1.74  0.15    0.268  0.335  0.337
                200        1.7   0.15    0.268  0.335  0.344
                SoilCrop LentilSoil: same as Validation.2019_PulseAdaptation.Greenethorpe_2019_.Greenethorpe_2019_.Field.soil.Physical.LentilSoil
                SoilCrop ChickpeaSoil: same as Validation.2019_PulseAdaptation.Greenethorpe_2019_.Greenethorpe_2019_.Field.soil.Physical.LentilSoil
              WaterBalance SoilWater: SummerDate=1-Nov; SummerU=6; SummerCona=3.5; WinterDate=1-Apr; WinterU=4; WinterCona=2.5; DiffusConst=40; DiffusSlope=16; Salb=0.13; CN2Bare=73; CNRed=20; CNCov=0.8; PSIDul=-100; Thickness=[100, 100, 200, 200, 200, 200, 200, 200, 200, 200, 200]; SWCON=[0.3, 0.3, 0.3, 0.3, 0.3, 0.3, 0.3, 0.3, 0.3, 0.3, 0.3]
              Nutrient
              Organic: same as Validation.2019_PulseAdaptation.Greenethorpe_2019_.Greenethorpe_2019_.Field.soil.Organic
              Chemical: Thickness=[100, 100, 200, 200, 200, 200, 200, 200, 200, 200, 200]; PH=[5.8, 5.9, 6.7, 7.05, 7.25, 7.4, 7.7, 8.1, 8.35, 8.45, 8.5]; PHUnits=Water
              Water: Thickness=[100, 100, 200, 200, 200, 200, 200, 200, 200, 200, 200]; FilledFromTop=false
                InitialValues=[0.25, 0.211, 0.232, 0.287, 0.311, 0.35, 0.35, 0.35, 0.35, 0.335, 0.335]
              Solute NO3: InitialValuesUnits=ppm; WaterTableConcentration=0; D0=0; DepthConstant=0; MaxDepthSoluteAccessible=0; RunoffEffectivenessAtMovingSolute=0; MaxEffectiveRunoff=0
              Solute NH4: InitialValuesUnits=ppm; WaterTableConcentration=0; D0=0; DepthConstant=0; MaxDepthSoluteAccessible=0; RunoffEffectivenessAtMovingSolute=0; MaxEffectiveRunoff=0
              Solute Urea: same as Validation.2019_PulseAdaptation.Greenethorpe_2019_.Greenethorpe_2019_.Field.soil.Urea
              SoilTemperature Temperature
            Report RDDReport: EventNames=[Clock].DoReport
              VariableNames:
                [Clock].Today
                [Chickpea].Phenology.RadDegDays
                [Chickpea].Phenology.EarlyPodSoilT
                [Chickpea].Phenology.EndFlower_PhotoPeriod
                [Chickpea].Phenology.FloweringDAS
                [Chickpea].Phenology.StartFlower_PhotoPeriod
                [Phenology].Stage
            Report SowingReport: EventNames=[Chickpea].Sowing
              VariableNames:
                [Clock].Today
                [Chickpea].SowingData.Cultivar
                [IWeather].Latitude
                [IWeather].Longitude
      Experiment GT_HatTrick_WU_2019_
        Memo
          Greenthorpe main trial 2019, Pulse Adaptation project. Irrigated and rainfed treatments, 2-3 cultivars per species (Desi/Kabuli/Lentils). Split plot design. Soil = red-brown earth.

          Irrigation system was a little uneven but was the best we could do with little preparation time (individual sprinklers along a long hand-shift hose line), but plant cuts were taken from mostly uniform areas.

          **Water use was modelled separately to main trial so we could use individual SW data for each cultivar and treatment, hoping to get most accurate observed data by looking at individual NMM sites.

          Would have been substantial variation in soil type up and down the steep slope. NMM calibration was from Farming systems site 5-6km away so not sure how trustworthy that data is. probably not great, unfortunately.

          **Met file** - based on SILO but used local TTag at trial for max/minT, because trial is at a different point in the landscape (north slope) to the SILO station (east slope)
        Factors
          Memo: same as Validation.2019_PulseAdaptation.Greenethorpe_2019_.Factors.Memo
          Permutation
            Factor TOS
              CompositeFactor 1_Dry
                Specifications:
                  [Crop]
                  [Clock]
                  [IrrigateFixedDates].Script.Amount = 0.0
                  [IrrigateOnSow_TOS2only].Script.Amount = 0.0
                Operations Crop
                  2019-04-15  [SoilWater].SW = 0.219,0.236,0.263,0.310,0.317,0.287,0.277,0.281,0.292,0.242,0.242
                  2019-04-30  [Chickpea].Sow(population: 46, cultivar: "HatTrick", depth: 50, rowSpacing: 230)
                  2019-08-13  [SoilWater].SW = 0.100, 0.127,0.219,0.287,0.300,0.294,0.286,0.286,0.292,0.283,0.283
                Clock: Start=2019-04-10; End=2019-12-10
              CompositeFactor 2_Dry
                Specifications:
                  [Crop]
                  [Clock]
                  [IrrigateFixedDates].Script.Amount = 0.0
                  [IrrigateOnSow_TOS2only].Script.Amount = 15.0
                Operations Crop
                  2019-04-15  [SoilWater].SW = 0.219,0.186,0.257,0.297,0.282,0.248,0.226,0.237,0.256, 0.235,0.235
                  2019-05-21  [Chickpea].Sow(population: 46, cultivar: "HatTrick", depth: 50, rowSpacing: 230)
                  2019-08-13  [SoilWater].SW = 0.100, 0.170,0.246,0.291,0.299,0.277,0.264,0.253,0.256,0.239,0.239
                Clock: Start=2019-04-10; End=2019-12-10
              CompositeFactor 3_Dry
                Specifications:
                  [Crop]
                  [Clock]
                  [IrrigateFixedDates].Script.Amount = 0.0
                  [IrrigateOnSow_TOS2only].Script.Amount = 0.0
                Operations Crop
                  2019-04-15  [SoilWater].SW = 0.219,0.188,0.256,0.299,0.277,0.272,0.259,0.263,0.286,0.242,0.242
                  2019-06-12  [Chickpea].Sow(population: 46, cultivar: "HatTrick", depth: 50, rowSpacing: 230)
                  2019-08-13  [SoilWater].SW = 0.100,0.178,0.248,0.288,0.275,0.297,0.282,0.279,0.288,0.256,0.256
                Clock: Start=2019-04-10; End=2019-12-10
              CompositeFactor 1_Wet
                Specifications:
                  [Crop]
                  [Clock]
                  [IrrigateFixedDates].Script.Amount = 10.0
                  [IrrigateOnSow_TOS2only].Script.Amount = 0.0
                Operations Crop
                  2019-04-15  [SoilWater].SW = 0.219,0.198,0.266,0.291,0.262,0.220,0.236,0.244,0.236,0.271,0.271
                  2019-04-30  [Chickpea].Sow(population: 46, cultivar: "HatTrick", depth: 50, rowSpacing: 230)
                  2019-08-13  [SoilWater].SW = 0.100,0.132,0.218,0.272,0.262,0.239,0.261,0.251,0.248,0.275,0.275
                Clock: Start=2019-04-10; End=2019-12-10
              CompositeFactor 2_Wet
                Specifications:
                  [Crop]
                  [Clock]
                  [IrrigateFixedDates].Script.Amount = 10.0
                  [IrrigateOnSow_TOS2only].Script.Amount = 15.0
                Operations Crop
                  2019-04-15  [SoilWater].SW = 0.219,0.197,0.261,0.285,0.249,0.209,0.212,0.238,0.271,242,242
                  2019-05-21  [Chickpea].Sow(population: 46, cultivar: "HatTrick", depth: 50, rowSpacing: 230)
                  2019-08-13  [SoilWater].SW = 0.100, 0.174,0.249,0.284,0.282,0.251,0.237,0.256,0.275,0.275,0.275
                Clock: Start=2019-04-10; End=2019-12-10
              CompositeFactor 3_Wet
                Specifications:
                  [Crop]
                  [Clock]
                  [IrrigateFixedDates].Script.Amount = 10.0
                  [IrrigateOnSow_TOS2only].Script.Amount = 0.0
                Operations Crop
                  2019-04-15  [SoilWater].SW = 0.219,0.200,0.266,0.297,0.280,0.254,0.231,0.250,0.261,0.248,0.248
                  2019-06-12  [Chickpea].Sow(population: 46, cultivar: "HatTrick", depth: 50, rowSpacing: 230)
                  2019-08-13  [SoilWater].SW = 0.100, 0.192,0.251,0.288,0.277,0.270,0.267,0.260,0.272,0.306,0.306
                Clock: Start=2019-04-10; End=2019-12-10
        Simulation GT_HatTrick_WU_2019_
          Weather: FileName=GreenethorpeTTagTemp.met
          Clock: Start=2019-04-10; End=2019-12-30
          Summary summaryfile
          SoilArbitrator Soil Arbitrator
          Zone Field: Area=1; Slope=0; AspectAngle=0; Altitude=50
            MicroClimate: a_interception=0; b_interception=1; c_interception=0; d_interception=0; SoilHeatFluxFraction=0.4; MinimumHeightDiffForNewLayer=0; NightInterceptionFraction=0.5; ReferenceHeight=2
            Irrigation
            Fertiliser
            SurfaceOrganicMatter: InitialResidueName=maize; InitialResidueType=maize; InitialResidueMass=500; InitialStandingFraction=0; InitialCPR=0; InitialCNR=65
            Report: same as Validation.2019_PulseAdaptation.Walgett19_.Walgett19.Field.Report
            Report HarvestReport: EventNames=[Chickpea].Harvesting
              VariableNames:
                [Clock].Today
                [Chickpea].Phenology.CurrentStageName as Stage
                [Chickpea].Phenology.FloweringDAS as FloweringDAS
                [Chickpea].Phenology.MaturityDAS as MaturityDAS
                [Chickpea].Grain.Live.Wt as GrainWt
                [Chickpea].AboveGround.Wt
            Manager Harvesting: same as Validation.2019_PulseAdaptation.Emerald19_.Emerald19_.Field.Harvesting
            Plant Chickpea
            Manager Sowing: same as Validation.2019_PulseAdaptation.Greenethorpe_2019_.Greenethorpe_2019_.Field.Sowing
            Manager Reset on date: same as Validation.2019_PulseAdaptation.Greenethorpe_2019_.Greenethorpe_2019_.Field.Reset on date
            Manager Fertilise at sowing: same as Validation.2019_PulseAdaptation.Greenethorpe_2019_.Greenethorpe_2019_.Field.Fertilise at sowing
            Manager IrrigateOnSow_TOS2only: same as Validation.2019_PulseAdaptation.Greenethorpe_2019_.Greenethorpe_2019_.Field.IrrigateOnSow_TOS2only
            Manager IrrigateFixedDates: same as Validation.2019_PulseAdaptation.Greenethorpe_2019_.Greenethorpe_2019_.Field.IrrigateFixedDates
            Soil: SoilType=SNSW; Site=Front paddock; NearestTown=Young; Region=Southern NSW; State=NSW; Country=Australia; Latitude=0; Longitude=0; DataSource=Kirkegaard/Lilley
              Memo: same as Validation.2019_PulseAdaptation.Greenethorpe_2019_.Greenethorpe_2019_.Field.soil.memo
              Physical
                Thickness  BD    AirDry  LL15   DUL    SAT
                100        1.5   0.08    0.08   0.25   0.28
                100        1.53  0.08    0.102  0.211  0.241
                200        1.56  0.1     0.156  0.232  0.262
                200        1.54  0.1     0.213  0.287  0.317
                200        1.54  0.15    0.241  0.311  0.341
                200        1.6   0.15    0.253  0.35   0.369
                200        1.62  0.15    0.258  0.35   0.369
                200        1.71  0.15    0.256  0.35   0.355
                200        1.69  0.15    0.268  0.35   0.357
                200        1.77  0.15    0.268  0.33   0.332
                200        1.7   0.15    0.268  0.335  0.344
                SoilCrop LentilSoil: same as Validation.2019_PulseAdaptation.Greenethorpe_2019_.Greenethorpe_2019_.Field.soil.Physical.LentilSoil
                SoilCrop ChickpeaSoil
                  LL=[0.102, 0.102, 0.156, 0.213, 0.241, 0.253, 0.258, 0.256, 0.268, 0.268, 0.268]
                  KL=[0.045, 0.045, 0.045, 0.045, 0.02, 0.005, 0.02, 0.02, 0.02, 0.01, 0.01]
                  XF=[1, 1, 1, 1, 0.3, 0.1, 0, 0, 0, 0, 0]
                  LL source: Field measured and checked for sensibility
              WaterBalance SoilWater: SummerDate=1-Nov; SummerU=2; SummerCona=4.5; WinterDate=1-Apr; WinterU=2; WinterCona=3.9; DiffusConst=88; DiffusSlope=35; Salb=0.13; CN2Bare=73; CNRed=20; CNCov=0.8; PSIDul=-100; Thickness=[100, 100, 200, 200, 200, 200, 200, 200, 200, 200, 200]; SWCON=[0.3, 0.3, 0.3, 0.3, 0.3, 0.3, 0.3, 0.3, 0.3, 0.3, 0.3]
              Nutrient
              Organic: same as Validation.2019_PulseAdaptation.Greenethorpe_2019_.Greenethorpe_2019_.Field.soil.Organic
              Chemical: Thickness=[100, 100, 200, 200, 200, 200, 200, 200, 200, 200, 200]; PH=[5.8, 5.9, 6.7, 7.05, 7.25, 7.4, 7.7, 8.1, 8.35, 8.45, 8.5]; PHUnits=Water
              Water: Thickness=[100, 100, 200, 200, 200, 200, 200, 200, 200, 200, 200]; FilledFromTop=false
                InitialValues=[0.218604, 0.218604, 0.262, 0.297604, 0.28928167, 0.265772, 0.253469, 0.256987, 0.24218885, 0.246785, 0.247]
              Solute NO3: InitialValuesUnits=ppm; WaterTableConcentration=0; D0=0; DepthConstant=0; MaxDepthSoluteAccessible=0; RunoffEffectivenessAtMovingSolute=0; MaxEffectiveRunoff=0
              Solute NH4: InitialValuesUnits=ppm; WaterTableConcentration=0; D0=0; DepthConstant=0; MaxDepthSoluteAccessible=0; RunoffEffectivenessAtMovingSolute=0; MaxEffectiveRunoff=0
              Solute Urea: same as Validation.2019_PulseAdaptation.Greenethorpe_2019_.Greenethorpe_2019_.Field.soil.Urea
              SoilTemperature Temperature
            Report RDDReport: EventNames=[Chickpea].Harvesting
              VariableNames:
                [Clock].Today
                [Chickpea].Phenology.RadDegDays
            Folder Management
              Operations Crop
            Report SowingReport: EventNames=[Chickpea].Sowing
              VariableNames:
                [Clock].Today
                [Chickpea].SowingData.Cultivar
                [IWeather].Latitude
                [IWeather].Longitude
      Experiment Narrabri19_
        Memo
          Experiment conducted at PBI Narrabri Research Station, by Helen Bramley from USYD on behalf of Pulse Adaptation project. Site was on the new section of the farm, over Killarney Gap Rd. Soil = Vertosol

          **Met file** - taken from SILO airport + field maxT, MinT and rain spliced in.

          **Irrigations from contractor** -
          17/05	25 mm just after TOS 1 planted (accidentally typed 17/06 but you can see in excel entry is before and after other may entries)
          17/06	30 mm - whole trial
          06/08	irrigation 25 mm - whole trial
          09/09	irrigation - 30mm irrigated part only
          24/09	irrigated only 30 mm
          25/10	irrigated only 30 mm

          Soil water characterisation is a bit uncertain - cores weren't dried at 100 degrees. Still waiting on recalibrated soilwater data as of 7Aug20. This may explain consistent over-prediction at this site
        Factors
          Permutation
            Factor TOS
              CompositeFactor 1: Specifications=[Sowing].Script.SowDate = 16-May
              CompositeFactor 2: Specifications=[Sowing].Script.SowDate = 29-May
              CompositeFactor 3: Specifications=[Sowing].Script.SowDate = 2-Jul
            Factor Cv
              Specification=[Sowing].Script.CultivarName = Drummond, HatTrick, Kyabra, Genesis90, Kalkee, Monarch
            Factor Irr
              CompositeFactor 0: Specifications=[IrrigateForIrrTreatsOnly].Script.Amount = 0.0
              CompositeFactor 1: Specifications=[IrrigateForIrrTreatsOnly].Script.Amount = 30.0
        Simulation Narrabri19_
          Weather: FileName=NarrabriAWS_FieldTempRainCOMBO.met
          Memo met
            AP email 9/6/20: Use the airport for solar radiation and most things but use the onsite station (from the last worksheet in that spreadsheet) for temp and rainfall. So yes it will be a combo, if you can make it sure it gets labelled that way. Once you’ve combined them in excel you have to save it as *.prn file, then rename to .met.
          Clock: Start=2019-05-01; End=2019-12-30
          Summary summaryfile
          SoilArbitrator Soil Arbitrator
          Zone Field: Area=1; Slope=0; AspectAngle=0; Altitude=50
            MicroClimate: a_interception=0; b_interception=1; c_interception=0; d_interception=0; SoilHeatFluxFraction=0.4; MinimumHeightDiffForNewLayer=0; NightInterceptionFraction=0.5; ReferenceHeight=2
            Irrigation
            Fertiliser
            SurfaceOrganicMatter: InitialResidueName=maize; InitialResidueType=maize; InitialResidueMass=500; InitialStandingFraction=0; InitialCPR=0; InitialCNR=65
            Report: same as Validation.2019_PulseAdaptation.Walgett19_.Walgett19.Field.Report
            Report HarvestReport: EventNames=[Chickpea].Harvesting
              VariableNames:
                [Clock].Today
                [Chickpea].Phenology.CurrentStageName as Stage
                [Chickpea].Phenology.FloweringDAS as FloweringDAS
                [Chickpea].Phenology.MaturityDAS as MaturityDAS
                [Chickpea].Grain.Live.Wt as GrainWt
                [Chickpea].AboveGround.Wt
            Manager Harvesting: same as Validation.2019_PulseAdaptation.Emerald19_.Emerald19_.Field.Harvesting
            Plant Chickpea
            Manager Sowing: same as Validation.2019_PulseAdaptation.GreenethorpePhen19_.GreenethorpePhen19.Field.Sowing
            Manager Reset on date
              ResetDate = 22-may
              ResetWater = Yes
              ResetSOM = No
              script: same as in Validation.2019_PulseAdaptation.Emerald19_.Emerald19_.Field.Reset on date
            Manager Fertilise at sowing: same as Validation.2019_PulseAdaptation.Greenethorpe_2019_.Greenethorpe_2019_.Field.Fertilise at sowing
            Manager IrrigateAllPlots1
              IrrigateDates = 17-may
              Amount = 25
              Depth = 0
              Efficiency = 1
              WillRunoff = False
              script: same as in Validation.2019_PulseAdaptation.Mildura19_.Mildura19.Field.Irrigate
            Manager IrrigateAllPlots2
              IrrigateDates = 17-jun
              Amount = 30
              Depth = 0
              Efficiency = 1
              WillRunoff = False
              script: same as in Validation.2019_PulseAdaptation.Mildura19_.Mildura19.Field.Irrigate
            Manager IrrigateAllPlots3
              IrrigateDates = 6-aug
              Amount = 25
              Depth = 0
              Efficiency = 1
              WillRunoff = False
              script: same as in Validation.2019_PulseAdaptation.Mildura19_.Mildura19.Field.Irrigate
            Manager IrrigateForIrrTreatsOnly
              IrrigateDates = 9-sep, 24-sep, 25-oct
              Amount = 30
              Depth = 0
              Efficiency = 1
              WillRunoff = True
              script: same as in Validation.2019_PulseAdaptation.Mildura19_.Mildura19.Field.Irrigate
            Report RDDReport: EventNames=[Chickpea].Harvesting
              VariableNames:
                [Clock].Today
                [Chickpea].Phenology.RadDegDays
            Soil Grey Vertosol (Narrabri No124): ASCOrder=Vertosol; ASCSubOrder=Grey; SoilType=Clay; Site=Narrabri; NearestTown=Narrabri, NSW 2390; Region=North West Slopes and Plains; State=New South Wales; Country=Australia; NaturalVegetation=Grasslands, Poplar Box; ApsoilNumber=124; Latitude=-30.57; Longitude=150.256; LocationAccuracy=+/- 20m; DataSource=CSIRO Plant Industry, Myall Vale (D Richards)
              Physical
                Thickness  BD    AirDry  LL15  DUL   SAT
                150        1.24  0.125   0.25  0.45  0.5
                150        1.24  0.2     0.25  0.45  0.5
                300        1.19  0.25    0.25  0.47  0.52
                300        1.2   0.25    0.25  0.47  0.52
                300        1.24  0.25    0.25  0.45  0.5
                300        1.28  0.25    0.25  0.44  0.49
                300        1.34  0.25    0.25  0.41  0.46
                SoilCrop ChickpeaSoil: LL=[0.25, 0.25, 0.26, 0.29, 0.37, 0.42, 0.41]; KL=[0.06, 0.06, 0.06, 0.04, 0.033, 0.01, 0.01]; XF=[1, 1, 1, 1, 1, 1, 1]
                  LL source: Field measured and checked for sensibility
                SoilCrop WheatSoil: LL=[0.25, 0.25, 0.26, 0.28, 0.32, 0.35, 0.39]; KL=[0.06, 0.06, 0.06, 0.04, 0.04, 0.02, 0.02]; XF=[1, 1, 1, 1, 1, 1, 1]
                  LL source: Field measured and checked for sensibility
                SoilCrop CottonSoil: LL=[0.25, 0.25, 0.25, 0.27, 0.3, 0.34, 0.35]; KL=[0.1, 0.1, 0.1, 0.1, 0.09, 0.07, 0.05]; XF=[1, 1, 1, 1, 1, 1, 1]
                  LL source: Field measured and checked for sensibility
                SoilCrop SorghumSoil: LL=[0.25, 0.25, 0.26, 0.28, 0.31, 0.34, 0.36]; KL=[0.07, 0.07, 0.07, 0.05, 0.05, 0.04, 0.03]; XF=[1, 1, 1, 1, 1, 1, 1]
                  LL source: Field measured and checked for sensibility
                SoilCrop MungbeanSoil: LL=[0.25, 0.25, 0.32, 0.39, 0.39, 0.44, 0.41]; KL=[0.06, 0.06, 0.06, 0.04, 0.04, 0.01, 0.01]; XF=[1, 1, 1, 1, 1, 1, 1]
                  LL source: Field measured and checked for sensibility
              WaterBalance SoilWater: SummerDate=1-Nov; SummerU=6; SummerCona=3.5; WinterDate=1-Apr; WinterU=4; WinterCona=2.5; DiffusConst=40; DiffusSlope=16; Salb=0.12; CN2Bare=73; CNRed=20; CNCov=0.8; PSIDul=-100; Thickness=[150, 150, 300, 300, 300, 300, 300]; SWCON=[0.3, 0.3, 0.3, 0.3, 0.3, 0.3, 0.3]
              Nutrient
              Organic: FOMCNRatio=40; CarbonUnits=Total
                Thickness  Carbon  SoilCNRatio  FBiom  FInert  FOM
                150        0.88    12           0.04   0.4     347.129
                150        0.76    12           0.02   0.6     270.344
                300        0.62    12           0.02   0.8     163.972
                300        0.32    12           0.02   1       99.4541
                300        0.12    12           0.01   1       60.322
                300        0.1     12           0.01   1       36.5871
                300        0.05    12           0.01   1       22.1912
              Chemical: Thickness=[150, 150, 300, 300, 300, 300, 300]; PH=[8.9, 9.2, 9.3, 9, 8.8, 7.5, 8.4]; PHUnits=Water
              Water: Thickness=[150, 150, 300, 300, 300, 300, 300]; InitialValues=[0.45, 0.45, 0.47, 0.47, 0.45, 0.44, 0.41]; FilledFromTop=true
              Solute NO3: InitialValuesUnits=ppm; WaterTableConcentration=0; D0=0; DepthConstant=0; MaxDepthSoluteAccessible=0; RunoffEffectivenessAtMovingSolute=0; MaxEffectiveRunoff=0
              Solute NH4: InitialValuesUnits=ppm; WaterTableConcentration=0; D0=0; DepthConstant=0; MaxDepthSoluteAccessible=0; RunoffEffectivenessAtMovingSolute=0; MaxEffectiveRunoff=0
              Solute Urea: same as Validation.2019_PulseAdaptation.Emerald19_.Emerald19_.Field.Vertosol_No8.Urea
              SoilTemperature Temperature
            Report SowingReport: EventNames=[Chickpea].Sowing
              VariableNames:
                [Clock].Today
                [Chickpea].SowingData.Cultivar
                [IWeather].Latitude
                [IWeather].Longitude
    Folder SE Queensland
      Experiment Lawes1990
        Memo
          Peter Carberry data partially published in Brinsmead (1992). http://www.regional.org.au/au/asa/1992/concurrent/cropping-systems/p-04.htm

          Experiment conducted at Gatton RS, 1990. One variety, two sowing dates. Creek bank soil is variable over short distances.

          Note that Brinsmead paper says 1st sowing date was waterlogged soon after sowing, which would explain the delayed biomass growth curve in comparison to simulated.

          Note - auto-irrigate function has been used as there is no record of actual irrigation, although in theory the experiment was fully irrigated. In practice, this usually means some low level water stress is experienced, as has been simulated with this experiment.
        Factors
          Factor Sowing: Specification=[Sowing]
            Operations 1
              1990-05-20  [Chickpea].Sow(population:33.4, cultivar:"Amethyst", depth:50, rowSpacing:350);
            Operations 2
              1990-08-06  [Chickpea].Sow(population:43, cultivar:"Amethyst", depth:50, rowSpacing:350);
        Simulation Lawes1990
          Weather: FileName=cooper.met
          Clock: Start=1990-01-01; End=1990-12-31
          Summary summaryfile
          SoilArbitrator Soil Arbitrator
          Zone Field: Area=1; Slope=0; AspectAngle=0; Altitude=50
            MicroClimate: a_interception=0; b_interception=1; c_interception=0; d_interception=0; SoilHeatFluxFraction=0.4; MinimumHeightDiffForNewLayer=0; NightInterceptionFraction=0.5; ReferenceHeight=2
            Irrigation
            Fertiliser
            SurfaceOrganicMatter: InitialResidueName=maize; InitialResidueType=maize; InitialResidueMass=500; InitialStandingFraction=0; InitialCPR=0; InitialCNR=65
            Operations Sowing
            Operations NRate
              1985-11-08  [Fertiliser].Apply(50, "NH4NO3N", 10);
              1985-11-29  [Fertiliser].Apply(30, "NH4NO3N", 10);
            Report: same as Validation.2019_PulseAdaptation.Emerald19_.Emerald19_.Field.Report
            Soil: Latitude=0; Longitude=0
              Physical
                Thickness  BD    AirDry  LL15   DUL    SAT
                150        1.32  0.1     0.31   0.413  0.453
                150        1.32  0.1     0.31   0.413  0.453
                150        1.38  0.26    0.313  0.454  0.479
                300        1.33  0.32    0.376  0.495  0.498
                300        1.33  0.3     0.356  0.495  0.498
                300        1.42  0.27    0.3    0.418  0.464
                300        1.33  0.24    0.303  0.4    0.457
                300        1.35  0.31    0.31   0.37   0.435
                400        1.4   0.16    0.16   0.29   0.38
                SoilCrop ChickpeaSoil: LL=[0.3, 0.3, 0.3, 0.35, 0.35, 0.27, 0.303, 0.31, 0.16]; KL=[0.06, 0.06, 0.06, 0.045, 0.045, 0.03, 0.02, 0.01, 0]; XF=[1, 1, 1, 1, 1, 1, 1, 1, 1]
              WaterBalance SoilWater: SummerDate=1-Nov; SummerU=6; SummerCona=3.5; WinterDate=1-Apr; WinterU=4; WinterCona=2.5; DiffusConst=40; DiffusSlope=16; Salb=0.13; CN2Bare=68; CNRed=20; CNCov=0.8; PSIDul=-100; Thickness=[100, 100, 100, 200, 200, 200, 200, 200, 200]; SWCON=[0.5, 0.5, 0.5, 0.5, 0.5, 0.5, 0.5, 0.5, 0.5]
              Nutrient
              Organic: FOMCNRatio=45; CarbonUnits=Total
                Thickness  Carbon  SoilCNRatio  FBiom  FInert  FOM
                100        1.2     14.5         0.02   0.42    268.216
                100        1       14.5         0.01   0.5     219.597
                100        0.86    14.5         0.01   0.58    179.791
                200        0.83    14.5         0.01   0.55    120.517
                200        0.58    14.5         0.01   0.86    80.7852
                200        0.54    14.5         0.01   0.9     54.1519
                200        0.47    14.5         0.01   0.95    36.2991
                200        0.5     14.5         0.01   0.95    24.332
                200        0.5     14.5         0.01   0.95    16.3103
              Chemical: Thickness=[100, 100, 100, 200, 200, 200, 200, 200, 200]; PH=[6, 6, 6, 6.2, 6.5, 6.7, 6.8, 6.8, 6.8]; PHUnits=Water
              Water: Thickness=[150, 150, 300, 300, 300, 300, 300]; InitialValues=[0.413, 0.45, 0.408, 0.374, 0.327, 0.325, 0.371]; FilledFromTop=false
              Solute NO3: Thickness=[100, 100, 100, 200, 200, 200, 200, 200, 200]; InitialValues=[14.4, 10.49, 6.58, 2.45, 1.765, 1.08, 0.15, 0.49, 0.83]; InitialValuesUnits=ppm; WaterTableConcentration=0; D0=0; DepthConstant=0; MaxDepthSoluteAccessible=0; RunoffEffectivenessAtMovingSolute=0; MaxEffectiveRunoff=0
              Solute NH4: Thickness=[100, 100, 100, 200, 200, 200, 200, 200, 200]; InitialValues=[0.6, 0.35, 0.1, 0.1, 0.1, 0.1, 0.1, 0.1, 0.1]; InitialValuesUnits=ppm; WaterTableConcentration=0; D0=0; DepthConstant=0; MaxDepthSoluteAccessible=0; RunoffEffectivenessAtMovingSolute=0; MaxEffectiveRunoff=0
              Solute Urea: Thickness=[100, 100, 100, 200, 200, 200, 200, 200, 200]; InitialValues=[0, 0, 0, 0, 0, 0, 0, 0, 0]; InitialValuesUnits=kg/ha; WaterTableConcentration=0; D0=0; DepthConstant=0; MaxDepthSoluteAccessible=0; RunoffEffectivenessAtMovingSolute=0; MaxEffectiveRunoff=0
              SoilTemperature Temperature
            Report HarvestReport: EventNames=[Chickpea].Harvesting
              VariableNames:
                [Clock].Today
                [Chickpea].Phenology.CurrentStageName as Stage
                [Chickpea].Phenology.FloweringDAS as FloweringDAS
                [Chickpea].Phenology.MaturityDAS as MaturityDAS
                [Chickpea].Grain.Live.Wt as GrainWt
                [Chickpea].AboveGround.Wt
            Manager Harvesting: same as Validation.2019_PulseAdaptation.Emerald19_.Emerald19_.Field.Harvesting
            Plant Chickpea
            Manager AutoIrrigate
              AutoIrrigationOn = True
              StartStageName = Emergence
              EndStageName = EndGrainFill
              FASWThreshold = 0.9
              FASWDepth = 1000
```csharp
using APSIM.Numerics;
using Models.PMF.Phen;
using System;
using Models.Core;
using System.Collections.Generic;
using System.Text;
using Models.Soils;
using Models.PMF;
using Models;
using System.Xml.Serialization;
using APSIM.Shared.Utilities;
using Models.Interfaces;

namespace Models
{
    [Serializable] 
    public class Script : Model
    {
        [Link] private Plant Chickpea;
        [Link] private Zone zone;
        [Link] private Irrigation irrigation;
        [Link] private Soil soil;
        [Link(Type = LinkType.Path, Path = "[Chickpea].Phenology")]
        private Phenology phenology;
        [Link]
        private IPhysical soilPhysical;
        [Link]
        private ISoilWater waterBalance;
        public double FASW { get; set; }
        public double WaterDeficit  { get; set; }
    
        
        [Description("Auto irrigation on?")]
        public bool AutoIrrigationOn { get; set; }
        
        [Description("Irrigation window start stage")]
        public string StartStageName { get; set; }
        [Description("Irrigation window end stage")]
        public string EndStageName { get; set; }

        [Description("Threshold fraction available water (0-1)")]
        public double FASWThreshold { get; set; }

        [Description("Soil depth (mm) to which fraction available water is calculated")]
        public double FASWDepth { get; set; }

        [EventSubscribe("DoManagement")]
        private void OnDoManagement(object sender, EventArgs e)
        {
            CalculateFASW();
            if (AutoIrrigationOn && phenology.Between(StartStageName, EndStageName))
            {
                if (FASW < FASWThreshold)
                {
                    double amount = 10;
                    irrigation.Apply(WaterDeficit, depth: 0);
                }
            }
        }
        
        private void CalculateFASW()
        {
            double[] LL15 = MathUtilities.Multiply(soilPhysical.LL15, soilPhysical.Thickness);
            double[] DUL = MathUtilities.Multiply(soilPhysical.DUL, soilPhysical.Thickness);
        
            int nlayr = GetLayerIndex();
            double cumdep = MathUtilities.Sum(soilPhysical.Thickness, 0, nlayr, 0.0);

            double excess_fr = MathUtilities.Divide((cumdep - FASWDepth), soilPhysical.Thickness[nlayr], 0.0);

            // note that results may be strange if swdep < ll15
            double avail_sw = (MathUtilities.Sum(waterBalance.SWmm, 0, nlayr, 0.0)
                              - excess_fr * waterBalance.SWmm[nlayr])
                              - (MathUtilities.Sum(LL15, 0, nlayr, 0.0)
                              - excess_fr * LL15[nlayr]);


            double pot_avail_sw = (MathUtilities.Sum(DUL, 0, nlayr, 0.0)
                                  - excess_fr * DUL[nlayr])
                                  - (MathUtilities.Sum(LL15, 0, nlayr, 0.0)
                                  - excess_fr * LL15[nlayr]);

            FASW = MathUtilities.Divide(avail_sw, pot_avail_sw, 0.0);
            WaterDeficit = MathUtilities.Constrain(pot_avail_sw - avail_sw, 0.0, 100000);
        }

        private int GetLayerIndex()
        {
            double[] cumThickness = soilPhysical.ThicknessCumulative;
            for (int i = 1; i < cumThickness.Length; i++)
            {
                if (FASWDepth < cumThickness[i])
                    return i - 1;
            }
            
            return cumThickness.Length - 1;
        }

    }
}
```
            Report RDDReport: EventNames=[Chickpea].Harvesting
              VariableNames:
                [Clock].Today
                [Chickpea].Phenology.RadDegDays
            Report SowingReport: EventNames=[Chickpea].Sowing
              VariableNames:
                [Clock].Today
                [Chickpea].SowingData.Cultivar
                [IWeather].Latitude
                [IWeather].Longitude
        Report RDDReport: EventNames=[Chickpea].Harvesting
          VariableNames:
            [Clock].Today
            [Chickpea].Phenology.RadDegDays
      Experiment Lawes1991
        Memo
          Gatton RS 1991, 2 sowing date experiment. Creek bank soil is highly variable.

          Peter Carberry upublished data. Also known as APS2??

          Current version of the model seems to be starting grainfill too early for this data. May have been a waterlogging stress that delayed flowering? Or do modern cultivars set seed faster than Amethyst?
        Factors Factors2
          Factor Sowing: Specification=[Sowing]
            Operations 1
              1991-05-29  [Chickpea].Sow(population:28, cultivar:"Amethyst", depth:50, rowSpacing:500);
              1991-05-29  [Irrigation].Apply(amount:40, depth:0,efficiency:1, willRunoff:false);
              1991-06-20  [Irrigation].Apply(amount:40, depth:0,efficiency:1, willRunoff:false);
              1991-07-10  [Irrigation].Apply(amount:40, depth:0,efficiency:1, willRunoff:false);
              1991-07-30  [Irrigation].Apply(amount:40, depth:0,efficiency:1, willRunoff:false);
              1991-08-19  [Irrigation].Apply(amount:40, depth:0,efficiency:1, willRunoff:false);
              1991-09-08  [Irrigation].Apply(amount:40, depth:0,efficiency:1, willRunoff:false);
              1991-09-28  [Irrigation].Apply(amount:40, depth:0,efficiency:1, willRunoff:false);
              1991-10-18  [Irrigation].Apply(amount:40, depth:0,efficiency:1, willRunoff:false);
              1991-11-07  [Irrigation].Apply(amount:40, depth:0,efficiency:1, willRunoff:false);
            Operations 2
              1991-07-28  [Chickpea].Sow(population:28, cultivar:"Amethyst", depth:50, rowSpacing:500);
              1991-05-29  [Irrigation].Apply(amount:40, depth:0,efficiency:1, willRunoff:false);
              1991-06-20  [Irrigation].Apply(amount:40, depth:0,efficiency:1, willRunoff:false);
              1991-07-10  [Irrigation].Apply(amount:40, depth:0,efficiency:1, willRunoff:false);
              1991-07-30  [Irrigation].Apply(amount:40, depth:0,efficiency:1, willRunoff:false);
              1991-08-19  [Irrigation].Apply(amount:40, depth:0,efficiency:1, willRunoff:false);
              1991-09-08  [Irrigation].Apply(amount:40, depth:0,efficiency:1, willRunoff:false);
              1991-09-28  [Irrigation].Apply(amount:40, depth:0,efficiency:1, willRunoff:false);
              1991-10-18  [Irrigation].Apply(amount:40, depth:0,efficiency:1, willRunoff:false);
              1991-11-07  [Irrigation].Apply(amount:40, depth:0,efficiency:1, willRunoff:false);
              Memo
                something weird here. Can't balance MS leaf number with apparent correct sowing date amethyst phenology and measured grain weight development. So exclude
        Simulation Lawes1991
          Weather: FileName=cooper.met
          Clock: Start=1991-01-01; End=1991-12-31
          Summary summaryfile
          SoilArbitrator Soil Arbitrator
          Zone Field: Area=1; Slope=0; AspectAngle=0; Altitude=50
            MicroClimate: a_interception=0; b_interception=1; c_interception=0; d_interception=0; SoilHeatFluxFraction=0.4; MinimumHeightDiffForNewLayer=0; NightInterceptionFraction=0.5; ReferenceHeight=2
            Irrigation
            Fertiliser
            SurfaceOrganicMatter: InitialResidueName=maize; InitialResidueType=maize; InitialResidueMass=500; InitialStandingFraction=0; InitialCPR=0; InitialCNR=65
            Operations Sowing
            Operations NRate: same as Validation.SE Queensland.Lawes1990.Lawes1990.Field.NRate
            Report: EventNames=[Clock].DoReport
              VariableNames:
                [Clock].Today
                [Soil].Water.Volumetric
                [Soil].SoilWater.Eo
                [Soil].SoilWater.Es
                [Soil].SoilWater.Drainage
                [Soil].SoilWater.Runoff
                [Soil].SoilWater.pond
                sum([Soil].Water.MM) as ProfileWater
                [Soil].NO3.kgha
                [MicroClimate].net_radn
                [MicroClimate].peta
                [MicroClimate].petr
                [Chickpea].Leaf.LAI
                [Chickpea].Structure.LeafTipsAppeared
                [Chickpea].Structure.PlantTotalNodeNo
                [Chickpea].Leaf.SenescingCohortNo
                [Chickpea].Structure.TotalStemPopn
                [Chickpea].AboveGround.Wt
                [Chickpea].Leaf.Live.Wt
                [Chickpea].Stem.Live.Wt
            Soil: Latitude=0; Longitude=0
              Physical
                Thickness  BD    AirDry  LL15  DUL    SAT
                150        1.38  0.05    0.18  0.384  0.434
                150        1.38  0.19    0.19  0.381  0.431
                300        1.32  0.2     0.2   0.44   0.49
                300        1.46  0.22    0.22  0.424  0.448
                300        1.51  0.19    0.19  0.419  0.43
                300        1.49  0.17    0.17  0.376  0.426
                300        1.47  0.17    0.17  0.377  0.427
                SoilCrop ChickpeaSoil: LL=[0.25, 0.25, 0.23, 0.25, 0.2, 0.2, 0.2]; KL=[0.06, 0.06, 0.06, 0.045, 0.03, 0.02, 0.01]; XF=[1, 1, 1, 1, 1, 0, 0]
              WaterBalance SoilWater: SummerDate=1-Nov; SummerU=6; SummerCona=3.5; WinterDate=1-Apr; WinterU=4; WinterCona=2.5; DiffusConst=40; DiffusSlope=16; Salb=0.13; CN2Bare=50; CNRed=20; CNCov=0.8; PSIDul=-100; Thickness=[100, 100, 100, 200, 200, 200, 200, 200, 200]; SWCON=[0.5, 0.5, 0.5, 0.5, 0.5, 0.5, 0.5, 0.5, 0.5]
              Nutrient
              Organic: same as Validation.SE Queensland.Lawes1990.Lawes1990.Field.soil.Organic
              Chemical: Thickness=[100, 100, 100, 200, 200, 200, 200, 200, 200]; PH=[6, 6, 6, 6.2, 6.5, 6.7, 6.8, 6.8, 6.8]; PHUnits=Water
              Water: Thickness=[150, 150, 300, 300, 300, 300, 300]; InitialValues=[0.384, 0.381, 0.44, 0.424, 0.419, 0.376, 0.377]; FilledFromTop=false
              Solute NO3: Thickness=[100, 100, 100, 200, 200, 200, 200, 200, 200]; InitialValues=[14.3, 10.1, 5.9, 1.8, 1.35, 0.9, 1, 0.6, 0.2]; InitialValuesUnits=ppm; WaterTableConcentration=0; D0=0; DepthConstant=0; MaxDepthSoluteAccessible=0; RunoffEffectivenessAtMovingSolute=0; MaxEffectiveRunoff=0
              Solute NH4: Thickness=[100, 100, 100, 200, 200, 200, 200, 200, 200]; InitialValues=[0, 0, 0, 0, 0, 0, 0, 0, 0]; InitialValuesUnits=ppm; WaterTableConcentration=0; D0=0; DepthConstant=0; MaxDepthSoluteAccessible=0; RunoffEffectivenessAtMovingSolute=0; MaxEffectiveRunoff=0
              Solute Urea: same as Validation.SE Queensland.Lawes1990.Lawes1990.Field.soil.Urea
              SoilTemperature Temperature
            Report HarvestReport: EventNames=[Chickpea].Harvesting
              VariableNames:
                [Clock].Today
                [Chickpea].Phenology.CurrentStageName as Stage
                [Chickpea].Phenology.FloweringDAS as FloweringDAS
                [Chickpea].Phenology.MaturityDAS as MaturityDAS
                [Chickpea].Grain.Live.Wt as GrainWt
            Manager Harvesting: same as Validation.2019_PulseAdaptation.Emerald19_.Emerald19_.Field.Harvesting
            Plant Chickpea
            Manager AutoIrrigate: same as Validation.SE Queensland.Lawes1990.Lawes1990.Field.AutoIrrigate
            Report RDDReport: EventNames=[Chickpea].Harvesting
              VariableNames:
                [Clock].Today
                [Chickpea].Phenology.RadDegDays
            Report SowingReport: EventNames=[Chickpea].Sowing
              VariableNames:
                [Clock].Today
                [Chickpea].SowingData.Cultivar
                [IWeather].Latitude
                [IWeather].Longitude
      Experiment Lawes1995
        Memo
          Experiment known as APS27. Irrigated vs rainfed treatments. Was sown adjacent to the APS26 wheat experiment and should theoretically have received the same irrigation. Creek bank soil is quite variable. There could be a problem with NMM calibration for this reason. WUE of APS26 wheat was not right, but their problem was too much biomass for the amount of water. This simulation has opposite problem of model getting away too fast. Doesn't seem possible to balance biomass development and water use for simulations of this experiment.

          Published data from Yash Dang suggests there is little deep water extraction in Chickpea - at odds with this experiment. There may have been tree roots encroaching on the experimental area.

          Possible that the wet treatment developed disease issues or N fixation issues due to over-watering which might explain overprediction of biomass.

          Also possible that disease management in general was poor and/or undetected, although grain yield was predicted OK
        Factors
          Factor Trt: Specification=[Sowing]
            Operations Wet
              1995-06-15  [Chickpea].Sow(population:37.3, cultivar:"Amethyst", depth:50, rowSpacing:350);
              1995-06-15  [Soil].SoilWater.SW = 0.329,0.347,0.379,0.318,0.358,0.332,0.292
              1995-07-05  [Irrigation].Apply(amount:26, depth:0,efficiency:0.8, willRunoff:false);
              1995-07-21  [Irrigation].Apply(amount:14, depth:0,efficiency:0.8, willRunoff:false);
              1995-08-01  [Irrigation].Apply(amount:28, depth:0,efficiency:0.8, willRunoff:false);
              1995-08-11  [Irrigation].Apply(amount:30, depth:0,efficiency:0.8, willRunoff:false);
              1995-08-25  [Irrigation].Apply(amount:15, depth:0,efficiency:0.8, willRunoff:false);
              1995-08-31  [Irrigation].Apply(amount:14, depth:0,efficiency:0.8, willRunoff:false);
              1995-09-04  [Irrigation].Apply(amount:15, depth:0,efficiency:0.8, willRunoff:false);
              1995-09-15  [Irrigation].Apply(amount:25, depth:0,efficiency:0.8, willRunoff:false);
              1995-09-22  [Irrigation].Apply(amount:20, depth:0,efficiency:0.8, willRunoff:false);
              1995-10-02  [Irrigation].Apply(amount:11, depth:0,efficiency:0.8, willRunoff:false);
            Operations Dry
              1995-06-14  [Chickpea].Sow(population:39.5, cultivar:"Amethyst", depth:50, rowSpacing:350);
              1995-06-05  [Irrigation].Apply(amount:175, depth:0,efficiency:1, willRunoff:false);
              1995-06-15  [Soil].SoilWater.SW = 0.341,0.346,0.309,0.324,0.304,0.296,0.280
        Simulation Lawes1995
          Weather: FileName=cooper.met
          Clock: Start=1995-06-14; End=1995-12-31
          Summary summaryfile
          SoilArbitrator Soil Arbitrator
          Zone Field: Area=1; Slope=0; AspectAngle=0; Altitude=50
            MicroClimate: a_interception=0; b_interception=1; c_interception=0; d_interception=0; SoilHeatFluxFraction=0.4; MinimumHeightDiffForNewLayer=0; NightInterceptionFraction=0.5; ReferenceHeight=2
            Irrigation
            Fertiliser
            SurfaceOrganicMatter: InitialResidueName=maize; InitialResidueType=maize; InitialResidueMass=500; InitialStandingFraction=0; InitialCPR=0; InitialCNR=65
            Operations Sowing
            Report: same as Validation.2019_PulseAdaptation.Mildura19_.Mildura19.Field.Report
            Soil: Latitude=0; Longitude=0
              Physical
                Thickness  BD    AirDry  LL15  DUL    SAT
                150        1.38  0.05    0.18  0.36   0.455
                150        1.38  0.19    0.19  0.373  0.423
                300        1.35  0.2     0.2   0.389  0.439
                300        1.46  0.22    0.22  0.348  0.398
                300        1.42  0.19    0.19  0.365  0.415
                300        1.45  0.17    0.17  0.352  0.402
                300        1.47  0.17    0.17  0.327  0.377
                SoilCrop ChickpeaSoil: LL=[0.25, 0.25, 0.2, 0.23, 0.21, 0.21, 0.22]; KL=[0.06, 0.06, 0.06, 0.045, 0.03, 0.01, 0.01]; XF=[1, 1, 1, 1, 1, 1, 1]
              WaterBalance SoilWater: SummerDate=1-Nov; SummerU=6; SummerCona=3.5; WinterDate=1-Apr; WinterU=4; WinterCona=2.5; DiffusConst=40; DiffusSlope=16; Salb=0.13; CN2Bare=78; CNRed=20; CNCov=0.8; PSIDul=-100; Thickness=[100, 100, 100, 200, 200, 200, 200, 200, 200]; SWCON=[0.3, 0.3, 0.3, 0.3, 0.3, 0.3, 0.3, 0.3, 0.3]
              Nutrient
              Organic: same as Validation.SE Queensland.Lawes1990.Lawes1990.Field.soil.Organic
              Chemical: Thickness=[100, 100, 100, 200, 200, 200, 200, 200, 200]; PH=[6, 6, 6, 6.2, 6.5, 6.7, 6.8, 6.8, 6.8]; PHUnits=Water
              Water: Thickness=[150, 150, 300, 300, 300, 300, 300]; InitialValues=[0.384, 0.381, 0.43, 0.39, 0.41, 0.376, 0.377]; FilledFromTop=false
              Solute NO3: same as Validation.SE Queensland.Lawes1991.Lawes1991.Field.soil.NO3
              Solute NH4: same as Validation.SE Queensland.Lawes1991.Lawes1991.Field.soil.NH4
              Solute Urea: same as Validation.SE Queensland.Lawes1990.Lawes1990.Field.soil.Urea
              SoilTemperature Temperature
            Report HarvestReport: EventNames=[Chickpea].Harvesting
              VariableNames:
                [Clock].Today
                [Chickpea].Phenology.CurrentStageName as Stage
                [Chickpea].Phenology.FloweringDAS as FloweringDAS
                [Chickpea].Phenology.MaturityDAS as MaturityDAS
                [Chickpea].Grain.Live.Wt as GrainWt
            Manager Harvesting: same as Validation.2019_PulseAdaptation.Emerald19_.Emerald19_.Field.Harvesting
            Plant Chickpea
            Report RDDReport: EventNames=[Chickpea].Harvesting
              VariableNames:
                [Clock].Today
                [Chickpea].Phenology.RadDegDays
            Report SowingReport: EventNames=[Chickpea].Sowing
              VariableNames:
                [Clock].Today
                [Chickpea].SowingData.Cultivar
                [IWeather].Latitude
                [IWeather].Longitude
        Memo
          Suspect that wet treatment may have become diseased due to excess irrigation. In which case would explain overprediction of biomass. Would also explain correct prediction of SW (when dry treatment underpredicts extraction) as if the wet treatment was disease limited, its observed SW use was less than it might have been
      Experiment Bremar_2003_
        Memo
          Experiment conducted by J Whish, near Meandarra. 2 time of sowing x 2 row spacing.

          Some uncertainty about whether in-season soil cores were taken directly on the crop row, at the mid inter-row position.

          Not great simulations but retained to show observed trends in relation to sowing date and row spacing. Some notes:

          (1) site was quite a strong slope for southern QLD - may have simulated less runoff than actual.

          (2) soil was highly variable, as per initial coring results from TOS1 and TOS2. The approach taken was to choose an average starting point that would go close to both TOS1 and TOS2, bearing in mind that increasing sowing soil water for TOS2 would increase overprediction.

          (3) first biomass cut looks suspiciously similar to the second biomass cut.  Areas may have been incorrectly reported either for first cut or subsequent cuts.

          (4) It's quite possible that in 2003 undetected disease was limiting Chickpea growth and development

          (5) the site was remote and biomass loss and shattering was likely during storms prior to harvest, and probably greater in TOS1 due to increased delay in obtaining final biomass.

          (6) some uncertainty around whether grower would actually have decreased plant pop for 35 cm row spacing, the plant pop for these treatments possibly may be double.

          (7) Interesting note: the high population, narrow row spacing treatment was the highest yielding in the observed data - as per Kulai 2003. We haven't been able to simulate this. Possible that the narrow row spacing may have had double the plant population and this was not recorded correctly.
        Factors
          Factor S: Specification=[SowingRule]
            Manager 1R350
              SowDate = 15-May
              CultivarName = Amethyst
              SowingDepth = 100
              RowSpacing = 350
              Population = 20
```csharp
using APSIM.Shared.Utilities;
using Models.Utilities;
using Models.Soils;
using Models.PMF;
using Models.Core;
using System;

namespace Models
{
    [Serializable]
    public class Script : Model
    {
        [Link] Clock Clock;
        [Link] Fertiliser Fertiliser;
        [Link] Summary Summary;
        [Link] Plant Chickpea;
        [Link] Soil Soil;
        Accumulator accumulatedRain;
        
        [Description("Sowing date (d-mmm)")]
        public string SowDate { get; set; }
        [Description("Cultivar to be sown")]
        public string CultivarName { get; set; }
        [Description("Sowing depth (mm)")]
        public double SowingDepth { get; set; }
        [Description("Row spacing (mm)")]
        public double RowSpacing { get; set; }
        [Description("Plant population (/m2)")]
        public double Population { get; set; }
        
        


        [EventSubscribe("DoManagement")]
        private void OnDoManagement(object sender, EventArgs e)
        {
        
            
            if (DateUtilities.WithinDates(SowDate, Clock.Today, SowDate))
            {
                Chickpea.Sow(population: Population, cultivar: CultivarName, depth: SowingDepth, rowSpacing: RowSpacing);

                //SoilCrop soilCrop = Soil.Crop("Chickpea") as SoilCrop;
                //double[] kl = soilCrop.KL;
                //double modifier = Population / 40.0;
                //for (int i = 0; i < kl.Length; i++)
                    //kl[i] = kl[i] * modifier;
                //soilCrop.KL = kl;    
            }
        
        }
        
    }
}
```
            Manager 1R700
              SowDate = 15-May
              CultivarName = Amethyst
              SowingDepth = 100
              RowSpacing = 700
              Population = 18
              script: same as in Validation.SE Queensland.Bremar_2003_.Factors.S.1R350
            Manager 2R350
              SowDate = 1-Jun
              CultivarName = Amethyst
              SowingDepth = 100
              RowSpacing = 350
              Population = 20
              script: same as in Validation.SE Queensland.Bremar_2003_.Factors.S.1R350
            Manager 2R700
              SowDate = 1-Jun
              CultivarName = Amethyst
              SowingDepth = 100
              RowSpacing = 700
              Population = 18
              script: same as in Validation.SE Queensland.Bremar_2003_.Factors.S.1R350
        Simulation Bremar2003
          Memo
            soil cores taken on row? or mid -inter row?
          Weather: FileName=bremar2.met
          Clock: Start=2003-05-14; End=2003-12-30
          Summary summaryfile
          SoilArbitrator Soil Arbitrator
          Zone Field: Area=1; Slope=0; AspectAngle=0; Altitude=50
            MicroClimate: a_interception=0; b_interception=1; c_interception=0; d_interception=0; SoilHeatFluxFraction=0.4; MinimumHeightDiffForNewLayer=0; NightInterceptionFraction=0.5; ReferenceHeight=2
            Irrigation
            Fertiliser
            SurfaceOrganicMatter: InitialResidueName=wheat; InitialResidueType=wheat; InitialResidueMass=1500; InitialStandingFraction=0; InitialCPR=0; InitialCNR=76
            Operations IrrigationSchedule
            Report: EventNames=[Clock].DoReport
              VariableNames:
                [Clock].Today
                [Soil].Water.Volumetric
                [Soil].SoilWater.Eo
                [Soil].SoilWater.Es
                [Soil].SoilWater.Drainage
                [Soil].SoilWater.Runoff
                [Soil].SoilWater.pond
                sum([Soil].Water.MM) as ProfileWater
                [Soil].NO3.kgha
                [MicroClimate].net_radn
                [MicroClimate].peta
                [MicroClimate].petr
                [Chickpea].AboveGround.Wt
                [Chickpea].Leaf.LAI
            Report HarvestReport: EventNames=[Chickpea].Harvesting
              VariableNames:
                [Clock].Today
                [Chickpea].Phenology.CurrentStageName as Stage
                [Chickpea].Phenology.FloweringDAS as FloweringDAS
                [Chickpea].Phenology.MaturityDAS as MaturityDAS
                [Chickpea].Grain.Live.Wt as GrainWt
            Manager Harvesting
              script: same as in Validation.2019_PulseAdaptation.Emerald19_.Emerald19_.Field.Harvesting
            Plant Chickpea
            Manager SowingRule
              SowDate = 24-Jul
              CultivarName = Amethyst
              SowingDepth = 50
              RowSpacing = 750
              Population = 6
```csharp
using APSIM.Shared.Utilities;
using Models.Utilities;
using Models.Soils;
using Models.PMF;
using Models.Core;
using System;

namespace Models
{
    [Serializable]
    public class Script : Model
    {
        [Link] Clock Clock;
        [Link] Fertiliser Fertiliser;
        [Link] Summary Summary;
        [Link] Plant Chickpea;
        [Link] Soil Soil;
        Accumulator accumulatedRain;
        
        [Description("Sowing date (d-mmm)")]
        public string SowDate { get; set; }
        [Description("Cultivar to be sown")]
        public string CultivarName { get; set; }
        [Description("Sowing depth (mm)")]
        public double SowingDepth { get; set; }
        [Description("Row spacing (mm)")]
        public double RowSpacing { get; set; }
        [Description("Plant population (/m2)")]
        public double Population { get; set; }
        
        


        [EventSubscribe("DoManagement")]
        private void OnDoManagement(object sender, EventArgs e)
        {
        
            
            if (DateUtilities.WithinDates(SowDate, Clock.Today, SowDate))
            {
                Chickpea.Sow(population: Population, cultivar: CultivarName, depth: SowingDepth, rowSpacing: RowSpacing);    
            }
        
        }
        
    }
}
```
            Soil Red Chromosol Enarra No216: ASCOrder=Chromosol; ASCSubOrder=Red; SoilType=?; Site=Enarra; NearestTown=Meandarra; Region=Darling Downs and Granite Belt; State=Queensland; Country=Australia; NaturalVegetation=Brigalow scrub; ApsoilNumber=216; Latitude=-27.725; Longitude=149.822; LocationAccuracy=+/- 20m
              DataSource=Undertaken by Jeremy Whish, CSIRO Sustainable Ecosystems, Toowoomba in collaboration with MCA, Goondiwindi as part of GRDC Best Management Practice-Pulses project
              Comments=From a pond and tent done during GRDC Best Management Practice-Pulses project ; BD estimated, oc from soil (Billa Billa No. 036)
              Physical
                Thickness  BD     AirDry  LL15  DUL    SAT
                150        1.29   0.13    0.2   0.35   0.4
                150        1.29   0.19    0.2   0.4    0.45
                300        1.327  0.2     0.2   0.38   0.43
                300        1.32   0.2     0.2   0.358  0.41
                300        1.32   0.2     0.2   0.34   0.39
                300        1.4    0.2     0.2   0.34   0.39
                300        1.459  0.2     0.2   0.34   0.39
                SoilCrop ChickpeaSoil: LL=[0.2, 0.2, 0.2, 0.28, 0.297, 0.269, 0.254]; KL=[0.06, 0.06, 0.06, 0.04, 0.033, 0.025, 0.015]; XF=[1, 1, 1, 1, 1, 1, 1]
              WaterBalance SoilWater: SummerDate=1-Nov; SummerU=6; SummerCona=3.5; WinterDate=1-Apr; WinterU=4; WinterCona=2.5; DiffusConst=40; DiffusSlope=16; Salb=0.13; CN2Bare=82; CNRed=20; CNCov=0.8; PSIDul=-100; Thickness=[150, 150, 300, 300, 300, 300, 300]; SWCON=[0.3, 0.3, 0.3, 0.3, 0.3, 0.3, 0.3]
              Organic: FOMCNRatio=40; CarbonUnits=Total
                Thickness  Carbon    SoilCNRatio  FBiom  FInert  FOM
                150        0.953846  12           0.04   0.4     347.129
                150        0.953846  12           0.02   0.5     270.344
                300        0.961538  12           0.02   0.5     163.972
                300        0.846154  12           0.02   0.6     99.4541
                300        0.546154  12           0.01   0.6     60.322
                300        0.261538  12           0.01   0.7     36.5871
                300        0.261538  12           0.01   0.8     22.1912
              Chemical: Thickness=[150, 150, 300, 300, 300, 300, 300]; PH=[8.6, 8.8, 8.8, 7.6, 5.1, 4.8, 4.8]; PHUnits=Water
              Water: Thickness=[150, 150, 300, 300, 300, 300, 300]; InitialValues=[0.35, 0.38, 0.38, 0.33, 0.3, 0.28, 0.26]; FilledFromTop=false
              Nutrient
              Solute NO3: Thickness=[150, 150, 300, 300, 300, 300, 300]; InitialValues=[9.69, 7.88, 9.29, 17.59, 17.49, 13.16, 10.02]; InitialValuesUnits=ppm; WaterTableConcentration=0; D0=0; DepthConstant=0; MaxDepthSoluteAccessible=0; RunoffEffectivenessAtMovingSolute=0; MaxEffectiveRunoff=0
              Solute NH4: Thickness=[150, 150, 300, 300, 300, 300, 300]; InitialValues=[0.3, 0.05, 0.05, 0.05, 0.05, 0.05, 0.05]; InitialValuesUnits=ppm; WaterTableConcentration=0; D0=0; DepthConstant=0; MaxDepthSoluteAccessible=0; RunoffEffectivenessAtMovingSolute=0; MaxEffectiveRunoff=0
              Solute Urea: same as Validation.2019_PulseAdaptation.Emerald19_.Emerald19_.Field.Vertosol_No8.Urea
              SoilTemperature Temperature
            Report RDDReport: EventNames=[Chickpea].Harvesting
              VariableNames:
                [Clock].Today
                [Chickpea].Phenology.RadDegDays
            Report SowingReport: EventNames=[Chickpea].Sowing
              VariableNames:
                [Clock].Today
                [Chickpea].SowingData.Cultivar
                [IWeather].Latitude
                [IWeather].Longitude
    Folder NewSouthWales
      Experiment Kulai_2003_
        Memo
          Experiment conducted by J Whish, near North Star on a red kandosol (there are a few paddocks with this soil in this district). 2 time of sowing x 2 row spacing.

          Some uncertainty about whether in-season soil cores were taken directly on the crop row, at the mid inter-row position.

          Interesting note: the high population, narrow row spacing treatment was the highest yielding in the observed data - as per Bremar 2003. We haven't been able to simulate this. Possible that the narrow row spacing may have had double the plant population and this was not recorded correctly.

          The site was remote and biomass loss and shattering was likely during storms prior to harvest, and probably greater in TOS1 due to increased delay in obtaining final biomass.

          There is some uncertainty around whether grower would actually have decreased plant pop for 35 cm row spacing, the plant pop for these treatments possibly may be double.
        Factors
          Factor S: Specification=[SowingRule]
            Manager 1R350
              SowDate = 2-May
              CultivarName = Amethyst
              SowingDepth = 50
              RowSpacing = 350
              Population = 28.5
              script: same as in Validation.SE Queensland.Bremar_2003_.Bremar2003.Field.SowingRule
            Manager 1R700
              SowDate = 2-May
              CultivarName = Amethyst
              SowingDepth = 50
              RowSpacing = 700
              Population = 24.5
              script: same as in Validation.SE Queensland.Bremar_2003_.Bremar2003.Field.SowingRule
            Manager 2R350
              SowDate = 15-May
              CultivarName = Amethyst
              SowingDepth = 50
              RowSpacing = 350
              Population = 33
              script: same as in Validation.SE Queensland.Bremar_2003_.Bremar2003.Field.SowingRule
            Manager 2R700
              SowDate = 15-May
              CultivarName = Amethyst
              SowingDepth = 50
              RowSpacing = 700
              Population = 22
              script: same as in Validation.SE Queensland.Bremar_2003_.Bremar2003.Field.SowingRule
        Simulation Kulai_2003
          Weather: FileName=kulai2.met
          Clock: Start=2003-05-01; End=2003-12-30
          Summary summaryfile
          SoilArbitrator Soil Arbitrator
          Zone Field: Area=1; Slope=0; AspectAngle=0; Altitude=50
            MicroClimate: a_interception=0; b_interception=1; c_interception=0; d_interception=0; SoilHeatFluxFraction=0.4; MinimumHeightDiffForNewLayer=0; NightInterceptionFraction=0.5; ReferenceHeight=2
            Irrigation
            Fertiliser
            SurfaceOrganicMatter: InitialResidueName=wheat; InitialResidueType=wheat; InitialResidueMass=1500; InitialStandingFraction=0; InitialCPR=0; InitialCNR=76
            Operations IrrigationSchedule
            Report: same as Validation.SE Queensland.Bremar_2003_.Bremar2003.Field.Report
            Report HarvestReport: EventNames=[Chickpea].Harvesting
              VariableNames:
                [Clock].Today
                [Chickpea].Phenology.CurrentStageName as Stage
                [Chickpea].Phenology.FloweringDAS as FloweringDAS
                [Chickpea].Phenology.MaturityDAS as MaturityDAS
                [Chickpea].Grain.Live.Wt as GrainWt
            Manager Harvesting: same as Validation.SE Queensland.Bremar_2003_.Bremar2003.Field.Harvesting
            Plant Chickpea
            Soil: Latitude=0; Longitude=0
              Physical
                Thickness  BD    AirDry  LL15  DUL   SAT
                150        1.45  0.06    0.17  0.35  0.4
                150        1.43  0.16    0.17  0.34  0.39
                300        1.34  0.16    0.17  0.31  0.36
                300        1.36  0.18    0.19  0.3   0.35
                300        1.41  0.22    0.23  0.35  0.4
                300        1.61  0.25    0.26  0.37  0.39
                300        1.61  0.31    0.33  0.36  0.39
                SoilCrop ChickpeaSoil: LL=[0.18, 0.18, 0.18, 0.2, 0.24, 0.27, 0.34]; KL=[0.06, 0.06, 0.06, 0.04, 0.025, 0, 0]; XF=[1, 1, 1, 1, 0.5, 0, 0]
              WaterBalance SoilWater: SummerDate=1-Nov; SummerU=6; SummerCona=3.5; WinterDate=1-Apr; WinterU=4; WinterCona=2.5; DiffusConst=40; DiffusSlope=16; Salb=0.13; CN2Bare=78; CNRed=20; CNCov=0.8; PSIDul=-100; Thickness=[150, 150, 300, 300, 300, 300, 300]; SWCON=[0.3, 0.3, 0.3, 0.3, 0.3, 0.3, 0.3]
              Nutrient
              Organic: FOMCNRatio=50; CarbonUnits=Total
                Thickness  Carbon  SoilCNRatio  FBiom  FInert  FOM
                150        1.19    12.5         0.05   0.39    347.129
                150        1.01    12.5         0.02   0.47    270.344
                300        0.45    12.5         0.015  0.52    163.972
                300        0.3     12.5         0.01   0.62    99.4541
                300        0.3     12.5         0.01   0.62    60.322
                300        0.2     12.5         0.01   0.74    36.5871
                300        0.16    12.5         0.01   0.83    22.1912
              Chemical: Thickness=[150, 150, 300, 300, 300, 300, 300]; PH=[7.6, 7.9, 8.6, 8.7, 8.9, 8.9, 8.9]; PHUnits=Water
              Water: Thickness=[150, 150, 300, 300, 300, 300, 300]; InitialValues=[0.216, 0.249, 0.251, 0.253, 0.261, 0.32, 0.32]; FilledFromTop=false
              Solute NO3: same as Validation.SE Queensland.Bremar_2003_.Bremar2003.Field.Red Chromosol Enarra No216.NO3
              Solute NH4: same as Validation.SE Queensland.Bremar_2003_.Bremar2003.Field.Red Chromosol Enarra No216.NH4
              Solute Urea: same as Validation.2019_PulseAdaptation.Emerald19_.Emerald19_.Field.Vertosol_No8.Urea
              SoilTemperature Temperature
            Manager SowingRule: same as Validation.SE Queensland.Bremar_2003_.Bremar2003.Field.SowingRule
            Report RDDReport: EventNames=[Chickpea].Harvesting
              VariableNames:
                [Clock].Today
                [Chickpea].Phenology.RadDegDays
            Report SowingReport: EventNames=[Chickpea].Sowing
              VariableNames:
                [Clock].Today
                [Chickpea].SowingData.Cultivar
                [IWeather].Latitude
                [IWeather].Longitude
      Experiment Kulai_2004_
        Memo
          Experiment conducted by J Whish, near North Star. In this second year the experiment was conducted on a reddy-brown vertosol on the same farm as the year 1 experiment, which was on a red kandosol (there are a few paddocks with this soil in this district). 2 time of sowing x 2 row spacing.

          Some uncertainty about whether in-season soil cores were taken directly on the crop row, at the mid inter-row position.

          The site was remote and biomass loss and shattering was likely during storms prior to harvest, and probably greater in TOS1 due to increased delay in obtaining final biomass.

          There is some uncertainty around whether grower would actually have decreased plant pop for 35 cm row spacing, the plant pop for these treatments possibly may be double.
        Factors
          Factor S: Specification=[SowingRule]
            Manager 1R350
              SowDate = 22-May
              CultivarName = Amethyst
              SowingDepth = 50
              RowSpacing = 350
              Population = 23
              script: same as in Validation.SE Queensland.Bremar_2003_.Bremar2003.Field.SowingRule
            Manager 1R700
              SowDate = 22-May
              CultivarName = Amethyst
              SowingDepth = 50
              RowSpacing = 700
              Population = 18
              script: same as in Validation.SE Queensland.Bremar_2003_.Bremar2003.Field.SowingRule
            Manager 2R350
              SowDate = 22-Jun
              CultivarName = Amethyst
              SowingDepth = 50
              RowSpacing = 350
              Population = 17.5
              script: same as in Validation.SE Queensland.Bremar_2003_.Bremar2003.Field.SowingRule
            Manager 2R700
              SowDate = 22-Jun
              CultivarName = Amethyst
              SowingDepth = 50
              RowSpacing = 700
              Population = 13
              script: same as in Validation.SE Queensland.Bremar_2003_.Bremar2003.Field.SowingRule
        Simulation Kulai_2004
          Memo
            These simulations are based on data from two years of field trials done in Lincoln, Canterbury, New Zealand from 1998 to 2000. These trials used three cultivars of Kabuli chickpeas. However the results presented here are the average of cultivars for measurements that had no differences among cultivars tested. The experimental design was a split split plot with irrigation as main plot, sowing dates as sub plots and cultivars as sub sub plots.
            The first season, from 1998 until 1999, had two sowing dates (3rd if November and 7th of December) and eight irrigation treatments. Treatments were nil irrigation, full irrigation from emergence to physiological maturity, full from emergence to flowering, half irrigation from emergence to flowering, full from flowering to podding, half from flowering to podding, full from podding to physiological maturity and half from podding to physiological maturity. In these treatments irrigation was applied weekly and the fully irrigated treatment applied the same amount of water lost through evapotranspiration in the previous week. The half irrigation treatment replaced half of the amount lost in the previous week.
            Results from this season include biomass, grain yield, pods per plant, LAI, soil volumetric water content and flowering, podding and physsiological maturity dates.
            The second season, from 1999 to 2000, had two sowing dates (18th of October and 22nd of November) and four irrigation treatments. These were nil irrigation, full from emergence to physiological maturity, full from flowering to podding and full from podding to physiological maturity. The results from this season do not include LAI measurements.
            More information about the data is available in Anwar, M.R. 2001. Water use of Kabuli chickpea (Cicer arietinum L.) cultivars in Canterbury. (PhD thesis, Lincoln University).
          Weather: FileName=kulai2.met
          Clock: Start=2004-01-01; End=2004-12-30
          Summary summaryfile
          SoilArbitrator Soil Arbitrator
          Zone Field: Area=1; Slope=0; AspectAngle=0; Altitude=50
            MicroClimate: a_interception=0; b_interception=1; c_interception=0; d_interception=0; SoilHeatFluxFraction=0.4; MinimumHeightDiffForNewLayer=0; NightInterceptionFraction=0.5; ReferenceHeight=2
            Irrigation
            Fertiliser
            SurfaceOrganicMatter: InitialResidueName=wheat; InitialResidueType=wheat; InitialResidueMass=1500; InitialStandingFraction=0; InitialCPR=0; InitialCNR=76
            Operations IrrigationSchedule
            Report: same as Validation.SE Queensland.Bremar_2003_.Bremar2003.Field.Report
            Report HarvestReport: EventNames=[Chickpea].Harvesting
              VariableNames:
                [Clock].Today
                [Chickpea].Phenology.CurrentStageName as Stage
                [Chickpea].Phenology.FloweringDAS as FloweringDAS
                [Chickpea].Phenology.MaturityDAS as MaturityDAS
                [Chickpea].Grain.Live.Wt as GrainWt
            Manager Harvesting: same as Validation.SE Queensland.Bremar_2003_.Bremar2003.Field.Harvesting
            Plant Chickpea
            Soil 2004soil056: Latitude=0; Longitude=0
              Physical
                Thickness  BD    AirDry  LL15  DUL   SAT
                150        1.37  0.06    0.17  0.4   0.45
                150        1.39  0.16    0.17  0.4   0.45
                300        1.37  0.16    0.17  0.4   0.45
                300        1.39  0.18    0.19  0.4   0.45
                300        1.42  0.22    0.23  0.38  0.43
                300        1.55  0.25    0.26  0.34  0.39
                300        1.54  0.31    0.33  0.34  0.38
                SoilCrop ChickpeaSoil: LL=[0.27, 0.27, 0.28, 0.32, 0.35, 0.34, 0.34]; KL=[0.06, 0.06, 0.06, 0.04, 0.02, 0, 0]; XF=[1, 1, 1, 1, 0.5, 0, 0]
              WaterBalance SoilWater: SummerDate=1-Nov; SummerU=6; SummerCona=3.5; WinterDate=1-Apr; WinterU=4; WinterCona=2.5; DiffusConst=40; DiffusSlope=16; Salb=0.13; CN2Bare=73; CNRed=20; CNCov=0.8; PSIDul=-100; Thickness=[150, 150, 300, 300, 300, 300, 300]; SWCON=[0.3, 0.3, 0.3, 0.3, 0.3, 0.3, 0.3]
              Nutrient
              Organic: same as Validation.NewSouthWales.Kulai_2003_.Kulai_2003.Field.soil.Organic
              Chemical: Thickness=[150, 150, 300, 300, 300, 300, 300]; PH=[7.6, 7.9, 8.6, 8.7, 8.9, 8.9, 8.9]; PHUnits=Water
              Water: Thickness=[150, 150, 300, 300, 300, 300, 300]; InitialValues=[0.356, 0.397, 0.413, 0.397, 0.343, 0.341, 0.33]; FilledFromTop=false
              Solute NO3: same as Validation.SE Queensland.Bremar_2003_.Bremar2003.Field.Red Chromosol Enarra No216.NO3
              Solute NH4: same as Validation.SE Queensland.Bremar_2003_.Bremar2003.Field.Red Chromosol Enarra No216.NH4
              Solute Urea: same as Validation.2019_PulseAdaptation.Emerald19_.Emerald19_.Field.Vertosol_No8.Urea
              SoilTemperature Temperature
            Manager SowingRule: same as Validation.SE Queensland.Bremar_2003_.Bremar2003.Field.SowingRule
            Report RDDReport: EventNames=[Chickpea].Harvesting
              VariableNames:
                [Clock].Today
                [Chickpea].Phenology.RadDegDays
            Report SowingReport: EventNames=[Chickpea].Sowing
              VariableNames:
                [Clock].Today
                [Chickpea].SowingData.Cultivar
                [IWeather].Latitude
                [IWeather].Longitude
    Folder ICRISAT
      Experiment ICRISAT_18_19_BM8_
        Memo
          Experiment conducted at ICRISAT, Hyderabad in 2018/2019 by Amir Hajjapoor, postdoc working for Jana Kholova.

           A number of experiments were conducted but there were many problems with emergence and pests (peacocks).
           This experiment was the best, 4 cultivars x one sowing date. Plant stand was uneven but OK.

           Unsure why grain yield is not simulated well when biomass was. Pod + grain data indicates simulated grain development was behind the observed, perhaps in a warm environment pod initiation occurs sooner, or cultivars may have a different branching structure that allows them to set more grains faster once flowering begins. Also possible that flowering date was not correctly recorded and perhaps grainfilling began sooner.
        Factors
          Factor Cv_: Specification=[SowingRule]
            Operations JAKI
              2018-11-21  [Chickpea].Sow(population:33, cultivar:"JAKI", depth:50, rowSpacing:300);
              2018-11-08  [Irrigation].Apply(amount:47, depth:0,efficiency:1, willRunoff:false);
              2018-11-22  [Irrigation].Apply(amount:42, depth:0,efficiency:1, willRunoff:false);
              2019-01-09  [Irrigation].Apply(amount:55, depth:0,efficiency:1, willRunoff:false);
            Operations ICCV2
              2018-11-21  [Chickpea].Sow(population:33, cultivar:"ICCV2", depth:50, rowSpacing:300);
              2018-11-08  [Irrigation].Apply(amount:47, depth:0,efficiency:1, willRunoff:false);
              2018-11-22  [Irrigation].Apply(amount:42, depth:0,efficiency:1, willRunoff:false);
              2019-01-09  [Irrigation].Apply(amount:55, depth:0,efficiency:1, willRunoff:false);
            Operations NBeG47
              2018-11-21  [Chickpea].Sow(population:33, cultivar:"NBeG47", depth:50, rowSpacing:300);
              2018-11-08  [Irrigation].Apply(amount:47, depth:0,efficiency:1, willRunoff:false);
              2018-11-22  [Irrigation].Apply(amount:42, depth:0,efficiency:1, willRunoff:false);
              2019-01-09  [Irrigation].Apply(amount:55, depth:0,efficiency:1, willRunoff:false);
            Operations NBeG119
              2018-11-21  [Chickpea].Sow(population:33, cultivar:"NBeG119", depth:30, rowSpacing:300);
              2018-11-08  [Irrigation].Apply(amount:47, depth:0,efficiency:1, willRunoff:false);
              2018-11-22  [Irrigation].Apply(amount:42, depth:0,efficiency:1, willRunoff:false);
              2019-01-09  [Irrigation].Apply(amount:55, depth:0,efficiency:1, willRunoff:false);
        Simulation ICRISAT_BM8
          Memo
            Experiment conducted by Amir Hajjapoor and Jana Kholova, data simulated by A Peake.
          Weather: FileName=Hyderabad.met
          Clock: Start=2018-11-01; End=2019-03-28
          Summary summaryfile
          SoilArbitrator Soil Arbitrator
          Zone Field: Area=1; Slope=0; AspectAngle=0; Altitude=50
            MicroClimate: a_interception=0; b_interception=1; c_interception=0; d_interception=0; SoilHeatFluxFraction=0.4; MinimumHeightDiffForNewLayer=0; NightInterceptionFraction=0.5; ReferenceHeight=2
            Irrigation
            Fertiliser
            SurfaceOrganicMatter: InitialResidueName=wheat; InitialResidueType=wheat; InitialResidueMass=1500; InitialStandingFraction=0; InitialCPR=0; InitialCNR=76
            Operations IrrigationSchedule
            Report: same as Validation.SE Queensland.Bremar_2003_.Bremar2003.Field.Report
            Report HarvestReport: EventNames=[Chickpea].Harvesting
              VariableNames:
                [Clock].Today
                [Chickpea].Phenology.CurrentStageName as Stage
                [Chickpea].Phenology.FloweringDAS as FloweringDAS
                [Chickpea].Phenology.MaturityDAS as MaturityDAS
                [Chickpea].Grain.Live.Wt as GrainWt
            Manager Harvesting: same as Validation.SE Queensland.Bremar_2003_.Bremar2003.Field.Harvesting
            Plant Chickpea
            Manager SowingRule
              SowDate = 24-Jul
              CultivarName = Amethyst
              SowingDepth = 50
              RowSpacing = 300
              Population = 30
              script: same as in Validation.SE Queensland.Bremar_2003_.Bremar2003.Field.SowingRule
            Soil Vertosol_9_PAWC180: ASCOrder=Vertosol; SoilType=Clay; Site=Generic-Qld; State=Generic; Country=Australia; NaturalVegetation=NA; ApsoilNumber=521-GENERIC; Latitude=-27.183286; Longitude=151.263748; LocationAccuracy=Regional Soil Type; DataSource=Generic soil. CSIRO Sustainable Ecosystems, Toowoomba
              Comments=Generic soil developed by Allan Peake. 'Typical Vertosol' soil properties have been calculated as the average of vertosols with similar characteristics from within the Apsoil database. Groupings were made on the basis of bulk density. Measured BD, DUL and CLL for the groups were then averaged to derive the characteristics of the typical Vertosols. They can then be used in conjunction with measured soil water to simplify the selection of appropriate Vertosols, for paddocks where full soil characterisations have not yet been completed. For more information see Peake et al. 2010: ‘A rapid method for estimating the plant available water capacity of Vertosols’, 2010 Australian Agronomy Conference. Typical Vertosols are different to 'Generic' soil types elsewhere in the Apsoil database, which are representative of certain soil types and districts, but have not been calculated from large numbers of similar, characterised soils.
              Physical
                Thickness  BD    AirDry  LL15   DUL    SAT
                150        1.44  0.101   0.201  0.378  0.428
                150        1.43  0.167   0.209  0.379  0.429
                300        1.43  0.224   0.224  0.38   0.43
                300        1.46  0.224   0.224  0.368  0.418
                300        1.48  0.224   0.224  0.363  0.413
                300        1.49  0.224   0.224  0.357  0.407
                300        1.49  0.224   0.224  0.357  0.407
                SoilCrop ChickpeaSoil: LL=[0.201, 0.209, 0.224, 0.244, 0.31, 0.34, 0.357]; KL=[0.045, 0.045, 0.045, 0.03, 0.025, 0.02, 0.01]; XF=[1, 1, 1, 1, 1, 1, 1]
                  LL source: Field measured and checked for sensibility
                SoilCrop CottonSoil: LL=[0.201, 0.209, 0.224, 0.244, 0.279, 0.31, 0.341]; KL=[0.1, 0.1, 0.1, 0.1, 0.09, 0.07, 0.05]; XF=[1, 1, 1, 1, 1, 1, 1]
                  LL source: Field measured and checked for sensibility
                SoilCrop SorghumSoil: LL=[0.201, 0.209, 0.224, 0.244, 0.279, 0.31, 0.341]; KL=[0.07, 0.07, 0.07, 0.05, 0.05, 0.04, 0.03]; XF=[1, 1, 1, 1, 1, 1, 1]
                  LL source: Field measured and checked for sensibility
              WaterBalance SoilWater: SummerDate=1-Apr; SummerU=4; SummerCona=2.5; WinterDate=1-Oct; WinterU=6; WinterCona=3.5; DiffusConst=40; DiffusSlope=16; Salb=0.13; CN2Bare=78; CNRed=20; CNCov=0.8; PSIDul=-100; Thickness=[150, 150, 300, 300, 300, 300, 300]; SWCON=[0.3, 0.3, 0.3, 0.3, 0.3, 0.3, 0.3]
              Nutrient
              Organic: FOMCNRatio=40; CarbonUnits=Total
                Thickness  Carbon   SoilCNRatio  FBiom  FInert  FOM
                150        1.235    12           0.04   0.4     347.129
                150        0.988    12           0.02   0.6     270.344
                300        0.6175   12           0.02   0.8     163.972
                300        0.30875  12           0.02   1       99.4541
                300        0.18525  12           0.01   1       60.322
                300        0.1235   12           0.01   1       36.5871
                300        0.1235   12           0.01   1       22.1912
              Chemical: Thickness=[150, 150, 300, 300, 300, 300, 300]; PH=[8.1, 8.7, 8.9, 8, 7, 6.4, 5.8]; PHUnits=Water
              Water: Thickness=[150, 150, 300, 300, 300, 300, 300]; InitialValues=[0.339, 0.346, 0.373, 0.4, 0.396, 0.396, 0.396]; FilledFromTop=false
              Solute NO3: InitialValuesUnits=ppm; WaterTableConcentration=0; D0=0; DepthConstant=0; MaxDepthSoluteAccessible=0; RunoffEffectivenessAtMovingSolute=0; MaxEffectiveRunoff=0
              Solute NH4: InitialValuesUnits=ppm; WaterTableConcentration=0; D0=0; DepthConstant=0; MaxDepthSoluteAccessible=0; RunoffEffectivenessAtMovingSolute=0; MaxEffectiveRunoff=0
              Solute Urea: same as Validation.2019_PulseAdaptation.Emerald19_.Emerald19_.Field.Vertosol_No8.Urea
              SoilTemperature Temperature
            Report RDDReport: EventNames=[Chickpea].Harvesting
              VariableNames:
                [Clock].Today
                [Chickpea].Phenology.RadDegDays
            Report SowingReport: EventNames=[Chickpea].Sowing
              VariableNames:
                [Clock].Today
                [Chickpea].SowingData.Cultivar
                [IWeather].Latitude
                [IWeather].Longitude
        Memo
          4th biomass cut was taken almost at Phys. maturity - beginning to go yellow, may explain low SLA
  Folder Sensibility
    Experiment FixationResponse
      Memo
        Field studies by [#Schwenke1998] showed that, for chickpea crops near Walgett/Moree in 1995, the proportion of total plan N derived from fixation decreased from about 90% when soil nitrate was very low at sowing, down to approximately 20% when soil nitrate was near 100kg/ha at sowing.  Furthermore, N fixation was unable to account for N export in grain.
      Factors
        Factor N: Specification=[NRate].Script.Amount = 0 to 200 step 10
      Simulation FixationResponseToNitrogenBase
        Weather: FileName=Walgett.met
        Clock: Start=1995-05-01; End=1995-12-31
        Summary summaryfile
        MicroClimate: a_interception=0; b_interception=1; c_interception=0; d_interception=0; SoilHeatFluxFraction=0.4; MinimumHeightDiffForNewLayer=0; NightInterceptionFraction=0.5; ReferenceHeight=2
        SoilArbitrator Soil Arbitrator
        Zone Field: Area=1; Slope=0; AspectAngle=0; Altitude=50
          Irrigation
          Fertiliser
          SurfaceOrganicMatter: InitialResidueName=maize; InitialResidueType=maize; InitialResidueMass=500; InitialStandingFraction=0; InitialCPR=0; InitialCNR=65
          Operations Sowing
            1995-05-20  [Chickpea].Sow(population:25, cultivar:"Amethyst", depth:50, rowSpacing:500);
          Manager NRate
            Crop = [Chickpea]
            FertiliserType = UreaN
            Amount = 160
            script: same as in Validation.2019_PulseAdaptation.Greenethorpe_2019_.Greenethorpe_2019_.Field.Fertilise at sowing
          Report: same as Validation.2019_PulseAdaptation.Emerald19_.Emerald19_.Field.Report
          Soil Comeby: ASCOrder=Vertosol; SoilType=Clay; Site=Generic-Qld; State=Generic; Country=Australia; NaturalVegetation=NA; ApsoilNumber=523-GENERIC; Latitude=-27.183286; Longitude=151.263748; LocationAccuracy=Regional Soil Type; DataSource=Generic soil. CSIRO Sustainable Ecosystems, Toowoomba
            Comments=Generic soil developed by Allan Peake. 'Typical Vertosol' soil properties have been calculated as the average of vertosols with similar characteristics from within the Apsoil database. Groupings were made on the basis of bulk density. Measured BD, DUL and CLL for the groups were then averaged to derive the characteristics of the typical Vertosols. They can then be used in conjunction with measured soil water to simplify the selection of appropriate Vertosols, for paddocks where full soil characterisations have not yet been completed. For more information see Peake et al. 2010: ‘A rapid method for estimating the plant available water capacity of Vertosols’, 2010 Australian Agronomy Conference. Typical Vertosols are different to 'Generic' soil types elsewhere in the Apsoil database, which are representative of certain soil types and districts, but have not been calculated from large numbers of similar, characterised soils.
            Memo
              This soil is AP's TypVert 11 "Vertosol No11 (PAWC-136 No523-Generic)".
            Physical: same as Validation.2019_PulseAdaptation.Walgett19_.Walgett19.Field.Comeby.Physical
            WaterBalance SoilWater: SummerDate=1-Nov; SummerU=2; SummerCona=4.5; WinterDate=1-Apr; WinterU=2; WinterCona=4; DiffusConst=88; DiffusSlope=35; Salb=0.14; CN2Bare=73; CNRed=20; CNCov=0.8; PSIDul=-100; Thickness=[150, 150, 300, 300, 300, 300, 300]; SWCON=[0.3, 0.3, 0.3, 0.3, 0.3, 0.3, 0.3]
            Nutrient
            Organic: same as Validation.2019_PulseAdaptation.Walgett19_.Walgett19.Field.Comeby.Organic
            Chemical: Thickness=[150, 150, 300, 300, 300, 300, 300]; PH=[8.1, 8.7, 8.9, 8, 7, 6.4, 5.8]; PHUnits=Water
            Water: Thickness=[150, 150, 300, 300, 300, 300, 300]; InitialValues=[0.32, 0.308, 0.321, 0.252, 0.206, 0.215, 0.23]; FilledFromTop=true
            Solute NO3: InitialValuesUnits=ppm; WaterTableConcentration=0; D0=0; DepthConstant=0; MaxDepthSoluteAccessible=0; RunoffEffectivenessAtMovingSolute=0; MaxEffectiveRunoff=0
            Solute NH4: InitialValuesUnits=ppm; WaterTableConcentration=0; D0=0; DepthConstant=0; MaxDepthSoluteAccessible=0; RunoffEffectivenessAtMovingSolute=0; MaxEffectiveRunoff=0
            Solute Urea: same as Validation.2019_PulseAdaptation.Emerald19_.Emerald19_.Field.Vertosol_No8.Urea
            SoilTemperature Temperature
          Report FixationResponseReport: EventNames=[Chickpea].Harvesting
            VariableNames:
              [Clock].Today
              sum of [Fertiliser].NitrogenApplied from [Chickpea].Sowing to [Chickpea].Harvesting as NitrogenApplied
              [Chickpea].Grain.Wt
              [Chickpea].Grain.N
              [Chickpea].Grain.NConc
              [Chickpea].AboveGround.N
              sum of sum([Chickpea].Arbitrator.N.Fixation) from [Chickpea].Sowing to [Chickpea].Harvesting as NFixed
              (NFixed / [Chickpea].Total.N) as NFixedFraction
              ([Chickpea].Grain.N/[Chickpea].Total.N) as NHI
          Manager Harvesting: same as Validation.2019_PulseAdaptation.Emerald19_.Emerald19_.Field.Harvesting
          Plant Chickpea
          Report SowingReport: EventNames=[Chickpea].Sowing
            VariableNames:
              [Clock].Today
              [Chickpea].SowingData.Cultivar
              [IWeather].Latitude
              [IWeather].Longitude
    Experiment DetailedDynamics
      Memo
        Peter Carberry unpublished data.  Creek bank soil. Varies in short distances.

        Note that Brinsmead paper says 1st sowing date was waterlogged, which would explain the delayed response on that experiment.

        Note - auto-irrigate function has been used as no record of actual irrigation? Probably that they ran out of water at the end and actually wouldn't have achieved the yields we simulated
      Factors
        Factor Sowing: Specification=[Sowing]
          Operations 1
            1990-05-20  [Chickpea].Sow(population:33.4, cultivar:"Amethyst", depth:50, rowSpacing:350);
            1990-07-29  [Irrigation].Apply(amount:100, depth:0,efficiency:1, willRunoff:false);
            1990-08-28  [Irrigation].Apply(amount:100, depth:0,efficiency:1, willRunoff:false);
            1990-09-27  [Irrigation].Apply(amount:100, depth:0,efficiency:1, willRunoff:false);
      Simulation DetailedDynamicsBase
        Weather: FileName=cooper.met
        Clock: Start=1990-05-01; End=1990-11-01
        Summary summaryfile
        SoilArbitrator Soil Arbitrator
        Zone Field: Area=1; Slope=0; AspectAngle=0; Altitude=50
          MicroClimate: a_interception=0; b_interception=1; c_interception=0; d_interception=0; SoilHeatFluxFraction=0.4; MinimumHeightDiffForNewLayer=0; NightInterceptionFraction=0.5; ReferenceHeight=2
          Irrigation
          Fertiliser
          SurfaceOrganicMatter: InitialResidueName=maize; InitialResidueType=maize; InitialResidueMass=500; InitialStandingFraction=0; InitialCPR=0; InitialCNR=65
          Operations Sowing
          Operations NRate: same as Validation.SE Queensland.Lawes1990.Lawes1990.Field.NRate
          Report DetailedReport: EventNames=[Clock].DoReport
            VariableNames:
              [Clock].Today
              [Chickpea].Leaf.Wt
              [Chickpea].Leaf.N
              [Chickpea].Leaf.Total.StructuralWt
              [Chickpea].Leaf.Total.StructuralN
              [Chickpea].Leaf.Live.StructuralWt
              [Chickpea].Leaf.Live.StructuralN
              [Chickpea].Leaf.Live.Wt
              [Chickpea].Leaf.Live.StructuralWt
              [Chickpea].Leaf.Live.N
              [Chickpea].Leaf.Live.NConc
              [Chickpea].Leaf.NConc
              [Chickpea].Leaf.Senesced.Wt
              [Chickpea].Stem.Wt
              [Chickpea].Stem.Live.Wt
              [Chickpea].Stem.Live.N
              [Chickpea].Stem.Total.StructuralWt
              [Chickpea].Stem.Total.StructuralN
              [Chickpea].Stem.Live.StructuralWt
              [Chickpea].Stem.Live.StructuralN
              [Chickpea].Stem.Live.NConc
              [Chickpea].Stem.N
              [Chickpea].Stem.NConc
              [Chickpea].Shell.Wt
              [Chickpea].Shell.N
              [Chickpea].Shell.Total.StructuralWt
              [Chickpea].Shell.Total.StructuralN
              [Chickpea].Shell.Live.Wt
              [Chickpea].Shell.Live.N
              [Chickpea].Shell.Live.StructuralWt
              [Chickpea].Shell.Live.StructuralN
              [Chickpea].Shell.Live.NConc
              [Chickpea].Shell.NConc
              [Chickpea].Grain.Wt
              [Chickpea].Grain.N
              [Chickpea].Grain.NConc
              [Chickpea].Grain.Live.NConc
              [Chickpea].Shell.Wt
              [Chickpea].Pod.Wt
              [Chickpea].Pod.N
              [Chickpea].Pod.NConc
              [Chickpea].Arbitrator.DM.TotalFixationSupply
              sum([Chickpea].Arbitrator.N.Fixation) as NFixed
              [Chickpea].Arbitrator.DM.TotalPlantDemand
              [Chickpea].Leaf.DMDemand.Total
              [Chickpea].Stem.DMDemand.Total
              [Chickpea].Shell.DMDemand.Total
              [Chickpea].Grain.DMDemand.Total
              [Chickpea].Root.DMDemand.Total
              [Chickpea].Leaf.Height
              [Chickpea].Structure.Height
          Soil: Latitude=0; Longitude=0
            Physical
              Thickness  BD    AirDry  LL15   DUL    SAT
              150        1.32  0.1     0.31   0.413  0.453
              150        1.32  0.1     0.31   0.413  0.453
              150        1.38  0.26    0.313  0.454  0.479
              300        1.33  0.32    0.376  0.495  0.498
              300        1.33  0.3     0.356  0.495  0.498
              300        1.42  0.27    0.3    0.418  0.464
              300        1.33  0.24    0.303  0.4    0.457
              300        1.35  0.31    0.31   0.37   0.435
              400        1.4   0.16    0.16   0.29   0.38
              SoilCrop ChickpeaSoil: LL=[0.3, 0.3, 0.3, 0.35, 0.35, 0.27, 0.303, 0.31, 0.16]; KL=[0.045, 0.045, 0.045, 0.037, 0.25, 0.015, 0.01, 0, 0]; XF=[1, 1, 1, 1, 1, 1, 1, 1, 1]
            WaterBalance SoilWater: same as Validation.SE Queensland.Lawes1990.Lawes1990.Field.soil.SoilWater
            Nutrient
            Organic: same as Validation.SE Queensland.Lawes1990.Lawes1990.Field.soil.Organic
            Chemical: Thickness=[100, 100, 100, 200, 200, 200, 200, 200, 200]; PH=[6, 6, 6, 6.2, 6.5, 6.7, 6.8, 6.8, 6.8]; PHUnits=Water
            Water: Thickness=[150, 150, 300, 300, 300, 300, 300]; InitialValues=[0.413, 0.45, 0.408, 0.374, 0.327, 0.325, 0.371]; FilledFromTop=false
            Solute NO3: same as Validation.SE Queensland.Lawes1990.Lawes1990.Field.soil.NO3
            Solute NH4: same as Validation.SE Queensland.Lawes1990.Lawes1990.Field.soil.NH4
            Solute Urea: same as Validation.SE Queensland.Lawes1990.Lawes1990.Field.soil.Urea
            SoilTemperature Temperature
          Report HarvestReport: EventNames=[Chickpea].Harvesting
            VariableNames:
              [Clock].Today
              [Chickpea].Phenology.CurrentStageName as Stage
              [Chickpea].Phenology.FloweringDAS as FloweringDAS
              [Chickpea].Phenology.MaturityDAS as MaturityDAS
              [Chickpea].Grain.Live.Wt as GrainWt
              [Chickpea].AboveGround.Wt
          Manager Harvesting: same as Validation.2019_PulseAdaptation.Emerald19_.Emerald19_.Field.Harvesting
          Plant Chickpea
          Manager AutoIrrigate: same as Validation.SE Queensland.Lawes1990.Lawes1990.Field.AutoIrrigate
          Report SowingReport: EventNames=[Chickpea].Sowing
            VariableNames:
              [Clock].Today
              [Chickpea].SowingData.Cultivar
              [IWeather].Latitude
              [IWeather].Longitude
    Experiment CO2TE
      Memo
        This test examines the impact of a doubling of CO2 from historical (350ppm) on Transpiration Efficiency.  [#Reyenga1999] suggest an increase of approximately 37% in Transpiration Efficiency over this range in CO2 concentration for c3 plants (wheat).
        In this test, a series of chickpea crops are simulated for Dalby, Queensland, Australia.  The slope of plots of biomass production vs crop water use is used to quantify a gross seasonal TE.  The change in slope should approximate the response suggested by [#Reyenga1999].
      Factors
        Factor CO2: Specification=[SetCO2]
          Manager 350ppm
            CO2 = 350
```csharp
using Models.Soils;
using System.Xml.Serialization;
using Models;
using Models.PMF;
using System.Text;
using System.Collections.Generic;
using APSIM.Shared.Utilities;
using Models.Core;
using System;
using Models.Climate;

namespace Models
{
    [Serializable] 
    [System.Xml.Serialization.XmlInclude(typeof(Model))]
    public class Script : Model
    {
        [Link] Weather Met;
        [Link] Clock Clock;
    
        [Description("CO2 conc")]
        public double CO2 { get; set; }
    
        
        [EventSubscribe("PreparingNewWeatherData")]
        private void OnPreparingNewWeatherData(object sender, EventArgs e)
        {
            Met.CO2 = CO2;        
        }
    }
}
```
          Manager 700ppm
            CO2 = 700
            script: same as in Sensibility.CO2TE.Factors.CO2.350ppm
      Simulation CO2TEBaseSimulation
        Clock: Start=1990-01-01; End=2000-12-31
        Summary summaryfile
        Weather: FileName=%root%/Examples/WeatherFiles/AU_Dalby.met
        SoilArbitrator Soil Arbitrator
        MicroClimate: a_interception=0; b_interception=1; c_interception=0; d_interception=0; SoilHeatFluxFraction=0.4; MinimumHeightDiffForNewLayer=0; NightInterceptionFraction=0.5; ReferenceHeight=2
        Zone Field: Area=1; Slope=0; AspectAngle=0; Altitude=50
          Fertiliser
          SurfaceOrganicMatter: InitialResidueName=wheat_stubble; InitialResidueType=wheat; InitialResidueMass=500; InitialStandingFraction=0; InitialCPR=0; InitialCNR=100
          Soil: ASCOrder=Vertosol; ASCSubOrder=Black; SoilType=Clay; Site=Norwin; NearestTown=Norwin; Region=Darling Downs and Granite Belt; State=Queensland; Country=Australia; NaturalVegetation=Qld. Bluegrass, possible Qld. Blue gum; ApsoilNumber=900; Latitude=-27.581836; Longitude=151.320206; LocationAccuracy=+/- 20m
            DataSource=CSIRO Sustainable Ecosystems, Toowoomba; Characteriesd as part of the GRDC funded project"Doing it better, doing it smarter, managing soil water in Australian agriculture' 2011
            Comments=OC, CLL for all crops estimated-based on Bongeen Mywybilla Soil No1
            Physical
              Thickness  BD       AirDry    LL15      DUL       SAT       KS
              150        1.01056  0.13025   0.2605    0.521     0.588655  20
              150        1.07146  0.198689  0.248362  0.496723  0.565677  20
              300        1.09394  0.28      0.28      0.488438  0.557193  20
              300        1.15861  0.28      0.28      0.480297  0.532787  20
              300        1.17301  0.28      0.28      0.471584  0.527354  20
              300        1.16287  0.28      0.28      0.457071  0.53118   20
              300        1.1875   0.28      0.28      0.452332  0.521888  20
              SoilCrop ChickpeaSoil: LL=[0.261, 0.248, 0.28, 0.306, 0.36, 0.392, 0.446]; KL=[0.06, 0.06, 0.06, 0.04, 0.04, 0.02, 0.01]; XF=[1, 1, 1, 1, 1, 1, 1]
            WaterBalance SoilWater: SummerDate=1-Nov; SummerU=5; SummerCona=5; WinterDate=1-Apr; WinterU=5; WinterCona=5; DiffusConst=40; DiffusSlope=16; Salb=0.12; CN2Bare=73; CNRed=20; CNCov=0.8; PSIDul=-100; Thickness=[150, 150, 300, 300, 300, 300, 300]; SWCON=[0.3, 0.3, 0.3, 0.3, 0.3, 0.3, 0.3]
            Organic: FOMCNRatio=40; CarbonUnits=Total
              Thickness  Carbon  SoilCNRatio  FBiom  FInert  FOM
              150        1.2     12           0.04   0.4     347.129
              150        0.96    12           0.02   0.6     270.344
              300        0.6     12           0.02   0.8     163.972
              300        0.3     12           0.02   1       99.4541
              300        0.18    12           0.01   1       60.322
              300        0.12    12           0.01   1       36.5871
              300        0.12    12           0.01   1       22.1912
            Chemical: Thickness=[150, 150, 300, 300, 300, 300, 300]; PH=[8, 8, 8, 8, 8, 8, 8]; PHUnits=Water
            Water: Thickness=[150, 150, 300, 300, 300, 300, 300]; FilledFromTop=false
              InitialValues=[0.521, 0.496723, 0.488438, 0.480297, 0.471584, 0.457071, 0.452332]
            Nutrient
            Solute NO3: Thickness=[150, 150, 300, 300, 300, 300, 300]; InitialValues=[1, 1, 1, 1, 1, 1, 1]; InitialValuesUnits=ppm; WaterTableConcentration=0; D0=0; DepthConstant=0; MaxDepthSoluteAccessible=0; RunoffEffectivenessAtMovingSolute=0; MaxEffectiveRunoff=0
            Solute NH4: Thickness=[150, 150, 300, 300, 300, 300, 300]; InitialValues=[0.1, 0.1, 0.1, 0.1, 0.1, 0.1, 0.1]; InitialValuesUnits=ppm; WaterTableConcentration=0; D0=0; DepthConstant=0; MaxDepthSoluteAccessible=0; RunoffEffectivenessAtMovingSolute=0; MaxEffectiveRunoff=0
            Solute Urea: same as Validation.2019_PulseAdaptation.Emerald19_.Emerald19_.Field.Vertosol_No8.Urea
            SoilTemperature Temperature
          Report SensibilityReport: EventNames=[Chickpea].Harvesting
            VariableNames:
              [Clock].Today.Date
              [Chickpea].Grain.Wt
              [Chickpea].AboveGround.Wt
              Sum of [Chickpea].Leaf.Transpiration from [Chickpea].Sowing to [Chickpea].Harvesting as CropET
          Plant Chickpea
          Manager SetCO2
            CO2 = 0
```csharp
using APSIM.Core;
using Models.Climate;
using System;
using Models.Core;
using APSIM.Shared.Utilities;
using System.Collections.Generic;
using System.Text;
using Models.PMF;
using Models;
using System.Xml.Serialization;
using Models.Soils;

namespace Models
{
    [Serializable] 
    [System.Xml.Serialization.XmlInclude(typeof(Model))]
    public class Script : Model, IStructureDependency
    {
        [Link] private Weather Met;
        [Link] private Clock Clock;
        [Link] private Zone zone;
        public IStructure Structure { private get; set; }
    
        [Description("CO2 conc")]
        public double CO2 { get; set; }
    
        

        

        [EventSubscribe("PreparingNewWeatherData")]
        private void OnPreparingNewWeatherData(object sender, EventArgs e)
        {
            Structure.Set("Weather.CO2", CO2, relativeTo: zone);
        }
    }
}
```
          Manager SowingRule
            StartDate = 1-may
            EndDate = 10-jul
            MinESW = 100
            MinRain = 25
            RainDays = 7
            CultivarName = HatTrick
            SowingDepth = 30
            RowSpacing = 350
            Population = 35
```csharp
using APSIM.Numerics;
using Models.Climate;
using APSIM.Shared.Utilities;
using Models.Utilities;
using Models.Soils.Nutrients;
using Models.Soils;
using Models.PMF;
using Models.Core;
using System;
using Models.Interfaces;

namespace Models
{
    [Serializable]
    public class Script : Model
    {
        [Link] private Clock Clock;
        [Link] private Fertiliser Fertiliser;
        [Link] private Summary Summary;
        [Link] private Plant Chickpea;
        [Link] private Soil Soil;
        private Accumulator accumulatedRain;
        [Link]
        private ISoilWater waterBalance;
        
        [Description("Start of sowing window (d-mmm)")]
        public string StartDate { get; set;}
        [Description("End of sowing window (d-mmm)")]
        public string EndDate { get; set;}
        [Description("Minimum extractable soil water for sowing (mm)")]
        public double MinESW { get; set;}
        [Description("Accumulated rainfall required for sowing (mm)")]
        public double MinRain { get; set;}
        [Description("Duration of rainfall accumulation (d)")]
        public int RainDays { get; set;}
        [Description("Cultivar to be sown")]
        [Display(Type=DisplayType.CultivarName)]
        public string CultivarName { get; set;}
        [Description("Sowing depth (mm)")]
        public double SowingDepth { get; set;}        
        [Description("Row spacing (mm)")]
        public double RowSpacing { get; set;}    
        [Description("Plant population (/m2)")]
        public double Population { get; set;}    
        
        
        [EventSubscribe("StartOfSimulation")]
        private void OnSimulationCommencing(object sender, EventArgs e)
        {
            accumulatedRain = new Accumulator(this, "[Weather].Rain", RainDays);
        }
        

        [EventSubscribe("DoManagement")]
        private void OnDoManagement(object sender, EventArgs e)
        {
            accumulatedRain.Update();
            
            if (DateUtilities.WithinDates(StartDate,Clock.Today,EndDate) &&
                !Chickpea.IsAlive &&
                MathUtilities.Sum(waterBalance.ESW) > MinESW &&
                accumulatedRain.Sum > MinRain)
            {
               Chickpea.Sow(population:Population, cultivar:CultivarName, depth:SowingDepth, rowSpacing:RowSpacing);    
            }
        
        }
        
    }
}
```
          Manager Harvest
```csharp
using Models.Soils.Nutrients;
using System;
using Models.Core;
using Models.PMF;
using Models.Soils;
using Models.Soils.Nutrients;
using Models.Utilities;
using APSIM.Shared.Utilities;

namespace Models
{
    [Serializable]
    public class Script : Model
    {
        [Link] Plant Chickpea;

        [EventSubscribe("DoManagement")]
        private void OnDoManagement(object sender, EventArgs e)
        {
            if (Chickpea.IsReadyForHarvesting)
            {
               Chickpea.Harvest();
               Chickpea.EndCrop();    
            }
        
        }
        
    }
}
```
          Manager SowingFertiliser
            Amount = 20
            CropName = Chickpea
```csharp
using Models.Soils;
using System;
using Models.Core;
using Models.PMF;
namespace Models
{
    [Serializable]
    public class Script : Model
    {
        [Link] Clock Clock;
        [Link] Fertiliser Fertiliser;
        [Link] Summary Summary;
        
        
        [Description("Amount of fertiliser to be applied (kg/ha)")]
        public double Amount { get; set;}
        
        [Description("Crop to be fertilised")]
        public string CropName { get; set;}
        
        
        

        [EventSubscribe("Sowing")]
        private void OnSowing(object sender, EventArgs e)
        {
            Model crop = sender as Model;
            if (crop.Name.ToLower()==CropName.ToLower())
                Fertiliser.Apply(amount: Amount, type: "NO3N");
        }
        
    }
}
```
          Report SowingReport: EventNames=[Chickpea].Sowing
            VariableNames:
              [Clock].Today
              [Chickpea].SowingData.Cultivar
              [IWeather].Latitude
              [IWeather].Longitude
    Experiment ExtremeEnvironmentsKatherine
      Memo
        Testing ability of model to simulate rainfed chickpea production at Katherine RS, Northern Territory, Australia.

         25mm irrigation applied on day of sowing to ensure germination on all sowing dates through the year
      Factors
        Permutation
          Factor TOS
            CompositeFactor Jan
              Specifications:
                [Sowing].Script.SowDate = 1-Jan
                [Irrigate].Script.IrrigateDates = 1-Jan
            CompositeFactor Mar
              Specifications:
                [Sowing].Script.SowDate = 1-Mar
                [Irrigate].Script.IrrigateDates = 1-Mar
            CompositeFactor May
              Specifications:
                [Sowing].Script.SowDate = 1-May
                [Irrigate].Script.IrrigateDates = 1-May
            CompositeFactor Jul
              Specifications:
                [Sowing].Script.SowDate = 1-Jul
                [Irrigate].Script.IrrigateDates = 1-Jul
            CompositeFactor Sep
              Specifications:
                [Sowing].Script.SowDate = 1-Sep
                [Irrigate].Script.IrrigateDates = 1-Sep
            CompositeFactor Nov
              Specifications:
                [Sowing].Script.SowDate = 1-Nov
                [Irrigate].Script.IrrigateDates = 1-Nov
      Simulation Multi_TOS
        Weather: FileName=14904_KatherineNT.met
        Clock: Start=2000-01-01; End=2019-12-31
        Summary summaryfile
        SoilArbitrator Soil Arbitrator
        Zone Field: Area=1; Slope=0; AspectAngle=0; Altitude=50
          Manager Sowing
            SowDate = 25-Apr
            CultivarName = Amethyst
            SowingDepth = 50
            RowSpacing = 400
            Population = 30
            script: same as in Validation.2019_PulseAdaptation.Emerald19_.Emerald19_.Field.Sowing
          MicroClimate: a_interception=0; b_interception=1; c_interception=0; d_interception=0; SoilHeatFluxFraction=0.4; MinimumHeightDiffForNewLayer=0; NightInterceptionFraction=0.5; ReferenceHeight=1
          Irrigation
          Fertiliser
          SurfaceOrganicMatter: InitialResidueName=maize; InitialResidueType=maize; InitialResidueMass=500; InitialStandingFraction=0; InitialCPR=0; InitialCNR=65
          Manager Harvesting: same as Validation.2019_PulseAdaptation.Emerald19_.Emerald19_.Field.Harvesting
          Plant Chickpea
          Report FactorialReport: same as Replacements.FactorialReport
          Soil: SoilType=Sandy loam; LocalName=Mocked up kandosol; Country=Australia
            Physical
              Thickness  ParticleSizeClay  BD     AirDry  LL15  DUL   SAT
              100        10.6              1.286  0.016   0.06  0.13  0.46
              200        15.2              1.486  0.048   0.06  0.13  0.39
              300        17.7              1.471  0.05    0.08  0.15  0.396
              300        21.9              1.59   0.05    0.08  0.15  0.38
              300        21.2              1.59   0.05    0.08  0.15  0.38
              300        22.1              1.626  0.05    0.08  0.15  0.38
              300        22.1              1.626  0.05    0.08  0.15  0.38
              SoilCrop ChickpeaSoil: LL=[0.06, 0.06, 0.07, 0.08, 0.1, 0.13, 0.14]; KL=[0.03, 0.03, 0.03, 0.025, 0.02, 0.0125, 0.008]; XF=[1, 1, 1, 1, 1, 0, 0]
            WaterBalance SoilWater: SummerDate=1-Oct; SummerU=2; SummerCona=4.5; WinterDate=1-Apr; WinterU=2; WinterCona=4.5; DiffusConst=140; DiffusSlope=35; Salb=0.15; CN2Bare=70; CNRed=20; CNCov=0.8; PSIDul=-100; Thickness=[100, 100, 200, 200, 200, 200, 200, 300]; SWCON=[0.7, 0.7, 0.5, 0.5, 0.5, 0.3, 0.3, 0.3]
            Nutrient
            Organic: same as Validation.2019_PulseAdaptation.Mildura19_.Mildura19.Field.soil.Organic
            Chemical: Thickness=[100, 200, 300, 300, 300, 300, 300]; PH=[7.1, 7.95, 8.16667, 8.43333, 8.5, 8.5, 8.5]; PHUnits=Water
            Water: Thickness=[100, 200, 300, 300, 300, 300, 300]; InitialValues=[0.06, 0.06, 0.08, 0.08, 0.08, 0.08, 0.08]; FilledFromTop=false
            Solute NO3: InitialValuesUnits=ppm; WaterTableConcentration=0; D0=0; DepthConstant=0; MaxDepthSoluteAccessible=0; RunoffEffectivenessAtMovingSolute=0; MaxEffectiveRunoff=0
            Solute NH4: InitialValuesUnits=ppm; WaterTableConcentration=0; D0=0; DepthConstant=0; MaxDepthSoluteAccessible=0; RunoffEffectivenessAtMovingSolute=0; MaxEffectiveRunoff=0
            Solute Urea: same as Validation.2019_PulseAdaptation.Mildura19_.Mildura19.Field.soil.Urea
            SoilTemperature Temperature
          Manager Irrigate
            IrrigateDates = 24-jan
            Amount = 25
            Depth = 0
            Efficiency = 1
            WillRunoff = False
            script: same as in Validation.2019_PulseAdaptation.Mildura19_.Mildura19.Field.Irrigate
          Report SowingReport: EventNames=[Chickpea].Sowing
            VariableNames:
              [Clock].Today
              [Chickpea].SowingData.Cultivar
              [IWeather].Latitude
              [IWeather].Longitude
    Experiment ExtremeEnvironmentsLaunceston
      Memo
        Testing ability of model to simulate rainfed chickpea production at Launceston, Tasmania, Australia.

         25mm irrigation applied on day of sowing to ensure germination on all sowing dates through the year
      Factors
        Permutation
          Factor TOS
            CompositeFactor Jan
              Specifications:
                [Sowing].Script.SowDate = 1-Jan
                [Irrigate].Script.IrrigateDates = 1-Jan
            CompositeFactor Mar
              Specifications:
                [Sowing].Script.SowDate = 2-Mar
                [Irrigate].Script.IrrigateDates = 2-Mar
            CompositeFactor May
              Specifications:
                [Sowing].Script.SowDate = 1-May
                [Irrigate].Script.IrrigateDates = 1-May
            CompositeFactor Jul
              Specifications:
                [Sowing].Script.SowDate = 1-Jul
                [Irrigate].Script.IrrigateDates = 1-Jul
            CompositeFactor Sep
              Specifications:
                [Sowing].Script.SowDate = 1-Sep
                [Irrigate].Script.IrrigateDates = 1-Sep
            CompositeFactor Nov
              Specifications:
                [Sowing].Script.SowDate = 1-Nov
                [Irrigate].Script.IrrigateDates = 1-Nov
      Simulation Multi_TOS_Tassie
        Weather: FileName=91123Launceston.met
        Clock: Start=2000-01-01; End=2019-12-31
        Summary summaryfile
        SoilArbitrator Soil Arbitrator
        Zone Field: Area=1; Slope=0; AspectAngle=0; Altitude=50
          Manager Sowing: same as Sensibility.ExtremeEnvironmentsKatherine.Multi_TOS.Field.Sowing
          MicroClimate: a_interception=0; b_interception=1; c_interception=0; d_interception=0; SoilHeatFluxFraction=0.4; MinimumHeightDiffForNewLayer=0; NightInterceptionFraction=0.5; ReferenceHeight=1
          Irrigation
          Fertiliser
          SurfaceOrganicMatter: InitialResidueName=maize; InitialResidueType=maize; InitialResidueMass=500; InitialStandingFraction=0; InitialCPR=0; InitialCNR=65
          Manager Harvesting: same as Validation.2019_PulseAdaptation.Emerald19_.Emerald19_.Field.Harvesting
          Plant Chickpea
          Report FactorialReport: same as Replacements.FactorialReport
          Soil: SoilType=Sandy loam; LocalName=Mocked up kandosol; Country=Australia
            Physical: same as Sensibility.ExtremeEnvironmentsKatherine.Multi_TOS.Field.soil.Physical
            WaterBalance SoilWater: same as Validation.2019_PulseAdaptation.Mildura19_.Mildura19.Field.soil.SoilWater
            Nutrient
            Organic: same as Validation.2019_PulseAdaptation.Mildura19_.Mildura19.Field.soil.Organic
            Chemical: Thickness=[100, 200, 300, 300, 300, 300, 300]; PH=[7.1, 7.95, 8.16667, 8.43333, 8.5, 8.5, 8.5]; PHUnits=Water
            Water: Thickness=[100, 200, 300, 300, 300, 300, 300]; InitialValues=[0.06, 0.06, 0.08, 0.08, 0.08, 0.08, 0.08]; FilledFromTop=false
            Solute NO3: InitialValuesUnits=ppm; WaterTableConcentration=0; D0=0; DepthConstant=0; MaxDepthSoluteAccessible=0; RunoffEffectivenessAtMovingSolute=0; MaxEffectiveRunoff=0
            Solute NH4: InitialValuesUnits=ppm; WaterTableConcentration=0; D0=0; DepthConstant=0; MaxDepthSoluteAccessible=0; RunoffEffectivenessAtMovingSolute=0; MaxEffectiveRunoff=0
            Solute Urea: same as Validation.2019_PulseAdaptation.Mildura19_.Mildura19.Field.soil.Urea
            SoilTemperature Temperature
          Manager Reset on date
            ResetDate = 1-Oct
            ResetWater = No
            ResetSOM = Yes
```csharp
using Models.Soils.Nutrients;
using APSIM.Shared.Utilities;
using Models.Surface;
using Models.Utilities;
using Models.Soils;
using Models.PMF;
using Models.Core;
using System;
using Models.Interfaces;

namespace Models
{
    [Serializable]
    public class Script : Model
    {
        [Link] private Clock Clock;
        [Link] private Plant Wheat;
        [Link] private ISoilWater SoilWater;
//        [Link] private Nutrient nutrient;
        [Link] private SurfaceOrganicMatter SOM;
        [Link] private Summary Summary;

        [Description("Date to reset on:")]
        public string ResetDate {get;set;}

        [Description("Reset Water? (Yes or No)")]
        public string ResetWater {get;set;}

//        [Description("Reset Soil Nutrients ? (Yes or No)")]
//        public string ResetNutrients {get;set;}

        [Description("Reset Surface Organic Matter? (Yes or No)")]
        public string ResetSOM {get;set;}

        [EventSubscribe("DoManagement")]
        private void OnDoManagement(object sender, EventArgs e)
        {
            if (DateUtilities.WithinDates(ResetDate, Clock.Today, ResetDate))
            {
                if (ResetWater == "Yes")
                {
                    Summary.WriteMessage(this, "Reset Water", MessageType.Diagnostic);
                    SoilWater.Reset();
                }
//                if (ResetNutrients == "Yes")
//                {
//                    Summary.WriteMessage(this, "Reset Nitrogen", MessageType.Diagnostic);
//                    nutrient.Reset();
//                }
                if (ResetSOM == "Yes")
                {
                    Summary.WriteMessage(this, "Reset Surface OM", MessageType.Diagnostic);
                    SOM.Reset();
                }
            }
        }
    }
}
```
          Manager Irrigate: same as Sensibility.ExtremeEnvironmentsKatherine.Multi_TOS.Field.Irrigate
          Report SowingReport: EventNames=[Chickpea].Sowing
            VariableNames:
              [Clock].Today
              [Chickpea].SowingData.Cultivar
              [IWeather].Latitude
              [IWeather].Longitude
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