Simulations: Version=185
  DataStore
    ParallelPostSimulationTool
      SerialPostSimulationTool PredictedObserved
        ParallelPostSimulationTool ReadInputs
          ExcelInput: FileNames=[obs\Observed.xlsx]; SheetNames=[Observed]
          ExcelInput DailyObserved: FileNames=[obs\DailyObserved.xlsx]; SheetNames=[DailyObserved]
        ParallelPostSimulationTool MergeWithPredictions
          PredictedObserved: PredictedTableName=HarvestReport; ObservedTableName=Observed; FieldNameUsedForMatch=SimulationName; FieldName2UsedForMatch=Stage; AllColumns=false
          PredictedObserved DailyPredictedObserved: PredictedTableName=DailyReport; ObservedTableName=DailyObserved; FieldNameUsedForMatch=SimulationName; FieldName2UsedForMatch=Date; AllColumns=false
  Folder Replacements
    Report DailyReport: EventNames=[Clock].DoReport
      VariableNames:
        [Clock].Today
        [Clock].Today.Year as Year
        [Clock].Today.DayOfYear as day_of_year
        [Clock].Today.Date as Date
        [Phenology].DltTTFM as DltTTFM
        [Phenology].ThermalTime as TT
        [Phenology].PhenoWaterStress
        [Sorghum].DaysAfterSowing as Das
        [Sorghum].Phenology.Stage as Stage
        [Sorghum].Phenology.CurrentStageName
        [Sorghum].Phenology.CurrentPhase.Name
        [Sorghum].AboveGround.Wt
        [Sorghum].TotalLive.Wt
        [Sorghum].TotalDead.Wt
        [Sorghum].AboveGround.Wt as BiomassWt
        [Sorghum].AboveGround.N as BiomassN
        [Sorghum].Total.Wt
        [Sorghum].Root.Live.Wt as RootGreenWt
        [Sorghum].Root.Live.N as RootGreenN
        [Sorghum].Arbitrator.SDRatioBound as WaterSD
        [Leaf].Senesced.Wt
        [Leaf].Senesced.N
        [Leaf].Dead.Wt
        [Leaf].Dead.N
        [Leaf].NitrogenPhenoStress
        [Sorghum].Leaf.Live.Wt as LeafGreenWt
        [Sorghum].Leaf.Live.N as LeafGreenN
        [Sorghum].Stem.Live.Wt as StemGreenWt
        [Sorghum].Stem.Live.N as StemGreenN
        [Sorghum].Rachis.Live.Wt as RachisGreenWt
        [Sorghum].Rachis.Live.N as RachisGreenN
        [Sorghum].Grain.Live.Wt as GrainGreenWt
        [Sorghum].Grain.Live.N as GrainGreenN
        [Sorghum].Grain.Live.NConc * 100 as GrainGreenNConc
        [Sorghum].Grain.NumberFunction as GrainNo
        [Sorghum].Grain.Size * 1000 as GrainSize
        [Soil].Water.Volumetric
        sum([Soil].SoilWater.ESW) as ESW
        [Sorghum].Phenology.Juvenile.Target
        sum([Soil].NO3.kgha) as NO3
        sum([Soil].Water.Volumetric) as sw
        [Soil].NO3.kgha
        [Soil].NH4.kgha
        [Sorghum].Leaf.Photosynthesis.FW as RUEStress
        [Phenology].Emerging.Target
        [Phenology].Juvenile.Target
        [Phenology].JuvenileToFloralInit.Target
        [Phenology].FloralInitToFlagLeaf.Target
        [Phenology].FlagLeafToFlowering.Target
        [Phenology].FloweringToGrainFilling.Target
        [Phenology].GrainFilling.Target
        [Phenology].Maturing.Target
        [Phenology].MaturityToHarvestRipe.Target
        [Phenology].TTFromEmergence
        [Leaf].CoverGreen
        [Leaf].CoverTotal
        [Leaf].CoverDead
        [Leaf].RadiationIntercepted
        [Leaf].WaterDemand
        [Leaf].WaterAllocation
        [Leaf].Photosynthesis
        ([Leaf].LAITotal / ([Sorghum].Population + 0.00001) * 10000 as TPLA
        [Leaf].NDemands.Structural
        [Leaf].DMPotentialAllocation.Total
        [Leaf].SLN as SLN
        [Leaf].FertileTillerNumber
        [Phenology].TTEmergToFlagLeaf
        [Weather].Radn
        [Arbitrator].DM.TotalFixationSupply
        [Arbitrator].N.TotalFixationSupply
        [Arbitrator].N.TotalPlantSupply
        [Arbitrator].N.SupplyDemandRatioN
        [Arbitrator].N.UptakeSupply
        [Arbitrator].N.Uptake
        [Arbitrator].SDRatio
        [Arbitrator].SDRatioBound
        [Arbitrator].WatSupply
        [Grain].Live.Wt
        [Grain].Live.N
        [Grain].Size
        [Grain].LiveFWt
        [Grain].NDemand.Total
        [Grain].PotGrainFillRate
        [Grain].DMCaryopsis
        [Leaf].DMDemands.Structural.DMDemandFunction
        [Stem].DMDemands.Structural.DMDemandFunction
        [Rachis].DMDemands.Structural.DMDemandFunction
        [Leaf].DMRemaining
        [Leaf].DMSupplyFixation
        [Leaf].DMSupplyFunction
        ([Leaf].DMSupplyFixation - [Leaf].DMSupplyFunction)
        [Leaf].WaterDemandFunction
        [Leaf].DMDemands.Structural.DMDemandFunction
        [Leaf].LAI
        [Leaf].LAI as LAI
        [Leaf].SenescedLai
        [Leaf].SenescedLai as SLAI
        [Leaf].Live.N
        [Leaf].DMPotentialAllocation.Structural
        [Leaf].NDemand.Total
        [Leaf].NDemand.Structural
        [Leaf].NDemand.Metabolic
        [Leaf].NDemand.Storage
        [Leaf].Allocated.StructuralN
        [Leaf].Allocated.MetabolicN
        [Leaf].Allocated.StorageN
        [Leaf].FinalLeafNo as FinalLeafNo
        [Leaf].LeafNo as LeafNo
        [Stem].Live.Wt
        [Stem].Dead.Wt
        [Stem].Senesced.Wt
        [Stem].NDemand.Total
        [Stem].NDemand.Structural
        [Stem].NDemand.Metabolic
        [Stem].NDemand.Storage
        [Stem].Allocated.StructuralN
        [Stem].Allocated.MetabolicN
        [Stem].Allocated.StorageN
        [Root].NSupply.Total
        [Rachis].NDemand.Total
        [Root].potentialDMAllocation.Structural
        [Root].NDemand.Structural
        [Root].NDemand.Metabolic
        [Root].NDemand.Storage
        [Root].Allocated.StructuralN
        [Root].Allocated.MetabolicN
        [Root].Allocated.StorageN
        [Root].DMDemand.Total
        [Root].DMDemand.Structural
        [Root].Depth
        [Root].NTakenUp
        [Root].NUptake
        [Root].Senesced.Wt
        [Root].Senesced.N
        [Root].Dead.Wt
        [Root].Senesced.StructuralWt
        [Root].Detached.N
        [Root].Detached.Wt
        [Root].PlantZone.NUptakeSupply
        [Sorghum].TotalLive.N
        [Arbitrator].N.Allocated
        [Arbitrator].DM.NotAllocated
        [Root].NDemand.Structural + [Stem].NDemand.Structural as StructuralDemandB4Rachis
        [Root].PlantZone.DeltaNO3
        ([Arbitrator].N.TotalPlantDemand - [Leaf].NDemand.Structural) as PlantDemand
        [Arbitrator].N.TotalPlantDemand as TotalPlantNDemand
        [Phenology].DltTT.Stress as stress
        [Arbitrator].NitrogenUptakeMethod.NDiffusionSupply as NDiffusionSupply
        [Arbitrator].NitrogenUptakeMethod.NMassFlowSupply as NMassFlowSupply
        [Weather].MinT as MinT
        [Weather].MaxT as MaxT
        [Weather].Latitude as Latitude
        [C4WaterUptakeMethod].WDemand as WDemand
        [C4WaterUptakeMethod].WatSupply as WaterSupply
        [Sorghum].Arbitrator.SDRatioBound as SoilWaterDefecit
        [Sorghum].Grain.Wt as Yield
        [Sorghum].Leaf.TranspirationEfficiency as TranspirationEfficiency
        [Sorghum].Leaf.BiomassRUE as BiomassRUE
        [Sorghum].Leaf.BiomassTE as BiomassTE
        [DCaPST].DcapstModel.TotalActualBiomass as TotalActualBiomass
        [DCaPST].DcapstModel.ActualBiomass as ActualBiomass
        [DCaPST].DcapstModel.RootShootRatio as RootShootRatio
        [DCaPST].DcapstModel.TotalPotentialBiomass as TotalPotentialBiomass
        [DCaPST].DcapstModel.PotentialBiomass as PotentialBiomass
        [DCaPST].DcapstModel.WaterDemanded as EcanDemand
        [DCaPST].DcapstModel.WaterSupplied as EcanSupply
    Report HarvestReport: EventNames=[Sorghum].Harvesting
      VariableNames:
        [Sorghum].DaysAfterSowing as Das
        [Sorghum].Phenology.CurrentStageName as Stage
        [Sorghum].AboveGround.Wt as BiomassWt
        [Sorghum].AboveGround.N as biomass_n
        [Sorghum].Grain.Size * 1000 as GrainSize // FIXME!
        [Sorghum].Grain.NumberFunction as GrainNoFunc
        [Sorghum].Grain.Number as GrainNo
        [Sorghum].Leaf.LAI as LAI
        [Sorghum].Root.Live.Wt as RootGreenWt
        [Sorghum].Leaf.Live.Wt as LeafGreenWt
        [Sorghum].Stem.Live.Wt as StemGreenWt
        [Sorghum].Rachis.Live.Wt as RachisGreenWt
        [Sorghum].Grain.Live.Wt as GrainGreenWt
        [Sorghum].Root.Live.N as RootGreenN
        [Sorghum].Leaf.Live.N as LeafGreenN
        [Sorghum].Stem.Live.N as StemGreenN
        [Sorghum].Rachis.Live.N as RachisGreenN
        [Sorghum].Grain.Live.N as GrainGreenN
        [Sorghum].Grain.Live.NConc * 100 as GrainGreenNConc // old apsim grain nconc is in percent
        //[Sorghum].Leaf.Number as LeafNo
        sum([Soil].SoilWater.ESW) as ESW
        sum([Soil].NO3.kgha) as NO3
        [Sorghum].Leaf.SLN as SLN
        sum([Soil].Water.Volumetric) as sw
        // HI
        [Sorghum].Leaf.LAI / [Sorghum].Population * 10000 as GPLA
        [Sorghum].Leaf.LAIDead / [Sorghum].Population * 10000 as SPLA
        ([Sorghum].Leaf.SenescedLai / [Sorghum].Population + [Sorghum].Leaf.LAI / [Sorghum].Population) * 10000 as TPLA // gpla + spla as per old apsim. this assumes paddock area = 1ha
        [Sorghum].Leaf.LAIDead as SPLA
        // Yield
        [Sorghum].AboveGround.Wt // g/m2 - Biomass (kg/ha) in old Apsim
        [Sorghum].Leaf.LaiAnth as LaiAnth
        max of [Sorghum].Leaf.LAI from [Sorghum].Sowing to [Sorghum].Harvesting as LAImax
    Manager HarvestingRule
```csharp
using System;
using System.Collections.Generic;
using Models.Core;
using Models.Interfaces;
using Models.PMF;
using Models.PMF.Phen;

namespace Models
{
    [Serializable]
    public class Script : Model
    {
        [Link] private Clock clock;
        [Link] private Plant crop;
        [Link] private Summary summary;
        [Link] private Simulation simulation;
		
        private bool cropHarvested;
        private string simulationName;
        private PhenologyRecord highestPhenologyStageReached = new PhenologyRecord(DateTime.MinValue, 0.0, string.Empty);
        private readonly Dictionary<string, double> specialCaseExperiments = GetSpecialCaseExperiments();
        private const int END_OF_GRAIN_FILL_STAGE = 9;

        [Serializable]
        public class PhenologyRecord
        {
            public DateTime ApsimClockDate { get; set; }
            public double HighestPhenologyStage { get; set; }
            public string PhaseName { get; set; }

            public PhenologyRecord(DateTime date, double stage, string phaseName)
            {
                ApsimClockDate = date;
                HighestPhenologyStage = stage;
                PhaseName = phaseName;
            }
        }

        [EventSubscribe("StartOfSimulation")]
        private void OnStartOfSimulation(object sender, EventArgs e)
        {
            simulationName = simulation.Name;
        }
		
        [EventSubscribe("Sowing")]
        private void OnSowing(object sender, EventArgs args)
        {
            cropHarvested = false;
        }
        
        [EventSubscribe("EndOfSimulation")]
        private void OnEndOfSimulation(object sender, EventArgs e)
        {
            if (cropHarvested) return; 
			
            if (crop.Phenology.Stage >= END_OF_GRAIN_FILL_STAGE)			
            {
                HarvestCrop("Phenology Stage meets minimum criteria");
            }
            else
            {
                Output($"Simulation {simulationName} ended without harvesting. CurrentPhaseName: {crop.Phenology.CurrentPhaseName}. Stage: {crop.Phenology.Stage}. Highest Stage Reached: {highestPhenologyStageReached.PhaseName} ({highestPhenologyStageReached.HighestPhenologyStage}) on {highestPhenologyStageReached.ApsimClockDate}");
            }
        }
		
        [EventSubscribe("DoManagement")]
        private void OnDoManagement(object sender, EventArgs e)
        {
            if (crop.Phenology.Stage > highestPhenologyStageReached.HighestPhenologyStage)
            {
                highestPhenologyStageReached = new PhenologyRecord(clock.Today, crop.Phenology.Stage, crop.Phenology.CurrentPhaseName);
            }
        	
            if (crop.IsReadyForHarvesting)
            {
                HarvestCrop("- IsReadyForHarvesting");
            }
            else
            {
                if (specialCaseExperiments.TryGetValue(simulationName, out double desiredStageNumber))
                {
                    if (crop.Phenology.Stage >= desiredStageNumber)				    
                    {
                        HarvestCrop($"- Special case experiment. Reached desired StageNumber of: {desiredStageNumber}. Stage: {crop.Phenology.Stage}");
                    }
                }
            }
        }
		
        private void HarvestCrop(string message)
        {
            if (cropHarvested) return;
		    
            Output($"{simulationName} - Harvesting crop. {message}");
            crop.Harvest();
            cropHarvested = true;
            crop.EndCrop();
        }
        
        private void Output(string message)
        {
            message = $"ApsimClock: {clock.Today} - {message}";
            summary?.WriteMessage(this, message, MessageType.Diagnostic);
        }
		
		private static Dictionary<string, double> GetSpecialCaseExperiments()
		{
			return new ()
			{
				// Handle experiments that got to end of grain fill during the season
				// but by the end of the simulation their phenology was reset due to 
				// a frost event.
				{ "HE3CultivarQL41xQL36", 8.9 },
			};
		}
    }
}
```
    Folder CultivarParameters
      Folder Sorghum
        Cultivar CSH13R
          Command:
            Parameters.Canopy.SLNRatioTop = 1.5
            Parameters.Pathway.SpectralCorrectionFactor = 0.3466
  Folder Validation
    Folder Combined Results
      Memo Combined Results
        Simulation results for the combined datasets from the various countries are shown in the following graphs.  The model is able to adequately capture the influence of growing conditions (soil, climate) and management (population, Nitrogen, irrigation, sowing date).
    Folder Hermitage
      Experiment HE1
        Memo HE1 Description
          Experiment: HE1

          Description: HE1 - High N/Irrig. - 3 Indian/Aust. Cultivars

          Start Date: 1/12/1996

          End Date: 30/06/1997

          |SimulationName       |Cultivar |
          |---------------------|---------|
          |Sorghum_HE1_T1       |QL41xQL36|
          |Sorghum_HE1_T2       |Buster   |
          |Sorghum_HE1_T3       |M35-1    |
        Factors
          Factor Cultivar
            CompositeFactor QL41xQL36
              Specifications:
                [SowingRule].Script.Cultivar = QL41xQL36
                [SowingRule].Script.Ftn = 0
            CompositeFactor Buster
              Specifications:
                [SowingRule].Script.Cultivar = Buster
                [SowingRule].Script.Ftn = 0.2
        Simulation HE1Base
          Clock: Start=1996-12-01; End=1997-06-30
          Summary
          Weather: FileName=Met/HE1.met; Latitude=-28.21; Tav=16.37; Amp=11.52
          SoilArbitrator
          Zone Paddock: Area=1; Slope=0; AspectAngle=0; Altitude=50
            Report DailyReport
              VariableNames:
                GrainTempFactor
                GrainTempFactor
            Report HarvestReport: EventNames=[Sorghum].Harvesting
            Manager SowingRule
              Cultivar = QL41xQL36
              Ftn = 0
              Date = 01/09/1997 00:00:00
              Density = 10
              Depth = 30
              RowSpacing = 500
              RowConfiguration = Solid
              TilleringMethod = ObservedTillers
```csharp
using Models.Soils;
using System;
using Models.Core;
using Models.PMF;
using APSIM.Shared.Utilities;

namespace Models
{
    [Serializable]
    public class Script : Model
    {
        [Description("Enter sowing date (dd/mm/yyyy) : ")]
        public DateTime Date { get; set; }

        [Description("Enter sowing density  (plants/m2) : ")]
        public double Density { get; set; }

        [Description("Enter sowing depth  (mm) : ")]
        public double Depth { get; set; }

        [Description("Enter cultivar : ")]
        [Display(Type = DisplayType.CultivarName)]
        public string Cultivar { get; set; }

        [Description("Enter row spacing (mm) : ")]
        public double RowSpacing { get; set; }

        [Description("Enter skip row configuration : ")]
        public RowConfigurationType RowConfiguration { get; set; }

        [Description("Tillering Method")]
        public TilleringMethodType TilleringMethod { get; set; } = 0;

        [Description("Enter Fertile Tiller No. : ")]
        public double Ftn { get; set; }

        public enum TilleringMethodType 
        {
            RuleOfThumb = -1,
            ObservedTillers = 0,
            DynamicTillering = 1
        }
        public enum RowConfigurationType 
        {
            Solid, SingleSkip, DoubleSkip
        }

        [Link]
        private Zone paddock;

        [Link]
        private Clock clock;

        [Link]
        private Plant crop;

        [EventSubscribe("DoManagement")]
        private void OnDoManagement(object sender, EventArgs e)
        {
            if (clock.Today == Date /* && isFallow */)
            {
                double population = Density * paddock.Area;
                crop.Sow(cultivar:Cultivar, population:population, depth:Depth, rowSpacing:RowSpacing, rowConfig: (double)RowConfiguration, tillering:(int)TilleringMethod, ftn:Ftn);
            }
        }
    }
}
```
            Manager HarvestingRule
```csharp
using Models.Soils;
using System;
using Models.Core;
using Models.PMF;

namespace Models
{
    // This is being overridden by the Harvesting Rule in Replacements.
    [Serializable]

    public class Script : Model
    {
        [Link]
        private Clock clock;

        [Link]
        private IPlant crop;

        [EventSubscribe("DoManagement")]
        private void OnDoCalculations(object sender, EventArgs e)
        {
            if (crop.IsReadyForHarvesting)
            {
                crop.Harvest();
                crop.EndCrop();
            }
        }
    }
}
```
            Operations FertiliserSchedule
              1996-12-20  [Fertiliser].Apply(33, Fertiliser.Types.NO3N, 50);
              1996-12-23  [Fertiliser].Apply(0, Fertiliser.Types.NO3N, 50);
              1996-12-23  [Fertiliser].Apply(119, Fertiliser.Types.NO3N, 50);
              1997-02-12  [Fertiliser].Apply(59, Fertiliser.Types.NO3N, 50);
              1997-03-21  [Fertiliser].Apply(59, Fertiliser.Types.NO3N, 50);
            Operations IrrigationSchedule
              1997-01-09  [Irrigation].Apply(52);
              1997-01-16  [Irrigation].Apply(36);
              1997-01-21  [Irrigation].Apply(18);
              1997-01-29  [Irrigation].Apply(20);
              1997-02-07  [Irrigation].Apply(14);
              1997-03-13  [Irrigation].Apply(30);
              1997-03-21  [Irrigation].Apply(45);
              1997-04-10  [Irrigation].Apply(27);
              1997-04-17  [Irrigation].Apply(42);
              1997-05-02  [Irrigation].Apply(27);
            Irrigation
            Fertiliser
            MicroClimate: a_interception=0; b_interception=1; c_interception=0; d_interception=0; SoilHeatFluxFraction=0.4; MinimumHeightDiffForNewLayer=0; NightInterceptionFraction=0.5; ReferenceHeight=2
            Soil HRS: SoilType=HMM; Site=HRS; NearestTown=Unknown; Region=SE Queensland; NaturalVegetation=Unknown; Latitude=0; Longitude=0
              Physical
                Thickness  BD    AirDry  LL15   DUL   SAT
                100        1.34  0.08    0.226  0.42  0.45
                100        1.34  0.19    0.226  0.42  0.45
                200        1.33  0.23    0.258  0.46  0.48
                200        1.38  0.26    0.27   0.46  0.47
                200        1.4   0.26    0.268  0.43  0.45
                200        1.55  0.28    0.304  0.4   0.41
                200        1.59  0.25    0.335  0.37  0.38
                200        1.63  0.28    0.33   0.33  0.37
                200        1.66  0.3     0.32   0.32  0.37
                200        1.68  0.31    0.33   0.33  0.36
                SoilCrop SorghumSoil
                  LL=[0.226, 0.226, 0.258, 0.27, 0.268, 0.304, 0.335, 0.33, 0.32, 0.33]
                  KL=[0.07, 0.07, 0.07, 0.07, 0.06, 0.06, 0.06, 0.05, 0.05, 0.04]
                  XF=[1, 1, 1, 1, 1, 1, 1, 1, 1, 1]
              WaterBalance SoilWater: SummerDate=1-Nov; SummerU=1.5; SummerCona=6.5; WinterDate=1-Apr; WinterU=1.5; WinterCona=6.5; DiffusConst=40; DiffusSlope=16; Salb=0.2; CN2Bare=85; CNRed=20; CNCov=0.8; PSIDul=-100; Thickness=[100, 100, 200, 200, 200, 200, 200, 200, 200, 200]; SWCON=[0.3, 0.3, 0.3, 0.3, 0.3, 0.3, 0.3, 0.3, 0.3, 0.3]
              Nutrient
              Organic: FOMCNRatio=50; CarbonUnits=Total
                Thickness  Carbon  SoilCNRatio  FBiom  FInert  FOM
                100        1.19    12.5         0.05   0.3     260.587
                100        0.59    12.5         0.02   0.45    220.582
                200        0.45    12.5         0.01   0.6     158.054
                200        0.3     12.5         0.01   0.75    113.251
                200        0.2     12.5         0.01   0.9     81.1478
                200        0.16    12.5         0.01   0.9     58.1449
                200        0.17    12.5         0.01   0.9     41.6626
                200        0.17    12.5         0.05   0.9     29.8526
                200        0.17    12.5         0.02   0.9     21.3903
                200        0.17    12.5         0.01   0.9     15.3268
              Chemical: Thickness=[100, 100, 200, 200, 200, 200, 200, 200, 200, 200]; PH=[6.3, 6.4, 6.5, 6.6, 6.6, 6.5, 6.5, 6.5, 6.5, 6.5]; PHUnits=Water
              Water: Thickness=[100, 100, 200, 200, 200, 200, 200, 200, 200, 200]; InitialPAWmm=11.9; RelativeTo=LL15; FilledFromTop=false
                InitialValues=[0.235, 0.252, 0.27, 0.3, 0.268, 0.304, 0.335, 0.33, 0.32, 0.33]
              CERESSoilTemperature Temperature
              Solute NO3: Thickness=[100, 100, 200, 200, 200, 200, 200, 200, 200, 200]; InitialValuesUnits=ppm; WaterTableConcentration=0; D0=0; DepthConstant=0; MaxDepthSoluteAccessible=0; RunoffEffectivenessAtMovingSolute=0; MaxEffectiveRunoff=0
                InitialValues=[10.4, 1.633, 1.233, 0.9, 1.1, 1.467, 3.633, 5.667, 5.8, 7.267]
              Solute NH4: Thickness=[100, 100, 200, 200, 200, 200, 200, 200, 200, 200]; InitialValues=[0.1, 0.1, 0.1, 0.1, 0.1, 0.1, 0.1, 0.1, 0.1, 0.1]; InitialValuesUnits=ppm; WaterTableConcentration=0; D0=0; DepthConstant=0; MaxDepthSoluteAccessible=0; RunoffEffectivenessAtMovingSolute=0; MaxEffectiveRunoff=0
              Solute Urea: Thickness=[100, 100, 200, 200, 200, 200, 200, 200, 200, 200]; InitialValues=[0, 0, 0, 0, 0, 0, 0, 0, 0, 0]; InitialValuesUnits=kg/ha; WaterTableConcentration=0; D0=0; DepthConstant=0; MaxDepthSoluteAccessible=0; RunoffEffectivenessAtMovingSolute=0; MaxEffectiveRunoff=0
            Plant Sorghum
            SurfaceOrganicMatter: InitialResidueName=wheat_stubble; InitialResidueType=wheat; InitialResidueMass=0; InitialStandingFraction=0; InitialCPR=0; InitialCNR=80
            DCaPSTModelNG DCaPST: CropName=Sorghum; Biolimit=0; Reduction=0; RubiscoLimitedModifier=1; ElectronTransportLimitedModifier=1
              Folder CultivarParameters
      Experiment HE2
        Memo HE2 Description
          Experiment: HE2

          Description: HE2 - Low N/Irrig. - 3 Indian/Aust. Cultivars

          Start Date: 1/12/1996

          End Date: 30/06/1997

          |SimulationName       |Cultivar |
          |---------------------|---------|
          |Sorghum_HE1_T1       |QL41xQL36|
          |Sorghum_HE1_T2       |Buster   |
          |Sorghum_HE1_T3       |M35-1    |
        Factors
          Factor Cultivar
            CompositeFactor QL41xQL36: Specifications=[SowingRule].Script.Cultivar = QL41xQL36
            CompositeFactor Buster: Specifications=[SowingRule].Script.Cultivar = Buster
        Simulation HE2Base
          Clock: Start=1996-12-01; End=1997-06-30
          Summary
          Weather: FileName=Met/HE2.met; Latitude=-28.21; Tav=16.37; Amp=11.52
          SoilArbitrator
          Zone Paddock: Area=1; Slope=0; AspectAngle=0; Altitude=50
            Report DailyReport
              VariableNames:
                GrainTempFactor
                GrainTempFactor
            Report HarvestReport: EventNames=[Sorghum].Harvesting
            Manager SowingRule: same as Validation.Hermitage.HE1.HE1Base.Paddock.SowingRule
            Manager HarvestingRule: same as Validation.Hermitage.HE1.HE1Base.Paddock.HarvestingRule
            Operations FertiliserSchedule
              1996-12-20  [Fertiliser].Apply(0, Fertiliser.Types.NO3N, 50);
              1996-12-23  [Fertiliser].Apply(0, Fertiliser.Types.NO3N, 50);
              1996-12-23  [Fertiliser].Apply(10, Fertiliser.Types.NO3N, 50);
            Operations IrrigationSchedule
              1997-01-09  [Irrigation].Apply(54);
              1997-01-16  [Irrigation].Apply(37);
              1997-01-21  [Irrigation].Apply(19);
              1997-01-29  [Irrigation].Apply(20);
              1997-02-07  [Irrigation].Apply(14);
              1997-03-13  [Irrigation].Apply(30);
              1997-03-21  [Irrigation].Apply(46);
              1997-04-10  [Irrigation].Apply(24);
              1997-04-17  [Irrigation].Apply(41);
              1997-05-02  [Irrigation].Apply(25);
            Irrigation
            Fertiliser
            MicroClimate: a_interception=0; b_interception=1; c_interception=0; d_interception=0; SoilHeatFluxFraction=0.4; MinimumHeightDiffForNewLayer=0; NightInterceptionFraction=0.5; ReferenceHeight=2
            Soil HRS: SoilType=HMM; Site=HRS; NearestTown=Unknown; Region=SE Queensland; NaturalVegetation=Unknown; Latitude=0; Longitude=0
              Physical: same as Validation.Hermitage.HE1.HE1Base.Paddock.HRS.Physical
              WaterBalance SoilWater: same as Validation.Hermitage.HE1.HE1Base.Paddock.HRS.SoilWater
              Nutrient
              Organic: same as Validation.Hermitage.HE1.HE1Base.Paddock.HRS.Organic
              Chemical: Thickness=[100, 100, 200, 200, 200, 200, 200, 200, 200, 200]; PH=[6.3, 6.4, 6.5, 6.6, 6.6, 6.5, 6.5, 6.5, 6.5, 6.5]; PHUnits=Water
              Water: Thickness=[100, 100, 200, 200, 200, 200, 200, 200, 200, 200]; InitialPAWmm=11.9; RelativeTo=LL15; FilledFromTop=false
                InitialValues=[0.235, 0.252, 0.27, 0.3, 0.268, 0.304, 0.335, 0.33, 0.32, 0.33]
              CERESSoilTemperature Temperature
              Solute NO3: Thickness=[100, 100, 200, 200, 200, 200, 200, 200, 200, 200]; InitialValuesUnits=ppm; WaterTableConcentration=0; D0=0; DepthConstant=0; MaxDepthSoluteAccessible=0; RunoffEffectivenessAtMovingSolute=0; MaxEffectiveRunoff=0
                InitialValues=[0.1, 0.026, 0.05, 0.058, 0.394, 0.187, 0.512, 0.762, 0.719, 0.7]
              Solute NH4: same as Validation.Hermitage.HE1.HE1Base.Paddock.HRS.NH4
              Solute Urea: same as Validation.Hermitage.HE1.HE1Base.Paddock.HRS.Urea
            Plant Sorghum
            SurfaceOrganicMatter: InitialResidueName=wheat_stubble; InitialResidueType=wheat; InitialResidueMass=0; InitialStandingFraction=0; InitialCPR=0; InitialCNR=80
            DCaPSTModelNG DCaPST: CropName=Sorghum; Biolimit=0; Reduction=0; RubiscoLimitedModifier=1; ElectronTransportLimitedModifier=1
              Folder CultivarParameters
      Experiment HE3
        Memo HE3 Description
          Experiment: HE3

          Description: HE3 - High N/No Irrig. - 3 Indian/Aust. Cultivars

          Start Date: 1/12/1996

          End Date: 30/06/1997

          |SimulationName       |Cultivar |
          |---------------------|---------|
          |Sorghum_HE3_T1       |QL41xQL36|
          |Sorghum_HE3_T2       |Buster   |
          |Sorghum_HE3_T3       |M35-1    |
        Factors
          Factor Cultivar: Specification=[SowingRule].Script.Cultivar = QL41xQL36, Buster
        Simulation HE3Base
          Clock: Start=1997-01-09; End=1997-06-30
          Summary
          Weather: FileName=Met/HE3.met; Latitude=-28.21; Tav=0; Amp=0
          SoilArbitrator
          Zone Paddock: Area=1; Slope=0; AspectAngle=0; Altitude=50
            Report DailyReport
              VariableNames:
                GrainTempFactor
                GrainTempFactor
            Report HarvestReport: EventNames=[Sorghum].Harvesting
            Manager SowingRule
              Cultivar = QL41xQL36
              Ftn = 0
              Date = 01/09/1997 00:00:00
              Density = 10
              Depth = 15
              RowSpacing = 500
              RowConfiguration = Solid
              TilleringMethod = ObservedTillers
              script: same as in Validation.Hermitage.HE1.HE1Base.Paddock.SowingRule
            Manager HarvestingRule: same as Validation.Hermitage.HE1.HE1Base.Paddock.HarvestingRule
            Operations FertiliserSchedule
              1996-12-20  [Fertiliser].Apply(33, Fertiliser.Types.NO3N, 50);
              1996-12-23  [Fertiliser].Apply(0, Fertiliser.Types.NO3N, 50);
              1996-12-23  [Fertiliser].Apply(119, Fertiliser.Types.NO3N, 50);
            Operations IrrigationSchedule
              1996-12-23  [Irrigation].Apply(69);
              1996-12-27  [Irrigation].Apply(9);
              1997-01-09  [Irrigation].Apply(33);
              1997-01-16  [Irrigation].Apply(28);
              1997-01-31  [Irrigation].Apply(19);
            Irrigation
            Fertiliser
            MicroClimate: a_interception=0; b_interception=1; c_interception=0; d_interception=0; SoilHeatFluxFraction=0.4; MinimumHeightDiffForNewLayer=0; NightInterceptionFraction=0.5; ReferenceHeight=2
            Soil HRS: SoilType=HMM; Site=HRS; NearestTown=Unknown; Region=SE Queensland; NaturalVegetation=Unknown; Latitude=0; Longitude=0
              Physical
                Thickness  BD    AirDry  LL15   DUL   SAT
                100        1.34  0.08    0.226  0.42  0.45
                100        1.34  0.19    0.226  0.42  0.45
                200        1.33  0.23    0.258  0.46  0.48
                200        1.38  0.26    0.27   0.46  0.47
                200        1.4   0.26    0.268  0.43  0.45
                200        1.55  0.28    0.304  0.4   0.41
                200        1.59  0.32    0.335  0.37  0.38
                200        1.63  0.32    0.33   0.33  0.37
                200        1.66  0.32    0.32   0.32  0.37
                200        1.68  0.33    0.33   0.33  0.36
                SoilCrop SorghumSoil
                  LL=[0.226, 0.226, 0.258, 0.27, 0.268, 0.304, 0.335, 0.33, 0.32, 0.33]
                  KL=[0.07, 0.07, 0.07, 0.07, 0.06, 0.06, 0.06, 0.05, 0.05, 0.04]
                  XF=[1, 1, 1, 1, 1, 1, 1, 1, 1, 1]
              WaterBalance SoilWater: same as Validation.Hermitage.HE1.HE1Base.Paddock.HRS.SoilWater
              Nutrient
              Organic: same as Validation.Hermitage.HE1.HE1Base.Paddock.HRS.Organic
              Chemical: Thickness=[100, 100, 200, 200, 200, 200, 200, 200, 200, 200]; PH=[6.3, 6.4, 6.5, 6.6, 6.6, 6.5, 6.5, 6.5, 6.5, 6.5]; PHUnits=Water
              Water: Thickness=[100, 100, 200, 200, 200, 200, 200, 200, 200, 200]; InitialPAWmm=96; RelativeTo=LL15; FilledFromTop=false
                InitialValues=[0.217, 0.357, 0.375, 0.401, 0.349, 0.351, 0.359, 0.33, 0.322, 0.347]
              CERESSoilTemperature Temperature
              Solute NO3: Thickness=[100, 100, 200, 200, 200, 200, 200, 200, 200, 200]; InitialValuesUnits=ppm; WaterTableConcentration=0; D0=0; DepthConstant=0; MaxDepthSoluteAccessible=0; RunoffEffectivenessAtMovingSolute=0; MaxEffectiveRunoff=0
                InitialValues=[12.233, 1.867, 1.4, 0.867, 0.9, 2.833, 3.833, 3.9, 4.233, 3.767]
              Solute NH4: same as Validation.Hermitage.HE1.HE1Base.Paddock.HRS.NH4
              Solute Urea: same as Validation.Hermitage.HE1.HE1Base.Paddock.HRS.Urea
            Plant Sorghum
            SurfaceOrganicMatter: InitialResidueName=wheat_stubble; InitialResidueType=wheat; InitialResidueMass=0; InitialStandingFraction=0; InitialCPR=0; InitialCNR=80
            DCaPSTModelNG DCaPST: CropName=Sorghum; Biolimit=0; Reduction=0; RubiscoLimitedModifier=1; ElectronTransportLimitedModifier=1
              Folder CultivarParameters
      Experiment HE4
        Memo HE4 Description
          Experiment: HE4

          Description: HE4 - Low N/No Irrig. - 3 Indian/Aust. Cultivars

          Start Date: 1/12/1996

          End Date: 30/06/1997

          |SimulationName       |Cultivar |
          |---------------------|---------|
          |Sorghum_HE4_T1       |QL41xQL36|
          |Sorghum_HE4_T2       |Buster   |
          |Sorghum_HE4_T3       |M35-1    |
        Factors
          Factor Cultivar
            CompositeFactor QL41xQL36
              Specifications:
                [SowingRule].Script.Cultivar = QL41xQL36
                [SowingRule].Script.Ftn = 0
                [SowingRule].Script.Depth = 15
            CompositeFactor Buster
              Specifications:
                [SowingRule].Script.Cultivar = Buster
                [SowingRule].Script.Ftn = 0.2
                [SowingRule].Script.Depth = 30
        Simulation HE4Base
          Clock: Start=1996-12-01; End=1997-06-30
          Summary
          Weather: FileName=Met/HE4.met; Latitude=-28.21; Tav=0; Amp=0
          SoilArbitrator
          Zone Paddock: Area=1; Slope=0; AspectAngle=0; Altitude=50
            Report DailyReport
              VariableNames:
                GrainTempFactor
                GrainTempFactor
            Report HarvestReport: EventNames=[Sorghum].Harvesting
            Manager SowingRule: same as Validation.Hermitage.HE1.HE1Base.Paddock.SowingRule
            Manager HarvestingRule: same as Validation.Hermitage.HE1.HE1Base.Paddock.HarvestingRule
            Operations FertiliserSchedule
              1996-12-20  [Fertiliser].Apply(0, Fertiliser.Types.NO3N, 50);
              1996-12-23  [Fertiliser].Apply(10, Fertiliser.Types.NO3N, 50);
              1997-12-23  [Fertiliser].Apply(0, Fertiliser.Types.NO3N, 50);
            Operations IrrigationSchedule: same as Validation.Hermitage.HE3.HE3Base.Paddock.IrrigationSchedule
            Irrigation
            Fertiliser
            MicroClimate: a_interception=0; b_interception=1; c_interception=0; d_interception=0; SoilHeatFluxFraction=0.4; MinimumHeightDiffForNewLayer=0; NightInterceptionFraction=0.5; ReferenceHeight=2
            Soil HRS: SoilType=HMM; Site=HRS; NearestTown=Unknown; Region=SE Queensland; NaturalVegetation=Unknown; Latitude=0; Longitude=0
              Water: Thickness=[100, 100, 200, 200, 200, 200, 200, 200, 200, 200]; InitialPAWmm=105.48; RelativeTo=LL15; FilledFromTop=true
                InitialValues=[0.42, 0.42, 0.46, 0.4014, 0.268, 0.304, 0.335, 0.33, 0.32, 0.33]
              Physical: same as Validation.Hermitage.HE1.HE1Base.Paddock.HRS.Physical
              WaterBalance SoilWater: same as Validation.Hermitage.HE1.HE1Base.Paddock.HRS.SoilWater
              Nutrient
              Organic: same as Validation.Hermitage.HE1.HE1Base.Paddock.HRS.Organic
              Chemical: Thickness=[100, 100, 200, 200, 200, 200, 200, 200, 200, 200]; PH=[6.3, 6.4, 6.5, 6.6, 6.6, 6.5, 6.5, 6.5, 6.5, 6.5]; PHUnits=Water
              CERESSoilTemperature Temperature
              Solute NO3: Thickness=[100, 100, 200, 200, 200, 200, 200, 200, 200, 200]; InitialValuesUnits=ppm; WaterTableConcentration=0; D0=0; DepthConstant=0; MaxDepthSoluteAccessible=0; RunoffEffectivenessAtMovingSolute=0; MaxEffectiveRunoff=0
                InitialValues=[18.4607, 2.89869, 2.18866, 1.59756, 1.95258, 2.60403, 6.44883, 10.0593, 10.2954, 12.8994]
              Solute NH4: Thickness=[100, 100, 200, 200, 200, 200, 200, 200, 200, 200]; InitialValuesUnits=ppm; WaterTableConcentration=0; D0=0; DepthConstant=0; MaxDepthSoluteAccessible=0; RunoffEffectivenessAtMovingSolute=0; MaxEffectiveRunoff=0
                InitialValues=[0.468732, 0.468732, 0.468732, 0.468732, 0.468732, 0.468732, 0.468732, 0.468732, 0.468732, 0.468732]
              Solute Urea: same as Validation.Hermitage.HE1.HE1Base.Paddock.HRS.Urea
            Plant Sorghum
            SurfaceOrganicMatter: InitialResidueName=wheat_stubble; InitialResidueType=wheat; InitialResidueMass=0; InitialStandingFraction=0; InitialCPR=0; InitialCNR=80
            DCaPSTModelNG DCaPST: CropName=Sorghum; Biolimit=0; Reduction=0; RubiscoLimitedModifier=1; ElectronTransportLimitedModifier=1
              Folder CultivarParameters
      Experiment HE5: DisabledSimNames=[HE5CultivarCSH13R]
        Memo HE5 Description
          Experiment: HE5

          Description: HE5 - High N/Irrig. - 3 Indian/Aust. Cultivars

          Start Date: 18/11/1997

          End Date: 15/04/1998

          |SimulationName       |Cultivar|
          |---------------------|--------|
          |Sorghum_HE5_T1       |Buster  |
        Factors
          Factor Cultivar
            CompositeFactor Buster
              Specifications:
                [SowingRule].Script.Cultivar = Buster
                [SowingRule].Script.Ftn = 0.1
        Simulation HE5Base
          Clock: Start=1997-11-18; End=1998-04-15
          Summary
          Weather: FileName=Met/HE5.met; Latitude=-28.21; Tav=16.37; Amp=11.52
          SoilArbitrator
          Zone Paddock: Area=1; Slope=0; AspectAngle=0; Altitude=50
            Report DailyReport
              VariableNames:
                GrainTempFactor
                GrainTempFactor
            Report HarvestReport: EventNames=[Sorghum].Harvesting
            Manager SowingRule
              Date = 11/27/1997 00:00:00
              Density = 10
              Depth = 30
              Cultivar = Buster
              RowSpacing = 500
              RowConfiguration = Solid
              TilleringMethod = ObservedTillers
              Ftn = 0.1
```csharp
using Models.Soils;
using System;
using Models.Core;
using Models.PMF;
using APSIM.Shared.Utilities;

namespace Models
{
    [Serializable]
    public class Script : Model
    {
        [Description("Enter sowing date (dd/mm/yyyy) : ")]
        public DateTime Date { get; set; }

        [Description("Enter sowing density  (plants/m2) : ")]
        public double Density { get; set; }

        [Description("Enter sowing depth  (mm) : ")]
        public double Depth { get; set; }

        [Description("Enter cultivar : ")]
        [Display(Type = DisplayType.CultivarName)]
        public string Cultivar { get; set; } // QL41xQL36

        [Description("Enter row spacing (mm) : ")]
        public double RowSpacing { get; set; }

        [Description("Enter skip row configuration : ")]
        public RowConfigurationType RowConfiguration { get; set; }

        [Description("Tillering Method")]
        public TilleringMethodType TilleringMethod { get; set; } = 0;

        [Description("Enter Fertile Tiller No. : ")]
        public double Ftn { get; set; }

        public enum TilleringMethodType 
        {
            RuleOfThumb = -1,
            ObservedTillers = 0,
            DynamicTillering = 1
        }
        public enum RowConfigurationType 
        {
            Solid, SingleSkip, DoubleSkip
        }

        [Link]
        private Zone paddock;

        [Link]
        private Clock clock;

        [Link]
        private Plant crop;

        [EventSubscribe("DoManagement")]
        private void OnDoManagement(object sender, EventArgs e)
        {
            if (clock.Today == Date /* && isFallow */)
            {
                double population = Density * paddock.Area;
                crop.Sow(cultivar:Cultivar, population:population, depth:Depth, rowSpacing:RowSpacing, rowConfig: (double)RowConfiguration, tillering:(int)TilleringMethod, ftn:Ftn);
            }
        }
    }
}
```
            Manager HarvestingRule: same as Validation.Hermitage.HE1.HE1Base.Paddock.HarvestingRule
            Operations FertiliserSchedule
              1997-11-26  [Fertiliser].Apply(3, Fertiliser.Types.NO3N, 50);
              1998-02-20  [Fertiliser].Apply(59, Fertiliser.Types.NO3N, 50);
            Operations IrrigationSchedule
              1997-11-28  [Irrigation].Apply(16);
              1997-12-02  [Irrigation].Apply(25);
              1997-12-04  [Irrigation].Apply(13);
              1997-12-08  [Irrigation].Apply(21);
              1997-12-18  [Irrigation].Apply(28);
              1998-01-06  [Irrigation].Apply(26);
              1998-01-12  [Irrigation].Apply(46);
              1998-01-27  [Irrigation].Apply(25);
              1998-02-20  [Irrigation].Apply(26);
              1998-02-27  [Irrigation].Apply(55);
              1998-03-13  [Irrigation].Apply(22);
              1998-03-18  [Irrigation].Apply(39);
              1998-03-20  [Irrigation].Apply(21);
            Irrigation
            Fertiliser
            MicroClimate: a_interception=0; b_interception=1; c_interception=0; d_interception=0; SoilHeatFluxFraction=0.4; MinimumHeightDiffForNewLayer=0; NightInterceptionFraction=0.5; ReferenceHeight=2
            Soil HRS: SoilType=HMM; Site=HRS; NearestTown=Unknown; Region=SE Queensland; NaturalVegetation=Unknown; Latitude=0; Longitude=0
              Physical: same as Validation.Hermitage.HE1.HE1Base.Paddock.HRS.Physical
              WaterBalance SoilWater: same as Validation.Hermitage.HE1.HE1Base.Paddock.HRS.SoilWater
              Nutrient
              Organic: same as Validation.Hermitage.HE1.HE1Base.Paddock.HRS.Organic
              Chemical: Thickness=[100, 100, 200, 200, 200, 200, 200, 200, 200, 200]; PH=[6.3, 6.4, 6.5, 6.6, 6.6, 6.5, 6.5, 6.5, 6.5, 6.5]; PHUnits=Water
              Water: Thickness=[100, 100, 200, 200, 200, 200, 200, 200, 200, 200]; InitialPAWmm=96; RelativeTo=LL15; FilledFromTop=false
                InitialValues=[0.217, 0.357, 0.375, 0.401, 0.349, 0.351, 0.359, 0.33, 0.322, 0.347]
              CERESSoilTemperature Temperature
              Solute NO3: Thickness=[100, 100, 200, 200, 200, 200, 200, 200, 200, 200]; InitialValuesUnits=ppm; WaterTableConcentration=0; D0=0; DepthConstant=0; MaxDepthSoluteAccessible=0; RunoffEffectivenessAtMovingSolute=0; MaxEffectiveRunoff=0
                InitialValues=[8.421, 8.054, 7.001, 3.824, 2.759, 3.429, 8.668, 11.576, 8.816, 11.758]
              Solute NH4: same as Validation.Hermitage.HE1.HE1Base.Paddock.HRS.NH4
              Solute Urea: same as Validation.Hermitage.HE1.HE1Base.Paddock.HRS.Urea
            Plant Sorghum
            SurfaceOrganicMatter: InitialResidueName=wheat_stubble; InitialResidueType=wheat; InitialResidueMass=0; InitialStandingFraction=0; InitialCPR=0; InitialCNR=80
            DCaPSTModelNG DCaPST: CropName=Sorghum; Biolimit=0; Reduction=0; RubiscoLimitedModifier=1; ElectronTransportLimitedModifier=1
              Folder CultivarParameters
      Experiment HE6: DisabledSimNames=[HE6CultivarCSH13R]
        Memo HE6 Description
          Experiment: HE6

          Description: HE6 - Low N/Irrig. - 3 Indian/Aust. Cultivars

          Start Date: 18/11/1997

          End Date: 15/04/1998

          |SimulationName       |Cultivar|
          |---------------------|--------|
          |Sorghum_HE6_T1       |Buster  |
        Factors
          Factor Cultivar: Specification=[SowingRule].Script.Cultivar = Buster
        Simulation HE6Base
          Clock: Start=1997-11-18; End=1998-04-15
          Summary
          Weather: FileName=Met/HE6.met; Latitude=-28.21; Tav=16.37; Amp=11.52
          SoilArbitrator
          Zone Paddock: Area=1; Slope=0; AspectAngle=0; Altitude=50
            Report DailyReport
              VariableNames:
                GrainTempFactor
                GrainTempFactor
            Report HarvestReport: EventNames=[Sorghum].Harvesting
            Manager SowingRule
              Date = 11/27/1997 00:00:00
              Density = 10
              Depth = 30
              Cultivar = Buster
              RowSpacing = 500
              RowConfiguration = Solid
              TilleringMethod = ObservedTillers
              Ftn = 0
              script: same as in Validation.Hermitage.HE5.HE5Base.Paddock.SowingRule
            Manager HarvestingRule: same as Validation.Hermitage.HE1.HE1Base.Paddock.HarvestingRule
            Operations FertiliserSchedule
              1997-11-26  [Fertiliser].Apply(10, Fertiliser.Types.NO3N, 50);
            Operations IrrigationSchedule
              1997-11-28  [Irrigation].Apply(16);
              1997-12-02  [Irrigation].Apply(24);
              1997-12-04  [Irrigation].Apply(13);
              1997-12-08  [Irrigation].Apply(21);
              1997-12-18  [Irrigation].Apply(28);
              1998-01-06  [Irrigation].Apply(26);
              1998-01-12  [Irrigation].Apply(47);
              1998-01-27  [Irrigation].Apply(25);
              1998-02-20  [Irrigation].Apply(20);
              1998-02-27  [Irrigation].Apply(38);
              1998-03-13  [Irrigation].Apply(22);
              1998-03-18  [Irrigation].Apply(40);
            Irrigation
            Fertiliser
            MicroClimate: a_interception=0; b_interception=1; c_interception=0; d_interception=0; SoilHeatFluxFraction=0.4; MinimumHeightDiffForNewLayer=0; NightInterceptionFraction=0.5; ReferenceHeight=2
            Soil HRS: SoilType=HMM; Site=HRS; NearestTown=Unknown; Region=SE Queensland; NaturalVegetation=Unknown; Latitude=0; Longitude=0
              Physical: same as Validation.Hermitage.HE1.HE1Base.Paddock.HRS.Physical
              WaterBalance SoilWater: same as Validation.Hermitage.HE1.HE1Base.Paddock.HRS.SoilWater
              Nutrient
              Organic: FOMCNRatio=50; CarbonUnits=Total
                Thickness  Carbon  SoilCNRatio  FBiom  FInert  FOM
                100        1.19    12.5         0.05   0.3     260.587
                100        0.59    12.5         0.02   0.45    220.582
                200        0.45    12.5         0.01   0.6     158.054
                200        0.3     12.5         0.01   0.75    113.251
                200        0.2     12.5         0.01   0.9     81.148
                200        0.16    12.5         0.01   0.9     58.145
                200        0.17    12.5         0.01   0.9     41.663
                200        0.17    12.5         0.05   0.9     29.853
                200        0.17    12.5         0.02   0.9     21.39
                200        0.17    12.5         0.01   0.9     15.327
              Chemical: Thickness=[100, 100, 200, 200, 200, 200, 200, 200, 200, 200]; PH=[6.3, 6.4, 6.5, 6.6, 6.6, 6.5, 6.5, 6.5, 6.5, 6.5]; PHUnits=Water
              Water: Thickness=[100, 100, 200, 200, 200, 200, 200, 200, 200, 200]; InitialPAWmm=96; RelativeTo=LL15; FilledFromTop=false
                InitialValues=[0.217, 0.357, 0.375, 0.401, 0.349, 0.351, 0.359, 0.33, 0.322, 0.347]
              CERESSoilTemperature Temperature
              Solute NO3: Thickness=[100, 100, 200, 200, 200, 200, 200, 200, 200, 200]; InitialValuesUnits=ppm; WaterTableConcentration=0; D0=0; DepthConstant=0; MaxDepthSoluteAccessible=0; RunoffEffectivenessAtMovingSolute=0; MaxEffectiveRunoff=0
                InitialValues=[1.493, 1.633, 1.233, 0.9, 1.1, 1.467, 2.516, 3.067, 3.012, 2.976]
              Solute NH4: same as Validation.Hermitage.HE1.HE1Base.Paddock.HRS.NH4
              Solute Urea: same as Validation.Hermitage.HE1.HE1Base.Paddock.HRS.Urea
            Plant Sorghum
            SurfaceOrganicMatter: InitialResidueName=wheat_stubble; InitialResidueType=wheat; InitialResidueMass=0; InitialStandingFraction=0; InitialCPR=0; InitialCNR=80
            DCaPSTModelNG DCaPST: CropName=Sorghum; Biolimit=0; Reduction=0; RubiscoLimitedModifier=1; ElectronTransportLimitedModifier=1
              Folder CultivarParameters
      Experiment HE7: DisabledSimNames=[HE7CultivarCSH13R]
        Memo HE7 Description
          Experiment: HE7

          Description: HE7 - High N/No Irrig. - 3 Indian/Aust. Cultivars

          Start Date: 18/11/1997

          End Date: 15/04/1998

          |SimulationName       |Cultivar|
          |---------------------|--------|
          |Sorghum_HE7_T1       |Buster  |
        Factors
          Factor Cultivar
            CompositeFactor Buster
              Specifications:
                [SowingRule].Script.Cultivar = Buster
                [Soil].Water.InitialValues = 0.307, 0.326, 0.444, 0.429, 0.363, 0.351, 0.336, 0.343, 0.352, 0.347
                [FertiliserSchedule]
              Operations FertiliserSchedule
                1997-11-26  [Fertiliser].Apply(3, Fertiliser.Types.NO3N, 50);
                1997-11-26  [Fertiliser].Apply(119, Fertiliser.Types.NO3N, 50);
        Simulation HE7Base
          Clock: Start=1997-11-25; End=1998-04-15
          Summary
          Weather: FileName=Met/HE7.met; Latitude=-28.21; Tav=0; Amp=0
          SoilArbitrator
          Zone Paddock: Area=1; Slope=0; AspectAngle=0; Altitude=50
            Report DailyReport
              VariableNames:
                GrainTempFactor
                GrainTempFactor
            Report HarvestReport: EventNames=[Sorghum].Harvesting
            Manager SowingRule
              Date = 11/27/1997 00:00:00
              Density = 10
              Depth = 15
              Cultivar = Buster
              RowSpacing = 500
              RowConfiguration = Solid
              TilleringMethod = ObservedTillers
              Ftn = 0
              script: same as in Validation.Hermitage.HE5.HE5Base.Paddock.SowingRule
            Manager HarvestingRule: same as Validation.Hermitage.HE1.HE1Base.Paddock.HarvestingRule
            Operations FertiliserSchedule
              1997-11-26  [Fertiliser].Apply(33, Fertiliser.Types.NO3N, 50);
              1997-11-26  [Fertiliser].Apply(119, Fertiliser.Types.NO3N, 50);
            Operations IrrigationSchedule
              1997-11-28  [Irrigation].Apply(65);
              1997-12-16  [Irrigation].Apply(90);
            Irrigation
            Fertiliser
            MicroClimate: a_interception=0; b_interception=1; c_interception=0; d_interception=0; SoilHeatFluxFraction=0.4; MinimumHeightDiffForNewLayer=0; NightInterceptionFraction=0.5; ReferenceHeight=2
            Soil HRS: SoilType=HMM; Site=HRS; NearestTown=Unknown; Region=SE Queensland; NaturalVegetation=Unknown; Latitude=0; Longitude=0
              Physical: same as Validation.Hermitage.HE3.HE3Base.Paddock.HRS.Physical
              WaterBalance SoilWater: same as Validation.Hermitage.HE1.HE1Base.Paddock.HRS.SoilWater
              Nutrient
              Organic: same as Validation.Hermitage.HE1.HE1Base.Paddock.HRS.Organic
              Chemical: Thickness=[100, 100, 200, 200, 200, 200, 200, 200, 200, 200]; PH=[6.3, 6.4, 6.5, 6.6, 6.6, 6.5, 6.5, 6.5, 6.5, 6.5]; PHUnits=Water
              Water: Thickness=[100, 100, 200, 200, 200, 200, 200, 200, 200, 200]; InitialPAWmm=128.1; RelativeTo=LL15; FilledFromTop=false
                InitialValues=[0.307, 0.326, 0.444, 0.429, 0.363, 0.351, 0.336, 0.343, 0.352, 0.347]
              CERESSoilTemperature Temperature
              Solute NO3: Thickness=[100, 100, 200, 200, 200, 200, 200, 200, 200, 200]; InitialValuesUnits=ppm; WaterTableConcentration=0; D0=0; DepthConstant=0; MaxDepthSoluteAccessible=0; RunoffEffectivenessAtMovingSolute=0; MaxEffectiveRunoff=0
                InitialValues=[25.798, 6.921, 9.285, 2.823, 2.286, 3.196, 3.695, 4.41, 2.743, 4.891]
              Solute NH4: same as Validation.Hermitage.HE1.HE1Base.Paddock.HRS.NH4
              Solute Urea: same as Validation.Hermitage.HE1.HE1Base.Paddock.HRS.Urea
            Plant Sorghum
            SurfaceOrganicMatter: InitialResidueName=wheat_stubble; InitialResidueType=wheat; InitialResidueMass=0; InitialStandingFraction=0; InitialCPR=0; InitialCNR=80
            DCaPSTModelNG DCaPST: CropName=Sorghum; Biolimit=0; Reduction=0; RubiscoLimitedModifier=1; ElectronTransportLimitedModifier=1
              Folder CultivarParameters
      Experiment HE8: DisabledSimNames=[HE8CultivarCSH13R]
        Memo HE8 Description
          Experiment: HE8

          Description: HE8 - Low N/No Irrig - 3 Indian/Aust. Cultivars

          Start Date: 17/11/1997

          End Date: 15/04/1998

          |SimulationName       |Cultivar|
          |---------------------|--------|
          |Sorghum_HE8_T1       |Buster  |
        Factors
          Factor Cultivar
            CompositeFactor Buster
              Specifications:
                [SowingRule].Script.Cultivar = Buster
                [Soil].Water.InitialValues = 0.294, 0.381, 0.367, 0.306, 0.29, 0.319, 0.33, 0.343, 0.337, 0.344
                [FertiliserSchedule]
              Operations FertiliserSchedule
                1997-11-26  [Fertiliser].Apply(3, Fertiliser.Types.NO3N, 50);
                1997-11-26  [Fertiliser].Apply(10, Fertiliser.Types.NO3N, 50);
        Simulation HE8Base
          Clock: Start=1997-11-25; End=1998-04-15
          Summary
          Weather: FileName=Met/HE8.met; Latitude=-28.21; Tav=0; Amp=0
          SoilArbitrator
          Zone Paddock: Area=1; Slope=0; AspectAngle=0; Altitude=50
            Report DailyReport
              VariableNames:
                GrainTempFactor
                GrainTempFactor
            Report HarvestReport: EventNames=[Sorghum].Harvesting
            Manager SowingRule
              Date = 11/27/1997 00:00:00
              Density = 10
              Depth = 15
              Cultivar = Buster
              RowSpacing = 500
              RowConfiguration = Solid
              TilleringMethod = ObservedTillers
              Ftn = 0
```csharp
using Models.Soils;
using System;
using Models.Core;
using Models.PMF;
using APSIM.Shared.Utilities;

namespace Models
{
    [Serializable]
    public class Script : Model
    {
        [Description("Enter sowing date (dd/mm/yyyy) : ")]
        public DateTime Date { get; set; }

        [Description("Enter sowing density  (plants/m2) : ")]
        public double Density { get; set; }

        [Description("Enter sowing depth  (mm) : ")]
        public double Depth { get; set; }

        [Description("Enter cultivar : ")]
        [Display(Type = DisplayType.CultivarName)]
        public string Cultivar { get; set; } 

        [Description("Enter row spacing (mm) : ")]
        public double RowSpacing { get; set; }

        [Description("Enter skip row configuration : ")]
        public RowConfigurationType RowConfiguration { get; set; }

        [Description("Tillering Method : ")]
        public TilleringMethodType TilleringMethod { get; set; } = 0;

        [Description("Enter Fertile Tiller No. : ")]
        public double Ftn { get; set; }

        public enum TilleringMethodType 
        {
            RuleOfThumb = -1,
            ObservedTillers = 0,
            DynamicTillering = 1
        }
        public enum RowConfigurationType 
        {
            Solid, SingleSkip, DoubleSkip
        }

        [Link]
        private Zone paddock;

        [Link]
        private Clock clock;

        [Link]
        private Plant crop;

        [EventSubscribe("DoManagement")]
        private void OnDoManagement(object sender, EventArgs e)
        {
            if (clock.Today == Date)
            {
                double population = Density * paddock.Area;
                crop.Sow(cultivar:Cultivar, population:population, depth:Depth, rowSpacing:RowSpacing, rowConfig: (double)RowConfiguration, tillering:(int)TilleringMethod, ftn:Ftn);
            }
        }
    }
}
```
            Manager HarvestingRule: same as Validation.Hermitage.HE1.HE1Base.Paddock.HarvestingRule
            Operations FertiliserSchedule
              1997-11-26  [Fertiliser].Apply(33, Fertiliser.Types.NO3N, 50);
              1997-11-26  [Fertiliser].Apply(10, Fertiliser.Types.NO3N, 50);
            Operations IrrigationSchedule: same as Validation.Hermitage.HE7.HE7Base.Paddock.IrrigationSchedule
            Irrigation
            Fertiliser
            MicroClimate: a_interception=0; b_interception=1; c_interception=0; d_interception=0; SoilHeatFluxFraction=0.4; MinimumHeightDiffForNewLayer=0; NightInterceptionFraction=0.5; ReferenceHeight=2
            Soil HRS: SoilType=HMM; Site=HRS; NearestTown=Unknown; Region=SE Queensland; NaturalVegetation=Unknown; Latitude=0; Longitude=0
              Physical: same as Validation.Hermitage.HE3.HE3Base.Paddock.HRS.Physical
              WaterBalance SoilWater: same as Validation.Hermitage.HE1.HE1Base.Paddock.HRS.SoilWater
              Nutrient
              Organic: same as Validation.Hermitage.HE1.HE1Base.Paddock.HRS.Organic
              Chemical: Thickness=[100, 100, 200, 200, 200, 200, 200, 200, 200, 200]; PH=[6.3, 6.4, 6.5, 6.6, 6.6, 6.5, 6.5, 6.5, 6.5, 6.5]; PHUnits=Water
              Water: Thickness=[100, 100, 200, 200, 200, 200, 200, 200, 200, 200]; InitialPAWmm=70.9; RelativeTo=LL15; FilledFromTop=false
                InitialValues=[0.31, 0.387, 0.329, 0.308, 0.317, 0.33, 0.329, 0.348, 0.341, 0.345]
              CERESSoilTemperature Temperature
              Solute NO3: same as Validation.Hermitage.HE7.HE7Base.Paddock.HRS.NO3
              Solute NH4: same as Validation.Hermitage.HE1.HE1Base.Paddock.HRS.NH4
              Solute Urea: same as Validation.Hermitage.HE1.HE1Base.Paddock.HRS.Urea
            Plant Sorghum
            SurfaceOrganicMatter: InitialResidueName=wheat_stubble; InitialResidueType=wheat; InitialResidueMass=0; InitialStandingFraction=0; InitialCPR=0; InitialCNR=80
            DCaPSTModelNG DCaPST: CropName=Sorghum; Biolimit=0; Reduction=0; RubiscoLimitedModifier=1; ElectronTransportLimitedModifier=1
              Folder CultivarParameters
    Folder Lawes
      Experiment LE14
        Memo LE14 Description
          Experiment: LE14

          Description: Early Sow - 3 Indian/Aust Cultivars

          Start Date: 5/09/1996

          End Date: 19/02/1997

          |SimulationName             |Cultivar |
          |---------------------------|---------|
          |Lawes1996EarlyCvBuster     |Buster   |
          |Lawes1996EarlyCvQL41xQL36  |QL41xQL36|
        Factors
          Factor Cv
            CompositeFactor Buster: Specifications=[SowingRule].Script.Cultivar = Buster
            CompositeFactor QL41xQL36: Specifications=[SowingRule].Script.Cultivar = QL41xQL36
        Simulation Lawes1996EarlyBase
          Clock: Start=1996-09-05; End=1997-02-19
          Summary
          Weather: FileName=Met/LE14.met; Latitude=-27.55; Tav=20.61; Amp=13
            CO2Value: FileName=%root%\Examples\WeatherFiles\CO2.csv; ConstantValue=363
          SoilArbitrator
          Zone Paddock: Area=1; Slope=0; AspectAngle=0; Altitude=50
            Report DailyReport
            Report HarvestReport
            Manager SowingRule
              Date = 10/11/1996 00:00:00
              Density = 10
              Depth = 20
              Cultivar = Buster
              RowSpacing = 500
              RowConfiguration = Solid
              TilleringMethod = ObservedTillers
              Ftn = 0.4
              script: same as in Validation.Hermitage.HE8.HE8Base.Paddock.SowingRule
            Manager HarvestingRule: same as Validation.Hermitage.HE1.HE1Base.Paddock.HarvestingRule
            Operations
              1996-09-06  [Fertiliser].Apply(0, Fertiliser.Types.NO3N, 50);
              1996-09-06  [Fertiliser].Apply(126, Fertiliser.Types.NO3N, 50);
              1996-09-16  [Fertiliser].Apply(105, Fertiliser.Types.NO3N, 50);
              1996-11-15  [Fertiliser].Apply(73, Fertiliser.Types.NO3N, 50);
              1996-12-31  [Fertiliser].Apply(59, Fertiliser.Types.NO3N, 50);
            Manager Automatic irrigation based on water deficit
              AutoIrrigationOn = True
              FASWThreshold = 1
              FASWDepth = 1800
```csharp
using Models.Interfaces;
using System;
using Models.Core;
using System.Collections.Generic;
using System.Text;
using Models.Soils;
using Models.PMF;
using Models;
using System.Xml.Serialization;
using APSIM.Shared.Utilities;

namespace Models
{
    [Serializable] 
    public class Script : Model
    {
        [Link] private Zone zone;
        [Link] private Irrigation irrigation;
        [Link] private Soil soil;
        [Link]
        private IPhysical soilPhysical;
        [Link]
        private ISoilWater waterBalance;
        public double FASW { get; set; }
        public double WaterDeficit  { get; set; }
    
        
        [Description("Auto irrigation on?")]
        public bool AutoIrrigationOn { get; set; }

        [Description("Threshold fraction available water (0-1)")]
        public double FASWThreshold { get; set; }

        [Description("Soil depth (mm) to which fraction available water is calculated")]
        public double FASWDepth { get; set; }

        [EventSubscribe("DoManagement")]
        private void OnDoManagement(object sender, EventArgs e)
        {
            CalculateFASW();
            if (AutoIrrigationOn)
            {
                if (FASW < FASWThreshold)
                {
                    double amount = 10;
                    irrigation.Apply(WaterDeficit, depth: 0);
                }
            }
        }
        
        private void CalculateFASW()
        {
            double[] LL15 = MathUtilities.Multiply(soilPhysical.LL15, soilPhysical.Thickness);
            double[] DUL = MathUtilities.Multiply(soilPhysical.DUL, soilPhysical.Thickness);
        
            int nlayr = GetLayerIndex();
            double cumdep = MathUtilities.Sum(soilPhysical.Thickness, 0, nlayr, 0.0);

            double excess_fr = MathUtilities.Divide((cumdep - FASWDepth), soilPhysical.Thickness[nlayr], 0.0);

            // note that results may be strange if swdep < ll15
            double avail_sw = (MathUtilities.Sum(waterBalance.SWmm, 0, nlayr, 0.0)
                              - excess_fr * waterBalance.SWmm[nlayr])
                              - (MathUtilities.Sum(LL15, 0, nlayr, 0.0)
                              - excess_fr * LL15[nlayr]);


            double pot_avail_sw = (MathUtilities.Sum(DUL, 0, nlayr, 0.0)
                                  - excess_fr * DUL[nlayr])
                                  - (MathUtilities.Sum(LL15, 0, nlayr, 0.0)
                                  - excess_fr * LL15[nlayr]);

            FASW = MathUtilities.Divide(avail_sw, pot_avail_sw, 0.0);
            WaterDeficit = MathUtilities.Constrain(pot_avail_sw - avail_sw, 0.0, 100000);
        }

        private int GetLayerIndex()
        {
            double[] cumThickness = soilPhysical.ThicknessCumulative;
            for (int i = 1; i < cumThickness.Length; i++)
            {
                if (FASWDepth < cumThickness[i])
                    return i - 1;
            }
            
            return cumThickness.Length - 1;
        }

    }
}
```
            Irrigation
            Fertiliser
            MicroClimate: a_interception=0; b_interception=1; c_interception=0; d_interception=0; SoilHeatFluxFraction=0.4; MinimumHeightDiffForNewLayer=0; NightInterceptionFraction=0.5; ReferenceHeight=2
            Soil GLH Field: SoilType=GLHSoil; Site=Cooper Lab; NearestTown=Unknown; Region=Gatton; NaturalVegetation=Unknown; Latitude=0; Longitude=0
              Physical
                Thickness  BD    AirDry  LL15  DUL   SAT
                200        1.32  0.1     0.3   0.41  0.46
                200        1.3   0.15    0.3   0.43  0.48
                200        1.23  0.28    0.35  0.46  0.51
                300        1.27  0.28    0.32  0.44  0.49
                300        1.37  0.28    0.29  0.4   0.45
                300        1.35  0.3     0.31  0.41  0.46
                300        1.35  0.3     0.31  0.38  0.43
                SoilCrop SorghumSoil: LL=[0.3, 0.3, 0.35, 0.32, 0.29, 0.31, 0.31]; KL=[0.08, 0.08, 0.08, 0.08, 0.06, 0.04, 0.02]; XF=[1, 1, 1, 1, 1, 1, 1]
              WaterBalance SoilWater: SummerDate=1-Nov; SummerU=6; SummerCona=3.5; WinterDate=1-Apr; WinterU=6; WinterCona=3.5; DiffusConst=88; DiffusSlope=35.4; Salb=0.13; CN2Bare=91; CNRed=20; CNCov=0.8; PSIDul=-100; Thickness=[200, 200, 200, 300, 300, 300, 300]; SWCON=[0.5, 0.5, 0.5, 0.5, 0.5, 0.5, 0.5]
              Nutrient
              Organic: FOMCNRatio=30; CarbonUnits=Total
                Thickness  Carbon  SoilCNRatio  FBiom  FInert  FOM
                200        1.3     12.5         0.03   0.31    514.709
                200        0.65    12.5         0.01   0.38    368.805
                200        0.32    12.5         0      0.47    264.26
                300        0.11    12.5         0      0.7     160.282
                300        0.11    12.5         0      0.9     97.2159
                300        0.11    12.5         0      0.95    58.9644
                300        0.11    12.5         0      0.95    35.7637
              Chemical: Thickness=[200, 200, 200, 300, 300, 300, 300]; PH=[8.2, 8.7, 8.9, 8.1, 8, 8, 8]; PHUnits=Water
              Water: Thickness=[200, 200, 200, 300, 300, 300, 300]; InitialValues=[0.385, 0.47, 0.467, 0.459, 0.394, 0.399, 0.38]; InitialPAWmm=195; RelativeTo=LL15; FilledFromTop=false
              CERESSoilTemperature Temperature
              Solute NO3: Thickness=[200, 200, 200, 300, 300, 300, 300]; InitialValues=[11.624, 5.732, 2.974, 1.645, 1.902, 2.246, 1.942]; InitialValuesUnits=ppm; WaterTableConcentration=0; D0=0; DepthConstant=0; MaxDepthSoluteAccessible=0; RunoffEffectivenessAtMovingSolute=0; MaxEffectiveRunoff=0
              Solute NH4: Thickness=[200, 200, 200, 300, 300, 300, 300]; InitialValues=[0.1, 0.1, 0.1, 0.1, 0.1, 0.1, 0.1]; InitialValuesUnits=ppm; WaterTableConcentration=0; D0=0; DepthConstant=0; MaxDepthSoluteAccessible=0; RunoffEffectivenessAtMovingSolute=0; MaxEffectiveRunoff=0
              Solute Urea: Thickness=[200, 200, 200, 300, 300, 300, 300]; InitialValues=[0, 0, 0, 0, 0, 0, 0]; InitialValuesUnits=kg/ha; WaterTableConcentration=0; D0=0; DepthConstant=0; MaxDepthSoluteAccessible=0; RunoffEffectivenessAtMovingSolute=0; MaxEffectiveRunoff=0
            Plant Sorghum
            SurfaceOrganicMatter: InitialResidueName=wheat_stubble; InitialResidueType=wheat; InitialResidueMass=0; InitialStandingFraction=0; InitialCPR=0; InitialCNR=80
            DCaPSTModelNG DCaPST: CropName=Sorghum; Biolimit=0; Reduction=0; RubiscoLimitedModifier=1; ElectronTransportLimitedModifier=1
              Folder CultivarParameters
      Experiment LE15
        Memo LE15 Description
          Experiment: LE15

          Description: Late Sow - 3 Indian/Aust Cultivars

          Start Date: 5/09/1996

          End Date: 8/05/1997

          !! This experiment had severe storm at flowering. Question mark over post anthesis data !!

          |SimulationName             |Cultivar |
          |---------------------------|---------|
          |Lawes1996LateCvBuster      |Buster   |
          |Lawes1996LateCvQL41xQL36   |QL41xQL36|
        Factors
          Factor Cv
            CompositeFactor Buster
              Specifications:
                [SowingRule].Script.Cultivar = Buster
                [SowingRule].Script.Ftn = 0.5
            CompositeFactor QL41xQL36
              Specifications:
                [SowingRule].Script.Cultivar = QL41xQL36
                [SowingRule].Script.Ftn = 0.5
        Simulation Lawes1996LateBase
          Clock: Start=1996-09-05; End=1997-05-08
          Summary
          Weather: FileName=Met/LE15.met; Latitude=-27.55; Tav=20.61; Amp=13
          SoilArbitrator
          Zone Paddock: Area=1; Slope=0; AspectAngle=0; Altitude=50
            Report DailyReport
            Report HarvestReport
            Manager SowingRule
              Date = 01/06/1997 00:00:00
              Density = 10
              Depth = 25
              Cultivar = Buster
              RowSpacing = 500
              RowConfiguration = Solid
              TilleringMethod = ObservedTillers
              Ftn = 0.5
              script: same as in Validation.Hermitage.HE8.HE8Base.Paddock.SowingRule
            Manager HarvestingRule: same as Validation.Hermitage.HE1.HE1Base.Paddock.HarvestingRule
            Operations
              1997-01-06  [Irrigation].Apply(31);
              1997-01-08  [Irrigation].Apply(14);
              1997-01-10  [Irrigation].Apply(14);
              1997-01-12  [Irrigation].Apply(14);
              1997-01-14  [Irrigation].Apply(11);
              1997-01-17  [Irrigation].Apply(14);
              1997-01-20  [Irrigation].Apply(7);
              1997-01-22  [Irrigation].Apply(8);
              1997-01-24  [Irrigation].Apply(17);
              1997-02-04  [Irrigation].Apply(8);
              1997-02-12  [Irrigation].Apply(24);
              1997-02-26  [Irrigation].Apply(29);
              1997-03-11  [Irrigation].Apply(22);
              1997-03-19  [Irrigation].Apply(27);
              1997-03-27  [Irrigation].Apply(25);
              1997-04-03  [Irrigation].Apply(20);
              1997-04-09  [Irrigation].Apply(32);
              1997-04-18  [Irrigation].Apply(35);
              1997-04-27  [Irrigation].Apply(22);
              1997-01-03  [Fertiliser].Apply(0, Fertiliser.Types.NO3N, 50);
              1997-01-03  [Fertiliser].Apply(45, Fertiliser.Types.NO3N, 50);
              1997-01-03  [Fertiliser].Apply(116, Fertiliser.Types.NO3N, 50);
              1997-02-04  [Fertiliser].Apply(59, Fertiliser.Types.NO3N, 50);
              1997-03-11  [Fertiliser].Apply(59, Fertiliser.Types.NO3N, 50);
            Irrigation
            Fertiliser
            MicroClimate: a_interception=0; b_interception=1; c_interception=0; d_interception=0; SoilHeatFluxFraction=0.4; MinimumHeightDiffForNewLayer=0; NightInterceptionFraction=0.5; ReferenceHeight=2
            Soil GLH Field: SoilType=GLHSoil; Site=Cooper Lab; NearestTown=Unknown; Region=Gatton; NaturalVegetation=Unknown; Latitude=0; Longitude=0
              Physical: same as Validation.Lawes.LE14.Lawes1996EarlyBase.Paddock.GLH Field.Physical
              WaterBalance SoilWater: same as Validation.Lawes.LE14.Lawes1996EarlyBase.Paddock.GLH Field.SoilWater
              Nutrient
              Organic: same as Validation.Lawes.LE14.Lawes1996EarlyBase.Paddock.GLH Field.Organic
              Chemical: Thickness=[200, 200, 200, 300, 300, 300, 300]; PH=[8.2, 8.7, 8.9, 8.1, 8, 8, 8]; PHUnits=Water
              Water: Thickness=[200, 200, 200, 300, 300, 300, 300]; InitialValues=[0.39, 0.47, 0.479, 0.422, 0.393, 0.379, 0.405]; InitialPAWmm=188.5; RelativeTo=LL15; FilledFromTop=false
              CERESSoilTemperature Temperature
              Solute NO3: same as Validation.Lawes.LE14.Lawes1996EarlyBase.Paddock.GLH Field.NO3
              Solute NH4: same as Validation.Lawes.LE14.Lawes1996EarlyBase.Paddock.GLH Field.NH4
              Solute Urea: same as Validation.Lawes.LE14.Lawes1996EarlyBase.Paddock.GLH Field.Urea
            Plant Sorghum
            SurfaceOrganicMatter: InitialResidueName=wheat_stubble; InitialResidueType=wheat; InitialResidueMass=0; InitialStandingFraction=0; InitialCPR=0; InitialCNR=80
            DCaPSTModelNG DCaPST: CropName=Sorghum; Biolimit=0; Reduction=0; RubiscoLimitedModifier=1; ElectronTransportLimitedModifier=1
              Folder CultivarParameters
      Experiment LE17: DisabledSimNames=[LE17CvCSH13R]
        Memo LE17 Description
          Experiment: LE17

          Description: LE17 Growth Analysis- Late Sow - 2 Indian/ 1 Aust. Cultivars

          Start Date: 27/11/1997

          End Date: 27/04/1998

          |SimulationName             |Cultivar|
          |---------------------------|--------|
          |Lawes1997LateCvBuster      |Buster  |
        Factors
          Factor Cv
            CompositeFactor Buster: Specifications=[SowingRule].Script.Cultivar = Buster
        Simulation Lawes1997LateBase
          Clock: Start=1997-11-27; End=1998-04-09
          Summary
          Weather: FileName=Met/LE17.met; Latitude=-27.55; Tav=19.77; Amp=12.82
          SoilArbitrator
          Zone Paddock: Area=1; Slope=0; AspectAngle=0; Altitude=50
            Report DailyReport
            Report HarvestReport
            Manager SowingRule
              Date = 12/04/1997 00:00:00
              Density = 10
              Depth = 25
              Cultivar = Buster
              RowSpacing = 500
              RowConfiguration = Solid
              TilleringMethod = ObservedTillers
              Ftn = 0
              script: same as in Validation.Hermitage.HE8.HE8Base.Paddock.SowingRule
            Manager HarvestingRule: same as Validation.Hermitage.HE1.HE1Base.Paddock.HarvestingRule
            Operations
              1997-12-04  [Irrigation].Apply(72);
              1997-12-17  [Irrigation].Apply(22);
              1997-12-29  [Irrigation].Apply(27);
              1998-01-06  [Irrigation].Apply(44);
              1998-01-19  [Irrigation].Apply(40);
              1998-02-10  [Irrigation].Apply(17);
              1998-03-05  [Irrigation].Apply(43);
              1998-03-18  [Irrigation].Apply(37);
              1997-12-03  [Fertiliser].Apply(0, Fertiliser.Types.NO3N, 50);
              1997-12-03  [Fertiliser].Apply(40, Fertiliser.Types.NO3N, 50);
              1997-12-04  [Fertiliser].Apply(147, Fertiliser.Types.NO3N, 50);
              1998-01-06  [Fertiliser].Apply(59, Fertiliser.Types.NO3N, 50);
              1998-02-10  [Fertiliser].Apply(59, Fertiliser.Types.NO3N, 50);
            Irrigation
            Fertiliser
            MicroClimate: a_interception=0; b_interception=1; c_interception=0; d_interception=0; SoilHeatFluxFraction=0.4; MinimumHeightDiffForNewLayer=0; NightInterceptionFraction=0.5; ReferenceHeight=2
            Soil CooperLab: SoilType=Gatton; Site=Gatton CSIRO; NearestTown=Unknown; Region=SE Queensland; NaturalVegetation=Unknown; Latitude=0; Longitude=0
              Physical: same as Validation.Lawes.LE14.Lawes1996EarlyBase.Paddock.GLH Field.Physical
              WaterBalance SoilWater: same as Validation.Lawes.LE14.Lawes1996EarlyBase.Paddock.GLH Field.SoilWater
              Nutrient
              Organic: FOMCNRatio=30; CarbonUnits=Total
                Thickness  Carbon  SoilCNRatio  FBiom  FInert  FOM
                200        1.3     12.5         0.03   0.31    514.709
                200        0.65    12.5         0.01   0.38    368.805
                200        0.32    12.5         0      0.47    264.26
                300        0.11    12.5         0      0.7     160.282
                300        0.11    12.5         0      0.9     97.216
                300        0.11    12.5         0      0.95    58.964
                300        0.11    12.5         0      0.95    35.764
              Chemical: Thickness=[200, 200, 200, 300, 300, 300, 300]; PH=[7.7, 8.3, 8.4, 8.5, 8.5, 8.5, 8.6]; PHUnits=Water
              Water: Thickness=[200, 200, 200, 300, 300, 300, 300]; InitialValues=[0.34, 0.412, 0.439, 0.434, 0.405, 0.399, 0.389]; InitialPAWmm=167.3; RelativeTo=LL15; FilledFromTop=false
              CERESSoilTemperature Temperature
              Solute NO3: Thickness=[200, 200, 200, 300, 300, 300, 300]; InitialValues=[17.363, 8.078, 12.758, 21.236, 22.809, 22.437, 10.359]; InitialValuesUnits=ppm; WaterTableConcentration=0; D0=0; DepthConstant=0; MaxDepthSoluteAccessible=0; RunoffEffectivenessAtMovingSolute=0; MaxEffectiveRunoff=0
              Solute NH4: same as Validation.Lawes.LE14.Lawes1996EarlyBase.Paddock.GLH Field.NH4
              Solute Urea: same as Validation.Lawes.LE14.Lawes1996EarlyBase.Paddock.GLH Field.Urea
            Plant Sorghum
            Manager AutoIrrigation
              AutoIrrigationOn = False
              FASWThreshold = 0.5
              FASWDepth = 600
              script: same as in Validation.Lawes.LE14.Lawes1996EarlyBase.Paddock.Automatic irrigation based on water deficit
            SurfaceOrganicMatter: InitialResidueName=wheat_stubble; InitialResidueType=wheat; InitialResidueMass=0; InitialStandingFraction=0; InitialCPR=0; InitialCNR=80
            DCaPSTModelNG DCaPST: CropName=Sorghum; Biolimit=0; Reduction=0; RubiscoLimitedModifier=1; ElectronTransportLimitedModifier=1
              Folder CultivarParameters
      Experiment LE19
        DisabledSimNames=[LE19FertHighCvCSH13R, LE19FertMedCvCSH13R, LE19FertLowCvCSH13R, LE19FertOffCvCSH13R]
        Memo LE19 Description
          Experiment: LE19

          Description: LE19 - Genotypic variation in Radiation Use Efficiency

          Start Date: 9/11/1998

          End Date: 7/03/1999

          |SimulationName             |N Rates        |Cultivar|
          |---------------------------|---------------|--------|
          |Lawes1998FertOffBuster     |0 kg/ha        |Buster  |
          |Lawes1998FertLowBuster     |120 kg/ha      |Buster  |
          |Lawes1998FertMedBuster     |240 kg/ha      |Buster  |
          |Lawes1998FertHighBuster    |360 kg/ha      |Buster  |
        Factors
          CompositeFactor FertOffCvBuster
            Specifications:
              [SowingRule].Script.Cultivar = Buster
              [SowingRule].Script.Ftn = 0
              [FertiliserSchedule]
            Operations FertiliserSchedule
          CompositeFactor FertLowCvBuster
            Specifications:
              [SowingRule].Script.Cultivar = Buster
              [SowingRule].Script.Ftn = 0.2
              [FertiliserSchedule]
            Operations FertiliserSchedule
              1998-11-11  [Fertiliser].Apply(55, Fertiliser.Types.NO3N, 50);
          CompositeFactor FertMedCvBuster
            Specifications:
              [SowingRule].Script.Cultivar = Buster
              [SowingRule].Script.Ftn = 0.3
              [FertiliserSchedule]
            Operations FertiliserSchedule
              1998-11-11  [Fertiliser].Apply(55, Fertiliser.Types.NO3N, 50);
              1998-12-13  [Fertiliser].Apply(27, Fertiliser.Types.NO3N, 50);
              1999-01-14  [Fertiliser].Apply(27, Fertiliser.Types.NO3N, 50);
          CompositeFactor FertHighCvBuster
            Specifications:
              [SowingRule].Script.Cultivar = Buster
              [SowingRule].Script.Ftn = 0.4
              [FertiliserSchedule]
            Operations FertiliserSchedule
              1998-11-11  [Fertiliser].Apply(55, Fertiliser.Types.NO3N, 50);
              1998-12-13  [Fertiliser].Apply(55, Fertiliser.Types.NO3N, 50);
              1999-01-14  [Fertiliser].Apply(55, Fertiliser.Types.NO3N, 50);
        Simulation Lawes1998Base
          Clock: Start=1998-11-09; End=1999-03-07
          Summary
          Weather: FileName=Met/LE19.met; Latitude=-27.55; Tav=19.77; Amp=12.82
          SoilArbitrator
          Zone Paddock: Area=1; Slope=0; AspectAngle=0; Altitude=50
            Report DailyReport
            Report HarvestReport
            Manager SowingRule
              Date = 11/11/1998 00:00:00
              Density = 10
              Depth = 30
              Cultivar = Buster
              RowSpacing = 500
              RowConfiguration = Solid
              TilleringMethod = ObservedTillers
              Ftn = 0
              script: same as in Validation.Hermitage.HE8.HE8Base.Paddock.SowingRule
            Manager HarvestingRule: same as Validation.Hermitage.HE1.HE1Base.Paddock.HarvestingRule
            Fertiliser
            Irrigation
            Operations FertiliserSchedule
            Manager Automatic irrigation based on water deficit
              AutoIrrigationOn = True
              FASWThreshold = 0.75
              FASWDepth = 600
              script: same as in Validation.Lawes.LE14.Lawes1996EarlyBase.Paddock.Automatic irrigation based on water deficit
            MicroClimate: a_interception=0; b_interception=1; c_interception=0; d_interception=0; SoilHeatFluxFraction=0.4; MinimumHeightDiffForNewLayer=0; NightInterceptionFraction=0.5; ReferenceHeight=2
            Soil CooperLab: SoilType=Gatton; Site=Gatton CSIRO; NearestTown=Unknown; Region=SE Queensland; NaturalVegetation=Unknown; Latitude=0; Longitude=0
              Physical: same as Validation.Lawes.LE14.Lawes1996EarlyBase.Paddock.GLH Field.Physical
              WaterBalance SoilWater: same as Validation.Lawes.LE14.Lawes1996EarlyBase.Paddock.GLH Field.SoilWater
              Nutrient
              Organic: same as Validation.Lawes.LE14.Lawes1996EarlyBase.Paddock.GLH Field.Organic
              Chemical: Thickness=[200, 200, 200, 300, 300, 300, 300]; PH=[7.7, 8.3, 8.4, 8.5, 8.5, 8.5, 8.6]; PHUnits=Water
              Water: Thickness=[200, 200, 200, 300, 300, 300, 300]; InitialValues=[0.293, 0.388, 0.371, 0.315, 0.307, 0.35, 0.374]; InitialPAWmm=55.2; RelativeTo=LL15; FilledFromTop=false
              CERESSoilTemperature Temperature
              Solute NO3: Thickness=[200, 200, 200, 300, 300, 300, 300]; InitialValues=[8.581, 5.84, 1.684, 0.665, 0.363, 0.439, 0.582]; InitialValuesUnits=ppm; WaterTableConcentration=0; D0=0; DepthConstant=0; MaxDepthSoluteAccessible=0; RunoffEffectivenessAtMovingSolute=0; MaxEffectiveRunoff=0
              Solute NH4: same as Validation.Lawes.LE14.Lawes1996EarlyBase.Paddock.GLH Field.NH4
              Solute Urea: same as Validation.Lawes.LE14.Lawes1996EarlyBase.Paddock.GLH Field.Urea
            Plant Sorghum
            SurfaceOrganicMatter: InitialResidueName=wheat_stubble; InitialResidueType=wheat; InitialResidueMass=0; InitialStandingFraction=0; InitialCPR=0; InitialCNR=80
            DCaPSTModelNG DCaPST: CropName=Sorghum; Biolimit=0; Reduction=0; RubiscoLimitedModifier=1; ElectronTransportLimitedModifier=1
              Folder CultivarParameters
      Experiment LE20
        Memo LE20 Description
          Dynamic Tillering is still under development.

          Experiment: LE20

          Description: LE20 - Density

          Start Date: 9/11/1998

          End Date: 7/03/1999

          |SimulationName |Density        |
          |---------------|---------------|
          |Density_1      | 2 plants/m2   |
          |Density_2      | 4 plants/m2   |
          |Density_2      | 8 plants/m2   |
          |Density_3      |16 plants/m2   |
        Factors
          CompositeFactor Density_1
            Specifications:
              [SowingRule].Script.Cultivar = Buster
              [SowingRule].Script.Density = 2
              [SowingRule].Script.Ftn = 5
          CompositeFactor Density_2
            Specifications:
              [SowingRule].Script.Cultivar = Buster
              [SowingRule].Script.Density = 4
              [SowingRule].Script.Ftn = 3.27
          CompositeFactor Density_3
            Specifications:
              [SowingRule].Script.Cultivar = Buster
              [SowingRule].Script.Density = 8
              [SowingRule].Script.Ftn = 1.53
          CompositeFactor Density_4
            Specifications:
              [SowingRule].Script.Cultivar = Buster
              [SowingRule].Script.Density = 16
              [SowingRule].Script.Ftn = 0.2
        Simulation Lawes20Base
          Clock: Start=1998-10-23; End=1999-02-21
          Summary
          Weather: FileName=Met/Gatton_Tiller_x_Density.met; Latitude=-27.55; Tav=19.51; Amp=10.55
          SoilArbitrator
          Zone Paddock: Area=1; Slope=0; AspectAngle=0; Altitude=50
            Report DailyReport
            Report HarvestReport
            Manager SowingRule
              Cultivar = Buster
              Date = 10/23/1998 00:00:00
              Density = 2
              Depth = 30
              RowSpacing = 500
              RowConfiguration = Solid
              TilleringMethod = ObservedTillers
              Ftn = 0
              script: same as in Validation.Hermitage.HE8.HE8Base.Paddock.SowingRule
            Manager HarvestingRule: same as Validation.Hermitage.HE1.HE1Base.Paddock.HarvestingRule
            Fertiliser
            Irrigation
            Operations IrrigationSchedule
              1998-10-26  [Irrigation].Apply(6);
              1998-10-27  [Irrigation].Apply(0);
              1998-10-28  [Irrigation].Apply(0);
              1998-10-29  [Irrigation].Apply(2);
              1998-10-30  [Irrigation].Apply(2);
              1998-10-31  [Irrigation].Apply(3);
              1998-11-01  [Irrigation].Apply(0);
              1998-11-02  [Irrigation].Apply(1);
              1998-11-13  [Irrigation].Apply(1);
              1998-11-14  [Irrigation].Apply(21);
              1998-11-19  [Irrigation].Apply(5);
              1998-11-23  [Irrigation].Apply(10);
              1998-11-24  [Irrigation].Apply(0);
              1998-11-25  [Irrigation].Apply(43);
              1998-11-26  [Irrigation].Apply(9);
              1998-11-27  [Irrigation].Apply(0);
              1998-11-29  [Irrigation].Apply(14);
              1998-12-16  [Irrigation].Apply(30);
              1998-12-17  [Irrigation].Apply(4);
              1998-12-19  [Irrigation].Apply(10);
              1998-12-20  [Irrigation].Apply(14);
              1998-12-21  [Irrigation].Apply(8);
              1998-12-22  [Irrigation].Apply(0);
              1998-12-24  [Irrigation].Apply(1);
              1998-12-25  [Irrigation].Apply(8);
              1998-12-26  [Irrigation].Apply(0);
              1999-01-01  [Irrigation].Apply(3);
              1999-01-02  [Irrigation].Apply(22);
              1999-01-03  [Irrigation].Apply(21);
              1999-01-04  [Irrigation].Apply(0);
              1999-01-05  [Irrigation].Apply(9);
              1999-01-06  [Irrigation].Apply(4);
              1999-01-10  [Irrigation].Apply(79);
              1999-01-11  [Irrigation].Apply(5);
              1999-01-12  [Irrigation].Apply(0);
              1999-01-13  [Irrigation].Apply(1);
              1999-01-16  [Irrigation].Apply(1);
              1999-01-21  [Irrigation].Apply(1);
              1999-01-22  [Irrigation].Apply(0);
              1999-01-28  [Irrigation].Apply(0);
              1999-01-29  [Irrigation].Apply(0);
              1999-01-30  [Irrigation].Apply(8);
              1999-01-31  [Irrigation].Apply(3);
              1999-02-01  [Irrigation].Apply(5);
              1999-02-02  [Irrigation].Apply(13);
              1999-02-08  [Irrigation].Apply(23);
              1999-02-09  [Irrigation].Apply(103);
              1999-02-10  [Irrigation].Apply(8);
              1999-02-11  [Irrigation].Apply(0);
              1999-02-12  [Irrigation].Apply(1);
              1999-02-25  [Irrigation].Apply(14);
              1999-02-26  [Irrigation].Apply(2);
              1999-03-01  [Irrigation].Apply(12);
              1999-03-02  [Irrigation].Apply(24);
              1999-03-03  [Irrigation].Apply(16);
              1999-03-04  [Irrigation].Apply(35);
              1999-03-12  [Irrigation].Apply(0);
              1999-03-23  [Irrigation].Apply(0);
              1999-04-05  [Irrigation].Apply(0);
              1999-04-06  [Irrigation].Apply(1);
              1999-04-07  [Irrigation].Apply(0);
              1999-04-18  [Irrigation].Apply(0);
              1999-04-19  [Irrigation].Apply(5);
            Manager Automatic irrigation based on water deficit
              AutoIrrigationOn = False
              FASWThreshold = 0.75
              FASWDepth = 600
              script: same as in Validation.Lawes.LE14.Lawes1996EarlyBase.Paddock.Automatic irrigation based on water deficit
            MicroClimate: a_interception=0; b_interception=1; c_interception=0; d_interception=0; SoilHeatFluxFraction=0.4; MinimumHeightDiffForNewLayer=0; NightInterceptionFraction=0.5; ReferenceHeight=2
            Plant Sorghum
            SurfaceOrganicMatter: InitialResidueName=wheat_stubble; InitialResidueType=wheat; InitialResidueMass=0; InitialStandingFraction=0; InitialCPR=0; InitialCNR=80
            Soil LawesBlackVertosol: SoilType=LawesBlackVertosol; Site=Gatton RS; NearestTown=Unknown; Region=Gatton; NaturalVegetation=Unknown; Latitude=0; Longitude=0
              Physical
                Thickness  BD    AirDry  LL15  DUL   SAT
                150        1.32  0.1     0.26  0.41  0.46
                150        1.3   0.15    0.26  0.43  0.48
                300        1.23  0.25    0.26  0.46  0.51
                300        1.27  0.26    0.26  0.44  0.49
                300        1.37  0.25    0.25  0.4   0.45
                300        1.35  0.28    0.28  0.41  0.46
                300        1.35  0.31    0.31  0.38  0.43
                SoilCrop SorghumSoil: LL=[0.26, 0.26, 0.26, 0.26, 0.25, 0.28, 0.31]; KL=[0.08, 0.08, 0.08, 0.08, 0.06, 0.04, 0.02]; XF=[1, 1, 1, 1, 1, 1, 1]
              WaterBalance SoilWater: SummerDate=1-Nov; SummerU=6; SummerCona=3.5; WinterDate=1-Apr; WinterU=6; WinterCona=3.5; DiffusConst=88; DiffusSlope=35.4; Salb=0.13; CN2Bare=91; CNRed=20; CNCov=0.8; PSIDul=-100; Thickness=[150, 150, 300, 300, 300, 300, 300]; SWCON=[0.5, 0.5, 0.5, 0.5, 0.5, 0.5, 0.5]
              Nutrient
              CERESSoilTemperature Temperature
              Organic: FOMCNRatio=30; CarbonUnits=Total
                Thickness  Carbon  SoilCNRatio  FBiom  FInert  FOM
                150        1.3     12.5         0.03   0.31    520.694
                150        0.65    12.5         0.01   0.38    405.517
                300        0.32    12.5         0      0.47    245.958
                300        0.11    12.5         0      0.7     149.181
                300        0.11    12.5         0      0.9     90.483
                300        0.11    12.5         0      0.95    54.8807
                300        0.11    12.5         0      0.95    33.2868
              Chemical: Thickness=[150, 150, 300, 300, 300, 300, 300]; PH=[8.2, 8.7, 8.9, 8.1, 8, 8, 8]; PHUnits=Water
              Water: Thickness=[150, 150, 300, 300, 300, 300, 300]; InitialValues=[0.41, 0.43, 0.46, 0.44, 0.4, 0.41, 0.38]; InitialPAWmm=267; RelativeTo=LL15; FilledFromTop=true
              Solute NO3: Thickness=[150, 150, 300, 300, 300, 300, 300]; InitialValues=[7, 5, 4, 2, 1.5, 1, 0.5]; InitialValuesUnits=ppm; WaterTableConcentration=0; D0=0; DepthConstant=0; MaxDepthSoluteAccessible=0; RunoffEffectivenessAtMovingSolute=0; MaxEffectiveRunoff=0
              Solute NH4: Thickness=[150, 150, 300, 300, 300, 300, 300]; InitialValues=[1, 0.5, 0.3, 0.2, 0.2, 0.2, 0.2]; InitialValuesUnits=ppm; WaterTableConcentration=0; D0=0; DepthConstant=0; MaxDepthSoluteAccessible=0; RunoffEffectivenessAtMovingSolute=0; MaxEffectiveRunoff=0
              Solute Urea: Thickness=[150, 150, 300, 300, 300, 300, 300]; InitialValues=[0, 0, 0, 0, 0, 0, 0]; InitialValuesUnits=kg/ha; WaterTableConcentration=0; D0=0; DepthConstant=0; MaxDepthSoluteAccessible=0; RunoffEffectivenessAtMovingSolute=0; MaxEffectiveRunoff=0
            Manager Fertilise at sowing
              Crop = [Sorghum]
              FertiliserType = NO3N
              Amount = 240
```csharp
using Models.Soils;
using System;
using System.Linq;
using Models.Core;
using Models.PMF;
namespace Models
{
    [Serializable]
    public class Script : Model
    {
        [Link] Clock Clock;
        [Link] Fertiliser Fertiliser;
        
        [Description("Crop to be fertilised")]
        public IPlant Crop { get; set; }

        [Description("Type of fertiliser to apply? ")] 
        public Fertiliser.Types FertiliserType { get; set; }
    
        [Description("Amount of fertiliser to be applied (kg/ha)")]
        public double Amount { get; set; }
        
        [EventSubscribe("Sowing")]
        private void OnSowing(object sender, EventArgs e)
        {
            Model crop = sender as Model;
            if (Crop != null && crop.Name.ToLower() == (Crop as IModel).Name.ToLower())
                Fertiliser.Apply(Amount: Amount, Type: FertiliserType);
        }
    }
}
```
            DCaPSTModelNG DCaPST: CropName=Sorghum; Biolimit=0; Reduction=0; RubiscoLimitedModifier=1; ElectronTransportLimitedModifier=1
              Folder CultivarParameters
      Experiment LE21
        DisabledSimNames=[LE21CvCSH13RFertHigh, LE21CvCSH13RFertMed, LE21CvCSH13RFertLow]
        Memo LE21 Description
          Experiment: Gatton_RUE

          Description: N Rates x Genotype LE21

          Start Date: 22/11/1999

          End Date: 3/04/2000

          |SimulationName                 |Cultivar       |N Rates |
          |-------------------------------|---------------|--------|
          |Lawes1999FertLowCvA35xQL36     |A35xQL36       |0kg/ha  |
          |Lawes1999FertLowCvQL39xQL36    |QL39xQL36      |0kg/ha  |
          |Lawes1999FertMedCvA35xQL36     |A35xQL36       |45kg/ha |
          |Lawes1999FertMedCvQL39xQL36    |QL39xQL36      |45kg/ha |
          |Lawes1999FertHighCvA35xQL36    |A35xQL36       |360kg/ha|
          |Lawes1999FertHighCvQL39xQL36   |QL39xQL36      |360kg/ha|
        Factors
          Permutation
            Factor Cv: Specification=[SowingRule].Script.Cultivar = A35xQL36, QL39xQL36
            Factor Fert: Specification=[FertiliserSchedule]
              Operations Low
              Operations Med
                1999-11-29  [Fertiliser].Apply(44, Fertiliser.Types.NO3N, 50);
              Operations High
                1999-11-29  [Fertiliser].Apply(117, Fertiliser.Types.NO3N, 50);
                2000-01-07  [Fertiliser].Apply(119, Fertiliser.Types.NO3N, 50);
                2000-02-11  [Fertiliser].Apply(119, Fertiliser.Types.NO3N, 50);
        Simulation Lawes1999Base
          Clock: Start=1999-11-22; End=2000-04-03
          Summary
          Weather: FileName=Met/Gatton_RUE.met; Latitude=-27.55; Tav=19.51; Amp=10.55
          SoilArbitrator
          Zone Paddock: Area=1; Slope=0; AspectAngle=0; Altitude=50
            Report DailyReport
            Report HarvestReport
            Manager SowingRule
              Date = 12/02/1999 00:00:00
              Density = 10
              Depth = 40
              Cultivar = CSH13R
              RowSpacing = 500
              RowConfiguration = Solid
              TilleringMethod = ObservedTillers
              Ftn = 0
```csharp
using Models.Soils;
using Models.PMF.Organs;
using System;
using Models.Core;
using Models.PMF;
using APSIM.Shared.Utilities;

namespace Models
{
    [Serializable]
    public class Script : Model
    {
        [Description("Enter sowing date (dd/mm/yyyy) : ")]
        public DateTime Date { get; set; }

        [Description("Enter sowing density  (plants/m2) : ")]
        public double Density { get; set; }

        [Description("Enter sowing depth  (mm) : ")]
        public double Depth { get; set; }

        [Description("Enter cultivar : ")]
        [Display(Type = DisplayType.CultivarName)]
        public string Cultivar { get; set; } 

        [Description("Enter row spacing (mm) : ")]
        public double RowSpacing { get; set; }

        [Description("Enter skip row configuration : ")]
        public RowConfigurationType RowConfiguration { get; set; }

        [Description("Tillering Method : ")]
        public TilleringMethodType TilleringMethod { get; set; } = 0;

        [Description("Enter Fertile Tiller No. : ")]
        public double Ftn { get; set; }

        public enum TilleringMethodType 
        {
            RuleOfThumb = -1,
            ObservedTillers = 0,
            DynamicTillering = 1
        }
        public enum RowConfigurationType 
        {
            Solid, SingleSkip, DoubleSkip
        }

        [Link]
        private Zone paddock;

        [Link]
        private Clock clock;

        [Link]
        private Plant crop;
        
        [Link(ByName = true)] 
        private Operations fertiliserSchedule;

        [EventSubscribe("DoManagement")]
        private void OnDoManagement(object sender, EventArgs e)
        {
            if (clock.Today == Date)
            {
                double tmpFtn = Ftn;
                if(TilleringMethod == TilleringMethodType.ObservedTillers)
                {
                    //hack to set fixed tillers inside of experiment
                    if (fertiliserSchedule.OperationsList.Count == 3)
                    {
                        if(Cultivar == "A35xQL36")
                        {
                            tmpFtn = 0.2;
                        }
                        else
                        {
                            tmpFtn = 0.9;
                        }
                    }
                } 
                crop.Sow(cultivar:Cultivar, population:Density, depth:Depth, rowSpacing:RowSpacing, rowConfig: (double)RowConfiguration, tillering:(int)TilleringMethod, ftn:tmpFtn);
            }
        }
    }
}
```
            Manager HarvestingRule: same as Validation.Hermitage.HE1.HE1Base.Paddock.HarvestingRule
            Operations IrrigationSchedule
              1999-12-03  [Irrigation].Apply(17);
              1999-12-06  [Irrigation].Apply(20);
              1999-12-17  [Irrigation].Apply(20);
              2000-01-07  [Irrigation].Apply(10);
              2000-01-14  [Irrigation].Apply(48);
              2000-01-27  [Irrigation].Apply(21);
              2000-02-04  [Irrigation].Apply(17);
              2000-02-11  [Irrigation].Apply(30);
              2000-02-25  [Irrigation].Apply(41);
              2000-03-03  [Irrigation].Apply(15);
            Operations FertiliserSchedule
            Irrigation
            Fertiliser
            MicroClimate: a_interception=0; b_interception=1; c_interception=0; d_interception=0; SoilHeatFluxFraction=0.4; MinimumHeightDiffForNewLayer=0; NightInterceptionFraction=0.5; ReferenceHeight=2
            Soil Ian's Paddock: SoilType=LawesBlackVertosol; Site=Gatton RS; NearestTown=Unknown; Region=Gatton; NaturalVegetation=Unknown; Latitude=0; Longitude=0
              Water: Thickness=[150, 150, 300, 300, 300, 300, 300]; InitialValues=[0.41, 0.43, 0.46, 0.44, 0.4, 0.41, 0.38]; InitialPAWmm=267; RelativeTo=LL15; FilledFromTop=true
              Physical: same as Validation.Lawes.LE20.Lawes20Base.Paddock.LawesBlackVertosol.Physical
              WaterBalance SoilWater: same as Validation.Lawes.LE20.Lawes20Base.Paddock.LawesBlackVertosol.SoilWater
              Nutrient
              Organic: FOMCNRatio=30; CarbonUnits=Total
                Thickness  Carbon  SoilCNRatio  FBiom  FInert  FOM
                150        1.3     12.5         0.03   0.31    520.694
                150        0.65    12.5         0.01   0.38    405.517
                300        0.32    12.5         0      0.47    245.958
                300        0.11    12.5         0      0.7     149.181
                300        0.11    12.5         0      0.9     90.483
                300        0.11    12.5         0      0.95    54.881
                300        0.11    12.5         0      0.95    33.287
              Chemical: Thickness=[150, 150, 300, 300, 300, 300, 300]; PH=[8.2, 8.7, 8.9, 8.1, 8, 8, 8]; PHUnits=Water
              CERESSoilTemperature Temperature
              Solute NO3: Thickness=[150, 150, 300, 300, 300, 300, 300]; InitialValues=[9.202, 4.403, 2.239, 1.237, 1.266, 1.77, 2.064]; InitialValuesUnits=ppm; WaterTableConcentration=0; D0=0; DepthConstant=0; MaxDepthSoluteAccessible=0; RunoffEffectivenessAtMovingSolute=0; MaxEffectiveRunoff=0
              Solute NH4: Thickness=[150, 150, 300, 300, 300, 300, 300]; InitialValues=[0.1, 0.1, 0.1, 0.1, 0.1, 0.1, 0.1]; InitialValuesUnits=ppm; WaterTableConcentration=0; D0=0; DepthConstant=0; MaxDepthSoluteAccessible=0; RunoffEffectivenessAtMovingSolute=0; MaxEffectiveRunoff=0
              Solute Urea: same as Validation.Lawes.LE20.Lawes20Base.Paddock.LawesBlackVertosol.Urea
            Plant Sorghum
            SurfaceOrganicMatter: InitialResidueName=wheat_stubble; InitialResidueType=wheat; InitialResidueMass=0; InitialStandingFraction=0; InitialCPR=0; InitialCNR=80
            DCaPSTModelNG DCaPST: CropName=Sorghum; Biolimit=0; Reduction=0; RubiscoLimitedModifier=1; ElectronTransportLimitedModifier=1
              Folder CultivarParameters
    Memo fixme
      Some data is missing from daily observed data:

      - slai
      - Leaf wt
      - water sd ratio

      Other problems:

      - Should yield be live or total wt?
      - Which observed variables are rachis variables?
      - Are predicted dm/N variables live or total? And are they aboveground or total?
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