Simulations: Version=159
  Memo TitlePage
    # The APSIM Wheat Model

    _Brown, H.E., Huth, N.I. and Holzworth, D.P._
  Memo Introduction
    The APSIM wheat model has been developed using the Plant Modelling Framework (PMF) of [brown_plant_2014]. This new framework provides a library of plant organ and process submodels that can be coupled, at runtime, to construct a model in much the same way that models can be coupled to construct a simulation. This means that dynamic composition of lower level process and organ classes (e.g. photosynthesis, leaf) into larger constructions (e.g. maize, wheat, sorghum) can be achieved by the model developer without additional coding.

    The wheat model consists of:

    * a phenology model to simulate development through sequential developmental phases
    * a structure model to simulate plant morphology
    * a collection of organs to simulate the various plant parts
    * an arbitrator to allocate resources (N, biomass) to the various plant organs

    This work builds upon earlier APSIM Wheat models such as NWheat ([Asseng200225], [KeatingNWheat]), NWheatS ([Asseng1998163]), Cropmod-Wheat ([Wang2002GenericCropModel]), and the earlier versions developed in Plant (<a href=\"http://www.apsim.info/Documentation/Model,CropandSoil/CropModuleDocumentation/Wheat.aspx">APSIM Wheat 7.5</a>") and then within the Plant Modelling Framework ([brown_plant_2014]).
  Folder Replacements
    Report HarvestReport: EventNames=[Wheat].Harvesting
      VariableNames:
        [Clock].Today
        [Wheat].SowingDate
        [Wheat].SowingData.Cultivar
        [Wheat].Phenology.CurrentPhase.Name
        [Wheat].Phenology.CurrentStageName
        [Wheat].Phenology.EmergenceDAS
        [Wheat].Phenology.TerminalSpikeletDAS
        [Wheat].Phenology.FlagLeafDAS
        [Wheat].Phenology.HeadingDAS
        [Wheat].Phenology.FloweringDAS
        [Wheat].Phenology.MaturityDAS
        [Wheat].Grain.Wt
        [Wheat].Grain.N
        [Wheat].Grain.Number
        [Wheat].Grain.Size
        [Wheat].Grain.Nconc
        [Wheat].AboveGround.Wt
        [Wheat].AboveGround.N
        [Wheat].Grain.Protein
        [Wheat].Grain.Size
        [Wheat].Phenology.FinalLeafNumber
        [Wheat].Structure.MainStemPopn
        [Wheat].SowingData.Cultivar
        [Wheat].SowingDate.DayOfYear
        [Wheat].Leaf.CohortMaxSize
        [Clock].StartDate
        ([Wheat].Phenology.FloweringDAS - [Wheat].Phenology.EmergenceDAS) as FloweringDAE
        [IWeather].Latitude
        [IWeather].Longitude
        [IWeather].FileName
        [IWeather].CO2
        [IWeather].Amp
        [IWeather].Tav
        [LocationInfo].Script.Country
        [LocationInfo].Script.State
        [LocationInfo].Script.Region
    Report DailyReport: EventNames=[Clock].DoReport
      VariableNames:
        [Clock].Today
        [Clock].Today.Date as date
        [Soil].Water.Volumetric
        sum([Soil].Water.MM) as ProfileWater
        sum([Soil].NO3.kgha) as TotalNO3
        [IWeather].Radn
        [IWeather].MeanT
        [Wheat].AboveGround.N
        [Wheat].AboveGround.Wt
        [Wheat].AboveGroundLive.N
        [Wheat].AboveGroundLive.Wt
        [Wheat].AboveGroundLive.Wt * 10 as BioMass
        [Wheat].AboveGroundDead.N
        [Wheat].AboveGroundDead.Wt
        [Wheat].Ear.N
        [Wheat].Ear.Nconc
        [Wheat].Ear.Wt
        [Wheat].Grain.N
        [Wheat].Grain.NConc
        [Wheat].Grain.Number
        [Wheat].Grain.Size
        [Wheat].Grain.Wt
        [Wheat].Leaf.AppearedCohortNo
        [Wheat].Leaf.CoverGreen
        [Wheat].Leaf.CoverTotal
        [Wheat].Leaf.Dead.N
        [Wheat].Leaf.Dead.NConc
        [Wheat].Leaf.Dead.Wt
        [Wheat].Leaf.DeadCohortNo
        [Wheat].Leaf.SenescingCohortNo
        [Wheat].Leaf.ExpandedCohortNo
        [Wheat].Leaf.Fn
        [Wheat].Leaf.Fw
        [Wheat].Leaf.Height
        [Wheat].Leaf.InitialisedCohortNo
        [Wheat].Leaf.LAI
        [Wheat].Leaf.Live.N
        [Wheat].Leaf.Live.NConc
        [Wheat].Leaf.Live.Wt
        [Wheat].Leaf.SpecificArea
        [Wheat].Leaf.SpecificNitrogen
        [Wheat].Leaf.Transpiration
        [Wheat].Phenology.CurrentPhase.Name
        [Wheat].Phenology.CurrentStageName
        [Wheat].Phenology.EmergenceDAS
        [Wheat].Phenology.Stage
        [Wheat].Phenology.ThermalTime
        [Wheat].Phenology.Zadok.Stage
        [Wheat].Root.Depth
        [Wheat].Root.N
        [Wheat].Root.Wt
        [Wheat].Root.Nconc
        [Wheat].Spike.N
        [Wheat].Spike.NConc
        [Wheat].Spike.Wt
        [Wheat].Stem.N
        [Wheat].Stem.NConc
        [Wheat].Stem.Wt
        [Wheat].StemPlusSpike.Wt
        [Wheat].StemPlusSpike.N
        [Wheat].SowingData.Cultivar
        [Wheat].Phenology.HaunStage
        [Wheat].Phenology.HaunStage
        [Wheat].Structure.Height
        [Wheat].Structure.LeafTipsAppeared
        [Wheat].Structure.FinalLeafNumber
        [Wheat].Structure.MainStemPopn
        [Wheat].Structure.TotalStemPopn
        [Wheat].Phenology.PTQ
        [Wheat].Structure.Phyllochron
        [Wheat].Total.N
        [Wheat].Total.Wt
        ([Wheat].Leaf.Transpiration + [Soil].SoilWater.Es + [MicroClimate].PrecipitationInterception) as ET
        [IWeather].MeanT
        [Wheat].Phenology.Photoperiod
        [Wheat].Phenology.AccumulatedTT
    Manager MaxLeafSize
```csharp
using Models.Soils;
using Models.PMF.Struct;
using System;
using System.Collections.Generic;
using System.Xml.Serialization;
using Models.Core;
using Models.Interfaces;
using Models.PMF;
using Models.PMF.Organs;
using Models.Soils.Arbitrator;
using APSIM.Shared.Utilities;
using Newtonsoft.Json;



namespace Models
{
    [Serializable] 
    public class Script : Model
    {
        [Link] private Clock Clock;
        [Link] private Plant Wheat;
        public  event EventHandler LeafReport;
        [Link(Type = LinkType.Path, Path = "[Wheat].Structure")]
        private Structure structure;
        
        
        [JsonIgnore] public int LeafPosition { get; set; }
        [JsonIgnore] public double MaxLeafSize { get; set; }
        
        [EventSubscribe("DoManagement")]
        private void OnDoManagement(object sender, EventArgs e)
        {
            var leaf = Wheat.Leaf as Leaf;
            if ((leaf.ExpandedCohortNo > LeafPosition) & (structure.NextLeafProportion == 1))
            {
                LeafPosition = (int)
                leaf.ExpandedCohortNo;
                MaxLeafSize = leaf.CohortSize[LeafPosition - 1];
                LeafReport.Invoke(this, new EventArgs());
            }
        }
    }
}
```
    Report MaxLeafSizeReport: EventNames=[MaxLeafSize].Script.LeafReport
      VariableNames:
        [MaxLeafSize].Script.MaxLeafSize
        [MaxLeafSize].Script.LeafPosition
    Manager Harvesting
```csharp
using Models.PMF.Phen;
using APSIM.Shared.Utilities;
using System.Xml.Serialization;
using Models;
using Models.PMF;
using Models.Soils;
using System.Text;
using System.Collections.Generic;
using Models.Core;
using System;
using Models.Soils.Nutrients;

namespace Models
{
    [Serializable] 
    public class Script : Model
    {
        [Link] private Plant Wheat;
        [Link] private Simulation sim;
        [Link] private Clock clock;
        [Link(Type = LinkType.Path, Path = "[Wheat].Phenology")]
        private Phenology phenology;

        [EventSubscribe("DoManagement")]
        private void OnDoManagement(object sender, EventArgs e)
        {
            if (phenology.CurrentPhase.Name == "Maturing")
            {
                Wheat.Harvest();
                Wheat.EndCrop();
                sim.Set("Clock.EndDate", clock.Today);  
            }
        }

        [EventSubscribe("EndOfDay")]
        private void OnEndOfDay(object sender, EventArgs e)
        {
        	if ((clock.Today.Equals(clock.EndDate))&&(Wheat.IsAlive))
        	{
        		Wheat.Harvest();
                Wheat.EndCrop();
                sim.Set("Clock.EndDate", clock.Today);  
        	}
        }

    }
}
```
    Report SowingReport: EventNames=[Wheat].Sowing
      VariableNames:
        [Clock].Today
        [Wheat].SowingData.Cultivar
        [IWeather].Latitude
        [IWeather].Longitude
        [LocationInfo].Script.Country
        [LocationInfo].Script.State
        [LocationInfo].Script.Region
    Folder CultivarParameters
      Folder Wheat
  DataStore
    ExcelInput ExcelMultiInput: SheetNames=[Observed, MaxLeafSize]
      FileNames=[Observed.xlsx, LaTrobeCE_Obs.xlsx, LincolnCE_Obs.xlsx, PalmerstonNorthCE_Obs.xlsx, Gatton2014_2016.xlsx, 2020Results.xlsx, PalmerstonNorth1989.xlsx, Obs_APSIMX_NPIField2019_Wheat.xlsx, NPIValidation.xlsx, Obs_APSIMX_NPIField2020_Wheat.xlsx]
    PredictedObserved DailyObsPred: PredictedTableName=DailyReport; ObservedTableName=Observed; FieldNameUsedForMatch=SimulationName; FieldName2UsedForMatch=Clock.Today; AllColumns=false
      Tests: POName=DailyObsPred
        AcceptedStats:
          Name                   n     Slope         Intercept   SEslope      SEintercept  R2           RMSE       NSE         ME          MAE         RSR
          ET                     123   1.13169       -0.428525   0.0437149    0.169573     0.847065     0.75711    0.750672    0.0416707   0.558234    0.497294
          ProfileWater           1327  0.876588      76.0389     0.0130203    5.47947      0.7738       58.7876    0.702733    25.8355     33.06       0.545016
          Soil.SoilWater.SW(1)   1300  0.000187106   0.209326    0.000113886  0.00216848   0.00207521   18.9789    -0.0810339  -5.20763    5.28548     1.03933
          Soil.SoilWater.SW(10)  8     -0.411168     0.612361    0.204164     0.087484     0.403332     0.0113816  -3.15811    0.00772724  0.00919543  1.90744
          Soil.SoilWater.SW(2)   1323  -9.03035e-05  0.237103    7.90585e-05  0.00185795   0.000986689  23.4358    -0.0848838  -6.54813    6.60052     1.04118
          Soil.SoilWater.SW(3)   1323  7.41365e-05   0.225765    6.63683e-05  0.00193967   0.000943693  29.1595    -0.0857037  -8.19945    8.22086     1.04158
          Soil.SoilWater.SW(4)   1323  0.00032245    0.209832    5.67479e-05  0.00181599   0.0238581    31.9313    -0.0847602  -8.95944    8.97693     1.04112
          Soil.SoilWater.SW(5)   1323  0.000184327   0.244192    5.45151e-05  0.00180824   0.00858025   33.0939    -0.0856543  -9.31536    9.33089     1.04155
          Soil.SoilWater.SW(6)   1218  0.983201      0.00665286  0.00580358   0.00166975   0.959354     0.0168556  0.958159    0.00202203  0.00893392  0.204467
          Soil.SoilWater.SW(7)   1194  0.995766      0.00138347  0.00547865   0.00136097   0.965173     0.0121361  0.964171    0.00036727  0.00674653  0.189207
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        AcceptedStatsName=Name n Slope Intercept SEslope SEintercept R2 RMSE NSE ME MAE RSR
    PredictedObserved HarvestObsPred: PredictedTableName=HarvestReport; ObservedTableName=Observed; FieldNameUsedForMatch=SimulationName; FieldName2UsedForMatch=Wheat.Phenology.CurrentStageName; AllColumns=false
      Tests: POName=HarvestObsPred
        AcceptedStats:
          Name                                  n    Slope      Intercept   SEslope     SEintercept  R2          RMSE        NSE         ME           MAE         RSR
          Wheat.AboveGround.N                   67   1.12809    -1.00273    0.0391678   0.525848     0.927336    2.09151     0.875576    0.540148     1.59606     0.350095
          Wheat.AboveGround.Wt                  211  1.01911    34.1751     0.0202867   28.6588      0.923515    188.663     0.904426    58.5184      140.453     0.308417
          Wheat.Grain.N                         135  1.07639    -0.257745   0.0362834   0.353004     0.868717    1.79883     0.808865    0.415699     1.36719     0.435568
          Wheat.Grain.Nconc                     136  0.52548    0.0109277   0.0578165   0.00130116   0.381364    0.00332647  0.31597     0.000420536  0.00251003  0.824015
          Wheat.Grain.Number                    195  0.819153   2260.06     0.0213448   308.959      0.88414     2247.71     0.879203    -81.8409     1634.74     0.346666
          Wheat.Grain.Protein                   114  0.424157   7.85561     0.0562272   0.726492     0.336911    2.10436     0.263918    0.550644     1.57133     0.854181
          Wheat.Grain.Wt                        233  0.978713   11.017      0.0292591   15.5104      0.828875    103.644     0.801774    0.879252     78.6576     0.444269
          Wheat.Leaf.CohortMaxSize(1)           10   0.0270759  255.563     0.0327969   7.48653      0.078506    51.271      -0.92608    36.4016      40.5202     1.31661
          Wheat.Leaf.CohortMaxSize(10)          10   1.11919    -412.466    0.256733    521.362      0.703745    224.554     -0.300948   -171.57      207.903     1.08206
          Wheat.Leaf.CohortMaxSize(11)          10   0.825212   365.905     0.266736    598.083      0.54471     196.601     0.391552    -23.5263     115.224     0.740002
          Wheat.Leaf.CohortMaxSize(12)          10   0.848404   253.801     0.223896    493.954      0.642195    151.745     0.416747    -79.2873     105.917     0.724519
          Wheat.Leaf.CohortMaxSize(13)          10   1.09708    -403.529    1.01788     2346.69      0.126797    703.826     -7.88491    -180.887     351.071     2.82779
          Wheat.Leaf.CohortMaxSize(14)          10   1.30676    -642.351    0.429337    1019.71      0.536608    603.245     -0.59098    71.3164      415.854     1.19661
          Wheat.Leaf.CohortMaxSize(15)          9    -0.26027   2713.41     0.159916    364.78       0.274529    585.946     -0.830732   -109.076     515.056     1.27566
          Wheat.Leaf.CohortMaxSize(16)          3    -0.645839  2788.84     7.95817     13511.1      0.00654291  1245.82     -65.0428    6.01155      1116.21     6.6354
          Wheat.Leaf.CohortMaxSize(17)          2    3.1965     -3522.2732  0           0            1           590.025     -4.43529    -197.771     555.892     1.64853
          Wheat.Leaf.CohortMaxSize(18)          1    -          -           -           -            -           985.267     -           985.267      985.267     -
          Wheat.Leaf.CohortMaxSize(2)           10   0.0630555  275.197     0.29264     121.589      0.00577     139.081     -3.00585    -108.611     115.388     1.89875
          Wheat.Leaf.CohortMaxSize(3)           10   0.289291   221.125     0.270354    144.318      0.125205    181.922     -2.6244     -152.132     163.333     1.80609
          Wheat.Leaf.CohortMaxSize(4)           10   0.345581   263.167     0.345159    223.342      0.111353    208.379     -1.99176    -152.884     173.867     1.64091
          Wheat.Leaf.CohortMaxSize(5)           10   0.249259   458.154     0.277019    225.53       0.0919017   229.975     -0.868592   -139.856     146.902     1.29682
          Wheat.Leaf.CohortMaxSize(6)           10   0.345905   476.527     0.195687    187.624      0.280871    242.414     -0.0368856  -130.978     145.477     0.966021
          Wheat.Leaf.CohortMaxSize(7)           10   0.441949   501.987     0.142766    157.184      0.545013    176.986     0.296106    -101.041     122.714     0.79593
          Wheat.Leaf.CohortMaxSize(8)           10   0.589766   515.86      0.179194    229.582      0.575192    169.291     0.574802    1.17705      117.592     0.61861
          Wheat.Leaf.CohortMaxSize(9)           10   0.793068   300.515     0.327977    507.562      0.422258    241.916     0.0929616   -15.3812     161.582     0.903512
          Wheat.Phenology.FlagLeafDAS.Value()   255  0.974146   6.29479     0.00979673  1.35981      0.97505     8.03204     0.971245    2.92157      5.87059     0.16924
          Wheat.Phenology.FloweringDAS.Value()  299  0.943644   8.35638     0.00705763  1.10217      0.983658    6.98781     0.982029    0.0602007    4.93645     0.133831
        AcceptedStatsName=Name n Slope Intercept SEslope SEintercept R2 RMSE NSE ME MAE RSR
    Input Lincoln710: FileNames=[dcaps_new_old\combined_lincoln.csv]
      Memo
        Daily Lincoln outputs from Apsim Classic using DCaPST.
    Input PreDCaPST: FileNames=[exports_pre_dcaps\WheatDCaPST.DailyReport.csv]
      Memo
        NextGen Simulation outputs prior to adding DCaPST, used for comparison of DCaPST vs NonDCaPST.
  Folder Validation
    Memo
      A test dataset has been developed to test the APSIM Wheat model for a range of environmental (soil and climate) conditions, management options (sowing dates, populations, nitrogen rates, row spacing, irrigation), genetic backgrounds (different regions, cultivar types) and for special considerations such as crop damage.  These tests have been grouped into various geographical regions to allow the user to evaluate the suitability of the model for their particular region of interest.  Graphs of model performance are provided for yield, biomass production, canopy development, phenological development, water and nitrogen uptake, and grain yield components.
    Folder Combined Results
      Memo Combined Results
        Simulation results for the combined datasets from the various countries are shown in the following graphs.  The model is able to adequately capture the influence of growing conditions (soil, climate) and management (population, Nitrogen, irrigation, sowing date).
    Folder SE Queensland
      Memo
        South-eastern Queensland has a warm subtropical environment.  Daytime temperatures are moderate due to the relatively low latitudes for wheat growing in Australia, but inland continental conditions can provide cool nights with occaisional frosts.  Many of the datasets used here have been published as part of previous APSIM Wheat model tests.  Further datasets have been added to provide information on phenological development of modern cultivars.
      Experiment APS26
        Memo
          This trial was conducted at Gatton in 1995 using the local variety, Hartog.  It consisted of 4 Nitrogen rates (0,40,80,160) with two irrigation rates (minimal amount for establishment, fully irrigated).  Yields ranged from 1.4 t/ha to 5.4 t/ha.
        Factors
          Permutation
            Factor NRate: Specification=[ApplyFertiliser].Script.Amount=0,40,80,160
            Factor Water: Specification=[IrrigationSchedule]
              Operations Wet
                1995-05-31  [Irrigation].Apply(amount:31);
                1995-06-01  [Irrigation].Apply(amount:13);
                1995-06-02  [Irrigation].Apply(amount:26);
                1995-06-05  [Irrigation].Apply(amount:26);
                1995-06-06  [Irrigation].Apply(amount:26);
                1995-06-07  [Irrigation].Apply(amount:26);
                1995-06-08  [Irrigation].Apply(amount:26);
                1995-06-15  [Wheat].Sow(population:120, cultivar:"Hartog", depth:40, rowSpacing:250);
                1995-07-05  [Irrigation].Apply(amount:26);
                1995-07-21  [Irrigation].Apply(amount:14);
                1995-08-01  [Irrigation].Apply(amount:28);
                1995-08-11  [Irrigation].Apply(amount:30);
                1995-08-25  [Irrigation].Apply(amount:15);
                1995-08-31  [Irrigation].Apply(amount:14);
                1995-09-04  [Irrigation].Apply(amount:15);
                1995-09-15  [Irrigation].Apply(amount:25);
                1995-09-22  [Irrigation].Apply(amount:20);
                1995-10-02  [Irrigation].Apply(amount:11);
              Operations Dry
                1995-06-15  [Wheat].Sow(population:120, cultivar:"Hartog", depth:40, rowSpacing:250);
        Simulation APS26NRate160WaterWet
          Clock: Start=1995-06-13; End=1995-10-31
          Summary summaryfile
          Weather: FileName=Met\APS26Silo.met
          SoilArbitrator Soil Arbitrator
          Zone paddock: Area=1; Slope=0; AspectAngle=0; Altitude=50
            Plant Wheat
            Soil APS26Field: SoilType=APS26Soil; LocalName=APS26Site; Site=APS26Site; NearestTown=Unknown; Region=Lawes; NaturalVegetation=Unknown; Latitude=0; Longitude=0
              Physical
                Thickness  BD    AirDry  LL15  DUL   SAT
                150        1.38  0.1     0.2   0.38  0.44
                150        1.38  0.1     0.2   0.38  0.44
                300        1.38  0.1     0.2   0.38  0.44
                300        1.38  0.1     0.2   0.38  0.44
                300        1.46  0.1     0.21  0.38  0.43
                300        1.51  0.1     0.19  0.4   0.42
                300        1.49  0.1     0.14  0.38  0.43
                300        1.47  0.1     0.14  0.38  0.43
                300        1.47  0.1     0.19  0.33  0.43
                SoilCrop WheatSoil: LL=[0.24, 0.24, 0.22, 0.24, 0.23, 0.23, 0.18, 0.18, 0.18]; KL=[0.06, 0.045, 0.045, 0.04, 0.04, 0.06, 0.06, 0.06, 0.06]; XF=[1, 1, 1, 1, 1, 1, 1, 1, 1]
              WaterBalance SoilWater: SummerDate=1-Nov; SummerU=6; SummerCona=3.5; WinterDate=1-Apr; WinterU=6; WinterCona=3.5; DiffusConst=10; DiffusSlope=16; Salb=0.13; CN2Bare=78; CNRed=20; CNCov=0.8; DischargeWidth=0; CatchmentArea=0; PSIDul=-100
                Thickness  SWCON  KLAT
                150        0.3    0
                150        0.3    0
                150        0.3    0
                150        0.3    0
                300        0.3    0
                300        0.3    0
                300        0.3    0
                300        0.3    0
                300        0.3    0
                300        0.3    0
              Organic: FOMCNRatio=40; CarbonUnits=Total
                Thickness  Carbon  SoilCNRatio  FBiom  FInert  FOM
                150        2.2     14.5         0.024  0.45    118.866
                150        1.6     14.5         0.024  0.6     98.5437
                150        1.35    14.5         0.01   0.7     81.6956
                150        0.95    14.5         0.01   0.85    67.728
                300        1       14.5         0.01   0.9     46.5487
                300        0.8     14.5         0.01   0.95    31.9925
                300        0.45    14.5         0.01   0.95    21.9881
                300        0.45    14.5         0.01   0.95    15.1122
                300        0.45    14.5         0.01   0.95    10.3864
                300        0.45    14.5         0.01   0.95    7.13848
              Chemical: Thickness=[150, 150, 150, 150, 300, 300, 300, 300, 300, 300]; PH=[7.5, 8, 8, 8, 8, 8, 8, 8, 8, 8]; PHUnits=Water
              Water: Thickness=[150, 150, 150, 150, 300, 300, 300, 300, 300, 300]; FilledFromTop=false
                InitialValues=[0.3274, 0.3429, 0.334, 0.334, 0.3303, 0.3106, 0.306, 0.2694, 0.269, 0.269]
              CERESSoilTemperature Temperature
              Nutrient
              Solute NO3: Thickness=[150, 150, 150, 150, 300, 300, 300, 300, 300, 300]; InitialValues=[1.5, 1.8, 1.5, 1.5, 0.4, 0.2, 0.4, 0.3, 0.3, 0.3]; InitialValuesUnits=ppm; WaterTableConcentration=0; D0=0; DepthConstant=0; MaxDepthSoluteAccessible=0; RunoffEffectivenessAtMovingSolute=0; MaxEffectiveRunoff=0
              Solute NH4: Thickness=[150, 150, 150, 150, 300, 300, 300, 300, 300, 300]; InitialValues=[0.5, 0.8, 0.5, 0.5, 0.42, 0.42, 0.37, 0.25, 0.3, 0.3]; InitialValuesUnits=ppm; WaterTableConcentration=0; D0=0; DepthConstant=0; MaxDepthSoluteAccessible=0; RunoffEffectivenessAtMovingSolute=0; MaxEffectiveRunoff=0
              Solute Urea: Thickness=[150, 150, 150, 150, 300, 300, 300, 300, 300, 300]; InitialValues=[0, 0, 0, 0, 0, 0, 0, 0, 0, 0]; InitialValuesUnits=kg/ha; WaterTableConcentration=0; D0=0; DepthConstant=0; MaxDepthSoluteAccessible=0; RunoffEffectivenessAtMovingSolute=0; MaxEffectiveRunoff=0
            Manager ApplyFertiliser
              FertDayOfYear = 186
              Amount = 160
```csharp
using Models.Soils;
using System;
using Models.Core;
using Models.PMF;
using APSIM.Shared.Utilities;

namespace Models
{
    [Serializable]
    public class Script : Model
    {
        [Link] Clock Clock;
        [Link] Fertiliser Fertiliser;
        [Link] Summary Summary;
        
        [Description("Day of year fertiliser is to be applied")]
        public int FertDayOfYear { get; set; }

        [Description("Amount of fertiliser to be applied")]
        public double Amount { get; set; }

        [EventSubscribe("DoManagement")]
        private void OnDoManagement(object sender, EventArgs e)
        {
            if (Clock.Today.DayOfYear == FertDayOfYear)
            {
                Fertiliser.Apply(Amount: Amount, Type: Fertiliser.Types.NO3N);
            }
        
        }
        
    }
}
```
            Fertiliser
            Operations IrrigationSchedule: same as Validation.SE Queensland.APS26.Factors.Permutation.Water.Wet
            Irrigation
            SurfaceOrganicMatter: InitialResidueName=wheat_stubble; InitialResidueType=Wheat; InitialResidueMass=0; InitialStandingFraction=0; InitialCPR=0; InitialCNR=80
            MicroClimate: a_interception=0; b_interception=1; c_interception=0; d_interception=0; SoilHeatFluxFraction=0.4; MinimumHeightDiffForNewLayer=0; NightInterceptionFraction=0.5; ReferenceHeight=2
            Manager Harvesting
```csharp
using Models.PMF.Phen;
using APSIM.Shared.Utilities;
using System.Xml.Serialization;
using Models;
using Models.PMF;
using Models.Soils;
using System.Text;
using System.Collections.Generic;
using Models.Core;
using System;
using Models.Soils.Nutrients;

namespace Models
{
    [Serializable] 
    public class Script : Model
    {
        [Link] private Plant Wheat;
        [Link(Type = LinkType.Path, Path = "[Wheat].Phenology")]
        private Phenology phenology;
        [EventSubscribe("DoManagement")]
        private void OnDoManagement(object sender, EventArgs e)
        {
            if (phenology.CurrentPhase.Name == "Ripening")
            {
                Wheat.Harvest();
                Wheat.EndCrop();
            }
        }
    }
}
```
            Report DailyReport
            Report HarvestReport
            Report SowingReport
            DCaPSTModelNG DCaPST: CropName=Wheat
              Parameters={Rpar=0.5, Canopy={Type=0, AirO2=210000, AirCO2=370, LeafAngle=60, LeafWidth=0.05, LeafScatteringCoeff=0.15, LeafScatteringCoeffNIR=0.8, DiffuseExtCoeff=0.78, DiffuseExtCoeffNIR=0.8, DiffuseReflectionCoeff=0.036, DiffuseReflectionCoeffNIR=0.389, Windspeed=1.5, WindSpeedExtinction=1.5, CurvatureFactor=0.7, DiffusivitySolubilityRatio=0.047, MinimumN=14, SLNRatioTop=1.3}, Pathway={IntercellularToAirCO2Ratio=0.7, FractionOfCyclicElectronFlow=0.1875, RespirationSLNRatio=0, MaxRubiscoActivitySLNRatio=1.1, MaxElectronTransportSLNRatio=1.85, MaxPEPcActivitySLNRatio=1, MesophyllCO2ConductanceSLNRatio=0.00412, MesophyllElectronTransportFraction=0.2, ATPProductionElectronTransportFactor=0.865385, ExtraATPCost=0.75, RubiscoCarboxylation={Factor=93720, At25=273.423}, RubiscoOxygenation={Factor=33600, At25=165824}, RubiscoCarboxylationToOxygenation={Factor=35713.2, At25=4.59217}, RubiscoActivity={Factor=65330, At25=0}, PEPc={Factor=0, At25=0}, PEPcActivity={Factor=57043.3, At25=0}, Respiration={Factor=46390, At25=0}, ElectronTransportRateParams={C=0.911018, TMax=45, TMin=0, TOpt=30, Beta=1}, MesophyllCO2ConductanceParams={Factor=6048.95289, At25=0}, SpectralCorrectionFactor=0.15, PS2ActivityFraction=0.1, PEPRegeneration=0, BundleSheathConductance=0.003}}
              Folder CultivarParameters
          Manager LocationInfo
            Country = Australia
            State = Queensland
            Region = QLD Coast
```csharp
using Models.Soils;
using System;
using Models.Core;
using Models.PMF;
using APSIM.Shared.Utilities;

namespace Models
{
    [Serializable]
    public class Script : Model
    {
        [Link] Clock Clock;
        [Link] Fertiliser Fertiliser;
        [Link] Summary Summary;
        
        [Description("Country")]
        public string Country { get; set; }

        [Description("State")]
        public string State { get; set; }

        [Description("Region")]
        public string Region { get; set; }

    }
}
```
      Experiment APS6
        Memo
          NOTE: High N treatment logdged.  Final grain sizes were less than expected.
        Factors
          Factor NRate: Specification=[ApplyFertiliser]
            Operations 0
            Operations 40
              1992-06-16  [Fertiliser].Apply(Amount: 40, Type: Fertiliser.Types.NO3N);
            Operations 80
              1992-06-16  [Fertiliser].Apply(Amount: 80, Type: Fertiliser.Types.NO3N);
            Operations 120
              1992-06-16  [Fertiliser].Apply(Amount: 60, Type: Fertiliser.Types.NO3N);
              1992-08-05  [Fertiliser].Apply(Amount: 60, Type: Fertiliser.Types.NO3N);
            Operations 160
              1992-06-16  [Fertiliser].Apply(Amount: 40, Type: Fertiliser.Types.NO3N);
              1992-08-05  [Fertiliser].Apply(Amount: 120, Type: Fertiliser.Types.NO3N);
            Operations 360
              1992-06-16  [Fertiliser].Apply(Amount: 120, Type: Fertiliser.Types.NO3N);
              1992-08-05  [Fertiliser].Apply(Amount: 120, Type: Fertiliser.Types.NO3N);
              1992-09-08  [Fertiliser].Apply(Amount: 120, Type: Fertiliser.Types.NO3N);
        Simulation APS6Base
          Clock: Start=1992-06-14; End=1992-11-17
          Summary summaryfile
          Weather: FileName=Met\APS6.met
          Zone paddock: Area=1; Slope=0; AspectAngle=0; Altitude=50
            Irrigation
            Fertiliser
            Soil APS6Field: SoilType=APS6Soil; LocalName=APS6Site; Site=APS6Site; NearestTown=Unknown; Region=Lawes; NaturalVegetation=Unknown; Latitude=0; Longitude=0
              Physical
                Thickness  BD    AirDry  LL15  DUL   SAT
                150        1.38  0.1     0.2   0.38  0.43
                150        1.34  0.1     0.2   0.38  0.43
                300        1.35  0.1     0.22  0.4   0.43
                300        1.5   0.1     0.18  0.4   0.43
                300        1.49  0.1     0.14  0.39  0.42
                300        1.46  0.1     0.2   0.38  0.4
                300        1.46  0.1     0.2   0.38  0.4
                SoilCrop WheatSoil: LL=[0.2, 0.2, 0.22, 0.18, 0.14, 0.25, 0.28]; KL=[0.06, 0.05, 0.05, 0.04, 0.04, 0.06, 0.06]; XF=[1, 1, 1, 1, 1, 1, 1]
              WaterBalance SoilWater: SummerDate=1-Nov; SummerU=6; SummerCona=3.5; WinterDate=1-Apr; WinterU=6; WinterCona=3.5; DiffusConst=88; DiffusSlope=35.4; Salb=0.13; CN2Bare=60; CNRed=20; CNCov=0.8; DischargeWidth=0; CatchmentArea=0; PSIDul=-100
                Thickness  SWCON  KLAT
                150        0.3    0
                150        0.3    0
                300        0.3    0
                300        0.3    0
                300        0.3    0
                300        0.3    0
                300        0.3    0
              Organic: FOMCNRatio=60; CarbonUnits=Total
                Thickness  Carbon  SoilCNRatio  FBiom  FInert  FOM
                150        2.2     14.5         0.03   0.45    694.258
                150        1.6     14.5         0.02   0.6     540.689
                300        1.15    14.5         0.01   0.78    327.944
                300        1       14.5         0.01   0.9     198.908
                300        0.8     14.5         0.01   0.99    120.644
                300        0.45    14.5         0.01   0.99    73.1743
                300        0.45    14.5         0.01   0.99    44.3824
              Chemical: Thickness=[150, 150, 300, 300, 300, 300, 300]; PH=[7.5, 8, 8, 8, 8, 8, 8]; PHUnits=Water
              Water: Thickness=[150, 150, 300, 300, 300, 300, 300]; InitialValues=[0.326, 0.326, 0.346, 0.333, 0.315, 0.326, 0.326]; FilledFromTop=false
              CERESSoilTemperature Temperature
              Nutrient
              Solute NO3: Thickness=[150, 150, 300, 300, 300, 300, 300]; InitialValues=[1.3, 0.6, 0.25, 0.2, 0.1, 0.1, 0.1]; InitialValuesUnits=ppm; WaterTableConcentration=0; D0=0; DepthConstant=0; MaxDepthSoluteAccessible=0; RunoffEffectivenessAtMovingSolute=0; MaxEffectiveRunoff=0
              Solute NH4: Thickness=[150, 150, 300, 300, 300, 300, 300]; InitialValues=[1.3, 1, 1, 0.8, 0.8, 0.5, 0.5]; InitialValuesUnits=ppm; WaterTableConcentration=0; D0=0; DepthConstant=0; MaxDepthSoluteAccessible=0; RunoffEffectivenessAtMovingSolute=0; MaxEffectiveRunoff=0
              Solute Urea: Thickness=[150, 150, 300, 300, 300, 300, 300]; InitialValues=[0, 0, 0, 0, 0, 0, 0]; InitialValuesUnits=kg/ha; WaterTableConcentration=0; D0=0; DepthConstant=0; MaxDepthSoluteAccessible=0; RunoffEffectivenessAtMovingSolute=0; MaxEffectiveRunoff=0
            SurfaceOrganicMatter: InitialResidueName=wheat_stubble; InitialResidueType=wheat; InitialResidueMass=500; InitialStandingFraction=0; InitialCPR=0; InitialCNR=100
            Plant Wheat
            Operations ApplyFertiliser
              1992-06-16  [Fertiliser].Apply(Amount: 0, Type: Fertiliser.Types.NO3N);
            Operations IrrigationSchedule
              1992-06-17  [Wheat].Sow(population:121.61, cultivar:"Hartog", depth:30, rowSpacing:250);
              1992-06-24  [Irrigation].Apply(amount:10);
              1992-06-26  [Irrigation].Apply(amount:10);
              1992-07-28  [Irrigation].Apply(amount:30);
              1992-08-05  [Irrigation].Apply(amount:30);
              1992-08-19  [Irrigation].Apply(amount:40);
              1992-08-26  [Irrigation].Apply(amount:40);
              1992-09-09  [Irrigation].Apply(amount:40);
              1992-09-21  [Irrigation].Apply(amount:40);
              1992-10-01  [Irrigation].Apply(amount:50);
              1992-10-07  [Irrigation].Apply(amount:20);
              1992-10-08  [Irrigation].Apply(amount:20);
              1992-10-09  [Irrigation].Apply(amount:20);
              1992-10-13  [Irrigation].Apply(amount:20);
            MicroClimate: a_interception=0; b_interception=1; c_interception=0; d_interception=0; SoilHeatFluxFraction=0.4; MinimumHeightDiffForNewLayer=0; NightInterceptionFraction=0.5; ReferenceHeight=2
            Report DailyReport
            Report HarvestReport
            Manager HarvestAfterDate
              HarvestDate = 1-nov
```csharp
using Models.Soils;
using System;
using Models.Core;
using System.Text;
using Models.PMF;
using Models;
using APSIM.Shared.Utilities;
using Models.PMF.Phen;

namespace Models
{
    [Serializable] 
    public class Script : Model
    {
        [Link] ISummary summary;
        [Link] private Plant wheat;
        [Link(Type = LinkType.Path, Path = "[Wheat].Phenology")]
        private Phenology phenology;
                [Link] Clock Clock;

        private bool Harvestable = false;

        [Description("Harvest Date (d-mmm)")]
        public string HarvestDate { get; set; }   
      
        [EventSubscribe("DoManagement")]
        private void OnDoManagement(object sender, EventArgs e)
        {
           
            if (Harvestable && (phenology.CurrentPhase.Name == "Maturing" || phenology.CurrentPhase.Name == "Ripening"))
            {
                wheat.Harvest();
                wheat.EndCrop();                
            }
            
            if (DateUtilities.DatesAreEqual(HarvestDate, Clock.Today))
                Harvestable = true;

        }
    }
}
```
            Report SupReport: EventNames=[Clock].DoReport
              VariableNames:
                [Clock].Today
                [Leaf].CohortSize
                [Wheat].Arbitrator.DM.Allocated
                [Wheat].Arbitrator.DM.TotalPlantDemand
                [Wheat].Arbitrator.DM.NutrientLimitation
                [Wheat].Arbitrator.DM.SinkLimitation
                [Wheat].Arbitrator.DM.TotalFixationSupply
                [Wheat].Arbitrator.FN
                [Wheat].Arbitrator.N.TotalPlantDemand
                [Wheat].Leaf.CohortMaxSize
                [Wheat].Leaf.CohortParameters.GrowthDuration
                [Wheat].Leaf.CohortParameters.LagDuration
                [Wheat].Leaf.CohortParameters.MaxArea
                [Wheat].Leaf.CohortParameters.SenescenceDuration
                [Wheat].Leaf.CohortParameters.SpecificLeafAreaMax
                [Wheat].Leaf.CohortParameters.SpecificLeafAreaMin
                [Wheat].Leaf.Photosynthesis.FT
                [Wheat].Leaf.Photosynthesis.FVPD
                [Wheat].Leaf.Photosynthesis.RueAct
                [Wheat].Structure.MeanTillerGrowthRate
            Report SowingReport
            DCaPSTModelNG DCaPST: same as Validation.SE Queensland.APS26.APS26NRate160WaterWet.paddock.DCaPST
          SoilArbitrator Soil Arbitrator
          Manager LocationInfo: same as Validation.SE Queensland.APS26.APS26NRate160WaterWet.LocationInfo
      Experiment APS14
        Factors
          Permutation
            Factor Stubble: Specification=[OMSchedule]
              Operations Bare
                1993-06-03  [SurfaceOrganicMatter].Incorporate(fraction: 1.0, depth:100);
              Operations Lucerne
                1993-06-03  [SurfaceOrganicMatter].Add(mass: 3560, N: 108.8, P:0.0, type: "lucerne", name: "");
                1993-06-03  [SurfaceOrganicMatter].Incorporate(fraction: 1.0, depth:100);
              Operations Straw
                1993-06-03  [SurfaceOrganicMatter].Add(mass: 3584, N: 28.8, P:0.0, type: "barley", name: "");
                1993-06-03  [SurfaceOrganicMatter].Incorporate(fraction: 1.0, depth:100);
            Factor NRate: Specification=[FertiliserSchedule]
              Operations 000
                1993-06-18  [Fertiliser].Apply(Amount: 0, Type: Fertiliser.Types.NO3N);
              Operations 040
                1993-06-18  [Fertiliser].Apply(Amount: 40, Type: Fertiliser.Types.NO3N);
              Operations 080
                1993-06-18  [Fertiliser].Apply(Amount: 80, Type: Fertiliser.Types.NO3N);
              Operations 200
                1993-06-18  [Fertiliser].Apply(Amount: 120, Type: Fertiliser.Types.NO3N);
                1993-08-18  [Fertiliser].Apply(Amount: 80, Type: Fertiliser.Types.NO3N);
        Simulation APS14StubbleBareNRate0
          Clock: Start=1993-06-02; End=1993-11-26
          Summary summaryfile
          Weather: FileName=Met\APS14.met
          Zone paddock: Area=1; Slope=0; AspectAngle=0; Altitude=50
            Irrigation
            Fertiliser
            Soil APS14Field: SoilType=Clay Loam; LocalName=Gatton; Site=Gatton; NearestTown=Gatton; Region=Lockyer Valley; State=Qld; Country=Australia; NaturalVegetation=Unknown; Latitude=0; Longitude=0
              Physical
                Thickness  BD    AirDry  LL15  DUL   SAT
                150        1.38  0.1     0.2   0.38  0.43
                150        1.34  0.2     0.2   0.38  0.43
                150        1.31  0.24    0.24  0.4   0.45
                150        1.4   0.19    0.19  0.41  0.45
                300        1.5   0.18    0.18  0.4   0.43
                300        1.49  0.14    0.14  0.39  0.43
                300        1.46  0.2     0.2   0.38  0.4
                300        1.46  0.2     0.2   0.38  0.4
                SoilCrop WheatSoil: LL=[0.2, 0.2, 0.24, 0.19, 0.18, 0.14, 0.25, 0.28]; KL=[0.06, 0.06, 0.06, 0.05, 0.04, 0.03, 0.02, 0.02]; XF=[1, 1, 1, 1, 1, 1, 1, 1]
              WaterBalance SoilWater: SummerDate=1-Nov; SummerU=6; SummerCona=3.5; WinterDate=1-Apr; WinterU=6; WinterCona=3.5; DiffusConst=40; DiffusSlope=16; Salb=0.13; CN2Bare=60; CNRed=20; CNCov=0.8; DischargeWidth=0; CatchmentArea=0; PSIDul=-100
                Thickness  SWCON  KLAT
                150        0.3    0
                150        0.3    0
                150        0.3    0
                150        0.3    0
                300        0.3    0
                300        0.3    0
                300        0.3    0
                300        0.3    0
              Organic: FOMCNRatio=40; CarbonUnits=Total
                Thickness  Carbon  SoilCNRatio  FBiom  FInert  FOM
                150        2.2     14.5         0.02   0.4     430.132
                150        1.6     14.5         0.02   0.6     334.987
                150        1.35    14.5         0.01   0.7     260.888
                150        0.95    14.5         0.01   0.8     203.18
                300        1       14.5         0.01   0.9     123.235
                300        0.8     14.5         0.01   0.9     74.7457
                300        0.45    14.5         0.01   0.9     45.3356
                300        0.45    14.5         0.01   0.9     27.4974
              Chemical: Thickness=[150, 150, 150, 150, 300, 300, 300, 300]; PH=[7.5, 8, 8, 8, 8, 8, 8, 8]; PHUnits=Water
              Water: Thickness=[150, 150, 150, 150, 300, 300, 300, 300]; InitialValues=[0.336, 0.336, 0.302, 0.302, 0.319, 0.345, 0.294, 0.264]; FilledFromTop=false
              CERESSoilTemperature Temperature
              Nutrient
              Solute NO3: Thickness=[150, 150, 150, 150, 300, 300, 300, 300]; InitialValues=[2, 0.5, 0.2, 0.2, 0.2, 0.2, 0.2, 0.2]; InitialValuesUnits=ppm; WaterTableConcentration=0; D0=0; DepthConstant=0; MaxDepthSoluteAccessible=0; RunoffEffectivenessAtMovingSolute=0; MaxEffectiveRunoff=0
              Solute NH4: Thickness=[150, 150, 150, 150, 300, 300, 300, 300]; InitialValues=[0.3, 0.3, 0.2, 0.1, 0.1, 0.1, 0.1, 0.1]; InitialValuesUnits=ppm; WaterTableConcentration=0; D0=0; DepthConstant=0; MaxDepthSoluteAccessible=0; RunoffEffectivenessAtMovingSolute=0; MaxEffectiveRunoff=0
              Solute Urea: Thickness=[150, 150, 150, 150, 300, 300, 300, 300]; InitialValues=[0, 0, 0, 0, 0, 0, 0, 0]; InitialValuesUnits=kg/ha; WaterTableConcentration=0; D0=0; DepthConstant=0; MaxDepthSoluteAccessible=0; RunoffEffectivenessAtMovingSolute=0; MaxEffectiveRunoff=0
            SurfaceOrganicMatter: InitialResidueName=wheat_stubble; InitialResidueType=Wheat; InitialResidueMass=500; InitialStandingFraction=0; InitialCPR=0; InitialCNR=120
            Plant Wheat
            Operations IrrigationSchedule
              1993-06-04  [Irrigation].Apply(amount:14);
              1993-06-18  [Irrigation].Apply(amount:26);
              1993-06-23  [Irrigation].Apply(amount:13);
              1993-07-09  [Irrigation].Apply(amount:25);
              1993-07-22  [Irrigation].Apply(amount:20);
              1993-08-06  [Irrigation].Apply(amount:31);
              1993-08-18  [Irrigation].Apply(amount:36);
              1993-08-27  [Irrigation].Apply(amount:38);
              1993-09-06  [Irrigation].Apply(amount:33);
              1993-09-24  [Irrigation].Apply(amount:35);
              1993-10-01  [Irrigation].Apply(amount:36);
            MicroClimate: a_interception=0; b_interception=1; c_interception=0; d_interception=0; SoilHeatFluxFraction=0.4; MinimumHeightDiffForNewLayer=0; NightInterceptionFraction=0.5; ReferenceHeight=2
            Operations FertiliserSchedule
              1993-06-18  [Fertiliser].Apply(Amount: 0, Type: Fertiliser.Types.NO3N);
            Operations OMSchedule
              1993-06-03  [SurfaceOrganicMatter].Add(mass: 0, N: 0, P:0.0, type: "wheat", name: "");
              1993-06-03  [SurfaceOrganicMatter].Incorporate(fraction: 1.0, depth:100);
            Operations SowingSchedule
              1993-06-29  [Wheat].Sow(population:114, cultivar:"Hartog", depth:30, rowSpacing:250);
            Report DailyReport
            Report HarvestReport
            Manager Harvesting: same as Validation.SE Queensland.APS26.APS26NRate160WaterWet.paddock.Harvesting
            Report SowingReport
            DCaPSTModelNG DCaPST: same as Validation.SE Queensland.APS26.APS26NRate160WaterWet.paddock.DCaPST
          SoilArbitrator Soil Arbitrator
          Manager LocationInfo: same as Validation.SE Queensland.APS26.APS26NRate160WaterWet.LocationInfo
    Folder Western Australia
      Memo
        The wheat belt of Western Australia has a Mediteranean climate (winter dominant rainfall patterns) with mostly sandy soils.  Data from [Asseng1998163].   and some more recent studies have been included to extend the range of conditions studied and to include more modern cultivars.
      Experiment Mer86
        Factors
          Permutation
            Factor NRate: Specification=[FertiliserOperations]
              Operations 15
                1986-06-14  [Fertiliser].Apply(Amount: 15, Type: Fertiliser.Types.NO3N, Depth: 50);
              Operations 60
                1986-05-29  [Fertiliser].Apply(Amount: 30, Type: Fertiliser.Types.NO3N, Depth: 50);
            Factor Water: Specification=[IrrigationOperations]
              Operations Dry
                1986-09-03  [Irrigation].Apply (amount:0);
                1986-09-05  [Irrigation].Apply (amount:0);
                1986-09-10  [Irrigation].Apply (amount:0);
                1986-09-11  [Irrigation].Apply (amount:0);
                1986-09-14  [Irrigation].Apply (amount:0);
                1986-09-16  [Irrigation].Apply (amount:0);
                1986-09-18  [Irrigation].Apply (amount:0);
                1986-09-21  [Irrigation].Apply (amount:0);
                1986-09-23  [Irrigation].Apply (amount:0);
                1986-09-24  [Irrigation].Apply (amount:0);
                1986-09-30  [Irrigation].Apply (amount:0);
                1986-10-02  [Irrigation].Apply (amount:0);
                1986-10-04  [Irrigation].Apply (amount:0);
                1986-10-10  [Irrigation].Apply (amount:0);
                1986-10-12  [Irrigation].Apply (amount:0);
                1986-10-14  [Irrigation].Apply (amount:0);
                1986-10-16  [Irrigation].Apply (amount:0);
                1986-10-18  [Irrigation].Apply (amount:0);
                1986-10-20  [Irrigation].Apply (amount:0);
                1986-10-22  [Irrigation].Apply (amount:0);
                1986-10-25  [Irrigation].Apply (amount:0);
                1986-10-26  [Irrigation].Apply (amount:0);
                1986-10-28  [Irrigation].Apply (amount:0);
                1986-10-30  [Irrigation].Apply (amount:0);
                1986-11-01  [Irrigation].Apply (amount:0);
                1986-11-03  [Irrigation].Apply (amount:0);
                1986-11-05  [Irrigation].Apply (amount:0);
                1986-11-07  [Irrigation].Apply (amount:0);
              Operations Wet
                1986-09-03  [Irrigation].Apply (amount:10);
                1986-09-05  [Irrigation].Apply (amount:20);
                1986-09-10  [Irrigation].Apply (amount:20);
                1986-09-11  [Irrigation].Apply (amount:10);
                1986-09-14  [Irrigation].Apply (amount:10);
                1986-09-16  [Irrigation].Apply (amount:10);
                1986-09-18  [Irrigation].Apply (amount:10);
                1986-09-21  [Irrigation].Apply (amount:10);
                1986-09-23  [Irrigation].Apply (amount:10);
                1986-09-24  [Irrigation].Apply (amount:20);
                1986-09-30  [Irrigation].Apply (amount:30);
                1986-10-02  [Irrigation].Apply (amount:20);
                1986-10-04  [Irrigation].Apply (amount:20);
                1986-10-10  [Irrigation].Apply (amount:20);
                1986-10-12  [Irrigation].Apply (amount:20);
                1986-10-14  [Irrigation].Apply (amount:20);
                1986-10-16  [Irrigation].Apply (amount:20);
                1986-10-18  [Irrigation].Apply (amount:20);
                1986-10-20  [Irrigation].Apply (amount:20);
                1986-10-22  [Irrigation].Apply (amount:20);
                1986-10-25  [Irrigation].Apply (amount:20);
                1986-10-26  [Irrigation].Apply (amount:20);
                1986-10-28  [Irrigation].Apply (amount:20);
                1986-10-30  [Irrigation].Apply (amount:20);
                1986-11-01  [Irrigation].Apply (amount:20);
                1986-11-03  [Irrigation].Apply (amount:20);
                1986-11-05  [Irrigation].Apply (amount:20);
                1986-11-07  [Irrigation].Apply (amount:20);
        Simulation Mer86Base
          Clock: Start=1986-05-01; End=1986-11-30
          Summary summaryfile
          Weather: FileName=Met\MER-86.met
          Zone paddock: Area=1; Slope=0; AspectAngle=0; Altitude=50
            Soil MER-86Field: SoilType=sand; LocalName=Merredin; Site=Merredin; NearestTown=Unknown; Region=WA; NaturalVegetation=Unknown; Latitude=0; Longitude=0
              Physical
                Thickness  BD    AirDry  LL15  DUL   SAT
                100        1.7   0.03    0.03  0.16  0.26
                100        1.75  0.03    0.03  0.21  0.26
                100        1.8   0.03    0.03  0.22  0.25
                100        1.85  0.04    0.05  0.23  0.24
                100        1.85  0.04    0.1   0.22  0.23
                100        1.85  0.04    0.12  0.22  0.22
                100        1.85  0.04    0.17  0.22  0.22
                200        1.85  0.04    0.17  0.22  0.23
                200        1.85  0.04    0.17  0.22  0.23
                200        1.85  0.04    0.17  0.22  0.23
                SoilCrop WheatSoil
                  LL=[0.03, 0.03, 0.03, 0.05, 0.1, 0.12, 0.17, 0.17, 0.17, 0.17]
                  KL=[0.06, 0.06, 0.06, 0.06, 0.06, 0.06, 0.06, 0.06, 0.06, 0.06]
                  XF=[0.2, 0.6, 0.6, 0.6, 0.6, 0.6, 0.6, 0.6, 0.6, 0.6]
              WaterBalance SoilWater: SummerDate=1-Nov; SummerU=6; SummerCona=2; WinterDate=1-Apr; WinterU=6; WinterCona=2; DiffusConst=88; DiffusSlope=35; Salb=0.13; CN2Bare=60; CNRed=20; CNCov=0.8; DischargeWidth=0; CatchmentArea=0; PSIDul=-100
                Thickness  SWCON  KLAT
                100        1      0
                100        1      0
                100        1      0
                100        1      0
                100        0.3    0
                100        1      0
                100        1      0
                200        1      0
                200        1      0
                200        1      0
              Organic: FOMCNRatio=40; CarbonUnits=Total
                Thickness  Carbon  SoilCNRatio  FBiom  FInert  FOM
                100        0.5     13           0.04   0.1     237.652
                100        0.1     13           0.03   0.1     188.677
                100        0.1     13           0.02   0.2     149.795
                100        0.05    13           0.01   0.8     118.926
                100        0.05    13           0.01   0.9     94.4178
                100        0.05    13           0.01   0.9     74.9605
                100        0.05    13           0.01   0.9     59.5128
                200        0.05    13           0.01   0.9     37.5117
                200        0.05    13           0.01   0.9     23.6441
                200        0.05    13           0.01   0.9     14.9032
              Chemical: Thickness=[100, 100, 100, 100, 100, 100, 100, 200, 200, 200]; PH=[4.7, 4.7, 4.7, 6, 6, 6, 6, 6, 6, 6]; PHUnits=Water
              Water: Thickness=[100, 100, 100, 100, 100, 100, 100, 200, 200, 200]; InitialValues=[0.03, 0.03, 0.07, 0.1, 0.22, 0.22, 0.22, 0.22, 0.21, 0.19]; FilledFromTop=false
              CERESSoilTemperature Temperature
              Nutrient
              Solute NO3: Thickness=[100, 100, 100, 100, 100, 100, 100, 200, 200, 200]; InitialValues=[10, 5, 0.3, 0, 0, 0, 0, 0, 0, 0]; InitialValuesUnits=ppm; WaterTableConcentration=0; D0=0; DepthConstant=0; MaxDepthSoluteAccessible=0; RunoffEffectivenessAtMovingSolute=0; MaxEffectiveRunoff=0
              Solute NH4: Thickness=[100, 100, 100, 100, 100, 100, 100, 200, 200, 200]; InitialValues=[5, 3, 1, 0, 0, 0, 0, 0, 0, 0]; InitialValuesUnits=ppm; WaterTableConcentration=0; D0=0; DepthConstant=0; MaxDepthSoluteAccessible=0; RunoffEffectivenessAtMovingSolute=0; MaxEffectiveRunoff=0
              Solute Urea: Thickness=[100, 100, 100, 100, 100, 100, 100, 200, 200, 200]; InitialValues=[0, 0, 0, 0, 0, 0, 0, 0, 0, 0]; InitialValuesUnits=kg/ha; WaterTableConcentration=0; D0=0; DepthConstant=0; MaxDepthSoluteAccessible=0; RunoffEffectivenessAtMovingSolute=0; MaxEffectiveRunoff=0
            Irrigation
            SurfaceOrganicMatter: InitialResidueName=wheat_stubble; InitialResidueType=wheat; InitialResidueMass=0; InitialStandingFraction=0; InitialCPR=0; InitialCNR=80
            Operations SowingOperations
              1986-05-29  [Wheat].Sow(population:149, cultivar:"Gutha", depth:30, rowSpacing:250);
            Plant Wheat
            MicroClimate: a_interception=0; b_interception=1; c_interception=0; d_interception=0; SoilHeatFluxFraction=0.4; MinimumHeightDiffForNewLayer=0; NightInterceptionFraction=0.5; ReferenceHeight=2
            MicroClimate MicroClimate1: a_interception=0; b_interception=1; c_interception=0; d_interception=0; SoilHeatFluxFraction=0.4; MinimumHeightDiffForNewLayer=0; NightInterceptionFraction=0.5; ReferenceHeight=2
            Fertiliser
            Operations FertiliserOperations
              1986-06-14  [Fertiliser].Apply(Amount: 15, Type: Fertiliser.Types.NO3N, Depth: 50);
            Operations IrrigationOperations: same as Validation.Western Australia.Mer86.Factors.Permutation.Water.Wet
            Report DailyReport
            Report HarvestReport
            Manager Harvesting
```csharp
using Models.PMF.Phen;
using APSIM.Shared.Utilities;
using System.Xml.Serialization;
using Models;
using Models.PMF;
using Models.Soils;
using System.Text;
using System.Collections.Generic;
using Models.Core;
using System;
using Models.Soils.Nutrients;

namespace Models
{
    [Serializable] 
    public class Script : Model
    {
        [Link] private Plant Wheat;
        [Link(Type = LinkType.Path, Path = "[Wheat].Phenology")]
        private Phenology phenology;
        [EventSubscribe("DoManagement")]
        private void OnDoManagement(object sender, EventArgs e)
        {
            if (phenology.CurrentPhase.Name == "ReadyForHarvesting")
            {
                Wheat.Harvest();
                Wheat.EndCrop();
            }
        }
    }
}
```
            Report SowingReport
            DCaPSTModelNG DCaPST: same as Validation.SE Queensland.APS26.APS26NRate160WaterWet.paddock.DCaPST
          SoilArbitrator Soil Arbitrator
          Manager LocationInfo
            Country = Australia
            State = Western Australia
            Region = WA Eastern Zone
            script: same as in Validation.SE Queensland.APS26.APS26NRate160WaterWet.LocationInfo
      Experiment Mer73
        Factors
          Permutation
            Factor NRate: Specification=[FertiliserOperations]
              Operations 0
                1986-06-14  [Fertiliser].Apply(Amount: 0, Type: Fertiliser.Types.NO3N, Depth: 50);
              Operations 15
                1973-06-21  [Fertiliser].Apply(Amount: 15, Type: Fertiliser.Types.NO3N, Depth: 50);
            Factor Water: Specification=[IrrigationOperations]
              Operations Dry: same as Validation.Western Australia.Mer86.Factors.Permutation.Water.Dry
              Operations 40
                1973-09-21  [Irrigation].Apply (amount:40);
              Operations 150
                1973-08-28  [Irrigation].Apply (amount:20);
                1973-09-21  [Irrigation].Apply (amount:30);
                1973-10-12  [Irrigation].Apply (amount:50);
                1973-10-28  [Irrigation].Apply (amount:50);
        Simulation Mer73Base
          Clock: Start=1973-05-01; End=1973-11-30
          Summary summaryfile
          Weather: FileName=Met\MER-73.met
          Zone paddock: Area=1; Slope=0; AspectAngle=0; Altitude=50
            Soil MER-73Field: SoilType=sand; LocalName=Merredin; Site=Merredin; NearestTown=Unknown; Region=WA; NaturalVegetation=Unknown; Latitude=0; Longitude=0
              Physical
                Thickness  BD    AirDry  LL15  DUL   SAT
                100        1.7   0.03    0.03  0.15  0.28
                100        1.85  0.03    0.04  0.2   0.27
                100        1.75  0.03    0.04  0.2   0.27
                100        1.7   0.04    0.05  0.2   0.25
                100        1.7   0.04    0.05  0.21  0.25
                100        1.85  0.04    0.08  0.21  0.25
                100        1.95  0.04    0.11  0.21  0.25
                200        2     0.04    0.14  0.21  0.23
                200        2     0.04    0.16  0.23  0.23
                200        2     0.04    0.14  0.23  0.23
                SoilCrop WheatSoil
                  LL=[0.03, 0.03, 0.03, 0.05, 0.1, 0.12, 0.17, 0.17, 0.17, 0.17]
                  KL=[0.06, 0.06, 0.06, 0.06, 0.06, 0.06, 0.06, 0.06, 0.06, 0.06]
                  XF=[0.2, 0.2, 0.4, 0.4, 0.4, 0.4, 0.4, 0.4, 0.2, 0]
              WaterBalance SoilWater: SummerDate=1-Nov; SummerU=6; SummerCona=2; WinterDate=1-Apr; WinterU=6; WinterCona=2; DiffusConst=88; DiffusSlope=35; Salb=0.13; CN2Bare=60; CNRed=20; CNCov=0.8; DischargeWidth=0; CatchmentArea=0; PSIDul=-100
                Thickness  SWCON  KLAT
                100        1      0
                100        1      0
                100        1      0
                100        1      0
                100        0.1    0
                100        1      0
                100        1      0
                200        1      0
                200        1      0
                200        1      0
              Organic: FOMCNRatio=20; CarbonUnits=Total
                Thickness  Carbon  SoilCNRatio  FBiom  FInert  FOM
                100        1.2     13           0.04   0.1     356.478
                100        0.8     13           0.03   0.1     283.016
                100        0.3     13           0.02   0.2     224.693
                100        0.05    13           0.01   0.8     178.389
                100        0.05    13           0.01   0.9     141.627
                100        0.05    13           0.01   0.9     112.441
                100        0.05    13           0.01   0.9     89.2692
                200        0.05    13           0.01   0.9     56.2676
                200        0.05    13           0.01   0.9     35.4662
                200        0.05    13           0.01   0.9     22.3548
              Chemical: Thickness=[100, 100, 100, 100, 100, 100, 100, 200, 200, 200]; PH=[4.7, 4.7, 4.7, 6, 6, 6, 6, 6, 6, 6]; PHUnits=Water
              Water: Thickness=[100, 100, 100, 100, 100, 100, 100, 200, 200, 200]; InitialValues=[0.03, 0.03, 0.07, 0.1, 0.22, 0.22, 0.22, 0.22, 0.21, 0.19]; FilledFromTop=false
              CERESSoilTemperature Temperature
              Nutrient
              Solute NO3: Thickness=[100, 100, 100, 100, 100, 100, 100, 200, 200, 200]; InitialValues=[2, 1, 0, 0, 0, 0, 0, 0, 0, 0]; InitialValuesUnits=ppm; WaterTableConcentration=0; D0=0; DepthConstant=0; MaxDepthSoluteAccessible=0; RunoffEffectivenessAtMovingSolute=0; MaxEffectiveRunoff=0
              Solute NH4: Thickness=[100, 100, 100, 100, 100, 100, 100, 200, 200, 200]; InitialValues=[1, 0, 0, 0, 0, 0, 0, 0, 0, 0]; InitialValuesUnits=ppm; WaterTableConcentration=0; D0=0; DepthConstant=0; MaxDepthSoluteAccessible=0; RunoffEffectivenessAtMovingSolute=0; MaxEffectiveRunoff=0
              Solute Urea: same as Validation.Western Australia.Mer86.Mer86Base.paddock.MER-86Field.Urea
            Irrigation
            SurfaceOrganicMatter: InitialResidueName=wheat_stubble; InitialResidueType=wheat; InitialResidueMass=2500; InitialStandingFraction=0; InitialCPR=0; InitialCNR=30
            Operations SowingOperations
              1973-06-21  [Wheat].Sow(population:100, cultivar:"Gamenya", depth:30, rowSpacing:250);
            Plant Wheat
            MicroClimate: a_interception=0; b_interception=1; c_interception=0; d_interception=0; SoilHeatFluxFraction=0.4; MinimumHeightDiffForNewLayer=0; NightInterceptionFraction=0.5; ReferenceHeight=2
            Fertiliser
            Operations FertiliserOperations
              1986-06-14  [Fertiliser].Apply(Amount: 15, Type: Fertiliser.Types.NO3N, Depth: 50);
            Operations IrrigationOperations: same as Validation.Western Australia.Mer86.Factors.Permutation.Water.Wet
            Report HarvestReport
            Manager Harvesting: same as Validation.SE Queensland.APS26.APS26NRate160WaterWet.paddock.Harvesting
            Report DailyReport
            Report SowingReport
            DCaPSTModelNG DCaPST: same as Validation.SE Queensland.APS26.APS26NRate160WaterWet.paddock.DCaPST
          SoilArbitrator Soil Arbitrator
          Manager LocationInfo: same as Validation.Western Australia.Mer86.Mer86Base.LocationInfo
      Experiment Cunderdin97
        Factors
          Permutation
            Factor Sow: Specification=[SowingSchedule]
              Operations SpearEarly
                1997-06-06  [Wheat].Sow(population:150, cultivar:"Spear", depth:30, rowSpacing:250);
              Operations SpearMid
                1997-07-08  [Wheat].Sow(population:108, cultivar:"Spear", depth:30, rowSpacing:250);
              Operations WilgoyneEarly
                1997-06-06  [Wheat].Sow(population:150, cultivar:"Wilgoyne", depth:30, rowSpacing:250);
              Operations WilgoyneMid
                1997-07-08  [Wheat].Sow(population:108, cultivar:"Wilgoyne", depth:30, rowSpacing:250);
              Operations WilgoyneLate
                1997-07-30  [Wheat].Sow(population:100, cultivar:"Wilgoyne", depth:30, rowSpacing:250);
            Factor SowN: Specification=[SowingFertiliser].Script.Amount=0,50
            Factor TopN: Specification=[TopdressFertiliser].Script.Amount=0,30
            Factor Irr: Specification=[IrrigationSchedule]
              Operations Wet
                1997-09-23  [Irrigation].Apply(amount:15);
                1997-10-01  [Irrigation].Apply(amount:15);
                1997-10-06  [Irrigation].Apply(amount:15);
                1997-10-14  [Irrigation].Apply(amount:20);
                1997-10-21  [Irrigation].Apply(amount:17.5);
                1997-10-26  [Irrigation].Apply(amount:17.5);
              Operations Dry
        Simulation Cunderdin97Base
          Clock: Start=1997-04-16; End=1997-12-30
          Summary summaryfile
          Weather: FileName=Met\Cunderdin.met
          SoilArbitrator Soil Arbitrator
          Zone paddock: Area=1; Slope=0; AspectAngle=0; Altitude=50
            Irrigation
            Soil: SoilType=heavy; LocalName=Beverley; Site=Cunderdin; NearestTown=Cunderdin; Region=WA; NaturalVegetation=Unknown; Latitude=0; Longitude=0
              Physical
                Thickness  BD   AirDry  LL15   DUL    SAT
                50         1.3  0.034   0.07   0.156  0.48
                50         1.3  0.034   0.07   0.156  0.48
                100        1.4  0.121   0.121  0.22   0.44
                100        1.4  0.123   0.123  0.224  0.44
                100        1.5  0.132   0.132  0.243  0.4
                100        1.5  0.132   0.132  0.243  0.4
                100        1.5  0.135   0.135  0.243  0.4
                100        1.5  0.145   0.145  0.243  0.4
                200        1.5  0.145   0.145  0.243  0.4
                200        1.5  0.145   0.145  0.243  0.4
                200        1.5  0.145   0.145  0.243  0.4
                200        1.5  0.145   0.145  0.243  0.4
                200        1.5  0.145   0.145  0.243  0.4
                200        1.5  0.145   0.145  0.243  0.4
                200        1.5  0.145   0.145  0.243  0.4
                200        1.5  0.145   0.145  0.243  0.4
                200        1.5  0.145   0.145  0.243  0.4
                SoilCrop wheatSoil
                  LL=[0.07, 0.07, 0.121, 0.123, 0.132, 0.132, 0.135, 0.145, 0.145, 0.145, 0.145, 0.145, 0.145, 0.145, 0.145, 0.145, 0.145]
                  KL=[0.06, 0.06, 0.05, 0.05, 0.04, 0.04, 0.04, 0.04, 0.03, 0.03, 0.03, 0.03, 0.03, 0.03, 0.03, 0.03, 0.03]
                  XF=[0.7, 0.6, 0.5, 0.5, 0.5, 0.5, 0.5, 0.5, 0.3, 0.3, 0.3, 0.3, 0.3, 0.3, 0.3, 0.3, 0.3]
              WaterBalance SoilWater: SummerDate=1-Nov; SummerU=7.5; SummerCona=3; WinterDate=1-Apr; WinterU=7.5; WinterCona=3; DiffusConst=88; DiffusSlope=35; Salb=0.13; CN2Bare=25; CNRed=20; CNCov=0.8; DischargeWidth=0; CatchmentArea=0; PSIDul=-100
                Thickness  SWCON  KLAT
                50         0.6    0
                50         0.6    0
                100        0.6    0
                100        0.6    0
                100        0.6    0
                100        0.6    0
                100        0.6    0
                100        0.6    0
                200        0.6    0
                200        0.6    0
                200        0.6    0
                200        0.6    0
                200        0.6    0
                200        0.6    0
                200        0.6    0
                200        0.6    0
                200        0.6    0
              Organic: FOMCNRatio=40; CarbonUnits=Total
                Thickness  Carbon  SoilCNRatio  FBiom  FInert  FOM
                50         0.73    13           0.03   0.3     69.1755
                50         0.73    13           0.03   0.3     65.1471
                100        0.46    13           0.02   0.3     57.7803
                100        0.39    13           0.01   0.4     51.2465
                100        0.3     13           0.01   0.8     45.4516
                100        0.22    13           0.01   0.9     40.3119
                100        0.19    13           0.01   0.9     35.7535
                100        0.19    13           0.01   0.9     31.7105
                200        0.1     13           0.01   0.9     24.9443
                200        0.1     13           0.01   0.9     19.6219
                200        0.1     13           0.01   0.9     15.4351
                200        0.1     13           0.01   0.9     12.1417
                200        0.1     13           0.01   0.9     9.55101
                200        0.1     13           0.01   0.9     7.51309
                200        0.1     13           0.01   0.9     5.91001
                200        0.1     13           0.01   0.9     4.64898
                200        0.1     13           0.01   0.9     3.65701
              Chemical: PH=[4.7, 4.7, 4.7, 4.7, 6, 6, 6, 6, 6, 6, 6, 6, 6, 6, 6, 6, 6]; PHUnits=Water
                Thickness=[50, 50, 100, 100, 100, 100, 100, 100, 200, 200, 200, 200, 200, 200, 200, 200, 200]
              Water: FilledFromTop=false
                Thickness=[50, 50, 100, 100, 100, 100, 100, 100, 200, 200, 200, 200, 200, 200, 200, 200, 200]
                InitialValues=[0.034, 0.156, 0.22, 0.224, 0.244, 0.245, 0.246, 0.243, 0.24, 0.145, 0.145, 0.145, 0.145, 0.145, 0.145, 0.145, 0.145]
              CERESSoilTemperature Temperature
              Nutrient
              Solute NO3: InitialValues=[23, 23, 12, 9, 9, 9, 9, 6, 6, 6, 6, 6, 2, 2, 2, 2, 2]; InitialValuesUnits=ppm; WaterTableConcentration=0; D0=0; DepthConstant=0; MaxDepthSoluteAccessible=0; RunoffEffectivenessAtMovingSolute=0; MaxEffectiveRunoff=0
                Thickness=[50, 50, 100, 100, 100, 100, 100, 100, 200, 200, 200, 200, 200, 200, 200, 200, 200]
              Solute NH4: InitialValues=[2, 2, 1, 2, 1, 1, 1, 1, 1, 1, 1, 1, 1, 1, 1, 1, 1]; InitialValuesUnits=ppm; WaterTableConcentration=0; D0=0; DepthConstant=0; MaxDepthSoluteAccessible=0; RunoffEffectivenessAtMovingSolute=0; MaxEffectiveRunoff=0
                Thickness=[50, 50, 100, 100, 100, 100, 100, 100, 200, 200, 200, 200, 200, 200, 200, 200, 200]
              Solute Urea: InitialValues=[0, 0, 0, 0, 0, 0, 0, 0, 0, 0, 0, 0, 0, 0, 0, 0, 0]; InitialValuesUnits=kg/ha; WaterTableConcentration=0; D0=0; DepthConstant=0; MaxDepthSoluteAccessible=0; RunoffEffectivenessAtMovingSolute=0; MaxEffectiveRunoff=0
                Thickness=[50, 50, 100, 100, 100, 100, 100, 100, 200, 200, 200, 200, 200, 200, 200, 200, 200]
            SurfaceOrganicMatter: InitialResidueName=wheat_stubble; InitialResidueType=wheat; InitialResidueMass=500; InitialStandingFraction=0; InitialCPR=0; InitialCNR=120
            Fertiliser
            Plant Wheat
            Operations IrrigationSchedule: same as Validation.SE Queensland.APS14.APS14StubbleBareNRate0.paddock.IrrigationSchedule
            MicroClimate: a_interception=0; b_interception=1; c_interception=0; d_interception=0; SoilHeatFluxFraction=0.4; MinimumHeightDiffForNewLayer=0; NightInterceptionFraction=0.5; ReferenceHeight=2
            Operations SowingSchedule
              1993-06-29  [Wheat].Sow(population:114, cultivar:"Hartog", depth:30, rowSpacing:250);
            Manager SowingFertiliser
              Amount = 160
```csharp
using Models.Soils;
using System;
using Models.Core;
using Models.PMF;
using APSIM.Shared.Utilities;

namespace Models
{
    [Serializable]
    public class Script : Model
    {
        [Link] Clock Clock;
        [Link] Fertiliser Fertiliser;
        [Link] Summary Summary;
        
        [Description("Amount of fertiliser to be applied")]
        public double Amount { get; set; }

        [EventSubscribe("Sowing")]
        private void OnSowing(object sender, EventArgs e)
        {
            Fertiliser.Apply(Amount: Amount, Type: Fertiliser.Types.NO3N);
        }
        
    }
}
```
            Manager TopdressFertiliser
              FertDayOfYear = 239
              Amount = 0
              script: same as in Validation.SE Queensland.APS26.APS26NRate160WaterWet.paddock.ApplyFertiliser
            Report DailyReport
            Report HarvestReport
            Manager Harvesting: same as Validation.SE Queensland.APS26.APS26NRate160WaterWet.paddock.Harvesting
            Report SowingReport
            DCaPSTModelNG DCaPST: same as Validation.SE Queensland.APS26.APS26NRate160WaterWet.paddock.DCaPST
          Manager LocationInfo
            Country = Australia
            State = Western Australia
            Region = WA Central Zone
            script: same as in Validation.SE Queensland.APS26.APS26NRate160WaterWet.LocationInfo
      Experiment Wongan83
        Factors
          Permutation
            Factor Soil
              CompositeFactor Ripped: Specifications=[Physical]
                Physical
                  Thickness  BD    AirDry  LL15  DUL   SAT
                  50         1.31  0.04    0.07  0.11  0.35
                  50         1.31  0.05    0.07  0.11  0.35
                  100        1.45  0.05    0.08  0.14  0.35
                  200        1.48  0.05    0.09  0.14  0.35
                  200        1.53  0.05    0.09  0.15  0.35
                  200        1.5   0.05    0.09  0.15  0.35
                  400        1.5   0.05    0.1   0.16  0.35
                  400        1.5   0.05    0.11  0.17  0.35
                  600        1.5   0.05    0.13  0.17  0.35
                  600        1.5   0.05    0.13  0.17  0.35
                  SoilCrop WheatSoil
                    LL=[0.08, 0.08, 0.09, 0.1, 0.11, 0.12, 0.12, 0.12, 0.14, 0.14]
                    KL=[0.06, 0.06, 0.06, 0.06, 0.06, 0.06, 0.06, 0.06, 0.06, 0.06]
                    XF=[1, 1, 1, 1, 1, 1, 1, 1, 1, 1]
              CompositeFactor UnRipped: Specifications=[Physical]
                Physical
                  Thickness  BD    AirDry  LL15  DUL   SAT
                  50         1.31  0.04    0.07  0.13  0.35
                  50         1.31  0.05    0.07  0.13  0.35
                  100        1.45  0.05    0.08  0.14  0.35
                  200        1.48  0.05    0.09  0.14  0.35
                  200        1.53  0.05    0.09  0.15  0.35
                  200        1.5   0.05    0.09  0.15  0.35
                  400        1.5   0.05    0.1   0.16  0.35
                  400        1.5   0.05    0.11  0.17  0.35
                  600        1.5   0.05    0.13  0.17  0.35
                  600        1.5   0.05    0.13  0.17  0.35
                  SoilCrop WheatSoil
                    LL=[0.08, 0.08, 0.09, 0.1, 0.11, 0.12, 0.12, 0.12, 0.14, 0.14]
                    KL=[0.06, 0.06, 0.06, 0.06, 0.06, 0.06, 0.06, 0.06, 0.06, 0.06]
                    XF=[0.2, 0.2, 0.2, 0.7, 1, 1, 1, 1, 1, 1]
            Factor N: Specification=[SowingFertiliser].Script.Amount=0,10,25,50,100
        Simulation WonganBase
          Clock: Start=1983-06-13; End=1983-12-01
          Summary summaryfile
          Weather: FileName=Met\Wongan83.met
          Zone paddock: Area=1; Slope=0; AspectAngle=0; Altitude=50
            Irrigation
            Soil WonganSoil: SoilType=sand; LocalName=WonganSite; Site=WonganSite; NearestTown=Unknown; Region=WA; NaturalVegetation=Unknown; Latitude=0; Longitude=0
              Physical: same as Validation.Western Australia.Wongan83.Factors.Permutation.Soil.UnRipped.Physical
              WaterBalance SoilWater: SummerDate=1-Nov; SummerU=6; SummerCona=2; WinterDate=1-Apr; WinterU=2; WinterCona=2; DiffusConst=88; DiffusSlope=35; Salb=0.13; CN2Bare=60; CNRed=20; CNCov=0.8; PSIDul=-100; Thickness=[50, 50, 100, 200, 200, 200, 400, 400, 600, 600]
                SWCON=[0.35, 0.35, 0.35, 0.35, 0.35, 0.35, 0.35, 0.35, 0.35, 0.35]
              Organic: FOMCNRatio=40; CarbonUnits=Total
                Thickness  Carbon  SoilCNRatio  FBiom  FInert  FOM
                50         1.23    13           0.04   0.1     292.785
                50         0.43    13           0.04   0.1     277.513
                100        0.37    13           0.03   0.1     249.317
                200        0.26    13           0.02   0.2     201.228
                200        0.21    13           0.01   0.8     162.415
                200        0.2     13           0.01   0.9     131.088
                400        0.18    13           0.01   0.9     85.3957
                400        0.18    13           0.01   0.9     55.6301
                600        0.17    13           0.01   0.9     29.2496
                600        0.17    13           0.01   0.9     15.3791
              Chemical: Thickness=[50, 50, 100, 200, 200, 200, 400, 400, 600, 600]; PH=[4.7, 5.1, 5.1, 6, 6, 6, 6, 6, 6, 6]; PHUnits=Water
              Water: Thickness=[50, 50, 100, 200, 200, 200, 400, 400, 600, 600]; InitialValues=[0.07, 0.07, 0.13, 0.14, 0.14, 0.11, 0.1, 0.11, 0.12, 0.13]; FilledFromTop=false
              CERESSoilTemperature Temperature
              Nutrient
              Solute NO3: Thickness=[50, 50, 100, 200, 200, 200, 400, 400, 600, 600]; InitialValues=[7, 7, 5, 3, 2, 2, 2, 1, 1, 1]; InitialValuesUnits=ppm; WaterTableConcentration=0; D0=0; DepthConstant=0; MaxDepthSoluteAccessible=0; RunoffEffectivenessAtMovingSolute=0; MaxEffectiveRunoff=0
              Solute NH4: Thickness=[50, 50, 100, 200, 200, 200, 400, 400, 600, 600]; InitialValues=[2, 2, 1, 1, 0, 0, 0, 0, 0, 0]; InitialValuesUnits=ppm; WaterTableConcentration=0; D0=0; DepthConstant=0; MaxDepthSoluteAccessible=0; RunoffEffectivenessAtMovingSolute=0; MaxEffectiveRunoff=0
              Solute Urea: Thickness=[50, 50, 100, 200, 200, 200, 400, 400, 600, 600]; InitialValues=[0, 0, 0, 0, 0, 0, 0, 0, 0, 0]; InitialValuesUnits=kg/ha; WaterTableConcentration=0; D0=0; DepthConstant=0; MaxDepthSoluteAccessible=0; RunoffEffectivenessAtMovingSolute=0; MaxEffectiveRunoff=0
            SurfaceOrganicMatter: InitialResidueName=wheat_stubble; InitialResidueType=wheat; InitialResidueMass=1000; InitialStandingFraction=0; InitialCPR=0; InitialCNR=20
            Fertiliser
            Plant Wheat
            MicroClimate: a_interception=0; b_interception=1; c_interception=0; d_interception=0; SoilHeatFluxFraction=0.4; MinimumHeightDiffForNewLayer=0; NightInterceptionFraction=0.5; ReferenceHeight=2
            Operations SowingSchedule
              1983-06-14  [Wheat].Sow(population:159, cultivar:"gamenya", depth:80, rowSpacing:250);
              1983-12-01  [Wheat].Harvest();
              1983-12-01  [Wheat].EndCrop();
            Manager SowingFertiliser
              Amount = 0
              script: same as in Validation.Western Australia.Cunderdin97.Cunderdin97Base.paddock.SowingFertiliser
            Report HarvestReport
            Report DailyReport
            Report SowingReport
            DCaPSTModelNG DCaPST: same as Validation.SE Queensland.APS26.APS26NRate160WaterWet.paddock.DCaPST
          SoilArbitrator Soil Arbitrator
          Manager LocationInfo: same as Validation.Western Australia.Cunderdin97.Cunderdin97Base.LocationInfo
      Memo MemoDCaPST
        Observed that the following sites are present in Classic APSIM but not ported to NextGen:

        - Beverley
        - Wongan84
        - Coorigin
        - Moora
        - Kojonup
    Folder New Zealand
      Experiment Lincoln9192
        Memo
          This is a water response trial run in the rain out shelter at Plant and Food Research in Lincoln, New Zealand.  It is described in full by [Jamieson_WaterResponse_1995] but briefly.  A winter crop of 'Batten' wheat was sown at 300 plants/m^2^ on the 8th of June 1991 and range of irrigation amount and timing treatments were applied.  Six of these treatments have been included in this validation:

          01. Full irrigation where measured ET was replaced weekly
          03. Short Early Drought where irrigation was withheld from sowing until late October then full irrigation was applied
          05. Long Early Drought where irrigation was withheld from sowing until mid December then full irrigation was applied
          06. Long Late Drought where full irrigation was applied from sowing until mid September then withheld for the rest of the season
          07. Moderate Late Drought where full irrigation was applied from sowing until mid October then withheld for the rest of the season
          08. Short Late Drought where full irrigation was applied from sowing until Early November then withheld for the rest of the season
          11. Nil where no water was applied and the crop grew on soil stored water only.

          Irrigation was applied at weekly intervals through and assemply of low rate drip emitters on each plot.  Soil water content was measured weekly with a neutron probe and biomass was measured at 10 - 14 day intervals.  Samples throughtout the crop were from two 0.1m^2^ quatrants and the final harvest sample was from a 1 m^2^ quadrant.  Each treatment was replicated twice and there was considerable soil variation from plot to plot so each treatment was initianilised with unique soil parameters which best described the soil they were growing on.
        Factors
          Factor Irrig
            CompositeFactor 01
              Specifications:
                [IrrigationEvents]
                [Physical]
                [Water].Thickness=200,200,200,200,200,200,200,200
                [Water].InitialValues=0.27,0.3,0.28,0.25,0.24,0.27,0.27,0.21
              Operations IrrigationEvents
                1991-06-10  [Irrigation].Apply(7);
                1991-08-16  [Irrigation].Apply(7);
                1991-08-29  [Irrigation].Apply(20);
                1991-09-07  [Irrigation].Apply(12);
                1991-09-12  [Irrigation].Apply(22);
                1991-09-19  [Irrigation].Apply(4);
                1991-09-26  [Irrigation].Apply(7);
                1991-10-03  [Irrigation].Apply(27);
                1991-10-10  [Irrigation].Apply(18);
                1991-10-17  [Irrigation].Apply(30);
                1991-10-24  [Irrigation].Apply(42);
                1991-10-31  [Irrigation].Apply(33);
                1991-11-07  [Irrigation].Apply(24);
                1991-11-14  [Irrigation].Apply(28);
                1991-11-21  [Irrigation].Apply(37);
                1991-11-27  [Irrigation].Apply(51);
                1991-12-05  [Irrigation].Apply(36);
                1991-12-12  [Irrigation].Apply(38);
                1991-12-19  [Irrigation].Apply(35);
                1991-12-26  [Irrigation].Apply(47);
                1992-01-03  [Irrigation].Apply(40);
                1992-01-09  [Irrigation].Apply(41);
              Physical
                Thickness  BD   AirDry  LL15  DUL   SAT
                200        1.3  0.08    0.08  0.29  0.44
                200        1.3  0.07    0.07  0.3   0.4
                200        1.3  0.07    0.07  0.28  0.4
                200        1.3  0.09    0.09  0.26  0.38
                200        1.3  0.11    0.11  0.26  0.38
                200        1.3  0.16    0.16  0.28  0.38
                200        1.3  0.15    0.15  0.27  0.38
                200        1.3  0.12    0.12  0.22  0.38
                SoilCrop WheatSoil: LL=[0.08, 0.07, 0.07, 0.09, 0.11, 0.16, 0.15, 0.12]; KL=[0.05, 0.03, 0.02, 0.03, 0.03, 0.03, 0.01, 0.01]; XF=[1, 1, 1, 1, 1, 1, 1, 1]
            CompositeFactor 03
              Specifications:
                [IrrigationEvents]
                [Physical]
                [Water].Thickness=200,200,200,200,200,200,200,200
                [Water].InitialValues=0.279,0.2677,0.2491,0.2705,0.311,0.2536,0.2764,0.1422
              Operations IrrigationEvents
                1991-06-10  [Irrigation].Apply(7);
                1991-08-16  [Irrigation].Apply(7);
                1991-08-29  [Irrigation].Apply(20);
                1991-09-26  [Irrigation].Apply(7);
                1991-10-24  [Irrigation].Apply(42);
                1991-10-31  [Irrigation].Apply(33);
                1991-11-07  [Irrigation].Apply(24);
                1991-11-14  [Irrigation].Apply(28);
                1991-11-21  [Irrigation].Apply(37);
                1991-11-27  [Irrigation].Apply(51);
                1991-12-05  [Irrigation].Apply(36);
                1991-12-12  [Irrigation].Apply(38);
                1991-12-19  [Irrigation].Apply(35);
                1991-12-26  [Irrigation].Apply(47);
                1992-01-03  [Irrigation].Apply(40);
                1992-01-09  [Irrigation].Apply(41);
              Physical
                Thickness  BD   AirDry  LL15  DUL     SAT
                200        1.3  0.05    0.08  0.279   0.44
                200        1.3  0.05    0.12  0.2677  0.44
                200        1.3  0.05    0.12  0.26    0.44
                200        1.3  0.05    0.12  0.2705  0.44
                200        1.3  0.05    0.15  0.311   0.44
                200        1.3  0.05    0.16  0.2536  0.44
                200        1.3  0.05    0.15  0.2764  0.44
                200        1.3  0.05    0.08  0.1422  0.44
                SoilCrop WheatSoil: LL=[0.08, 0.12, 0.12, 0.12, 0.15, 0.16, 0.15, 0.08]; KL=[0.05, 0.03, 0.02, 0.03, 0.03, 0.03, 0.01, 0.01]; XF=[1, 1, 1, 1, 1, 1, 1, 1]
            CompositeFactor 05
              Specifications:
                [IrrigationEvents]
                [Physical]
                [Water].Thickness=200,200,200,200,200,200,200,200
                [Water].InitialValues=0.2655,0.27,0.209,0.3114,0.3079,0.3007,0.2871,0.3117
              Operations IrrigationEvents
                1991-06-10  [Irrigation].Apply(7);
                1991-08-16  [Irrigation].Apply(7);
                1991-08-29  [Irrigation].Apply(20);
                1991-09-26  [Irrigation].Apply(7);
                1991-12-19  [Irrigation].Apply(35);
                1991-12-26  [Irrigation].Apply(47);
                1992-01-03  [Irrigation].Apply(40);
              Physical
                Thickness  BD   AirDry  LL15  DUL     SAT
                200        1.3  0.06    0.06  0.31    0.44
                200        1.3  0.09    0.09  0.3     0.44
                200        1.3  0.07    0.07  0.28    0.44
                200        1.3  0.12    0.12  0.3114  0.44
                200        1.3  0.16    0.16  0.3079  0.44
                200        1.3  0.16    0.16  0.3007  0.44
                200        1.3  0.15    0.15  0.2871  0.44
                200        1.3  0.16    0.16  0.3117  0.44
                SoilCrop WheatSoil: LL=[0.06, 0.09, 0.07, 0.12, 0.16, 0.16, 0.15, 0.16]; KL=[0.05, 0.03, 0.02, 0.03, 0.03, 0.03, 0.01, 0.01]; XF=[1, 1, 1, 1, 1, 1, 1, 1]
            CompositeFactor 06
              Specifications:
                [IrrigationEvents]
                [Physical]
                [Water].Thickness=200,200,200,200,200,200,200,200
                [Water].InitialValues=0.2805,0.2796,0.27,0.296,0.231,0.2453,0.2042,0.156
              Operations IrrigationEvents
                1991-06-10  [Irrigation].Apply(7);
                1991-08-16  [Irrigation].Apply(7);
                1991-08-29  [Irrigation].Apply(20);
                1991-09-07  [Irrigation].Apply(12);
                1991-09-12  [Irrigation].Apply(22);
                1991-09-19  [Irrigation].Apply(14);
                1991-09-26  [Irrigation].Apply(7);
              Physical
                Thickness  BD   AirDry  LL15  DUL    SAT
                200        1.3  0.08    0.08  0.281  0.44
                200        1.3  0.08    0.08  0.28   0.44
                200        1.3  0.09    0.09  0.27   0.44
                200        1.3  0.12    0.12  0.296  0.44
                200        1.3  0.11    0.11  0.231  0.44
                200        1.3  0.16    0.16  0.245  0.44
                200        1.3  0.1     0.1   0.204  0.44
                200        1.3  0.08    0.08  0.156  0.44
                SoilCrop WheatSoil: LL=[0.08, 0.08, 0.09, 0.12, 0.11, 0.16, 0.1, 0.08]; KL=[0.05, 0.03, 0.02, 0.03, 0.03, 0.03, 0.01, 0.01]; XF=[1, 1, 1, 1, 1, 1, 1, 1]
            CompositeFactor 07
              Specifications:
                [IrrigationEvents]
                [Physical]
                [Water].Thickness=200,200,200,200,200,200,200,200
                [Water].InitialValues=0.278,0.2682,0.2536,0.2364,0.2635,0.277,0.3392,0.2
              Operations IrrigationEvents
                1991-06-10  [Irrigation].Apply(7);
                1991-08-16  [Irrigation].Apply(7);
                1991-08-29  [Irrigation].Apply(20);
                1991-09-07  [Irrigation].Apply(12);
                1991-09-12  [Irrigation].Apply(22);
                1991-09-19  [Irrigation].Apply(14);
                1991-09-26  [Irrigation].Apply(7);
                1991-10-03  [Irrigation].Apply(27);
                1991-10-10  [Irrigation].Apply(18);
                1991-10-17  [Irrigation].Apply(30);
              Physical
                Thickness  BD   AirDry  LL15  DUL     SAT
                200        1.3  0.08    0.08  0.31    0.44
                200        1.3  0.07    0.07  0.27    0.44
                200        1.3  0.06    0.06  0.2536  0.44
                200        1.3  0.09    0.09  0.2364  0.44
                200        1.3  0.15    0.15  0.2635  0.44
                200        1.3  0.16    0.16  0.277   0.44
                200        1.3  0.15    0.15  0.3392  0.44
                200        1.3  0.08    0.08  0.2     0.44
                SoilCrop WheatSoil: LL=[0.08, 0.07, 0.06, 0.09, 0.15, 0.16, 0.15, 0.08]; KL=[0.05, 0.03, 0.02, 0.03, 0.03, 0.03, 0.01, 0.01]; XF=[1, 1, 1, 1, 1, 1, 1, 1]
            CompositeFactor 08
              Specifications:
                [IrrigationEvents]
                [Physical]
                [Water].Thickness=200,200,200,200,200,200,200,200
                [Water].InitialValues=0.281,0.2785,0.2754,0.2698,0.252,0.2672,0.2623,0.1995
              Operations IrrigationEvents
                1991-06-10  [Irrigation].Apply(7);
                1991-08-16  [Irrigation].Apply(7);
                1991-08-29  [Irrigation].Apply(20);
                1991-09-07  [Irrigation].Apply(12);
                1991-09-12  [Irrigation].Apply(22);
                1991-09-19  [Irrigation].Apply(14);
                1991-09-26  [Irrigation].Apply(7);
                1991-10-03  [Irrigation].Apply(27);
                1991-10-10  [Irrigation].Apply(18);
                1991-10-17  [Irrigation].Apply(30);
                1991-10-24  [Irrigation].Apply(42);
                1991-10-31  [Irrigation].Apply(33);
                1991-11-07  [Irrigation].Apply(24);
              Physical
                Thickness  BD   AirDry  LL15  DUL     SAT
                200        1.3  0.08    0.08  0.31    0.44
                200        1.3  0.12    0.12  0.2785  0.44
                200        1.3  0.09    0.09  0.2754  0.44
                200        1.3  0.09    0.09  0.2698  0.44
                200        1.3  0.13    0.13  0.252   0.44
                200        1.3  0.16    0.16  0.2672  0.44
                200        1.3  0.15    0.15  0.2623  0.44
                200        1.3  0.1     0.1   0.1995  0.44
                SoilCrop WheatSoil: LL=[0.08, 0.12, 0.09, 0.09, 0.13, 0.16, 0.15, 0.1]; KL=[0.05, 0.03, 0.02, 0.03, 0.03, 0.03, 0.01, 0.01]; XF=[1, 1, 1, 1, 1, 1, 1, 1]
            CompositeFactor 11
              Specifications:
                [IrrigationEvents]
                [Physical]
                [Water].Thickness=200,200,200,200,200,200,200,200
                [Water].InitialValues=0.2375,0.2666,0.2634,0.2309,0.238,0.2339,0.2282,0.1847
              Operations IrrigationEvents
                1991-06-10  [Irrigation].Apply(7);
                1991-08-16  [Irrigation].Apply(7);
                1991-09-26  [Irrigation].Apply(7);
              Physical
                Thickness  BD   AirDry  LL15  DUL     SAT
                200        1.3  0.07    0.07  0.31    0.44
                200        1.3  0.11    0.11  0.2666  0.44
                200        1.3  0.12    0.12  0.2634  0.44
                200        1.3  0.09    0.09  0.2309  0.34
                200        1.3  0.15    0.15  0.238   0.24
                200        1.3  0.17    0.17  0.2339  0.34
                200        1.3  0.12    0.12  0.2282  0.3
                200        1.3  0.09    0.09  0.1847  0.28
                SoilCrop WheatSoil: LL=[0.07, 0.11, 0.12, 0.09, 0.15, 0.17, 0.12, 0.09]; KL=[0.05, 0.03, 0.02, 0.03, 0.03, 0.03, 0.01, 0.005]; XF=[1, 1, 1, 1, 1, 1, 1, 1]
        Simulation LincolnBase
          Clock: Start=1991-06-08; End=1992-02-28
          Summary summaryfile
          Weather: FileName=Met\lincoln.met
          Zone paddock: Area=1; Slope=0; AspectAngle=0; Altitude=50
            Folder Manager folder
              Operations
                1991-06-08  [Wheat].Sow(population:250, cultivar:"BattenSpring", depth:40, rowSpacing:150);
              Operations IrrigationEvents
                1991-08-30  [Irrigation].Apply(0);
                1991-09-08  [Irrigation].Apply(0);
                1991-09-13  [Irrigation].Apply(0);
                1991-09-20  [Irrigation].Apply(0);
                1991-10-04  [Irrigation].Apply(0);
                1991-10-11  [Irrigation].Apply(18);
                1991-10-18  [Irrigation].Apply(30);
                1991-10-25  [Irrigation].Apply(42);
                1991-11-01  [Irrigation].Apply(33);
                1991-11-08  [Irrigation].Apply(24);
                1991-11-15  [Irrigation].Apply(28);
                1991-11-22  [Irrigation].Apply(37);
                1991-11-28  [Irrigation].Apply(51);
                1991-12-06  [Irrigation].Apply(36);
                1991-12-13  [Irrigation].Apply(38);
                1991-12-20  [Irrigation].Apply(35);
                1991-12-27  [Irrigation].Apply(47);
                1992-01-04  [Irrigation].Apply(40);
                1992-01-10  [Irrigation].Apply(41);
              Operations FertiliserEvents
                1991-06-10  [Fertiliser].Apply(30, Fertiliser.Types.NO3N, 0);
                1991-08-16  [Fertiliser].Apply(100, Fertiliser.Types.NO3N,0);
                1991-09-26  [Fertiliser].Apply(50, Fertiliser.Types.NO3N,0);
              Operations HarvestOperations
                1992-01-21  [Wheat].Harvest();
                1992-01-21  [Wheat].EndCrop();
            Irrigation
            Soil: SoilType=LincolnSoil; LocalName=Lincoln; Site=Lincoln; NearestTown=Unknown; Region=NZ; NaturalVegetation=Unknown; Latitude=0; Longitude=0
              Physical
                Thickness  BD   AirDry  LL15  DUL   SAT
                100        1.3  0.05    0.08  0.31  0.44
                200        1.3  0.05    0.07  0.3   0.44
                200        1.3  0.05    0.07  0.28  0.44
                200        1.3  0.05    0.09  0.31  0.44
                200        1.3  0.05    0.11  0.3   0.44
                200        1.3  0.05    0.16  0.28  0.44
                200        1.3  0.05    0.15  0.3   0.44
                200        1.3  0.05    0.12  0.34  0.44
                SoilCrop WheatSoil: LL=[0.08, 0.07, 0.07, 0.09, 0.11, 0.16, 0.15, 0.12]; KL=[0.06, 0.06, 0.06, 0.04, 0.03, 0.02, 0.02, 0.02]; XF=[1, 1, 1, 1, 1, 1, 1, 1]
              WaterBalance SoilWater: SummerDate=1-Nov; SummerU=7; SummerCona=3; WinterDate=1-Apr; WinterU=3; WinterCona=2; DiffusConst=0; DiffusSlope=0; Salb=0.2; CN2Bare=75; CNRed=20; CNCov=0.8; DischargeWidth=0; CatchmentArea=0; PSIDul=-100
                Thickness  SWCON  KLAT
                100        0.6    0
                200        0.6    0
                200        0.6    0
                200        0.6    0
                200        0.6    0
                200        0.6    0
                200        0.6    0
                200        0.6    0
              Organic: FOMCNRatio=30; CarbonUnits=Total
                Thickness  Carbon  SoilCNRatio  FBiom  FInert  FOM
                100        0.35    11           0.04   0.31    0
                200        0.27    11           0.03   0.31    0
                200        0.24    11           0.02   0.31    0
                200        0.16    11           0.01   0.31    0
                200        0.16    11           0.01   0.31    0
                200        0.3     11           0.01   0.25    0
                200        0.1     11           0.01   0.2     0
                200        0.1     11           0.01   0.2     0
              Chemical: Thickness=[100, 200, 200, 200, 200, 200, 200, 200]; PH=[8.5, 8.5, 8.6, 8.6, 8.6, 8.6, 8.6, 8.6]; PHUnits=Water
              Water: Thickness=[100, 200, 200, 200, 200, 200, 200, 200]; InitialValues=[0.27, 0.3, 0.28, 0.25, 0.24, 0.27, 0.27, 0.21]; FilledFromTop=false
              CERESSoilTemperature Temperature
              Nutrient
              Solute NO3: Thickness=[100, 200, 200, 200, 200, 200, 200, 200]; InitialValues=[24.9, 16, 9.8, 9.8, 2.1, 2.1, 2.1, 2.1]; InitialValuesUnits=ppm; WaterTableConcentration=0; D0=0; DepthConstant=0; MaxDepthSoluteAccessible=0; RunoffEffectivenessAtMovingSolute=0; MaxEffectiveRunoff=0
              Solute NH4: Thickness=[100, 200, 200, 200, 200, 200, 200, 200]; InitialValues=[1.3, 1, 1, 0.8, 0.8, 0.5, 0.5, 0.5]; InitialValuesUnits=ppm; WaterTableConcentration=0; D0=0; DepthConstant=0; MaxDepthSoluteAccessible=0; RunoffEffectivenessAtMovingSolute=0; MaxEffectiveRunoff=0
              Solute Urea: Thickness=[100, 200, 200, 200, 200, 200, 200, 200]; InitialValues=[0, 0, 0, 0, 0, 0, 0, 0]; InitialValuesUnits=kg/ha; WaterTableConcentration=0; D0=0; DepthConstant=0; MaxDepthSoluteAccessible=0; RunoffEffectivenessAtMovingSolute=0; MaxEffectiveRunoff=0
            SurfaceOrganicMatter Surface Organic Matter: InitialResidueName=wheat_stubble; InitialResidueType=wheat; InitialResidueMass=1000; InitialStandingFraction=0; InitialCPR=0; InitialCNR=80
            Fertiliser
            MicroClimate: a_interception=0; b_interception=1; c_interception=0; d_interception=0; SoilHeatFluxFraction=0.4; MinimumHeightDiffForNewLayer=0; NightInterceptionFraction=0.5; ReferenceHeight=2
            Plant Wheat
            Manager ResetSW
              reset_date = 1991-09-02
```csharp
using Models.Interfaces;
using APSIM.Shared.Utilities;
using Models.Surface;
using Models.Soils;
using Models.PMF.OilPalm;
using Models.PMF;
using Models.Core;
using System;
using Models.Soils.Nutrients;

namespace Models
{
    [Serializable]
    [System.Xml.Serialization.XmlInclude(typeof(Model))]
    public class Script : Model
    {
        [Link] private Clock Clock;
        [Link] private Soil Soil;
        [Link] private SurfaceOrganicMatter SurfaceOM;
        [Link]
        private ISoilWater waterBalance;
        [Description("Reset date")]
        public DateTime reset_date { get; set; }

        
        [EventSubscribe("DoManagement")]
        private void OnDoManagement(object sender, EventArgs e)
        {
            if (Clock.Today == reset_date)
                waterBalance.Reset();
        }
    }
}
```
            Manager ClimateControl
              StartDate = 1991-06-08
              EndDate = 1992-12-31
```csharp
using Models.Soils;
using System.Xml.Serialization;
using Models;
using Models.PMF;
using System.Text;
using System.Collections.Generic;
using APSIM.Shared.Utilities;
using Models.Core;
using System;
using Models.Climate;

namespace Models
{
    [Serializable] 
    [System.Xml.Serialization.XmlInclude(typeof(Model))]
    public class Script : Model
    {
        [Link] Weather Met;
        [Link] Clock Clock;
    
        [Description("Start Date")]
        public DateTime StartDate { get; set; }
        
        [Description("End Date")]
        public DateTime EndDate { get; set; }
 
    
        [EventSubscribe("PreparingNewWeatherData")]
        private void OnPreparingNewWeatherData(object sender, EventArgs e)
        {
            if ((Clock.Today.Date >= StartDate) && (Clock.Today.Date <= EndDate))
                Met.Rain = 0;        
        }
    }
}
```
            Report DailyReport
            Report HarvestReport
            Report SowingReport
            DCaPSTModelNG DCaPST: same as Validation.SE Queensland.APS26.APS26NRate160WaterWet.paddock.DCaPST
          SoilArbitrator Soil Arbitrator
          Manager LocationInfo
            Country = New Zealand
            State = Canterbury Region
            Region =
            script: same as in Validation.SE Queensland.APS26.APS26NRate160WaterWet.LocationInfo
      Experiment Lincoln1992
        Memo
          This trial has never been formally written up.  It was conducted at Plant and Foods A Block, Lincoln, New Zealand with 'Batten' Wheat grown on a Templeton silt loam (160mm AWC/m).  It was a 2 x 2 x 4 factorial with the following treatments:

          1. Sowing Date (5 May 1992 and 5 Aug 1992)
          2. Irrigation (Nil and 120 mm)
          3. Nitrogen (0, Low, Medium and High)

          The N applied to the Low, Medium and High N treatments was 100, 150 and 250 kg/ha, respectively, for the May sowing and 50, 100 and 150, respectively, for the August sowing.

          Could not find informaiton confirming sowing rate so assumed typical values of 300 plants per m/2  for the spring sowing 100 plants per m/2 for May sowing.
          Emergence was recorded as the 28th of May for the first planting.  The model was predicting this early so delayed sowing date to get emergence date correct..
        Factors
          Permutation
            Factor Sow
              CompositeFactor 5May
                Specifications:
                  [Operations]
                  [Fertilise].Script.SDSwitch = 1.0
                Operations
                  1992-05-15  [Wheat].Sow(population:100, cultivar:"BattenWinter", depth:40, rowSpacing:150);
              CompositeFactor 5Aug
                Specifications:
                  [Operations]
                  [Fertilise].Script.SDSwitch = 0.0
                Operations
                  1992-08-05  [Wheat].Sow(population:300, cultivar:"BattenWinter", depth:20, rowSpacing:150);
            Factor Irr: Specification=[IrrigationEvents]
              Operations Nil
              Operations Some
                1992-11-25  [Irrigation].Apply(60);
                1992-12-31  [Irrigation].Apply(60);
            Factor Nit
              CompositeFactor 0
                Specifications:
                  [Fertilise].Script.Amount1 = 0.0
                  [Fertilise].Script.Amount2 = 0.0
                  [Fertilise].Script.Amount3 = 0.0
                  [Fertilise].Script.Amount4 = 0.0
              CompositeFactor 1
                Specifications:
                  [Fertilise].Script.Amount1 = 50
                  [Fertilise].Script.Amount2 = 50
                  [Fertilise].Script.Amount3 = 0.0
                  [Fertilise].Script.Amount4 = 0.0
              CompositeFactor 2
                Specifications:
                  [Fertilise].Script.Amount1 = 50.0
                  [Fertilise].Script.Amount2 = 100.0
                  [Fertilise].Script.Amount3 = 0.0
                  [Fertilise].Script.Amount4 = 0.0
              CompositeFactor 3
                Specifications:
                  [Fertilise].Script.Amount1 = 50.0
                  [Fertilise].Script.Amount2 = 100.0
                  [Fertilise].Script.Amount3 = 50.0
                  [Fertilise].Script.Amount4 = 50.0
        Simulation SDtrialBase
          Clock: Start=1992-05-01; End=1993-05-01
          Summary summaryfile
          Weather: FileName=Met\lincoln.met
          Zone paddock: Area=1; Slope=0; AspectAngle=0; Altitude=50
            Folder Manager folder
              Operations
              Operations IrrigationEvents
              Manager Fertilise
                FertDate1 = 05-Aug
                FertDate2 = 01-Oct
                FertDate3 = 20-Oct
                FertDate4 = 25-Nov
                Amount1 = 0
                Amount2 = 0
                Amount3 = 0
                Amount4 = 0
                SDSwitch = 0
```csharp
using Models.Soils;
using System;
using Models.Core;
using Models.PMF;
using APSIM.Shared.Utilities;
namespace Models
{
    [Serializable]
    public class Script : Model
    {
        [Link] Clock Clock;
        [Link] Fertiliser Fertiliser;
        
        [Description("Date to fertilise")]
        public string FertDate1 { get; set; }
        [Description("Date to fertilise")]
        public string FertDate2 { get; set; }
        [Description("Date to fertilise")]
        public string FertDate3 { get; set; }
        [Description("Date to fertilise")]
        public string FertDate4 { get; set; }
        
        [Description("Amount of fertiliser to be applied (kg/ha)")]
        public double Amount1 { get; set; }
        [Description("Amount of fertiliser to be applied (kg/ha)")]
        public double Amount2 { get; set; }
        [Description("Amount of fertiliser to be applied (kg/ha)")]
        public double Amount3 { get; set; }
        [Description("Amount of fertiliser to be applied (kg/ha)")]
        public double Amount4 { get; set; }
        
        [Description("Amount of fertiliser to be applied (kg/ha)")]
        public double SDSwitch { get; set; }
        
        [EventSubscribe("DoManagement")]
        private void OnDoManagement(object sender, EventArgs e)
        {
            if (DateUtilities.WithinDates(FertDate1, Clock.Today, FertDate1))
                Fertiliser.Apply(Amount: Amount1 * SDSwitch, Type: Fertiliser.Types.NO3N);
            if (DateUtilities.WithinDates(FertDate2, Clock.Today, FertDate2))
                Fertiliser.Apply(Amount: Amount2, Type: Fertiliser.Types.NO3N);
            if (DateUtilities.WithinDates(FertDate3, Clock.Today, FertDate3))
                Fertiliser.Apply(Amount: Amount3, Type: Fertiliser.Types.NO3N);
            if (DateUtilities.WithinDates(FertDate4, Clock.Today, FertDate4))
                Fertiliser.Apply(Amount: Amount4 * SDSwitch, Type: Fertiliser.Types.NO3N);
        }
    }
}
```
              Operations HarvestOperations
                1993-03-03  [Wheat].Harvest();
                1993-03-03  [Wheat].EndCrop();
            Irrigation
            Soil: SoilType=LincolnSoil; LocalName=Lincoln; Site=Lincoln; NearestTown=Unknown; Region=NZ; NaturalVegetation=Unknown; Latitude=0; Longitude=0
              Physical
                Thickness  BD   AirDry  LL15  DUL   SAT
                100        1.3  0.08    0.12  0.31  0.44
                200        1.3  0.12    0.12  0.3   0.44
                200        1.3  0.1     0.1   0.28  0.44
                200        1.3  0.09    0.09  0.31  0.44
                200        1.3  0.11    0.11  0.3   0.44
                200        1.3  0.16    0.16  0.28  0.44
                100        1.3  0.15    0.15  0.3   0.44
                200        1.3  0.12    0.12  0.34  0.44
                SoilCrop WheatSoil: LL=[0.12, 0.12, 0.1, 0.09, 0.11, 0.16, 0.15, 0.12]; KL=[0.06, 0.06, 0.06, 0.04, 0.03, 0.02, 0.02, 0.02]; XF=[1, 1, 1, 1, 1, 1, 1, 1]
              WaterBalance SoilWater: SummerDate=1-Nov; SummerU=7; SummerCona=3; WinterDate=1-Apr; WinterU=7; WinterCona=3; DiffusConst=40; DiffusSlope=16; Salb=0.2; CN2Bare=75; CNRed=20; CNCov=0.8; DischargeWidth=0; CatchmentArea=0; PSIDul=-100
                Thickness  SWCON  KLAT
                100        0.6    0
                200        0.6    0
                200        0.6    0
                200        0.6    0
                200        0.6    0
                200        0.6    0
                200        0.6    0
                200        0.6    0
              Organic: FOMCNRatio=30; CarbonUnits=Total
                Thickness  Carbon  SoilCNRatio  FBiom  FInert  FOM
                100        2.4     11.5         0.025  0.3     171.845
                200        2.1     11.5         0.025  0.4     115.191
                200        1.6     11.5         0.015  0.75    77.2148
                200        1.03    11.5         0.01   0.9     51.7586
                200        0.47    11.5         0.01   0.96    34.6949
                200        0.47    11.5         0.01   0.96    23.2567
                200        0.47    11.5         0.01   0.96    15.5894
                200        0.47    11.5         0.01   0.96    10.4499
              Chemical: Thickness=[100, 200, 200, 200, 200, 200, 200, 200]; PH=[6.6, 6.2, 5.7, 5.5, 5.5, 5.5, 5.5, 5.5]; PHUnits=Water
              Water: Thickness=[100, 200, 200, 200, 200, 200, 100, 200]; InitialValues=[0.31, 0.3, 0.28, 0.31, 0.3, 0.28, 0.3, 0.34]; FilledFromTop=false
              CERESSoilTemperature Temperature
              Nutrient
              Solute NO3: Thickness=[100, 200, 200, 200, 200, 200, 200, 200]; InitialValuesUnits=ppm; WaterTableConcentration=0; D0=0; DepthConstant=0; MaxDepthSoluteAccessible=0; RunoffEffectivenessAtMovingSolute=0; MaxEffectiveRunoff=0
                InitialValues=[19.2308, 4.23077, 4.23077, 3.84615, 3.46154, 1.53846, 1.15385, 0.769231]
              Solute NH4: Thickness=[100, 200, 200, 200, 200, 200, 200, 200]; InitialValues=[0.39, 0.6, 0.6, 0.5, 0.5, 0.5, 0.5, 0.5]; InitialValuesUnits=ppm; WaterTableConcentration=0; D0=0; DepthConstant=0; MaxDepthSoluteAccessible=0; RunoffEffectivenessAtMovingSolute=0; MaxEffectiveRunoff=0
              Solute Urea: same as Validation.New Zealand.Lincoln9192.LincolnBase.paddock.Soil.Urea
            SurfaceOrganicMatter Surface Organic Matter: InitialResidueName=wheat_stubble; InitialResidueType=wheat; InitialResidueMass=0; InitialStandingFraction=0; InitialCPR=0; InitialCNR=80
            Fertiliser
            MicroClimate: a_interception=0; b_interception=1; c_interception=0; d_interception=0; SoilHeatFluxFraction=0.4; MinimumHeightDiffForNewLayer=0; NightInterceptionFraction=0.5; ReferenceHeight=2
            Plant Wheat
            Report DailyReport
            Report HarvestReport
            Report SupReport: EventNames=[Clock].DoReport
              VariableNames:
                [Clock].Today
                [Leaf].CohortSize
                [Wheat].Arbitrator.DM.Allocated
                [Wheat].Arbitrator.DM.TotalPlantDemand
                [Wheat].Arbitrator.DM.NutrientLimitation
                [Wheat].Arbitrator.DM.SinkLimitation
                [Wheat].Arbitrator.DM.TotalFixationSupply
                [Wheat].Arbitrator.FN
                [Wheat].Arbitrator.N.TotalPlantDemand
                [Wheat].Leaf.CohortMaxSize
                [Wheat].Leaf.CohortParameters.GrowthDuration
                [Wheat].Leaf.CohortParameters.LagDuration
                [Wheat].Leaf.CohortParameters.MaxArea
                [Wheat].Leaf.CohortParameters.SenescenceDuration
                [Wheat].Leaf.CohortParameters.SpecificLeafAreaMax
                [Wheat].Leaf.CohortParameters.SpecificLeafAreaMin
                [Wheat].Leaf.Photosynthesis.FT
                [Wheat].Leaf.Photosynthesis.FVPD
                [Wheat].Leaf.Photosynthesis.RueAct
                [Wheat].Leaf.NextExpandingLeafProportion
                [Wheat].Structure.MeanTillerGrowthRate
            Report SowingReport
            DCaPSTModelNG DCaPST: same as Validation.SE Queensland.APS26.APS26NRate160WaterWet.paddock.DCaPST
          SoilArbitrator Soil Arbitrator
          Manager LocationInfo: same as Validation.New Zealand.Lincoln9192.LincolnBase.LocationInfo
      Memo MemoDCaPST
        Observed that NZ_Cultivars_8487 are present in Classic APSIM but not ported to NextGen.
    Folder NorthAmerica
      Folder Arizona
        Memo
          These FACE trials were conducted to investigate the effects of atmospheric CO2 concentrations and water stress on wheat growth and development [Hanksar_1996_FACE].  It was conducted at Maricopa, Arazona using Free Air Carbon Enrichment to create elevated CO2 treatments:

          1. Normal CO2  (370 ppm) (that is no longer normal)
          2. High CO2 (550 ppm)

          Irrigation treatmetnts were also applied with:

          1. High Irrigation (~600 mm)
          2. Low irrigation (~265 mm)

          Crop development, Biomass production and soil moisture were monitored throughout the crops duration.
        Experiment ArizonaFACE92
          Memo
            This trial was conducted to investigate the effects of atmospheric CO2 concentrations and water stress on wheat growth and development [Hanksar_1996_FACE].  It was conducted at Maricopa, Arazona using Free Air Carbon Enrichment to create elevated CO2 treatments:

            1. Normal CO2  (370 ppm) (that is no longer normal)
            2. High CO2 (550 ppm)

            Irrigation treatmetnts were also applied with:

            1. High Irrigation (~600 mm)
            2. Low irrigation (~265 mm)

            Crop development, Biomass production and soil moisture were monitored throughout the crops duration.
          Factors
            Permutation
              Factor CO2: Specification=[SetCO2]
                Manager Normal
                  CO2 = 350
```csharp
using Models.Soils;
using System.Xml.Serialization;
using Models;
using Models.PMF;
using System.Text;
using System.Collections.Generic;
using APSIM.Shared.Utilities;
using Models.Core;
using System;
using Models.Climate;

namespace Models
{
    [Serializable] 
    [System.Xml.Serialization.XmlInclude(typeof(Model))]
    public class Script : Model
    {
        [Link] Weather Met;
        [Link] Clock Clock;
    
        [Description("CO2 conc")]
        public double CO2 { get; set; }
    
        
        [EventSubscribe("PreparingNewWeatherData")]
        private void OnPreparingNewWeatherData(object sender, EventArgs e)
        {
            Met.CO2 = CO2;        
        }
    }
}
```
                Manager High
                  CO2 = 550
                  script: same as in Validation.NorthAmerica.Arizona.ArizonaFACE92.Factors.Permutation.CO2.Normal
              Factor Irr: Specification=[IrrigationSchedule]
                Operations Wet
                  1992-12-18  [Irrigation].Apply(amount:300);
                  1993-01-30  [Irrigation].Apply(amount:30);
                  1993-01-31  [Irrigation].Apply(amount:7);
                  1993-03-01  [Irrigation].Apply(amount:12);
                  1993-03-09  [Irrigation].Apply(amount:60);
                  1993-03-18  [Irrigation].Apply(amount:34);
                  1993-03-25  [Irrigation].Apply(amount:50);
                  1993-04-05  [Irrigation].Apply(amount:54);
                  1993-04-06  [Irrigation].Apply(amount:4);
                  1993-04-12  [Irrigation].Apply(amount:47);
                  1993-04-17  [Irrigation].Apply(amount:38);
                  1993-04-18  [Irrigation].Apply(amount:6);
                  1993-04-21  [Irrigation].Apply(amount:36);
                  1993-04-26  [Irrigation].Apply(amount:48);
                  1993-04-27  [Irrigation].Apply(amount:6);
                  1993-04-30  [Irrigation].Apply(amount:42);
                  1993-05-05  [Irrigation].Apply(amount:41);
                  1993-05-10  [Irrigation].Apply(amount:41);
                  1993-05-11  [Irrigation].Apply(amount:4);
                  1993-05-14  [Irrigation].Apply(amount:41);
                Operations Dry
                  1992-12-18  [Irrigation].Apply(amount:300);
                  1993-01-30  [Irrigation].Apply(amount:30);
                  1993-01-31  [Irrigation].Apply(amount:7);
                  1993-03-18  [Irrigation].Apply(amount:17);
                  1993-03-25  [Irrigation].Apply(amount:15);
                  1993-04-05  [Irrigation].Apply(amount:27);
                  1993-04-06  [Irrigation].Apply(amount:4);
                  1993-04-12  [Irrigation].Apply(amount:18);
                  1993-04-17  [Irrigation].Apply(amount:16);
                  1993-04-18  [Irrigation].Apply(amount:6);
                  1993-04-21  [Irrigation].Apply(amount:18);
                  1993-04-26  [Irrigation].Apply(amount:24);
                  1993-04-27  [Irrigation].Apply(amount:6);
                  1993-04-30  [Irrigation].Apply(amount:21);
                  1993-05-05  [Irrigation].Apply(amount:20);
                  1993-05-10  [Irrigation].Apply(amount:20);
                  1993-05-11  [Irrigation].Apply(amount:4);
                  1993-05-14  [Irrigation].Apply(amount:20);
          Simulation FACE92
            Clock: Start=1992-12-14; End=1993-05-30
            Summary summaryfile
            Weather: FileName=Met\Maricopa9293.met
            SoilArbitrator Soil Arbitrator
            Zone Field: Area=1; Slope=0; AspectAngle=0; Altitude=50
              Irrigation
              Fertiliser
              Soil: Latitude=0; Longitude=0
                Physical
                  Thickness  BD    AirDry  LL15  DUL   SAT
                  50         1.31  0.03    0.15  0.3   0.42
                  100        1.27  0.03    0.15  0.3   0.42
                  150        1.27  0.15    0.15  0.3   0.42
                  200        1.3   0.15    0.15  0.3   0.42
                  100        1.47  0.15    0.15  0.3   0.39
                  100        1.47  0.15    0.15  0.3   0.39
                  200        1.57  0.15    0.15  0.3   0.36
                  200        1.57  0.16    0.16  0.28  0.35
                  100        1.57  0.16    0.16  0.28  0.35
                  100        1.57  0.16    0.16  0.28  0.35
                  200        1.57  0.14    0.14  0.25  0.34
                  200        1.57  0.14    0.14  0.25  0.34
                  200        1.57  0.13    0.13  0.24  0.33
                  200        1.57  0.13    0.13  0.24  0.33
                  SoilCrop WheatSoil
                    LL=[0.15, 0.15, 0.15, 0.15, 0.15, 0.15, 0.15, 0.16, 0.16, 0.16, 0.14, 0.14, 0.13, 0.13]
                    KL=[0.06, 0.06, 0.06, 0.06, 0.06, 0.06, 0.06, 0.06, 0.06, 0.06, 0.06, 0.06, 0.06, 0.06]
                    XF=[1, 1, 1, 1, 1, 1, 1, 1, 1, 1, 1, 1, 1, 1]
                WaterBalance SoilWater: SummerDate=1-Nov; SummerU=6; SummerCona=2; WinterDate=1-Apr; WinterU=6; WinterCona=2; DiffusConst=88; DiffusSlope=35.4; Salb=0.13; CN2Bare=60; CNRed=20; CNCov=0.8; DischargeWidth=0; CatchmentArea=0; PSIDul=-100
                  Thickness  SWCON  KLAT
                  50         0.34   0
                  100        0.34   0
                  150        0.34   0
                  200        0.34   0
                  100        0.34   0
                  100        0.34   0
                  200        0.3    0
                  200        0.25   0
                  100        0.25   0
                  100        0.25   0
                  200        0.2    0
                  200        0.2    0
                  200        0.18   0
                  200        0.18   0
                Organic: FOMCNRatio=20; CarbonUnits=Total
                  Thickness  Carbon  SoilCNRatio  FBiom  FInert  FOM
                  50         0.41    15           0.04   0.31    290.15
                  100        0.35    15           0.04   0.31    251.525
                  150        0.27    15           0.03   0.31    203.01
                  200        0.24    15           0.02   0.31    152.558
                  100        0.16    15           0.01   0.31    132.249
                  100        0.16    15           0.01   0.31    114.644
                  200        0.3     15           0.01   0.25    86.152
                  200        0.1     15           0.01   0.2     64.7413
                  100        0.1     15           0.01   0.2     56.1228
                  100        0.1     15           0.01   0.2     48.6516
                  200        0.1     15           0.01   0.2     36.5606
                  200        0.1     15           0.01   0.2     27.4744
                  200        0.1     15           0.01   0.17    20.6464
                  200        0.1     15           0.01   0.17    15.5153
                Chemical: PHUnits=Water
                  Thickness=[50, 100, 150, 200, 100, 100, 200, 200, 100, 100, 200, 200, 200, 200]
                  PH=[8.5, 8.5, 8.5, 8.6, 8.6, 8.6, 8.6, 8.6, 8.6, 8.6, 8.6, 8.6, 8.6, 8.6]
                Water: FilledFromTop=false
                  Thickness=[50, 100, 150, 200, 100, 100, 200, 200, 100, 100, 200, 200, 200, 200]
                  InitialValues=[0.223, 0.223, 0.223, 0.228, 0.202, 0.202, 0.198, 0.192, 0.185, 0.185, 0.189, 0.19, 0.198, 0.196]
                CERESSoilTemperature Temperature
                Nutrient
                Solute NO3: InitialValuesUnits=ppm; WaterTableConcentration=0; D0=0; DepthConstant=0; MaxDepthSoluteAccessible=0; RunoffEffectivenessAtMovingSolute=0; MaxEffectiveRunoff=0
                  Thickness=[50, 100, 150, 200, 100, 100, 200, 200, 100, 100, 200, 200, 200, 200]
                  InitialValues=[24.9, 24.9, 16, 9.8, 9.8, 2.1, 2.1, 2.1, 2.1, 0.2, 0.2, 0.2, 0.2, 0.2]
                Solute NH4: InitialValuesUnits=ppm; WaterTableConcentration=0; D0=0; DepthConstant=0; MaxDepthSoluteAccessible=0; RunoffEffectivenessAtMovingSolute=0; MaxEffectiveRunoff=0
                  Thickness=[50, 100, 150, 200, 100, 100, 200, 200, 100, 100, 200, 200, 200, 200]
                  InitialValues=[0.8, 0.8, 0.6, 0.4, 0.4, 0.2, 0.2, 0.2, 0.2, 0.2, 0.2, 0.2, 0.2, 0.2]
                Solute Urea: InitialValues=[0, 0, 0, 0, 0, 0, 0, 0, 0, 0, 0, 0, 0, 0]; InitialValuesUnits=kg/ha; WaterTableConcentration=0; D0=0; DepthConstant=0; MaxDepthSoluteAccessible=0; RunoffEffectivenessAtMovingSolute=0; MaxEffectiveRunoff=0
                  Thickness=[50, 100, 150, 200, 100, 100, 200, 200, 100, 100, 200, 200, 200, 200]
              Operations Sowing
                1992-12-15  [Wheat].Sow(population: 140, cultivar: "Yecora", depth: 30, rowSpacing: 250);
                1992-12-16  [Fertiliser].Apply(Amount: 40, Type: Fertiliser.Types.NO3N);
                1992-12-17  [Fertiliser].Apply(Amount: 20, Type: Fertiliser.Types.NO3N);
                1993-01-30  [Fertiliser].Apply(Amount: 13, Type: Fertiliser.Types.NO3N);
                1993-01-31  [Fertiliser].Apply(Amount: 10, Type: Fertiliser.Types.NO3N);
                1993-02-01  [Fertiliser].Apply(Amount: 92, Type: Fertiliser.Types.NO3N);
                1993-03-18  [Fertiliser].Apply(Amount: 66, Type: Fertiliser.Types.NO3N);
                1993-03-19  [Fertiliser].Apply(Amount: 10, Type: Fertiliser.Types.NO3N);
                1993-04-05  [Fertiliser].Apply(Amount: 81, Type: Fertiliser.Types.NO3N);
                1993-05-20  [Wheat].Harvest();
                1993-05-20  [Wheat].EndCrop();
              SurfaceOrganicMatter: InitialResidueName=wheat_stubble; InitialResidueType=wheat; InitialResidueMass=500; InitialStandingFraction=0; InitialCPR=0; InitialCNR=100
              Plant Wheat
              MicroClimate: a_interception=0; b_interception=1; c_interception=0; d_interception=0; SoilHeatFluxFraction=0.4; MinimumHeightDiffForNewLayer=0; NightInterceptionFraction=0.5; ReferenceHeight=2
              Operations IrrigationSchedule
              Report HarvestReport
              Report DailyReport
              Manager SetCO2
                CO2 = 0
```csharp
using Models.Soils;
using System.Xml.Serialization;
using Models;
using Models.PMF;
using System.Text;
using System.Collections.Generic;
using APSIM.Shared.Utilities;
using Models.Core;
using System;
using Models.Climate;

namespace Models
{
    [Serializable] 
    [System.Xml.Serialization.XmlInclude(typeof(Model))]
    public class Script : Model
    {
        [Link] Weather Met;
        [Link] Clock Clock;
        [Link] Zone zone;
    
        [Description("CO2 conc")]
        public double CO2 { get; set; }
    
        
        [EventSubscribe("PreparingNewWeatherData")]
        private void OnPreparingNewWeatherData(object sender, EventArgs e)
        {
            zone.Set("Weather.CO2", CO2);
        }
    }
}
```
              Report SupReport
                VariableNames:
                  [Clock].Today
                  ([Wheat].Leaf.Transpiration + [Soil].SoilWater.Es + [MicroClimate].PrecipitationInterception) as ET
                  sum([Soil].Water.MM[1:7]) as TopSoilWater
                EventNames:
                  [Clock].DoReport
              Report SowingReport
              DCaPSTModelNG DCaPST: same as Validation.SE Queensland.APS26.APS26NRate160WaterWet.paddock.DCaPST
            Manager LocationInfo
              Country =
              State =
              Region =
              script: same as in Validation.SE Queensland.APS26.APS26NRate160WaterWet.LocationInfo
        Experiment ArizonaFACE93
          Factors
            Permutation
              Factor CO2: same as Validation.NorthAmerica.Arizona.ArizonaFACE92.Factors.Permutation.CO2
              Factor Irr: Specification=[IrrigationSchedule]
                Operations Wet
                  1993-12-13  [Irrigation].Apply(amount:13);
                  1993-12-17  [Irrigation].Apply(amount:17);
                  1994-01-21  [Irrigation].Apply(amount:30);
                  1994-02-03  [Irrigation].Apply(amount:30);
                  1994-02-23  [Irrigation].Apply(amount:35);
                  1994-03-04  [Irrigation].Apply(amount:30);
                  1994-03-16  [Irrigation].Apply(amount:36);
                  1994-03-21  [Irrigation].Apply(amount:25);
                  1994-03-28  [Irrigation].Apply(amount:30);
                  1994-04-04  [Irrigation].Apply(amount:30);
                  1994-04-08  [Irrigation].Apply(amount:50);
                  1994-04-14  [Irrigation].Apply(amount:50);
                  1994-04-19  [Irrigation].Apply(amount:50);
                  1994-04-25  [Irrigation].Apply(amount:50);
                  1994-04-30  [Irrigation].Apply(amount:7);
                  1994-05-04  [Irrigation].Apply(amount:60);
                  1994-05-10  [Irrigation].Apply(amount:48);
                  1994-05-16  [Irrigation].Apply(amount:38);
                Operations Dry
                  1993-12-13  [Irrigation].Apply(amount:13);
                  1993-12-17  [Irrigation].Apply(amount:17);
                  1994-02-03  [Irrigation].Apply(amount:30);
                  1994-03-16  [Irrigation].Apply(amount:30);
                  1994-03-28  [Irrigation].Apply(amount:30);
                  1994-04-08  [Irrigation].Apply(amount:50);
                  1994-04-19  [Irrigation].Apply(amount:50);
                  1994-04-30  [Irrigation].Apply(amount:7);
                  1994-05-04  [Irrigation].Apply(amount:60);
          Simulation FACE93
            Clock: Start=1993-12-07; End=1994-05-31
            Summary summaryfile
            Weather: FileName=Met\Maricopa9394.met
            SoilArbitrator Soil Arbitrator
            Zone Field: Area=1; Slope=0; AspectAngle=0; Altitude=50
              Irrigation
              Fertiliser
              Soil: Latitude=0; Longitude=0
                Physical: same as Validation.NorthAmerica.Arizona.ArizonaFACE92.FACE92.Field.Soil.Physical
                WaterBalance SoilWater: SummerDate=1-Nov; SummerU=12; SummerCona=4; WinterDate=1-Apr; WinterU=6; WinterCona=2; DiffusConst=88; DiffusSlope=35.4; Salb=0.13; CN2Bare=60; CNRed=20; CNCov=0.8; DischargeWidth=0; CatchmentArea=0; PSIDul=-100
                  Thickness  SWCON  KLAT
                  50         0.34   0
                  100        0.34   0
                  150        0.34   0
                  200        0.34   0
                  100        0.34   0
                  100        0.34   0
                  200        0.3    0
                  200        0.25   0
                  100        0.25   0
                  100        0.25   0
                  200        0.2    0
                  200        0.2    0
                  200        0.18   0
                  200        0.18   0
                Organic: same as Validation.NorthAmerica.Arizona.ArizonaFACE92.FACE92.Field.Soil.Organic
                Chemical: PHUnits=Water
                  Thickness=[50, 100, 150, 200, 100, 100, 200, 200, 100, 100, 200, 200, 200, 200]
                  PH=[8.5, 8.5, 8.5, 8.6, 8.6, 8.6, 8.6, 8.6, 8.6, 8.6, 8.6, 8.6, 8.6, 8.6]
                Water: FilledFromTop=false
                  Thickness=[50, 100, 150, 200, 100, 100, 200, 200, 100, 100, 200, 200, 200, 200]
                  InitialValues=[0.302, 0.302, 0.302, 0.286, 0.217, 0.217, 0.186, 0.2, 0.199, 0.199, 0.197, 0.204, 0.208, 0.209]
                CERESSoilTemperature Temperature
                Nutrient
                Solute NO3: InitialValuesUnits=ppm; WaterTableConcentration=0; D0=0; DepthConstant=0; MaxDepthSoluteAccessible=0; RunoffEffectivenessAtMovingSolute=0; MaxEffectiveRunoff=0
                  Thickness=[50, 100, 150, 200, 100, 100, 200, 200, 100, 100, 200, 200, 200, 200]
                  InitialValues=[4.2, 4.2, 12, 10.6, 10.6, 3.4, 3.4, 3.4, 3.4, 3.4, 3.4, 3.4, 3.4, 3.4]
                Solute NH4: InitialValuesUnits=ppm; WaterTableConcentration=0; D0=0; DepthConstant=0; MaxDepthSoluteAccessible=0; RunoffEffectivenessAtMovingSolute=0; MaxEffectiveRunoff=0
                  Thickness=[50, 100, 150, 200, 100, 100, 200, 200, 100, 100, 200, 200, 200, 200]
                  InitialValues=[0.7, 0.7, 0.6, 0.3, 0.3, 0.2, 0.2, 0.2, 0.2, 0.2, 0.2, 0.2, 0.2, 0.2]
                Solute Urea: same as Validation.NorthAmerica.Arizona.ArizonaFACE92.FACE92.Field.Soil.Urea
              Operations Sowing
                1993-12-21  [Wheat].Sow(population: 186, cultivar: "Yecora", depth: 30, rowSpacing: 250);
                1993-12-07  [Fertiliser].Apply(Amount: 54, Type: Fertiliser.Types.NO3N);
                1993-12-08  [Fertiliser].Apply(Amount: 10, Type: Fertiliser.Types.NO3N);
                1994-02-04  [Fertiliser].Apply(Amount: 92, Type: Fertiliser.Types.NO3N);
                1994-02-05  [Fertiliser].Apply(Amount: 10, Type: Fertiliser.Types.NO3N);
                1994-03-16  [Fertiliser].Apply(Amount: 69, Type: Fertiliser.Types.NO3N);
                1994-03-17  [Fertiliser].Apply(Amount: 10, Type: Fertiliser.Types.NO3N);
                1994-04-08  [Fertiliser].Apply(Amount: 46, Type: Fertiliser.Types.NO3N);
                1994-05-31  [Wheat].Harvest();
                1994-05-31  [Wheat].EndCrop();
              SurfaceOrganicMatter: InitialResidueName=wheat_stubble; InitialResidueType=wheat; InitialResidueMass=500; InitialStandingFraction=0; InitialCPR=0; InitialCNR=100
              Plant Wheat
              MicroClimate: a_interception=0; b_interception=1; c_interception=0; d_interception=0; SoilHeatFluxFraction=0.4; MinimumHeightDiffForNewLayer=0; NightInterceptionFraction=0.5; ReferenceHeight=2
              Operations IrrigationSchedule
              Operations Dummy
              Report DailyReport
              Report HarvestReport
              Manager ClimateControl
                StartDate = 2013-04-01
                EndDate = 2014-05-01
                script: same as in Validation.New Zealand.Lincoln9192.LincolnBase.paddock.ClimateControl
              Manager SetCO2: same as Validation.NorthAmerica.Arizona.ArizonaFACE92.FACE92.Field.SetCO2
              Report SupReport
                VariableNames:
                  [Clock].Today
                  ([Wheat].Leaf.Transpiration + [Soil].SoilWater.Es + [MicroClimate].PrecipitationInterception) as ET
                  sum([Soil].Water.MM[1:7]) as TopSoilWater
                EventNames:
                  [Clock].DoReport
              Report SowingReport
              DCaPSTModelNG DCaPST: same as Validation.SE Queensland.APS26.APS26NRate160WaterWet.paddock.DCaPST
            Manager LocationInfo: same as Validation.NorthAmerica.Arizona.ArizonaFACE92.FACE92.LocationInfo
        Memo MemoDCaPST
          Observed that FACE95 & 96 are present in Classic APSIM but not ported to NextGen.
    Folder China
      Folder ChinaFlux
        Simulation Yucheng02
          Clock: Start=2002-10-01; End=2003-06-15
          Summary summaryfile
          Weather: FileName=Met\Yucheng.met
          SoilArbitrator Soil Arbitrator
          Zone Field: Area=1; Slope=0; AspectAngle=0; Altitude=50
            Irrigation
            Fertiliser
            Operations CropManagement
              2002-10-15  [Wheat].Sow(population:100, cultivar:"Keyu13", depth:30, rowSpacing:250);
              2002-10-15  [Fertiliser].Apply(Amount: 182.5, Type: Fertiliser.Types.NO3N);
            SurfaceOrganicMatter: InitialResidueName=wheat_stubble; InitialResidueType=wheat; InitialResidueMass=2000; InitialStandingFraction=0; InitialCPR=0; InitialCNR=100
            Plant Wheat
            MicroClimate: a_interception=0; b_interception=0; c_interception=0; d_interception=0; SoilHeatFluxFraction=0.4; MinimumHeightDiffForNewLayer=0; NightInterceptionFraction=0.5; ReferenceHeight=2
            Soil: SoilType=APS26Soil; LocalName=APS26Site; Site=APS26Site; NearestTown=Unknown; Region=Lawes; NaturalVegetation=Unknown; Latitude=0; Longitude=0
              Physical
                Thickness  BD    AirDry  LL15  DUL   SAT
                100        1.37  0.04    0.06  0.28  0.4
                100        1.5   0.04    0.08  0.32  0.4
                100        1.46  0.06    0.1   0.32  0.448
                100        1.42  0.06    0.15  0.3   0.45
                100        1.42  0.06    0.2   0.3   0.45
                100        1.41  0.06    0.25  0.32  0.46
                100        1.4   0.06    0.28  0.35  0.45
                100        1.41  0.1     0.28  0.35  0.45
                100        1.4   0.1     0.3   0.37  0.45
                100        1.46  0.1     0.28  0.41  0.449
                100        1.4   0.1     0.26  0.41  0.47
                100        1.49  0.1     0.32  0.4   0.43
                100        1.5   0.1     0.35  0.4   0.43
                100        1.46  0.1     0.37  0.4   0.44
                100        1.45  0.1     0.37  0.4   0.45
                SoilCrop WheatSoil
                  LL=[0.06, 0.08, 0.1, 0.15, 0.2, 0.25, 0.28, 0.28, 0.3, 0.28, 0.26, 0.32, 0.35, 0.37, 0.37]
                  KL=[0.06, 0.06, 0.06, 0.06, 0.06, 0.06, 0.06, 0.06, 0.06, 0.06, 0.06, 0.06, 0.06, 0.06, 0.06]
                  XF=[1, 1, 1, 1, 1, 0.8, 0.6, 0.4, 0.4, 0.4, 0.4, 0.4, 0.4, 0.4, 0.4]
              WaterBalance SoilWater: SummerDate=1-Nov; SummerU=4; SummerCona=2; WinterDate=1-Apr; WinterU=1; WinterCona=1; DiffusConst=40; DiffusSlope=16; Salb=0.13; CN2Bare=72; CNRed=20; CNCov=0.8; DischargeWidth=0; CatchmentArea=0; PSIDul=-100
                Thickness  SWCON  KLAT
                150        0.4    0
                150        0.4    0
                150        0.4    0
                150        0.4    0
                300        0.4    0
                300        0.4    0
                300        0.4    0
                300        0.4    0
                300        0.4    0
                300        0.4    0
              Organic: FOMCNRatio=40; CarbonUnits=Total
                Thickness  Carbon  SoilCNRatio  FBiom  FInert  FOM
                100        0.83    14.5         0.04   0.36    381.534
                100        0.35    14.5         0.03   0.35    312.374
                100        0.33    14.5         0.03   0.45    255.75
                100        0.22    14.5         0.02   0.45    209.39
                100        0.22    14.5         0.02   0.59    171.434
                100        0.22    14.5         0.02   0.6     140.358
                100        0.19    14.5         0.02   0.84    114.916
                100        0.17    14.5         0.02   0.8     94.0851
                100        0.15    14.5         0.01   0.8     77.0304
                100        0.12    14.5         0.01   0.99    63.0671
                100        0.11    14.5         0.01   0.99    51.635
                100        0.1     14.5         0.01   0.99    42.2752
                100        0.1     14.5         0.01   0.99    34.612
                100        0.1     14.5         0.01   0.99    28.3379
                100        0.1     14.5         0.01   0.99    23.2011
              Chemical: PHUnits=Water
                Thickness=[100, 100, 100, 100, 100, 100, 100, 100, 100, 100, 100, 100, 100, 100, 100]
                PH=[5.8, 5.9, 6.6, 6.8, 7, 7.1, 7.2, 7.3, 7.4, 7.4, 7.6, 7.8, 8, 8.2, 8.3]
              Water: FilledFromTop=false
                Thickness=[100, 100, 100, 100, 100, 100, 100, 100, 100, 100, 100, 100, 100, 100, 100]
                InitialValues=[0.27, 0.28, 0.23, 0.24, 0.26, 0.3, 0.3, 0.32, 0.35, 0.32, 0.32, 0.37, 0.39, 0.39, 0.39]
              CERESSoilTemperature Temperature
              Nutrient
              Solute NO3: InitialValues=[10, 15, 10, 8, 5, 2, 1, 1, 1, 1, 1, 1, 1, 1, 0]; InitialValuesUnits=ppm; WaterTableConcentration=0; D0=0; DepthConstant=0; MaxDepthSoluteAccessible=0; RunoffEffectivenessAtMovingSolute=0; MaxEffectiveRunoff=0
                Thickness=[100, 100, 100, 100, 100, 100, 100, 100, 100, 100, 100, 100, 100, 100, 100]
              Solute NH4: InitialValues=[1, 1, 1, 1, 1, 1, 1, 1, 1, 1, 1, 1, 1, 1, 0]; InitialValuesUnits=ppm; WaterTableConcentration=0; D0=0; DepthConstant=0; MaxDepthSoluteAccessible=0; RunoffEffectivenessAtMovingSolute=0; MaxEffectiveRunoff=0
                Thickness=[100, 100, 100, 100, 100, 100, 100, 100, 100, 100, 100, 100, 100, 100, 100]
              Solute Urea: InitialValues=[0, 0, 0, 0, 0, 0, 0, 0, 0, 0, 0, 0, 0, 0, 0]; InitialValuesUnits=kg/ha; WaterTableConcentration=0; D0=0; DepthConstant=0; MaxDepthSoluteAccessible=0; RunoffEffectivenessAtMovingSolute=0; MaxEffectiveRunoff=0
                Thickness=[100, 100, 100, 100, 100, 100, 100, 100, 100, 100, 100, 100, 100, 100, 100]
            Report DailyReport
            Report HarvestReport
            Manager Harvesting: same as Validation.SE Queensland.APS26.APS26NRate160WaterWet.paddock.Harvesting
            Report SowingReport
            DCaPSTModelNG DCaPST: same as Validation.SE Queensland.APS26.APS26NRate160WaterWet.paddock.DCaPST
          Manager LocationInfo: same as Validation.NorthAmerica.Arizona.ArizonaFACE92.FACE92.LocationInfo
        Simulation Yucheng03
          Clock: Start=2003-10-20; End=2004-06-15
          Summary summaryfile
          Weather: FileName=Met\Yucheng.met
          SoilArbitrator Soil Arbitrator
          Zone Field: Area=1; Slope=0; AspectAngle=0; Altitude=50
            Irrigation
            Fertiliser
            Operations CropManagement
              2003-10-23  [Wheat].Sow(population:100, cultivar:"Keyu13", depth:30, rowSpacing:250);
              2003-10-23  [Fertiliser].Apply(Amount: 215.3, Type: Fertiliser.Types.NO3N);
            SurfaceOrganicMatter: InitialResidueName=wheat_stubble; InitialResidueType=wheat; InitialResidueMass=2000; InitialStandingFraction=0; InitialCPR=0; InitialCNR=100
            Plant Wheat
            MicroClimate: a_interception=0; b_interception=0; c_interception=0; d_interception=0; SoilHeatFluxFraction=0.4; MinimumHeightDiffForNewLayer=0; NightInterceptionFraction=0.5; ReferenceHeight=2
            Soil: SoilType=APS26Soil; LocalName=APS26Site; Site=APS26Site; NearestTown=Unknown; Region=Lawes; NaturalVegetation=Unknown; Latitude=0; Longitude=0
              Physical: same as Validation.China.ChinaFlux.Yucheng02.Field.Soil.Physical
              WaterBalance SoilWater: same as Validation.China.ChinaFlux.Yucheng02.Field.Soil.SoilWater
              Organic: same as Validation.China.ChinaFlux.Yucheng02.Field.Soil.Organic
              Chemical: same as Validation.China.ChinaFlux.Yucheng02.Field.Soil.Chemical
              Water: FilledFromTop=false
                Thickness=[100, 100, 100, 100, 100, 100, 100, 100, 100, 100, 100, 100, 100, 100, 100]
                InitialValues=[0.2, 0.28, 0.3, 0.3, 0.31, 0.33, 0.35, 0.37, 0.4, 0.42, 0.42, 0.42, 0.41, 0.41, 0.41]
              CERESSoilTemperature Temperature
              Nutrient
              Solute NO3: same as Validation.China.ChinaFlux.Yucheng02.Field.Soil.NO3
              Solute NH4: same as Validation.China.ChinaFlux.Yucheng02.Field.Soil.NH4
              Solute Urea: same as Validation.China.ChinaFlux.Yucheng02.Field.Soil.Urea
            Report DailyReport
            Report HarvestReport
            Manager Harvesting: same as Validation.SE Queensland.APS26.APS26NRate160WaterWet.paddock.Harvesting
            Report SowingReport
            DCaPSTModelNG DCaPST: same as Validation.SE Queensland.APS26.APS26NRate160WaterWet.paddock.DCaPST
          Manager LocationInfo: same as Validation.NorthAmerica.Arizona.ArizonaFACE92.FACE92.LocationInfo
        Simulation Yucheng04
          Clock: Start=2004-10-13; End=2005-07-15
          Summary summaryfile
          Weather: FileName=Met\Yucheng.met
          SoilArbitrator Soil Arbitrator
          Zone Field: Area=1; Slope=0; AspectAngle=0; Altitude=50
            Irrigation
            Fertiliser
            Operations CropManagement
              2004-10-14  [Wheat].Sow(population:100, cultivar:"Keyu13", depth:30, rowSpacing:250);
              2004-10-14  [Fertiliser].Apply(Amount: 195.5, Type: Fertiliser.Types.NO3N);
            SurfaceOrganicMatter: InitialResidueName=wheat_stubble; InitialResidueType=wheat; InitialResidueMass=2000; InitialStandingFraction=0; InitialCPR=0; InitialCNR=100
            Plant Wheat
            MicroClimate: a_interception=0; b_interception=0; c_interception=0; d_interception=0; SoilHeatFluxFraction=0.4; MinimumHeightDiffForNewLayer=0; NightInterceptionFraction=0.5; ReferenceHeight=2
            Soil: SoilType=APS26Soil; LocalName=APS26Site; Site=APS26Site; NearestTown=Unknown; Region=Lawes; NaturalVegetation=Unknown; Latitude=0; Longitude=0
              Physical: same as Validation.China.ChinaFlux.Yucheng02.Field.Soil.Physical
              WaterBalance SoilWater: same as Validation.China.ChinaFlux.Yucheng02.Field.Soil.SoilWater
              Organic: same as Validation.China.ChinaFlux.Yucheng02.Field.Soil.Organic
              Chemical: same as Validation.China.ChinaFlux.Yucheng02.Field.Soil.Chemical
              Water: FilledFromTop=false
                Thickness=[100, 100, 100, 100, 100, 100, 100, 100, 100, 100, 100, 100, 100, 100, 100]
                InitialValues=[0.17, 0.26, 0.27, 0.27, 0.28, 0.31, 0.34, 0.35, 0.37, 0.4, 0.4, 0.39, 0.39, 0.39, 0.39]
              CERESSoilTemperature Temperature
              Nutrient
              Solute NO3: same as Validation.China.ChinaFlux.Yucheng02.Field.Soil.NO3
              Solute NH4: same as Validation.China.ChinaFlux.Yucheng02.Field.Soil.NH4
              Solute Urea: same as Validation.China.ChinaFlux.Yucheng02.Field.Soil.Urea
            Report DailyReport
            Report HarvestReport
            Manager Harvesting: same as Validation.SE Queensland.APS26.APS26NRate160WaterWet.paddock.Harvesting
            Report SowingReport
            DCaPSTModelNG DCaPST: same as Validation.SE Queensland.APS26.APS26NRate160WaterWet.paddock.DCaPST
          Manager LocationInfo: same as Validation.NorthAmerica.Arizona.ArizonaFACE92.FACE92.LocationInfo
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