Simulations: Version=117
  Memo TitlePage
    # The APSIM Eucalyptus Model
  Memo Introduction
    # Eucalyptus Model Notes

    ## Plant Modelling Framework

    The APSIM Eucalyptus model has been developed using the Plant Modelling Framework (PMF) of [brown_plant_2014] within  APSIM Next Generation [holzworth_apsim_2014]. This new framework provides a library of plant organ and process submodels that can be coupled, at runtime, to construct a model in much the same way that models can be coupled to construct a simulation. This means that dynamic composition of lower level processes and organ classes (e.g. photosynthesis, leaf) into larger constructions (e.g. maize, wheat, eucalyptus) can be achieved by the model developer without additional coding.

    ##Pecularities of Eucalyptus and This Model

    The Eucalyptus model consists of:

    * a phenology model to simulate development through sequential growth phases
    * a collection of organs to simulate the various plant parts
    * an arbitrator to allocate resources (N, biomass) to the various plant organs

    This work builds upon earlier APSIM forest models such as described by [Huthetal2002],[zerger_integrating_2001] and [huth_managing_2008].

    Eucalyptus is a reasonably straight forward perennial crop to model. This model has been set up for simulation of even-aged plantations (transplanted seedlings) or native forests (also assumed to start the simulation as a transplanted seedling, but in practice it would be sown from naturally distributed seed). Plants grow in accordance with available resources and conditions, which in this version of the model are temperature, radiation, available soil water, and available soil nitrogen. Leaf, branch and roots senesce, remain attached for some time, then detach to produce litter. Above-ground biomass is the main target of production, which is made up of organs that develop from default partitioniing targets that is modified daily due to organ demand. Forest managers also deal with tree size, which are set in the model as a function of aboveground biomass. During model development, we found that Eucalyptus model performance (plant or stand development) was particularly sensitive to leaf lifespan/longevity, specific leaf area, dead leaf detachment, partitioning to roots and shoots, mortality and thinning, and weeds (if present).

    There are many Eucalyptus genotypes (species, closely related genera, provenances, families, clones, and hybrids) that can behave differently in response to their growing environment. This build of the Eucalyptus model was calbirated on datasets of three species (E. globulus, E. saligna, E. grandis), one hybrid (E. grandis x E. urophylla), and two clones of this hybrid.

    ##Including a Eucalyptus crop in an APSIM simulation

    There is a Eucalyptus example simulation available by clicking the "Open an Example" icon available on the second tab displayed when APSIM Next Gen is opened.  This provides a useful demonstration of how to simulate a Eucalyptus crop and provides some useful graphs for viewing model behaviour and performance.

    To incluce a Eucalyptus crop in a simulation the "Eucalyptus" model needs to be added to the paddock, field or zone in which it is to be grown.  This can be done by (a) right clicking on the "Paddock", selecting "Add" from the drop down menu and then selecting "Eucalyptus" from the list that comes up, or (b) dragging or copying and pasting the model up from the standard toolbox.  A TreeSowingRule needs to be set up to start the crop off. So far, no harvesting or replanting is included in this simulation, but that option will be needed in the future, e.g. for simulation of multiple rotations.

    This document elsewhere provides a more detailed description of the model, describes the validation and test datasets, and model performance.
  Replacements
    Report: EventNames=[Clock].DoReport
      VariableNames:
        [Clock].Today
        [Eucalyptus].Age
        [Eucalyptus].Population*10000 as Stemsperha
        [Eucalyptus].AboveGround.Wt
        [Eucalyptus].BelowGround.Wt
        [Eucalyptus].Leaf.Dead.Wt
        [Eucalyptus].Leaf.Live.Wt
        [Eucalyptus].Branch.Live.Wt
        [Eucalyptus].Leaf.Detached.Wt
        [Eucalyptus].Stem.Live.Wt
        [Eucalyptus].Total.N
        [Eucalyptus].Leaf.Live.N
        [Eucalyptus].Wood.Wt
        [Eucalyptus].Leaf.CoverGreen
        [Eucalyptus].Leaf.LAI
        [Eucalyptus].TotalLive.Wt
        [Eucalyptus].IndividualTreeLiveWt
        [Eucalyptus].IndividualTreeStemWt
        [Eucalyptus].Stem.DBH
        [Eucalyptus].Stem.Ht
        [Eucalyptus].RootShootRatio
        [Eucalyptus].Stem.Vol
        [Eucalyptus].Stem.MAI
        [Eucalyptus].Stem.BA
        [Eucalyptus].Stem.BarkThickness
        [Eucalyptus].Stem.BarkWt
        [Eucalyptus].Stem.BAub
        [Eucalyptus].Stem.DBHub
        [Eucalyptus].Stem.MAIub
        [Eucalyptus].Stem.VolBark
        [Eucalyptus].Stem.Volub
        [Eucalyptus].Stem.WoodDensity
        [Eucalyptus].Stem.WoodWt
        [Eucalyptus].Fruit.Wt
        [Soil].SoilWater.SW[1] as SWD1
        [Soil].SoilWater.SW[2] as SWD2
        [Soil].SoilWater.SW[3] as SWD3
        [Soil].SoilWater.SW[4] as SWD4
        [Soil].SoilWater.SW[5] as SWD5
        [Soil].SoilWater.SW[6] as SWD6
        [Soil].SoilWater.SW[7] as SWD7
        [Soil].SoilWater.SW[8] as SWD8
        sum([Soil].SoilWater.SWmm) as SWTotal
        //[SoilNitrogen].NO3ppm
        //[SoilNitrogen].NH4ppm
        //[SoilNitrogen].NO3.kgha
        [SoilNitrogen].NH4.kgha[1]
        //([SoilNitrogen].NO3.kgha)+([SoilNitrogen].NH4.kgha) as MineralNkgpha
        //([SoilNitrogen].NO3.kgha[1]*1000000/14)/([Soil].SoilWater.SW[1]*1000000) as NO3mMD1
        //([SoilNitrogen].NO3.kgha[2]*1000000/14)/([Soil].SoilWater.SW[2]*1000000) as NO3mMD2
        //([SoilNitrogen].NO3.kgha[3]*1000000/14)/([Soil].SoilWater.SW[3]*1000000) as NO3mMD3
        //([SoilNitrogen].NH4.kgha[1]*1000000/14)/([Soil].SoilWater.SW[1]*1000000) as NH4mMD1
        //([SoilNitrogen].NH4.kgha[2]*1000000/14)/([Soil].SoilWater.SW[2]*1000000) as NH4mMD2
        //([SoilNitrogen].NH4.kgha[3]*1000000/14)/([Soil].SoilWater.SW[3]*1000000) as NH4mMD3
    Report SensibilityReport: EventNames=[Clock].EndOfWeek
      VariableNames:
        [Clock].Today
        [Eucalyptus].Leaf.CoverGreen
        [Eucalyptus].Age
        [Eucalyptus].Stem.DBH
        [Eucalyptus].Stem.Ht
        [Eucalyptus].Stem.Vol
        [Eucalyptus].Stem.MAI
    Report HarvestReport: EventNames=[Eucalyptus].Harvesting
      VariableNames:
        [Clock].Today
        [Eucalyptus].Stem.DBH
        [Eucalyptus].Stem.Ht
        [Eucalyptus].RootShootRatio
        [Eucalyptus].Stem.Vol
        [Eucalyptus].Stem.MAI
        [Eucalyptus].Stem.BA
        [Eucalyptus].Stem.BarkThickness
        [Eucalyptus].Stem.BarkWt
        [Eucalyptus].Stem.BAub
        [Eucalyptus].Stem.DBHub
        [Eucalyptus].Stem.MAIub
        [Eucalyptus].Stem.VolBark
        [Eucalyptus].Stem.Volub
        [Eucalyptus].Stem.WoodDensity
    Report SCRUMReport: EventNames=[Clock].DoReport
      VariableNames:
        [Clock].Today
        [SCRUM].Stover.LAI
        [SCRUM].Stover.Wt
    Plant Eucalyptus: PlantType=Eucalyptus; IsAlive=false; IsEnding=false; DaysAfterEnding=0
      Memo
        Root:shoot ratio, and allometric relationships for height (Ht, m), stem diameter (DBH, cm, over bark at 1.3 m height), and their derivatives (stem volume Vol, and mean annual increment MAI) were developed as a function of above-ground biomass from [almeida2003application], [almeida2004parameterisation], [borges2009parametrizaccao], [cromer1993response], and [norgueira2005estadonutricional]. Similarly, above-ground biomass as a function of stem weight or wood weight was developed from the same datasets plus [turner1986organic], [byrne1989above], [bradstock1981biomass], [polglase1995mineralization], [snow1999nitrogen], [snow1999modelling], [myers1996growth], [myers1998response], and [melo2015responses].
      AccumulateFunction Age: StartStageName=Emergence; EndStageName=Old; FractionRemovedOnCut=0; FractionRemovedOnHarvest=0; FractionRemovedOnGraze=0; FractionRemovedOnPrune=0
        Constant day: FixedValue=0.00273973; Units=years
          Memo
            This converts days of growth to age in years.
      Phenology
        StageBasedInterpolation StageCode: Stages=[Emergence, EndJuvenile, Maturity, Old]; Codes=[1, 2, 3, 4]; Proportional=true
        Constant ThermalTime: FixedValue=1; Units=^od
        GerminatingPhase Germinating: Start=Sowing; End=Germination
          Memo
            We make no distinction between sowing and transplanting in this model, but all sites used transplants not sown seeds. Initial weights are specified for leaf (1 g/plant) and fine root (0.2 g/plant), which implies these are transplants. Germinating and emerging phenology phases are included in case they are needed by later users. No planting shock is included, but this could be considered in future versions, e.g. delay in commencement of root downward growth.
        EmergingPhase Emerging: ShootLag=1; ShootRate=0; Start=Germination; End=Emergence; TTForTimeStep=0
          VariableReference ThermalTime: VariableName=[Phenology].ThermalTime
        GenericPhase Juvenile: Start=Emergence; End=EndJuvenile
          Constant Progression: FixedValue=1; Units=^od
          Constant Target: FixedValue=365; Units=^o
        GenericPhase Mature: Start=EndJuvenile; End=Maturity
          Constant Progression: FixedValue=1; Units=^od
          Constant Target: FixedValue=1825; Units=^o
        GenericPhase Declining: Start=Maturity; End=Old
          Constant Progression: FixedValue=1; Units=^od
          Constant Target: FixedValue=27010; Units=^o
        EndPhase Old: Start=Old; End=Unused
          Constant ThermalTime: FixedValue=1; Units=^od
      OrganArbitrator Arbitrator
        BiomassTypeArbitrator DMArbitration
          Folder PotentialPartitioningMethods
            ReallocationMethod
            AllocateFixationMethod
            RetranslocationMethod
            SendPotentialDMAllocationsMethod
          Folder AllocationMethods
            NutrientConstrainedAllocationMethod
            DryMatterAllocationsMethod
          RelativeAllocation ArbitrationMethod
        BiomassTypeArbitrator NArbitration
          Folder PotentialPartitioningMethods
            ReallocationMethod
          Folder ActualPartitioningMethods
            AllocateFixationMethod
            RetranslocationMethod
          Folder AllocationMethods
            NitrogenAllocationsMethod
          RelativeAllocation ArbitrationMethod
          AllocateUptakesMethod
        WaterUptakeMethod
        NitrogenUptakeMethod
      CompositeBiomass AboveGround: DMDOfStructural=0.6
        Propertys=[[Branch].Live, [Branch].Dead, [Leaf].Live, [Leaf].Dead, [Stem].Live, [Stem].Dead, [Fruit].Live, [Fruit].Dead]
      CompositeBiomass BelowGround: DMDOfStructural=0.6
        Propertys=[[FineRoot].Live, [FineRoot].Dead, [CoarseRoot].Live, [CoarseRoot].Dead]
      CompositeBiomass Wood: Propertys=[[Stem].Live, [Stem].Dead, [Branch].Live, [Branch].Dead]; DMDOfStructural=0.6
      CompositeBiomass Total: DMDOfStructural=0.6
        Propertys=[[Leaf].Live, [Leaf].Dead, [Stem].Live, [Stem].Dead, [Branch].Live, [Branch].Dead, [FineRoot].Live, [FineRoot].Dead, [CoarseRoot].Live, [CoarseRoot].Dead]
        Memo
          Note that this  property does not include branches.
      CompositeBiomass TotalLive: DMDOfStructural=0.6
        Propertys=[[Leaf].Live, [Branch].Live, [Stem].Live, [FineRoot].Live, [CoarseRoot].Live, [Fruit].Live]
        Memo
          Note that this  property does not include branches, and it is used to calculate IndividualTreeLiveWt.
      CompositeBiomass TotalDead: DMDOfStructural=0.6
        Propertys=[[Leaf].Dead, [Branch].Dead, [Stem].Dead, [FineRoot].Dead, [CoarseRoot].Dead, [Fruit].Dead]
        Memo
          Note that this  property does not include branches.
      DivideFunction IndividualTreeLiveWt
        VariableReference LiveWt: VariableName=[Eucalyptus].TotalLive.Wt
        VariableReference Population: VariableName=[Eucalyptus].Population
        Memo
          Note that this  property does not include branches. It is used in calculating DM Demands of several plant components.
      DivideFunction IndividualTreeStemWt
        VariableReference LiveWt: VariableName=[Eucalyptus].Stem.Wt
        VariableReference Population: VariableName=[Eucalyptus].Population
      GenericOrgan Fruit: IsAboveGround=true
        Memo
          For many of the parameters in this organ, see comments for similar parameters in the leaf organ.
        Constant NReallocationFactor: FixedValue=0; Units=/d
        Constant NRetranslocationFactor: FixedValue=0.05; Units=/d
        PhaseBasedSwitch NitrogenDemandSwitch: Start=Emergence; End=Old
        Constant DMRetranslocationFactor: FixedValue=0; Units=/d
        Constant SenescenceRate: FixedValue=0; Units=/d
        Constant MaximumNConc: FixedValue=0.01; Units=g/g
        Constant MinimumNConc: FixedValue=0.0014; Units=g/g
        Constant DetachmentRateFunction: FixedValue=0.05; Units=/d
        Constant MaintenanceRespirationFunction: FixedValue=0; Units=0-1
        Constant DMConversionEfficiency: FixedValue=1; Units=0-1
        RetranslocateNonStructural RetranslocateNitrogen
        BiomassRemoval BiomassRemovalDefaults
          OrganBiomassRemovalType Harvest: FractionLiveToRemove=0; FractionDeadToRemove=0; FractionLiveToResidue=1; FractionDeadToResidue=1
          OrganBiomassRemovalType Cut: FractionLiveToRemove=1; FractionDeadToRemove=0; FractionLiveToResidue=0; FractionDeadToResidue=0
          OrganBiomassRemovalType Prune: FractionLiveToRemove=0; FractionDeadToRemove=0; FractionLiveToResidue=0.6; FractionDeadToResidue=0
          OrganBiomassRemovalType Thin: FractionLiveToRemove=0; FractionDeadToRemove=0; FractionLiveToResidue=0.05; FractionDeadToResidue=0
        Constant DMReallocationFactor: FixedValue=0; Units=/d
        VariableReference CriticalNConc: VariableName=[Fruit].MinimumNConc
        Constant RemobilisationCost: FixedValue=0
        Constant CarbonConcentration: FixedValue=0.45; Units=g/g
        BiomassDemand DMDemands
          Memo
            DM or N demands here are set in a similar way to those described above for the leaf organ.
          MultiplyFunction Structural
            PartitionFractionDemandFunction DMDemandFunction
              LinearInterpolationFunction PartitionFraction
                XYPairs: X=[0, 1000, 10000, 20000, 50000]; Y=[0, 0.002, 0.003, 0.001, 0.0005]
                VariableReference XValue: VariableName=[Eucalyptus].IndividualTreeLiveWt
            Constant StructuralFraction: FixedValue=0.99; Units=0-1
          Constant Metabolic: FixedValue=0
          StorageDMDemandFunction Storage
            SubtractFunction StorageFraction
              Constant One: FixedValue=1
              VariableReference StructuralFraction: VariableName=[Fruit].DMDemands.Structural.StructuralFraction
        BiomassDemand NDemands
          Memo
            DM or N demands here are set in a similar way to those described above for the leaf organ.
          MultiplyFunction Structural
            VariableReference MinNconc: VariableName=[Fruit].minimumNconc
            VariableReference PotentialDMAllocation: VariableName=[Fruit].potentialDMAllocation.Structural
          MultiplyFunction Metabolic
            SubtractFunction MetabolicNconc
              VariableReference CritNconc: VariableName=[Fruit].criticalNConc
              VariableReference MinNconc: VariableName=[Fruit].minimumNconc
            VariableReference PotentialDMAllocation: VariableName=[Fruit].potentialDMAllocation.Structural
          StorageNDemandFunction Storage
            VariableReference NitrogenDemandSwitch: VariableName=[Fruit].nitrogenDemandSwitch
            VariableReference MaxNconc: VariableName=[Fruit].maximumNconc
        BiomassDemand InitialWt
          Constant Structural: FixedValue=0; Units=g
          Constant Metabolic: FixedValue=0
          Constant Storage: FixedValue=0
      PerennialLeaf Leaf: MaintenanceRespiration=0; GrowthRespiration=0; Albedo=0.15; Gsmax350=0.005; R50=200; LAI=0; Height=0; FRGR=0; PotentialEP=0; WaterDemand=0
        ExpressionFunction CO2internal: Expression=(163 - [IWeather].MeanT)/(5 - 0.1*[IWeather].MeanT)
        DivideFunction StomatalConductanceCO2Modifier
          VariableReference FCO2: VariableName=[Leaf].Photosynthesis.FCO2
          ExpressionFunction RelativeCO2Gradient
            Expression=([IWeather].CO2 - [Leaf].CO2internal)/(350 - [Leaf].CO2internal)
        MultiplyFunction InitialWtFunction
          Constant InitialPlantWt: FixedValue=1; Units=g/plant
            Memo
              This value is nominally low to reflect the dry weight of leaves on a transplanted seedling.
          VariableReference Population: VariableName=[Plant].Population
        Constant LaiDeadFunction: FixedValue=0; Units=m^2/m^2
        MinimumFunction FRGRFunction
          HourlyInterpolation FRGRFunctionTemp: agregationMethod=0
            XYPairs Response: X=[5, 20, 25, 35]; Y=[0, 0, 0, 0]
              Memo
                This is an assumed temperature response function.
            ThreeHourSin InterpolationMethod
        ExpressionFunction ExtinctionCoefficient
          Expression=([ExtinctionCoefficient].KMatureTrees+([ExtinctionCoefficient].KYoungTrees-[ExtinctionCoefficient].KMatureTrees)*Exp((0-2)*([Eucalyptus].Leaf.LAI/[ExtinctionCoefficient].LAIIntermediateK)^[ExtinctionCoefficient].ShapeCurve))
          Constant KYoungTrees: FixedValue=0.5
          Constant KMatureTrees: FixedValue=0.5
          Constant LAIIntermediateK: FixedValue=0.7
          Constant ShapeCurve: FixedValue=2
          Memo
            A value of 0.50 is commonly used for Eucalyptus ([macfarlane2007estimation]).
        Constant ExtinctionCoefficientDead: FixedValue=0.5
        Constant MaximumNConc: FixedValue=0.03; Units=g/g
          Memo
            Foliar N concentrations are based on [leuning1991spatial].
        Constant MinimumNConc: FixedValue=0.01; Units=g/g
          Memo
            This is an assumed value.
        Constant NReallocationFactor: FixedValue=0; Units=/d
          Memo
            A value of zero assumes there is no N reallocation.
        WeightedTemperatureFunction SenescenceRate: MaximumTemperatureWeighting=0
          XYPairs: X=[-5, -2, 0, 2, 2.1]; Y=[0, 0, 0, 0, 0]
        BiomassRemoval BiomassRemovalDefaults
          OrganBiomassRemovalType Harvest: FractionLiveToRemove=0; FractionDeadToRemove=0; FractionLiveToResidue=0.99; FractionDeadToResidue=0.99
          OrganBiomassRemovalType Cut: FractionLiveToRemove=0.8; FractionDeadToRemove=0; FractionLiveToResidue=0; FractionDeadToResidue=0
          OrganBiomassRemovalType Prune: FractionLiveToRemove=0; FractionDeadToRemove=0; FractionLiveToResidue=0.6; FractionDeadToResidue=0
          Memo
            Values in this table reflect the live and dead fractions that are either removed from the system or transferred to the residue pool. Harvest, Cut and Prune methods will affect these values, but default values assume for Harvest assume delimbing at the stump.
        Constant DMConversionEfficiency: FixedValue=1; Units=g/g
        Constant LeafDetachmentTime: FixedValue=14; Units=d
          Memo
            A value here is the number of days between senseence and detachment. A value of 14 days is assumed.
        Constant DetachmentRateFunction: FixedValue=0; Units=/d
          Memo
            A value for DetachmentRateFunction is required in Leaf, Branch, Stem and CoarseRoot components of the model, but a zero value means that immediate detachment has been triggered. A non-zero option might be useful in the future for defining some genotypes.

            The same explanation applies to zero values below for retranslocation factors.
        Constant DMRetranslocationFactor: FixedValue=0; Units=/d
        Constant NRetranslocationFactor: FixedValue=0; Units=/d
        RUEModel Photosynthesis
          Constant RUE: FixedValue=1.4; Units=g/MJ
            Memo
              Aboveground RUE for Gliricidia was measured as 1.06 g/MJ by [harrington1995radiation]. Adding c. 0.3 for belowground allocation provides a value of 1.4 g/MJ.
          MinimumFunction FT
            WeightedTemperatureFunction FTDaytime: MaximumTemperatureWeighting=0.75
              XYPairs: X=[5, 20, 25, 35]; Y=[0, 1, 1, 0]
            WeightedTemperatureFunction FTFrost: MaximumTemperatureWeighting=0
              XYPairs: X=[-5, 0, 2]; Y=[1, 1, 1]
          LinearInterpolationFunction FVPD
            XYPairs: X=[0, 10, 50]; Y=[1, 1, 0]
            VariableReference XValue: VariableName=[Leaf].Photosynthesis.VPD
          LinearInterpolationFunction FN
            XYPairs: X=[0, 1, 1.5]; Y=[0, 1, 1]
            VariableReference XValue: VariableName=[Leaf].Fn
          LinearInterpolationFunction FW
            XYPairs: X=[0, 1, 1.5]; Y=[0, 1, 1]
            VariableReference XValue: VariableName=[Leaf].Fw
          RUECO2Function FCO2: PhotosyntheticPathway=C3
          VariableReference RadnInt: VariableName=[Leaf].RadIntTot
        Constant LeafKillFraction: FixedValue=0; Units=0-1
          Memo
            A value of zero assumes that no leaves are killed initially, but this value could be reset in an Operation to reflect, for example, an insect browsing attack, frost kill of foliage, or a pruning operation that removes leaves.
        Constant MinimumLAI: FixedValue=0.01; Units=m^2/m^2
        MultiplyFunction SpecificLeafAreaFunction
          LinearInterpolationFunction SpecificLeafAreaPot
            XYPairs: X=[0, 1, 2, 3, 8]; Y=[0.016, 0.0105, 0.0089, 0.0085, 0.0073]
            Memo
              Data for SLA (m^2/g)came from Medhurst and Beadle (2001) and Gonzalez-Garcia et al (2016). Values and trends were similar. A generalised pattern should suffice for many applicatinos, but cultivar-specific patterns are available for some cultivars and could be used to slighly refine their simulation. These data are also similar to those in [rance2014assessment].
            VariableReference XValue: VariableName=[Eucalyptus].Age
          LinearInterpolationFunction CO2Modifier
            XYPairs: X=[350, 850]; Y=[1, 0.8]
            VariableReference XValue: VariableName=[IWeather].CO2
        LinearInterpolationFunction LeafResidenceTime
          XYPairs: X=[0, 1, 2, 3, 8]; Y=[100, 140, 180, 220, 280]
          Memo
            This function specifies that lead residence time increases with age. Values are based on [laclau2009influence].
          VariableReference XValue: VariableName=[Eucalyptus].Age
        MultiplyFunction LeafDevelopmentRate
          Constant LDR: FixedValue=1; Units=0-1
          WeightedTemperatureFunction FT: MaximumTemperatureWeighting=1
            XYPairs: X=[10, 26, 33, 34]; Y=[0, 1, 1, 0]
              Memo
                This is an assumed and tuned function of leaf development rate in relation to weighted air temperature.
        Constant CarbonConcentration: FixedValue=0.45; Units=g/g
          Memo
            This value is based on [ribeiro2015aboveground].
        ExpressionFunction HeightFunction: Expression=[Stem].Ht*1000
          Memo
            This converts stem height in m to mm for use else where in the model.
        BiomassDemand DMDemands
          Memo
            DM demands are set in a similar ways for each organ, but with different values: structural (default specified), metabolic (value = 0), and storage functions (1 - structural). Values measured range from about 5 to 50% for eucalyptus leaves ([quentin2015non]), which also covers the range of 1-20% for other species and plant parts ([hoch2003non]). Metabolic demand is set to zero, because RUE is a value for net growth for which a respiration calculation is not needed. These values may become an important focus if one attempts to use the model for coppicing, as is already the case in several other APSIM models, e.g. lucerne and gliricidia.
          MultiplyFunction Structural
            PartitionFractionDemandFunction DMDemandFunction
              LinearInterpolationFunction PartitionFraction
                XYPairs: X=[0, 1000, 10000]; Y=[0.19, 0.19, 0.2]
                VariableReference XValue: VariableName=[Eucalyptus].IndividualTreeLiveWt
            Constant StructuralFraction: FixedValue=0.99; Units=0-1
          Constant Metabolic: FixedValue=0
          Constant Storage: FixedValue=0
        BiomassDemand NDemands
          Memo
            N demands are set in a similar ways to DM demands, which are described above.
          MultiplyFunction Structural
            VariableReference MinNconc: VariableName=[Leaf].minimumNconc
            VariableReference PotentialDMAllocation: VariableName=[Leaf].potentialDMAllocation.Structural
          Constant Metabolic: FixedValue=0
          StorageNDemandFunction Storage
            VariableReference MaxNconc: VariableName=[Leaf].MaximumNconc
            Constant NitrogenDemandSwitch: FixedValue=1
      GenericOrgan Branch: IsAboveGround=true
        Memo
          For many of the parameters in this organ, see comments for similar parameters in the leaf organ.
        Constant NReallocationFactor: FixedValue=0; Units=/d
        Constant NRetranslocationFactor: FixedValue=0.05; Units=/d
        PhaseBasedSwitch NitrogenDemandSwitch: Start=Emergence; End=Old
        Constant DMRetranslocationFactor: FixedValue=0; Units=/d
        Constant SenescenceRate: FixedValue=0; Units=/d
        Constant MaximumNConc: FixedValue=0.01; Units=g/g
        Constant MinimumNConc: FixedValue=0.0014; Units=g/g
        Constant DetachmentRateFunction: FixedValue=0; Units=/d
        Constant MaintenanceRespirationFunction: FixedValue=0; Units=0-1
        Constant DMConversionEfficiency: FixedValue=1; Units=0-1
        BiomassRemoval BiomassRemovalDefaults
          OrganBiomassRemovalType Harvest: FractionLiveToRemove=0; FractionDeadToRemove=0; FractionLiveToResidue=1; FractionDeadToResidue=1
          OrganBiomassRemovalType Cut: FractionLiveToRemove=0.8; FractionDeadToRemove=0; FractionLiveToResidue=0; FractionDeadToResidue=0
          OrganBiomassRemovalType Prune: FractionLiveToRemove=0; FractionDeadToRemove=0; FractionLiveToResidue=0.6; FractionDeadToResidue=0
          OrganBiomassRemovalType Thin: FractionLiveToRemove=0; FractionDeadToRemove=0; FractionLiveToResidue=0.05; FractionDeadToResidue=0
        Constant DMReallocationFactor: FixedValue=0; Units=/d
        VariableReference CriticalNConc: VariableName=[Branch].MinimumNConc
        Constant RemobilisationCost: FixedValue=0
        Constant CarbonConcentration: FixedValue=0.45; Units=g/g
        BiomassDemand DMDemands
          Memo
            DM or N demands here are set in a similar way to those described above for the leaf organ.
          MultiplyFunction Structural
            PartitionFractionDemandFunction DMDemandFunction
              LinearInterpolationFunction PartitionFraction
                XYPairs: X=[0, 1000, 10000]; Y=[0.06, 0.06, 0.06]
                VariableReference XValue: VariableName=[Eucalyptus].IndividualTreeLiveWt
            Constant StructuralFraction: FixedValue=0.99; Units=0-1
          Constant Metabolic: FixedValue=0
          StorageDMDemandFunction Storage
            SubtractFunction StorageFraction
              Constant One: FixedValue=1
              VariableReference StructuralFraction: VariableName=[Branch].DMDemands.Structural.StructuralFraction
        BiomassDemand NDemands
          Memo
            DM or N demands here are set in a similar way to those described above for the leaf organ.
          MultiplyFunction Structural
            VariableReference MinNconc: VariableName=[Branch].minimumNconc
            VariableReference PotentialDMAllocation: VariableName=[Branch].potentialDMAllocation.Structural
          MultiplyFunction Metabolic
            SubtractFunction MetabolicNconc
              VariableReference CritNconc: VariableName=[Branch].criticalNConc
              VariableReference MinNconc: VariableName=[Branch].minimumNconc
            VariableReference PotentialDMAllocation: VariableName=[Branch].potentialDMAllocation.Structural
          StorageNDemandFunction Storage
            VariableReference NitrogenDemandSwitch: VariableName=[Branch].nitrogenDemandSwitch
            VariableReference MaxNconc: VariableName=[Branch].maximumNconc
        RetranslocateNonStructural RetranslocateNitrogen
        BiomassDemand InitialWt
          Constant Structural: FixedValue=0; Units=g
          Constant Metabolic: FixedValue=0
          Constant Storage: FixedValue=0
      GenericOrgan Stem: IsAboveGround=true
        BiomassDemand InitialWt
          Constant Structural: FixedValue=0; Units=g
          Constant Metabolic: FixedValue=0
          Constant Storage: FixedValue=0
        Memo
          For many of the parameters in this organ, see comments for similar parameters in the leaf organ.
        Constant NReallocationFactor: FixedValue=0; Units=/d
        Constant NRetranslocationFactor: FixedValue=0.05; Units=/d
        PhaseBasedSwitch NitrogenDemandSwitch: Start=Emergence; End=Old
        Constant DMRetranslocationFactor: FixedValue=0; Units=/d
        Constant SenescenceRate: FixedValue=0; Units=/d
        Constant MaximumNConc: FixedValue=0.01; Units=g/g
          Memo
            Branch, stem and coarse root minimum N concentrations are based on [raymond2000effect].
        Constant MinimumNConc: FixedValue=0.0014; Units=g/g
        Constant DetachmentRateFunction: FixedValue=0; Units=/d
        Constant MaintenanceRespirationFunction: FixedValue=0; Units=0-1
        Constant DMConversionEfficiency: FixedValue=1; Units=0-1
        BiomassRemoval BiomassRemovalDefaults
          OrganBiomassRemovalType Harvest: FractionLiveToRemove=1; FractionDeadToRemove=1; FractionLiveToResidue=0; FractionDeadToResidue=0
          OrganBiomassRemovalType Cut: FractionLiveToRemove=0.8; FractionDeadToRemove=0; FractionLiveToResidue=0; FractionDeadToResidue=0
          OrganBiomassRemovalType Prune: FractionLiveToRemove=0; FractionDeadToRemove=0; FractionLiveToResidue=0.6; FractionDeadToResidue=0
          OrganBiomassRemovalType Thin: FractionLiveToRemove=0; FractionDeadToRemove=0; FractionLiveToResidue=0.05; FractionDeadToResidue=0
        Constant DMReallocationFactor: FixedValue=0; Units=/d
        VariableReference CriticalNConc: VariableName=[Stem].MinimumNConc
        Constant CarbonConcentration: FixedValue=0.45; Units=g/g
        Constant RemobilisationCost: FixedValue=0
        ExpressionFunction DBH: Expression=0.685*([Eucalyptus].AboveGround.Wt^0.3262)
        LinearInterpolationFunction BarkThickness
          XYPairs: X=[0, 10000, 50000]; Y=[0, 0, 2]
          VariableReference XValue: VariableName=[Eucalyptus].Stem.Wt
        ExpressionFunction DBHub: Expression=[Eucalyptus].Stem.DBH-([Eucalyptus].Stem.BarkThickness*2)
        ExpressionFunction BA: Expression=([Eucalyptus].Stem.DBH/2)^2*3.14159
          Memo
            MAI = Mean Annual Increment (m3/ha/year) of stem

            MAI, which is based on stem volume, depends entirely on the allometric equation used for DBH, and on which Ht in-turn is direclty based. The Brazilian dataset on which these relationships were based did not include large trees. It is likely that the relationships over-predict DBH, Ht, Vol and MAI at larger sizes than included in the calibration dataset, which may have been a problem for the Gympie and Coffs sites. Although Coffs in the validation dataset included large trees, DBH and Ht data were not avialable from that site to include in the calibration. The developers of this model encourage redefinition of the DBH, Ht and Vol functions for specific future applications that include large trees.
        ExpressionFunction BAub: Expression=([Eucalyptus].Stem.DBHub/2)^2*3.14159
          Memo: same as Replacements.Eucalyptus.Stem.BA.Memo
        MaximumFunction Ht
          ExpressionFunction HeightFunction: Expression=0.5201*([Eucalyptus].Stem.DBH^1.3604)
          Constant MinimumHeight: FixedValue=0.1; Units=m
        LessThanFunction Vol
          VariableReference Height: VariableName=[Stem].Ht
          Constant MinimumHeight: FixedValue=2
          Constant Zero: FixedValue=0
          ExpressionFunction VolumeEquation
            Expression=(((((([Eucalyptus].Stem.DBH)/2)^2)*3.14159)/3)*([Eucalyptus].Stem.Ht*100))*[Eucalyptus].Population*10000/1000000
            Memo
              Stem volume is calculated as concical volume with the base of the cone the same diameter as at breast height (1.3 m height). Units are m3 stem/ha.
        ExpressionFunction VolBark
          Expression=[Eucalyptus].Stem.Ht*(([Eucalyptus].Stem.DBH/2)^2-([Eucalyptus].Stem.DBHub/2)^2)*3.14159/3*[Eucalyptus].Population*10000/1000000
        ExpressionFunction Volub: Expression=[Eucalyptus].Stem.Vol-[Eucalyptus].Stem.VolBark
        ExpressionFunction MAI: Expression=[Eucalyptus].Stem.Vol/[Eucalyptus].Age
          Memo: same as Replacements.Eucalyptus.Stem.BA.Memo
        ExpressionFunction MAIub: Expression=[Eucalyptus].Stem.Volub/[Eucalyptus].Age
          Memo: same as Replacements.Eucalyptus.Stem.BA.Memo
        ExpressionFunction BarkWt: Expression=[Eucalyptus].Stem.Wt-[Eucalyptus].Stem.WoodWt
        ExpressionFunction WoodWt: Expression=[Eucalyptus].Stem.Wt*0.98
        LessThanFunction WoodDensity
          VariableReference Height: VariableName=[Eucalyptus].Stem.Ht
          Constant MinimumHeight: FixedValue=3
          Constant Zero: FixedValue=0
          ExpressionFunction WoodDensity: Expression=[Eucalyptus].Stem.WoodWt*10/[Eucalyptus].Stem.Volub
            Memo
              Stem volume is calculated as concical volume with the base of the cone the same diameter as at breast height (1.3 m height). Units are m3 stem/ha.
        BiomassDemand DMDemands
          Memo
            DM or N demands here are set in a similar way to those described above for the leaf organ.
          MultiplyFunction Structural
            PartitionFractionDemandFunction DMDemandFunction
              LinearInterpolationFunction PartitionFraction
                XYPairs: X=[0, 2000, 10000]; Y=[0.35, 0.45, 0.58]
                VariableReference XValue: VariableName=[Eucalyptus].IndividualTreeLiveWt
            Constant StructuralFraction: FixedValue=0.99; Units=0-1
          Constant Metabolic: FixedValue=0
          StorageDMDemandFunction Storage
            SubtractFunction StorageFraction
              Constant One: FixedValue=1
              VariableReference StructuralFraction: VariableName=[Stem].DMDemands.Structural.StructuralFraction
        BiomassDemand NDemands
          Memo
            DM or N demands here are set in a similar way to those described above for the leaf organ.
          MultiplyFunction Structural
            VariableReference MinNconc: VariableName=[Stem].minimumNconc
            VariableReference PotentialDMAllocation: VariableName=[Stem].potentialDMAllocation.Structural
          MultiplyFunction Metabolic
            SubtractFunction MetabolicNconc
              VariableReference CritNconc: VariableName=[Stem].criticalNConc
              VariableReference MinNconc: VariableName=[Stem].minimumNconc
            VariableReference PotentialDMAllocation: VariableName=[Stem].potentialDMAllocation.Structural
          StorageNDemandFunction Storage
            VariableReference NitrogenDemandSwitch: VariableName=[Stem].nitrogenDemandSwitch
            VariableReference MaxNconc: VariableName=[Stem].maximumNconc
        RetranslocateNonStructural RetranslocateNitrogen
      GenericOrgan CoarseRoot: IsAboveGround=true
        Memo
          For many of the parameters in this organ, see comments for similar parameters in the leaf organ.
        Constant NReallocationFactor: FixedValue=0; Units=/d
        Constant NRetranslocationFactor: FixedValue=0.05; Units=/d
        PhaseBasedSwitch NitrogenDemandSwitch: Start=Emergence; End=Old
        Constant DMRetranslocationFactor: FixedValue=0; Units=0-1
        Constant SenescenceRate: FixedValue=0; Units=/d
        Constant MaximumNConc: FixedValue=0.01; Units=g/g
        Constant MinimumNConc: FixedValue=0.0014; Units=g/g
        Constant DetachmentRateFunction: FixedValue=0; Units=/d
        Constant MaintenanceRespirationFunction: FixedValue=0; Units=0-1
        Constant DMConversionEfficiency: FixedValue=1; Units=0-1
        BiomassRemoval BiomassRemovalDefaults: same as Replacements.Eucalyptus.Branch.BiomassRemovalDefaults
        Constant DMReallocationFactor: FixedValue=0; Units=0-1
        VariableReference CriticalNConc: VariableName=[Stem].MinimumNConc
        Constant RemobilisationCost: FixedValue=0
        Constant CarbonConcentration: FixedValue=0.45; Units=g/g
        BiomassDemand DMDemands
          Memo
            DM or N demands here are set in a similar way to those described above for the leaf organ.
          MultiplyFunction Structural
            PartitionFractionDemandFunction DMDemandFunction
              LinearInterpolationFunction PartitionFraction
                XYPairs: X=[0, 1000, 10000]; Y=[0.01, 0.03, 0.05]
                VariableReference XValue: VariableName=[Eucalyptus].IndividualTreeLiveWt
            Constant StructuralFraction: FixedValue=0.99; Units=0-1
          Constant Metabolic: FixedValue=0
          StorageDMDemandFunction Storage
            SubtractFunction StorageFraction
              Constant One: FixedValue=1
              VariableReference StructuralFraction: VariableName=[CoarseRoot].DMDemands.Structural.StructuralFraction
        BiomassDemand NDemands
          Memo
            DM or N demands here are set in a similar way to those described above for the leaf organ.
          MultiplyFunction Structural
            VariableReference MinNconc: VariableName=[CoarseRoot].minimumNconc
            VariableReference PotentialDMAllocation: VariableName=[CoarseRoot].potentialDMAllocation.Structural
          MultiplyFunction Metabolic
            SubtractFunction MetabolicNconc
              VariableReference CritNconc: VariableName=[CoarseRoot].criticalNConc
              VariableReference MinNconc: VariableName=[CoarseRoot].minimumNconc
            VariableReference PotentialDMAllocation: VariableName=[CoarseRoot].potentialDMAllocation.Structural
          StorageNDemandFunction Storage
            VariableReference NitrogenDemandSwitch: VariableName=[CoarseRoot].nitrogenDemandSwitch
            VariableReference MaxNconc: VariableName=[CoarseRoot].maximumNconc
        RetranslocateNonStructural RetranslocateNitrogen
        BiomassDemand InitialWt
          Constant Structural: FixedValue=0; Units=g
          Constant Metabolic: FixedValue=0
          Constant Storage: FixedValue=0
      Root FineRoot: GrowthRespiration=0; MaintenanceRespiration=0
        RootShapeCylindre RootShape
        Memo
          For many of the parameters in this organ, see comments for similar parameters in the leaf organ.
        PhaseBasedSwitch NitrogenDemandSwitch: Start=Emergence; End=Old
        Constant RootFrontVelocity: FixedValue=10; Units=mm/d
          Memo
            [huth_managing_2008] measured a constant root front velocity of 24.3 mm/d down to 1.4 m depth under favourable growing conditions, which was similar to wheat. [goncalves2013integrating] report eucalypt root front velocities averaging 19 mm/day for the first 1.5 years to 12 mm/day by 3.5 years in conditions of little impedence to root growth. The value of 10 mm/d used here is lower to reflect more common limiting conditions.
        Constant SenescenceRate: FixedValue=0.005; Units=/d
        Constant MaxDailyNUptake: FixedValue=6; Units=kg/ha/d
        Constant MaximumNConc: FixedValue=0.01; Units=g/g
          Memo
            Fine root N concentrations are based on Misra et al (1998).
        Constant MinimumNConc: FixedValue=0.003; Units=g/g
        Constant MaximumRootDepth: FixedValue=10000; Units=mm
        Constant KLModifier: FixedValue=1
        Constant KNO3: FixedValue=0.03
        Constant KNH4: FixedValue=3e-06
        LinearInterpolationFunction NUptakeSWFactor
          XYPairs: X=[0, 1]; Y=[0, 1]
          VariableReference XValue: VariableName=[Root].RWC
        Constant SpecificRootLength: FixedValue=40; Units=m/g
          Memo
            Specific root length was based on [jourdan2008fine].
        BiomassRemoval BiomassRemovalDefaults
          OrganBiomassRemovalType Harvest: FractionLiveToRemove=0; FractionDeadToRemove=0; FractionLiveToResidue=1; FractionDeadToResidue=1
          OrganBiomassRemovalType Cut: FractionLiveToRemove=0.8; FractionDeadToRemove=0; FractionLiveToResidue=0; FractionDeadToResidue=0
          OrganBiomassRemovalType Prune: FractionLiveToRemove=0; FractionDeadToRemove=0; FractionLiveToResidue=0.6; FractionDeadToResidue=0
        Constant DMConversionEfficiency: FixedValue=1; Units=0-1
        Constant MaintenanceRespirationFunction: FixedValue=0; Units=0-1
        Constant RemobilisationCost: FixedValue=0
        Constant CarbonConcentration: FixedValue=0.45; Units=g/g
        BiomassDemand DMDemands
          Memo
            DM or N demands here are set in a similar way to those described above for the leaf organ.
          MultiplyFunction Structural
            PartitionFractionDemandFunction DMDemandFunction
              Constant PartitionFraction: FixedValue=0.25
            Constant StructuralFraction: FixedValue=1
          Constant Metabolic: FixedValue=0
          StorageDMDemandFunction Storage
            SubtractFunction StorageFraction
              Constant One: FixedValue=1
              VariableReference StructuralFraction: VariableName=[FineRoot].DMDemands.Structural.StructuralFraction
        BiomassDemand NDemands
          Memo
            DM or N demands here are set in a similar way to those described above for the leaf organ.
          MultiplyFunction Structural
            VariableReference MinNconc: VariableName=[FineRoot].minimumNconc
            VariableReference PotentialDMAllocation: VariableName=[FineRoot].potentialDMAllocation.Structural
          MultiplyFunction Metabolic
            SubtractFunction MetabolicNconc
              VariableReference CritNconc: VariableName=[FineRoot].criticalNConc
              VariableReference MinNconc: VariableName=[FineRoot].minimumNconc
            VariableReference PotentialDMAllocation: VariableName=[FineRoot].potentialDMAllocation.Structural
          StorageNDemandFunction Storage
            VariableReference NitrogenDemandSwitch: VariableName=[FineRoot].nitrogenDemandSwitch
            VariableReference MaxNconc: VariableName=[FineRoot].maximumNconc
        VariableReference CriticalNConc: VariableName=[Root].MinimumNConc
        BiomassDemand InitialWt
          Constant Structural: FixedValue=0.2; Units=g/plant
          Constant Metabolic: FixedValue=0
          Constant Storage: FixedValue=0
        Constant RootDepthStressFactor: FixedValue=1
      DivideFunction RootShootRatio
        VariableReference Numerator: VariableName=[Eucalyptus].BelowGround.Wt
        VariableReference Denominator: VariableName=[Eucalyptus].AboveGround.Wt
      CultivarFolder grandis
        Cultivar grandis
          Memo Genotype note
            This genotype specification was originally planned to be for the species E. grandis in general, but we did not actually provide any specific parameters. As no parameter values were changed here, generic Eucalyptus parameters were used where this genotype was specified in a simulation.
        Cultivar grandisCoffsHarbour
          Memo Genotype note
            This genotype specification is for a Coffs Harbour provenance of E. grandis, but as no actually genotype-specific parameters are specified, simulations using this genotype use the unchanged parameter set of the main Eucalyptus model.
        Cultivar grandisC15
          Command:
            [CoarseRoot].DMDemands.Structural.DMDemandFunction.PartitionFraction.XYPairs.X=0,1000,10000
            [CoarseRoot].DMDemands.Structural.DMDemandFunction.PartitionFraction.XYPairs.Y=0,0.03,0.04
            [Leaf].DMDemands.Structural.DMDemandFunction.PartitionFraction.XYPairs.X=0,1000,10000,20000,50000,80000
            [Leaf].DMDemands.Structural.DMDemandFunction.PartitionFraction.XYPairs.Y=0.24,0.2,0.2,.23,0.2,.12
            [Branch].DMDemands.Structural.DMDemandFunction.PartitionFraction.XYPairs.X=0,1000,10000,20000,50000,80000
            [Branch].DMDemands.Structural.DMDemandFunction.PartitionFraction.XYPairs.Y=.06,.06,.06,.05,.04,.03
            [FineRoot].DMDemands.Structural.DMDemandFunction.PartitionFraction.FixedValue=0.2
            [Stem].DMDemands.Structural.DMDemandFunction.PartitionFraction.XYPairs.X=0,1000,10000,20000,30000,80000
            [Stem].DMDemands.Structural.DMDemandFunction.PartitionFraction.XYPairs.Y=0.2,0.45,0.7,0.99,0.99,.99
          Memo Genotype note
            This genotype specification was used to specifiy partitioning to for the C15 clone used by the Aracruz company (now Fibria), in order to approximate the root:shoot ratios reported in [almeida].
        Cultivar grandisC22
          Command:
            [CoarseRoot].DMDemands.Structural.DMDemandFunction.PartitionFraction.XYPairs.X=0,1000,10000
            [CoarseRoot].DMDemands.Structural.DMDemandFunction.PartitionFraction.XYPairs.Y=0,0.08,0.08
            [Leaf].DMDemands.Structural.DMDemandFunction.PartitionFraction.XYPairs.X=0,1000,10000,20000,50000,80000
            [Leaf].DMDemands.Structural.DMDemandFunction.PartitionFraction.XYPairs.Y=0.22,0.2,0.19,0.13,0.10,.06
          Memo Genotype note
            This genotype specification was used to specifiy partitioning to for the C22 clone used by the Aracruz company (now Fibria), in order to approximate the root:shoot ratios reported in [almeida].
      CultivarFolder grandisXurophylla
        Cultivar grandisXurophylla
          Memo Genotype note
            This genotype specification was originally planned to be for a cline of grandisXurophylla, but we did not actually provide any specific parameters. As no parameter values were changed here, generic Eucalyptus parameters were used where this genotype was specified in a simulation.
        Cultivar grandisXurophyllaC3334
          Memo Genotype note
            This genotype specification was originally planned to be for the clone C3334, but we did not actually provide any specific parameters. As no parameter values were changed here, generic Eucalyptus parameters were used where this genotype was specified in a simulation.
        Cultivar grandisXurophyllaC3336
          Memo Genotype note
            This genotype specification was originally planned to be for the clone C3336, but we did not actually provide any specific parameters. As no parameter values were changed here, generic Eucalyptus parameters were used where this genotype was specified in a simulation.
      CultivarFolder urophyllaXglobulus
        Cultivar urophyllaXglobulus
          Memo Genotype note
            This genotype specification was originally planned to be for the urophyllaXglobulus hybird of E. grandis, but we did not actually provide any specific parameters. As no parameter values were changed here, generic Eucalyptus parameters were used where this genotype was specified in a simulation.
      CultivarFolder BrazilClones
        Cultivar BrazilPlasticClone
          Command:
            [Leaf].Photosynthesis.RUE.FixedValue = 1.51
            [Leaf].ExtinctionCoefficient.KYoungTrees.FixedValue = 0.34
            [Leaf].ExtinctionCoefficient.KMatureTrees.FixedValue = 0.60
            [Stem].DMDemands.Structural.DMDemandFunction.PartitionFraction.XYPairs.X=0,2000,10000
            [Stem].DMDemands.Structural.DMDemandFunction.PartitionFraction.XYPairs.Y=0.15, 0.39, 0.61
            [Branch].DMDemands.Structural.DMDemandFunction.PartitionFraction.XYPairs.X=0,2000,10000
            [Branch].DMDemands.Structural.DMDemandFunction.PartitionFraction.XYPairs.Y=0.09,0.09,0.09
            [Leaf].DMDemands.Structural.DMDemandFunction.PartitionFraction.XYPairs.X=0,2000,10000
            [Leaf].DMDemands.Structural.DMDemandFunction.PartitionFraction.XYPairs.Y= 0.2, 0.17, 0.15
            [Leaf].Photosynthesis.FT.FTDaytime.XYPairs.X=  8, 18, 23, 40
            [Leaf].Photosynthesis.FT.FTDaytime.XYPairs.Y 0, 1, 1, 0
            [Leaf].Photosynthesis.FT.FTFrost.XYPairs.X= -5, -2, -1, 0, 1, 2, 2.1
            [Leaf].Photosynthesis.FT.FTFrost.XYPairs.Y = 0, 0, 0, 0, 0, 0.9, 1
            [Leaf].SenescenceRate.XYPairs.X=  -5,  -2,  0,    2,  2.1
            [Leaf].SenescenceRate.XYPairs.Y = 0.7, 0.5, 0.2, 0.1, 0
            [CoarseRoot].DMDemands.Structural.DMDemandFunction.PartitionFraction.XYPairs.X=0,2000,10000
            [CoarseRoot].DMDemands.Structural.DMDemandFunction.PartitionFraction.XYPairs.Y=0.005,0.03,0.04
            [FineRoot].DMDemands.Structural.DMDemandFunction.PartitionFraction.FixedValue = 0.26
        Cultivar BrazilTropicalClone
          Command:
            [Leaf].Photosynthesis.RUE.FixedValue = 1.69
            [Leaf].ExtinctionCoefficient.KYoungTrees.FixedValue = 0.30
            [Leaf].ExtinctionCoefficient.KMatureTrees.FixedValue = 0.56
            [Stem].DMDemands.Structural.DMDemandFunction.PartitionFraction.XYPairs.X=0,2000,10000
            [Stem].DMDemands.Structural.DMDemandFunction.PartitionFraction.XYPairs.Y=0.15,0.40, 0.64
            [Branch].DMDemands.Structural.DMDemandFunction.PartitionFraction.XYPairs.X=0,2000,10000
            [Branch].DMDemands.Structural.DMDemandFunction.PartitionFraction.XYPairs.Y=0.08,0.08,0.08
            [Leaf].DMDemands.Structural.DMDemandFunction.PartitionFraction.XYPairs.X=0,2000,10000
            [Leaf].DMDemands.Structural.DMDemandFunction.PartitionFraction.XYPairs.Y= 0.19, 0.17, 0.17
            [Leaf].Photosynthesis.FT.FTDaytime.XYPairs.X=  8, 18, 23, 40
            [Leaf].Photosynthesis.FT.FTDaytime.XYPairs.Y 0, 1, 1, 0
            [Leaf].Photosynthesis.FT.FTFrost.XYPairs.X= -5, -2, -1, 0, 1, 2, 2.1
            [Leaf].Photosynthesis.FT.FTFrost.XYPairs.Y = 0, 0, 0, 0, 0, 0.9, 1
            [Leaf].SenescenceRate.XYPairs.X=  -5,  -2,  0,    2,  2.1
            [Leaf].SenescenceRate.XYPairs.Y = 0.7, 0.5, 0.2, 0.1, 0
            [CoarseRoot].DMDemands.Structural.DMDemandFunction.PartitionFraction.XYPairs.X=0,2000,10000
            [CoarseRoot].DMDemands.Structural.DMDemandFunction.PartitionFraction.XYPairs.Y=0.03,0.1,0.1
            [FineRoot].DMDemands.Structural.DMDemandFunction.PartitionFraction.FixedValue = 0.35
            [Leaf].SpecificLeafAreaFunction.SpecificLeafAreaPot.XYPairs.X= 0, 1, 2, 3, 4, 80
            [Leaf].SpecificLeafAreaFunction.SpecificLeafAreaPot.XYPairs.Y= 0.018, 0.014, 0.011, 0.009, 0.008, 0.007
        Cultivar BrazilSubTropicalClone
          Command:
            [Leaf].Photosynthesis.RUE.FixedValue = 1.57
            [Leaf].ExtinctionCoefficient.KYoungTrees.FixedValue = 0.26
            [Leaf].ExtinctionCoefficient.KMatureTrees.FixedValue = 0.55
            [Stem].DMDemands.Structural.DMDemandFunction.PartitionFraction.XYPairs.X=0,2000,10000
            [Stem].DMDemands.Structural.DMDemandFunction.PartitionFraction.XYPairs.Y=0.15, 0.30, 0.57
            [Branch].DMDemands.Structural.DMDemandFunction.PartitionFraction.XYPairs.X=0,2000,10000
            [Branch].DMDemands.Structural.DMDemandFunction.PartitionFraction.XYPairs.Y=0.09,0.09,0.09
            [Leaf].DMDemands.Structural.DMDemandFunction.PartitionFraction.XYPairs.X=0,2000,10000
            [Leaf].DMDemands.Structural.DMDemandFunction.PartitionFraction.XYPairs.Y= 0.20, 0.16, 0.15
            [Leaf].Photosynthesis.FT.FTDaytime.XYPairs.X=  6, 17, 22, 38
            [Leaf].Photosynthesis.FT.FTDaytime.XYPairs.Y 0, 1, 1, 0
            [Leaf].Photosynthesis.FT.FTFrost.XYPairs.X= -5, -2, -1, 0, 1, 2, 2.1
            [Leaf].Photosynthesis.FT.FTFrost.XYPairs.Y = 0.5, 1, 1, 1, 1, 1, 1
            [Leaf].SenescenceRate.XYPairs.X=  -5,  -2,  0,    2,  2.1
            [Leaf].SenescenceRate.XYPairs.Y = 0.7, 0.5, 0.2, 0.1, 0
            [CoarseRoot].DMDemands.Structural.DMDemandFunction.PartitionFraction.XYPairs.X=0,2000,10000
            [CoarseRoot].DMDemands.Structural.DMDemandFunction.PartitionFraction.XYPairs.Y=0.02,0.05,0.06
            [FineRoot].DMDemands.Structural.DMDemandFunction.PartitionFraction.FixedValue = 0.24
            [Leaf].SpecificLeafAreaFunction.SpecificLeafAreaPot.XYPairs.X= 0, 1, 2, 3, 4, 80
            [Leaf].SpecificLeafAreaFunction.SpecificLeafAreaPot.XYPairs.Y= 0.015, 0.013, 0.009, 0.008, 0.007, 0.007
      CultivarFolder saligna
        Cultivar saligna
          Memo Genotype note
            This genotype specification was originally planned to be for the species E. saligna, but we did not actually provide any specific parameters. As no parameter values were changed here, generic Eucalyptus parameters were used where this genotype was specified in a simulation.
      CultivarFolder nitens
        Cultivar nitens
          Command:
            [Leaf].Photosynthesis.RUE.FixedValue = 1.65
            [Leaf].Photosynthesis.FT.FTDaytime.XYPairs.X= 2,13,14,32
            [Leaf].Photosynthesis.FT.FTDaytime.XYPairs.Y= 0, 1, 1, 0
            [Leaf].Photosynthesis.FT.FTFrost.MaximumTemperatureWeighting=0
            [Leaf].Photosynthesis.FT.FTFrost.XYPairs.X=-5, -2, -1, 0, 1, 2, 3, 4, 7
            [Leaf].Photosynthesis.FT.FTFrost.XYPairs.Y= 0,  0,  0, 0, 0, 0, .5,.8, 1
            [Leaf].LeafDevelopmentRate.LDR.FixedValue=1
            [Leaf].LeafDevelopmentRate.FT.XYPairs.X=8,26,33,34
            [Leaf].LeafDevelopmentRate.FT.XYPairs.X=0,1,1,0
            [Leaf].SpecificLeafAreaFunction.SpecificLeafAreaPot.XYPairs.X= 0, 1, 2, 3, 4, 80
            [Leaf].SpecificLeafAreaFunction.SpecificLeafAreaPot.XYPairs.Y= 0.011, 0.008, 0.006, 0.005, 0.005, 0.005
            [Leaf].SenescenceRate.XYPairs.X=  -5,  -2,  0,    2,  2.1
            [Leaf].SenescenceRate.XYPairs.Y = 0.3, 0.2, 0.1, .08, .05
            [Leaf].MaximumNConc.FixedValue=0.035
            [Leaf].MinimumNConc.FixedValue=0.013
            [Branch].MaximumNConc.FixedValue=0.013
            [Branch].MinimumNConc.FixedValue=0.0035
            [Stem].MaximumNConc.FixedValue=0.0075
            [Stem].MinimumNConc.FixedValue=0.0025
            [CoarseRoot].MaximumNConc.FixedValue=0.02
            [CoarseRoot].MinimumNConc.FixedValue=0.0025
            [FineRoot].MaximumNConc.FixedValue=0.02
            [FineRoot].MinimumNConc.FixedValue=0.005
            [Leaf].DMDemands.Structural.DMDemandFunction.PartitionFraction.XYPairs.X=0,1000,10000,20000,50000,80000, 100000
            [Leaf].DMDemands.Structural.DMDemandFunction.PartitionFraction.XYPairs.Y=0.4,0.5,0.5,.18,.07,.06, 0.05
            [Branch].DMDemands.Structural.DMDemandFunction.PartitionFraction.XYPairs.X=0,1000,10000,20000,50000,80000
            [Branch].DMDemands.Structural.DMDemandFunction.PartitionFraction.XYPairs.Y=.1,.15,.19,.21,.20,.19
            [Stem].DMDemands.Structural.DMDemandFunction.PartitionFraction.XYPairs.X=0,1000,10000,20000,30000,80000, 120000
            [Stem].DMDemands.Structural.DMDemandFunction.PartitionFraction.XYPairs.Y=0.1,0.9,0.99,0.99,0.99,.99, .99
            [CoarseRoot].DMDemands.Structural.DMDemandFunction.PartitionFraction.XYPairs.X=0,500,1000,5000, 10000, 20000, 40000
            [CoarseRoot].DMDemands.Structural.DMDemandFunction.PartitionFraction.XYPairs.Y=0.28,0.32, 0.36, 0.32, 0.3, .25, .2
            [FineRoot].DMDemands.Structural.DMDemandFunction.PartitionFraction.FixedValue=0.4
            [Stem].DBH.Expression=(-196.81*([IndividualTreeLiveWt]/1000000)^2)+(109.13*([IndividualTreeLiveWt]/1000000)+5
            [Stem].Ht.HeightFunction.Expression=(0.0293*[Stem].DBH^2)+(0.2854*[Stem].DBH)+3
            [Stem].Vol.MinimumHeight.FixedValue=10
            [Stem].Vol.VolumeEquation.Expression=((0.0007*[Stem].DBH^2)+(-0.0049*[Stem].DBH)+0.0086)*[Eucalyptus].Population*10000
          Memo Genotype note
            This genotype specification was originally planned to be for the species E. grandis in general, but we did not actually provide any specific parameters. As no parameter values were changed here, generic Eucalyptus parameters were used where this genotype was specified in a simulation.
      CultivarFolder globulus
        Cultivar globulus
          Command:
            [Leaf].Photosynthesis.RUE.FixedValue = 1.65
            [Leaf].Photosynthesis.FT.FTDaytime.XYPairs.X= 0,15,27,34
            [Leaf].Photosynthesis.FT.FTDaytime.XYPairs.Y= 0, 1, 1, 0
            [Leaf].Photosynthesis.FT.FTFrost.MaximumTemperatureWeighting=0
            [Leaf].Photosynthesis.FT.FTFrost.XYPairs.X=-5, -2, -1, 0, 1, 2, 3, 4, 7
            [Leaf].Photosynthesis.FT.FTFrost.XYPairs.Y= 0,  0,  0, 0, 0, 0, .5,.8, 1
            [Leaf].LeafDevelopmentRate.LDR.FixedValue=1
            [Leaf].LeafDevelopmentRate.FT.XYPairs.X=8,26,33,34
            [Leaf].LeafDevelopmentRate.FT.XYPairs.X=0,1,1,0
            [Leaf].SpecificLeafAreaFunction.SpecificLeafAreaPot.XYPairs.X= 0, 1, 2, 3, 4, 80
            [Leaf].SpecificLeafAreaFunction.SpecificLeafAreaPot.XYPairs.Y= 0.011, 0.008, 0.006, 0.005, 0.005, 0.005
            [Leaf].SenescenceRate.XYPairs.X=  -5,  -2,  0,    2,  2.1
            [Leaf].SenescenceRate.XYPairs.Y = 0.3, 0.2, 0.1, .08, .05
            [Leaf].MaximumNConc.FixedValue=0.035
            [Leaf].MinimumNConc.FixedValue=0.013
            [Branch].MaximumNConc.FixedValue=0.013
            [Branch].MinimumNConc.FixedValue=0.0035
            [Stem].MaximumNConc.FixedValue=0.0075
            [Stem].MinimumNConc.FixedValue=0.0025
            [CoarseRoot].MaximumNConc.FixedValue=0.02
            [CoarseRoot].MinimumNConc.FixedValue=0.0025
            [FineRoot].MaximumNConc.FixedValue=0.02
            [FineRoot].MinimumNConc.FixedValue=0.005
            [Leaf].DMDemands.Structural.DMDemandFunction.PartitionFraction.XYPairs.X=0,1000,10000,20000,50000,80000, 100000
            [Leaf].DMDemands.Structural.DMDemandFunction.PartitionFraction.XYPairs.Y=0.4,0.5,0.5,.18,.07,.06, 0.05
            [Branch].DMDemands.Structural.DMDemandFunction.PartitionFraction.XYPairs.X=0,1000,10000,20000,50000,80000
            [Branch].DMDemands.Structural.DMDemandFunction.PartitionFraction.XYPairs.Y=.1,.15,.19,.21,.20,.19
            [Stem].DMDemands.Structural.DMDemandFunction.PartitionFraction.XYPairs.X=0,1000,10000,20000,30000,80000, 120000
            [Stem].DMDemands.Structural.DMDemandFunction.PartitionFraction.XYPairs.Y=0.1,0.9,0.99,0.99,0.99,.99, .99
            [CoarseRoot].DMDemands.Structural.DMDemandFunction.PartitionFraction.XYPairs.X=0,500,1000,5000, 10000, 20000, 40000
            [CoarseRoot].DMDemands.Structural.DMDemandFunction.PartitionFraction.XYPairs.Y=0.28,0.32, 0.36, 0.32, 0.3, .25, .2
            [FineRoot].DMDemands.Structural.DMDemandFunction.PartitionFraction.FixedValue=0.4
            [Stem].DBH.Expression=(-196.81*([IndividualTreeLiveWt]/1000000)^2)+(109.13*([IndividualTreeLiveWt]/1000000)+5
            [Stem].Ht.HeightFunction.Expression=(0.0293*[Stem].DBH^2)+(0.2854*[Stem].DBH)+3
            [Stem].Vol.MinimumHeight.FixedValue=10
            [Stem].Vol.VolumeEquation.Expression=((0.0007*[Stem].DBH^2)+(-0.0049*[Stem].DBH)+0.0086)*[Eucalyptus].Population*10000
          Memo Genotype note
            This genotype specification was originally planned to be for the species E. grandis in general, but we did not actually provide any specific parameters. As no parameter values were changed here, generic Eucalyptus parameters were used where this genotype was specified in a simulation.
      Constant MortalityRate: FixedValue=0
  DataStore
    ExcelInput Observed: FileNames=[ObservedEucalyptus 200910b.xlsx]; SheetNames=[Observed]
    PredictedObserved: PredictedTableName=Report; ObservedTableName=Observed; FieldNameUsedForMatch=SimulationID; FieldName2UsedForMatch=Clock.Today; AllColumns=false
  Folder Validation
    Memo ValidationIntro
      Validation datasets have been included to assist with validation during model development. Validation datasets cover a range of environmental (soil and climate) conditions, management options (populations, nitrogen rates, irrigation) and genetic backgrounds (different regions, provenence, clones).  These datasets have been grouped and ordered in this simulation by country, and alphebetically within country.  Graphs of model performance are provided for biomass production and canopy development. Where a dataset did not include aboveground biomass, but instead a related parameter like stem volume or biomass, the latter was converted to aboveground biomass by a regression based on the rest of the validation dataset.

      Observed data are shown compared to predictions.
    Memo Genotype note
      This genotype specification was used to specifiy partitioning to roots and shoots for the C15 clone used by the Aracruz company (then Fibria, and now Suzano), in order to approximate the root:shoot ratios reported in [almeida].
    Memo
      This map shows the location of all datasets.
    Folder Combined Validation (disabled)
      Memo
        These observed versus predicted graphs include all validation datasets and timesteps within a site for which observed data were available.
    Folder Australia grandis (disabled)
      Folder CoffsHarbour
        Memo
          Data are from [turner1986organic]. The research is also reported in [byrne1989above], and [bradstock1981biomass]. These data are from a chronosequence of approximately even-aged stands of native forests of _E grandis,_ and include the oldest stands simulated so far by the APSIM Eucalyptus model. They are the only native forest data in this set of simulations; all other simulations are of plantations.
        Simulation CoffsHarbour
          Weather: FileName=coffs.met
          Clock: Start=1953-04-01; End=1983-12-31
          Summary
          SoilArbitrator Soil Arbitrator
          Zone Plantation: Area=1; Slope=0; AspectAngle=0; Altitude=50
            Soil: Latitude=0; Longitude=0
              InitialWater Initial water: PercentMethod=1; FractionFull=0.8
              Physical
                Thickness  BD    AirDry  LL15  DUL   SAT
                100        1.5   0.01    0.05  0.16  0.29
                300        1.6   0.01    0.05  0.15  0.29
                600        1.68  0.01    0.05  0.14  0.29
                1000       1.75  0.02    0.05  0.13  0.29
                1000       1.7   0.05    0.05  0.12  0.29
                1000       1.7   0.05    0.05  0.12  0.29
                1000       1.7   0.05    0.05  0.12  0.29
                1000       1.7   0.05    0.05  0.12  0.29
                SoilCrop EucalyptusSoil: LL=[0.05, 0.05, 0.05, 0.05, 0.05, 0.05, 0.05, 0.05]; KL=[0.07, 0.07, 0.05, 0.02, 0.02, 0.02, 0.01, 0.01]; XF=[1, 1, 1, 1, 1, 1, 1, 1]
              WaterBalance SoilWater: SummerDate=1-Nov; SummerU=4; SummerCona=3.5; WinterDate=1-Apr; WinterU=4; WinterCona=3.5; DiffusConst=88; DiffusSlope=35.4; Salb=0.13; CN2Bare=65; CNRed=20; CNCov=0.8; Slope=0; DischargeWidth=0; CatchmentArea=0
                Thickness  SWCON  KLAT
                100        0.9    0
                300        0.9    0
                600        0.9    0
                1000       0.6    0
                1000       0.6    0
                1000       0.6    0
                1000       0.6    0
                1000       0.6    0
              Organic: FOMCNRatio=60
                Thickness  Carbon  SoilCNRatio  FBiom  FInert  FOM
                100        2       14.5         0.02   0.5     0.29407
                300        1       14.5         0.02   0.5     0.253108
                600        0.5     14.5         0.01   0.85    0.187507
                1000       0.2     14.5         0.01   0.5     0.113729
                1000       0.12    14.5         0.01   0.9     0.06898
                1000       0.1     14.5         0.01   0.99    0.0418385
                1000       0.1     14.5         0.01   0.99    0.0253763
                1000       0.1     14.5         0.01   0.99    0.0153915
              Chemical
                Thickness  NO3N  NH4N  PH
                100        0.1   0.01  5.8
                300        0.1   0.01  5.7
                600        0.1   0.01  5.7
                1000       0.01  0.01  5.9
                1000       0.01  0.01  5.7
                1000       0.01  0.01  5.7
                1000       0.01  0.01  5.7
                1000       0.01  0.01  5.7
              Sample Initial nitrogen: Thickness=[100, 300, 600, 1000, 1000, 1000, 1000, 1000]; SWUnits=Volumetric; OCUnits=Total; PHUnits=Water
              CERESSoilTemperature
              Nutrient
            Irrigation
            Fertiliser
            SurfaceOrganicMatter: InitialResidueName=Wheat; InitialResidueType=Wheat; InitialResidueMass=2000; InitialStandingFraction=0; InitialCPR=0; InitialCNR=80
            MicroClimate: a_interception=0; b_interception=1; c_interception=0; d_interception=0; soil_albedo=0.13; SoilHeatFluxFraction=0; MinimumHeightDiffForNewLayer=0; NightInterceptionFraction=0; ReferenceHeight=0
            Plant Eucalyptus
            Manager TreeTransplantRule
              RowSpace = 3
              RowWidth = 3
              CultivarName = grandisCoffsHarbour
              SowingDate = 1953-04-01
```csharp
using Models.PMF;
using Models.Core;
using System;
namespace Models
{
    [Serializable] 
    [System.Xml.Serialization.XmlInclude(typeof(Model))]
    public class Script : Model
    {
        [Link] Plant Plant;
        [Link] Clock Clock;

        [Description("Spacing (m) between plants within rows")]
        public double RowSpace { get; set; }
        [Description("Spacing (m) between rows")]
        public double RowWidth { get; set; }

        [Description("Cultivar")]
        [Display(Type=DisplayType.CultivarName)]
        public string CultivarName { get; set; }
        [Description("Sowing Date")]
        public DateTime SowingDate { get; set; }

        [EventSubscribe("DoManagement")]
        private void OnDoManagement(object sender, EventArgs e)
        {
            double PlantPopulation = 1 / (RowWidth * RowSpace);

            if (Clock.Today.Date == SowingDate)
                Plant.Sow(population: PlantPopulation, 
                    cultivar: CultivarName, 
                    depth: 100, 
                    rowSpacing: 150);
            //Plant.Sow(... Contains the following arguements:
            //Population  double  Required  Seeds sowing/m2
            //Cultivar    string  Required  "NameOfCultivar"
            //Depth       double  Optional  Depth (mm) seed sown.   Default is 100mm 
            //MaxCover    double  Optional  Proportion (0-1) of the ground row crop will cover.   Default is 1.0
            //BudNumber   double  Optional  Number of mainstems per seed sown.  Default is 1.0
            //RowSpacing  double  Optional  Spaceing (mm) between drill rows when crop is sown.  Default is 150mm
            //CropClass   string  Optional  Crop class to instantiate when crop is sown.  Default is "Plant"
        }
    }
}
```
            Report: VariableNames=[Clock].Today; EventNames=[Clock].DoReport
      Folder Gympie
        Memo
          This experiment is described in [cromer1993response] and [cromer1993responseN]. Some soil input data are from [ross1991soils]. Experimental treatments were factorial combinations of two levels each of irrigation and fertilisation applied to _E. grandis._ Most growth response was to fertiliser, which included NPK, but only N is simulated, which assumes that other nutrients were present at adequate levels.
        Experiment Gympie
          Factors
            Factor Treatment: Specification=[Operations]
              Operations C
              Operations I
                1987-02-08  [Irrigation].Apply(amount: 2.2533);
                1987-02-15  [Irrigation].Apply(amount: 2.2533);
                1987-02-22  [Irrigation].Apply(amount: 2.2533);
                1987-03-01  [Irrigation].Apply(amount: 2.2533);
                1987-03-08  [Irrigation].Apply(amount: 25.5633);
                1987-03-15  [Irrigation].Apply(amount: 25.5633);
                1987-03-22  [Irrigation].Apply(amount: 25.5633);
                1987-03-29  [Irrigation].Apply(amount: 25.5633);
                1987-04-08  [Irrigation].Apply(amount: 21.5229);
                1987-04-15  [Irrigation].Apply(amount: 21.5229);
                1987-04-22  [Irrigation].Apply(amount: 21.5229);
                1987-04-29  [Irrigation].Apply(amount: 21.5229);
                1987-05-08  [Irrigation].Apply(amount: 13.6752);
                1987-05-15  [Irrigation].Apply(amount: 13.6752);
                1987-05-22  [Irrigation].Apply(amount: 13.6752);
                1987-05-29  [Irrigation].Apply(amount: 13.6752);
                1987-06-08  [Irrigation].Apply(amount: 0);
                1987-06-15  [Irrigation].Apply(amount: 0);
                1987-06-22  [Irrigation].Apply(amount: 0);
                1987-06-29  [Irrigation].Apply(amount: 0);
                1987-07-08  [Irrigation].Apply(amount: 17.6379);
                1987-07-15  [Irrigation].Apply(amount: 17.6379);
                1987-07-22  [Irrigation].Apply(amount: 17.6379);
                1987-07-29  [Irrigation].Apply(amount: 17.6379);
                1987-08-08  [Irrigation].Apply(amount: 7.77);
                1987-08-15  [Irrigation].Apply(amount: 7.77);
                1987-08-22  [Irrigation].Apply(amount: 7.77);
                1987-08-29  [Irrigation].Apply(amount: 7.77);
                1987-09-08  [Irrigation].Apply(amount: 16.58895);
                1987-09-15  [Irrigation].Apply(amount: 16.58895);
                1987-09-22  [Irrigation].Apply(amount: 16.58895);
                1987-09-29  [Irrigation].Apply(amount: 16.58895);
                1987-10-08  [Irrigation].Apply(amount: 15.8508);
                1987-10-15  [Irrigation].Apply(amount: 15.8508);
                1987-10-22  [Irrigation].Apply(amount: 15.8508);
                1987-10-29  [Irrigation].Apply(amount: 15.8508);
                1987-11-08  [Irrigation].Apply(amount: 20.47395);
                1987-11-15  [Irrigation].Apply(amount: 20.47395);
                1987-11-22  [Irrigation].Apply(amount: 20.47395);
                1987-11-29  [Irrigation].Apply(amount: 20.47395);
                1987-12-08  [Irrigation].Apply(amount: 19.425);
                1987-12-15  [Irrigation].Apply(amount: 19.425);
                1987-12-22  [Irrigation].Apply(amount: 19.425);
                1987-12-29  [Irrigation].Apply(amount: 19.425);
                1988-01-08  [Irrigation].Apply(amount: 15.6954);
                1988-01-15  [Irrigation].Apply(amount: 15.6954);
                1988-01-22  [Irrigation].Apply(amount: 15.6954);
                1988-01-29  [Irrigation].Apply(amount: 15.6954);
                1988-02-08  [Irrigation].Apply(amount: 39.0054);
                1988-02-15  [Irrigation].Apply(amount: 39.0054);
                1988-02-22  [Irrigation].Apply(amount: 39.0054);
                1988-02-29  [Irrigation].Apply(amount: 39.0054);
                1988-03-08  [Irrigation].Apply(amount: 42.56018);
                1988-03-15  [Irrigation].Apply(amount: 42.56018);
                1988-03-22  [Irrigation].Apply(amount: 42.56018);
                1988-03-29  [Irrigation].Apply(amount: 42.56018);
                1988-04-08  [Irrigation].Apply(amount: 0);
                1988-04-15  [Irrigation].Apply(amount: 0);
                1988-04-22  [Irrigation].Apply(amount: 0);
                1988-04-29  [Irrigation].Apply(amount: 0);
                1988-05-08  [Irrigation].Apply(amount: 0);
                1988-05-15  [Irrigation].Apply(amount: 0);
                1988-05-22  [Irrigation].Apply(amount: 0);
                1988-05-29  [Irrigation].Apply(amount: 0);
                1988-06-08  [Irrigation].Apply(amount: 0);
                1988-06-15  [Irrigation].Apply(amount: 0);
                1988-06-22  [Irrigation].Apply(amount: 0);
                1988-06-29  [Irrigation].Apply(amount: 0);
                1988-07-08  [Irrigation].Apply(amount: 0);
                1988-07-15  [Irrigation].Apply(amount: 0);
                1988-07-22  [Irrigation].Apply(amount: 0);
                1988-07-29  [Irrigation].Apply(amount: 0);
                1988-08-08  [Irrigation].Apply(amount: 7.77);
                1988-08-15  [Irrigation].Apply(amount: 7.77);
                1988-08-22  [Irrigation].Apply(amount: 7.77);
                1988-08-29  [Irrigation].Apply(amount: 7.77);
                1988-09-08  [Irrigation].Apply(amount: 9.965025);
                1988-09-15  [Irrigation].Apply(amount: 9.965025);
                1988-09-22  [Irrigation].Apply(amount: 9.965025);
                1988-09-29  [Irrigation].Apply(amount: 9.965025);
                1988-10-08  [Irrigation].Apply(amount: 40.404);
                1988-10-15  [Irrigation].Apply(amount: 40.404);
                1988-10-22  [Irrigation].Apply(amount: 40.404);
                1988-10-29  [Irrigation].Apply(amount: 40.404);
                1988-11-08  [Irrigation].Apply(amount: 49.55318);
                1988-11-15  [Irrigation].Apply(amount: 49.55318);
                1988-11-22  [Irrigation].Apply(amount: 49.55318);
                1988-11-29  [Irrigation].Apply(amount: 49.55318);
                1988-12-08  [Irrigation].Apply(amount: 12.91763);
                1988-12-15  [Irrigation].Apply(amount: 12.91763);
                1988-12-22  [Irrigation].Apply(amount: 12.91763);
                1988-12-29  [Irrigation].Apply(amount: 12.91763);
                1989-01-08  [Irrigation].Apply(amount: 11.8881);
                1989-01-15  [Irrigation].Apply(amount: 11.8881);
                1989-01-22  [Irrigation].Apply(amount: 11.8881);
                1989-01-29  [Irrigation].Apply(amount: 11.8881);
                1989-02-08  [Irrigation].Apply(amount: 15.9285);
                1989-02-15  [Irrigation].Apply(amount: 15.9285);
                1989-02-22  [Irrigation].Apply(amount: 15.9285);
                1989-03-01  [Irrigation].Apply(amount: 15.9285);
                1989-03-08  [Irrigation].Apply(amount: 23.7762);
                1989-03-15  [Irrigation].Apply(amount: 23.7762);
                1989-03-22  [Irrigation].Apply(amount: 23.7762);
                1989-03-29  [Irrigation].Apply(amount: 23.7762);
                1989-04-08  [Irrigation].Apply(amount: 0);
                1989-04-15  [Irrigation].Apply(amount: 0);
                1989-04-22  [Irrigation].Apply(amount: 0);
                1989-04-29  [Irrigation].Apply(amount: 0);
                1989-05-08  [Irrigation].Apply(amount: 0);
                1989-05-15  [Irrigation].Apply(amount: 0);
                1989-05-22  [Irrigation].Apply(amount: 0);
                1989-05-29  [Irrigation].Apply(amount: 0);
                1989-06-08  [Irrigation].Apply(amount: 0);
                1989-06-15  [Irrigation].Apply(amount: 0);
                1989-06-22  [Irrigation].Apply(amount: 0);
                1989-06-29  [Irrigation].Apply(amount: 0);
                1989-07-08  [Irrigation].Apply(amount: 0.2331);
                1989-07-15  [Irrigation].Apply(amount: 0.2331);
                1989-07-22  [Irrigation].Apply(amount: 0.2331);
                1989-07-29  [Irrigation].Apply(amount: 0.2331);
                1989-08-08  [Irrigation].Apply(amount: 12.91763);
                1989-08-15  [Irrigation].Apply(amount: 12.91763);
                1989-08-22  [Irrigation].Apply(amount: 12.91763);
                1989-08-29  [Irrigation].Apply(amount: 12.91763);
                1989-09-08  [Irrigation].Apply(amount: 51.70935);
                1989-09-15  [Irrigation].Apply(amount: 51.70935);
                1989-09-22  [Irrigation].Apply(amount: 51.70935);
                1989-09-29  [Irrigation].Apply(amount: 51.70935);
                1989-10-08  [Irrigation].Apply(amount: 61.4607);
                1989-10-15  [Irrigation].Apply(amount: 61.4607);
                1989-10-22  [Irrigation].Apply(amount: 61.4607);
                1989-10-29  [Irrigation].Apply(amount: 61.4607);
                1989-11-08  [Irrigation].Apply(amount: 31.21598);
                1989-11-15  [Irrigation].Apply(amount: 31.21598);
                1989-11-22  [Irrigation].Apply(amount: 31.21598);
                1989-11-29  [Irrigation].Apply(amount: 31.21598);
                1989-12-08  [Irrigation].Apply(amount: 13.73348);
                1989-12-15  [Irrigation].Apply(amount: 13.73348);
                1989-12-22  [Irrigation].Apply(amount: 13.73348);
                1989-12-29  [Irrigation].Apply(amount: 13.73348);
                1990-01-08  [Irrigation].Apply(amount: 69.50265);
                1990-01-15  [Irrigation].Apply(amount: 69.50265);
                1990-01-22  [Irrigation].Apply(amount: 69.50265);
                1990-01-29  [Irrigation].Apply(amount: 69.50265);
                1990-02-08  [Irrigation].Apply(amount: 77.19495);
                1990-02-15  [Irrigation].Apply(amount: 77.19495);
                1990-02-22  [Irrigation].Apply(amount: 77.19495);
                1990-03-01  [Irrigation].Apply(amount: 77.19495);
                1990-03-08  [Irrigation].Apply(amount: 30.6915);
                1990-03-15  [Irrigation].Apply(amount: 30.6915);
                1990-03-22  [Irrigation].Apply(amount: 30.6915);
                1990-03-29  [Irrigation].Apply(amount: 30.6915);
                1990-04-08  [Irrigation].Apply(amount: 0);
                1990-04-15  [Irrigation].Apply(amount: 0);
                1990-04-22  [Irrigation].Apply(amount: 0);
                1990-04-29  [Irrigation].Apply(amount: 0);
                1990-05-08  [Irrigation].Apply(amount: 0);
                1990-05-15  [Irrigation].Apply(amount: 0);
                1990-05-22  [Irrigation].Apply(amount: 0);
                1990-05-29  [Irrigation].Apply(amount: 0);
                1990-06-08  [Irrigation].Apply(amount: 0);
                1990-06-15  [Irrigation].Apply(amount: 0);
                1990-06-22  [Irrigation].Apply(amount: 0);
                1990-06-29  [Irrigation].Apply(amount: 0);
                1990-07-08  [Irrigation].Apply(amount: 0);
                1990-07-15  [Irrigation].Apply(amount: 0);
                1990-07-22  [Irrigation].Apply(amount: 0);
                1990-07-29  [Irrigation].Apply(amount: 0);
                1990-08-08  [Irrigation].Apply(amount: 24.82515);
                1990-08-15  [Irrigation].Apply(amount: 24.82515);
                1990-08-22  [Irrigation].Apply(amount: 24.82515);
                1990-08-29  [Irrigation].Apply(amount: 24.82515);
                1990-09-08  [Irrigation].Apply(amount: 59.9844);
                1990-09-15  [Irrigation].Apply(amount: 59.9844);
                1990-09-22  [Irrigation].Apply(amount: 59.9844);
                1990-09-29  [Irrigation].Apply(amount: 59.9844);
                1990-10-08  [Irrigation].Apply(amount: 60.70313);
                1990-10-15  [Irrigation].Apply(amount: 60.70313);
                1990-10-22  [Irrigation].Apply(amount: 60.70313);
                1990-10-29  [Irrigation].Apply(amount: 60.70313);
                1990-11-08  [Irrigation].Apply(amount: 42.22995);
                1990-11-15  [Irrigation].Apply(amount: 42.22995);
                1990-11-22  [Irrigation].Apply(amount: 42.22995);
                1990-11-29  [Irrigation].Apply(amount: 42.22995);
                1990-12-08  [Irrigation].Apply(amount: 61.0722);
                1990-12-15  [Irrigation].Apply(amount: 61.0722);
                1990-12-22  [Irrigation].Apply(amount: 61.0722);
                1990-12-29  [Irrigation].Apply(amount: 61.0722);
                1991-01-08  [Irrigation].Apply(amount: 16.02563);
                1991-01-15  [Irrigation].Apply(amount: 16.02563);
                1991-01-22  [Irrigation].Apply(amount: 16.02563);
                1991-01-29  [Irrigation].Apply(amount: 16.02563);
                1991-02-08  [Irrigation].Apply(amount: 10.29525);
                1991-02-15  [Irrigation].Apply(amount: 10.29525);
                1991-02-22  [Irrigation].Apply(amount: 10.29525);
                1991-03-01  [Irrigation].Apply(amount: 10.29525);
                1991-03-08  [Irrigation].Apply(amount: 23.73735);
                1991-03-15  [Irrigation].Apply(amount: 23.73735);
                1991-03-22  [Irrigation].Apply(amount: 23.73735);
                1991-03-29  [Irrigation].Apply(amount: 23.73735);
                1991-04-08  [Irrigation].Apply(amount: 15.54);
                1991-04-15  [Irrigation].Apply(amount: 15.54);
                1991-04-22  [Irrigation].Apply(amount: 15.54);
                1991-04-29  [Irrigation].Apply(amount: 15.54);
                1991-05-08  [Irrigation].Apply(amount: 15.9285);
                1991-05-15  [Irrigation].Apply(amount: 15.9285);
                1991-05-22  [Irrigation].Apply(amount: 15.9285);
                1991-05-29  [Irrigation].Apply(amount: 15.9285);
                1991-06-08  [Irrigation].Apply(amount: 0);
                1991-06-15  [Irrigation].Apply(amount: 0);
                1991-06-22  [Irrigation].Apply(amount: 0);
                1991-06-29  [Irrigation].Apply(amount: 0);
                1991-07-08  [Irrigation].Apply(amount: 0);
                1991-07-15  [Irrigation].Apply(amount: 0);
                1991-07-22  [Irrigation].Apply(amount: 0);
                1991-07-29  [Irrigation].Apply(amount: 0);
                1991-08-08  [Irrigation].Apply(amount: 16.51125);
                1991-08-15  [Irrigation].Apply(amount: 16.51125);
                1991-08-22  [Irrigation].Apply(amount: 16.51125);
                1991-08-29  [Irrigation].Apply(amount: 16.51125);
                1991-09-08  [Irrigation].Apply(amount: 61.63553);
                1991-09-15  [Irrigation].Apply(amount: 61.63553);
                1991-09-22  [Irrigation].Apply(amount: 61.63553);
                1991-09-29  [Irrigation].Apply(amount: 61.63553);
                1991-10-08  [Irrigation].Apply(amount: 31.7016);
                1991-10-15  [Irrigation].Apply(amount: 31.7016);
                1991-10-22  [Irrigation].Apply(amount: 31.7016);
                1991-10-29  [Irrigation].Apply(amount: 31.7016);
                1991-11-08  [Irrigation].Apply(amount: 29.04038);
                1991-11-15  [Irrigation].Apply(amount: 29.04038);
                1991-11-22  [Irrigation].Apply(amount: 29.04038);
                1991-11-29  [Irrigation].Apply(amount: 29.04038);
                1991-12-08  [Irrigation].Apply(amount: 31.08);
                1991-12-15  [Irrigation].Apply(amount: 31.08);
                1991-12-22  [Irrigation].Apply(amount: 31.08);
                1991-12-29  [Irrigation].Apply(amount: 31.08);
                1992-01-08  [Irrigation].Apply(amount: 46.7754);
                1992-01-15  [Irrigation].Apply(amount: 46.7754);
                1992-01-22  [Irrigation].Apply(amount: 46.7754);
                1992-01-29  [Irrigation].Apply(amount: 46.7754);
                1992-02-08  [Irrigation].Apply(amount: 7.7);
                1992-02-15  [Irrigation].Apply(amount: 7.7);
                1992-02-22  [Irrigation].Apply(amount: 7.7);
                1992-02-29  [Irrigation].Apply(amount: 7.7);
                1992-03-08  [Irrigation].Apply(amount: 0);
                1992-03-15  [Irrigation].Apply(amount: 0);
                1992-03-22  [Irrigation].Apply(amount: 0);
                1992-03-29  [Irrigation].Apply(amount: 0);
                1992-04-08  [Irrigation].Apply(amount: 0);
                1992-04-15  [Irrigation].Apply(amount: 0);
                1992-04-22  [Irrigation].Apply(amount: 0);
                1992-04-29  [Irrigation].Apply(amount: 0);
                1992-05-08  [Irrigation].Apply(amount: 0);
                1992-05-15  [Irrigation].Apply(amount: 0);
                1992-05-22  [Irrigation].Apply(amount: 0);
                1992-05-29  [Irrigation].Apply(amount: 0);
                1992-06-08  [Irrigation].Apply(amount: 0);
                1992-06-15  [Irrigation].Apply(amount: 0);
                1992-06-22  [Irrigation].Apply(amount: 0);
                1992-06-29  [Irrigation].Apply(amount: 0);
                1992-07-08  [Irrigation].Apply(amount: 6.41);
                1992-07-15  [Irrigation].Apply(amount: 6.41);
                1992-07-22  [Irrigation].Apply(amount: 6.41);
                1992-07-29  [Irrigation].Apply(amount: 6.41);
                1992-08-08  [Irrigation].Apply(amount: 34.965);
                1992-08-15  [Irrigation].Apply(amount: 34.965);
                1992-08-22  [Irrigation].Apply(amount: 34.965);
                1992-08-29  [Irrigation].Apply(amount: 34.965);
                1992-09-08  [Irrigation].Apply(amount: 3.885);
                1992-09-15  [Irrigation].Apply(amount: 3.885);
                1992-09-22  [Irrigation].Apply(amount: 3.885);
                1992-09-29  [Irrigation].Apply(amount: 3.885);
                1992-10-08  [Irrigation].Apply(amount: 41.35583);
                1992-10-15  [Irrigation].Apply(amount: 41.35583);
                1992-10-22  [Irrigation].Apply(amount: 41.35583);
                1992-10-29  [Irrigation].Apply(amount: 41.35583);
                1992-11-08  [Irrigation].Apply(amount: 3.69075);
                1992-11-15  [Irrigation].Apply(amount: 3.69075);
                1992-11-22  [Irrigation].Apply(amount: 3.69075);
                1992-11-29  [Irrigation].Apply(amount: 3.69075);
                1992-12-08  [Irrigation].Apply(amount: 0);
                1992-12-15  [Irrigation].Apply(amount: 0);
                1992-12-22  [Irrigation].Apply(amount: 0);
                1992-12-29  [Irrigation].Apply(amount: 0);
                1993-01-08  [Irrigation].Apply(amount: 11.79098);
                1993-01-15  [Irrigation].Apply(amount: 11.79098);
                1993-01-22  [Irrigation].Apply(amount: 11.79098);
                1993-01-29  [Irrigation].Apply(amount: 11.79098);
                1993-02-08  [Irrigation].Apply(amount: 26.37915);
                1993-02-15  [Irrigation].Apply(amount: 26.37915);
                1993-02-22  [Irrigation].Apply(amount: 26.37915);
                1993-03-01  [Irrigation].Apply(amount: 26.37915);
                1993-03-08  [Irrigation].Apply(amount: 9.51825);
                1993-03-15  [Irrigation].Apply(amount: 9.51825);
                1993-03-22  [Irrigation].Apply(amount: 9.51825);
                1993-03-29  [Irrigation].Apply(amount: 9.51825);
                1993-04-08  [Irrigation].Apply(amount: 47.64953);
                1993-04-15  [Irrigation].Apply(amount: 47.64953);
                1993-04-22  [Irrigation].Apply(amount: 47.64953);
                1993-04-29  [Irrigation].Apply(amount: 47.64953);
                1993-05-08  [Irrigation].Apply(amount: 0);
                1993-05-15  [Irrigation].Apply(amount: 0);
                1993-05-22  [Irrigation].Apply(amount: 0);
                1993-05-29  [Irrigation].Apply(amount: 0);
                1993-06-08  [Irrigation].Apply(amount: 20.70705);
                1993-06-15  [Irrigation].Apply(amount: 20.70705);
                1993-06-22  [Irrigation].Apply(amount: 20.70705);
                1993-06-29  [Irrigation].Apply(amount: 20.70705);
                1993-07-08  [Irrigation].Apply(amount: 17.19113);
                1993-07-15  [Irrigation].Apply(amount: 17.19113);
                1993-07-22  [Irrigation].Apply(amount: 17.19113);
                1993-07-29  [Irrigation].Apply(amount: 17.19113);
                1993-08-08  [Irrigation].Apply(amount: 30.56625);
                1993-08-15  [Irrigation].Apply(amount: 30.56625);
                1993-08-22  [Irrigation].Apply(amount: 30.56625);
                1993-08-29  [Irrigation].Apply(amount: 30.56625);
                1993-09-08  [Irrigation].Apply(amount: 7.724925);
                1993-09-15  [Irrigation].Apply(amount: 7.724925);
                1993-09-22  [Irrigation].Apply(amount: 7.724925);
                1993-09-29  [Irrigation].Apply(amount: 7.724925);
                1993-10-08  [Irrigation].Apply(amount: 30.381);
                1993-10-15  [Irrigation].Apply(amount: 30.381);
                1993-10-22  [Irrigation].Apply(amount: 30.381);
                1993-10-29  [Irrigation].Apply(amount: 30.381);
                1993-11-08  [Irrigation].Apply(amount: 0);
                1993-11-15  [Irrigation].Apply(amount: 0);
                1993-11-22  [Irrigation].Apply(amount: 0);
                1993-11-29  [Irrigation].Apply(amount: 0);
                1993-12-08  [Irrigation].Apply(amount: 10.50368);
                1993-12-15  [Irrigation].Apply(amount: 10.50368);
                1993-12-22  [Irrigation].Apply(amount: 10.50368);
                1993-12-29  [Irrigation].Apply(amount: 10.50368);
                1994-01-08  [Irrigation].Apply(amount: 15.38898);
                1994-01-15  [Irrigation].Apply(amount: 15.38898);
                1994-01-22  [Irrigation].Apply(amount: 15.38898);
                1994-01-29  [Irrigation].Apply(amount: 15.38898);
                1994-02-08  [Irrigation].Apply(amount: 0);
                1994-02-15  [Irrigation].Apply(amount: 0);
                1994-02-22  [Irrigation].Apply(amount: 0);
                1994-03-01  [Irrigation].Apply(amount: 0);
                1994-03-08  [Irrigation].Apply(amount: 7.7805);
                1994-03-15  [Irrigation].Apply(amount: 7.7805);
                1994-03-22  [Irrigation].Apply(amount: 7.7805);
                1994-03-29  [Irrigation].Apply(amount: 7.7805);
              Operations F
                1987-02-09  [Fertiliser].Apply(192, Fertiliser.Types.UreaN, 0);
                1987-05-20  [Fertiliser].Apply(192, Fertiliser.Types.UreaN, 0);
                1987-08-28  [Fertiliser].Apply(96, Fertiliser.Types.UreaN, 0);
                1987-12-06  [Fertiliser].Apply(256, Fertiliser.Types.UreaN, 0);
                1988-02-29  [Fertiliser].Apply(256, Fertiliser.Types.UreaN, 0);
                1988-07-18  [Fertiliser].Apply(128, Fertiliser.Types.UreaN, 0);
                1988-10-26  [Fertiliser].Apply(192, Fertiliser.Types.UreaN, 0);
                1989-06-09  [Fertiliser].Apply(128, Fertiliser.Types.UreaN, 0);
                1989-10-27  [Fertiliser].Apply(96, Fertiliser.Types.UreaN, 0);
              Operations IF
                1988-02-09  [TreeThinning].Script.DoThin(0.15);
                1988-05-19  [TreeThinning].Script.DoThin(0.33);
                1988-09-26  [TreeThinning].Script.DoThin(0.21);
                1987-02-09  [Fertiliser].Apply(192, Fertiliser.Types.UreaN, 0);
                1987-05-20  [Fertiliser].Apply(192, Fertiliser.Types.UreaN, 0);
                1987-08-28  [Fertiliser].Apply(96, Fertiliser.Types.UreaN, 0);
                1987-12-06  [Fertiliser].Apply(256, Fertiliser.Types.UreaN, 0);
                1988-02-29  [Fertiliser].Apply(256, Fertiliser.Types.UreaN, 0);
                1988-07-18  [Fertiliser].Apply(128, Fertiliser.Types.UreaN, 0);
                1988-10-26  [Fertiliser].Apply(192, Fertiliser.Types.UreaN, 0);
                1989-06-09  [Fertiliser].Apply(128, Fertiliser.Types.UreaN, 0);
                1989-10-27  [Fertiliser].Apply(96, Fertiliser.Types.UreaN, 0);
                1987-02-08  [Irrigation].Apply(amount: 2.2533);
                1987-02-15  [Irrigation].Apply(amount: 2.2533);
                1987-02-22  [Irrigation].Apply(amount: 2.2533);
                1987-03-01  [Irrigation].Apply(amount: 2.2533);
                1987-03-08  [Irrigation].Apply(amount: 25.5633);
                1987-03-15  [Irrigation].Apply(amount: 25.5633);
                1987-03-22  [Irrigation].Apply(amount: 25.5633);
                1987-03-29  [Irrigation].Apply(amount: 25.5633);
                1987-04-08  [Irrigation].Apply(amount: 21.5229);
                1987-04-15  [Irrigation].Apply(amount: 21.5229);
                1987-04-22  [Irrigation].Apply(amount: 21.5229);
                1987-04-29  [Irrigation].Apply(amount: 21.5229);
                1987-05-08  [Irrigation].Apply(amount: 13.6752);
                1987-05-15  [Irrigation].Apply(amount: 13.6752);
                1987-05-22  [Irrigation].Apply(amount: 13.6752);
                1987-05-29  [Irrigation].Apply(amount: 13.6752);
                1987-06-08  [Irrigation].Apply(amount: 0);
                1987-06-15  [Irrigation].Apply(amount: 0);
                1987-06-22  [Irrigation].Apply(amount: 0);
                1987-06-29  [Irrigation].Apply(amount: 0);
                1987-07-08  [Irrigation].Apply(amount: 17.6379);
                1987-07-15  [Irrigation].Apply(amount: 17.6379);
                1987-07-22  [Irrigation].Apply(amount: 17.6379);
                1987-07-29  [Irrigation].Apply(amount: 17.6379);
                1987-08-08  [Irrigation].Apply(amount: 7.77);
                1987-08-15  [Irrigation].Apply(amount: 7.77);
                1987-08-22  [Irrigation].Apply(amount: 7.77);
                1987-08-29  [Irrigation].Apply(amount: 7.77);
                1987-09-08  [Irrigation].Apply(amount: 16.58895);
                1987-09-15  [Irrigation].Apply(amount: 16.58895);
                1987-09-22  [Irrigation].Apply(amount: 16.58895);
                1987-09-29  [Irrigation].Apply(amount: 16.58895);
                1987-10-08  [Irrigation].Apply(amount: 15.8508);
                1987-10-15  [Irrigation].Apply(amount: 15.8508);
                1987-10-22  [Irrigation].Apply(amount: 15.8508);
                1987-10-29  [Irrigation].Apply(amount: 15.8508);
                1987-11-08  [Irrigation].Apply(amount: 20.47395);
                1987-11-15  [Irrigation].Apply(amount: 20.47395);
                1987-11-22  [Irrigation].Apply(amount: 20.47395);
                1987-11-29  [Irrigation].Apply(amount: 20.47395);
                1987-12-08  [Irrigation].Apply(amount: 19.425);
                1987-12-15  [Irrigation].Apply(amount: 19.425);
                1987-12-22  [Irrigation].Apply(amount: 19.425);
                1987-12-29  [Irrigation].Apply(amount: 19.425);
                1988-01-08  [Irrigation].Apply(amount: 15.6954);
                1988-01-15  [Irrigation].Apply(amount: 15.6954);
                1988-01-22  [Irrigation].Apply(amount: 15.6954);
                1988-01-29  [Irrigation].Apply(amount: 15.6954);
                1988-02-08  [Irrigation].Apply(amount: 39.0054);
                1988-02-15  [Irrigation].Apply(amount: 39.0054);
                1988-02-22  [Irrigation].Apply(amount: 39.0054);
                1988-02-29  [Irrigation].Apply(amount: 39.0054);
                1988-03-08  [Irrigation].Apply(amount: 42.56018);
                1988-03-15  [Irrigation].Apply(amount: 42.56018);
                1988-03-22  [Irrigation].Apply(amount: 42.56018);
                1988-03-29  [Irrigation].Apply(amount: 42.56018);
                1988-04-08  [Irrigation].Apply(amount: 0);
                1988-04-15  [Irrigation].Apply(amount: 0);
                1988-04-22  [Irrigation].Apply(amount: 0);
                1988-04-29  [Irrigation].Apply(amount: 0);
                1988-05-08  [Irrigation].Apply(amount: 0);
                1988-05-15  [Irrigation].Apply(amount: 0);
                1988-05-22  [Irrigation].Apply(amount: 0);
                1988-05-29  [Irrigation].Apply(amount: 0);
                1988-06-08  [Irrigation].Apply(amount: 0);
                1988-06-15  [Irrigation].Apply(amount: 0);
                1988-06-22  [Irrigation].Apply(amount: 0);
                1988-06-29  [Irrigation].Apply(amount: 0);
                1988-07-08  [Irrigation].Apply(amount: 0);
                1988-07-15  [Irrigation].Apply(amount: 0);
                1988-07-22  [Irrigation].Apply(amount: 0);
                1988-07-29  [Irrigation].Apply(amount: 0);
                1988-08-08  [Irrigation].Apply(amount: 7.77);
                1988-08-15  [Irrigation].Apply(amount: 7.77);
                1988-08-22  [Irrigation].Apply(amount: 7.77);
                1988-08-29  [Irrigation].Apply(amount: 7.77);
                1988-09-08  [Irrigation].Apply(amount: 9.965025);
                1988-09-15  [Irrigation].Apply(amount: 9.965025);
                1988-09-22  [Irrigation].Apply(amount: 9.965025);
                1988-09-29  [Irrigation].Apply(amount: 9.965025);
                1988-10-08  [Irrigation].Apply(amount: 40.404);
                1988-10-15  [Irrigation].Apply(amount: 40.404);
                1988-10-22  [Irrigation].Apply(amount: 40.404);
                1988-10-29  [Irrigation].Apply(amount: 40.404);
                1988-11-08  [Irrigation].Apply(amount: 49.55318);
                1988-11-15  [Irrigation].Apply(amount: 49.55318);
                1988-11-22  [Irrigation].Apply(amount: 49.55318);
                1988-11-29  [Irrigation].Apply(amount: 49.55318);
                1988-12-08  [Irrigation].Apply(amount: 12.91763);
                1988-12-15  [Irrigation].Apply(amount: 12.91763);
                1988-12-22  [Irrigation].Apply(amount: 12.91763);
                1988-12-29  [Irrigation].Apply(amount: 12.91763);
                1989-01-08  [Irrigation].Apply(amount: 11.8881);
                1989-01-15  [Irrigation].Apply(amount: 11.8881);
                1989-01-22  [Irrigation].Apply(amount: 11.8881);
                1989-01-29  [Irrigation].Apply(amount: 11.8881);
                1989-02-08  [Irrigation].Apply(amount: 15.9285);
                1989-02-15  [Irrigation].Apply(amount: 15.9285);
                1989-02-22  [Irrigation].Apply(amount: 15.9285);
                1989-03-01  [Irrigation].Apply(amount: 15.9285);
                1989-03-08  [Irrigation].Apply(amount: 23.7762);
                1989-03-15  [Irrigation].Apply(amount: 23.7762);
                1989-03-22  [Irrigation].Apply(amount: 23.7762);
                1989-03-29  [Irrigation].Apply(amount: 23.7762);
                1989-04-08  [Irrigation].Apply(amount: 0);
                1989-04-15  [Irrigation].Apply(amount: 0);
                1989-04-22  [Irrigation].Apply(amount: 0);
                1989-04-29  [Irrigation].Apply(amount: 0);
                1989-05-08  [Irrigation].Apply(amount: 0);
                1989-05-15  [Irrigation].Apply(amount: 0);
                1989-05-22  [Irrigation].Apply(amount: 0);
                1989-05-29  [Irrigation].Apply(amount: 0);
                1989-06-08  [Irrigation].Apply(amount: 0);
                1989-06-15  [Irrigation].Apply(amount: 0);
                1989-06-22  [Irrigation].Apply(amount: 0);
                1989-06-29  [Irrigation].Apply(amount: 0);
                1989-07-08  [Irrigation].Apply(amount: 0.2331);
                1989-07-15  [Irrigation].Apply(amount: 0.2331);
                1989-07-22  [Irrigation].Apply(amount: 0.2331);
                1989-07-29  [Irrigation].Apply(amount: 0.2331);
                1989-08-08  [Irrigation].Apply(amount: 12.91763);
                1989-08-15  [Irrigation].Apply(amount: 12.91763);
                1989-08-22  [Irrigation].Apply(amount: 12.91763);
                1989-08-29  [Irrigation].Apply(amount: 12.91763);
                1989-09-08  [Irrigation].Apply(amount: 51.70935);
                1989-09-15  [Irrigation].Apply(amount: 51.70935);
                1989-09-22  [Irrigation].Apply(amount: 51.70935);
                1989-09-29  [Irrigation].Apply(amount: 51.70935);
                1989-10-08  [Irrigation].Apply(amount: 61.4607);
                1989-10-15  [Irrigation].Apply(amount: 61.4607);
                1989-10-22  [Irrigation].Apply(amount: 61.4607);
                1989-10-29  [Irrigation].Apply(amount: 61.4607);
                1989-11-08  [Irrigation].Apply(amount: 31.21598);
                1989-11-15  [Irrigation].Apply(amount: 31.21598);
                1989-11-22  [Irrigation].Apply(amount: 31.21598);
                1989-11-29  [Irrigation].Apply(amount: 31.21598);
                1989-12-08  [Irrigation].Apply(amount: 13.73348);
                1989-12-15  [Irrigation].Apply(amount: 13.73348);
                1989-12-22  [Irrigation].Apply(amount: 13.73348);
                1989-12-29  [Irrigation].Apply(amount: 13.73348);
                1990-01-08  [Irrigation].Apply(amount: 69.50265);
                1990-01-15  [Irrigation].Apply(amount: 69.50265);
                1990-01-22  [Irrigation].Apply(amount: 69.50265);
                1990-01-29  [Irrigation].Apply(amount: 69.50265);
                1990-02-08  [Irrigation].Apply(amount: 77.19495);
                1990-02-15  [Irrigation].Apply(amount: 77.19495);
                1990-02-22  [Irrigation].Apply(amount: 77.19495);
                1990-03-01  [Irrigation].Apply(amount: 77.19495);
                1990-03-08  [Irrigation].Apply(amount: 30.6915);
                1990-03-15  [Irrigation].Apply(amount: 30.6915);
                1990-03-22  [Irrigation].Apply(amount: 30.6915);
                1990-03-29  [Irrigation].Apply(amount: 30.6915);
                1990-04-08  [Irrigation].Apply(amount: 0);
                1990-04-15  [Irrigation].Apply(amount: 0);
                1990-04-22  [Irrigation].Apply(amount: 0);
                1990-04-29  [Irrigation].Apply(amount: 0);
                1990-05-08  [Irrigation].Apply(amount: 0);
                1990-05-15  [Irrigation].Apply(amount: 0);
                1990-05-22  [Irrigation].Apply(amount: 0);
                1990-05-29  [Irrigation].Apply(amount: 0);
                1990-06-08  [Irrigation].Apply(amount: 0);
                1990-06-15  [Irrigation].Apply(amount: 0);
                1990-06-22  [Irrigation].Apply(amount: 0);
                1990-06-29  [Irrigation].Apply(amount: 0);
                1990-07-08  [Irrigation].Apply(amount: 0);
                1990-07-15  [Irrigation].Apply(amount: 0);
                1990-07-22  [Irrigation].Apply(amount: 0);
                1990-07-29  [Irrigation].Apply(amount: 0);
                1990-08-08  [Irrigation].Apply(amount: 24.82515);
                1990-08-15  [Irrigation].Apply(amount: 24.82515);
                1990-08-22  [Irrigation].Apply(amount: 24.82515);
                1990-08-29  [Irrigation].Apply(amount: 24.82515);
                1990-09-08  [Irrigation].Apply(amount: 59.9844);
                1990-09-15  [Irrigation].Apply(amount: 59.9844);
                1990-09-22  [Irrigation].Apply(amount: 59.9844);
                1990-09-29  [Irrigation].Apply(amount: 59.9844);
                1990-10-08  [Irrigation].Apply(amount: 60.70313);
                1990-10-15  [Irrigation].Apply(amount: 60.70313);
                1990-10-22  [Irrigation].Apply(amount: 60.70313);
                1990-10-29  [Irrigation].Apply(amount: 60.70313);
                1990-11-08  [Irrigation].Apply(amount: 42.22995);
                1990-11-15  [Irrigation].Apply(amount: 42.22995);
                1990-11-22  [Irrigation].Apply(amount: 42.22995);
                1990-11-29  [Irrigation].Apply(amount: 42.22995);
                1990-12-08  [Irrigation].Apply(amount: 61.0722);
                1990-12-15  [Irrigation].Apply(amount: 61.0722);
                1990-12-22  [Irrigation].Apply(amount: 61.0722);
                1990-12-29  [Irrigation].Apply(amount: 61.0722);
                1991-01-08  [Irrigation].Apply(amount: 16.02563);
                1991-01-15  [Irrigation].Apply(amount: 16.02563);
                1991-01-22  [Irrigation].Apply(amount: 16.02563);
                1991-01-29  [Irrigation].Apply(amount: 16.02563);
                1991-02-08  [Irrigation].Apply(amount: 10.29525);
                1991-02-15  [Irrigation].Apply(amount: 10.29525);
                1991-02-22  [Irrigation].Apply(amount: 10.29525);
                1991-03-01  [Irrigation].Apply(amount: 10.29525);
                1991-03-08  [Irrigation].Apply(amount: 23.73735);
                1991-03-15  [Irrigation].Apply(amount: 23.73735);
                1991-03-22  [Irrigation].Apply(amount: 23.73735);
                1991-03-29  [Irrigation].Apply(amount: 23.73735);
                1991-04-08  [Irrigation].Apply(amount: 15.54);
                1991-04-15  [Irrigation].Apply(amount: 15.54);
                1991-04-22  [Irrigation].Apply(amount: 15.54);
                1991-04-29  [Irrigation].Apply(amount: 15.54);
                1991-05-08  [Irrigation].Apply(amount: 15.9285);
                1991-05-15  [Irrigation].Apply(amount: 15.9285);
                1991-05-22  [Irrigation].Apply(amount: 15.9285);
                1991-05-29  [Irrigation].Apply(amount: 15.9285);
                1991-06-08  [Irrigation].Apply(amount: 0);
                1991-06-15  [Irrigation].Apply(amount: 0);
                1991-06-22  [Irrigation].Apply(amount: 0);
                1991-06-29  [Irrigation].Apply(amount: 0);
                1991-07-08  [Irrigation].Apply(amount: 0);
                1991-07-15  [Irrigation].Apply(amount: 0);
                1991-07-22  [Irrigation].Apply(amount: 0);
                1991-07-29  [Irrigation].Apply(amount: 0);
                1991-08-08  [Irrigation].Apply(amount: 16.51125);
                1991-08-15  [Irrigation].Apply(amount: 16.51125);
                1991-08-22  [Irrigation].Apply(amount: 16.51125);
                1991-08-29  [Irrigation].Apply(amount: 16.51125);
                1991-09-08  [Irrigation].Apply(amount: 61.63553);
                1991-09-15  [Irrigation].Apply(amount: 61.63553);
                1991-09-22  [Irrigation].Apply(amount: 61.63553);
                1991-09-29  [Irrigation].Apply(amount: 61.63553);
                1991-10-08  [Irrigation].Apply(amount: 31.7016);
                1991-10-15  [Irrigation].Apply(amount: 31.7016);
                1991-10-22  [Irrigation].Apply(amount: 31.7016);
                1991-10-29  [Irrigation].Apply(amount: 31.7016);
                1991-11-08  [Irrigation].Apply(amount: 29.04038);
                1991-11-15  [Irrigation].Apply(amount: 29.04038);
                1991-11-22  [Irrigation].Apply(amount: 29.04038);
                1991-11-29  [Irrigation].Apply(amount: 29.04038);
                1991-12-08  [Irrigation].Apply(amount: 31.08);
                1991-12-15  [Irrigation].Apply(amount: 31.08);
                1991-12-22  [Irrigation].Apply(amount: 31.08);
                1991-12-29  [Irrigation].Apply(amount: 31.08);
                1992-01-08  [Irrigation].Apply(amount: 46.7754);
                1992-01-15  [Irrigation].Apply(amount: 46.7754);
                1992-01-22  [Irrigation].Apply(amount: 46.7754);
                1992-01-29  [Irrigation].Apply(amount: 46.7754);
                1992-02-08  [Irrigation].Apply(amount: 7.7);
                1992-02-15  [Irrigation].Apply(amount: 7.7);
                1992-02-22  [Irrigation].Apply(amount: 7.7);
                1992-02-29  [Irrigation].Apply(amount: 7.7);
                1992-03-08  [Irrigation].Apply(amount: 0);
                1992-03-15  [Irrigation].Apply(amount: 0);
                1992-03-22  [Irrigation].Apply(amount: 0);
                1992-03-29  [Irrigation].Apply(amount: 0);
                1992-04-08  [Irrigation].Apply(amount: 0);
                1992-04-15  [Irrigation].Apply(amount: 0);
                1992-04-22  [Irrigation].Apply(amount: 0);
                1992-04-29  [Irrigation].Apply(amount: 0);
                1992-05-08  [Irrigation].Apply(amount: 0);
                1992-05-15  [Irrigation].Apply(amount: 0);
                1992-05-22  [Irrigation].Apply(amount: 0);
                1992-05-29  [Irrigation].Apply(amount: 0);
                1992-06-08  [Irrigation].Apply(amount: 0);
                1992-06-15  [Irrigation].Apply(amount: 0);
                1992-06-22  [Irrigation].Apply(amount: 0);
                1992-06-29  [Irrigation].Apply(amount: 0);
                1992-07-08  [Irrigation].Apply(amount: 6.41);
                1992-07-15  [Irrigation].Apply(amount: 6.41);
                1992-07-22  [Irrigation].Apply(amount: 6.41);
                1992-07-29  [Irrigation].Apply(amount: 6.41);
                1992-08-08  [Irrigation].Apply(amount: 34.965);
                1992-08-15  [Irrigation].Apply(amount: 34.965);
                1992-08-22  [Irrigation].Apply(amount: 34.965);
                1992-08-29  [Irrigation].Apply(amount: 34.965);
                1992-09-08  [Irrigation].Apply(amount: 3.885);
                1992-09-15  [Irrigation].Apply(amount: 3.885);
                1992-09-22  [Irrigation].Apply(amount: 3.885);
                1992-09-29  [Irrigation].Apply(amount: 3.885);
                1992-10-08  [Irrigation].Apply(amount: 41.35583);
                1992-10-15  [Irrigation].Apply(amount: 41.35583);
                1992-10-22  [Irrigation].Apply(amount: 41.35583);
                1992-10-29  [Irrigation].Apply(amount: 41.35583);
                1992-11-08  [Irrigation].Apply(amount: 3.69075);
                1992-11-15  [Irrigation].Apply(amount: 3.69075);
                1992-11-22  [Irrigation].Apply(amount: 3.69075);
                1992-11-29  [Irrigation].Apply(amount: 3.69075);
                1992-12-08  [Irrigation].Apply(amount: 0);
                1992-12-15  [Irrigation].Apply(amount: 0);
                1992-12-22  [Irrigation].Apply(amount: 0);
                1992-12-29  [Irrigation].Apply(amount: 0);
                1993-01-08  [Irrigation].Apply(amount: 11.79098);
                1993-01-15  [Irrigation].Apply(amount: 11.79098);
                1993-01-22  [Irrigation].Apply(amount: 11.79098);
                1993-01-29  [Irrigation].Apply(amount: 11.79098);
                1993-02-08  [Irrigation].Apply(amount: 26.37915);
                1993-02-15  [Irrigation].Apply(amount: 26.37915);
                1993-02-22  [Irrigation].Apply(amount: 26.37915);
                1993-03-01  [Irrigation].Apply(amount: 26.37915);
                1993-03-08  [Irrigation].Apply(amount: 9.51825);
                1993-03-15  [Irrigation].Apply(amount: 9.51825);
                1993-03-22  [Irrigation].Apply(amount: 9.51825);
                1993-03-29  [Irrigation].Apply(amount: 9.51825);
                1993-04-08  [Irrigation].Apply(amount: 47.64953);
                1993-04-15  [Irrigation].Apply(amount: 47.64953);
                1993-04-22  [Irrigation].Apply(amount: 47.64953);
                1993-04-29  [Irrigation].Apply(amount: 47.64953);
                1993-05-08  [Irrigation].Apply(amount: 0);
                1993-05-15  [Irrigation].Apply(amount: 0);
                1993-05-22  [Irrigation].Apply(amount: 0);
                1993-05-29  [Irrigation].Apply(amount: 0);
                1993-06-08  [Irrigation].Apply(amount: 20.70705);
                1993-06-15  [Irrigation].Apply(amount: 20.70705);
                1993-06-22  [Irrigation].Apply(amount: 20.70705);
                1993-06-29  [Irrigation].Apply(amount: 20.70705);
                1993-07-08  [Irrigation].Apply(amount: 17.19113);
                1993-07-15  [Irrigation].Apply(amount: 17.19113);
                1993-07-22  [Irrigation].Apply(amount: 17.19113);
                1993-07-29  [Irrigation].Apply(amount: 17.19113);
                1993-08-08  [Irrigation].Apply(amount: 30.56625);
                1993-08-15  [Irrigation].Apply(amount: 30.56625);
                1993-08-22  [Irrigation].Apply(amount: 30.56625);
                1993-08-29  [Irrigation].Apply(amount: 30.56625);
                1993-09-08  [Irrigation].Apply(amount: 7.724925);
                1993-09-15  [Irrigation].Apply(amount: 7.724925);
                1993-09-22  [Irrigation].Apply(amount: 7.724925);
                1993-09-29  [Irrigation].Apply(amount: 7.724925);
                1993-10-08  [Irrigation].Apply(amount: 30.381);
                1993-10-15  [Irrigation].Apply(amount: 30.381);
                1993-10-22  [Irrigation].Apply(amount: 30.381);
                1993-10-29  [Irrigation].Apply(amount: 30.381);
                1993-11-08  [Irrigation].Apply(amount: 0);
                1993-11-15  [Irrigation].Apply(amount: 0);
                1993-11-22  [Irrigation].Apply(amount: 0);
                1993-11-29  [Irrigation].Apply(amount: 0);
                1993-12-08  [Irrigation].Apply(amount: 10.50368);
                1993-12-15  [Irrigation].Apply(amount: 10.50368);
                1993-12-22  [Irrigation].Apply(amount: 10.50368);
                1993-12-29  [Irrigation].Apply(amount: 10.50368);
                1994-01-08  [Irrigation].Apply(amount: 15.38898);
                1994-01-15  [Irrigation].Apply(amount: 15.38898);
                1994-01-22  [Irrigation].Apply(amount: 15.38898);
                1994-01-29  [Irrigation].Apply(amount: 15.38898);
                1994-02-08  [Irrigation].Apply(amount: 0);
                1994-02-15  [Irrigation].Apply(amount: 0);
                1994-02-22  [Irrigation].Apply(amount: 0);
                1994-03-01  [Irrigation].Apply(amount: 0);
                1994-03-08  [Irrigation].Apply(amount: 7.7805);
                1994-03-15  [Irrigation].Apply(amount: 7.7805);
                1994-03-22  [Irrigation].Apply(amount: 7.7805);
                1994-03-29  [Irrigation].Apply(amount: 7.7805);
          Simulation GympieBase
            Weather: FileName=toolara8797.met
            Clock: Start=1987-02-04; End=1998-05-08
            Summary
            SoilArbitrator Soil Arbitrator
            Zone Plantation: Area=1; Slope=0; AspectAngle=0; Altitude=50
              Soil: NearestTown=Toolara State Forest; State=Queensland; Latitude=0; Longitude=0
                Comments:
                  Soil properties are based on Ross and Thompson (1991)  SOILS AT SITES SELECTED FOR
                  EUCALYPT RESEARCH IN TOOLARA
                   STATE FOREST, GYMPIE, QUEENSLAND CSIRO DIVISION OF SOILS
                   Divisional Report No. 111
                InitialWater Initial water: PercentMethod=1; FractionFull=0.8
                Physical
                  Thickness  BD    AirDry  LL15  DUL   SAT
                  100        1.5   0.01    0.05  0.15  0.18
                  300        1.6   0.01    0.05  0.15  0.18
                  600        1.68  0.01    0.05  0.15  0.18
                  1000       1.75  0.02    0.05  0.15  0.18
                  1000       1.7   0.05    0.05  0.15  0.18
                  1000       1.7   0.05    0.05  0.15  0.2
                  1000       1.7   0.05    0.05  0.15  0.2
                  1000       1.7   0.05    0.05  0.15  0.2
                  SoilCrop EucalyptusSoil: LL=[0.05, 0.05, 0.05, 0.05, 0.05, 0.05, 0.05, 0.05]; KL=[0.07, 0.07, 0.05, 0.02, 0.02, 0.02, 0.01, 0.01]; XF=[0.9, 0.8, 0.7, 0.6, 0.3, 0, 0, 0]
                WaterBalance SoilWater: SummerDate=1-Nov; SummerU=2; SummerCona=3.5; WinterDate=1-Apr; WinterU=2; WinterCona=3.5; DiffusConst=88; DiffusSlope=35.4; Salb=0.13; CN2Bare=65; CNRed=20; CNCov=0.8; Slope=0; DischargeWidth=0; CatchmentArea=0
                  Thickness  SWCON  KLAT
                  100        0.9    0
                  300        0.9    0
                  600        0.9    0
                  1000       0.9    0
                  1000       0.9    0
                  1000       0.9    0
                  1000       0.9    0
                  1000       0.9    0
                Organic: FOMCNRatio=60
                  Thickness  Carbon  SoilCNRatio  FBiom  FInert  FOM
                  100        2.2     38           0.03   0.6     0.29407
                  300        1       38           0.02   0.7     0.253108
                  600        0.5     38           0.02   0.7     0.187507
                  1000       0.2     38           0.01   0.7     0.113729
                  1000       0.12    38           0.01   0.9     0.06898
                  1000       0.1     38           0.01   0.99    0.0418385
                  1000       0.1     38           0.01   0.99    0.0253763
                  1000       0.1     38           0.01   0.99    0.0153915
                Chemical: same as Validation.Australia grandis.CoffsHarbour.CoffsHarbour.Plantation.Soil.Chemical
                Sample Initial nitrogen: Thickness=[100, 300, 600, 1000, 1000, 1000, 1000, 1000]; SWUnits=Volumetric; OCUnits=Total; PHUnits=Water
                CERESSoilTemperature
                Nutrient
              Irrigation
              Fertiliser
              SurfaceOrganicMatter: InitialResidueName=Wheat; InitialResidueType=Wheat; InitialResidueMass=2000; InitialStandingFraction=0; InitialCPR=0; InitialCNR=80
              MicroClimate: a_interception=0; b_interception=1; c_interception=0; d_interception=0; soil_albedo=0.13; SoilHeatFluxFraction=0; MinimumHeightDiffForNewLayer=0; NightInterceptionFraction=0; ReferenceHeight=0
              Plant Eucalyptus
              Manager TreeTransplantRule
                RowSpace = 2.65
                RowWidth = 3.4
                CultivarName = grandisCoffsHarbour
                SowingDate = 02/04/1987 00:00:00
                script: same as in Validation.Australia grandis.CoffsHarbour.CoffsHarbour.Plantation.TreeTransplantRule
              Operations: same as Validation.Australia grandis.Gympie.Gympie.Factors.Treatment.I
              Report: VariableNames=[Clock].Today; EventNames=[Clock].DoReport
              Manager TreeThinning
```csharp
using System.Xml.Serialization;
using Models.PMF.Interfaces;
using Models.PMF;
using Models.Core;
using System.Collections.Generic;
using System;

namespace Models
{
    [Serializable] 
    [System.Xml.Serialization.XmlInclude(typeof(Model))]
    public class Script : Model
    {
        [Link] Plant Eucalyptus;
        [Link] Clock Clock;

        [XmlIgnore] private RemovalFractions Remove { get; set; }
        
        [EventSubscribe("StartOfSimulation")]
        private void OnSimulationCommencing(object sender, EventArgs e)
        {
            Remove = new RemovalFractions();
        }
        
        [EventSubscribe("DoManagement")]
        public void DoThin(double ThinFr)
        {
            //Set up  array of remove fractions to send with Cut method.  Each member in the array corresponds to an organ in the same order they are set up in.

                //Harvest with manager specified removal fractions
                Remove.SetFractionToRemove("Friut", 0);
                Remove.SetFractionToRemove("Leaf", 0);
                Remove.SetFractionToRemove("Stem", 0);
                Remove.SetFractionToRemove("Branch", 0);
                Remove.SetFractionToRemove("FineRoot", 0);
                Remove.SetFractionToRemove("CoarseRoot", 0);
                Remove.SetFractionToRemove("Friut", 0);
                Remove.SetFractionToResidue("Leaf", ThinFr);
                Remove.SetFractionToResidue("Stem", ThinFr);
                Remove.SetFractionToResidue("Branch", ThinFr);
                Remove.SetFractionToResidue("FineRoot", ThinFr);
                Remove.SetFractionToResidue("CoarseRoot", ThinFr);
                Remove.SetThinningProportion = ThinFr;
                Eucalyptus.RemoveBiomass("Thin", Remove);
        }
    }
}
```
      Folder Wagga
        Memo
          This experiment is described in [polglase1995mineralization], [snow1999nitrogen], [snow1999modelling], [myers1996growth], and [myers1998response]. The experiment was effluent-irrigated _E. grandis,_ and weedy; only the irrigated treatement was included here.
        Simulation Wagga
          Weather: FileName=wwepp.met
          Clock: Start=1991-07-01; End=1996-06-30
          Summary
          SoilArbitrator Soil Arbitrator
          Zone Plantation: Area=1; Slope=0; AspectAngle=0; Altitude=50
            Soil: Latitude=0; Longitude=0
              InitialWater Initial water: PercentMethod=1; FractionFull=0.8
              Physical
                Thickness  BD    AirDry  LL15  DUL   SAT
                100        1.5   0.01    0.05  0.16  0.29
                300        1.6   0.01    0.05  0.15  0.29
                600        1.68  0.01    0.05  0.14  0.29
                1000       1.75  0.02    0.05  0.13  0.29
                1000       1.7   0.05    0.05  0.12  0.29
                1000       1.7   0.05    0.05  0.12  0.29
                1000       1.7   0.05    0.05  0.12  0.29
                1000       1.7   0.05    0.05  0.12  0.29
                SoilCrop EucalyptusSoil: LL=[0.05, 0.05, 0.05, 0.05, 0.05, 0.05, 0.05, 0.05]; KL=[0.07, 0.07, 0.05, 0.02, 0.02, 0.02, 0.01, 0.01]; XF=[1, 1, 1, 1, 0.3, 0.2, 0, 0]
                SoilCrop SCRUMSoil: LL=[0.05, 0.05, 0.05, 0.05, 0.05, 0.05, 0.05, 0.05]; KL=[0.07, 0.07, 0.05, 0.02, 0.02, 0.02, 0.01, 0.01]; XF=[1, 1, 1, 1, 0.3, 0.2, 0, 0]
              WaterBalance SoilWater: same as Validation.Australia grandis.CoffsHarbour.CoffsHarbour.Plantation.Soil.SoilWater
              Organic: FOMCNRatio=60
                Thickness  Carbon  SoilCNRatio  FBiom  FInert  FOM
                100        2       14.5         0.04   0.4     0.29407
                300        1       14.5         0.03   0.5     0.253108
                600        0.5     14.5         0.02   0.5     0.187507
                1000       0.2     14.5         0.01   0.5     0.113729
                1000       0.12    14.5         0.01   0.9     0.06898
                1000       0.1     14.5         0.01   0.99    0.0418385
                1000       0.1     14.5         0.01   0.99    0.0253763
                1000       0.1     14.5         0.01   0.99    0.0153915
              Chemical: same as Validation.Australia grandis.CoffsHarbour.CoffsHarbour.Plantation.Soil.Chemical
              Sample Initial nitrogen: Thickness=[100, 300, 600, 1000, 1000, 1000, 1000, 1000]; SWUnits=Volumetric; OCUnits=Total; PHUnits=Water
              CERESSoilTemperature
              Nutrient
            Irrigation
            Fertiliser
            SurfaceOrganicMatter: InitialResidueName=Wheat; InitialResidueType=Wheat; InitialResidueMass=2000; InitialStandingFraction=0; InitialCPR=0; InitialCNR=80
            MicroClimate: a_interception=0; b_interception=1; c_interception=0; d_interception=0; soil_albedo=0.13; SoilHeatFluxFraction=0; MinimumHeightDiffForNewLayer=0; NightInterceptionFraction=0; ReferenceHeight=0
            Plant Eucalyptus
            Plant SCRUM
            Manager TreeTransplantRule
              RowSpace = 3
              RowWidth = 3
              CultivarName = grandisCoffsHarbour
              SowingDate = 07/01/1991 00:00:00
              script: same as in Validation.Australia grandis.CoffsHarbour.CoffsHarbour.Plantation.TreeTransplantRule
            Operations WeedSowing
              1991-07-01  [SCRUM].Sow(population: 1, cultivar: Barley_Autumn, depth: 10, rowSpacing: 150);
            Operations FertiliserOperations: same as Validation.Australia grandis.Gympie.Gympie.Factors.Treatment.F
            Report: VariableNames=[Clock].Today; EventNames=[Clock].DoReport
            Manager AutoFertigate
              FASW = 0
              WaterDeficit = 0
              AutoIrrigationOn = True
              FASWThreshold = 0.95
              FASWDepth = 1000
              NConc = 3
```csharp
using Models.Soils.Nutrients;
using System;
using Models.Core;
using System.Collections.Generic;
using System.Text;
using Models.Soils;
using Models.Soils.Nutrients;
using Models.PMF;
using Models;
using System.Xml.Serialization;
using APSIM.Shared.Utilities;

namespace Models
{
    [Serializable] 
    public class Script : Model
    {
        public double FASW { get; set; }
        public double WaterDeficit  { get; set; }
    
        [Link] Plant Chickpea;
        [Link] Zone zone;
        [Link] Irrigation irrigation;
        [Link] Fertiliser fertiliser;
        [Link] Soil soil;
        
        [Description("Auto irrigation on?")]
        public bool AutoIrrigationOn { get; set; }
        
        [Description("Threshold fraction available water (0-1)")]
        public double FASWThreshold { get; set; }

        [Description("Soil depth (mm) to which fraction available water is calculated")]
        public double FASWDepth { get; set; }

        [Description("N Concentration in irrigation water (ppm)")]
        public double NConc { get; set; }

        [EventSubscribe("DoManagement")]
        private void OnDoManagement(object sender, EventArgs e)
        {
            CalculateFASW();
            if (AutoIrrigationOn)
            {
                if (FASW < FASWThreshold)
                {
                    double amount = WaterDeficit * 10000.0 * NConc/1000000.0;
                    irrigation.Apply(WaterDeficit, depth: 0);
                    fertiliser.Apply(Amount: amount, Type: Fertiliser.Types.NO3N);
                }
            }
        }
        
        private void CalculateFASW()
        {
            double[] LL15 = MathUtilities.Multiply(soil.LL15, soil.Thickness);
            double[] DUL = MathUtilities.Multiply(soil.DUL, soil.Thickness);
        
            int nlayr = GetLayerIndex();
            double cumdep = MathUtilities.Sum(soil.Thickness, 0, nlayr, 0.0);

            double excess_fr = MathUtilities.Divide((cumdep - FASWDepth), soil.Thickness[nlayr], 0.0);

            // note that results may be strange if swdep < ll15
            double avail_sw = (MathUtilities.Sum(soil.Water, 0, nlayr, 0.0)
                              - excess_fr * soil.Water[nlayr])
                              - (MathUtilities.Sum(LL15, 0, nlayr, 0.0)
                              - excess_fr * LL15[nlayr]);


            double pot_avail_sw = (MathUtilities.Sum(DUL, 0, nlayr, 0.0)
                                  - excess_fr * DUL[nlayr])
                                  - (MathUtilities.Sum(LL15, 0, nlayr, 0.0)
                                  - excess_fr * LL15[nlayr]);

            FASW = MathUtilities.Divide(avail_sw, pot_avail_sw, 0.0);
            WaterDeficit = MathUtilities.Constrain(pot_avail_sw - avail_sw, 0.0, 100000);
        }

        private int GetLayerIndex()
        {
            double[] cumThickness = soil.ThicknessCumulative;
            for (int i = 1; i < cumThickness.Length; i++)
            {
                if (FASWDepth < cumThickness[i])
                    return i - 1;
            }
            
            return cumThickness.Length - 1;
        }

    }
}
```
            Manager Harvesting
              Crop = [Eucalyptus]
```csharp
using Models.Soils.Nutrients;
using System;
using Models.Core;
using Models.PMF;
using Models.Soils;
using Models.Soils.Nutrients;
using Models.Utilities;
using APSIM.Shared.Utilities;

namespace Models
{
    [Serializable] 
    public class Script : Model
    {
        [Description("Crop")]
        public IPlant Crop { get; set; }
        
        [EventSubscribe("DoManagement")]
        private void OnDoManagement(object sender, EventArgs e)
        {
            if (Crop.IsReadyForHarvesting)
            {
                Crop.Harvest();
                Crop.EndCrop();
            }
        }
    }
}
```
            Report SCRUMReport: VariableNames=[Clock].Today; EventNames=[Clock].DoReport
    Folder Brazil (disabled)
      Folder Aracruz
        Memo
          These data are described in [almeida2003application] and [almeida2004parameterisation]. Two clones of _E. grandis_ are included that had measured differences in root:shoot ratio. These differences were simulated by specifiying partitioning targets as a genetic property.
        Experiment Aracruz
          Factors
            Factor Cult
              Specification=[TreeTransplantRule].Script.CultivarName=grandisC15,grandisC22
          Simulation Aracruz
            Weather: FileName=Aracruz.met
            Clock: Start=1996-02-01; End=2002-08-01
            Summary
            SoilArbitrator Soil Arbitrator
            Zone Plantation: Area=1; Slope=0; AspectAngle=0; Altitude=50
              Soil AracruzSoil: SoilType=sand; Latitude=-19.81; Longitude=40.23
                Comments=Soil data from Smethurst et al (2015) and Soares and Almeida (2001)
                InitialWater Initial water: PercentMethod=0; FractionFull=0; RelativeTo=LL15
                Physical
                  Thickness  ParticleSizeClay  BD    AirDry  LL15  DUL   SAT
                  200        18                1.45  0.01    0.11  0.2   0.39
                  200        31                1.53  0.01    0.13  0.21  0.39
                  200        39                1.6   0.01    0.14  0.26  0.39
                  200        39                1.62  0.02    0.13  0.26  0.389
                  200        42                1.57  0.05    0.13  0.28  0.389
                  500        42                1.61  0.05    0.14  0.3   0.39
                  500        42                1.62  0.05    0.15  0.29  0.389
                  1000       42                1.62  0.05    0.15  0.29  0.389
                  SoilCrop EucalyptusSoil: LL=[0.11, 0.13, 0.14, 0.13, 0.13, 0.14, 0.15, 0.15]; KL=[0.07, 0.07, 0.05, 0.02, 0.02, 0.02, 0.01, 0.01]; XF=[1, 1, 1, 1, 1, 1, 1, 0.15]
                WaterBalance SoilWater: SummerDate=1-Nov; SummerU=4; SummerCona=3.5; WinterDate=1-Apr; WinterU=4; WinterCona=3.5; DiffusConst=88; DiffusSlope=35.4; Salb=0.13; CN2Bare=65; CNRed=20; CNCov=0.8; Slope=0; DischargeWidth=0; CatchmentArea=0
                  Thickness  SWCON  KLAT
                  200        0.3    0
                  200        0.3    0
                  200        0.3    0
                  200        0.3    0
                  200        0.2    0
                  500        0.2    0
                  500        0.2    0
                  1000       0.1    0
                Organic: FOMCNRatio=197
                  Thickness  Carbon  SoilCNRatio  FBiom  FInert  FOM
                  200        1.4     12           0.06   0.05    0.152206
                  200        0.7     12           0.05   0.1     0.149192
                  200        0.3     12           0.04   0.1     0.146238
                  200        0.18    12           0.01   0.1     0.143343
                  200        0.12    12           0.01   0.7     0.140504
                  500        0.1     12           0.01   0.99    0.133652
                  500        0.01    12           0      1       0.127133
                  28000      0.01    12           0      1       0.00773099
                Chemical
                  Thickness  NO3N         NH4N         PH
                  200        5            2            4.9
                  200        2.3          2            4.9
                  400        1.65175      0.95175      4.8
                  400        0.01         0.01         4.8
                  300        0.01         0.01         4.8
                  28500      0.000164912  0.000164912  4.8
                Sample Initial nitrogen: Thickness=[220, 230, 280, 440, 360, 440, 2030, 26000]; SWUnits=Volumetric; OCUnits=Total; PHUnits=Water
                CERESSoilTemperature
                Nutrient
              Irrigation
              Fertiliser
              SurfaceOrganicMatter: InitialResidueName=Wheat; InitialResidueType=Wheat; InitialResidueMass=2000; InitialStandingFraction=0; InitialCPR=0; InitialCNR=80
              MicroClimate: a_interception=0; b_interception=1; c_interception=0; d_interception=0; soil_albedo=0.13; SoilHeatFluxFraction=0; MinimumHeightDiffForNewLayer=0; NightInterceptionFraction=0; ReferenceHeight=0
              Plant Eucalyptus
              Manager TreeTransplantRule
                RowSpace = 3
                RowWidth = 3
                CultivarName = C15
                SowingDate = 12/15/1997 00:00:00
                script: same as in Validation.Australia grandis.CoffsHarbour.CoffsHarbour.Plantation.TreeTransplantRule
              Operations FertiliserOperations
                1997-12-25  [Fertiliser].Apply(0, Fertiliser.Types.UreaN, 0);
                1998-06-25  [Fertiliser].Apply(0, Fertiliser.Types.UreaN, 0);
                1998-12-25  [Fertiliser].Apply(0, Fertiliser.Types.UreaN, 0);
              Report: VariableNames=[Clock].Today; EventNames=[Clock].DoReport
      Folder SantanadoParaiso
        Memo
          These data are described in [norgueira2005estadonutricional]. One clone of the hybrid _E. grandis_ was included, and it was grown in a factorial experiment of two levels each of irrigation and fertilisation.
        Experiment SantanadoParaiso
          Factors
            Permutation
              Factor Irr: Specification=[IrrigationOperations]
                Operations Zero
                Operations High
                  2001-10-28  [Irrigation].Apply(amount: 23.89);
                  2001-11-17  [Irrigation].Apply(amount: 33.45);
                  2001-12-17  [Irrigation].Apply(amount: 0.0);
                  2002-01-17  [Irrigation].Apply(amount: 0.0);
                  2002-02-17  [Irrigation].Apply(amount: 9.56);
                  2002-03-17  [Irrigation].Apply(amount: 40.61);
                  2002-04-17  [Irrigation].Apply(amount: 43.00);
                  2002-05-17  [Irrigation].Apply(amount: 47.78);
                  2002-06-17  [Irrigation].Apply(amount: 40.61);
                  2002-07-17  [Irrigation].Apply(amount: 14.33);
                  2002-08-17  [Irrigation].Apply(amount: 57.34);
                  2002-09-17  [Irrigation].Apply(amount: 50.17);
                  2002-10-17  [Irrigation].Apply(amount: 78.84);
                  2002-11-17  [Irrigation].Apply(amount: 38.23);
                  2002-12-17  [Irrigation].Apply(amount: 28.67);
                  2003-01-17  [Irrigation].Apply(amount: 7.17);
                  2003-02-17  [Irrigation].Apply(amount: 52.56);
                  2003-03-17  [Irrigation].Apply(amount: 71.67);
                  2003-04-17  [Irrigation].Apply(amount: 52.56);
                  2003-05-17  [Irrigation].Apply(amount: 105.12);
                  2003-06-17  [Irrigation].Apply(amount: 97.95);
                  2003-07-17  [Irrigation].Apply(amount: 114.68);
                  2003-08-17  [Irrigation].Apply(amount: 102.73);
                  2003-09-17  [Irrigation].Apply(amount: 102.73);
                  2003-10-17  [Irrigation].Apply(amount: 86.01);
                  2003-11-17  [Irrigation].Apply(amount: 57.34);
                  2003-12-17  [Irrigation].Apply(amount: 47.78);
                  2004-01-17  [Irrigation].Apply(amount: 11.95);
                  2004-02-17  [Irrigation].Apply(amount: 2.39);
                  2004-03-17  [Irrigation].Apply(amount: 11.95);
                  2004-04-17  [Irrigation].Apply(amount: 11.95);
                  2004-05-17  [Irrigation].Apply(amount: 23.89);
                  2004-06-17  [Irrigation].Apply(amount: 38.23);
                  2004-07-17  [Irrigation].Apply(amount: 38.23);
                  2004-08-17  [Irrigation].Apply(amount: 95.56);
                  2004-09-17  [Irrigation].Apply(amount: 107.51);
                  2004-10-17  [Irrigation].Apply(amount: 71.67);
                  2004-11-17  [Irrigation].Apply(amount: 59.73);
                  2004-12-17  [Irrigation].Apply(amount: 11.95);
                  2005-01-17  [Irrigation].Apply(amount: 7.17);
                  2005-02-17  [Irrigation].Apply(amount: 7.17);
                  2005-03-17  [Irrigation].Apply(amount: 0);
                  2005-04-17  [Irrigation].Apply(amount: 0);
                  2005-05-17  [Irrigation].Apply(amount: 11.95);
                  2005-06-17  [Irrigation].Apply(amount: 16.72);
                  2005-07-17  [Irrigation].Apply(amount: 62.12);
                  2005-08-17  [Irrigation].Apply(amount: 114.68);
                  2005-09-17  [Irrigation].Apply(amount: 86.01);
                  2005-10-17  [Irrigation].Apply(amount: 86.01);
                  2005-11-17  [Irrigation].Apply(amount: 2.39);
                  2005-12-17  [Irrigation].Apply(amount: 4.78);
                  2006-01-17  [Irrigation].Apply(amount: 26.28);
                  2006-02-17  [Irrigation].Apply(amount: 7.17);
              Factor N: Specification=[FertiliserOperations]
                Operations Zero
                Operations High
                  2001-10-24  [Fertiliser].Apply(14.4, Fertiliser.Types.NH4N, 0);
                  2002-08-28  [Fertiliser].Apply(32.8, Fertiliser.Types.NH4N, 0);
                  2002-09-17  [Fertiliser].Apply(32.8, Fertiliser.Types.NH4N, 0);
                  2002-10-17  [Fertiliser].Apply(32.8, Fertiliser.Types.NH4N, 0);
                  2002-11-17  [Fertiliser].Apply(32.8, Fertiliser.Types.NH4N, 0);
                  2002-12-17  [Fertiliser].Apply(32.8, Fertiliser.Types.NH4N, 0);
                  2003-01-17  [Fertiliser].Apply(32.8, Fertiliser.Types.NH4N, 0);
                  2003-02-17  [Fertiliser].Apply(32.8, Fertiliser.Types.NH4N, 0);
                  2003-03-17  [Fertiliser].Apply(32.8, Fertiliser.Types.NH4N, 0);
                  2003-04-17  [Fertiliser].Apply(32.8, Fertiliser.Types.NH4N, 0);
                  2003-05-17  [Fertiliser].Apply(32.8, Fertiliser.Types.NH4N, 0);
                  2003-06-17  [Fertiliser].Apply(32.8, Fertiliser.Types.NH4N, 0);
                  2003-07-17  [Fertiliser].Apply(32.8, Fertiliser.Types.NH4N, 0);
                  2003-08-17  [Fertiliser].Apply(32.8, Fertiliser.Types.NH4N, 0);
                  2003-09-17  [Fertiliser].Apply(32.8, Fertiliser.Types.NH4N, 0);
                  2003-10-17  [Fertiliser].Apply(32.8, Fertiliser.Types.NH4N, 0);
                  2003-11-17  [Fertiliser].Apply(32.8, Fertiliser.Types.NH4N, 0);
                  2003-12-17  [Fertiliser].Apply(32.8, Fertiliser.Types.NH4N, 0);
                  2004-01-17  [Fertiliser].Apply(32.8, Fertiliser.Types.NH4N, 0);
                  2004-02-17  [Fertiliser].Apply(32.8, Fertiliser.Types.NH4N, 0);
                  2004-03-17  [Fertiliser].Apply(32.8, Fertiliser.Types.NH4N, 0);
                  2004-04-17  [Fertiliser].Apply(32.8, Fertiliser.Types.NH4N, 0);
                  2004-05-17  [Fertiliser].Apply(32.8, Fertiliser.Types.NH4N, 0);
                  2004-06-17  [Fertiliser].Apply(32.8, Fertiliser.Types.NH4N, 0);
                  2004-07-17  [Fertiliser].Apply(32.8, Fertiliser.Types.NH4N, 0);
                  2004-08-17  [Fertiliser].Apply(32.8, Fertiliser.Types.NH4N, 0);
                  2004-09-17  [Fertiliser].Apply(32.8, Fertiliser.Types.NH4N, 0);
                  2004-10-17  [Fertiliser].Apply(32.8, Fertiliser.Types.NH4N, 0);
                  2004-11-17  [Fertiliser].Apply(32.8, Fertiliser.Types.NH4N, 0);
                  2004-12-17  [Fertiliser].Apply(32.8, Fertiliser.Types.NH4N, 0);
                  2005-01-17  [Fertiliser].Apply(32.8, Fertiliser.Types.NH4N, 0);
                  2005-02-17  [Fertiliser].Apply(32.8, Fertiliser.Types.NH4N, 0);
                  2005-03-17  [Fertiliser].Apply(32.8, Fertiliser.Types.NH4N, 0);
                  2005-04-17  [Fertiliser].Apply(32.8, Fertiliser.Types.NH4N, 0);
                  2005-05-17  [Fertiliser].Apply(32.8, Fertiliser.Types.NH4N, 0);
                  2005-06-17  [Fertiliser].Apply(32.8, Fertiliser.Types.NH4N, 0);
                  2005-07-17  [Fertiliser].Apply(32.8, Fertiliser.Types.NH4N, 0);
                  2005-08-17  [Fertiliser].Apply(32.8, Fertiliser.Types.NH4N, 0);
                  2005-09-17  [Fertiliser].Apply(32.8, Fertiliser.Types.NH4N, 0);
                  2005-10-17  [Fertiliser].Apply(32.8, Fertiliser.Types.NH4N, 0);
                  2005-11-17  [Fertiliser].Apply(32.8, Fertiliser.Types.NH4N, 0);
                  2005-12-17  [Fertiliser].Apply(32.8, Fertiliser.Types.NH4N, 0);
                  2006-01-17  [Fertiliser].Apply(32.8, Fertiliser.Types.NH4N, 0);
                  2006-02-17  [Fertiliser].Apply(32.8, Fertiliser.Types.NH4N, 0);
          Simulation SantanadoParaisoBase
            Weather: FileName=SantanadoParaiso.met
            Clock: Start=2000-10-17; End=2004-12-31
            Summary
            SoilArbitrator Soil Arbitrator
            Zone Plantation: Area=1; Slope=0; AspectAngle=0; Altitude=50
              Soil SantanadoparaisoSoil: SoilType=sand; Latitude=0; Longitude=0
                Comments=Soil data from Smethurst et al (2015) and Soares and Almeida (2001)
                InitialWater Initial water: PercentMethod=0; FractionFull=0; RelativeTo=LL15
                Physical
                  Thickness  ParticleSizeClay  BD   AirDry  LL15   DUL    SAT
                  100        65.4              1.6  0.01    0.191  0.272  0.39
                  100        65.4              1.6  0.01    0.208  0.29   0.39
                  700        35.7143           1.5  0.01    0.248  0.351  0.39
                  550        0                 1.5  0.02    0.235  0.324  0.39
                  100        0                 1.5  0.05    0.231  0.319  0.39
                  450        0                 1.5  0.05    0.231  0.319  0.39
                  2000       0                 1.5  0.05    0.231  0.319  0.39
                  SoilCrop EucalyptusSoil: LL=[0.191, 0.208, 0.248, 0.235, 0.231, 0.231, 0.231]; KL=[0.07, 0.07, 0.05, 0.02, 0.02, 0.02, 0.01]; XF=[1, 1, 1, 1, 1, 1, 1]
                WaterBalance SoilWater: SummerDate=1-Nov; SummerU=4; SummerCona=3.5; WinterDate=1-Apr; WinterU=4; WinterCona=3.5; DiffusConst=88; DiffusSlope=35.4; Salb=0.13; CN2Bare=65; CNRed=20; CNCov=0.8; Slope=0; DischargeWidth=0; CatchmentArea=0
                  Thickness  SWCON  KLAT
                  220        0.3    0
                  230        0.3    0
                  280        0.3    0
                  440        0.3    0
                  360        0.2    0
                  440        0.2    0
                  2030       0.2    0
                  26000      0.1    0
                Organic: FOMCNRatio=197
                  Thickness  Carbon  SoilCNRatio  FBiom  FInert  FOM
                  200        1.04    12           0.06   0.1     0.158881
                  200        0.68    12           0.05   0.1     0.155735
                  200        0.54    12           0.04   0.2     0.152652
                  550        0.18    12           0.01   0.3     0.144482
                  400        0.12    12           0.01   0.9     0.138817
                  450        0.1     12           0.01   0.99    0.132709
                  2000       0.01    12           0      1       0.108653
                  26000      0.01    12           0      1       0.00807004
                Chemical
                  Thickness  NO3N     NH4N      PH
                  200        5        2         4.9
                  200        2.3      2         4.7
                  200        2        1.25      4.7
                  570        0.46386  0.235789  4.8
                  360        0.01     0.01      3.7
                  440        0.01     0.01      3.7
                  2030       0        0         3.7
                  26000      0        0         3.7
                Sample Initial nitrogen: Thickness=[220, 230, 280, 440, 360, 440, 2030, 26000]; SWUnits=Volumetric; OCUnits=Total; PHUnits=Water
                CERESSoilTemperature
                Nutrient
              Irrigation
              Fertiliser
              SurfaceOrganicMatter: InitialResidueName=Wheat; InitialResidueType=Wheat; InitialResidueMass=2000; InitialStandingFraction=0; InitialCPR=0; InitialCNR=80
              MicroClimate: a_interception=0; b_interception=1; c_interception=0; d_interception=0; soil_albedo=0.13; SoilHeatFluxFraction=0; MinimumHeightDiffForNewLayer=0; NightInterceptionFraction=0; ReferenceHeight=0
              Plant Eucalyptus
              Manager TreeTransplantRule
                RowSpace = 3
                RowWidth = 3
                CultivarName = grandis
                SowingDate = 10/17/2001 00:00:00
                script: same as in Validation.Australia grandis.CoffsHarbour.CoffsHarbour.Plantation.TreeTransplantRule
              Operations FertiliserOperations: same as Validation.Brazil.SantanadoParaiso.SantanadoParaiso.Factors.Permutation.N.High
              Operations IrrigationOperations
                2001-10-17  [Irrigation].Apply(amount: 23.89);
                2001-11-17  [Irrigation].Apply(amount: 33.45);
                2001-12-17  [Irrigation].Apply(amount: 0.0);
                2002-01-17  [Irrigation].Apply(amount: 0.0);
                2002-02-17  [Irrigation].Apply(amount: 9.56);
                2002-03-17  [Irrigation].Apply(amount: 40.61);
                2002-04-17  [Irrigation].Apply(amount: 43.00);
                2002-05-17  [Irrigation].Apply(amount: 47.78);
                2002-06-17  [Irrigation].Apply(amount: 40.61);
                2002-07-17  [Irrigation].Apply(amount: 14.33);
                2002-08-17  [Irrigation].Apply(amount: 57.34);
                2002-09-17  [Irrigation].Apply(amount: 50.17);
                2002-10-17  [Irrigation].Apply(amount: 78.84);
                2002-11-17  [Irrigation].Apply(amount: 38.23);
                2002-12-17  [Irrigation].Apply(amount: 28.67);
                2003-01-17  [Irrigation].Apply(amount: 7.17);
                2003-02-17  [Irrigation].Apply(amount: 52.56);
                2003-03-17  [Irrigation].Apply(amount: 71.67);
                2003-04-17  [Irrigation].Apply(amount: 52.56);
                2003-05-17  [Irrigation].Apply(amount: 105.12);
                2003-06-17  [Irrigation].Apply(amount: 97.95);
                2003-07-17  [Irrigation].Apply(amount: 114.68);
                2003-08-17  [Irrigation].Apply(amount: 102.73);
                2003-09-17  [Irrigation].Apply(amount: 102.73);
                2003-10-17  [Irrigation].Apply(amount: 86.01);
                2003-11-17  [Irrigation].Apply(amount: 57.34);
                2003-12-17  [Irrigation].Apply(amount: 47.78);
                2004-01-17  [Irrigation].Apply(amount: 11.95);
                2004-02-17  [Irrigation].Apply(amount: 2.39);
                2004-03-17  [Irrigation].Apply(amount: 11.95);
                2004-04-17  [Irrigation].Apply(amount: 11.95);
                2004-05-17  [Irrigation].Apply(amount: 23.89);
                2004-06-17  [Irrigation].Apply(amount: 38.23);
                2004-07-17  [Irrigation].Apply(amount: 38.23);
                2004-08-17  [Irrigation].Apply(amount: 95.56);
                2004-09-17  [Irrigation].Apply(amount: 107.51);
                2004-10-17  [Irrigation].Apply(amount: 71.67);
                2004-11-17  [Irrigation].Apply(amount: 59.73);
                2004-12-17  [Irrigation].Apply(amount: 11.95);
                2005-01-17  [Irrigation].Apply(amount: 7.17);
                2005-02-17  [Irrigation].Apply(amount: 7.17);
                2005-03-17  [Irrigation].Apply(amount: 0);
                2005-04-17  [Irrigation].Apply(amount: 0);
                2005-05-17  [Irrigation].Apply(amount: 11.95);
                2005-06-17  [Irrigation].Apply(amount: 16.72);
                2005-07-17  [Irrigation].Apply(amount: 62.12);
                2005-08-17  [Irrigation].Apply(amount: 114.68);
                2005-09-17  [Irrigation].Apply(amount: 86.01);
                2005-10-17  [Irrigation].Apply(amount: 86.01);
                2005-11-17  [Irrigation].Apply(amount: 2.39);
                2005-12-17  [Irrigation].Apply(amount: 4.78);
                2006-01-17  [Irrigation].Apply(amount: 26.28);
                2006-02-17  [Irrigation].Apply(amount: 7.17);
              Report: VariableNames=[Clock].Today; EventNames=[Clock].DoReport
      Folder Curvelo
        Memo
          These data are described in [borges2009parametrizaccao]. Two clones of the hybrid E. grandis x E. urophylla were included (C3334, C3336), but their measured differences were not significantly different. Hence, clonal differences were not simulated by specifiying partitioning targets as a genetic property.
        Experiment Curvelo
          Factors
            Factor Site
              CompositeFactor CultC3334
                Specifications:
                  [TreeTransplantRule].Script.CultivarName=grandisXurophyllaC3334
                  [TreeTransplantRule].Script.SowingDate=2001-10-01
              CompositeFactor CultC3336
                Specifications:
                  [TreeTransplantRule].Script.CultivarName=grandisXurophyllaC3336
                  [TreeTransplantRule].Script.SowingDate=2003-01-01
          Simulation CurveloBase
            Weather: FileName=Curvelo.met
            Clock: Start=2001-01-01; End=2008-01-01
            Summary
            SoilArbitrator Soil Arbitrator
            Zone Plantation: Area=1; Slope=0; AspectAngle=0; Altitude=50
              Soil CurveloSoil: SoilType=sand; Latitude=0; Longitude=0
                Comments=Soil data from Smethurst et al (2015) and Soares and Almeida (2001)
                InitialWater Initial water: PercentMethod=0; FractionFull=1; RelativeTo=LL15
                Physical
                  Thickness  ParticleSizeClay  BD    AirDry  LL15  DUL   SAT   KS
                  200        78.82             1.5   0.01    0.15  0.39  0.4   1000
                  200        79.78             1.5   0.01    0.15  0.39  0.4   1000
                  200        80.71             1.5   0.01    0.2   0.38  0.4   1000
                  200        80.71             1.5   0.02    0.15  0.37  0.39  1000
                  200        80.71             1.5   0.05    0.15  0.37  0.39  1000
                  500        80.71             1.45  0.05    0.15  0.4   0.45  1000
                  500        80.71             1.45  0.05    0.15  0.42  0.45  1000
                  2000       80.71             1.3   0.05    0.15  0.45  0.5   1000
                  2000       80.71             1.5   0.05    0.2   0.37  0.39  1000
                  2000       80.71             1.5   0.05    0.2   0.37  0.39  1000
                  2000       80.71             1.5   0.05    0.2   0.37  0.39  1000
                  SoilCrop EucalyptusSoil
                    LL=[0.15, 0.15, 0.2, 0.15, 0.15, 0.15, 0.15, 0.15, 0.2, 0.2, 0.2]
                    KL=[0.07, 0.07, 0.07, 0.07, 0.07, 0.07, 0.07, 0.07, 0.07, 0.07, 0.07]
                    XF=[1, 1, 1, 1, 1, 1, 1, 1, 1, 1, 1]
                WaterBalance SoilWater: same as Validation.Brazil.SantanadoParaiso.SantanadoParaiso.SantanadoParaisoBase.Plantation.SantanadoparaisoSoil.SoilWater
                Organic: FOMCNRatio=197
                  Thickness  Carbon  SoilCNRatio  FBiom  FInert  FOM
                  220        2.45    12           0.06   0.1     0.15899
                  230        1.225   12           0.05   0.1     0.155375
                  280        0.61    12           0.05   0.1     0.151085
                  440        0.3     12           0.02   0.2     0.144581
                  360        0.15    12           0.02   0.5     0.139469
                  440        0.07    12           0.01   0.8     0.133465
                  2030       0.01    12           0      1       0.108945
                  26000      0.01    12           0      1       0.00809171
                Chemical
                  Thickness  NO3N    NH4N    PH
                  200        5       2       4.9
                  200        2.3     2       5
                  200        2       1.25    5
                  200        1.3035  0.6535  5
                  200        0.01    0.01    5
                  500        0.01    0.01    5
                  500        0.0094  0.0094  5
                Sample Initial nitrogen: Thickness=[220, 230, 280, 440, 360, 440, 2030, 26000]; SWUnits=Volumetric; OCUnits=Total; PHUnits=Water
                CERESSoilTemperature
                Nutrient
              Irrigation
              Fertiliser
              SurfaceOrganicMatter: InitialResidueName=Wheat; InitialResidueType=Wheat; InitialResidueMass=2000; InitialStandingFraction=0; InitialCPR=0; InitialCNR=80
              MicroClimate: a_interception=0; b_interception=1; c_interception=0; d_interception=0; soil_albedo=0.13; SoilHeatFluxFraction=0; MinimumHeightDiffForNewLayer=0; NightInterceptionFraction=0; ReferenceHeight=0
              Plant Eucalyptus
              Manager TreeTransplantRule
                RowSpace = 3
                RowWidth = 3
                CultivarName = grandisXurophyllaC3334
                SowingDate = 10/11/2001 00:00:00
                script: same as in Validation.Australia grandis.CoffsHarbour.CoffsHarbour.Plantation.TreeTransplantRule
              Operations FertiliserOperations
                2001-10-11  [Fertiliser].Apply(150, Fertiliser.Types.NH4N, 0);
                2002-10-11  [Fertiliser].Apply(150, Fertiliser.Types.NH4N, 0);
                2003-10-11  [Fertiliser].Apply(150, Fertiliser.Types.NH4N, 0);
              Report: VariableNames=[Clock].Today; EventNames=[Clock].DoReport
      Folder Itacambira
        Memo
          These data are described in [borges2009parametrizaccao]. Two clones of the hybrid E. grandis x E. urophylla were included (C3334, C3336), but their measured differences were not significantly different. Hence, clonal differences were not simulated by specifiying partitioning targets as a genetic property.
        Experiment Itacambira
          Factors
            Factor Site
              CompositeFactor CultC3334
                Specifications:
                  [TreeTransplantRule].Script.CultivarName=grandisXurophyllaC3334
                  [TreeTransplantRule].Script.SowingDate=2001-01-05
              CompositeFactor CultC3336
                Specifications:
                  [TreeTransplantRule].Script.CultivarName=grandisXurophyllaC3336
                  [TreeTransplantRule].Script.SowingDate=2001-03-30
          Simulation ItacambiraBase
            Weather: FileName=Itacambira.met
            Clock: Start=2000-04-06; End=2007-12-28
            Summary
            SoilArbitrator Soil Arbitrator
            Zone Plantation: Area=1; Slope=0; AspectAngle=0; Altitude=50
              Soil ItacambiraC3334Soil: SoilType=sand; Latitude=0; Longitude=0
                Comments=Soil data from Smethurst et al (2015) and Soares and Almeida (2001)
                InitialWater Initial water: PercentMethod=0; FractionFull=0; RelativeTo=LL15
                Physical
                  Thickness  ParticleSizeClay  BD   AirDry  LL15  DUL   SAT
                  200        4.56              1.6  0.01    0.22  0.35  0.39
                  200        4.05              1.6  0.01    0.22  0.32  0.39
                  400        3.38              1.5  0.01    0.22  0.32  0.39
                  200        3.38              1.5  0.02    0.22  0.34  0.39
                  500        3.38              1.5  0.05    0.22  0.34  0.39
                  500        3.38              1.5  0.05    0.22  0.34  0.39
                  2000       3.38              1.5  0.05    0.22  0.34  0.39
                  2000       3.38              1.5  0.05    0.22  0.34  0.39
                  SoilCrop EucalyptusSoil: LL=[0.22, 0.22, 0.22, 0.22, 0.22, 0.22, 0.22, 0.22]; KL=[0.07, 0.07, 0.05, 0.02, 0.02, 0.02, 0.01, 0.01]; XF=[1, 1, 1, 1, 1, 1, 1, 1]
                WaterBalance SoilWater: same as Validation.Brazil.SantanadoParaiso.SantanadoParaiso.SantanadoParaisoBase.Plantation.SantanadoparaisoSoil.SoilWater
                Organic: FOMCNRatio=197
                  Thickness  Carbon  SoilCNRatio  FBiom  FInert  FOM
                  220        1.4     12           0.06   0.1     0.15899
                  230        0.7     12           0.05   0.1     0.155375
                  280        0.3     12           0.04   0.2     0.151085
                  440        0.18    12           0.01   0.3     0.144581
                  360        0.12    12           0.01   0.9     0.139469
                  440        0.1     12           0.01   0.99    0.133465
                  2030       0.01    12           0      1       0.108945
                  26000      0.01    12           0      1       0.00809171
                Chemical
                  Thickness  NO3N    NH4N    PH
                  200        5       2       4.62
                  200        2.3     2       4.71
                  200        2       1.25    4.75
                  200        1.3035  0.6535  4.75
                  200        0.01    0.01    4.75
                  500        0.01    0.01    4.75
                  500        0.0094  0.0094  4.75
                Sample Initial nitrogen: Thickness=[220, 230, 280, 440, 360, 440, 2030, 26000]; SWUnits=Volumetric; OCUnits=Total; PHUnits=Water
                CERESSoilTemperature
                Nutrient
              Irrigation
              Fertiliser
              SurfaceOrganicMatter: InitialResidueName=Wheat; InitialResidueType=Wheat; InitialResidueMass=2000; InitialStandingFraction=0; InitialCPR=0; InitialCNR=80
              MicroClimate: a_interception=0; b_interception=1; c_interception=0; d_interception=0; soil_albedo=0.13; SoilHeatFluxFraction=0; MinimumHeightDiffForNewLayer=0; NightInterceptionFraction=0; ReferenceHeight=0
              Plant Eucalyptus
              Manager TreeTransplantRule
                RowSpace = 3
                RowWidth = 3
                CultivarName = grandisXurophyllaC3334
                SowingDate = 01/06/2001 00:00:00
                script: same as in Validation.Australia grandis.CoffsHarbour.CoffsHarbour.Plantation.TreeTransplantRule
              Operations FertiliserOperations: same as Validation.Brazil.Curvelo.Curvelo.CurveloBase.Plantation.FertiliserOperations
              Report: VariableNames=[Clock].Today; EventNames=[Clock].DoReport
      Folder MonteDourado
        Memo
          These data are described in [silva2006nutricao]. One clone of the hybrid _E. grandis x E. urophylla_ was included, and it was grown at two sites on contrasting soils.
        Simulation MonteDouradoClayey
          Weather: FileName=Montedourado.met
          Clock: Start=2000-01-01; End=2005-12-31
          Summary
          SoilArbitrator Soil Arbitrator
          Zone Clayey: Area=1; Slope=0; AspectAngle=0; Altitude=50
            Soil Clayey: SoilType=sand; Latitude=0; Longitude=0
              Comments=Soil data from Smethurst et al (2015) and Soares and Almeida (2001)
              InitialWater Initial water: PercentMethod=0; FractionFull=0; RelativeTo=LL15
              Physical
                Thickness  BD   AirDry  LL15  DUL    SAT
                100        1.6  0.01    0.16  0.396  0.396
                100        1.6  0.01    0.16  0.396  0.396
                200        1.5  0.01    0.16  0.4    0.4
                600        1.5  0.01    0.16  0.4    0.4
                500        1.5  0.01    0.16  0.4    0.4
                500        1.5  0.01    0.16  0.4    0.4
                1000       1.5  0.01    0.16  0.24   0.4
                SoilCrop EucalyptusSoil: LL=[0.01, 0.01, 0.01, 0.01, 0.01, 0.01, 0.01]; KL=[0.07, 0.07, 0.05, 0.02, 0.02, 0.02, 0.01]; XF=[1, 1, 1, 1, 1, 1, 0.1]
              WaterBalance SoilWater: SummerDate=1-Nov; SummerU=4; SummerCona=3.5; WinterDate=1-Apr; WinterU=4; WinterCona=3.5; DiffusConst=88; DiffusSlope=35.4; Salb=0.13; CN2Bare=65; CNRed=20; CNCov=0.8; Slope=0; DischargeWidth=0; CatchmentArea=0
                Thickness  SWCON  KLAT
                100        0.3    0
                100        0.3    0
                200        0.3    0
                600        0.3    0
                500        0.2    0
                500        0.2    0
                2000       0.2    0
                26000      0.1    0
              Organic: FOMCNRatio=197
                Thickness  Carbon  SoilCNRatio  FBiom  FInert  FOM
                220        2.5     12           0.06   0.1     0.15899
                230        1.25    12           0.05   0.1     0.155375
                280        0.62    12           0.04   0.2     0.151085
                440        0.18    12           0.01   0.3     0.144581
                360        0.12    12           0.01   0.9     0.139469
                440        0.1     12           0.01   0.99    0.133465
                2030       0.01    12           0      1       0.108945
                26000      0.01    12           0      1       0.00809171
              Chemical
                Thickness  NO3N    NH4N      PH
                100        5       2         4.9
                100        5       2         4.8
                200        2.3     2         4.7
                600        1.1045  0.637833  4.13
                500        0.01    0.01      4.13
                500        0.0094  0.0094    4.13
                2000       0       0         4.13
                26000      0       0         4.12
              Sample Initial nitrogen: Thickness=[220, 230, 280, 440, 360, 440, 2030, 26000]; SWUnits=Volumetric; OCUnits=Total; PHUnits=Water
              CERESSoilTemperature
              Nutrient
            Irrigation
            Fertiliser
            SurfaceOrganicMatter: InitialResidueName=Wheat; InitialResidueType=Wheat; InitialResidueMass=2000; InitialStandingFraction=0; InitialCPR=0; InitialCNR=80
            MicroClimate: a_interception=0; b_interception=1; c_interception=0; d_interception=0; soil_albedo=0.13; SoilHeatFluxFraction=0; MinimumHeightDiffForNewLayer=0; NightInterceptionFraction=0; ReferenceHeight=0
            Plant Eucalyptus
            Manager TreeTransplantRule
              RowSpace = 3
              RowWidth = 3
              CultivarName = grandisXurophylla
              SowingDate = 01/01/2001 00:00:00
              script: same as in Validation.Australia grandis.CoffsHarbour.CoffsHarbour.Plantation.TreeTransplantRule
            Operations FertiliserOperations
              2001-01-15  [Fertiliser].Apply(10, Fertiliser.Types.NH4N, 0);
            Report: VariableNames=[Clock].Today; EventNames=[Clock].DoReport
        Simulation MonteDouradoSandy
          Weather: FileName=Montedourado.met
          Clock: Start=2000-01-01; End=2005-12-31
          Summary
          SoilArbitrator Soil Arbitrator
          Zone Sandy: Area=1; Slope=0; AspectAngle=0; Altitude=50
            Soil Sandy: SoilType=sand; Latitude=0; Longitude=0
              Comments=Soil data from Smethurst et al (2015) and Soares and Almeida (2001)
              InitialWater Initial water: PercentMethod=0; FractionFull=0; RelativeTo=LL15
              Physical
                Thickness  BD   AirDry  LL15  DUL   SAT
                100        1.6  0.01    0.06  0.25  0.39
                100        1.6  0.01    0.06  0.25  0.39
                200        1.5  0.01    0.06  0.25  0.39
                600        1.5  0.01    0.06  0.25  0.39
                500        1.5  0.01    0.06  0.25  0.39
                500        1.5  0.01    0.06  0.25  0.39
                2000       1.5  0.01    0.06  0.25  0.4
                SoilCrop EucalyptusSoil: LL=[0.06, 0.06, 0.06, 0.06, 0.06, 0.06, 0.06]; KL=[0.07, 0.07, 0.05, 0.02, 0.02, 0.02, 0.01]; XF=[1, 1, 1, 1, 1, 1, 0]
              WaterBalance SoilWater: same as Validation.Brazil.MonteDourado.MonteDouradoClayey.Clayey.Clayey.SoilWater
              Organic: FOMCNRatio=197
                Thickness  Carbon  SoilCNRatio  FBiom  FInert  FOM
                220        1.1     12           0.06   0.1     0.15899
                230        0.55    12           0.05   0.1     0.155375
                280        0.25    12           0.04   0.2     0.151085
                440        0.125   12           0.01   0.3     0.144581
                360        0.07    12           0.01   0.9     0.139469
                440        0.07    12           0.01   0.99    0.133465
                2030       0.01    12           0      1       0.108945
                26000      0.01    12           0      1       0.00809171
              Chemical: same as Validation.Brazil.MonteDourado.MonteDouradoClayey.Clayey.Clayey.Chemical
              Sample Initial nitrogen: Thickness=[220, 230, 280, 440, 360, 440, 2030, 26000]; SWUnits=Volumetric; OCUnits=Total; PHUnits=Water
              CERESSoilTemperature
              Nutrient
            Irrigation
            Fertiliser
            SurfaceOrganicMatter: InitialResidueName=Wheat; InitialResidueType=Wheat; InitialResidueMass=2000; InitialStandingFraction=0; InitialCPR=0; InitialCNR=80
            MicroClimate: a_interception=0; b_interception=1; c_interception=0; d_interception=0; soil_albedo=0.13; SoilHeatFluxFraction=0; MinimumHeightDiffForNewLayer=0; NightInterceptionFraction=0; ReferenceHeight=0
            Plant Eucalyptus
            Manager TreeTransplantRule
              RowSpace = 3
              RowWidth = 3
              CultivarName = grandis
              SowingDate = 01/01/2001 00:00:00
              script: same as in Validation.Australia grandis.CoffsHarbour.CoffsHarbour.Plantation.TreeTransplantRule
            Operations FertiliserOperations
              2001-01-15  [Fertiliser].Apply(10, Fertiliser.Types.NH4N, 0);
            Report: VariableNames=[Clock].Today; EventNames=[Clock].DoReport
      Folder Paulistania
        Memo
          These data are described in [melo2015responses]. One clone of the hybrid _E. grandis x E. urophylla_ was grown with 4 rates of N fertilisation.
        Experiment Paulistania
          Factors
            Factor N: Specification=[FertiliserOperations]
              Operations 0
                2008-11-15  [Fertiliser].Apply(0, Fertiliser.Types.NH4N, 0);
              Operations 50
                2008-11-15  [Fertiliser].Apply(50, Fertiliser.Types.NH4N, 0);
              Operations 100
                2008-11-15  [Fertiliser].Apply(100, Fertiliser.Types.NH4N, 0);
              Operations 150
                2008-11-15  [Fertiliser].Apply(150, Fertiliser.Types.NH4N, 0);
          Simulation PaulistaniaBase
            Weather: FileName=Paulistania.met
            Clock: Start=2007-11-01; End=2013-11-01
            Summary
            SoilArbitrator Soil Arbitrator
            Zone Plantation: Area=1; Slope=0; AspectAngle=0; Altitude=50
              Soil PaulistaniaSoil: SoilType=sand; Latitude=0; Longitude=0
                Comments=Soil data from Smethurst et al (2015) and Soares and Almeida (2001)
                InitialWater Initial water: PercentMethod=0; FractionFull=0; RelativeTo=LL15
                Physical
                  Thickness  BD   AirDry  LL15  DUL   SAT
                  220        1.6  0.01    0.05  0.27  0.39
                  230        1.6  0.01    0.05  0.27  0.39
                  280        1.5  0.01    0.05  0.27  0.39
                  440        1.5  0.02    0.05  0.27  0.39
                  360        1.5  0.05    0.05  0.27  0.39
                  440        1.5  0.05    0.05  0.27  0.39
                  2030       1.5  0.05    0.05  0.27  0.39
                  SoilCrop EucalyptusSoil: LL=[0.05, 0.05, 0.05, 0.05, 0.05, 0.05, 0.05]; KL=[0.07, 0.07, 0.05, 0.02, 0.02, 0.02, 0.01]; XF=[1, 1, 1, 1, 1, 1, 0.1]
                WaterBalance SoilWater: same as Validation.Brazil.SantanadoParaiso.SantanadoParaiso.SantanadoParaisoBase.Plantation.SantanadoparaisoSoil.SoilWater
                Organic: FOMCNRatio=197
                  Thickness  Carbon  SoilCNRatio  FBiom  FInert  FOM
                  220        0.6     12           0.06   0.1     0.15899
                  230        0.3     12           0.05   0.1     0.155375
                  280        0.2     12           0.04   0.2     0.151085
                  440        0.1     12           0.01   0.3     0.144581
                  360        0.05    12           0.01   0.9     0.139469
                  440        0.05    12           0.01   0.99    0.133465
                  2030       0.05    12           0.01   0.99    0.108945
                  26000      0       12           0.01   0.99    0.00809171
                Chemical
                  Thickness  NO3N  NH4N  PH
                  220        5     2     4.9
                  230        2     2     4.7
                  280        2     1     4.7
                  440        0.01  0.01  4.8
                  360        0.01  0.01  3.7
                  440        0.01  0.01  3.7
                  2030       0     0     3.7
                  26000      0     0     3.7
                Sample Initial nitrogen: Thickness=[220, 230, 280, 440, 360, 440, 2030, 26000]; SWUnits=Volumetric; OCUnits=Total; PHUnits=Water
                CERESSoilTemperature
                Nutrient
              Irrigation
              Fertiliser
              SurfaceOrganicMatter: InitialResidueName=Wheat; InitialResidueType=Wheat; InitialResidueMass=2000; InitialStandingFraction=0; InitialCPR=0; InitialCNR=80
              MicroClimate: a_interception=0; b_interception=1; c_interception=0; d_interception=0; soil_albedo=0.13; SoilHeatFluxFraction=0; MinimumHeightDiffForNewLayer=0; NightInterceptionFraction=0; ReferenceHeight=0
              Plant Eucalyptus
              Manager TreeTransplantRule
                RowSpace = 3
                RowWidth = 3
                CultivarName = grandisXurophylla
                SowingDate = 11/01/2008 00:00:00
                script: same as in Validation.Australia grandis.CoffsHarbour.CoffsHarbour.Plantation.TreeTransplantRule
              Operations FertiliserOperations
                2008-11-15  [Fertiliser].Apply(0, Fertiliser.Types.NH4N, 0);
              Report: VariableNames=[Clock].Today; EventNames=[Clock].DoReport
      Folder Ribasdoriopardo
        Memo
          These data are described in [melo2015responses]. One clone of the hybrid _E. grandis x E. urophylla_ was grown with 4 rates of N fertilisation.
        Experiment Ribasdoriopardo
          Factors: same as Validation.Brazil.Paulistania.Paulistania.Factors
          Simulation RibasdoriopardoBase
            Weather: FileName=Ribasdoriopardo.met
            Clock: Start=2007-11-01; End=2013-11-01
            Summary
            SoilArbitrator Soil Arbitrator
            Zone Plantation: Area=1; Slope=0; AspectAngle=0; Altitude=50
              Soil RibasdoriopardoSoil: SoilType=sand; Latitude=0; Longitude=0
                Comments=Soil data from Smethurst et al (2015) and Soares and Almeida (2001)
                InitialWater Initial water: PercentMethod=0; FractionFull=0; RelativeTo=LL15
                Physical
                  Thickness  BD   AirDry  LL15  DUL   SAT
                  220        1.6  0.01    0.03  0.26  0.31
                  230        1.6  0.01    0.03  0.26  0.31
                  280        1.5  0.01    0.03  0.26  0.31
                  440        1.5  0.01    0.03  0.26  0.31
                  360        1.5  0.01    0.03  0.26  0.31
                  440        1.5  0.01    0.03  0.26  0.31
                  2030       1.5  0.01    0.03  0.26  0.31
                  SoilCrop EucalyptusSoil: LL=[0.03, 0.03, 0.03, 0.03, 0.03, 0.03, 0.03]; KL=[0.07, 0.07, 0.05, 0.02, 0.02, 0.02, 0.01]; XF=[1, 1, 1, 1, 1, 1, 0]
                WaterBalance SoilWater: same as Validation.Brazil.SantanadoParaiso.SantanadoParaiso.SantanadoParaisoBase.Plantation.SantanadoparaisoSoil.SoilWater
                Organic: FOMCNRatio=197
                  Thickness  Carbon  SoilCNRatio  FBiom  FInert  FOM
                  220        0.81    12           0.05   0.25    0.15899
                  230        0.4     12           0.04   0.2     0.155375
                  280        0.2     12           0.04   0.3     0.151085
                  440        0.1     12           0.01   0.3     0.144581
                  360        0.05    12           0.01   0.9     0.139469
                  440        0.03    12           0.01   0.99    0.133465
                  2030       0.01    12           0      1       0.108945
                  26000      0.01    12           0      1       0.00809171
                Chemical
                  Thickness  NO3N  NH4N  PH
                  220        5     2     4.65
                  230        2     2     4.65
                  280        2     1     4.65
                  440        0.01  0.01  4.65
                  360        0.01  0.01  3.7
                  440        0.01  0.01  3.7
                  2030       0     0     3.7
                  26000      0     0     3.7
                Sample Initial nitrogen: Thickness=[220, 230, 280, 440, 360, 440, 2030, 26000]; SWUnits=Volumetric; OCUnits=Total; PHUnits=Water
                CERESSoilTemperature
                Nutrient
              Irrigation
              Fertiliser
              SurfaceOrganicMatter: InitialResidueName=Wheat; InitialResidueType=Wheat; InitialResidueMass=2000; InitialStandingFraction=0; InitialCPR=0; InitialCNR=80
              MicroClimate: a_interception=0; b_interception=1; c_interception=0; d_interception=0; soil_albedo=0.13; SoilHeatFluxFraction=0; MinimumHeightDiffForNewLayer=0; NightInterceptionFraction=0; ReferenceHeight=0
              Plant Eucalyptus
              Manager TreeTransplantRule: same as Validation.Brazil.Paulistania.Paulistania.PaulistaniaBase.Plantation.TreeTransplantRule
              Operations FertiliserOperations
                2008-01-15  [Fertiliser].Apply(0, Fertiliser.Types.NH4N, 0);
              Report: VariableNames=[Clock].Today; EventNames=[Clock].DoReport
      Folder Mogiguacu
        Memo
          These data are described in [melo2015responses]. One clone of the hybrid _E. grandis x E. urophylla_ was grown with 4 rates of N fertilisation.
        Experiment Mogiguacu
          Factors
            Factor N: Specification=[FertiliserOperations]
              Operations 0
                2009-11-15  [Fertiliser].Apply(0, Fertiliser.Types.NH4N, 0);
              Operations 50
                2009-11-15  [Fertiliser].Apply(50, Fertiliser.Types.NH4N, 0);
              Operations 100
                2009-11-15  [Fertiliser].Apply(100, Fertiliser.Types.NH4N, 0);
              Operations 150
                2009-11-15  [Fertiliser].Apply(150, Fertiliser.Types.NH4N, 0);
          Simulation MogiguacuBase
            Weather: FileName=Mogiguacu.met
            Clock: Start=2007-11-01; End=2013-11-01
            Summary
            SoilArbitrator Soil Arbitrator
            Zone Plantation: Area=1; Slope=0; AspectAngle=0; Altitude=50
              Soil MogiguacuSoil: SoilType=sand; Latitude=0; Longitude=0
                Comments=Soil data from Smethurst et al (2015) and Soares and Almeida (2001)
                InitialWater Initial water: PercentMethod=0; FractionFull=0; RelativeTo=LL15
                Physical
                  Thickness  BD   AirDry  LL15  DUL   SAT
                  220        1.6  0.01    0.06  0.32  0.39
                  230        1.6  0.01    0.06  0.32  0.39
                  280        1.5  0.01    0.06  0.32  0.39
                  440        1.5  0.02    0.06  0.32  0.39
                  360        1.5  0.05    0.06  0.32  0.39
                  440        1.5  0.05    0.06  0.32  0.39
                  2030       1.5  0.05    0.06  0.32  0.39
                  SoilCrop EucalyptusSoil: LL=[0.06, 0.06, 0.06, 0.06, 0.06, 0.06, 0.06]; KL=[0.07, 0.07, 0.05, 0.02, 0.02, 0.02, 0.01]; XF=[1, 1, 1, 1, 1, 1, 0.1]
                WaterBalance SoilWater: same as Validation.Brazil.SantanadoParaiso.SantanadoParaiso.SantanadoParaisoBase.Plantation.SantanadoparaisoSoil.SoilWater
                Organic: FOMCNRatio=197
                  Thickness  Carbon  SoilCNRatio  FBiom  FInert  FOM
                  220        0.93    12           0.06   0.1     0.15899
                  230        0.47    12           0.05   0.1     0.155375
                  280        0.23    12           0.04   0.2     0.151085
                  440        0.12    12           0.01   0.3     0.144581
                  360        0.06    12           0.01   0.9     0.139469
                  440        0.05    12           0.01   0.99    0.133465
                  2030       0.05    12           0.01   0.99    0.108945
                  26000      0       12           0.01   0.99    0.00809171
                Chemical
                  Thickness  NO3N  NH4N  PH
                  220        5     2     4.55
                  230        2     2     4.55
                  280        2     1     4.55
                  440        0.01  0.01  4.55
                  360        0.01  0.01  3.7
                  440        0.01  0.01  3.7
                  2030       0     0     3.7
                  26000      0     0     3.7
                Sample Initial nitrogen: Thickness=[220, 230, 280, 440, 360, 440, 2030, 26000]; SWUnits=Volumetric; OCUnits=Total; PHUnits=Water
                CERESSoilTemperature
                Nutrient
              Irrigation
              Fertiliser
              SurfaceOrganicMatter: InitialResidueName=Wheat; InitialResidueType=Wheat; InitialResidueMass=2000; InitialStandingFraction=0; InitialCPR=0; InitialCNR=80
              MicroClimate: a_interception=0; b_interception=1; c_interception=0; d_interception=0; soil_albedo=0.13; SoilHeatFluxFraction=0; MinimumHeightDiffForNewLayer=0; NightInterceptionFraction=0; ReferenceHeight=0
              Plant Eucalyptus
              Manager TreeTransplantRule
                RowSpace = 3
                RowWidth = 3
                CultivarName = urophyllaXglobulus
                SowingDate = 11/01/2009 00:00:00
                script: same as in Validation.Australia grandis.CoffsHarbour.CoffsHarbour.Plantation.TreeTransplantRule
              Operations FertiliserOperations
                2009-11-15  [Fertiliser].Apply(0, Fertiliser.Types.NH4N, 0);
              Report: VariableNames=[Clock].Today; EventNames=[Clock].DoReport
      Folder Luisantonio
        Experiment Luisantonio
          Factors
            Factor N: Specification=[FertiliserOperations]
              Operations 0
                2009-11-01  [Fertiliser].Apply(0, Fertiliser.Types.NH4N, 0);
              Operations 50
                2009-11-01  [Fertiliser].Apply(50, Fertiliser.Types.NH4N, 0);
              Operations 100
                2009-11-01  [Fertiliser].Apply(100, Fertiliser.Types.NH4N, 0);
              Operations 150
                2009-11-01  [Fertiliser].Apply(150, Fertiliser.Types.NH4N, 0);
          Simulation LuisantonioBase
            Weather: FileName=Luisantonio.met
            Clock: Start=2007-11-01; End=2013-11-01
            Summary
            SoilArbitrator Soil Arbitrator
            Zone Plantation: Area=1; Slope=0; AspectAngle=0; Altitude=50
              Soil LuisAntonioSoil: Latitude=0; Longitude=0
                InitialWater Initial water: PercentMethod=0; FractionFull=1; RelativeTo=LL15
                Physical
                  Thickness  BD   AirDry  LL15  DUL   SAT
                  220        1.6  0.01    0.04  0.27  0.39
                  230        1.6  0.01    0.04  0.27  0.39
                  280        1.5  0.01    0.04  0.27  0.39
                  440        1.5  0.02    0.04  0.27  0.39
                  360        1.5  0.02    0.04  0.27  0.39
                  440        1.5  0.02    0.04  0.27  0.39
                  2030       1.5  0.02    0.04  0.27  0.39
                  SoilCrop EucalyptusSoil: LL=[0.04, 0.04, 0.04, 0.04, 0.04, 0.04, 0.04]; KL=[0.07, 0.07, 0.05, 0.02, 0.02, 0.02, 0.01]; XF=[1, 1, 1, 1, 1, 1, 0.2]
                WaterBalance SoilWater: same as Validation.Brazil.SantanadoParaiso.SantanadoParaiso.SantanadoParaisoBase.Plantation.SantanadoparaisoSoil.SoilWater
                Organic: FOMCNRatio=197
                  Thickness  Carbon  SoilCNRatio  FBiom  FInert  FOM
                  220        1.2     11           0.06   0.01    0.15899
                  230        0.7     11           0.06   0.01    0.155375
                  280        0.28    11           0.06   0.01    0.151085
                  440        0.14    11           0.04   0.3     0.144581
                  360        0.07    11           0.01   0.9     0.139469
                  440        0.04    11           0.01   0.99    0.133465
                  2030       0.01    11           0      1       0.108945
                  26000      0.01    11           0      1       0.00809171
                Chemical
                  Thickness  NO3N  NH4N  PH
                  220        5     2     4.2
                  230        2     2     4.2
                  280        2     1     4.2
                  440        0.01  0.01  4.2
                  360        0.01  0.01  4.2
                  440        0.01  0.01  4.2
                  2030       0     0     4.2
                  26000      0     0     4.2
                Sample Initial nitrogen: Thickness=[220, 230, 280, 440, 360, 440, 2030, 26000]; SWUnits=Volumetric; OCUnits=Total; PHUnits=Water
                CERESSoilTemperature
                Nutrient
              Irrigation
              Fertiliser
              SurfaceOrganicMatter: InitialResidueName=Wheat; InitialResidueType=Wheat; InitialResidueMass=2000; InitialStandingFraction=0; InitialCPR=0; InitialCNR=80
              MicroClimate: a_interception=0; b_interception=1; c_interception=0; d_interception=0; soil_albedo=0.13; SoilHeatFluxFraction=0; MinimumHeightDiffForNewLayer=0; NightInterceptionFraction=0; ReferenceHeight=0
              Plant Eucalyptus
              Manager TreeTransplantRule
                RowSpace = 3
                RowWidth = 3
                CultivarName = urophyllaXglobulus
                SowingDate = 11/15/2009 00:00:00
                script: same as in Validation.Australia grandis.CoffsHarbour.CoffsHarbour.Plantation.TreeTransplantRule
              Operations FertiliserOperations
                2009-11-01  [Fertiliser].Apply(0, Fertiliser.Types.NH4N, 0);
              Report: VariableNames=[Clock].Today; EventNames=[Clock].DoReport
        Memo
          These data are described in [melo2015responses]. One clone of the hybrid _E. grandis x E. urophylla_ was grown with 4 rates of N fertilisation.
    Folder Australia Temperate
      Folder Westfield (disabled)
        Memo: same as Validation.Australia grandis.Gympie.Memo
        Experiment Westfield
          Factors
            Factor T: Specification=[Operations]
              Operations 1N0
                1993-02-15  [TreeThinning].Script.DoThin(0.00);
                1994-02-15  [TreeThinning].Script.DoThin(0.00);
                1995-02-15  [TreeThinning].Script.DoThin(0.00);
                1996-02-15  [TreeThinning].Script.DoThin(0.00);
                1997-02-15  [TreeThinning].Script.DoThin(0.00);
                1998-02-15  [TreeThinning].Script.DoThin(0.00);
                1999-02-15  [TreeThinning].Script.DoThin(0.01);
                2000-02-15  [TreeThinning].Script.DoThin(0.00);
                2001-02-15  [TreeThinning].Script.DoThin(0.00);
                2002-02-15  [TreeThinning].Script.DoThin(0.03);
              Operations 2N950
                1992-12-15  [Fertiliser].Apply(75, Fertiliser.Types.NH4N, 0);
                1994-12-15  [Fertiliser].Apply(75, Fertiliser.Types.NH4N, 0);
                1998-10-15  [Fertiliser].Apply(400, Fertiliser.Types.NH4N, 0);
                2001-10-15  [Fertiliser].Apply(400, Fertiliser.Types.NH4N, 0);
                1993-02-15  [TreeThinning].Script.DoThin(0.00);
                1994-02-15  [TreeThinning].Script.DoThin(0.05);
                1995-02-15  [TreeThinning].Script.DoThin(0.00);
                1996-02-15  [TreeThinning].Script.DoThin(0.00);
                1997-02-15  [TreeThinning].Script.DoThin(0.00);
                1998-02-15  [TreeThinning].Script.DoThin(0.00);
                1999-02-15  [TreeThinning].Script.DoThin(0.00);
                2000-02-15  [TreeThinning].Script.DoThin(0.00);
                2001-02-15  [TreeThinning].Script.DoThin(0.02);
                2002-02-15  [TreeThinning].Script.DoThin(0.03);
              Operations 3N300
                1992-12-15  [Fertiliser].Apply(150, Fertiliser.Types.NH4N, 0);
                1994-12-15  [Fertiliser].Apply(150, Fertiliser.Types.NH4N, 0);
                1993-02-15  [TreeThinning].Script.DoThin(0.00);
                1994-02-15  [TreeThinning].Script.DoThin(0.05);
                1995-02-15  [TreeThinning].Script.DoThin(0.02);
                1996-02-15  [TreeThinning].Script.DoThin(0.00);
                1997-02-15  [TreeThinning].Script.DoThin(0.01);
                1998-02-15  [TreeThinning].Script.DoThin(0.00);
                1999-02-15  [TreeThinning].Script.DoThin(0.00);
                2000-02-15  [TreeThinning].Script.DoThin(0.00);
                2001-02-15  [TreeThinning].Script.DoThin(0.00);
                2002-02-15  [TreeThinning].Script.DoThin(0.01);
              Operations 4N600
                1992-12-15  [Fertiliser].Apply(300, Fertiliser.Types.NH4N, 0);
                1994-12-15  [Fertiliser].Apply(300, Fertiliser.Types.NH4N, 0);
                1993-02-15  [TreeThinning].Script.DoThin(0.01);
                1994-02-15  [TreeThinning].Script.DoThin(0.01);
                1995-02-15  [TreeThinning].Script.DoThin(0.00);
                1996-02-15  [TreeThinning].Script.DoThin(0.00);
                1997-02-15  [TreeThinning].Script.DoThin(0.00);
                1998-02-15  [TreeThinning].Script.DoThin(0.00);
                1999-02-15  [TreeThinning].Script.DoThin(0.00);
                2000-02-15  [TreeThinning].Script.DoThin(0.00);
                2001-02-15  [TreeThinning].Script.DoThin(0.00);
                2002-02-15  [TreeThinning].Script.DoThin(0.00);
              Operations 5N2000
                1992-12-15  [Fertiliser].Apply(600, Fertiliser.Types.NH4N, 0);
                1994-12-15  [Fertiliser].Apply(600, Fertiliser.Types.NH4N, 0);
                1998-10-15  [Fertiliser].Apply(400, Fertiliser.Types.NH4N, 0);
                2001-10-15  [Fertiliser].Apply(400, Fertiliser.Types.NH4N, 0);
                1993-02-15  [TreeThinning].Script.DoThin(0.03);
                1994-02-15  [TreeThinning].Script.DoThin(0.01);
                1995-02-15  [TreeThinning].Script.DoThin(0.00);
                1996-02-15  [TreeThinning].Script.DoThin(0.00);
                1997-02-15  [TreeThinning].Script.DoThin(0.01);
                1998-02-15  [TreeThinning].Script.DoThin(0.01);
                1999-02-15  [TreeThinning].Script.DoThin(0.01);
                2000-02-15  [TreeThinning].Script.DoThin(0.01);
                2001-02-15  [TreeThinning].Script.DoThin(0.01);
                2002-02-15  [TreeThinning].Script.DoThin(0.04);
              Operations 6N1200
                1992-12-15  [Fertiliser].Apply(300, Fertiliser.Types.NH4N, 0);
                1993-12-15  [Fertiliser].Apply(300, Fertiliser.Types.NH4N, 0);
                1994-12-15  [Fertiliser].Apply(300, Fertiliser.Types.NH4N, 0);
                1995-12-15  [Fertiliser].Apply(300, Fertiliser.Types.NH4N, 0);
                1993-02-15  [TreeThinning].Script.DoThin(0.03);
                1994-02-15  [TreeThinning].Script.DoThin(0.00);
                1995-02-15  [TreeThinning].Script.DoThin(0.00);
                1996-02-15  [TreeThinning].Script.DoThin(0.01);
                1997-02-15  [TreeThinning].Script.DoThin(0.01);
                1998-02-15  [TreeThinning].Script.DoThin(0.01);
                1999-02-15  [TreeThinning].Script.DoThin(0.01);
                2000-02-15  [TreeThinning].Script.DoThin(0.01);
                2001-02-15  [TreeThinning].Script.DoThin(0.00);
                2002-02-15  [TreeThinning].Script.DoThin(0.03);
          Simulation WestfieldBase
            Clock: Start=1992-10-01; End=2003-08-15
            Weather: FileName=Westfield.met
            Summary
            SoilArbitrator Soil Arbitrator
            Zone Plantation: Area=1; Slope=0; AspectAngle=0; Altitude=50
              Soil SoilWestfield: NearestTown=Maydena; State=Tasmania; Latitude=-42.65; Longitude=146.47; Comments=Papers by Smethurst et al
                Physical PAWC etc
                  Thickness  BD    AirDry  LL15  DUL   SAT
                  100        0.9   0.3     0.3   0.48  0.65
                  200        0.92  0.02    0.46  0.63  0.65
                  300        1.1   0.02    0.44  0.55  0.55
                  400        1.1   0.02    0.29  0.35  0.4
                  SoilCrop EucalyptusSoil: LL=[0.3, 0.46, 0.44, 0.15]; KL=[0.02, 0.02, 0.05, 0.05]; XF=[1, 1, 1, 1]
                WaterBalance SoilWater: SummerDate=1-Nov; SummerU=6; SummerCona=15; WinterDate=1-Apr; WinterU=6; WinterCona=15; DiffusConst=40; DiffusSlope=20; Salb=0.13; CN2Bare=90; CNRed=20; CNCov=0.8
                  Thickness  SWCON  KLAT
                  100        0.6    0
                  200        0.5    0
                  300        0.5    0
                  400        0.4    0
                SoilNitrogen: fom_types=[default, manure, mucuna, lablab, shemp, stable]; fract_carb=[0.2, 0.3, 0.54, 0.57, 0.45, 0]; fract_cell=[0.7, 0.3, 0.37, 0.37, 0.47, 0.1]; fract_lign=[0.1, 0.4, 0.09, 0.06, 0.08, 0.9]; NPartitionApproach=0
                  SoilNitrogenNO3 NO3
                  SoilNitrogenNH4 NH4
                  SoilNitrogenUrea Urea
                  SoilNitrogenPlantAvailableNO3 PlantAvailableNO3
                  SoilNitrogenPlantAvailableNH4 PlantAvailableNH4
                Organic: FOMCNRatio=60
                  Thickness  Carbon  SoilCNRatio  FBiom  FInert  FOM
                  100        8.1     20           0.01   0.005   1
                  200        6.1     15           0.01   0.005   1
                  300        3.1     13           0.01   0.005   1
                  400        1       13           0.01   0.005   1
                Chemical
                  Thickness  NO3N  NH4N  PH
                  100        10    5     4.7
                  200        5     2     4.7
                  300        2     1     4.7
                  400        1     1     4.7
                Sample Initial nitrogen: SWUnits=Volumetric; OCUnits=Total; PHUnits=Water
                  Thickness  NO3N  NH4N  SW
                  100        58    29    0.55
                  200        11    6     0.61
                  300        15    7     0.5
                  400        7     3     0.35
                CERESSoilTemperature
              Fertiliser
              SurfaceOrganicMatter: InitialResidueName=Wheat; InitialResidueType=Wheat; InitialResidueMass=1000; InitialStandingFraction=0; InitialCPR=0; InitialCNR=50
              MicroClimate: a_interception=0; b_interception=1; c_interception=1; d_interception=2; soil_albedo=0.2; SoilHeatFluxFraction=0.5; MinimumHeightDiffForNewLayer=0; NightInterceptionFraction=0; ReferenceHeight=0
              Operations
              Report: VariableNames=[Clock].Today; EventNames=[Clock].DoReport
              Manager TreeThinning
```csharp
using System.Xml.Serialization;
using Models.PMF.Interfaces;
using Models.PMF;
using Models.Core;
using System.Collections.Generic;
using System;

namespace Models
{
    [Serializable] 
    [System.Xml.Serialization.XmlInclude(typeof(Model))]
    public class Script : Model
    {
        [Link] Plant Eucalyptus;
        [Link] Clock Clock;

        [XmlIgnore] private RemovalFractions Remove { get; set; }
        
        [EventSubscribe("StartOfSimulation")]
        private void OnSimulationCommencing(object sender, EventArgs e)
        {
            Remove = new RemovalFractions();
        }
        
        [EventSubscribe("DoManagement")]
        public void DoThin(double ThinFr)
        {
            //Set up  array of remove fractions to send with Cut method.  Each member in the array corresponds to an organ in the same order they are set up in.

                //Harvest with manager specified removal fractions
                Remove.SetFractionToRemove("Leaf", 0);
                Remove.SetFractionToRemove("Stem", 0);
                Remove.SetFractionToRemove("Branch", 0);
                Remove.SetFractionToRemove("FineRoot", 0);
                Remove.SetFractionToRemove("CoarseRoot", 0);
                Remove.SetFractionToResidue("Leaf", ThinFr);
                Remove.SetFractionToResidue("Stem", ThinFr);
                Remove.SetFractionToResidue("Branch", ThinFr);
                Remove.SetFractionToResidue("FineRoot", ThinFr);
                Remove.SetFractionToResidue("CoarseRoot", ThinFr);
                Remove.SetThinningProportion = ThinFr;
                Eucalyptus.RemoveBiomass("Thin", Remove);
        }
    }
}
```
              Manager TreeManagement
                TimeSincePlanting = 0
                RowSpace = 2.65
                RowWidth = 3.4
                CultivarName = nitens
                PlantingDate = 15-Oct
                HarvestAge = 10.003
                FertAmount = 0
```csharp
using APSIM.Shared.Utilities;
using Models.PMF;
using Models.Core;
using System;

namespace Models
{
    [Serializable] 
    [System.Xml.Serialization.XmlInclude(typeof(Model))]
    public class Script : Model
    {
        [Link] Plant Plant;
        [Link] Clock Clock;
        [Link] Fertiliser Fertiliser;

        public double TimeSincePlanting {get; set;}

        [Description("Spacing (m) between plants within rows")]
        public double RowSpace { get; set; }

        [Description("Spacing (m) between rows")]
        public double RowWidth { get; set; }

        [Description("Cultivar")]
        [Display(Type=DisplayType.CultivarName)]
        public string CultivarName { get; set; }

        [Description("Planting Date (dd-mmm)")]
        public String PlantingDate { get; set; }

        [Description("Harvest Age (years)")]
        public double HarvestAge { get; set; }

        [Description("Amount of fertiliser N to be applied at planting (kg N/ha)")]
        public double FertAmount { get; set; }

        [EventSubscribe("DoManagement")]
        private void OnDoManagement(object sender, EventArgs e)
        {
            double PlantPopulation = 1 / (RowWidth * RowSpace);
            double RowWidthmm = RowWidth * 1000;

            if (DateUtilities.WithinDates(PlantingDate, Clock.Today, PlantingDate) && !Plant.IsAlive)
            {
                Plant.Sow(population: PlantPopulation, 
                    cultivar: CultivarName, 
                    depth: 100, 
                    rowSpacing: RowWidthmm);
                TimeSincePlanting = 0;
                Fertiliser.Apply(Amount: FertAmount, Type: Fertiliser.Types.NO3N);
            }

            if (TimeSincePlanting > HarvestAge && Plant.IsAlive)
            {
               Plant.Harvest();
               Plant.EndCrop();         
               TimeSincePlanting = 0;  
            }

            TimeSincePlanting += 1.0/365.0;
        }
    }
}
```
              Plant Eucalyptus
                Memo
                  Root:shoot ratio, and allometric relationships for height (Ht, m), stem diameter (DBH, cm, over bark at 1.3 m height), and their derivatives (stem volume Vol, and mean annual increment MAI) were developed as a function of above-ground biomass from [almeida2003application], [almeida2004parameterisation], [borges2009parametrizaccao], [cromer1993response], and [norgueira2005estadonutricional]. Similarly, above-ground biomass as a function of stem weight or wood weight was developed from the same datasets plus [turner1986organic], [byrne1989above], [bradstock1981biomass], [polglase1995mineralization], [snow1999nitrogen], [snow1999modelling], [myers1996growth], [myers1998response], and [melo2015responses].
                AccumulateFunction Age: StartStageName=Emergence; EndStageName=Old; FractionRemovedOnCut=0; FractionRemovedOnHarvest=0; FractionRemovedOnGraze=0; FractionRemovedOnPrune=0
                  Constant day: FixedValue=0.00273973; Units=years
                    Memo
                      This converts days of growth to age in years.
                Phenology
                  StageBasedInterpolation StageCode: Stages=[Emergence, EndJuvenile, Maturity, Old]; Codes=[1, 2, 3, 4]; Proportional=true
                  Constant ThermalTime: FixedValue=1; Units=^od
                  GerminatingPhase Germinating: Start=Sowing; End=Germination
                    Memo
                      We make no distinction between sowing and transplanting in this model, but all sites used transplants not sown seeds. Initial weights are specified for leaf (1 g/plant) and fine root (0.2 g/plant), which implies these are transplants. Germinating and emerging phenology phases are included in case they are needed by later users. No planting shock is included, but this could be considered in future versions, e.g. delay in commencement of root downward growth.
                  EmergingPhase Emerging: ShootLag=1; ShootRate=0; Start=Germination; End=Emergence; TTForTimeStep=0
                    VariableReference ThermalTime: VariableName=[Phenology].ThermalTime
                  GenericPhase Juvenile: Start=Emergence; End=EndJuvenile
                    Constant Progression: FixedValue=1; Units=^od
                    Constant Target: FixedValue=365; Units=^o
                  GenericPhase Mature: Start=EndJuvenile; End=Maturity
                    Constant Progression: FixedValue=1; Units=^od
                    Constant Target: FixedValue=1825; Units=^o
                  GenericPhase Declining: Start=Maturity; End=Old
                    Constant Progression: FixedValue=1; Units=^od
                    Constant Target: FixedValue=27010; Units=^o
                  EndPhase Old: Start=Old; End=Unused
                    Constant ThermalTime: FixedValue=1; Units=^od
                OrganArbitrator Arbitrator
                  BiomassTypeArbitrator DMArbitration
                    Folder PotentialPartitioningMethods
                      ReallocationMethod
                      AllocateFixationMethod
                      RetranslocationMethod
                      SendPotentialDMAllocationsMethod
                    Folder AllocationMethods
                      NutrientConstrainedAllocationMethod
                      DryMatterAllocationsMethod
                    RelativeAllocation ArbitrationMethod
                  BiomassTypeArbitrator NArbitration
                    Folder PotentialPartitioningMethods
                      ReallocationMethod
                    Folder ActualPartitioningMethods
                      AllocateFixationMethod
                      RetranslocationMethod
                    Folder AllocationMethods
                      NitrogenAllocationsMethod
                    RelativeAllocation ArbitrationMethod
                    AllocateUptakesMethod
                  WaterUptakeMethod
                  NitrogenUptakeMethod
                CompositeBiomass AboveGround: DMDOfStructural=0.6
                  Propertys=[[Branch].Live, [Branch].Dead, [Leaf].Live, [Leaf].Dead, [Stem].Live, [Stem].Dead]
                CompositeBiomass BelowGround: DMDOfStructural=0.6
                  Propertys=[[FineRoot].Live, [FineRoot].Dead, [CoarseRoot].Live, [CoarseRoot].Dead]
                CompositeBiomass Wood: Propertys=[[Stem].Live, [Stem].Dead, [Branch].Live, [Branch].Dead]; DMDOfStructural=0.6
                CompositeBiomass Total: DMDOfStructural=0.6
                  Propertys=[[Leaf].Live, [Leaf].Dead, [Stem].Live, [Stem].Dead, [Branch].Live, [Branch].Dead, [FineRoot].Live, [FineRoot].Dead, [CoarseRoot].Live, [CoarseRoot].Dead]
                  Memo
                    Note that this  property does not include branches.
                CompositeBiomass TotalLive: DMDOfStructural=0.6
                  Propertys=[[Leaf].Live, [Branch].Live, [Stem].Live, [FineRoot].Live, [CoarseRoot].Live]
                  Memo
                    Note that this  property does not include branches, and it is used to calculate IndividualTreeLiveWt.
                CompositeBiomass TotalDead: DMDOfStructural=0.6
                  Propertys=[[Leaf].Dead, [Branch].Dead, [Stem].Dead, [FineRoot].Dead, [CoarseRoot].Dead]
                  Memo
                    Note that this  property does not include branches.
                DivideFunction IndividualTreeLiveWt
                  VariableReference LiveWt: VariableName=[Eucalyptus].TotalLive.Wt
                  VariableReference Population: VariableName=[Eucalyptus].Population
                  Memo
                    Note that this  property does not include branches. It is used in calculating DM Demands of several plant components.
                DivideFunction IndividualTreeStemWt
                  VariableReference LiveWt: VariableName=[Eucalyptus].Stem.Wt
                  VariableReference Population: VariableName=[Eucalyptus].Population
                PerennialLeaf Leaf: MaintenanceRespiration=0; GrowthRespiration=0; Albedo=0.15; Gsmax350=0.005; R50=200; LAI=0; Height=0; FRGR=0; PotentialEP=0; WaterDemand=0
                  ExpressionFunction CO2internal: Expression=(163 - [IWeather].MeanT)/(5 - 0.1*[IWeather].MeanT)
                  DivideFunction StomatalConductanceCO2Modifier
                    VariableReference FCO2: VariableName=[Leaf].Photosynthesis.FCO2
                    ExpressionFunction RelativeCO2Gradient
                      Expression=([IWeather].CO2 - [Leaf].CO2internal)/(350 - [Leaf].CO2internal)
                  MultiplyFunction InitialWtFunction
                    Constant InitialPlantWt: FixedValue=1; Units=g/plant
                      Memo
                        This value is nominally low to reflect the dry weight of leaves on a transplanted seedling.
                    VariableReference Population: VariableName=[Plant].Population
                  Constant LaiDeadFunction: FixedValue=0; Units=m^2/m^2
                  MinimumFunction FRGRFunction
                    HourlyInterpolation FRGRFunctionTemp: agregationMethod=0
                      XYPairs Response: X=[5, 20, 25, 35]; Y=[0, 0, 0, 0]
                        Memo
                          This is an assumed temperature response function.
                      ThreeHourSin InterpolationMethod
                  ExpressionFunction ExtinctionCoefficient
                    Expression=([ExtinctionCoefficient].KMatureTrees+([ExtinctionCoefficient].KYoungTrees-[ExtinctionCoefficient].KMatureTrees)*Exp((0-2)*([Eucalyptus].Leaf.LAI/[ExtinctionCoefficient].LAIIntermediateK)^[ExtinctionCoefficient].ShapeCurve))
                    Constant KYoungTrees: FixedValue=0.5
                    Constant KMatureTrees: FixedValue=0.5
                    Constant LAIIntermediateK: FixedValue=0.7
                    Constant ShapeCurve: FixedValue=2
                    Memo
                      A value of 0.50 is commonly used for Eucalyptus ([macfarlane2007estimation]).
                  Constant ExtinctionCoefficientDead: FixedValue=0.5
                  Constant MaximumNConc: FixedValue=0.03; Units=g/g
                    Memo
                      Foliar N concentrations are based on [leuning1991spatial].
                  Constant MinimumNConc: FixedValue=0.01; Units=g/g
                    Memo
                      This is an assumed value.
                  Constant NReallocationFactor: FixedValue=0; Units=/d
                    Memo
                      A value of zero assumes there is no N reallocation.
                  WeightedTemperatureFunction SenescenceRate: MaximumTemperatureWeighting=0
                    XYPairs: X=[-5, -2, 0, 2, 2.1]; Y=[0, 0, 0, 0, 0]
                  BiomassRemoval BiomassRemovalDefaults
                    OrganBiomassRemovalType Harvest: FractionLiveToRemove=0; FractionDeadToRemove=0; FractionLiveToResidue=0.99; FractionDeadToResidue=0.99
                    OrganBiomassRemovalType Cut: FractionLiveToRemove=0.8; FractionDeadToRemove=0; FractionLiveToResidue=0; FractionDeadToResidue=0
                    OrganBiomassRemovalType Prune: FractionLiveToRemove=0; FractionDeadToRemove=0; FractionLiveToResidue=0.6; FractionDeadToResidue=0
                    Memo
                      Values in this table reflect the live and dead fractions that are either removed from the system or transferred to the residue pool. Harvest, Cut and Prune methods will affect these values, but default values assume for Harvest assume delimbing at the stump.
                  Constant DMConversionEfficiency: FixedValue=1; Units=g/g
                  Constant LeafDetachmentTime: FixedValue=14; Units=d
                    Memo
                      A value here is the number of days between senseence and detachment. A value of 14 days is assumed.
                  Constant DetachmentRateFunction: FixedValue=0; Units=/d
                    Memo
                      A value for DetachmentRateFunction is required in Leaf, Branch, Stem and CoarseRoot components of the model, but a zero value means that immediate detachment has been triggered. A non-zero option might be useful in the future for defining some genotypes.

                      The same explanation applies to zero values below for retranslocation factors.
                  Constant DMRetranslocationFactor: FixedValue=0; Units=/d
                  Constant NRetranslocationFactor: FixedValue=0; Units=/d
                  RUEModel Photosynthesis
                    Constant RUE: FixedValue=1.4; Units=g/MJ
                      Memo
                        Aboveground RUE for Gliricidia was measured as 1.06 g/MJ by [harrington1995radiation]. Adding c. 0.3 for belowground allocation provides a value of 1.4 g/MJ.
                    MinimumFunction FT
                      WeightedTemperatureFunction FTDaytime: MaximumTemperatureWeighting=0.75
                        XYPairs: X=[5, 20, 25, 35]; Y=[0, 1, 1, 0]
                      WeightedTemperatureFunction FTFrost: MaximumTemperatureWeighting=0
                        XYPairs: X=[-5, 0, 2]; Y=[1, 1, 1]
                    LinearInterpolationFunction FVPD
                      XYPairs: X=[0, 10, 50]; Y=[1, 1, 0]
                      VariableReference XValue: VariableName=[Leaf].Photosynthesis.VPD
                    LinearInterpolationFunction FN
                      XYPairs: X=[0, 1, 1.5]; Y=[0, 1, 1]
                      VariableReference XValue: VariableName=[Leaf].Fn
                    LinearInterpolationFunction FW
                      XYPairs: X=[0, 1, 1.5]; Y=[0, 1, 1]
                      VariableReference XValue: VariableName=[Leaf].Fw
                    RUECO2Function FCO2: PhotosyntheticPathway=C3
                    VariableReference RadnInt: VariableName=[Leaf].RadIntTot
                  Constant LeafKillFraction: FixedValue=0; Units=0-1
                    Memo
                      A value of zero assumes that no leaves are killed initially, but this value could be reset in an Operation to reflect, for example, an insect browsing attack, frost kill of foliage, or a pruning operation that removes leaves.
                  Constant MinimumLAI: FixedValue=0.01; Units=m^2/m^2
                  MultiplyFunction SpecificLeafAreaFunction
                    LinearInterpolationFunction SpecificLeafAreaPot
                      XYPairs: X=[0, 1, 2, 3, 8]; Y=[0.016, 0.0105, 0.0089, 0.0085, 0.0073]
                      Memo
                        Data for SLA (m^2/g)came from Medhurst and Beadle (2001) and Gonzalez-Garcia et al (2016). Values and trends were similar. A generalised pattern should suffice for many applicatinos, but cultivar-specific patterns are available for some cultivars and could be used to slighly refine their simulation. These data are also similar to those in [rance2014assessment].
                      VariableReference XValue: VariableName=[Eucalyptus].Age
                    LinearInterpolationFunction CO2Modifier
                      XYPairs: X=[350, 850]; Y=[1, 0.8]
                      VariableReference XValue: VariableName=[IWeather].CO2
                  LinearInterpolationFunction LeafResidenceTime
                    XYPairs: X=[0, 1, 2, 3, 8]; Y=[100, 140, 180, 220, 280]
                    Memo
                      This function specifies that lead residence time increases with age. Values are based on [laclau2009influence].
                    VariableReference XValue: VariableName=[Eucalyptus].Age
                  MultiplyFunction LeafDevelopmentRate
                    Constant LDR: FixedValue=1; Units=0-1
                    WeightedTemperatureFunction FT: MaximumTemperatureWeighting=1
                      XYPairs: X=[10, 26, 33, 34]; Y=[0, 1, 1, 0]
                        Memo
                          This is an assumed and tuned function of leaf development rate in relation to weighted air temperature.
                  Constant CarbonConcentration: FixedValue=0.45; Units=g/g
                    Memo
                      This value is based on [ribeiro2015aboveground].
                  ExpressionFunction HeightFunction: Expression=[Stem].Ht*1000
                    Memo
                      This converts stem height in m to mm for use else where in the model.
                  BiomassDemand DMDemands
                    Memo
                      DM demands are set in a similar ways for each organ, but with different values: structural (default specified), metabolic (value = 0), and storage functions (1 - structural). Values measured range from about 5 to 50% for eucalyptus leaves ([quentin2015non]), which also covers the range of 1-20% for other species and plant parts ([hoch2003non]). Metabolic demand is set to zero, because RUE is a value for net growth for which a respiration calculation is not needed. These values may become an important focus if one attempts to use the model for coppicing, as is already the case in several other APSIM models, e.g. lucerne and gliricidia.
                    MultiplyFunction Structural
                      PartitionFractionDemandFunction DMDemandFunction
                        LinearInterpolationFunction PartitionFraction
                          XYPairs: X=[0, 1000, 10000]; Y=[0.19, 0.19, 0.2]
                          VariableReference XValue: VariableName=[Eucalyptus].IndividualTreeLiveWt
                      Constant StructuralFraction: FixedValue=0.99; Units=0-1
                    Constant Metabolic: FixedValue=0
                    Constant Storage: FixedValue=0
                  BiomassDemand NDemands
                    Memo
                      N demands are set in a similar ways to DM demands, which are described above.
                    MultiplyFunction Structural
                      VariableReference MinNconc: VariableName=[Leaf].minimumNconc
                      VariableReference PotentialDMAllocation: VariableName=[Leaf].potentialDMAllocation.Structural
                    Constant Metabolic: FixedValue=0
                    StorageNDemandFunction Storage
                      VariableReference MaxNconc: VariableName=[Leaf].MaximumNconc
                      Constant NitrogenDemandSwitch: FixedValue=1
                GenericOrgan Branch: IsAboveGround=true
                  Memo
                    For many of the parameters in this organ, see comments for similar parameters in the leaf organ.
                  Constant NReallocationFactor: FixedValue=0; Units=/d
                  Constant NRetranslocationFactor: FixedValue=0.05; Units=/d
                  PhaseBasedSwitch NitrogenDemandSwitch: Start=Emergence; End=Old
                  Constant DMRetranslocationFactor: FixedValue=0; Units=/d
                  Constant SenescenceRate: FixedValue=0; Units=/d
                  Constant MaximumNConc: FixedValue=0.01; Units=g/g
                  Constant MinimumNConc: FixedValue=0.0014; Units=g/g
                  Constant DetachmentRateFunction: FixedValue=0; Units=/d
                  Constant MaintenanceRespirationFunction: FixedValue=0; Units=0-1
                  Constant DMConversionEfficiency: FixedValue=1; Units=0-1
                  BiomassRemoval BiomassRemovalDefaults
                    OrganBiomassRemovalType Harvest: FractionLiveToRemove=0; FractionDeadToRemove=0; FractionLiveToResidue=1; FractionDeadToResidue=1
                    OrganBiomassRemovalType Cut: FractionLiveToRemove=0.8; FractionDeadToRemove=0; FractionLiveToResidue=0; FractionDeadToResidue=0
                    OrganBiomassRemovalType Prune: FractionLiveToRemove=0; FractionDeadToRemove=0; FractionLiveToResidue=0.6; FractionDeadToResidue=0
                    OrganBiomassRemovalType Thin: FractionLiveToRemove=0; FractionDeadToRemove=0; FractionLiveToResidue=0.05; FractionDeadToResidue=0
                  Constant DMReallocationFactor: FixedValue=0; Units=/d
                  VariableReference CriticalNConc: VariableName=[Branch].MinimumNConc
                  Constant RemobilisationCost: FixedValue=0
                  Constant CarbonConcentration: FixedValue=0.45; Units=g/g
                  BiomassDemand DMDemands
                    Memo
                      DM or N demands here are set in a similar way to those described above for the leaf organ.
                    MultiplyFunction Structural
                      PartitionFractionDemandFunction DMDemandFunction
                        LinearInterpolationFunction PartitionFraction
                          XYPairs: X=[0, 1000, 10000]; Y=[0.06, 0.06, 0.06]
                          VariableReference XValue: VariableName=[Eucalyptus].IndividualTreeLiveWt
                      Constant StructuralFraction: FixedValue=0.99; Units=0-1
                    Constant Metabolic: FixedValue=0
                    StorageDMDemandFunction Storage
                      SubtractFunction StorageFraction
                        Constant One: FixedValue=1
                        VariableReference StructuralFraction: VariableName=[Branch].DMDemands.Structural.StructuralFraction
                  BiomassDemand NDemands
                    Memo
                      DM or N demands here are set in a similar way to those described above for the leaf organ.
                    MultiplyFunction Structural
                      VariableReference MinNconc: VariableName=[Branch].minimumNconc
                      VariableReference PotentialDMAllocation: VariableName=[Branch].potentialDMAllocation.Structural
                    MultiplyFunction Metabolic
                      SubtractFunction MetabolicNconc
                        VariableReference CritNconc: VariableName=[Branch].criticalNConc
                        VariableReference MinNconc: VariableName=[Branch].minimumNconc
                      VariableReference PotentialDMAllocation: VariableName=[Branch].potentialDMAllocation.Structural
                    StorageNDemandFunction Storage
                      VariableReference NitrogenDemandSwitch: VariableName=[Branch].nitrogenDemandSwitch
                      VariableReference MaxNconc: VariableName=[Branch].maximumNconc
                  RetranslocateNonStructural RetranslocateNitrogen
                  BiomassDemand InitialWt
                    Constant Structural: FixedValue=0; Units=g
                    Constant Metabolic: FixedValue=0
                    Constant Storage: FixedValue=0
                GenericOrgan Stem: IsAboveGround=true
                  Memo
                    For many of the parameters in this organ, see comments for similar parameters in the leaf organ.
                  Constant NReallocationFactor: FixedValue=0; Units=/d
                  Constant NRetranslocationFactor: FixedValue=0.05; Units=/d
                  PhaseBasedSwitch NitrogenDemandSwitch: Start=Emergence; End=Old
                  Constant DMRetranslocationFactor: FixedValue=0; Units=/d
                  Constant SenescenceRate: FixedValue=0; Units=/d
                  Constant MaximumNConc: FixedValue=0.01; Units=g/g
                    Memo
                      Branch, stem and coarse root minimum N concentrations are based on [raymond2000effect].
                  Constant MinimumNConc: FixedValue=0.0014; Units=g/g
                  Constant DetachmentRateFunction: FixedValue=0; Units=/d
                  Constant MaintenanceRespirationFunction: FixedValue=0; Units=0-1
                  Constant DMConversionEfficiency: FixedValue=1; Units=0-1
                  BiomassRemoval BiomassRemovalDefaults
                    OrganBiomassRemovalType Harvest: FractionLiveToRemove=1; FractionDeadToRemove=1; FractionLiveToResidue=0; FractionDeadToResidue=0
                    OrganBiomassRemovalType Cut: FractionLiveToRemove=0.8; FractionDeadToRemove=0; FractionLiveToResidue=0; FractionDeadToResidue=0
                    OrganBiomassRemovalType Prune: FractionLiveToRemove=0; FractionDeadToRemove=0; FractionLiveToResidue=0.6; FractionDeadToResidue=0
                    OrganBiomassRemovalType Thin: FractionLiveToRemove=0; FractionDeadToRemove=0; FractionLiveToResidue=0.05; FractionDeadToResidue=0
                  Constant DMReallocationFactor: FixedValue=0; Units=/d
                  VariableReference CriticalNConc: VariableName=[Stem].MinimumNConc
                  Constant CarbonConcentration: FixedValue=0.45; Units=g/g
                  Constant RemobilisationCost: FixedValue=0
                  ExpressionFunction DBH: Expression=0.685*([Eucalyptus].AboveGround.Wt^0.3262)
                  MaximumFunction Ht
                    ExpressionFunction HeightFunction: Expression=0.5201*([Eucalyptus].Stem.DBH^1.3604)
                    Constant MinimumHeight: FixedValue=0.1; Units=m
                  LessThanFunction Vol
                    VariableReference Height: VariableName=[Stem].Ht
                    Constant MinimumHeight: FixedValue=2
                    Constant Zero: FixedValue=0
                    ExpressionFunction VolumeEquation
                      Expression=(((((([Eucalyptus].Stem.DBH)/2)^2)*3.14159)/3)*([Eucalyptus].Stem.Ht*100))*[Eucalyptus].Population*10000/1000000
                      Memo
                        Stem volume is calculated as concical volume with the base of the cone the same diameter as at breast height (1.3 m height). Units are m3 stem/ha.
                  ExpressionFunction MAI: Expression=[Eucalyptus].Stem.Vol/[Eucalyptus].Age
                    Memo
                      MAI = Mean Annual Increment (m3/ha/year) of stem

                      MAI, which is based on stem volume, depends entirely on the allometric equation used for DBH, and on which Ht in-turn is direclty based. The Brazilian dataset on which these relationships were based did not include large trees. It is likely that the relationships over-predict DBH, Ht, Vol and MAI at larger sizes than included in the calibration dataset, which may have been a problem for the Gympie and Coffs sites. Although Coffs in the validation dataset included large trees, DBH and Ht data were not avialable from that site to include in the calibration. The developers of this model encourage redefinition of the DBH, Ht and Vol functions for specific future applications that include large trees.
                  BiomassDemand DMDemands
                    Memo
                      DM or N demands here are set in a similar way to those described above for the leaf organ.
                    MultiplyFunction Structural
                      PartitionFractionDemandFunction DMDemandFunction
                        LinearInterpolationFunction PartitionFraction
                          XYPairs: X=[0, 2000, 10000]; Y=[0.35, 0.45, 0.58]
                          VariableReference XValue: VariableName=[Eucalyptus].IndividualTreeLiveWt
                      Constant StructuralFraction: FixedValue=0.99; Units=0-1
                    Constant Metabolic: FixedValue=0
                    StorageDMDemandFunction Storage
                      SubtractFunction StorageFraction
                        Constant One: FixedValue=1
                        VariableReference StructuralFraction: VariableName=[Stem].DMDemands.Structural.StructuralFraction
                  BiomassDemand NDemands
                    Memo
                      DM or N demands here are set in a similar way to those described above for the leaf organ.
                    MultiplyFunction Structural
                      VariableReference MinNconc: VariableName=[Stem].minimumNconc
                      VariableReference PotentialDMAllocation: VariableName=[Stem].potentialDMAllocation.Structural
                    MultiplyFunction Metabolic
                      SubtractFunction MetabolicNconc
                        VariableReference CritNconc: VariableName=[Stem].criticalNConc
                        VariableReference MinNconc: VariableName=[Stem].minimumNconc
                      VariableReference PotentialDMAllocation: VariableName=[Stem].potentialDMAllocation.Structural
                    StorageNDemandFunction Storage
                      VariableReference NitrogenDemandSwitch: VariableName=[Stem].nitrogenDemandSwitch
                      VariableReference MaxNconc: VariableName=[Stem].maximumNconc
                  RetranslocateNonStructural RetranslocateNitrogen
                  BiomassDemand InitialWt
                    Constant Structural: FixedValue=0; Units=g
                    Constant Metabolic: FixedValue=0
                    Constant Storage: FixedValue=0
                GenericOrgan CoarseRoot: IsAboveGround=true
                  Memo
                    For many of the parameters in this organ, see comments for similar parameters in the leaf organ.
                  Constant NReallocationFactor: FixedValue=0; Units=/d
                  Constant NRetranslocationFactor: FixedValue=0.05; Units=/d
                  PhaseBasedSwitch NitrogenDemandSwitch: Start=Emergence; End=Old
                  Constant DMRetranslocationFactor: FixedValue=0; Units=0-1
                  Constant SenescenceRate: FixedValue=0; Units=/d
                  Constant MaximumNConc: FixedValue=0.01; Units=g/g
                  Constant MinimumNConc: FixedValue=0.0014; Units=g/g
                  Constant DetachmentRateFunction: FixedValue=0; Units=/d
                  Constant MaintenanceRespirationFunction: FixedValue=0; Units=0-1
                  Constant DMConversionEfficiency: FixedValue=1; Units=0-1
                  BiomassRemoval BiomassRemovalDefaults: same as Validation.Australia Temperate.Westfield.Westfield.WestfieldBase.Plantation.Eucalyptus.Branch.BiomassRemovalDefaults
                  Constant DMReallocationFactor: FixedValue=0; Units=0-1
                  VariableReference CriticalNConc: VariableName=[Stem].MinimumNConc
                  Constant RemobilisationCost: FixedValue=0
                  Constant CarbonConcentration: FixedValue=0.45; Units=g/g
                  BiomassDemand DMDemands
                    Memo
                      DM or N demands here are set in a similar way to those described above for the leaf organ.
                    MultiplyFunction Structural
                      PartitionFractionDemandFunction DMDemandFunction
                        LinearInterpolationFunction PartitionFraction
                          XYPairs: X=[0, 1000, 10000]; Y=[0.01, 0.03, 0.05]
                          VariableReference XValue: VariableName=[Eucalyptus].IndividualTreeLiveWt
                      Constant StructuralFraction: FixedValue=0.99; Units=0-1
                    Constant Metabolic: FixedValue=0
                    StorageDMDemandFunction Storage
                      SubtractFunction StorageFraction
                        Constant One: FixedValue=1
                        VariableReference StructuralFraction: VariableName=[CoarseRoot].DMDemands.Structural.StructuralFraction
                  BiomassDemand NDemands
                    Memo
                      DM or N demands here are set in a similar way to those described above for the leaf organ.
                    MultiplyFunction Structural
                      VariableReference MinNconc: VariableName=[CoarseRoot].minimumNconc
                      VariableReference PotentialDMAllocation: VariableName=[CoarseRoot].potentialDMAllocation.Structural
                    MultiplyFunction Metabolic
                      SubtractFunction MetabolicNconc
                        VariableReference CritNconc: VariableName=[CoarseRoot].criticalNConc
                        VariableReference MinNconc: VariableName=[CoarseRoot].minimumNconc
                      VariableReference PotentialDMAllocation: VariableName=[CoarseRoot].potentialDMAllocation.Structural
                    StorageNDemandFunction Storage
                      VariableReference NitrogenDemandSwitch: VariableName=[CoarseRoot].nitrogenDemandSwitch
                      VariableReference MaxNconc: VariableName=[CoarseRoot].maximumNconc
                  RetranslocateNonStructural RetranslocateNitrogen
                  BiomassDemand InitialWt
                    Constant Structural: FixedValue=0; Units=g
                    Constant Metabolic: FixedValue=0
                    Constant Storage: FixedValue=0
                Root FineRoot: GrowthRespiration=0; MaintenanceRespiration=0
                  RootShapeCylindre RootShape
                  Memo
                    For many of the parameters in this organ, see comments for similar parameters in the leaf organ.
                  PhaseBasedSwitch NitrogenDemandSwitch: Start=Emergence; End=Old
                  Constant RootFrontVelocity: FixedValue=10; Units=mm/d
                    Memo
                      [huth_managing_2008] measured a constant root front velocity of 24.3 mm/d down to 1.4 m depth under favourable growing conditions, which was similar to wheat. [goncalves2013integrating] report eucalypt root front velocities averaging 19 mm/day for the first 1.5 years to 12 mm/day by 3.5 years in conditions of little impedence to root growth. The value of 10 mm/d used here is lower to reflect more common limiting conditions.
                  Constant SenescenceRate: FixedValue=0.005; Units=/d
                  Constant MaxDailyNUptake: FixedValue=6; Units=kg/ha/d
                  Constant MaximumNConc: FixedValue=0.01; Units=g/g
                    Memo
                      Fine root N concentrations are based on Misra et al (1998).
                  Constant MinimumNConc: FixedValue=0.003; Units=g/g
                  Constant MaximumRootDepth: FixedValue=10000; Units=mm
                  Constant KLModifier: FixedValue=1
                  Constant KNO3: FixedValue=0.03
                  Constant KNH4: FixedValue=3e-06
                  LinearInterpolationFunction NUptakeSWFactor
                    XYPairs: X=[0, 1]; Y=[0, 1]
                    VariableReference XValue: VariableName=[Root].RWC
                  Constant SpecificRootLength: FixedValue=40; Units=m/g
                    Memo
                      Specific root length was based on [jourdan2008fine].
                  BiomassRemoval BiomassRemovalDefaults
                    OrganBiomassRemovalType Harvest: FractionLiveToRemove=0; FractionDeadToRemove=0; FractionLiveToResidue=1; FractionDeadToResidue=1
                    OrganBiomassRemovalType Cut: FractionLiveToRemove=0.8; FractionDeadToRemove=0; FractionLiveToResidue=0; FractionDeadToResidue=0
                    OrganBiomassRemovalType Prune: FractionLiveToRemove=0; FractionDeadToRemove=0; FractionLiveToResidue=0.6; FractionDeadToResidue=0
                  Constant DMConversionEfficiency: FixedValue=1; Units=0-1
                  Constant MaintenanceRespirationFunction: FixedValue=0; Units=0-1
                  Constant RemobilisationCost: FixedValue=0
                  Constant CarbonConcentration: FixedValue=0.45; Units=g/g
                  BiomassDemand DMDemands
                    Memo
                      DM or N demands here are set in a similar way to those described above for the leaf organ.
                    MultiplyFunction Structural
                      PartitionFractionDemandFunction DMDemandFunction
                        Constant PartitionFraction: FixedValue=0.25
                      Constant StructuralFraction: FixedValue=1
                    Constant Metabolic: FixedValue=0
                    StorageDMDemandFunction Storage
                      SubtractFunction StorageFraction
                        Constant One: FixedValue=1
                        VariableReference StructuralFraction: VariableName=[FineRoot].DMDemands.Structural.StructuralFraction
                  BiomassDemand NDemands
                    Memo
                      DM or N demands here are set in a similar way to those described above for the leaf organ.
                    MultiplyFunction Structural
                      VariableReference MinNconc: VariableName=[FineRoot].minimumNconc
                      VariableReference PotentialDMAllocation: VariableName=[FineRoot].potentialDMAllocation.Structural
                    MultiplyFunction Metabolic
                      SubtractFunction MetabolicNconc
                        VariableReference CritNconc: VariableName=[FineRoot].criticalNConc
                        VariableReference MinNconc: VariableName=[FineRoot].minimumNconc
                      VariableReference PotentialDMAllocation: VariableName=[FineRoot].potentialDMAllocation.Structural
                    StorageNDemandFunction Storage
                      VariableReference NitrogenDemandSwitch: VariableName=[FineRoot].nitrogenDemandSwitch
                      VariableReference MaxNconc: VariableName=[FineRoot].maximumNconc
                  VariableReference CriticalNConc: VariableName=[Root].MinimumNConc
                  BiomassDemand InitialWt
                    Constant Structural: FixedValue=0.2; Units=g/plant
                    Constant Metabolic: FixedValue=0
                    Constant Storage: FixedValue=0
                  Constant RootDepthStressFactor: FixedValue=1
                DivideFunction RootShootRatio
                  VariableReference Numerator: VariableName=[Eucalyptus].BelowGround.Wt
                  VariableReference Denominator: VariableName=[Eucalyptus].AboveGround.Wt
                CultivarFolder grandis
                  Cultivar grandis
                    Memo Genotype note
                      This genotype specification was originally planned to be for the species E. grandis in general, but we did not actually provide any specific parameters. As no parameter values were changed here, generic Eucalyptus parameters were used where this genotype was specified in a simulation.
                  Cultivar grandisCoffsHarbour
                    Memo Genotype note
                      This genotype specification is for a Coffs Harbour provenance of E. grandis, but as no actually genotype-specific parameters are specified, simulations using this genotype use the unchanged parameter set of the main Eucalyptus model.
                  Cultivar grandisC15
                    Command:
                      [CoarseRoot].DMDemands.Structural.DMDemandFunction.PartitionFraction.XYPairs.X=0,1000,10000
                      [CoarseRoot].DMDemands.Structural.DMDemandFunction.PartitionFraction.XYPairs.Y=0,0.03,0.04
                      [Leaf].DMDemands.Structural.DMDemandFunction.PartitionFraction.XYPairs.X=0,1000,10000,20000,50000,80000
                      [Leaf].DMDemands.Structural.DMDemandFunction.PartitionFraction.XYPairs.Y=0.24,0.2,0.2,.23,0.2,.12
                      [Branch].DMDemands.Structural.DMDemandFunction.PartitionFraction.XYPairs.X=0,1000,10000,20000,50000,80000
                      [Branch].DMDemands.Structural.DMDemandFunction.PartitionFraction.XYPairs.Y=.06,.06,.06,.05,.04,.03
                      [FineRoot].DMDemands.Structural.DMDemandFunction.PartitionFraction.FixedValue=0.2
                      [Stem].DMDemands.Structural.DMDemandFunction.PartitionFraction.XYPairs.X=0,1000,10000,20000,30000,80000
                      [Stem].DMDemands.Structural.DMDemandFunction.PartitionFraction.XYPairs.Y=0.2,0.45,0.7,0.99,0.99,.99
                    Memo Genotype note
                      This genotype specification was used to specifiy partitioning to for the C15 clone used by the Aracruz company (now Fibria), in order to approximate the root:shoot ratios reported in [almeida].
                  Cultivar grandisC22
                    Command:
                      [CoarseRoot].DMDemands.Structural.DMDemandFunction.PartitionFraction.XYPairs.X=0,1000,10000
                      [CoarseRoot].DMDemands.Structural.DMDemandFunction.PartitionFraction.XYPairs.Y=0,0.08,0.08
                      [Leaf].DMDemands.Structural.DMDemandFunction.PartitionFraction.XYPairs.X=0,1000,10000,20000,50000,80000
                      [Leaf].DMDemands.Structural.DMDemandFunction.PartitionFraction.XYPairs.Y=0.22,0.2,0.19,0.13,0.10,.06
                    Memo Genotype note
                      This genotype specification was used to specifiy partitioning to for the C22 clone used by the Aracruz company (now Fibria), in order to approximate the root:shoot ratios reported in [almeida].
                CultivarFolder grandisXurophylla
                  Cultivar grandisXurophylla
                    Memo Genotype note
                      This genotype specification was originally planned to be for a cline of grandisXurophylla, but we did not actually provide any specific parameters. As no parameter values were changed here, generic Eucalyptus parameters were used where this genotype was specified in a simulation.
                  Cultivar grandisXurophyllaC3334
                    Memo Genotype note
                      This genotype specification was originally planned to be for the clone C3334, but we did not actually provide any specific parameters. As no parameter values were changed here, generic Eucalyptus parameters were used where this genotype was specified in a simulation.
                  Cultivar grandisXurophyllaC3336
                    Memo Genotype note
                      This genotype specification was originally planned to be for the clone C3336, but we did not actually provide any specific parameters. As no parameter values were changed here, generic Eucalyptus parameters were used where this genotype was specified in a simulation.
                CultivarFolder urophyllaXglobulus
                  Cultivar urophyllaXglobulus
                    Memo Genotype note
                      This genotype specification was originally planned to be for the urophyllaXglobulus hybird of E. grandis, but we did not actually provide any specific parameters. As no parameter values were changed here, generic Eucalyptus parameters were used where this genotype was specified in a simulation.
                CultivarFolder BrazilClones
                  Cultivar BrazilPlasticClone
                    Command:
                      [Leaf].Photosynthesis.RUE.FixedValue = 1.51
                      [Leaf].ExtinctionCoefficient.KYoungTrees.FixedValue = 0.34
                      [Leaf].ExtinctionCoefficient.KMatureTrees.FixedValue = 0.60
                      [Stem].DMDemands.Structural.DMDemandFunction.PartitionFraction.XYPairs.X=0,2000,10000
                      [Stem].DMDemands.Structural.DMDemandFunction.PartitionFraction.XYPairs.Y=0.15, 0.39, 0.61
                      [Branch].DMDemands.Structural.DMDemandFunction.PartitionFraction.XYPairs.X=0,2000,10000
                      [Branch].DMDemands.Structural.DMDemandFunction.PartitionFraction.XYPairs.Y=0.09,0.09,0.09
                      [Leaf].DMDemands.Structural.DMDemandFunction.PartitionFraction.XYPairs.X=0,2000,10000
                      [Leaf].DMDemands.Structural.DMDemandFunction.PartitionFraction.XYPairs.Y= 0.2, 0.17, 0.15
                      [Leaf].Photosynthesis.FT.FTDaytime.XYPairs.X=  8, 18, 23, 40
                      [Leaf].Photosynthesis.FT.FTDaytime.XYPairs.Y 0, 1, 1, 0
                      [Leaf].Photosynthesis.FT.FTFrost.XYPairs.X= -5, -2, -1, 0, 1, 2, 2.1
                      [Leaf].Photosynthesis.FT.FTFrost.XYPairs.Y = 0, 0, 0, 0, 0, 0.9, 1
                      [Leaf].SenescenceRate.XYPairs.X=  -5,  -2,  0,    2,  2.1
                      [Leaf].SenescenceRate.XYPairs.Y = 0.7, 0.5, 0.2, 0.1, 0
                      [CoarseRoot].DMDemands.Structural.DMDemandFunction.PartitionFraction.XYPairs.X=0,2000,10000
                      [CoarseRoot].DMDemands.Structural.DMDemandFunction.PartitionFraction.XYPairs.Y=0.005,0.03,0.04
                      [FineRoot].DMDemands.Structural.DMDemandFunction.PartitionFraction.FixedValue = 0.26
                  Cultivar BrazilTropicalClone
                    Command:
                      [Leaf].Photosynthesis.RUE.FixedValue = 1.69
                      [Leaf].ExtinctionCoefficient.KYoungTrees.FixedValue = 0.30
                      [Leaf].ExtinctionCoefficient.KMatureTrees.FixedValue = 0.56
                      [Stem].DMDemands.Structural.DMDemandFunction.PartitionFraction.XYPairs.X=0,2000,10000
                      [Stem].DMDemands.Structural.DMDemandFunction.PartitionFraction.XYPairs.Y=0.15,0.40, 0.64
                      [Branch].DMDemands.Structural.DMDemandFunction.PartitionFraction.XYPairs.X=0,2000,10000
                      [Branch].DMDemands.Structural.DMDemandFunction.PartitionFraction.XYPairs.Y=0.08,0.08,0.08
                      [Leaf].DMDemands.Structural.DMDemandFunction.PartitionFraction.XYPairs.X=0,2000,10000
                      [Leaf].DMDemands.Structural.DMDemandFunction.PartitionFraction.XYPairs.Y= 0.19, 0.17, 0.17
                      [Leaf].Photosynthesis.FT.FTDaytime.XYPairs.X=  8, 18, 23, 40
                      [Leaf].Photosynthesis.FT.FTDaytime.XYPairs.Y 0, 1, 1, 0
                      [Leaf].Photosynthesis.FT.FTFrost.XYPairs.X= -5, -2, -1, 0, 1, 2, 2.1
                      [Leaf].Photosynthesis.FT.FTFrost.XYPairs.Y = 0, 0, 0, 0, 0, 0.9, 1
                      [Leaf].SenescenceRate.XYPairs.X=  -5,  -2,  0,    2,  2.1
                      [Leaf].SenescenceRate.XYPairs.Y = 0.7, 0.5, 0.2, 0.1, 0
                      [CoarseRoot].DMDemands.Structural.DMDemandFunction.PartitionFraction.XYPairs.X=0,2000,10000
                      [CoarseRoot].DMDemands.Structural.DMDemandFunction.PartitionFraction.XYPairs.Y=0.03,0.1,0.1
                      [FineRoot].DMDemands.Structural.DMDemandFunction.PartitionFraction.FixedValue = 0.35
                      [Leaf].SpecificLeafAreaFunction.SpecificLeafAreaPot.XYPairs.X= 0, 1, 2, 3, 4, 80
                      [Leaf].SpecificLeafAreaFunction.SpecificLeafAreaPot.XYPairs.Y= 0.018, 0.014, 0.011, 0.009, 0.008, 0.007
                  Cultivar BrazilSubTropicalClone
                    Command:
                      [Leaf].Photosynthesis.RUE.FixedValue = 1.57
                      [Leaf].ExtinctionCoefficient.KYoungTrees.FixedValue = 0.26
                      [Leaf].ExtinctionCoefficient.KMatureTrees.FixedValue = 0.55
                      [Stem].DMDemands.Structural.DMDemandFunction.PartitionFraction.XYPairs.X=0,2000,10000
                      [Stem].DMDemands.Structural.DMDemandFunction.PartitionFraction.XYPairs.Y=0.15, 0.30, 0.57
                      [Branch].DMDemands.Structural.DMDemandFunction.PartitionFraction.XYPairs.X=0,2000,10000
                      [Branch].DMDemands.Structural.DMDemandFunction.PartitionFraction.XYPairs.Y=0.09,0.09,0.09
                      [Leaf].DMDemands.Structural.DMDemandFunction.PartitionFraction.XYPairs.X=0,2000,10000
                      [Leaf].DMDemands.Structural.DMDemandFunction.PartitionFraction.XYPairs.Y= 0.20, 0.16, 0.15
                      [Leaf].Photosynthesis.FT.FTDaytime.XYPairs.X=  6, 17, 22, 38
                      [Leaf].Photosynthesis.FT.FTDaytime.XYPairs.Y 0, 1, 1, 0
                      [Leaf].Photosynthesis.FT.FTFrost.XYPairs.X= -5, -2, -1, 0, 1, 2, 2.1
                      [Leaf].Photosynthesis.FT.FTFrost.XYPairs.Y = 0.5, 1, 1, 1, 1, 1, 1
                      [Leaf].SenescenceRate.XYPairs.X=  -5,  -2,  0,    2,  2.1
                      [Leaf].SenescenceRate.XYPairs.Y = 0.7, 0.5, 0.2, 0.1, 0
                      [CoarseRoot].DMDemands.Structural.DMDemandFunction.PartitionFraction.XYPairs.X=0,2000,10000
                      [CoarseRoot].DMDemands.Structural.DMDemandFunction.PartitionFraction.XYPairs.Y=0.02,0.05,0.06
                      [FineRoot].DMDemands.Structural.DMDemandFunction.PartitionFraction.FixedValue = 0.24
                      [Leaf].SpecificLeafAreaFunction.SpecificLeafAreaPot.XYPairs.X= 0, 1, 2, 3, 4, 80
                      [Leaf].SpecificLeafAreaFunction.SpecificLeafAreaPot.XYPairs.Y= 0.015, 0.013, 0.009, 0.008, 0.007, 0.007
                CultivarFolder saligna
                  Cultivar saligna
                    Memo Genotype note
                      This genotype specification was originally planned to be for the species E. saligna, but we did not actually provide any specific parameters. As no parameter values were changed here, generic Eucalyptus parameters were used where this genotype was specified in a simulation.
                CultivarFolder nitens
                  Cultivar nitens
                    Command:
                      [Leaf].Photosynthesis.RUE.FixedValue = 1.65
                      [Leaf].Photosynthesis.FT.FTDaytime.XYPairs.X= 2,13,14,32
                      [Leaf].Photosynthesis.FT.FTDaytime.XYPairs.Y= 0, 1, 1, 0
                      [Leaf].Photosynthesis.FT.FTFrost.MaximumTemperatureWeighting=0
                      [Leaf].Photosynthesis.FT.FTFrost.XYPairs.X=-5, -2, -1, 0, 1, 2, 3, 4, 7
                      [Leaf].Photosynthesis.FT.FTFrost.XYPairs.Y= 0,  0,  0, 0, 0, 0, .5,.8, 1
                      [Leaf].LeafDevelopmentRate.LDR.FixedValue=1
                      [Leaf].LeafDevelopmentRate.FT.XYPairs.X=8,26,33,34
                      [Leaf].LeafDevelopmentRate.FT.XYPairs.X=0,1,1,0
                      [Leaf].SpecificLeafAreaFunction.SpecificLeafAreaPot.XYPairs.X= 0, 1, 2, 3, 4, 80
                      [Leaf].SpecificLeafAreaFunction.SpecificLeafAreaPot.XYPairs.Y= 0.011, 0.008, 0.006, 0.005, 0.005, 0.005
                      [Leaf].SenescenceRate.XYPairs.X=  -5,  -2,  0,    2,  2.1
                      [Leaf].SenescenceRate.XYPairs.Y = 0.3, 0.2, 0.1, .08, .05
                      [Leaf].MaximumNConc.FixedValue=0.035
                      [Leaf].MinimumNConc.FixedValue=0.013
                      [Branch].MaximumNConc.FixedValue=0.013
                      [Branch].MinimumNConc.FixedValue=0.0035
                      [Stem].MaximumNConc.FixedValue=0.0075
                      [Stem].MinimumNConc.FixedValue=0.0025
                      [CoarseRoot].MaximumNConc.FixedValue=0.02
                      [CoarseRoot].MinimumNConc.FixedValue=0.0025
                      [FineRoot].MaximumNConc.FixedValue=0.02
                      [FineRoot].MinimumNConc.FixedValue=0.005
                      [Leaf].DMDemands.Structural.DMDemandFunction.PartitionFraction.XYPairs.X=0,1000,10000,20000,50000,80000, 100000
                      [Leaf].DMDemands.Structural.DMDemandFunction.PartitionFraction.XYPairs.Y=0.4,0.5,0.5,.18,.07,.06, 0.05
                      [Branch].DMDemands.Structural.DMDemandFunction.PartitionFraction.XYPairs.X=0,1000,10000,20000,50000,80000
                      [Branch].DMDemands.Structural.DMDemandFunction.PartitionFraction.XYPairs.Y=.1,.15,.19,.21,.20,.19
                      [Stem].DMDemands.Structural.DMDemandFunction.PartitionFraction.XYPairs.X=0,1000,10000,20000,30000,80000, 120000
                      [Stem].DMDemands.Structural.DMDemandFunction.PartitionFraction.XYPairs.Y=0.1,0.9,0.99,0.99,0.99,.99, .99
                      [CoarseRoot].DMDemands.Structural.DMDemandFunction.PartitionFraction.XYPairs.X=0,500,1000,5000, 10000, 20000, 40000
                      [CoarseRoot].DMDemands.Structural.DMDemandFunction.PartitionFraction.XYPairs.Y=0.28,0.32, 0.36, 0.32, 0.3, .25, .2
                      [FineRoot].DMDemands.Structural.DMDemandFunction.PartitionFraction.FixedValue=0.4
                      [Stem].DBH.Expression=(-196.81*([IndividualTreeLiveWt]/1000000)^2)+(109.13*([IndividualTreeLiveWt]/1000000)+5
                      [Stem].Ht.HeightFunction.Expression=(0.0293*[Stem].DBH^2)+(0.2854*[Stem].DBH)+3
                      [Stem].Vol.MinimumHeight.FixedValue=10
                      [Stem].Vol.VolumeEquation.Expression=((0.0007*[Stem].DBH^2)+(-0.0049*[Stem].DBH)+0.0086)*[Eucalyptus].Population*10000
                    Memo Genotype note
                      This genotype specification was originally planned to be for the species E. grandis in general, but we did not actually provide any specific parameters. As no parameter values were changed here, generic Eucalyptus parameters were used where this genotype was specified in a simulation.
                CultivarFolder globulus
                  Cultivar globulus
                    Command:
                      [Leaf].FRGR.FRGRFunction.XYPairs.X=0,15,27,34
                      [Leaf].FRGR.FRGRFunction.XYPairs.Y=0,1,1,0
                    Memo Genotype note
                      This genotype specification was originally planned to be for the species E. grandis in general, but we did not actually provide any specific parameters. As no parameter values were changed here, generic Eucalyptus parameters were used where this genotype was specified in a simulation.
                CultivarFolder globulus1: same as Validation.Australia Temperate.Westfield.Westfield.WestfieldBase.Plantation.Eucalyptus.globulus
                CultivarFolder nitens1: same as Validation.Australia Temperate.Westfield.Westfield.WestfieldBase.Plantation.Eucalyptus.nitens
      Folder DroughtRisk
        Memo
          This experiment is described in [cromer1993response] and [cromer1993responseN]. Some soil input data are from [ross1991soils]. Experimental treatments were factorial combinations of two levels each of irrigation and fertilisation applied to _E. grandis._ Most growth response was to fertiliser, which included NPK, but only N is simulated, which assumes that other nutrients were present at adequate levels.
        Experiment ScottRiver
          Factors
            Permutation
              Factor N: Specification=[Operations]
                Operations 0
                Operations 45
                  1998-09-30  [Fertiliser].Apply(22.5, Fertiliser.Types.NH4N, 0);
                  1999-04-30  [Fertiliser].Apply(22.5, Fertiliser.Types.NH4N, 0);
                  1999-09-30  [Fertiliser].Apply(22.5, Fertiliser.Types.NH4N, 0);
                  2000-04-30  [Fertiliser].Apply(22.5, Fertiliser.Types.NH4N, 0);
                  2000-09-30  [Fertiliser].Apply(22.5, Fertiliser.Types.NH4N, 0);
                  2001-04-30  [Fertiliser].Apply(22.5, Fertiliser.Types.NH4N, 0);
                  2001-09-30  [Fertiliser].Apply(22.5, Fertiliser.Types.NH4N, 0);
                  2002-04-30  [Fertiliser].Apply(22.5, Fertiliser.Types.NH4N, 0);
                  2002-09-30  [Fertiliser].Apply(22.5, Fertiliser.Types.NH4N, 0);
                  2003-04-30  [Fertiliser].Apply(22.5, Fertiliser.Types.NH4N, 0);
                  2003-09-30  [Fertiliser].Apply(22.5, Fertiliser.Types.NH4N, 0);
                  2004-04-30  [Fertiliser].Apply(22.5, Fertiliser.Types.NH4N, 0);
                  2004-09-30  [Fertiliser].Apply(22.5, Fertiliser.Types.NH4N, 0);
                  2005-04-30  [Fertiliser].Apply(22.5, Fertiliser.Types.NH4N, 0);
                  2006-09-30  [Fertiliser].Apply(22.5, Fertiliser.Types.NH4N, 0);
                  2007-04-30  [Fertiliser].Apply(22.5, Fertiliser.Types.NH4N, 0);
                  2007-09-30  [Fertiliser].Apply(22.5, Fertiliser.Types.NH4N, 0);
                  2008-04-30  [Fertiliser].Apply(22.5, Fertiliser.Types.NH4N, 0);
                  2008-09-30  [Fertiliser].Apply(22.5, Fertiliser.Types.NH4N, 0);
                  2009-04-30  [Fertiliser].Apply(22.5, Fertiliser.Types.NH4N, 0);
                  2009-09-30  [Fertiliser].Apply(22.5, Fertiliser.Types.NH4N, 0);
                  2010-04-30  [Fertiliser].Apply(22.5, Fertiliser.Types.NH4N, 0);
                  2010-09-30  [Fertiliser].Apply(22.5, Fertiliser.Types.NH4N, 0);
                  2011-04-30  [Fertiliser].Apply(22.5, Fertiliser.Types.NH4N, 0);
                  2011-09-30  [Fertiliser].Apply(22.5, Fertiliser.Types.NH4N, 0);
                  2012-04-30  [Fertiliser].Apply(22.5, Fertiliser.Types.NH4N, 0);
                  2012-09-30  [Fertiliser].Apply(22.5, Fertiliser.Types.NH4N, 0);
                  2013-04-30  [Fertiliser].Apply(22.5, Fertiliser.Types.NH4N, 0);
                Operations 125
                  1998-09-30  [Fertiliser].Apply(62.5, Fertiliser.Types.NH4N, 0);
                  1999-04-30  [Fertiliser].Apply(62.5, Fertiliser.Types.NH4N, 0);
                  1999-09-30  [Fertiliser].Apply(62.5, Fertiliser.Types.NH4N, 0);
                  2000-04-30  [Fertiliser].Apply(62.5, Fertiliser.Types.NH4N, 0);
                  2000-09-30  [Fertiliser].Apply(62.5, Fertiliser.Types.NH4N, 0);
                  2001-04-30  [Fertiliser].Apply(62.5, Fertiliser.Types.NH4N, 0);
                  2001-09-30  [Fertiliser].Apply(62.5, Fertiliser.Types.NH4N, 0);
                  2002-04-30  [Fertiliser].Apply(62.5, Fertiliser.Types.NH4N, 0);
                  2002-09-30  [Fertiliser].Apply(62.5, Fertiliser.Types.NH4N, 0);
                  2003-04-30  [Fertiliser].Apply(62.5, Fertiliser.Types.NH4N, 0);
                  2003-09-30  [Fertiliser].Apply(62.5, Fertiliser.Types.NH4N, 0);
                  2004-04-30  [Fertiliser].Apply(62.5, Fertiliser.Types.NH4N, 0);
                  2004-09-30  [Fertiliser].Apply(62.5, Fertiliser.Types.NH4N, 0);
                  2005-04-30  [Fertiliser].Apply(62.5, Fertiliser.Types.NH4N, 0);
                  2006-09-30  [Fertiliser].Apply(62.5, Fertiliser.Types.NH4N, 0);
                  2007-04-30  [Fertiliser].Apply(62.5, Fertiliser.Types.NH4N, 0);
                  2007-09-30  [Fertiliser].Apply(62.5, Fertiliser.Types.NH4N, 0);
                  2008-04-30  [Fertiliser].Apply(62.5, Fertiliser.Types.NH4N, 0);
                  2008-09-30  [Fertiliser].Apply(62.5, Fertiliser.Types.NH4N, 0);
                  2009-04-30  [Fertiliser].Apply(62.5, Fertiliser.Types.NH4N, 0);
                  2009-09-30  [Fertiliser].Apply(62.5, Fertiliser.Types.NH4N, 0);
                  2010-04-30  [Fertiliser].Apply(62.5, Fertiliser.Types.NH4N, 0);
                  2010-09-30  [Fertiliser].Apply(62.5, Fertiliser.Types.NH4N, 0);
                  2011-04-30  [Fertiliser].Apply(62.5, Fertiliser.Types.NH4N, 0);
                  2011-09-30  [Fertiliser].Apply(62.5, Fertiliser.Types.NH4N, 0);
                  2012-04-30  [Fertiliser].Apply(62.5, Fertiliser.Types.NH4N, 0);
                  2012-09-30  [Fertiliser].Apply(62.5, Fertiliser.Types.NH4N, 0);
                  2013-04-30  [Fertiliser].Apply(62.5, Fertiliser.Types.NH4N, 0);
                Operations 250
                  1998-09-30  [Fertiliser].Apply(125, Fertiliser.Types.NH4N, 0);
                  1999-04-30  [Fertiliser].Apply(125, Fertiliser.Types.NH4N, 0);
                  1999-09-30  [Fertiliser].Apply(125, Fertiliser.Types.NH4N, 0);
                  2000-04-30  [Fertiliser].Apply(125, Fertiliser.Types.NH4N, 0);
                  2000-09-30  [Fertiliser].Apply(125, Fertiliser.Types.NH4N, 0);
                  2001-04-30  [Fertiliser].Apply(125, Fertiliser.Types.NH4N, 0);
                  2001-09-30  [Fertiliser].Apply(125, Fertiliser.Types.NH4N, 0);
                  2002-04-30  [Fertiliser].Apply(125, Fertiliser.Types.NH4N, 0);
                  2002-09-30  [Fertiliser].Apply(125, Fertiliser.Types.NH4N, 0);
                  2003-04-30  [Fertiliser].Apply(125, Fertiliser.Types.NH4N, 0);
                  2003-09-30  [Fertiliser].Apply(125, Fertiliser.Types.NH4N, 0);
                  2004-04-30  [Fertiliser].Apply(125, Fertiliser.Types.NH4N, 0);
                  2004-09-30  [Fertiliser].Apply(125, Fertiliser.Types.NH4N, 0);
                  2005-04-30  [Fertiliser].Apply(125, Fertiliser.Types.NH4N, 0);
                  2006-09-30  [Fertiliser].Apply(125, Fertiliser.Types.NH4N, 0);
                  2007-04-30  [Fertiliser].Apply(125, Fertiliser.Types.NH4N, 0);
                  2007-09-30  [Fertiliser].Apply(125, Fertiliser.Types.NH4N, 0);
                  2008-04-30  [Fertiliser].Apply(125, Fertiliser.Types.NH4N, 0);
                  2008-09-30  [Fertiliser].Apply(125, Fertiliser.Types.NH4N, 0);
                  2009-04-30  [Fertiliser].Apply(125, Fertiliser.Types.NH4N, 0);
                  2009-09-30  [Fertiliser].Apply(125, Fertiliser.Types.NH4N, 0);
                  2010-04-30  [Fertiliser].Apply(125, Fertiliser.Types.NH4N, 0);
                  2010-09-30  [Fertiliser].Apply(125, Fertiliser.Types.NH4N, 0);
                  2011-04-30  [Fertiliser].Apply(125, Fertiliser.Types.NH4N, 0);
                  2011-09-30  [Fertiliser].Apply(125, Fertiliser.Types.NH4N, 0);
                  2012-04-30  [Fertiliser].Apply(125, Fertiliser.Types.NH4N, 0);
                  2012-09-30  [Fertiliser].Apply(125, Fertiliser.Types.NH4N, 0);
                  2013-04-30  [Fertiliser].Apply(125, Fertiliser.Types.NH4N, 0);
                Operations 400
                  1998-09-30  [Fertiliser].Apply(200, Fertiliser.Types.NH4N, 0);
                  1999-04-30  [Fertiliser].Apply(200, Fertiliser.Types.NH4N, 0);
                  1999-09-30  [Fertiliser].Apply(200, Fertiliser.Types.NH4N, 0);
                  2000-04-30  [Fertiliser].Apply(200, Fertiliser.Types.NH4N, 0);
                  2000-09-30  [Fertiliser].Apply(200, Fertiliser.Types.NH4N, 0);
                  2001-04-30  [Fertiliser].Apply(200, Fertiliser.Types.NH4N, 0);
                  2001-09-30  [Fertiliser].Apply(200, Fertiliser.Types.NH4N, 0);
                  2002-04-30  [Fertiliser].Apply(200, Fertiliser.Types.NH4N, 0);
                  2002-09-30  [Fertiliser].Apply(200, Fertiliser.Types.NH4N, 0);
                  2003-04-30  [Fertiliser].Apply(200, Fertiliser.Types.NH4N, 0);
                  2003-09-30  [Fertiliser].Apply(200, Fertiliser.Types.NH4N, 0);
                  2004-04-30  [Fertiliser].Apply(200, Fertiliser.Types.NH4N, 0);
                  2004-09-30  [Fertiliser].Apply(200, Fertiliser.Types.NH4N, 0);
                  2005-04-30  [Fertiliser].Apply(200, Fertiliser.Types.NH4N, 0);
                  2006-09-30  [Fertiliser].Apply(200, Fertiliser.Types.NH4N, 0);
                  2007-04-30  [Fertiliser].Apply(200, Fertiliser.Types.NH4N, 0);
                  2007-09-30  [Fertiliser].Apply(200, Fertiliser.Types.NH4N, 0);
                  2008-04-30  [Fertiliser].Apply(200, Fertiliser.Types.NH4N, 0);
                  2008-09-30  [Fertiliser].Apply(200, Fertiliser.Types.NH4N, 0);
                  2009-04-30  [Fertiliser].Apply(200, Fertiliser.Types.NH4N, 0);
                  2009-09-30  [Fertiliser].Apply(200, Fertiliser.Types.NH4N, 0);
                  2010-04-30  [Fertiliser].Apply(200, Fertiliser.Types.NH4N, 0);
                  2010-09-30  [Fertiliser].Apply(200, Fertiliser.Types.NH4N, 0);
                  2011-04-30  [Fertiliser].Apply(200, Fertiliser.Types.NH4N, 0);
                  2011-09-30  [Fertiliser].Apply(200, Fertiliser.Types.NH4N, 0);
                  2012-04-30  [Fertiliser].Apply(200, Fertiliser.Types.NH4N, 0);
                  2012-09-30  [Fertiliser].Apply(200, Fertiliser.Types.NH4N, 0);
                  2013-04-30  [Fertiliser].Apply(200, Fertiliser.Types.NH4N, 0);
              Factor S: Specification=[Operations]
                Operations 300
                  1996-06-16  [TreeThinning].Script.DoThin(0.25);
                  2006-06-16  [TreeThinning].Script.DoThin(0.25);
                Operations 600
                  1996-06-16  [TreeThinning].Script.DoThin(0.5);
                  2006-06-16  [TreeThinning].Script.DoThin(0.5);
                Operations 1200
          Simulation ScottRiverBase
            Clock: Start=1996-06-01; End=2019-12-31
            Weather: FileName=ScottRiverSiloDD1900-2020.met
            Summary
            SoilArbitrator Soil Arbitrator
            Zone Plantation: Area=1; Slope=0; AspectAngle=0; Altitude=50
              Soil ScottRiverSynthSoilModified: ASCOrder=NA; ASCSubOrder=NA; SoilType=Sand over Sandy Loam; Site=29135_2976; NearestTown=AUGUSTA; Region=Warren; State=Western Australia; NaturalVegetation=Unknown; ApsoilNumber=9999; Latitude=-34.28; Longitude=115.48; LocationAccuracy=+- 90m; YearOfSampling=2020; Comments=Landuse is Plantation forestry
                DataSource=Soil and Landscape Grid of Australia. This soil parameter file was automatically generated from the GSM National Surfaces using pedotransfer functions.
                Sample Initial nitrogen: Thickness=[150, 150, 150, 150, 200, 200, 1000, 1000, 3000, 9000]; SWUnits=Volumetric; OCUnits=Total; PHUnits=Water
                InitialWater Initial water: PercentMethod=1; FractionFull=0.9
                Physical
                  Thickness  BD       AirDry     LL15       DUL       SAT       KS
                  150        1.40206  0.0537352  0.161206   0.311786  0.395989  157.707
                  150        1.38017  0.031054   0.0931621  0.186271  0.403399  150.994
                  150        1.37398  0.0298533  0.0895599  0.172385  0.407649  122.111
                  150        1.37801  0.0298592  0.0895775  0.163079  0.409067  94.8669
                  200        1.37947  0.0330006  0.0990017  0.172955  0.411679  71.1395
                  200        1.38394  0.0372109  0.111633   0.189863  0.413247  53.6108
                  1000       1.384    0.037      0.112      0.19      0.413     53.611
                  1000       1.384    0.037      0.112      0.19      0.413     53.611
                  3000       1.384    0.037      0.112      0.19      0.413     53.611
                  9000       1.384    0.037      0.112      0.19      0.413     53.611
                  SoilCrop EucalyptusSoil
                    LL=[0.161, 0.093, 0.09, 0.09, 0.099, 0.112, 0.112, 0.112, 0.112, 0.112]
                    KL=[0.1, 0.1, 0.08, 0.06, 0.04, 0.02, 0.01, 0.01, 0.01, 0.01]
                    XF=[1, 1, 1, 1, 1, 1, 1, 1, 1, 1]
                WaterBalance SoilWater: SummerDate=1-nov; SummerU=6; SummerCona=6; WinterDate=1-apr; WinterU=2; WinterCona=2; DiffusConst=221.615; DiffusSlope=46.3598; Salb=0.19; CN2Bare=70; CNRed=20; CNCov=0; Slope=0.437747; DischargeWidth=10; CatchmentArea=2487.02; Thickness=[150, 150, 150, 150, 200, 200, 1000, 1000, 3000, 9000]
                  SWCON=[0.644875, 0.57017, 0.54611, 0.516831, 0.433634, 0.40011, 0.4, 0.4, 0.4, 0.4]
                Organic: FOMCNRatio=40
                  Thickness  Carbon    SoilCNRatio  FBiom    FInert    FOM
                  150        5.12261   14           0.04     0.119492  475.475
                  150        1.69911   14           0.03106  0.308142  303.176
                  150        1.12232   14           0.01404  0.471502  193.314
                  150        0.660783  14           0.01     0.795937  123.262
                  200        0.534201  14           0.01     0.983468  67.6477
                  200        0.556024  14           0.01     0.945354  37.1259
                  1000       0.1       14           0.01     0.945     37.126
                  1000       0.1       14           0.01     0.945     37.126
                  3000       0.1       14           0.01     0.945     37.126
                  9000       0.1       14           0.01     0.945     37.126
                Chemical
                  Thickness  NO3N  NH4N  PH
                  150        10    10    4.98189
                  150        5     5     5.03451
                  150        2     2     5.10693
                  150        1     1     5.18353
                  200        0     0     5.30023
                  200        0     0     5.39767
                  1000       0     0     5.398
                  1000       0     0     5.398
                  3000       0     0     5.398
                  9000       0     0     5.398
                CERESSoilTemperature
                SoilNitrogen: fom_types=[default, manure, mucuna, lablab, shemp, stable]; fract_carb=[0.2, 0.3, 0.54, 0.57, 0.45, 0]; fract_cell=[0.7, 0.3, 0.37, 0.37, 0.47, 0.1]; fract_lign=[0.1, 0.4, 0.09, 0.06, 0.08, 0.9]; NPartitionApproach=0
                  SoilNitrogenNO3 NO3
                  SoilNitrogenNH4 NH4
                  SoilNitrogenUrea Urea
                  SoilNitrogenPlantAvailableNO3 PlantAvailableNO3
                  SoilNitrogenPlantAvailableNH4 PlantAvailableNH4
              Fertiliser
              SurfaceOrganicMatter: InitialResidueName=Wheat; InitialResidueType=Wheat; InitialResidueMass=1000; InitialStandingFraction=0; InitialCPR=0; InitialCNR=50
              MicroClimate: a_interception=0; b_interception=1; c_interception=1; d_interception=2; soil_albedo=0.2; SoilHeatFluxFraction=0.5; MinimumHeightDiffForNewLayer=0; NightInterceptionFraction=0; ReferenceHeight=0
              Operations
              Report: VariableNames=[Clock].Today; EventNames=[Clock].DoReport
              Manager TreeThinning
```csharp
using System.Xml.Serialization;
using Models.PMF.Interfaces;
using Models.PMF;
using Models.Core;
using System.Collections.Generic;
using System;

namespace Models
{
    [Serializable] 
    [System.Xml.Serialization.XmlInclude(typeof(Model))]
    public class Script : Model
    {
        [Link] Plant Eucalyptus;
        [Link] Clock Clock;

        [XmlIgnore] private RemovalFractions Remove { get; set; }
        
        [EventSubscribe("StartOfSimulation")]
        private void OnSimulationCommencing(object sender, EventArgs e)
        {
            Remove = new RemovalFractions();
        }
        
        [EventSubscribe("DoManagement")]
        public void DoThin(double ThinFr)
        {
            //Set up  array of remove fractions to send with Cut method.  Each member in the array corresponds to an organ in the same order they are set up in.

                //Harvest with manager specified removal fractions
                Remove.SetFractionToRemove("Leaf", 0);
                Remove.SetFractionToRemove("Stem", 0);
                Remove.SetFractionToRemove("Branch", 0);
                Remove.SetFractionToRemove("FineRoot", 0);
                Remove.SetFractionToRemove("CoarseRoot", 0);
                Remove.SetFractionToResidue("Leaf", ThinFr);
                Remove.SetFractionToResidue("Stem", ThinFr);
                Remove.SetFractionToResidue("Branch", ThinFr);
                Remove.SetFractionToResidue("FineRoot", ThinFr);
                Remove.SetFractionToResidue("CoarseRoot", ThinFr);
                Remove.SetThinningProportion = ThinFr;
                Eucalyptus.RemoveBiomass("Thin", Remove);
                Eucalyptus.Population = Eucalyptus.Population*ThinFr;
        }
    }
}
```
              Manager TreeManagement
                TimeSincePlanting = 0
                RowSpace = 2
                RowWidth = 4
                CultivarName = globulus
                PlantingDate = 15-Jun
                HarvestAge = 9.9
                FertAmount = 0
                script: same as in Validation.Australia Temperate.Westfield.Westfield.WestfieldBase.Plantation.TreeManagement
              Plant Eucalyptus
                Memo: same as Replacements.Eucalyptus.Memo
                AccumulateFunction Age: same as Replacements.Eucalyptus.Age
                Phenology: same as Replacements.Eucalyptus.Phenology
                OrganArbitrator Arbitrator: same as Replacements.Eucalyptus.Arbitrator
                CompositeBiomass AboveGround: DMDOfStructural=0.6
                  Propertys=[[Branch].Live, [Branch].Dead, [Leaf].Live, [Leaf].Dead, [Stem].Live, [Stem].Dead]
                CompositeBiomass BelowGround: DMDOfStructural=0.6
                  Propertys=[[FineRoot].Live, [FineRoot].Dead, [CoarseRoot].Live, [CoarseRoot].Dead]
                CompositeBiomass Wood: Propertys=[[Stem].Live, [Stem].Dead, [Branch].Live, [Branch].Dead]; DMDOfStructural=0.6
                CompositeBiomass Total: DMDOfStructural=0.6
                  Propertys=[[Leaf].Live, [Leaf].Dead, [Stem].Live, [Stem].Dead, [Branch].Live, [Branch].Dead, [FineRoot].Live, [FineRoot].Dead, [CoarseRoot].Live, [CoarseRoot].Dead]
                  Memo
                    Note that this  property does not include branches.
                CompositeBiomass TotalLive: DMDOfStructural=0.6
                  Propertys=[[Leaf].Live, [Branch].Live, [Stem].Live, [FineRoot].Live, [CoarseRoot].Live]
                  Memo
                    Note that this  property does not include branches, and it is used to calculate IndividualTreeLiveWt.
                CompositeBiomass TotalDead: DMDOfStructural=0.6
                  Propertys=[[Leaf].Dead, [Branch].Dead, [Stem].Dead, [FineRoot].Dead, [CoarseRoot].Dead]
                  Memo
                    Note that this  property does not include branches.
                DivideFunction IndividualTreeLiveWt: same as Replacements.Eucalyptus.IndividualTreeLiveWt
                DivideFunction IndividualTreeStemWt
                  VariableReference LiveWt: VariableName=[Eucalyptus].Stem.Wt
                  VariableReference Population: VariableName=[Eucalyptus].Population
                PerennialLeaf Leaf: same as Replacements.Eucalyptus.Leaf
                GenericOrgan Branch: same as Replacements.Eucalyptus.Branch
                GenericOrgan Stem: IsAboveGround=true
                  Memo
                    For many of the parameters in this organ, see comments for similar parameters in the leaf organ.
                  Constant NReallocationFactor: FixedValue=0; Units=/d
                  Constant NRetranslocationFactor: FixedValue=0.05; Units=/d
                  PhaseBasedSwitch NitrogenDemandSwitch: Start=Emergence; End=Old
                  Constant DMRetranslocationFactor: FixedValue=0; Units=/d
                  Constant SenescenceRate: FixedValue=0; Units=/d
                  Constant MaximumNConc: FixedValue=0.01; Units=g/g
                    Memo
                      Branch, stem and coarse root minimum N concentrations are based on [raymond2000effect].
                  Constant MinimumNConc: FixedValue=0.0014; Units=g/g
                  Constant DetachmentRateFunction: FixedValue=0; Units=/d
                  Constant MaintenanceRespirationFunction: FixedValue=0; Units=0-1
                  Constant DMConversionEfficiency: FixedValue=1; Units=0-1
                  BiomassRemoval BiomassRemovalDefaults: same as Replacements.Eucalyptus.Stem.BiomassRemovalDefaults
                  Constant DMReallocationFactor: FixedValue=0; Units=/d
                  VariableReference CriticalNConc: VariableName=[Stem].MinimumNConc
                  Constant CarbonConcentration: FixedValue=0.45; Units=g/g
                  Constant RemobilisationCost: FixedValue=0
                  ExpressionFunction DBH: Expression=0.685*([Eucalyptus].AboveGround.Wt^0.3262)
                  MaximumFunction Ht
                    ExpressionFunction HeightFunction: Expression=0.5201*([Eucalyptus].Stem.DBH^1.3604)
                    Constant MinimumHeight: FixedValue=0.1; Units=m
                  LessThanFunction Vol: same as Replacements.Eucalyptus.Stem.Vol
                  ExpressionFunction MAI: same as Replacements.Eucalyptus.Stem.MAI
                  BiomassDemand DMDemands: same as Replacements.Eucalyptus.Stem.DMDemands
                  BiomassDemand NDemands: same as Replacements.Eucalyptus.Stem.NDemands
                  RetranslocateNonStructural RetranslocateNitrogen
                  BiomassDemand InitialWt
                    Constant Structural: FixedValue=0; Units=g
                    Constant Metabolic: FixedValue=0
                    Constant Storage: FixedValue=0
                GenericOrgan CoarseRoot: same as Replacements.Eucalyptus.CoarseRoot
                Root FineRoot: same as Replacements.Eucalyptus.FineRoot
                DivideFunction RootShootRatio
                  VariableReference Numerator: VariableName=[Eucalyptus].BelowGround.Wt
                  VariableReference Denominator: VariableName=[Eucalyptus].AboveGround.Wt
                CultivarFolder grandis: same as Replacements.Eucalyptus.grandis
                CultivarFolder grandisXurophylla: same as Replacements.Eucalyptus.grandisXurophylla
                CultivarFolder urophyllaXglobulus: same as Replacements.Eucalyptus.urophyllaXglobulus
                CultivarFolder BrazilClones: same as Replacements.Eucalyptus.BrazilClones
                CultivarFolder saligna: same as Replacements.Eucalyptus.saligna
                CultivarFolder nitens: same as Replacements.Eucalyptus.nitens
                CultivarFolder globulus
                  Cultivar globulus
                    Command:
                      [Leaf].FRGR.FRGRFunction.XYPairs.X=0,15,27,34
                      [Leaf].FRGR.FRGRFunction.XYPairs.Y=0,1,1,0
                    Memo Genotype note
                      This genotype specification was originally planned to be for the species E. grandis in general, but we did not actually provide any specific parameters. As no parameter values were changed here, generic Eucalyptus parameters were used where this genotype was specified in a simulation.
                CultivarFolder globulus1: same as Validation.Australia Temperate.DroughtRisk.ScottRiver.ScottRiverBase.Plantation.Eucalyptus.globulus
                CultivarFolder nitens1: same as Replacements.Eucalyptus.nitens
        Experiment Wellstead (disabled)
          Factors
            Factor Stocking: Specification=[Operations]
              Operations 1N0: same as Validation.Australia Temperate.Westfield.Westfield.Factors.T.1N0
              Operations 2N950: same as Validation.Australia Temperate.Westfield.Westfield.Factors.T.2N950
              Operations 6N1200: same as Validation.Australia Temperate.Westfield.Westfield.Factors.T.6N1200
            Factor N: same as Validation.Australia Temperate.Westfield.Westfield.Factors.T
          Simulation WellsteadBase
            Clock: Start=1996-06-01; End=2019-12-31
            Weather: FileName=WellsteadSiloDD1900-2020.met
            Summary
            SoilArbitrator Soil Arbitrator
            Zone Plantation: Area=1; Slope=0; AspectAngle=0; Altitude=50
              Soil SoilWestfield: NearestTown=Maydena; State=Tasmania; Latitude=-42.65; Longitude=146.47; Comments=Papers by Smethurst et al
                Physical: same as Validation.Australia Temperate.Westfield.Westfield.WestfieldBase.Plantation.SoilWestfield.PAWC etc
                WaterBalance SoilWater: same as Validation.Australia Temperate.Westfield.Westfield.WestfieldBase.Plantation.SoilWestfield.SoilWater
                SoilNitrogen: same as Validation.Australia Temperate.Westfield.Westfield.WestfieldBase.Plantation.SoilWestfield.SoilNitrogen
                Organic: FOMCNRatio=60
                  Thickness  Carbon  SoilCNRatio  FBiom  FInert  FOM
                  100        8.1     20           0.01   0.005   1
                  200        6.1     15           0.01   0.005   1
                  300        3.1     13           0.01   0.005   1
                  400        1       13           0.01   0.005   1
                Chemical
                  Thickness  NO3N  NH4N  PH
                  100        10    5     4.7
                  200        5     2     4.7
                  300        2     1     4.7
                  400        1     1     4.7
                Sample Initial nitrogen: SWUnits=Volumetric; OCUnits=Total; PHUnits=Water
                  Thickness  NO3N  NH4N  SW
                  100        58    29    0.55
                  200        11    6     0.61
                  300        15    7     0.5
                  400        7     3     0.35
                CERESSoilTemperature
              Fertiliser
              SurfaceOrganicMatter: InitialResidueName=Wheat; InitialResidueType=Wheat; InitialResidueMass=1000; InitialStandingFraction=0; InitialCPR=0; InitialCNR=50
              MicroClimate: a_interception=0; b_interception=1; c_interception=1; d_interception=2; soil_albedo=0.2; SoilHeatFluxFraction=0.5; MinimumHeightDiffForNewLayer=0; NightInterceptionFraction=0; ReferenceHeight=0
              Operations
              Report: VariableNames=[Clock].Today; EventNames=[Clock].DoReport
              Manager TreeThinning: same as Validation.Australia Temperate.Westfield.Westfield.WestfieldBase.Plantation.TreeThinning
              Manager TreeManagement: same as Validation.Australia Temperate.Westfield.Westfield.WestfieldBase.Plantation.TreeManagement
              Plant Eucalyptus: same as Validation.Australia Temperate.Westfield.Westfield.WestfieldBase.Plantation.Eucalyptus
              Soil Synthetic Soil Derived from the SLGA: ASCOrder=NA; ASCSubOrder=NA; SoilType=Sand over Clay Loam; Site=29495_6660; NearestTown=JERRAMUNGUP; Region=Esperance Plains; State=Western Australia; NaturalVegetation=Cleared, non-native vegetation, buildings; ApsoilNumber=9999; Latitude=-34.58; Longitude=118.55; LocationAccuracy=+- 90m; YearOfSampling=2020; Comments=Landuse is Grazing natural vegetation
                DataSource=Soil and Landscape Grid of Australia. This soil parameter file was automatically generated from the GSM National Surfaces using pedotransfer functions.
                Sample Initial nitrogen: Thickness=[150, 150, 150, 150, 200]; SWUnits=Volumetric; OCUnits=Total; PHUnits=Water
                InitialWater Initial water: PercentMethod=0; FractionFull=1
                Physical: Thickness=[150, 150, 150, 150, 200, 200, 1000, 1000, 3000, 9000]; BD=[1.43567, 1.47314, 1.47767, 1.47681, 1.4915]; AirDry=[0.03472, 0.0341516, 0.0423445, 0.0487985, 0.0544548]; LL15=[0.10416, 0.102455, 0.127034, 0.146395, 0.163364]; DUL=[0.199405, 0.177607, 0.204149, 0.227301, 0.250729]; SAT=[0.386605, 0.381139, 0.386442, 0.39165, 0.390914]; KS=[139.113, 72.5029, 36.5325, 22.1956, 14.4831]
                  SoilCrop OatsSoil: LL=[0.109875, 0.106964, 0.131635, 0.150847, 0.16756]; KL=[0.06, 0.06, 0.0596733, 0.05502, 0.04802]; XF=[1, 1, 1, 1, 1]
                  SoilCrop SorghumSoil: LL=[0.110827, 0.107715, 0.13241, 0.151706, 0.168564]; KL=[0.07, 0.07, 0.0697142, 0.0656425, 0.0595175]; XF=[1, 1, 1, 1, 1]
                  SoilCrop BarleySoil: LL=[0.110827, 0.107715, 0.132406, 0.151644, 0.168403]; KL=[0.07, 0.07, 0.0696637, 0.0648735, 0.0576676]; XF=[1, 1, 1, 1, 1]
                  SoilCrop ChickpeaSoil: LL=[0.109875, 0.106964, 0.131661, 0.15125, 0.168205]; KL=[0.06, 0.06, 0.06, 0.06, 0.0554077]; XF=[1, 1, 1, 1, 1]
                  SoilCrop MungbeanSoil: LL=[0.109875, 0.106964, 0.131661, 0.15109, 0.167561]; KL=[0.06, 0.06, 0.06, 0.05802, 0.04803]; XF=[1, 1, 1, 1, 1]
                  SoilCrop CottonSoil: LL=[0.113685, 0.10997, 0.134745, 0.154486, 0.172101]; KL=[0.1, 0.1, 0.1, 0.1, 0.1]; XF=[1, 1, 1, 1, 1]
                  SoilCrop CanolaSoil: LL=[0.109875, 0.106964, 0.131635, 0.150847, 0.16756]; KL=[0.06, 0.06, 0.0596733, 0.05502, 0.04802]; XF=[1, 1, 1, 1, 1]
                  SoilCrop Pigeon PeaSoil: LL=[0.109875, 0.106964, 0.131661, 0.15125, 0.168172]; KL=[0.06, 0.06, 0.06, 0.06, 0.055025]; XF=[1, 1, 1, 1, 1]
                  SoilCrop MaizeSoil: LL=[0.109875, 0.106964, 0.131635, 0.150847, 0.16756]; KL=[0.06, 0.06, 0.0596733, 0.05502, 0.04802]; XF=[1, 1, 1, 1, 1]
                  SoilCrop CowpeasSoil: LL=[0.109875, 0.106964, 0.131635, 0.150847, 0.16756]; KL=[0.06, 0.06, 0.0596733, 0.05502, 0.04802]; XF=[1, 1, 1, 1, 1]
                  SoilCrop SunflowerSoil: LL=[0.113639, 0.10942, 0.1335, 0.152466, 0.16902]; KL=[0.0995196, 0.0926765, 0.0838529, 0.0750294, 0.0647353]; XF=[1, 1, 1, 1, 1]
                  SoilCrop FababeanSoil: LL=[0.11178, 0.108467, 0.133203, 0.152868, 0.17023]; KL=[0.08, 0.08, 0.08, 0.08, 0.0785857]; XF=[1, 1, 1, 1, 1]
                  SoilCrop LucerneSoil: LL=[0.113685, 0.10997, 0.134745, 0.154486, 0.172101]; KL=[0.1, 0.1, 0.1, 0.1, 0.1]; XF=[1, 1, 1, 1, 1]
                  SoilCrop PerennialsSoil: LL=[0.113685, 0.10997, 0.134745, 0.154486, 0.172101]; KL=[0.1, 0.1, 0.1, 0.1, 0.1]; XF=[1, 1, 1, 1, 1]
                  SoilCrop LupinsSoil: LL=[0.109875, 0.106964, 0.131635, 0.150847, 0.16756]; KL=[0.06, 0.06, 0.0596733, 0.05502, 0.04802]; XF=[1, 1, 1, 1, 1]
                  SoilCrop LentilsSoil: LL=[0.109875, 0.106964, 0.131635, 0.150847, 0.16756]; KL=[0.06, 0.06, 0.0596733, 0.05502, 0.04802]; XF=[1, 1, 1, 1, 1]
                  SoilCrop TriticaleSoil: LL=[0.110827, 0.107715, 0.132066, 0.150903, 0.167259]; KL=[0.07, 0.07, 0.0652591, 0.0557136, 0.0445773]; XF=[1, 1, 1, 1, 1]
                  SoilCrop MilletSoil: LL=[0.110827, 0.107715, 0.13241, 0.151706, 0.168564]; KL=[0.07, 0.07, 0.0697142, 0.0656425, 0.0595175]; XF=[1, 1, 1, 1, 1]
                  SoilCrop SoybeansSoil: LL=[0.109875, 0.106964, 0.131635, 0.150847, 0.16756]; KL=[0.06, 0.06, 0.0596733, 0.05502, 0.04802]; XF=[1, 1, 1, 1, 1]
                  SoilCrop Pasture grasses & legumesSoil: LL=[0.109875, 0.106964, 0.131635, 0.150847, 0.16756]; KL=[0.06, 0.06, 0.0596733, 0.05502, 0.04802]; XF=[1, 1, 1, 1, 1]
                WaterBalance SoilWater: SummerDate=1-nov; SummerU=6; SummerCona=6; WinterDate=1-apr; WinterU=2; WinterCona=2; DiffusConst=218.309; DiffusSlope=51.1674; Salb=0.19; CN2Bare=70; CNRed=20; CNCov=0; Slope=2.65824; DischargeWidth=10; CatchmentArea=16398.9; Thickness=[150, 150, 150, 150, 200]; SWCON=[0.571908, 0.500903, 0.421551, 0.363703, 0.275949]
                Organic: FOMCNRatio=40
                  Thickness  Carbon    SoilCNRatio  FBiom    FInert    FOM
                  150        2.16772   14           0.04     0.239585  553.813
                  150        0.795294  14           0.03106  0.589171  315.553
                  150        0.614764  14           0.01404  0.759369  179.797
                  150        0.535366  14           0.01     0.872053  102.445
                  200        0.435218  14           0.01     0.993403  48.3917
                Chemical
                  Thickness  NO3N  NH4N  PH
                  150        0     0     5.67467
                  150        0     0     5.79169
                  150        0     0     5.99856
                  150        0     0     6.18784
                  200        0     0     6.30829
                CERESSoilTemperature
        Experiment BoyupBrook (disabled)
          Factors: same as Validation.Australia Temperate.DroughtRisk.Wellstead.Factors
          Simulation BoyupBrookBase
            Clock: Start=1996-06-01; End=2019-12-31
            Weather: FileName=BoyupBrookSiloDD.met
            Summary
            SoilArbitrator Soil Arbitrator
            Zone Plantation: Area=1; Slope=0; AspectAngle=0; Altitude=50
              Soil SoilWestfield: same as Validation.Australia Temperate.DroughtRisk.Wellstead.WellsteadBase.Plantation.SoilWestfield
              Fertiliser
              SurfaceOrganicMatter: InitialResidueName=Wheat; InitialResidueType=Wheat; InitialResidueMass=1000; InitialStandingFraction=0; InitialCPR=0; InitialCNR=50
              MicroClimate: a_interception=0; b_interception=1; c_interception=1; d_interception=2; soil_albedo=0.2; SoilHeatFluxFraction=0.5; MinimumHeightDiffForNewLayer=0; NightInterceptionFraction=0; ReferenceHeight=0
              Operations
              Report: VariableNames=[Clock].Today; EventNames=[Clock].DoReport
              Manager TreeThinning: same as Validation.Australia Temperate.Westfield.Westfield.WestfieldBase.Plantation.TreeThinning
              Manager TreeManagement: same as Validation.Australia Temperate.Westfield.Westfield.WestfieldBase.Plantation.TreeManagement
              Plant Eucalyptus: same as Validation.Australia Temperate.Westfield.Westfield.WestfieldBase.Plantation.Eucalyptus
  Folder Sensibility (disabled)
    Memo
      A series of sensibility tests have been employed to test the behaviour of the model in regions not explicitly included in the previous test set.  Furthermore, these tests explore the emergent behaviour of the model under a range of changing climate, fertility and management scenarios to ensure that simulated patterns agree with expected behaviours.
    Folder MAI in SE Australia
      Memo
        Representative growth rates for Eucalyptus grandis have been published for south-eastern Australia (Victoria and South Australia) by [Wong2000].  Some of the sites within this publication had previously been used for improved pasture and had minimual fertility constraints.  Simulations for 4 sites have been presented here to capture a range of environmental conditions.  Stocking rates used at each site match those obtained at each site within the published study.  MAI at age 10 years should be approximately 10 cubic metres per annum for Mount Worth and Stockdale and approximately 20 cubic metres per annum for Tostaree and Mount Lofty.  Climate data has been taken from nearby towns and common soil properties have been used for all sites, with soil properties reflecting a relatively high state of fertility.
      Simulation MountWorth
        Weather: FileName=MountWorth.met
        Clock: Start=1990-01-01; End=2000-12-31
        Summary
        SoilArbitrator Soil Arbitrator
        Zone Plantation: Area=1; Slope=0; AspectAngle=0; Altitude=50
          Soil: Latitude=0; Longitude=0
            InitialWater Initial water: PercentMethod=1; FractionFull=0.8
            Physical
              Thickness  BD    AirDry  LL15  DUL   SAT
              100        1.5   0.01    0.05  0.15  0.18
              300        1.6   0.01    0.05  0.15  0.18
              600        1.68  0.01    0.05  0.15  0.18
              1000       1.75  0.01    0.05  0.15  0.18
              1000       1.7   0.01    0.05  0.15  0.18
              1000       1.7   0.01    0.05  0.15  0.2
              1000       1.7   0.01    0.05  0.15  0.2
              1000       1.7   0.01    0.05  0.15  0.2
              SoilCrop EucalyptusSoil: LL=[0.01, 0.01, 0.01, 0.01, 0.01, 0.01, 0.01, 0.01]; KL=[0.07, 0.07, 0.05, 0.02, 0.02, 0.02, 0.01, 0.01]; XF=[0.9, 0.8, 0.7, 0.6, 0.3, 0, 0, 0]
            WaterBalance SoilWater: same as Validation.Australia grandis.Gympie.Gympie.GympieBase.Plantation.Soil.SoilWater
            Organic: FOMCNRatio=60
              Thickness  Carbon  SoilCNRatio  FBiom  FInert  FOM
              100        3       12           0.03   0.1     0.29407
              300        2       12           0.02   0.2     0.253108
              600        0.5     12           0.02   0.5     0.187507
              1000       0.2     12           0.01   0.9     0.113729
              1000       0.12    12           0.01   0.9     0.06898
              1000       0.1     12           0.01   0.99    0.0418385
              1000       0.1     12           0.01   0.99    0.0253763
              1000       0.1     12           0.01   0.99    0.0153915
            Chemical
              Thickness  NO3N  NH4N  PH
              100        10    0.01  5.8
              300        10    0.01  5.7
              600        10    0.01  5.7
              1000       10    0.01  5.9
              1000       0.01  0.01  5.7
              1000       0.01  0.01  5.7
              1000       0.01  0.01  5.7
              1000       0.01  0.01  5.7
            Sample Initial nitrogen: Thickness=[100, 300, 600, 1000, 1000, 1000, 1000, 1000]; SWUnits=Volumetric; OCUnits=Total; PHUnits=Water
            CERESSoilTemperature
            Nutrient
          Irrigation
          Fertiliser
          SurfaceOrganicMatter: InitialResidueName=Wheat; InitialResidueType=Wheat; InitialResidueMass=2000; InitialStandingFraction=0; InitialCPR=0; InitialCNR=80
          MicroClimate: a_interception=0; b_interception=1; c_interception=0; d_interception=0; soil_albedo=0.13; SoilHeatFluxFraction=0; MinimumHeightDiffForNewLayer=0; NightInterceptionFraction=0; ReferenceHeight=0
          Plant Eucalyptus
          Report SensibilityReport: VariableNames=[Clock].Today; EventNames=[Clock].DoReport
          Manager TreeThinning: same as Validation.Australia Temperate.Westfield.Westfield.WestfieldBase.Plantation.TreeThinning
          Manager TreeTransplantRule
            RowSpace = 4.2
            RowWidth = 3.3
            CultivarName = grandisCoffsHarbour
            SowingDate = 01/01/1990 00:00:00
            script: same as in Validation.Australia grandis.CoffsHarbour.CoffsHarbour.Plantation.TreeTransplantRule
      Simulation Tostaree
        Weather: FileName=Tostaree.met
        Clock: Start=1990-01-01; End=2000-12-31
        Summary
        SoilArbitrator Soil Arbitrator
        Zone Plantation: Area=1; Slope=0; AspectAngle=0; Altitude=50
          Soil: Latitude=0; Longitude=0
            InitialWater Initial water: PercentMethod=1; FractionFull=0.8
            Physical: same as Validation.Australia grandis.Gympie.Gympie.GympieBase.Plantation.Soil.Physical
            WaterBalance SoilWater: same as Validation.Australia grandis.Gympie.Gympie.GympieBase.Plantation.Soil.SoilWater
            Organic: same as Sensibility.MAI in SE Australia.MountWorth.Plantation.Soil.Organic
            Chemical: same as Sensibility.MAI in SE Australia.MountWorth.Plantation.Soil.Chemical
            Sample Initial nitrogen: Thickness=[100, 300, 600, 1000, 1000, 1000, 1000, 1000]; SWUnits=Volumetric; OCUnits=Total; PHUnits=Water
            CERESSoilTemperature
            Nutrient
          Irrigation
          Fertiliser
          SurfaceOrganicMatter: InitialResidueName=Wheat; InitialResidueType=Wheat; InitialResidueMass=2000; InitialStandingFraction=0; InitialCPR=0; InitialCNR=80
          MicroClimate: a_interception=0; b_interception=1; c_interception=0; d_interception=0; soil_albedo=0.13; SoilHeatFluxFraction=0; MinimumHeightDiffForNewLayer=0; NightInterceptionFraction=0; ReferenceHeight=0
          Plant Eucalyptus
          Manager TreeTransplantRule
            RowSpace = 3.2
            RowWidth = 3.3
            CultivarName = grandisCoffsHarbour
            SowingDate = 1990-01-01
            script: same as in Validation.Australia grandis.CoffsHarbour.CoffsHarbour.Plantation.TreeTransplantRule
          Report SensibilityReport: VariableNames=[Clock].Today; EventNames=[Clock].DoReport
          Manager TreeThinning: same as Validation.Australia Temperate.Westfield.Westfield.WestfieldBase.Plantation.TreeThinning
      Simulation MountLofty
        Weather: FileName=MountLofty.met
        Clock: Start=1990-01-01; End=2000-12-31
        Summary
        SoilArbitrator Soil Arbitrator
        Zone Plantation: Area=1; Slope=0; AspectAngle=0; Altitude=50
          Soil: same as Sensibility.MAI in SE Australia.Tostaree.Plantation.Soil
          Irrigation
          Fertiliser
          SurfaceOrganicMatter: InitialResidueName=Wheat; InitialResidueType=Wheat; InitialResidueMass=2000; InitialStandingFraction=0; InitialCPR=0; InitialCNR=80
          MicroClimate: a_interception=0; b_interception=1; c_interception=0; d_interception=0; soil_albedo=0.13; SoilHeatFluxFraction=0; MinimumHeightDiffForNewLayer=0; NightInterceptionFraction=0; ReferenceHeight=0
          Plant Eucalyptus
          Report SensibilityReport: VariableNames=[Clock].Today; EventNames=[Clock].DoReport
          Manager TreeThinning: same as Validation.Australia Temperate.Westfield.Westfield.WestfieldBase.Plantation.TreeThinning
          Manager TreeTransplantRule
            RowSpace = 2.1
            RowWidth = 3.3
            CultivarName = grandisCoffsHarbour
            SowingDate = 01/01/1990 00:00:00
            script: same as in Validation.Australia grandis.CoffsHarbour.CoffsHarbour.Plantation.TreeTransplantRule
      Simulation Stockdale
        Weather: FileName=Stockdale.met
        Clock: Start=1990-01-01; End=2000-12-31
        Summary
        SoilArbitrator Soil Arbitrator
        Zone Plantation: Area=1; Slope=0; AspectAngle=0; Altitude=50
          Soil: same as Sensibility.MAI in SE Australia.Tostaree.Plantation.Soil
          Irrigation
          Fertiliser
          SurfaceOrganicMatter: InitialResidueName=Wheat; InitialResidueType=Wheat; InitialResidueMass=2000; InitialStandingFraction=0; InitialCPR=0; InitialCNR=80
          MicroClimate: a_interception=0; b_interception=1; c_interception=0; d_interception=0; soil_albedo=0.13; SoilHeatFluxFraction=0; MinimumHeightDiffForNewLayer=0; NightInterceptionFraction=0; ReferenceHeight=0
          Plant Eucalyptus
          Manager TreeTransplantRule
            RowSpace = 3.2
            RowWidth = 3.3
            CultivarName = grandisCoffsHarbour
            SowingDate = 01/01/1990 00:00:00
            script: same as in Validation.Australia grandis.CoffsHarbour.CoffsHarbour.Plantation.TreeTransplantRule
          Report SensibilityReport: VariableNames=[Clock].Today; EventNames=[Clock].DoReport
          Manager TreeThinning: same as Validation.Australia Temperate.Westfield.Westfield.WestfieldBase.Plantation.TreeThinning
    Folder Response to Rainfall
      Memo
        Eucalyptus should respond to changes in rainfall such that peak MAI should increase with rainfall.  Long term "climax LAI" should also increase with mean annual rainfall.  This simulation experiment explores the changes in MAI and canopy cover along a rainfall gradient within SE Queensland Australia.  Mean annual rainfall decreases from approximately 1200 mm to 660 mm.  Fertiliser is applied within the simulations to remove any confounding of results due to site fertility.  Data from [specht1972water] show that canopy cover should be almost complete for the wetter sites in this study, and decrease to approximately 50% at the drier sites.
      Experiment Climate
        Factors
          Factor Site: Specification=[Weather]
            Weather Canungra: FileName=Canungra.met
            Weather Samford: FileName=Samford.met
            Weather Ipswich: FileName=Ipswich.met
            Weather Gatton: FileName=Gatton.met
            Weather Dalby: FileName=Dalby.met
        Simulation ClimateBase
          Weather: FileName=coffs.met
          Clock: Start=1970-01-01; End=2015-12-31
          Summary
          SoilArbitrator Soil Arbitrator
          Zone Plantation: Area=1; Slope=0; AspectAngle=0; Altitude=50
            Irrigation
            Fertiliser
            SurfaceOrganicMatter: InitialResidueName=Wheat; InitialResidueType=Wheat; InitialResidueMass=2000; InitialStandingFraction=0; InitialCPR=0; InitialCNR=80
            MicroClimate: a_interception=0; b_interception=1; c_interception=0; d_interception=0; soil_albedo=0.13; SoilHeatFluxFraction=0; MinimumHeightDiffForNewLayer=0; NightInterceptionFraction=0; ReferenceHeight=0
            Plant Eucalyptus
            Manager TreeTransplantAndFertiliserRule
              RowSpace = 3.3
              RowWidth = 3.3
              CultivarName = grandisCoffsHarbour
              SowingDate = 04/01/1970 00:00:00
```csharp
using Models.PMF;
using Models.Core;
using System;
namespace Models
{
    [Serializable] 
    [System.Xml.Serialization.XmlInclude(typeof(Model))]
    public class Script : Model
    {
        [Link] Plant Plant;
        [Link] Clock Clock;
        [Link] Fertiliser Fertiliser;

        [Description("Spacing (m) between plants within rows")]
        public double RowSpace { get; set; }
        [Description("Spacing (m) between rows")]
        public double RowWidth { get; set; }

        [Description("Cultivar")]
        [Display(Type=DisplayType.CultivarName)]
        public string CultivarName { get; set; }
        [Description("Sowing Date")]
        public DateTime SowingDate { get; set; }

        [EventSubscribe("DoManagement")]
        private void OnDoManagement(object sender, EventArgs e)
        {
            double PlantPopulation = 1 / (RowWidth * RowSpace);

            if (Clock.Today.Date == SowingDate)
                Plant.Sow(population: PlantPopulation, 
                    cultivar: CultivarName, 
                    depth: 100, 
                    rowSpacing: 150);
            //Plant.Sow(... Contains the following arguements:
            //Population  double  Required  Seeds sowing/m2
            //Cultivar    string  Required  "NameOfCultivar"
            //Depth       double  Optional  Depth (mm) seed sown.   Default is 100mm 
            //MaxCover    double  Optional  Proportion (0-1) of the ground row crop will cover.   Default is 1.0
            //BudNumber   double  Optional  Number of mainstems per seed sown.  Default is 1.0
            //RowSpacing  double  Optional  Spaceing (mm) between drill rows when crop is sown.  Default is 150mm
            //CropClass   string  Optional  Crop class to instantiate when crop is sown.  Default is "Plant"

            if (Clock.Today.DayOfYear == 1)
                Fertiliser.Apply(128, Fertiliser.Types.UreaN, 100);
        }
    }
}
```
            Report SensibilityReport: VariableNames=[Clock].Today; EventNames=[Clock].DoReport
            Manager TreeThinning: same as Validation.Australia Temperate.Westfield.Westfield.WestfieldBase.Plantation.TreeThinning
            Soil: Latitude=0; Longitude=0
              InitialWater Initial water: PercentMethod=0; FractionFull=0.25
              Physical: same as Validation.Australia grandis.Gympie.Gympie.GympieBase.Plantation.Soil.Physical
              WaterBalance SoilWater: same as Validation.Australia grandis.Gympie.Gympie.GympieBase.Plantation.Soil.SoilWater
              Organic: same as Sensibility.MAI in SE Australia.MountWorth.Plantation.Soil.Organic
              Chemical
                Thickness  NO3N  NH4N  PH
                100        0.1   0.01  5.8
                300        0.1   0.01  5.7
                600        0.1   0.01  5.7
                1000       0.1   0.01  5.9
                1000       0.01  0.01  5.7
                1000       0.01  0.01  5.7
                1000       0.01  0.01  5.7
                1000       0.01  0.01  5.7
              Sample Initial nitrogen: Thickness=[100, 300, 600, 1000, 1000, 1000, 1000, 1000]; SWUnits=Volumetric; OCUnits=Total; PHUnits=Water
              CERESSoilTemperature
              Nutrient
    Folder Response to Soil Fertility
      Memo
        Site fertility is an important driver of the pattern of tree growth rates.  As site fertility declines, the long term growth rate (e.g. MAI) should also decrease, but the time to obtaining peak MAI should increase.  This sensibility test uses a single location in SE Queensland at which Eucalyptus grandis occurs naturally.  A range of soil fertility states are applied in this experiment.  Peak MAI should decrease with decreasing fertility, but the time required to achieve this should increase.
      Experiment Fertility
        DisabledSimNames=[ClimateSiteSamford, ClimateSiteIpswich, ClimateSiteGatton, ClimateSiteDalby]
        Factors
          Factor Level: Specification=[Organic]
            Organic High: same as Sensibility.MAI in SE Australia.MountWorth.Plantation.Soil.Organic
            Organic Medium: FOMCNRatio=60
              Thickness  Carbon  SoilCNRatio  FBiom  FInert  FOM
              100        2       12           0.03   0.25    0.29407
              300        1       12           0.02   0.5     0.253108
              600        0.5     12           0.02   0.7     0.187507
              1000       0.2     12           0.01   0.9     0.113729
              1000       0.12    12           0.01   0.9     0.06898
              1000       0.1     12           0.01   0.99    0.0418385
              1000       0.1     12           0.01   0.99    0.0253763
              1000       0.1     12           0.01   0.99    0.0153915
            Organic Low: FOMCNRatio=60
              Thickness  Carbon  SoilCNRatio  FBiom  FInert  FOM
              100        1       12           0.03   0.5     0.29407
              300        0.75    12           0.02   0.66    0.253108
              600        0.5     12           0.02   0.9     0.187507
              1000       0.2     12           0.01   0.9     0.113729
              1000       0.12    12           0.01   0.9     0.06898
              1000       0.1     12           0.01   0.99    0.0418385
              1000       0.1     12           0.01   0.99    0.0253763
              1000       0.1     12           0.01   0.99    0.0153915
        Simulation FertilityBase
          Weather: FileName=Canungra.met
          Clock: Start=1970-01-01; End=2000-12-31
          Summary
          SoilArbitrator Soil Arbitrator
          Zone Plantation: Area=1; Slope=0; AspectAngle=0; Altitude=50
            Irrigation
            Fertiliser
            SurfaceOrganicMatter: InitialResidueName=Wheat; InitialResidueType=Wheat; InitialResidueMass=2000; InitialStandingFraction=0; InitialCPR=0; InitialCNR=80
            MicroClimate: a_interception=0; b_interception=1; c_interception=0; d_interception=0; soil_albedo=0.13; SoilHeatFluxFraction=0; MinimumHeightDiffForNewLayer=0; NightInterceptionFraction=0; ReferenceHeight=0
            Plant Eucalyptus
            Manager TreeTransplantRule
              RowSpace = 3.3
              RowWidth = 3.3
              CultivarName = grandisCoffsHarbour
              SowingDate = 04/01/1970 00:00:00
              script: same as in Validation.Australia grandis.CoffsHarbour.CoffsHarbour.Plantation.TreeTransplantRule
            Report SensibilityReport: VariableNames=[Clock].Today; EventNames=[Clock].DoReport
            Manager TreeThinning: same as Validation.Australia Temperate.Westfield.Westfield.WestfieldBase.Plantation.TreeThinning
            Soil: same as Sensibility.Response to Rainfall.Climate.ClimateBase.Plantation.Soil
    Folder Reponse to N Fertilizer
      Memo
        Eucalyptus responses to rate of fertiliser are often asymptotic, the plateau of which is determined by other limiting factors ([rubilar2018advances]). In the sensibility tests presented here, soil from Wodonga, Australia, was used as the basis for the simulations, except soil organic C and C:N were set to represent site 1 in Columbia in [albaugh2015response] and [rubilar2018advances]. Two climates are used in these simualtions ('WodongaI0ClimateWodonga' and 'WodongaI0ClimateCoffs'. Management was set similar to site 1 in [rubilar2018advances], i.e. E grandis was fertilised at 2 years of age and the 3-year stem volume response assessed at 5 years of age. For a highly responsive site in Columbia, a plateau in growth response occurred at about 800 kg N/ha, when it was speculated that other factors became limiting.

        In 'WodongaI0ClimateWodonga', a low rainfall site (739 mm/year average longterm), the response to N was simulated to plateau at a rate  of about 800 kg N/ha. The N rate inflexion point here is similar to that in [rubilar2018advances], but the limiting factor above this N rate in this simulation was mainly water, whereas in [albaugh2015response] we can specualte that it was base cation deficiency.

        In 'WodongaI0ClimateCoffs', a high rainfall site (1635 mm/year average longterm), the water limitation was removed and the response to N has not plateaued even at a rate of 3000 kg N/ha.

        Values of MAI and other outputs are in the range of expectation.
      Experiment WodongaI0ClimateWodonga
        Factors
          Factor N: Specification=[FertiliserOperations]
            Operations 0
              2009-11-15  [Fertiliser].Apply(0, Fertiliser.Types.NH4N, 0);
            Operations 100
              1982-08-20  [Fertiliser].Apply(Amount: 100, Type: Fertiliser.Types.NO3N)
            Operations 200
              1982-08-20  [Fertiliser].Apply(Amount: 200, Type: Fertiliser.Types.NO3N)
            Operations 400
              1982-08-20  [Fertiliser].Apply(Amount: 400, Type: Fertiliser.Types.NO3N)
            Operations 800
              1982-08-20  [Fertiliser].Apply(Amount: 800, Type: Fertiliser.Types.NO3N)
            Operations 1000
              1982-08-20  [Fertiliser].Apply(Amount: 1000, Type: Fertiliser.Types.NO3N)
            Operations 2000
              1982-08-20  [Fertiliser].Apply(Amount: 2000, Type: Fertiliser.Types.NO3N)
            Operations 3000
              1982-08-20  [Fertiliser].Apply(Amount: 3000, Type: Fertiliser.Types.NO3N)
        Simulation WodongaEgrandisNrateI0
          Clock: Start=1980-08-10; End=1985-08-15
          Weather: FileName=wodonga.met
          Summary
          SoilArbitrator Soil Arbitrator
          Zone Plantation: Area=1; Slope=0; AspectAngle=0; Altitude=50
            Soil: Latitude=0; Longitude=0
              InitialWater Initial water: PercentMethod=1; FractionFull=0.8
              Physical
                Thickness  BD    AirDry  LL15  DUL   SAT
                50         1.14  0.03    0.03  0.19  0.35
                100        1.2   0.03    0.03  0.19  0.35
                100        1.3   0.04    0.05  0.23  0.34
                100        1.45  0.04    0.05  0.27  0.34
                200        1.62  0.12    0.13  0.29  0.33
                500        1.6   0.15    0.16  0.3   0.33
                450        1.52  0.2     0.22  0.3   0.32
                1500       1.52  0.2     0.22  0.29  0.31
                SoilCrop EucalyptusSoil: LL=[0.03, 0.03, 0.04, 0.04, 0.12, 0.15, 0.2, 0.2]; KL=[0.08, 0.08, 0.07, 0.06, 0.05, 0.04, 0.01, 0.01]; XF=[1, 1, 1, 0.8, 0.8, 0.8, 0.8, 0.8]
              WaterBalance SoilWater: SummerDate=1-Nov; SummerU=6; SummerCona=3.5; WinterDate=1-Apr; WinterU=2; WinterCona=2; DiffusConst=44; DiffusSlope=16; Salb=0.13; CN2Bare=75; CNRed=20; CNCov=0.8; Slope=0; DischargeWidth=0; CatchmentArea=0
                Thickness  SWCON  KLAT
                50         0.9    0
                100        0.9    0
                100        0.9    0
                100        0.6    0
                200        0.6    0
                500        0.6    0
                500        0.5    0
                1450       0.5    0
              Organic: FOMCNRatio=60
                Thickness  Carbon  SoilCNRatio  FBiom  FInert  FOM
                50         1.42    6            0.02   0.5     0.212122
                100        1.42    6            0.02   0.5     0.191936
                100        0.96    6            0.01   0.85    0.173671
                100        0.5     6            0.01   0.5     0.157144
                200        0.35    6            0.01   0.9     0.128659
                500        0.3     6            0.01   0.99    0.0780354
                500        0.08    6            0.01   0.99    0.0473308
                1450       0.06    6            0.01   0.99    0.0111024
              Chemical
                Thickness  NO3N  NH4N  PH
                50         0.1   0.01  6.05
                100        0.1   0.01  6.1
                100        0.1   0.01  6.55
                100        0.01  0.01  6.75
                200        0.01  0.01  6.9
                500        0.01  0.01  7.3
                500        0.01  0.01  7.55
                450        0.01  0.01  7.55
              Sample Initial nitrogen: Thickness=[50, 100, 100, 100, 200, 500, 500, 1450]; SWUnits=Volumetric; OCUnits=Total; PHUnits=Water
              CERESSoilTemperature
              Nutrient
            Irrigation
            Fertiliser
            SurfaceOrganicMatter: InitialResidueName=Wheat; InitialResidueType=Wheat; InitialResidueMass=2000; InitialStandingFraction=0; InitialCPR=0; InitialCNR=80
            MicroClimate: a_interception=0; b_interception=1; c_interception=0; d_interception=0; soil_albedo=0.13; SoilHeatFluxFraction=0; MinimumHeightDiffForNewLayer=0; NightInterceptionFraction=0; ReferenceHeight=0
            Plant Eucalyptus
            Manager TreeTransplantRule
              RowSpace = 3
              RowWidth = 3
              CultivarName = grandis
              SowingDate = 08/15/1980 00:00:00
              script: same as in Validation.Australia grandis.CoffsHarbour.CoffsHarbour.Plantation.TreeTransplantRule
            Manager TreeThinning: same as Validation.Australia Temperate.Westfield.Westfield.WestfieldBase.Plantation.TreeThinning
            Manager Automatic irrigation based on water deficit
              FASW = 0
              WaterDeficit = 0
              AutoIrrigationOn = False
              FASWThreshold = 0.01
              FASWDepth = 600
```csharp
using Models.Soils.Nutrients;
using System;
using Models.Core;
using System.Collections.Generic;
using System.Text;
using Models.Soils;
using Models.Soils.Nutrients;
using Models.PMF;
using Models;
using System.Xml.Serialization;
using APSIM.Shared.Utilities;

namespace Models
{
    [Serializable] 
    public class Script : Model
    {
        public double FASW { get; set; }
        public double WaterDeficit  { get; set; }
    
        [Link] Zone zone;
        [Link] Irrigation irrigation;
        [Link] Soil soil;
        
        [Description("Auto irrigation on?")]
        public bool AutoIrrigationOn { get; set; }

        [Description("Threshold fraction available water (0-1)")]
        public double FASWThreshold { get; set; }

        [Description("Soil depth (mm) to which fraction available water is calculated")]
        public double FASWDepth { get; set; }

        [EventSubscribe("DoManagement")]
        private void OnDoManagement(object sender, EventArgs e)
        {
            CalculateFASW();
            if (AutoIrrigationOn)
            {
                if (FASW < FASWThreshold)
                {
                    double amount = 10;
                    irrigation.Apply(WaterDeficit, depth: 0);
                }
            }
        }
        
        private void CalculateFASW()
        {
            double[] LL15 = MathUtilities.Multiply(soil.LL15, soil.Thickness);
            double[] DUL = MathUtilities.Multiply(soil.DUL, soil.Thickness);
        
            int nlayr = GetLayerIndex();
            double cumdep = MathUtilities.Sum(soil.Thickness, 0, nlayr, 0.0);

            double excess_fr = MathUtilities.Divide((cumdep - FASWDepth), soil.Thickness[nlayr], 0.0);

            // note that results may be strange if swdep < ll15
            double avail_sw = (MathUtilities.Sum(soil.Water, 0, nlayr, 0.0)
                              - excess_fr * soil.Water[nlayr])
                              - (MathUtilities.Sum(LL15, 0, nlayr, 0.0)
                              - excess_fr * LL15[nlayr]);


            double pot_avail_sw = (MathUtilities.Sum(DUL, 0, nlayr, 0.0)
                                  - excess_fr * DUL[nlayr])
                                  - (MathUtilities.Sum(LL15, 0, nlayr, 0.0)
                                  - excess_fr * LL15[nlayr]);

            FASW = MathUtilities.Divide(avail_sw, pot_avail_sw, 0.0);
            WaterDeficit = MathUtilities.Constrain(pot_avail_sw - avail_sw, 0.0, 100000);
        }

        private int GetLayerIndex()
        {
            double[] cumThickness = soil.ThicknessCumulative;
            for (int i = 1; i < cumThickness.Length; i++)
            {
                if (FASWDepth < cumThickness[i])
                    return i - 1;
            }
            
            return cumThickness.Length - 1;
        }

    }
}
```
            Operations Management
              1980-08-20  [Fertiliser].Apply(Amount: 0, Type: Fertiliser.Types.NO3N)
              1981-08-20  [Fertiliser].Apply(Amount: 20, Type: Fertiliser.Types.NO3N)
              1982-08-20  [Fertiliser].Apply(Amount: 0, Type: Fertiliser.Types.NO3N)
              1983-08-20  [Fertiliser].Apply(Amount: 0, Type: Fertiliser.Types.NO3N)
              1984-08-20  [Fertiliser].Apply(Amount: 0, Type: Fertiliser.Types.NO3N)
              1985-08-20  [Fertiliser].Apply(Amount: 0, Type: Fertiliser.Types.NO3N)
              1986-08-20  [Fertiliser].Apply(Amount: 0, Type: Fertiliser.Types.NO3N)
              1987-08-20  [Fertiliser].Apply(Amount: 0, Type: Fertiliser.Types.NO3N)
              1988-08-20  [Fertiliser].Apply(Amount: 0, Type: Fertiliser.Types.NO3N)
              1989-08-20  [Fertiliser].Apply(Amount: 0, Type: Fertiliser.Types.NO3N)
              1990-08-20  [Fertiliser].Apply(Amount: 0, Type: Fertiliser.Types.NO3N)
              1991-08-20  [Fertiliser].Apply(Amount: 0, Type: Fertiliser.Types.NO3N)
              1992-08-20  [Fertiliser].Apply(Amount: 0, Type: Fertiliser.Types.NO3N)
              1993-08-20  [Fertiliser].Apply(Amount: 0, Type: Fertiliser.Types.NO3N)
              1994-08-20  [Fertiliser].Apply(Amount: 0, Type: Fertiliser.Types.NO3N)
              1995-08-20  [Fertiliser].Apply(Amount: 0, Type: Fertiliser.Types.NO3N)
              1996-08-20  [Fertiliser].Apply(Amount: 0, Type: Fertiliser.Types.NO3N)
            Operations FertiliserOperations
              1980-08-20  [Fertiliser].Apply(Amount: 0, Type: Fertiliser.Types.NO3N)
              1981-08-20  [Fertiliser].Apply(Amount: 0, Type: Fertiliser.Types.NO3N)
              1982-08-20  [Fertiliser].Apply(Amount: 0, Type: Fertiliser.Types.NO3N)
              1983-08-20  [Fertiliser].Apply(Amount: 0, Type: Fertiliser.Types.NO3N)
              1984-08-20  [Fertiliser].Apply(Amount: 0, Type: Fertiliser.Types.NO3N)
              1985-08-20  [Fertiliser].Apply(Amount: 0, Type: Fertiliser.Types.NO3N)
              1986-08-20  [Fertiliser].Apply(Amount: 0, Type: Fertiliser.Types.NO3N)
              1987-08-20  [Fertiliser].Apply(Amount: 0, Type: Fertiliser.Types.NO3N)
              1988-08-20  [Fertiliser].Apply(Amount: 0, Type: Fertiliser.Types.NO3N)
              1989-08-20  [Fertiliser].Apply(Amount: 0, Type: Fertiliser.Types.NO3N)
              1990-08-20  [Fertiliser].Apply(Amount: 0, Type: Fertiliser.Types.NO3N)
              1991-08-20  [Fertiliser].Apply(Amount: 0, Type: Fertiliser.Types.NO3N)
              1992-08-20  [Fertiliser].Apply(Amount: 0, Type: Fertiliser.Types.NO3N)
              1993-08-20  [Fertiliser].Apply(Amount: 0, Type: Fertiliser.Types.NO3N)
              1994-08-20  [Fertiliser].Apply(Amount: 0, Type: Fertiliser.Types.NO3N)
              1995-08-20  [Fertiliser].Apply(Amount: 0, Type: Fertiliser.Types.NO3N)
              1996-08-20  [Fertiliser].Apply(Amount: 0, Type: Fertiliser.Types.NO3N)
            Report SensibilityReport: VariableNames=[Clock].Today; EventNames=[Clock].DoReport
      Experiment WodongaI0ClimateCoffs
        Factors: same as Sensibility.Reponse to N Fertilizer.WodongaI0ClimateWodonga.Factors
        Simulation WodongaEgrandisNrateI0ClimateCoffs
          Clock: Start=1980-08-10; End=1990-08-15
          Weather: FileName=coffs.met
          Summary
          SoilArbitrator Soil Arbitrator
          Zone Plantation: same as Sensibility.Reponse to N Fertilizer.WodongaI0ClimateWodonga.WodongaEgrandisNrateI0.Plantation
    Folder GXE Brazil
      Memo
        Inhambupe is a dry site in NE Brazil
        Botucatu is a highly productive site in SE Brazil
        Sao Gabriel is a wet site in S Brazil
        Bocaiuve is dry site in SE Brazil
      Experiment GxEBrazil
        Factors
          Permutation
            Factor Site
              CompositeFactor Inhambupe
                Specifications:
                  [Weather]
                  [Soil]
                Weather Inhambupe: FileName=8_COP_1980_2017_Inhambupe_BA.met
                Soil: SoilType=Loam; LocalName=Uniform; Site=Hypothetical; Latitude=0; Longitude=0
                  InitialWater: PercentMethod=0; FractionFull=1; RelativeTo=LL15
                  Physical
                    Thickness  BD    AirDry  LL15   DUL    SAT
                    150        1.48  0.07    0.07   0.16   0.42
                    150        1.57  0.034   0.034  0.127  0.375
                    300        1.57  0.034   0.034  0.127  0.375
                    300        1.41  0.07    0.07   0.17   0.43
                    300        1.61  0.078   0.078  0.174  0.364
                    300        1.61  0.09    0.09   0.13   0.372
                    300        1.61  0.09    0.09   0.13   0.372
                    300        1.61  0.09    0.09   0.13   0.372
                    SoilCrop EucalyptusSoil: LL=[0.07, 0.034, 0.034, 0.07, 0.078, 0.09, 0.09, 0.09]; KL=[0.07, 0.07, 0.07, 0.06, 0.04, 0.03, 0.03, 0.03]; XF=[1, 1, 1, 1, 1, 1, 1, 1]
                  WaterBalance SoilWater: SummerDate=1-Nov; SummerU=4; SummerCona=3.5; WinterDate=1-Apr; WinterU=4; WinterCona=3.5; DiffusConst=88; DiffusSlope=35.4; Salb=0.13; CN2Bare=65; CNRed=20; CNCov=0.8; Thickness=[150, 150, 300, 300, 300, 300, 300, 300, 300, 300, 300]; SWCON=[1, 1, 1, 1, 1, 1, 1, 1, 1, 1, 1]
                  Organic: FOMCNRatio=60
                    Thickness  Carbon  SoilCNRatio  FBiom  FInert  FOM
                    150        1.044   12           0.02   0.6     312.472
                    150        1.044   12           0.02   0.6     252.202
                    300        0.625   12           0.02   0.8     164.294
                    300        0.119   12           0.01   0.9     107.028
                    300        0.119   12           0.01   0.95    69.7219
                    300        0.119   12           0.01   0.95    45.4196
                    300        0.119   12           0.01   0.95    29.5881
                    300        0.119   12           0.01   0.95    19.2748
                  Chemical
                    Thickness  NO3N  NH4N  PH   EC
                    150        1     0.1   5.9  0.2
                    150        1     0.1   5.8  0.2
                    300        1     0.1   5.7  0.3
                    300        1     0.1   5.8  0.4
                    300        1     0.1   5.8  0.6
                    300        1     0.1   5.9  0.8
                    300        1     0.1   5.8  0.9
                    300        1     0.1   5.9  1
                  Sample InitialN: Thickness=[150, 150, 300, 300, 300, 300, 300, 300, 300, 300, 300]; SWUnits=Volumetric; OCUnits=Total; PHUnits=Water
                  Nutrient
                  CERESSoilTemperature
              CompositeFactor Botucatu
                Specifications:
                  [Weather]
                  [Soil]
                Weather Botucatu: FileName=10_DUB_1980_2017_Botucatu_SP.met
                Soil: SoilType=Loam; LocalName=Uniform; Site=Hypothetical; Latitude=0; Longitude=0
                  InitialWater: PercentMethod=0; FractionFull=1; RelativeTo=LL15
                  Physical
                    Thickness  BD    AirDry  LL15   DUL    SAT
                    150        1.41  0.036   0.036  0.16   0.424
                    150        1.53  0.051   0.051  0.188  0.385
                    300        1.55  0.1     0.1    0.22   0.34
                    300        1.51  0.13    0.13   0.24   0.36
                    300        1.4   0.13    0.13   0.21   0.37
                    300        1.4   0.13    0.13   0.21   0.37
                    300        1.64  0.226   0.226  0.301  0.363
                    300        1.63  0.226   0.226  0.301  0.363
                    300        1.63  0.226   0.226  0.301  0.363
                    300        1.63  0.226   0.226  0.301  0.364
                    300        1.64  0.221   0.221  0.303  0.362
                    SoilCrop EucalyptusSoil
                      LL=[0.036, 0.051, 0.1, 0.13, 0.13, 0.13, 0.226, 0.226, 0.226, 0.226, 0.221]
                      KL=[0.07, 0.07, 0.07, 0.06, 0.04, 0.03, 0.03, 0.03, 0.02, 0.02, 0.02]
                      XF=[1, 1, 1, 1, 1, 1, 1, 1, 1, 1, 1]
                  WaterBalance SoilWater: same as Sensibility.GXE Brazil.GxEBrazil.Factors.Permutation.Site.Inhambupe.Soil.SoilWater
                  Organic: FOMCNRatio=60
                    Thickness  Carbon  SoilCNRatio  FBiom  FInert  FOM
                    150        1.74    12           0.02   0.6     240.643
                    150        1.74    12           0.02   0.6     207.124
                    300        1.041   12           0.02   0.8     153.441
                    300        0.342   12           0.01   0.9     113.672
                    300        0.259   12           0.01   0.95    84.2101
                    300        0.199   12           0.01   0.95    62.3844
                    300        0.199   12           0.01   0.95    46.2155
                    300        0.199   12           0.01   0.95    34.2373
                    300        0.199   12           0.01   0.95    25.3636
                    300        0.199   12           0.01   0.95    18.7898
                    300        0.199   12           0.01   0.95    13.9198
                  Chemical
                    Thickness  NO3N  NH4N  PH   EC
                    150        1     0.1   5.6  0.2
                    150        1     0.1   5.6  0.2
                    300        1     0.1   5.6  0.3
                    300        1     0.1   5.6  0.4
                    300        1     0.1   5.6  0.6
                    300        1     0.1   5.6  0.8
                    300        1     0.1   5.6  0.9
                    300        1     0.1   5.6  1
                    300        1     0.1   5.7  1.1
                    300        1     0.1   5.7  1
                    300        1     0.1   5.7  1
                  Sample InitialN: same as Sensibility.GXE Brazil.GxEBrazil.Factors.Permutation.Site.Inhambupe.Soil.InitialN
                  Nutrient
                  CERESSoilTemperature
              CompositeFactor SaoGabriel
                Specifications:
                  [Weather]
                  [Soil]
                Weather SaoGabriel: FileName=18_CMS_1980_2017_SaoGabriel_RS.met
                Soil: SoilType=Loam; LocalName=Uniform; Site=Hypothetical; Latitude=0; Longitude=0
                  InitialWater: PercentMethod=0; FractionFull=1; RelativeTo=LL15
                  Physical: same as Sensibility.GXE Brazil.GxEBrazil.Factors.Permutation.Site.Botucatu.Soil.Physical
                  WaterBalance SoilWater: same as Sensibility.GXE Brazil.GxEBrazil.Factors.Permutation.Site.Inhambupe.Soil.SoilWater
                  Organic: FOMCNRatio=60
                    Thickness  Carbon  SoilCNRatio  FBiom  FInert  FOM
                    150        1.45    12           0.02   0.6     240.643
                    150        1.45    12           0.02   0.6     207.124
                    300        0.867   12           0.02   0.8     153.441
                    300        0.08    12           0.01   0.9     113.672
                    300        0.08    12           0.01   0.95    84.2101
                    300        0.08    12           0.01   0.95    62.3844
                    300        0.08    12           0.01   0.95    46.2155
                    300        0.08    12           0.01   0.95    34.2373
                    300        0.08    12           0.01   0.95    25.3636
                    300        0.08    12           0.01   0.95    18.7898
                    300        0.08    12           0.01   0.95    13.9198
                  Chemical: same as Sensibility.GXE Brazil.GxEBrazil.Factors.Permutation.Site.Botucatu.Soil.Chemical
                  Sample InitialN: same as Sensibility.GXE Brazil.GxEBrazil.Factors.Permutation.Site.Inhambupe.Soil.InitialN
                  Nutrient
                  CERESSoilTemperature
              CompositeFactor Bocaiuva
                Specifications:
                  [Weather]
                  [Soil]
                Weather Bocaiuva: FileName=30_VMT_1980_2017_Bocaiuva_MG.met
                Soil: SoilType=Loam; LocalName=Uniform; Site=Hypothetical; Latitude=0; Longitude=0
                  InitialWater: PercentMethod=0; FractionFull=1; RelativeTo=LL15
                  Physical
                    Thickness  BD    AirDry  LL15  DUL    SAT
                    150        1.55  0.04    0.04  0.171  0.378
                    150        1.55  0.04    0.04  0.171  0.378
                    300        1.38  0.11    0.11  0.18   0.42
                    300        1.32  0.11    0.11  0.18   0.42
                    300        1.36  0.13    0.13  0.19   0.422
                    300        1.36  0.13    0.13  0.19   0.422
                    300        1.36  0.13    0.13  0.19   0.422
                    300        1.36  0.13    0.13  0.19   0.422
                    300        1.36  0.13    0.13  0.19   0.422
                    300        1.36  0.13    0.13  0.19   0.422
                    300        1.36  0.13    0.13  0.19   0.422
                    SoilCrop EucalyptusSoil
                      LL=[0.04, 0.04, 0.11, 0.11, 0.13, 0.13, 0.13, 0.13, 0.13, 0.13, 0.13]
                      KL=[0.07, 0.07, 0.07, 0.06, 0.04, 0.03, 0.03, 0.03, 0.02, 0.02, 0.02]
                      XF=[1, 1, 1, 1, 1, 1, 1, 1, 1, 1, 1]
                  WaterBalance SoilWater: same as Sensibility.GXE Brazil.GxEBrazil.Factors.Permutation.Site.Inhambupe.Soil.SoilWater
                  Organic: FOMCNRatio=60
                    Thickness  Carbon  SoilCNRatio  FBiom  FInert  FOM
                    150        1.815   12           0.02   0.6     240.643
                    150        1.815   12           0.02   0.6     207.124
                    300        1.086   12           0.02   0.8     153.441
                    300        1.086   12           0.01   0.9     113.672
                    300        1.086   12           0.01   0.95    84.2101
                    300        1.086   12           0.01   0.95    62.3844
                    300        1.086   12           0.01   0.95    46.2155
                    300        1.086   12           0.01   0.95    34.2373
                    300        0.5     12           0.01   0.95    25.3636
                    300        0.5     12           0.01   0.95    18.7898
                    300        0.5     12           0.01   0.95    13.9198
                  Chemical
                    Thickness  NO3N  NH4N  PH   EC
                    150        1     0.1   5.6  0.2
                    150        1     0.1   5.6  0.2
                    300        1     0.1   5.5  0.3
                    300        1     0.1   5.6  0.4
                    300        1     0.1   5.7  0.6
                    300        1     0.1   5.7  0.8
                    300        1     0.1   5.7  0.9
                    300        1     0.1   5.7  1
                    300        1     0.1   5.7  1.1
                    300        1     0.1   5.7  1
                    300        1     0.1   5.7  1
                  Sample InitialN: same as Sensibility.GXE Brazil.GxEBrazil.Factors.Permutation.Site.Inhambupe.Soil.InitialN
                  Nutrient
                  CERESSoilTemperature
            Factor Clone
              Specification=[TreeManagement].Script.CultivarName = BrazilTropicalClone, BrazilSubTropicalClone, BrazilPlasticClone
        Simulation GxEBase
          Weather: FileName=coffs.met
          Clock: Start=1980-01-01; End=1990-12-31
          Summary
          SoilArbitrator Soil Arbitrator
          Zone Plantation: Area=1; Slope=0; AspectAngle=0; Altitude=50
            Irrigation
            Fertiliser
            SurfaceOrganicMatter: InitialResidueName=Wheat; InitialResidueType=Wheat; InitialResidueMass=2000; InitialStandingFraction=0; InitialCPR=0; InitialCNR=80
            MicroClimate: a_interception=0; b_interception=1; c_interception=0; d_interception=0; soil_albedo=0.13; SoilHeatFluxFraction=0; MinimumHeightDiffForNewLayer=0; NightInterceptionFraction=0; ReferenceHeight=0
            Plant Eucalyptus
            Report SensibilityReport: VariableNames=[Clock].Today; EventNames=[Clock].DoReport
            Manager TreeThinning: same as Validation.Australia Temperate.Westfield.Westfield.WestfieldBase.Plantation.TreeThinning
            Soil: Latitude=0; Longitude=0
              InitialWater Initial water: PercentMethod=0; FractionFull=0.25
              Physical
                Thickness  BD    AirDry  LL15  DUL   SAT
                100        1.5   0.01    0.05  0.15  0.18
                300        1.6   0.01    0.05  0.15  0.18
                600        1.68  0.01    0.05  0.15  0.18
                1000       1.75  0.02    0.05  0.15  0.18
                1000       1.7   0.05    0.05  0.15  0.18
                1000       1.7   0.05    0.05  0.15  0.2
                1000       1.7   0.05    0.05  0.15  0.2
                1000       1.7   0.05    0.05  0.15  0.2
                SoilCrop EucalyptusSoil: LL=[0.01, 0.01, 0.01, 0.01, 0.01, 0.01, 0.01, 0.01]; KL=[0.07, 0.07, 0.05, 0.02, 0.02, 0.02, 0.01, 0.01]; XF=[0.9, 0.8, 0.7, 0.6, 0.3, 0, 0, 0]
              WaterBalance SoilWater: same as Validation.Australia grandis.Gympie.Gympie.GympieBase.Plantation.Soil.SoilWater
              Organic: same as Sensibility.MAI in SE Australia.MountWorth.Plantation.Soil.Organic
              Chemical: same as Sensibility.Response to Rainfall.Climate.ClimateBase.Plantation.Soil.Chemical
              Sample Initial nitrogen: Thickness=[100, 300, 600, 1000, 1000, 1000, 1000, 1000]; SWUnits=Volumetric; OCUnits=Total; PHUnits=Water
              CERESSoilTemperature
              Nutrient
            Report HarvestReport: EventNames=[Eucalyptus].Harvesting
              VariableNames:
                [Clock].Today
                [Eucalyptus].Stem.DBH
                [Eucalyptus].Stem.Ht
                [Eucalyptus].RootShootRatio
                [Eucalyptus].Stem.Vol
                [Eucalyptus].Stem.MAI
            Manager TreeManagement
              TimeSincePlanting = 0
              RowSpace = 3
              RowWidth = 3
              CultivarName = grandisCoffsHarbour
              PlantingDate = 10-Feb
              HarvestAge = 7
              FertAmount = 200
              script: same as in Validation.Australia Temperate.Westfield.Westfield.WestfieldBase.Plantation.TreeManagement
            Manager Fertilise on fixed dates
              FertiliserType = NO3N
              FertiliserDates = 10-Feb
              Amount = 300
              AmountType = False
```csharp
using APSIM.Shared.Utilities;
using Models.PMF;
using Models.Core;
using System;
namespace Models
{
    [Serializable]
    public class Script : Model
    {
        [Link] Clock Clock;
        [Link] Fertiliser Fertiliser;
        
        [Separator("A component to apply fertiliser on one or more dates on every year of the simulation")]

        [Description("Type of fertiliser to apply? ")] public Fertiliser.Types FertiliserType { get; set; }

        [Description("Enter the fertilisation dates as dd-mmm with comma separation (any year information entered will be ignored): ")] public string[] FertiliserDates { get; set; } 

        [Description("Amount of fertiliser to be applied (kg /ha)")] public double Amount { get; set; }

        [Description("Is the above amount to be applied each time? (yes/ticked)? Or is it the total annual amount across all dates (no/unticked)")] public bool AmountType { get; set; }
        
        [EventSubscribe("DoManagement")]
        private void OnDoManagement(object sender, EventArgs e)
        {
            foreach (string ddMMM in FertiliserDates)
            {
                if (DateUtilities.DatesEqual(ddMMM, Clock.Today))
                {
                    if (AmountType)
                        Fertiliser.Apply(Amount: Amount, Type: FertiliserType);
                    else
                        Fertiliser.Apply(Amount: Amount / FertiliserDates.Length, Type: FertiliserType);
                }
            }
        }
    }
}
```
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