Simulations: Version=165
  Folder Replacements
    Report: EventNames=[Clock].DoReport
      VariableNames:
        [Clock].Today
        [FodderBeet].AboveGround.N
        [FodderBeet].AboveGround.Wt
        [FodderBeet].Arbitrator.DM.TotalFixationSupply
        [FodderBeet].Leaf.AppearedCohortNo
        [FodderBeet].Leaf.CohortParameters.MaxArea
        [FodderBeet].Leaf.CoverDead
        [FodderBeet].Leaf.CoverGreen
        [FodderBeet].Leaf.CoverTotal
        [FodderBeet].Leaf.Dead.N
        [FodderBeet].Leaf.Dead.NConc
        [FodderBeet].Leaf.Dead.Wt
        [FodderBeet].Leaf.DeadCohortNo
        [FodderBeet].Leaf.ExpandedCohortNo
        [FodderBeet].Leaf.Fw
        [FodderBeet].Leaf.Fn
        [FodderBeet].Leaf.Height
        [FodderBeet].Leaf.InitialisedCohortNo
        [FodderBeet].Leaf.LAI
        [FodderBeet].Leaf.Live.N
        [FodderBeet].Leaf.Live.NConc
        [FodderBeet].Leaf.Live.Wt
        [FodderBeet].Leaf.Photosynthesis.RadnInt
        [FodderBeet].Leaf.Photosynthesis.RUEact
        [FodderBeet].Leaf.PlantAppearedGreenLeafNo
        [FodderBeet].Leaf.PlantsenescedLeafNo
        [FodderBeet].Leaf.SenescingCohortNo
        [FodderBeet].Leaf.SpecificArea
        [FodderBeet].Leaf.Transpiration
        [FodderBeet].Petiole.Live.NConc
        [FodderBeet].Petiole.Live.Wt
        [FodderBeet].Petiole.Live.N
        [FodderBeet].Petiole.NConc
        [FodderBeet].Phenology.AccumulatedThermalTime
        [FodderBeet].Phenology.CurrentPhase.Name
        [FodderBeet].Phenology.CurrentStageName
        [FodderBeet].Phenology.Photoperiod
        [FodderBeet].Phenology.Stage
        [FodderBeet].Phenology.ThermalTime
        [FodderBeet].Root.Depth
        [FodderBeet].Root.Live.N
        [FodderBeet].Root.Live.NConc
        [FodderBeet].Root.N
        [FodderBeet].Root.Nconc
        [FodderBeet].Root.WaterUptake
        [FodderBeet].Root.Live.Wt
        [FodderBeet].SowingData.Cultivar
        [FodderBeet].StorageRoot.Live.NConc
        [FodderBeet].StorageRoot.Live.Wt
        [FodderBeet].StorageRoot.Live.N
        [FodderBeet].StorageRoot.NConc
        [FodderBeet].StorageRoot.Wt
        [FodderBeet].Structure.Height
        [FodderBeet].Structure.LeafTipsAppeared
        [FodderBeet].Structure.MainStemPopn
        [FodderBeet].Structure.TotalStemPopn
        [FodderBeet].Total.N
        [FodderBeet].Total.NConc
        [FodderBeet].Total.Wt
        [FodderBeet].TotalDead.N
        [FodderBeet].TotalDead.NConc
        [FodderBeet].SCS
        [Phenology].Photoperiod
        [Soil].Water.Volumetric
        [Soil].Water.MM
        [SurfaceOrganicMatter].Wt
        [Weather].MeanT
        sum([Soil].NO3.kgha) as TotalSoilNitrogen
        sum([Soil].Water.MM) as ProfileWater
        sum([Soil].Nutrient.MineralN) as ProfileN
        [Soil].SoilWater.LeachNO3
        [Weather].Rain
        [Irrigation].IrrigationApplied
        [Fertiliser].NitrogenApplied
    Report EnviroReport: EventNames=[Clock].DoReport
      VariableNames:
        [Clock].Today
        [Weather].MeanT
        [Weather].Radn
        [Weather].Rain
        [Irrigation].IrrigationApplied
        [FodderBeet].Leaf.Fw
        [MicroClimate].PrecipitationInterception as Interception
        [Soil].SoilWater.Es as Evaporation
        [Soil].SoilWater.Drainage as Drainage
        [Soil].SoilWater.Runoff as Runoff
        sum([Soil].Water.MM) as TotalSoilWater
        sum([Soil].Nutrient.MineralisedN) as MineralisedN
        [Fertiliser].NitrogenApplied as FertiliserN
        sum([Soil].Nutrient.DenitrifiedN) as DenitrifiedN
        ([Soil].SoilWater.LeachUrea+[Soil].SoilWater.LeachNH4+[Soil].SoilWater.LeachNO3) as NLeached
        [SurfaceOrganicMatter].N as TotalSurfOMN
        sum([Soil].Nutrient.FOM.N) as TotalFOMN
        sum([Soil].Nutrient.Microbial.N) as TotalMicrobialN
        sum([Soil].Nutrient.Humic.N) as TotalHumicN
        (sum([Soil].NH4.kgha) + sum([Soil].NO3.kgha)) as TotalSoilN
        sum([Soil].Urea.kgha) as TotalUrea
        sum([Soil].NH4.kgha) as TotalNH4
        sum([Soil].NO3.kgha) as TotalNO3
    Manager ExtraVariables
```csharp
using Newtonsoft.Json;
using Models.PMF.Organs;
using Models.Soils.Nutrients;
using Models.Interfaces;
using System;
using Models.Core;
using System.Collections.Generic;
using System.Text;
using Models.Soils;
using Models.PMF;
using Models;
using System.Xml.Serialization;
using APSIM.Shared.Utilities;
using Models.Climate;

namespace Models
{
    [Serializable] 
    public class Script : Model
    {
        [Link] private Clock Clock;
        [Link] private Weather Met;
        [Link] private Fertiliser Fert;
        [Link] private Irrigation Irrig;
        [Link] private Plant FodderBeet;
        [Link] private Zone zone;
        [Link(ByName = true)]
        private ISolute Urea;
        [Link(ByName = true)]
        private ISolute NO3;
        [Link(ByName = true)]
        private ISolute NH4;
        [Link]
        private Nutrient SoilNitrogen;
        [Link] private Soils.Soil Soil;
        [Link] private Models.Surface.SurfaceOrganicMatter SOM;
        [Link(Type = LinkType.Path, Path = "[FodderBeet].Root")]
        private Root root;
        [Link]
        private IPhysical soilPhysical;
        [Link]
        private ISoilWater waterBalance;
        [Link(Type=LinkType.Path, Path="[Nutrient].SurfaceResidue.Decomposition")] private CarbonFlow ResidueDecomposition;                    
                            
        [JsonIgnore] public bool InitialDay { get; set; }
        
        [JsonIgnore] public double AccumPlantN { get; set; }
        [JsonIgnore] public double AccumMineralisation { get; set; }
        [JsonIgnore] public double AccumDenit { get; set; }
        [JsonIgnore] public double AccumFert { get; set; }
        [JsonIgnore] public double AccumLeach { get; set; }
        [JsonIgnore] public double AccumDetach { get; set; }
        [JsonIgnore] public double DeltaSoilOMN { get; set; }
        [JsonIgnore] public double DeltaSurfaceOMN { get; set; }
        [JsonIgnore] public double DeltaSoilMineralN { get; set; }
        [JsonIgnore] public double SoilNitrogenContent { get; set; }
        
        
        
        [JsonIgnore] public double AccumEO { get; set; }
        [JsonIgnore] public double AccumEP { get; set; }
        [JsonIgnore] public double AccumES { get; set; }
        [JsonIgnore] public double AccumDrainage { get; set; }
        [JsonIgnore] public double AccumRunoff { get; set; }
        [JsonIgnore] public double AccumOutflowLat { get; set; }
        [JsonIgnore] public double AccumIrrigation { get; set; }
        [JsonIgnore] public double AccumRainfall { get; set; }
        [JsonIgnore] public double SoilWaterDeficit { get; set; }
    
        [JsonIgnore] public double  InitialSoilOMN { get; set; }
        [JsonIgnore] public double  InitialSurfaceOMN { get; set; }
        [JsonIgnore] public double  InitialMineralN { get; set; }
        
        
        [JsonIgnore] public double SWC { get; set; }
        [JsonIgnore] public double DUL { get; set; }
        [JsonIgnore] public double OutFlowLat { get; set; }

        [JsonIgnore] public double FomN { get; set; }
        [JsonIgnore] public double BiomN { get; set; }
        [JsonIgnore] public double HumN { get; set; }
        [JsonIgnore] public double OrganicN { get; set; }
        [JsonIgnore] public double NO3N { get; set; }
        [JsonIgnore] public double NH4N { get; set; }
        [JsonIgnore] public double UreaN { get; set; }
        [JsonIgnore] public double MineralN { get; set; }
        [JsonIgnore] public double DltNMinRes { get; set; }
        [JsonIgnore] public double DltNMinTot { get; set; }
        [JsonIgnore] public double ResidueWt{ get; set; }
        
        
        [EventSubscribe("StartOfSimulation")]
        private void OnSimulationCommencing(object sender, EventArgs e)
        {
            InitialDay = true;
        }
        
        [EventSubscribe("DoManagement")]
        private void OnDoManagement(object sender, EventArgs e)
        {
            //!!!!!! Nitrogen balance components !!!!!!
            FomN = MathUtilities.Sum(SoilNitrogen.FOM.N);
            HumN = MathUtilities.Sum(SoilNitrogen.Humic.N);
            BiomN = MathUtilities.Sum(SoilNitrogen.Microbial.N);
            OrganicN = FomN + HumN + BiomN;
            NO3N = MathUtilities.Sum(NO3.kgha);
            NH4N = MathUtilities.Sum(NH4.kgha);
            UreaN = MathUtilities.Sum(Urea.kgha);
            MineralN = NO3N + NH4N + UreaN; 
            DltNMinRes = MathUtilities.Sum(ResidueDecomposition.MineralisedN);
            DltNMinTot = MathUtilities.Sum(SoilNitrogen.MineralisedN);
        
            //Residue components//
            ResidueWt = SOM.Wt;
            //MathUtilities.Sum(SOM.dlt_SurfaceOM_wt);    Failed:)
            
            int layers = soilPhysical.Thickness.Length;
            if (InitialDay == true)
            {
                InitialSurfaceOMN = SOM.N;
                InitialSoilOMN = OrganicN;
                InitialMineralN = MineralN;
                InitialDay = false;
            }
            DeltaSurfaceOMN = SOM.N - InitialSurfaceOMN;
            //AccumLeach = AccumLeach + waterBalance.LeachNH4 + waterBalance.LeachNO3 + waterBalance.LeachUrea; //Fails
            AccumLeach = AccumLeach + waterBalance.LeachNO3;
            AccumMineralisation += MathUtilities.Sum(SoilNitrogen.MineralisedN);
            AccumDenit -= MathUtilities.Sum(SoilNitrogen.DenitrifiedN);
            //Root.Nuptake is now reported as Negative
            AccumPlantN -= (double)zone.Get("FodderBeet.Root.NUptake");
            DeltaSoilOMN = OrganicN - InitialSoilOMN;
            DeltaSoilMineralN = MineralN - InitialMineralN;
            SoilNitrogenContent = MineralN;
    
            
            
            //!!!!!! Water balance components !!!!!!
            //!!!!!!^^^^^^^^^^^^^^^^^^^^^^^^^^!!!!!!

            AccumRainfall += Met.Rain;
            //AccumEP -= (double)zone.Get("[FodderBeet].Stover.Transpiration");
            AccumEP -= (double)zone.Get("FodderBeet.Root.WaterUptake");
            SoilWaterDeficit = (SWC - DUL);
            double OutFlowLat = MathUtilities.Sum(waterBalance.LateralOutflow);
            AccumOutflowLat -= OutFlowLat;
        }
        
        [EventSubscribe("DoManagementCalculations")]
        private void OnDoManagementCalculations(object sender, EventArgs e)
        {
            FomN = MathUtilities.Sum(SoilNitrogen.FOM.N);
            HumN = MathUtilities.Sum(SoilNitrogen.Humic.N);
            BiomN = MathUtilities.Sum(SoilNitrogen.Microbial.N);
            AccumFert += Fert.NitrogenApplied;
            AccumIrrigation += Irrig.IrrigationApplied;
            
            
            AccumEO -= waterBalance.Eo;
            AccumES -= waterBalance.Es; 
            AccumDrainage += waterBalance.Drainage;
            AccumRunoff -= waterBalance.Runoff;
            SWC = MathUtilities.Sum(waterBalance.SWmm);
            DUL = MathUtilities.Sum(soilPhysical.DULmm);
        }
        
        [EventSubscribe("PlantEnding")]
        private void OnPlantEnding(object sender, EventArgs e)
        {
            AccumFert = 0;
            AccumIrrigation = 0;
            
            
            AccumEO = 0;
            AccumES = 0;
            AccumDrainage = 0;
            AccumRunoff = 0;
            
            AccumLeach = 0;
            AccumMineralisation = 0;
            AccumDenit = 0;
            AccumPlantN = 0;
            
            AccumRainfall = 0;
            AccumEP = 0;
            AccumOutflowLat = 0;
            
        }
    }
}
```
  DataStore
    ExcelInput ObservedData: FileNames=[0bserved.xlsx]; SheetNames=[ObservedData]
    PredictedObserved: PredictedTableName=Report; ObservedTableName=ObservedData; FieldNameUsedForMatch=SimulationName; FieldName2UsedForMatch=Clock.Today; AllColumns=false
      Tests: POName=PredictedObserved
        AcceptedStats:
          {Name=FodderBeet.AboveGround.N, n=318, Slope=0.938006, Intercept=2.03246, SEslope=0.0354646, SEintercept=0.883552, R2=0.68884, RMSE=6.9747, NSE=0.595244, ME=0.645537, MAE=5.16363, RSR=0.635203}
          {Name=FodderBeet.AboveGround.Wt, n=419, Slope=0.923824, Intercept=174.982, SEslope=0.0219921, SEintercept=37.8735, R2=0.808856, RMSE=377.886, NSE=0.787223, ME=59.5892, MAE=292.114, RSR=0.460726}
          {Name=FodderBeet.Leaf.CoverGreen, n=236, Slope=0.80735, Intercept=0.129945, SEslope=0.0268541, SEintercept=0.0211523, R2=0.794352, RMSE=0.0991336, NSE=0.78863, ME=-0.016004, MAE=0.0772493, RSR=0.458775}
          {Name=FodderBeet.Leaf.CoverTotal, n=120, Slope=0.617119, Intercept=0.343463, SEslope=0.0416276, SEintercept=0.0292236, R2=0.650653, RMSE=0.149123, NSE=0.471511, ME=0.0864014, MAE=0.106643, RSR=0.723937}
          {Name=FodderBeet.Leaf.LAI, n=387, Slope=0.566521, Intercept=1.04607, SEslope=0.0320736, SEintercept=0.0872368, R2=0.447623, RMSE=0.917751, NSE=0.415944, ME=-0.0118086, MAE=0.672606, RSR=0.763248}
          {Name=FodderBeet.Leaf.Live.N, n=304, Slope=0.656384, Intercept=2.18115, SEslope=0.0364784, SEintercept=0.233661, R2=0.517398, RMSE=2.02371, NSE=0.474917, ME=0.200345, MAE=1.52771, RSR=0.723433}
          {Name=FodderBeet.Leaf.Live.Wt, n=389, Slope=0.764059, Intercept=71.7031, SEslope=0.0417322, SEintercept=6.90444, R2=0.464141, RMSE=68.7892, NSE=-0.00848723, ME=36.1704, MAE=52.8249, RSR=1.00294}
          {Name=FodderBeet.Leaf.PlantAppearedGreenLeafNo, n=207, Slope=1.09434, Intercept=1.50281, SEslope=0.0373819, SEintercept=0.826107, R2=0.806969, RMSE=4.8185, NSE=0.371827, ME=3.50725, MAE=3.70435, RSR=0.790657}
          {Name=FodderBeet.Petiole.Live.N, n=304, Slope=0.420079, Intercept=1.54401, SEslope=0.0361783, SEintercept=0.103415, R2=0.308646, RMSE=1.24998, NSE=0.261934, ME=0.117128, MAE=0.97193, RSR=0.857694}
          {Name=FodderBeet.Petiole.Live.Wt, n=389, Slope=0.575146, Intercept=69.3703, SEslope=0.0300095, SEintercept=4.53989, R2=0.486953, RMSE=56.596, NSE=0.438176, ME=13.6756, MAE=44.3575, RSR=0.748585}
          {Name=FodderBeet.Phenology.Stage, n=16, Slope=1.1979, Intercept=-0.360065, SEslope=0.0215605, SEintercept=0.0955135, R2=0.995485, RMSE=0.550194, NSE=0.806264, ME=0.480991, MAE=0.480991, RSR=0.426178}
          {Name=FodderBeet.SCS, n=2, Slope=1.06257, Intercept=-325.122, SEslope=0, SEintercept=0, R2=1, RMSE=258.901, NSE=-6.198, ME=-258.83, MAE=258.83, RSR=1.8971}
          {Name=FodderBeet.StorageRoot.Live.N, n=304, Slope=0.968959, Intercept=-1.00743, SEslope=0.0351606, SEintercept=0.543942, R2=0.715483, RMSE=5.22354, NSE=0.596075, ME=-1.41426, MAE=3.9769, RSR=0.634505}
          {Name=FodderBeet.StorageRoot.Live.Wt, n=389, Slope=0.874342, Intercept=106.108, SEslope=0.0211491, SEintercept=28.7261, R2=0.815375, RMSE=312.911, NSE=0.808121, ME=-39.0587, MAE=235.213, RSR=0.437477}
          {Name=FodderBeet.Structure.LeafTipsAppeared, n=207, Slope=0.978821, Intercept=0.702624, SEslope=0.0100946, SEintercept=0.404815, R2=0.978662, RMSE=2.49368, NSE=0.978647, ME=-0.0659708, MAE=1.96682, RSR=0.145775}
          {Name=FodderBeet.TotalDead.N, n=98, Slope=2.48882, Intercept=0.19878, SEslope=0.172148, SEintercept=0.26952, R2=0.685264, RMSE=2.97312, NSE=-8.54089, ME=2.03717, MAE=2.13922, RSR=3.07303}
          {Name=Nit, n=1112, Slope=1, Intercept=0, SEslope=0, SEintercept=0, R2=1, RMSE=0, NSE=1, ME=0, MAE=0, RSR=0}
        AcceptedStatsName=Name n Slope Intercept SEslope SEintercept R2 RMSE NSE ME MAE RSR
  Folder FodderBeetValidation
    Folder NewZealand
      Folder Lincoln
        Experiment Lincoln2011
          Memo Trial details
            This was a nitrogen fertiliser treatment trial conducted at Lincoln in 2011 ([Chakwizira_etal_2014a]).
          Factors
            Factor Nit
              CompositeFactor 0: Specifications=[NFertiliserEvents]
                Operations NFertiliserEvents
                  2011-11-17  [Fertiliser].Apply(0, Fertiliser.Types.UreaN, 10);
                  2011-12-29  [Fertiliser].Apply(0, Fertiliser.Types.UreaN, 10);
              CompositeFactor 50: Specifications=[NFertiliserEvents]
                Operations NFertiliserEvents
                  2011-11-17  [Fertiliser].Apply(25, Fertiliser.Types.UreaN, 10);
                  2011-12-29  [Fertiliser].Apply(25, Fertiliser.Types.UreaN, 10);
              CompositeFactor 100: Specifications=[NFertiliserEvents]
                Operations NFertiliserEvents
                  2011-11-17  [Fertiliser].Apply(50, Fertiliser.Types.UreaN, 10);
                  2011-12-29  [Fertiliser].Apply(50, Fertiliser.Types.UreaN, 10);
              CompositeFactor 200: Specifications=[NFertiliserEvents]
                Operations NFertiliserEvents
                  2011-11-17  [Fertiliser].Apply(100, Fertiliser.Types.UreaN, 10);
                  2011-12-29  [Fertiliser].Apply(100, Fertiliser.Types.UreaN, 10);
              CompositeFactor 300: Specifications=[NFertiliserEvents]
                Operations NFertiliserEvents
                  2011-11-17  [Fertiliser].Apply(150, Fertiliser.Types.UreaN, 10);
                  2011-12-29  [Fertiliser].Apply(150, Fertiliser.Types.UreaN, 10);
          Simulation ABlockNit0
            Clock: Start=2011-09-01; End=2012-06-30
            Summary summaryfile
            Weather: FileName=lincoln.met
            SoilArbitrator Soil Arbitrator
            Zone paddock: Area=1; Slope=0; AspectAngle=0; Altitude=50
              Soil TempletonABlock: Latitude=0; Longitude=0
                Chemical: Thickness=[100, 200, 300, 300, 300, 300]; PH=[6.6, 6.2, 5.7, 5.5, 5.5, 5.5]; PHUnits=Water
                Water: Thickness=[100, 200, 300, 300, 300, 300]; InitialValues=[0.27, 0.27, 0.29, 0.3, 0.3, 0.3]; InitialPAWmm=222; RelativeTo=LL15; FilledFromTop=false
                Physical
                  Thickness  BD    AirDry  LL15  DUL   SAT   KS
                  100        1     0.05    0.1   0.27  0.42  4832
                  200        1     0.05    0.1   0.27  0.4   389
                  300        1.59  0.05    0.16  0.29  0.36  16
                  300        1.57  0.05    0.17  0.3   0.37  16
                  300        1.6   0.05    0.17  0.3   0.37  98
                  300        1.6   0.06    0.12  0.3   0.32  98
                  SoilCrop FodderBeetSoil: LL=[0.13, 0.13, 0.1, 0.08, 0.11, 0.11]; KL=[0.06, 0.06, 0.06, 0.06, 0.06, 0.06]; XF=[1, 1, 1, 1, 1, 1]
                WaterBalance SoilWater: SummerDate=1-Nov; SummerU=9; SummerCona=4.4; WinterDate=1-Apr; WinterU=9; WinterCona=4.4; DiffusConst=88; DiffusSlope=35.4; Salb=0.18; CN2Bare=68; CNRed=20; CNCov=0.8; PSIDul=-100; Thickness=[100, 200, 300, 300, 300, 300]; SWCON=[0.5, 0.5, 0.5, 0.5, 0.5, 0.5]
                Nutrient
                Organic: FOMCNRatio=30; CarbonUnits=Total
                  Thickness  Carbon  SoilCNRatio  FBiom  FInert  FOM
                  100        1.82    11.5         0.025  0.3     1243.93
                  200        1.47    11.5         0.025  0.4     833.832
                  300        1.2     11.5         0.015  0.75    457.617
                  300        1.03    11.5         0.01   0.9     251.145
                  300        0.47    11.5         0.01   0.96    137.831
                  300        0.47    11.5         0.01   0.96    75.6435
                CERESSoilTemperature Temperature
                Solute NO3: Thickness=[100, 200, 300, 300, 300, 300]; InitialValues=[27.3, 11.4, 0.251572, 1.95329, 1.91667, 0.208333]; InitialValuesUnits=ppm; WaterTableConcentration=0; D0=0; DepthConstant=0; MaxDepthSoluteAccessible=0; RunoffEffectivenessAtMovingSolute=0; MaxEffectiveRunoff=0
                Solute NH4: Thickness=[100, 200, 300, 300, 300, 300]; InitialValues=[4.3, 3.8, 0.859539, 0.573248, 0.5, 0.0208333]; InitialValuesUnits=ppm; WaterTableConcentration=0; D0=0; DepthConstant=0; MaxDepthSoluteAccessible=0; RunoffEffectivenessAtMovingSolute=0; MaxEffectiveRunoff=0
                Solute Urea: Thickness=[100, 200, 300, 300, 300, 300]; InitialValues=[0, 0, 0, 0, 0, 0]; InitialValuesUnits=kg/ha; WaterTableConcentration=0; D0=0; DepthConstant=0; MaxDepthSoluteAccessible=0; RunoffEffectivenessAtMovingSolute=0; MaxEffectiveRunoff=0
              MicroClimate: a_interception=0; b_interception=1; c_interception=0; d_interception=0; SoilHeatFluxFraction=0.4; MinimumHeightDiffForNewLayer=0; NightInterceptionFraction=0.5; ReferenceHeight=2
              Irrigation
              Fertiliser
              SurfaceOrganicMatter surface organic matter: InitialResidueName=wheat; InitialResidueType=wheat; InitialResidueMass=0; InitialStandingFraction=0; InitialCPR=0; InitialCNR=80
              Folder Management
                Manager ExtraVariables
                Manager SowDateCv
                  InitialRootDepth = 2
                  CropToSow = Rivage
                  SowingDate = 10/31/2011 00:00:00
```csharp
using Models.Soils;
using System;
using Models.Core;
using System.Collections.Generic;
using System.Text;
using Models.PMF;
using Models;
using System.Xml.Serialization;
using APSIM.Shared.Utilities;
using System.Data;
using Models.PMF.Interfaces;
using Models.Surface;

namespace Models
{
    [Serializable] 
    //[System.Xml.Serialization.XmlInclude(typeof(Model))]
    public class Script : Model
    {
        [Link] Plant FodderBeet;
        [Link] Clock Clock;
        [Link] Zone zone;
        [Link] Simulation Simulation;
        [Link] SurfaceOrganicMatter SurfOM;
        
                
        [Description("Initial Root Depth")]
        public double InitialRootDepth { get; set; }
        [Description("Sown Crop")]
        public string CropToSow { get; set; }
        [Description("Sowing Date")]
        public DateTime SowingDate { get; set; }
        
        
        
        [EventSubscribe("DoManagement")]
        private void OnDoManagement(object sender, EventArgs e)
        {
            if (Clock.Today.Date == SowingDate)
            {
                FodderBeet.Sow(cultivar: CropToSow, population: 9, depth: InitialRootDepth, rowSpacing: 500);
                
            }
                        
            
        }
    }
}
```
                Operations IrrigationEvents
                  2011-11-18  [Irrigation].Apply(10);
                  2011-12-22  [Irrigation].Apply(10);
                  2011-12-29  [Irrigation].Apply(15);
                  2012-01-11  [Irrigation].Apply(30);
                  2012-01-12  [Irrigation].Apply(25);
                  2012-01-24  [Irrigation].Apply(25);
                  2012-02-01  [Irrigation].Apply(10);
                  2012-02-07  [Irrigation].Apply(30);
                  2012-03-22  [Irrigation].Apply(25);
                  2012-05-11  [Irrigation].Apply(30);
                  2012-10-31  [Irrigation].Apply(0);
                  2012-12-06  [Irrigation].Apply(0);
                  2012-12-13  [Irrigation].Apply(0);
                  2012-12-20  [Irrigation].Apply(0);
                  2012-12-21  [Irrigation].Apply(0);
                  2012-12-27  [Irrigation].Apply(0);
                  2013-01-03  [Irrigation].Apply(0);
                  2013-01-10  [Irrigation].Apply(0);
                  2013-01-24  [Irrigation].Apply(0);
                  2013-01-31  [Irrigation].Apply(0);
                  2013-02-07  [Irrigation].Apply(0);
                  2013-02-14  [Irrigation].Apply(0);
                  2013-02-21  [Irrigation].Apply(0);
                  2013-02-28  [Irrigation].Apply(0);
                  2013-03-07  [Irrigation].Apply(0);
                  2013-03-14  [Irrigation].Apply(0);
                  2013-04-04  [Irrigation].Apply(0);
                  2013-04-18  [Irrigation].Apply(0);
                Operations NFertiliserEvents: same as FodderBeetValidation.NewZealand.Lincoln.Lincoln2011.Factors.Nit.0.NFertiliserEvents
                Manager FungalInfection
                  InfectionDate = 2011-12-15
                  IsInfected = True
```csharp
using Models.Soils;
using System;
using Models.Core;
using Models.PMF;
using APSIM.Shared.Utilities;
using System.Xml.Serialization;
        
namespace Models
{
    [Serializable] 
    [System.Xml.Serialization.XmlInclude(typeof(Model))]
    public class Script : Model
    {
        [Link] Plant FodderBeet;
        [Link] Clock Clock;
        [Link] Zone zone;
        [Link] Summary Summary;


        [Description(" Date of Infection")]
        public DateTime InfectionDate { get; set; }
        [Description("Is Infected")]
        public bool IsInfected  {get; set;}    

        [EventSubscribe("DoManagement")]
        private void OnDoManagement(object sender, EventArgs e)
        {
            

            if (IsInfected == true) // an infected crop
              if (InfectionDate == Clock.Today)
               {
                zone.Set("FodderBeet.Leaf.CohortParameters.SenescenceDuration.BaseValue.FixedValue", 600);
                Summary.WriteMessage(this,"Fodder beet infected with fugal disease", MessageType.Diagnostic);
                }
            
        }
        
    }
}
```
              Report: EventNames=[Clock].DoReport
                VariableNames:
                  [Clock].Today
                  [FodderBeet].Leaf.Fw
                  [FodderBeet].Leaf.Fn
                  [FodderBeet].Phenology.CurrentPhase.Name
                  [FodderBeet].Phenology.Stage
                  [FodderBeet].Phenology.ThermalTime
                  [FodderBeet].Phenology.AccumulatedThermalTime
                  [FodderBeet].Leaf.Live.Wt as LeafWt
                  [FodderBeet].Petiole.Live.Wt as PetioleWt
                  [FodderBeet].StorageRoot.Live.Wt as StorageRootWt
                  [FodderBeet].Leaf.LAI as LAI
                  [FodderBeet].Structure.LeafTipsAppeared as AppearedLeaves
                  [FodderBeet].Leaf.PlantAppearedGreenLeafNo as GreenLeaves
                  [FodderBeet].Leaf.PlantsenescedLeafNo as SenescecedLeaves
                  [FodderBeet].Leaf.CoverGreen as RadiationInterception
                  [FodderBeet].AboveGround.Wt as AboveGroundWt
                  [FodderBeet].Leaf.Photosynthesis.RadnInt
                  [FodderBeet].Leaf.Photosynthesis.RUEact
                  [ExtraVariables].Script.AccumPlantN
                  [FodderBeet].Leaf.Live.N as LeafN
                  [FodderBeet].Root.Live.N as RootN
                  [FodderBeet].StorageRoot.Live.N as StorageRootN
                  [FodderBeet].Petiole.Live.N as PetioleN
                  [FodderBeet].Leaf.Live.NConc as LeafNconc
                  [FodderBeet].Root.Live.NConc as RootNconc
                  [ExtraVariables].Script.AccumFert
                  [ExtraVariables].Script.AccumIrrigation as irrigation
                  [ExtraVariables].Script.SoilNitrogenContent
                  [FodderBeet].AboveGround.N as AboveGroundN
                  [FodderBeet].Leaf.CohortParameters.MaxArea
              Plant FodderBeet
        Experiment Lincoln2012
          Memo Trial details
            This was an irrigation treatment trial conducted at Lincoln in 2012 ([Chakwizira_etal_2014b]).
          Factors
            Factor Irr
              CompositeFactor Nil: Specifications=[IrrigationEvents]
                Operations IrrigationEvents
                  2011-11-18  [Irrigation].Apply(0);
                  2011-12-22  [Irrigation].Apply(0);
                  2011-12-29  [Irrigation].Apply(0);
                  2012-01-11  [Irrigation].Apply(0);
                  2012-01-12  [Irrigation].Apply(0);
                  2012-01-24  [Irrigation].Apply(0);
                  2012-02-01  [Irrigation].Apply(0);
                  2012-02-07  [Irrigation].Apply(0);
                  2012-03-22  [Irrigation].Apply(0);
                  2012-05-11  [Irrigation].Apply(0);
              CompositeFactor Full: Specifications=[IrrigationEvents]
                Operations IrrigationEvents
                  2012-12-06  [Irrigation].Apply(52);
                  2012-12-13  [Irrigation].Apply(8.1);
                  2012-12-20  [Irrigation].Apply(35.7);
                  2012-12-27  [Irrigation].Apply(26);
                  2013-01-03  [Irrigation].Apply(32.3);
                  2013-01-10  [Irrigation].Apply(34.4);
                  2013-01-17  [Irrigation].Apply(28.9);
                  2013-01-24  [Irrigation].Apply(24.2);
                  2013-01-31  [Irrigation].Apply(40.9);
                  2013-02-07  [Irrigation].Apply(17.5);
                  2013-02-14  [Irrigation].Apply(32.2);
                  2013-02-21  [Irrigation].Apply(26.7);
                  2013-02-28  [Irrigation].Apply(24.7);
                  2013-03-07  [Irrigation].Apply(25.3);
                  2013-03-14  [Irrigation].Apply(19.4);
                  2013-04-04  [Irrigation].Apply(16.1);
                  2013-04-18  [Irrigation].Apply(7.1);
              CompositeFactor 3wkET: Specifications=[IrrigationEvents]
                Operations IrrigationEvents
                  2012-12-06  [Irrigation].Apply(0);
                  2012-12-13  [Irrigation].Apply(12.6);
                  2012-12-20  [Irrigation].Apply(0);
                  2012-12-27  [Irrigation].Apply(0);
                  2013-01-03  [Irrigation].Apply(37.5);
                  2013-01-10  [Irrigation].Apply(0);
                  2013-01-17  [Irrigation].Apply(0);
                  2013-01-24  [Irrigation].Apply(29);
                  2013-01-31  [Irrigation].Apply(0);
                  2013-02-07  [Irrigation].Apply(0);
                  2013-02-14  [Irrigation].Apply(35.5);
                  2013-02-21  [Irrigation].Apply(0);
                  2013-02-28  [Irrigation].Apply(0);
                  2013-03-07  [Irrigation].Apply(37.4);
                  2013-03-14  [Irrigation].Apply(0);
                  2013-04-04  [Irrigation].Apply(0);
                  2013-04-18  [Irrigation].Apply(10.5);
              CompositeFactor 1wkET: Specifications=[IrrigationEvents]
                Operations IrrigationEvents
                  2012-12-06  [Irrigation].Apply(26);
                  2012-12-13  [Irrigation].Apply(0);
                  2012-12-20  [Irrigation].Apply(17.3);
                  2012-12-27  [Irrigation].Apply(6.6);
                  2013-01-03  [Irrigation].Apply(16.3);
                  2013-01-10  [Irrigation].Apply(13.8);
                  2013-01-17  [Irrigation].Apply(8.5);
                  2013-01-24  [Irrigation].Apply(6.6);
                  2013-01-31  [Irrigation].Apply(20.4);
                  2013-02-07  [Irrigation].Apply(0);
                  2013-02-14  [Irrigation].Apply(16.1);
                  2013-02-21  [Irrigation].Apply(12.5);
                  2013-02-28  [Irrigation].Apply(12.5);
                  2013-03-07  [Irrigation].Apply(12.6);
                  2013-03-14  [Irrigation].Apply(9.3);
                  2013-04-04  [Irrigation].Apply(0);
                  2013-04-18  [Irrigation].Apply(0);
          Simulation ABlockRainfed
            Clock: Start=2012-09-01; End=2013-06-30
            Summary summaryfile
            Weather: FileName=lincoln.met
            SoilArbitrator Soil Arbitrator
            Zone paddock: Area=1; Slope=0; AspectAngle=0; Altitude=50
              Soil TempletonABlock: Latitude=0; Longitude=0
                Chemical: Thickness=[100, 200, 300, 300, 300, 300]; PH=[6.6, 6.2, 5.7, 5.5, 5.5, 5.5]; PHUnits=Water
                Water: Thickness=[100, 200, 300, 300, 300, 300]; InitialValues=[0.27, 0.27, 0.29, 0.3, 0.3, 0.3]; InitialPAWmm=222; RelativeTo=LL15; FilledFromTop=false
                Physical
                  Thickness  BD    AirDry  LL15  DUL   SAT   KS
                  100        1     0.05    0.1   0.27  0.42  4832
                  200        1     0.05    0.1   0.27  0.4   389
                  300        1.59  0.05    0.16  0.29  0.36  16
                  300        1.57  0.05    0.17  0.3   0.37  16
                  300        1.6   0.05    0.17  0.3   0.37  98
                  300        1.6   0.06    0.12  0.3   0.32  97
                  SoilCrop FodderBeetSoil: LL=[0.13, 0.13, 0.1, 0.08, 0.11, 0.11]; KL=[0.06, 0.06, 0.06, 0.06, 0.06, 0.06]; XF=[1, 1, 1, 1, 1, 1]
                WaterBalance SoilWater: SummerDate=1-Nov; SummerU=9; SummerCona=4.4; WinterDate=1-Apr; WinterU=9; WinterCona=4.4; DiffusConst=88; DiffusSlope=35.4; Salb=0.18; CN2Bare=68; CNRed=20; CNCov=0.8; PSIDul=-100; Thickness=[100, 200, 300, 300, 300, 300]; SWCON=[0.55, 0.55, 0.55, 0.55, 0.55, 0.55]
                Nutrient
                Organic: same as FodderBeetValidation.NewZealand.Lincoln.Lincoln2011.ABlockNit0.paddock.TempletonABlock.Organic
                CERESSoilTemperature Temperature
                Solute NO3: same as FodderBeetValidation.NewZealand.Lincoln.Lincoln2011.ABlockNit0.paddock.TempletonABlock.NO3
                Solute NH4: Thickness=[100, 200, 300, 300, 300, 300]; InitialValues=[4.3, 7.6, 4.1, 2.7, 2.4, 0.1]; InitialValuesUnits=ppm; WaterTableConcentration=0; D0=0; DepthConstant=0; MaxDepthSoluteAccessible=0; RunoffEffectivenessAtMovingSolute=0; MaxEffectiveRunoff=0
                Solute Urea: same as FodderBeetValidation.NewZealand.Lincoln.Lincoln2011.ABlockNit0.paddock.TempletonABlock.Urea
              Plant FodderBeet
              MicroClimate: a_interception=0; b_interception=1; c_interception=0; d_interception=0; SoilHeatFluxFraction=0.4; MinimumHeightDiffForNewLayer=0; NightInterceptionFraction=0.5; ReferenceHeight=2
              Irrigation
              Fertiliser
              SurfaceOrganicMatter surface organic matter: InitialResidueName=wheat; InitialResidueType=wheat; InitialResidueMass=0; InitialStandingFraction=0; InitialCPR=0; InitialCNR=80
              Folder Management
                Manager ExtraVariables
                Manager SowDateCv
                  InitialRootDepth = 2
                  CropToSow = Rivage
                  SowingDate = 2012-10-29
                  script: same as in FodderBeetValidation.NewZealand.Lincoln.Lincoln2011.ABlockNit0.paddock.Management.SowDateCv
                Operations IrrigationEvents: same as FodderBeetValidation.NewZealand.Lincoln.Lincoln2012.Factors.Irr.Nil.IrrigationEvents
                Operations NFertEvents
                  2011-11-17  [Fertiliser].Apply(0, Fertiliser.Types.UreaN, 0);
                  2011-12-22  [Fertiliser].Apply(0, Fertiliser.Types.UreaN, 0);
                  2012-10-29  [Fertiliser].Apply(50, Fertiliser.Types.UreaN, 0);
                  2012-11-29  [Fertiliser].Apply(50, Fertiliser.Types.UreaN, 0);
                  2012-12-21  [Fertiliser].Apply(100, Fertiliser.Types.UreaN, 0);
                Manager FungalInfection
                  InfectionDate = 2012-12-15
                  IsInfected = True
                  script: same as in FodderBeetValidation.NewZealand.Lincoln.Lincoln2011.ABlockNit0.paddock.Management.FungalInfection
              Report: EventNames=[Clock].DoReport
                VariableNames:
                  [Clock].Today
                  [FodderBeet].Leaf.Fw
                  [FodderBeet].Leaf.Fn
                  [FodderBeet].Phenology.CurrentPhase.Name
                  [FodderBeet].Phenology.Stage
                  [FodderBeet].Phenology.ThermalTime
                  [FodderBeet].Phenology.AccumulatedThermalTime
                  [FodderBeet].Leaf.Live.Wt
                  [FodderBeet].Petiole.Live.Wt
                  [FodderBeet].StorageRoot.Live.Wt
                  [FodderBeet].Leaf.LAI
                  [FodderBeet].Structure.LeafTipsAppeared
                  [FodderBeet].Leaf.PlantAppearedLeafNo
                  [FodderBeet].Leaf.PlantAppearedGreenLeafNo
                  [FodderBeet].Leaf.PlantsenescedLeafNo
                  [FodderBeet].Leaf.CoverGreen
                  [FodderBeet].Leaf.CohortParameters.MaxArea
                  [FodderBeet].AboveGround.Wt
                  [FodderBeet].Leaf.Photosynthesis.RadnInt
                  [FodderBeet].Leaf.Photosynthesis.RUEact
                  [FodderBeet].Root.NUptake
                  [ExtraVariables].Script.AccumPlantN
                  [FodderBeet].Leaf.Live.N
                  [FodderBeet].Root.Live.N
                  [FodderBeet].StorageRoot.Live.N
                  [FodderBeet].Petiole.Live.N
                  [FodderBeet].Leaf.Live.NConc
                  [FodderBeet].Root.Live.NConc
                  [ExtraVariables].Script.AccumFert
                  [ExtraVariables].Script.AccumIrrigation as irrigation
                  [ExtraVariables].Script.SoilNitrogenContent
        Experiment Lincoln2014
          Memo Trial details
            The data used here is from a sowing date experiment conducted at Lincoln, Canterbury, New Zealand. The experiment was established in the field as a Randomised Complete Block Design with four replicates. Two culivars ("Rivage" and "Brigadier") were evaluated over four sowing dates (19 September, 17 October, 17 November and 15 December in 2014). The first phase i.e. calibration/parameterisation of a potential yield model was completed using cultivar "Rivage" data from the October sowing date ([Khaembah_etal_2017]).
          Factors
            Permutation
              Factor Cv: Specification=[Sowing].Script.Cultivar = Rivage,Brigadier
              Factor SD
                CompositeFactor Sep
                  Specifications:
                    [Sowing].Script.SowingDate = 2014-09-19
                    [NFert]
                  Operations Nit
                    2014-09-19  [Fertiliser].Apply(50, [Fertiliser].Types.UreaN, 50);
                    2014-10-16  [Fertiliser].Apply(0, [Fertiliser].Types.UreaN, 50);
                    2014-11-17  [Fertiliser].Apply(0, [Fertiliser].Types.UreaN, 50);
                    2014-11-21  [Fertiliser].Apply(50, [Fertiliser].Types.UreaN, 50);
                    2014-11-28  [Fertiliser].Apply(0, [Fertiliser].Types.UreaN, 50);
                    2014-12-15  [Fertiliser].Apply(0, [Fertiliser].Types.UreaN, 50);
                    2014-12-24  [Fertiliser].Apply(50, [Fertiliser].Types.UreaN, 50);
                    2015-01-21  [Fertiliser].Apply(0, [Fertiliser].Types.UreaN, 50);
                    2015-02-10  [Fertiliser].Apply(0, [Fertiliser].Types.UreaN, 50);
                    2015-04-09  [Fertiliser].Apply(50, [Fertiliser].Types.UreaN, 50);
                CompositeFactor Oct
                  Specifications:
                    [Sowing].Script.SowingDate = 2014-10-17
                    [NFert]
                  Operations Nit
                    2014-09-19  [Fertiliser].Apply(0, [Fertiliser].Types.UreaN, 50);
                    2014-10-16  [Fertiliser].Apply(50, [Fertiliser].Types.UreaN, 50);
                    2014-11-17  [Fertiliser].Apply(0, [Fertiliser].Types.UreaN, 50);
                    2014-11-21  [Fertiliser].Apply(0, [Fertiliser].Types.UreaN, 50);
                    2014-11-28  [Fertiliser].Apply(50, [Fertiliser].Types.UreaN, 50);
                    2014-12-15  [Fertiliser].Apply(0, [Fertiliser].Types.UreaN, 50);
                    2014-12-24  [Fertiliser].Apply(50, [Fertiliser].Types.UreaN, 50);
                    2015-01-21  [Fertiliser].Apply(0, [Fertiliser].Types.UreaN, 50);
                    2015-02-10  [Fertiliser].Apply(0, [Fertiliser].Types.UreaN, 50);
                    2015-04-09  [Fertiliser].Apply(50, [Fertiliser].Types.UreaN, 50);
                CompositeFactor Nov
                  Specifications:
                    [Sowing].Script.SowingDate = 2014-11-17
                    [NFert]
                  Operations Nit
                    2014-09-19  [Fertiliser].Apply(0, [Fertiliser].Types.UreaN, 50);
                    2014-10-16  [Fertiliser].Apply(0, [Fertiliser].Types.UreaN, 50);
                    2014-11-17  [Fertiliser].Apply(50, [Fertiliser].Types.UreaN, 50);
                    2014-11-21  [Fertiliser].Apply(0, [Fertiliser].Types.UreaN, 50);
                    2014-11-28  [Fertiliser].Apply(0, [Fertiliser].Types.UreaN, 50);
                    2014-12-15  [Fertiliser].Apply(0, [Fertiliser].Types.UreaN, 50);
                    2014-12-24  [Fertiliser].Apply(50, [Fertiliser].Types.UreaN, 50);
                    2015-01-21  [Fertiliser].Apply(50, [Fertiliser].Types.UreaN, 50);
                    2015-02-10  [Fertiliser].Apply(0, [Fertiliser].Types.UreaN, 50);
                    2015-04-09  [Fertiliser].Apply(50, [Fertiliser].Types.UreaN, 50);
                CompositeFactor Dec
                  Specifications:
                    [Sowing].Script.SowingDate = 2014-12-15
                    [NFert]
                  Operations Nit
                    2014-09-19  [Fertiliser].Apply(0, [Fertiliser].Types.UreaN, 50);
                    2014-10-16  [Fertiliser].Apply(0, [Fertiliser].Types.UreaN, 50);
                    2014-11-17  [Fertiliser].Apply(0, [Fertiliser].Types.UreaN, 50);
                    2014-11-21  [Fertiliser].Apply(0, [Fertiliser].Types.UreaN, 50);
                    2014-11-28  [Fertiliser].Apply(0, [Fertiliser].Types.UreaN, 50);
                    2014-12-15  [Fertiliser].Apply(50, [Fertiliser].Types.UreaN, 50);
                    2014-12-24  [Fertiliser].Apply(0, [Fertiliser].Types.UreaN, 50);
                    2015-01-21  [Fertiliser].Apply(50, [Fertiliser].Types.UreaN, 50);
                    2015-02-10  [Fertiliser].Apply(50, [Fertiliser].Types.UreaN, 50);
                    2015-04-09  [Fertiliser].Apply(50, [Fertiliser].Types.UreaN, 50);
              Memo
                2 cultivars (Bri and Riv)
                4 sowing dates

                Moved sowing dates of Rivage a day after just to visuslise differences in graphs
          Simulation ABlockRivOct
            Clock: Start=2014-09-01; End=2015-10-28
            Summary summaryfile
            Weather: FileName=lincoln.met
            Zone paddock: Area=1; Slope=0; AspectAngle=0; Altitude=50
              Soil TempletonABlock: Latitude=0; Longitude=0
                Chemical: Thickness=[100, 200, 300, 300, 300, 300]; PH=[6.6, 6.2, 5.7, 5.5, 5.5, 5.5]; PHUnits=Water
                Water: Thickness=[100, 200, 300, 300, 300, 300]; InitialValues=[0.27, 0.27, 0.29, 0.3, 0.3, 0.3]; InitialPAWmm=222; RelativeTo=LL15; FilledFromTop=false
                Physical
                  Thickness  BD    AirDry  LL15  DUL   SAT   KS
                  100        1     0.05    0.1   0.27  0.42  4832
                  200        1     0.05    0.1   0.27  0.4   389
                  300        1.59  0.05    0.16  0.29  0.36  16
                  300        1.57  0.05    0.17  0.3   0.37  16
                  300        1.6   0.05    0.17  0.3   0.37  98
                  300        1.6   0.06    0.12  0.3   0.32  -
                  SoilCrop FodderBeetSoil: LL=[0.13, 0.13, 0.1, 0.08, 0.11, 0.11]; KL=[0.06, 0.06, 0.06, 0.06, 0.06, 0.06]; XF=[1, 1, 1, 1, 1, 1]
                WaterBalance SoilWater: same as FodderBeetValidation.NewZealand.Lincoln.Lincoln2012.ABlockRainfed.paddock.TempletonABlock.SoilWater
                Nutrient
                Organic: same as FodderBeetValidation.NewZealand.Lincoln.Lincoln2011.ABlockNit0.paddock.TempletonABlock.Organic
                CERESSoilTemperature Temperature
                Solute NO3: Thickness=[100, 200, 300, 300, 300, 300]; InitialValues=[20, 15, 4.19287, 1.06157, 0.11875, 0.11875]; InitialValuesUnits=ppm; WaterTableConcentration=0; D0=0; DepthConstant=0; MaxDepthSoluteAccessible=0; RunoffEffectivenessAtMovingSolute=0; MaxEffectiveRunoff=0
                Solute NH4: Thickness=[100, 200, 300, 300, 300, 300]; InitialValues=[0, 0, 0, 0, 0, 0]; InitialValuesUnits=ppm; WaterTableConcentration=0; D0=0; DepthConstant=0; MaxDepthSoluteAccessible=0; RunoffEffectivenessAtMovingSolute=0; MaxEffectiveRunoff=0
                Solute Urea: same as FodderBeetValidation.NewZealand.Lincoln.Lincoln2011.ABlockNit0.paddock.TempletonABlock.Urea
              Plant FodderBeet
              MicroClimate: a_interception=0; b_interception=1; c_interception=0; d_interception=0; SoilHeatFluxFraction=0.4; MinimumHeightDiffForNewLayer=0; NightInterceptionFraction=0.5; ReferenceHeight=2
              Irrigation
              Fertiliser
              SurfaceOrganicMatter surface organic matter: InitialResidueName=grass; InitialResidueType=grass; InitialResidueMass=1500; InitialStandingFraction=0; InitialCPR=0; InitialCNR=80
              Folder Management
                Manager ExtraVariables
```csharp
 // This will be replaced by the "ExtraVariables" section in "Replacements"

using Models.Soils;
using System;
using Models.Core;

namespace Models
{
    [Serializable] 
    public class Script : Model
    {
    }
}
```
                Manager Sowing
                  InitialRootDepth = 5
                  Cultivar =
                  SowingDate = 2014-10-17
```csharp
using Models.Soils;
using System;
using Models.Core;
using System.Collections.Generic;
using System.Text;
using Models.PMF;
using Models;
using System.Xml.Serialization;
using APSIM.Shared.Utilities;
using System.Data;
using Models.PMF.Interfaces;
using Models.Surface;

namespace Models
{
    [Serializable] 
    //[System.Xml.Serialization.XmlInclude(typeof(Model))]
    public class Script : Model
    {
        [Link] Plant Fodderbeet;
        [Link] Clock Clock;
        [Link] Zone zone;
        [Link] Simulation Simulation;
        [Link] SurfaceOrganicMatter SurfOM;
        
                
        [Description("Initial Root Depth")]
        public double InitialRootDepth { get; set; }
        [Description("Cultivar")]
        public string Cultivar { get; set; }
        [Description("Sowing Date")]
        public DateTime SowingDate { get; set; }


        
        
        [EventSubscribe("DoManagement")]
        private void OnDoManagement(object sender, EventArgs e)
        {
            if (Clock.Today.Date == SowingDate)
            {
                Fodderbeet.Sow(cultivar: Cultivar, population: 9, depth: InitialRootDepth, rowSpacing: 500);
                
            }

        }
    }
}
```
                Operations Irrig_Schedule
                  2014-10-30  [Irrigation].Apply(10);
                  2014-11-03  [Irrigation].Apply(10);
                  2014-11-10  [Irrigation].Apply(10);
                  2014-11-15  [Irrigation].Apply(10);
                  2015-11-21  [Irrigation].Apply(10)
                  2014-11-14  [Irrigation].Apply(10);
                  2014-11-24  [Irrigation].Apply(10);
                  2014-12-10  [Irrigation].Apply(10);
                  2014-12-24  [Irrigation].Apply(10);
                  2015-01-06  [Irrigation].Apply(15);
                  2015-01-13  [Irrigation].Apply(25);
                  2015-02-04  [Irrigation].Apply(30);
                  2015-02-10  [Irrigation].Apply(10);
                  2015-02-20  [Irrigation].Apply(30);
                  2015-03-02  [Irrigation].Apply(30);
                  2015-03-10  [Irrigation].Apply(30);
                  2015-04-07  [Irrigation].Apply(35);
                  2015-04-15  [Irrigation].Apply(10);
                Operations NFert: same as FodderBeetValidation.NewZealand.Lincoln.Lincoln2014.Factors.Permutation.SD.Oct.Nit
                Manager FungalInfection
                  InfectionDate = 2014-12-15
                  IsInfected = True
                  script: same as in FodderBeetValidation.NewZealand.Lincoln.Lincoln2011.ABlockNit0.paddock.Management.FungalInfection
              Report: EventNames=[Clock].DoReport
                VariableNames:
                  [Clock].Today
                  [FodderBeet].Leaf.Fw
                  [FodderBeet].Leaf.Fn
                  [FodderBeet].Phenology.CurrentPhase.Name
                  [FodderBeet].Phenology.Stage
                  [FodderBeet].Phenology.ThermalTime
                  [FodderBeet].Phenology.AccumulatedThermalTime
                  [FodderBeet].Leaf.Live.Wt
                  [FodderBeet].Petiole.Live.Wt
                  [FodderBeet].StorageRoot.Live.Wt
                  [FodderBeet].Leaf.LAI
                  [FodderBeet].Structure.LeafTipsAppeared
                  [FodderBeet].Leaf.PlantAppearedLeafNo
                  [FodderBeet].Leaf.PlantAppearedGreenLeafNo
                  [FodderBeet].Leaf.PlantsenescedLeafNo
                  [FodderBeet].Leaf.CoverGreen
                  [FodderBeet].Leaf.CohortParameters.MaxArea
                  [Phenology].Photoperiod
                  [FodderBeet].AboveGround.Wt
                  [FodderBeet].Leaf.Photosynthesis.RadnInt
                  [FodderBeet].Leaf.Photosynthesis.RUEact
                  [ExtraVariables].Script.AccumPlantN
                  [ExtraVariables].Script.AccumFert
                  [ExtraVariables].Script.SoilNitrogenContent
                  [FodderBeet].Leaf.Live.N
                  [FodderBeet].Root.Live.N
                  [FodderBeet].StorageRoot.Live.N
                  [FodderBeet].Petiole.Live.N
                  [FodderBeet].TotalDead.N
                  [FodderBeet].StorageRoot.Live.NConc
                  [FodderBeet].Leaf.Live.NConc
                  [FodderBeet].Petiole.Live.NConc
                  [FodderBeet].TotalDead.NConc
                  [FodderBeet].Root.Live.NConc
                  [FodderBeet].Total.NConc
            SoilArbitrator Soil Arbitrator
        Experiment LincolnRS2016
          Memo Trial details
            This trial was conducted in the rainshelter at Plant and Food Research in Lincoln, New Zealand in 2016. The objective was to evaluate the effect of nitrogen and irrigation on the development and growth of fodder beet crops.
            Details:

            •	Three nitrogen treatments:  0 kg N/ha, 50 kg N/ha & 300 kg N/ha applied as dissolved urea with fertigation
            •	Two irrigation treatments: Nil and full irrigation

            Fodder beet (cultiva "Rivage") was precision drilled on 18 October 2016. Sowing density was 11 plants/m2 and row spacing was 0.45m.
          Factors
            Permutation
              Factor Irr
                CompositeFactor Full
                  Specifications:
                    [Irrig]
                    [StateFactors].Script.IrrFactor = true
                  Operations Full
                    2016-09-02  [Irrigation].Apply(25);
                    2016-10-25  [Irrigation].Apply(5);
                    2016-10-28  [Irrigation].Apply(5);
                    2016-11-17  [Irrigation].Apply(5);
                    2016-11-23  [Irrigation].Apply(30);
                    2016-11-30  [Irrigation].Apply(0);
                    2016-12-07  [Irrigation].Apply(25);
                    2016-12-21  [Irrigation].Apply(25);
                    2016-12-29  [Irrigation].Apply(30);
                    2017-01-04  [Irrigation].Apply(40);
                    2017-01-11  [Irrigation].Apply(32.9);
                    2017-01-18  [Irrigation].Apply(25.4);
                    2017-01-25  [Irrigation].Apply(31.3);
                    2017-02-08  [Irrigation].Apply(33);
                    2017-02-15  [Irrigation].Apply(35);
                    2017-02-22  [Irrigation].Apply(29);
                    2017-02-15  [Irrigation].Apply(35);
                    2017-02-22  [Irrigation].Apply(29);
                    2017-03-01  [Irrigation].Apply(32.6);
                    2017-03-08  [Irrigation].Apply(34);
                    2017-03-15  [Irrigation].Apply(0);
                    2017-03-22  [Irrigation].Apply(50);
                    2017-03-29  [Irrigation].Apply(0);
                    2017-04-05  [Irrigation].Apply(0);
                    2017-04-12  [Irrigation].Apply(30.9);
                    2017-04-27  [Irrigation].Apply(18.9);
                    Memo
                      Have added an extra irrigation, on 22 Oct,

                      Data indcates water applied but no notes of it RFZ

                      In Statefactors have donethe irrigations for
                        17/12  21/1 19/11 14/1
                CompositeFactor Nil
                  Specifications:
                    [Irrig]
                    [StateFactors].Script.IrrFactor = false
                  Operations Nil
                    2016-09-02  [Irrigation].Apply(20)
                    2016-10-25  [Irrigation].Apply(5)
                    2017-01-18  [Irrigation].Apply(5)
                    2017-02-25  [Irrigation].Apply(5)
                    2017-05-21  [Irrigation].Apply(50)
                    Memo
                      Have added an extra irrigation, on 3 Nov,

                      Data indcates water applied but no notes of it RFZ
              Factor Nit
                CompositeFactor 0
                  Specifications:
                    [Fert]
                    [StateFactors].Script.NitFactor = 0
                  Operations 0
                    2016-10-29  [Fertiliser].Apply(0, Fertiliser.Types.NO3N, 10);
                    2017-01-18  [Fertiliser].Apply(0, Fertiliser.Types.NO3N, 10);
                    2017-02-25  [Fertiliser].Apply(0, Fertiliser.Types.NO3N, 10);
                    Memo
                      Uniques fertigation event
                CompositeFactor 50
                  Specifications:
                    [Fert]
                    [StateFactors].Script.NitFactor = 50
                  Operations 50
                    2016-10-29  [Fertiliser].Apply(25, Fertiliser.Types.NO3N, 10);
                    2017-01-18  [Fertiliser].Apply(25, Fertiliser.Types.NO3N, 10);
                    2017-02-25  [Fertiliser].Apply(0, Fertiliser.Types.NO3N, 10);
                CompositeFactor 300
                  Specifications:
                    [Fert]
                    [StateFactors].Script.NitFactor = 300
                  Operations 300
                    2016-10-29  [Fertiliser].Apply(100, Fertiliser.Types.NO3N, 10);
                    2017-01-18  [Fertiliser].Apply(100, Fertiliser.Types.NO3N, 10);
                    2017-02-25  [Fertiliser].Apply(100, Fertiliser.Types.NO3N, 10);
          Simulation Rainshelter
            Clock: Start=2016-09-28; End=2017-06-09
            Summary summaryfile
            Weather: FileName=lincoln.met
            SoilArbitrator Soil Arbitrator
            Zone paddock: Area=1; Slope=0; AspectAngle=0; Altitude=50
              Plant FodderBeet
              Folder Manager folder
                Operations GeneralIrrigation
                  2016-09-02  [Irrigation].Apply(25.0);
                  2016-10-25  [Irrigation].Apply(5.0);
                  2016-10-28  [Irrigation].Apply(5.0);
                Operations Irrig
                Operations Fert
                  2016-10-29  [Fertiliser].Apply(100, Fertiliser.Types.UreaN, 10);
                  2017-01-18  [Fertiliser].Apply(100, Fertiliser.Types.UreaN, 10);
                  2017-02-25  [Fertiliser].Apply(100, Fertiliser.Types.UreaN, 10);
                Operations Testing
                Manager ClimateControl
                  StartDate = 2016-10-17
                  EndDate = 2017-05-20
```csharp
using Models.Soils;
using System.Xml.Serialization;
using Models;
using Models.PMF;
using System.Text;
using System.Collections.Generic;
using APSIM.Shared.Utilities;
using Models.Core;
using System;
using Models.Climate;

namespace Models
{
    [Serializable] 
    [System.Xml.Serialization.XmlInclude(typeof(Model))]
    public class Script : Model
    {
        [Link] Weather Met;
        [Link] Clock Clock;
    
        [Description("Start Date")]
        public DateTime StartDate { get; set; }
        
        [Description("End Date")]
        public DateTime EndDate { get; set; }
 
    
        [EventSubscribe("PreparingNewWeatherData")]
        private void OnPreparingNewWeatherData(object sender, EventArgs e)
        {
            if ((Clock.Today.Date >= StartDate) && (Clock.Today.Date <= EndDate))
                Met.Rain = 0;        
        }
    }
}
```
                Manager StateFactors
                  IrrFactor = False
                  NitFactor = 0
```csharp
using Models.Interfaces;
using System;
using Models.Core;
using System.Collections.Generic;
using System.Text;
using Models.Soils;
using Models.PMF;
using Models;
using System.Xml.Serialization;
using APSIM.Shared.Utilities;

namespace Models
{
    [Serializable] 
    public class Script : Model
    {
        [Link] private Clock Clock;
        [Link] private Irrigation Irrigation;
        [Link] private Fertiliser Fert;
        [Link] private Soil ThisSoil;
        [Link]
        private IPhysical soilPhysical;
        [Link]
        private ISoilWater waterBalance;
        [Description("Amount of Irrgation be applied 0/1")]
        public bool IrrFactor { get; set; }
        [Description("Amount of fertiliser to be applied (kg/ha)")]
        public double NitFactor { get; set; }
        
          
        private void SetSoilLayers()
        {
            /*
            Not used yrt use whenmore detailed info is known
            */
            int i = 0;
            if ((IrrFactor == false) && (NitFactor == 0))
            {
                if (soilPhysical.Thickness.Length != 7)
                {
                    throw new Exception("Soil layer exception");
                }
             
                soilPhysical.LL15[0] = 0.06;
                soilPhysical.LL15[1] = 0.06;
                soilPhysical.LL15[2] = 0.08;
                soilPhysical.LL15[3] = 0.14;
                soilPhysical.LL15[4] = 0.16;
                soilPhysical.LL15[5] = 0.16;
                soilPhysical.LL15[6] = 0.11;
                soilPhysical.DUL[0] = 0.34;
                soilPhysical.DUL[1] = 0.3;
                soilPhysical.DUL[2] = 0.28;
                soilPhysical.DUL[3] = 0.3;
                soilPhysical.DUL[4] = 0.3;
                soilPhysical.DUL[5] = 0.30;
                soilPhysical.DUL[6] = 0.3;
                soilPhysical.SAT[0] = 0.4;
                soilPhysical.SAT[1] = 0.4;
                soilPhysical.SAT[2] = 0.4;
                soilPhysical.SAT[3] = 0.4;
                soilPhysical.SAT[4] = 0.4;
                soilPhysical.SAT[5] = 0.4;
                soilPhysical.SAT[6] = 0.4;
                waterBalance.Reset();
            }   
            if ((IrrFactor == false) && (NitFactor == 50))
            {
                if (soilPhysical.Thickness.Length != 7)
                {
                    throw new Exception("Soil layer exception");
                }
             
                soilPhysical.LL15[0] = 0.07;
                soilPhysical.LL15[1] = 0.12;
                soilPhysical.LL15[2] = 0.17;
                soilPhysical.LL15[3] = 0.20;
                soilPhysical.LL15[4] = 0.26;
                soilPhysical.LL15[5] = 0.32;
                soilPhysical.LL15[6] = 0.30;
                soilPhysical.DUL[0] = 0.30;
                soilPhysical.DUL[1] = 0.26;
                soilPhysical.DUL[2] = 0.29;
                soilPhysical.DUL[3] = 0.25;
                soilPhysical.DUL[4] = 0.29;
                soilPhysical.DUL[5] = 0.34;
                soilPhysical.DUL[6] = 0.30;
                soilPhysical.SAT[0] = 0.34;
                soilPhysical.SAT[1] = 0.34;
                soilPhysical.SAT[2] = 0.34;
                soilPhysical.SAT[3] = 0.34;
                soilPhysical.SAT[4] = 0.34;
                soilPhysical.SAT[5] = 0.34;
                soilPhysical.SAT[6] = 0.34;
                waterBalance.Reset();
            }   
            if ((IrrFactor == false) && (NitFactor == 50))
            {
                if (soilPhysical.Thickness.Length != 7)
                {
                    throw new Exception("Soil layer exception");
                }
             
                soilPhysical.LL15[0] = 0.06;
                soilPhysical.LL15[1] = 0.11;
                soilPhysical.LL15[2] = 0.21;
                soilPhysical.LL15[3] = 0.18;
                soilPhysical.LL15[4] = 0.23;
                soilPhysical.LL15[5] = 0.30;
                soilPhysical.LL15[6] = 0.26;
                soilPhysical.DUL[0] = 0.25;
                soilPhysical.DUL[1] = 0.26;
                soilPhysical.DUL[2] = 0.30;
                soilPhysical.DUL[3] = 0.27;
                soilPhysical.DUL[4] = 0.34;
                soilPhysical.DUL[5] = 0.27;
                soilPhysical.DUL[6] = 0.30;
                soilPhysical.SAT[0] = 0.34;
                soilPhysical.SAT[1] = 0.34;
                soilPhysical.SAT[2] = 0.34;
                soilPhysical.SAT[3] = 0.34;
                soilPhysical.SAT[4] = 0.34;
                soilPhysical.SAT[5] = 0.34;
                soilPhysical.SAT[6] = 0.34;
                waterBalance.Reset();
            }   
            if ((IrrFactor == true) && (NitFactor == 0))
            {
                if (soilPhysical.Thickness.Length != 7)
                {
                    throw new Exception("Soil layer exception");
                }
             
                soilPhysical.LL15[0] = 0.13;
                soilPhysical.LL15[1] = 0.21;
                soilPhysical.LL15[2] = 0.25;
                soilPhysical.LL15[3] = 0.19;
                soilPhysical.LL15[4] = 0.29;
                soilPhysical.LL15[5] = 0.32;
                soilPhysical.LL15[6] = 0.34;
                soilPhysical.DUL[0] = 0.31;
                soilPhysical.DUL[1] = 0.28;
                soilPhysical.DUL[2] = 0.30;
                soilPhysical.DUL[3] = 0.28;
                soilPhysical.DUL[4] = 0.29;
                soilPhysical.DUL[5] = 0.34;
                soilPhysical.DUL[6] = 0.30;
                soilPhysical.SAT[0] = 0.34;
                soilPhysical.SAT[1] = 0.34;
                soilPhysical.SAT[2] = 0.34;
                soilPhysical.SAT[3] = 0.34;
                soilPhysical.SAT[4] = 0.34;
                soilPhysical.SAT[5] = 0.34;
                soilPhysical.SAT[6] = 0.34;
                waterBalance.Reset();
            }   
            if ((IrrFactor == true) && (NitFactor == 50))
            {
                if (soilPhysical.Thickness.Length != 7)
                {
                    throw new Exception("Soil layer exception");
                }
             
                soilPhysical.LL15[0] = 0.14;
                soilPhysical.LL15[1] = 0.21;
                soilPhysical.LL15[2] = 0.27;
                soilPhysical.LL15[3] = 0.27;
                soilPhysical.LL15[4] = 0.27;
                soilPhysical.LL15[5] = 0.32;
                soilPhysical.LL15[6] = 0.30;
                soilPhysical.DUL[0] = 0.31;
                soilPhysical.DUL[1] = 0.28;
                soilPhysical.DUL[2] = 0.30;
                soilPhysical.DUL[3] = 0.28;
                soilPhysical.DUL[4] = 0.29;
                soilPhysical.DUL[5] = 0.34;
                soilPhysical.DUL[6] = 0.30;
                soilPhysical.SAT[0] = 0.34;
                soilPhysical.SAT[1] = 0.34;
                soilPhysical.SAT[2] = 0.34;
                soilPhysical.SAT[3] = 0.34;
                soilPhysical.SAT[4] = 0.34;
                soilPhysical.SAT[5] = 0.34;
                soilPhysical.SAT[6] = 0.34;
                waterBalance.Reset();
            }
            if ((IrrFactor == true) && (NitFactor == 250))
            {
                if (soilPhysical.Thickness.Length != 7)
                {
                    throw new Exception("Soil layer exception");
                }
             
                soilPhysical.LL15[0] = 0.12;
                soilPhysical.LL15[1] = 0.18;
                soilPhysical.LL15[2] = 0.17;
                soilPhysical.LL15[3] = 0.20;
                soilPhysical.LL15[4] = 0.27;
                soilPhysical.LL15[5] = 0.27;
                soilPhysical.LL15[6] = 0.21;
                soilPhysical.DUL[0] = 0.31;
                soilPhysical.DUL[1] = 0.28;
                soilPhysical.DUL[2] = 0.30;
                soilPhysical.DUL[3] = 0.28;
                soilPhysical.DUL[4] = 0.29;
                soilPhysical.DUL[5] = 0.34;
                soilPhysical.DUL[6] = 0.30;
                soilPhysical.SAT[0] = 0.34;
                soilPhysical.SAT[1] = 0.34;
                soilPhysical.SAT[2] = 0.34;
                soilPhysical.SAT[3] = 0.34;
                soilPhysical.SAT[4] = 0.34;
                soilPhysical.SAT[5] = 0.34;
                soilPhysical.SAT[6] = 0.34;
                waterBalance.Reset();
            }
        }

        [EventSubscribe("StartOfSimulation")]
        private void OnSimulationCommencing(object sender, EventArgs e)
        {
            //    SetSoilLayers();
        }
        
        [EventSubscribe("DoManagement")]
        private void OnDoManagement(object sender, EventArgs e)
        {
            //Specific irrgations
            
            //Fodderbeet
            
            if ((IrrFactor == true) && (NitFactor == 300))
            {
                if ((DateUtilities.CompareDates("1-Feb", Clock.Today) == 0))
                    Irrigation.Apply(40);
                if ((DateUtilities.CompareDates("1-Mar", Clock.Today) == 0))
                    Irrigation.Apply(36);
            }
        
            //Oats
            if (Clock.Today.Year == 2017)
            if ((DateUtilities.CompareDates("5-Jul", Clock.Today) == 0))
            if (IrrFactor == true)
            {
                if (NitFactor == 0)
                    Fert.Apply(40, Models.Fertiliser.Types.NO3N, 10);
                if (NitFactor == 50)
                    Fert.Apply(85, Models.Fertiliser.Types.NO3N, 10);
                if (NitFactor == 300)
                    Fert.Apply(270, Models.Fertiliser.Types.NO3N, 10);
               
            }
             
            
            
        }
    }
        
        
}
```
                Manager SowDateCv
                  InitialRootDepth = 5
                  CropToSow = Rivage
                  SowingDate = 2016-10-18
```csharp
using Models.Soils;
using System;
using Models.Core;
using System.Collections.Generic;
using System.Text;
using Models.PMF;
using Models;
using System.Xml.Serialization;
using APSIM.Shared.Utilities;
using System.Data;
using Models.PMF.Interfaces;
using Models.Surface;

namespace Models
{
    [Serializable] 
    //[System.Xml.Serialization.XmlInclude(typeof(Model))]
    public class Script : Model
    {
        [Link] Plant FodderBeet;
        [Link] Clock Clock;
        [Link] Zone zone;
        [Link] Simulation Simulation;
        [Link] SurfaceOrganicMatter SurfOM;
        
                
        [Description("Initial Root Depth")]
        public double InitialRootDepth { get; set; }
        [Description("Sown Crop")]
        public string CropToSow { get; set; }
        [Description("Sowing Date")]
        public DateTime SowingDate { get; set; }
        //[Description("Sowing Date2")]
        //public DateTime SowingDate2 { get; set; }
        //[Description("Sowing Date3")]
        //public DateTime SowingDate3 { get; set; }
        //[Description("Sowing Date4")]
        //public DateTime SowingDate4 { get; set; }
        
        
        [EventSubscribe("DoManagement")]
        private void OnDoManagement(object sender, EventArgs e)
        {
            if (Clock.Today.Date == SowingDate)
            {
                FodderBeet.Sow(cultivar: CropToSow, population: 9, depth: InitialRootDepth, rowSpacing: 500);
                
            }
            //else if (Clock.Today.Date == SowingDate2)
            {
                //    FodderBeet.Sow(cultivar: CropToSow, population: 9, depth: InitialRootDepth, rowSpacing: 500);
            }
            //else if (Clock.Today.Date == SowingDate3)
            {
                //    FodderBeet.Sow(cultivar: CropToSow, population: 9, depth: InitialRootDepth, rowSpacing: 500);
            }
            //else if (Clock.Today.Date == SowingDate4)
            {
                //    FodderBeet.Sow(cultivar: CropToSow, population: 9, depth: InitialRootDepth, rowSpacing: 500);
        
            }
            
            
        }
    }
}
```
              MicroClimate: a_interception=0; b_interception=1; c_interception=0; d_interception=0; SoilHeatFluxFraction=0.4; MinimumHeightDiffForNewLayer=0; NightInterceptionFraction=0.5; ReferenceHeight=2
              Irrigation
              Fertiliser
              SurfaceOrganicMatter Surface Organic Matter: InitialResidueName=wheat_stubble; InitialResidueType=wheat; InitialResidueMass=1500; InitialStandingFraction=0; InitialCPR=0; InitialCNR=80
              Soil: SoilType=NZ_sedementary; Region=Plains; State=Canterbury; Country=New Zealnd; Latitude=0; Longitude=0
                Chemical: Thickness=[100, 200, 300, 300, 300, 300]; PH=[6.6, 6.2, 5.7, 5.5, 5.5, 5.5]; PHUnits=Water
                Physical
                  Thickness  BD     AirDry  LL15  DUL   SAT    KS
                  150        1      0.05    0.08  0.32  0.35   4832.039
                  150        1.32   0.05    0.08  0.32  0.35   389.229
                  300        1.35   0.05    0.08  0.32  0.342  16.362
                  300        1.3    0.05    0.08  0.28  0.322  97.995
                  300        1.3    0.05    0.08  0.28  0.348  97.995
                  300        1.3    0.05    0.08  0.28  0.342  97.995
                  300        1.3    0.05    0.08  0.28  0.307  97.995
                  200        1.601  0.06    0.08  0.22  0.309  97.995
                  SoilCrop OatsSoil: LL=[0.1, 0.1, 0.149, 0.129, 0.155, 0.149, 0.053, 0.061]; KL=[0.06, 0.06, 0.05, 0.08, 0.03, 0.01, 0, 0]; XF=[1, 1, 1, 1, 1, 1, 1, 1]
                  SoilCrop FodderBeetSoil: LL=[0.12, 0.12, 0.12, 0.12, 0.12, 0.12, 0.12, 0.12]; KL=[0.1, 0.06, 0.06, 0.06, 0.06, 0.06, 0.06, 0.06]; XF=[1, 1, 1, 1, 1, 1, 1, 1]
                WaterBalance SoilWater: SummerDate=1-Nov; SummerU=6; SummerCona=2; WinterDate=1-Apr; WinterU=9; WinterCona=4.4; DiffusConst=0; DiffusSlope=0; Salb=0.18; CN2Bare=68; CNRed=20; CNCov=0.8; DischargeWidth=0; CatchmentArea=0; PSIDul=-100
                  Thickness  SWCON  KLAT
                  200        0.7    0
                  200        0.7    0
                  200        0.95   0
                  200        0.95   0
                  200        0.95   0
                  200        0.95   0
                  200        0.95   0
                  200        0.95   0
                Nutrient
                Organic: FOMCNRatio=40; CarbonUnits=Total
                  Thickness  Carbon  SoilCNRatio  FBiom  FInert  FOM
                  180        3       11           0.06   0.437   427.528
                  150        1.247   11           0.04   0.657   316.72
                  400        0.316   11           0.012  0.85    142.312
                  270        0.208   11           0.01   0.945   82.9318
                  500        0.2     11           0.01   0.983   30.5089
                Water: Thickness=[200, 200, 200, 200, 200, 200, 200, 200]; InitialValues=[0.3, 0.28, 0.24, 0.24, 0.28, 0.28, 0.28, 0.22]; InitialPAWmm=296; RelativeTo=LL15; FilledFromTop=false
                CERESSoilTemperature Temperature
                Solute NO3: Thickness=[100, 200, 300, 300, 300, 300]; InitialValues=[8.33333, 4.72846, 1.6091, 0.769231, 0.769231, 1.15385]; InitialValuesUnits=ppm; WaterTableConcentration=0; D0=0; DepthConstant=0; MaxDepthSoluteAccessible=0; RunoffEffectivenessAtMovingSolute=0; MaxEffectiveRunoff=0
                Solute NH4: Thickness=[100, 200, 300, 300, 300, 300]; InitialValues=[14.8148, 10.5909, 3.60383, 1.92308, 1.92308, 1.92308]; InitialValuesUnits=ppm; WaterTableConcentration=0; D0=0; DepthConstant=0; MaxDepthSoluteAccessible=0; RunoffEffectivenessAtMovingSolute=0; MaxEffectiveRunoff=0
                Solute Urea: same as FodderBeetValidation.NewZealand.Lincoln.Lincoln2011.ABlockNit0.paddock.TempletonABlock.Urea
              Report EnviroReport: same as Replacements.EnviroReport
              Report: EventNames=[Clock].DoReport
                VariableNames:
                  [Clock].Today
                  [Weather].MeanT
                  [Soil].Water.Volumetric
                  [Soil].Water.MM
                  sum([Soil].Water.MM) as ProfileWater
                  [FodderBeet].AboveGround.N
                  [FodderBeet].AboveGround.Wt
                  [FodderBeet].AboveGroundLive.N
                  [FodderBeet].AboveGroundLive.Wt
                  [FodderBeet].AboveGroundDead.N
                  [FodderBeet].AboveGroundDead.Wt
                  [FodderBeet].Arbitrator.DMDemand
                  [FodderBeet].Arbitrator.DM.TotalFixationSupply
                  [FodderBeet].Leaf.AppearedCohortNo
                  [FodderBeet].Leaf.CoverDead
                  [FodderBeet].Leaf.CoverGreen
                  [FodderBeet].Leaf.CoverTotal
                  [FodderBeet].Leaf.Dead.N
                  [FodderBeet].Leaf.Dead.NConc
                  [FodderBeet].Leaf.Dead.Wt
                  [FodderBeet].Leaf.DeadCohortNo
                  [FodderBeet].Leaf.SenescingCohortNo
                  [FodderBeet].Leaf.ExpandedCohortNo
                  [FodderBeet].Leaf.Fn
                  [FodderBeet].Leaf.Fw
                  [FodderBeet].Leaf.Height
                  [FodderBeet].Leaf.InitialisedCohortNo
                  [FodderBeet].Leaf.LAI
                  [FodderBeet].Leaf.Live.N
                  [FodderBeet].Leaf.Live.NConc
                  [FodderBeet].Leaf.Live.Wt
                  [FodderBeet].Leaf.SpecificArea
                  [FodderBeet].Leaf.Transpiration
                  [FodderBeet].Phenology.CurrentPhase.Name
                  [FodderBeet].Phenology.CurrentStageName
                  [FodderBeet].Phenology.DailyVernalisation
                  [FodderBeet].Phenology.Photoperiod
                  [FodderBeet].Phenology.Stage
                  [FodderBeet].Phenology.ThermalTime
                  [FodderBeet].Phenology.ThermalTime
                  [FodderBeet].Phenology.Vrn1
                  [FodderBeet].Phenology.Vrn2
                  [FodderBeet].Phenology.Vrn4
                  [FodderBeet].Phenology.Zadok.Stage
                  [FodderBeet].Root.Depth
                  [FodderBeet].Root.N
                  [FodderBeet].Root.Wt
                  [FodderBeet].Root.Nconc
                  [FodderBeet].Root.WaterUptake
                  [FodderBeet].StorageRoot.N
                  [FodderBeet].StorageRoot.NConc
                  [FodderBeet].StorageRoot.Wt
                  [FodderBeet].StorageRoot.Live.StorageWt
                  [FodderBeet].Petiole.N
                  [FodderBeet].Petiole.NConc
                  [FodderBeet].Petiole.Wt
                  [FodderBeet].Petiole.PercentWSC
                  [FodderBeet].Petiole.Live.StorageWt
                  [FodderBeet].SowingData.Cultivar
                  [FodderBeet].Structure.Height
                  [FodderBeet].Structure.LeafTipsAppeared
                  [FodderBeet].Leaf.PlantAppearedGreenLeafNo
                  [FodderBeet].Structure.MainStemPopn
                  [FodderBeet].Structure.TotalStemPopn
                  [FodderBeet].Total.N
                  [FodderBeet].Total.Wt
                  [SurfaceOrganicMatter].Wt
                  sum([Soil].NO3.kgha) as TotalSoilNitrogen
                  [FodderBeet].Phenology.FlagLeafDAS
                  [FodderBeet].Phenology.FloweringDAS
                  [FodderBeet].Phenology.MaturityDAS
                  [FodderBeet].Phenology.PhotoPeriod
                  [FodderBeet].Phenology.PhotoPeriodDeltaFunction
                  [FodderBeet].Phenology.Stage
                  [FodderBeet].Phenology.SoilTemperatureFunction
      Folder AshleyDene
        Memo Trial details
          This is a nitrogen fertiliser by irrigation trial conducted at Ashley Dene in 2013 ([Chakwizira_etal_2016a]).
        Experiment Ashley2013
          Factors
            Permutation
              Factor Irr
                CompositeFactor Nil
                  Specifications:
                    [IrrigationEvents]
                    [TreatSpecIrrgation].Script.IrrFactor = false
                  Operations IrrigationEvents
                CompositeFactor Full
                  Specifications:
                    [IrrigationEvents]
                    [TreatSpecIrrgation].Script.IrrFactor = True
                  Operations IrrigationEvents
              Factor Nit
                CompositeFactor 0
                  Specifications:
                    [NFertEvents]
                    [TreatSpecIrrgation].Script.NitFactor = 0
                  Operations NFertEvents
                    2013-11-19  [Fertiliser].Apply(0, Fertiliser.Types.UreaN, 10);
                    2013-12-16  [Fertiliser].Apply(0, Fertiliser.Types.UreaN, 10);
                    2014-01-20  [Fertiliser].Apply(0, Fertiliser.Types.UreaN, 10);
                CompositeFactor 75
                  Specifications:
                    [NFertEvents]
                    [TreatSpecIrrgation].Script.NitFactor = 75
                  Operations NFertEvents
                    2013-11-19  [Fertiliser].Apply(25, Fertiliser.Types.UreaN, 10);
                    2013-12-16  [Fertiliser].Apply(25, Fertiliser.Types.UreaN, 10);
                    2014-01-20  [Fertiliser].Apply(25, Fertiliser.Types.UreaN, 10);
                CompositeFactor 150
                  Specifications:
                    [NFertEvents]
                    [TreatSpecIrrgation].Script.NitFactor = 150
                  Operations NFertEvents
                    2013-11-19  [Fertiliser].Apply(50, Fertiliser.Types.UreaN, 10);
                    2013-12-16  [Fertiliser].Apply(50, Fertiliser.Types.UreaN, 10);
                    2014-01-20  [Fertiliser].Apply(50, Fertiliser.Types.UreaN, 10);
                CompositeFactor 300
                  Specifications:
                    [NFertEvents]
                    [TreatSpecIrrgation].Script.NitFactor = 300
                  Operations NFertEvents
                    2013-11-19  [Fertiliser].Apply(100, Fertiliser.Types.UreaN, 10);
                    2013-12-16  [Fertiliser].Apply(100, Fertiliser.Types.UreaN, 10);
                    2014-01-20  [Fertiliser].Apply(100, Fertiliser.Types.UreaN, 10);
          Simulation AshleyFullOpt
            Clock: Start=2013-09-01; End=2014-06-30
            Summary summaryfile
            Weather: FileName=lincoln.met
            SoilArbitrator Soil Arbitrator
            Zone paddock: Area=1; Slope=0; AspectAngle=0; Altitude=50
              Soil Lismore: SoilType=NZ_sedementary; Region=Plains; State=Canterbury; Country=New Zealand; Latitude=0; Longitude=0
                DataSource=Generic profile descriptions provided by Trevor Webb and data for functional horizions based on SWAMP project results
                Comments=Bulk density values were measured on the fine earth fraction so values entered into apsim soil are adjusted down to account for stone content (assuming stones are inert from all soil process so their mass and volume is removed from model paramaters).  SAT, DUL, LL15 and Air dry have been adjusted down to account for stone content.  OC has not been adjusted so the model will get the correct carbon and N amounts using the adjusted BD.
                Chemical: Thickness=[200, 100, 300, 300, 300, 300]; PH=[6, 6, 6, 6, 6, 6]; PHUnits=Water
                Physical
                  Thickness  BD     AirDry  LL15  DUL   SAT
                  200        1.09   0.1     0.17  0.37  0.53
                  100        1.09   0.05    0.17  0.37  0.53
                  300        0.7    0.02    0.07  0.15  0.24
                  300        0.455  0.001   0.01  0.15  0.24
                  300        0.25   0.001   0.01  0.04  0.16
                  300        0.25   0.001   0.01  0.04  0.16
                  SoilCrop FodderBeetSoil
                    LL=[0.144, 0.136, 0.03, 0.014, 0.01, 0.01]
                    KL=[0.286157, 0.252188, 0.215147, 0.273159, 0.21174, 0.0303872]
                    XF=[1, 1, 1, 1, 1, 1]
                WaterBalance SoilWater: SummerDate=1-Oct; SummerU=9; SummerCona=4.4; WinterDate=1-Apr; WinterU=6; WinterCona=3; DiffusConst=88; DiffusSlope=35; Salb=0.13; CN2Bare=73; CNRed=20; CNCov=0.8; PSIDul=-100; Thickness=[200, 100, 300, 300, 300, 300]; SWCON=[0.457632, 0.520003, 0.650583, 0.650598, 0.6506, 0.6506]
                Nutrient
                Organic: FOMCNRatio=40; CarbonUnits=Total
                  Thickness  Carbon    SoilCNRatio  FBiom      FInert    FOM
                  200        2.88977   11           0.0333099  0.478186  367.071
                  100        1.05591   11           0.0186614  0.681918  300.533
                  300        0.807728  11           0.013031   0.811837  164.936
                  300        0.800052  11           0.0106763  0.911118  90.5187
                  300        0.8       11           0.0101651  0.956083  49.6777
                  300        0.8       11           0.0100221  0.983924  27.2637
                Water: Thickness=[200, 100, 300, 300, 300, 300]; InitialValues=[0.37, 0.37, 0.15, 0.15, 0.022, 0.01]; InitialPAWmm=129.6; RelativeTo=LL15; FilledFromTop=true
                CERESSoilTemperature Temperature
                Solute NO3: Thickness=[200, 100, 300, 300, 300, 300]; InitialValues=[12.5229, 20.9174, 0.571429, 6.73993, 12.2667, 1.33333]; InitialValuesUnits=ppm; WaterTableConcentration=0; D0=0; DepthConstant=0; MaxDepthSoluteAccessible=0; RunoffEffectivenessAtMovingSolute=0; MaxEffectiveRunoff=0
                Solute NH4: Thickness=[200, 100, 300, 300, 300, 300]; InitialValues=[1.97248, 6.97248, 1.95238, 1.97802, 3.2, 0.133333]; InitialValuesUnits=ppm; WaterTableConcentration=0; D0=0; DepthConstant=0; MaxDepthSoluteAccessible=0; RunoffEffectivenessAtMovingSolute=0; MaxEffectiveRunoff=0
                Solute Urea: Thickness=[200, 100, 300, 300, 300, 300]; InitialValues=[0, 0, 0, 0, 0, 0]; InitialValuesUnits=kg/ha; WaterTableConcentration=0; D0=0; DepthConstant=0; MaxDepthSoluteAccessible=0; RunoffEffectivenessAtMovingSolute=0; MaxEffectiveRunoff=0
              Plant FodderBeet
              MicroClimate: a_interception=0; b_interception=1; c_interception=0; d_interception=0; SoilHeatFluxFraction=0.4; MinimumHeightDiffForNewLayer=0; NightInterceptionFraction=0.5; ReferenceHeight=2
              Irrigation
              Fertiliser
              SurfaceOrganicMatter surface organic matter: InitialResidueName=wheat; InitialResidueType=wheat; InitialResidueMass=0; InitialStandingFraction=0; InitialCPR=0; InitialCNR=80
              Folder Management
                Manager ExtraVariables
                Manager SowDateCv
                  InitialRootDepth = 2
                  CropToSow = Rivage
                  SowingDate = 2013-11-03
                  script: same as in FodderBeetValidation.NewZealand.Lincoln.Lincoln2011.ABlockNit0.paddock.Management.SowDateCv
                Operations IrrigationEvents
                  2013-11-21  [Irrigation].Apply(15);
                  2013-11-25  [Irrigation].Apply(15);
                  2013-12-02  [Irrigation].Apply(15);
                  2013-12-05  [Irrigation].Apply(15.8);
                  2013-12-09  [Irrigation].Apply(10);
                  2013-12-12  [Irrigation].Apply(14);
                  2013-12-16  [Irrigation].Apply(20);
                  2013-12-23  [Irrigation].Apply(14.5);
                  2014-01-06  [Irrigation].Apply(29);
                  2014-01-09  [Irrigation].Apply(23);
                  2014-01-13  [Irrigation].Apply(21);
                  2014-01-16  [Irrigation].Apply(24);
                  2014-01-20  [Irrigation].Apply(28);
                  2014-01-23  [Irrigation].Apply(21);
                  2014-01-27  [Irrigation].Apply(10);
                  2014-01-30  [Irrigation].Apply(25);
                  2014-02-03  [Irrigation].Apply(19);
                  2014-02-06  [Irrigation].Apply(17);
                  2014-02-10  [Irrigation].Apply(21);
                  2014-02-13  [Irrigation].Apply(9);
                  2014-02-17  [Irrigation].Apply(19.5);
                  2014-02-20  [Irrigation].Apply(20);
                  2014-02-27  [Irrigation].Apply(20);
                Operations NFertEvents: same as FodderBeetValidation.NewZealand.AshleyDene.Ashley2013.Factors.Permutation.Nit.300.NFertEvents
                Manager TreatSpecIrrgation
                  IrrFactor = False
                  NitFactor = 0
```csharp
using APSIM.Shared.Utilities;
using System.Xml.Serialization;
using Models;
using Models.PMF;
using Models.Soils;
using System.Text;
using System.Collections.Generic;
using Models.Core;
using System;

// This script performs management actions that are not common to all treatments

namespace Models
{
    [Serializable] 
    public class Script : Model
    {
        [Link] Clock Clock;
        [Link] Irrigation Irrigation;
        [Link] Fertiliser Fert;
        [Link] Soil ThisSoil;

        [Description("Allow irrigation to be applied?")]
        public bool IrrFactor { get; set; }
        [Description("Amount of fertiliser to be applied (kg/ha)")]
        public double NitFactor { get; set; }

        [EventSubscribe("StartOfSimulation")]
        private void OnSimulationCommencing(object sender, EventArgs e)
        {
            //    SetSoilLayers();
        }
        
        [EventSubscribe("DoManagement")]
        private void OnDoManagement(object sender, EventArgs e)
        {
            // Fodderbeet - irrigation on high fert plots only


            if (IrrFactor == true) 
             {
              if(NitFactor == 300)
                {
                if (Clock.Today.Date == DateTime.Parse("21-Nov-2013"))
                    Irrigation.Apply(15);
                if (Clock.Today.Date == DateTime.Parse("25-Nov-2013"))
                    Irrigation.Apply(15);
                if (Clock.Today.Date == DateTime.Parse("02-Dec-2013"))
                    Irrigation.Apply(15);
                if (Clock.Today.Date == DateTime.Parse("05-Dec-2013"))
                    Irrigation.Apply(15.8);
                if (Clock.Today.Date == DateTime.Parse("09-Dec-2013"))
                    Irrigation.Apply(10);
                if (Clock.Today.Date == DateTime.Parse("12-Dec-2013"))
                    Irrigation.Apply(14);
                if (Clock.Today.Date == DateTime.Parse("16-Dec-2013"))
                    Irrigation.Apply(20);
                if (Clock.Today.Date == DateTime.Parse("23-Dec-2013"))
                    Irrigation.Apply(14.5);
                if (Clock.Today.Date == DateTime.Parse("06-Jan-2014"))
                    Irrigation.Apply(29);
                if (Clock.Today.Date == DateTime.Parse("09-Jan-2014"))
                    Irrigation.Apply(23);
                if (Clock.Today.Date == DateTime.Parse("13-Jan-2014"))
                    Irrigation.Apply(21);
                if (Clock.Today.Date == DateTime.Parse("16-Jan-2014"))
                    Irrigation.Apply(24);
                if (Clock.Today.Date == DateTime.Parse("20-Jan-2014"))
                    Irrigation.Apply(28);
                if (Clock.Today.Date == DateTime.Parse("23-Jan-2014"))
                    Irrigation.Apply(21);
                if (Clock.Today.Date == DateTime.Parse("27-Jan-2014"))
                    Irrigation.Apply(10);
                if (Clock.Today.Date == DateTime.Parse("30-Jan-2014"))
                    Irrigation.Apply(25);
                if (Clock.Today.Date == DateTime.Parse("03-Feb-2014"))
                    Irrigation.Apply(19);
                if (Clock.Today.Date == DateTime.Parse("06-Feb-2014"))
                    Irrigation.Apply(17);
                if (Clock.Today.Date == DateTime.Parse("10-Feb-2014"))
                    Irrigation.Apply(21);
                if (Clock.Today.Date == DateTime.Parse("13-Feb-2014"))
                    Irrigation.Apply(9);
                if (Clock.Today.Date == DateTime.Parse("17-Feb-2014"))
                    Irrigation.Apply(19.5);
                if (Clock.Today.Date == DateTime.Parse("20-Feb-2014"))
                    Irrigation.Apply(20);
                if (Clock.Today.Date == DateTime.Parse("27-Feb-2014"))
                    Irrigation.Apply(20);

                } //300
        
              if (NitFactor == 150)
              {
                if (Clock.Today.Date == DateTime.Parse("21-Nov-2013"))
                    Irrigation.Apply(15);
                if (Clock.Today.Date == DateTime.Parse("25-Nov-2013"))
                    Irrigation.Apply(15);
                if (Clock.Today.Date == DateTime.Parse("02-Dec-2013"))
                    Irrigation.Apply(15);
                if (Clock.Today.Date == DateTime.Parse("05-Dec-2013"))
                    Irrigation.Apply(15.8);
                if (Clock.Today.Date == DateTime.Parse("09-Dec-2013"))
                    Irrigation.Apply(10);
                if (Clock.Today.Date == DateTime.Parse("12-Dec-2013"))
                    Irrigation.Apply(14);
                if (Clock.Today.Date == DateTime.Parse("16-Dec-2013"))
                    Irrigation.Apply(20);
                if (Clock.Today.Date == DateTime.Parse("23-Dec-2013"))
                    Irrigation.Apply(14.5);
                if (Clock.Today.Date == DateTime.Parse("06-Jan-2014"))
                    Irrigation.Apply(29);
                if (Clock.Today.Date == DateTime.Parse("09-Jan-2014"))
                    Irrigation.Apply(23);
                if (Clock.Today.Date == DateTime.Parse("13-Jan-2014"))
                    Irrigation.Apply(21);
                if (Clock.Today.Date == DateTime.Parse("16-Jan-2014"))
                    Irrigation.Apply(24);
                if (Clock.Today.Date == DateTime.Parse("20-Jan-2014"))
                    Irrigation.Apply(28);
                if (Clock.Today.Date == DateTime.Parse("23-Jan-2014"))
                    Irrigation.Apply(16);
                if (Clock.Today.Date == DateTime.Parse("27-Jan-2014"))
                    Irrigation.Apply(19);
                if (Clock.Today.Date == DateTime.Parse("30-Jan-2014"))
                    Irrigation.Apply(20);
                if (Clock.Today.Date == DateTime.Parse("03-Feb-2014"))
                    Irrigation.Apply(15);
                if (Clock.Today.Date == DateTime.Parse("06-Feb-2014"))
                    Irrigation.Apply(23);
                if (Clock.Today.Date == DateTime.Parse("10-Feb-2014"))
                    Irrigation.Apply(21);
                if (Clock.Today.Date == DateTime.Parse("13-Feb-2014"))
                    Irrigation.Apply(11.5);
                if (Clock.Today.Date == DateTime.Parse("17-Feb-2014"))
                    Irrigation.Apply(19.5);
                if (Clock.Today.Date == DateTime.Parse("20-Feb-2014"))
                    Irrigation.Apply(20);
                if (Clock.Today.Date == DateTime.Parse("27-Feb-2014"))
                    Irrigation.Apply(17);
            }//150
            
            if (NitFactor == 75)
              {
                if (Clock.Today.Date == DateTime.Parse("21-Nov-2013"))
                    Irrigation.Apply(15);
                if (Clock.Today.Date == DateTime.Parse("25-Nov-2013"))
                    Irrigation.Apply(15);
                if (Clock.Today.Date == DateTime.Parse("02-Dec-2013"))
                    Irrigation.Apply(15);
                if (Clock.Today.Date == DateTime.Parse("05-Dec-2013"))
                    Irrigation.Apply(15.8);
                if (Clock.Today.Date == DateTime.Parse("09-Dec-2013"))
                    Irrigation.Apply(10);
                if (Clock.Today.Date == DateTime.Parse("12-Dec-2013"))
                    Irrigation.Apply(14);
                if (Clock.Today.Date == DateTime.Parse("16-Dec-2013"))
                    Irrigation.Apply(20);
                if (Clock.Today.Date == DateTime.Parse("23-Dec-2013"))
                    Irrigation.Apply(5.5);
                if (Clock.Today.Date == DateTime.Parse("06-Jan-2014"))
                    Irrigation.Apply(23);
                if (Clock.Today.Date == DateTime.Parse("09-Jan-2014"))
                    Irrigation.Apply(14);
                if (Clock.Today.Date == DateTime.Parse("13-Jan-2014"))
                    Irrigation.Apply(21);
                if (Clock.Today.Date == DateTime.Parse("16-Jan-2014"))
                    Irrigation.Apply(15);
                if (Clock.Today.Date == DateTime.Parse("20-Jan-2014"))
                    Irrigation.Apply(24);
                if (Clock.Today.Date == DateTime.Parse("23-Jan-2014"))
                    Irrigation.Apply(11);
                if (Clock.Today.Date == DateTime.Parse("27-Jan-2014"))
                    Irrigation.Apply(4);
                if (Clock.Today.Date == DateTime.Parse("30-Jan-2014"))
                    Irrigation.Apply(29.5);
                if (Clock.Today.Date == DateTime.Parse("03-Feb-2014"))
                    Irrigation.Apply(10);
                if (Clock.Today.Date == DateTime.Parse("06-Feb-2014"))
                    Irrigation.Apply(12);
                if (Clock.Today.Date == DateTime.Parse("10-Feb-2014"))
                    Irrigation.Apply(14);
                if (Clock.Today.Date == DateTime.Parse("13-Feb-2014"))
                    Irrigation.Apply(3);
                if (Clock.Today.Date == DateTime.Parse("17-Feb-2014"))
                    Irrigation.Apply(14);
                if (Clock.Today.Date == DateTime.Parse("20-Feb-2014"))
                    Irrigation.Apply(15);
                if (Clock.Today.Date == DateTime.Parse("27-Feb-2014"))
                    Irrigation.Apply(11);
            }

              if (NitFactor == 0)
              {
                if (Clock.Today.Date == DateTime.Parse("21-Nov-2013"))
                    Irrigation.Apply(15);
                if (Clock.Today.Date == DateTime.Parse("25-Nov-2013"))
                    Irrigation.Apply(15);
                if (Clock.Today.Date == DateTime.Parse("02-Dec-2013"))
                    Irrigation.Apply(15);
                if (Clock.Today.Date == DateTime.Parse("05-Dec-2013"))
                    Irrigation.Apply(15.8);
                if (Clock.Today.Date == DateTime.Parse("09-Dec-2013"))
                    Irrigation.Apply(10);
                if (Clock.Today.Date == DateTime.Parse("12-Dec-2013"))
                    Irrigation.Apply(6);
                if (Clock.Today.Date == DateTime.Parse("16-Dec-2013"))
                    Irrigation.Apply(20);
                if (Clock.Today.Date == DateTime.Parse("23-Dec-2013"))
                    Irrigation.Apply(14.5);
                if (Clock.Today.Date == DateTime.Parse("06-Jan-2014"))
                    Irrigation.Apply(17);
                if (Clock.Today.Date == DateTime.Parse("09-Jan-2014"))
                    Irrigation.Apply(14);
                if (Clock.Today.Date == DateTime.Parse("13-Jan-2014"))
                    Irrigation.Apply(21);
                if (Clock.Today.Date == DateTime.Parse("16-Jan-2014"))
                    Irrigation.Apply(15);
                if (Clock.Today.Date == DateTime.Parse("20-Jan-2014"))
                    Irrigation.Apply(20);
                if (Clock.Today.Date == DateTime.Parse("23-Jan-2014"))
                    Irrigation.Apply(11);
                if (Clock.Today.Date == DateTime.Parse("27-Jan-2014"))
                    Irrigation.Apply(7);
                if (Clock.Today.Date == DateTime.Parse("30-Jan-2014"))
                    Irrigation.Apply(12);
                if (Clock.Today.Date == DateTime.Parse("03-Feb-2014"))
                    Irrigation.Apply(10);
                if (Clock.Today.Date == DateTime.Parse("06-Feb-2014"))
                    Irrigation.Apply(12);
                if (Clock.Today.Date == DateTime.Parse("10-Feb-2014"))
                    Irrigation.Apply(14);
                if (Clock.Today.Date == DateTime.Parse("13-Feb-2014"))
                    Irrigation.Apply(3);
                if (Clock.Today.Date == DateTime.Parse("17-Feb-2014"))
                    Irrigation.Apply(11);
                if (Clock.Today.Date == DateTime.Parse("20-Feb-2014"))
                    Irrigation.Apply(15);
                if (Clock.Today.Date == DateTime.Parse("27-Feb-2014"))
                    Irrigation.Apply(5);
            }
        }//On Do Management
    }
}
}
```
                Manager FungalInfection
                  InfectionDate = 2015-01-03
                  IsInfected = True
                  script: same as in FodderBeetValidation.NewZealand.Lincoln.Lincoln2011.ABlockNit0.paddock.Management.FungalInfection
              Report: EventNames=[Clock].DoReport
                VariableNames:
                  [Clock].Today
                  [FodderBeet].Leaf.Fw
                  [FodderBeet].Leaf.Fn
                  [FodderBeet].Phenology.CurrentPhase.Name
                  [FodderBeet].Phenology.Stage
                  [FodderBeet].Phenology.ThermalTime
                  [FodderBeet].Phenology.AccumulatedThermalTime
                  [FodderBeet].Leaf.Live.Wt
                  [FodderBeet].Petiole.Live.Wt
                  [FodderBeet].StorageRoot.Live.Wt
                  [FodderBeet].Leaf.LAI
                  [FodderBeet].Structure.LeafTipsAppeared
                  [FodderBeet].Leaf.PlantAppearedLeafNo
                  [FodderBeet].Leaf.PlantAppearedGreenLeafNo
                  [FodderBeet].Leaf.PlantsenescedLeafNo
                  [FodderBeet].Leaf.CoverGreen
                  [FodderBeet].Leaf.CohortParameters.MaxArea
                  [FodderBeet].AboveGround.Wt
                  [FodderBeet].Leaf.Photosynthesis.RadnInt
                  [FodderBeet].Leaf.Photosynthesis.RUEact
                  [ExtraVariables].Script.AccumPlantN
                  [FodderBeet].Leaf.Live.N
                  [FodderBeet].Root.Live.N
                  [FodderBeet].StorageRoot.Live.N
                  [FodderBeet].Petiole.Live.N
                  [FodderBeet].Leaf.Live.NConc
                  [FodderBeet].Root.Live.NConc
                  [ExtraVariables].Script.AccumFert
                  [ExtraVariables].Script.AccumIrrigation as irrigation
                  [ExtraVariables].Script.SoilNitrogenContent
      Folder SFF
        Memo Trial details
          The data (unpublished)used here is from a SFF experiment managed by de Ruiter et al.
        Folder Canterbury
          Experiment Orari
            Memo Data information
              The data used here is from a SFF experiment (Batty; Winchester)managed by de Ruiter et al.
            Factors
              Permutation
                Factor Nit
                  CompositeFactor 0: Specifications=[NitTreatments].Script.NitAmount = 0
                  CompositeFactor 100: Specifications=[NitTreatments].Script.NitAmount = 100
                  CompositeFactor 200: Specifications=[NitTreatments].Script.NitAmount = 200
                  CompositeFactor 300: Specifications=[NitTreatments].Script.NitAmount = 300
                Factor Splits
                  CompositeFactor 2: Specifications=[NitTreatments].Script.SplitFactor = 2
                  CompositeFactor 3: Specifications=[NitTreatments].Script.SplitFactor = 3
            Simulation Orari
              Clock: Start=2016-10-10; End=2017-05-30
              Summary summaryfile
              Weather: FileName=Temuka.met
              SoilArbitrator Soil Arbitrator
              Zone paddock: Area=1; Slope=0; AspectAngle=0; Altitude=50
                Plant FodderBeet
                Soil: SoilType=NZ_sedementary; Region=Plains; State=Canterbury; Country=New Zealnd; Latitude=0; Longitude=0
                  Chemical: Thickness=[100, 200, 300, 300, 300, 300]; PH=[6.6, 6.2, 5.7, 5.5, 5.5, 5.5]; PHUnits=Water
                  Physical
                    Thickness  BD     AirDry  LL15  DUL   SAT    KS
                    150        1      0.05    0.08  0.32  0.35   4832.039
                    150        1.32   0.05    0.08  0.32  0.35   389.229
                    300        1.35   0.05    0.08  0.32  0.342  16.362
                    300        1.3    0.05    0.08  0.28  0.322  97.995
                    300        1.3    0.05    0.08  0.28  0.348  97.995
                    300        1.3    0.05    0.08  0.28  0.342  97.995
                    300        1.3    0.05    0.08  0.28  0.307  97.995
                    200        1.601  0.05    0.08  0.22  0.309  97.995
                    SoilCrop OatsSoil: LL=[0.1, 0.1, 0.149, 0.129, 0.155, 0.149, 0.053, 0.061]; KL=[0.06, 0.06, 0.05, 0.08, 0.03, 0.01, 0, 0]; XF=[1, 1, 1, 1, 1, 1, 1, 1]
                    SoilCrop FodderBeetSoil: LL=[0.12, 0.12, 0.12, 0.12, 0.12, 0.12, 0.12, 0.12]; KL=[0.1, 0.06, 0.06, 0.06, 0.06, 0.06, 0.06, 0.06]; XF=[1, 1, 1, 1, 1, 1, 1, 1]
                  WaterBalance SoilWater: same as FodderBeetValidation.NewZealand.Lincoln.LincolnRS2016.Rainshelter.paddock.Soil.SoilWater
                  Nutrient
                  Organic: same as FodderBeetValidation.NewZealand.Lincoln.LincolnRS2016.Rainshelter.paddock.Soil.Organic
                  Water: Thickness=[200, 200, 200, 200, 200, 200, 200, 200]; InitialValues=[0.3, 0.28, 0.24, 0.24, 0.28, 0.28, 0.28, 0.22]; InitialPAWmm=296; RelativeTo=LL15; FilledFromTop=false
                  CERESSoilTemperature Temperature
                  Solute NO3: same as FodderBeetValidation.NewZealand.Lincoln.LincolnRS2016.Rainshelter.paddock.Soil.NO3
                  Solute NH4: same as FodderBeetValidation.NewZealand.Lincoln.LincolnRS2016.Rainshelter.paddock.Soil.NH4
                  Solute Urea: same as FodderBeetValidation.NewZealand.Lincoln.Lincoln2011.ABlockNit0.paddock.TempletonABlock.Urea
                MicroClimate: a_interception=0; b_interception=1; c_interception=0; d_interception=0; SoilHeatFluxFraction=0.4; MinimumHeightDiffForNewLayer=0; NightInterceptionFraction=0.5; ReferenceHeight=2
                Irrigation
                Fertiliser
                SurfaceOrganicMatter surface organic matter: InitialResidueName=wheat; InitialResidueType=wheat; InitialResidueMass=0; InitialStandingFraction=0; InitialCPR=0; InitialCNR=80
                Folder Management
                  Manager ExtraVariables
                  Manager SowDateCv
                    InitialRootDepth = 2
                    CropToSow = Rivage
                    SowingDate = 2016-10-17
                    script: same as in FodderBeetValidation.NewZealand.Lincoln.Lincoln2011.ABlockNit0.paddock.Management.SowDateCv
                  Operations IrrigationEvents
                    2016-11-01  [Irrigation].Apply(12);
                    2016-11-14  [Irrigation].Apply(12);
                    2016-11-21  [Irrigation].Apply(12);
                    2016-12-07  [Irrigation].Apply(12);
                    2016-12-21  [Irrigation].Apply(12);
                    2016-12-28  [Irrigation].Apply(12);
                    2017-01-05  [Irrigation].Apply(12);
                    2017-01-19  [Irrigation].Apply(12);
                    2017-01-31  [Irrigation].Apply(12);
                    2017-02-12  [Irrigation].Apply(12);
                    2017-02-24  [Irrigation].Apply(12);
                    2017-03-01  [Irrigation].Apply(12);
                    Memo
                      MOnthly rain guage tip outs so irrigation need to be estimated minus rain fall
                  Manager NitTreatments
                    NitAmount = 0
                    SplitFactor = 0
```csharp
using APSIM.Shared.Utilities;
using System.Xml.Serialization;
using Models;
using Models.PMF;
using Models.Soils;
using System.Text;
using System.Collections.Generic;
using Models.Core;
using System;

// This script performs management actions that are not common to all treatments

namespace Models
{
    [Serializable] 
    public class Script : Model
    {
        [Link] Clock Clock;
        [Link] Irrigation Irrigation;
        [Link] Fertiliser Fert;
        [Link] Soil ThisSoil;

        [Description("Number of splits")]
        public int SplitFactor  { get; set; }
        [Description("Amount of fertiliser to be applied (kg/ha)")]
        public int NitAmount { get; set; }

        [EventSubscribe("StartOfSimulation")]
        private void OnSimulationCommencing(object sender, EventArgs e)
        {
            //    SetSoilLayers();
        }
        
        [EventSubscribe("DoManagement")]
        private void OnDoManagement(object sender, EventArgs e)
        {
            // Fodderbeet - irrigation on high fert plots only
            switch (NitAmount)
             {
              case  0 : break;

              case   100 :  if (SplitFactor == 2)
                             {
                              if ((DateUtilities.CompareDates("14-Nov", Clock.Today) == 0))
                                       Fert.Apply(50, Models.Fertiliser.Types.UreaN, 10);
                              if ((DateUtilities.CompareDates("19-Jan", Clock.Today) == 0))
                                       Fert.Apply(50, Models.Fertiliser.Types.UreaN, 10);
                              if ((DateUtilities.CompareDates("27-Feb", Clock.Today) == 0))
                                       Fert.Apply(0, Models.Fertiliser.Types.UreaN, 10);

                            }  
                            else
                            {
                              if ((DateUtilities.CompareDates("14-Nov", Clock.Today) == 0))
                                       Fert.Apply(20, Models.Fertiliser.Types.UreaN, 10);
                              if ((DateUtilities.CompareDates("19-Jan", Clock.Today) == 0))
                                       Fert.Apply(40, Models.Fertiliser.Types.UreaN, 10);
                              if ((DateUtilities.CompareDates("27-Feb", Clock.Today) == 0))
                                       Fert.Apply(40, Models.Fertiliser.Types.UreaN, 10);

                            }  break;

              case   200 :  if (SplitFactor == 2)
                             {
                              if ((DateUtilities.CompareDates("14-Nov", Clock.Today) == 0))
                                       Fert.Apply(100, Models.Fertiliser.Types.UreaN, 10);
                              if ((DateUtilities.CompareDates("19-Jan", Clock.Today) == 0))
                                       Fert.Apply(100, Models.Fertiliser.Types.UreaN, 10);
                              if ((DateUtilities.CompareDates("27-Feb", Clock.Today) == 0))
                                       Fert.Apply(0, Models.Fertiliser.Types.UreaN, 10);

                            }  
                            else
                            {
                              if ((DateUtilities.CompareDates("14-Nov", Clock.Today) == 0))
                                       Fert.Apply(40, Models.Fertiliser.Types.UreaN, 10);
                              if ((DateUtilities.CompareDates("19-Jan", Clock.Today) == 0))
                                       Fert.Apply(80, Models.Fertiliser.Types.UreaN, 10);
                              if ((DateUtilities.CompareDates("27-Feb", Clock.Today) == 0))
                                       Fert.Apply(80, Models.Fertiliser.Types.UreaN, 10);

                            }  break;
             case   300 :  if (SplitFactor == 2)
                             {
                              if ((DateUtilities.CompareDates("14-Nov", Clock.Today) == 0))
                                       Fert.Apply(150, Models.Fertiliser.Types.UreaN, 10);
                              if ((DateUtilities.CompareDates("19-Jan", Clock.Today) == 0))
                                       Fert.Apply(150, Models.Fertiliser.Types.UreaN, 10);
                              if ((DateUtilities.CompareDates("27-Feb", Clock.Today) == 0))
                                       Fert.Apply(0, Models.Fertiliser.Types.UreaN, 10);

                            }  
                            else
                            {
                              if ((DateUtilities.CompareDates("14-Nov", Clock.Today) == 0))
                                       Fert.Apply(60, Models.Fertiliser.Types.UreaN, 10);
                              if ((DateUtilities.CompareDates("19-Jan", Clock.Today) == 0))
                                       Fert.Apply(120, Models.Fertiliser.Types.UreaN, 10);
                              if ((DateUtilities.CompareDates("27-Feb", Clock.Today) == 0))
                                       Fert.Apply(120, Models.Fertiliser.Types.UreaN, 10);

                            }  break;

              }
        }//On Do Management
    }
}
```
                  Manager FungalInfection
                    InfectionDate = 2012-12-15
                    IsInfected = False
                    script: same as in FodderBeetValidation.NewZealand.Lincoln.Lincoln2011.ABlockNit0.paddock.Management.FungalInfection
                Report: same as FodderBeetValidation.NewZealand.AshleyDene.Ashley2013.AshleyFullOpt.paddock.Report
          Experiment Rakaia
            Factors: same as FodderBeetValidation.NewZealand.SFF.Canterbury.Orari.Factors
            Simulation Rak
              Clock: Start=2016-10-10; End=2017-05-30
              Summary summaryfile
              Weather: FileName=lincoln.met
              SoilArbitrator Soil Arbitrator
              Zone paddock: Area=1; Slope=0; AspectAngle=0; Altitude=50
                Soil TempletonABlock: Latitude=0; Longitude=0
                  Chemical: Thickness=[100, 200, 300, 300, 300, 300]; PH=[6.6, 6.2, 5.7, 5.5, 5.5, 5.5]; PHUnits=Water
                  Water: Thickness=[100, 200, 300, 300, 300, 300]; InitialValues=[0.27, 0.27, 0.29, 0.3, 0.3, 0.3]; InitialPAWmm=222; RelativeTo=LL15; FilledFromTop=false
                  Physical
                    Thickness  BD    AirDry  LL15  DUL   SAT   KS
                    100        1     0.05    0.1   0.27  0.42  4832
                    200        1     0.05    0.1   0.27  0.4   389
                    300        1.59  0.05    0.16  0.29  0.36  16
                    300        1.57  0.05    0.17  0.3   0.37  16
                    300        1.6   0.05    0.17  0.3   0.37  98
                    300        1.6   0.05    0.12  0.3   0.32  98
                    SoilCrop FodderBeetSoil: LL=[0.13, 0.13, 0.1, 0.08, 0.11, 0.11]; KL=[0.06, 0.06, 0.06, 0.06, 0.06, 0.06]; XF=[1, 1, 1, 1, 1, 1]
                  WaterBalance SoilWater: same as FodderBeetValidation.NewZealand.Lincoln.Lincoln2011.ABlockNit0.paddock.TempletonABlock.SoilWater
                  Nutrient
                  Organic: same as FodderBeetValidation.NewZealand.Lincoln.Lincoln2011.ABlockNit0.paddock.TempletonABlock.Organic
                  CERESSoilTemperature Temperature
                  Solute NO3: same as FodderBeetValidation.NewZealand.Lincoln.Lincoln2011.ABlockNit0.paddock.TempletonABlock.NO3
                  Solute NH4: same as FodderBeetValidation.NewZealand.Lincoln.Lincoln2011.ABlockNit0.paddock.TempletonABlock.NH4
                  Solute Urea: same as FodderBeetValidation.NewZealand.Lincoln.Lincoln2011.ABlockNit0.paddock.TempletonABlock.Urea
                Plant FodderBeet
                MicroClimate: a_interception=0; b_interception=1; c_interception=0; d_interception=0; SoilHeatFluxFraction=0.4; MinimumHeightDiffForNewLayer=0; NightInterceptionFraction=0.5; ReferenceHeight=2
                Irrigation
                Fertiliser
                SurfaceOrganicMatter surface organic matter: InitialResidueName=wheat; InitialResidueType=wheat; InitialResidueMass=0; InitialStandingFraction=0; InitialCPR=0; InitialCNR=80
                Folder Management
                  Manager ExtraVariables
                  Manager SowDateCv
                    InitialRootDepth = 2
                    CropToSow = Rivage
                    SowingDate = 2016-10-19
                    script: same as in FodderBeetValidation.NewZealand.Lincoln.Lincoln2011.ABlockNit0.paddock.Management.SowDateCv
                  Operations IrrigationEvents: same as FodderBeetValidation.NewZealand.SFF.Canterbury.Orari.Orari.paddock.Management.IrrigationEvents
                  Manager NitTreatments
                    NitAmount = 0
                    SplitFactor = 0
```csharp
using APSIM.Shared.Utilities;
using System.Xml.Serialization;
using Models;
using Models.PMF;
using Models.Soils;
using System.Text;
using System.Collections.Generic;
using Models.Core;
using System;

// This script performs management actions that are not common to all treatments

namespace Models
{
    [Serializable] 
    public class Script : Model
    {
        [Link] Clock Clock;
        [Link] Irrigation Irrigation;
        [Link] Fertiliser Fert;
        [Link] Soil ThisSoil;

        [Description("Number of splits")]
        public int SplitFactor  { get; set; }
        [Description("Amount of fertiliser to be applied (kg/ha)")]
        public int NitAmount { get; set; }

        [EventSubscribe("StartOfSimulation")]
        private void OnSimulationCommencing(object sender, EventArgs e)
        {
            //    SetSoilLayers();
        }
        
        [EventSubscribe("DoManagement")]
        private void OnDoManagement(object sender, EventArgs e)
        {
            // Fodderbeet - irrigation on high fert plots only
            switch (NitAmount)
             {
              case  0 : break;

              case   100 :  if (SplitFactor == 2)
                             {
                              if ((DateUtilities.CompareDates("09-Nov", Clock.Today) == 0))
                                       Fert.Apply(50, Models.Fertiliser.Types.UreaN, 10);
                              if ((DateUtilities.CompareDates("16-Jan", Clock.Today) == 0))
                                       Fert.Apply(50, Models.Fertiliser.Types.UreaN, 10);
                              if ((DateUtilities.CompareDates("20-Feb", Clock.Today) == 0))
                                       Fert.Apply(0, Models.Fertiliser.Types.UreaN, 10);

                            }  
                            else
                            {
                              if ((DateUtilities.CompareDates("09-Nov", Clock.Today) == 0))
                                       Fert.Apply(20, Models.Fertiliser.Types.UreaN, 10);
                              if ((DateUtilities.CompareDates("16-Jan", Clock.Today) == 0))
                                       Fert.Apply(40, Models.Fertiliser.Types.UreaN, 10);
                              if ((DateUtilities.CompareDates("20-Feb", Clock.Today) == 0))
                                       Fert.Apply(40, Models.Fertiliser.Types.UreaN, 10);

                            }  break;

              case   200 :  if (SplitFactor == 2)
                             {
                              if ((DateUtilities.CompareDates("09-Nov", Clock.Today) == 0))
                                       Fert.Apply(100, Models.Fertiliser.Types.UreaN, 10);
                              if ((DateUtilities.CompareDates("16-Jan", Clock.Today) == 0))
                                       Fert.Apply(100, Models.Fertiliser.Types.UreaN, 10);
                              if ((DateUtilities.CompareDates("20-Feb", Clock.Today) == 0))
                                       Fert.Apply(0, Models.Fertiliser.Types.UreaN, 10);

                            }  
                            else
                            {
                              if ((DateUtilities.CompareDates("09-Nov", Clock.Today) == 0))
                                       Fert.Apply(40, Models.Fertiliser.Types.UreaN, 10);
                              if ((DateUtilities.CompareDates("16-Jan", Clock.Today) == 0))
                                       Fert.Apply(80, Models.Fertiliser.Types.UreaN, 10);
                              if ((DateUtilities.CompareDates("20-Feb", Clock.Today) == 0))
                                       Fert.Apply(80, Models.Fertiliser.Types.UreaN, 10);

                            }  break;
             case   300 :  if (SplitFactor == 2)
                             {
                              if ((DateUtilities.CompareDates("09-Nov", Clock.Today) == 0))
                                       Fert.Apply(150, Models.Fertiliser.Types.UreaN, 10);
                              if ((DateUtilities.CompareDates("16-Jan", Clock.Today) == 0))
                                       Fert.Apply(150, Models.Fertiliser.Types.UreaN, 10);
                              if ((DateUtilities.CompareDates("20-Feb", Clock.Today) == 0))
                                       Fert.Apply(0, Models.Fertiliser.Types.UreaN, 10);

                            }  
                            else
                            {
                              if ((DateUtilities.CompareDates("09-Nov", Clock.Today) == 0))
                                       Fert.Apply(60, Models.Fertiliser.Types.UreaN, 10);
                              if ((DateUtilities.CompareDates("16-Jan", Clock.Today) == 0))
                                       Fert.Apply(120, Models.Fertiliser.Types.UreaN, 10);
                              if ((DateUtilities.CompareDates("20-Feb", Clock.Today) == 0))
                                       Fert.Apply(120, Models.Fertiliser.Types.UreaN, 10);

                            }  break;

              }
        }//On Do Management
    }
}
```
                  Manager FungalInfection
                    InfectionDate = 2016-12-15
                    IsInfected = True
                    script: same as in FodderBeetValidation.NewZealand.Lincoln.Lincoln2011.ABlockNit0.paddock.Management.FungalInfection
                Report: same as FodderBeetValidation.NewZealand.AshleyDene.Ashley2013.AshleyFullOpt.paddock.Report
        Folder Southland
          Experiment Gore
            Factors: same as FodderBeetValidation.NewZealand.SFF.Canterbury.Orari.Factors
            Simulation Gore
              Clock: Start=2016-10-10; End=2017-05-30
              Summary summaryfile
              Weather: FileName=Gore.met
              SoilArbitrator Soil Arbitrator
              Zone paddock: Area=1; Slope=0; AspectAngle=0; Altitude=50
                Plant FodderBeet
                Soil: same as FodderBeetValidation.NewZealand.SFF.Canterbury.Orari.Orari.paddock.Soil
                MicroClimate: a_interception=0; b_interception=1; c_interception=0; d_interception=0; SoilHeatFluxFraction=0.4; MinimumHeightDiffForNewLayer=0; NightInterceptionFraction=0.5; ReferenceHeight=2
                Irrigation
                Fertiliser
                SurfaceOrganicMatter surface organic matter: InitialResidueName=wheat; InitialResidueType=wheat; InitialResidueMass=0; InitialStandingFraction=0; InitialCPR=0; InitialCNR=80
                Folder Management
                  Manager ExtraVariables
                  Manager SowDateCv: same as FodderBeetValidation.NewZealand.SFF.Canterbury.Orari.Orari.paddock.Management.SowDateCv
                  Operations IrrigationEvents
                    Memo
                      MOnthly rain guage tip outs so irrigation need to be estimated minus rain fall
                  Manager NitTreatments
                    NitAmount = 0
                    SplitFactor = 0
```csharp
using APSIM.Shared.Utilities;
using System.Xml.Serialization;
using Models;
using Models.PMF;
using Models.Soils;
using System.Text;
using System.Collections.Generic;
using Models.Core;
using System;

// This script performs management actions that are not common to all treatments

namespace Models
{
    [Serializable] 
    public class Script : Model
    {
        [Link] Clock Clock;
        [Link] Irrigation Irrigation;
        [Link] Fertiliser Fert;
        [Link] Soil ThisSoil;

        [Description("Number of splits")]
        public int SplitFactor  { get; set; }
        [Description("Amount of fertiliser to be applied (kg/ha)")]
        public int NitAmount { get; set; }

        [EventSubscribe("StartOfSimulation")]
        private void OnSimulationCommencing(object sender, EventArgs e)
        {
            //    SetSoilLayers();
        }
        
        [EventSubscribe("DoManagement")]
        private void OnDoManagement(object sender, EventArgs e)
        {
            // Fodderbeet - irrigation on high fert plots only
            switch (NitAmount)
             {
              case  0 : break;

              case   100 :  if (SplitFactor == 2)
                             {
                              if ((DateUtilities.CompareDates("22-Nov", Clock.Today) == 0))
                                       Fert.Apply(50, Models.Fertiliser.Types.UreaN, 10);
                              if ((DateUtilities.CompareDates("23-Jan", Clock.Today) == 0))
                                       Fert.Apply(50, Models.Fertiliser.Types.UreaN, 10);
                              if ((DateUtilities.CompareDates("01-Mar", Clock.Today) == 0))
                                       Fert.Apply(0, Models.Fertiliser.Types.UreaN, 10);

                            }  
                            else
                            {
                              if ((DateUtilities.CompareDates("22-Nov", Clock.Today) == 0))
                                       Fert.Apply(20, Models.Fertiliser.Types.UreaN, 10);
                              if ((DateUtilities.CompareDates("23-Jan", Clock.Today) == 0))
                                       Fert.Apply(40, Models.Fertiliser.Types.UreaN, 10);
                              if ((DateUtilities.CompareDates("01-Mar", Clock.Today) == 0))
                                       Fert.Apply(40, Models.Fertiliser.Types.UreaN, 10);

                            }  break;

              case   200 :  if (SplitFactor == 2)
                             {
                              if ((DateUtilities.CompareDates("22-Nov", Clock.Today) == 0))
                                       Fert.Apply(100, Models.Fertiliser.Types.UreaN, 10);
                              if ((DateUtilities.CompareDates("23-Jan", Clock.Today) == 0))
                                       Fert.Apply(100, Models.Fertiliser.Types.UreaN, 10);
                              if ((DateUtilities.CompareDates("01-Mar", Clock.Today) == 0))
                                       Fert.Apply(0, Models.Fertiliser.Types.UreaN, 10);

                            }  
                            else
                            {
                              if ((DateUtilities.CompareDates("22-Nov", Clock.Today) == 0))
                                       Fert.Apply(40, Models.Fertiliser.Types.UreaN, 10);
                              if ((DateUtilities.CompareDates("23-Jan", Clock.Today) == 0))
                                       Fert.Apply(80, Models.Fertiliser.Types.UreaN, 10);
                              if ((DateUtilities.CompareDates("01-Mar", Clock.Today) == 0))
                                       Fert.Apply(80, Models.Fertiliser.Types.UreaN, 10);

                            }  break;
             case   300 :  if (SplitFactor == 2)
                             {
                              if ((DateUtilities.CompareDates("22-Nov", Clock.Today) == 0))
                                       Fert.Apply(150, Models.Fertiliser.Types.UreaN, 10);
                              if ((DateUtilities.CompareDates("23-Jan", Clock.Today) == 0))
                                       Fert.Apply(150, Models.Fertiliser.Types.UreaN, 10);
                              if ((DateUtilities.CompareDates("01-Mar", Clock.Today) == 0))
                                       Fert.Apply(0, Models.Fertiliser.Types.UreaN, 10);

                            }  
                            else
                            {
                              if ((DateUtilities.CompareDates("22-Nov", Clock.Today) == 0))
                                       Fert.Apply(60, Models.Fertiliser.Types.UreaN, 10);
                              if ((DateUtilities.CompareDates("23-Jan", Clock.Today) == 0))
                                       Fert.Apply(120, Models.Fertiliser.Types.UreaN, 10);
                              if ((DateUtilities.CompareDates("01-Mar", Clock.Today) == 0))
                                       Fert.Apply(120, Models.Fertiliser.Types.UreaN, 10);

                            }  break;

              }
        }//On Do Management
    }
}
```
                  Manager FungalInfection: same as FodderBeetValidation.NewZealand.SFF.Canterbury.Rakaia.Rak.paddock.Management.FungalInfection
                Report: same as FodderBeetValidation.NewZealand.AshleyDene.Ashley2013.AshleyFullOpt.paddock.Report
          Experiment Riverton
            Factors: same as FodderBeetValidation.NewZealand.SFF.Canterbury.Orari.Factors
            Simulation Riverton
              Clock: Start=2016-10-10; End=2017-05-30
              Summary summaryfile
              Weather: FileName=Gore.met
              SoilArbitrator Soil Arbitrator
              Zone paddock: Area=1; Slope=0; AspectAngle=0; Altitude=50
                Plant FodderBeet
                Soil: same as FodderBeetValidation.NewZealand.SFF.Canterbury.Orari.Orari.paddock.Soil
                MicroClimate: a_interception=0; b_interception=1; c_interception=0; d_interception=0; SoilHeatFluxFraction=0.4; MinimumHeightDiffForNewLayer=0; NightInterceptionFraction=0.5; ReferenceHeight=2
                Irrigation
                Fertiliser
                SurfaceOrganicMatter surface organic matter: InitialResidueName=wheat; InitialResidueType=wheat; InitialResidueMass=0; InitialStandingFraction=0; InitialCPR=0; InitialCNR=80
                Folder Management
                  Manager ExtraVariables
                  Manager SowDateCv
                    InitialRootDepth = 2
                    CropToSow = Rivage
                    SowingDate = 2016-12-03
                    script: same as in FodderBeetValidation.NewZealand.Lincoln.Lincoln2011.ABlockNit0.paddock.Management.SowDateCv
                  Operations IrrigationEvents: same as FodderBeetValidation.NewZealand.SFF.Canterbury.Orari.Orari.paddock.Management.IrrigationEvents
                  Manager NitTreatments
                    NitAmount = 0
                    SplitFactor = 0
```csharp
using APSIM.Shared.Utilities;
using System.Xml.Serialization;
using Models;
using Models.PMF;
using Models.Soils;
using System.Text;
using System.Collections.Generic;
using Models.Core;
using System;

// This script performs management actions that are not common to all treatments

namespace Models
{
    [Serializable] 
    public class Script : Model
    {
        [Link] Clock Clock;
        [Link] Irrigation Irrigation;
        [Link] Fertiliser Fert;
        [Link] Soil ThisSoil;

        [Description("Number of splits")]
        public int SplitFactor  { get; set; }
        [Description("Amount of fertiliser to be applied (kg/ha)")]
        public int NitAmount { get; set; }

        [EventSubscribe("StartOfSimulation")]
        private void OnSimulationCommencing(object sender, EventArgs e)
        {
            //    SetSoilLayers();
        }
        
        [EventSubscribe("DoManagement")]
        private void OnDoManagement(object sender, EventArgs e)
        {
            // Fodderbeet - irrigation on high fert plots only
            switch (NitAmount)
             {
              case  0 : break;

              case   100 :  if (SplitFactor == 2)
                             {
                              if ((DateUtilities.CompareDates("21-Dec", Clock.Today) == 0))
                                       Fert.Apply(50, Models.Fertiliser.Types.UreaN, 10);
                              if ((DateUtilities.CompareDates("24-Jan", Clock.Today) == 0))
                                       Fert.Apply(50, Models.Fertiliser.Types.UreaN, 10);
                              if ((DateUtilities.CompareDates("27-Feb", Clock.Today) == 0))
                                       Fert.Apply(0, Models.Fertiliser.Types.UreaN, 10);

                            }  
                            else
                            {
                              if ((DateUtilities.CompareDates("21-Dec", Clock.Today) == 0))
                                       Fert.Apply(20, Models.Fertiliser.Types.UreaN, 10);
                              if ((DateUtilities.CompareDates("24-Jan", Clock.Today) == 0))
                                       Fert.Apply(40, Models.Fertiliser.Types.UreaN, 10);
                              if ((DateUtilities.CompareDates("27-Feb", Clock.Today) == 0))
                                       Fert.Apply(40, Models.Fertiliser.Types.UreaN, 10);

                            }  break;

              case   200 :  if (SplitFactor == 2)
                             {
                              if ((DateUtilities.CompareDates("21-Dec", Clock.Today) == 0))
                                       Fert.Apply(100, Models.Fertiliser.Types.UreaN, 10);
                              if ((DateUtilities.CompareDates("24-Jan", Clock.Today) == 0))
                                       Fert.Apply(100, Models.Fertiliser.Types.UreaN, 10);
                              if ((DateUtilities.CompareDates("27-Feb", Clock.Today) == 0))
                                       Fert.Apply(0, Models.Fertiliser.Types.UreaN, 10);

                            }  
                            else
                            {
                              if ((DateUtilities.CompareDates("21-Dec", Clock.Today) == 0))
                                       Fert.Apply(40, Models.Fertiliser.Types.UreaN, 10);
                              if ((DateUtilities.CompareDates("24-Jan", Clock.Today) == 0))
                                       Fert.Apply(80, Models.Fertiliser.Types.UreaN, 10);
                              if ((DateUtilities.CompareDates("27-Feb", Clock.Today) == 0))
                                       Fert.Apply(80, Models.Fertiliser.Types.UreaN, 10);

                            }  break;
             case   300 :  if (SplitFactor == 2)
                             {
                              if ((DateUtilities.CompareDates("21-Dec", Clock.Today) == 0))
                                       Fert.Apply(150, Models.Fertiliser.Types.UreaN, 10);
                              if ((DateUtilities.CompareDates("24-Jan", Clock.Today) == 0))
                                       Fert.Apply(150, Models.Fertiliser.Types.UreaN, 10);
                              if ((DateUtilities.CompareDates("27-Feb", Clock.Today) == 0))
                                       Fert.Apply(0, Models.Fertiliser.Types.UreaN, 10);

                            }  
                            else
                            {
                              if ((DateUtilities.CompareDates("21-Dec", Clock.Today) == 0))
                                       Fert.Apply(60, Models.Fertiliser.Types.UreaN, 10);
                              if ((DateUtilities.CompareDates("24-Jan", Clock.Today) == 0))
                                       Fert.Apply(120, Models.Fertiliser.Types.UreaN, 10);
                              if ((DateUtilities.CompareDates("27-Feb", Clock.Today) == 0))
                                       Fert.Apply(120, Models.Fertiliser.Types.UreaN, 10);

                            }  break;

              }
        }//On Do Management
    }
}
```
                  Manager FungalInfection: same as FodderBeetValidation.NewZealand.SFF.Canterbury.Rakaia.Rak.paddock.Management.FungalInfection
                Report: same as FodderBeetValidation.NewZealand.AshleyDene.Ashley2013.AshleyFullOpt.paddock.Report
        Folder NorthIsland
          Experiment Taranaki
            Factors: same as FodderBeetValidation.NewZealand.SFF.Canterbury.Orari.Factors
            Simulation Taranaki
              Clock: Start=2016-10-10; End=2017-05-30
              Summary summaryfile
              Weather: FileName=Wanganui.met
              SoilArbitrator Soil Arbitrator
              Zone paddock: Area=1; Slope=0; AspectAngle=0; Altitude=50
                Plant FodderBeet
                Soil: same as FodderBeetValidation.NewZealand.SFF.Canterbury.Orari.Orari.paddock.Soil
                MicroClimate: a_interception=0; b_interception=1; c_interception=0; d_interception=0; SoilHeatFluxFraction=0.4; MinimumHeightDiffForNewLayer=0; NightInterceptionFraction=0.5; ReferenceHeight=2
                Irrigation
                Fertiliser
                SurfaceOrganicMatter surface organic matter: InitialResidueName=wheat; InitialResidueType=wheat; InitialResidueMass=0; InitialStandingFraction=0; InitialCPR=0; InitialCNR=80
                Folder Management
                  Manager ExtraVariables
                  Manager SowDateCv
                    InitialRootDepth = 2
                    CropToSow = Rivage
                    SowingDate = 2016-10-14
                    script: same as in FodderBeetValidation.NewZealand.Lincoln.Lincoln2011.ABlockNit0.paddock.Management.SowDateCv
                  Operations IrrigationEvents
                    Memo
                      MOnthly rain guage tip outs so irrigation need to be estimated minus rain fall
                  Manager NitTreatments
                    NitAmount = 0
                    SplitFactor = 0
```csharp
using APSIM.Shared.Utilities;
using System.Xml.Serialization;
using Models;
using Models.PMF;
using Models.Soils;
using System.Text;
using System.Collections.Generic;
using Models.Core;
using System;

// This script performs management actions that are not common to all treatments

namespace Models
{
    [Serializable] 
    public class Script : Model
    {
        [Link] Clock Clock;
        [Link] Irrigation Irrigation;
        [Link] Fertiliser Fert;
        [Link] Soil ThisSoil;

        [Description("Number of splits")]
        public int SplitFactor  { get; set; }
        [Description("Amount of fertiliser to be applied (kg/ha)")]
        public int NitAmount { get; set; }

        [EventSubscribe("StartOfSimulation")]
        private void OnSimulationCommencing(object sender, EventArgs e)
        {
            //    SetSoilLayers();
        }
        
        [EventSubscribe("DoManagement")]
        private void OnDoManagement(object sender, EventArgs e)
        {
            // Fodderbeet - irrigation on high fert plots only
            switch (NitAmount)
             {
              case  0 : break;

              case   100 :  if (SplitFactor == 2)
                             {
                              if ((DateUtilities.CompareDates("22-Nov", Clock.Today) == 0))
                                       Fert.Apply(50, Models.Fertiliser.Types.UreaN, 10);
                              if ((DateUtilities.CompareDates("7-Jan", Clock.Today) == 0))
                                       Fert.Apply(50, Models.Fertiliser.Types.UreaN, 10);
                              if ((DateUtilities.CompareDates("27-Feb", Clock.Today) == 0))
                                       Fert.Apply(0, Models.Fertiliser.Types.UreaN, 10);

                            }  
                            else
                            {
                              if ((DateUtilities.CompareDates("22-Nov", Clock.Today) == 0))
                                       Fert.Apply(20, Models.Fertiliser.Types.UreaN, 10);
                              if ((DateUtilities.CompareDates("7-Jan", Clock.Today) == 0))
                                       Fert.Apply(40, Models.Fertiliser.Types.UreaN, 10);
                              if ((DateUtilities.CompareDates("27-Feb", Clock.Today) == 0))
                                       Fert.Apply(40, Models.Fertiliser.Types.UreaN, 10);

                            }  break;

              case   200 :  if (SplitFactor == 2)
                             {
                              if ((DateUtilities.CompareDates("22-Nov", Clock.Today) == 0))
                                       Fert.Apply(100, Models.Fertiliser.Types.UreaN, 10);
                              if ((DateUtilities.CompareDates("7-Jan", Clock.Today) == 0))
                                       Fert.Apply(100, Models.Fertiliser.Types.UreaN, 10);
                              if ((DateUtilities.CompareDates("27-Feb", Clock.Today) == 0))
                                       Fert.Apply(0, Models.Fertiliser.Types.UreaN, 10);

                            }  
                            else
                            {
                              if ((DateUtilities.CompareDates("22-Nov", Clock.Today) == 0))
                                       Fert.Apply(40, Models.Fertiliser.Types.UreaN, 10);
                              if ((DateUtilities.CompareDates("7-Jan", Clock.Today) == 0))
                                       Fert.Apply(80, Models.Fertiliser.Types.UreaN, 10);
                              if ((DateUtilities.CompareDates("27-Feb", Clock.Today) == 0))
                                       Fert.Apply(80, Models.Fertiliser.Types.UreaN, 10);

                            }  break;
             case   300 :  if (SplitFactor == 2)
                             {
                              if ((DateUtilities.CompareDates("14-Nov", Clock.Today) == 0))
                                       Fert.Apply(150, Models.Fertiliser.Types.UreaN, 10);
                              if ((DateUtilities.CompareDates("7-Jan", Clock.Today) == 0))
                                       Fert.Apply(150, Models.Fertiliser.Types.UreaN, 10);
                              if ((DateUtilities.CompareDates("27-Feb", Clock.Today) == 0))
                                       Fert.Apply(0, Models.Fertiliser.Types.UreaN, 10);

                            }  
                            else
                            {
                              if ((DateUtilities.CompareDates("22-Nov", Clock.Today) == 0))
                                       Fert.Apply(60, Models.Fertiliser.Types.UreaN, 10);
                              if ((DateUtilities.CompareDates("7-Jan", Clock.Today) == 0))
                                       Fert.Apply(120, Models.Fertiliser.Types.UreaN, 10);
                              if ((DateUtilities.CompareDates("27-Feb", Clock.Today) == 0))
                                       Fert.Apply(120, Models.Fertiliser.Types.UreaN, 10);

                            }  break;

              }
        }//On Do Management
    }
}
```
                  Manager FungalInfection: same as FodderBeetValidation.NewZealand.SFF.Canterbury.Rakaia.Rak.paddock.Management.FungalInfection
                Report: same as FodderBeetValidation.NewZealand.AshleyDene.Ashley2013.AshleyFullOpt.paddock.Report
          Experiment Waikato
            Factors: same as FodderBeetValidation.NewZealand.SFF.Canterbury.Orari.Factors
            Simulation Waikato
              Clock: Start=2016-10-10; End=2017-05-30
              Summary summaryfile
              Weather: FileName=Ruakura.met
              SoilArbitrator Soil Arbitrator
              Zone paddock: Area=1; Slope=0; AspectAngle=0; Altitude=50
                Plant FodderBeet
                Soil: same as FodderBeetValidation.NewZealand.SFF.Canterbury.Orari.Orari.paddock.Soil
                MicroClimate: a_interception=0; b_interception=1; c_interception=0; d_interception=0; SoilHeatFluxFraction=0.4; MinimumHeightDiffForNewLayer=0; NightInterceptionFraction=0.5; ReferenceHeight=2
                Irrigation
                Fertiliser
                SurfaceOrganicMatter surface organic matter: InitialResidueName=wheat; InitialResidueType=wheat; InitialResidueMass=0; InitialStandingFraction=0; InitialCPR=0; InitialCNR=80
                Folder Management
                  Manager ExtraVariables
                  Manager SowDateCv
                    InitialRootDepth = 2
                    CropToSow = Rivage
                    SowingDate = 2016-10-24
                    script: same as in FodderBeetValidation.NewZealand.Lincoln.Lincoln2011.ABlockNit0.paddock.Management.SowDateCv
                  Operations IrrigationEvents
                    Memo
                      MOnthly rain guage tip outs so irrigation need to be estimated minus rain fall
                  Manager NitTreatments
                    NitAmount = 0
                    SplitFactor = 0
```csharp
using APSIM.Shared.Utilities;
using System.Xml.Serialization;
using Models;
using Models.PMF;
using Models.Soils;
using System.Text;
using System.Collections.Generic;
using Models.Core;
using System;

// This script performs management actions that are not common to all treatments

namespace Models
{
    [Serializable] 
    public class Script : Model
    {
        [Link] Clock Clock;
        [Link] Irrigation Irrigation;
        [Link] Fertiliser Fert;
        [Link] Soil ThisSoil;

        [Description("Number of splits")]
        public int SplitFactor  { get; set; }
        [Description("Amount of fertiliser to be applied (kg/ha)")]
        public int NitAmount { get; set; }

        [EventSubscribe("StartOfSimulation")]
        private void OnSimulationCommencing(object sender, EventArgs e)
        {
            //    SetSoilLayers();
        }
        
        [EventSubscribe("DoManagement")]
        private void OnDoManagement(object sender, EventArgs e)
        {
            // Fodderbeet - irrigation on high fert plots only
            switch (NitAmount)
             {
              case  0 : break;

              case   100 :  if (SplitFactor == 2)
                             {
                              if ((DateUtilities.CompareDates("2-Dec", Clock.Today) == 0))
                                       Fert.Apply(50, Models.Fertiliser.Types.UreaN, 10);
                              if ((DateUtilities.CompareDates("11-Jan", Clock.Today) == 0))
                                       Fert.Apply(50, Models.Fertiliser.Types.UreaN, 10);
                              if ((DateUtilities.CompareDates("23-Feb", Clock.Today) == 0))
                                       Fert.Apply(0, Models.Fertiliser.Types.UreaN, 10);

                            }  
                            else
                            {
                              if ((DateUtilities.CompareDates("2-Dec", Clock.Today) == 0))
                                       Fert.Apply(20, Models.Fertiliser.Types.UreaN, 10);
                              if ((DateUtilities.CompareDates("11-Jan", Clock.Today) == 0))
                                       Fert.Apply(40, Models.Fertiliser.Types.UreaN, 10);
                              if ((DateUtilities.CompareDates("23-Feb", Clock.Today) == 0))
                                       Fert.Apply(40, Models.Fertiliser.Types.UreaN, 10);

                            }  break;

              case   200 :  if (SplitFactor == 2)
                             {
                              if ((DateUtilities.CompareDates("2-Dec", Clock.Today) == 0))
                                       Fert.Apply(100, Models.Fertiliser.Types.UreaN, 10);
                              if ((DateUtilities.CompareDates("11-Jan", Clock.Today) == 0))
                                       Fert.Apply(100, Models.Fertiliser.Types.UreaN, 10);
                              if ((DateUtilities.CompareDates("23-Feb", Clock.Today) == 0))
                                       Fert.Apply(0, Models.Fertiliser.Types.UreaN, 10);

                            }  
                            else
                            {
                              if ((DateUtilities.CompareDates("2-Dec", Clock.Today) == 0))
                                       Fert.Apply(40, Models.Fertiliser.Types.UreaN, 10);
                              if ((DateUtilities.CompareDates("11-Jan", Clock.Today) == 0))
                                       Fert.Apply(80, Models.Fertiliser.Types.UreaN, 10);
                              if ((DateUtilities.CompareDates("23-Feb", Clock.Today) == 0))
                                       Fert.Apply(80, Models.Fertiliser.Types.UreaN, 10);

                            }  break;
             case   300 :  if (SplitFactor == 2)
                             {
                              if ((DateUtilities.CompareDates("2-Dec", Clock.Today) == 0))
                                       Fert.Apply(150, Models.Fertiliser.Types.UreaN, 10);
                              if ((DateUtilities.CompareDates("11-Jan", Clock.Today) == 0))
                                       Fert.Apply(150, Models.Fertiliser.Types.UreaN, 10);
                              if ((DateUtilities.CompareDates("23-Feb", Clock.Today) == 0))
                                       Fert.Apply(0, Models.Fertiliser.Types.UreaN, 10);

                            }  
                            else
                            {
                              if ((DateUtilities.CompareDates("2-Dec", Clock.Today) == 0))
                                       Fert.Apply(60, Models.Fertiliser.Types.UreaN, 10);
                              if ((DateUtilities.CompareDates("11-Jan", Clock.Today) == 0))
                                       Fert.Apply(120, Models.Fertiliser.Types.UreaN, 10);
                              if ((DateUtilities.CompareDates("23-Feb", Clock.Today) == 0))
                                       Fert.Apply(120, Models.Fertiliser.Types.UreaN, 10);

                            }  break;

              }
        }//On Do Management
    }
}
```
                  Manager FungalInfection: same as FodderBeetValidation.NewZealand.SFF.Canterbury.Rakaia.Rak.paddock.Management.FungalInfection
                Report: same as FodderBeetValidation.NewZealand.AshleyDene.Ashley2013.AshleyFullOpt.paddock.Report
          Experiment Whanganui
            Factors: same as FodderBeetValidation.NewZealand.SFF.Canterbury.Orari.Factors
            Simulation Whanganui
              Clock: Start=2016-10-10; End=2017-05-30
              Summary summaryfile
              Weather: FileName=Wanganui.met
              SoilArbitrator Soil Arbitrator
              Zone paddock: Area=1; Slope=0; AspectAngle=0; Altitude=50
                Plant FodderBeet
                Soil: same as FodderBeetValidation.NewZealand.SFF.Canterbury.Orari.Orari.paddock.Soil
                MicroClimate: a_interception=0; b_interception=1; c_interception=0; d_interception=0; SoilHeatFluxFraction=0.4; MinimumHeightDiffForNewLayer=0; NightInterceptionFraction=0.5; ReferenceHeight=2
                Irrigation
                Fertiliser
                SurfaceOrganicMatter surface organic matter: InitialResidueName=wheat; InitialResidueType=wheat; InitialResidueMass=0; InitialStandingFraction=0; InitialCPR=0; InitialCNR=80
                Folder Management
                  Manager ExtraVariables
                  Manager SowDateCv: same as FodderBeetValidation.NewZealand.SFF.Canterbury.Orari.Orari.paddock.Management.SowDateCv
                  Operations IrrigationEvents: same as FodderBeetValidation.NewZealand.SFF.Canterbury.Orari.Orari.paddock.Management.IrrigationEvents
                  Manager NitTreatments: same as FodderBeetValidation.NewZealand.SFF.Canterbury.Orari.Orari.paddock.Management.NitTreatments
                  Manager FungalInfection: same as FodderBeetValidation.NewZealand.SFF.Canterbury.Rakaia.Rak.paddock.Management.FungalInfection
                Report: same as FodderBeetValidation.NewZealand.AshleyDene.Ashley2013.AshleyFullOpt.paddock.Report
      Folder P21EXT
        Memo Trial details
          This was an extension of the P21 project
        Folder Canterbury
          Simulation Bankside_P21ext
            Clock: Start=2015-11-14; End=2016-06-30
            Summary summaryfile
            Weather: FileName=lincoln.met
            SoilArbitrator Soil Arbitrator
            Zone paddock: Area=1; Slope=0; AspectAngle=0; Altitude=50
              Soil Lismore: SoilType=NZ_sedementary; Region=Plains; State=Canterbury; Country=New Zealand; Latitude=0; Longitude=0
                DataSource=Generic profile descriptions provided by Trevor Webb and data for functional horizions based on SWAMP project results
                Comments=Bulk density values were measured on the fine earth fraction so values entered into apsim soil are adjusted down to account for stone content (assuming stones are inert from all soil process so their mass and volume is removed from model paramaters).  SAT, DUL, LL15 and Air dry have been adjusted down to account for stone content.  OC has not been adjusted so the model will get the correct carbon and N amounts using the adjusted BD.
                Chemical: Thickness=[200, 100, 300, 300, 300, 300]; PH=[6, 6, 6, 6, 6, 6]; PHUnits=Water
                Physical
                  Thickness  BD     AirDry  LL15  DUL   SAT
                  200        1.09   0.05    0.17  0.37  0.53
                  100        1.09   0.04    0.17  0.37  0.53
                  300        0.7    0.02    0.07  0.15  0.24
                  300        0.455  0.001   0.01  0.15  0.24
                  300        0.25   0.001   0.01  0.04  0.16
                  300        0.25   0.001   0.01  0.04  0.16
                  SoilCrop FodderBeetSoil
                    LL=[0.144, 0.136, 0.03, 0.014, 0.01, 0.01]
                    KL=[0.286157, 0.252188, 0.215147, 0.273159, 0.21174, 0.0303872]
                    XF=[1, 1, 1, 1, 1, 1]
                WaterBalance SoilWater: same as FodderBeetValidation.NewZealand.AshleyDene.Ashley2013.AshleyFullOpt.paddock.Lismore.SoilWater
                Nutrient
                Organic: same as FodderBeetValidation.NewZealand.AshleyDene.Ashley2013.AshleyFullOpt.paddock.Lismore.Organic
                Water: Thickness=[200, 100, 300, 300, 300, 300]; InitialValues=[0.37, 0.37, 0.15, 0.15, 0.022, 0.01]; InitialPAWmm=129.6; RelativeTo=LL15; FilledFromTop=true
                CERESSoilTemperature Temperature
                Solute NO3: same as FodderBeetValidation.NewZealand.AshleyDene.Ashley2013.AshleyFullOpt.paddock.Lismore.NO3
                Solute NH4: same as FodderBeetValidation.NewZealand.AshleyDene.Ashley2013.AshleyFullOpt.paddock.Lismore.NH4
                Solute Urea: same as FodderBeetValidation.NewZealand.AshleyDene.Ashley2013.AshleyFullOpt.paddock.Lismore.Urea
              Plant FodderBeet
              MicroClimate: a_interception=0; b_interception=1; c_interception=0; d_interception=0; SoilHeatFluxFraction=0.4; MinimumHeightDiffForNewLayer=0; NightInterceptionFraction=0.5; ReferenceHeight=2
              Irrigation
              Fertiliser
              SurfaceOrganicMatter surface organic matter: InitialResidueName=wheat; InitialResidueType=wheat; InitialResidueMass=0; InitialStandingFraction=0; InitialCPR=0; InitialCNR=80
              Folder Management
                Manager ExtraVariables
                Manager SowDateCv
                  InitialRootDepth = 2
                  CropToSow = Brigadier
                  SowingDate = 2015-11-15
```csharp
using Models.Soils;
using System;
using Models.Core;
using System.Collections.Generic;
using System.Text;
using Models.PMF;
using Models;
using System.Xml.Serialization;
using APSIM.Shared.Utilities;
using System.Data;
using Models.PMF.Interfaces;
using Models.Surface;

namespace Models
{
    [Serializable] 
    //[System.Xml.Serialization.XmlInclude(typeof(Model))]
    public class Script : Model
    {
        [Link] Plant FodderBeet;
        [Link] Clock Clock;
        [Link] Zone zone;
        [Link] Simulation Simulation;
        [Link] SurfaceOrganicMatter SurfOM;
        
                
        [Description("Initial Root Depth")]
        public double InitialRootDepth { get; set; }
        [Display(Type=DisplayType.CultivarName)]
        [Description("Sown Crop")]
        public string CropToSow { get; set; }
        [Description("Sowing Date")]
        public DateTime SowingDate { get; set; }
        
        
        
        [EventSubscribe("DoManagement")]
        private void OnDoManagement(object sender, EventArgs e)
        {
            if (Clock.Today.Date == SowingDate)
            {
                FodderBeet.Sow(cultivar: CropToSow, population: 9, depth: InitialRootDepth, rowSpacing: 500);
                
            }
                        
            
        }
    }
}
```
                Operations NFertEvents
                  2015-11-11  [Fertiliser].Apply(26.4, Fertiliser.Types.UreaN, 10);
                  2016-01-05  [Fertiliser].Apply(46, Fertiliser.Types.UreaN, 10);
                  2016-02-02  [Fertiliser].Apply(46, Fertiliser.Types.UreaN, 10);
                Manager TreatSpecIrrgation: same as FodderBeetValidation.NewZealand.AshleyDene.Ashley2013.AshleyFullOpt.paddock.Management.TreatSpecIrrgation
                Manager FungalInfection: same as FodderBeetValidation.NewZealand.AshleyDene.Ashley2013.AshleyFullOpt.paddock.Management.FungalInfection
              Report: same as FodderBeetValidation.NewZealand.AshleyDene.Ashley2013.AshleyFullOpt.paddock.Report
          Simulation RakaiaIsland_P21ext
            Clock: Start=2015-11-02; End=2016-06-30
            Summary summaryfile
            Weather: FileName=lincoln.met
            SoilArbitrator Soil Arbitrator
            Zone paddock: Area=1; Slope=0; AspectAngle=0; Altitude=50
              Plant FodderBeet
              MicroClimate: a_interception=0; b_interception=1; c_interception=0; d_interception=0; SoilHeatFluxFraction=0.4; MinimumHeightDiffForNewLayer=0; NightInterceptionFraction=0.5; ReferenceHeight=2
              Irrigation
              Fertiliser
              SurfaceOrganicMatter surface organic matter: InitialResidueName=wheat; InitialResidueType=wheat; InitialResidueMass=0; InitialStandingFraction=0; InitialCPR=0; InitialCNR=80
              Folder Management
                Manager ExtraVariables
                Manager SowDateCv
                  InitialRootDepth = 2
                  CropToSow = Rivage
                  SowingDate = 2015-11-19
```csharp
using Models.Soils;
using System;
using Models.Core;
using System.Collections.Generic;
using System.Text;
using Models.PMF;
using Models;
using System.Xml.Serialization;
using APSIM.Shared.Utilities;
using System.Data;
using Models.PMF.Interfaces;
using Models.Surface;

namespace Models
{
    [Serializable] 
    //[System.Xml.Serialization.XmlInclude(typeof(Model))]
    public class Script : Model
    {
        [Link] Plant FodderBeet;
        [Link] Clock Clock;
        [Link] Zone zone;
        [Link] Simulation Simulation;
        [Link] SurfaceOrganicMatter SurfOM;
        
                
        [Description("Initial Root Depth")]
        public double InitialRootDepth { get; set; }
        [Display(Type=DisplayType.CultivarName)]
        [Description("Sown Crop")]
        public string CropToSow { get; set; }
        [Description("Sowing Date")]
        public DateTime SowingDate { get; set; }
        
        
        
        [EventSubscribe("DoManagement")]
        private void OnDoManagement(object sender, EventArgs e)
        {
            if (Clock.Today.Date == SowingDate)
            {
                FodderBeet.Sow(cultivar: CropToSow, population: 8.5, depth: InitialRootDepth, rowSpacing: 500);
                
            }
                        
            
        }
    }
}
```
                Operations IrrigationEvents
                  2015-11-03  [Irrigation].Apply(15);
                  2015-11-05  [Irrigation].Apply(15);
                  2015-11-07  [Irrigation].Apply(15);
                  2015-11-10  [Irrigation].Apply(15);
                  2015-11-14  [Irrigation].Apply(15);
                  2015-11-16  [Irrigation].Apply(15);
                  2015-11-19  [Irrigation].Apply(15);
                  2015-11-22  [Irrigation].Apply(15);
                  2015-11-30  [Irrigation].Apply(15);
                  2015-12-02  [Irrigation].Apply(15);
                  2016-02-17  [Irrigation].Apply(15);
                  2016-02-26  [Irrigation].Apply(30);
                  2016-02-28  [Irrigation].Apply(15);
                  2016-03-02  [Irrigation].Apply(15);
                  2016-03-06  [Irrigation].Apply(15);
                  2016-03-10  [Irrigation].Apply(15);
                Operations NFertEvents
                  2015-10-22  [Fertiliser].Apply(49, Fertiliser.Types.UreaN, 10);
                  2015-12-23  [Fertiliser].Apply(46, Fertiliser.Types.UreaN, 10);
                  2016-02-16  [Fertiliser].Apply(34.5, Fertiliser.Types.UreaN, 10);
                Manager TreatSpecIrrgation: same as FodderBeetValidation.NewZealand.AshleyDene.Ashley2013.AshleyFullOpt.paddock.Management.TreatSpecIrrgation
                Manager FungalInfection
                  InfectionDate = 2016-01-03
                  IsInfected = True
                  script: same as in FodderBeetValidation.NewZealand.Lincoln.Lincoln2011.ABlockNit0.paddock.Management.FungalInfection
              Report: same as FodderBeetValidation.NewZealand.AshleyDene.Ashley2013.AshleyFullOpt.paddock.Report
              Soil Waikiwi_34a1: SoilType=Typic Firm Brown Soils; Latitude=-41; Longitude=174
                DataSource=Profile descriptions provided by Smap based on the work done by Trevor Webb.
                Physical
                  Thickness  BD       AirDry  LL15   DUL    SAT
                  250        1.11035  0.101   0.202  0.412  0.58
                  100        1.11035  0.1515  0.23   0.39   0.5
                  250        1.35945  0.22    0.23   0.391  0.48
                  350        1.38065  0.233   0.233  0.382  0.44547
                  350        1.38065  0.233   0.233  0.39   0.44547
                  350        1.38065  0.233   0.233  0.39   0.44547
                  SoilCrop FodderbeetSoil: LL=[0.202, 0.202, 0.236, 0.233, 0.233, 0.233]; KL=[0.09, 0.09, 0.09, 0.09, 0.09, 0.09]; XF=[1, 1, 1, 0.153816, 0.153816, 0.153816]
                Organic: FOMCNRatio=40; CarbonUnits=Total
                  Thickness  Carbon    SoilCNRatio  FBiom      FInert    FOM
                  250        2.6       11           0.0288947  0.415804  361.474
                  100        0.922866  11           0.016612   0.654416  295.949
                  250        0.378257  11           0.0123138  0.795568  179.502
                  350        0.216171  11           0.0103825  0.916884  89.1383
                  350        0.200983  11           0.0100468  0.970915  44.2648
                  200        0.20006   11           0.0100057  0.989822  29.6716
                Chemical: Thickness=[250, 100, 250, 900]; PH=[7, 7, 7, 7]; PHUnits=Water
                Water: Thickness=[250, 100, 250, 350, 350, 350]; InitialValues=[0.412, 0.39, 0.391, 0.382, 0.39, 0.39]; InitialPAWmm=270.8; RelativeTo=LL15; FilledFromTop=true
                WaterBalance SoilWater: SummerDate=1-oct; SummerU=9; SummerCona=4.4; WinterDate=1-apr; WinterU=9; WinterCona=4.4; DiffusConst=88; DiffusSlope=35; Salb=0.13; CN2Bare=73; CNRed=20; CNCov=0.8; PSIDul=-100; Thickness=[250, 100, 250, 900]; SWCON=[0.3, 0.3, 0.3, 0.15]
                Nutrient
                CERESSoilTemperature Temperature
                Solute NO3: Thickness=[250, 100, 250, 900]; InitialValues=[41.8607, 7.02481, 1.70657, 0.160955]; InitialValuesUnits=ppm; WaterTableConcentration=0; D0=0; DepthConstant=0; MaxDepthSoluteAccessible=0; RunoffEffectivenessAtMovingSolute=0; MaxEffectiveRunoff=0
                Solute NH4: Thickness=[250, 100, 250, 900]; InitialValues=[0.0360247, 0.0900617, 0.0294237, 0.0241432]; InitialValuesUnits=ppm; WaterTableConcentration=0; D0=0; DepthConstant=0; MaxDepthSoluteAccessible=0; RunoffEffectivenessAtMovingSolute=0; MaxEffectiveRunoff=0
                Solute Urea: Thickness=[250, 100, 250, 900]; InitialValues=[0, 0, 0, 0]; InitialValuesUnits=kg/ha; WaterTableConcentration=0; D0=0; DepthConstant=0; MaxDepthSoluteAccessible=0; RunoffEffectivenessAtMovingSolute=0; MaxEffectiveRunoff=0
          Simulation Oxford_P21ext
            Clock: Start=2015-11-18; End=2016-06-30
            Summary summaryfile
            Weather: FileName=Methven.met
            SoilArbitrator Soil Arbitrator
            Zone paddock: Area=1; Slope=0; AspectAngle=0; Altitude=50
              Soil TempletonABlock: Latitude=0; Longitude=0
                Chemical: Thickness=[100, 200, 300, 300, 300, 300]; PH=[6.6, 6.2, 5.7, 5.5, 5.5, 5.5]; PHUnits=Water
                Water: Thickness=[100, 200, 300, 300, 300, 300]; InitialValues=[0.27, 0.27, 0.29, 0.3, 0.3, 0.3]; InitialPAWmm=222; RelativeTo=LL15; FilledFromTop=false
                Physical: same as FodderBeetValidation.NewZealand.SFF.Canterbury.Rakaia.Rak.paddock.TempletonABlock.Physical
                WaterBalance SoilWater: same as FodderBeetValidation.NewZealand.Lincoln.Lincoln2012.ABlockRainfed.paddock.TempletonABlock.SoilWater
                Nutrient
                Organic: same as FodderBeetValidation.NewZealand.Lincoln.Lincoln2011.ABlockNit0.paddock.TempletonABlock.Organic
                CERESSoilTemperature Temperature
                Solute NO3: same as FodderBeetValidation.NewZealand.Lincoln.Lincoln2014.ABlockRivOct.paddock.TempletonABlock.NO3
                Solute NH4: same as FodderBeetValidation.NewZealand.Lincoln.Lincoln2014.ABlockRivOct.paddock.TempletonABlock.NH4
                Solute Urea: same as FodderBeetValidation.NewZealand.Lincoln.Lincoln2011.ABlockNit0.paddock.TempletonABlock.Urea
              Plant FodderBeet
              MicroClimate: a_interception=0; b_interception=1; c_interception=0; d_interception=0; SoilHeatFluxFraction=0.4; MinimumHeightDiffForNewLayer=0; NightInterceptionFraction=0.5; ReferenceHeight=2
              Irrigation
              Fertiliser
              SurfaceOrganicMatter surface organic matter: InitialResidueName=wheat; InitialResidueType=wheat; InitialResidueMass=0; InitialStandingFraction=0; InitialCPR=0; InitialCNR=80
              Folder Management
                Manager ExtraVariables
                Manager SowDateCv: same as FodderBeetValidation.NewZealand.P21EXT.Canterbury.RakaiaIsland_P21ext.paddock.Management.SowDateCv
                Operations IrrigationEvents: same as FodderBeetValidation.NewZealand.P21EXT.Canterbury.RakaiaIsland_P21ext.paddock.Management.IrrigationEvents
                Operations NFertEvents
                  2015-11-15  [Fertiliser].Apply(35.2, Fertiliser.Types.UreaN, 10);
                  2016-01-13  [Fertiliser].Apply(46, Fertiliser.Types.UreaN, 10);
                  2016-02-17  [Fertiliser].Apply(46, Fertiliser.Types.UreaN, 10);
                Manager TreatSpecIrrgation: same as FodderBeetValidation.NewZealand.AshleyDene.Ashley2013.AshleyFullOpt.paddock.Management.TreatSpecIrrgation
                Manager FungalInfection: same as FodderBeetValidation.NewZealand.AshleyDene.Ashley2013.AshleyFullOpt.paddock.Management.FungalInfection
              Report: same as FodderBeetValidation.NewZealand.AshleyDene.Ashley2013.AshleyFullOpt.paddock.Report
          Simulation Springston_P21ext
            Clock: Start=2015-10-23; End=2016-06-30
            Summary summaryfile
            Weather: FileName=Methven.met
            SoilArbitrator Soil Arbitrator
            Zone paddock: Area=1; Slope=0; AspectAngle=0; Altitude=50
              Soil Lismore: same as FodderBeetValidation.NewZealand.AshleyDene.Ashley2013.AshleyFullOpt.paddock.Lismore
              Plant FodderBeet
              MicroClimate: a_interception=0; b_interception=1; c_interception=0; d_interception=0; SoilHeatFluxFraction=0.4; MinimumHeightDiffForNewLayer=0; NightInterceptionFraction=0.5; ReferenceHeight=2
              Irrigation
              Fertiliser
              SurfaceOrganicMatter surface organic matter: InitialResidueName=wheat; InitialResidueType=wheat; InitialResidueMass=0; InitialStandingFraction=0; InitialCPR=0; InitialCNR=80
              Folder Management
                Manager ExtraVariables
                Manager SowDateCv
                  InitialRootDepth = 2
                  CropToSow = Brigadier
                  SowingDate = 2015-10-23
```csharp
using Models.Soils;
using System;
using Models.Core;
using System.Collections.Generic;
using System.Text;
using Models.PMF;
using Models;
using System.Xml.Serialization;
using APSIM.Shared.Utilities;
using System.Data;
using Models.PMF.Interfaces;
using Models.Surface;

namespace Models
{
    [Serializable] 
    //[System.Xml.Serialization.XmlInclude(typeof(Model))]
    public class Script : Model
    {
        [Link] Plant FodderBeet;
        [Link] Clock Clock;
        [Link] Zone zone;
        [Link] Simulation Simulation;
        [Link] SurfaceOrganicMatter SurfOM;
        
                
        [Description("Initial Root Depth")]
        public double InitialRootDepth { get; set; }
        [Display(Type=DisplayType.CultivarName)]
        [Description("Sown Crop")]
        public string CropToSow { get; set; }
        [Description("Sowing Date")]
        public DateTime SowingDate { get; set; }
        
        
        
        [EventSubscribe("DoManagement")]
        private void OnDoManagement(object sender, EventArgs e)
        {
            if (Clock.Today.Date == SowingDate)
            {
                FodderBeet.Sow(cultivar: CropToSow, population: 8, depth: InitialRootDepth, rowSpacing: 500);
                
            }
                        
            
        }
    }
}
```
                Operations IrrigationEvents
                  2015-11-25  [Irrigation].Apply(15);
                  2015-12-02  [Irrigation].Apply(15);
                  2015-12-05  [Irrigation].Apply(15.8);
                  2015-12-09  [Irrigation].Apply(10);
                  2015-12-12  [Irrigation].Apply(14);
                  2015-12-16  [Irrigation].Apply(20);
                  2015-12-23  [Irrigation].Apply(14.5);
                  2016-01-06  [Irrigation].Apply(29);
                  2016-01-09  [Irrigation].Apply(23);
                  2016-01-13  [Irrigation].Apply(21);
                  2016-01-16  [Irrigation].Apply(24);
                  2016-01-20  [Irrigation].Apply(28);
                  2016-01-23  [Irrigation].Apply(21);
                  2016-01-27  [Irrigation].Apply(10);
                  2016-01-30  [Irrigation].Apply(25);
                  2016-02-03  [Irrigation].Apply(19);
                  2016-02-06  [Irrigation].Apply(17);
                  2016-02-10  [Irrigation].Apply(21);
                  2016-02-13  [Irrigation].Apply(9);
                  2016-02-17  [Irrigation].Apply(19.5);
                  2016-02-20  [Irrigation].Apply(20);
                Operations NFertEvents: same as FodderBeetValidation.NewZealand.AshleyDene.Ashley2013.Factors.Permutation.Nit.300.NFertEvents
                Manager TreatSpecIrrgation: same as FodderBeetValidation.NewZealand.AshleyDene.Ashley2013.AshleyFullOpt.paddock.Management.TreatSpecIrrgation
                Manager FungalInfection
                  InfectionDate = 2015-01-03
                  IsInfected = False
                  script: same as in FodderBeetValidation.NewZealand.Lincoln.Lincoln2011.ABlockNit0.paddock.Management.FungalInfection
              Report: same as FodderBeetValidation.NewZealand.AshleyDene.Ashley2013.AshleyFullOpt.paddock.Report
        Folder NorthOtago
          Simulation Ngapara_P21ext
            Clock: Start=2015-09-28; End=2016-06-30
            Summary summaryfile
            Weather: FileName=Timaru.met
            SoilArbitrator Soil Arbitrator
            Zone paddock: Area=1; Slope=0; AspectAngle=0; Altitude=50
              Soil NgaparaSiltLoam: SoilType=NZ_sedementary; Region=Plains; State=Canterbury; Country=New Zealand; Latitude=0; Longitude=0
                DataSource=Generic profile descriptions provided by Trevor Webb and data for functional horizions based on SWAMP project results
                Comments=Bulk density values were measured on the fine earth fraction so values entered into apsim soil are adjusted down to account for stone content (assuming stones are inert from all soil process so their mass and volume is removed from model paramaters).  SAT, DUL, LL15 and Air dry have been adjusted down to account for stone content.  OC has not been adjusted so the model will get the correct carbon and N amounts using the adjusted BD.
                Memo NgaparaSiltLoam
                  Based on Smap ref: Ngap_22a.2 (Ngapara_22a.2)
                Chemical: Thickness=[200, 100, 300, 300, 300, 300]; PH=[6, 6, 6, 6, 6, 6]; PHUnits=Water
                Physical
                  Thickness  BD    AirDry  LL15  DUL   SAT
                  200        1.22  0.1     0.17  0.37  0.53
                  100        1.22  0.05    0.17  0.37  0.53
                  300        1.25  0.01    0.07  0.15  0.24
                  300        1.53  0.001   0.01  0.15  0.24
                  300        1.53  0.001   0.01  0.04  0.16
                  300        1.53  0.001   0.01  0.04  0.16
                  SoilCrop FodderBeetSoil
                    LL=[0.144, 0.136, 0.03, 0.014, 0.01, 0.01]
                    KL=[0.286157, 0.252188, 0.215147, 0.273159, 0.21174, 0.0303872]
                    XF=[1, 1, 1, 1, 1, 1]
                WaterBalance SoilWater: same as FodderBeetValidation.NewZealand.AshleyDene.Ashley2013.AshleyFullOpt.paddock.Lismore.SoilWater
                Nutrient
                Organic: same as FodderBeetValidation.NewZealand.AshleyDene.Ashley2013.AshleyFullOpt.paddock.Lismore.Organic
                Water: Thickness=[200, 100, 300, 300, 300, 300]; InitialValues=[0.37, 0.37, 0.15, 0.15, 0.022, 0.01]; InitialPAWmm=129.6; RelativeTo=LL15; FilledFromTop=true
                CERESSoilTemperature Temperature
                Solute NO3: Thickness=[200, 100, 300, 300, 300, 300]; InitialValues=[11.1885, 18.6885, 0.32, 2.00436, 2.00436, 0.217865]; InitialValuesUnits=ppm; WaterTableConcentration=0; D0=0; DepthConstant=0; MaxDepthSoluteAccessible=0; RunoffEffectivenessAtMovingSolute=0; MaxEffectiveRunoff=0
                Solute NH4: Thickness=[200, 100, 300, 300, 300, 300]; InitialValues=[1.7623, 6.22951, 1.09333, 0.588235, 0.522876, 0.0217865]; InitialValuesUnits=ppm; WaterTableConcentration=0; D0=0; DepthConstant=0; MaxDepthSoluteAccessible=0; RunoffEffectivenessAtMovingSolute=0; MaxEffectiveRunoff=0
                Solute Urea: same as FodderBeetValidation.NewZealand.AshleyDene.Ashley2013.AshleyFullOpt.paddock.Lismore.Urea
              Plant FodderBeet
              MicroClimate: a_interception=0; b_interception=1; c_interception=0; d_interception=0; SoilHeatFluxFraction=0.4; MinimumHeightDiffForNewLayer=0; NightInterceptionFraction=0.5; ReferenceHeight=2
              Irrigation
              Fertiliser
              SurfaceOrganicMatter surface organic matter: InitialResidueName=wheat; InitialResidueType=wheat; InitialResidueMass=0; InitialStandingFraction=0; InitialCPR=0; InitialCNR=80
              Folder Management
                Manager ExtraVariables
                Manager SowDateCv
                  InitialRootDepth = 2
                  CropToSow = Rivage
                  SowingDate = 2015-10-01
                  script: same as in FodderBeetValidation.NewZealand.P21EXT.Canterbury.Bankside_P21ext.paddock.Management.SowDateCv
                Operations IrrigationEvents: same as FodderBeetValidation.NewZealand.P21EXT.Canterbury.RakaiaIsland_P21ext.paddock.Management.IrrigationEvents
                Operations NFertEvents
                  2015-09-29  [Fertiliser].Apply(26.4, Fertiliser.Types.UreaN, 10);
                  2015-12-15  [Fertiliser].Apply(9.2, Fertiliser.Types.UreaN, 10);
                  2016-01-20  [Fertiliser].Apply(34.5, Fertiliser.Types.UreaN, 10);
                Manager TreatSpecIrrgation: same as FodderBeetValidation.NewZealand.AshleyDene.Ashley2013.AshleyFullOpt.paddock.Management.TreatSpecIrrgation
                Manager FungalInfection: same as FodderBeetValidation.NewZealand.AshleyDene.Ashley2013.AshleyFullOpt.paddock.Management.FungalInfection
              Report: same as FodderBeetValidation.NewZealand.AshleyDene.Ashley2013.AshleyFullOpt.paddock.Report
          Simulation Oamaru_P21ext
            Clock: Start=2015-10-08; End=2016-06-30
            Summary summaryfile
            Weather: FileName=Timaru.met
            SoilArbitrator Soil Arbitrator
            Zone paddock: Area=1; Slope=0; AspectAngle=0; Altitude=50
              Soil Lismore: same as FodderBeetValidation.NewZealand.AshleyDene.Ashley2013.AshleyFullOpt.paddock.Lismore
              Plant FodderBeet
              MicroClimate: a_interception=0; b_interception=1; c_interception=0; d_interception=0; SoilHeatFluxFraction=0.4; MinimumHeightDiffForNewLayer=0; NightInterceptionFraction=0.5; ReferenceHeight=2
              Irrigation
              Fertiliser
              SurfaceOrganicMatter surface organic matter: InitialResidueName=wheat; InitialResidueType=wheat; InitialResidueMass=0; InitialStandingFraction=0; InitialCPR=0; InitialCNR=80
              Folder Management
                Manager ExtraVariables
                Manager SowDateCv
                  InitialRootDepth = 2
                  CropToSow = Brigadier
                  SowingDate = 2015-10-09
                  script: same as in FodderBeetValidation.NewZealand.P21EXT.Canterbury.Bankside_P21ext.paddock.Management.SowDateCv
                Operations NFertEvents
                  2015-10-16  [Fertiliser].Apply(100, Fertiliser.Types.UreaN, 10);
                  2016-01-15  [Fertiliser].Apply(46, Fertiliser.Types.UreaN, 10);
                Manager TreatSpecIrrgation: same as FodderBeetValidation.NewZealand.AshleyDene.Ashley2013.AshleyFullOpt.paddock.Management.TreatSpecIrrgation
                Manager FungalInfection: same as FodderBeetValidation.NewZealand.AshleyDene.Ashley2013.AshleyFullOpt.paddock.Management.FungalInfection
              Report: same as FodderBeetValidation.NewZealand.AshleyDene.Ashley2013.AshleyFullOpt.paddock.Report
        Folder Southland
          Simulation Balfour_P21ext
            Clock: Start=2015-10-25; End=2016-06-30
            Summary summaryfile
            Weather: FileName=Gore.met
            SoilArbitrator Soil Arbitrator
            Zone paddock: Area=1; Slope=0; AspectAngle=0; Altitude=50
              Soil Lismore: same as FodderBeetValidation.NewZealand.AshleyDene.Ashley2013.AshleyFullOpt.paddock.Lismore
              Plant FodderBeet
              MicroClimate: a_interception=0; b_interception=1; c_interception=0; d_interception=0; SoilHeatFluxFraction=0.4; MinimumHeightDiffForNewLayer=0; NightInterceptionFraction=0.5; ReferenceHeight=2
              Irrigation
              Fertiliser
              SurfaceOrganicMatter surface organic matter: InitialResidueName=wheat; InitialResidueType=wheat; InitialResidueMass=0; InitialStandingFraction=0; InitialCPR=0; InitialCNR=80
              Folder Management
                Manager ExtraVariables
                Manager SowDateCv
                  InitialRootDepth = 2
                  CropToSow = Rivage
                  SowingDate = 2015-10-25
                  script: same as in FodderBeetValidation.NewZealand.P21EXT.Canterbury.Bankside_P21ext.paddock.Management.SowDateCv
                Operations NFertEvents
                  2015-10-20  [Fertiliser].Apply(66.6, Fertiliser.Types.UreaN, 10);
                  2016-01-10  [Fertiliser].Apply(69, Fertiliser.Types.UreaN, 10);
                Manager TreatSpecIrrgation: same as FodderBeetValidation.NewZealand.AshleyDene.Ashley2013.AshleyFullOpt.paddock.Management.TreatSpecIrrgation
                Manager FungalInfection: same as FodderBeetValidation.NewZealand.AshleyDene.Ashley2013.AshleyFullOpt.paddock.Management.FungalInfection
              Report: same as FodderBeetValidation.NewZealand.AshleyDene.Ashley2013.AshleyFullOpt.paddock.Report
          Simulation Gore_P21ext
            Clock: Start=2015-10-24; End=2016-06-30
            Summary summaryfile
            Weather: FileName=Gore.met
            SoilArbitrator Soil Arbitrator
            Zone paddock: Area=1; Slope=0; AspectAngle=0; Altitude=50
              Soil Lismore: same as FodderBeetValidation.NewZealand.AshleyDene.Ashley2013.AshleyFullOpt.paddock.Lismore
              Plant FodderBeet
              MicroClimate: a_interception=0; b_interception=1; c_interception=0; d_interception=0; SoilHeatFluxFraction=0.4; MinimumHeightDiffForNewLayer=0; NightInterceptionFraction=0.5; ReferenceHeight=2
              Irrigation
              Fertiliser
              SurfaceOrganicMatter surface organic matter: InitialResidueName=wheat; InitialResidueType=wheat; InitialResidueMass=0; InitialStandingFraction=0; InitialCPR=0; InitialCNR=80
              Folder Management
                Manager ExtraVariables
                Manager SowDateCv
                  InitialRootDepth = 2
                  CropToSow = Brigadier
                  SowingDate = 2015-11-02
                  script: same as in FodderBeetValidation.NewZealand.P21EXT.Canterbury.Bankside_P21ext.paddock.Management.SowDateCv
                Operations NFertEvents
                  2015-10-25  [Fertiliser].Apply(34.2, Fertiliser.Types.UreaN, 10);
                  2016-01-22  [Fertiliser].Apply(80, Fertiliser.Types.UreaN, 10);
                  2016-03-09  [Fertiliser].Apply(115, Fertiliser.Types.UreaN, 10);
                Manager TreatSpecIrrgation: same as FodderBeetValidation.NewZealand.AshleyDene.Ashley2013.AshleyFullOpt.paddock.Management.TreatSpecIrrgation
                Manager FungalInfection: same as FodderBeetValidation.NewZealand.AshleyDene.Ashley2013.AshleyFullOpt.paddock.Management.FungalInfection
              Report: same as FodderBeetValidation.NewZealand.AshleyDene.Ashley2013.AshleyFullOpt.paddock.Report
        Folder NorthIsland
          Simulation Manawatu_P21ext
            Clock: Start=2015-10-29; End=2016-06-30
            Summary summaryfile
            Weather: FileName=Ohakune.met
            SoilArbitrator Soil Arbitrator
            Zone paddock: Area=1; Slope=0; AspectAngle=0; Altitude=50
              Soil OhakuneBrownLoam: Region=Plains; State=Canterbury; Country=New Zealand; Latitude=0; Longitude=0
                DataSource=Generic profile descriptions provided by Trevor Webb and data for functional horizions based on SWAMP project results
                Comments=Bulk density values were measured on the fine earth fraction so values entered into apsim soil are adjusted down to account for stone content (assuming stones are inert from all soil process so their mass and volume is removed from model paramaters).  SAT, DUL, LL15 and Air dry have been adjusted down to account for stone content.  OC has not been adjusted so the model will get the correct carbon and N amounts using the adjusted BD.
                Physical
                  Thickness  ParticleSizeClay  BD    AirDry  LL15  DUL   SAT   KS
                  200        27                1.09  0.06    0.19  0.35  0.58  230.2
                  200        24.8              1.02  0.05    0.25  0.35  0.61  1186.5
                  200        19.6              0.67  0.02    0.25  0.45  0.74  4160.1
                  200        13                0.5   0.01    0.31  0.51  0.61  1000
                  200        15                0.6   0.001   0.37  0.52  0.58  1000
                  500        15                0.6   0.001   0.37  0.52  0.58  1000
                  SoilCrop FodderBeetSoil
                    LL=[0.144, 0.136, 0.03, 0.014, 0.01, 0.01]
                    KL=[0.286157, 0.252188, 0.215147, 0.273159, 0.21174, 0.0303872]
                    XF=[1, 1, 1, 1, 1, 1]
                Chemical: Thickness=[75, 75, 170, 200, 160, 820]; PH=[6.2, 6.2, 6.2, 6.2, 6.2, 6.2]; PHUnits=Water
                WaterBalance SoilWater: SummerDate=1-oct; SummerU=9; SummerCona=4.4; WinterDate=1-Apr; WinterU=2; WinterCona=1.5; DiffusConst=88; DiffusSlope=35; Salb=0.13; CN2Bare=73; CNRed=20; CNCov=0.8; PSIDul=-100; Thickness=[300, 300, 300, 300, 300]; SWCON=[0.4, 0.4, 0.4, 0.4, 0.4]
                Nutrient
                Organic: FOMCNRatio=31.5; CarbonUnits=Total
                  Thickness  Carbon  SoilCNRatio  FBiom  FInert  FOM
                  200        4.56    11           0.025  0.45    556.171
                  200        3.42    11           0.025  0.6     372.812
                  200        2.4     11           0.015  0.75    249.904
                  200        0.8     11           0.01   0.9     167.515
                  200        0.5     11           0.01   0.96    112.289
                  500        0.5     11           0.01   0.96    41.3088
                Water: Thickness=[200, 200, 200, 200, 200, 500]; InitialValues=[0.35, 0.35, 0.45, 0.324, 0.37, 0.37]; InitialPAWmm=94.8; RelativeTo=LL15; FilledFromTop=true
                CERESSoilTemperature Temperature
                Solute NO3: Thickness=[75, 75, 170, 200, 160, 820]; InitialValues=[8.21101, 8.21101, 10.8233, 10.9886, 12.1366, 4.26992]; InitialValuesUnits=ppm; WaterTableConcentration=0; D0=0; DepthConstant=0; MaxDepthSoluteAccessible=0; RunoffEffectivenessAtMovingSolute=0; MaxEffectiveRunoff=0
                Solute NH4: Thickness=[75, 75, 170, 200, 160, 820]; InitialValuesUnits=ppm; WaterTableConcentration=0; D0=0; DepthConstant=0; MaxDepthSoluteAccessible=0; RunoffEffectivenessAtMovingSolute=0; MaxEffectiveRunoff=0
                  InitialValues=[0.917431, 0.917431, 0.581251, 0.266023, 0.124627, 0.0349593]
                Solute Urea: Thickness=[75, 75, 170, 200, 160, 820]; InitialValues=[0, 0, 0, 0, 0, 0]; InitialValuesUnits=kg/ha; WaterTableConcentration=0; D0=0; DepthConstant=0; MaxDepthSoluteAccessible=0; RunoffEffectivenessAtMovingSolute=0; MaxEffectiveRunoff=0
              Plant FodderBeet
              MicroClimate: a_interception=0; b_interception=1; c_interception=0; d_interception=0; SoilHeatFluxFraction=0.4; MinimumHeightDiffForNewLayer=0; NightInterceptionFraction=0.5; ReferenceHeight=2
              Irrigation
              Fertiliser
              SurfaceOrganicMatter surface organic matter: InitialResidueName=wheat; InitialResidueType=wheat; InitialResidueMass=0; InitialStandingFraction=0; InitialCPR=0; InitialCNR=80
              Folder Management
                Manager ExtraVariables
                Manager SowDateCv
                  InitialRootDepth = 2
                  CropToSow = Rivage
                  SowingDate = 2015-10-30
                  script: same as in FodderBeetValidation.NewZealand.P21EXT.Canterbury.Bankside_P21ext.paddock.Management.SowDateCv
                Operations NFertEvents
                  2015-10-30  [Fertiliser].Apply(100, Fertiliser.Types.UreaN, 10);
                  2015-12-17  [Fertiliser].Apply(46, Fertiliser.Types.UreaN, 10);
                Manager TreatSpecIrrgation: same as FodderBeetValidation.NewZealand.AshleyDene.Ashley2013.AshleyFullOpt.paddock.Management.TreatSpecIrrgation
                Manager FungalInfection: same as FodderBeetValidation.NewZealand.AshleyDene.Ashley2013.AshleyFullOpt.paddock.Management.FungalInfection
              Report: same as FodderBeetValidation.NewZealand.AshleyDene.Ashley2013.AshleyFullOpt.paddock.Report
          Simulation Waikato_P21ext
            Clock: Start=2015-10-19; End=2016-06-30
            Summary summaryfile
            Weather: FileName=Matamata.met
            SoilArbitrator Soil Arbitrator
            Zone paddock: Area=1; Slope=0; AspectAngle=0; Altitude=50
              Soil Ngak_9a1: SoilType=Typic Immature Pallic Soils; Latitude=-41; Longitude=174
                DataSource=Profile descriptions provided by Smap based on the work done by Trevor Webb.
                Physical
                  Thickness  BD    AirDry  LL15      DUL       SAT       KS
                  200        0.86  0.1     0.15      0.31      0.63608   40.14
                  200        0.79  0.17    0.17      0.33      0.686044  541.16
                  200        0.85  0.2     0.2       0.39      0.665399  1419.04
                  200        1     0.229   0.229355  0.43524   0.609973  1052.73
                  200        1.24  0.1     0.100131  0.262056  0.53034   20522.99
                  500        1.24  0.1     0.1       0.26      0.53      10523
                  SoilCrop FodderbeetSoil: LL=[0.15, 0.17, 0.2, 0.23, 0.1, 0.1]; KL=[0.1, 0.1, 0.1, 0.1, 0.1, 0.1]; XF=[1, 1, 1, 1, 1, 1]
                Organic: FOMCNRatio=40; CarbonUnits=Total
                  Thickness  Carbon  SoilCNRatio  FBiom  FInert  FOM
                  200        6.18    11           0.025  0.45    556.171
                  200        2.37    11           0.025  0.6     372.812
                  200        1.22    11           0.015  0.75    249.904
                  200        0.9     11           0.01   0.9     167.515
                  200        0.48    11           0.01   0.96    112.289
                  500        0.9     11           0.01   0.96    41.3088
                Chemical: Thickness=[300, 300, 300, 300, 300]; PH=[7, 7, 7, 7, 7]; PHUnits=Water
                Water: Thickness=[200, 200, 200, 200, 200, 500]; InitialValues=[0.31, 0.33, 0.39, 0.43524, 0.262056, 0.101552]; InitialPAWmm=176.338; RelativeTo=LL15; FilledFromTop=true
                WaterBalance SoilWater: SummerDate=1-oct; SummerU=9; SummerCona=4.4; WinterDate=1-apr; WinterU=9; WinterCona=4.4; DiffusConst=88; DiffusSlope=35; Salb=0.13; CN2Bare=73; CNRed=20; CNCov=0.8; PSIDul=-100; Thickness=[300, 300, 300, 300, 300]; SWCON=[0.3, 0.2, 0.2, 0.5, 0.9]
                Nutrient
                CERESSoilTemperature Temperature
                Solute NO3: Thickness=[300, 300, 300, 300, 300]; InitialValues=[58.0363, 41.5172, 18.1606, 5.52396, 0.322581]; InitialValuesUnits=ppm; WaterTableConcentration=0; D0=0; DepthConstant=0; MaxDepthSoluteAccessible=0; RunoffEffectivenessAtMovingSolute=0; MaxEffectiveRunoff=0
                Solute NH4: Thickness=[300, 300, 300, 300, 300]; InitialValues=[0.973885, 1.10878, 1.12234, 0.430668, 0.145161]; InitialValuesUnits=ppm; WaterTableConcentration=0; D0=0; DepthConstant=0; MaxDepthSoluteAccessible=0; RunoffEffectivenessAtMovingSolute=0; MaxEffectiveRunoff=0
                Solute Urea: Thickness=[300, 300, 300, 300, 300]; InitialValues=[0, 0, 0, 0, 0]; InitialValuesUnits=kg/ha; WaterTableConcentration=0; D0=0; DepthConstant=0; MaxDepthSoluteAccessible=0; RunoffEffectivenessAtMovingSolute=0; MaxEffectiveRunoff=0
              Plant FodderBeet
              MicroClimate: a_interception=0; b_interception=1; c_interception=0; d_interception=0; SoilHeatFluxFraction=0.4; MinimumHeightDiffForNewLayer=0; NightInterceptionFraction=0.5; ReferenceHeight=2
              Irrigation
              Fertiliser
              SurfaceOrganicMatter surface organic matter: InitialResidueName=wheat; InitialResidueType=wheat; InitialResidueMass=0; InitialStandingFraction=0; InitialCPR=0; InitialCNR=80
              Folder Management
                Manager ExtraVariables
                Manager SowDateCv
                  InitialRootDepth = 2
                  CropToSow = Rivage
                  SowingDate = 2015-10-28
```csharp
using Models.Soils;
using System;
using Models.Core;
using System.Collections.Generic;
using System.Text;
using Models.PMF;
using Models;
using System.Xml.Serialization;
using APSIM.Shared.Utilities;
using System.Data;
using Models.PMF.Interfaces;
using Models.Surface;

namespace Models
{
    [Serializable] 
    //[System.Xml.Serialization.XmlInclude(typeof(Model))]
    public class Script : Model
    {
        [Link] Plant FodderBeet;
        [Link] Clock Clock;
        [Link] Zone zone;
        [Link] Simulation Simulation;
        [Link] SurfaceOrganicMatter SurfOM;
        
                
        [Description("Initial Root Depth")]
        public double InitialRootDepth { get; set; }
        [Display(Type=DisplayType.CultivarName)]
        [Description("Sown Crop")]
        public string CropToSow { get; set; }
        [Description("Sowing Date")]
        public DateTime SowingDate { get; set; }
        
        
        
        [EventSubscribe("DoManagement")]
        private void OnDoManagement(object sender, EventArgs e)
        {
            if (Clock.Today.Date == SowingDate)
            {
                FodderBeet.Sow(cultivar: CropToSow, population: 10, depth: InitialRootDepth, rowSpacing: 500);
                
            }
                        
            
        }
    }
}
```
                Operations NFertEvents
                  2015-10-20  [Fertiliser].Apply(46, Fertiliser.Types.UreaN, 10);
                  2015-12-16  [Fertiliser].Apply(118, Fertiliser.Types.UreaN, 10);
                Manager TreatSpecIrrgation: same as FodderBeetValidation.NewZealand.AshleyDene.Ashley2013.AshleyFullOpt.paddock.Management.TreatSpecIrrgation
                Manager FungalInfection: same as FodderBeetValidation.NewZealand.AshleyDene.Ashley2013.AshleyFullOpt.paddock.Management.FungalInfection
              Report: same as FodderBeetValidation.NewZealand.AshleyDene.Ashley2013.AshleyFullOpt.paddock.Report
      Folder FRNL_NCRS
        Memo Trial details
          The data used here is from the FRNL trials managed by de Ruiter et al.
        Experiment FRNL_NCRS2014
          Factors
            Factor Nit
              CompositeFactor 0: Specifications=[FertiliserEvents]
                Operations FertiliserEvents
                  2014-11-21  [Fertiliser].Apply(0, Fertiliser.Types.NO3N,0);
                  2014-12-23  [Fertiliser].Apply(0, Fertiliser.Types.NO3N,0);
              CompositeFactor 100: Specifications=[FertiliserEvents]
                Operations FertiliserEvents
                  2014-11-21  [Fertiliser].Apply(50, Fertiliser.Types.NO3N,0);
                  2014-12-23  [Fertiliser].Apply(50, Fertiliser.Types.NO3N,0);
          Simulation 2014
            Clock: Start=2014-10-24; End=2015-06-30
            Summary summaryfile
            Weather: FileName=Ruakura.met
            SoilArbitrator Soil Arbitrator
            Zone paddock: Area=1; Slope=0; AspectAngle=0; Altitude=50
              Soil Ngak_9a1: SoilType=Typic Immature Pallic Soils; Latitude=-41; Longitude=174
                DataSource=Profile descriptions provided by Smap based on the work done by Trevor Webb.
                Physical: same as FodderBeetValidation.NewZealand.P21EXT.NorthIsland.Waikato_P21ext.paddock.Ngak_9a1.Physical
                Organic: same as FodderBeetValidation.NewZealand.P21EXT.NorthIsland.Waikato_P21ext.paddock.Ngak_9a1.Organic
                Chemical: Thickness=[300, 300, 300, 300, 300]; PH=[7, 7, 7, 7, 7]; PHUnits=Water
                Water: Thickness=[200, 200, 200, 200, 200, 500]; InitialValues=[0.31, 0.33, 0.39, 0.43524, 0.262056, 0.101552]; InitialPAWmm=176.338; RelativeTo=LL15; FilledFromTop=true
                WaterBalance SoilWater: same as FodderBeetValidation.NewZealand.P21EXT.NorthIsland.Waikato_P21ext.paddock.Ngak_9a1.SoilWater
                Nutrient
                CERESSoilTemperature Temperature
                Solute NO3: Thickness=[300, 300, 300, 300, 300]; InitialValues=[8.5259, 2.77108, 3.39506, 3.14516, 0.537634]; InitialValuesUnits=ppm; WaterTableConcentration=0; D0=0; DepthConstant=0; MaxDepthSoluteAccessible=0; RunoffEffectivenessAtMovingSolute=0; MaxEffectiveRunoff=0
                Solute NH4: Thickness=[300, 300, 300, 300, 300]; InitialValues=[10.0398, 8.4739, 6.88272, 2.63441, 0.537634]; InitialValuesUnits=ppm; WaterTableConcentration=0; D0=0; DepthConstant=0; MaxDepthSoluteAccessible=0; RunoffEffectivenessAtMovingSolute=0; MaxEffectiveRunoff=0
                Solute Urea: Thickness=[300, 300, 300, 300, 300]; InitialValues=[0, 0, 0, 0, 0]; InitialValuesUnits=kg/ha; WaterTableConcentration=0; D0=0; DepthConstant=0; MaxDepthSoluteAccessible=0; RunoffEffectivenessAtMovingSolute=0; MaxEffectiveRunoff=0
              Plant FodderBeet
              MicroClimate: a_interception=0; b_interception=1; c_interception=0; d_interception=0; SoilHeatFluxFraction=0.4; MinimumHeightDiffForNewLayer=0; NightInterceptionFraction=0.5; ReferenceHeight=2
              Irrigation
              Fertiliser
              SurfaceOrganicMatter surface organic matter: InitialResidueName=wheat; InitialResidueType=wheat; InitialResidueMass=0; InitialStandingFraction=0; InitialCPR=0; InitialCNR=80
              Folder Management
                Manager ExtraVariables
                Manager SowDateCv
                  InitialRootDepth = 2
                  CropToSow = Jamon
                  SowingDate = 2014-10-25
                  script: same as in FodderBeetValidation.NewZealand.P21EXT.Canterbury.Bankside_P21ext.paddock.Management.SowDateCv
                Operations IrrigationEvents
                  Memo
                    MOnthly rain guage tip outs so irrigation need to be estimated minus rain fall
                Operations FertiliserEvents: same as FodderBeetValidation.NewZealand.FRNL_NCRS.FRNL_NCRS2014.Factors.Nit.0.FertiliserEvents
                Manager FungalInfection: same as FodderBeetValidation.NewZealand.SFF.Canterbury.Orari.Orari.paddock.Management.FungalInfection
              Report: same as FodderBeetValidation.NewZealand.AshleyDene.Ashley2013.AshleyFullOpt.paddock.Report
        Experiment FRNL_NCRS2015
          Factors
            Factor SD
              CompositeFactor SepNit0
                Specifications:
                  [Sowing].Script.SowingDate = 2015-09-29
                  [FertiliserEvents]
                Operations FertiliserEvents
                  2015-11-27  [Fertiliser].Apply(0, Fertiliser.Types.NO3N,0);
                  2015-12-16  [Fertiliser].Apply(0, Fertiliser.Types.NO3N,0);
              CompositeFactor SepNit100
                Specifications:
                  [Sowing].Script.SowingDate = 2015-09-29
                  [FertiliserEvents]
                Operations FertiliserEvents
                  2015-11-27  [Fertiliser].Apply(50, Fertiliser.Types.NO3N,0);
                  2015-12-16  [Fertiliser].Apply(50, Fertiliser.Types.NO3N,0);
              CompositeFactor OctNit0
                Specifications:
                  [Sowing].Script.SowingDate = 2015-10-30
                  [FertiliserEvents]
                Operations FertiliserEvents
                  2015-12-13  [Fertiliser].Apply(0, Fertiliser.Types.NO3N,0);
                  2016-01-12  [Fertiliser].Apply(0, Fertiliser.Types.NO3N,0);
              CompositeFactor OctNit100
                Specifications:
                  [Sowing].Script.SowingDate = 2015-10-30
                  [FertiliserEvents]
                Operations FertiliserEvents
                  2015-12-13  [Fertiliser].Apply(50, Fertiliser.Types.NO3N,0);
                  2016-01-12  [Fertiliser].Apply(50, Fertiliser.Types.NO3N,0);
          Simulation 2015
            Clock: Start=2015-09-24; End=2016-05-30
            Summary summaryfile
            Weather: FileName=Ruakura.met
            SoilArbitrator Soil Arbitrator
            Zone paddock: Area=1; Slope=0; AspectAngle=0; Altitude=50
              Soil Ngak_9a1: SoilType=Typic Immature Pallic Soils; Latitude=-41; Longitude=174
                DataSource=Profile descriptions provided by Smap based on the work done by Trevor Webb.
                Physical: same as FodderBeetValidation.NewZealand.P21EXT.NorthIsland.Waikato_P21ext.paddock.Ngak_9a1.Physical
                Organic: same as FodderBeetValidation.NewZealand.P21EXT.NorthIsland.Waikato_P21ext.paddock.Ngak_9a1.Organic
                Chemical: Thickness=[300, 300, 300, 300, 300]; PH=[7, 7, 7, 7, 7]; PHUnits=Water
                Water: Thickness=[200, 200, 200, 200, 200, 500]; InitialValues=[0.31, 0.33, 0.39, 0.43524, 0.262056, 0.101552]; InitialPAWmm=176.338; RelativeTo=LL15; FilledFromTop=true
                WaterBalance SoilWater: same as FodderBeetValidation.NewZealand.P21EXT.NorthIsland.Waikato_P21ext.paddock.Ngak_9a1.SoilWater
                Nutrient
                CERESSoilTemperature Temperature
                Solute NO3: same as FodderBeetValidation.NewZealand.FRNL_NCRS.FRNL_NCRS2014.2014.paddock.Ngak_9a1.NO3
                Solute NH4: Thickness=[300, 300, 300, 300, 300]; InitialValues=[10.0398, 8.4739, 3.7963, 2.63441, 0.537634]; InitialValuesUnits=ppm; WaterTableConcentration=0; D0=0; DepthConstant=0; MaxDepthSoluteAccessible=0; RunoffEffectivenessAtMovingSolute=0; MaxEffectiveRunoff=0
                Solute Urea: Thickness=[300, 300, 300, 300, 300]; InitialValues=[0, 0, 0, 0, 0]; InitialValuesUnits=kg/ha; WaterTableConcentration=0; D0=0; DepthConstant=0; MaxDepthSoluteAccessible=0; RunoffEffectivenessAtMovingSolute=0; MaxEffectiveRunoff=0
              Plant FodderBeet
              MicroClimate: a_interception=0; b_interception=1; c_interception=0; d_interception=0; SoilHeatFluxFraction=0.4; MinimumHeightDiffForNewLayer=0; NightInterceptionFraction=0.5; ReferenceHeight=2
              Irrigation
              Fertiliser
              SurfaceOrganicMatter surface organic matter: InitialResidueName=wheat; InitialResidueType=wheat; InitialResidueMass=0; InitialStandingFraction=0; InitialCPR=0; InitialCNR=80
              Folder Management
                Manager ExtraVariables
                Manager Sowing
                  InitialRootDepth = 2
                  CropToSow = Jamon
                  SowingDate = 2015-10-27
                  script: same as in FodderBeetValidation.NewZealand.P21EXT.Canterbury.Bankside_P21ext.paddock.Management.SowDateCv
                Operations IrrigationEvents
                Operations FertiliserEvents: same as FodderBeetValidation.NewZealand.FRNL_NCRS.FRNL_NCRS2015.Factors.SD.OctNit0.FertiliserEvents
                Manager FungalInfection: same as FodderBeetValidation.NewZealand.SFF.Canterbury.Orari.Orari.paddock.Management.FungalInfection
              Report: same as FodderBeetValidation.NewZealand.AshleyDene.Ashley2013.AshleyFullOpt.paddock.Report
    Folder Australia
      Memo Trial details
        Fodder beet population experiment based on Pembleton & Rawnsley (2011) report. Three sowing (precision)rates (4, 8, 12 plants/m^2) were evaluated.
      Experiment Irishtown
        Factors
          Factor Pop
            CompositeFactor 40K: Specifications=[Sowing].Script.Population = 4
            CompositeFactor 80K: Specifications=[Sowing].Script.Population = 8
            CompositeFactor 120K: Specifications=[Sowing].Script.Population = 12
        Simulation Irishtown
          Clock: Start=2010-12-27; End=2011-07-12
          Summary summaryfile
          Weather: FileName=Hobart.met
          SoilArbitrator Soil Arbitrator
          Zone paddock: Area=1; Slope=0; AspectAngle=0; Altitude=50
            Soil Red_Ferrosol: ASCOrder=Ferrosol; ASCSubOrder=Red; SoilType=?; Site=Moriarty; NearestTown=Moriarty; Region=North West Coast; State=Tasmania; Country=Australia; ApsoilNumber=776; Latitude=-41.2286; Longitude=146.499; LocationAccuracy=+/- 20m
              DataSource=Data collected by Bill Cotching as part of project 'Landscape Logic' in collaboration with Shaun Lisson
              Comments=Site 3 (IH); A1, 0-21cm; Dark reddish brown (5YR3/3); Clay loam; strong fine subangular blocky structure; moderately firm consistence (moist); many very fine roots; abrupt smooth boundary; B1, 21-40cm; Dark reddish brown (2.5YR2.5/4); Light clay; strong f
              Memo
                From the classic APSIM soil folder - Red Ferrosol (Moriarty No 776).
              Chemical: PHUnits=Water
                Thickness  PH   EC    ESP
                210        5.9  0.14  2.133
                190        5.9  0.15  4.912
                250        6.3  0.17  5.83
                280        6.5  0.15  6.641
                270        6.6  0.12  5.694
              Water: Thickness=[210, 190, 250, 280, 270]; InitialValues=[0.432, 0.404, 0.404, 0.4045, 0.4597]; InitialPAWmm=143.659; RelativeTo=LL15; FilledFromTop=false
              Physical
                Thickness  BD     AirDry  LL15  DUL    SAT
                210        1.11   0.14    0.28  0.44   0.551
                190        1.21   0.232   0.29  0.41   0.513
                250        1.21   0.29    0.29  0.41   0.513
                280        1.21   0.3     0.3   0.41   0.513
                270        1.203  0.34    0.34  0.466  0.513
                SoilCrop FodderBeetSoil: LL=[0.28, 0.29, 0.29, 0.3, 0.34]; KL=[0.06, 0.06, 0.06, 0.06, 0.06]; XF=[1, 1, 1, 1, 1]
              WaterBalance SoilWater: SummerDate=1-Nov; SummerU=9; SummerCona=4.4; WinterDate=1-Apr; WinterU=9; WinterCona=4.4; DiffusConst=88; DiffusSlope=35.4; Salb=0.18; CN2Bare=68; CNRed=20; CNCov=0.8; PSIDul=-100; Thickness=[210, 190, 250, 280, 270]; SWCON=[0.5, 0.3, 0.3, 0.3, 0.3]
              Nutrient
              Organic: FOMCNRatio=40; CarbonUnits=Total
                Thickness  Carbon  SoilCNRatio  FBiom  FInert  FOM
                210        5.26    12           0.035  0.4     453.676
                190        1.23    12           0.02   0.5     282.134
                250        0.57    12           0.015  0.7     151.015
                280        0.54    12           0.015  0.95    74.9921
                270        0.19    12           0.01   0.95    38.1827
              CERESSoilTemperature Temperature
              Solute NO3: Thickness=[210, 190, 250, 280, 270]; InitialValues=[16.8818, 4.84931, 0.77135, 2.53586, 2.5477]; InitialValuesUnits=ppm; WaterTableConcentration=0; D0=0; DepthConstant=0; MaxDepthSoluteAccessible=0; RunoffEffectivenessAtMovingSolute=0; MaxEffectiveRunoff=0
              Solute NH4: Thickness=[210, 190, 250, 280, 270]; InitialValues=[5.29141, 5.95246, 5.01074, 3.46975, 3.19016]; InitialValuesUnits=ppm; WaterTableConcentration=0; D0=0; DepthConstant=0; MaxDepthSoluteAccessible=0; RunoffEffectivenessAtMovingSolute=0; MaxEffectiveRunoff=0
              Solute Urea: Thickness=[210, 190, 250, 280, 270]; InitialValues=[0, 0, 0, 0, 0]; InitialValuesUnits=kg/ha; WaterTableConcentration=0; D0=0; DepthConstant=0; MaxDepthSoluteAccessible=0; RunoffEffectivenessAtMovingSolute=0; MaxEffectiveRunoff=0
            Plant FodderBeet
            MicroClimate: a_interception=0; b_interception=1; c_interception=0; d_interception=0; SoilHeatFluxFraction=0.4; MinimumHeightDiffForNewLayer=0; NightInterceptionFraction=0.5; ReferenceHeight=2
            Irrigation
            Fertiliser
            SurfaceOrganicMatter surface organic matter: InitialResidueName=wheat; InitialResidueType=wheat; InitialResidueMass=0; InitialStandingFraction=0; InitialCPR=0; InitialCNR=80
            Folder Management
              Manager ExtraVariables
              Manager Sowing
                Population = 9
                InitialRootDepth = 2.5
                CropToSow = Brigadier
                SowingDate = 2010-12-28
```csharp
using Models.Soils;
using System;
using Models.Core;
using System.Collections.Generic;
using System.Text;
using Models.PMF;
using Models;
using System.Xml.Serialization;
using APSIM.Shared.Utilities;
using System.Data;
using Models.PMF.Interfaces;
using Models.Surface;

namespace Models
{
    [Serializable] 
    //[System.Xml.Serialization.XmlInclude(typeof(Model))]
    public class Script : Model
    {
        [Link] Plant FodderBeet;
        [Link] Clock Clock;
        [Link] Zone zone;
        [Link] Simulation Simulation;
        [Link] SurfaceOrganicMatter SurfOM;
        
                
        [Description("Initial Root Depth")]
        public double InitialRootDepth { get; set; }
        [Display(Type=DisplayType.CultivarName)]
        [Description("Sown Crop")]
        public string CropToSow { get; set; }
        [Description("Sowing Date")]
        public DateTime SowingDate { get; set; }
        [Description("Population")]
        public int Population { get; set; }
        
        
        
        [EventSubscribe("DoManagement")]
        private void OnDoManagement(object sender, EventArgs e)
        {
            if (Clock.Today.Date == SowingDate)
            {
                FodderBeet.Sow(cultivar: CropToSow, population: Population, depth: InitialRootDepth, rowSpacing: 500);
                
            }
                        
            
        }
    }
}
```
              Operations IrrigationEvents: same as FodderBeetValidation.NewZealand.Lincoln.Lincoln2012.Factors.Irr.Nil.IrrigationEvents
              Operations NFertEvents
                2011-12-27  [Fertiliser].Apply(26, Fertiliser.Types.UreaN, 0);
                2011-02-24  [Fertiliser].Apply(43, Fertiliser.Types.UreaN, 0);
              Manager FungalInfection: same as FodderBeetValidation.NewZealand.SFF.Canterbury.Orari.Orari.paddock.Management.FungalInfection
            Report: same as FodderBeetValidation.NewZealand.Lincoln.Lincoln2012.ABlockRainfed.paddock.Report
    Folder NewZealand_Sensitivity
      Folder LincolnSens
        Experiment Lincoln2016Temp
          Memo Trial details: same as FodderBeetValidation.NewZealand.Lincoln.LincolnRS2016.Trial details
          Factors
            Factor Temperature
              CompositeFactor Minus2: Specifications=[ClimateControl].Script.TempFactor = -2
              CompositeFactor Minus1: Specifications=[ClimateControl].Script.TempFactor = -1
              CompositeFactor Zero: Specifications=[ClimateControl].Script.TempFactor = 0
              CompositeFactor Plus1: Specifications=[ClimateControl].Script.TempFactor = 1
              CompositeFactor Plus2: Specifications=[ClimateControl].Script.TempFactor = 2
          Simulation RSblock
            Clock: Start=2016-09-28; End=2017-06-09
            Summary summaryfile
            SoilArbitrator Soil Arbitrator
            Zone paddock: Area=1; Slope=0; AspectAngle=0; Altitude=50
              Folder Manager folder
                Operations GeneralIrrigation: same as FodderBeetValidation.NewZealand.Lincoln.LincolnRS2016.Rainshelter.paddock.Manager folder.GeneralIrrigation
                Operations Irrig
                  2016-09-02  [Irrigation].Apply(25);
                  2016-10-25  [Irrigation].Apply(5);
                  2016-10-28  [Irrigation].Apply(5);
                  2016-11-17  [Irrigation].Apply(5);
                  2016-11-23  [Irrigation].Apply(30);
                  2016-11-30  [Irrigation].Apply(0);
                  2016-12-07  [Irrigation].Apply(25);
                  2016-12-21  [Irrigation].Apply(25);
                  2016-12-29  [Irrigation].Apply(30);
                  2017-01-04  [Irrigation].Apply(40);
                  2017-01-11  [Irrigation].Apply(32.9);
                  2017-01-18  [Irrigation].Apply(25.4);
                  2017-01-25  [Irrigation].Apply(31.3);
                  2017-02-08  [Irrigation].Apply(33);
                  2017-02-15  [Irrigation].Apply(35);
                  2017-02-22  [Irrigation].Apply(29);
                  2017-02-15  [Irrigation].Apply(35);
                  2017-02-22  [Irrigation].Apply(29);
                  2017-03-01  [Irrigation].Apply(32.6);
                  2017-03-08  [Irrigation].Apply(34);
                  2017-03-15  [Irrigation].Apply(0);
                  2017-03-22  [Irrigation].Apply(50);
                  2017-03-29  [Irrigation].Apply(0);
                  2017-04-05  [Irrigation].Apply(0);
                  2017-04-12  [Irrigation].Apply(30.9);
                  2017-04-27  [Irrigation].Apply(18.9);
                Operations Fert
                  2016-10-29  [Fertiliser].Apply(100, Fertiliser.Types.UreaN, 100);
                  2017-01-18  [Fertiliser].Apply(100, Fertiliser.Types.UreaN, 100);
                  2017-02-25  [Fertiliser].Apply(100, Fertiliser.Types.UreaN, 100);
                Operations Testing
                Manager ClimateControl
                  StartDate = 2016-10-17
                  EndDate = 2017-05-20
                  TempFactor = 0
```csharp
using Models.Soils;
using System.Xml.Serialization;
using Models;
using Models.PMF;
using System.Text;
using System.Collections.Generic;
using APSIM.Shared.Utilities;
using Models.Core;
using System;
using Models.Climate;

namespace Models
{
    [Serializable] 
    [System.Xml.Serialization.XmlInclude(typeof(Model))]
    public class Script : Model
    {
        [Link] Weather Met;
        [Link] Clock Clock;
    
        [Description("Start Date")]
        public DateTime StartDate { get; set; }
        
        [Description("End Date")]
        public DateTime EndDate { get; set; }

       [Description("Change in temperature")]
        public float TempFactor { get; set; }

 
    
        [EventSubscribe("PreparingNewWeatherData")]
        private void OnPreparingNewWeatherData(object sender, EventArgs e)
        {
         Met.MinT +=  TempFactor;   Met.MaxT +=  TempFactor;    
        
        }
    }
}
```
                Manager StateFactors: same as FodderBeetValidation.NewZealand.Lincoln.LincolnRS2016.Rainshelter.paddock.Manager folder.StateFactors
                Manager SowDateCv: same as FodderBeetValidation.NewZealand.Lincoln.LincolnRS2016.Rainshelter.paddock.Manager folder.SowDateCv
              MicroClimate: a_interception=0; b_interception=1; c_interception=0; d_interception=0; SoilHeatFluxFraction=0.4; MinimumHeightDiffForNewLayer=0; NightInterceptionFraction=0.5; ReferenceHeight=2
              Irrigation
              Fertiliser
              SurfaceOrganicMatter Surface Organic Matter: InitialResidueName=wheat_stubble; InitialResidueType=wheat; InitialResidueMass=1500; InitialStandingFraction=0; InitialCPR=0; InitialCNR=80
              Soil: same as FodderBeetValidation.NewZealand.SFF.Canterbury.Orari.Orari.paddock.Soil
              Report EnviroReport: EventNames=[Clock].DoReport
                VariableNames:
                  [Clock].Today
                  [Weather].MeanT
                  [Weather].Radn
                  [Weather].Rain
                  [Irrigation].IrrigationApplied
                  [FodderBeet].Leaf.Fw
                  [MicroClimate].PrecipitationInterception as Interception
                  [Soil].SoilWater.Es as Evaporation
                  [Soil].SoilWater.Drainage as Drainage
                  [Soil].SoilWater.Runoff as Runoff
                  sum([Soil].Water.MM) as TotalSoilWater
                  sum([Soil].Nutrient.MineralisedN) as MineralisedN
                  [Fertiliser].NitrogenApplied as FertiliserN
                  sum([Soil].Nutrient.DenitrifiedN) as DenitrifiedN
                  ([Soil].SoilWater.LeachUrea+[Soil].SoilWater.LeachNH4+[Soil].SoilWater.LeachNO3) as NLeached
                  [SurfaceOrganicMatter].N as TotalSurfOMN
                  sum([Soil].Nutrient.FOM.N) as TotalFOMN
                  sum([Soil].Nutrient.MicrobialN) as TotalMicrobialN
                  sum([Soil].Nutrient.HumicN) as TotalHumicN
                  (sum([Soil].NH4.kgha) + sum([Soil].NO3.kgha)) as TotalSoilN
                  sum([Soil].Urea.kgha) as TotalUrea
                  sum([Soil].NH4.kgha) as TotalNH4
                  sum([Soil].NO3.kgha) as TotalNO3
              Report: same as FodderBeetValidation.NewZealand.Lincoln.LincolnRS2016.Rainshelter.paddock.Report
              Plant FodderBeet
            Weather: FileName=lincoln.met
        Experiment Lincoln2016Extinc
          Memo Trial details: same as FodderBeetValidation.NewZealand.Lincoln.LincolnRS2016.Trial details
          Factors
            Factor KCoefficent
              CompositeFactor Point2: Specifications=[SowDateCv].Script.Extinc = 0.2
              CompositeFactor Point3: Specifications=[SowDateCv].Script.Extinc = 0.3
              CompositeFactor Point4: Specifications=[SowDateCv].Script.Extinc = 0.4
              CompositeFactor Point5: Specifications=[SowDateCv].Script.Extinc = 0.5
              CompositeFactor Point6: Specifications=[SowDateCv].Script.Extinc = 0.6
              CompositeFactor Point7: Specifications=[SowDateCv].Script.Extinc = 0.7
              CompositeFactor Point8: Specifications=[SowDateCv].Script.Extinc = 0.8
              CompositeFactor Point9: Specifications=[SowDateCv].Script.Extinc = 0.9
          Simulation RSblockE
            Clock: Start=2016-09-28; End=2017-06-09
            Summary summaryfile
            SoilArbitrator Soil Arbitrator
            Zone paddock: Area=1; Slope=0; AspectAngle=0; Altitude=50
              Folder Manager folder
                Operations GeneralIrrigation: same as FodderBeetValidation.NewZealand.Lincoln.LincolnRS2016.Rainshelter.paddock.Manager folder.GeneralIrrigation
                Operations Irrig: same as FodderBeetValidation.NewZealand_Sensitivity.LincolnSens.Lincoln2016Temp.RSblock.paddock.Manager folder.Irrig
                Operations Fert: same as FodderBeetValidation.NewZealand_Sensitivity.LincolnSens.Lincoln2016Temp.RSblock.paddock.Manager folder.Fert
                Operations Testing
                Manager ClimateControl
                  TempFactor = 0
                  StartDate = 2016-10-17
                  EndDate = 2017-05-20
                  script: same as in FodderBeetValidation.NewZealand_Sensitivity.LincolnSens.Lincoln2016Temp.RSblock.paddock.Manager folder.ClimateControl
                Manager StateFactors: same as FodderBeetValidation.NewZealand.Lincoln.LincolnRS2016.Rainshelter.paddock.Manager folder.StateFactors
                Manager SowDateCv
                  Extinc = 0.8
                  InitialRootDepth = 5
                  CropToSow = Rivage
                  SowingDate = 2016-10-18
```csharp
using Models.Soils;
using System;
using Models.Core;
using System.Collections.Generic;
using System.Text;
using Models.PMF;
using Models;
using System.Xml.Serialization;
using APSIM.Shared.Utilities;
using System.Data;
using Models.PMF.Interfaces;
using Models.Surface;

namespace Models
{
    [Serializable] 
    //[System.Xml.Serialization.XmlInclude(typeof(Model))]
    public class Script : Model
    {
        [Link] Plant FodderBeet;
        [Link] Clock Clock;
        [Link] Zone zone;
        [Link] Simulation Simulation;
        [Link] SurfaceOrganicMatter SurfOM;
        
                
        [Description("Initial Root Depth")]
        public double InitialRootDepth { get; set; }
        [Description("Sown Crop")]
        public string CropToSow { get; set; }
        [Description("Sowing Date")]
        public DateTime SowingDate { get; set; }
        [Description("Extinction")]
        public float Extinc { get; set; }
        //[Description("Sowing Date3")]
        //public DateTime SowingDate3 { get; set; }
        //[Description("Sowing Date4")]
        //public DateTime SowingDate4 { get; set; }
        
        
        [EventSubscribe("DoManagement")]
        private void OnDoManagement(object sender, EventArgs e)
        {
            if (Clock.Today.Date == SowingDate)
            {
                FodderBeet.Sow(cultivar: CropToSow, population: 9, depth: InitialRootDepth, rowSpacing: 500);
                zone.Set("FodderBeet.Leaf.ExtinctionCoeff.PotentialExtinctionCoeff.FixedValue",Extinc);
            }
           
            
            
        }
    }
}
```
              MicroClimate: a_interception=0; b_interception=1; c_interception=0; d_interception=0; SoilHeatFluxFraction=0.4; MinimumHeightDiffForNewLayer=0; NightInterceptionFraction=0.5; ReferenceHeight=2
              Irrigation
              Fertiliser
              SurfaceOrganicMatter Surface Organic Matter: InitialResidueName=wheat_stubble; InitialResidueType=wheat; InitialResidueMass=1500; InitialStandingFraction=0; InitialCPR=0; InitialCNR=80
              Soil: same as FodderBeetValidation.NewZealand.SFF.Canterbury.Orari.Orari.paddock.Soil
              Report EnviroReport: same as FodderBeetValidation.NewZealand_Sensitivity.LincolnSens.Lincoln2016Temp.RSblock.paddock.EnviroReport
              Report: same as FodderBeetValidation.NewZealand.Lincoln.LincolnRS2016.Rainshelter.paddock.Report
              Plant FodderBeet
            Weather: FileName=lincoln.met
    Folder GrazingExample
      Simulation AshleyDene2013
        Memo Trial details
          This represents a Grazing trial at Ashley Dene, Canterbury, New Zealand

          Management and Data from
          Edwards, G.R., J.M., d.R., Dalley, D.E., Pinxterhuis, J.B., Cameron, K.C., Bryant, R.H., Di, H.J., Malcolm, B.J.and Chapman, D.F. 2014. Dry matter intake and body condition score change of dairy cows grazing fodder beet, kale and kale-oat forage systems in winter. Proceedings of the New Zealand Grassland Association 76: 81-88.
        Clock: Start=2012-10-20; End=2013-08-01
        Summary summaryfile
        Weather: FileName=lincoln.met
        SoilArbitrator Soil Arbitrator
        Zone paddock: Area=1; Slope=0; AspectAngle=0; Altitude=50
          Soil Lismore: SoilType=NZ_sedementary; Region=Plains; State=Canterbury; Country=New Zealand; Latitude=0; Longitude=0
            DataSource=Generic profile descriptions provided by Trevor Webb and data for functional horizions based on SWAMP project results
            Comments=Bulk density values were measured on the fine earth fraction so values entered into apsim soil are adjusted down to account for stone content (assuming stones are inert from all soil process so their mass and volume is removed from model paramaters).  SAT, DUL, LL15 and Air dry have been adjusted down to account for stone content.  OC has not been adjusted so the model will get the correct carbon and N amounts using the adjusted BD.
            Chemical: Thickness=[200, 100, 300, 300, 300, 300]; PH=[6, 6, 6, 6, 6, 6]; PHUnits=Water
            Physical
              Thickness  BD     AirDry  LL15  DUL   SAT
              200        1.09   0.1     0.17  0.37  0.53
              100        1.09   0.05    0.17  0.37  0.53
              300        0.7    0.02    0.07  0.15  0.24
              300        0.455  0.01    0.07  0.15  0.24
              300        0.25   0.001   0.01  0.04  0.16
              300        0.25   0.001   0.01  0.04  0.16
              SoilCrop FodderBeetSoil
                LL=[0.144, 0.136, 0.03, 0.014, 0.01, 0.01]
                KL=[0.286157, 0.252188, 0.215147, 0.273159, 0.21174, 0.0303872]
                XF=[1, 1, 1, 1, 1, 1]
            WaterBalance SoilWater: same as FodderBeetValidation.NewZealand.AshleyDene.Ashley2013.AshleyFullOpt.paddock.Lismore.SoilWater
            Nutrient
            Organic: same as FodderBeetValidation.NewZealand.AshleyDene.Ashley2013.AshleyFullOpt.paddock.Lismore.Organic
            Water: Thickness=[200, 100, 300, 300, 300, 300]; InitialValues=[0.37, 0.37, 0.15, 0.15, 0.04, 0.04]; InitialPAWmm=126; RelativeTo=LL15; FilledFromTop=true
            CERESSoilTemperature Temperature
            Solute NO3: same as FodderBeetValidation.NewZealand.AshleyDene.Ashley2013.AshleyFullOpt.paddock.Lismore.NO3
            Solute NH4: same as FodderBeetValidation.NewZealand.AshleyDene.Ashley2013.AshleyFullOpt.paddock.Lismore.NH4
            Solute Urea: same as FodderBeetValidation.NewZealand.AshleyDene.Ashley2013.AshleyFullOpt.paddock.Lismore.Urea
          Plant FodderBeet
          MicroClimate: a_interception=0; b_interception=1; c_interception=0; d_interception=0; SoilHeatFluxFraction=0.4; MinimumHeightDiffForNewLayer=0; NightInterceptionFraction=0.5; ReferenceHeight=2
          Irrigation
          Fertiliser
          SurfaceOrganicMatter surface organic matter: InitialResidueName=wheat; InitialResidueType=wheat; InitialResidueMass=0; InitialStandingFraction=0; InitialCPR=0; InitialCNR=80
          Folder Management
            Manager ExtraVariables
            Manager SowDateCv: same as FodderBeetValidation.NewZealand.Lincoln.Lincoln2012.ABlockRainfed.paddock.Management.SowDateCv
            Operations IrrigationEvents
              2012-12-23  [Irrigation].Apply(15);
              2013-01-06  [Irrigation].Apply(15);
              2013-01-13  [Irrigation].Apply(15);
              2013-01-20  [Irrigation].Apply(15);
              2013-01-27  [Irrigation].Apply(15);
              2013-02-06  [Irrigation].Apply(15);
              2013-02-13  [Irrigation].Apply(15);
              2013-02-20  [Irrigation].Apply(15);
              2013-02-27  [Irrigation].Apply(15);
              2013-03-04  [Irrigation].Apply(15);
            Operations NFertEvents
              2012-11-25  [Fertiliser].Apply(100, Fertiliser.Types.UreaN,10);
              2013-01-25  [Fertiliser].Apply(69, Fertiliser.Types.UreaN,10);
            Manager FungalInfection: same as FodderBeetValidation.NewZealand.P21EXT.Canterbury.Springston_P21ext.paddock.Management.FungalInfection
          Report: same as FodderBeetValidation.NewZealand.AshleyDene.Ashley2013.AshleyFullOpt.paddock.Report
        Manager GrazeForageCrop
          Genotype = Friesian
          Sex = Female
          Age = 36
          Weight = 520
          Pregnant = 0
          Lactating = 0
          YoungNumber = 0
          YoungWt = 0
          StockingRate = 50
          CurrentLocation = Away
          PreGrazingDM = 2800
          PostGrazingDM = 5
          DoNoGrazingWindow = True
          NoGrazeStart = 1-Nov
          NoGrazeEnd = 30-may
          NumStock = 0
          GrazingSeasonIsOpen = False
```csharp
using System.Diagnostics;
using Models.AgPasture;
using System.Linq;
using System.Collections.Generic;
using System.Collections;
using Models.Soils;
using Models.PMF;
using System.Xml.Serialization;
using APSIM.Shared.Utilities;
using Models.GrazPlan;
using Models.Utilities;
using Models.Core;
using Models;
using System;

namespace Models
{

    [Serializable]
    public class Script : Model
    {
        [Link] Clock clock;
        [Link] Stock stock;
        [Link] List<Zone> paddocks;
        [Link] ISummary summary;
        [Link] Simulation farm;

        private int CurrentGroupNum = 1;    // animal group number
        private int CurrentLocationNum { get; set; }

        public enum Genotypes
        {
            SmallMerino,
            Angus,
            Friesian
        }

        [Separator("Stock type info, the same type of stock are brought onto the paddock at each grazing")]

        [Description("Stock: genotype (e.g. Small Merino, Angus, Friesian):")] 
        public Genotypes Genotype { get; set; }

        [Description("Stock: sex (Female, Male, Castrate):")] 
        public ReproductiveType Sex { get; set; }

        [Description("Stock: age (months):")] 
        public double Age { get; set; }

        [Description("Stock: weight (kg liveweight /head):")] 
        public double Weight { get; set; }

        [Description("Stock: fertility status (0 if non-pregnant or days since conception):")] 
        public int Pregnant { get; set; }

        [Description("Stock: lactation status (0 if non-lactating or days since parturition):")]
        public int Lactating { get; set; }

        [Description("Stock: number of unweaned young:")]
        public int YoungNumber { get; set; }

        [Description("Stock: weight of unweaned young:")] 
        public double YoungWt { get; set; }

        [Separator("Grazing type info")]

        [Description("Paddock stocking rate (head/ha): ")] 
        public double StockingRate { get; set; }

        [Description("Initial location of the cows (give either the paddock name or 'Away'): ")] 
        public string CurrentLocation { get; set; }

        [Description("Standing biomass at which to bring the stock into the simulation (kg DM/ha): ")] 
        public double PreGrazingDM { get; set; }

        [Description("Standing biomass at which to exit  stock from the simulation (kg DM/ha): ")] 
        public double PostGrazingDM { get; set; }

        [Description("Implement a no-grazing window? (tick for yes): ")] 
        public bool DoNoGrazingWindow { get; set; }

        [Description("Start of the no-grazing window (dd-MMM)")] 
        public string NoGrazeStart { get; set; }

        [Description("End of the no-grazing window (dd-MMM)")] 
        public string NoGrazeEnd { get; set; }


        public int NumStock { get; set; }
        // number of cows on the whole farm
        public bool GrazingSeasonIsOpen { get; set; }


        [EventSubscribe("StartOfSimulation")]
        private void OnStartOfSimulation(object sender, EventArgs e)
        {

            //Debugger.Break();

            summary.WriteMessage(this, "Initialising the paddock information", MessageType.Diagnostic);

            NumStock = (int)(Math.Round(StockingRate * farm.Area, 0));

            if (CurrentLocation.ToLower() != "away")
            {
                BuyStock();
                stock.Move(CurrentLocation);
                summary.WriteMessage(this, " The Stock have been moved to " + CurrentLocation, MessageType.Diagnostic);
            }

            summary.WriteMessage(this, "     The number of animals has been rounded to " + NumStock + " from " + (StockingRate * farm.Area), MessageType.Diagnostic);
            summary.WriteMessage(this, "     The animals will begin in " + CurrentLocation + " which is paddock number " + CurrentLocationNum + " in the simulation", MessageType.Diagnostic);
            summary.WriteMessage(this, "     The area of the whole farm is " + farm.Area + " ha", MessageType.Diagnostic);

        }

        [EventSubscribe("DoManagement")]
        private void OnDoManagement(object sender, EventArgs e)
        {
            GrazingSeasonIsOpen = true;
            if (DoNoGrazingWindow)
                GrazingSeasonIsOpen = !DateUtilities.WithinDates(NoGrazeStart, clock.Today, NoGrazeEnd);

            bool sellSomeStock = false;
            if (!GrazingSeasonIsOpen)
                sellSomeStock = true;

            double harvestableBiomass = paddocks[0].Plants.Sum(plant => plant.AboveGround.Wt * 10);
            if (harvestableBiomass <= PostGrazingDM)
                sellSomeStock = true;

            if (CurrentLocation == "Away")
                sellSomeStock = false;

            if (CurrentLocation == "Away" && harvestableBiomass >= PreGrazingDM && GrazingSeasonIsOpen)
            {
                CurrentLocation = paddocks[0].Name;
                CurrentLocationNum = paddocks[0].Index;
                BuyStock();
                stock.Move(CurrentLocation);
                summary.WriteMessage(this, "     Buying stock ", MessageType.Diagnostic);
            }

            if (sellSomeStock)
            {
                CurrentLocation = "Away";
                CurrentLocationNum = -1;
                SellStock();
                summary.WriteMessage(this, "     Selling stock ", MessageType.Diagnostic);
            }

        }


        public void BuyStock()
        {
            CurrentGroupNum = stock.NoGroups + 1;
            StockBuy purchase = new StockBuy();
            purchase.Genotype = ReflectionUtilities.EnumToString(Genotype);
            purchase.Number = NumStock;
            purchase.Sex = Sex;
            purchase.Age = Age;       // age in months
            purchase.Weight = Weight;  // live weight in kg
            purchase.UseTag = CurrentGroupNum + 1;
            purchase.MatedTo = purchase.Genotype;
            purchase.Pregnant = Pregnant;  // days pregnant, 0 = non pregnant, 1 = pregnant
            purchase.Lactating = Lactating;  // 0 for dry, 1 for lactating
            purchase.NumYoung = YoungNumber;
            purchase.YoungWt = YoungWt;

            stock.Buy(purchase);
        }

        public void SellStock()
        {
            int NumGroups = stock.NoGroups;

            NumGroups = stock.NoGroups;
            foreach (var animalGroup in stock.AnimalGroups)
            {
                stock.Sell(animalGroup.NoAnimals, animalGroup);
            }
        }
    }
}
```
        Stock: RandSeed=9999
        Forages
      Simulation AshleyDene2012
        Memo Trial details
          This represebts a Grazing trial at Ashley Dene, Canterbury, New Zealand

          Management and Data from
          Edwards, G.R., J.M., d.R., Dalley, D.E., Pinxterhuis, J.B., Cameron, K.C., Bryant, R.H., Di, H.J., Malcolm, B.J.and Chapman, D.F. 2014. Dry matter intake and body condition score change of dairy cows grazing fodder beet, kale and kale-oat forage systems in winter. Proceedings of the New Zealand Grassland Association 76: 81-88.
        Clock: Start=2011-10-10; End=2012-08-01
        Summary summaryfile
        Weather: FileName=lincoln.met
        SoilArbitrator Soil Arbitrator
        Zone paddock: Area=1; Slope=0; AspectAngle=0; Altitude=50
          Soil Lismore: same as FodderBeetValidation.GrazingExample.AshleyDene2013.paddock.Lismore
          Plant FodderBeet
          MicroClimate: a_interception=0; b_interception=1; c_interception=0; d_interception=0; SoilHeatFluxFraction=0.4; MinimumHeightDiffForNewLayer=0; NightInterceptionFraction=0.5; ReferenceHeight=2
          Irrigation
          Fertiliser
          SurfaceOrganicMatter surface organic matter: InitialResidueName=wheat; InitialResidueType=wheat; InitialResidueMass=0; InitialStandingFraction=0; InitialCPR=0; InitialCNR=80
          Folder Management
            Manager ExtraVariables
            Manager SowDateCv
              InitialRootDepth = 2
              CropToSow = Rivage
              SowingDate = 2011-10-15
              script: same as in FodderBeetValidation.NewZealand.Lincoln.Lincoln2011.ABlockNit0.paddock.Management.SowDateCv
            Operations IrrigationEvents
              2011-12-23  [Irrigation].Apply(15);
              2012-01-06  [Irrigation].Apply(15);
              2012-01-13  [Irrigation].Apply(15);
              2012-01-20  [Irrigation].Apply(15);
              2012-01-27  [Irrigation].Apply(15);
              2012-02-06  [Irrigation].Apply(15);
              2012-02-13  [Irrigation].Apply(15);
              2012-02-20  [Irrigation].Apply(15);
              2012-02-27  [Irrigation].Apply(15);
              2012-03-04  [Irrigation].Apply(15);
            Operations NFertEvents
              2013-01-25  [Fertiliser].Apply(101, Fertiliser.Types.UreaN,10);
            Manager FungalInfection: same as FodderBeetValidation.NewZealand.P21EXT.Canterbury.Springston_P21ext.paddock.Management.FungalInfection
          Report: same as FodderBeetValidation.NewZealand.AshleyDene.Ashley2013.AshleyFullOpt.paddock.Report
        Manager GrazeForageCrop
          Genotype = Friesian
          Sex = Female
          Age = 36
          Weight = 520
          Pregnant = 0
          Lactating = 0
          YoungNumber = 0
          YoungWt = 0
          StockingRate = 35
          CurrentLocation = Away
          PreGrazingDM = 2800
          PostGrazingDM = 5
          DoNoGrazingWindow = True
          NoGrazeStart = 1-Nov
          NoGrazeEnd = 30-may
          NumStock = 0
          GrazingSeasonIsOpen = False
          script: same as in FodderBeetValidation.GrazingExample.AshleyDene2013.GrazeForageCrop
        Stock: RandSeed=9999
        Forages
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