Simulations: Version=162
  Folder Replacements
    Report GliricidiaDailyReport: EventNames=[Clock].DoReport
      VariableNames:
        [Clock].Today
        [Zone].Area
        [Soil].SoilWater.Es
        sum([Soil].NO3.kgha) as TotalNO3N
        sum([Soil].NH4.kgha) as TotalNH4N
        sum([Soil].Water.MM) as SWTotal
        [Soil].Water.Volumetric[2] as SW30cm
        [Soil].Water.Volumetric[3] as SW50cm
        [Soil].Water.Volumetric[4] as SW70cm
        [Soil].NO3.ppm[1] as NO3ppm10cm
        [Soil].NO3.ppm[2] as NO3ppm30cm
        [Soil].NO3.ppm[3] as NO3ppm50cm
        [Soil].NO3.kgha[1] as NO3kgpha10cm
        [Soil].NO3.kgha[2] as NO3kgpha30cm
        [Soil].NO3.kgha[3] as NO3kgpha50cm
        [Soil].SoilWater.Eo
        [Soil].Organic.FBiom[1] as FBiom10cm
        [Soil].Water.Volumetric[1] as SurfaceSW
        [SurfaceOrganicMatter].Wt
        [Gliricidia].Leaf.LAI
        [Gliricidia].Leaf.Fn
        [Gliricidia].Leaf.Height
        [Gliricidia].Leaf.MaximumNConc.FixedValue
        [Gliricidia].Leaf.MinimumNConc.FixedValue
        [Gliricidia].Leaf.Fw
        [Gliricidia].Leaf.Live.Wt
        [Gliricidia].Leaf.Live.Wt
        [Gliricidia].Stem.Live.Wt
        [Gliricidia].Root.Live.Wt
        [Gliricidia].Root.TotalDMDemand
        [Gliricidia].AboveGround.Wt
        [Gliricidia].Leaf.CoverTotal
        [Gliricidia].Leaf.Live.Wt
        [Gliricidia].Leaf.Dead.Wt
        [Gliricidia].Leaf.Detached.Wt
        sum of [Gliricidia].Leaf.Detached.Wt from [Gliricidia].Cutting to [Clock].Today as CumulativeLitterFall
        [Gliricidia].Stem.Live.Wt
        [Gliricidia].Stem.Dead.Wt
        [Gliricidia].Stem.Detached.Wt
        [Gliricidia].Stem.Dead.Wt
        [Gliricidia].Nodule.FixationRate
        [Gliricidia].Nodule.NFixed
        [Gliricidia].Stem.Live.StorageWt
        [Gliricidia].Stem.Live.StructuralWt
        [Gliricidia].Stem.Live.StorageN
        [Gliricidia].Stem.Live.StructuralN
        [Gliricidia].Leaf.Photosynthesis
        [Gliricidia].Leaf.Detached.Wt
        [CuttingManagement].Script.StemRemovalWt
        [CuttingManagement].Script.LeafRemovalWt
        [CuttingManagement].Script.TotalRemovalWt
        [CuttingManagement].Script.CumulativeTotalRemovalWt
    Report GlircidiaAnnualOutput: EventNames=[Clock].EndOfYear
      VariableNames:
        [Clock].Today
        [Clock].Today.Year
        [Gliricidia].Age
        [Gliricidia].LAI
        sum of [CuttingManagement].Script.TotalRemovalWt from 1-Jan to 31-Dec as AnnualTotalRemovalWt
        sum of [Gliricidia].Nodule.NFixed from 1-Jan to 31-Dec as NFixedAnnualgpm2
    Report MaizeDailyReport: EventNames=[Clock].DoReport
      VariableNames:
        [Clock].Today
        [Clock].Today.DayOfYear
        [Zone].Area
        [Soil].SoilWater.Es
        ([Soil].NO3.kgha[1]+[Soil].NH4.kgha[1]) as SurfaceMineralN
        ([Soil].NO3.kgha[2]+[Soil].NH4.kgha[2]) as Soil2MineralN
        ([Soil].NO3.kgha[3]+[Soil].NH4.kgha[3]) as Soil3MineralN
        ([Soil].NO3.kgha[4]+[Soil].NH4.kgha[4]) as Soil4MineralN
        ([Soil].NO3.kgha[3]+[Soil].NH4.kgha[3]+[Soil].NO3.kgha[4]+[Soil].NH4.kgha[4]) as SubsurfaceMineralN
        sum([Soil].NO3.kgha) as TotalNO3N
        sum([Soil].NH4.kgha) as TotalNH4N
        sum([Soil].Water.MM[1:10]) as SW200cm
        [Soil].Water.Volumetric[2] as SW30cm
        [Soil].Water.Volumetric[3] as SW50cm
        [Soil].Water.Volumetric[4] as SW70cm
        [Soil].NO3.ppm[1] as NO3ppm10cm
        [Soil].NO3.ppm[2] as NO3ppm30cm
        [Soil].NO3.ppm[3] as NO3ppm50cm
        [Soil].NO3.kgha[1] as NO3kgpha10cm
        [Soil].NO3.kgha[2] as NO3kgpha30cm
        [Soil].NO3.kgha[3] as NO3kgpha50cm
        [Soil].SoilWater.LeachNO3
        [Soil].SoilWater.FlowNO3
        [SurfaceOrganicMatter].Wt
        [Soil].SoilWater.Eo
        [Soil].Organic.FBiom[1] as FBiom10cm
        [Soil].Water.Volumetric[1] as SurfaceSW
        [Maize].Leaf.Fw
        [Maize].Leaf.Fn
        [Maize].Root.Depth
        [Maize].Grain.Live.Wt as GrainWt
        [Maize].DaysAfterSowing
        [Maize].Phenology.LeafAppearance.FractionComplete
        [Maize].Leaf.ExpandedCohortNo
        [Maize].Leaf.Height
    Report MaizeHarvestReport: EventNames=[Maize].Harvesting
      VariableNames:
        [Clock].Today
        [Clock].Today.Year as Year
        [Zone].Area
        [Maize].SowingData.Population
        [Maize].SowingDate.DayOfYear
        [Maize].Phenology.CurrentStageName as Stage
        [Maize].Grain.Wt
        [Maize].Stem.Live.Wt
        [Maize].EarLive.Wt
        [Maize].Leaf.Live.Wt
        [Maize].Root.Live.Wt
        [Maize].Husk.Live.Wt
        [Maize].Rachis.Live.Wt
        [Maize].EarLive.N
        [Maize].Grain.Live.N
        [Maize].Stem.Live.N
        [Maize].Leaf.Live.N
        [Maize].Root.Live.N
        [Maize].Root.Depth
        [Maize].AboveGround.N
        [Maize].AboveGround.Wt
        [Maize].Total.N
        [Maize].Total.Wt
        max of [Maize].Leaf.LAI from [Maize].Sowing to [Maize].Harvesting as LAImax
        [Maize].Grain.Number
        [Maize].Grain.Size
        [Maize].Population
  DataStore
    ExcelInput Observed: FileNames=[Observed.xlsx]; SheetNames=[Observed, ObservedGliricidia, ObservedSoil]
    PredictedObserved: PredictedTableName=MaizeHarvestReport; ObservedTableName=Observed; FieldNameUsedForMatch=SimulationName; FieldName2UsedForMatch=Year; FieldName3UsedForMatch=SimulationID; AllColumns=false
    PredictedObserved PredictedObservedSoil: PredictedTableName=MaizeDailyReport; ObservedTableName=ObservedSoil; FieldNameUsedForMatch=SimulationName; FieldName2UsedForMatch=Clock.Today; AllColumns=false
    PredictedObserved PredictedObservedGliricidia: PredictedTableName=GliricidiaDailyReport; ObservedTableName=ObservedGliricidia; FieldNameUsedForMatch=SimulationName; FieldName2UsedForMatch=Clock.Today; AllColumns=false
    Probability: TableName=MaizeHarvestReport; Exceedence=true; FieldToSplitOn=SimulationName
  Folder Validation
    Memo
      The Gliricidia model has been tested using datasets from Malawi, Guadeloupe and USA that cover a wide range of weather conditions, soil, and agronomic systems.
    Experiment Hamakuapoko
      Memo
        This dataset measured above-ground biomass and leaf area, and calculated light interception, in a 2-year experiment on the island of Maui, Hawaii ([HarringtonAndFownes1995]).  The soil was a silty clay classified as an Oxic Haplustoll, with a surface soil (0-15cm) pH of 5-2 (1:1 soil:water), 2-4% organic C, and 0-18% total N.  The dry season from May to October receives one-third of the mean annual rainfall of 1200 mm. We used data only from the uncut treatment, as it was too hard to understand well enough the data for the coppice treatment.
      Factors
        Factor Harvest: Specification=[Operations]
          Operations Nil
      Simulation HamakuapokoBase
        Clock: Start=1988-05-22; End=1990-05-22
        Summary SummaryFile
        Weather: FileName=Hamakuapoko.met
        SoilArbitrator Soil Arbitrator
        MicroClimate: a_interception=0; b_interception=0; c_interception=0; d_interception=0; SoilHeatFluxFraction=0.4; MinimumHeightDiffForNewLayer=0; NightInterceptionFraction=0.5; ReferenceHeight=2
        Zone: Area=1; Slope=0; AspectAngle=0; Altitude=50
          Soil Hamakuapoko Soil: LocalName=Paia Silty Clay; Region=Maui; State=HI; Country=USA; Latitude=20.894444; Longitude=156.363888; DataSource=NRCS 1976; Comments=NRCS 1976 Soil Survey . . . of Hawaii, p. 110-111
            Site=c. 90 m south of Kaheka Rd, south-east of Sunny Side and Kaheka Rds, Maui
            Physical
              Thickness  BD   AirDry  LL15  DUL   SAT
              230        1.4  0.16    0.18  0.35  0.47
              400        1.3  0.17    0.2   0.35  0.5
              350        1    0.18    0.22  0.28  0.55
              500        1    0.21    0.23  0.29  0.59
              270        1    0.23    0.26  0.32  0.59
              130        1    0.23    0.26  0.31  0.59
              SoilCrop MaizeSoil: LL=[0.17, 0.18, 0.19, 0.22, 0.25, 0.25]; KL=[0.08, 0.08, 0.08, 0.08, 0.06, 0.04]; XF=[1, 1, 1, 1, 1, 1]
              SoilCrop GliricidiaSoil: LL=[0.17, 0.18, 0.19, 0.22, 0.24, 0.24]; KL=[0.08, 0.08, 0.08, 0.08, 0.06, 0.04]; XF=[1, 1, 1, 1, 1, 1]
            WaterBalance SoilWater: SummerDate=1-May; SummerU=9; SummerCona=2.5; WinterDate=1-Oct; WinterU=9; WinterCona=2.5; DiffusConst=40; DiffusSlope=16; Salb=0.13; CN2Bare=65; CNRed=20; CNCov=0.8; PSIDul=-100
              Thickness  SWCON  KLAT
              230        0.5    0
              400        0.5    0
              350        0.5    0
              500        0.5    0
              270        0.5    0
              130        0.5    0
            Organic: FOMCNRatio=40; CarbonUnits=Total
              Thickness  Carbon  SoilCNRatio  FBiom  FInert  FOM
              230        2.4     11           0.08   0.2     188.085
              400        2.4     11           0.08   0.2     99.3447
              350        2.4     11           0.08   0.4     56.8311
              500        1.2     11           0.04   0.4     25.5903
              270        0.6     11           0.03   0.4     16.6325
              130        0.3     11           0.02   0.4     13.5165
            Chemical: Thickness=[230, 400, 350, 500, 270, 130]; PH=[5.2, 5.2, 5.2, 5.2, 5.2, 5.2]; PHUnits=Water
            Water: Thickness=[230, 400, 350, 500, 270, 130]; InitialValues=[0.23, 0.23, 0.23, 0.23, 0.23, 0.23]; InitialPAWmm=15; RelativeTo=LL15; FilledFromTop=false
            CERESSoilTemperature Temperature
            Nutrient
            Solute NO3: Thickness=[230, 400, 350, 500, 270, 130]; InitialValues=[20, 1, 0.5, 0.2, 0.1, 0.1]; InitialValuesUnits=ppm; WaterTableConcentration=0; D0=0; DepthConstant=0; MaxDepthSoluteAccessible=0; RunoffEffectivenessAtMovingSolute=0; MaxEffectiveRunoff=0
            Solute NH4: Thickness=[230, 400, 350, 500, 270, 130]; InitialValues=[1, 0.5, 0.2, 0.1, 0.1, 0.1]; InitialValuesUnits=ppm; WaterTableConcentration=0; D0=0; DepthConstant=0; MaxDepthSoluteAccessible=0; RunoffEffectivenessAtMovingSolute=0; MaxEffectiveRunoff=0
            Solute Urea: Thickness=[230, 400, 350, 500, 270, 130]; InitialValues=[0, 0, 0, 0, 0, 0]; InitialValuesUnits=kg/ha; WaterTableConcentration=0; D0=0; DepthConstant=0; MaxDepthSoluteAccessible=0; RunoffEffectivenessAtMovingSolute=0; MaxEffectiveRunoff=0
          Irrigation
          Report GliricidiaDailyReport: EventNames=[Clock].DoReport
            VariableNames:
              [Clock].Today
              [Zone].Area
              [Soil].SoilWater.Es
              sum([Soil].NO3.kgha) as TotalNO3N
              sum([Soil].NH4.kgha) as TotalNH4N
              sum([Soil].Water.MM) as SWTotal
              [Soil].Water.Volumetric[2] as SW30cm
              [Soil].Water.Volumetric[3] as SW50cm
              [Soil].Water.Volumetric[4] as SW70cm
              [Soil].Organic.FInert[1] as FInert10cm
              [Soil].SoilNitrogen.OC[1] as SOC10cm
              [Soil].SoilNitrogen.OC[2] as SOC30cm
              [Soil].SoilNitrogen.OC[3] as SOC50cm
              [Soil].SoilNitrogen.OC[4] as SOC70cm
              [Soil].SoilNitrogen.OC[5] as SOC90cm
              [Soil].SoilNitrogen.OC[6] as SOC110cm
              [Soil].NO3.kghappm[1] as NO3ppm10cm
              [Soil].NO3.kghappm[2] as NO3ppm30cm
              [Soil].NO3.kghappm[3] as NO3ppm50cm
              [Soil].NO3.kgha[1] as NO3kgpha10cm
              [Soil].NO3.kgha[2] as NO3kgpha30cm
              [Soil].NO3.kgha[3] as NO3kgpha50cm
              [Soil].SoilNitrogen.dlt_n_min_res[1] as NNM10cm
              [MicroClimate].peta
              [MicroClimate].petr
              [Soil].SoilWater.Eo
              [Soil].Organic.FBiom[1] as FBiom10cm
              [Soil].Water.Volumetric[1] as SurfaceSW
              [SurfaceOrganicMatter].Wt
              sum([Soil].SoilNitrogen.FOMN) as FOMN
              sum([Soil].SoilNitrogen.HumicN) as HumicN
              sum([Soil].SoilNitrogen.MicrobialN) as MicrobialN
              [Soil].SoilNitrogen.MicrobialN[1] as MicrobialN1
              [Soil].SoilNitrogen.MicrobialN[2] as MicrobialN2
              [Soil].SoilNitrogen.MicrobialN[3] as MicrobialN3
              [Gliricidia].Leaf.LAI
              [Gliricidia].Leaf.Fn
              [Gliricidia].Leaf.Live.NConc
              [Gliricidia].Leaf.MaximumNConc.FixedValue
              [Gliricidia].Leaf.MinimumNConc.FixedValue
              [Gliricidia].Leaf.Fw
              [Gliricidia].Leaf.Live.Wt
              [Gliricidia].Leaf.Live.Wt
              [Gliricidia].Stem.Live.Wt
              [Gliricidia].Root.Live.Wt
              [Gliricidia].Root.TotalDMDemand
              [Gliricidia].Stem.DMDemands.Structural.DMDemandFunction.Value
              [Gliricidia].Leaf.DMDemands.Structural.DMDemandFunction.Value
              [Gliricidia].Root.PartitionFraction.Value
              [Gliricidia].AboveGround.Wt
              [Gliricidia].Leaf.CoverGreen
              [Gliricidia].Nodule.FixationRate
              [Gliricidia].Nodule.NFixed
              [Gliricidia].Stem.Live.StorageWt
              [Gliricidia].Stem.Live.StructuralWt
              [Gliricidia].Stem.Live.StorageN
              [Gliricidia].Stem.Live.StructuralN
              [Gliricidia].Leaf.Photosynthesis
              [Gliricidia].Leaf.DMDemands.Structural.DMDemandFunction
              [Gliricidia].Stem.DMDemands.Structural.DMDemandFunction
              [Gliricidia].Root.DMDemands.Structural.DMDemandFunction
              [Gliricidia].Stem.DemandedDMStructural
              [Gliricidia].Stem.DemandedDMNonStructural
          Report GlircidiaAnnualOutput: EventNames=[Clock].EndOfYear
            VariableNames:
              [Clock].Today
              [Clock].Today.Year
              [Gliricidia].Age
              [Gliricidia].LAI
              sum of [Gliricidia].Nodule.NFixed from 1-Jan to 31-Dec as AnnualNFixed
          Fertiliser
          SurfaceOrganicMatter: InitialResidueName=maize_stubble; InitialResidueType=maize; InitialResidueMass=0; InitialStandingFraction=0; InitialCPR=400; InitialCNR=80
          Plant Gliricidia
          Manager TreeSowingRule
            RowSpace = 1
            RowWidth = 2
            CultivarName = Gliricidia
            SowingDate = 05/22/1988 00:00:00
```csharp
using Models.Soils;
using System;
using Models.Core;
using Models.PMF;
namespace Models
{
    [Serializable] 
    [System.Xml.Serialization.XmlInclude(typeof(Model))]
    public class Script : Model
    {
        [Link] Plant Gliricidia;
        [Link] Clock Clock;

        [Description("Spacing (m) between plants within rows")]
        public double RowSpace { get; set; }
        [Description("Spacing (m) between rows")]
        public double RowWidth { get; set; }

        [Description("Cultivar")]
        public string CultivarName { get; set; }
        [Description("Sowing Date")]
        public DateTime SowingDate { get; set; }

        [EventSubscribe("DoManagement")]
        private void OnDoManagement(object sender, EventArgs e)
        {
            double PlantPopulation = 1 / (RowWidth * RowSpace);

            if (Clock.Today.Date == SowingDate)
                Gliricidia.Sow(population: PlantPopulation, 
                    cultivar: CultivarName, 
                    depth: 100, 
                    rowSpacing: 150);
            //Plant.Sow(... Contains the following arguements:
            //Population  double  Required  Seeds sowing/m2
            //Cultivar    string  Required  "NameOfCultivar"
            //Depth       double  Optional  Depth (mm) seed sown.   Default is 100mm 
            //MaxCover    double  Optional  Proportion (0-1) of the ground row crop will cover.   Default is 1.0
            //BudNumber   double  Optional  Number of mainstems per seed sown.  Default is 1.0
            //RowSpacing  double  Optional  Spaceing (mm) between drill rows when crop is sown.  Default is 150mm
            //CropClass   string  Optional  Crop class to instantiate when crop is sown.  Default is "Plant"
        }
    }
}
```
          Manager Automatic irrigation based on water deficit
            FASW = 0
            WaterDeficit = 0
            AutoIrrigationOn = True
            FASWThreshold = 0.5
            FASWDepth = 600
```csharp
using Models.Interfaces;
using System;
using Models.Core;
using System.Collections.Generic;
using System.Text;
using Models.Soils;
using Models.PMF;
using Models;
using System.Xml.Serialization;
using APSIM.Shared.Utilities;

namespace Models
{
    [Serializable] 
    public class Script : Model
    {
        [Link] private Zone zone;
        [Link] private Irrigation irrigation;
        [Link] private Soil soil;
        [Link]
        private IPhysical soilPhysical;
        [Link]
        private ISoilWater waterBalance;
        public double FASW { get; set; }
        public double WaterDeficit  { get; set; }
    
        
        [Description("Auto irrigation on?")]
        public bool AutoIrrigationOn { get; set; }

        [Description("Threshold fraction available water (0-1)")]
        public double FASWThreshold { get; set; }

        [Description("Soil depth (mm) to which fraction available water is calculated")]
        public double FASWDepth { get; set; }

        [EventSubscribe("DoManagement")]
        private void OnDoManagement(object sender, EventArgs e)
        {
            CalculateFASW();
            if (AutoIrrigationOn)
            {
                if (FASW < FASWThreshold)
                {
                    double amount = 10;
                    irrigation.Apply(WaterDeficit, depth: 0);
                }
            }
        }
        
        private void CalculateFASW()
        {
            double[] LL15 = MathUtilities.Multiply(soilPhysical.LL15, soilPhysical.Thickness);
            double[] DUL = MathUtilities.Multiply(soilPhysical.DUL, soilPhysical.Thickness);
        
            int nlayr = GetLayerIndex();
            double cumdep = MathUtilities.Sum(soilPhysical.Thickness, 0, nlayr, 0.0);

            double excess_fr = MathUtilities.Divide((cumdep - FASWDepth), soilPhysical.Thickness[nlayr], 0.0);

            // note that results may be strange if swdep < ll15
            double avail_sw = (MathUtilities.Sum(waterBalance.SWmm, 0, nlayr, 0.0)
                              - excess_fr * waterBalance.SWmm[nlayr])
                              - (MathUtilities.Sum(LL15, 0, nlayr, 0.0)
                              - excess_fr * LL15[nlayr]);


            double pot_avail_sw = (MathUtilities.Sum(DUL, 0, nlayr, 0.0)
                                  - excess_fr * DUL[nlayr])
                                  - (MathUtilities.Sum(LL15, 0, nlayr, 0.0)
                                  - excess_fr * LL15[nlayr]);

            FASW = MathUtilities.Divide(avail_sw, pot_avail_sw, 0.0);
            WaterDeficit = MathUtilities.Constrain(pot_avail_sw - avail_sw, 0.0, 100000);
        }

        private int GetLayerIndex()
        {
            double[] cumThickness = soilPhysical.ThicknessCumulative;
            for (int i = 1; i < cumThickness.Length; i++)
            {
                if (FASWDepth < cumThickness[i])
                    return i - 1;
            }
            
            return cumThickness.Length - 1;
        }

    }
}
```
          Operations
          Manager CuttingManagement
            LeafRemovalWt = 0
            StemRemovalWt = 0
            TotalRemovalWt = 0
            StartAccumulationDate = 05/22/1988 00:00:00
            CumulativeTotalRemovalWt = 0
```csharp
using Models.Soils;
using Models.Surface;
using System.Xml.Serialization;
using Models.PMF.Interfaces;
using Models.PMF;
using Models.Core;
using System.Collections.Generic;
using System;
using Newtonsoft.Json;

namespace Models
{
    [Serializable] 
    [System.Xml.Serialization.XmlInclude(typeof(Model))]
    public class Script : Model
    {
        [Link(ByName = true)] Plant Gliricidia;
        [Link] Clock Clock;
        [Link] SurfaceOrganicMatter SOM;
    
        [JsonIgnore] private RemovalFractions Remove { get; set; }

        [Description("Leaf Removal Wt")]
        public double LeafRemovalWt {get; set;}


        [Description("Stem Removal Wt")]
        public double StemRemovalWt {get; set;}

        [Description("Total Removal Wt")]
        public double TotalRemovalWt {get; set;}

        [Description("Start Accumulation Date")]
        public DateTime StartAccumulationDate { get; set; }

        [Description("Cumulative Total Removal Wt")]
        public double CumulativeTotalRemovalWt {get; set;}


        [EventSubscribe("StartOfSimulation")]
        private void OnSimulationCommencing(object sender, EventArgs e)
        {
            Remove = new RemovalFractions();
            CumulativeTotalRemovalWt = 0.0;
        }

        [EventSubscribe("StartOfDay")]
        private void OnStartOfDay(object sender, EventArgs e)
        {

        LeafRemovalWt = 0;
        StemRemovalWt = 0;
        TotalRemovalWt = 0;
        }

        public void DoCut(double LeafResidue, double StemResidue, bool Retain = false)
        {
            double L = (double)Gliricidia.FindByPath("Leaf.Live.Wt").Value;
            double LeafRemovalFraction = 0;

            if (L > 0)
                LeafRemovalFraction = (L - LeafResidue) / L;
            if (LeafRemovalFraction < 0)
                LeafRemovalFraction = 0;
            LeafRemovalWt = L * LeafRemovalFraction;
               
            double S = (double)Gliricidia.FindByPath("Stem.Live.Wt").Value;
            double StemRemovalFraction = 0;

            if (S > 0)
                StemRemovalFraction = (S - StemResidue) / S; 
            if (StemRemovalFraction < 0)
                StemRemovalFraction = 0;
            StemRemovalWt = S * StemRemovalFraction;              

            TotalRemovalWt = LeafRemovalWt + StemRemovalWt;
            if (Clock.Today>=StartAccumulationDate)
               CumulativeTotalRemovalWt += TotalRemovalWt;

            if (Retain)
            {   
            Remove.SetFractionToRemove("Leaf", 0.0);
            Remove.SetFractionToRemove("Stem", StemRemovalFraction);
            Remove.SetFractionToResidue("Leaf", LeafRemovalFraction);
            Remove.SetFractionToResidue("Stem", 0.0);
            }
            else
            {
            Remove.SetFractionToRemove("Leaf", LeafRemovalFraction);
            Remove.SetFractionToRemove("Stem", StemRemovalFraction);
            Remove.SetFractionToResidue("Leaf", 0.0);
            Remove.SetFractionToResidue("Stem", 0.0);
            }

            Gliricidia.RemoveBiomass("Cut", Remove);

            if (Retain)
            {
            SOM.Incorporate(1.0,50.0);
            }
        }
        
    }
}
```
    Experiment Guadeloupe
      Memo
        The study ([nygren2000effects], [NygrenAndCruz1998], [garcia2001dynamics])was carried out at the experimental farm of the Antillean research centre of the Institut National de la Recherche Agronomique (INRA) in Prise d’Eau, Guadeloupe (16°12′ N, 61°39′ W, 125 m a.s.l.). The soils are alluvial Ultisols with low acidity and relatively high cation exchange capacity.  The experiment was established in May 1993. Gliricidia sepium was planted using stakes cut from a near-by living fence. Between May 1993 and March 1995 the whole experiment was managed uniformly by means of partial prunings every 3–6 months according to the growth of trees, in order to avoid excessive shading of the grass layer. The experiment started 29th February, 1996, when the G. sepium trees were pruned completely. Three tree cutting regimes were then initiated: total removal of all leaves and branches above 0.5 m once a year, or every 6 months, and partial pruning every 2 months.

        More frequent and severe cutting leads less biomass growth and biomass removed for residues (see [duguma1988effect] qualitatively simulated for the Makoka site as a sensibility test).
      Factors
        Factor Harvest: Specification=[Operations]
          Operations 12Month
            1996-04-29  [CuttingManagement].Script.DoCut(62, 25);
            1996-08-30  [Gliricidia].Leaf.LeafKillFraction=0.8
            1997-02-28  [CuttingManagement].Script.DoCut(1,1);
          Operations 06Month
            1996-04-29  [CuttingManagement].Script.DoCut(44, 25);
            1996-08-13  [CuttingManagement].Script.DoCut(10, 25);
            1997-01-31  [CuttingManagement].Script.DoCut(10, 25);
            1997-02-28  [CuttingManagement].Script.DoCut(1,1);
          Operations 02Month
            1996-04-29  [CuttingManagement].Script.DoCut(12, 25);
            1996-06-20  [CuttingManagement].Script.DoCut(41, 25);
            1996-08-13  [CuttingManagement].Script.DoCut(39, 25);
            1996-10-10  [CuttingManagement].Script.DoCut(11, 25);
            1996-12-01  [CuttingManagement].Script.DoCut(20, 25);
            1997-01-31  [CuttingManagement].Script.DoCut(10, 10);
            1997-02-28  [CuttingManagement].Script.DoCut(1,1);
      Simulation GuadeloupeBase
        Clock: Start=1993-05-01; End=1997-02-28
        Summary SummaryFile
        Weather: FileName=Guadeloupe.met
        SoilArbitrator Soil Arbitrator
        MicroClimate: a_interception=0; b_interception=0; c_interception=0; d_interception=0; SoilHeatFluxFraction=0.4; MinimumHeightDiffForNewLayer=0; NightInterceptionFraction=0.5; ReferenceHeight=2
        Zone: Area=1; Slope=0; AspectAngle=0; Altitude=50
          Soil: NearestTown=Prise d'Eau; Country=Guadeloupe; Latitude=16.2; Longitude=61.65
            DataSource=Nygren and Cruz 1998 Biomass allocation . . . . Agrof. Sys 41:277-292; Sierra etal 2003 application of STICS Plant Soil 256:333-345
            Physical
              Thickness  BD    AirDry  LL15  DUL   SAT
              100        0.92  0.16    0.21  0.39  0.55
              200        1.01  0.17    0.23  0.42  0.58
              200        1.03  0.17    0.26  0.48  0.58
              500        1.09  0.17    0.3   0.51  0.58
              500        1.09  0.17    0.3   0.51  0.58
              500        1.09  0.17    0.3   0.51  0.58
              SoilCrop MaizeSoil: LL=[0.17, 0.18, 0.19, 0.19, 0.19, 0.19]; KL=[0.08, 0.08, 0.08, 0.08, 0.08, 0.08]; XF=[1, 1, 1, 1, 1, 1]
              SoilCrop GliricidiaSoil: LL=[0.17, 0.18, 0.19, 0.19, 0.19, 0.19]; KL=[0.08, 0.08, 0.06, 0.06, 0.06, 0.06]; XF=[0.1, 0.1, 0.1, 0.1, 0.1, 0.1]
            WaterBalance SoilWater: SummerDate=1-May; SummerU=9; SummerCona=2.5; WinterDate=1-Oct; WinterU=9; WinterCona=2.5; DiffusConst=40; DiffusSlope=16; Salb=0.13; CN2Bare=65; CNRed=20; CNCov=0.8; PSIDul=-100; Thickness=[200, 1800]; SWCON=[0.5, 0.5]
            Organic: FOMCNRatio=40; CarbonUnits=Total
              Thickness  Carbon  SoilCNRatio  FBiom  FInert  FOM
              100        3.92    14.6         0.06   0.5     170.396
              200        3.5     14.6         0.06   0.5     126.232
              200        2.61    14.6         0.06   0.5     93.5153
              1500       1       14.6         0.06   0.5     9.85644
            Chemical: Thickness=[100, 200, 200, 1500]; PH=[6, 6, 6.1, 4.5]; PHUnits=Water
            Water: Thickness=[100, 200, 200, 1500]; InitialValues=[0.25, 0.25, 0.25, 0.25]; InitialPAWmm=-69; RelativeTo=LL15; FilledFromTop=false
            CERESSoilTemperature Temperature
            Nutrient
            Solute NO3: Thickness=[100, 200, 200, 1500]; InitialValues=[15, 10, 5, 1]; InitialValuesUnits=ppm; WaterTableConcentration=0; D0=0; DepthConstant=0; MaxDepthSoluteAccessible=0; RunoffEffectivenessAtMovingSolute=0; MaxEffectiveRunoff=0
            Solute NH4: Thickness=[100, 200, 200, 1500]; InitialValues=[10, 6, 3, 0.5]; InitialValuesUnits=ppm; WaterTableConcentration=0; D0=0; DepthConstant=0; MaxDepthSoluteAccessible=0; RunoffEffectivenessAtMovingSolute=0; MaxEffectiveRunoff=0
            Solute Urea: Thickness=[100, 200, 200, 1500]; InitialValues=[0, 0, 0, 0]; InitialValuesUnits=kg/ha; WaterTableConcentration=0; D0=0; DepthConstant=0; MaxDepthSoluteAccessible=0; RunoffEffectivenessAtMovingSolute=0; MaxEffectiveRunoff=0
          Report GliricidiaDailyReport: EventNames=[Clock].DoReport
            VariableNames:
              [Clock].Today
              [Zone].Area
              [Soil].SoilWater.Es
              sum([Soil].NO3.kgha) as TotalNO3N
              sum([Soil].NH4.kgha) as TotalNH4N
              sum([Soil].Water.MM) as SW200cm
              [Soil].Water.Volumetric[2] as SW30cm
              [Soil].Water.Volumetric[3] as SW50cm
              [Soil].Water.Volumetric[4] as SW70cm
              [Soil].Organic.FInert[1] as FInert10cm
              [Soil].SoilNitrogen.OC[1] as SOC10cm
              [Soil].SoilNitrogen.OC[2] as SOC30cm
              [Soil].SoilNitrogen.OC[3] as SOC50cm
              [Soil].SoilNitrogen.OC[4] as SOC70cm
              [Soil].SoilNitrogen.OC[5] as SOC90cm
              [Soil].SoilNitrogen.OC[6] as SOC110cm
              [Soil].NO3.kghappm[1] as NO3ppm10cm
              [Soil].NO3.kghappm[2] as NO3ppm30cm
              [Soil].NO3.kghappm[3] as NO3ppm50cm
              [Soil].NO3.kgha[1] as NO3kgpha10cm
              [Soil].NO3.kgha[2] as NO3kgpha30cm
              [Soil].NO3.kgha[3] as NO3kgpha50cm
              [Soil].SoilNitrogen.dlt_n_min_res[1] as NNM10cm
              [MicroClimate].peta
              [MicroClimate].petr
              [Soil].SoilWater.Eo
              [Soil].Organic.FBiom[1] as FBiom10cm
              [Soil].Water.Volumetric[1] as SurfaceSW
              [SurfaceOrganicMatter].Wt
              sum([Soil].SoilNitrogen.FOMN) as FOMN
              sum([Soil].SoilNitrogen.HumicN) as HumicN
              sum([Soil].SoilNitrogen.MicrobialN) as MicrobialN
              [Soil].SoilNitrogen.MicrobialN[1] as MicrobialN1
              [Soil].SoilNitrogen.MicrobialN[2] as MicrobialN2
              [Soil].SoilNitrogen.MicrobialN[3] as MicrobialN3
              [Gliricidia].Leaf.LAI
              [Gliricidia].Leaf.FRGR
              [Gliricidia].Leaf.Live.Wt
              [Gliricidia].Stem.Live.Wt
              [Gliricidia].Root.Live.Wt
              [Gliricidia].Root.TotalDMDemand
              [Gliricidia].Stem.DMDemands.Structural.DMDemandFunction.Value
              [Gliricidia].Leaf.DMDemands.Structural.DMDemandFunction.Value
              [Gliricidia].Root.PartitionFraction.Value
              [Gliricidia].AboveGround.Wt
              [Gliricidia].Leaf.CoverGreen
              [Gliricidia].Nodule.NFixed
              [Gliricidia].Leaf.Fn
              [Gliricidia].Leaf.Fw
          Fertiliser
          SurfaceOrganicMatter: InitialResidueName=maize_stubble; InitialResidueType=maize; InitialResidueMass=0; InitialStandingFraction=0; InitialCPR=400; InitialCNR=80
          Plant Gliricidia
          Manager TreeSowingRule
            RowSpace = 0.7
            RowWidth = 3
            CultivarName = Gliricidia
            SowingDate = 05/01/1993 00:00:00
            script: same as in Validation.Hamakuapoko.HamakuapokoBase.Zone.TreeSowingRule
          Operations
          Operations PreExperimentOperations
            1993-09-01  [CuttingManagement].Script.DoCut(20, 5);
            1994-01-01  [CuttingManagement].Script.DoCut(40, 40);
            1994-05-01  [CuttingManagement].Script.DoCut(40, 40);
            1994-09-01  [CuttingManagement].Script.DoCut(40, 40);
            1995-01-01  [CuttingManagement].Script.DoCut(40, 40);
            1995-05-01  [CuttingManagement].Script.DoCut(40, 40);
            1995-09-01  [CuttingManagement].Script.DoCut(40, 40);
            1996-01-01  [CuttingManagement].Script.DoCut(40, 40);
            1996-02-29  [CuttingManagement].Script.DoCut(40, 40);
          Manager LitterFallAccumulation
            AccumulationStartDate = 01/01/0001 00:00:00
            AccumulatedLitterfallWt = 0
```csharp
using Models.Soils;
using System.Xml.Serialization;
using Models.PMF.Organs;
using Models.PMF.Interfaces;
using Models.PMF;
using Models.Core;
using System.Collections.Generic;
using System;
using Newtonsoft.Json;

namespace Models
{
    [Serializable] 
    [System.Xml.Serialization.XmlInclude(typeof(Model))]
    public class Script : Model
    {
        [Link(ByName = true)] PerennialLeaf Leaf;
        [Link] Clock Clock;

    
        [JsonIgnore] private RemovalFractions Remove { get; set; }

        [Description("Accumulation Start Date")]
        public DateTime AccumulationStartDate { get; set; }

        [Description("Leaf Removal Wt")]
        public double AccumulatedLitterfallWt {get; set;}

        [EventSubscribe("StartOfSimulation")]
        private void OnSimulationCommencing(object sender, EventArgs e)
        {
                AccumulatedLitterfallWt = 0;
        }

        [EventSubscribe("EndOfDay")]
        private void OnEndOfDay(object sender, EventArgs e)
        {
                AccumulatedLitterfallWt += Leaf.Detached.Wt;
        }

    }
}
```
          Manager CuttingManagement
            LeafRemovalWt = 0
            StemRemovalWt = 0
            TotalRemovalWt = 0
            StartAccumulationDate = 05/01/1996 00:00:00
            CumulativeTotalRemovalWt = 0
            script: same as in Validation.Hamakuapoko.HamakuapokoBase.Zone.CuttingManagement
          Report GlircidiaAnnualOutput: same as Replacements.GlircidiaAnnualOutput
    Experiment GuadeloupeGodet
      Memo
        The study ([NygrenEtAl2000], [cruz1997effect]) was carried out at the experimental farm of the Antillean Research Centre of the Institut National de la Recherche Agronomique (INRA) in Godet, Guadeloupe (16°20′ N, 61°30′ W, 10 m a.s.l.). The soil is a slightly basic Vertisol with soil depth varying irregularly from 0.25 to 0.75 m. The climate is warm and subhumid.
        The experiment was established in May 1989 by planting G. sepium cuttings from a nearby living fence in natural D. aristatum grassland. Gliricidia sepium was pruned every 2–2.5 months with successive full (100%) and partial (20–30%) defoliations, and the pruning residues were removed from the site. On April 1, 1996, the G. sepium trees were pruned completely. Three tree cutting regimes were then initiated: total removal of all leaves and branches above 0.5 m once a year, or every 6 months, and partial pruning every 2 months. Dichantium aristatum was cut monthly and the cut grass removed from the site.

        More frequent and severe cutting leads less biomass growth and biomass removed for residues. see [duguma1988effect] qualitatively simulated for the Makoka site as a sensibility test).
      Factors
        Factor Harvest: Specification=[Operations]
          Operations 12Month
            1996-04-01  [CuttingManagement].Script.DoCut(10, 40);
            1997-03-31  [CuttingManagement].Script.DoCut(1,1);
          Operations 06Month
            1996-04-01  [CuttingManagement].Script.DoCut(10, 40);
            1996-09-19  [CuttingManagement].Script.DoCut(10, 40);
            1997-03-31  [CuttingManagement].Script.DoCut(1,1);
          Operations 02Month
            1996-04-01  [CuttingManagement].Script.DoCut(10, 40);
            1996-05-30  [CuttingManagement].Script.DoCut(65, 33);
            1996-07-25  [CuttingManagement].Script.DoCut(120, 126);
            1996-09-18  [CuttingManagement].Script.DoCut(102, 159);
            1996-11-18  [CuttingManagement].Script.DoCut(109, 218);
            1997-01-09  [CuttingManagement].Script.DoCut(37, 58);
            1997-03-10  [CuttingManagement].Script.DoCut(10, 10);
            1997-03-31  [CuttingManagement].Script.DoCut(1,1);
      Simulation GuadeloupeGodetBase
        Clock: Start=1989-05-01; End=1997-03-31
        Summary SummaryFile
        Weather: FileName=GuadeloupeGodet.met
        SoilArbitrator Soil Arbitrator
        MicroClimate: a_interception=0; b_interception=0; c_interception=0; d_interception=0; SoilHeatFluxFraction=0.4; MinimumHeightDiffForNewLayer=0; NightInterceptionFraction=0.5; ReferenceHeight=2
        Zone: Area=1; Slope=0; AspectAngle=0; Altitude=50
          Soil: NearestTown=Godet; Country=Guadeloupe; Latitude=16.33; Longitude=-61.5; Comments=Soil depth ranged from 0.1 to 0.75 m
            DataSource=Nygren et al 2000 Influence of biomass harvesting . . . . Tree Physiol 20:41-48; Cruz 1997 Effecct of shade . . . Plant Soil 188:227-237; Tournebize et al 1996 Modelling evapotranspiration . . . Ag For Meteorol 81:255-272
            Physical
              Thickness  BD    AirDry  LL15  DUL   SAT
              100        0.92  0.05    0.08  0.39  0.55
              200        1.01  0.05    0.08  0.42  0.58
              200        1.01  0.05    0.08  0.42  0.58
              500        1.01  0.05    0.08  0.42  0.58
              SoilCrop MaizeSoil: LL=[0.1, 0.1, 0.1, 0.1]; KL=[0.08, 0.08, 0.08, 0.08]; XF=[1, 1, 1, 0.5]
              SoilCrop GliricidiaSoil: LL=[0.1, 0.1, 0.1, 0.1]; KL=[0.08, 0.8, 0.06, 0.06]; XF=[1, 1, 1, 0.5]
            WaterBalance SoilWater: SummerDate=1-May; SummerU=9; SummerCona=2.5; WinterDate=1-Oct; WinterU=9; WinterCona=2.5; DiffusConst=40; DiffusSlope=16; Salb=0.13; CN2Bare=65; CNRed=20; CNCov=0.8; PSIDul=-100; Thickness=[100, 200, 200, 500]; SWCON=[0.5, 0.5, 0.5, 0.5]
            Organic: FOMCNRatio=40; CarbonUnits=Total
              Thickness  Carbon  SoilCNRatio  FBiom  FInert  FOM
              100        3       10.6         0.08   0.5     208.636
              200        2       10.6         0.08   0.5     114.502
              200        1       10.6         0.08   0.5     62.8401
              500        0.5     10.6         0.08   0.5     14.0215
            Chemical: Thickness=[100, 200, 200, 500]; PH=[8.1, 8.1, 8.1, 8.1]; PHUnits=Water
            Water: Thickness=[100, 200, 200, 500]; InitialValues=[0.25, 0.25, 0.25, 0.25]; InitialPAWmm=170; RelativeTo=LL15; FilledFromTop=false
            CERESSoilTemperature Temperature
            Nutrient
            Solute NO3: Thickness=[100, 200, 200, 500]; InitialValues=[15, 10, 5, 2]; InitialValuesUnits=ppm; WaterTableConcentration=0; D0=0; DepthConstant=0; MaxDepthSoluteAccessible=0; RunoffEffectivenessAtMovingSolute=0; MaxEffectiveRunoff=0
            Solute NH4: Thickness=[100, 200, 200, 500]; InitialValues=[10, 6, 3, 1]; InitialValuesUnits=ppm; WaterTableConcentration=0; D0=0; DepthConstant=0; MaxDepthSoluteAccessible=0; RunoffEffectivenessAtMovingSolute=0; MaxEffectiveRunoff=0
            Solute Urea: Thickness=[100, 200, 200, 500]; InitialValues=[0, 0, 0, 0]; InitialValuesUnits=kg/ha; WaterTableConcentration=0; D0=0; DepthConstant=0; MaxDepthSoluteAccessible=0; RunoffEffectivenessAtMovingSolute=0; MaxEffectiveRunoff=0
          Report GliricidiaDailyReport: EventNames=[Clock].DoReport
            VariableNames:
              [Clock].Today
              [Zone].Area
              [Soil].SoilWater.Es
              sum([Soil].NO3.kgha) as TotalNO3N
              sum([Soil].NH4.kgha) as TotalNH4N
              sum([Soil].Water.MM) as SW200cm
              [Soil].Water.Volumetric[2] as SW30cm
              [Soil].Organic.FInert[1] as FInert10cm
              [Soil].SoilNitrogen.OC[1] as SOC10cm
              [Soil].SoilNitrogen.OC[2] as SOC30cm
              [Soil].NO3.kghappm[1] as NO3ppm10cm
              [Soil].NO3.kghappm[2] as NO3ppm30cm
              [Soil].NO3.kgha[1] as NO3kgpha10cm
              [Soil].NO3.kgha[2] as NO3kgpha30cm
              [Soil].SoilNitrogen.dlt_n_min_res[1] as NNM10cm
              [MicroClimate].peta
              [MicroClimate].petr
              [Soil].SoilWater.Eo
              [Soil].Organic.FBiom[1] as FBiom10cm
              [Soil].Water.Volumetric[1] as SurfaceSW
              [SurfaceOrganicMatter].Wt
              sum([Soil].SoilNitrogen.FOMN) as FOMN
              sum([Soil].SoilNitrogen.HumicN) as HumicN
              sum([Soil].SoilNitrogen.MicrobialN) as MicrobialN
              [Soil].SoilNitrogen.MicrobialN[1] as MicrobialN1
              [Soil].SoilNitrogen.MicrobialN[2] as MicrobialN2
              [Gliricidia].Leaf.LAI
              [Gliricidia].Leaf.FRGR
              [Gliricidia].Leaf.Live.Wt
              [Gliricidia].Stem.Live.Wt
              [Gliricidia].Root.Live.Wt
              [Gliricidia].Root.TotalDMDemand
              [Gliricidia].Stem.DMDemands.Structural.DMDemandFunction.Value
              [Gliricidia].Leaf.DMDemands.Structural.DMDemandFunction.Value
              [Gliricidia].Root.PartitionFraction.Value
              [Gliricidia].AboveGround.Wt
              [Gliricidia].Leaf.CoverGreen
          Fertiliser
          SurfaceOrganicMatter: InitialResidueName=maize_stubble; InitialResidueType=maize; InitialResidueMass=0; InitialStandingFraction=0; InitialCPR=400; InitialCNR=80
          Plant Gliricidia
          Manager TreeSowingRule
            RowSpace = 0.4083
            RowWidth = 2
            CultivarName = Gliricidia
            SowingDate = 05/15/1989 00:00:00
            script: same as in Validation.Hamakuapoko.HamakuapokoBase.Zone.TreeSowingRule
          Operations
          Operations PreExperimentOperations
            1989-05-15  [Fertiliser].Apply(Amount: 20, Type: Fertiliser.Types.NO3N)
            1989-09-15  [Fertiliser].Apply(Amount: 20, Type: Fertiliser.Types.NO3N)
            1990-01-15  [CuttingManagement].Script.DoCut(10, 40);
            1990-03-15  [CuttingManagement].Script.DoCut(40, 90);
            1990-07-15  [CuttingManagement].Script.DoCut(10, 40);
            1990-09-15  [CuttingManagement].Script.DoCut(40, 90);
            1990-12-15  [CuttingManagement].Script.DoCut(10, 40);
            1991-01-15  [CuttingManagement].Script.DoCut(10, 40);
            1991-03-15  [CuttingManagement].Script.DoCut(40, 90);
            1991-07-15  [CuttingManagement].Script.DoCut(10, 40);
            1991-09-15  [CuttingManagement].Script.DoCut(40, 90);
            1991-12-15  [CuttingManagement].Script.DoCut(10, 40);
            1992-01-15  [CuttingManagement].Script.DoCut(10, 40);
            1992-03-15  [CuttingManagement].Script.DoCut(40, 90);
            1992-07-15  [CuttingManagement].Script.DoCut(10, 40);
            1992-09-15  [CuttingManagement].Script.DoCut(40, 90);
            1992-12-15  [CuttingManagement].Script.DoCut(10, 40);
            1993-01-15  [CuttingManagement].Script.DoCut(10, 40);
            1993-03-15  [CuttingManagement].Script.DoCut(40, 90);
            1993-07-15  [CuttingManagement].Script.DoCut(10, 40);
            1993-09-15  [CuttingManagement].Script.DoCut(40, 90);
            1993-12-15  [CuttingManagement].Script.DoCut(10, 40);
            1994-01-15  [CuttingManagement].Script.DoCut(10, 40);
            1994-03-15  [CuttingManagement].Script.DoCut(40, 90);
            1994-07-15  [CuttingManagement].Script.DoCut(10, 40);
            1994-09-15  [CuttingManagement].Script.DoCut(40, 90);
            1994-12-15  [CuttingManagement].Script.DoCut(10, 40);
            1995-01-15  [CuttingManagement].Script.DoCut(10, 40);
            1995-03-15  [CuttingManagement].Script.DoCut(40, 90);
            1995-07-15  [CuttingManagement].Script.DoCut(10, 40);
            1995-09-15  [CuttingManagement].Script.DoCut(40, 90);
            1995-12-15  [CuttingManagement].Script.DoCut(10, 40);
          Manager CuttingManagement: same as Validation.Guadeloupe.GuadeloupeBase.Zone.CuttingManagement
          Report GlircidiaAnnualOutput: same as Replacements.GlircidiaAnnualOutput
    Experiment Makoka
      Memo
        This agroforestry experiment ([MakumbaEtAl2006], [makumba2007long], [makumba2009spatial], [akinnifesi2006sustainable], [akinnifesi2007synergistic], [akinnifesi2009farm], [mweta2007use], [ikerra1999soil]) was continuously cropped with maize between establishment in 1992 and final available measurementsa in 2004. The trial includes three rates of N fertiliser with and without Gliricidia sepium intercropping. The study was conducted at Makoka Agricultural Research Station near Zomba in Southern Malawi. The soil had 42% clay, 46% sand and 1.42 g/cm3 bulk density.  The rainfall is unimodal with a mean rainfall of 937 mm. There was some P deficiency, demonstrated by a response to P fertilizer, so only the high P fertilizer treatment was simulated. There was also suspicion that P deficiency further developed quite later in the experiment.

        Results indicated that, without Gliricidia, maize yield was low and decreased with time without N inputs. Gliricidia increased maize yields, but the effect took about 3 years to fully develop. N fertilization increased yields both with and without fertiliser. Annual trends reflected patterns of rainfall.
      Factors
        Permutation
          Factor N: Specification=[FertiliserRule]
            Manager 0
              Amount = 0
              CropName = maize
              FertDAS = 30
```csharp
using Models.Soils;
using System;
using Models.Core;
using Models.PMF;
namespace Models
{
    [Serializable]
    public class Script : Model
    {
        [Link] Clock Clock;
        [Link] Fertiliser Fertiliser;
        [Link] Summary Summary;
        [Link] Plant Maize;
        
        
        [Description("Amount of fertiliser N to be applied (kg/ha)")]
        public double Amount { get; set; }
        
        [Description("Crop to be fertilised")]
        public string CropName { get; set; }
        
        [Description("Days after sowing:")]
        public int FertDAS { get; set; }
        
        

        [EventSubscribe("DoManagement")]
        private void OnDoManagement(object sender, EventArgs e)
        {
            if (Maize.IsAlive && Maize.DaysAfterSowing == FertDAS)
                Fertiliser.Apply(Amount: Amount, Type: Fertiliser.Types.UreaN);
                
                
        }
        
    }
}
```
            Manager 24
              Amount = 24
              CropName = maize
              FertDAS = 28
```csharp
using Models.Soils;
using System;
using Models.Core;
using Models.PMF;
namespace Models
{
    [Serializable]
    public class Script : Model
    {
        [Link] Clock Clock;
        [Link] Fertiliser Fertiliser;
        [Link] Summary Summary;
        [Link] Plant Maize;
        
        
        [Description("Amount of fertiliser N to be applied (kg/ha)")]
        public double Amount { get; set; }
        
        [Description("Crop to be fertilised")]
        public string CropName { get; set; }
        
        [Description("Days after sowing:")]
        public int FertDAS { get; set; }
        
        

        [EventSubscribe("DoManagement")]
        private void OnDoManagement(object sender, EventArgs e)
        {
            if (Maize.IsAlive && Maize.DaysAfterSowing == FertDAS)
                Fertiliser.Apply(Amount: Amount, Type: Fertiliser.Types.NH4N);
                
                
        }
        
    }
}
```
            Manager 48
              Amount = 48
              CropName = maize
              FertDAS = 28
              script: same as in Validation.Makoka.Factors.Permutation.N.24
          Factor Maize: Specification=[GliricidiaManagement]
            Operations Sole
            Operations Gliricidia
              1991-12-15  [Gliricidia].Sow(population: 0.74, cultivar: GliricidiaYoung,depth: 100, rowSpacing: 1500);
              1992-09-15  [CuttingManagement].Script.DoCut(440, 575, true);
              1992-12-15  [CuttingManagement].Script.DoCut(10, 25, true);
              1993-02-15  [CuttingManagement].Script.DoCut(10, 25, true);
              1993-09-15  [CuttingManagement].Script.DoCut(10, 25, true);
              1993-12-15  [CuttingManagement].Script.DoCut(10, 25, true);
              1994-02-15  [CuttingManagement].Script.DoCut(10, 25, true);
              1994-09-15  [CuttingManagement].Script.DoCut(10, 25, true);
              1994-12-15  [CuttingManagement].Script.DoCut(10, 25, true);
              1995-02-15  [CuttingManagement].Script.DoCut(10, 25, true);
              1995-09-15  [CuttingManagement].Script.DoCut(10, 25, true);
              1995-12-15  [CuttingManagement].Script.DoCut(10, 25, true);
              1996-02-15  [CuttingManagement].Script.DoCut(10, 25, true);
              1996-09-15  [CuttingManagement].Script.DoCut(10, 25, true);
              1996-12-15  [CuttingManagement].Script.DoCut(10, 25, true);
              1997-02-15  [CuttingManagement].Script.DoCut(10, 25, true);
              1997-08-15  [CuttingManagement].Script.DoCut(10, 25, true);
              1997-10-31  [CuttingManagement].Script.DoCut(10, 25, true);
              1997-12-31  [CuttingManagement].Script.DoCut(10, 25, true);
              1998-02-28  [CuttingManagement].Script.DoCut(10, 25, true);
              1998-08-31  [CuttingManagement].Script.DoCut(10, 25, true);
              1998-10-31  [CuttingManagement].Script.DoCut(10, 25, true);
              1998-12-31  [CuttingManagement].Script.DoCut(10, 25, true);
              1999-02-28  [CuttingManagement].Script.DoCut(10, 25, true);
              1999-08-31  [CuttingManagement].Script.DoCut(10, 25, true);
              1999-10-31  [CuttingManagement].Script.DoCut(10, 25, true);
              1999-12-31  [CuttingManagement].Script.DoCut(10, 25, true);
              2000-02-28  [CuttingManagement].Script.DoCut(10, 25, true);
              2000-08-31  [CuttingManagement].Script.DoCut(10, 25, true);
              2000-10-31  [CuttingManagement].Script.DoCut(10, 25, true);
              2000-12-31  [CuttingManagement].Script.DoCut(10, 25, true);
              2001-02-28  [CuttingManagement].Script.DoCut(10, 25, true);
              2001-08-31  [CuttingManagement].Script.DoCut(10, 25, true);
              2001-10-31  [CuttingManagement].Script.DoCut(10, 25, true);
              2001-12-31  [CuttingManagement].Script.DoCut(10, 25, true);
              2002-02-28  [CuttingManagement].Script.DoCut(10, 25, true);
              2002-08-31  [CuttingManagement].Script.DoCut(10, 25, true);
              2002-10-31  [CuttingManagement].Script.DoCut(10, 25, true);
              2002-12-31  [CuttingManagement].Script.DoCut(10, 25, true);
              2003-02-28  [CuttingManagement].Script.DoCut(10, 25, true);
              2003-08-18  [CuttingManagement].Script.DoCut(10, 25, true);
              2003-11-07  [CuttingManagement].Script.DoCut(10, 25, true);
              2003-12-16  [CuttingManagement].Script.DoCut(10, 25, true);
              2004-02-02  [CuttingManagement].Script.DoCut(10, 25, true);
              2004-08-18  [CuttingManagement].Script.DoCut(10, 25, true);
              2004-12-21  [CuttingManagement].Script.DoCut(10, 25, true);
              2005-01-31  [CuttingManagement].Script.DoCut(10, 25, true);
              2005-10-04  [CuttingManagement].Script.DoCut(10, 25, true);
              2005-12-05  [CuttingManagement].Script.DoCut(10, 25, true);
              2006-01-24  [CuttingManagement].Script.DoCut(10, 25, true);
              // 1993-02-15  [SurfaceOrganicMatter].Add(mass: 654, N:25.5, P:0, type:"maize", name:"maize")
              // 1993-08-15  [SurfaceOrganicMatter].Add(mass: 654, N:25.5, P:0, type:"maize", name:"maize")
              // 1993-10-15  [SurfaceOrganicMatter].Add(mass: 654, N:25.5, P:0, type:"maize", name:"maize")
              // 1993-12-15  [SurfaceOrganicMatter].Add(mass: 654, N:25.5, P:0, type:"maize", name:"maize")
              // 1994-02-15  [SurfaceOrganicMatter].Add(mass: 957, N:37.6, P:0, type:"maize", name:"maize")
              // 1994-08-15  [SurfaceOrganicMatter].Add(mass: 957, N:37.6, P:0, type:"maize", name:"maize")
              // 1994-10-15  [SurfaceOrganicMatter].Add(mass: 957, N:37.6, P:0, type:"maize", name:"maize")
              // 1994-12-15  [SurfaceOrganicMatter].Add(mass: 957, N:37.6, P:0, type:"maize", name:"maize")
              // 1995-02-15  [SurfaceOrganicMatter].Add(mass: 895, N:34.7, P:0, type:"maize", name:"maize")
              // 1995-08-15  [SurfaceOrganicMatter].Add(mass: 895, N:34.7, P:0, type:"maize", name:"maize")
              // 1995-10-15  [SurfaceOrganicMatter].Add(mass: 895, N:34.7, P:0, type:"maize", name:"maize")
              // 1995-12-15  [SurfaceOrganicMatter].Add(mass: 895, N:34.7, P:0, type:"maize", name:"maize")
              // 1996-02-15  [SurfaceOrganicMatter].Add(mass: 1179, N:45.8, P:0, type:"maize", name:"maize")
              // 1996-08-15  [SurfaceOrganicMatter].Add(mass: 1179, N:45.8, P:0, type:"maize", name:"maize")
              // 1996-10-15  [SurfaceOrganicMatter].Add(mass: 1179, N:45.8, P:0, type:"maize", name:"maize")
              // 1996-12-15  [SurfaceOrganicMatter].Add(mass: 1179, N:45.8, P:0, type:"maize", name:"maize")
              // 1997-02-15  [SurfaceOrganicMatter].Add(mass: 1414, N:55, P:0, type:"maize", name:"maize")
              // 1997-08-15  [SurfaceOrganicMatter].Add(mass: 1414, N:55, P:0, type:"maize", name:"maize")
              // 1997-10-15  [SurfaceOrganicMatter].Add(mass: 1414, N:55, P:0, type:"maize", name:"maize")
              // 1997-12-15  [SurfaceOrganicMatter].Add(mass: 1414, N:55, P:0, type:"maize", name:"maize")
              // 1998-02-15  [SurfaceOrganicMatter].Add(mass: 1698, N:66.4, P:0, type:"maize", name:"maize")
              // 1998-08-15  [SurfaceOrganicMatter].Add(mass: 1698, N:66.4, P:0, type:"maize", name:"maize")
              // 1998-10-15  [SurfaceOrganicMatter].Add(mass: 1698, N:66.4, P:0, type:"maize", name:"maize")
              // 1998-12-15  [SurfaceOrganicMatter].Add(mass: 1698, N:66.4, P:0, type:"maize", name:"maize")
              // 1999-02-15  [SurfaceOrganicMatter].Add(mass: 1414, N:54.8, P:0, type:"maize", name:"maize")
              // 1999-08-15  [SurfaceOrganicMatter].Add(mass: 1414, N:54.8, P:0, type:"maize", name:"maize")
              // 1999-10-15  [SurfaceOrganicMatter].Add(mass: 1414, N:54.8, P:0, type:"maize", name:"maize")
              // 1999-12-15  [SurfaceOrganicMatter].Add(mass: 1414, N:54.8, P:0, type:"maize", name:"maize")
              // 2000-02-15  [SurfaceOrganicMatter].Add(mass: 1068, N:40.9, P:0, type:"maize", name:"maize")
              // 2000-08-15  [SurfaceOrganicMatter].Add(mass: 1068, N:40.9, P:0, type:"maize", name:"maize")
              // 2000-10-15  [SurfaceOrganicMatter].Add(mass: 1068, N:40.9, P:0, type:"maize", name:"maize")
              // 2000-12-15  [SurfaceOrganicMatter].Add(mass: 1068, N:40.9, P:0, type:"maize", name:"maize")
              // 2001-02-15  [SurfaceOrganicMatter].Add(mass: 1389, N:54, P:0, type:"maize", name:"maize")
              // 2001-08-15  [SurfaceOrganicMatter].Add(mass: 1389, N:54, P:0, type:"maize", name:"maize")
              // 2001-10-15  [SurfaceOrganicMatter].Add(mass: 1389, N:54, P:0, type:"maize", name:"maize")
              // 2001-12-15  [SurfaceOrganicMatter].Add(mass: 1389, N:54, P:0, type:"maize", name:"maize")
              // 2002-02-15  [SurfaceOrganicMatter].Add(mass: 1216, N:46.8, P:0, type:"maize", name:"maize")
              // 2002-08-15  [SurfaceOrganicMatter].Add(mass: 1216, N:46.8, P:0, type:"maize", name:"maize")
              // 2002-10-15  [SurfaceOrganicMatter].Add(mass: 1216, N:46.8, P:0, type:"maize", name:"maize")
              // 2002-12-15  [SurfaceOrganicMatter].Add(mass: 1216, N:46.8, P:0, type:"maize", name:"maize")
              // 2003-02-15  [SurfaceOrganicMatter].Add(mass: 1228, N:48.4, P:0, type:"maize", name:"maize")
              // 2003-08-15  [SurfaceOrganicMatter].Add(mass: 1228, N:48.4, P:0, type:"maize", name:"maize")
              // 2003-10-15  [SurfaceOrganicMatter].Add(mass: 1228, N:48.4, P:0, type:"maize", name:"maize")
              // 2003-12-15  [SurfaceOrganicMatter].Add(mass: 1228, N:48.4, P:0, type:"maize", name:"maize")
              // 2004-02-15  [SurfaceOrganicMatter].Add(mass: 1228, N:48.4, P:0, type:"maize", name:"maize")
              // 2004-08-15  [SurfaceOrganicMatter].Add(mass: 1228, N:48.4, P:0, type:"maize", name:"maize")
              // 2004-10-15  [SurfaceOrganicMatter].Add(mass: 1228, N:48.4, P:0, type:"maize", name:"maize")
              // 2004-12-15  [SurfaceOrganicMatter].Add(mass: 1228, N:48.4, P:0, type:"maize", name:"maize")
              // 2005-02-15  [SurfaceOrganicMatter].Add(mass: 1228, N:48.4, P:0, type:"maize", name:"maize")
              // 2005-08-15  [SurfaceOrganicMatter].Add(mass: 1228, N:48.4, P:0, type:"maize", name:"maize")
              // 2005-10-15  [SurfaceOrganicMatter].Add(mass: 1228, N:48.4, P:0, type:"maize", name:"maize")
              // 2005-12-15  [SurfaceOrganicMatter].Add(mass: 1228, N:48.4, P:0, type:"maize", name:"maize")
              // 2001-01-15  [Maize].Sow(population: 4.44, cultivar: "NSCM_41", depth: 30, rowSpacing: 750);
              // 2001-02-07  [Fertiliser].Apply(Amount: 0, Type: Fertiliser.Types.NO3N)
      Simulation MakokaBase
        Clock: Start=1991-12-01; End=2006-12-31
        Summary SummaryFile
        Weather: FileName=Makoka.met
        SoilArbitrator Soil Arbitrator
        MicroClimate: a_interception=0; b_interception=0; c_interception=0; d_interception=0; SoilHeatFluxFraction=0.4; MinimumHeightDiffForNewLayer=0; NightInterceptionFraction=0.5; ReferenceHeight=2
        Zone: Area=1; Slope=0; AspectAngle=0; Altitude=50
          Soil Makoka Soil: SoilType=sand; NearestTown=Makoka; Country=Malawi; Latitude=-15.25; Longitude=37.25
            Physical
              Thickness  BD    AirDry  LL15  DUL   SAT
              200        1.42  0.05    0.08  0.36  0.46
              200        1.45  0.05    0.08  0.36  0.45
              200        1.47  0.05    0.08  0.34  0.44
              200        1.31  0.05    0.08  0.33  0.44
              200        1.42  0.05    0.08  0.33  0.44
              200        1.38  0.05    0.08  0.32  0.44
              200        1.32  0.05    0.08  0.31  0.44
              200        1.3   0.05    0.08  0.3   0.44
              200        1.31  0.05    0.08  0.3   0.44
              200        1.31  0.05    0.08  0.29  0.44
              500        1.31  0.05    0.08  0.29  0.44
              500        1.31  0.05    0.08  0.29  0.44
              SoilCrop MaizeSoil
                LL=[0.1, 0.1, 0.1, 0.15, 0.2, 0.25, 0.3, 0.3, 0.3, 0.29, 0.29, 0.29]
                KL=[0.05, 0.05, 0.04, 0.03, 0.02, 0.02, 0, 0, 0, 0, 0, 0]
                XF=[1, 1, 1, 1, 0.6, 0.6, 0, 0, 0, 0, 0, 0]
              SoilCrop GliricidiaSoil
                LL=[0.1, 0.1, 0.1, 0.1, 0.1, 0.1, 0.1, 0.1, 0.1, 0.1, 0.1, 0.1]
                KL=[0.1, 0.1, 0.1, 0.1, 0.1, 0.1, 0.1, 0.1, 0.02, 0.02, 0.02, 0.02]
                XF=[1, 1, 1, 1, 1, 1, 1, 1, 1, 0, 0, 0]
            WaterBalance SoilWater: SummerDate=1-Nov; SummerU=9; SummerCona=2.5; WinterDate=1-Apr; WinterU=9; WinterCona=2.5; DiffusConst=40; DiffusSlope=16; Salb=0.13; CN2Bare=65; CNRed=20; CNCov=0.8; PSIDul=-100; Thickness=[200, 1800, 1000]; SWCON=[0.2, 0.1, 0]
            Organic: FOMCNRatio=15; CarbonUnits=Total
              Thickness  Carbon  SoilCNRatio  FBiom  FInert  FOM
              200        0.8     14.3         0.02   0.7     27.2762
              200        0.6     14.3         0.01   0.7     20.2067
              200        0.4     14.3         0.01   0.7     14.9695
              200        0.2     14.3         0.01   0.7     11.0897
              200        0.2     14.3         0.01   0.7     8.21543
              200        0.1     14.3         0.01   0.7     6.08614
              200        0.05    14.3         0.01   0.7     4.50872
              200        0.05    14.3         0.01   0.7     3.34014
              200        0.05    14.3         0.01   0.7     2.47444
              200        0.05    14.3         0.01   0.7     1.83311
            Chemical: Thickness=[200, 200, 200, 200, 200, 200, 200, 200, 200, 200]; PH=[5.9, 5.6, 5.8, 5.9, 6.1, 6.3, 6.2, 6.4, 6.3, 5.9]; PHUnits=Water
            Water: Thickness=[200, 200, 200, 200, 200, 200, 200, 200, 200, 200, 1000]; InitialPAWmm=482; RelativeTo=LL15; FilledFromTop=false
              InitialValues=[0.18, 0.18, 0.18, 0.2, 0.23, 0.23, 0.26, 0.26, 0.27, 0.27, 0.27]
            CERESSoilTemperature Temperature
            Nutrient
            Solute NO3: Thickness=[200, 200, 200, 200, 200, 200, 200, 200, 200, 200]; InitialValues=[1, 0.5, 0.2, 0.2, 0.2, 0.2, 0.1, 0.1, 0.1, 0.1]; InitialValuesUnits=ppm; WaterTableConcentration=0; D0=0; DepthConstant=0; MaxDepthSoluteAccessible=0; RunoffEffectivenessAtMovingSolute=0; MaxEffectiveRunoff=0
            Solute NH4: Thickness=[200, 200, 200, 200, 200, 200, 200, 200, 200, 200]; InitialValues=[0.5, 0.2, 0.2, 0.2, 0.1, 0.1, 0.1, 0.1, 0.1, 0.1]; InitialValuesUnits=ppm; WaterTableConcentration=0; D0=0; DepthConstant=0; MaxDepthSoluteAccessible=0; RunoffEffectivenessAtMovingSolute=0; MaxEffectiveRunoff=0
            Solute Urea: Thickness=[200, 200, 200, 200, 200, 200, 200, 200, 200, 200]; InitialValues=[0, 0, 0, 0, 0, 0, 0, 0, 0, 0]; InitialValuesUnits=kg/ha; WaterTableConcentration=0; D0=0; DepthConstant=0; MaxDepthSoluteAccessible=0; RunoffEffectivenessAtMovingSolute=0; MaxEffectiveRunoff=0
          Report GliricidiaDailyReport: EventNames=[Clock].DoReport
            VariableNames:
              [Clock].Today as Date
              [Zone].Area
              [Soil].SoilWater.Es
              sum([Soil].NO3.kgha) as TotalNO3N
              sum([Soil].NH4.kgha) as TotalNH4N
              sum([Soil].Water.MM[1:10]) as SW200cm
              [Soil].Water.Volumetric[2] as SW30cm
              [Soil].Water.Volumetric[3] as SW50cm
              [Soil].Water.Volumetric[4] as SW70cm
              [Soil].Organic.FInert[1] as FInert10cm
              [Soil].SoilNitrogen.OC[1] as SOC10cm
              [Soil].SoilNitrogen.OC[2] as SOC30cm
              [Soil].SoilNitrogen.OC[3] as SOC50cm
              [Soil].SoilNitrogen.OC[4] as SOC70cm
              [Soil].SoilNitrogen.OC[5] as SOC90cm
              [Soil].SoilNitrogen.OC[6] as SOC110cm
              [Soil].SoilNitrogen.OC[7] as SOC130cm
              [Soil].SoilNitrogen.OC[8] as SOC150cm
              [Soil].NO3.kghappm[1] as NO3ppm10cm
              [Soil].NO3.kghappm[2] as NO3ppm30cm
              [Soil].NO3.kghappm[3] as NO3ppm50cm
              [Soil].NO3.kgha[1] as NO3kgpha10cm
              [Soil].NO3.kgha[2] as NO3kgpha30cm
              [Soil].NO3.kgha[3] as NO3kgpha50cm
              [Soil].SoilNitrogen.dlt_n_min_res[1] as NNM10cm
              [MicroClimate].peta
              [MicroClimate].petr
              [Soil].SoilWater.Eo
              [Soil].Organic.FBiom[1] as FBiom10cm
              [Soil].Water.Volumetric[1] as SurfaceSW
              [SurfaceOrganicMatter].Wt
              sum([Soil].SoilNitrogen.FOMN) as FOMN
              sum([Soil].SoilNitrogen.HumicN) as HumicN
              sum([Soil].SoilNitrogen.MicrobialN) as MicrobialN
              [Soil].SoilNitrogen.MicrobialN[1] as MicrobialN1
              [Soil].SoilNitrogen.MicrobialN[2] as MicrobialN2
              [Soil].SoilNitrogen.MicrobialN[3] as MicrobialN3
              [Gliricidia].Leaf.LAI
              [Gliricidia].Leaf.Fn
              [Gliricidia].Leaf.Live.NConc
              [Gliricidia].Leaf.MaximumNConc.FixedValue
              [Gliricidia].Leaf.MinimumNConc.FixedValue
              [Gliricidia].Leaf.Fw
              [Gliricidia].Leaf.Live.Wt
              [Gliricidia].Leaf.Live.Wt
              [Gliricidia].Stem.Live.Wt
              [Gliricidia].Root.Live.Wt
              [Gliricidia].Root.TotalDMDemand
              [Gliricidia].Stem.DMDemands.Structural.DMDemandFunction.Value
              [Gliricidia].Leaf.DMDemands.Structural.DMDemandFunction.Value
              [Gliricidia].Root.PartitionFraction.Value
              [Gliricidia].AboveGround.Wt
              [Gliricidia].Leaf.CoverGreen
              [Gliricidia].Nodule.FixationRate
              [Gliricidia].Nodule.NFixed
              [Gliricidia].Stem.Live.StorageWt
              [Gliricidia].Stem.Live.StructuralWt
              [Gliricidia].Stem.Live.StorageN
              [Gliricidia].Stem.Live.StructuralN
              [Gliricidia].Leaf.Photosynthesis
              [Gliricidia].Leaf.DMDemands.Structural.DMDemandFunction
              [Gliricidia].Stem.DMDemands.Structural.DMDemandFunction
              [Gliricidia].Root.DMDemands.Structural.DMDemandFunction
          Report GlircidiaAnnualOutput: EventNames=[Clock].EndOfYear
            VariableNames:
              [Clock].Today
              [Clock].Today.Year
              [Gliricidia].Age
              [Gliricidia].LAI
              sum of [Gliricidia].Nodule.NFixed from 1-Jan to 31-Dec as AnnualNFixed
          Report MaizeDailyReport: EventNames=[Clock].DoReport
            VariableNames:
              [Clock].Today
              [Clock].Today.DayOfYear
              [Zone].Area
              [Soil].SoilWater.Es
              ([Soil].NO3.kgha[1]+[Soil].NH4.kgha[1]) as SurfaceMineralN
              ([Soil].NO3.kgha[2]+[Soil].NH4.kgha[2]) as Soil2MineralN
              ([Soil].NO3.kgha[3]+[Soil].NH4.kgha[3]) as Soil3MineralN
              ([Soil].NO3.kgha[4]+[Soil].NH4.kgha[4]) as Soil4MineralN
              ([Soil].NO3.kgha[3]+[Soil].NH4.kgha[3]+[Soil].NO3.kgha[4]+[Soil].NH4.kgha[4]+[Soil].NO3.kgha[5]+[Soil].NH4.kgha[5]) as SubsurfaceMineralN
              sum([Soil].NO3.kgha) as TotalNO3N
              sum([Soil].NH4.kgha) as TotalNH4N
              sum([Soil].Water.MM[1:10]) as SW200cm
              [Soil].Water.Volumetric[2] as SW30cm
              [Soil].Water.Volumetric[3] as SW50cm
              [Soil].Water.Volumetric[4] as SW70cm
              [Soil].Organic.FInert[1] as FInert10cm
              [Soil].SoilNitrogen.OC[1] as SOC10cm
              [Soil].SoilNitrogen.OC[2] as SOC30cm
              [Soil].SoilNitrogen.OC[3] as SOC50cm
              [Soil].SoilNitrogen.OC[4] as SOC70cm
              [Soil].SoilNitrogen.OC[5] as SOC90cm
              [Soil].SoilNitrogen.OC[6] as SOC110cm
              [Soil].SoilNitrogen.OC[7] as SOC130cm
              [Soil].SoilNitrogen.OC[8] as SOC150cm
              [Soil].NO3.kghappm[1] as NO3ppm10cm
              [Soil].NO3.kghappm[2] as NO3ppm30cm
              [Soil].NO3.kghappm[3] as NO3ppm50cm
              [Soil].NO3.kgha[1] as NO3kgpha10cm
              [Soil].NO3.kgha[2] as NO3kgpha30cm
              [Soil].NO3.kgha[3] as NO3kgpha50cm
              [Soil].SoilNitrogen.dlt_n_min_res[1] as NNM10cm
              [MicroClimate].peta
              [MicroClimate].petr
              [Soil].SoilWater.Eo
              [Soil].Organic.FBiom[1] as FBiom10cm
              [Soil].Water.Volumetric[1] as SurfaceSW
              [Maize].Leaf.Fw
              [Maize].Leaf.Photosynthesis.FVPD.Value
              [Maize].Leaf.Photosynthesis.FT.Value
              [Maize].Leaf.Fn
              [Maize].Root.Depth
              [Maize].Grain.Live.Wt as GrainWt
              [SurfaceOrganicMatter].Wt
              sum([Soil].SoilNitrogen.FOMN) as FOMN
              sum([Soil].SoilNitrogen.HumicN) as HumicN
              sum([Soil].SoilNitrogen.MicrobialN) as MicrobialN
              [Soil].SoilNitrogen.MicrobialN[1] as MicrobialN1
              [Soil].SoilNitrogen.MicrobialN[2] as MicrobialN2
              [Soil].SoilNitrogen.MicrobialN[3] as MicrobialN3
              [Maize].DaysAfterSowing
              [Maize].Phenology.Photoperiod.Value
              [Maize].Phenology.Photosensitive.Target.Value
              [Maize].Phenology.LeafAppearance.FractionComplete
              [Maize].Structure.FinalLeafNumber.Value
              [Maize].Leaf.ExpandedCohortNo
              [Soil].SoilWater.LeachNO3
              [Soil].SoilWater.FlowNO3
              [Maize].Leaf.Height
          Report MaizeHarvestReport: EventNames=[Maize].Harvesting
            VariableNames:
              [Clock].Today
              [Clock].Today.Year as Year
              [Zone].Area
              [Maize].SowingData.Population
              [Maize].SowingDate.DayOfYear
              [Maize].Phenology.CurrentStageName as Stage
              [Maize].Grain.Wt
              [Maize].Stem.Live.Wt
              [Maize].EarLive.Wt
              [Maize].Leaf.Live.Wt
              [Maize].Root.Live.Wt
              [Maize].Husk.Live.Wt
              [Maize].Rachis.Live.Wt
              [Maize].EarLive.N
              [Maize].Grain.Live.N
              [Maize].Stem.Live.N
              [Maize].Leaf.Live.N
              [Maize].Root.Live.N
              [Maize].Root.Depth
              [Maize].AboveGround.N
              [Maize].AboveGround.Wt
              [Maize].Total.N
              [Maize].Total.Wt
              max of [Maize].Leaf.LAI from [Maize].Sowing to [Maize].Harvesting as LAImax
              [Maize].Population
              [Maize].Phenology.FloweringDAS.Value as FloweringDAS
              sum([Soil].SoilNitrogen.FOMC) as FOMC
              sum([Soil].SoilNitrogen.HumicC) as HumicC
              sum([Soil].SoilNitrogen.MicrobialC) as MicrobialC
          Fertiliser
          SurfaceOrganicMatter: InitialResidueName=maize_stubble; InitialResidueType=maize; InitialResidueMass=0; InitialStandingFraction=0; InitialCPR=400; InitialCNR=60
          Manager SowingRule
            StartDate = 12-Dec
            EndDate = 30-Jan
            MinESW = 30
            MinRain = 30
            RainDays = 10
            CultivarName = Katumani
            SowingDepth = 30
            RowSpacing = 750
            Population = 4.44
```csharp
using Models.Interfaces;
using APSIM.Shared.Utilities;
using Models.Utilities;
using Models.Soils;
using Models.PMF;
using Models.Core;
using System;
using Models.Climate;

namespace Models
{
    [Serializable]
    public class Script : Model
    {
        [Link] private Clock Clock;
        [Link] private Fertiliser Fertiliser;
        [Link] private Summary Summary;
        [Link] private Plant Maize;
        [Link] private Soil Soil;
        private Accumulator accumulatedRain;
        [Link]
        private ISoilWater waterBalance;
        
        [Description("Start of sowing window (d-mmm)")]
        public string StartDate { get; set; }
        [Description("End of sowing window (d-mmm)")]
        public string EndDate { get; set; }
        [Description("Minimum extractable soil water for sowing (mm)")]
        public double MinESW { get; set; }
        [Description("Accumulated rainfall required for sowing (mm)")]
        public double MinRain { get; set; }
        [Description("Duration of rainfall accumulation (d)")]
        public int RainDays { get; set; }
        [Description("Cultivar to be sown")]
        public string CultivarName { get; set; }
        [Description("Sowing depth (mm)")]
        public double SowingDepth { get; set; }
        [Description("Row spacing (mm)")]
        public double RowSpacing { get; set; }
        [Description("Plant population (/m2)")]
        public double Population { get; set; }
        
        
        [EventSubscribe("StartOfSimulation")]
        private void OnSimulationCommencing(object sender, EventArgs e)
        {
            accumulatedRain = new Accumulator(this, "[Weather].Rain", RainDays);
        }
        

        [EventSubscribe("DoManagement")]
        private void OnDoManagement(object sender, EventArgs e)
        {
            accumulatedRain.Update();
            
            if (DateUtilities.WithinDates(StartDate, Clock.Today, EndDate) &&
                Maize.IsAlive != true &&
                MathUtilities.Sum(waterBalance.ESW) > MinESW &&
                accumulatedRain.Sum > MinRain)
            {
                Maize.Sow(population: Population, cultivar: CultivarName, depth: SowingDepth, rowSpacing: RowSpacing);    
            }
        
        }
        
    }
}
```
          Plant Maize
          Manager FertiliserRule: same as Validation.Makoka.Factors.Permutation.N.0
          Manager Harvesting
```csharp
using Models.PMF.Phen;
using System;
using Models.Core;
using System.Collections.Generic;
using System.Text;
using Models.Soils;
using Models.PMF;
using Models;
using System.Xml.Serialization;
using APSIM.Shared.Utilities;

namespace Models
{
    [Serializable] 
    public class Script : Model
    {
        [Link] private Plant Maize;
        [Link] private Zone zone;
        [Link(Type = LinkType.Path, Path = "[Maize].Phenology")]
        private Phenology phenology;
                    
        
        [EventSubscribe("StartOfSimulation")]
        private void OnSimulationCommencing(object sender, EventArgs e)
        {
        }
        
        [EventSubscribe("DoManagement")]
        private void OnDoManagement(object sender, EventArgs e)
        {
            if (phenology.CurrentPhase.Name == "ReadyForHarvesting")
            {
                Maize.Harvest();
                Maize.EndCrop();
            }
        }
        
        [EventSubscribe("DoManagementCalculations")]
        private void OnDoManagementCalculations(object sender, EventArgs e)
        {
            
        }
    }
}
```
          Plant Gliricidia
          Operations
            2001-01-15  [Maize].Sow(population: 4.44, cultivar: "NSCM_41", depth: 30, rowSpacing: 750);
            2001-02-07  [Fertiliser].Apply(Amount: 0, Type: Fertiliser.Types.NO3N)
            2004-01-15  [Maize].Sow(population: 3.5, cultivar: "NSCM_41", depth: 30, rowSpacing: 750);
            2004-01-07  [Fertiliser].Apply(Amount: 0, Type: Fertiliser.Types.NO3N)
          Operations GliricidiaManagement
          Manager CuttingManagement
            LeafRemovalWt = 0
            StemRemovalWt = 0
            TotalRemovalWt = 0
            StartAccumulationDate = 12/01/1991 00:00:00
            CumulativeTotalRemovalWt = 0
            script: same as in Validation.Hamakuapoko.HamakuapokoBase.Zone.CuttingManagement
    Folder Combined Results
      Memo
        Combined results from all four sites indicates that the biomass growth of Gliricidia and amounts cut approximated those observed, which indicates that the Gliricidia model was adequate for these situations.
  Folder Sensibility
    Folder StripCropping
      Memo
        This sensibility test checks that Gliricidia crops provide N supply to neighbouring maize crops in strip cropping situations.  A simulation experiment has been constructed to simulate yield in Malawi.  Yield response to Gliricidia was positive and was generally a little higher than to N ferilisation, and temporal variations were close to those for fertilised crops, as expected. However, under different conditions, N supply from residues or feriliser may not be sufficient in some wet years, and competition for water may reduce crop yield below fertilised sole crops in dry years. Finally, the benefits of the trees may take a few seasons to be realised.
      Simulation MakokaStripCrop
        Clock: Start=1984-01-01; End=2014-12-31
        Summary SummaryFile
        Weather: FileName=Makoka.met
        MicroClimate: a_interception=0; b_interception=1; c_interception=0; d_interception=0; SoilHeatFluxFraction=0.4; MinimumHeightDiffForNewLayer=0; NightInterceptionFraction=0.5; ReferenceHeight=2
        Manager GliricidiaManagement
          Harvest1Date = 15-feb
          Harvest2Date = 15-sep
          Harvest3Date = 15-dec
          AddGliricidiaResidues = True
          LeafRemovalWt = 0
          LeafRemovalN = 0
          StemRemovalWt = 0
          StemRemovalN = 0
          TotalRemovalWt = 0
          TotalRemovalN = 0
```csharp
using Models.Soils;
using APSIM.Shared.Utilities;
using System.Xml.Serialization;
using Models.Surface;
using Models.PMF.Organs;
using Models.PMF;
using Models.Core;
using System.Collections.Generic;
using System;
using Newtonsoft.Json;


namespace Models
{
    [Serializable] 
    [System.Xml.Serialization.XmlInclude(typeof(Model))]
    public class Script : Model
    {
        [Link(ByName = true)] Plant Gliricidia;
        [Link(ByName = true)] SurfaceOrganicMatter MaizeZoneSurfaceOrganicMatter;
        [Link(ByName = true)] Zone MaizeZone;
        [Link(ByName = true)] Zone GliricidiaZone;
        [Link] Clock Clock;


        [Description("First Harvest (d-mmm)")]
        public string Harvest1Date { get; set; }
        [Description("Second Harvest (d-mmm)")]
        public string Harvest2Date { get; set; }
        [Description("Third Harvest (d-mmm)")]
        public string Harvest3Date { get; set; }

        [Description("Add gliricidia residues to mazie zone")]
        public bool AddGliricidiaResidues { get; set; }
    
        [JsonIgnore] private RemovalFractions Remove { get; set; }

        [Description("Leaf Removal Wt")]
        public double LeafRemovalWt {get; set;}
        [Description("Leaf Removal N")]
        public double LeafRemovalN {get; set;}


        [Description("Stem Removal Wt")]
        public double StemRemovalWt {get; set;}
        [Description("Stem Removal N")]
        public double StemRemovalN {get; set;}


        [Description("Total Removal Wt")]
        public double TotalRemovalWt {get; set;}
        [Description("Total Removal N")]
        public double TotalRemovalN {get; set;}


        [EventSubscribe("StartOfSimulation")]
        private void OnSimulationCommencing(object sender, EventArgs e)
        {
            Remove = new RemovalFractions();
        }

        [EventSubscribe("StartOfDay")]
        private void OnStartOfDay(object sender, EventArgs e)
        {

        LeafRemovalWt = 0;
        StemRemovalWt = 0;
        LeafRemovalN = 0;
        StemRemovalN = 0;

            if (DateUtilities.WithinDates(Harvest1Date, Clock.Today, Harvest1Date) ||
                DateUtilities.WithinDates(Harvest2Date, Clock.Today, Harvest2Date) ||
                DateUtilities.WithinDates(Harvest3Date, Clock.Today, Harvest3Date))
            {
                if (Gliricidia.IsAlive)
                    DoCut(10,25);   
            }

        }

        public void DoCut(double LeafResidue, double StemResidue)
        {
            double Lwt = (double)Gliricidia.FindByPath("Leaf.Live.Wt").Value;
            double Ln = (double)Gliricidia.FindByPath("Leaf.Live.N").Value;
            double LeafRemovalFraction = 0;

            if (Lwt > 0)
                LeafRemovalFraction = (Lwt - LeafResidue) / Lwt;
            if (LeafRemovalFraction < 0)
                LeafRemovalFraction = 0;
            LeafRemovalWt = (Lwt - LeafResidue);
            LeafRemovalN = Ln * LeafRemovalFraction;
                               
            double Swt = (double)Gliricidia.FindByPath("Stem.Live.Wt").Value;
            double Sn = (double)Gliricidia.FindByPath("Stem.Live.N").Value;
            double StemRemovalFraction = 0;

            if (Swt > 0)
                StemRemovalFraction = (Swt - StemResidue) / Swt;             
            if (StemRemovalFraction < 0)
                StemRemovalFraction = 0;
            StemRemovalWt = (Swt - StemResidue);  
            StemRemovalN = Sn * StemRemovalFraction;
               
            Remove.SetFractionToRemove("Leaf", LeafRemovalFraction);
            Remove.SetFractionToRemove("Stem", StemRemovalFraction);
            Remove.SetFractionToResidue("Leaf", 0.0);
            Remove.SetFractionToResidue("Stem", 0.0);
            Gliricidia.RemoveBiomass("Cut", Remove);

            if (AddGliricidiaResidues)
            {
            double FOMadded = (LeafRemovalWt)*10.0*GliricidiaZone.Area/MaizeZone.Area;
            double FONadded = (LeafRemovalN)*10.0*GliricidiaZone.Area/MaizeZone.Area;

            MaizeZoneSurfaceOrganicMatter.Add(FOMadded, FONadded,0.0,"gliricidia","gliricidia");
            }


        }
    }
}
```
        SoilArbitrator Soil Arbitrator
        RectangularZone GliricidiaZone: Length=1; Width=2; Slope=0; AspectAngle=0; Altitude=50
          Report GliricidiaZoneReport
            VariableNames:
              [Clock].Today
              sum([Soil].Water.MM) as GliricidiaZoneSWTot
              [Gliricidia].AboveGround.Wt
              [Gliricidia].AboveGround.NConc
              [Gliricidia].Leaf.LAI
              ([MicroClimate].SurfaceRS[0] / [Weather].Radn) as GliricidiaZoneTransmission
              [SurfaceOrganicMatter].Wt as GliricidiaZoneResidues
              [Gliricidia].Leaf.Height
              [Gliricidia].Leaf.Fw
              [Gliricidia].Leaf.Fn
              [Gliricidia].Leaf.Live.NConc
              [Gliricidia].Stem.Live.NConc
          Fertiliser
          SurfaceOrganicMatter: InitialResidueName=wheat_stubble; InitialResidueType=wheat; InitialResidueMass=500; InitialStandingFraction=0; InitialCPR=0; InitialCNR=100
          Manager SetupGliricidiaRootZones
            UseExtraZone = True
```csharp
using Models.Soils;
using Models.Functions;
using APSIM.Shared.Utilities;
using System.Xml.Serialization;
using Models;
using Models.PMF;
using System.Text;
using System.Collections.Generic;
using Models.Core;
using System;
using Models.PMF.Organs;

namespace Models
{
    [Serializable] 
    public class Script : Model
    {
        [Link] private Plant Gliricidia;
        [Link] private Clock Clock;
        [Link] private Zone zone;
        [Link(Type = LinkType.Path, Path = "[Gliricidia].Root")]
        private Root root;

        [Description("Use extra root zone")]
        public bool UseExtraZone { get; set; }

        
        [EventSubscribe("StartOfSimulation")]
        private void OnSimulationCommencing(object sender, EventArgs e)
        {
            if (UseExtraZone)
            {
            root.ZoneNamesToGrowRootsIn.Add("MaizeZone");
            root.ZoneRootDepths.Add(50);
NutrientPoolFunctions InitialDM = new NutrientPoolFunctions();
Constant InitStruct = new Constant();
InitStruct.FixedValue = 10;
InitialDM.Structural = InitStruct;
Constant InitMetab = new Constant();
InitMetab.FixedValue = 0;
InitialDM.Metabolic = InitMetab;
Constant InitStor = new Constant();
InitStor.FixedValue = 0;
InitialDM.Storage = InitStor;
            root.ZoneInitialDM.Add(InitialDM);

            }
        }
    }
}
```
          Plant Gliricidia
          Operations GliricidiaSowing
            1984-12-15  [Gliricidia].Sow(population: 0.74, cultivar: GliricidiaYoung,depth: 100, rowSpacing: 1500);
          Manager Reset on date
            ResetDate = 14-Feb
            ResetWater = No
            ResetN = No
            ResetSOM = No
```csharp
using Models.Soils.Nutrients;
using APSIM.Shared.Utilities;
using Models.Surface;
using Models.Utilities;
using Models.Soils.Nutrients;
using Models.Soils;
using Models.PMF;
using Models.Core;
using System;
using Models.Interfaces;

namespace Models
{
    [Serializable]
    public class Script : Model
    {
        [Link] private Clock Clock;
        [Link] private Plant Wheat;
        [Link] private ISoilWater SoilWater;
        [Link] private Nutrient nutrient;
        [Link] private SurfaceOrganicMatter SOM;
        [Link] private Summary Summary;

        [Description("Date to reset on:")]
        public string ResetDate {get;set;}

        [Description("Reset Water?")]
        public string ResetWater {get;set;}

        [Description("Reset Nitrogen?")]
        public string ResetN {get;set;}

        [Description("Reset Surface Organic Matter?")]
        public string ResetSOM {get;set;}

        [EventSubscribe("DoManagement")]
        private void OnDoManagement(object sender, EventArgs e)
        {
            if (DateUtilities.WithinDates(ResetDate, Clock.Today, ResetDate))
            {
                if (ResetWater == "Yes")
                {
                    Summary.WriteMessage(this, "Reset Water", MessageType.Diagnostic);
                    SoilWater.Reset();
                }
                if (ResetN == "Yes")
                {
                    Summary.WriteMessage(this, "Reset Nitrogen", MessageType.Diagnostic);
                    nutrient.Reset();
                }
                if (ResetSOM == "Yes")
                {
                    Summary.WriteMessage(this, "Reset Surface OM", MessageType.Diagnostic);
                    SOM.Reset();
                }
            }
        }
    }
}
```
          Soil GliricidiaZoneSoil: Site=Bugesera; NearestTown=Nyamata; Region=Bugesera; Country=Rwanda; Latitude=-2.15; Longitude=30.45; DataSource=Rwanda soil database using properties for Ferralsol
            Water: InitialPAWmm=169.5; RelativeTo=LL15; FilledFromTop=true
              Thickness=[200, 200, 200, 200, 200, 200, 200, 200, 200, 200, 500, 500]
              InitialValues=[0.36, 0.36, 0.2775, 0.05, 0.1, 0.1, 0.1, 0.1, 0.1, 0.1, 0.1, 0.1]
            CERESSoilTemperature Temperature
            Nutrient
            WaterBalance SoilWater: same as Validation.Makoka.MakokaBase.Zone.Makoka Soil.SoilWater
            Physical
              Thickness  BD    AirDry  LL15  DUL   SAT
              200        1.42  0.02    0.05  0.36  0.46
              200        1.45  0.02    0.05  0.36  0.453
              200        1.47  0.02    0.05  0.34  0.445
              200        1.31  0.02    0.05  0.33  0.44
              200        1.42  0.02    0.1   0.33  0.44
              200        1.38  0.02    0.1   0.32  0.44
              200        1.32  0.02    0.1   0.31  0.44
              200        1.3   0.02    0.1   0.3   0.44
              200        1.31  0.02    0.1   0.3   0.44
              200        1.31  0.02    0.1   0.29  0.44
              500        1.31  0.02    0.1   0.29  0.44
              500        1.31  0.02    0.1   0.29  0.44
              SoilCrop MaizeSoil
                LL=[0.05, 0.05, 0.05, 0.05, 0.1, 0.1, 0.1, 0.1, 0.1, 0.1, 0.1, 0.1]
                KL=[0.05, 0.05, 0.05, 0.05, 0.05, 0.04, 0.03, 0.02, 0.02, 0.02, 0, 0]
                XF=[1, 1, 1, 1, 0.6, 0.6, 0, 0, 0, 0, 0, 0]
              SoilCrop GliricidiaSoil
                LL=[0.05, 0.05, 0.05, 0.05, 0.1, 0.1, 0.1, 0.1, 0.1, 0.1, 0.1, 0.1]
                KL=[0.1, 0.1, 0.1, 0.1, 0.1, 0.1, 0.1, 0.1, 0.02, 0.02, 0.02, 0.02]
                XF=[1, 1, 1, 1, 1, 1, 1, 1, 1, 0, 0, 0]
            Organic: same as Validation.Makoka.MakokaBase.Zone.Makoka Soil.Organic
            Chemical: Thickness=[200, 200, 200, 200, 200, 200, 200, 200, 200, 200]; PH=[5.9, 5.6, 5.8, 5.9, 6.1, 6.3, 6.2, 6.4, 6.3, 5.9]; PHUnits=Water
            Solute NO3: Thickness=[200, 200, 200, 200, 200, 200, 200, 200, 200, 200]; InitialValuesUnits=ppm; WaterTableConcentration=0; D0=0; DepthConstant=0; MaxDepthSoluteAccessible=0; RunoffEffectivenessAtMovingSolute=0; MaxEffectiveRunoff=0
              InitialValues=[0.457746, 0.0593066, 0.0593066, 0.0593066, 0.0593066, 0.0593066, 0.0593066, 0.0593066, 0.0593066, 1]
            Solute NH4: Thickness=[200, 200, 200, 200, 200, 200, 200, 200, 200, 200]; InitialValuesUnits=ppm; WaterTableConcentration=0; D0=0; DepthConstant=0; MaxDepthSoluteAccessible=0; RunoffEffectivenessAtMovingSolute=0; MaxEffectiveRunoff=0
              InitialValues=[0.84507, 0.109489, 0.109489, 0.109489, 0.109489, 0.109489, 0.109489, 0.109489, 0.109489, 0.2]
            Solute Urea: same as Validation.Makoka.MakokaBase.Zone.Makoka Soil.Urea
        RectangularZone MaizeZone: Length=1; Width=6; Slope=0; AspectAngle=0; Altitude=50
          Report: EventNames=[Maize].Harvesting
            VariableNames:
              [Clock].Today
              [Clock].Today.Year
              [Season].Script.Season as Season
              [Season].Script.SeasonRainfall as GSR
              [Maize].Grain.Wt
              sum of [MaizeZoneSoil].SoilWater.LeachNO3 from [Maize].Sowing to [Maize].Harvesting as NO3Leaching
          Fertiliser
          SurfaceOrganicMatter MaizeZoneSurfaceOrganicMatter: InitialResidueName=wheat_stubble; InitialResidueType=wheat; InitialResidueMass=500; InitialStandingFraction=0; InitialCPR=0; InitialCNR=100
          Irrigation
          Plant Maize
          Soil MaizeZoneSoil: Site=Bugesera; NearestTown=Nyamata; Region=Bugesera; Country=Rwanda; Latitude=-2.15; Longitude=30.45; DataSource=Rwanda soil database using properties for Ferralsol
            Water: InitialPAWmm=169.5; RelativeTo=LL15; FilledFromTop=true
              Thickness=[200, 200, 200, 200, 200, 200, 200, 200, 200, 200, 500, 500]
              InitialValues=[0.36, 0.36, 0.2775, 0.05, 0.1, 0.1, 0.1, 0.1, 0.1, 0.1, 0.1, 0.1]
            CERESSoilTemperature Temperature
            Nutrient
            WaterBalance SoilWater: same as Validation.Makoka.MakokaBase.Zone.Makoka Soil.SoilWater
            Physical
              Thickness  BD    AirDry  LL15  DUL   SAT
              200        1.42  0.02    0.05  0.36  0.453
              200        1.45  0.02    0.05  0.36  0.445
              200        1.47  0.02    0.05  0.34  0.445
              200        1.31  0.02    0.05  0.33  0.44
              200        1.42  0.02    0.1   0.33  0.44
              200        1.38  0.02    0.1   0.32  0.44
              200        1.32  0.02    0.1   0.31  0.44
              200        1.3   0.02    0.1   0.3   0.44
              200        1.31  0.02    0.1   0.3   0.44
              200        1.31  0.02    0.1   0.29  0.44
              500        1.31  0.02    0.1   0.29  0.44
              500        1.31  0.02    0.1   0.29  0.44
              SoilCrop MaizeSoil
                LL=[0.05, 0.05, 0.05, 0.05, 0.1, 0.1, 0.1, 0.1, 0.1, 0.1, 0.1, 0.1]
                KL=[0.05, 0.05, 0.05, 0.05, 0.05, 0.04, 0.03, 0.02, 0.02, 0.02, 0, 0]
                XF=[1, 1, 1, 1, 0.6, 0.6, 0, 0, 0, 0, 0, 0]
              SoilCrop GliricidiaSoil
                LL=[0.05, 0.05, 0.05, 0.05, 0.1, 0.1, 0.1, 0.1, 0.1, 0.1, 0.1, 0.1]
                KL=[0.1, 0.1, 0.1, 0.1, 0.1, 0.1, 0.1, 0.1, 0.02, 0.02, 0.02, 0.02]
                XF=[1, 1, 1, 1, 1, 1, 1, 1, 1, 0, 0, 0]
            Organic: same as Validation.Makoka.MakokaBase.Zone.Makoka Soil.Organic
            Chemical: Thickness=[200, 200, 200, 200, 200, 200, 200, 200, 200, 200]; PH=[5.9, 5.6, 5.8, 5.9, 6.1, 6.3, 6.2, 6.4, 6.3, 5.9]; PHUnits=Water
            Solute NO3: same as Sensibility.StripCropping.MakokaStripCrop.GliricidiaZone.GliricidiaZoneSoil.NO3
            Solute NH4: same as Sensibility.StripCropping.MakokaStripCrop.GliricidiaZone.GliricidiaZoneSoil.NH4
            Solute Urea: same as Validation.Makoka.MakokaBase.Zone.Makoka Soil.Urea
          Manager Harvesting
            RemoveFraction = 1
```csharp
using Models.PMF.Phen;
using APSIM.Shared.Utilities;
using System.Xml.Serialization;
using Models;
using Models.Surface;
using Models.PMF;
using Models.Soils;
using System.Text;
using System.Collections.Generic;
using Models.Core;
using System;
using Models.Soils.Nutrients;

namespace Models
{
    [Serializable] 
    public class Script : Model
    {
        [Link] private Plant Maize;
        [Link] private Zone zone;
        [Link] private SurfaceOrganicMatter SOM;
        [Link] private Clock clock;
        [Link(Type = LinkType.Path, Path = "[Maize].Phenology")]
        private Phenology phenology;
        [Link] Models.Report report;

        [Description("Fraction of resiudes to remove at harvest (0-1)")]
        public double RemoveFraction { get; set; }

    
        [EventSubscribe("DoManagement")]
        private void OnDoManagement(object sender, EventArgs e)
        {
            if (phenology.CurrentPhase.Name == "ReadyForHarvesting")
            {
                Maize.Harvest();
                Maize.EndCrop();
                if (RemoveFraction > 0)
                    SOM.Incorporate(RemoveFraction, 0.0);         

            }
        }
        
        [EventSubscribe("DoManagementCalculations")]
        private void OnDoManagementCalculations(object sender, EventArgs e)
        {
            
        }
    }
}
```
          Manager Reset on date
            ResetDate = 1-jun
            ResetWater = No
            ResetN = Yes
            ResetSOM = No
            script: same as in Sensibility.StripCropping.MakokaStripCrop.GliricidiaZone.Reset on date
          Manager SowingFertiliser
            Amount = 0
            CropName = Maize
```csharp
using Models.Soils;
using System;
using Models.Core;
using Models.PMF;
namespace Models
{
    [Serializable]
    public class Script : Model
    {
        [Link] Clock Clock;
        [Link] Fertiliser Fertiliser;
        [Link] Summary Summary;
        
        
        [Description("Amount of fertiliser to be applied (kg/ha)")]
        public double Amount { get; set; }
        
        [Description("Crop to be fertilised")]
        public string CropName { get; set; }
        
        
        

        [EventSubscribe("Sowing")]
        private void OnSowing(object sender, EventArgs e)
        {
            Model crop = sender as Model;
            if (crop.Name.ToLower() == CropName.ToLower())
                Fertiliser.Apply(Amount: Amount, Type: Fertiliser.Types.NO3N);
        }
        
    }
}
```
          Manager MaizeCalculations
            EffectiveYieldFactor = 1
```csharp
using Models.Soils;
using System;
using System.Collections.Generic;
using Models.Core;
using Models.PMF;
using Models.PMF.Interfaces;
using Models.Surface;
using System.Xml.Serialization;
using APSIM.Shared.Utilities;
using Models.Interfaces;
using Models.PMF.Organs;

namespace Models
{
    [Serializable] 
    [System.Xml.Serialization.XmlInclude(typeof(Model))]
    public class Script : Model
    {
        [Link(ByName = true)] ReproductiveOrgan Grain;
        [Link(ByName = true)] Zone MaizeZone;
        [Link(ByName = true)] Zone GliricidiaZone;
        [Link] Clock Clock;

        [Description("Effective Yield Factor")]
        public double EffectiveYieldFactor { get; set; }

        [Description("EffectiveYield")]
        public double EffectiveYield 
        {
           get
           { 
           return Grain.Live.Wt * EffectiveYieldFactor;
           }
        }




    }
}
```
          Manager SowingRule
            StartDate = 12-Dec
            EndDate = 30-Jan
            MinESW = 30
            MinRain = 30
            RainDays = 10
            CultivarName = Katumani
            SowingDepth = 30
            RowSpacing = 750
            Population = 4.44
```csharp
using Models.Interfaces;
using APSIM.Shared.Utilities;
using Models.Utilities;
using Models.Soils;
using Models.PMF;
using Models.Core;
using System;
using Models.Climate;

namespace Models
{
    [Serializable]
    public class Script : Model
    {
        [Link] private Clock Clock;
        [Link] private Fertiliser Fertiliser;
        [Link] private Summary Summary;
        [Link] private Plant Maize;
        [Link] private Soil Soil;
        private Accumulator accumulatedRain;
        [Link]
        private ISoilWater waterBalance;
        
        [Description("Start of sowing window (d-mmm)")]
        public string StartDate { get; set; }
        [Description("End of sowing window (d-mmm)")]
        public string EndDate { get; set; }
        [Description("Minimum extractable soil water for sowing (mm)")]
        public double MinESW { get; set; }
        [Description("Accumulated rainfall required for sowing (mm)")]
        public double MinRain { get; set; }
        [Description("Duration of rainfall accumulation (d)")]
        public int RainDays { get; set; }
        [Description("Cultivar to be sown")]
        public string CultivarName { get; set; }
        [Description("Sowing depth (mm)")]
        public double SowingDepth { get; set; }
        [Description("Row spacing (mm)")]
        public double RowSpacing { get; set; }
        [Description("Plant population (/m2)")]
        public double Population { get; set; }
        
        
        [EventSubscribe("StartOfSimulation")]
        private void OnSimulationCommencing(object sender, EventArgs e)
        {
            accumulatedRain = new Accumulator(this, "[Weather].Rain", RainDays);
        }
        

        [EventSubscribe("DoManagement")]
        private void OnDoManagement(object sender, EventArgs e)
        {
            accumulatedRain.Update();
            
            if ((DateUtilities.WithinDates(StartDate, Clock.Today, EndDate) &&
                Maize.IsAlive != true &&
                MathUtilities.Sum(waterBalance.ESW) > MinESW &&
                accumulatedRain.Sum > MinRain) ||
               (DateUtilities.WithinDates(EndDate, Clock.Today, EndDate) &&
                Maize.IsAlive != true))
            {
                Maize.Sow(population: Population, cultivar: CultivarName, depth: SowingDepth, rowSpacing: RowSpacing);    
            }
        
        }
        
    }
}
```
          Manager Season
            Season = 0
            SeasonRainfall = 0
            StartDate = 12-Dec
            EndDate = 12-Mar
```csharp
using Models.Climate;
using APSIM.Shared.Utilities;
using System.Xml.Serialization;
using Models;
using Models.Surface;
using Models.PMF;
using Models.Soils.Nutrients;
using Models.Soils;
using System.Text;
using System.Collections.Generic;
using Models.Core;
using System;
using Models.Soils.Nutrients;

namespace Models
{
    [Serializable] 
    public class Script : Model
    {
            [Link] Clock Clock;
            [Link] Weather Weather;

        [Description("SeasonID")]
        public double Season{ get; set; }

        [Description("Season Rainfall (mm)")]
        public double SeasonRainfall{ get; set; }

        [Description("Start of sowing window (d-mmm)")]
        public string StartDate { get; set; }

        [Description("End of season window (d-mmm)")]
        public string EndDate { get; set; }

                [EventSubscribe("DoManagement")]
        private void OnDoManagement(object sender, EventArgs e)
        {
        if ((DateUtilities.WithinDates(StartDate, Clock.Today, StartDate)))
           Season = Clock.Today.Year + 0.1;

        if ((DateUtilities.WithinDates(StartDate, Clock.Today, StartDate)))
           SeasonRainfall=0.0;
        if ((DateUtilities.WithinDates(StartDate, Clock.Today, EndDate)))
           SeasonRainfall+=Weather.Rain;

        }
    
    }
}
```
      Simulation MakokaSoleCrop
        Clock: Start=1984-01-01; End=2014-12-31
        Summary SummaryFile
        Weather: FileName=Makoka.met
        MicroClimate: a_interception=0; b_interception=1; c_interception=0; d_interception=0; SoilHeatFluxFraction=0.4; MinimumHeightDiffForNewLayer=0; NightInterceptionFraction=0.5; ReferenceHeight=2
        SoilArbitrator Soil Arbitrator
        RectangularZone MaizeZone: Length=1; Width=6; Slope=0; AspectAngle=0; Altitude=50
          Report: EventNames=[Maize].Harvesting
            VariableNames:
              [Clock].Today
              [Clock].Today.Year
              [Season].Script.Season as Season
              [Season].Script.SeasonRainfall as GSR
              [Maize].Grain.Wt
              sum of [MaizeZoneSoil].SoilWater.LeachNO3 from [Maize].Sowing to [Maize].Harvesting as NO3Leaching
          Fertiliser
          SurfaceOrganicMatter MaizeZoneSurfaceOrganicMatter: InitialResidueName=wheat_stubble; InitialResidueType=wheat; InitialResidueMass=500; InitialStandingFraction=0; InitialCPR=0; InitialCNR=100
          Irrigation
          Plant Maize
          Soil MaizeZoneSoil: same as Sensibility.StripCropping.MakokaStripCrop.GliricidiaZone.GliricidiaZoneSoil
          Manager Harvesting: same as Sensibility.StripCropping.MakokaStripCrop.MaizeZone.Harvesting
          Manager Reset on date: same as Sensibility.StripCropping.MakokaStripCrop.MaizeZone.Reset on date
          Manager SowingFertiliser: same as Sensibility.StripCropping.MakokaStripCrop.MaizeZone.SowingFertiliser
          Manager SowingRule: same as Sensibility.StripCropping.MakokaStripCrop.MaizeZone.SowingRule
          Manager Season: same as Sensibility.StripCropping.MakokaStripCrop.MaizeZone.Season
      Simulation MakokaSoleCropFertilised
        Clock: Start=1984-01-01; End=2014-12-31
        Summary SummaryFile
        Weather: FileName=Makoka.met
        MicroClimate: a_interception=0; b_interception=1; c_interception=0; d_interception=0; SoilHeatFluxFraction=0.4; MinimumHeightDiffForNewLayer=0; NightInterceptionFraction=0.5; ReferenceHeight=2
        SoilArbitrator Soil Arbitrator
        RectangularZone MaizeZone: Length=1; Width=6; Slope=0; AspectAngle=0; Altitude=50
          Report: EventNames=[Maize].Harvesting
            VariableNames:
              [Clock].Today
              [Clock].Today.Year
              [Season].Script.Season as Season
              [Season].Script.SeasonRainfall as GSR
              [Maize].Grain.Wt
              sum of [MaizeZoneSoil].SoilWater.LeachNO3 from [Maize].Sowing to [Maize].Harvesting as NO3Leaching
          Fertiliser
          SurfaceOrganicMatter MaizeZoneSurfaceOrganicMatter: InitialResidueName=wheat_stubble; InitialResidueType=wheat; InitialResidueMass=500; InitialStandingFraction=0; InitialCPR=0; InitialCNR=100
          Irrigation
          Plant Maize
          Soil MaizeZoneSoil: same as Sensibility.StripCropping.MakokaStripCrop.GliricidiaZone.GliricidiaZoneSoil
          Manager Harvesting: same as Sensibility.StripCropping.MakokaStripCrop.MaizeZone.Harvesting
          Manager Reset on date: same as Sensibility.StripCropping.MakokaStripCrop.MaizeZone.Reset on date
          Manager SowingFertiliser
            Amount = 50
            CropName = Maize
            script: same as in Sensibility.StripCropping.MakokaStripCrop.MaizeZone.SowingFertiliser
          Manager SowingRule: same as Sensibility.StripCropping.MakokaStripCrop.MaizeZone.SowingRule
          Manager Season: same as Sensibility.StripCropping.MakokaStripCrop.MaizeZone.Season
    Folder Temperature Response
      Memo
        The temperature requirements of Gliricidia sepium indicated by its distribution at native sites is for mean monthly temperatures in the range from approximately 21-29C ([simons19942]). In addition we note: (1) Athanase Mukuralinda commented that gliricidia doesn’t grow above about 1600 m in Rwanda, which occurs about half way along our Rwanda transect, and (2) There is a record of it growing on a transect up to 1000 m in Guatemala in its native range ([melchor1999screening]). Gliricidia sheds leaves once night time temperatures fall below approximately 15C ([Whitemanetal1986]), and the plant is susceptible to frosts unless pruned ([Stewartetal1992]). These tests should indicate a decrease in yield below an optimum average annual temperature, with negligible yield below about 19C.
      Experiment GuatemalaTransect
        Factors
          Permutation
            Factor Cell
              CompositeFactor 15043_-91905
                Specifications:
                  [Soil]
                  [Weather]
                Weather 15043_-91905: FileName=15043_-91905.met
                Soil Synthetic Soil Derived from ISRIC SoilGrids: ASCOrder=NA; ASCSubOrder=NA; SoilType=Haplic Luvisols; Site=NA; NearestTown=NA; Region=NA; State=NA; Country=Guatemala; NaturalVegetation=NA; ApsoilNumber=9999; Latitude=15.125; Longitude=-91.875; LocationAccuracy=+- 250 m; DataSource=ISRIC SoilGrids
                  Water: Thickness=[150, 150, 150, 150, 200, 200, 200, 200, 300, 300]; InitialPAWmm=0; RelativeTo=LL15; FilledFromTop=true
                    InitialValues=[0.29, 0.29, 0.287, 0.283, 0.28, 0.28, 0.28, 0.28, 0.28, 0.28]
                  Physical
                    Thickness  ParticleSizeClay  ParticleSizeSand  ParticleSizeSilt  BD     AirDry  LL15   DUL    SAT    KS
                    150        30.3              41                29.2              0.968  0.097   0.29   0.433  0.57   10.41
                    150        32                40.5              28                1.049  0.097   0.29   0.422  0.545  8.58
                    150        33.5              39.8              26.8              1.107  0.096   0.287  0.41   0.528  7.21
                    150        34.5              39.2              26.2              1.127  0.094   0.283  0.405  0.522  6.42
                    200        35                39.2              26                1.139  0.093   0.28   0.402  0.52   6.059
                    200        35                39.8              26                1.144  0.093   0.28   0.402  0.52   6.059
                    200        35                40                25.9              1.148  0.093   0.28   0.401  0.519  6.059
                    200        35                40                25.7              1.151  0.093   0.28   0.399  0.517  6.059
                    300        35                40                25.4              1.154  0.093   0.28   0.397  0.515  6.059
                    300        35                40                25.1              1.159  0.093   0.28   0.394  0.511  6.059
                    SoilCrop RiceSoil
                      LL=[0.29, 0.29, 0.288, 0.293, 0.304, 0.321, 0.336, 0.351, 0.369, 0.389]
                      KL=[0.06, 0.06, 0.06, 0.055, 0.048, 0.04, 0.032, 0.024, 0.014, 0.003]
                      XF=[1, 1, 1, 1, 1, 1, 1, 1, 1, 1]
                    SoilCrop WheatSoil
                      LL=[0.29, 0.29, 0.288, 0.293, 0.304, 0.321, 0.336, 0.351, 0.369, 0.389]
                      KL=[0.06, 0.06, 0.06, 0.055, 0.048, 0.04, 0.032, 0.024, 0.014, 0.003]
                      XF=[1, 1, 1, 1, 1, 1, 1, 1, 1, 1]
                    SoilCrop TeffSoil
                      LL=[0.29, 0.29, 0.288, 0.293, 0.304, 0.321, 0.336, 0.351, 0.369, 0.389]
                      KL=[0.06, 0.06, 0.06, 0.055, 0.048, 0.04, 0.032, 0.024, 0.014, 0.003]
                      XF=[1, 1, 1, 1, 1, 1, 1, 1, 1, 1]
                    SoilCrop SugarcaneSoil
                      LL=[0.29, 0.29, 0.288, 0.288, 0.294, 0.303, 0.313, 0.321, 0.332, 0.343]
                      KL=[0.06, 0.06, 0.06, 0.057, 0.053, 0.048, 0.044, 0.039, 0.033, 0.027]
                      XF=[1, 1, 1, 1, 1, 1, 1, 1, 1, 1]
                    SoilCrop MaizeSoil
                      LL=[0.29, 0.29, 0.288, 0.293, 0.304, 0.321, 0.336, 0.351, 0.369, 0.389]
                      KL=[0.06, 0.06, 0.06, 0.055, 0.048, 0.04, 0.032, 0.024, 0.014, 0.003]
                      XF=[1, 1, 1, 1, 1, 1, 1, 1, 1, 1]
                    SoilCrop SoybeanSoil
                      LL=[0.29, 0.29, 0.288, 0.293, 0.304, 0.321, 0.336, 0.351, 0.369, 0.389]
                      KL=[0.06, 0.06, 0.06, 0.055, 0.048, 0.04, 0.032, 0.024, 0.014, 0.003]
                      XF=[1, 1, 1, 1, 1, 1, 1, 1, 1, 1]
                    SoilCrop OilPalmSoil
                      LL=[0.29, 0.29, 0.288, 0.288, 0.294, 0.303, 0.313, 0.321, 0.332, 0.343]
                      KL=[0.06, 0.06, 0.06, 0.057, 0.053, 0.048, 0.044, 0.039, 0.033, 0.027]
                      XF=[1, 1, 1, 1, 1, 1, 1, 1, 1, 1]
                    SoilCrop CassavaSoil
                      LL=[0.29, 0.29, 0.288, 0.293, 0.304, 0.321, 0.336, 0.351, 0.369, 0.389]
                      KL=[0.06, 0.06, 0.06, 0.055, 0.048, 0.04, 0.032, 0.024, 0.014, 0.003]
                      XF=[1, 1, 1, 1, 1, 1, 1, 1, 1, 1]
                    SoilCrop PlantainForageSoil
                      LL=[0.29, 0.29, 0.288, 0.288, 0.294, 0.303, 0.313, 0.321, 0.332, 0.343]
                      KL=[0.06, 0.06, 0.06, 0.057, 0.053, 0.048, 0.044, 0.039, 0.033, 0.027]
                      XF=[1, 1, 1, 1, 1, 1, 1, 1, 1, 1]
                    SoilCrop SunflowerSoil
                      LL=[0.291, 0.3, 0.307, 0.313, 0.323, 0.337, 0.351, 0.364, 0.379, 0.393]
                      KL=[0.1, 0.093, 0.084, 0.075, 0.065, 0.053, 0.041, 0.029, 0.015, 0.001]
                      XF=[1, 1, 1, 1, 1, 1, 1, 1, 1, 1]
                    SoilCrop CanolaSoil
                      LL=[0.29, 0.29, 0.288, 0.293, 0.304, 0.321, 0.336, 0.351, 0.369, 0.389]
                      KL=[0.06, 0.06, 0.06, 0.055, 0.048, 0.04, 0.032, 0.024, 0.014, 0.003]
                      XF=[1, 1, 1, 1, 1, 1, 1, 1, 1, 1]
                    SoilCrop SorghumSoil
                      LL=[0.29, 0.29, 0.288, 0.29, 0.298, 0.31, 0.322, 0.333, 0.347, 0.362]
                      KL=[0.07, 0.07, 0.07, 0.066, 0.06, 0.053, 0.045, 0.039, 0.03, 0.019]
                      XF=[1, 1, 1, 1, 1, 1, 1, 1, 1, 1]
                    SoilCrop MilletSoil
                      LL=[0.29, 0.29, 0.288, 0.29, 0.298, 0.31, 0.322, 0.333, 0.347, 0.362]
                      KL=[0.07, 0.07, 0.07, 0.066, 0.06, 0.053, 0.045, 0.039, 0.03, 0.019]
                      XF=[1, 1, 1, 1, 1, 1, 1, 1, 1, 1]
                    SoilCrop PeanutSoil
                      LL=[0.29, 0.29, 0.287, 0.283, 0.29, 0.31, 0.33, 0.349, 0.372, 0.392]
                      KL=[0.06, 0.06, 0.06, 0.06, 0.055, 0.045, 0.035, 0.025, 0.012, 0.001]
                      XF=[1, 1, 1, 1, 1, 1, 1, 1, 1, 1]
                    SoilCrop BarleySoil
                      LL=[0.29, 0.29, 0.288, 0.291, 0.302, 0.316, 0.33, 0.343, 0.359, 0.377]
                      KL=[0.07, 0.07, 0.07, 0.065, 0.058, 0.049, 0.041, 0.033, 0.023, 0.01]
                      XF=[1, 1, 1, 1, 1, 1, 1, 1, 1, 1]
                    SoilCrop CottonSoil
                      LL=[0.29, 0.29, 0.287, 0.283, 0.28, 0.287, 0.3, 0.313, 0.329, 0.346]
                      KL=[0.1, 0.1, 0.1, 0.1, 0.1, 0.094, 0.083, 0.072, 0.058, 0.042]
                      XF=[1, 1, 1, 1, 1, 1, 1, 1, 1, 1]
                    SoilCrop OatsSoil
                      LL=[0.29, 0.29, 0.288, 0.293, 0.304, 0.321, 0.336, 0.351, 0.369, 0.389]
                      KL=[0.06, 0.06, 0.06, 0.055, 0.048, 0.04, 0.032, 0.024, 0.014, 0.003]
                      XF=[1, 1, 1, 1, 1, 1, 1, 1, 1, 1]
                    SoilCrop ChickpeaSoil
                      LL=[0.29, 0.29, 0.287, 0.283, 0.289, 0.308, 0.326, 0.344, 0.365, 0.388]
                      KL=[0.06, 0.06, 0.06, 0.06, 0.055, 0.046, 0.037, 0.028, 0.016, 0.003]
                      XF=[1, 1, 1, 1, 1, 1, 1, 1, 1, 1]
                    SoilCrop MungbeanSoil
                      LL=[0.29, 0.29, 0.287, 0.287, 0.304, 0.329, 0.352, 0.375, 0.395, 0.394]
                      KL=[0.06, 0.06, 0.06, 0.058, 0.048, 0.036, 0.024, 0.012, 0.001, 0]
                      XF=[1, 1, 1, 1, 1, 1, 1, 1, 1, 0]
                    SoilCrop Pigeon PeaSoil
                      LL=[0.29, 0.29, 0.287, 0.283, 0.29, 0.31, 0.33, 0.349, 0.372, 0.392]
                      KL=[0.06, 0.06, 0.06, 0.06, 0.055, 0.045, 0.035, 0.025, 0.012, 0.001]
                      XF=[1, 1, 1, 1, 1, 1, 1, 1, 1, 1]
                    SoilCrop CowpeaSoil
                      LL=[0.29, 0.29, 0.288, 0.293, 0.304, 0.321, 0.336, 0.351, 0.369, 0.389]
                      KL=[0.06, 0.06, 0.06, 0.055, 0.048, 0.04, 0.032, 0.024, 0.014, 0.003]
                      XF=[1, 1, 1, 1, 1, 1, 1, 1, 1, 1]
                    SoilCrop FababeanSoil
                      LL=[0.29, 0.29, 0.287, 0.283, 0.282, 0.297, 0.315, 0.331, 0.351, 0.373]
                      KL=[0.08, 0.08, 0.08, 0.08, 0.079, 0.069, 0.057, 0.046, 0.031, 0.014]
                      XF=[1, 1, 1, 1, 1, 1, 1, 1, 1, 1]
                    SoilCrop LucerneSoil
                      LL=[0.29, 0.29, 0.287, 0.283, 0.28, 0.28, 0.28, 0.281, 0.293, 0.308]
                      KL=[0.1, 0.1, 0.1, 0.1, 0.1, 0.1, 0.1, 0.099, 0.089, 0.075]
                      XF=[1, 1, 1, 1, 1, 1, 1, 1, 1, 1]
                    SoilCrop LupinSoil
                      LL=[0.29, 0.29, 0.288, 0.293, 0.304, 0.321, 0.336, 0.351, 0.369, 0.389]
                      KL=[0.06, 0.06, 0.06, 0.055, 0.048, 0.04, 0.032, 0.024, 0.014, 0.003]
                      XF=[1, 1, 1, 1, 1, 1, 1, 1, 1, 1]
                    SoilCrop LentilSoil
                      LL=[0.29, 0.29, 0.288, 0.293, 0.304, 0.321, 0.336, 0.351, 0.369, 0.389]
                      KL=[0.06, 0.06, 0.06, 0.055, 0.048, 0.04, 0.032, 0.024, 0.014, 0.003]
                      XF=[1, 1, 1, 1, 1, 1, 1, 1, 1, 1]
                    SoilCrop TriticaleSoil
                      LL=[0.29, 0.29, 0.296, 0.308, 0.324, 0.346, 0.368, 0.388, 0.397, 0.394]
                      KL=[0.07, 0.07, 0.065, 0.056, 0.045, 0.032, 0.019, 0.006, 0, 0]
                      XF=[1, 1, 1, 1, 1, 1, 1, 1, 0, 0]
                    SoilCrop EucalyptusSoil
                      LL=[0.29, 0.29, 0.288, 0.283, 0.282, 0.283, 0.284, 0.285, 0.287, 0.288]
                      KL=[0.08, 0.08, 0.08, 0.079, 0.079, 0.078, 0.077, 0.076, 0.075, 0.074]
                      XF=[1, 1, 1, 1, 1, 1, 1, 1, 1, 1]
                    SoilCrop GliricidiaSoil
                      LL=[0.29, 0.29, 0.288, 0.284, 0.284, 0.286, 0.289, 0.291, 0.294, 0.297]
                      KL=[0.08, 0.08, 0.08, 0.079, 0.077, 0.076, 0.074, 0.072, 0.07, 0.068]
                      XF=[1, 1, 1, 1, 1, 1, 1, 1, 1, 1]
                  WaterBalance SoilWater: SummerDate=1-may; SummerU=6; SummerCona=6; WinterDate=1-oct; WinterU=2; WinterCona=2; DiffusConst=1282.58; DiffusSlope=10.81; Salb=0.13; CN2Bare=73; CNRed=20; CNCov=0; PSIDul=-100; Thickness=[150, 150, 150, 150, 200, 200, 200, 200, 300, 300]
                    SWCON=[0.273, 0.262, 0.245, 0.23, 0.181, 0.181, 0.181, 0.181, 0.133, 0.133]
                  Organic: FOMCNRatio=40; CarbonUnits=Total
                    Thickness  Carbon  SoilCNRatio  FBiom  FInert  FOM
                    150        6.67    14.9         0.04   0.519   24.2576
                    150        4.828   14.9         0.031  0.662   19.3701
                    150        3.751   14.9         0.014  0.808   15.4673
                    150        3.316   14.9         0.01   0.897   12.3509
                    200        2.989   14.9         0.01   0.985   9.14978
                    200        2.758   14.9         0.01   0.99    6.77832
                    200        2.632   14.9         0.01   0.99    5.02151
                    200        2.608   14.9         0.01   0.99    3.72002
                    300        2.577   14.9         0.01   0.99    2.37199
                    300        2.542   14.9         0.01   0.99    1.51245
                  Chemical: Thickness=[150, 150, 150, 150, 200, 200, 200, 200, 300, 300]; PH=[5.7, 5.7, 5.73, 5.78, 5.8, 5.8, 5.81, 5.83, 5.86, 5.89]; PHUnits=Water
                  Nutrient
                  CERESSoilTemperature Temperature
                  Solute NO3: InitialValuesUnits=ppm; WaterTableConcentration=0; D0=0; DepthConstant=0; MaxDepthSoluteAccessible=0; RunoffEffectivenessAtMovingSolute=0; MaxEffectiveRunoff=0
                  Solute NH4: InitialValuesUnits=ppm; WaterTableConcentration=0; D0=0; DepthConstant=0; MaxDepthSoluteAccessible=0; RunoffEffectivenessAtMovingSolute=0; MaxEffectiveRunoff=0
                  Solute Urea: Thickness=[150, 150, 150, 150, 200, 200, 200, 200, 300, 300]; InitialValues=[0, 0, 0, 0, 0, 0, 0, 0, 0, 0]; InitialValuesUnits=kg/ha; WaterTableConcentration=0; D0=0; DepthConstant=0; MaxDepthSoluteAccessible=0; RunoffEffectivenessAtMovingSolute=0; MaxEffectiveRunoff=0
              CompositeFactor 15000_-91950
                Specifications:
                  [Soil]
                  [Weather]
                Weather 15000_-91950: FileName=15000_-91950.met
                Soil Synthetic Soil Derived from ISRIC SoilGrids: ASCOrder=NA; ASCSubOrder=NA; SoilType=Haplic Nitisols (Rhodic); Site=NA; NearestTown=NA; Region=NA; State=NA; Country=Guatemala; NaturalVegetation=NA; ApsoilNumber=9999; Latitude=14.875; Longitude=-91.875; LocationAccuracy=+- 250 m; DataSource=ISRIC SoilGrids
                  Water: Thickness=[150, 150, 150, 150, 200, 200, 200, 200, 300, 300]; InitialPAWmm=0; RelativeTo=LL15; FilledFromTop=true
                    InitialValues=[0.315, 0.3, 0.297, 0.292, 0.29, 0.29, 0.29, 0.29, 0.29, 0.29]
                  Physical
                    Thickness  ParticleSizeClay  ParticleSizeSand  ParticleSizeSilt  BD     AirDry  LL15   DUL    SAT    KS
                    150        33.7              35.5              30.5              0.972  0.105   0.315  0.452  0.573  7.072
                    150        33.5              36                30.5              1.069  0.1     0.3    0.429  0.54   7.21
                    150        34.5              36                29.8              1.107  0.099   0.297  0.421  0.528  6.42
                    150        35.5              36                29.2              1.126  0.097   0.292  0.416  0.522  5.717
                    200        36                36                28.7              1.144  0.097   0.29   0.411  0.518  5.395
                    200        36                36                28.3              1.161  0.097   0.29   0.406  0.512  5.395
                    200        35.9              36                28.1              1.172  0.097   0.29   0.404  0.51   5.458
                    200        35.7              36                28.3              1.176  0.097   0.29   0.404  0.51   5.586
                    300        35.5              36                28.6              1.18   0.097   0.29   0.404  0.51   5.75
                    300        35.2              36                28.8              1.186  0.097   0.29   0.404  0.51   5.954
                    SoilCrop RiceSoil
                      LL=[0.315, 0.3, 0.298, 0.303, 0.314, 0.329, 0.343, 0.358, 0.377, 0.399]
                      KL=[0.06, 0.06, 0.06, 0.055, 0.048, 0.04, 0.032, 0.024, 0.014, 0.003]
                      XF=[1, 1, 1, 1, 1, 1, 1, 1, 1, 1]
                    SoilCrop WheatSoil
                      LL=[0.315, 0.3, 0.298, 0.303, 0.314, 0.329, 0.343, 0.358, 0.377, 0.399]
                      KL=[0.06, 0.06, 0.06, 0.055, 0.048, 0.04, 0.032, 0.024, 0.014, 0.003]
                      XF=[1, 1, 1, 1, 1, 1, 1, 1, 1, 1]
                    SoilCrop TeffSoil
                      LL=[0.315, 0.3, 0.298, 0.303, 0.314, 0.329, 0.343, 0.358, 0.377, 0.399]
                      KL=[0.06, 0.06, 0.06, 0.055, 0.048, 0.04, 0.032, 0.024, 0.014, 0.003]
                      XF=[1, 1, 1, 1, 1, 1, 1, 1, 1, 1]
                    SoilCrop SugarcaneSoil
                      LL=[0.315, 0.3, 0.298, 0.298, 0.304, 0.312, 0.321, 0.329, 0.34, 0.353]
                      KL=[0.06, 0.06, 0.06, 0.057, 0.053, 0.048, 0.044, 0.039, 0.033, 0.027]
                      XF=[1, 1, 1, 1, 1, 1, 1, 1, 1, 1]
                    SoilCrop MaizeSoil
                      LL=[0.315, 0.3, 0.298, 0.303, 0.314, 0.329, 0.343, 0.358, 0.377, 0.399]
                      KL=[0.06, 0.06, 0.06, 0.055, 0.048, 0.04, 0.032, 0.024, 0.014, 0.003]
                      XF=[1, 1, 1, 1, 1, 1, 1, 1, 1, 1]
                    SoilCrop SoybeanSoil
                      LL=[0.315, 0.3, 0.298, 0.303, 0.314, 0.329, 0.343, 0.358, 0.377, 0.399]
                      KL=[0.06, 0.06, 0.06, 0.055, 0.048, 0.04, 0.032, 0.024, 0.014, 0.003]
                      XF=[1, 1, 1, 1, 1, 1, 1, 1, 1, 1]
                    SoilCrop OilPalmSoil
                      LL=[0.315, 0.3, 0.298, 0.298, 0.304, 0.312, 0.321, 0.329, 0.34, 0.353]
                      KL=[0.06, 0.06, 0.06, 0.057, 0.053, 0.048, 0.044, 0.039, 0.033, 0.027]
                      XF=[1, 1, 1, 1, 1, 1, 1, 1, 1, 1]
                    SoilCrop CassavaSoil
                      LL=[0.315, 0.3, 0.298, 0.303, 0.314, 0.329, 0.343, 0.358, 0.377, 0.399]
                      KL=[0.06, 0.06, 0.06, 0.055, 0.048, 0.04, 0.032, 0.024, 0.014, 0.003]
                      XF=[1, 1, 1, 1, 1, 1, 1, 1, 1, 1]
                    SoilCrop PlantainForageSoil
                      LL=[0.315, 0.3, 0.298, 0.298, 0.304, 0.312, 0.321, 0.329, 0.34, 0.353]
                      KL=[0.06, 0.06, 0.06, 0.057, 0.053, 0.048, 0.044, 0.039, 0.033, 0.027]
                      XF=[1, 1, 1, 1, 1, 1, 1, 1, 1, 1]
                    SoilCrop SunflowerSoil
                      LL=[0.316, 0.309, 0.318, 0.323, 0.333, 0.345, 0.357, 0.37, 0.387, 0.403]
                      KL=[0.1, 0.093, 0.084, 0.075, 0.065, 0.053, 0.041, 0.029, 0.015, 0.001]
                      XF=[1, 1, 1, 1, 1, 1, 1, 1, 1, 1]
                    SoilCrop CanolaSoil
                      LL=[0.315, 0.3, 0.298, 0.303, 0.314, 0.329, 0.343, 0.358, 0.377, 0.399]
                      KL=[0.06, 0.06, 0.06, 0.055, 0.048, 0.04, 0.032, 0.024, 0.014, 0.003]
                      XF=[1, 1, 1, 1, 1, 1, 1, 1, 1, 1]
                    SoilCrop SorghumSoil
                      LL=[0.315, 0.3, 0.298, 0.3, 0.308, 0.319, 0.33, 0.341, 0.355, 0.372]
                      KL=[0.07, 0.07, 0.07, 0.066, 0.06, 0.053, 0.045, 0.039, 0.03, 0.019]
                      XF=[1, 1, 1, 1, 1, 1, 1, 1, 1, 1]
                    SoilCrop MilletSoil
                      LL=[0.315, 0.3, 0.298, 0.3, 0.308, 0.319, 0.33, 0.341, 0.355, 0.372]
                      KL=[0.07, 0.07, 0.07, 0.066, 0.06, 0.053, 0.045, 0.039, 0.03, 0.019]
                      XF=[1, 1, 1, 1, 1, 1, 1, 1, 1, 1]
                    SoilCrop PeanutSoil
                      LL=[0.315, 0.3, 0.297, 0.292, 0.3, 0.319, 0.337, 0.356, 0.38, 0.402]
                      KL=[0.06, 0.06, 0.06, 0.06, 0.055, 0.045, 0.035, 0.025, 0.012, 0.001]
                      XF=[1, 1, 1, 1, 1, 1, 1, 1, 1, 1]
                    SoilCrop BarleySoil
                      LL=[0.315, 0.3, 0.298, 0.302, 0.311, 0.324, 0.337, 0.35, 0.367, 0.387]
                      KL=[0.07, 0.07, 0.07, 0.065, 0.058, 0.049, 0.041, 0.033, 0.023, 0.01]
                      XF=[1, 1, 1, 1, 1, 1, 1, 1, 1, 1]
                    SoilCrop CottonSoil
                      LL=[0.315, 0.3, 0.297, 0.292, 0.29, 0.296, 0.309, 0.322, 0.337, 0.356]
                      KL=[0.1, 0.1, 0.1, 0.1, 0.1, 0.094, 0.083, 0.072, 0.058, 0.042]
                      XF=[1, 1, 1, 1, 1, 1, 1, 1, 1, 1]
                    SoilCrop OatsSoil
                      LL=[0.315, 0.3, 0.298, 0.303, 0.314, 0.329, 0.343, 0.358, 0.377, 0.399]
                      KL=[0.06, 0.06, 0.06, 0.055, 0.048, 0.04, 0.032, 0.024, 0.014, 0.003]
                      XF=[1, 1, 1, 1, 1, 1, 1, 1, 1, 1]
                    SoilCrop ChickpeaSoil
                      LL=[0.315, 0.3, 0.297, 0.292, 0.299, 0.317, 0.334, 0.351, 0.373, 0.398]
                      KL=[0.06, 0.06, 0.06, 0.06, 0.055, 0.046, 0.037, 0.028, 0.016, 0.003]
                      XF=[1, 1, 1, 1, 1, 1, 1, 1, 1, 1]
                    SoilCrop MungbeanSoil
                      LL=[0.315, 0.3, 0.297, 0.297, 0.314, 0.337, 0.358, 0.381, 0.402, 0.404]
                      KL=[0.06, 0.06, 0.06, 0.058, 0.048, 0.036, 0.024, 0.012, 0.001, 0]
                      XF=[1, 1, 1, 1, 1, 1, 1, 1, 1, 0]
                    SoilCrop Pigeon PeaSoil
                      LL=[0.315, 0.3, 0.297, 0.292, 0.3, 0.319, 0.337, 0.356, 0.38, 0.402]
                      KL=[0.06, 0.06, 0.06, 0.06, 0.055, 0.045, 0.035, 0.025, 0.012, 0.001]
                      XF=[1, 1, 1, 1, 1, 1, 1, 1, 1, 1]
                    SoilCrop CowpeaSoil
                      LL=[0.315, 0.3, 0.298, 0.303, 0.314, 0.329, 0.343, 0.358, 0.377, 0.399]
                      KL=[0.06, 0.06, 0.06, 0.055, 0.048, 0.04, 0.032, 0.024, 0.014, 0.003]
                      XF=[1, 1, 1, 1, 1, 1, 1, 1, 1, 1]
                    SoilCrop FababeanSoil
                      LL=[0.315, 0.3, 0.297, 0.292, 0.292, 0.307, 0.323, 0.339, 0.359, 0.383]
                      KL=[0.08, 0.08, 0.08, 0.08, 0.079, 0.069, 0.057, 0.046, 0.031, 0.014]
                      XF=[1, 1, 1, 1, 1, 1, 1, 1, 1, 1]
                    SoilCrop LucerneSoil
                      LL=[0.315, 0.3, 0.297, 0.292, 0.29, 0.29, 0.29, 0.291, 0.303, 0.318]
                      KL=[0.1, 0.1, 0.1, 0.1, 0.1, 0.1, 0.1, 0.099, 0.089, 0.075]
                      XF=[1, 1, 1, 1, 1, 1, 1, 1, 1, 1]
                    SoilCrop LupinSoil
                      LL=[0.315, 0.3, 0.298, 0.303, 0.314, 0.329, 0.343, 0.358, 0.377, 0.399]
                      KL=[0.06, 0.06, 0.06, 0.055, 0.048, 0.04, 0.032, 0.024, 0.014, 0.003]
                      XF=[1, 1, 1, 1, 1, 1, 1, 1, 1, 1]
                    SoilCrop LentilSoil
                      LL=[0.315, 0.3, 0.298, 0.303, 0.314, 0.329, 0.343, 0.358, 0.377, 0.399]
                      KL=[0.06, 0.06, 0.06, 0.055, 0.048, 0.04, 0.032, 0.024, 0.014, 0.003]
                      XF=[1, 1, 1, 1, 1, 1, 1, 1, 1, 1]
                    SoilCrop TriticaleSoil
                      LL=[0.315, 0.3, 0.306, 0.318, 0.334, 0.353, 0.373, 0.393, 0.404, 0.404]
                      KL=[0.07, 0.07, 0.065, 0.056, 0.045, 0.032, 0.019, 0.006, 0, 0]
                      XF=[1, 1, 1, 1, 1, 1, 1, 1, 0, 0]
                    SoilCrop EucalyptusSoil
                      LL=[0.315, 0.3, 0.298, 0.293, 0.292, 0.293, 0.294, 0.295, 0.297, 0.298]
                      KL=[0.08, 0.08, 0.08, 0.079, 0.079, 0.078, 0.077, 0.076, 0.075, 0.074]
                      XF=[1, 1, 1, 1, 1, 1, 1, 1, 1, 1]
                    SoilCrop GliricidiaSoil
                      LL=[0.315, 0.3, 0.298, 0.294, 0.294, 0.296, 0.298, 0.301, 0.304, 0.307]
                      KL=[0.08, 0.08, 0.08, 0.079, 0.077, 0.076, 0.074, 0.072, 0.07, 0.068]
                      XF=[1, 1, 1, 1, 1, 1, 1, 1, 1, 1]
                  WaterBalance SoilWater: SummerDate=1-may; SummerU=6; SummerCona=6; WinterDate=1-oct; WinterU=4; WinterCona=2.5; DiffusConst=1163.67; DiffusSlope=11.72; Salb=0.13; CN2Bare=73; CNRed=20; CNCov=0; PSIDul=-100; Thickness=[150, 150, 150, 150, 200, 200, 200, 200, 300, 300]
                    SWCON=[0.237, 0.254, 0.245, 0.229, 0.18, 0.18, 0.182, 0.185, 0.139, 0.142]
                  Organic: FOMCNRatio=40; CarbonUnits=Total
                    Thickness  Carbon  SoilCNRatio  FBiom  FInert  FOM
                    150        7.453   10.4         0.04   0.588   72.7728
                    150        5.307   10.4         0.031  0.751   58.1103
                    150        4.493   10.4         0.014  0.855   46.402
                    150        4.126   10.4         0.01   0.916   37.0527
                    200        3.849   10.4         0.01   0.967   27.4493
                    200        3.658   10.4         0.01   0.99    20.335
                    200        3.551   10.4         0.01   0.99    15.0645
                    200        3.524   10.4         0.01   0.99    11.1601
                    300        3.491   10.4         0.01   0.99    7.11597
                    300        3.451   10.4         0.01   0.99    4.53735
                  Chemical: Thickness=[150, 150, 150, 150, 200, 200, 200, 200, 300, 300]; PH=[5.32, 5.4, 5.53, 5.58, 5.6, 5.6, 5.6, 5.6, 5.6, 5.6]; PHUnits=Water
                  Nutrient
                  CERESSoilTemperature Temperature
                  Solute NO3: InitialValuesUnits=ppm; WaterTableConcentration=0; D0=0; DepthConstant=0; MaxDepthSoluteAccessible=0; RunoffEffectivenessAtMovingSolute=0; MaxEffectiveRunoff=0
                  Solute NH4: InitialValuesUnits=ppm; WaterTableConcentration=0; D0=0; DepthConstant=0; MaxDepthSoluteAccessible=0; RunoffEffectivenessAtMovingSolute=0; MaxEffectiveRunoff=0
                  Solute Urea: same as Sensibility.Temperature Response.GuatemalaTransect.Factors.Permutation.Cell.15043_-91905.Synthetic Soil Derived from ISRIC SoilGrids.Urea
              CompositeFactor 14950_-92000
                Specifications:
                  [Soil]
                  [Weather]
                Weather 14950_-92000: FileName=14950_-92000.met
                Soil Synthetic Soil Derived from ISRIC SoilGrids: ASCOrder=NA; ASCSubOrder=NA; SoilType=Haplic Luvisols; Site=NA; NearestTown=NA; Region=NA; State=NA; Country=Guatemala; NaturalVegetation=NA; ApsoilNumber=9999; Latitude=14.875; Longitude=-92.125; LocationAccuracy=+- 250 m; DataSource=ISRIC SoilGrids
                  Water: Thickness=[150, 150, 150, 150, 200, 200, 200, 200, 300, 300]; InitialPAWmm=0; RelativeTo=LL15; FilledFromTop=true
                    InitialValues=[0.258, 0.26, 0.263, 0.268, 0.268, 0.263, 0.26, 0.26, 0.26, 0.26]
                  Physical
                    Thickness  ParticleSizeClay  ParticleSizeSand  ParticleSizeSilt  BD     AirDry  LL15   DUL    SAT    KS
                    150        32.3              41.2              26.7              1.222  0.086   0.258  0.376  0.488  8.255
                    150        34.5              40.5              25                1.256  0.087   0.26   0.371  0.48   6.42
                    150        36.8              39.5              23.8              1.28   0.087   0.263  0.372  0.477  4.945
                    150        38.2              38.5              23.2              1.292  0.089   0.268  0.372  0.473  4.156
                    200        39.2              38                23                1.302  0.089   0.268  0.37   0.47   3.701
                    200        39.8              38                23                1.309  0.087   0.263  0.365  0.47   3.492
                    200        39.9              38.1              23                1.314  0.087   0.26   0.363  0.47   3.432
                    200        39.7              38.3              23                1.315  0.087   0.26   0.362  0.47   3.512
                    300        39.5              38.6              23                1.317  0.087   0.26   0.362  0.47   3.616
                    300        39.1              38.9              23                1.32   0.087   0.26   0.362  0.47   3.744
                    SoilCrop RiceSoil
                      LL=[0.258, 0.26, 0.263, 0.276, 0.288, 0.297, 0.308, 0.321, 0.338, 0.357]
                      KL=[0.06, 0.06, 0.06, 0.055, 0.048, 0.04, 0.032, 0.024, 0.014, 0.003]
                      XF=[1, 1, 1, 1, 1, 1, 1, 1, 1, 1]
                    SoilCrop WheatSoil
                      LL=[0.258, 0.26, 0.263, 0.276, 0.288, 0.297, 0.308, 0.321, 0.338, 0.357]
                      KL=[0.06, 0.06, 0.06, 0.055, 0.048, 0.04, 0.032, 0.024, 0.014, 0.003]
                      XF=[1, 1, 1, 1, 1, 1, 1, 1, 1, 1]
                    SoilCrop TeffSoil
                      LL=[0.258, 0.26, 0.263, 0.276, 0.288, 0.297, 0.308, 0.321, 0.338, 0.357]
                      KL=[0.06, 0.06, 0.06, 0.055, 0.048, 0.04, 0.032, 0.024, 0.014, 0.003]
                      XF=[1, 1, 1, 1, 1, 1, 1, 1, 1, 1]
                    SoilCrop SugarcaneSoil
                      LL=[0.258, 0.26, 0.263, 0.273, 0.279, 0.282, 0.288, 0.295, 0.305, 0.317]
                      KL=[0.06, 0.06, 0.06, 0.057, 0.053, 0.048, 0.044, 0.039, 0.033, 0.027]
                      XF=[1, 1, 1, 1, 1, 1, 1, 1, 1, 1]
                    SoilCrop MaizeSoil
                      LL=[0.258, 0.26, 0.263, 0.276, 0.288, 0.297, 0.308, 0.321, 0.338, 0.357]
                      KL=[0.06, 0.06, 0.06, 0.055, 0.048, 0.04, 0.032, 0.024, 0.014, 0.003]
                      XF=[1, 1, 1, 1, 1, 1, 1, 1, 1, 1]
                    SoilCrop SoybeanSoil
                      LL=[0.258, 0.26, 0.263, 0.276, 0.288, 0.297, 0.308, 0.321, 0.338, 0.357]
                      KL=[0.06, 0.06, 0.06, 0.055, 0.048, 0.04, 0.032, 0.024, 0.014, 0.003]
                      XF=[1, 1, 1, 1, 1, 1, 1, 1, 1, 1]
                    SoilCrop OilPalmSoil
                      LL=[0.258, 0.26, 0.263, 0.273, 0.279, 0.282, 0.288, 0.295, 0.305, 0.317]
                      KL=[0.06, 0.06, 0.06, 0.057, 0.053, 0.048, 0.044, 0.039, 0.033, 0.027]
                      XF=[1, 1, 1, 1, 1, 1, 1, 1, 1, 1]
                    SoilCrop CassavaSoil
                      LL=[0.258, 0.26, 0.263, 0.276, 0.288, 0.297, 0.308, 0.321, 0.338, 0.357]
                      KL=[0.06, 0.06, 0.06, 0.055, 0.048, 0.04, 0.032, 0.024, 0.014, 0.003]
                      XF=[1, 1, 1, 1, 1, 1, 1, 1, 1, 1]
                    SoilCrop PlantainForageSoil
                      LL=[0.258, 0.26, 0.263, 0.273, 0.279, 0.282, 0.288, 0.295, 0.305, 0.317]
                      KL=[0.06, 0.06, 0.06, 0.057, 0.053, 0.048, 0.044, 0.039, 0.033, 0.027]
                      XF=[1, 1, 1, 1, 1, 1, 1, 1, 1, 1]
                    SoilCrop SunflowerSoil
                      LL=[0.259, 0.268, 0.28, 0.294, 0.304, 0.311, 0.32, 0.332, 0.347, 0.361]
                      KL=[0.1, 0.093, 0.084, 0.075, 0.065, 0.053, 0.041, 0.029, 0.015, 0.001]
                      XF=[1, 1, 1, 1, 1, 1, 1, 1, 1, 1]
                    SoilCrop CanolaSoil
                      LL=[0.258, 0.26, 0.263, 0.276, 0.288, 0.297, 0.308, 0.321, 0.338, 0.357]
                      KL=[0.06, 0.06, 0.06, 0.055, 0.048, 0.04, 0.032, 0.024, 0.014, 0.003]
                      XF=[1, 1, 1, 1, 1, 1, 1, 1, 1, 1]
                    SoilCrop SorghumSoil
                      LL=[0.258, 0.26, 0.263, 0.274, 0.283, 0.288, 0.296, 0.306, 0.319, 0.334]
                      KL=[0.07, 0.07, 0.07, 0.066, 0.06, 0.053, 0.045, 0.039, 0.03, 0.019]
                      XF=[1, 1, 1, 1, 1, 1, 1, 1, 1, 1]
                    SoilCrop MilletSoil
                      LL=[0.258, 0.26, 0.263, 0.274, 0.283, 0.288, 0.296, 0.306, 0.319, 0.334]
                      KL=[0.07, 0.07, 0.07, 0.066, 0.06, 0.053, 0.045, 0.039, 0.03, 0.019]
                      XF=[1, 1, 1, 1, 1, 1, 1, 1, 1, 1]
                    SoilCrop PeanutSoil
                      LL=[0.258, 0.26, 0.263, 0.268, 0.276, 0.288, 0.303, 0.32, 0.341, 0.36]
                      KL=[0.06, 0.06, 0.06, 0.06, 0.055, 0.045, 0.035, 0.025, 0.012, 0.001]
                      XF=[1, 1, 1, 1, 1, 1, 1, 1, 1, 1]
                    SoilCrop BarleySoil
                      LL=[0.258, 0.26, 0.263, 0.275, 0.286, 0.293, 0.302, 0.314, 0.329, 0.347]
                      KL=[0.07, 0.07, 0.07, 0.065, 0.058, 0.049, 0.041, 0.033, 0.023, 0.01]
                      XF=[1, 1, 1, 1, 1, 1, 1, 1, 1, 1]
                    SoilCrop CottonSoil
                      LL=[0.258, 0.26, 0.263, 0.268, 0.268, 0.268, 0.277, 0.288, 0.303, 0.319]
                      KL=[0.1, 0.1, 0.1, 0.1, 0.1, 0.094, 0.083, 0.072, 0.058, 0.042]
                      XF=[1, 1, 1, 1, 1, 1, 1, 1, 1, 1]
                    SoilCrop OatsSoil
                      LL=[0.258, 0.26, 0.263, 0.276, 0.288, 0.297, 0.308, 0.321, 0.338, 0.357]
                      KL=[0.06, 0.06, 0.06, 0.055, 0.048, 0.04, 0.032, 0.024, 0.014, 0.003]
                      XF=[1, 1, 1, 1, 1, 1, 1, 1, 1, 1]
                    SoilCrop ChickpeaSoil
                      LL=[0.258, 0.26, 0.263, 0.268, 0.275, 0.286, 0.299, 0.315, 0.335, 0.356]
                      KL=[0.06, 0.06, 0.06, 0.06, 0.055, 0.046, 0.037, 0.028, 0.016, 0.003]
                      XF=[1, 1, 1, 1, 1, 1, 1, 1, 1, 1]
                    SoilCrop MungbeanSoil
                      LL=[0.258, 0.26, 0.263, 0.271, 0.288, 0.304, 0.322, 0.342, 0.36, 0.362]
                      KL=[0.06, 0.06, 0.06, 0.058, 0.048, 0.036, 0.024, 0.012, 0.001, 0]
                      XF=[1, 1, 1, 1, 1, 1, 1, 1, 1, 0]
                    SoilCrop Pigeon PeaSoil
                      LL=[0.258, 0.26, 0.263, 0.268, 0.276, 0.288, 0.303, 0.32, 0.341, 0.36]
                      KL=[0.06, 0.06, 0.06, 0.06, 0.055, 0.045, 0.035, 0.025, 0.012, 0.001]
                      XF=[1, 1, 1, 1, 1, 1, 1, 1, 1, 1]
                    SoilCrop CowpeaSoil
                      LL=[0.258, 0.26, 0.263, 0.276, 0.288, 0.297, 0.308, 0.321, 0.338, 0.357]
                      KL=[0.06, 0.06, 0.06, 0.055, 0.048, 0.04, 0.032, 0.024, 0.014, 0.003]
                      XF=[1, 1, 1, 1, 1, 1, 1, 1, 1, 1]
                    SoilCrop FababeanSoil
                      LL=[0.258, 0.26, 0.263, 0.268, 0.269, 0.277, 0.289, 0.304, 0.322, 0.343]
                      KL=[0.08, 0.08, 0.08, 0.08, 0.079, 0.069, 0.057, 0.046, 0.031, 0.014]
                      XF=[1, 1, 1, 1, 1, 1, 1, 1, 1, 1]
                    SoilCrop LucerneSoil
                      LL=[0.258, 0.26, 0.263, 0.268, 0.268, 0.263, 0.26, 0.261, 0.272, 0.285]
                      KL=[0.1, 0.1, 0.1, 0.1, 0.1, 0.1, 0.1, 0.099, 0.089, 0.075]
                      XF=[1, 1, 1, 1, 1, 1, 1, 1, 1, 1]
                    SoilCrop LupinSoil
                      LL=[0.258, 0.26, 0.263, 0.276, 0.288, 0.297, 0.308, 0.321, 0.338, 0.357]
                      KL=[0.06, 0.06, 0.06, 0.055, 0.048, 0.04, 0.032, 0.024, 0.014, 0.003]
                      XF=[1, 1, 1, 1, 1, 1, 1, 1, 1, 1]
                    SoilCrop LentilSoil
                      LL=[0.258, 0.26, 0.263, 0.276, 0.288, 0.297, 0.308, 0.321, 0.338, 0.357]
                      KL=[0.06, 0.06, 0.06, 0.055, 0.048, 0.04, 0.032, 0.024, 0.014, 0.003]
                      XF=[1, 1, 1, 1, 1, 1, 1, 1, 1, 1]
                    SoilCrop TriticaleSoil
                      LL=[0.258, 0.26, 0.27, 0.289, 0.305, 0.319, 0.335, 0.353, 0.362, 0.362]
                      KL=[0.07, 0.07, 0.065, 0.056, 0.045, 0.032, 0.019, 0.006, 0, 0]
                      XF=[1, 1, 1, 1, 1, 1, 1, 1, 0, 0]
                    SoilCrop EucalyptusSoil
                      LL=[0.258, 0.26, 0.263, 0.268, 0.269, 0.265, 0.264, 0.265, 0.266, 0.268]
                      KL=[0.08, 0.08, 0.08, 0.079, 0.079, 0.078, 0.077, 0.076, 0.075, 0.074]
                      XF=[1, 1, 1, 1, 1, 1, 1, 1, 1, 1]
                    SoilCrop GliricidiaSoil
                      LL=[0.258, 0.26, 0.263, 0.269, 0.271, 0.268, 0.267, 0.27, 0.272, 0.275]
                      KL=[0.08, 0.08, 0.08, 0.079, 0.077, 0.076, 0.074, 0.072, 0.07, 0.068]
                      XF=[1, 1, 1, 1, 1, 1, 1, 1, 1, 1]
                  WaterBalance SoilWater: SummerDate=1-may; SummerU=6; SummerCona=6; WinterDate=1-oct; WinterU=6; WinterCona=6; DiffusConst=2679.58; DiffusSlope=7.73; Salb=0.13; CN2Bare=73; CNRed=20; CNCov=0; PSIDul=-100; Thickness=[150, 150, 150, 150, 200, 200, 200, 200, 300, 300]
                    SWCON=[0.272, 0.242, 0.211, 0.196, 0.145, 0.134, 0.129, 0.132, 0.096, 0.098]
                  Organic: FOMCNRatio=40; CarbonUnits=Total
                    Thickness  Carbon  SoilCNRatio  FBiom  FInert  FOM
                    150        2.139   10.4         0.04   0.269   133.417
                    150        1.342   10.4         0.031  0.417   106.535
                    150        0.86    10.4         0.014  0.639   85.0703
                    150        0.665   10.4         0.01   0.817   67.93
                    200        0.524   10.4         0.01   0.99    50.3238
                    200        0.433   10.4         0.01   0.99    37.2808
                    200        0.384   10.4         0.01   0.99    27.6183
                    200        0.374   10.4         0.01   0.99    20.4601
                    300        0.362   10.4         0.01   0.99    13.046
                    300        0.348   10.4         0.01   0.99    8.31847
                  Chemical: Thickness=[150, 150, 150, 150, 200, 200, 200, 200, 300, 300]; PH=[5.6, 5.65, 5.7, 5.7, 5.7, 5.7, 5.7, 5.7, 5.7, 5.7]; PHUnits=Water
                  Nutrient
                  CERESSoilTemperature Temperature
                  Solute NO3: InitialValuesUnits=ppm; WaterTableConcentration=0; D0=0; DepthConstant=0; MaxDepthSoluteAccessible=0; RunoffEffectivenessAtMovingSolute=0; MaxEffectiveRunoff=0
                  Solute NH4: InitialValuesUnits=ppm; WaterTableConcentration=0; D0=0; DepthConstant=0; MaxDepthSoluteAccessible=0; RunoffEffectivenessAtMovingSolute=0; MaxEffectiveRunoff=0
                  Solute Urea: same as Sensibility.Temperature Response.GuatemalaTransect.Factors.Permutation.Cell.15043_-91905.Synthetic Soil Derived from ISRIC SoilGrids.Urea
              CompositeFactor 14900_-92050
                Specifications:
                  [Soil]
                  [Weather]
                Weather 14900_-92050: FileName=14900_-92050.met
                Soil Synthetic Soil Derived from ISRIC SoilGrids: same as Sensibility.Temperature Response.GuatemalaTransect.Factors.Permutation.Cell.14950_-92000.Synthetic Soil Derived from ISRIC SoilGrids
              CompositeFactor 14850_-92100
                Specifications:
                  [Soil]
                  [Weather]
                Weather 14850_-92100: FileName=14850_-92100.met
                Soil Synthetic Soil Derived from ISRIC SoilGrids: same as Sensibility.Temperature Response.GuatemalaTransect.Factors.Permutation.Cell.14950_-92000.Synthetic Soil Derived from ISRIC SoilGrids
              CompositeFactor 14800_-92150
                Specifications:
                  [Soil]
                  [Weather]
                Weather 14800_-92150: FileName=14800_-92150.met
                Soil Synthetic Soil Derived from ISRIC SoilGrids: same as Sensibility.Temperature Response.GuatemalaTransect.Factors.Permutation.Cell.14950_-92000.Synthetic Soil Derived from ISRIC SoilGrids
              CompositeFactor 14750_-92200
                Specifications:
                  [Soil]
                  [Weather]
                Weather 14750_-92200: FileName=14750_-92200.met
                Soil Synthetic Soil Derived from ISRIC SoilGrids: same as Sensibility.Temperature Response.GuatemalaTransect.Factors.Permutation.Cell.14950_-92000.Synthetic Soil Derived from ISRIC SoilGrids
              CompositeFactor 14700_-92250
                Specifications:
                  [Soil]
                  [Weather]
                Weather 14700_-92250: FileName=14700_-92250.met
                Soil Synthetic Soil Derived from ISRIC SoilGrids: ASCOrder=NA; ASCSubOrder=NA; SoilType=Haplic Cambisols; Site=NA; NearestTown=NA; Region=NA; State=NA; Country=Guatemala; NaturalVegetation=NA; ApsoilNumber=9999; Latitude=14.625; Longitude=-92.125; LocationAccuracy=+- 250 m; DataSource=ISRIC SoilGrids
                  Water: Thickness=[150, 150, 150, 150, 200, 200, 200, 200, 300, 300]; InitialPAWmm=0; RelativeTo=LL15; FilledFromTop=true
                    InitialValues=[0.26, 0.26, 0.26, 0.26, 0.26, 0.26, 0.26, 0.26, 0.26, 0.26]
                  Physical
                    Thickness  ParticleSizeClay  ParticleSizeSand  ParticleSizeSilt  BD     AirDry  LL15  DUL    SAT    KS
                    150        32.3              35.2              33                1.194  0.087   0.26  0.397  0.498  8.255
                    150        33.5              34                32.5              1.235  0.087   0.26  0.391  0.49   7.21
                    150        35                33.5              31.5              1.253  0.087   0.26  0.386  0.487  6.059
                    150        37                32.5              30.5              1.263  0.087   0.26  0.386  0.482  4.804
                    200        38.3              32                30                1.275  0.087   0.26  0.385  0.48   4.156
                    200        38.8              32                30                1.288  0.087   0.26  0.384  0.48   3.921
                    200        38.8              32.1              30                1.294  0.087   0.26  0.384  0.48   3.899
                    200        38.4              32.3              30                1.293  0.087   0.26  0.384  0.48   4.084
                    300        37.9              32.6              30                1.293  0.087   0.26  0.385  0.48   4.328
                    300        37.3              32.9              30                1.292  0.087   0.26  0.385  0.48   4.64
                    SoilCrop RiceSoil
                      LL=[0.26, 0.26, 0.261, 0.271, 0.285, 0.301, 0.318, 0.335, 0.356, 0.38]
                      KL=[0.06, 0.06, 0.06, 0.055, 0.048, 0.04, 0.032, 0.024, 0.014, 0.003]
                      XF=[1, 1, 1, 1, 1, 1, 1, 1, 1, 1]
                    SoilCrop WheatSoil
                      LL=[0.26, 0.26, 0.261, 0.271, 0.285, 0.301, 0.318, 0.335, 0.356, 0.38]
                      KL=[0.06, 0.06, 0.06, 0.055, 0.048, 0.04, 0.032, 0.024, 0.014, 0.003]
                      XF=[1, 1, 1, 1, 1, 1, 1, 1, 1, 1]
                    SoilCrop TeffSoil
                      LL=[0.26, 0.26, 0.261, 0.271, 0.285, 0.301, 0.318, 0.335, 0.356, 0.38]
                      KL=[0.06, 0.06, 0.06, 0.055, 0.048, 0.04, 0.032, 0.024, 0.014, 0.003]
                      XF=[1, 1, 1, 1, 1, 1, 1, 1, 1, 1]
                    SoilCrop SugarcaneSoil
                      LL=[0.26, 0.26, 0.26, 0.266, 0.274, 0.284, 0.293, 0.303, 0.315, 0.33]
                      KL=[0.06, 0.06, 0.06, 0.057, 0.053, 0.048, 0.044, 0.039, 0.033, 0.027]
                      XF=[1, 1, 1, 1, 1, 1, 1, 1, 1, 1]
                    SoilCrop MaizeSoil
                      LL=[0.26, 0.26, 0.261, 0.271, 0.285, 0.301, 0.318, 0.335, 0.356, 0.38]
                      KL=[0.06, 0.06, 0.06, 0.055, 0.048, 0.04, 0.032, 0.024, 0.014, 0.003]
                      XF=[1, 1, 1, 1, 1, 1, 1, 1, 1, 1]
                    SoilCrop SoybeanSoil
                      LL=[0.26, 0.26, 0.261, 0.271, 0.285, 0.301, 0.318, 0.335, 0.356, 0.38]
                      KL=[0.06, 0.06, 0.06, 0.055, 0.048, 0.04, 0.032, 0.024, 0.014, 0.003]
                      XF=[1, 1, 1, 1, 1, 1, 1, 1, 1, 1]
                    SoilCrop OilPalmSoil
                      LL=[0.26, 0.26, 0.26, 0.266, 0.274, 0.284, 0.293, 0.303, 0.315, 0.33]
                      KL=[0.06, 0.06, 0.06, 0.057, 0.053, 0.048, 0.044, 0.039, 0.033, 0.027]
                      XF=[1, 1, 1, 1, 1, 1, 1, 1, 1, 1]
                    SoilCrop CassavaSoil
                      LL=[0.26, 0.26, 0.261, 0.271, 0.285, 0.301, 0.318, 0.335, 0.356, 0.38]
                      KL=[0.06, 0.06, 0.06, 0.055, 0.048, 0.04, 0.032, 0.024, 0.014, 0.003]
                      XF=[1, 1, 1, 1, 1, 1, 1, 1, 1, 1]
                    SoilCrop PlantainForageSoil
                      LL=[0.26, 0.26, 0.26, 0.266, 0.274, 0.284, 0.293, 0.303, 0.315, 0.33]
                      KL=[0.06, 0.06, 0.06, 0.057, 0.053, 0.048, 0.044, 0.039, 0.033, 0.027]
                      XF=[1, 1, 1, 1, 1, 1, 1, 1, 1, 1]
                    SoilCrop SunflowerSoil
                      LL=[0.261, 0.27, 0.28, 0.292, 0.304, 0.319, 0.333, 0.348, 0.366, 0.384]
                      KL=[0.1, 0.093, 0.084, 0.075, 0.065, 0.053, 0.041, 0.029, 0.015, 0.001]
                      XF=[1, 1, 1, 1, 1, 1, 1, 1, 1, 1]
                    SoilCrop CanolaSoil
                      LL=[0.26, 0.26, 0.261, 0.271, 0.285, 0.301, 0.318, 0.335, 0.356, 0.38]
                      KL=[0.06, 0.06, 0.06, 0.055, 0.048, 0.04, 0.032, 0.024, 0.014, 0.003]
                      XF=[1, 1, 1, 1, 1, 1, 1, 1, 1, 1]
                    SoilCrop SorghumSoil
                      LL=[0.26, 0.26, 0.261, 0.268, 0.279, 0.291, 0.303, 0.316, 0.332, 0.351]
                      KL=[0.07, 0.07, 0.07, 0.066, 0.06, 0.053, 0.045, 0.039, 0.03, 0.019]
                      XF=[1, 1, 1, 1, 1, 1, 1, 1, 1, 1]
                    SoilCrop MilletSoil
                      LL=[0.26, 0.26, 0.261, 0.268, 0.279, 0.291, 0.303, 0.316, 0.332, 0.351]
                      KL=[0.07, 0.07, 0.07, 0.066, 0.06, 0.053, 0.045, 0.039, 0.03, 0.019]
                      XF=[1, 1, 1, 1, 1, 1, 1, 1, 1, 1]
                    SoilCrop PeanutSoil
                      LL=[0.26, 0.26, 0.26, 0.26, 0.27, 0.291, 0.312, 0.333, 0.359, 0.383]
                      KL=[0.06, 0.06, 0.06, 0.06, 0.055, 0.045, 0.035, 0.025, 0.012, 0.001]
                      XF=[1, 1, 1, 1, 1, 1, 1, 1, 1, 1]
                    SoilCrop BarleySoil
                      LL=[0.26, 0.26, 0.261, 0.269, 0.282, 0.297, 0.311, 0.326, 0.344, 0.367]
                      KL=[0.07, 0.07, 0.07, 0.065, 0.058, 0.049, 0.041, 0.033, 0.023, 0.01]
                      XF=[1, 1, 1, 1, 1, 1, 1, 1, 1, 1]
                    SoilCrop CottonSoil
                      LL=[0.26, 0.26, 0.26, 0.26, 0.26, 0.267, 0.281, 0.295, 0.312, 0.333]
                      KL=[0.1, 0.1, 0.1, 0.1, 0.1, 0.094, 0.083, 0.072, 0.058, 0.042]
                      XF=[1, 1, 1, 1, 1, 1, 1, 1, 1, 1]
                    SoilCrop OatsSoil
                      LL=[0.26, 0.26, 0.261, 0.271, 0.285, 0.301, 0.318, 0.335, 0.356, 0.38]
                      KL=[0.06, 0.06, 0.06, 0.055, 0.048, 0.04, 0.032, 0.024, 0.014, 0.003]
                      XF=[1, 1, 1, 1, 1, 1, 1, 1, 1, 1]
                    SoilCrop ChickpeaSoil
                      LL=[0.26, 0.26, 0.26, 0.26, 0.27, 0.289, 0.308, 0.327, 0.351, 0.379]
                      KL=[0.06, 0.06, 0.06, 0.06, 0.055, 0.046, 0.037, 0.028, 0.016, 0.003]
                      XF=[1, 1, 1, 1, 1, 1, 1, 1, 1, 1]
                    SoilCrop MungbeanSoil
                      LL=[0.26, 0.26, 0.26, 0.264, 0.285, 0.31, 0.334, 0.36, 0.383, 0.385]
                      KL=[0.06, 0.06, 0.06, 0.058, 0.048, 0.036, 0.024, 0.012, 0.001, 0]
                      XF=[1, 1, 1, 1, 1, 1, 1, 1, 1, 0]
                    SoilCrop Pigeon PeaSoil
                      LL=[0.26, 0.26, 0.26, 0.26, 0.27, 0.291, 0.312, 0.333, 0.359, 0.383]
                      KL=[0.06, 0.06, 0.06, 0.06, 0.055, 0.045, 0.035, 0.025, 0.012, 0.001]
                      XF=[1, 1, 1, 1, 1, 1, 1, 1, 1, 1]
                    SoilCrop CowpeaSoil
                      LL=[0.26, 0.26, 0.261, 0.271, 0.285, 0.301, 0.318, 0.335, 0.356, 0.38]
                      KL=[0.06, 0.06, 0.06, 0.055, 0.048, 0.04, 0.032, 0.024, 0.014, 0.003]
                      XF=[1, 1, 1, 1, 1, 1, 1, 1, 1, 1]
                    SoilCrop FababeanSoil
                      LL=[0.26, 0.26, 0.26, 0.26, 0.262, 0.278, 0.295, 0.313, 0.336, 0.363]
                      KL=[0.08, 0.08, 0.08, 0.08, 0.079, 0.069, 0.057, 0.046, 0.031, 0.014]
                      XF=[1, 1, 1, 1, 1, 1, 1, 1, 1, 1]
                    SoilCrop LucerneSoil
                      LL=[0.26, 0.26, 0.26, 0.26, 0.26, 0.26, 0.26, 0.261, 0.274, 0.291]
                      KL=[0.1, 0.1, 0.1, 0.1, 0.1, 0.1, 0.1, 0.099, 0.089, 0.075]
                      XF=[1, 1, 1, 1, 1, 1, 1, 1, 1, 1]
                    SoilCrop LupinSoil
                      LL=[0.26, 0.26, 0.261, 0.271, 0.285, 0.301, 0.318, 0.335, 0.356, 0.38]
                      KL=[0.06, 0.06, 0.06, 0.055, 0.048, 0.04, 0.032, 0.024, 0.014, 0.003]
                      XF=[1, 1, 1, 1, 1, 1, 1, 1, 1, 1]
                    SoilCrop LentilSoil
                      LL=[0.26, 0.26, 0.261, 0.271, 0.285, 0.301, 0.318, 0.335, 0.356, 0.38]
                      KL=[0.06, 0.06, 0.06, 0.055, 0.048, 0.04, 0.032, 0.024, 0.014, 0.003]
                      XF=[1, 1, 1, 1, 1, 1, 1, 1, 1, 1]
                    SoilCrop TriticaleSoil
                      LL=[0.26, 0.26, 0.269, 0.286, 0.306, 0.328, 0.35, 0.373, 0.385, 0.385]
                      KL=[0.07, 0.07, 0.065, 0.056, 0.045, 0.032, 0.019, 0.006, 0, 0]
                      XF=[1, 1, 1, 1, 1, 1, 1, 1, 0, 0]
                    SoilCrop EucalyptusSoil
                      LL=[0.26, 0.26, 0.26, 0.261, 0.262, 0.263, 0.264, 0.266, 0.267, 0.269]
                      KL=[0.08, 0.08, 0.08, 0.079, 0.079, 0.078, 0.077, 0.076, 0.075, 0.074]
                      XF=[1, 1, 1, 1, 1, 1, 1, 1, 1, 1]
                    SoilCrop GliricidiaSoil
                      LL=[0.26, 0.26, 0.26, 0.262, 0.264, 0.266, 0.269, 0.272, 0.275, 0.279]
                      KL=[0.08, 0.08, 0.08, 0.079, 0.077, 0.076, 0.074, 0.072, 0.07, 0.068]
                      XF=[1, 1, 1, 1, 1, 1, 1, 1, 1, 1]
                  WaterBalance SoilWater: SummerDate=1-may; SummerU=6; SummerCona=6; WinterDate=1-oct; WinterU=6; WinterCona=6; DiffusConst=512.32; DiffusSlope=17.39; Salb=0.13; CN2Bare=73; CNRed=20; CNCov=0; PSIDul=-100; Thickness=[150, 150, 150, 150, 200, 200, 200, 200, 300, 300]
                    SWCON=[0.287, 0.272, 0.245, 0.22, 0.164, 0.157, 0.155, 0.161, 0.122, 0.129]
                  Organic: FOMCNRatio=40; CarbonUnits=Total
                    Thickness  Carbon  SoilCNRatio  FBiom  FInert  FOM
                    150        2.435   10.7         0.04   0.536   145.546
                    150        1.721   10.7         0.031  0.733   116.221
                    150        1.524   10.7         0.014  0.816   92.804
                    150        1.37    10.7         0.01   0.901   74.1055
                    200        1.25    10.7         0.01   0.978   54.8987
                    200        1.163   10.7         0.01   0.99    40.6699
                    200        1.115   10.7         0.01   0.99    30.129
                    200        1.103   10.7         0.01   0.99    22.3201
                    300        1.087   10.7         0.01   0.99    14.2319
                    300        1.069   10.7         0.01   0.99    9.07469
                  Chemical: Thickness=[150, 150, 150, 150, 200, 200, 200, 200, 300, 300]; PH=[6.2, 6.25, 6.33, 6.38, 6.4, 6.4, 6.41, 6.43, 6.46, 6.48]; PHUnits=Water
                  Nutrient
                  CERESSoilTemperature Temperature
                  Solute NO3: InitialValuesUnits=ppm; WaterTableConcentration=0; D0=0; DepthConstant=0; MaxDepthSoluteAccessible=0; RunoffEffectivenessAtMovingSolute=0; MaxEffectiveRunoff=0
                  Solute NH4: InitialValuesUnits=ppm; WaterTableConcentration=0; D0=0; DepthConstant=0; MaxDepthSoluteAccessible=0; RunoffEffectivenessAtMovingSolute=0; MaxEffectiveRunoff=0
                  Solute Urea: same as Sensibility.Temperature Response.GuatemalaTransect.Factors.Permutation.Cell.15043_-91905.Synthetic Soil Derived from ISRIC SoilGrids.Urea
        Simulation GuatemalaTransect
          Clock: Start=1988-01-02; End=1991-12-31
          Summary SummaryFile
          Weather: FileName=Guadeloupe.met
          SoilArbitrator Soil Arbitrator
          MicroClimate: a_interception=0; b_interception=0; c_interception=0; d_interception=0; SoilHeatFluxFraction=0.4; MinimumHeightDiffForNewLayer=0; NightInterceptionFraction=0.5; ReferenceHeight=2
          Zone: Area=1; Slope=0; AspectAngle=0; Altitude=50
            Fertiliser
            SurfaceOrganicMatter: InitialResidueName=maize_stubble; InitialResidueType=maize; InitialResidueMass=0; InitialStandingFraction=0; InitialCPR=400; InitialCNR=80
            Plant Gliricidia
            Manager TreeSowingRule
              RowSpace = 0.7
              RowWidth = 3
              CultivarName = Gliricidia
              SowingDate = 01/02/1988 00:00:00
              script: same as in Validation.Hamakuapoko.HamakuapokoBase.Zone.TreeSowingRule
            Manager CuttingManagement
              LeafRemovalWt = 0
              StemRemovalWt = 0
              TotalRemovalWt = 0
```csharp
using Models.Soils;
using System.Xml.Serialization;
using Models.PMF.Interfaces;
using Models.PMF;
using Models.Core;
using System.Collections.Generic;
using System;
using Newtonsoft.Json;

namespace Models
{
    [Serializable] 
    [System.Xml.Serialization.XmlInclude(typeof(Model))]
    public class Script : Model
    {
        [Link(ByName = true)] Plant Gliricidia;
        [Link] Clock Clock;

    
        [JsonIgnore] private RemovalFractions Remove { get; set; }

        [Description("Leaf Removal Wt")]
        public double LeafRemovalWt {get; set;}


        [Description("Stem Removal Wt")]
        public double StemRemovalWt {get; set;}

        [Description("Total Removal Wt")]
        public double TotalRemovalWt {get; set;}

        [EventSubscribe("StartOfSimulation")]
        private void OnSimulationCommencing(object sender, EventArgs e)
        {
            Remove = new RemovalFractions();
        }

        [EventSubscribe("StartOfDay")]
        private void OnStartOfDay(object sender, EventArgs e)
        {

        LeafRemovalWt = 0;
        StemRemovalWt = 0;
        }

        public void DoCut(double LeafResidue, double StemResidue)
        {
            double L = (double)Gliricidia.FindByPath("Leaf.Live.Wt").Value;
            double LeafRemovalFraction = 0;

            if (L > 0)
                LeafRemovalFraction = (L - LeafResidue) / L;
                LeafRemovalWt = (L - LeafResidue);
            if (LeafRemovalFraction < 0)
                LeafRemovalFraction = 0;
               
            double S = (double)Gliricidia.FindByPath("Stem.Live.Wt").Value;
            double StemRemovalFraction = 0;

            if (S > 0)
                StemRemovalFraction = (S - StemResidue) / S; 
                StemRemovalWt = (S - StemResidue);              
            if (StemRemovalFraction < 0)
                StemRemovalFraction = 0;
               
            Remove.SetFractionToRemove("Leaf", LeafRemovalFraction);
            Remove.SetFractionToRemove("Stem", StemRemovalFraction);
            Remove.SetFractionToResidue("Leaf", 0.0);
            Remove.SetFractionToResidue("Stem", 0.0);
            Gliricidia.RemoveBiomass("Cut", Remove);
        }
        
    }
}
```
            Manager LitterFallAccumulation
              AccumulationStartDate = 01/02/1988 00:00:00
              AccumulatedLitterfallWt = 0
              script: same as in Validation.Guadeloupe.GuadeloupeBase.Zone.LitterFallAccumulation
            Soil Synthetic Soil Derived from ISRIC SoilGrids: ASCOrder=NA; ASCSubOrder=NA; SoilType=Aluandic Andosols; Site=NA; NearestTown=NA; Region=NA; State=NA; Country=Uganda; NaturalVegetation=NA; ApsoilNumber=9999; Latitude=-1.375; Longitude=29.625; LocationAccuracy=+- 250 m; DataSource=ISRIC SoilGrids
              Water: Thickness=[150, 150, 150, 150, 200, 200, 200, 200, 300, 300]; InitialPAWmm=0; RelativeTo=LL15; FilledFromTop=true
                InitialValues=[0.287, 0.28, 0.28, 0.28, 0.278, 0.273, 0.27, 0.27, 0.27, 0.27]
              Physical
                Thickness  ParticleSizeClay  BD     AirDry  LL15   DUL    SAT    KS
                150        33.3              0.868  0.096   0.287  0.454  0.605  7.351
                150        34.5              0.954  0.093   0.28   0.441  0.58   6.42
                150        35.2              0.997  0.093   0.28   0.434  0.568  5.885
                150        35.8              1.002  0.093   0.28   0.429  0.562  5.554
                200        36                1.01   0.092   0.278  0.424  0.56   5.395
                200        36                1.019  0.091   0.273  0.418  0.56   5.395
                200        36                1.028  0.09    0.27   0.415  0.558  5.395
                200        36                1.036  0.09    0.27   0.415  0.554  5.395
                300        36                1.047  0.09    0.27   0.415  0.549  5.395
                300        36                1.059  0.09    0.27   0.414  0.543  5.395
                SoilCrop RiceSoil
                  LL=[0.287, 0.28, 0.281, 0.292, 0.307, 0.321, 0.338, 0.357, 0.381, 0.408]
                  KL=[0.06, 0.06, 0.06, 0.055, 0.048, 0.04, 0.032, 0.024, 0.014, 0.003]
                  XF=[1, 1, 1, 1, 1, 1, 1, 1, 1, 1]
                SoilCrop WheatSoil
                  LL=[0.287, 0.28, 0.281, 0.292, 0.307, 0.321, 0.338, 0.357, 0.381, 0.408]
                  KL=[0.06, 0.06, 0.06, 0.055, 0.048, 0.04, 0.032, 0.024, 0.014, 0.003]
                  XF=[1, 1, 1, 1, 1, 1, 1, 1, 1, 1]
                SoilCrop SugarcaneSoil
                  LL=[0.287, 0.28, 0.28, 0.287, 0.294, 0.3, 0.309, 0.32, 0.334, 0.351]
                  KL=[0.06, 0.06, 0.06, 0.057, 0.053, 0.048, 0.044, 0.039, 0.033, 0.027]
                  XF=[1, 1, 1, 1, 1, 1, 1, 1, 1, 1]
                SoilCrop MaizeSoil
                  LL=[0.287, 0.28, 0.281, 0.292, 0.307, 0.321, 0.338, 0.357, 0.381, 0.408]
                  KL=[0.06, 0.06, 0.06, 0.055, 0.048, 0.04, 0.032, 0.024, 0.014, 0.003]
                  XF=[1, 1, 1, 1, 1, 1, 1, 1, 1, 1]
                SoilCrop SoybeanSoil
                  LL=[0.287, 0.28, 0.281, 0.292, 0.307, 0.321, 0.338, 0.357, 0.381, 0.408]
                  KL=[0.06, 0.06, 0.06, 0.055, 0.048, 0.04, 0.032, 0.024, 0.014, 0.003]
                  XF=[1, 1, 1, 1, 1, 1, 1, 1, 1, 1]
                SoilCrop OilPalmSoil
                  LL=[0.287, 0.28, 0.28, 0.287, 0.294, 0.3, 0.309, 0.32, 0.334, 0.351]
                  KL=[0.06, 0.06, 0.06, 0.057, 0.053, 0.048, 0.044, 0.039, 0.033, 0.027]
                  XF=[1, 1, 1, 1, 1, 1, 1, 1, 1, 1]
                SoilCrop CassavaSoil
                  LL=[0.287, 0.28, 0.281, 0.292, 0.307, 0.321, 0.338, 0.357, 0.381, 0.408]
                  KL=[0.06, 0.06, 0.06, 0.055, 0.048, 0.04, 0.032, 0.024, 0.014, 0.003]
                  XF=[1, 1, 1, 1, 1, 1, 1, 1, 1, 1]
                SoilCrop PlantainForageSoil
                  LL=[0.287, 0.28, 0.28, 0.287, 0.294, 0.3, 0.309, 0.32, 0.334, 0.351]
                  KL=[0.06, 0.06, 0.06, 0.057, 0.053, 0.048, 0.044, 0.039, 0.033, 0.027]
                  XF=[1, 1, 1, 1, 1, 1, 1, 1, 1, 1]
                SoilCrop SunflowerSoil
                  LL=[0.287, 0.292, 0.305, 0.317, 0.329, 0.341, 0.355, 0.372, 0.393, 0.413]
                  KL=[0.1, 0.093, 0.084, 0.075, 0.065, 0.053, 0.041, 0.029, 0.015, 0.001]
                  XF=[1, 1, 1, 1, 1, 1, 1, 1, 1, 1]
                SoilCrop CanolaSoil
                  LL=[0.287, 0.28, 0.281, 0.292, 0.307, 0.321, 0.338, 0.357, 0.381, 0.408]
                  KL=[0.06, 0.06, 0.06, 0.055, 0.048, 0.04, 0.032, 0.024, 0.014, 0.003]
                  XF=[1, 1, 1, 1, 1, 1, 1, 1, 1, 1]
                SoilCrop SorghumSoil
                  LL=[0.287, 0.28, 0.281, 0.289, 0.299, 0.309, 0.321, 0.335, 0.353, 0.375]
                  KL=[0.07, 0.07, 0.07, 0.066, 0.06, 0.053, 0.045, 0.039, 0.03, 0.019]
                  XF=[1, 1, 1, 1, 1, 1, 1, 1, 1, 1]
                SoilCrop MilletSoil
                  LL=[0.287, 0.28, 0.281, 0.289, 0.299, 0.309, 0.321, 0.335, 0.353, 0.375]
                  KL=[0.07, 0.07, 0.07, 0.066, 0.06, 0.053, 0.045, 0.039, 0.03, 0.019]
                  XF=[1, 1, 1, 1, 1, 1, 1, 1, 1, 1]
                SoilCrop PeanutSoil
                  LL=[0.287, 0.28, 0.28, 0.28, 0.29, 0.309, 0.33, 0.354, 0.384, 0.412]
                  KL=[0.06, 0.06, 0.06, 0.06, 0.055, 0.045, 0.035, 0.025, 0.012, 0.001]
                  XF=[1, 1, 1, 1, 1, 1, 1, 1, 1, 1]
                SoilCrop BarleySoil
                  LL=[0.287, 0.28, 0.281, 0.291, 0.303, 0.315, 0.33, 0.347, 0.368, 0.393]
                  KL=[0.07, 0.07, 0.07, 0.065, 0.058, 0.049, 0.041, 0.033, 0.023, 0.01]
                  XF=[1, 1, 1, 1, 1, 1, 1, 1, 1, 1]
                SoilCrop CottonSoil
                  LL=[0.287, 0.28, 0.28, 0.28, 0.278, 0.281, 0.294, 0.31, 0.33, 0.354]
                  KL=[0.1, 0.1, 0.1, 0.1, 0.1, 0.094, 0.083, 0.072, 0.058, 0.042]
                  XF=[1, 1, 1, 1, 1, 1, 1, 1, 1, 1]
                SoilCrop OatsSoil
                  LL=[0.287, 0.28, 0.281, 0.292, 0.307, 0.321, 0.338, 0.357, 0.381, 0.408]
                  KL=[0.06, 0.06, 0.06, 0.055, 0.048, 0.04, 0.032, 0.024, 0.014, 0.003]
                  XF=[1, 1, 1, 1, 1, 1, 1, 1, 1, 1]
                SoilCrop ChickpeaSoil
                  LL=[0.287, 0.28, 0.28, 0.28, 0.289, 0.306, 0.326, 0.348, 0.376, 0.407]
                  KL=[0.06, 0.06, 0.06, 0.06, 0.055, 0.046, 0.037, 0.028, 0.016, 0.003]
                  XF=[1, 1, 1, 1, 1, 1, 1, 1, 1, 1]
                SoilCrop MungbeanSoil
                  LL=[0.287, 0.28, 0.28, 0.285, 0.307, 0.331, 0.357, 0.386, 0.412, 0.414]
                  KL=[0.06, 0.06, 0.06, 0.058, 0.048, 0.036, 0.024, 0.012, 0.001, 0]
                  XF=[1, 1, 1, 1, 1, 1, 1, 1, 1, 0]
                SoilCrop Pigeon PeaSoil
                  LL=[0.287, 0.28, 0.28, 0.28, 0.29, 0.309, 0.33, 0.354, 0.384, 0.412]
                  KL=[0.06, 0.06, 0.06, 0.06, 0.055, 0.045, 0.035, 0.025, 0.012, 0.001]
                  XF=[1, 1, 1, 1, 1, 1, 1, 1, 1, 1]
                SoilCrop CowpeaSoil
                  LL=[0.287, 0.28, 0.281, 0.292, 0.307, 0.321, 0.338, 0.357, 0.381, 0.408]
                  KL=[0.06, 0.06, 0.06, 0.055, 0.048, 0.04, 0.032, 0.024, 0.014, 0.003]
                  XF=[1, 1, 1, 1, 1, 1, 1, 1, 1, 1]
                SoilCrop FababeanSoil
                  LL=[0.287, 0.28, 0.28, 0.28, 0.28, 0.293, 0.311, 0.332, 0.358, 0.389]
                  KL=[0.08, 0.08, 0.08, 0.08, 0.079, 0.069, 0.057, 0.046, 0.031, 0.014]
                  XF=[1, 1, 1, 1, 1, 1, 1, 1, 1, 1]
                SoilCrop LucerneSoil
                  LL=[0.287, 0.28, 0.28, 0.28, 0.278, 0.273, 0.27, 0.272, 0.286, 0.306]
                  KL=[0.1, 0.1, 0.1, 0.1, 0.1, 0.1, 0.1, 0.099, 0.089, 0.075]
                  XF=[1, 1, 1, 1, 1, 1, 1, 1, 1, 1]
                SoilCrop LupinSoil
                  LL=[0.287, 0.28, 0.281, 0.292, 0.307, 0.321, 0.338, 0.357, 0.381, 0.408]
                  KL=[0.06, 0.06, 0.06, 0.055, 0.048, 0.04, 0.032, 0.024, 0.014, 0.003]
                  XF=[1, 1, 1, 1, 1, 1, 1, 1, 1, 1]
                SoilCrop LentilSoil
                  LL=[0.287, 0.28, 0.281, 0.292, 0.307, 0.321, 0.338, 0.357, 0.381, 0.408]
                  KL=[0.06, 0.06, 0.06, 0.055, 0.048, 0.04, 0.032, 0.024, 0.014, 0.003]
                  XF=[1, 1, 1, 1, 1, 1, 1, 1, 1, 1]
                SoilCrop TriticaleSoil
                  LL=[0.287, 0.28, 0.29, 0.311, 0.331, 0.352, 0.375, 0.402, 0.415, 0.414]
                  KL=[0.07, 0.07, 0.065, 0.056, 0.045, 0.032, 0.019, 0.006, 0, 0]
                  XF=[1, 1, 1, 1, 1, 1, 1, 1, 0, 0]
                SoilCrop EucalyptusSoil
                  LL=[0.287, 0.28, 0.28, 0.281, 0.28, 0.276, 0.275, 0.277, 0.278, 0.281]
                  KL=[0.08, 0.08, 0.08, 0.079, 0.079, 0.078, 0.077, 0.076, 0.075, 0.074]
                  XF=[1, 1, 1, 1, 1, 1, 1, 1, 1, 1]
                SoilCrop GliricidiaSoil
                  LL=[0.287, 0.28, 0.28, 0.282, 0.282, 0.28, 0.281, 0.284, 0.287, 0.292]
                  KL=[0.08, 0.08, 0.08, 0.079, 0.077, 0.076, 0.074, 0.072, 0.07, 0.068]
                  XF=[1, 1, 1, 1, 1, 1, 1, 1, 1, 1]
                SoilCrop TeffSoil
                  LL=[0.287, 0.28, 0.281, 0.292, 0.307, 0.321, 0.338, 0.357, 0.381, 0.408]
                  KL=[0.06, 0.06, 0.06, 0.055, 0.048, 0.04, 0.032, 0.024, 0.014, 0.003]
                  XF=[1, 1, 1, 1, 1, 1, 1, 1, 1, 1]
              WaterBalance SoilWater: SummerDate=1-nov; SummerU=6; SummerCona=6; WinterDate=1-apr; WinterU=2; WinterCona=2; DiffusConst=845.24; DiffusSlope=9.66; Salb=0.13; CN2Bare=73; CNRed=20; CNCov=0; PSIDul=-100; Thickness=[150, 150, 150, 150, 200, 200, 200, 200, 300, 300]
                SWCON=[0.211, 0.205, 0.2, 0.193, 0.15, 0.146, 0.145, 0.148, 0.11, 0.114]
              Organic: FOMCNRatio=40; CarbonUnits=Total
                Thickness  Carbon  SoilCNRatio  FBiom  FInert  FOM
                150        7.255   10.4         0.04   0.463   36.3864
                150        5.005   10.4         0.031  0.611   29.0551
                150        3.825   10.4         0.014  0.765   23.201
                150        3.31    10.4         0.01   0.879   18.5264
                200        2.936   10.4         0.01   0.984   13.7247
                200        2.703   10.4         0.01   0.99    10.1675
                200        2.565   10.4         0.01   0.99    7.53226
                200        2.52    10.4         0.01   0.99    5.58003
                300        2.464   10.4         0.01   0.99    3.55799
                300        2.398   10.4         0.01   0.99    2.26867
              Chemical: Thickness=[150, 150, 150, 150, 200, 200, 200, 200, 300, 300]; PH=[5.5, 5.5, 5.53, 5.58, 5.6, 5.6, 5.59, 5.57, 5.55, 5.51]; PHUnits=Water
              Nutrient
              CERESSoilTemperature Temperature
              Solute NO3: InitialValuesUnits=ppm; WaterTableConcentration=0; D0=0; DepthConstant=0; MaxDepthSoluteAccessible=0; RunoffEffectivenessAtMovingSolute=0; MaxEffectiveRunoff=0
              Solute NH4: InitialValuesUnits=ppm; WaterTableConcentration=0; D0=0; DepthConstant=0; MaxDepthSoluteAccessible=0; RunoffEffectivenessAtMovingSolute=0; MaxEffectiveRunoff=0
              Solute Urea: same as Sensibility.Temperature Response.GuatemalaTransect.Factors.Permutation.Cell.15043_-91905.Synthetic Soil Derived from ISRIC SoilGrids.Urea
            Report FinalOutput: EventNames=[Clock].EndOfSimulation
              VariableNames:
                [Clock].Today
                [Clock].Today.Year
                [Weather].Tav
                [Gliricidia].Age
                [Gliricidia].LAI
                [Gliricidia].AboveGround.Wt
      Experiment RwandaTransect
        Factors
          Permutation
            Factor Cell
              CompositeFactor -1400_29550
                Specifications:
                  [Soil]
                  [Weather]
                Weather -1400_29550: FileName=-1400_29550.met
                Soil Synthetic Soil Derived from ISRIC SoilGrids: same as Sensibility.Temperature Response.GuatemalaTransect.GuatemalaTransect.Zone.Synthetic Soil Derived from ISRIC SoilGrids
              CompositeFactor -1500_29600
                Specifications:
                  [Soil]
                  [Weather]
                Weather -1500_29600: FileName=-1500_29600.met
                Soil Synthetic Soil Derived from ISRIC SoilGrids: ASCOrder=NA; ASCSubOrder=NA; SoilType=Haplic Cambisols; Site=NA; NearestTown=NA; Region=NA; State=NA; Country=Rwanda; NaturalVegetation=NA; ApsoilNumber=9999; Latitude=-1.625; Longitude=29.625; LocationAccuracy=+- 250 m; DataSource=ISRIC SoilGrids
                  Water: Thickness=[150, 150, 150, 150, 200, 200, 200, 200, 300, 300]; InitialPAWmm=0; RelativeTo=LL15; FilledFromTop=true
                    InitialValues=[0.278, 0.27, 0.27, 0.27, 0.27, 0.27, 0.27, 0.27, 0.27, 0.27]
                  Physical
                    Thickness  ParticleSizeClay  BD     AirDry  LL15   DUL    SAT    KS
                    150        40.3              1.098  0.093   0.278  0.413  0.537  3.264
                    150        41                1.188  0.09    0.27   0.392  0.51   3.021
                    150        41.5              1.23   0.09    0.27   0.387  0.497  2.85
                    150        42.5              1.243  0.09    0.27   0.386  0.492  2.538
                    200        43                1.259  0.09    0.27   0.383  0.487  2.395
                    200        43                1.278  0.09    0.27   0.378  0.482  2.395
                    200        42.9              1.29   0.09    0.27   0.376  0.479  2.423
                    200        42.7              1.293  0.09    0.27   0.376  0.477  2.48
                    300        42.4              1.298  0.09    0.27   0.375  0.475  2.553
                    300        42.1              1.303  0.09    0.27   0.375  0.472  2.643
                    SoilCrop RiceSoil
                      LL=[0.278, 0.27, 0.271, 0.28, 0.293, 0.306, 0.319, 0.333, 0.351, 0.37]
                      KL=[0.06, 0.06, 0.06, 0.055, 0.048, 0.04, 0.032, 0.024, 0.014, 0.003]
                      XF=[1, 1, 1, 1, 1, 1, 1, 1, 1, 1]
                    SoilCrop WheatSoil
                      LL=[0.278, 0.27, 0.271, 0.28, 0.293, 0.306, 0.319, 0.333, 0.351, 0.37]
                      KL=[0.06, 0.06, 0.06, 0.055, 0.048, 0.04, 0.032, 0.024, 0.014, 0.003]
                      XF=[1, 1, 1, 1, 1, 1, 1, 1, 1, 1]
                    SoilCrop SugarcaneSoil
                      LL=[0.278, 0.27, 0.27, 0.276, 0.283, 0.291, 0.298, 0.307, 0.317, 0.329]
                      KL=[0.06, 0.06, 0.06, 0.057, 0.053, 0.048, 0.044, 0.039, 0.033, 0.027]
                      XF=[1, 1, 1, 1, 1, 1, 1, 1, 1, 1]
                    SoilCrop MaizeSoil
                      LL=[0.278, 0.27, 0.271, 0.28, 0.293, 0.306, 0.319, 0.333, 0.351, 0.37]
                      KL=[0.06, 0.06, 0.06, 0.055, 0.048, 0.04, 0.032, 0.024, 0.014, 0.003]
                      XF=[1, 1, 1, 1, 1, 1, 1, 1, 1, 1]
                    SoilCrop SoybeanSoil
                      LL=[0.278, 0.27, 0.271, 0.28, 0.293, 0.306, 0.319, 0.333, 0.351, 0.37]
                      KL=[0.06, 0.06, 0.06, 0.055, 0.048, 0.04, 0.032, 0.024, 0.014, 0.003]
                      XF=[1, 1, 1, 1, 1, 1, 1, 1, 1, 1]
                    SoilCrop OilPalmSoil
                      LL=[0.278, 0.27, 0.27, 0.276, 0.283, 0.291, 0.298, 0.307, 0.317, 0.329]
                      KL=[0.06, 0.06, 0.06, 0.057, 0.053, 0.048, 0.044, 0.039, 0.033, 0.027]
                      XF=[1, 1, 1, 1, 1, 1, 1, 1, 1, 1]
                    SoilCrop CassavaSoil
                      LL=[0.278, 0.27, 0.271, 0.28, 0.293, 0.306, 0.319, 0.333, 0.351, 0.37]
                      KL=[0.06, 0.06, 0.06, 0.055, 0.048, 0.04, 0.032, 0.024, 0.014, 0.003]
                      XF=[1, 1, 1, 1, 1, 1, 1, 1, 1, 1]
                    SoilCrop PlantainForageSoil
                      LL=[0.278, 0.27, 0.27, 0.276, 0.283, 0.291, 0.298, 0.307, 0.317, 0.329]
                      KL=[0.06, 0.06, 0.06, 0.057, 0.053, 0.048, 0.044, 0.039, 0.033, 0.027]
                      XF=[1, 1, 1, 1, 1, 1, 1, 1, 1, 1]
                    SoilCrop SunflowerSoil
                      LL=[0.279, 0.279, 0.289, 0.299, 0.31, 0.321, 0.332, 0.345, 0.36, 0.374]
                      KL=[0.1, 0.093, 0.084, 0.075, 0.065, 0.053, 0.041, 0.029, 0.015, 0.001]
                      XF=[1, 1, 1, 1, 1, 1, 1, 1, 1, 1]
                    SoilCrop CanolaSoil
                      LL=[0.278, 0.27, 0.271, 0.28, 0.293, 0.306, 0.319, 0.333, 0.351, 0.37]
                      KL=[0.06, 0.06, 0.06, 0.055, 0.048, 0.04, 0.032, 0.024, 0.014, 0.003]
                      XF=[1, 1, 1, 1, 1, 1, 1, 1, 1, 1]
                    SoilCrop SorghumSoil
                      LL=[0.278, 0.27, 0.27, 0.277, 0.287, 0.297, 0.307, 0.318, 0.331, 0.346]
                      KL=[0.07, 0.07, 0.07, 0.066, 0.06, 0.053, 0.045, 0.039, 0.03, 0.019]
                      XF=[1, 1, 1, 1, 1, 1, 1, 1, 1, 1]
                    SoilCrop MilletSoil
                      LL=[0.278, 0.27, 0.27, 0.277, 0.287, 0.297, 0.307, 0.318, 0.331, 0.346]
                      KL=[0.07, 0.07, 0.07, 0.066, 0.06, 0.053, 0.045, 0.039, 0.03, 0.019]
                      XF=[1, 1, 1, 1, 1, 1, 1, 1, 1, 1]
                    SoilCrop PeanutSoil
                      LL=[0.278, 0.27, 0.27, 0.27, 0.279, 0.297, 0.314, 0.332, 0.353, 0.374]
                      KL=[0.06, 0.06, 0.06, 0.06, 0.055, 0.045, 0.035, 0.025, 0.012, 0.001]
                      XF=[1, 1, 1, 1, 1, 1, 1, 1, 1, 1]
                    SoilCrop BarleySoil
                      LL=[0.278, 0.27, 0.271, 0.279, 0.29, 0.302, 0.314, 0.326, 0.341, 0.36]
                      KL=[0.07, 0.07, 0.07, 0.065, 0.058, 0.049, 0.041, 0.033, 0.023, 0.01]
                      XF=[1, 1, 1, 1, 1, 1, 1, 1, 1, 1]
                    SoilCrop CottonSoil
                      LL=[0.278, 0.27, 0.27, 0.27, 0.27, 0.276, 0.288, 0.299, 0.314, 0.331]
                      KL=[0.1, 0.1, 0.1, 0.1, 0.1, 0.094, 0.083, 0.072, 0.058, 0.042]
                      XF=[1, 1, 1, 1, 1, 1, 1, 1, 1, 1]
                    SoilCrop OatsSoil
                      LL=[0.278, 0.27, 0.271, 0.28, 0.293, 0.306, 0.319, 0.333, 0.351, 0.37]
                      KL=[0.06, 0.06, 0.06, 0.055, 0.048, 0.04, 0.032, 0.024, 0.014, 0.003]
                      XF=[1, 1, 1, 1, 1, 1, 1, 1, 1, 1]
                    SoilCrop ChickpeaSoil
                      LL=[0.278, 0.27, 0.27, 0.27, 0.279, 0.295, 0.311, 0.327, 0.347, 0.37]
                      KL=[0.06, 0.06, 0.06, 0.06, 0.055, 0.046, 0.037, 0.028, 0.016, 0.003]
                      XF=[1, 1, 1, 1, 1, 1, 1, 1, 1, 1]
                    SoilCrop MungbeanSoil
                      LL=[0.278, 0.27, 0.27, 0.274, 0.293, 0.313, 0.333, 0.354, 0.374, 0.375]
                      KL=[0.06, 0.06, 0.06, 0.058, 0.048, 0.036, 0.024, 0.012, 0.001, 0]
                      XF=[1, 1, 1, 1, 1, 1, 1, 1, 1, 0]
                    SoilCrop Pigeon PeaSoil
                      LL=[0.278, 0.27, 0.27, 0.27, 0.279, 0.297, 0.314, 0.332, 0.353, 0.374]
                      KL=[0.06, 0.06, 0.06, 0.06, 0.055, 0.045, 0.035, 0.025, 0.012, 0.001]
                      XF=[1, 1, 1, 1, 1, 1, 1, 1, 1, 1]
                    SoilCrop CowpeaSoil
                      LL=[0.278, 0.27, 0.271, 0.28, 0.293, 0.306, 0.319, 0.333, 0.351, 0.37]
                      KL=[0.06, 0.06, 0.06, 0.055, 0.048, 0.04, 0.032, 0.024, 0.014, 0.003]
                      XF=[1, 1, 1, 1, 1, 1, 1, 1, 1, 1]
                    SoilCrop FababeanSoil
                      LL=[0.278, 0.27, 0.27, 0.27, 0.272, 0.285, 0.3, 0.315, 0.334, 0.356]
                      KL=[0.08, 0.08, 0.08, 0.08, 0.079, 0.069, 0.057, 0.046, 0.031, 0.014]
                      XF=[1, 1, 1, 1, 1, 1, 1, 1, 1, 1]
                    SoilCrop LucerneSoil
                      LL=[0.278, 0.27, 0.27, 0.27, 0.27, 0.27, 0.27, 0.271, 0.282, 0.296]
                      KL=[0.1, 0.1, 0.1, 0.1, 0.1, 0.1, 0.1, 0.099, 0.089, 0.075]
                      XF=[1, 1, 1, 1, 1, 1, 1, 1, 1, 1]
                    SoilCrop LupinSoil
                      LL=[0.278, 0.27, 0.271, 0.28, 0.293, 0.306, 0.319, 0.333, 0.351, 0.37]
                      KL=[0.06, 0.06, 0.06, 0.055, 0.048, 0.04, 0.032, 0.024, 0.014, 0.003]
                      XF=[1, 1, 1, 1, 1, 1, 1, 1, 1, 1]
                    SoilCrop LentilSoil
                      LL=[0.278, 0.27, 0.271, 0.28, 0.293, 0.306, 0.319, 0.333, 0.351, 0.37]
                      KL=[0.06, 0.06, 0.06, 0.055, 0.048, 0.04, 0.032, 0.024, 0.014, 0.003]
                      XF=[1, 1, 1, 1, 1, 1, 1, 1, 1, 1]
                    SoilCrop TriticaleSoil
                      LL=[0.278, 0.27, 0.278, 0.294, 0.311, 0.329, 0.347, 0.366, 0.375, 0.375]
                      KL=[0.07, 0.07, 0.065, 0.056, 0.045, 0.032, 0.019, 0.006, 0, 0]
                      XF=[1, 1, 1, 1, 1, 1, 1, 1, 0, 0]
                    SoilCrop EucalyptusSoil
                      LL=[0.278, 0.27, 0.27, 0.271, 0.272, 0.273, 0.274, 0.275, 0.276, 0.278]
                      KL=[0.08, 0.08, 0.08, 0.079, 0.079, 0.078, 0.077, 0.076, 0.075, 0.074]
                      XF=[1, 1, 1, 1, 1, 1, 1, 1, 1, 1]
                    SoilCrop GliricidiaSoil
                      LL=[0.278, 0.27, 0.27, 0.272, 0.274, 0.276, 0.278, 0.28, 0.283, 0.286]
                      KL=[0.08, 0.08, 0.08, 0.079, 0.077, 0.076, 0.074, 0.072, 0.07, 0.068]
                      XF=[1, 1, 1, 1, 1, 1, 1, 1, 1, 1]
                    SoilCrop TeffSoil
                      LL=[0.278, 0.27, 0.271, 0.28, 0.293, 0.306, 0.319, 0.333, 0.351, 0.37]
                      KL=[0.06, 0.06, 0.06, 0.055, 0.048, 0.04, 0.032, 0.024, 0.014, 0.003]
                      XF=[1, 1, 1, 1, 1, 1, 1, 1, 1, 1]
                  WaterBalance SoilWater: SummerDate=1-nov; SummerU=6; SummerCona=6; WinterDate=1-apr; WinterU=2; WinterCona=2; DiffusConst=5478.6; DiffusSlope=-0.2; Salb=0.12; CN2Bare=73; CNRed=20; CNCov=0; PSIDul=-100; Thickness=[150, 150, 150, 150, 200, 200, 200, 200, 300, 300]
                    SWCON=[0.141, 0.138, 0.138, 0.131, 0.099, 0.099, 0.101, 0.105, 0.077, 0.081]
                  Organic: FOMCNRatio=40; CarbonUnits=Total
                    Thickness  Carbon  SoilCNRatio  FBiom  FInert  FOM
                    150        4.709   10.4         0.04   0.437   60.644
                    150        3.071   10.4         0.031  0.619   48.4252
                    150        2.332   10.4         0.014  0.788   38.6683
                    150        2.046   10.4         0.01   0.889   30.8773
                    200        1.805   10.4         0.01   0.99    22.8745
                    200        1.61    10.4         0.01   0.99    16.9458
                    200        1.501   10.4         0.01   0.99    12.5538
                    200        1.475   10.4         0.01   0.99    9.30006
                    300        1.443   10.4         0.01   0.99    5.92998
                    300        1.405   10.4         0.01   0.99    3.78112
                  Chemical: Thickness=[150, 150, 150, 150, 200, 200, 200, 200, 300, 300]; PH=[5.57, 5.5, 5.5, 5.5, 5.5, 5.5, 5.5, 5.5, 5.5, 5.5]; PHUnits=Water
                  Nutrient
                  CERESSoilTemperature Temperature
                  Solute NO3: InitialValuesUnits=ppm; WaterTableConcentration=0; D0=0; DepthConstant=0; MaxDepthSoluteAccessible=0; RunoffEffectivenessAtMovingSolute=0; MaxEffectiveRunoff=0
                  Solute NH4: InitialValuesUnits=ppm; WaterTableConcentration=0; D0=0; DepthConstant=0; MaxDepthSoluteAccessible=0; RunoffEffectivenessAtMovingSolute=0; MaxEffectiveRunoff=0
                  Solute Urea: same as Sensibility.Temperature Response.GuatemalaTransect.Factors.Permutation.Cell.15043_-91905.Synthetic Soil Derived from ISRIC SoilGrids.Urea
              CompositeFactor -1600_29700
                Specifications:
                  [Soil]
                  [Weather]
                Weather -1600_29700: FileName=-1600_29700.met
                Soil Synthetic Soil Derived from ISRIC SoilGrids: same as Sensibility.Temperature Response.RwandaTransect.Factors.Permutation.Cell.-1500_29600.Synthetic Soil Derived from ISRIC SoilGrids
              CompositeFactor -1700_29800
                Specifications:
                  [Soil]
                  [Weather]
                Weather -1700_29800: FileName=-1700_29800.met
                Soil Synthetic Soil Derived from ISRIC SoilGrids: ASCOrder=NA; ASCSubOrder=NA; SoilType=Haplic Cambisols (Humic); Site=NA; NearestTown=NA; Region=NA; State=NA; Country=Rwanda; NaturalVegetation=NA; ApsoilNumber=9999; Latitude=-1.625; Longitude=29.875; LocationAccuracy=+- 250 m; DataSource=ISRIC SoilGrids
                  Water: Thickness=[150, 150, 150, 150, 200, 200, 200, 200, 300, 300]; InitialPAWmm=0; RelativeTo=LL15; FilledFromTop=true
                    InitialValues=[0.262, 0.255, 0.253, 0.258, 0.258, 0.253, 0.25, 0.25, 0.25, 0.25]
                  Physical
                    Thickness  ParticleSizeClay  BD     AirDry  LL15   DUL    SAT    KS
                    150        36                0.957  0.087   0.262  0.423  0.575  5.395
                    150        36.5              1.033  0.085   0.255  0.405  0.55   5.091
                    150        37.5              1.068  0.084   0.253  0.398  0.54   4.533
                    150        38.5              1.078  0.086   0.258  0.403  0.54   4.037
                    200        39.2              1.089  0.086   0.258  0.401  0.538  3.701
                    200        39.8              1.102  0.084   0.253  0.391  0.532  3.492
                    200        39.8              1.113  0.083   0.25   0.385  0.528  3.472
                    200        39.4              1.124  0.083   0.25   0.382  0.524  3.637
                    300        38.9              1.138  0.083   0.25   0.379  0.519  3.854
                    300        38.3              1.154  0.083   0.25   0.376  0.513  4.132
                    SoilCrop RiceSoil
                      LL=[0.262, 0.255, 0.253, 0.27, 0.286, 0.299, 0.313, 0.329, 0.349, 0.37]
                      KL=[0.06, 0.06, 0.06, 0.055, 0.048, 0.04, 0.032, 0.024, 0.014, 0.003]
                      XF=[1, 1, 1, 1, 1, 1, 1, 1, 1, 1]
                    SoilCrop WheatSoil
                      LL=[0.262, 0.255, 0.253, 0.27, 0.286, 0.299, 0.313, 0.329, 0.349, 0.37]
                      KL=[0.06, 0.06, 0.06, 0.055, 0.048, 0.04, 0.032, 0.024, 0.014, 0.003]
                      XF=[1, 1, 1, 1, 1, 1, 1, 1, 1, 1]
                    SoilCrop SugarcaneSoil
                      LL=[0.262, 0.255, 0.253, 0.264, 0.274, 0.279, 0.286, 0.296, 0.307, 0.32]
                      KL=[0.06, 0.06, 0.06, 0.057, 0.053, 0.048, 0.044, 0.039, 0.033, 0.027]
                      XF=[1, 1, 1, 1, 1, 1, 1, 1, 1, 1]
                    SoilCrop MaizeSoil
                      LL=[0.262, 0.255, 0.253, 0.27, 0.286, 0.299, 0.313, 0.329, 0.349, 0.37]
                      KL=[0.06, 0.06, 0.06, 0.055, 0.048, 0.04, 0.032, 0.024, 0.014, 0.003]
                      XF=[1, 1, 1, 1, 1, 1, 1, 1, 1, 1]
                    SoilCrop SoybeanSoil
                      LL=[0.262, 0.255, 0.253, 0.27, 0.286, 0.299, 0.313, 0.329, 0.349, 0.37]
                      KL=[0.06, 0.06, 0.06, 0.055, 0.048, 0.04, 0.032, 0.024, 0.014, 0.003]
                      XF=[1, 1, 1, 1, 1, 1, 1, 1, 1, 1]
                    SoilCrop OilPalmSoil
                      LL=[0.262, 0.255, 0.253, 0.264, 0.274, 0.279, 0.286, 0.296, 0.307, 0.32]
                      KL=[0.06, 0.06, 0.06, 0.057, 0.053, 0.048, 0.044, 0.039, 0.033, 0.027]
                      XF=[1, 1, 1, 1, 1, 1, 1, 1, 1, 1]
                    SoilCrop CassavaSoil
                      LL=[0.262, 0.255, 0.253, 0.27, 0.286, 0.299, 0.313, 0.329, 0.349, 0.37]
                      KL=[0.06, 0.06, 0.06, 0.055, 0.048, 0.04, 0.032, 0.024, 0.014, 0.003]
                      XF=[1, 1, 1, 1, 1, 1, 1, 1, 1, 1]
                    SoilCrop PlantainForageSoil
                      LL=[0.262, 0.255, 0.253, 0.264, 0.274, 0.279, 0.286, 0.296, 0.307, 0.32]
                      KL=[0.06, 0.06, 0.06, 0.057, 0.053, 0.048, 0.044, 0.039, 0.033, 0.027]
                      XF=[1, 1, 1, 1, 1, 1, 1, 1, 1, 1]
                    SoilCrop SunflowerSoil
                      LL=[0.262, 0.266, 0.276, 0.294, 0.308, 0.318, 0.329, 0.343, 0.36, 0.375]
                      KL=[0.1, 0.093, 0.084, 0.075, 0.065, 0.053, 0.041, 0.029, 0.015, 0.001]
                      XF=[1, 1, 1, 1, 1, 1, 1, 1, 1, 1]
                    SoilCrop CanolaSoil
                      LL=[0.262, 0.255, 0.253, 0.27, 0.286, 0.299, 0.313, 0.329, 0.349, 0.37]
                      KL=[0.06, 0.06, 0.06, 0.055, 0.048, 0.04, 0.032, 0.024, 0.014, 0.003]
                      XF=[1, 1, 1, 1, 1, 1, 1, 1, 1, 1]
                    SoilCrop SorghumSoil
                      LL=[0.262, 0.255, 0.253, 0.267, 0.279, 0.287, 0.297, 0.31, 0.324, 0.341]
                      KL=[0.07, 0.07, 0.07, 0.066, 0.06, 0.053, 0.045, 0.039, 0.03, 0.019]
                      XF=[1, 1, 1, 1, 1, 1, 1, 1, 1, 1]
                    SoilCrop MilletSoil
                      LL=[0.262, 0.255, 0.253, 0.267, 0.279, 0.287, 0.297, 0.31, 0.324, 0.341]
                      KL=[0.07, 0.07, 0.07, 0.066, 0.06, 0.053, 0.045, 0.039, 0.03, 0.019]
                      XF=[1, 1, 1, 1, 1, 1, 1, 1, 1, 1]
                    SoilCrop PeanutSoil
                      LL=[0.262, 0.255, 0.253, 0.258, 0.269, 0.287, 0.306, 0.327, 0.352, 0.374]
                      KL=[0.06, 0.06, 0.06, 0.06, 0.055, 0.045, 0.035, 0.025, 0.012, 0.001]
                      XF=[1, 1, 1, 1, 1, 1, 1, 1, 1, 1]
                    SoilCrop BarleySoil
                      LL=[0.262, 0.255, 0.253, 0.268, 0.283, 0.293, 0.305, 0.32, 0.338, 0.357]
                      KL=[0.07, 0.07, 0.07, 0.065, 0.058, 0.049, 0.041, 0.033, 0.023, 0.01]
                      XF=[1, 1, 1, 1, 1, 1, 1, 1, 1, 1]
                    SoilCrop CottonSoil
                      LL=[0.262, 0.255, 0.253, 0.258, 0.258, 0.26, 0.272, 0.287, 0.304, 0.323]
                      KL=[0.1, 0.1, 0.1, 0.1, 0.1, 0.094, 0.083, 0.072, 0.058, 0.042]
                      XF=[1, 1, 1, 1, 1, 1, 1, 1, 1, 1]
                    SoilCrop OatsSoil
                      LL=[0.262, 0.255, 0.253, 0.27, 0.286, 0.299, 0.313, 0.329, 0.349, 0.37]
                      KL=[0.06, 0.06, 0.06, 0.055, 0.048, 0.04, 0.032, 0.024, 0.014, 0.003]
                      XF=[1, 1, 1, 1, 1, 1, 1, 1, 1, 1]
                    SoilCrop ChickpeaSoil
                      LL=[0.262, 0.255, 0.253, 0.258, 0.269, 0.284, 0.302, 0.321, 0.345, 0.37]
                      KL=[0.06, 0.06, 0.06, 0.06, 0.055, 0.046, 0.037, 0.028, 0.016, 0.003]
                      XF=[1, 1, 1, 1, 1, 1, 1, 1, 1, 1]
                    SoilCrop MungbeanSoil
                      LL=[0.262, 0.255, 0.253, 0.262, 0.286, 0.308, 0.331, 0.356, 0.377, 0.376]
                      KL=[0.06, 0.06, 0.06, 0.058, 0.048, 0.036, 0.024, 0.012, 0.001, 0]
                      XF=[1, 1, 1, 1, 1, 1, 1, 1, 1, 0]
                    SoilCrop Pigeon PeaSoil
                      LL=[0.262, 0.255, 0.253, 0.258, 0.269, 0.287, 0.306, 0.327, 0.352, 0.374]
                      KL=[0.06, 0.06, 0.06, 0.06, 0.055, 0.045, 0.035, 0.025, 0.012, 0.001]
                      XF=[1, 1, 1, 1, 1, 1, 1, 1, 1, 1]
                    SoilCrop CowpeaSoil
                      LL=[0.262, 0.255, 0.253, 0.27, 0.286, 0.299, 0.313, 0.329, 0.349, 0.37]
                      KL=[0.06, 0.06, 0.06, 0.055, 0.048, 0.04, 0.032, 0.024, 0.014, 0.003]
                      XF=[1, 1, 1, 1, 1, 1, 1, 1, 1, 1]
                    SoilCrop FababeanSoil
                      LL=[0.262, 0.255, 0.253, 0.258, 0.26, 0.272, 0.288, 0.307, 0.329, 0.353]
                      KL=[0.08, 0.08, 0.08, 0.08, 0.079, 0.069, 0.057, 0.046, 0.031, 0.014]
                      XF=[1, 1, 1, 1, 1, 1, 1, 1, 1, 1]
                    SoilCrop LucerneSoil
                      LL=[0.262, 0.255, 0.253, 0.258, 0.258, 0.253, 0.25, 0.252, 0.265, 0.281]
                      KL=[0.1, 0.1, 0.1, 0.1, 0.1, 0.1, 0.1, 0.099, 0.089, 0.075]
                      XF=[1, 1, 1, 1, 1, 1, 1, 1, 1, 1]
                    SoilCrop LupinSoil
                      LL=[0.262, 0.255, 0.253, 0.27, 0.286, 0.299, 0.313, 0.329, 0.349, 0.37]
                      KL=[0.06, 0.06, 0.06, 0.055, 0.048, 0.04, 0.032, 0.024, 0.014, 0.003]
                      XF=[1, 1, 1, 1, 1, 1, 1, 1, 1, 1]
                    SoilCrop LentilSoil
                      LL=[0.262, 0.255, 0.253, 0.27, 0.286, 0.299, 0.313, 0.329, 0.349, 0.37]
                      KL=[0.06, 0.06, 0.06, 0.055, 0.048, 0.04, 0.032, 0.024, 0.014, 0.003]
                      XF=[1, 1, 1, 1, 1, 1, 1, 1, 1, 1]
                    SoilCrop TriticaleSoil
                      LL=[0.262, 0.255, 0.262, 0.287, 0.31, 0.328, 0.348, 0.37, 0.379, 0.376]
                      KL=[0.07, 0.07, 0.065, 0.056, 0.045, 0.032, 0.019, 0.006, 0, 0]
                      XF=[1, 1, 1, 1, 1, 1, 1, 1, 0, 0]
                    SoilCrop EucalyptusSoil
                      LL=[0.262, 0.255, 0.253, 0.258, 0.26, 0.256, 0.255, 0.256, 0.258, 0.259]
                      KL=[0.08, 0.08, 0.08, 0.079, 0.079, 0.078, 0.077, 0.076, 0.075, 0.074]
                      XF=[1, 1, 1, 1, 1, 1, 1, 1, 1, 1]
                    SoilCrop GliricidiaSoil
                      LL=[0.262, 0.255, 0.253, 0.259, 0.262, 0.26, 0.26, 0.262, 0.266, 0.269]
                      KL=[0.08, 0.08, 0.08, 0.079, 0.077, 0.076, 0.074, 0.072, 0.07, 0.068]
                      XF=[1, 1, 1, 1, 1, 1, 1, 1, 1, 1]
                    SoilCrop TeffSoil
                      LL=[0.262, 0.255, 0.253, 0.27, 0.286, 0.299, 0.313, 0.329, 0.349, 0.37]
                      KL=[0.06, 0.06, 0.06, 0.055, 0.048, 0.04, 0.032, 0.024, 0.014, 0.003]
                      XF=[1, 1, 1, 1, 1, 1, 1, 1, 1, 1]
                  WaterBalance SoilWater: SummerDate=1-nov; SummerU=6; SummerCona=6; WinterDate=1-apr; WinterU=2; WinterCona=2; DiffusConst=1916.25; DiffusSlope=5.39; Salb=0.13; CN2Bare=73; CNRed=20; CNCov=0; PSIDul=-100; Thickness=[150, 150, 150, 150, 200, 200, 200, 200, 300, 300]
                    SWCON=[0.173, 0.172, 0.161, 0.152, 0.113, 0.104, 0.103, 0.108, 0.081, 0.087]
                  Organic: FOMCNRatio=40; CarbonUnits=Total
                    Thickness  Carbon  SoilCNRatio  FBiom  FInert  FOM
                    150        6.606   11.6         0.04   0.477   60.644
                    150        4.647   11.6         0.031  0.627   48.4252
                    150        3.565   11.6         0.014  0.791   38.6683
                    150        3.138   11.6         0.01   0.89    30.8773
                    200        2.798   11.6         0.01   0.988   22.8745
                    200        2.544   11.6         0.01   0.99    16.9458
                    200        2.395   11.6         0.01   0.99    12.5538
                    200        2.349   11.6         0.01   0.99    9.30006
                    300        2.293   11.6         0.01   0.99    5.92998
                    300        2.227   11.6         0.01   0.99    3.78112
                  Chemical: Thickness=[150, 150, 150, 150, 200, 200, 200, 200, 300, 300]; PH=[5.2, 5.2, 5.2, 5.2, 5.2, 5.2, 5.2, 5.2, 5.2, 5.2]; PHUnits=Water
                  Nutrient
                  CERESSoilTemperature Temperature
                  Solute NO3: InitialValuesUnits=ppm; WaterTableConcentration=0; D0=0; DepthConstant=0; MaxDepthSoluteAccessible=0; RunoffEffectivenessAtMovingSolute=0; MaxEffectiveRunoff=0
                  Solute NH4: InitialValuesUnits=ppm; WaterTableConcentration=0; D0=0; DepthConstant=0; MaxDepthSoluteAccessible=0; RunoffEffectivenessAtMovingSolute=0; MaxEffectiveRunoff=0
                  Solute Urea: same as Sensibility.Temperature Response.GuatemalaTransect.Factors.Permutation.Cell.15043_-91905.Synthetic Soil Derived from ISRIC SoilGrids.Urea
              CompositeFactor -1800_29900
                Specifications:
                  [Soil]
                  [Weather]
                Weather -1800_29900: FileName=-1800_29900.met
                Soil Synthetic Soil Derived from ISRIC SoilGrids: ASCOrder=NA; ASCSubOrder=NA; SoilType=Haplic Acrisols; Site=NA; NearestTown=NA; Region=NA; State=NA; Country=Rwanda; NaturalVegetation=NA; ApsoilNumber=9999; Latitude=-1.875; Longitude=29.875; LocationAccuracy=+- 250 m; DataSource=ISRIC SoilGrids
                  Water: Thickness=[150, 150, 150, 150, 200, 200, 200, 200, 300, 300]; InitialPAWmm=0; RelativeTo=LL15; FilledFromTop=true
                    InitialValues=[0.24, 0.24, 0.24, 0.24, 0.24, 0.24, 0.24, 0.24, 0.24, 0.24]
                  Physical
                    Thickness  ParticleSizeClay  BD     AirDry  LL15  DUL    SAT    KS
                    150        37.3              1.219  0.08    0.24  0.361  0.493  4.622
                    150        38                1.29   0.08    0.24  0.348  0.47   4.278
                    150        38.5              1.33   0.08    0.24  0.344  0.458  4.037
                    150        39.5              1.342  0.08    0.24  0.343  0.453  3.595
                    200        40                1.353  0.08    0.24  0.343  0.45   3.392
                    200        40                1.364  0.08    0.24  0.343  0.45   3.392
                    200        40                1.374  0.08    0.24  0.342  0.448  3.392
                    200        40                1.385  0.08    0.24  0.34   0.444  3.392
                    300        40                1.399  0.08    0.24  0.337  0.439  3.392
                    300        40                1.415  0.08    0.24  0.334  0.433  3.392
                    SoilCrop RiceSoil
                      LL=[0.24, 0.24, 0.241, 0.249, 0.261, 0.274, 0.288, 0.3, 0.315, 0.33]
                      KL=[0.06, 0.06, 0.06, 0.055, 0.048, 0.04, 0.032, 0.024, 0.014, 0.003]
                      XF=[1, 1, 1, 1, 1, 1, 1, 1, 1, 1]
                    SoilCrop WheatSoil
                      LL=[0.24, 0.24, 0.241, 0.249, 0.261, 0.274, 0.288, 0.3, 0.315, 0.33]
                      KL=[0.06, 0.06, 0.06, 0.055, 0.048, 0.04, 0.032, 0.024, 0.014, 0.003]
                      XF=[1, 1, 1, 1, 1, 1, 1, 1, 1, 1]
                    SoilCrop SugarcaneSoil
                      LL=[0.24, 0.24, 0.24, 0.245, 0.252, 0.26, 0.268, 0.275, 0.283, 0.293]
                      KL=[0.06, 0.06, 0.06, 0.057, 0.053, 0.048, 0.044, 0.039, 0.033, 0.027]
                      XF=[1, 1, 1, 1, 1, 1, 1, 1, 1, 1]
                    SoilCrop MaizeSoil
                      LL=[0.24, 0.24, 0.241, 0.249, 0.261, 0.274, 0.288, 0.3, 0.315, 0.33]
                      KL=[0.06, 0.06, 0.06, 0.055, 0.048, 0.04, 0.032, 0.024, 0.014, 0.003]
                      XF=[1, 1, 1, 1, 1, 1, 1, 1, 1, 1]
                    SoilCrop SoybeanSoil
                      LL=[0.24, 0.24, 0.241, 0.249, 0.261, 0.274, 0.288, 0.3, 0.315, 0.33]
                      KL=[0.06, 0.06, 0.06, 0.055, 0.048, 0.04, 0.032, 0.024, 0.014, 0.003]
                      XF=[1, 1, 1, 1, 1, 1, 1, 1, 1, 1]
                    SoilCrop OilPalmSoil
                      LL=[0.24, 0.24, 0.24, 0.245, 0.252, 0.26, 0.268, 0.275, 0.283, 0.293]
                      KL=[0.06, 0.06, 0.06, 0.057, 0.053, 0.048, 0.044, 0.039, 0.033, 0.027]
                      XF=[1, 1, 1, 1, 1, 1, 1, 1, 1, 1]
                    SoilCrop CassavaSoil
                      LL=[0.24, 0.24, 0.241, 0.249, 0.261, 0.274, 0.288, 0.3, 0.315, 0.33]
                      KL=[0.06, 0.06, 0.06, 0.055, 0.048, 0.04, 0.032, 0.024, 0.014, 0.003]
                      XF=[1, 1, 1, 1, 1, 1, 1, 1, 1, 1]
                    SoilCrop PlantainForageSoil
                      LL=[0.24, 0.24, 0.24, 0.245, 0.252, 0.26, 0.268, 0.275, 0.283, 0.293]
                      KL=[0.06, 0.06, 0.06, 0.057, 0.053, 0.048, 0.044, 0.039, 0.033, 0.027]
                      XF=[1, 1, 1, 1, 1, 1, 1, 1, 1, 1]
                    SoilCrop SunflowerSoil
                      LL=[0.241, 0.248, 0.257, 0.266, 0.276, 0.289, 0.3, 0.311, 0.323, 0.333]
                      KL=[0.1, 0.093, 0.084, 0.075, 0.065, 0.053, 0.041, 0.029, 0.015, 0.001]
                      XF=[1, 1, 1, 1, 1, 1, 1, 1, 1, 1]
                    SoilCrop CanolaSoil
                      LL=[0.24, 0.24, 0.241, 0.249, 0.261, 0.274, 0.288, 0.3, 0.315, 0.33]
                      KL=[0.06, 0.06, 0.06, 0.055, 0.048, 0.04, 0.032, 0.024, 0.014, 0.003]
                      XF=[1, 1, 1, 1, 1, 1, 1, 1, 1, 1]
                    SoilCrop SorghumSoil
                      LL=[0.24, 0.24, 0.24, 0.246, 0.255, 0.266, 0.276, 0.285, 0.296, 0.308]
                      KL=[0.07, 0.07, 0.07, 0.066, 0.06, 0.053, 0.045, 0.039, 0.03, 0.019]
                      XF=[1, 1, 1, 1, 1, 1, 1, 1, 1, 1]
                    SoilCrop MilletSoil
                      LL=[0.24, 0.24, 0.24, 0.246, 0.255, 0.266, 0.276, 0.285, 0.296, 0.308]
                      KL=[0.07, 0.07, 0.07, 0.066, 0.06, 0.053, 0.045, 0.039, 0.03, 0.019]
                      XF=[1, 1, 1, 1, 1, 1, 1, 1, 1, 1]
                    SoilCrop PeanutSoil
                      LL=[0.24, 0.24, 0.24, 0.24, 0.249, 0.266, 0.283, 0.298, 0.317, 0.333]
                      KL=[0.06, 0.06, 0.06, 0.06, 0.055, 0.045, 0.035, 0.025, 0.012, 0.001]
                      XF=[1, 1, 1, 1, 1, 1, 1, 1, 1, 1]
                    SoilCrop BarleySoil
                      LL=[0.24, 0.24, 0.241, 0.248, 0.258, 0.27, 0.282, 0.293, 0.306, 0.32]
                      KL=[0.07, 0.07, 0.07, 0.065, 0.058, 0.049, 0.041, 0.033, 0.023, 0.01]
                      XF=[1, 1, 1, 1, 1, 1, 1, 1, 1, 1]
                    SoilCrop CottonSoil
                      LL=[0.24, 0.24, 0.24, 0.24, 0.24, 0.246, 0.257, 0.268, 0.281, 0.295]
                      KL=[0.1, 0.1, 0.1, 0.1, 0.1, 0.094, 0.083, 0.072, 0.058, 0.042]
                      XF=[1, 1, 1, 1, 1, 1, 1, 1, 1, 1]
                    SoilCrop OatsSoil
                      LL=[0.24, 0.24, 0.241, 0.249, 0.261, 0.274, 0.288, 0.3, 0.315, 0.33]
                      KL=[0.06, 0.06, 0.06, 0.055, 0.048, 0.04, 0.032, 0.024, 0.014, 0.003]
                      XF=[1, 1, 1, 1, 1, 1, 1, 1, 1, 1]
                    SoilCrop ChickpeaSoil
                      LL=[0.24, 0.24, 0.24, 0.24, 0.248, 0.264, 0.279, 0.294, 0.311, 0.329]
                      KL=[0.06, 0.06, 0.06, 0.06, 0.055, 0.046, 0.037, 0.028, 0.016, 0.003]
                      XF=[1, 1, 1, 1, 1, 1, 1, 1, 1, 1]
                    SoilCrop MungbeanSoil
                      LL=[0.24, 0.24, 0.24, 0.243, 0.261, 0.281, 0.301, 0.32, 0.336, 0.334]
                      KL=[0.06, 0.06, 0.06, 0.058, 0.048, 0.036, 0.024, 0.012, 0.001, 0]
                      XF=[1, 1, 1, 1, 1, 1, 1, 1, 1, 0]
                    SoilCrop Pigeon PeaSoil
                      LL=[0.24, 0.24, 0.24, 0.24, 0.249, 0.266, 0.283, 0.298, 0.317, 0.333]
                      KL=[0.06, 0.06, 0.06, 0.06, 0.055, 0.045, 0.035, 0.025, 0.012, 0.001]
                      XF=[1, 1, 1, 1, 1, 1, 1, 1, 1, 1]
                    SoilCrop CowpeaSoil
                      LL=[0.24, 0.24, 0.241, 0.249, 0.261, 0.274, 0.288, 0.3, 0.315, 0.33]
                      KL=[0.06, 0.06, 0.06, 0.055, 0.048, 0.04, 0.032, 0.024, 0.014, 0.003]
                      XF=[1, 1, 1, 1, 1, 1, 1, 1, 1, 1]
                    SoilCrop FababeanSoil
                      LL=[0.24, 0.24, 0.24, 0.24, 0.242, 0.255, 0.269, 0.283, 0.299, 0.317]
                      KL=[0.08, 0.08, 0.08, 0.08, 0.079, 0.069, 0.057, 0.046, 0.031, 0.014]
                      XF=[1, 1, 1, 1, 1, 1, 1, 1, 1, 1]
                    SoilCrop LucerneSoil
                      LL=[0.24, 0.24, 0.24, 0.24, 0.24, 0.24, 0.24, 0.241, 0.251, 0.264]
                      KL=[0.1, 0.1, 0.1, 0.1, 0.1, 0.1, 0.1, 0.099, 0.089, 0.075]
                      XF=[1, 1, 1, 1, 1, 1, 1, 1, 1, 1]
                    SoilCrop LupinSoil
                      LL=[0.24, 0.24, 0.241, 0.249, 0.261, 0.274, 0.288, 0.3, 0.315, 0.33]
                      KL=[0.06, 0.06, 0.06, 0.055, 0.048, 0.04, 0.032, 0.024, 0.014, 0.003]
                      XF=[1, 1, 1, 1, 1, 1, 1, 1, 1, 1]
                    SoilCrop LentilSoil
                      LL=[0.24, 0.24, 0.241, 0.249, 0.261, 0.274, 0.288, 0.3, 0.315, 0.33]
                      KL=[0.06, 0.06, 0.06, 0.055, 0.048, 0.04, 0.032, 0.024, 0.014, 0.003]
                      XF=[1, 1, 1, 1, 1, 1, 1, 1, 1, 1]
                    SoilCrop TriticaleSoil
                      LL=[0.24, 0.24, 0.247, 0.261, 0.278, 0.296, 0.314, 0.331, 0.337, 0.334]
                      KL=[0.07, 0.07, 0.065, 0.056, 0.045, 0.032, 0.019, 0.006, 0, 0]
                      XF=[1, 1, 1, 1, 1, 1, 1, 1, 0, 0]
                    SoilCrop EucalyptusSoil
                      LL=[0.24, 0.24, 0.24, 0.241, 0.242, 0.243, 0.244, 0.245, 0.246, 0.247]
                      KL=[0.08, 0.08, 0.08, 0.079, 0.079, 0.078, 0.077, 0.076, 0.075, 0.074]
                      XF=[1, 1, 1, 1, 1, 1, 1, 1, 1, 1]
                    SoilCrop GliricidiaSoil
                      LL=[0.24, 0.24, 0.24, 0.241, 0.243, 0.245, 0.247, 0.249, 0.252, 0.254]
                      KL=[0.08, 0.08, 0.08, 0.079, 0.077, 0.076, 0.074, 0.072, 0.07, 0.068]
                      XF=[1, 1, 1, 1, 1, 1, 1, 1, 1, 1]
                    SoilCrop TeffSoil
                      LL=[0.24, 0.24, 0.241, 0.249, 0.261, 0.274, 0.288, 0.3, 0.315, 0.33]
                      KL=[0.06, 0.06, 0.06, 0.055, 0.048, 0.04, 0.032, 0.024, 0.014, 0.003]
                      XF=[1, 1, 1, 1, 1, 1, 1, 1, 1, 1]
                  WaterBalance SoilWater: SummerDate=1-nov; SummerU=6; SummerCona=6; WinterDate=1-apr; WinterU=4; WinterCona=2.5; DiffusConst=7111.43; DiffusSlope=-1.02; Salb=0.12; CN2Bare=73; CNRed=20; CNCov=0; PSIDul=-100; Thickness=[150, 150, 150, 150, 200, 200, 200, 200, 300, 300]
                    SWCON=[0.172, 0.174, 0.175, 0.167, 0.129, 0.129, 0.13, 0.132, 0.096, 0.098]
                  Organic: FOMCNRatio=40; CarbonUnits=Total
                    Thickness  Carbon  SoilCNRatio  FBiom  FInert  FOM
                    150        3.713   11.6         0.04   0.55    84.9016
                    150        2.705   11.6         0.031  0.713   67.7953
                    150        2.19    11.6         0.014  0.855   54.1356
                    150        2.025   11.6         0.01   0.916   43.2282
                    200        1.955   11.6         0.01   0.941   32.0242
                    200        1.976   11.6         0.01   0.924   23.7241
                    200        1.965   11.6         0.01   0.922   17.5753
                    200        1.922   11.6         0.01   0.935   13.0201
                    300        1.87    11.6         0.01   0.952   8.30197
                    300        1.808   11.6         0.01   0.973   5.29357
                  Chemical: Thickness=[150, 150, 150, 150, 200, 200, 200, 200, 300, 300]; PH=[5.42, 5.4, 5.4, 5.4, 5.4, 5.4, 5.4, 5.4, 5.4, 5.4]; PHUnits=Water
                  Nutrient
                  CERESSoilTemperature Temperature
                  Solute NO3: InitialValuesUnits=ppm; WaterTableConcentration=0; D0=0; DepthConstant=0; MaxDepthSoluteAccessible=0; RunoffEffectivenessAtMovingSolute=0; MaxEffectiveRunoff=0
                  Solute NH4: InitialValuesUnits=ppm; WaterTableConcentration=0; D0=0; DepthConstant=0; MaxDepthSoluteAccessible=0; RunoffEffectivenessAtMovingSolute=0; MaxEffectiveRunoff=0
                  Solute Urea: same as Sensibility.Temperature Response.GuatemalaTransect.Factors.Permutation.Cell.15043_-91905.Synthetic Soil Derived from ISRIC SoilGrids.Urea
              CompositeFactor -1900_30000
                Specifications:
                  [Soil]
                  [Weather]
                Weather -1900_30000: FileName=-1900_30000.met
                Soil Synthetic Soil Derived from ISRIC SoilGrids: same as Sensibility.Temperature Response.RwandaTransect.Factors.Permutation.Cell.-1800_29900.Synthetic Soil Derived from ISRIC SoilGrids
              CompositeFactor -2000_30100
                Specifications:
                  [Soil]
                  [Weather]
                Weather -2000_30100: FileName=-2000_30100.met
                Soil Synthetic Soil Derived from ISRIC SoilGrids: ASCOrder=NA; ASCSubOrder=NA; SoilType=Haplic Acrisols; Site=NA; NearestTown=NA; Region=NA; State=NA; Country=Rwanda; NaturalVegetation=NA; ApsoilNumber=9999; Latitude=-2.125; Longitude=30.125; LocationAccuracy=+- 250 m; DataSource=ISRIC SoilGrids
                  Water: Thickness=[150, 150, 150, 150, 200, 200, 200, 200, 300, 300]; InitialPAWmm=0; RelativeTo=LL15; FilledFromTop=true
                    InitialValues=[0.23, 0.23, 0.233, 0.237, 0.24, 0.24, 0.24, 0.24, 0.24, 0.24]
                  Physical
                    Thickness  ParticleSizeClay  BD     AirDry  LL15   DUL    SAT    KS
                    150        37.7              1.303  0.077   0.23   0.337  0.468  4.447
                    150        40                1.356  0.077   0.23   0.33   0.455  3.392
                    150        41.8              1.369  0.077   0.233  0.331  0.45   2.769
                    150        43.2              1.364  0.079   0.237  0.332  0.45   2.327
                    200        44.2              1.365  0.08    0.24   0.332  0.45   2.072
                    200        44.8              1.373  0.08    0.24   0.333  0.45   1.955
                    200        45                1.381  0.08    0.24   0.333  0.449  1.899
                    200        45                1.39   0.08    0.24   0.333  0.447  1.899
                    300        45                1.401  0.08    0.24   0.333  0.445  1.899
                    300        45                1.414  0.08    0.24   0.333  0.442  1.899
                    SoilCrop RiceSoil
                      LL=[0.23, 0.23, 0.233, 0.245, 0.258, 0.271, 0.283, 0.296, 0.311, 0.329]
                      KL=[0.06, 0.06, 0.06, 0.055, 0.048, 0.04, 0.032, 0.024, 0.014, 0.003]
                      XF=[1, 1, 1, 1, 1, 1, 1, 1, 1, 1]
                    SoilCrop WheatSoil
                      LL=[0.23, 0.23, 0.233, 0.245, 0.258, 0.271, 0.283, 0.296, 0.311, 0.329]
                      KL=[0.06, 0.06, 0.06, 0.055, 0.048, 0.04, 0.032, 0.024, 0.014, 0.003]
                      XF=[1, 1, 1, 1, 1, 1, 1, 1, 1, 1]
                    SoilCrop SugarcaneSoil
                      LL=[0.23, 0.23, 0.233, 0.242, 0.251, 0.258, 0.265, 0.272, 0.281, 0.292]
                      KL=[0.06, 0.06, 0.06, 0.057, 0.053, 0.048, 0.044, 0.039, 0.033, 0.027]
                      XF=[1, 1, 1, 1, 1, 1, 1, 1, 1, 1]
                    SoilCrop MaizeSoil
                      LL=[0.23, 0.23, 0.233, 0.245, 0.258, 0.271, 0.283, 0.296, 0.311, 0.329]
                      KL=[0.06, 0.06, 0.06, 0.055, 0.048, 0.04, 0.032, 0.024, 0.014, 0.003]
                      XF=[1, 1, 1, 1, 1, 1, 1, 1, 1, 1]
                    SoilCrop SoybeanSoil
                      LL=[0.23, 0.23, 0.233, 0.245, 0.258, 0.271, 0.283, 0.296, 0.311, 0.329]
                      KL=[0.06, 0.06, 0.06, 0.055, 0.048, 0.04, 0.032, 0.024, 0.014, 0.003]
                      XF=[1, 1, 1, 1, 1, 1, 1, 1, 1, 1]
                    SoilCrop OilPalmSoil
                      LL=[0.23, 0.23, 0.233, 0.242, 0.251, 0.258, 0.265, 0.272, 0.281, 0.292]
                      KL=[0.06, 0.06, 0.06, 0.057, 0.053, 0.048, 0.044, 0.039, 0.033, 0.027]
                      XF=[1, 1, 1, 1, 1, 1, 1, 1, 1, 1]
                    SoilCrop CassavaSoil
                      LL=[0.23, 0.23, 0.233, 0.245, 0.258, 0.271, 0.283, 0.296, 0.311, 0.329]
                      KL=[0.06, 0.06, 0.06, 0.055, 0.048, 0.04, 0.032, 0.024, 0.014, 0.003]
                      XF=[1, 1, 1, 1, 1, 1, 1, 1, 1, 1]
                    SoilCrop PlantainForageSoil
                      LL=[0.23, 0.23, 0.233, 0.242, 0.251, 0.258, 0.265, 0.272, 0.281, 0.292]
                      KL=[0.06, 0.06, 0.06, 0.057, 0.053, 0.048, 0.044, 0.039, 0.033, 0.027]
                      XF=[1, 1, 1, 1, 1, 1, 1, 1, 1, 1]
                    SoilCrop SunflowerSoil
                      LL=[0.231, 0.237, 0.248, 0.261, 0.273, 0.284, 0.295, 0.305, 0.319, 0.332]
                      KL=[0.1, 0.093, 0.084, 0.075, 0.065, 0.053, 0.041, 0.029, 0.015, 0.001]
                      XF=[1, 1, 1, 1, 1, 1, 1, 1, 1, 1]
                    SoilCrop CanolaSoil
                      LL=[0.23, 0.23, 0.233, 0.245, 0.258, 0.271, 0.283, 0.296, 0.311, 0.329]
                      KL=[0.06, 0.06, 0.06, 0.055, 0.048, 0.04, 0.032, 0.024, 0.014, 0.003]
                      XF=[1, 1, 1, 1, 1, 1, 1, 1, 1, 1]
                    SoilCrop SorghumSoil
                      LL=[0.23, 0.23, 0.233, 0.243, 0.254, 0.263, 0.272, 0.282, 0.293, 0.307]
                      KL=[0.07, 0.07, 0.07, 0.066, 0.06, 0.053, 0.045, 0.039, 0.03, 0.019]
                      XF=[1, 1, 1, 1, 1, 1, 1, 1, 1, 1]
                    SoilCrop MilletSoil
                      LL=[0.23, 0.23, 0.233, 0.243, 0.254, 0.263, 0.272, 0.282, 0.293, 0.307]
                      KL=[0.07, 0.07, 0.07, 0.066, 0.06, 0.053, 0.045, 0.039, 0.03, 0.019]
                      XF=[1, 1, 1, 1, 1, 1, 1, 1, 1, 1]
                    SoilCrop PeanutSoil
                      LL=[0.23, 0.23, 0.233, 0.237, 0.248, 0.263, 0.279, 0.294, 0.313, 0.331]
                      KL=[0.06, 0.06, 0.06, 0.06, 0.055, 0.045, 0.035, 0.025, 0.012, 0.001]
                      XF=[1, 1, 1, 1, 1, 1, 1, 1, 1, 1]
                    SoilCrop BarleySoil
                      LL=[0.23, 0.23, 0.233, 0.244, 0.256, 0.267, 0.278, 0.289, 0.303, 0.319]
                      KL=[0.07, 0.07, 0.07, 0.065, 0.058, 0.049, 0.041, 0.033, 0.023, 0.01]
                      XF=[1, 1, 1, 1, 1, 1, 1, 1, 1, 1]
                    SoilCrop CottonSoil
                      LL=[0.23, 0.23, 0.233, 0.237, 0.24, 0.245, 0.255, 0.266, 0.279, 0.294]
                      KL=[0.1, 0.1, 0.1, 0.1, 0.1, 0.094, 0.083, 0.072, 0.058, 0.042]
                      XF=[1, 1, 1, 1, 1, 1, 1, 1, 1, 1]
                    SoilCrop OatsSoil
                      LL=[0.23, 0.23, 0.233, 0.245, 0.258, 0.271, 0.283, 0.296, 0.311, 0.329]
                      KL=[0.06, 0.06, 0.06, 0.055, 0.048, 0.04, 0.032, 0.024, 0.014, 0.003]
                      XF=[1, 1, 1, 1, 1, 1, 1, 1, 1, 1]
                    SoilCrop ChickpeaSoil
                      LL=[0.23, 0.23, 0.233, 0.237, 0.247, 0.261, 0.276, 0.29, 0.308, 0.328]
                      KL=[0.06, 0.06, 0.06, 0.06, 0.055, 0.046, 0.037, 0.028, 0.016, 0.003]
                      XF=[1, 1, 1, 1, 1, 1, 1, 1, 1, 1]
                    SoilCrop MungbeanSoil
                      LL=[0.23, 0.23, 0.233, 0.241, 0.258, 0.277, 0.296, 0.314, 0.331, 0.333]
                      KL=[0.06, 0.06, 0.06, 0.058, 0.048, 0.036, 0.024, 0.012, 0.001, 0]
                      XF=[1, 1, 1, 1, 1, 1, 1, 1, 1, 0]
                    SoilCrop Pigeon PeaSoil
                      LL=[0.23, 0.23, 0.233, 0.237, 0.248, 0.263, 0.279, 0.294, 0.313, 0.331]
                      KL=[0.06, 0.06, 0.06, 0.06, 0.055, 0.045, 0.035, 0.025, 0.012, 0.001]
                      XF=[1, 1, 1, 1, 1, 1, 1, 1, 1, 1]
                    SoilCrop CowpeaSoil
                      LL=[0.23, 0.23, 0.233, 0.245, 0.258, 0.271, 0.283, 0.296, 0.311, 0.329]
                      KL=[0.06, 0.06, 0.06, 0.055, 0.048, 0.04, 0.032, 0.024, 0.014, 0.003]
                      XF=[1, 1, 1, 1, 1, 1, 1, 1, 1, 1]
                    SoilCrop FababeanSoil
                      LL=[0.23, 0.23, 0.233, 0.237, 0.242, 0.253, 0.266, 0.28, 0.296, 0.316]
                      KL=[0.08, 0.08, 0.08, 0.08, 0.079, 0.069, 0.057, 0.046, 0.031, 0.014]
                      XF=[1, 1, 1, 1, 1, 1, 1, 1, 1, 1]
                    SoilCrop LucerneSoil
                      LL=[0.23, 0.23, 0.233, 0.237, 0.24, 0.24, 0.24, 0.241, 0.251, 0.263]
                      KL=[0.1, 0.1, 0.1, 0.1, 0.1, 0.1, 0.1, 0.099, 0.089, 0.075]
                      XF=[1, 1, 1, 1, 1, 1, 1, 1, 1, 1]
                    SoilCrop LupinSoil
                      LL=[0.23, 0.23, 0.233, 0.245, 0.258, 0.271, 0.283, 0.296, 0.311, 0.329]
                      KL=[0.06, 0.06, 0.06, 0.055, 0.048, 0.04, 0.032, 0.024, 0.014, 0.003]
                      XF=[1, 1, 1, 1, 1, 1, 1, 1, 1, 1]
                    SoilCrop LentilSoil
                      LL=[0.23, 0.23, 0.233, 0.245, 0.258, 0.271, 0.283, 0.296, 0.311, 0.329]
                      KL=[0.06, 0.06, 0.06, 0.055, 0.048, 0.04, 0.032, 0.024, 0.014, 0.003]
                      XF=[1, 1, 1, 1, 1, 1, 1, 1, 1, 1]
                    SoilCrop TriticaleSoil
                      LL=[0.23, 0.23, 0.239, 0.257, 0.274, 0.29, 0.307, 0.324, 0.333, 0.333]
                      KL=[0.07, 0.07, 0.065, 0.056, 0.045, 0.032, 0.019, 0.006, 0, 0]
                      XF=[1, 1, 1, 1, 1, 1, 1, 1, 0, 0]
                    SoilCrop EucalyptusSoil
                      LL=[0.23, 0.23, 0.233, 0.238, 0.241, 0.242, 0.243, 0.244, 0.245, 0.247]
                      KL=[0.08, 0.08, 0.08, 0.079, 0.079, 0.078, 0.077, 0.076, 0.075, 0.074]
                      XF=[1, 1, 1, 1, 1, 1, 1, 1, 1, 1]
                    SoilCrop GliricidiaSoil
                      LL=[0.23, 0.23, 0.233, 0.239, 0.243, 0.245, 0.247, 0.249, 0.251, 0.254]
                      KL=[0.08, 0.08, 0.08, 0.079, 0.077, 0.076, 0.074, 0.072, 0.07, 0.068]
                      XF=[1, 1, 1, 1, 1, 1, 1, 1, 1, 1]
                    SoilCrop TeffSoil
                      LL=[0.23, 0.23, 0.233, 0.245, 0.258, 0.271, 0.283, 0.296, 0.311, 0.329]
                      KL=[0.06, 0.06, 0.06, 0.055, 0.048, 0.04, 0.032, 0.024, 0.014, 0.003]
                      XF=[1, 1, 1, 1, 1, 1, 1, 1, 1, 1]
                  WaterBalance SoilWater: SummerDate=1-nov; SummerU=6; SummerCona=6; WinterDate=1-apr; WinterU=4; WinterCona=2.5; DiffusConst=13263.51; DiffusSlope=-6.15; Salb=0.12; CN2Bare=73; CNRed=20; CNCov=0; PSIDul=-100; Thickness=[150, 150, 150, 150, 200, 200, 200, 200, 300, 300]
                    SWCON=[0.169, 0.144, 0.128, 0.112, 0.079, 0.075, 0.074, 0.075, 0.053, 0.054]
                  Organic: FOMCNRatio=40; CarbonUnits=Total
                    Thickness  Carbon  SoilCNRatio  FBiom  FInert  FOM
                    150        2.915   11.1         0.04   0.518   84.9016
                    150        2.094   11.1         0.031  0.692   67.7953
                    150        1.725   11.1         0.014  0.832   54.1356
                    150        1.589   11.1         0.01   0.907   43.2282
                    200        1.443   11.1         0.01   0.99    32.0242
                    200        1.289   11.1         0.01   0.99    23.7241
                    200        1.204   11.1         0.01   0.99    17.5753
                    200        1.186   11.1         0.01   0.99    13.0201
                    300        1.164   11.1         0.01   0.99    8.30197
                    300        1.139   11.1         0.01   0.99    5.29357
                  Chemical: Thickness=[150, 150, 150, 150, 200, 200, 200, 200, 300, 300]; PH=[5.72, 5.7, 5.7, 5.7, 5.7, 5.7, 5.7, 5.7, 5.7, 5.7]; PHUnits=Water
                  Nutrient
                  CERESSoilTemperature Temperature
                  Solute NO3: InitialValuesUnits=ppm; WaterTableConcentration=0; D0=0; DepthConstant=0; MaxDepthSoluteAccessible=0; RunoffEffectivenessAtMovingSolute=0; MaxEffectiveRunoff=0
                  Solute NH4: InitialValuesUnits=ppm; WaterTableConcentration=0; D0=0; DepthConstant=0; MaxDepthSoluteAccessible=0; RunoffEffectivenessAtMovingSolute=0; MaxEffectiveRunoff=0
                  Solute Urea: same as Sensibility.Temperature Response.GuatemalaTransect.Factors.Permutation.Cell.15043_-91905.Synthetic Soil Derived from ISRIC SoilGrids.Urea
              CompositeFactor -2100_30200
                Specifications:
                  [Soil]
                  [Weather]
                Weather -2100_30200: FileName=-2100_30200.met
                Soil Synthetic Soil Derived from ISRIC SoilGrids: same as Sensibility.Temperature Response.RwandaTransect.Factors.Permutation.Cell.-2000_30100.Synthetic Soil Derived from ISRIC SoilGrids
              CompositeFactor -2200_30300
                Specifications:
                  [Soil]
                  [Weather]
                Weather -2200_30300: FileName=-2200_30300.met
                Soil Synthetic Soil Derived from ISRIC SoilGrids: ASCOrder=NA; ASCSubOrder=NA; SoilType=Haplic Acrisols; Site=NA; NearestTown=NA; Region=NA; State=NA; Country=Rwanda; NaturalVegetation=NA; ApsoilNumber=9999; Latitude=-2.125; Longitude=30.375; LocationAccuracy=+- 250 m; DataSource=ISRIC SoilGrids
                  Water: Thickness=[150, 150, 150, 150, 200, 200, 200, 200, 300, 300]; InitialPAWmm=0; RelativeTo=LL15; FilledFromTop=true
                    InitialValues=[0.23, 0.23, 0.233, 0.237, 0.24, 0.24, 0.24, 0.24, 0.24, 0.24]
                  Physical
                    Thickness  ParticleSizeClay  BD     AirDry  LL15   DUL    SAT    KS
                    150        36.2              1.328  0.077   0.23   0.331  0.458  5.292
                    150        38                1.373  0.077   0.23   0.325  0.445  4.278
                    150        39.8              1.385  0.077   0.233  0.323  0.443  3.492
                    150        41.2              1.383  0.079   0.237  0.329  0.448  2.934
                    200        42                1.388  0.08    0.24   0.331  0.448  2.69
                    200        42                1.397  0.08    0.24   0.331  0.443  2.69
                    200        42.1              1.405  0.08    0.24   0.33   0.439  2.659
                    200        42.3              1.411  0.08    0.24   0.328  0.437  2.598
                    300        42.5              1.419  0.08    0.24   0.326  0.434  2.524
                    300        42.9              1.427  0.08    0.24   0.323  0.431  2.437
                    SoilCrop RiceSoil
                      LL=[0.23, 0.23, 0.233, 0.245, 0.258, 0.27, 0.282, 0.293, 0.306, 0.319]
                      KL=[0.06, 0.06, 0.06, 0.055, 0.048, 0.04, 0.032, 0.024, 0.014, 0.003]
                      XF=[1, 1, 1, 1, 1, 1, 1, 1, 1, 1]
                    SoilCrop WheatSoil
                      LL=[0.23, 0.23, 0.233, 0.245, 0.258, 0.27, 0.282, 0.293, 0.306, 0.319]
                      KL=[0.06, 0.06, 0.06, 0.055, 0.048, 0.04, 0.032, 0.024, 0.014, 0.003]
                      XF=[1, 1, 1, 1, 1, 1, 1, 1, 1, 1]
                    SoilCrop SugarcaneSoil
                      LL=[0.23, 0.23, 0.233, 0.242, 0.251, 0.258, 0.264, 0.271, 0.278, 0.286]
                      KL=[0.06, 0.06, 0.06, 0.057, 0.053, 0.048, 0.044, 0.039, 0.033, 0.027]
                      XF=[1, 1, 1, 1, 1, 1, 1, 1, 1, 1]
                    SoilCrop MaizeSoil
                      LL=[0.23, 0.23, 0.233, 0.245, 0.258, 0.27, 0.282, 0.293, 0.306, 0.319]
                      KL=[0.06, 0.06, 0.06, 0.055, 0.048, 0.04, 0.032, 0.024, 0.014, 0.003]
                      XF=[1, 1, 1, 1, 1, 1, 1, 1, 1, 1]
                    SoilCrop SoybeanSoil
                      LL=[0.23, 0.23, 0.233, 0.245, 0.258, 0.27, 0.282, 0.293, 0.306, 0.319]
                      KL=[0.06, 0.06, 0.06, 0.055, 0.048, 0.04, 0.032, 0.024, 0.014, 0.003]
                      XF=[1, 1, 1, 1, 1, 1, 1, 1, 1, 1]
                    SoilCrop OilPalmSoil
                      LL=[0.23, 0.23, 0.233, 0.242, 0.251, 0.258, 0.264, 0.271, 0.278, 0.286]
                      KL=[0.06, 0.06, 0.06, 0.057, 0.053, 0.048, 0.044, 0.039, 0.033, 0.027]
                      XF=[1, 1, 1, 1, 1, 1, 1, 1, 1, 1]
                    SoilCrop CassavaSoil
                      LL=[0.23, 0.23, 0.233, 0.245, 0.258, 0.27, 0.282, 0.293, 0.306, 0.319]
                      KL=[0.06, 0.06, 0.06, 0.055, 0.048, 0.04, 0.032, 0.024, 0.014, 0.003]
                      XF=[1, 1, 1, 1, 1, 1, 1, 1, 1, 1]
                    SoilCrop PlantainForageSoil
                      LL=[0.23, 0.23, 0.233, 0.242, 0.251, 0.258, 0.264, 0.271, 0.278, 0.286]
                      KL=[0.06, 0.06, 0.06, 0.057, 0.053, 0.048, 0.044, 0.039, 0.033, 0.027]
                      XF=[1, 1, 1, 1, 1, 1, 1, 1, 1, 1]
                    SoilCrop SunflowerSoil
                      LL=[0.23, 0.237, 0.247, 0.26, 0.272, 0.283, 0.293, 0.302, 0.313, 0.322]
                      KL=[0.1, 0.093, 0.084, 0.075, 0.065, 0.053, 0.041, 0.029, 0.015, 0.001]
                      XF=[1, 1, 1, 1, 1, 1, 1, 1, 1, 1]
                    SoilCrop CanolaSoil
                      LL=[0.23, 0.23, 0.233, 0.245, 0.258, 0.27, 0.282, 0.293, 0.306, 0.319]
                      KL=[0.06, 0.06, 0.06, 0.055, 0.048, 0.04, 0.032, 0.024, 0.014, 0.003]
                      XF=[1, 1, 1, 1, 1, 1, 1, 1, 1, 1]
                    SoilCrop SorghumSoil
                      LL=[0.23, 0.23, 0.233, 0.243, 0.254, 0.263, 0.272, 0.28, 0.289, 0.3]
                      KL=[0.07, 0.07, 0.07, 0.066, 0.06, 0.053, 0.045, 0.039, 0.03, 0.019]
                      XF=[1, 1, 1, 1, 1, 1, 1, 1, 1, 1]
                    SoilCrop MilletSoil
                      LL=[0.23, 0.23, 0.233, 0.243, 0.254, 0.263, 0.272, 0.28, 0.289, 0.3]
                      KL=[0.07, 0.07, 0.07, 0.066, 0.06, 0.053, 0.045, 0.039, 0.03, 0.019]
                      XF=[1, 1, 1, 1, 1, 1, 1, 1, 1, 1]
                    SoilCrop PeanutSoil
                      LL=[0.23, 0.23, 0.233, 0.237, 0.248, 0.263, 0.278, 0.292, 0.308, 0.322]
                      KL=[0.06, 0.06, 0.06, 0.06, 0.055, 0.045, 0.035, 0.025, 0.012, 0.001]
                      XF=[1, 1, 1, 1, 1, 1, 1, 1, 1, 1]
                    SoilCrop BarleySoil
                      LL=[0.23, 0.23, 0.233, 0.244, 0.256, 0.267, 0.277, 0.287, 0.298, 0.311]
                      KL=[0.07, 0.07, 0.07, 0.065, 0.058, 0.049, 0.041, 0.033, 0.023, 0.01]
                      XF=[1, 1, 1, 1, 1, 1, 1, 1, 1, 1]
                    SoilCrop CottonSoil
                      LL=[0.23, 0.23, 0.233, 0.237, 0.24, 0.245, 0.255, 0.265, 0.276, 0.288]
                      KL=[0.1, 0.1, 0.1, 0.1, 0.1, 0.094, 0.083, 0.072, 0.058, 0.042]
                      XF=[1, 1, 1, 1, 1, 1, 1, 1, 1, 1]
                    SoilCrop OatsSoil
                      LL=[0.23, 0.23, 0.233, 0.245, 0.258, 0.27, 0.282, 0.293, 0.306, 0.319]
                      KL=[0.06, 0.06, 0.06, 0.055, 0.048, 0.04, 0.032, 0.024, 0.014, 0.003]
                      XF=[1, 1, 1, 1, 1, 1, 1, 1, 1, 1]
                    SoilCrop ChickpeaSoil
                      LL=[0.23, 0.23, 0.233, 0.237, 0.247, 0.261, 0.275, 0.288, 0.303, 0.319]
                      KL=[0.06, 0.06, 0.06, 0.06, 0.055, 0.046, 0.037, 0.028, 0.016, 0.003]
                      XF=[1, 1, 1, 1, 1, 1, 1, 1, 1, 1]
                    SoilCrop MungbeanSoil
                      LL=[0.23, 0.23, 0.233, 0.241, 0.258, 0.276, 0.294, 0.311, 0.325, 0.323]
                      KL=[0.06, 0.06, 0.06, 0.058, 0.048, 0.036, 0.024, 0.012, 0.001, 0]
                      XF=[1, 1, 1, 1, 1, 1, 1, 1, 1, 0]
                    SoilCrop Pigeon PeaSoil
                      LL=[0.23, 0.23, 0.233, 0.237, 0.248, 0.263, 0.278, 0.292, 0.308, 0.322]
                      KL=[0.06, 0.06, 0.06, 0.06, 0.055, 0.045, 0.035, 0.025, 0.012, 0.001]
                      XF=[1, 1, 1, 1, 1, 1, 1, 1, 1, 1]
                    SoilCrop CowpeaSoil
                      LL=[0.23, 0.23, 0.233, 0.245, 0.258, 0.27, 0.282, 0.293, 0.306, 0.319]
                      KL=[0.06, 0.06, 0.06, 0.055, 0.048, 0.04, 0.032, 0.024, 0.014, 0.003]
                      XF=[1, 1, 1, 1, 1, 1, 1, 1, 1, 1]
                    SoilCrop FababeanSoil
                      LL=[0.23, 0.23, 0.233, 0.237, 0.242, 0.253, 0.266, 0.278, 0.292, 0.308]
                      KL=[0.08, 0.08, 0.08, 0.08, 0.079, 0.069, 0.057, 0.046, 0.031, 0.014]
                      XF=[1, 1, 1, 1, 1, 1, 1, 1, 1, 1]
                    SoilCrop LucerneSoil
                      LL=[0.23, 0.23, 0.233, 0.237, 0.24, 0.24, 0.24, 0.241, 0.25, 0.261]
                      KL=[0.1, 0.1, 0.1, 0.1, 0.1, 0.1, 0.1, 0.099, 0.089, 0.075]
                      XF=[1, 1, 1, 1, 1, 1, 1, 1, 1, 1]
                    SoilCrop LupinSoil
                      LL=[0.23, 0.23, 0.233, 0.245, 0.258, 0.27, 0.282, 0.293, 0.306, 0.319]
                      KL=[0.06, 0.06, 0.06, 0.055, 0.048, 0.04, 0.032, 0.024, 0.014, 0.003]
                      XF=[1, 1, 1, 1, 1, 1, 1, 1, 1, 1]
                    SoilCrop LentilSoil
                      LL=[0.23, 0.23, 0.233, 0.245, 0.258, 0.27, 0.282, 0.293, 0.306, 0.319]
                      KL=[0.06, 0.06, 0.06, 0.055, 0.048, 0.04, 0.032, 0.024, 0.014, 0.003]
                      XF=[1, 1, 1, 1, 1, 1, 1, 1, 1, 1]
                    SoilCrop TriticaleSoil
                      LL=[0.23, 0.23, 0.239, 0.256, 0.273, 0.29, 0.306, 0.32, 0.326, 0.323]
                      KL=[0.07, 0.07, 0.065, 0.056, 0.045, 0.032, 0.019, 0.006, 0, 0]
                      XF=[1, 1, 1, 1, 1, 1, 1, 1, 0, 0]
                    SoilCrop EucalyptusSoil
                      LL=[0.23, 0.23, 0.233, 0.238, 0.241, 0.242, 0.243, 0.244, 0.245, 0.246]
                      KL=[0.08, 0.08, 0.08, 0.079, 0.079, 0.078, 0.077, 0.076, 0.075, 0.074]
                      XF=[1, 1, 1, 1, 1, 1, 1, 1, 1, 1]
                    SoilCrop GliricidiaSoil
                      LL=[0.23, 0.23, 0.233, 0.239, 0.243, 0.245, 0.247, 0.248, 0.25, 0.253]
                      KL=[0.08, 0.08, 0.08, 0.079, 0.077, 0.076, 0.074, 0.072, 0.07, 0.068]
                      XF=[1, 1, 1, 1, 1, 1, 1, 1, 1, 1]
                    SoilCrop TeffSoil
                      LL=[0.23, 0.23, 0.233, 0.245, 0.258, 0.27, 0.282, 0.293, 0.306, 0.319]
                      KL=[0.06, 0.06, 0.06, 0.055, 0.048, 0.04, 0.032, 0.024, 0.014, 0.003]
                      XF=[1, 1, 1, 1, 1, 1, 1, 1, 1, 1]
                  WaterBalance SoilWater: SummerDate=1-nov; SummerU=6; SummerCona=6; WinterDate=1-apr; WinterU=4; WinterCona=2.5; DiffusConst=12257.99; DiffusSlope=-4.98; Salb=0.12; CN2Bare=73; CNRed=20; CNCov=0; PSIDul=-100; Thickness=[150, 150, 150, 150, 200, 200, 200, 200, 300, 300]
                    SWCON=[0.195, 0.176, 0.153, 0.134, 0.1, 0.104, 0.105, 0.103, 0.07, 0.068]
                  Organic: FOMCNRatio=40; CarbonUnits=Total
                    Thickness  Carbon  SoilCNRatio  FBiom  FInert  FOM
                    150        2.721   12           0.04   0.413   84.9016
                    150        1.73    12           0.031  0.628   67.7953
                    150        1.351   12           0.014  0.798   54.1356
                    150        1.207   12           0.01   0.893   43.2282
                    200        1.072   12           0.01   0.99    32.0242
                    200        0.947   12           0.01   0.99    23.7241
                    200        0.878   12           0.01   0.99    17.5753
                    200        0.864   12           0.01   0.99    13.0201
                    300        0.847   12           0.01   0.99    8.30197
                    300        0.827   12           0.01   0.99    5.29357
                  Chemical: Thickness=[150, 150, 150, 150, 200, 200, 200, 200, 300, 300]; PH=[5.62, 5.6, 5.6, 5.6, 5.6, 5.6, 5.6, 5.6, 5.6, 5.6]; PHUnits=Water
                  Nutrient
                  CERESSoilTemperature Temperature
                  Solute NO3: InitialValuesUnits=ppm; WaterTableConcentration=0; D0=0; DepthConstant=0; MaxDepthSoluteAccessible=0; RunoffEffectivenessAtMovingSolute=0; MaxEffectiveRunoff=0
                  Solute NH4: InitialValuesUnits=ppm; WaterTableConcentration=0; D0=0; DepthConstant=0; MaxDepthSoluteAccessible=0; RunoffEffectivenessAtMovingSolute=0; MaxEffectiveRunoff=0
                  Solute Urea: same as Sensibility.Temperature Response.GuatemalaTransect.Factors.Permutation.Cell.15043_-91905.Synthetic Soil Derived from ISRIC SoilGrids.Urea
              CompositeFactor -2300_30400
                Specifications:
                  [Soil]
                  [Weather]
                Weather -2300_30400: FileName=-2300_30400.met
                Soil Synthetic Soil Derived from ISRIC SoilGrids: ASCOrder=NA; ASCSubOrder=NA; SoilType=Haplic Acrisols; Site=NA; NearestTown=NA; Region=NA; State=NA; Country=Burundi; NaturalVegetation=NA; ApsoilNumber=9999; Latitude=-2.375; Longitude=30.375; LocationAccuracy=+- 250 m; DataSource=ISRIC SoilGrids
                  Water: Thickness=[150, 150, 150, 150, 200, 200, 200, 200, 300, 300]; InitialPAWmm=0; RelativeTo=LL15; FilledFromTop=true
                    InitialValues=[0.23, 0.23, 0.23, 0.23, 0.23, 0.23, 0.23, 0.23, 0.23, 0.23]
                  Physical
                    Thickness  ParticleSizeClay  BD     AirDry  LL15  DUL    SAT    KS
                    150        34.7              1.148  0.077   0.23  0.353  0.513  6.297
                    150        37                1.258  0.077   0.23  0.339  0.48   4.804
                    150        38.3              1.295  0.077   0.23  0.337  0.47   4.156
                    150        38.8              1.298  0.077   0.23  0.332  0.47   3.921
                    200        39.2              1.305  0.077   0.23  0.33   0.468  3.701
                    200        39.8              1.314  0.077   0.23  0.33   0.463  3.492
                    200        40                1.321  0.077   0.23  0.33   0.46   3.392
                    200        40                1.325  0.077   0.23  0.33   0.46   3.392
                    300        40                1.329  0.077   0.23  0.33   0.46   3.392
                    300        40                1.335  0.077   0.23  0.33   0.46   3.392
                    SoilCrop RiceSoil
                      LL=[0.23, 0.23, 0.231, 0.239, 0.25, 0.263, 0.277, 0.29, 0.307, 0.326]
                      KL=[0.06, 0.06, 0.06, 0.055, 0.048, 0.04, 0.032, 0.024, 0.014, 0.003]
                      XF=[1, 1, 1, 1, 1, 1, 1, 1, 1, 1]
                    SoilCrop WheatSoil
                      LL=[0.23, 0.23, 0.231, 0.239, 0.25, 0.263, 0.277, 0.29, 0.307, 0.326]
                      KL=[0.06, 0.06, 0.06, 0.055, 0.048, 0.04, 0.032, 0.024, 0.014, 0.003]
                      XF=[1, 1, 1, 1, 1, 1, 1, 1, 1, 1]
                    SoilCrop SugarcaneSoil
                      LL=[0.23, 0.23, 0.23, 0.235, 0.242, 0.249, 0.257, 0.265, 0.274, 0.286]
                      KL=[0.06, 0.06, 0.06, 0.057, 0.053, 0.048, 0.044, 0.039, 0.033, 0.027]
                      XF=[1, 1, 1, 1, 1, 1, 1, 1, 1, 1]
                    SoilCrop MaizeSoil
                      LL=[0.23, 0.23, 0.231, 0.239, 0.25, 0.263, 0.277, 0.29, 0.307, 0.326]
                      KL=[0.06, 0.06, 0.06, 0.055, 0.048, 0.04, 0.032, 0.024, 0.014, 0.003]
                      XF=[1, 1, 1, 1, 1, 1, 1, 1, 1, 1]
                    SoilCrop SoybeanSoil
                      LL=[0.23, 0.23, 0.231, 0.239, 0.25, 0.263, 0.277, 0.29, 0.307, 0.326]
                      KL=[0.06, 0.06, 0.06, 0.055, 0.048, 0.04, 0.032, 0.024, 0.014, 0.003]
                      XF=[1, 1, 1, 1, 1, 1, 1, 1, 1, 1]
                    SoilCrop OilPalmSoil
                      LL=[0.23, 0.23, 0.23, 0.235, 0.242, 0.249, 0.257, 0.265, 0.274, 0.286]
                      KL=[0.06, 0.06, 0.06, 0.057, 0.053, 0.048, 0.044, 0.039, 0.033, 0.027]
                      XF=[1, 1, 1, 1, 1, 1, 1, 1, 1, 1]
                    SoilCrop CassavaSoil
                      LL=[0.23, 0.23, 0.231, 0.239, 0.25, 0.263, 0.277, 0.29, 0.307, 0.326]
                      KL=[0.06, 0.06, 0.06, 0.055, 0.048, 0.04, 0.032, 0.024, 0.014, 0.003]
                      XF=[1, 1, 1, 1, 1, 1, 1, 1, 1, 1]
                    SoilCrop PlantainForageSoil
                      LL=[0.23, 0.23, 0.23, 0.235, 0.242, 0.249, 0.257, 0.265, 0.274, 0.286]
                      KL=[0.06, 0.06, 0.06, 0.057, 0.053, 0.048, 0.044, 0.039, 0.033, 0.027]
                      XF=[1, 1, 1, 1, 1, 1, 1, 1, 1, 1]
                    SoilCrop SunflowerSoil
                      LL=[0.231, 0.238, 0.247, 0.256, 0.265, 0.277, 0.289, 0.301, 0.315, 0.329]
                      KL=[0.1, 0.093, 0.084, 0.075, 0.065, 0.053, 0.041, 0.029, 0.015, 0.001]
                      XF=[1, 1, 1, 1, 1, 1, 1, 1, 1, 1]
                    SoilCrop CanolaSoil
                      LL=[0.23, 0.23, 0.231, 0.239, 0.25, 0.263, 0.277, 0.29, 0.307, 0.326]
                      KL=[0.06, 0.06, 0.06, 0.055, 0.048, 0.04, 0.032, 0.024, 0.014, 0.003]
                      XF=[1, 1, 1, 1, 1, 1, 1, 1, 1, 1]
                    SoilCrop SorghumSoil
                      LL=[0.23, 0.23, 0.23, 0.236, 0.245, 0.255, 0.265, 0.275, 0.288, 0.303]
                      KL=[0.07, 0.07, 0.07, 0.066, 0.06, 0.053, 0.045, 0.039, 0.03, 0.019]
                      XF=[1, 1, 1, 1, 1, 1, 1, 1, 1, 1]
                    SoilCrop MilletSoil
                      LL=[0.23, 0.23, 0.23, 0.236, 0.245, 0.255, 0.265, 0.275, 0.288, 0.303]
                      KL=[0.07, 0.07, 0.07, 0.066, 0.06, 0.053, 0.045, 0.039, 0.03, 0.019]
                      XF=[1, 1, 1, 1, 1, 1, 1, 1, 1, 1]
                    SoilCrop PeanutSoil
                      LL=[0.23, 0.23, 0.23, 0.23, 0.238, 0.255, 0.272, 0.288, 0.309, 0.329]
                      KL=[0.06, 0.06, 0.06, 0.06, 0.055, 0.045, 0.035, 0.025, 0.012, 0.001]
                      XF=[1, 1, 1, 1, 1, 1, 1, 1, 1, 1]
                    SoilCrop BarleySoil
                      LL=[0.23, 0.23, 0.231, 0.238, 0.248, 0.259, 0.271, 0.283, 0.298, 0.315]
                      KL=[0.07, 0.07, 0.07, 0.065, 0.058, 0.049, 0.041, 0.033, 0.023, 0.01]
                      XF=[1, 1, 1, 1, 1, 1, 1, 1, 1, 1]
                    SoilCrop CottonSoil
                      LL=[0.23, 0.23, 0.23, 0.23, 0.23, 0.236, 0.247, 0.258, 0.272, 0.288]
                      KL=[0.1, 0.1, 0.1, 0.1, 0.1, 0.094, 0.083, 0.072, 0.058, 0.042]
                      XF=[1, 1, 1, 1, 1, 1, 1, 1, 1, 1]
                    SoilCrop OatsSoil
                      LL=[0.23, 0.23, 0.231, 0.239, 0.25, 0.263, 0.277, 0.29, 0.307, 0.326]
                      KL=[0.06, 0.06, 0.06, 0.055, 0.048, 0.04, 0.032, 0.024, 0.014, 0.003]
                      XF=[1, 1, 1, 1, 1, 1, 1, 1, 1, 1]
                    SoilCrop ChickpeaSoil
                      LL=[0.23, 0.23, 0.23, 0.23, 0.238, 0.253, 0.269, 0.284, 0.303, 0.325]
                      KL=[0.06, 0.06, 0.06, 0.06, 0.055, 0.046, 0.037, 0.028, 0.016, 0.003]
                      XF=[1, 1, 1, 1, 1, 1, 1, 1, 1, 1]
                    SoilCrop MungbeanSoil
                      LL=[0.23, 0.23, 0.23, 0.233, 0.25, 0.27, 0.29, 0.31, 0.329, 0.33]
                      KL=[0.06, 0.06, 0.06, 0.058, 0.048, 0.036, 0.024, 0.012, 0.001, 0]
                      XF=[1, 1, 1, 1, 1, 1, 1, 1, 1, 0]
                    SoilCrop Pigeon PeaSoil
                      LL=[0.23, 0.23, 0.23, 0.23, 0.238, 0.255, 0.272, 0.288, 0.309, 0.329]
                      KL=[0.06, 0.06, 0.06, 0.06, 0.055, 0.045, 0.035, 0.025, 0.012, 0.001]
                      XF=[1, 1, 1, 1, 1, 1, 1, 1, 1, 1]
                    SoilCrop CowpeaSoil
                      LL=[0.23, 0.23, 0.231, 0.239, 0.25, 0.263, 0.277, 0.29, 0.307, 0.326]
                      KL=[0.06, 0.06, 0.06, 0.055, 0.048, 0.04, 0.032, 0.024, 0.014, 0.003]
                      XF=[1, 1, 1, 1, 1, 1, 1, 1, 1, 1]
                    SoilCrop FababeanSoil
                      LL=[0.23, 0.23, 0.23, 0.23, 0.232, 0.244, 0.259, 0.273, 0.291, 0.312]
                      KL=[0.08, 0.08, 0.08, 0.08, 0.079, 0.069, 0.057, 0.046, 0.031, 0.014]
                      XF=[1, 1, 1, 1, 1, 1, 1, 1, 1, 1]
                    SoilCrop LucerneSoil
                      LL=[0.23, 0.23, 0.23, 0.23, 0.23, 0.23, 0.23, 0.231, 0.241, 0.255]
                      KL=[0.1, 0.1, 0.1, 0.1, 0.1, 0.1, 0.1, 0.099, 0.089, 0.075]
                      XF=[1, 1, 1, 1, 1, 1, 1, 1, 1, 1]
                    SoilCrop LupinSoil
                      LL=[0.23, 0.23, 0.231, 0.239, 0.25, 0.263, 0.277, 0.29, 0.307, 0.326]
                      KL=[0.06, 0.06, 0.06, 0.055, 0.048, 0.04, 0.032, 0.024, 0.014, 0.003]
                      XF=[1, 1, 1, 1, 1, 1, 1, 1, 1, 1]
                    SoilCrop LentilSoil
                      LL=[0.23, 0.23, 0.231, 0.239, 0.25, 0.263, 0.277, 0.29, 0.307, 0.326]
                      KL=[0.06, 0.06, 0.06, 0.055, 0.048, 0.04, 0.032, 0.024, 0.014, 0.003]
                      XF=[1, 1, 1, 1, 1, 1, 1, 1, 1, 1]
                    SoilCrop TriticaleSoil
                      LL=[0.23, 0.23, 0.237, 0.251, 0.266, 0.285, 0.303, 0.321, 0.33, 0.33]
                      KL=[0.07, 0.07, 0.065, 0.056, 0.045, 0.032, 0.019, 0.006, 0, 0]
                      XF=[1, 1, 1, 1, 1, 1, 1, 1, 0, 0]
                    SoilCrop EucalyptusSoil
                      LL=[0.23, 0.23, 0.23, 0.231, 0.232, 0.233, 0.234, 0.235, 0.236, 0.237]
                      KL=[0.08, 0.08, 0.08, 0.079, 0.079, 0.078, 0.077, 0.076, 0.075, 0.074]
                      XF=[1, 1, 1, 1, 1, 1, 1, 1, 1, 1]
                    SoilCrop GliricidiaSoil
                      LL=[0.23, 0.23, 0.23, 0.231, 0.233, 0.235, 0.237, 0.239, 0.242, 0.245]
                      KL=[0.08, 0.08, 0.08, 0.079, 0.077, 0.076, 0.074, 0.072, 0.07, 0.068]
                      XF=[1, 1, 1, 1, 1, 1, 1, 1, 1, 1]
                    SoilCrop TeffSoil
                      LL=[0.23, 0.23, 0.231, 0.239, 0.25, 0.263, 0.277, 0.29, 0.307, 0.326]
                      KL=[0.06, 0.06, 0.06, 0.055, 0.048, 0.04, 0.032, 0.024, 0.014, 0.003]
                      XF=[1, 1, 1, 1, 1, 1, 1, 1, 1, 1]
                  WaterBalance SoilWater: SummerDate=1-nov; SummerU=6; SummerCona=6; WinterDate=1-apr; WinterU=4; WinterCona=2.5; DiffusConst=9479.57; DiffusSlope=-3.19; Salb=0.12; CN2Bare=73; CNRed=20; CNCov=0; PSIDul=-100; Thickness=[150, 150, 150, 150, 200, 200, 200, 200, 300, 300]
                    SWCON=[0.186, 0.169, 0.159, 0.149, 0.113, 0.111, 0.11, 0.11, 0.077, 0.077]
                  Organic: FOMCNRatio=40; CarbonUnits=Total
                    Thickness  Carbon  SoilCNRatio  FBiom  FInert  FOM
                    150        3.86    11.9         0.04   0.497   84.9016
                    150        2.417   11.9         0.031  0.725   67.7953
                    150        2.018   11.9         0.014  0.844   54.1356
                    150        1.862   11.9         0.01   0.912   43.2282
                    200        1.734   11.9         0.01   0.974   32.0242
                    200        1.634   11.9         0.01   0.99    23.7241
                    200        1.575   11.9         0.01   0.99    17.5753
                    200        1.555   11.9         0.01   0.99    13.0201
                    300        1.531   11.9         0.01   0.99    8.30197
                    300        1.502   11.9         0.01   0.99    5.29357
                  Chemical: Thickness=[150, 150, 150, 150, 200, 200, 200, 200, 300, 300]; PH=[5.57, 5.55, 5.6, 5.6, 5.62, 5.68, 5.7, 5.7, 5.7, 5.7]; PHUnits=Water
                  Nutrient
                  CERESSoilTemperature Temperature
                  Solute NO3: InitialValuesUnits=ppm; WaterTableConcentration=0; D0=0; DepthConstant=0; MaxDepthSoluteAccessible=0; RunoffEffectivenessAtMovingSolute=0; MaxEffectiveRunoff=0
                  Solute NH4: InitialValuesUnits=ppm; WaterTableConcentration=0; D0=0; DepthConstant=0; MaxDepthSoluteAccessible=0; RunoffEffectivenessAtMovingSolute=0; MaxEffectiveRunoff=0
                  Solute Urea: same as Sensibility.Temperature Response.GuatemalaTransect.Factors.Permutation.Cell.15043_-91905.Synthetic Soil Derived from ISRIC SoilGrids.Urea
        Simulation Rwanda Transect: same as Sensibility.Temperature Response.GuatemalaTransect.GuatemalaTransect
    Folder CuttingResponse
      Memo
        This sensibility test shows that biomass developoment is higher with a lower frequency of pruning and lower stump height of pruning, as showing in [duguma1988effect]. This effect occurs because regrowth of shoots after pruning depends on carbohydrate remobilisation from roots and stumps. These reserves can be later replenished and added to once enough carbohydrate production and storage is reached in regrown shoots. This test applies these treatments to a hypothetical stand of gliricidia grown at the Makoka site in Malawi. In this test, cutting was done in factorial combinations of frequency (6-, 3-, and 1-monthly) and stump height (approximated by specifying the weight of stem remaining: 100 g, 50 g, or 25 g), while 10 g of leaf were left after pruning in all treatment combinations. These results may differ to those of [duguma1988effect] due to to the much warmer climate at Ibadan, Nigeria, compared to Makoka, Malawi, and weights of stump remaining (which was not reported by [duguma1988effect]). Severe water stress was predicted to limit gliricidia growth in late 2005.
      Experiment MakokaDuguma
        Factors
          Factor Treat: Specification=[GliricidiaManagement]
            Operations F6H100
              2003-12-15  [Gliricidia].Sow(population: 0.74, cultivar: GliricidiaYoung,depth: 100, rowSpacing: 1500);
              2004-06-15  [CuttingManagement].Script.DoCut(10, 100);
              2004-12-15  [CuttingManagement].Script.DoCut(10, 100);
              2005-06-15  [CuttingManagement].Script.DoCut(10, 100);
              2005-12-15  [CuttingManagement].Script.DoCut(10, 100);
              2006-06-15  [CuttingManagement].Script.DoCut(10, 100);
              2006-12-15  [CuttingManagement].Script.DoCut(10, 100);
            Operations F6H50
              2003-12-15  [Gliricidia].Sow(population: 0.74, cultivar: GliricidiaYoung,depth: 100, rowSpacing: 1500);
              2004-06-15  [CuttingManagement].Script.DoCut(10, 50);
              2004-12-15  [CuttingManagement].Script.DoCut(10, 50);
              2005-06-15  [CuttingManagement].Script.DoCut(10, 50);
              2005-12-15  [CuttingManagement].Script.DoCut(10, 50);
              2006-06-15  [CuttingManagement].Script.DoCut(10, 50);
              2006-12-15  [CuttingManagement].Script.DoCut(10, 50);
            Operations F6H25
              2003-12-15  [Gliricidia].Sow(population: 0.74, cultivar: GliricidiaYoung,depth: 100, rowSpacing: 1500);
              2004-06-15  [CuttingManagement].Script.DoCut(10, 25);
              2004-12-15  [CuttingManagement].Script.DoCut(10, 25);
              2005-06-15  [CuttingManagement].Script.DoCut(10, 25);
              2005-12-15  [CuttingManagement].Script.DoCut(10, 25);
              2006-06-15  [CuttingManagement].Script.DoCut(10, 25);
              2006-12-15  [CuttingManagement].Script.DoCut(10, 25);
            Operations F3H100
              2003-12-15  [Gliricidia].Sow(population: 0.74, cultivar: GliricidiaYoung,depth: 100, rowSpacing: 1500);
              2004-03-15  [CuttingManagement].Script.DoCut(10, 100);
              2004-06-15  [CuttingManagement].Script.DoCut(10, 100);
              2004-09-15  [CuttingManagement].Script.DoCut(10, 100);
              2004-12-15  [CuttingManagement].Script.DoCut(10, 100);
              2005-03-15  [CuttingManagement].Script.DoCut(10, 100);
              2005-06-15  [CuttingManagement].Script.DoCut(10, 100);
              2005-09-15  [CuttingManagement].Script.DoCut(10, 100);
              2005-12-15  [CuttingManagement].Script.DoCut(10, 100);
              2006-03-15  [CuttingManagement].Script.DoCut(10, 100);
              2006-06-15  [CuttingManagement].Script.DoCut(10, 100);
              2006-09-15  [CuttingManagement].Script.DoCut(10, 100);
              2006-12-15  [CuttingManagement].Script.DoCut(10, 100);
            Operations F3H50
              2003-12-15  [Gliricidia].Sow(population: 0.74, cultivar: GliricidiaYoung,depth: 100, rowSpacing: 1500);
              2004-03-15  [CuttingManagement].Script.DoCut(10, 50);
              2004-06-15  [CuttingManagement].Script.DoCut(10, 50);
              2004-09-15  [CuttingManagement].Script.DoCut(10, 50);
              2004-12-15  [CuttingManagement].Script.DoCut(10, 50);
              2005-03-15  [CuttingManagement].Script.DoCut(10, 50);
              2005-06-15  [CuttingManagement].Script.DoCut(10, 50);
              2005-09-15  [CuttingManagement].Script.DoCut(10, 50);
              2005-12-15  [CuttingManagement].Script.DoCut(10, 50);
              2006-03-15  [CuttingManagement].Script.DoCut(10, 50);
              2006-06-15  [CuttingManagement].Script.DoCut(10, 50);
              2006-09-15  [CuttingManagement].Script.DoCut(10, 50);
              2006-12-15  [CuttingManagement].Script.DoCut(10, 50);
            Operations F3H25
              2003-12-15  [Gliricidia].Sow(population: 0.74, cultivar: GliricidiaYoung,depth: 100, rowSpacing: 1500);
              2004-03-15  [CuttingManagement].Script.DoCut(10, 25);
              2004-06-15  [CuttingManagement].Script.DoCut(10, 25);
              2004-09-15  [CuttingManagement].Script.DoCut(10, 25);
              2004-12-15  [CuttingManagement].Script.DoCut(10, 25);
              2005-03-15  [CuttingManagement].Script.DoCut(10, 25);
              2005-06-15  [CuttingManagement].Script.DoCut(10, 25);
              2005-09-15  [CuttingManagement].Script.DoCut(10, 25);
              2005-12-15  [CuttingManagement].Script.DoCut(10, 25);
              2006-03-15  [CuttingManagement].Script.DoCut(10, 25);
              2006-06-15  [CuttingManagement].Script.DoCut(10, 25);
              2006-09-15  [CuttingManagement].Script.DoCut(10, 25);
              2006-12-15  [CuttingManagement].Script.DoCut(10, 25);
            Operations F1H100
              2003-12-15  [Gliricidia].Sow(population: 0.74, cultivar: GliricidiaYoung,depth: 100, rowSpacing: 1500);
              2004-01-15  [CuttingManagement].Script.DoCut(10, 100);
              2004-02-15  [CuttingManagement].Script.DoCut(10, 100);
              2004-03-15  [CuttingManagement].Script.DoCut(10, 100);
              2004-04-15  [CuttingManagement].Script.DoCut(10, 100);
              2004-05-15  [CuttingManagement].Script.DoCut(10, 100);
              2004-06-15  [CuttingManagement].Script.DoCut(10, 100);
              2004-07-15  [CuttingManagement].Script.DoCut(10, 100);
              2004-08-15  [CuttingManagement].Script.DoCut(10, 100);
              2004-09-15  [CuttingManagement].Script.DoCut(10, 100);
              2004-10-15  [CuttingManagement].Script.DoCut(10, 100);
              2004-11-15  [CuttingManagement].Script.DoCut(10, 100);
              2004-12-15  [CuttingManagement].Script.DoCut(10, 100);
              2005-01-15  [CuttingManagement].Script.DoCut(10, 100);
              2005-02-15  [CuttingManagement].Script.DoCut(10, 100);
              2005-03-15  [CuttingManagement].Script.DoCut(10, 100);
              2005-04-15  [CuttingManagement].Script.DoCut(10, 100);
              2005-05-15  [CuttingManagement].Script.DoCut(10, 100);
              2005-06-15  [CuttingManagement].Script.DoCut(10, 100);
              2005-07-15  [CuttingManagement].Script.DoCut(10, 100);
              2005-08-15  [CuttingManagement].Script.DoCut(10, 100);
              2005-09-15  [CuttingManagement].Script.DoCut(10, 100);
              2005-10-15  [CuttingManagement].Script.DoCut(10, 100);
              2005-11-15  [CuttingManagement].Script.DoCut(10, 100);
              2005-12-15  [CuttingManagement].Script.DoCut(10, 100);
              2006-01-15  [CuttingManagement].Script.DoCut(10, 100);
              2006-02-15  [CuttingManagement].Script.DoCut(10, 100);
              2006-03-15  [CuttingManagement].Script.DoCut(10, 100);
              2006-04-15  [CuttingManagement].Script.DoCut(10, 100);
              2006-05-15  [CuttingManagement].Script.DoCut(10, 100);
              2006-06-15  [CuttingManagement].Script.DoCut(10, 100);
              2006-07-15  [CuttingManagement].Script.DoCut(10, 100);
              2006-08-15  [CuttingManagement].Script.DoCut(10, 100);
              2006-09-15  [CuttingManagement].Script.DoCut(10, 100);
              2006-10-15  [CuttingManagement].Script.DoCut(10, 100);
              2006-11-15  [CuttingManagement].Script.DoCut(10, 100);
              2006-12-15  [CuttingManagement].Script.DoCut(10, 100);
            Operations F1H50
              2003-12-15  [Gliricidia].Sow(population: 0.74, cultivar: GliricidiaYoung,depth: 100, rowSpacing: 1500);
              2004-01-15  [CuttingManagement].Script.DoCut(10, 50);
              2004-02-15  [CuttingManagement].Script.DoCut(10, 50);
              2004-03-15  [CuttingManagement].Script.DoCut(10, 50);
              2004-04-15  [CuttingManagement].Script.DoCut(10, 50);
              2004-05-15  [CuttingManagement].Script.DoCut(10, 50);
              2004-06-15  [CuttingManagement].Script.DoCut(10, 50);
              2004-07-15  [CuttingManagement].Script.DoCut(10, 50);
              2004-08-15  [CuttingManagement].Script.DoCut(10, 50);
              2004-09-15  [CuttingManagement].Script.DoCut(10, 50);
              2004-10-15  [CuttingManagement].Script.DoCut(10, 50);
              2004-11-15  [CuttingManagement].Script.DoCut(10, 50);
              2004-12-15  [CuttingManagement].Script.DoCut(10, 50);
              2005-01-15  [CuttingManagement].Script.DoCut(10, 50);
              2005-02-15  [CuttingManagement].Script.DoCut(10, 50);
              2005-03-15  [CuttingManagement].Script.DoCut(10, 50);
              2005-04-15  [CuttingManagement].Script.DoCut(10, 50);
              2005-05-15  [CuttingManagement].Script.DoCut(10, 50);
              2005-06-15  [CuttingManagement].Script.DoCut(10, 50);
              2005-07-15  [CuttingManagement].Script.DoCut(10, 50);
              2005-08-15  [CuttingManagement].Script.DoCut(10, 50);
              2005-09-15  [CuttingManagement].Script.DoCut(10, 50);
              2005-10-15  [CuttingManagement].Script.DoCut(10, 50);
              2005-11-15  [CuttingManagement].Script.DoCut(10, 50);
              2005-12-15  [CuttingManagement].Script.DoCut(10, 50);
              2006-01-15  [CuttingManagement].Script.DoCut(10, 50);
              2006-02-15  [CuttingManagement].Script.DoCut(10, 50);
              2006-03-15  [CuttingManagement].Script.DoCut(10, 50);
              2006-04-15  [CuttingManagement].Script.DoCut(10, 50);
              2006-05-15  [CuttingManagement].Script.DoCut(10, 50);
              2006-06-15  [CuttingManagement].Script.DoCut(10, 50);
              2006-07-15  [CuttingManagement].Script.DoCut(10, 50);
              2006-08-15  [CuttingManagement].Script.DoCut(10, 50);
              2006-09-15  [CuttingManagement].Script.DoCut(10, 50);
              2006-10-15  [CuttingManagement].Script.DoCut(10, 50);
              2006-11-15  [CuttingManagement].Script.DoCut(10, 50);
              2006-12-15  [CuttingManagement].Script.DoCut(10, 50);
            Operations F1H25
              2003-12-15  [Gliricidia].Sow(population: 0.74, cultivar: GliricidiaYoung,depth: 100, rowSpacing: 1500);
              2004-01-15  [CuttingManagement].Script.DoCut(10, 25);
              2004-02-15  [CuttingManagement].Script.DoCut(10, 25);
              2004-03-15  [CuttingManagement].Script.DoCut(10, 25);
              2004-04-15  [CuttingManagement].Script.DoCut(10, 25);
              2004-05-15  [CuttingManagement].Script.DoCut(10, 25);
              2004-06-15  [CuttingManagement].Script.DoCut(10, 25);
              2004-07-15  [CuttingManagement].Script.DoCut(10, 25);
              2004-08-15  [CuttingManagement].Script.DoCut(10, 25);
              2004-09-15  [CuttingManagement].Script.DoCut(10, 25);
              2004-10-15  [CuttingManagement].Script.DoCut(10, 25);
              2004-11-15  [CuttingManagement].Script.DoCut(10, 25);
              2004-12-15  [CuttingManagement].Script.DoCut(10, 25);
              2005-01-15  [CuttingManagement].Script.DoCut(10, 25);
              2005-02-15  [CuttingManagement].Script.DoCut(10, 25);
              2005-03-15  [CuttingManagement].Script.DoCut(10, 25);
              2005-04-15  [CuttingManagement].Script.DoCut(10, 25);
              2005-05-15  [CuttingManagement].Script.DoCut(10, 25);
              2005-06-15  [CuttingManagement].Script.DoCut(10, 25);
              2005-07-15  [CuttingManagement].Script.DoCut(10, 25);
              2005-08-15  [CuttingManagement].Script.DoCut(10, 25);
              2005-09-15  [CuttingManagement].Script.DoCut(10, 25);
              2005-10-15  [CuttingManagement].Script.DoCut(10, 25);
              2005-11-15  [CuttingManagement].Script.DoCut(10, 25);
              2005-12-15  [CuttingManagement].Script.DoCut(10, 25);
              2006-01-15  [CuttingManagement].Script.DoCut(10, 25);
              2006-02-15  [CuttingManagement].Script.DoCut(10, 25);
              2006-03-15  [CuttingManagement].Script.DoCut(10, 25);
              2006-04-15  [CuttingManagement].Script.DoCut(10, 25);
              2006-05-15  [CuttingManagement].Script.DoCut(10, 25);
              2006-06-15  [CuttingManagement].Script.DoCut(10, 25);
              2006-07-15  [CuttingManagement].Script.DoCut(10, 25);
              2006-08-15  [CuttingManagement].Script.DoCut(10, 25);
              2006-09-15  [CuttingManagement].Script.DoCut(10, 25);
              2006-10-15  [CuttingManagement].Script.DoCut(10, 25);
              2006-11-15  [CuttingManagement].Script.DoCut(10, 25);
              2006-12-15  [CuttingManagement].Script.DoCut(10, 25);
        Simulation MakokaDugumaBase
          Clock: Start=2003-12-01; End=2006-12-31
          Summary SummaryFile
          Weather: FileName=Makoka.met
          SoilArbitrator Soil Arbitrator
          Zone: Area=1; Slope=0; AspectAngle=0; Altitude=50
            Soil Makoka Soil: SoilType=sand; NearestTown=Makoka; Country=Malawi; Latitude=-15.25; Longitude=37.25
              Physical
                Thickness  BD    AirDry  LL15  DUL   SAT
                200        1.42  0.05    0.08  0.35  0.45
                200        1.45  0.05    0.08  0.35  0.45
                200        1.47  0.05    0.08  0.33  0.44
                200        1.31  0.05    0.08  0.33  0.44
                200        1.42  0.05    0.08  0.33  0.44
                200        1.38  0.05    0.08  0.32  0.44
                200        1.32  0.05    0.08  0.31  0.44
                200        1.3   0.05    0.08  0.3   0.44
                200        1.31  0.05    0.08  0.3   0.44
                200        1.31  0.05    0.08  0.29  0.44
                500        1.31  0.05    0.08  0.29  0.44
                500        1.31  0.05    0.08  0.29  0.44
                SoilCrop MaizeSoil
                  LL=[0.1, 0.1, 0.1, 0.1, 0.15, 0.15, 0.15, 0.2, 0.2, 0.2, 0.2, 0.2]
                  KL=[0.08, 0.08, 0.08, 0.08, 0.06, 0.04, 0.03, 0.02, 0.02, 0.02, 0, 0]
                  XF=[1, 0.9, 0.8, 0.7, 0.6, 0.6, 0, 0, 0, 0, 0, 0]
                SoilCrop GliricidiaSoil
                  LL=[0.05, 0.05, 0.05, 0.05, 0.05, 0.05, 0.05, 0.05, 0.05, 0.05, 0.05, 0.05]
                  KL=[0.08, 0.08, 0.08, 0.08, 0.06, 0.04, 0.03, 0.02, 0.02, 0.02, 0.02, 0.02]
                  XF=[1, 1, 1, 1, 1, 1, 1, 1, 1, 0, 0, 0]
              WaterBalance SoilWater: same as Validation.Makoka.MakokaBase.Zone.Makoka Soil.SoilWater
              Organic: same as Validation.Makoka.MakokaBase.Zone.Makoka Soil.Organic
              Chemical: Thickness=[200, 200, 200, 200, 200, 200, 200, 200, 200, 200]; PH=[5.9, 5.6, 5.8, 5.9, 6.1, 6.3, 6.2, 6.4, 6.3, 5.9]; PHUnits=Water
              Water: Thickness=[200, 200, 200, 200, 200, 200, 200, 200, 200, 200, 1000]; InitialPAWmm=482; RelativeTo=LL15; FilledFromTop=false
                InitialValues=[0.18, 0.18, 0.18, 0.2, 0.23, 0.23, 0.26, 0.26, 0.27, 0.27, 0.27]
              CERESSoilTemperature Temperature
              Nutrient
              Solute NO3: same as Validation.Makoka.MakokaBase.Zone.Makoka Soil.NO3
              Solute NH4: same as Validation.Makoka.MakokaBase.Zone.Makoka Soil.NH4
              Solute Urea: same as Validation.Makoka.MakokaBase.Zone.Makoka Soil.Urea
            MicroClimate: a_interception=0; b_interception=0; c_interception=0; d_interception=0; SoilHeatFluxFraction=0.4; MinimumHeightDiffForNewLayer=0; NightInterceptionFraction=0.5; ReferenceHeight=2
            Report GliricidiaDailyReport: same as Validation.Makoka.MakokaBase.Zone.GliricidiaDailyReport
            Report GlircidiaAnnualOutput: EventNames=[Clock].EndOfYear
              VariableNames:
                [Clock].Today
                [Clock].Today.Year
                [Gliricidia].Age
                [Gliricidia].LAI
                sum of [Gliricidia].Nodule.NFixed from 1-Jan to 31-Dec as AnnualNFixed
            Fertiliser
            SurfaceOrganicMatter: InitialResidueName=maize_stubble; InitialResidueType=maize; InitialResidueMass=0; InitialStandingFraction=0; InitialCPR=400; InitialCNR=60
            Plant Gliricidia
            Operations
              // 2001-01-15  [Maize].Sow(population: 1, cultivar: "NSCM_41", depth: 30, rowSpacing: 750);
              // 2001-02-07  [Fertiliser].Apply(Amount: 0, Type: Fertiliser.Types.NO3N)
            Operations GliricidiaManagement
            Manager CuttingManagement: same as Validation.Makoka.MakokaBase.Zone.CuttingManagement
    Folder StockMassBalance
      Memo
        This sensibility test performs a livestock grazing mass balance check.

        The MassBalanceCalculations script is intentionally before Stock in the simulation tree so that it will be called
        before the STOCK model does its calculations for the day AND after the plant model has updated its biomass for the day. The script then
        stores the plant biomass before and after stock calculations its daily variables. It then calculates the amount of plant biomass removed:

        ```PlantBiomassRemoved = PlantBiomassBeforeStock - PlantBiomassAfterStock;```

        It then subtracts the animal intake.

        ```Lost = PlantBiomassRemoved - Intake;```

        The Lost variable (which is output) should always be zero. The script will throw an exception if this isn't the case.

        The graph below shows the biomass removed from the plant is the same as the plant biomass consumed by the animal which results in a
        mass balance variable equal to zero.
      Simulation MakokaDugumaStock
        Clock: Start=2003-12-01; End=2004-06-30
        Summary SummaryFile
        Weather: FileName=Makoka.met
        SoilArbitrator Soil Arbitrator
        Manager MassBalanceCalculations
```csharp
using Models.Soils.Nutrients;
using System;
using Models;
using Models.Core;
using Models.Utilities;
using Models.Interfaces;
using Models.GrazPlan;
using APSIM.Shared.Utilities;
using System.Xml.Serialization;
using Models.PMF;
using Models.PMF.Organs;
using Models.Soils;
using System.Collections;
using System.Collections.Generic;
using System.Linq;
using Models.AgPasture;
using System.Diagnostics;
using Models.PMF.Interfaces;
using Models.Surface;
using Models.ForageDigestibility;

namespace Models
{

    [Serializable]
    public class Script : Model
    {
        [Link] Clock clock;
        [Link] Forages forages;
        [Link] Stock animals;
        [Link] Plant plant;
        [Link] ISummary summary;

		private bool stockInPaddock; 

        public Biomass PlantBiomassBeforeStock { get; set; }
        public Biomass PlantBiomassAfterStock { get; set; }
        public Biomass PlantBiomassRemoved { get; set; }
        public Biomass Intake { get; set; }
        public Biomass Lost { get; set; }
        public List<string> ForageNames { get;set;}

		// Calculate total above ground forage.
		private Biomass TotalForage
		{
			get
			{
				Biomass totalForage = new Biomass();
            	foreach (var forage in forages.ModelsWithDigestibleBiomass)
            		foreach (var forageMaterial in forage.Material.Where(m => m.Name != "Residue"))
        				totalForage += forageMaterial.Consumable;
            	return totalForage;
			}
		}
		
        // Start of simulation
        [EventSubscribe("StartOfSimulation")]
        private void OnStart(object sender, EventArgs e)
        {
            //ForageNames = forages.Select(f=>f.Name).ToList();
            PlantBiomassBeforeStock = new Biomass();
            PlantBiomassAfterStock = new Biomass();
            PlantBiomassRemoved = new Biomass();
            Intake = new Biomass();
            Lost = new Biomass();
            Debugger.Break();
        }

        // Because this script is before Stock in the simulation tree, this will be called
        // before the STOCK model does its calculations for the day AND after the plant
        // model has updated its biomass for the day.
        [EventSubscribe("DoStock")]
        private void OnDoStock(object sender, EventArgs e)
        {
        	stockInPaddock = animals.IntakeAll.Weight > 0;
        	if (stockInPaddock)
        	{
            	PlantBiomassBeforeStock = TotalForage;
        	}
        }

        // Called after all models have performed their calculations for the day.
        [EventSubscribe("DoManagementCalculations")]
        private void OnDoManagementCalculations(object sender, EventArgs e)
        {
        	if (stockInPaddock)
        	{
		        PlantBiomassAfterStock = TotalForage;
		        Intake = new Biomass()
		        {
		            StructuralWt = animals.IntakeAll.Weight / 10,  // kg/ha to g/m2
		            StructuralN = animals.IntakeAll.N / 10,        // kg/ha to g/m2
		        };

	            PlantBiomassRemoved = PlantBiomassBeforeStock - PlantBiomassAfterStock;

		        // balance calculations
		        Lost = PlantBiomassRemoved - Intake; 
		        
		        if (!MathUtilities.FloatsAreEqual(Lost.Wt, 0))
		            throw new Exception("Mass balance error: Forage mass removed is not equal to animal intake.");
		            
		        // DeanH - after many hours, I cannot get the N mass balance right. Does Stock maintain N balance?
		        if (!MathUtilities.FloatsAreEqual(Lost.N, 0, 0.001))
		            throw new Exception("Mass balance error: N balance error.");

			}
        }
    }
}
```
        Stock: RandSeed=9999
        Forages
          Parameters:
            Name                          IsLive  DigestibilityString  FractionConsumable  MinimumAmount  UseDigestibilityFromModel
            SurfaceOrganicMatter.Residue  true    0                    0                   0              false
            SurfaceOrganicMatter.Residue  false   0                    0                   0              false
            Gliricidia.Leaf               true    0.7                  1                   100            false
            Gliricidia.Leaf               false   0.3                  1                   0              false
            Gliricidia.Root               true    0                    0                   0              false
            Gliricidia.Root               false   0                    0                   0              false
            Gliricidia.Stem               true    0.7                  1                   100            false
            Gliricidia.Stem               false   0.3                  1                   0              false
            Gliricidia.Nodule             true    0.7                  1                   100            false
            Gliricidia.Nodule             false   0.3                  1                   0              false
        Supplement: SpoilageTime=0
          Stores:
            {Name=fodder, Stored=0, IsRoughage=true, DMContent=0.85, DMD=0, MEContent=0, CPConc=0, ProtDg=0, PConc=0, SConc=0, EEConc=0, ADIP2CP=0, AshAlk=0, MaxPassage=0}
        Manager GrazeForageCrop
          Genotype = Friesian
          Sex = Female
          Age = 6
          Weight = 100
          Pregnant = 0
          Lactating = 0
          YoungNumber = 0
          YoungWt = 0
          StockingRate = 1
          CurrentLocation = Zone
          PreGrazingDM = 2800
          PostGrazingDM = 50
          MinGrazingDays = 0
          DoNoGrazingWindow = False
          NoGrazeStart = 15-jun
          NoGrazeEnd = 31-jul
          SupplementName =
          SupplementFirst = False
          SupplementEveryDay = 0
          SupplementOnPastureMass = 0
          TriggerPastureMass = 2100
```csharp
using Models.PMF.Interfaces;
using System.Diagnostics;
using Models.AgPasture;
using System.Linq;
using System.Collections.Generic;
using System.Collections;
using Models.Soils;
using Models.PMF;
using System.Xml.Serialization;
using APSIM.Shared.Utilities;
using Models.GrazPlan;
using Models.Utilities;
using Models.Core;
using Models;
using Models.ForageDigestibility;
using System;

namespace Models
{

    [Serializable]
    public class Script : Model
    {
        [Link] Clock clock;
        [Link] Stock stock;
        [Link] Supplement supplement;
        [Link] List<Zone> paddocks;
        [Link] ISummary summary;
        [Link] Simulation farm;
        [Link] Forages forages;

        private int CurrentGroupNum = 1;    // animal group number
        private int CurrentLocationNum { get; set; }

        [Separator("Stock type info, the same type of stock are brought onto the paddock at each grazing")]

        [Description("Stock: genotype (e.g. Small Merino, Angus, Friesian):")] 
        [Display(Values="GetGenotypes")]
        public string Genotype { get; set; }

        [Description("Stock: sex (Female, Male, Castrate):")] 
        public ReproductiveType Sex { get; set; }

        [Description("Stock: age (months):")] 
        public double Age { get; set; }

        [Description("Stock: weight (kg liveweight /head):")] 
        public double Weight { get; set; }

        [Description("Stock: fertility status (0 if non-pregnant or days since conception):")] 
        public int Pregnant { get; set; }

        [Description("Stock: lactation status (0 if non-lactating or days since parturition):")]
        public int Lactating { get; set; }

        [Description("Stock: number of unweaned young:")]
        public int YoungNumber { get; set; }

        [Description("Stock: weight of unweaned young:")] 
        public double YoungWt { get; set; }

        [Separator("Grazing event information")]

        [Description("Paddock stocking rate (head/ha): ")] 
        public double StockingRate { get; set; }

        [Description("Initial location of the cows (give either the paddock name or 'Away'): ")] 
        public string CurrentLocation { get; set; }

        [Description("Standing biomass at which to bring the stock into the simulation (kg DM/ha): ")] 
        public double PreGrazingDM { get; set; }

        [Description("Standing biomass at which to exit  stock from the simulation (kg DM/ha): ")] 
        public double PostGrazingDM { get; set; }

        [Description("Don't move the stock onto the crop unless there is approx. X days of grazable forage available: ")] 
        public int MinGrazingDays { get; set; }

        [Description("Implement a no-grazing window? (tick for yes): ")] 
        public bool DoNoGrazingWindow { get; set; }

        [Description("Start of the no-grazing window (dd-MMM)")] 
        public string NoGrazeStart { get; set; }

        [Description("End of the no-grazing window (dd-MMM)")] 
        public string NoGrazeEnd { get; set; }

        [Separator("Supplementary feeding")]

        [Description("Name of the supplement to feed: ")] 
        public string SupplementName { get; set; }

        [Description("Feed the supplement first (i.e. before the new forage is available to the stock)?: ")] 
        public bool SupplementFirst { get; set; }

        [Description("Amount of supplementary feeding offered every day (kg DM /head /day): ")] 
        public double SupplementEveryDay { get; set; }

        [Description("Additional amount of supplement offered when available biomass is low (kg DM /head /day): ")] 
        public double SupplementOnPastureMass { get; set; }

        [Description("Trigger biomass for above rule (kg DM /ha): ")] 
        public double TriggerPastureMass { get; set; }

        public int NumStock { get; set; }
        public bool GrazingSeasonIsOpen { get; set; } // number of cows on the whole farm
        public double HarvestableBiomass { get; set; }

        // Return a list of genotypes to the properties tab.
        public string[] GetGenotypes()
        {
            if (stock != null)
                return stock.Genotypes.Names.ToArray();
            return null;
        }

        [EventSubscribe("StartOfSimulation")]
        private void OnStartOfSimulation(object sender, EventArgs e)
        {

            //Debugger.Break();

            summary.WriteMessage(this, "Initialising the paddock information", MessageType.Diagnostic);

            NumStock = (int)(Math.Round(StockingRate * farm.Area, 0));

            if ((CurrentLocation.ToLower() != "away") && (NumStock > 0))
            {
                BuyStock();
                stock.Move(CurrentLocation);
                summary.WriteMessage(this, " The Stock have been moved to " + CurrentLocation, MessageType.Diagnostic);
            }

            summary.WriteMessage(this, "     The number of animals has been rounded to " + NumStock + " from " + (StockingRate * farm.Area), MessageType.Diagnostic);
            summary.WriteMessage(this, "     The animals will begin in " + CurrentLocation + " which is paddock number " + CurrentLocationNum + " in the simulation", MessageType.Diagnostic);
            summary.WriteMessage(this, "     The area of the whole farm is " + farm.Area + " ha", MessageType.Diagnostic);

        }

        [EventSubscribe("DoManagement")]
        private void OnDoManagement(object sender, EventArgs e)
        {
            GrazingSeasonIsOpen = true;
            if (DoNoGrazingWindow)
                GrazingSeasonIsOpen = !DateUtilities.WithinDates(NoGrazeStart, clock.Today, NoGrazeEnd);

            bool sellSomeStock = false;
            if (!GrazingSeasonIsOpen)
                sellSomeStock = true;

            // Calculate forage mass in the paddock
            HarvestableBiomass = 0.0;
            foreach (var forage in forages.ModelsWithDigestibleBiomass)
                foreach (var forageMaterial in forage.Material)
                    HarvestableBiomass += forageMaterial.Consumable.Wt;
            HarvestableBiomass *= 10;  // Convert to kg/ha

            if (HarvestableBiomass <= PostGrazingDM)
                sellSomeStock = true;

            if (CurrentLocation == "Away")
                sellSomeStock = false;

            double minFodder = 0.03 * MinGrazingDays * NumStock * Weight; // The 0.03 is the propostion of body mass that the stock might eat
            if (CurrentLocation == "Away" && NumStock > 0 && (HarvestableBiomass >= PreGrazingDM) && HarvestableBiomass >= (PostGrazingDM + minFodder) && GrazingSeasonIsOpen)
            {
                CurrentLocation = paddocks[0].Name;
                CurrentLocationNum = paddocks[0].Index;
                BuyStock();
                stock.Move(CurrentLocation);
                summary.WriteMessage(this, "     Buying stock ", MessageType.Diagnostic);
            }

            if (sellSomeStock)
            {
                CurrentLocation = "Away";
                CurrentLocationNum = -1;
                SellStock();
                summary.WriteMessage(this, "     Selling stock ", MessageType.Diagnostic);
            }

            if (CurrentLocation != "Away")
            {
                if (SupplementEveryDay > 0)
                {
                    double silageOnHand = supplement.Stores[2 - 1].Stored;
                    if (silageOnHand < SupplementEveryDay * stock.NumberAll)
                    {
                        supplement.Buy(SupplementEveryDay * 30.0 * stock.NumberAll, SupplementName);  // i.e. 1 months worth
                        summary.WriteMessage(this, "SupplementEveryDay: Buying " + SupplementName + " of total amount : " + (SupplementEveryDay * 90 * stock.NumberAll) + " kg DM", MessageType.Diagnostic);
                    }
                    supplement.Feed(SupplementName, SupplementEveryDay * stock.NumberAll, CurrentLocation, SupplementFirst);
                }

                if (SupplementOnPastureMass > 0 && HarvestableBiomass <= TriggerPastureMass)
                {
                    double silageOnHand = supplement.Stores[2 - 1].Stored;
                    if (silageOnHand < SupplementOnPastureMass * stock.NumberAll)
                    {
                        supplement.Buy(SupplementOnPastureMass * 30.0 * stock.NumberAll, SupplementName);  // i.e. 1 months worth
                        summary.WriteMessage(this, "SupplementOnBiomass: Buying " + SupplementName + " of total amount : " + (SupplementOnPastureMass * 90 * stock.NumberAll) + " kg DM", MessageType.Diagnostic);
                    }
                    supplement.Feed(SupplementName, SupplementOnPastureMass * stock.NumberAll, CurrentLocation, SupplementFirst);
                }
            }
        }


        public void BuyStock()
        {
            CurrentGroupNum = stock.NoGroups + 1;
            StockBuy purchase = new StockBuy();
            purchase.Genotype = Genotype;
            purchase.Number = NumStock;
            purchase.Sex = Sex;
            purchase.Age = Age;       // age in months
            purchase.Weight = Weight;  // live weight in kg
            purchase.UseTag = CurrentGroupNum + 1;
            purchase.MatedTo = purchase.Genotype;
            purchase.Pregnant = Pregnant;  // days pregnant, 0 = non pregnant, 1 = pregnant
            purchase.Lactating = Lactating;  // 0 for dry, 1 for lactating
            purchase.NumYoung = YoungNumber;
            purchase.YoungWt = YoungWt;

            stock.Buy(purchase);
        }

        public void SellStock()
        {
            int NumGroups = stock.NoGroups;

            NumGroups = stock.NoGroups;
            for (int gg = 1; gg <= NumGroups; gg++)
            {
                stock.Sell(stock.Number[gg - 1]);
            }
        }
    }
}
```
        Zone: Area=1; Slope=0; AspectAngle=0; Altitude=50
          Soil Makoka Soil: same as Sensibility.CuttingResponse.MakokaDuguma.MakokaDugumaBase.Zone.Makoka Soil
          MicroClimate: a_interception=0; b_interception=0; c_interception=0; d_interception=0; SoilHeatFluxFraction=0.4; MinimumHeightDiffForNewLayer=0; NightInterceptionFraction=0.5; ReferenceHeight=2
          Report MassBalance: EventNames=[Clock].DoReport
            VariableNames:
              [Clock].Today as Date
              [Stock].Paddock
              [Stock].NumberAll
              [Stock].WeightAll
              [Stock].IntakeAll.Weight
              [MassBalanceCalculations].Script.PlantBiomassBeforeStock.Wt
              [MassBalanceCalculations].Script.PlantBiomassAfterStock.Wt
              [MassBalanceCalculations].Script.PlantBiomassRemoved.Wt
              [MassBalanceCalculations].Script.Intake.Wt
              [MassBalanceCalculations].Script.Lost.Wt
              [MassBalanceCalculations].Script.ForageNames
          Fertiliser
          SurfaceOrganicMatter: InitialResidueName=maize_stubble; InitialResidueType=maize; InitialResidueMass=0; InitialStandingFraction=0; InitialCPR=400; InitialCNR=60
          Plant Gliricidia
          Operations
            2003-12-15  [Gliricidia].Sow(population: 0.74, cultivar: GliricidiaYoung,depth: 100, rowSpacing: 1500);
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