Simulations: Version=133
  Memo TitlePage
    # The APSIM Grapevine Model

    Junqi Zhu, Hamish Edward Brown

    The New Zealand Institute for Plant & Food Research Limited (PFR), PO Box 845 Blenheim 7240, New Zealand

    Correspondance: junqi.zhu@plantandfood.co.nz;Hamish.brown@plantandfood.co.nz

    ##Introduction
    Grapevine is one of the most economically important fruit crops worldwide, and its use in wine production has played an important cultural role in many parts of the world. Grapevines are now cultivated in more than 90 countries for wine, distilled liquors, juice, table grapes, and raisin production. Because of its global economic importance, the climate diversity of the producing regions, and a large amount of studies (from genomics to production practices), grapevine has emerged as a model perennial fruit crop species.

    ##Objective
    The model presented here was built to simulate the phenology of the vines, canopy development and light interception by the vine row, carbohydrate allocation, carbohydrate storage and remobilisation, and yield formation of grapevine (*Vitis vinifera*) as a model perennial crop.
    It has the following objectives initially:
    - Capture the seasonal yield variations
    - Understand the long-term dynamics of yield and carbohydrate reserves under certain pruning systems
    - Capture the effects of vineyard management on yield and carbohydrate dynamics, e.g. summer and winter pruning, irrigation

    ##Model construction

    The APSIM Grapevine model was developed using the Plant Modelling Framework (PMF) of [brown_plant_2014]. This new framework provides a library of plant organ and process submodels that can be coupled, at runtime, to construct a model in much the same way that models can be coupled to construct a simulation. This means that dynamic composition of lower level process and organ classes (e.g. photosynthesis, leaf) into larger constructions (e.g. maize, wheat, sorghum) can be achieved by the model developer without additional coding.

    A series of development was taken to adapt the source code to simulate the perennial woody plants. The current model including the following features:

    - A new carbohydrate allocation method to distribute carbohydrates to structural and non-structural organ components simultaneously based on sink strength and priority.

    - A yield module that uses the weather conditions in both the previous and current season as well as the carbohydrate status to determine potential bunch number per shoot, berry number per bunch and berry mass [zhu2020quantifying].For getting a reliable estimation of yield, simulations should start one season before the season in question.

    - A row and alley strip configuration to represent a typical vineyard setup with rows of grape vines growing in a strip of bare ground, interspersed with alleys of short grass. Roots from each strip are present beneath their neighbouring strip and compete for water and nutrients.

    - An adapted row crop light interception method based on Goudriaan (1977) to partition light interception between the row canopyies and the alley.

    - Flexibility in simulating different training systems by controlling the bud number per vine, dynamics of canopy height, canopy width and depth as user inputs.

    - An adapted phenology method that defines the start of endo-dormancy by critical photoperiod and then goes through each phenology phases progressively. Budburst was used for triggering canopy growth instead of crop emergence as in annual crops.

    - A flexible parameter optimization procedure that calls APSIM Next Generation through R bash command and optimises model parameters through using an R package.
  Memo Cautions for new users
    ## Cautions for running the model
    - Vineyard conditions differ from one to the other due to differences in local climatic conditions, soil, rootstock, varieity, irrigtation, fertilization and canopy management practice. The current grapevine model rather provide a modelling framework to simulate phenology, canopy development, radiation interception, dry matter production and allocation, non-structural carbohydrate dynamics, yield components, soil water and nitrogen uptake in vineyard, than a universal model that can be applied anywhere without adjustments.
    - The current grapevine model was developed based on a rich phenology and yield dataset of Sauvignon blanc in New Zealand in five regions, mainly in the Marlborough region. The dataset were collected in irrigated and fertilized vineyards where water and nutrient stress were minimized. This was reflected in the simulation through irrigation and fertilization management script as well. For conditions with water and nutrient stress, further calibration based on local dataset would be needed.
    - Parameters for potential bunch number, berry number and berry mass determination were derived based on the long-term Sauvignon blanc trial in Marlborough. The general framework would hold for other varieties as well, but actual parameters needed to be refitted based on robust dataset for other varieties.
    - The current model can allocate vine roots to the alley and allocate the root of the alley crop to the vine row. However, the water and nitrogen competition between the vine and alley crop is based on the value of KL of each species, not based on the amount of root and root density presented in the soil zone. One option is change the KL as a function of root density or directly use root density in the source code. A good dataset of root distribution in different layor would be required. Further calibration of soil water, nitrogen and organic matter dynamics are needed.
    - Currently alley crop was represented by a generic plant model ‘Slurp’. The ‘Slurp’ model can take up water and nitrogen, but does not predict crop growth or yields. We forced its leaf area index to follow a reasonable growth pattern under the vineyard management in Marlborough New Zealand with periodic mowing events. Four different types were provided for the Slurp model: static crop, static tree, pasture, lurcern. see details in the Slurp node by right click and expanding the model structure.
    - The row crop light interception method assume the canopy shape is like a cube. So it is more suitable to use for verticle shoot prunned canopy.
    - Water stress was turned on for leaf expansion and photosynthesis, but nitrogen stress was turned off in the current model. However, nitrogen uptake and availability will still affect the organ development as the arbitrator is conducting biomass and nitrogen allocation automatically in the background.
  Replacements
    Plant Grapevine: PlantType=Grapevine; IsAlive=false; IsEnding=false; DaysAfterEnding=0
      CultivarFolder Varieties
        Cultivar SauvignonBlanc
        Cultivar Chardonnay
          Command:
            [Phenology].Dormancy.Target.BaseTarget.FixedValue = 52.0647
            [Phenology].Dormancy.Progression.Response.Xo.FixedValue = 10.98
            [Phenology].Dormancy.Progression.Response.b.FixedValue = -25.5611
            [Phenology].Budding.Target.FixedValue = 906.4065
            [Phenology].Budding.Progression.Response.X = 0,0.27668,10.27668,20.27668
            [Phenology].ThermalTime.Response.MinTemp = 0.239618
            [Phenology].ThermalTime.Response.OptTemp = 27.149
            [Phenology].ThermalTime.Response.MaxTemp = 48.75
            [Phenology].Flowering.Target.FixedValue = 45.41293
            [Phenology].BerryDevelopment.Target.FixedValue = 47.77695
        Cultivar Merlot
          Command:
            [Phenology].Dormancy.Target.BaseTarget.FixedValue = 88.74292
            [Phenology].Dormancy.Progression.Response.Xo.FixedValue = 15.07995
            [Phenology].Dormancy.Progression.Response.b.FixedValue = -1.27593
            [Phenology].Budding.Target.FixedValue = 767.6113
            [Phenology].Budding.Progression.Response.X = 0,0.353281,10.353281,20.353281
            [Phenology].ThermalTime.Response.MinTemp = 2.51
            [Phenology].ThermalTime.Response.OptTemp = 22.245
            [Phenology].ThermalTime.Response.MaxTemp = 40.316
            [Phenology].Flowering.Target.FixedValue = 42.007
            [Phenology].BerryDevelopment.Target.FixedValue = 50.84
        Cultivar PinotNoir
          Command:
            [Phenology].Dormancy.Target.BaseTarget.FixedValue = 72.1
            [Phenology].Dormancy.Progression.Response.Xo.FixedValue =7.95
            [Phenology].Dormancy.Progression.Response.b.FixedValue = -45.3083
            [Phenology].Budding.Target.FixedValue = 627.0382
            [Phenology].Budding.Progression.Response.X = 0,0.244,10.244,20.244
            [Phenology].ThermalTime.Response.MinTemp = 1.514
            [Phenology].ThermalTime.Response.OptTemp = 26.42341
            [Phenology].ThermalTime.Response.MaxTemp = 36.87527
            [Phenology].Flowering.Target.FixedValue = 27.5666
            [Phenology].BerryDevelopment.Target.FixedValue = 29.75368
        Cultivar PinotGris
          Command:
            [Phenology].Dormancy.Target.BaseTarget.FixedValue = 74.163
            [Phenology].Dormancy.Progression.Response.Xo.FixedValue = 12.53467
            [Phenology].Dormancy.Progression.Response.b.FixedValue = -66.5092
            [Phenology].Budding.Target.FixedValue = 519.1688
            [Phenology].Budding.Progression.Response.X = 0, 1.93454,11.93454,21.93454
            [Phenology].ThermalTime.Response.MinTemp = 1.173588
            [Phenology].ThermalTime.Response.OptTemp = 25.6193
            [Phenology].ThermalTime.Response.MaxTemp = 35.65306
            [Phenology].Flowering.Target.FixedValue = 31.13788
            [Phenology].BerryDevelopment.Target.FixedValue = 32.965
      Phenology
        Memo Phenology
          The phenology module starts with dormancy phase of the buds. This is followed by budding, flowering, fruit setting, berry development and canopy senescence phases. The dormancy phase include two stages: endo-dormancy and eco-dormancy. Endo-dormancy is defined as the period when buds are dormant due to physiological conditions, and eco-dormancy is defined when buds remain dormant due to unfavourable environmental conditions. The budburst stage in budding phase occurs when eco-dormancy is broken. For consistency in calculating the phenology stage in both Southern and Northern Hemispheres, we use days after winter solstice (DAWS) as the standard time in the model.

          We assume the endo-dormancy stage of the bud starts in autumn when photoperiod drops below a critical value. The critical value depends on variety and was set to 13.1 h in the current model. Three budburst modelling approaches were tested using a phenology dataset: 1) forcing-only approach, which only describes the release of eco-dormancy; 2) chilling-forcing, which describes the release of endo- and eco-dormancy in sequence; 3) chilling-forcing-overlap, which describes the release of endo- and eco-dormancy in sequence plus the effect of chilling units on forcing accumulation through implementation of an exponential decrease function. Chilling-forcing approach was selected in the current grapevine model because it enabled the best predictions of the timing of budburst. In this approach, endo-dormancy is completed when the chilling requirement is satisfied, and eco-dormancy is completed when sufficient heat units are accumulated to force bud burst. A negative sigmoid function was selected for simulating the responses of chilling units and a growing degree approach was used to calculate forcing heat unit. Interpolated hourly temperature was used in the chilling unit calculation, see the description of InterPolationMethod below.

          The flowering, fruit setting and berry development phases were simulated using a physiological development day target which is the number of days the phase would take to complete at optimal temperatures. The daily increment of development days is calculated using the Wang-Engle temperature response function [WangEngel1998], which returns a value of one when temperatures are optimal and a value between zero and one at sub and supra optimal temperatures. Development days were used for all other temperature-dependent processes, e.g., leaf appearance and expansion.

          After summer solstice, the photoperiod decreases. When photoperiod decreases to a critical value, the bud for the following season’s growth enters into endo-dormancy. However, the whole plant phenology cannot be set to endo-dormancy at this time because the current year’s shoots and berries are still growing. Although it would be tidy to develop two different phenological clocks, one for the bud and one for the plant in growth, we decided to work around it by resetting the plant phenology phase into endo-dormancy at the winter pruning event which was defined in the management script with user input time. The chilling accumulation between the critical photoperiod and the pruning event was captured by a function and then added to the total chill accumulation in the endo-dormancy phase.
        HourlyInterpolation ThermalTime: agregationMethod=0
          WangEngelTempFunction Response: MinTemp=3.9; OptTemp=29; MaxTemp=37.9; RefTemp=25; MaximumTemperatureWeighting=0.5; Units=oC
          HourlySinPpAdjusted InterpolationMethod
        GenericPhase Dormancy: Start=Endodormancy; End=Ecodormancy
          SubtractFunction Target
            Constant BaseTarget: FixedValue=52.6; Units=chilling days
            VariableReference AccumulatedChillingUnitBeforeWinterPruning: VariableName=[Phenology].AccumulatedChillingUnitBeforeWinterPruning
          HourlyInterpolation Progression: agregationMethod=0
            HourlySinPpAdjusted InterpolationMethod
            SigmoidFunction Response
              Constant Ymax: FixedValue=1; Units=constant
              Constant Xo: FixedValue=12.42; Units=oC
              Constant b: FixedValue=-3.865; Units=unitless
        GenericPhase Budding: Start=Ecodormancy; End=BudBurst
          Constant Target: FixedValue=1011; Units=GDD oC D
          HourlyInterpolation Progression: agregationMethod=0
            XYPairs Response: X=[0, 0.008, 10.008, 20.008]; Y=[0, 0, 10, 20]
            HourlySinPpAdjusted InterpolationMethod
        GenericPhase Flowering: Start=BudBurst; End=FloweringTime
          Constant Target: FixedValue=21.1; Units=development day
          VariableReference Progression: VariableName=[Phenology].ThermalTime
        GenericPhase FruitSetting: Start=FloweringTime; End=FruitSet
          Memo
            Fruit set (or the proportion of flowers that are retained as berries) represents a change-over from the static condition of the fully developed flower to the rapidly growing condition of the young fruit.

            In practice the criteria to define this stage is a bit blur. In current, we set the duration from 50% flowering to fruit set is 10 development day based on our field experience and the method for determining berry number by meteorology factors. Fruit set phase is used as the time when the berry number is determined in the current grapevine model.
          Constant Target: FixedValue=10; Units=development day
          VariableReference Progression: VariableName=[Phenology].ThermalTime
        GenericPhase BerryDevelopment: Start=FruitSet; End=Veraison
          Constant Target: FixedValue=23; Units=development day
          VariableReference Progression: VariableName=[Phenology].ThermalTime
        AccumulateFunction AccumulatedChillingUnitBeforeWinterPruning: StartStageName=Veraison; EndStageName=LeafFall; ResetStageName=FloweringTime; FractionRemovedOnCut=0; FractionRemovedOnHarvest=0; FractionRemovedOnGraze=0; FractionRemovedOnPrune=0
          LessThanFunction ChillBeforePrune
            VariableReference DAWS: VariableName=[Weather].DaysSinceWinterSolstice
            Constant PruningTime: FixedValue=341
            LessThanFunction ChillBeforeAutumn
              Constant autumn: FixedValue=200; Units=make sure the photoperiod is decreasing
              VariableReference DAWS: VariableName=[Weather].DaysSinceWinterSolstice
              LessThanFunction ChillBelowCriticalPhotoperiod
                PhotoperiodFunction: Twilight=0; DayLength=0
                Constant CriticalPhotoPeriod: FixedValue=13.14
                VariableReference ChillingUnit: VariableName=[Phenology].Dormancy.Progression
                Constant Zero: FixedValue=0
              Constant Zero: FixedValue=0
            Constant Zero: FixedValue=0
        OnEventFunction BudBurstDOY: SetEvent=BudBurst; ReSetEvent=Endodormancy
          Memo
            A function is used to provide flowering date as days after sowing(DAS).
          Constant PreEventValue: FixedValue=0
          VariableReference PostEventValue: VariableName=[Weather].DaysSinceWinterSolstice
        OnEventFunction FloweringDOY: SetEvent=FloweringTime
          Memo
            A function is used to provide flowering date as days after sowing(DAS).
          Constant PreEventValue: FixedValue=176
          VariableReference PostEventValue: VariableName=[Weather].DaysSinceWinterSolstice
        OnEventFunction VeraisonDOY: SetEvent=Veraison; ReSetEvent=Ecodormancy
          Memo
            A function is used to provide flowering date as days after sowing(DAS).
          Constant PreEventValue: FixedValue=0
          VariableReference PostEventValue: VariableName=[Weather].DaysSinceWinterSolstice
        OnEventFunction CurrentSeason: SetEvent=BudBurst; ReSetEvent=Endodormancy
          Memo
            A function is used to capture the year of the current season as in the south hemisphere the growing season extends to the second year.
          Constant PreEventValue: FixedValue=0
          VariableReference PostEventValue: VariableName=[Clock].Today.Year
        LeafDeathPhase CanopySenescence: Start=Veraison; End=LeafFall
          VariableReference ThermalTime: VariableName=[Phenology].ThermalTime
        GotoPhase DormancyRewind: Start=LeafFall; End=Unused; PhaseNameToGoto=Dormancy
          Memo
            Phenology is also rewound to the EndoDormant stage by a prun event
        Age
        OnEventFunction FirstGrowthSeason: SetEvent=BudBurst
          Memo
            For the simulation of the first year, it is suggested to start on bud dormancy date which is autumn and photoperiod is around 13.1 (day 56). This will make the calculation of budburst for the first year easier. However, this means there is an empty period between initilization and bud burst, where there is no growth.
            As some organs have senescence rate and maintenance respiration, this makes the initilization of structural root and fine root biomass much harder. This variable is added for making the initilization easier. It changes from 0 to 1 at the budburst of the first season, and was used to signal respiration and other processes to start.
          Constant PreEventValue: FixedValue=0
          Constant PostEventValue: FixedValue=1
      Structure: CohortInitialisationStage=Ecodormancy; LeafInitialisationStage=BudBurst
        Memo Structure
          The structure module defines the bud number per vine, rate of main stem primordia initiation rate, phyllochron (development day interval between two successive leaf appearance), branching rate and branching mortality, final leaf number and canopy height.
          Phyllochron was defined by a phase look up function in combination with a linear interpolation function. The phase look up function defines when new leaf appearance will happen, which is currently defined between budburst and véraison. The linear interpolation function captured the phyllochron difference between first five ranks and the ramaining ranks.
          Branching rate was calculated as the product of three components: potential branching rate, the effect of leaf area per vine, and the effects of retained bud number per meter row
        VariableReference ThermalTime: VariableName=[Phenology].ThermalTime
        PhaseLookupValue MainStemPrimordiaInitiationRate: Start=BudBurst; End=Veraison
          Constant MainStemPrimordiaInitiationRate: FixedValue=1.8; Units=development day
        PhaseLookupValue Phyllochron: Start=BudBurst; End=Veraison
          MultiplyFunction Phyllochron
            Constant Phyllochron: FixedValue=1.823; Units=development day
            LinearInterpolationFunction LeafStageFactor
              XYPairs: X=[1, 5, 10, 24]; Y=[0.9, 0.9, 1, 1]
              VariableReference XValue: VariableName=[Leaf].AppearedCohortNo
        Constant FinalLeafNumber: FixedValue=25; Units=Main-stem leaves
        Constant BranchMortality: FixedValue=0; Units=%
        Constant DroughtInducedBranchMortality: FixedValue=0; Units=%
        Constant StemSenescenceAge: FixedValue=0
        Constant BudsPerMeterRow: FixedValue=25; Units=buds per meter
        BudNumberFunction BudNumber: SetStage=BudBurst
          MultiplyFunction FractionOfBudBurst
            SigmoidFunction BudNumberEffect
              VariableReference XValue: VariableName=[Structure].PrimaryBudNo
              Constant Ymax: FixedValue=1.4; Units=unitless
              Constant Xo: FixedValue=100; Units=buds
              Constant b: FixedValue=-54.8977; Units=unitless
            LinearInterpolationFunction CaneDiameterEffect
              XYPairs: X=[0, 12, 15]; Y=[0.1, 1, 1]
              VariableReference XValue: VariableName=[Grapevine].Cane.CaneDiameter
        AddFunction HeightModel
          Constant BaseHeight: FixedValue=1100; Units=mm
          MinimumFunction ShootHeight
            MultiplyFunction ShootLength
              LinearInterpolationFunction SeasonalPattern
                XYPairs: X=[0, 100, 150, 177, 335, 336, 366]; Y=[0, 0, 1300, 1700, 1700, 0, 0]
                VariableReference XValue: VariableName=[Weather].DaysSinceWinterSolstice
              LinearInterpolationFunction DensityEffect
                XYPairs: X=[0, 13.3, 20, 26.7, 33.3, 40, 60, 65]; Y=[1, 1, 0.92, 0.86, 0.8, 0.77, 0.65, 0.65]
                VariableReference XValue: VariableName=[Structure].BudsPerMeterRow.FixedValue
            Constant TrimShootHeight: FixedValue=1100; Units=mm
        MultiplyFunction BranchingRate
          LinearInterpolationFunction Potential_Branching_Rate
            XYPairs: X=[0, 7, 8, 13, 14, 34]; Y=[0.05, 0.07, 0.07, 0.07, 0.07, 0.05]
            VariableReference XValue: VariableName=[Structure].LeafTipsAppeared
          LinearInterpolationFunction LeafAreaEffect
            XYPairs: X=[0, 3, 7, 10, 14]; Y=[1, 0.25, 0.04, 0.01, 0]
            VariableReference XValue: VariableName=[Leaf].LAI
          LinearInterpolationFunction NodeNumberPerMeter
            XYPairs: X=[0, 13.3, 20, 26.7, 33.3, 40, 60, 65, 66]; Y=[2.1, 2.1, 1.5, 0.85, 0.45, 0.2, 0.1, 0, 0]
            VariableReference XValue: VariableName=[Structure].BudsPerMeterRow.FixedValue
      Leaf: CurrentExpandingLeaf=34; StartFractionExpanded=0.83819; FractionNextleafExpanded=0.926641; MaxCover=1; Albedo=0.25; Gsmax350=0.02; R50=200; KDead=0.03; MaximumMainStemLeafNumber=30
        zero: DeadNodesYesterday, GrowthRespiration, LAI, Depth, Width, FRGR, PotentialEP, WaterDemand, TipsAtEmergence, CohortsAtInitialisation, FractionDied
        Memo Leaf
          The grapevine model used the phytomer-based Leaf organ class. It predicted the appearance, expansion and senescence of cohorts of leaves at each position on the primary shoot and estimated how many leaves were present in each cohort based on branching rates. Branch leaves were treated the same as main-stem leaves appeared at the same time.

          The maximum area of each cohort was currently set as a function of relative node position in respect to the final leaf number. The growth duration, lag duration, senescence duration and specific minimum and maximum leaf area were parameterised based on our field experiment, see Datasets used for Model calibration and validation. For correctly modelling leaf senescence and the dynamics of leaf area, a photoperiod acceleration effect was added. The photoperiod acceleration effect included and reflected the effects of the time of harvest on leaf senescence as well, as we observed that leaves would stay green much longer if the fruit were not harvested. Simulation of leaf senescence has highly importance to the replenishment of non-structural carbohydrate reserves.  Other leaf properties were parameterised to ensure minimum nitrogen or water stress on leaf expansion in the current grapevine model as the water and nitrogen dynamic part require further calibration. However, the model do include a linear water stress on leaf expansion and photosynthesis.

          The potential total DM demand of a leaf was calculated based upon the delta leaf area increase per day (constrained by stress) times the mean of maximum and minimum specific leaf area given in UI. The total DM demand was then divided into structural DM demand and Metabolic DM demand based on the fraction of structural DM in total leaf weight. The priority factor q for leaf structural and metabolic demand was set to a high value (1.6) as it is the immediate source of photosynthetic and has the highest priority early in the season [buwalda1991mathematical][lakso2007modeling]. Non-structural reserves were not considered in leaf current model.

          The dynamics of seasonal canopy width and canopy depth were defined in the leaf class based on our field observation.

          The dynamics of seasonal nitrogen concentration was taken from [holzapfel2019seasonal].
        VariableReference ThermalTime: VariableName=[Structure].ThermalTime
        LeafCohort InitialLeaf1: Rank=1; Area=1000
          zero: NReallocationFactor, DMReallocationFactor, NRetranslocationFactor, DMRetranslocationFactor, ShadeInducedSenRate, SenescedFrac, DeltaPotentialArea, DeltaStressConstrainedArea, DeltaCarbonConstrainedArea, PotentialStructuralDMAllocation, PotentialMetabolicDMAllocation, MetabolicNReallocated, MetabolicWtReallocated, StorageNReallocated, StorageWtReallocated, MetabolicNRetranslocated, StorageNRetrasnlocated, DMRetranslocated, MetabolicNAllocation, StructuralDMAllocation, MetabolicDMAllocation, MaintenanceRespiration
        LeafCohort InitialLeaf2: Rank=2
          zero: NReallocationFactor, DMReallocationFactor, NRetranslocationFactor, DMRetranslocationFactor, ShadeInducedSenRate, SenescedFrac, DeltaPotentialArea, DeltaStressConstrainedArea, DeltaCarbonConstrainedArea, PotentialStructuralDMAllocation, PotentialMetabolicDMAllocation, MetabolicNReallocated, MetabolicWtReallocated, StorageNReallocated, StorageWtReallocated, MetabolicNRetranslocated, StorageNRetrasnlocated, DMRetranslocated, MetabolicNAllocation, StructuralDMAllocation, MetabolicDMAllocation, Area, MaintenanceRespiration
        LeafCohort InitialLeaf3: Rank=3
          zero: NReallocationFactor, DMReallocationFactor, NRetranslocationFactor, DMRetranslocationFactor, ShadeInducedSenRate, SenescedFrac, DeltaPotentialArea, DeltaStressConstrainedArea, DeltaCarbonConstrainedArea, PotentialStructuralDMAllocation, PotentialMetabolicDMAllocation, MetabolicNReallocated, MetabolicWtReallocated, StorageNReallocated, StorageWtReallocated, MetabolicNRetranslocated, StorageNRetrasnlocated, DMRetranslocated, MetabolicNAllocation, StructuralDMAllocation, MetabolicDMAllocation, Area, MaintenanceRespiration
        LeafCohortParameters CohortParameters: ExpansionStressValue=0; CellDivisionStressValue=0; LagAccelerationValue=0; SenescenceAccelerationValue=0; ShadeInducedSenescenceRateValue=0; SenessingLeafRelativeSizeValue=0
          Constant DMReallocationFactor: FixedValue=1; Units=percentage
          Constant DMRetranslocationFactor: FixedValue=1; Units=percentage
          LinearInterpolationFunction MaxArea
            XYPairs: X=[0, 5, 25]; Y=[6000, 12000, 12000]
            VariableReference XValue: VariableName=[Leaf].AppearedCohortNo
          LinearInterpolationFunction GrowthDuration
            XYPairs: X=[0, 7, 12, 25, 26]; Y=[16, 14.5, 14, 14, 14]
            VariableReference XValue: VariableName=[Leaf].AppearedCohortNo
          Constant LagDuration: FixedValue=40; Units=development day
          Constant SenescenceDuration: FixedValue=5; Units=development day
          Constant DetachmentLagDuration: FixedValue=1; Units=development day
          Constant DetachmentDuration: FixedValue=1; Units=development day
          Constant SpecificLeafAreaMax: FixedValue=20000; Units=mm2/g
          Constant SpecificLeafAreaMin: FixedValue=15000; Units=mm2/g
          Constant StructuralFraction: FixedValue=0.8; Units=percentage
          Constant MinimumNConc: FixedValue=0.002; Units=g/g
          Constant CriticalNConc: FixedValue=0.015; Units=g/g
          Constant InitialNConc: FixedValue=0.025; Units=g/g
          LinearInterpolationFunction MaximumNConc
            XYPairs: X=[0, 100, 150, 177, 335, 336, 366]; Y=[0.02, 0.02, 0.03, 0.025, 0.02, 0.02, 0.02]
            VariableReference XValue: VariableName=[Weather].DaysSinceWinterSolstice
          Constant NReallocationFactor: FixedValue=0.7; Units=percentage
          Constant NRetranslocationFactor: FixedValue=0.1; Units=percentage
          Constant ShadeInducedSenescenceRate: FixedValue=0
          Constant StorageFraction: FixedValue=0; Units=percentage
          Constant SenessingLeafRelativeSize: FixedValue=1; Units=0-1
          Constant LeafSizeShapeParameter: FixedValue=0.01
            Units=parameter controls the logistic growth of the leaf in growth stage
          Constant CellDivisionStress: FixedValue=1; Units=0-1
          ArrayFunction LagDurationAgeMultiplier: Values=1 1 1
          ArrayFunction SenescenceDurationAgeMultiplier: Values=1 1 1
          ArrayFunction LeafSizeAgeMultiplier: Values=1 1 1 1 1 1 1 1 1 1 1 1
          Constant RemobilisationCost: FixedValue=0
          Constant CarbonConcentration: FixedValue=0.4
          LessThanFunction LagAcceleration
            VariableReference DAWS: VariableName=[Weather].DaysSinceWinterSolstice
            Constant Autumn: FixedValue=250; Units=make sure the photoperiod is decreasing
            Constant One: FixedValue=1
            LinearInterpolationFunction PhotoPeriodEffect
              XYPairs: X=[9.5, 11, 12, 14]; Y=[2.2, 1.2, 1, 1]
              PhotoperiodFunction XValue: Twilight=0; DayLength=0
          LessThanFunction SenescenceAcceleration: same as Replacements.Grapevine.Leaf.CohortParameters.LagAcceleration
          MultiplyFunction MaintenanceRespirationFunction
            Constant Qm: FixedValue=0.03; Units=g/g
            ExponentialFunction TempResponse: A=0; B=1; C=0.045
              Memo
                The temperature-dependent parameter is set so that the respiration rate doubles for every 10 oC increase in temperature.
              SubtractFunction TempDiff
                VariableReference Xvalue: VariableName=[Weather].MeanT
                Constant RefT: FixedValue=20
          LinearInterpolationFunction ExpansionStress
            XYPairs: X=[0, 1, 1.5]; Y=[0, 1, 1]
            VariableReference XValue: VariableName=[Leaf].Fw
        RUEModel Photosynthesis
          Memo Notes
            The effects of leaf nitrogen concentration on photosynthesis is turned off as nitrogen cycle within plant and soil havenot been well calibrated. Water stress on photosynthesis was included.
          PhaseLookup RUE
            PhaseLookupValue Vegetative: Start=BudBurst; End=FloweringTime
              Constant: FixedValue=0.8; Units=g/MJ
            PhaseLookupValue Reproductive: Start=FloweringTime; End=LeafFall
              Constant: FixedValue=0.9; Units=g/MJ
          RUECO2Function FCO2: PhotosyntheticPathway=C3
          LinearInterpolationFunction FN
            XYPairs: X=[0, 1, 1.5]; Y=[1, 1, 1]
            VariableReference XValue: VariableName=[Leaf].Fn
          WeightedTemperatureFunction FT: MaximumTemperatureWeighting=0.75
            XYPairs: X=[5, 20, 30, 45]; Y=[1, 1, 1, 0]
          LinearInterpolationFunction FVPD
            XYPairs: X=[0, 10, 50]; Y=[1, 1, 1]
            VariableReference XValue: VariableName=[Leaf].Photosynthesis.VPD
          VariableReference RadnInt: VariableName=[Leaf].RadiationIntercepted
          LinearInterpolationFunction FW
            XYPairs: X=[0, 1, 1.5]; Y=[0, 1, 1]
            VariableReference XValue: VariableName=[Leaf].Fw
        MinimumFunction FRGRFunction
          VariableReference RUE_FT: VariableName=[Leaf].Photosynthesis.FT
          MinimumFunction Others
            VariableReference RUE_FN: VariableName=[Leaf].Photosynthesis.FN
            VariableReference RUE_FVPD: VariableName=[Leaf].Photosynthesis.FVPD
        Constant ExtinctionCoeff: FixedValue=0.6
        CompositeBiomass Total: Propertys=[[Leaf].Live, [Leaf].Dead]; DMDOfStructural=0.6
        BiomassRemoval BiomassRemovalDefaults
          OrganBiomassRemovalType Harvest: FractionLiveToRemove=0; FractionDeadToRemove=0; FractionLiveToResidue=0; FractionDeadToResidue=0
          OrganBiomassRemovalType Cut: FractionLiveToRemove=0; FractionDeadToRemove=0; FractionLiveToResidue=0; FractionDeadToResidue=0
          OrganBiomassRemovalType Prune: FractionLiveToRemove=0; FractionDeadToRemove=0; FractionLiveToResidue=0; FractionDeadToResidue=0
          OrganBiomassRemovalType Graze: FractionLiveToRemove=0; FractionDeadToRemove=0; FractionLiveToResidue=0; FractionDeadToResidue=0
        Constant DMConversionEfficiency: FixedValue=0.83
        Constant RemobilisationCost: FixedValue=0
        Constant CarbonConcentration: FixedValue=0.4
        Constant StructuralFraction: FixedValue=0.8; Units=g/g
        Constant StomatalConductanceCO2Modifier: FixedValue=1
        BiomassDemand DMDemandPriorityFactors
          Constant Structural: FixedValue=1.6
          Constant Metabolic: FixedValue=1.6
          Constant Storage: FixedValue=0.01
        Constant FrostFraction: FixedValue=0
        MultiplyFunction WidthFunction
          LinearInterpolationFunction AgeFactor
            XYPairs: X=[0, 3, 10, 20]; Y=[0.5, 1, 1, 1]
            VariableReference XValue: VariableName=[Phenology].Age.Years
          LinearInterpolationFunction SeasonalWidthPattern
            XYPairs: X=[0, 80, 170, 335, 361]; Y=[10, 200, 470, 470, 10]
            VariableReference XValue: VariableName=[Weather].DaysSinceWinterSolstice
        LinearInterpolationFunction DepthFunction
          XYPairs: X=[0, 100, 190, 335, 336, 366]; Y=[1, 1, 1100, 1100, 1, 1]
          VariableReference XValue: VariableName=[Weather].DaysSinceWinterSolstice
      GenericOrgan Shoot: IsAboveGround=true
        Memo Shoot
          Shoot was represented by a Generic Organ class.

          The structural biomass demand of the shoot module was calculated by a delta function that takes the difference of yesterday and today’s value of a fitted biomass growth curve. The structural biomass growth curve was represented by a beta growth function [yin2003flexible] fitted on individual shoot weight over time and times the shoot population per square meter. Shoot population per square meter was calculated internally based on shoot number per vine and vine density.

          Note the shoot dry matter including both the primary and secondary shoots. However, we did not separate the biomass of primary and secondary shoot during simulation. For capturing the reduction of shoot biomass under high retained bud number per meter row caused both by smaller primary shoot and less lateral shoots [greven2014influence], the priority factor for shoot DM demand was set to a very low value (4e-3).

          Parameters for shoot non-structural DM demand, e.g. priority factors were set as half of the trunk and root.
        BiomassDemand DMDemands
          MaximumFunction Structural
            DeltaFunction Structural
              MultiplyFunction Integral
                VariableReference ShootPopulation: VariableName=[Structure].MainStemPopn
                BetaGrowthFunction: tm=29; te=57
                  Constant Ymax: FixedValue=30; Units=g
                  VariableReference XValue: VariableName=[Shoot].ThermalTimeAfterBudBurst
            Constant Metabolic: FixedValue=0
          Constant Metabolic: FixedValue=0
          MaximumFunction Storage
            MultiplyFunction Storage
              SubtractFunction StorageDeficit
                MultiplyFunction StructuralWt
                  VariableReference StructuralWt: VariableName=[Grapevine].Shoot.Live.Wt
                  Constant MaxConcentration: FixedValue=0.26; Units=gStorageDM/gStructureDM
                VariableReference StorageWt: VariableName=[Grapevine].Shoot.Live.StorageWt
              BetaGrowthFunction DailySynthesis: tm=34.4; te=54
                Constant Ymax: FixedValue=0.03
                VariableReference XValue: VariableName=[Shoot].ThermalTimeAfterBudBurst
            Constant Zero: FixedValue=0
        Constant NReallocationFactor: FixedValue=1; Units=percentage
        Constant NRetranslocationFactor: FixedValue=0.1; Units=percentage
        PhaseLookupValue NitrogenDemandSwitch: Start=BudBurst; End=LeafFall
          Constant: FixedValue=1
        LinearInterpolationFunction MaximumNConc
          XYPairs: X=[0, 100, 150, 177, 335, 336, 366]; Y=[0.01, 0.01, 0.035, 0.015, 0.01, 0.01, 0.01]
          VariableReference XValue: VariableName=[Weather].DaysSinceWinterSolstice
        Constant MinimumNConc: FixedValue=0.001; Units=g/g
        BiomassRemoval BiomassRemovalDefaults
          OrganBiomassRemovalType Harvest: FractionLiveToRemove=0; FractionDeadToRemove=0; FractionLiveToResidue=0; FractionDeadToResidue=0
          OrganBiomassRemovalType Cut: FractionLiveToRemove=0; FractionDeadToRemove=0; FractionLiveToResidue=0; FractionDeadToResidue=0
          OrganBiomassRemovalType Prune: FractionLiveToRemove=0; FractionDeadToRemove=0; FractionLiveToResidue=0; FractionDeadToResidue=0
          OrganBiomassRemovalType Graze: FractionLiveToRemove=0; FractionDeadToRemove=0; FractionLiveToResidue=0; FractionDeadToResidue=0
          LinearInterpolationFunction MaximumNConc
            XYPairs: X=[0, 100, 150, 177, 335, 336, 366]; Y=[0.01, 0.01, 0.03, 0.02, 0.01, 0.01, 0.01]
            VariableReference XValue: VariableName=[Weather].DaysSinceWinterSolstice
        Constant DetachmentRateFunction: FixedValue=0; Units=1/d
        Constant SenescenceRate: FixedValue=0; Units=/d
        Constant DMConversionEfficiency: FixedValue=0.83; Units=0-1
        Constant DMReallocationFactor: FixedValue=1
        VariableReference CriticalNConc: VariableName=[Shoot].MinimumNConc
        Constant RemobilisationCost: FixedValue=0
        Constant CarbonConcentration: FixedValue=0.4
        BiomassDemand NDemands
          MultiplyFunction Structural
            VariableReference MinNconc: VariableName=[Shoot].minimumNconc
            VariableReference PotentialDMAllocation: VariableName=[Shoot].potentialDMAllocation.Structural
          MultiplyFunction Metabolic
            SubtractFunction MetabolicNconc
              VariableReference CritNconc: VariableName=[Shoot].criticalNConc
              VariableReference MinNconc: VariableName=[Shoot].minimumNconc
            VariableReference PotentialDMAllocation: VariableName=[Shoot].potentialDMAllocation.Structural
          StorageNDemandFunction Storage
            VariableReference NitrogenDemandSwitch: VariableName=[Shoot].nitrogenDemandSwitch
            VariableReference MaxNconc: VariableName=[Shoot].maximumNconc
        Constant DMRetranslocationFactor: FixedValue=0.04; Units=percentage
        RetranslocateNonStructural RetranslocateNitrogen
        AccumulateFunction ThermalTimeAfterBudBurst: StartStageName=BudBurst; EndStageName=LeafFall; ResetStageName=Ecodormancy; FractionRemovedOnCut=0; FractionRemovedOnHarvest=0; FractionRemovedOnGraze=0; FractionRemovedOnPrune=0
          VariableReference ThermalTime: VariableName=[Phenology].ThermalTime
        BiomassDemand InitialWt
          Constant Structural: FixedValue=0; Units=g/m^2
          Constant Metabolic: FixedValue=0
          Constant Storage: FixedValue=0
        BiomassDemand DMDemandPriorityFactors
          Constant Structural: FixedValue=0.0036
          Constant Metabolic: FixedValue=0.001
          Constant Storage: FixedValue=0.3; Units=gc/gDM
        MultiplyFunction MaintenanceRespirationFunction
          Constant Qm: FixedValue=0.01
          ExponentialFunction TempResponse: same as Replacements.Grapevine.Leaf.CohortParameters.MaintenanceRespirationFunction.TempResponse
        Constant Photosynthesis: FixedValue=0
        VariableReference initialNConcFunction: VariableName=[Shoot].MaximumNConc
      GenericOrgan Cane: IsAboveGround=true
        Memo Cane
          Cane, Trunk and Structural root module were all represented by the Generic Organ class, which has properties of biomass status and daily biomass demand and supply. The structural DM demand of cane and trunk were calculated by their radius (r, unit m) derived from their DM and length, daily growth rate of the radius (dr/dt, m d-1), length (l, m) and wood density (ρ, g m-3) [cieslak2011functional].

          The priority factor for structural DM demand for a certain organ, determined as 0.7 for all three organs. Daily growth rate of the radius was calculated based on the trunk circumference increment in 14 years measured on 800 field grown irrigated Sauvignon blanc vines.
          The structural carbohydrate demand of the structural root was calculated by the structural demand of the trunk times the structural root/trunk ratio (set to one in this model). The structural root/trunk ratio may vary between vineyards and training systems and further work is required to capture this in the model. The non-structural carbohydrate (NSC) DM demand was modelled as an active competing sink [cieslak2011functional], and the parameters were kept the same for those three organs. NSC included total soluble carbohydrates and starch. The rate of non-structural DM synthesis depended on organ size and limited by overloading.

          For capturing the fast recovery of carbohydrate reserves after flowering [greven2016effect], ksynthesis was simulated using a beta function. Parameters were optimized based on the measured dynamics of non-structural carbohydrate in trunk and root by Greven et al. (2016).

          For potential carbohydrate retranslocation, 3.7 % of the total carbohydrate storage in each organ per day (DM retranslocation factor) was set available to be retranslocated. Actual retranslocation depends on the daily carbohydrate supply and demand differences. Carbohydrate supplies from organ senescence and photosynthesis will be used first before using carbohydrate storage.
          The biomass of retained cane for the following season was reset by the winter pruning events based on input cane diameter in the UI for the cane-pruned vines. The biomass of trunk and structural root keeps growing each year. In addition, retained cane can be parameterized as cordon and keep growing each year as well.
        BiomassDemand DMDemands
          Constant Metabolic: FixedValue=0
          PhaseLookup Structural
            PhaseLookupValue GrowingSeason: Start=BudBurst; End=LeafFall
              MultiplyFunction Structural
                Constant 2: FixedValue=2
                Constant PI: FixedValue=3.1415926
                PowerFunction Radius: Exponent=0.5
                  DivideFunction RadiusSquare
                    VariableReference Wt: VariableName=[Cane].Live.Wt
                    VariableReference population: VariableName=[Grapevine].Population
                    VariableReference CaneNumber: VariableName=[Cane].CaneNumber
                    Constant Density: FixedValue=500000; Units=g/m3
                    VariableReference Length: VariableName=[Cane].CaneLength
                    Constant PI: FixedValue=3.1415926
                Constant Density: FixedValue=400000; Units=g/m3
                Constant RadiusGR: FixedValue=9e-06; Units=meter
                VariableReference Length: VariableName=[Cane].CaneLength
                VariableReference Population: VariableName=[Grapevine].Population
                VariableReference CaneNumber: VariableName=[Cane].CaneNumber
          PhaseLookup Storage
            PhaseLookupValue GrowingSeason: Start=BudBurst; End=LeafFall
              MultiplyFunction Storage
                SubtractFunction StorageDeficit
                  MultiplyFunction StructuralWt
                    VariableReference StructuralWt: VariableName=[Grapevine].Cane.Live.StructuralWt
                    Constant MaxConcentration: FixedValue=0.26; Units=gStorageDM/gStructureDM
                  VariableReference StorageWt: VariableName=[Grapevine].Cane.Live.StorageWt
                BetaGrowthFunction DailySynthesis: tm=34.4; te=54
                  Constant Ymax: FixedValue=0.03
                  VariableReference XValue: VariableName=[Shoot].ThermalTimeAfterBudBurst
        Constant CaneDiameter: FixedValue=10; Units=mm
        Constant CaneLength: FixedValue=0.9; Units=meter
        Constant DMReallocationFactor: FixedValue=1
        Constant DMRetranslocationFactor: FixedValue=0.037; Units=percentage
        Constant NReallocationFactor: FixedValue=1; Units=percentage
        Constant NRetranslocationFactor: FixedValue=0.04; Units=percentage
        PhaseLookupValue NitrogenDemandSwitch: Start=BudBurst; End=LeafFall
          Constant: FixedValue=1
        BiomassRemoval BiomassRemovalDefaults: same as Replacements.Grapevine.Leaf.BiomassRemovalDefaults
        Constant DetachmentRateFunction: FixedValue=0; Units=/d
        Constant SenescenceRate: FixedValue=0; Units=/d
        Constant DMConversionEfficiency: FixedValue=0.83; Units=0-1
        Constant MinimumNConc: FixedValue=0.001; Units=g/g
        VariableReference CriticalNConc: VariableName=[Cane].MinimumNConc
        Constant RemobilisationCost: FixedValue=0
        Constant CarbonConcentration: FixedValue=0.4
        Constant CaneNumber: FixedValue=4
        BiomassDemand NDemands
          MultiplyFunction Structural
            VariableReference MinNconc: VariableName=[Cane].minimumNconc
            VariableReference PotentialDMAllocation: VariableName=[Cane].potentialDMAllocation.Structural
          MultiplyFunction Metabolic
            SubtractFunction MetabolicNconc
              VariableReference CritNconc: VariableName=[Cane].criticalNConc
              VariableReference MinNconc: VariableName=[Cane].minimumNconc
            VariableReference PotentialDMAllocation: VariableName=[Cane].potentialDMAllocation.Structural
          StorageNDemandFunction Storage
            VariableReference NitrogenDemandSwitch: VariableName=[Cane].nitrogenDemandSwitch
            VariableReference MaxNconc: VariableName=[Cane].maximumNconc
        RetranslocateNonStructural RetranslocateNitrogen
        BiomassDemand InitialWt
          Constant Structural: FixedValue=77.5; Units=g/m^2
          Constant Metabolic: FixedValue=0
          Constant Storage: FixedValue=19
        BiomassDemand DMDemandPriorityFactors
          Constant Structural: FixedValue=0.700062
          Constant Metabolic: FixedValue=0.001
          Constant Storage: FixedValue=0.61; Units=gc/gDM
        Constant initialNConcFunction: FixedValue=0.015; Units=g/g
        Constant MaximumNConc: FixedValue=0.015
        Constant Photosynthesis: FixedValue=0
        LessThanFunction MaintenanceRespirationFunction
          VariableReference FirstGrowthSeason: VariableName=[Phenology].FirstGrowthSeason
          Constant CheckValue: FixedValue=0.5
          Constant 0: FixedValue=0
          MultiplyFunction MaintenanceRespirationFunction
            Constant Qm: FixedValue=0.0005
            ExponentialFunction TempResponse: same as Replacements.Grapevine.Leaf.CohortParameters.MaintenanceRespirationFunction.TempResponse
      GenericOrgan Trunk: IsAboveGround=true
        BiomassDemand InitialWt
          Constant Structural: FixedValue=280; Units=g/m^2
          Constant Metabolic: FixedValue=0
          Constant Storage: FixedValue=200
        Constant DMRetranslocationFactor: FixedValue=0.037
        Constant DMReallocationFactor: FixedValue=1
        Constant DMConversionEfficiency: FixedValue=0.83; Units=0-1
        Constant NReallocationFactor: FixedValue=1
        Constant NRetranslocationFactor: FixedValue=0.04
        PhaseLookupValue NitrogenDemandSwitch: Start=BudBurst; End=LeafFall
          Constant: FixedValue=1
        Constant MinimumNConc: FixedValue=0.001
        BiomassRemoval BiomassRemovalDefaults: same as Replacements.Grapevine.Leaf.BiomassRemovalDefaults
        Constant DetachmentRateFunction: FixedValue=0; Units=/d
        VariableReference CriticalNConc: VariableName=[Trunk].MinimumNConc
        Constant RemobilisationCost: FixedValue=0
        Constant CarbonConcentration: FixedValue=0.4
        BiomassDemand NDemands
          MultiplyFunction Structural
            VariableReference MinNconc: VariableName=[Trunk].minimumNconc
            VariableReference PotentialDMAllocation: VariableName=[Trunk].potentialDMAllocation.Structural
          MultiplyFunction Metabolic
            SubtractFunction MetabolicNconc
              VariableReference CritNconc: VariableName=[Trunk].criticalNConc
              VariableReference MinNconc: VariableName=[Trunk].minimumNconc
            VariableReference PotentialDMAllocation: VariableName=[Trunk].potentialDMAllocation.Structural
          StorageNDemandFunction Storage
            VariableReference NitrogenDemandSwitch: VariableName=[Trunk].nitrogenDemandSwitch
            VariableReference MaxNconc: VariableName=[Trunk].maximumNconc
        RetranslocateNonStructural RetranslocateNitrogen
        Constant TrunkDiameter: FixedValue=75; Units=mm
        Constant TrunkLength: FixedValue=0.8; Units=meter
        BiomassDemand DMDemandPriorityFactors
          Constant Structural: FixedValue=0.700062
          Constant Metabolic: FixedValue=0.001
          Constant Storage: FixedValue=0.61; Units=gc/gDM
        BiomassDemand DMDemands
          PhaseLookup Structural
            PhaseLookupValue GrowingSeason: Start=BudBurst; End=LeafFall
              MultiplyFunction Structural
                Constant 2: FixedValue=2
                Constant PI: FixedValue=3.1415926
                PowerFunction Radius: Exponent=0.5
                  DivideFunction RadiusSquare
                    VariableReference Wt: VariableName=[Trunk].Live.Wt
                    VariableReference population: VariableName=[Grapevine].Population
                    Constant PI: FixedValue=3.1415926
                    VariableReference Length: VariableName=[Trunk].TrunkLength
                    Constant Density: FixedValue=500000; Units=g/m3
                VariableReference Length: VariableName=[Trunk].TrunkLength
                Constant Density: FixedValue=500000; Units=g/m3
                Constant RadiusGR: FixedValue=8e-06; Units=meter
                VariableReference population: VariableName=[Grapevine].Population
                LinearInterpolationFunction Age
                  XYPairs: X=[1, 5, 10, 20, 30, 40, 80]; Y=[1, 1, 0.9, 0.5, 0.25, 0.14, 0.02]
                  VariableReference XValue: VariableName=[Phenology].Age.Years
          PhaseLookup Storage
            PhaseLookupValue GrowingSeason: Start=BudBurst; End=LeafFall
              MaximumFunction Storage
                MultiplyFunction Storage
                  SubtractFunction StorageDeficit
                    MultiplyFunction StructuralWt
                      VariableReference StructuralWt: VariableName=[Grapevine].Trunk.Live.StructuralWt
                      Constant MaxConcentration: FixedValue=0.26; Units=gStorageDM/gStructureDM
                    VariableReference StorageWt: VariableName=[Grapevine].Trunk.Live.StorageWt
                  BetaGrowthFunction DailySynthesis: tm=34.4; te=54
                    Constant Ymax: FixedValue=0.03
                    VariableReference XValue: VariableName=[Shoot].ThermalTimeAfterBudBurst
                Constant Zero: FixedValue=0
          Constant Metabolic: FixedValue=0
        Constant initialNConcFunction: FixedValue=0.015; Units=g/g
        Constant MaximumNConc: FixedValue=0.01
        Constant Photosynthesis: FixedValue=0
        LessThanFunction MaintenanceRespirationFunction: same as Replacements.Grapevine.Cane.MaintenanceRespirationFunction
        LessThanFunction SenescenceRate
          VariableReference FirstGrowthSeason: VariableName=[Phenology].FirstGrowthSeason
          Constant CheckValue: FixedValue=0.5
          Constant 0: FixedValue=0
          Constant SenescenceRate: FixedValue=1e-05
      GenericOrgan StructuralRoot: IsAboveGround=false
        Memo StructuralRoot
          Note this represents the structural roots of all the plant in the population. The structural root are primarily considered as storage organs, its researves can be made available to boost plant growth in spring and/or following a defoliation.

          The structural root is separated from the mian root class because the current root class can not handle the biomass retranslocation while a generic organ can. The biomass of the structural root is expressed as gram per square meter, while the initial dry mass for the root class is expressed at per plant level.

          structural roots in grapevine are perennial. It can grow in diamention and biomass. Its structural growth rate was calculated based on the the trunk demand times structural root and trunk ratio in this model. Its storage biomass typicall decrease in spring and refill after veraison.
        BiomassDemand DMDemands
          PhaseLookup Structural
            PhaseLookupValue GrowingSeason: Start=BudBurst; End=LeafFall
              MultiplyFunction Structural
                Constant 2: FixedValue=2
                Constant PI: FixedValue=3.1415926
                PowerFunction Radius: same as Replacements.Grapevine.Trunk.DMDemands.Structural.GrowingSeason.Structural.Radius
                VariableReference Length: VariableName=[Trunk].TrunkLength
                Constant Density: FixedValue=500000; Units=g/m3
                Constant RadiusGR: FixedValue=8e-06; Units=meter
                VariableReference population: VariableName=[Grapevine].Population
                Constant RootTrunkRatio: FixedValue=1
                LinearInterpolationFunction Age
                  XYPairs: X=[1, 5, 10, 20, 30, 40, 80]; Y=[1, 1, 0.9, 0.5, 0.25, 0.14, 0.02]
                  VariableReference XValue: VariableName=[Phenology].Age.Years
          PhaseLookup Storage
            PhaseLookupValue GrowingSeason: Start=BudBurst; End=LeafFall
              MaximumFunction Storage
                MultiplyFunction Storage
                  SubtractFunction StorageDeficit
                    MultiplyFunction StructuralWt
                      VariableReference StructuralWt: VariableName=[Grapevine].StructuralRoot.Live.StructuralWt
                      Constant MaxConcentration: FixedValue=0.26; Units=gStorageDM/gStructureDM
                    VariableReference StorageWt: VariableName=[Grapevine].StructuralRoot.Live.StorageWt
                  BetaGrowthFunction DailySynthesis: tm=34.4; te=54
                    Constant Ymax: FixedValue=0.03
                    VariableReference XValue: VariableName=[Shoot].ThermalTimeAfterBudBurst
                Constant Zero: FixedValue=0
          Constant Metabolic: FixedValue=0
        BiomassDemand InitialWt
          Constant Structural: FixedValue=280; Units=g/m^2
          Constant Metabolic: FixedValue=0
          Constant Storage: FixedValue=200
        Constant DMRetranslocationFactor: FixedValue=0.037
        Constant DMReallocationFactor: FixedValue=1
        Constant DMConversionEfficiency: FixedValue=0.83; Units=0-1
        Constant NReallocationFactor: FixedValue=1
        Constant NRetranslocationFactor: FixedValue=0.04
        PhaseLookupValue NitrogenDemandSwitch: Start=BudBurst; End=LeafFall
          Constant: FixedValue=1
        Constant MinimumNConc: FixedValue=0.0005
        Constant MaximumNConc: FixedValue=0.015
        BiomassRemoval BiomassRemovalDefaults: same as Replacements.Grapevine.Leaf.BiomassRemovalDefaults
        Constant DetachmentRateFunction: FixedValue=0; Units=/d
        VariableReference CriticalNConc: VariableName=[Trunk].MinimumNConc
        Constant RemobilisationCost: FixedValue=0
        Constant CarbonConcentration: FixedValue=0.4
        BiomassDemand NDemands: same as Replacements.Grapevine.Trunk.NDemands
        RetranslocateNonStructural RetranslocateNitrogen
        BiomassDemand DMDemandPriorityFactors
          Constant Structural: FixedValue=0.700062
          Constant Metabolic: FixedValue=0.001
          Constant Storage: FixedValue=0.65; Units=gc/gDM
        Constant initialNConcFunction: FixedValue=0.015; Units=g/g
        Constant Photosynthesis: FixedValue=0
        LessThanFunction SenescenceRate
          VariableReference FirstGrowthSeason: VariableName=[Phenology].FirstGrowthSeason
          Constant CheckValue: FixedValue=0.5
          Constant 0: FixedValue=0
          MultiplyFunction SenescenceRate
            LinearInterpolationFunction SenescenceRate
              XYPairs
                X=[0, 61, 122, 153, 192, 275, 310, 366]
                Y=[0.001484, 0.001484, 0.001973, 0.005178, 0.01264, 0.013, 0.003, 0.001484]
              VariableReference XValue: VariableName=[Weather].DaysSinceWinterSolstice
            Constant Scale: FixedValue=0.01
        LessThanFunction MaintenanceRespirationFunction: same as Replacements.Grapevine.Cane.MaintenanceRespirationFunction
      ReproductiveOrgan Berry: GrowthRespiration=0; MaintenanceRespiration=0; RipeStage=Ripe
        Biomass Live: DMDOfStructural=0.6
        Biomass Dead: DMDOfStructural=0.6
        Memo
          The final yield was calculated by bunches per shoot, shoots per vine, berries per bunch,and berry fresh or dry weight.

          The effects of carbon status on yield compoent has been included but may requires further calibration. Bunch number, berry number and potential berry fresh weight were determined by weather conditions at critical periods around flowerings of the previous and current season, see details at [zhu2020quantifying]. Furthermore, in the current model, carbon effects represented by total carbon supply and demand were added in the calculation of bunch number, berry number and potential berry fresh weight.

          Berry dry mass accumulation following the source-sink carbon allocation rules. Brix was calculated based on the ratio of berry dry weight to fresh weight. Total titratable acid was simulated based on thermaltime accumulation after veraison follwoing a negative exponetial curve.

          A long-term phenology and yield monitoring trial using both two-cane and four-cane trained vertically shoot positioned (VSP) Sauvignon blanc vines was established in four vineyards in Marlborough, New Zealand in 2004, and was used for calibrating the berry module. Phenology, bunch number, berry mass, yield and meteorology records were collated. A multivariable mixed linear model was used to assess the relationship between various yield components and weather conditions. The critical periods for each yield component and weather factor were optimised based on the maximum likelihood returned from the mixed linear model. The optimised critical periods of temperature for all yield components occurred mainly before 50 % flowering either in the previous season (during inflorescence initiation) and the current season, indicating the importance of the pre-flowering period on yield formation. Out of all weather factors, maximum daily temperature had the largest effect on bunch number and overall yield and strongly influenced berry number and bunch mass. Rainfall near flowering time had a negative effect on berry mass and bunch mass, but post-flowering rainfall had a strong positive effect.
        Folder MetFactors
          Memo MetFactors
            The final yield was calculated by vines per hectare, shoots per vine, bunches per shoot, berries per bunch,and mean berry weight. The effects of weather conditions and carbohydrate supply/demand status were used to determine the bunches per shoot, berries per bunch,and potential berry fresh weight.

            Naming conventions for different factors (e.g. BEN_TmaxFlow) is yield component in concern (e.g. berry number per bunch), plus the factor, (e.g. Tmax), plus the period that the calculation was conducted (e.g. flowering period).

            - BUN represent bunch number.
            - BEN represent berry number.
            - BM  represent berry mass.
            - Tmax is maximum daily temperature; Tmin is the minimum daily temperature; Rad is the daily radiation; RainTot is the accumulated rainfall during the calculated period; Carbon is the carbohydrate supply demand ratio at the plant level.
            - Ini in each factor denotes the period during inflorescence initiation. The calculation for Ini uses flowering time of the previous season as the reference point.
            - Flow denotes the period during the flowering time of the current season, using flowering time as the reference point.
            - Ver denotes the post flowering and pre-véraison period of the current season, using time of véraison as the reference point.
            - Record in the one event function represent the value of a certain factor that was calculated in the current season and stored for using in the following season
          DivideFunction BUN_TmaxIni
            AccumulateByNumericPhase TmaxIni: StartStageName=3.5168; EndStageName=4.7841; ResetStageName=BudBurst; FractionRemovedOnCut=0; FractionRemovedOnHarvest=0; FractionRemovedOnGraze=0; FractionRemovedOnPrune=0
              VariableReference Tmax: VariableName=[Weather].MaxT
            AccumulateByNumericPhase Time: StartStageName=3.5168; EndStageName=4.7841; ResetStageName=BudBurst; FractionRemovedOnCut=0; FractionRemovedOnHarvest=0; FractionRemovedOnGraze=0; FractionRemovedOnPrune=0
              Constant Days: FixedValue=1; Units=days/day
          DivideFunction BUN_RadIni
            AccumulateByNumericPhase RadIni: StartStageName=3.7585; EndStageName=3.9206; ResetStageName=BudBurst; FractionRemovedOnCut=0; FractionRemovedOnHarvest=0; FractionRemovedOnGraze=0; FractionRemovedOnPrune=0
              VariableReference Rad: VariableName=[Weather].Radn
            AccumulateByNumericPhase Time: StartStageName=3.7585; EndStageName=3.9206; ResetStageName=BudBurst; FractionRemovedOnCut=0; FractionRemovedOnHarvest=0; FractionRemovedOnGraze=0; FractionRemovedOnPrune=0
              Constant Days: FixedValue=1; Units=days/day
          DivideFunction BUN_CarbonIni
            AccumulateByNumericPhase FDMIni: StartStageName=3.2; EndStageName=5.2; ResetStageName=BudBurst; FractionRemovedOnCut=0; FractionRemovedOnHarvest=0; FractionRemovedOnGraze=0; FractionRemovedOnPrune=0
              VariableReference FDM: VariableName=[Grapevine].Arbitrator.FDM
            AccumulateByNumericPhase Time: StartStageName=3.2; EndStageName=5.2; ResetStageName=BudBurst; FractionRemovedOnCut=0; FractionRemovedOnHarvest=0; FractionRemovedOnGraze=0; FractionRemovedOnPrune=0
              Constant Days: FixedValue=1; Units=days/day
          DivideFunction BEN_TmaxFlow
            AccumulateByNumericPhase TmaxFlow: StartStageName=3.7752; EndStageName=4.0962; ResetStageName=BudBurst; FractionRemovedOnCut=0; FractionRemovedOnHarvest=0; FractionRemovedOnGraze=0; FractionRemovedOnPrune=0
              VariableReference Tmax: VariableName=[Weather].MaxT
            AccumulateByNumericPhase Time: StartStageName=3.7752; EndStageName=4.0962; ResetStageName=BudBurst; FractionRemovedOnCut=0; FractionRemovedOnHarvest=0; FractionRemovedOnGraze=0; FractionRemovedOnPrune=0
              Constant Days: FixedValue=1; Units=days/day
          DivideFunction BEN_TminFlow
            AccumulateByNumericPhase TminFlow: StartStageName=3.8036; EndStageName=4.2517; ResetStageName=BudBurst; FractionRemovedOnCut=0; FractionRemovedOnHarvest=0; FractionRemovedOnGraze=0; FractionRemovedOnPrune=0
              VariableReference Tmin: VariableName=[Weather].MinT
            AccumulateByNumericPhase Time: StartStageName=3.8036; EndStageName=4.2517; ResetStageName=BudBurst; FractionRemovedOnCut=0; FractionRemovedOnHarvest=0; FractionRemovedOnGraze=0; FractionRemovedOnPrune=0
              Constant Days: FixedValue=1; Units=days/day
          DivideFunction BEN_TmaxIni
            AccumulateByNumericPhase TmaxIni: StartStageName=3.7336; EndStageName=5.4935; ResetStageName=BudBurst; FractionRemovedOnCut=0; FractionRemovedOnHarvest=0; FractionRemovedOnGraze=0; FractionRemovedOnPrune=0
              VariableReference Tmax: VariableName=[Weather].MaxT
            AccumulateByNumericPhase Time: StartStageName=3.7336; EndStageName=5.4935; ResetStageName=BudBurst; FractionRemovedOnCut=0; FractionRemovedOnHarvest=0; FractionRemovedOnGraze=0; FractionRemovedOnPrune=0
              Constant Days: FixedValue=1; Units=days/day
          DivideFunction BEN_RainTotFlow
            AccumulateByNumericPhase RainTotFlow: StartStageName=3.631338; EndStageName=4.526451; ResetStageName=BudBurst; FractionRemovedOnCut=0; FractionRemovedOnHarvest=0; FractionRemovedOnGraze=0; FractionRemovedOnPrune=0
              VariableReference RainTot: VariableName=[Weather].Rain
            Constant Days: FixedValue=1
          DivideFunction BEN_CarbonFlow
            AccumulateByNumericPhase FDMFlow: StartStageName=3.08; EndStageName=4.05; ResetStageName=BudBurst; FractionRemovedOnCut=0; FractionRemovedOnHarvest=0; FractionRemovedOnGraze=0; FractionRemovedOnPrune=0
              VariableReference FDM: VariableName=[Grapevine].Arbitrator.FDM
            AccumulateByNumericPhase Time: StartStageName=3.08; EndStageName=4.05; ResetStageName=BudBurst; FractionRemovedOnCut=0; FractionRemovedOnHarvest=0; FractionRemovedOnGraze=0; FractionRemovedOnPrune=0
              Constant Days: FixedValue=1; Units=days/day
          DivideFunction BM_TmaxFlow
            AccumulateByNumericPhase TmaxFlow: StartStageName=3.6763; EndStageName=3.9052; ResetStageName=BudBurst; FractionRemovedOnCut=0; FractionRemovedOnHarvest=0; FractionRemovedOnGraze=0; FractionRemovedOnPrune=0
              VariableReference Tmax: VariableName=[Weather].MaxT
            AccumulateByNumericPhase Time: StartStageName=3.6763; EndStageName=3.9052; ResetStageName=BudBurst; FractionRemovedOnCut=0; FractionRemovedOnHarvest=0; FractionRemovedOnGraze=0; FractionRemovedOnPrune=0
              Constant Days: FixedValue=1; Units=days/day
          DivideFunction BM_RainTotFlow
            AccumulateByNumericPhase RainTotFlow: StartStageName=3.5555; EndStageName=5; ResetStageName=BudBurst; FractionRemovedOnCut=0; FractionRemovedOnHarvest=0; FractionRemovedOnGraze=0; FractionRemovedOnPrune=0
              VariableReference RainTot: VariableName=[Weather].Rain
            Constant Days: FixedValue=1
          DivideFunction BM_RadFlow
            AccumulateByNumericPhase RadFlow: StartStageName=3.046; EndStageName=3.8455; ResetStageName=BudBurst; FractionRemovedOnCut=0; FractionRemovedOnHarvest=0; FractionRemovedOnGraze=0; FractionRemovedOnPrune=0
              VariableReference Rad: VariableName=[Weather].Radn
            AccumulateByNumericPhase Time: StartStageName=3.046; EndStageName=3.8455; ResetStageName=BudBurst; FractionRemovedOnCut=0; FractionRemovedOnHarvest=0; FractionRemovedOnGraze=0; FractionRemovedOnPrune=0
              Constant Days: FixedValue=1; Units=days/day
          DivideFunction BM_RainTotVer
            AccumulateByNumericPhase RainTotVer: StartStageName=5.09; EndStageName=5.5758; ResetStageName=BudBurst; FractionRemovedOnCut=0; FractionRemovedOnHarvest=0; FractionRemovedOnGraze=0; FractionRemovedOnPrune=0
              VariableReference RainTot: VariableName=[Weather].Rain
            Constant Days: FixedValue=1
          DivideFunction BM_CarbonFlow
            AccumulateByNumericPhase FDMFlow: StartStageName=3.32; EndStageName=4.06; ResetStageName=BudBurst; FractionRemovedOnCut=0; FractionRemovedOnHarvest=0; FractionRemovedOnGraze=0; FractionRemovedOnPrune=0
              VariableReference FDM: VariableName=[Grapevine].Arbitrator.FDM
            AccumulateByNumericPhase Time: StartStageName=3.32; EndStageName=4.06; ResetStageName=BudBurst; FractionRemovedOnCut=0; FractionRemovedOnHarvest=0; FractionRemovedOnGraze=0; FractionRemovedOnPrune=0
              Constant Days: FixedValue=1; Units=days/day
          DivideFunction BEN_CarbonIni
            AccumulateByNumericPhase FDMIni: StartStageName=4; EndStageName=5.83; ResetStageName=BudBurst; FractionRemovedOnCut=0; FractionRemovedOnHarvest=0; FractionRemovedOnGraze=0; FractionRemovedOnPrune=0
              VariableReference FDM: VariableName=[Grapevine].Arbitrator.FDM
            AccumulateByNumericPhase Time: StartStageName=4; EndStageName=5.83; ResetStageName=BudBurst; FractionRemovedOnCut=0; FractionRemovedOnHarvest=0; FractionRemovedOnGraze=0; FractionRemovedOnPrune=0
              Constant Days: FixedValue=1; Units=days/day
          OnEventFunction BUN_TmaxIni_Record: SetEvent=Ecodormancy
            Constant PreEventValue: FixedValue=21
            VariableReference PostEventValue: VariableName=[Berry].MetFactors.BUN_TmaxIni
          OnEventFunction BUN_RadIni_Record: SetEvent=Ecodormancy
            Constant PreEventValue: FixedValue=21
            VariableReference PostEventValue: VariableName=[Berry].MetFactors.BUN_RadIni
          OnEventFunction BUN_CarbonIni_Record: SetEvent=Ecodormancy
            Constant PreEventValue: FixedValue=1
            VariableReference PostEventValue: VariableName=[Berry].MetFactors.BUN_CarbonIni
          OnEventFunction BEN_TmaxIni_Record: SetEvent=Veraison; ReSetEvent=FloweringTime
            Constant PreEventValue: FixedValue=21
            VariableReference PostEventValue: VariableName=[Berry].MetFactors.BEN_TmaxIni
          OnEventFunction BEN_CarbonIni_Record: SetEvent=Ecodormancy
            Constant PreEventValue: FixedValue=1
            VariableReference PostEventValue: VariableName=[Berry].MetFactors.BEN_CarbonIni
        Folder YieldComponent
          OnEventFunction BunchesPerShoot: SetEvent=BudBurst; ReSetEvent=Ecodormancy
            Memo
              Bunches per shoot is affected by the temperature and carbohydrate status during initiation.
            Constant PreEventValue: FixedValue=1.7
            MinimumFunction PostEventValue
              MaximumFunction MaximumFunc
                Memo
                  Try to ignor the first year, which give TmaxIni 0
                MultiplyFunction BunchesPerShootFun
                  AddFunction MetFun
                    Constant Intercept: FixedValue=-0.7965
                    LessThanFunction TmaxIni
                      VariableReference XValue: VariableName=[Berry].MetFactors.BUN_TmaxIni_Record
                      Constant: FixedValue=10
                      Constant PreValue: FixedValue=1.6
                      LinearInterpolationFunction TmaxIni
                        XYPairs: X=[0, 1, 10, 20, 30]; Y=[0, 0.1084, 1.084, 2.168, 3.252]
                        VariableReference XValue: VariableName=[Berry].MetFactors.BUN_TmaxIni_Record
                    LessThanFunction RadIni
                      VariableReference XValue: VariableName=[Berry].MetFactors.BUN_RadIni_Record
                      Constant: FixedValue=10
                      Constant PreValue: FixedValue=0.65
                      LinearInterpolationFunction RadIni
                        XYPairs: X=[0, 1, 10, 20, 30]; Y=[0, 0.0101, 0.101, 0.202, 0.303]
                        VariableReference XValue: VariableName=[Berry].MetFactors.BUN_RadIni_Record
                  LessThanFunction CarbonIni
                    VariableReference XValue: VariableName=[Berry].MetFactors.BUN_CarbonIni_Record
                    Constant FirstYear: FixedValue=0.1
                    Constant PreValue: FixedValue=1
                    LinearInterpolationFunction FDMIni
                      VariableReference XValue: VariableName=[Berry].MetFactors.BUN_CarbonIni_Record
                      XYPairs: X=[0, 0.2, 1, 2]; Y=[0, 0.8, 1, 1]
                Constant one: FixedValue=1
              Constant Max: FixedValue=2.1
          OnEventFunction BunchesPerVine: SetEvent=FloweringTime; ReSetEvent=BudBurst
            Constant PreEventValue: FixedValue=50
            MaximumFunction PostEventValue
              Constant Minimum: FixedValue=1
              MultiplyFunction BunchesPerVineFun
                VariableReference BunchesPerShoot: VariableName=[Berry].YieldComponent.BunchesPerShoot
                DivideFunction ShootsNum
                  VariableReference StemPopulation: VariableName=[Grapevine].Structure.MainStemPopn
                  VariableReference Population: VariableName=[Grapevine].Population
          OnEventFunction BerryNum: SetEvent=FruitSet; ReSetEvent=BudBurst
            Constant PreEventValue: FixedValue=65
            MinimumFunction PostEventValue
              MaximumFunction BerryNumFun
                MultiplyFunction BerryNumFun
                  AddFunction MetFun
                    Constant Intercept: FixedValue=-67.4
                    LinearInterpolationFunction TmaxFlow
                      VariableReference XValue: VariableName=[Berry].MetFactors.BEN_TmaxFlow
                      XYPairs: X=[0, 1, 10, 20, 30, 40]; Y=[0, 3.4217, 34.217, 68.434, 102.651, 120]
                    LinearInterpolationFunction TminFlow
                      VariableReference XValue: VariableName=[Berry].MetFactors.BEN_TminFlow
                      XYPairs: X=[0, 1, 10, 20, 30, 40]; Y=[0, 2.4697, 24.697, 49.394, 74.091, 80]
                    LinearInterpolationFunction TmaxIni
                      XYPairs: X=[0, 1, 10, 20, 30, 40]; Y=[0, 1.3927, 13.927, 27.854, 41.781, 48]
                      LessThanFunction XValue
                        VariableReference XValue: VariableName=[Berry].MetFactors.BEN_TmaxIni_Record
                        Constant: FixedValue=10
                        Constant GuessValue: FixedValue=20
                        VariableReference TmaxIni1: VariableName=[Berry].MetFactors.BEN_TmaxIni_Record
                  LinearInterpolationFunction FDMFlow
                    VariableReference XValue: VariableName=[Berry].MetFactors.BEN_CarbonFlow
                    XYPairs: X=[0, 0.5, 0.8, 1.5]; Y=[0, 0.4, 0.9, 1.02]
                  LessThanFunction CarbonIni
                    VariableReference XValue: VariableName=[Berry].MetFactors.BEN_CarbonIni_Record
                    Constant Intercept: FixedValue=0.1
                    Constant PreValue: FixedValue=1
                    LinearInterpolationFunction FDMIni
                      VariableReference XValue: VariableName=[Berry].MetFactors.BEN_CarbonIni_Record
                      XYPairs: X=[0, 0.2, 1, 2]; Y=[0, 0.6, 1, 1]
                Constant Minimum: FixedValue=30
              Constant UpperLimit: FixedValue=150
          OnEventFunction BerryMass: SetEvent=Veraison; ReSetEvent=BudBurst
            Constant PreEventValue: FixedValue=2.1
            MinimumFunction PostEventValue
              MaximumFunction BerryMassFun
                Constant LowerLimit: FixedValue=1
                MultiplyFunction
                  AddFunction MetFun
                    Constant Intercept: FixedValue=0.92369
                    LinearInterpolationFunction TmaxFlow
                      VariableReference XValue: VariableName=[Berry].MetFactors.BM_TmaxFlow
                      XYPairs: X=[0, 1, 10, 30]; Y=[0, 0.0327134, 0.327134, 0.981402]
                    LinearInterpolationFunction RadFlow
                      XYPairs: X=[0, 1, 10, 30]; Y=[0, 0.0212212, 0.212212, 0.636636]
                      VariableReference XValue: VariableName=[Berry].MetFactors.BM_RadFlow
                    LinearInterpolationFunction RainTotFlow
                      XYPairs: X=[0, 1, 100]; Y=[0, -0.0010101, -0.10101]
                      VariableReference XValue: VariableName=[Berry].MetFactors.BM_RainTotFlow
                    LinearInterpolationFunction RainTotVer
                      VariableReference XValue: VariableName=[Berry].MetFactors.BM_RainTotVer
                      XYPairs: X=[0, 1, 100]; Y=[0, 0.0010051, 0.10051]
                  LinearInterpolationFunction FDMFlow
                    VariableReference XValue: VariableName=[Berry].MetFactors.BM_CarbonFlow
                    XYPairs: X=[0, 0.5, 0.8, 1.5]; Y=[0, 0.52, 1, 1]
              Constant UpperLimit: FixedValue=3
        MultiplyFunction NumberFunction
          VariableReference StemPopulation: VariableName=[Grapevine].Structure.MainStemPopn
          VariableReference BunchesPerShoot: VariableName=[Berry].YieldComponent.BunchesPerShoot
          VariableReference BerriesPerBunch: VariableName=[Berry].YieldComponent.BerryNum
        MultiplyFunction SingleBerryFW
          Memo
            The effects of water stress on berry fresh weight is a guess based on our experience. Further calibration of the effect of weather conditions and carbon status on berry fresh weight need to be done.
          BetaGrowthFunction: tm=33.3; te=59.3
            VariableReference XValue: VariableName=[Berry].ThermalTimeAfterFlowering
            VariableReference Ymax: VariableName=[Berry].YieldComponent.BerryMass
          DivideFunction MeanWaterStress
            AccumulateByNumericPhase fw: StartStageName=3.8; EndStageName=6; ResetStageName=BudBurst; FractionRemovedOnCut=0; FractionRemovedOnHarvest=0; FractionRemovedOnGraze=0; FractionRemovedOnPrune=0
              VariableReference fw: VariableName=[Leaf].Fw
            AccumulateByNumericPhase Time: StartStageName=3.8; EndStageName=6; ResetStageName=BudBurst; FractionRemovedOnCut=0; FractionRemovedOnHarvest=0; FractionRemovedOnGraze=0; FractionRemovedOnPrune=0
              Constant Days: FixedValue=1; Units=days/day
        MultiplyFunction TotalBerryFW
          VariableReference BerryNumber: VariableName=[Berry].NumberFunction
          VariableReference BerryFW: VariableName=[Berry].SingleBerryFW
        MultiplyFunction SingleBerryDW
          BetaGrowthFunction: tm=47.8; te=70
            Constant Ymax: FixedValue=0.6; Units=g
            VariableReference XValue: VariableName=[Berry].ThermalTimeAfterFlowering
        SubtractFunction WaterContent
          Constant: FixedValue=1
          PhaseLookupValue AfterFlowering: Start=FloweringTime; End=LeafFall
            MinimumFunction
              DivideFunction
                VariableReference BerryDW: VariableName=[Berry].Live.Wt
                VariableReference TotalBerryFW: VariableName=[Berry].TotalBerryFW
              Constant: FixedValue=0.88
        MultiplyFunction DMDemandFunction
          LessThanFunction
            VariableReference DAWS: VariableName=[Weather].DaysSinceWinterSolstice
            Constant HarvestTime: FixedValue=305
            PhaseLookupValue AfterFruitSet: Start=FloweringTime; End=LeafFall
              MaximumFunction
                DeltaFunction
                  MultiplyFunction Integral
                    VariableReference BerryNumber: VariableName=[Berry].NumberFunction
                    VariableReference BerryDM: VariableName=[Berry].SingleBerryDW
                Constant: FixedValue=0; Units=g
            Constant Zero: FixedValue=0
          Constant: FixedValue=1; Units=g
        BiomassDemand DMDemandPriorityFactors
          Constant Structural: FixedValue=1.07758
          Constant Metabolic: FixedValue=0.001
          Constant Storage: FixedValue=0.001
        DivideFunction YieldPerVine
          VariableReference TotalBerryFW: VariableName=[Berry].TotalBerryFW
          VariableReference Population: VariableName=[Grapevine].Population
          Constant: FixedValue=1000
        PhaseLookup Brix
          PhaseLookupValue BeforeVeraison: Start=FloweringTime; End=Veraison
            Constant: FixedValue=5
          PhaseLookupValue AfterVeraison: Start=Veraison; End=LeafFall
            LessThanFunction
              VariableReference DAWS: VariableName=[Weather].DaysSinceWinterSolstice
              Constant HarvestTime: FixedValue=305
              MaximumFunction
                DivideFunction
                  MaximumFunction
                    SubtractFunction
                      Constant: FixedValue=0.944
                      VariableReference WaterContent: VariableName=[Berry].WaterContent
                    Constant zero: FixedValue=0
                  Constant: FixedValue=0.0082
                Constant min: FixedValue=5
              Constant Zero: FixedValue=0
        PhaseLookup TitratableAcid
          PhaseLookupValue BeforeVeraison: Start=FloweringTime; End=Veraison
            Constant: FixedValue=0
          PhaseLookupValue AfterVeraison: Start=Veraison; End=LeafFall
            ExponentialFunction TitratableAcid: A=7.866; B=30.345; C=-0.0923
              VariableReference XValue: VariableName=[Berry].ThermalTimeAfterVeraison
        AccumulateFunction ThermalTimeAfterVeraison: StartStageName=Veraison; EndStageName=LeafFall; ResetStageName=Ecodormancy; FractionRemovedOnCut=0; FractionRemovedOnHarvest=0; FractionRemovedOnGraze=0; FractionRemovedOnPrune=0
          VariableReference ThermalTime: VariableName=[Phenology].ThermalTime
        AccumulateFunction ThermalTimeAfterFlowering: StartStageName=FloweringTime; EndStageName=LeafFall; ResetStageName=Ecodormancy; FractionRemovedOnCut=0; FractionRemovedOnHarvest=0; FractionRemovedOnGraze=0; FractionRemovedOnPrune=0
          VariableReference ThermalTime: VariableName=[Phenology].ThermalTime
        Constant MaxNConcDailyGrowth: FixedValue=0.02; Units=g/g
        Constant MinimumNConc: FixedValue=0.002; Units=g/g
        BiomassRemoval BiomassRemovalDefaults
          OrganBiomassRemovalType Harvest: FractionLiveToRemove=0; FractionDeadToRemove=0; FractionLiveToResidue=0; FractionDeadToResidue=0
          OrganBiomassRemovalType Cut: FractionLiveToRemove=0; FractionDeadToRemove=0; FractionLiveToResidue=0; FractionDeadToResidue=0
          OrganBiomassRemovalType Prune: FractionLiveToRemove=0; FractionDeadToRemove=0; FractionLiveToResidue=0; FractionDeadToResidue=0
          OrganBiomassRemovalType Graze: FractionLiveToRemove=0; FractionDeadToRemove=0; FractionLiveToResidue=0; FractionDeadToResidue=0
          OrganBiomassRemovalType Thin: FractionLiveToRemove=0; FractionDeadToRemove=0; FractionLiveToResidue=0; FractionDeadToResidue=0
        Constant MaximumPotentialGrainSize: FixedValue=2.5; Units=g fresh or dry
        Constant DMConversionEfficiency: FixedValue=0.98
        Constant RemobilisationCost: FixedValue=0
        Constant CarbonConcentration: FixedValue=0.4
        MultiplyFunction MaintenanceRespirationFunction
          Constant Qm: FixedValue=0.001
          ExponentialFunction TempResponse: same as Replacements.Grapevine.Leaf.CohortParameters.MaintenanceRespirationFunction.TempResponse
        LinearInterpolationFunction MaximumNConc
          XYPairs: X=[0, 100, 150, 177, 335, 336, 366]; Y=[0.01, 0.01, 0.025, 0.015, 0.01, 0.01, 0.01]
          VariableReference XValue: VariableName=[Weather].DaysSinceWinterSolstice
        MultiplyFunction NFillingRate
          LessThanFunction
            VariableReference DAWS: VariableName=[Weather].DaysSinceWinterSolstice
            Constant HarvestTime: FixedValue=305
            PhaseLookupValue AfterFruitSet: Start=FloweringTime; End=LeafFall
              MaximumFunction
                DeltaFunction
                  MultiplyFunction Integral
                    VariableReference BerryNumber: VariableName=[Berry].NumberFunction
                    VariableReference BerryDM: VariableName=[Berry].SingleBerryDW
                    VariableReference NConc: VariableName=[Berry].MaximumNConc
                Constant: FixedValue=0; Units=g
            Constant Zero: FixedValue=0
          Constant: FixedValue=1; Units=g
      Root: GrowthRespiration=0; MaintenanceRespiration=0
        Memo Description
          Note that this organs is parameterised to represents all the fine roots of the plant.  The root organ is reponsible for uptake but can also supply both N and DM from its non-structural biomass.  The Fibrous root organ is used for simulating biomass storage and remobilisation because the current root class can not handle the biomass retranslocation.

          The dynamics of root biomass was based on the root length dynamics measurement done on mature concord vines in UC Davis by comos et al., 2005. both root growth rate and mortality rate have annual cycles.Maintenance was set to zero as it was parameterized insided the senescence rate.
          the maximum root biomass during the season is around 60 g per plant, estimated by lakso et al., 2008.

          the initial weight of the root was increased as we start the simulation in February with no leaves.the start of simulation in February was for correctly simulating the budburst in the first year. the initial weight was given to ensure that the peak of the biomass can cycle around 30 g/m2.
        BiomassDemand InitialWt
          Constant Structural: FixedValue=100; Units=g/plant
          Constant Metabolic: FixedValue=0
          Constant Storage: FixedValue=0
        BiomassDemand DMDemands
          MultiplyFunction Structural
            VariableReference wt: VariableName=[Root].Live.StructuralWt
            LinearInterpolationFunction GrowthRate
              XYPairs: X=[0, 61, 122, 153, 192, 275, 310, 366]; Y=[0, 0, 0.01, 0.013545, 0.02102184, 0.01, 0, 0]
              VariableReference XValue: VariableName=[Weather].DaysSinceWinterSolstice
            Constant GrowthCostScale: FixedValue=1.3
          Constant Metabolic: FixedValue=0
          Constant Storage: FixedValue=0
        Constant DMConversionEfficiency: FixedValue=0.83
        RootShapeCylindre RootShape
        Constant DMRetranslocationFactor: FixedValue=0.002
        Constant DMReallocationFactor: FixedValue=1
        PhaseLookupValue NitrogenDemandSwitch: Start=BudBurst; End=LeafFall
          Constant: FixedValue=1
        Constant MinimumNConc: FixedValue=0.001; Units=g/g
        Constant MaximumNConc: FixedValue=0.02; Units=g/g
        Constant MaximumRootDepth: FixedValue=1000000; Units=mm
        BiomassRemoval BiomassRemovalDefaults: same as Replacements.Grapevine.Leaf.BiomassRemovalDefaults
        Constant RemobilisationCost: FixedValue=0
        LinearInterpolationFunction NUptakeSWFactor
          XYPairs: X=[0, 1]; Y=[0, 1]
          VariableReference XValue: VariableName=[Root].RWC
        Constant SpecificRootLength: FixedValue=500; Units=m/g
        Constant RootFrontVelocity: FixedValue=20; Units=mm/d
        Constant KNO3: FixedValue=0.02
        Constant KNH4: FixedValue=0.02
        Constant MaxDailyNUptake: FixedValue=5
        Constant CarbonConcentration: FixedValue=0.4
        BiomassDemand NDemands
          MultiplyFunction Structural
            VariableReference MinNconc: VariableName=[Root].minimumNconc
            VariableReference PotentialDMAllocation: VariableName=[Root].potentialDMAllocation.Structural
          MultiplyFunction Metabolic
            SubtractFunction MetabolicNconc
              VariableReference CritNconc: VariableName=[Root].criticalNConc
              VariableReference MinNconc: VariableName=[Root].minimumNconc
            VariableReference PotentialDMAllocation: VariableName=[Root].potentialDMAllocation.Structural
          StorageNDemandFunction Storage
            VariableReference NitrogenDemandSwitch: VariableName=[Root].nitrogenDemandSwitch
            VariableReference MaxNconc: VariableName=[Root].maximumNconc
        VariableReference CriticalNConc: VariableName=[Root].MinimumNConc
        Constant RootDepthStressFactor: FixedValue=1
        BiomassDemand DMDemandPriorityFactors
          Constant Structural: FixedValue=1.6
          Constant Metabolic: FixedValue=0
          Constant Storage: FixedValue=0
        Constant initialNConcFunction: FixedValue=0.01; Units=g/g
        Constant KLModifier: FixedValue=1
        LessThanFunction MaintenanceRespirationFunction
          VariableReference FirstGrowthSeason: VariableName=[Phenology].FirstGrowthSeason
          Constant CheckValue: FixedValue=0.5
          Constant 0: FixedValue=0
          MultiplyFunction MaintenanceRespirationFunction: same as Replacements.Grapevine.Shoot.MaintenanceRespirationFunction
        LessThanFunction SenescenceRate
          VariableReference FirstGrowthSeason: VariableName=[Phenology].FirstGrowthSeason
          Constant CheckValue: FixedValue=0.5
          Constant 0: FixedValue=0
          MultiplyFunction SenescenceRate
            LinearInterpolationFunction SenescenceRate
              XYPairs
                X=[0, 61, 122, 153, 192, 275, 310, 366]
                Y=[0.001484, 0.001484, 0.001973, 0.005178, 0.01264, 0.013, 0.003, 0.001484]
              VariableReference XValue: VariableName=[Weather].DaysSinceWinterSolstice
            DivideFunction
              VariableReference wt: VariableName=[Root].Live.StructuralWt
              Constant Ref: FixedValue=100
      Constant MortalityRate: FixedValue=0
      OrganArbitrator Arbitrator
        BiomassTypeArbitrator DMArbitration
          Folder PotentialPartitioningMethods
            ReallocationMethod
            AllocateFixationMethod
            RetranslocationMethod
            SendPotentialDMAllocationsMethod
          Folder AllocationMethods
            NutrientConstrainedAllocationMethod
            DryMatterAllocationsMethod
          QPrioritythenRelativeAllocation ArbitrationMethod
        BiomassTypeArbitrator NArbitration
          Folder PotentialPartitioningMethods
            ReallocationMethod
          Folder ActualPartitioningMethods
            AllocateFixationMethod
            RetranslocationMethod
          Folder AllocationMethods
            NitrogenAllocationsMethod
          RelativeAllocation ArbitrationMethod
          AllocateUptakesMethod
        WaterUptakeMethod
        NitrogenUptakeMethod
      CompositeBiomass AboveGround: DMDOfStructural=0.6
        Propertys=[[Leaf].Live, [Leaf].Dead, [Shoot].Live, [Shoot].Dead, [Cane].Live, [Cane].Dead, [Trunk].Live, [Trunk].Dead, [Berry].Live, [Berry].Dead]
      CompositeBiomass BelowGround: DMDOfStructural=0.6
        Propertys=[[Root].Live, [Root].Dead, [StructuralRoot].Live, [StructuralRoot].Dead]
    Report: EventNames=[Clock].DoReport
      VariableNames:
        [Clock].Today
        [Clock].Today.Year
        [Clock].Today.DayOfYear
        [Weather].DaysSinceWinterSolstice   as DAWS
        [PlantVariables].Script.Height 		as height
        [PlantVariables].Script.LAI         as LAIStrip
        [PlantVariables].Script.FRadInt     as f.rad.int
        [PlantVariables].Script.ET          as transpiration
        [PlantVariables].Script.ES          as Es
        [PlantVariables].Script.PET         as PET
        [PlantVariables].Script.RootDepth   as rootDepth
        [Soil].OutputLayers.SW
        sum([Soil].OutputLayers.SWmm)       as psw
        [Weather].Rain
        [Irrigation].IrrigationApplied
        [Soil].SoilWater.Drainage
        [Grapevine].Phenology.CurrentSeason as CurrentSeason
        [Grapevine].Phenology.Stage
        [Grapevine].Phenology.AccumulatedEmergedTT
        [Grapevine].Phenology.BudBurstDOY      as BudBurstDAWS
        [Grapevine].Phenology.FloweringDOY     as FloweringDAWS
        [Grapevine].Phenology.VeraisonDOY      as VeraisonDAWS
        [Grapevine].Phenology.CurrentStageName as CurrentStageName
        [Grapevine].Phenology.AccumulatedChillingUnitBeforeWinterPruning
        [Grapevine].Structure.PrimaryBudNo
        [Grapevine].Structure.MainStemPopn
        [Grapevine].Structure.LeafTipsAppeared
        [Grapevine].Structure.TotalLeavesPerShoot as leaf.no.shoot
        [Grapevine].Leaf.InitialisedCohortNo
        [Grapevine].Leaf.DeadCohortNo
        [Grapevine].Leaf.AppearedCohortNo as leaf.no.shoot.main
        [Grapevine].Leaf.CohortSize
        [Grapevine].Leaf.Live.NConc
        [Grapevine].Leaf.Transpiration
        [Grapevine].Leaf.LAI/[Grapevine].Population             as leaf.area.vine
        [Grapevine].Leaf.LAI/[Grapevine].Structure.MainStemPopn as leaf.area.shoot
        [Grapevine].Leaf.LAIMainStem/[Grapevine].Structure.MainStemPopn as leaf.area.shoot.main
        [Grapevine].Leaf.LAIBranch/[Grapevine].Structure.MainStemPopn as leaf.area.shoot.lateral
        [Grapevine].Leaf.Fn
        [Grapevine].Leaf.Fw
        [Grapevine].Leaf.Live.Wt
        [Grapevine].Leaf.Live.Wt/[Grapevine].Population as leaf.dw.vine
        [Grapevine].Leaf.Live.Wt/[Grapevine].Structure.MainStemPopn as leaf.dw.shoot
        [Grapevine].Shoot.Live.Wt
        [Grapevine].Shoot.Live.Wt/[Grapevine].Structure.MainStemPopn as shoot.dw.mean
        [Grapevine].Shoot.Live.StructuralWt
        [Grapevine].Shoot.Live.StorageWt
        [Grapevine].Cane.Live.Wt
        [Grapevine].Cane.Live.StructuralWt
        [Grapevine].Cane.Live.StorageWt
        [Grapevine].Trunk.Live.Wt
        [Grapevine].Trunk.Live.StructuralWt
        [Grapevine].Trunk.Live.StorageWt
        [Grapevine].Trunk.Live.StorageWt/[Grapevine].Trunk.Live.Wt as total.NSC.concentration.trunk
        [Grapevine].Root.Live.Wt
        [Grapevine].StructuralRoot.Live.Wt
        [Grapevine].StructuralRoot.Live.StructuralWt
        [Grapevine].StructuralRoot.Live.StorageWt
        [Grapevine].StructuralRoot.Live.StorageWt/[Grapevine].StructuralRoot.Live.Wt as total.NSC.concentration.root
        [Grapevine].Root.NTakenUp
        [Grapevine].StructuralRoot.N
        [Grapevine].Arbitrator.FDM
        [Grapevine].Arbitrator.DM.TotalFixationSupply
        [Grapevine].Berry.Live.Wt
        [Grapevine].Berry.Live.Wt/[Grapevine].Population as TotalBerryDW
        [Grapevine].Berry.SingleBerryDW
        [Grapevine].Berry.SingleBerryFW     as berry.fw.mean
        [Grapevine].Berry.TotalBerryFW/[Grapevine].Population as TotalBerryFW
        [Grapevine].Berry.NumberFunction
        [Grapevine].Berry.ThermalTimeAfterFlowering
        [Grapevine].Berry.WaterContent
        [Grapevine].Berry.N
        [Grapevine].Berry.NFillingRate
        [Grapevine].Berry.Brix 				as brix
        [Grapevine].Berry.TitratableAcid 	as ta
        [Grapevine].Berry.MetFactors.BUN_TmaxIni_Record    as BUN_TmaxIni
        [Grapevine].Berry.MetFactors.BUN_RadIni_Record     as BUN_RadIni
        [Grapevine].Berry.MetFactors.BEN_RainTotFlow as BEN_RainTotFlow
        [Grapevine].Berry.MetFactors.BEN_TmaxIni_Record    as BEN_TmaxIni_Record
        [Grapevine].Berry.MetFactors.BEN_TmaxFlow   as BEN_TmaxFlow
        [Grapevine].Berry.MetFactors.BEN_TminFlow   as BEN_TminFlow
        [Grapevine].Berry.MetFactors.BM_RadFlow      as BM_RadFlow
        [Grapevine].Berry.MetFactors.BM_RainTotFlow  as BM_RainTotFlow
        [Grapevine].Berry.MetFactors.BM_RainTotVer   as BM_RainTotVer
        [Grapevine].Berry.MetFactors.BM_TmaxFlow    as BM_TmaxFlow
        [Grapevine].Berry.YieldComponent.BunchesPerShoot as bunch.no.shoot
        [Grapevine].Berry.YieldComponent.BunchesPerVine  as bunch.no.vine
        [Grapevine].Berry.YieldComponent.BerryNum    as BerryNum
        [Grapevine].Berry.YieldComponent.BerryMass   as berry.fw.est
        [Grapevine].Berry.YieldPerVine               as yield.per.vine
        // Note: for converting into field scale, need the strip area, this could be done by multiplying all by Ai/At = Ai/(A1+A2)
        [Row].Area
        [Alley].Area
        [Row].Area/([Alley].Area+[Row].Area) as Row.FractionArea
        [Alley].Area/([Alley].Area+[Row].Area) as Alley.FractionArea
        [Weather].Radn as TotalRadiation
        [Row].Grapevine.Leaf.RadiationIntercepted
        [Alley].Slurp.Leaf.RadiationIntercepted
        // Carbon balance (basic)
        [Row].Grapevine.AboveGround.Wt
        [Row].Grapevine.BelowGround.Wt
        ([Row].Grapevine.Leaf.Removed.Wt+[Row].Grapevine.Shoot.Removed.Wt+[Row].Grapevine.Cane.Removed.Wt+[Row].Grapevine.Trunk.Removed.Wt+[Row].Grapevine.Berry.Removed.Wt+[Row].Grapevine.StructuralRoot.Removed.Wt+[Row].Grapevine.Root.Removed.Wt) as Row.Grapevine.Removed.Wt
        ([Row].Grapevine.Leaf.Detached.Wt+[Row].Grapevine.Shoot.Detached.Wt+[Row].Grapevine.Cane.Detached.Wt+[Row].Grapevine.Trunk.Detached.Wt+[Row].Grapevine.Berry.Detached.Wt+[Row].Grapevine.StructuralRoot.Detached.Wt+[Row].Grapevine.Root.Detached.Wt) as Row.Grapevine.Detached.Wt
        [Row].SurfaceOrganicMatter.C as Row.SurfaceOM.C
        sum([Row].Soil.SoilNitrogen.FOM.C) as Row.SoilFOM.C
        sum([Row].Soil.SoilNitrogen.Microbial.C)+sum([Row].Soil.SoilNitrogen.Humic.C) as Row.SoilOM.C
        // Water balance (basic)
        [Weather].Rain as Rainfall
        [Row].Irrigation.IrrigationApplied as Row.Irrigation
        [Row].Soil.SoilWater.Runoff as Row.Runoff
        [Row].Soil.SoilWater.Es as Row.Evaporation
        [Row].Grapevine.Leaf.Transpiration as Row.Transpiration
        [Row].Soil.SoilWater.Drainage as Row.Drainage
        sum([Row].Soil.SoilWater.SWmm) as Row.TotalSWC
        [Alley].Irrigation.IrrigationApplied as Alley.Irrigation
        [Alley].Soil.SoilWater.Runoff as Alley.Runoff
        [Alley].Soil.SoilWater.Es as Alley.Evaporation
        [Alley].Slurp.Leaf.Transpiration as Alley.Transpiration
        [Alley].Soil.SoilWater.Drainage as Alley.Drainage
        sum([Alley].Soil.SoilWater.SWmm) as Alley.TotalSWC
        sum([Row].Soil.Physical.SATmm) as TotalSAT
        sum([Row].Soil.Physical.DULmm) as TotalDUL
        sum([Row].Soil.Physical.LL15mm) as TotalLL15
        // Nitrogen balance (basic)
        [Row].SurfaceOrganicMatter.N as Row.SurfaceOM.N
        sum([Row].Soil.SoilNitrogen.FOMN) as Row.SoilFOM.N
        sum([Row].Soil.SoilNitrogen.Microbial.N)+sum([Row].Soil.SoilNitrogen.Humic.C) as Row.SoilOM.N
        [Row].Fertiliser.NitrogenApplied as Row.FertiliserN
        sum([Row].Soil.SoilWater.LeachUrea)+sum([Row].Soil.SoilWater.LeachNO3) as Row.LeachedN
        sum([Row].Soil.SoilNitrogen.Denitrification) as Row.DenitrifiedN
        [Row].Grapevine.Root.NTakenUp*10.0 as Row.UptakeN
        sum([Row].Soil.SoilNitrogen.mineral_n) as Row.Mineral_N
        sum([Alley].Soil.SoilNitrogen.mineral_n) as Alley.Mineral_N
        [Alley].SurfaceOrganicMatter.N as Alley.SurfaceOM.N
        sum([Alley].Soil.SoilNitrogen.FOMN) as Alley.SoilFOM.N
        sum([Alley].Soil.SoilNitrogen.Microbial.N)+sum([Alley].Soil.SoilNitrogen.Humic.C) as Alley.SoilOM.N
        [Alley].Fertiliser.NitrogenApplied as Alley.FertiliserN
        sum([Alley].Soil.SoilWater.LeachUrea)+sum([Alley].Soil.SoilWater.LeachNO3) as Alley.LeachedN
        sum([Alley].Soil.SoilNitrogen.Denitrification) as Alley.DenitrifiedN
        [Alley].Slurp.Root.NTakenUp*10.0 as Alley.UptakeN
        sum([Alley].Slurp.Arbitrator.N.Fixation)*10.0 as Alley.FixedN
    Report ReportAlley: EventNames=[Clock].DoReport
      VariableNames:
        [Clock].Today
        [Clock].Today.Year
        [Clock].Today.DayOfYear
        [Weather].DaysSinceWinterSolstice   as DAWS
        [PlantVariables].Script.Height 		as height
        [PlantVariables].Script.LAI         as LAIStrip
        [PlantVariables].Script.FRadInt     as f.rad.int
        [PlantVariables].Script.ET          as transpiration
        [PlantVariables].Script.ES          as Es
        [PlantVariables].Script.PET         as PET
        [PlantVariables].Script.RootDepth   as rootDepth
        [Soil].OutputLayers.SW
        sum([Soil].OutputLayers.SWmm)       as psw
        [Weather].Rain
        [Irrigation].IrrigationApplied
        [Soil].SoilWater.Drainage
        [Alley].Slurp.Leaf.Live.N
        [Alley].Slurp.Root.NUptake
        [Alley].Slurp.Root.NTakenUp
    Manager PlantVariables
      FRadInt = 0
      ET = 0
      ES = 0
      PET = 0
      LAI = 0
      Height = 0
      RootDepth = 0
      PlantWidth = 0
```csharp
using Models.Climate;
using System;
using Models.Core;
using Models.PMF;
using System.Collections.Generic;
using Models.Soils;
using APSIM.Shared.Utilities;
using Models.Zones;
using Models.PMF.Organs;

namespace Models
{
    [Serializable]
    public class Script : Model
    {
        [Link] private Weather weather;
        private RectangularZone AlleyZone {get; set; }
        private RectangularZone RowZone {get; set;}
        private RectangularZone ThisZone {get; set;}
        private double AreaWidth {get; set;}

        public double FRadInt {get; set;}
        public double ET {get; set;}
        public double ES {get; set;}
        public double PET {get; set;}
        public double LAI {get; set;}
        public double Height {get; set;}
        public double RootDepth {get; set;}
        public double PlantWidth {get; set;}

        [EventSubscribe("StartOfSimulation")]
        private void DoStartOfSimulation(object sender, EventArgs e)
        {
               
               ThisZone = this.Parent.Parent as RectangularZone;
               RowZone = this.Parent.Parent.Parent.FindInScope("Row") as RectangularZone;
               AlleyZone = (RectangularZone)this.Parent.Parent.Parent.FindInScope("Alley") as RectangularZone;
               AreaWidth = AlleyZone.Width + RowZone.Width;
               PlantWidth = 0;
        }
        
        [EventSubscribe("DoReportCalculations")]
        private void OnDoReportCalculations(object sender, EventArgs e)
        {
            if (ThisZone.Name == "Row")
                {
                FRadInt = ((double)RowZone.Get("Grapevine.Leaf.RadiationIntercepted") * RowZone.Width)/(weather.Radn * AreaWidth);
                ET = (double)RowZone.Get("Grapevine.Leaf.Transpiration") * RowZone.Width/AreaWidth;
                LAI = (double)RowZone.Get("Grapevine.Leaf.LAI");
                //LAIPerVine =  LAI*RowZone.Width*1.8;
                //TreeInitialisation.Script.VineDistance;
                //(double)RowZone.Get("Grapevine.Leaf.LAI");
                Height = (double)RowZone.Get("Grapevine.Leaf.Height");
                RootDepth = (double)RowZone.Get("Grapevine.Root.Depth");
                PlantWidth = (double)RowZone.Get("Grapevine.Leaf.Width");
                }
            else
                {
                FRadInt = ((double)AlleyZone.Get("Slurp.Leaf.RadiationIntercepted") * ThisZone.Width)/ (weather.Radn * AreaWidth);
                ET = (double)AlleyZone.Get("Slurp.Leaf.Transpiration") * ThisZone.Width/AreaWidth;
                LAI = (double)AlleyZone.Get("Slurp.Leaf.LAI");
                Height = (double)AlleyZone.Get("Slurp.Leaf.Height");
                RootDepth = (double)AlleyZone.Get("Slurp.Root.Depth");
                }

            ES = (double)ThisZone.Get("Soil.SoilWater.Es") * ThisZone.Width/AreaWidth;
            double PETWidth = Math.Min(Math.Max(PlantWidth,ThisZone.Width),AreaWidth);
            PET = (double)ThisZone.Get("Soil.SoilWater.Eo") * PETWidth/AreaWidth;
        }
    }
}
```
    Manager AutoIrrigationBasedOnWaterDeficit
      FASW = 0
      WaterDeficit = 0
      StartDate = 1-nov
      EndDate = 1-mar
      FASWThreshold = 0.8
      FASWDepth = 2000
      Amount = 20
```csharp
using Models.Interfaces;
using System;
using Models.Core;
using System.Collections.Generic;
using System.Text;
using Models.Soils;
using Models.PMF;
using Models;
using System.Xml.Serialization;
using APSIM.Shared.Utilities;

namespace Models
{
    [Serializable] 
    public class Script : Model
    {
        [Link] private Zone zone;
        [Link] private Irrigation irrigation;
        [Link] private Soil soil;
        [Link] private Clock clock;
        [Link]
        private IPhysical soilPhysical;
        [Link]
        private ISoilWater waterBalance;
        public double FASW { get; set; }
        public double WaterDeficit  { get; set; } 
        
        [Description("Irrigation start window (d-mmm)")]
        public string StartDate { get; set; }
        [Description("Irrigation end window (d-mmm)")]
        public string EndDate { get; set; }

        [Description("Threshold fraction available water (0-1)")]
        public double FASWThreshold { get; set; }

        [Description("Soil depth (mm) to which fraction available water is calculated")]
        public double FASWDepth { get; set; }

        [Description("Amount of water (mm) applied each irrigation")]
        public double Amount { get; set; }

        [EventSubscribe("DoManagement")]
        private void OnDoManagement(object sender, EventArgs e)
        {
            CalculateFASW();
            if (DateUtilities.WithinDates(StartDate, clock.Today, EndDate))
            {
                if (FASW < FASWThreshold)
                {
                    irrigation.Apply(Amount, depth: 0);
                }
            }
        }
        
        private void CalculateFASW()
        {
            double[] LL15 = MathUtilities.Multiply(soilPhysical.LL15, soilPhysical.Thickness);
            double[] DUL = MathUtilities.Multiply(soilPhysical.DUL, soilPhysical.Thickness);
        
            int nlayr = GetLayerIndex();
            double cumdep = MathUtilities.Sum(soilPhysical.Thickness, 0, nlayr, 0.0);

            double excess_fr = MathUtilities.Divide((cumdep - FASWDepth), soilPhysical.Thickness[nlayr], 0.0);

            // note that results may be strange if swdep < ll15
            double avail_sw = (MathUtilities.Sum(waterBalance.SWmm, 0, nlayr, 0.0)
                              - excess_fr * waterBalance.SWmm[nlayr])
                              - (MathUtilities.Sum(LL15, 0, nlayr, 0.0)
                              - excess_fr * LL15[nlayr]);


            double pot_avail_sw = (MathUtilities.Sum(DUL, 0, nlayr, 0.0)
                                  - excess_fr * DUL[nlayr])
                                  - (MathUtilities.Sum(LL15, 0, nlayr, 0.0)
                                  - excess_fr * LL15[nlayr]);

            FASW = MathUtilities.Divide(avail_sw, pot_avail_sw, 0.0);
            WaterDeficit = MathUtilities.Constrain(pot_avail_sw - avail_sw, 0.0, 100000);
        }

        private int GetLayerIndex()
        {
            double[] cumThickness = soilPhysical.ThicknessCumulative;
            for (int i = 1; i < cumThickness.Length; i++)
            {
                if (FASWDepth < cumThickness[i])
                    return i - 1;
            }
            
            return cumThickness.Length - 1;
        }

    }
}
```
    Manager Fertilise on fixed dates
      FertiliserType = NH4NO3N
      FertiliserDates = 10-Nov, 10-Jan
      Amount = 30
      AmountType = True
```csharp
using APSIM.Shared.Utilities;
using Models.PMF;
using Models.Core;
using System;
namespace Models
{
    [Serializable]
    public class Script : Model
    {
        [Link] Clock Clock;
        [Link] Fertiliser Fertiliser;
        
        [Separator("A component to apply fertiliser on one or more dates on every year of the simulation")]

        [Description("Type of fertiliser to apply? ")] 
        public Fertiliser.Types FertiliserType { get; set; }

        [Description("Enter the fertilisation dates as dd-mmm with comma separation (any year information entered will be ignored): ")] 
        public string[] FertiliserDates { get; set; } 

        [Description("Amount of fertiliser to be applied (kg /ha)")] 
        public double Amount { get; set; }

        [Description("Is the above amount to be applied each time? (yes/ticked)? Or is it the total annual amount across all dates (no/unticked)")] 
        public bool AmountType { get; set; }
        
        [EventSubscribe("DoManagement")]
        private void OnDoManagement(object sender, EventArgs e)
        {
            foreach (string ddMMM in FertiliserDates)
            {
                if (DateUtilities.DatesEqual(ddMMM, Clock.Today))
                {
                    if (AmountType)
                        Fertiliser.Apply(Amount: Amount, Type: FertiliserType);
                    else
                        Fertiliser.Apply(Amount: Amount / FertiliserDates.Length, Type: FertiliserType);
                }
            }
        }
    }
}
```
    SurfaceOrganicMatter: InitialResidueName=wheat_stubble; InitialResidueType=wheat; InitialResidueMass=0; InitialStandingFraction=0; InitialCPR=0; InitialCNR=100; FractionFaecesAdded=1
      ResidueTypes
        ResidueType:
          fom_type                 fraction_C  po4ppm  nh4ppm  no3ppm  specific_area  cf_contrib  pot_decomp_rate  fr_c             fr_n             fr_p              derived_from
          base_type                0.4         0       0       0       0.0005         1           0.1              [0.2, 0.7, 0.1]  [0.2, 0.7, 0.1]  [0.2, 0.7, 0.1]   -
          inert                    0           0       0       0       0              0           0                -                -                -                 base_type
          manure                   0.08        10      10      10      0.0001         1           0.1              [0.3, 0.3, 0.4]  [0.3, 0.3, 0.4]  [0.3, 0.3, 0.4]   base_type
          RuminantDung_PastureFed  0.4         5       1250    0       0.0001         1           0.1              [0.3, 0.5, 0.2]  [0.3, 0.5, 0.2]  [0.3, 0.5, 0.2]   base_type
          algae                    0.4         0       0       0       0.0005         1           0.1              -                -                -                 base_type
          fym                      0.08        40      10      10      0.0001         1           0.1              [0.3, 0.3, 0.4]  [0.3, 0.3, 0.4]  [0.3, 0.3, 0.4]   base_type
          goatmanure               0.08        5       1307    481     0.0001         1           0.1              [0.3, 0.6, 0.3]  [0.3, 0.6, 0.3]  [0.3, 0.6, 0.34]  base_type
          chickenmanure_base       0.374       5       1307    481     0.0001         1           0.1              [0, 0.5, 0.5]    [0, 0.5, 0.5]    [0, 0.5, 0.5]     base_type
          cm                       0.277       0       2558    873     0              0           0                -                -                -                 chickenmanure_base
          cmA                      0.374       0       1307    481     0              0           0                -                -                -                 chickenmanure_base
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    Manager Reset on date
      ResetDate = 10-Jul
      ResetWater = Yes
      ResetNutrients = Yes
      ResetSOM = Yes
```csharp
using APSIM.Shared.Utilities;
using Models.Surface;
using Models.Utilities;
using Models.Soils.Nutrients;
using Models.Soils;
using Models.PMF;
using Models.Core;
using System;
using Models.Interfaces;

namespace Models
{
    [Serializable]
    public class Script : Model
    {
        [Link] private Clock Clock;
        [Link] private Plant Wheat;
        [Link] private ISoilWater SoilWater;
        [Link] private SoilNitrogen nitrogen;
        [Link] private SurfaceOrganicMatter SOM;
        [Link] private Summary Summary;

        [Description("Date to reset on:")]
        public string ResetDate {get;set;}

        [Description("Reset Water? (Yes or No)")]
        public string ResetWater {get;set;}

        [Description("Reset Soil Nutrients ? (Yes or No)")]
        public string ResetNutrients {get;set;}

        [Description("Reset Surface Organic Matter? (Yes or No)")]
        public string ResetSOM {get;set;}

        [EventSubscribe("DoManagement")]
        private void OnDoManagement(object sender, EventArgs e)
        {
            if (DateUtilities.WithinDates(ResetDate, Clock.Today, ResetDate))
            {
                if (ResetWater == "Yes")
                {
                    Summary.WriteMessage(this, "Reset Water");
                    SoilWater.Reset();
                }
               
                 if (ResetNutrients == "Yes")
                {
                    Summary.WriteMessage(this, "Reset Nitrogen");
                    nitrogen.Reset();
                }

                if (ResetSOM == "Yes")
                {
                    Summary.WriteMessage(this, "Reset Surface OM");
                    SOM.Reset();
                }
            }
        }
    }
}
```
    Manager Fertilise topup
      FertiliserType = NH4NO3N
      Threshold = 50
```csharp
using Models.Soils;
using System;
using Models.Core;
using Models.PMF;
using Models.Soils.Nutrients;
using APSIM.Shared.Utilities;
namespace Models
{
    [Serializable]
    public class Script : Model
    {
        [Link] Clock Clock;
        [Link] Fertiliser Fertiliser;
        [Link] private SoilNitrogenNO3 SoilNitrogenNO3;

        [Description("Type of fertiliser to apply? ")] 
        public Fertiliser.Types FertiliserType { get; set; }
    
        [Description("Threshold amount of NO3 to topup to (kg/ha)")]
        public double Threshold { get; set;}
        
        [EventSubscribe("DoManagement")]
        private void OnDoManagement(object sender, EventArgs e)
        {
            double Amount = Threshold - MathUtilities.Sum(SoilNitrogenNO3.kgha);
            Fertiliser.Apply(Amount: Amount, Type: FertiliserType);
        }
    }
}
```
  DataStore
    ExcelInput PhenoObs: FileNames=[Observations\Observed.xlsx]; SheetNames=[Observed]
    PredictedObserved: PredictedTableName=Report; ObservedTableName=Observed; FieldNameUsedForMatch=Zone; FieldName2UsedForMatch=Clock.Today; FieldName3UsedForMatch=CurrentSeason; AllColumns=false
      Tests: POName=PredictedObserved
        AcceptedStats:
          Name            n     Slope      Intercept  SEslope    SEintercept  R2         RMSE      NSE        ME         MAE        RSR
          BerryMass       47    0.498705   1.29291    0.140453   0.287119     0.218851   0.304353  -4.38478   0.270254   0.273544   2.29569
          BerryNum        46    0.326969   44.1227    0.172749   10.9368      0.0752897  15.2196   -0.803752  2.20099    12.4745    1.32836
          BudBurstDOY     52    0.363747   69.8711    0.292194   31.0835      0.0300629  11.5841   -3.86018   2.26923    9          2.18328
          BunchesPerVine  47    0.223697   49.3808    0.0459706  2.9971       0.344776   7.30888   0.29425    -0.778388  5.55235    0.831104
          f.rad.int       1319  0.592548   0.149686   0.021119   0.00898466   0.374117   0.126271  0.238098   -0.013327  0.0910711  0.872539
          FloweringDOY    52    0.59547    70.0874    0.166426   28.9438      0.203846   6.83599   -0.550296  -0.230769  5.57692    1.23308
          psw             578   0.694401   102.257    0.020363   4.48738      0.668753   52.6501   0.315113   37.7803    44.4182    0.826863
          transpiration   965   0.0900816  0.733349   0.0153528  0.0304933    0.0345158  1.28969   -0.904386  -0.861343  1.00372    1.37928
          VeraisonDOY     52    0.69358    72.749     0.121745   28.9877      0.393614   6.94622   0.164497   -0.173077  5.36538    0.905227
        AcceptedStatsName=Name n Slope Intercept SEslope SEintercept R2 RMSE NSE ME MAE RSR
  Folder ExampleSimulation
    Simulation BaseSim
      Weather: FileName=Site1003_SEA.met
      Clock: Start=2005-02-25; End=2020-05-01
      Summary
      SoilArbitrator Soil Arbitrator
      MicroClimate: a_interception=0; b_interception=1; c_interception=0; d_interception=0; soil_albedo=0.23; SoilHeatFluxFraction=0.4; MinimumHeightDiffForNewLayer=0; NightInterceptionFraction=0.5; ReferenceHeight=2
      RectangularZone Row: Length=100; Width=0.9; Slope=0; AspectAngle=0; Altitude=50
        Memo
          Double Guyôt-trained vines, pruned each year to retain 24 nodes were monitored. Vines were trained using vertical shoot positioning (VSP), with an exposed leaf area height of 1.2 m, and trimmed to maintain a compact canopy. Vines were planted 1.8 m apart within the row, and 2.4 m apart between rows. Average flowering date was determined by monitoring all the inflorescences on one cane on a vine in each plot on a regular basis throughout flowering. Likewise, regular berry samples (at least weekly) were taken from before the date of véraison until harvest at a soluble solids concentration value of 21.5 oBrix.
        Plant Grapevine: IsAlive=false; IsEnding=false; DaysAfterEnding=0
        Fertiliser
        SurfaceOrganicMatter: InitialResidueName=wheat_stubble; InitialResidueType=wheat; InitialResidueMass=10; InitialStandingFraction=0; InitialCPR=0; InitialCNR=30
        Irrigation
        Soil: Latitude=0; Longitude=0
          LayerStructure: Thickness=[200, 200, 200, 200, 200, 200, 400, 400, 400, 600]
          Physical
            Thickness  BD    AirDry  LL15  DUL   SAT
            200        1.35  0.1     0.2   0.35  0.45
            250        1.35  0.1     0.2   0.35  0.45
            300        1.4   0.15    0.15  0.35  0.4
            150        1.4   0.13    0.13  0.33  0.35
            150        1.4   0.1     0.1   0.28  0.35
            1950       1.59  0.06    0.06  0.1   0.3
            SoilCrop GrapevineSoil: LL=[0.2, 0.2, 0.15, 0.13, 0.1, 0.06]; KL=[0.25, 0.1, 0.08, 0.05, 0.05, 0.01]; XF=[1, 1, 1, 1, 1, 1]
            SoilCrop SlurpSoil: LL=[0.2, 0.2, 0.15, 0.13, 0.1, 0.06]; KL=[0.11, 0.11, 0.02, 0, 0, 0]; XF=[1, 1, 1, 1, 1, 1]
          WaterBalance SoilWater: SummerDate=1-Nov; SummerU=4; SummerCona=1; WinterDate=1-Apr; WinterU=4; WinterCona=1; DiffusConst=88; DiffusSlope=35.4; Salb=0.18; CN2Bare=68; CNRed=20; CNCov=0.8; DischargeWidth=0; CatchmentArea=0
            Thickness  SWCON  KLAT
            150        0.55   0
            150        0.55   0
            100        0.55   0
            200        0.55   0
            200        0.55   0
            200        0.55   0
            200        0.55   0
            200        0.55   0
            200        0.55   0
            200        0.55   0
            200        0.55   0
            200        0.55   0
            400        0.55   0
            400        0.55   0
          Organic: FOMCNRatio=30
            Thickness  Carbon  SoilCNRatio  FBiom  FInert  FOM
            100        1.82    11.5         0.025  0.3     1243.93
            200        1.47    11.5         0.025  0.4     833.832
            300        1.2     11.5         0.015  0.75    457.617
            300        1.03    11.5         0.01   0.9     251.145
            300        0.47    11.5         0.01   0.96    137.831
            300        0.47    11.5         0.01   0.96    75.6435
          Chemical
            Thickness  NO3N  NH4N  PH
            100        3     3     6.6
            200        2     1.5   6.2
            300        1     1.2   5.7
            300        1     1.1   5.5
            300        0     0     5.5
            300        0     0     5.5
          CERESSoilTemperature Temperature
          InitialWater Initial water: PercentMethod=0; FractionFull=1.14286; RelativeTo=LL15
          OutputLayers: Thickness=[150, 150, 150, 150, 150, 150, 150]
          Sample Initial conditions: Depth=[0-180]; Thickness=[1800]; NH4=[1]; SWUnits=Volumetric; OCUnits=Total; PHUnits=Water
          SoilNitrogen: fom_types=[default, manure, mucuna, lablab, shemp, stable]; fract_carb=[0.2, 0.3, 0.54, 0.57, 0.45, 0]; fract_cell=[0.7, 0.3, 0.37, 0.37, 0.47, 0.1]; fract_lign=[0.1, 0.4, 0.09, 0.06, 0.08, 0.9]; NPartitionApproach=0
            SoilNitrogenNO3 NO3
            SoilNitrogenNH4 NH4
            SoilNitrogenUrea Urea
            SoilNitrogenPlantAvailableNO3 PlantAvailableNO3
            SoilNitrogenPlantAvailableNH4 PlantAvailableNH4
        Manager SetupTreeRootZones
          UseExtraZone = True
```csharp
using Models.PMF.Organs;
using System;
using Models.Core;
using System.Collections.Generic;
using System.Text;
using Models.PMF;
using Models;
using System.Xml.Serialization;
using APSIM.Shared.Utilities;
using Models.Functions;

namespace Models
{
    [Serializable] 
    public class Script : Model
    {
        [Link] private Plant Grapevine;
        [Link] private Clock Clock;
        [Link] private Zone zone;
        [Link(Type = LinkType.Path, Path = "[Grapevine].Root")]
        private Root root;

        [Description("Use extra root zone")]
        public bool UseExtraZone { get; set; }

        
        [EventSubscribe("StartOfSimulation")]
        private void OnSimulationCommencing(object sender, EventArgs e)
        {
            if (UseExtraZone)
            {
            root.ZoneNamesToGrowRootsIn.Add("Alley");
            root.ZoneRootDepths.Add(2600);
			BiomassDemand InitialDM = new BiomassDemand();
			Constant InitStruct = new Constant();
			InitStruct.FixedValue = 10;
			InitialDM.Structural = InitStruct;
			Constant InitMetab = new Constant();
			InitMetab.FixedValue = 0;
			InitialDM.Metabolic = InitMetab;
			Constant InitStor = new Constant();
			InitStor.FixedValue = 0;
			InitialDM.Storage = InitStor;
            root.ZoneInitialDM.Add(InitialDM);

            }
        }
    }
}
```
        Manager PlantVariables
          FRadInt = 0
          ET = 0
          ES = 0
          PET = 0
          LAI = 0
          Height = 0
          RootDepth = 0
          PlantWidth = 0
```csharp
using Models.Climate;
using System;
using Models.Core;
using Models.PMF;
using System.Collections.Generic;
using Models.Soils;
using APSIM.Shared.Utilities;
using Models.Zones;
using Models.PMF.Organs;

namespace Models
{
    [Serializable]
    public class Script : Model
    {
        [Link] private Weather weather;
        [Link(Type = LinkType.Path, Path = "[Grapevine].Root")]
        private Root root;
        private RectangularZone AlleyZone {get; set; }
        private RectangularZone RowZone {get; set;}
        private RectangularZone ThisZone {get; set;}
        private double AreaWidth {get; set;}

        public double FRadInt {get; set;}
        public double ET {get; set;}
        public double ES {get; set;}
        public double PET {get; set;}
        public double LAI {get; set;}
        public double Height {get; set;}
        public double RootDepth {get; set;}
        public double PlantWidth {get; set;}

        [EventSubscribe("StartOfSimulation")]
        private void DoStartOfSimulation(object sender, EventArgs e)
        {
               
               ThisZone = this.Parent.Parent as RectangularZone;
               RowZone = this.Parent.Parent.Parent.FindInScope("Row") as RectangularZone;
               AlleyZone = (RectangularZone)this.Parent.Parent.Parent.FindInScope("Alley") as RectangularZone;
               AreaWidth = AlleyZone.Width + RowZone.Width;
               PlantWidth = 0;
        }
        
        [EventSubscribe("DoReportCalculations")]
        private void OnDoReportCalculations(object sender, EventArgs e)
        {
            if (ThisZone.Name == "Row")
                {
                FRadInt = ((double)RowZone.Get("Grapevine.Leaf.RadiationIntercepted") * RowZone.Width)/(weather.Radn * AreaWidth);
                ET = (double)RowZone.Get("Grapevine.Leaf.Transpiration") * RowZone.Width/AreaWidth;
                LAI = (double)RowZone.Get("Grapevine.Leaf.LAI");
                //LAIPerVine =  LAI*RowZone.Width*1.8;
                //TreeInitialisation.Script.VineDistance;
                //(double)RowZone.Get("Grapevine.Leaf.LAI");
                Height = (double)RowZone.Get("Grapevine.Leaf.Height");
                RootDepth = (double)RowZone.Get("Grapevine.Root.Depth");
                PlantWidth = (double)RowZone.Get("Grapevine.Leaf.Width");
                }
            else
                {
                FRadInt = ((double)AlleyZone.Get("Slurp.Leaf.RadiationIntercepted") * ThisZone.Width)/ (weather.Radn * AreaWidth);
                ET = (double)AlleyZone.Get("Slurp.Leaf.Transpiration") * ThisZone.Width/AreaWidth;
                LAI = (double)AlleyZone.Get("Slurp.Leaf.LAI");
                Height = (double)AlleyZone.Get("Slurp.Leaf.Height");
                RootDepth = (double)AlleyZone.Get("Slurp.Root.Depth");
                }

            ES = (double)ThisZone.Get("Soil.SoilWater.Es") * ThisZone.Width/AreaWidth;
            double PETWidth = Math.Min(Math.Max(PlantWidth,ThisZone.Width),AreaWidth);
            PET = (double)ThisZone.Get("Soil.SoilWater.Eo") * PETWidth/AreaWidth;
        }
    }
}
```
        Manager DripIrrigator
          FertilizeDAWS = 100
          Amount = 30
          totalIrrigation = 0
```csharp
using Models.Climate;
using System;
using Models.Core;
using System.Collections.Generic;
using System.Text;
using Models.Soils;
using Models.PMF;
using Models;
using System.Xml.Serialization;
using APSIM.Shared.Utilities;

namespace Models
{
    [Serializable] 
    public class Script : Model
    {
       [Link] Irrigation irrigation;
       [Link] Clock Clock;
       [Link] Fertiliser Fertiliser;
       [Link] Summary Summary;
       [Link] Weather weather;

        [Description("Fertilize_DAWS")]
         public int FertilizeDAWS { get; set; }
        [Description("Amount of fertiliser to be applied")]
        public double Amount { get; set; }

       [EventSubscribe("DoManagement")]
        private void OnDoManagement(object sender, EventArgs e)
        {
          if (weather.DaysSinceWinterSolstice == FertilizeDAWS)
           Fertiliser.Apply(Amount: Amount, Type: Fertiliser.Types.NO3N);
        }


       public void applyDripIrri(double amount)
        {
            double layerAmount = amount/4;
            irrigation.Apply(layerAmount, 0);
            irrigation.Apply(layerAmount*2, 220);
            irrigation.Apply(layerAmount, 420);

        }
        public double totalIrrigation {get; set;}
        [EventSubscribe("Irrigated")]
        private void OnIrrigated(object sender, 
        IrrigationApplicationType irrigData)
        {
            totalIrrigation += irrigData.Amount;
         }
    }
}
```
        Manager HarvestNPruning
          LeafPluckingDAWS = 205
          HarvestDAWS = 290
          PruningDAWS = 314
          FrostDate1 = 10/03/2002 00:00:00
          FrostDate2 = 11/18/2002 00:00:00
```csharp
using Newtonsoft.Json;
using Models.PMF.Struct;
using Models.Climate;
using System;
using System.Collections.Generic;
using Models.Core;
using Models.PMF;
using Models.PMF.Interfaces;
using System.Xml.Serialization;
using Models.PMF.Organs;
using Models.PMF.Phen;

namespace Models
{
    [Serializable] 
    [System.Xml.Serialization.XmlInclude(typeof(Model))]
    public class Script : Model
    {
        [Link] private Plant Grapevine;
        [Link] private Clock Clock;
        [Link] private Zone zone;
        [Link] private Weather weather;
        [Link]
        private Root root;
        [Link(Type = LinkType.Path, Path = "[Grapevine].Structure")]
        private Structure structure;
        [Link(Type = LinkType.Path, Path = "[Grapevine].Phenology")]
        private Phenology phenology;
       
        [Description("SummerPruning_DAWS")]         
        public int LeafPluckingDAWS { get; set; }  //day

        [Description("Harvest_DAWS")]
        public int HarvestDAWS { get; set; }

        [Description("Pruning_DAWS")]         
        public int PruningDAWS { get; set; }  //day

        [Description("Frost Date 1")]
        public DateTime FrostDate1 { get; set; }
        [Description("Frost Date 2")]
        public DateTime FrostDate2 { get; set; }


        [JsonIgnore] private RemovalFractions Remove_1 { get; set; }
        [JsonIgnore] private RemovalFractions Remove_2 { get; set; }
        [JsonIgnore] private RemovalFractions Remove_3 { get; set; }
        [JsonIgnore] private RemovalFractions Remove_4 { get; set; }
        [JsonIgnore] private RemovalFractions Remove_5 { get; set; }
        [EventSubscribe("StartOfSimulation")]
        private void OnSimulationCommencing(object sender, EventArgs e)
        {
            Remove_1 = new RemovalFractions();
            Remove_2 = new RemovalFractions();
            Remove_3 = new RemovalFractions();
            Remove_4 = new RemovalFractions();
            Remove_5 = new RemovalFractions();
        }
        
        [EventSubscribe("DoManagement")]
        private void OnDoManagement(object sender, EventArgs e)
        {
             //Set up  array of remove fractions to send with Cut method.  Each member in the array corresponds to an organ in the same order they are set up in.
             //PruneDate = DateTime.Parse(PruneDateString);
             if (weather.DaysSinceWinterSolstice == LeafPluckingDAWS && phenology.Stage >= 3)
             {
                    
                //int LeafTipsAppeared = (int)structure.LeafTipsAppeared;
                //int NodesToRemove = (int)Math.Max(LeafTipsAppeared - TargetLeafRank, 1); 
                double FractionToRemove = 0.3; //1- TargetLeafRank/LeafTipsAppeared;
            
                Remove_1.SetFractionToRemove("Leaf", 0, "live");
                Remove_1.SetFractionToRemove("Shoot", 0);
                Remove_1.SetFractionToRemove("Cane", 0);
                Remove_1.SetFractionToRemove("Trunk", 0);
                Remove_1.SetFractionToRemove("Root", 0);
                Remove_1.SetFractionToRemove("StructuralRoot", 0);
                Remove_1.SetFractionToRemove("Berry", 0);
            
                Remove_1.SetFractionToResidue("Leaf", FractionToRemove, "live");
                Remove_1.SetFractionToResidue("Shoot", FractionToRemove);
                Remove_1.SetFractionToResidue("Cane", 0);
                Remove_1.SetFractionToResidue("Trunk", 0);
                Remove_1.SetFractionToResidue("Root", 0);
                Remove_1.SetFractionToRemove("StructuralRoot", 0);
                Remove_1.SetFractionToResidue("Berry", 0);
            
               // Remove_1.NodesToRemove = NodesToRemove;
                Grapevine.RemoveBiomass("LeafPluck", Remove_1);
        
             }

           if (weather.DaysSinceWinterSolstice == HarvestDAWS && phenology.Stage >= 3)
           {
               
               Remove_2.SetFractionToRemove("Leaf", 0, "live");
               Remove_2.SetFractionToRemove("Shoot",  0);
               Remove_2.SetFractionToRemove("Cane", 0);
               Remove_2.SetFractionToRemove("Trunk",  0);
               Remove_2.SetFractionToRemove("Root",   0);
               Remove_2.SetFractionToRemove("StructuralRoot", 0);
               Remove_2.SetFractionToRemove("Berry",  1);
         
               Remove_2.SetFractionToResidue("Leaf",   0.2, "live");
               Remove_2.SetFractionToResidue("Shoot",  0);
               Remove_2.SetFractionToResidue("Cane", 0);
               Remove_2.SetFractionToResidue("Trunk",  0);
               Remove_2.SetFractionToResidue("Root",   0);
               Remove_2.SetFractionToRemove("StructuralRoot", 0);
               Remove_2.SetFractionToResidue("Berry",  0);
         
               Grapevine.RemoveBiomass("LeafPluck", Remove_2);
           }
                                   
            if (weather.DaysSinceWinterSolstice == PruningDAWS&& phenology.Stage >= 3)
            {
                Remove_3.SetPhenologyStage = 1;

                Remove_3.SetFractionToRemove("Leaf",   0, "live");
                Remove_3.SetFractionToRemove("Shoot",  0);
                Remove_3.SetFractionToRemove("Cane", 0);
                Remove_3.SetFractionToRemove("Trunk",  0);
                Remove_3.SetFractionToRemove("Root",   0);
                Remove_3.SetFractionToRemove("Berry",  0);

                Remove_3.SetFractionToResidue("Leaf",   1, "live");
                Remove_3.SetFractionToResidue("Shoot",  1);
                Remove_3.SetFractionToResidue("Cane", 1);
                Remove_3.SetFractionToResidue("Trunk",  0);
                Remove_3.SetFractionToResidue("Root",   0);
                Remove_3.SetFractionToRemove("StructuralRoot", 0);
                Remove_3.SetFractionToResidue("Berry",  1);

                Grapevine.RemoveBiomass("Prune", Remove_3);

                double caneBiomass = 96.9; //g/m2 reset the cane biomass to the original value 
                double caneNSC = caneBiomass * 0.18;

                zone.Set("[Grapevine].Cane.Live.StorageWt", caneNSC);                
                zone.Set("[Grapevine].Cane.Live.StructuralWt", caneBiomass - caneNSC); 

                //zone.Set("[Grapevine].Trunk.Live.StructuralWt", 280);     
               // zone.Set("[Grapevine].Trunk.Live.StorageWt", 70);     

               // zone.Set("[Grapevine].Root.Live.StructuralWt", 1531);     
               // zone.Set("[Grapevine].Root.Live.StorageWt",  349);     

            }
           if (Clock.Today.Date == FrostDate1)      
           {
              Remove_4.SetFractionToRemove("Leaf", 0, "live");
              Remove_4.SetFractionToRemove("Shoot",  0);
              Remove_4.SetFractionToRemove("Cane", 0);
              Remove_4.SetFractionToRemove("Trunk",  0);
              Remove_4.SetFractionToRemove("Root",   0);
              Remove_4.SetFractionToRemove("StructuralRoot", 0);
              Remove_4.SetFractionToRemove("Berry",  0);
           //
              Remove_4.SetFractionToResidue("Leaf",   0.2, "live");
              Remove_4.SetFractionToResidue("Shoot",  0);
              Remove_4.SetFractionToResidue("Cane", 0);
              Remove_4.SetFractionToResidue("Trunk",  0);
              Remove_4.SetFractionToResidue("Root",   0);
              Remove_4.SetFractionToRemove("StructuralRoot", 0);
              Remove_4.SetFractionToResidue("Berry",  0);
           //
              Grapevine.RemoveBiomass("LeafPluck", Remove_4);
              zone.Set("[Grapevine].Structure.FinalLeafNumber.FixedValue", 28); 
           //
           }  

           if (Clock.Today.Date == FrostDate2)      
           {
              Remove_5.SetFractionToRemove("Leaf", 0, "live");
              Remove_5.SetFractionToRemove("Shoot",  0);
              Remove_5.SetFractionToRemove("Cane", 0);
              Remove_5.SetFractionToRemove("Trunk",  0);
              Remove_5.SetFractionToRemove("Root",   0);
              Remove_5.SetFractionToRemove("StructuralRoot", 0);
              Remove_5.SetFractionToRemove("Berry",  0);
           //
              Remove_5.SetFractionToResidue("Leaf",   0.2, "live");
              Remove_5.SetFractionToResidue("Shoot",  0);
              Remove_5.SetFractionToResidue("Cane", 0);
              Remove_5.SetFractionToResidue("Trunk",  0);
              Remove_5.SetFractionToResidue("Root",   0);
              Remove_5.SetFractionToRemove("StructuralRoot", 0);
              Remove_5.SetFractionToResidue("Berry",  0);
           //
              Grapevine.RemoveBiomass("LeafPluck", Remove_5);
           //
           }  

        }
    }
}
```
        Manager AutoIrrigationBasedOnWaterDeficit
          FASW = 0
          WaterDeficit = 0
          StartDate = 1-nov
          EndDate = 1-mar
          FASWThreshold = 0.6
          FASWDepth = 1500
          Amount = 20
          script: same as in Replacements.AutoIrrigationBasedOnWaterDeficit
        Manager Fertilise on fixed dates
          FertiliserType = NH4NO3N
          FertiliserDates = 1-Nov, 1-Feb
          Amount = 15
          AmountType = True
          script: same as in Replacements.Fertilise on fixed dates
        Manager Reset on date: same as Replacements.Reset on date
        Report: EventNames=[Clock].DoReport
          VariableNames:
            [Clock].Today
            [Clock].Today.Year
            [Clock].Today.DayOfYear
            [Weather].DaysSinceWinterSolstice   as DAWS
            [PlantVariables].Script.Height 		as height
            [PlantVariables].Script.LAI         as lai
            [PlantVariables].Script.FRadInt     as f.rad.int
            [PlantVariables].Script.ET          as transpiration
            [PlantVariables].Script.ES          as Es
            [PlantVariables].Script.PET         as PET
            [PlantVariables].Script.RootDepth   as rootDepth
            [Soil].OutputLayers.SW
            sum([Soil].OutputLayers.SWmm)       as psw
            [Weather].Rain
            [Irrigation].IrrigationApplied
            [Soil].SoilWater.Drainage
            [Grapevine].Phenology.CurrentSeason as CurrentSeason
            [Grapevine].Phenology.Stage
            [Grapevine].Phenology.AccumulatedEmergedTT
            [Grapevine].Phenology.BudBurstDOY      as BudBurstDAWS
            [Grapevine].Phenology.FloweringDOY     as FloweringDAWS
            [Grapevine].Phenology.VeraisonDOY      as VeraisonDAWS
            [Grapevine].Phenology.CurrentStageName as CurrentStageName
            [Grapevine].Phenology.AccumulatedChillingUnitBeforeWinterPruning
            [Grapevine].Structure.PrimaryBudNo
            [Grapevine].Structure.MainStemPopn
            [Grapevine].Structure.LeafTipsAppeared
            [Grapevine].Structure.TotalLeavesPerShoot as leaf.no.shoot
            [Grapevine].Leaf.InitialisedCohortNo
            [Grapevine].Leaf.DeadCohortNo
            [Grapevine].Leaf.AppearedCohortNo
            [Grapevine].Leaf.CohortSize
            [Grapevine].Leaf.LAI as LAI
            [Grapevine].Leaf.LAI/[Grapevine].Population             as leaf.area.vine
            [Grapevine].Leaf.LAI/[Grapevine].Structure.MainStemPopn as leaf.area.shoot
            [Grapevine].Leaf.LAIMainStem/[Grapevine].Structure.MainStemPopn as leaf.area.shoot.main
            [Grapevine].Leaf.LAIBranch/[Grapevine].Structure.MainStemPopn as leaf.area.shoot.lateral
            [Grapevine].Leaf.Fn
            [Grapevine].Leaf.Fw
            [Grapevine].Leaf.Live.Wt
            [Grapevine].Leaf.Live.Wt/[Grapevine].Structure.MainStemPopn as leaf.dw.shoot
            [Grapevine].Shoot.Live.Wt
            [Grapevine].Shoot.Live.Wt/[Grapevine].Structure.MainStemPopn as shoot.dw
            [Grapevine].Shoot.Live.StructuralWt
            [Grapevine].Shoot.Live.StorageWt
            [Grapevine].Cane.Live.Wt
            [Grapevine].Cane.Live.StructuralWt
            [Grapevine].Cane.Live.StorageWt
            [Grapevine].Trunk.Live.Wt
            [Grapevine].Trunk.Live.StructuralWt
            [Grapevine].Trunk.Live.StorageWt
            [Grapevine].Trunk.Live.StorageWt/[Grapevine].Trunk.Live.Wt as total.NSC.concentration.trunk
            [Grapevine].Root.Live.Wt
            [Grapevine].StructuralRoot.Live.Wt
            [Grapevine].StructuralRoot.Live.StructuralWt
            [Grapevine].StructuralRoot.Live.StorageWt
            [Grapevine].StructuralRoot.Live.StorageWt/[Grapevine].StructuralRoot.Live.Wt as total.NSC.concentration.root
            [Grapevine].Arbitrator.FDM
            [Grapevine].Arbitrator.DM.TotalFixationSupply
            [Grapevine].Berry.Live.Wt
            [Grapevine].Berry.SingleBerryDW
            [Grapevine].Berry.SingleBerryFW     as berry.fw.mean
            [Grapevine].Berry.TotalBerryFW
            [Grapevine].Berry.NumberFunction
            [Grapevine].Berry.ThermalTimeAfterFlowering
            [Grapevine].Berry.WaterContent
            [Grapevine].Berry.Brix 				as brix
            [Grapevine].Berry.TitratableAcid 	as ta
            [Grapevine].Berry.MetFactors.BUN_TmaxIni_Record    as BUN_TmaxIni
            [Grapevine].Berry.MetFactors.BUN_RadIni_Record     as BUN_RadIni
            [Grapevine].Berry.MetFactors.BEN_RainTotFlow as BEN_RainTotFlow
            [Grapevine].Berry.MetFactors.BEN_TmaxIni_Record    as BEN_TmaxIni_Record
            [Grapevine].Berry.MetFactors.BEN_TmeanFlow   as BEN_TmeanFlow
            [Grapevine].Berry.MetFactors.BM_RadFlow      as BM_RadFlow
            [Grapevine].Berry.MetFactors.BM_RainTotFlow  as BM_RainTotFlow
            [Grapevine].Berry.MetFactors.BM_RainTotVer   as BM_RainTotVer
            [Grapevine].Berry.MetFactors.BM_TmeanFlow    as BM_TmeanFlow
            [Grapevine].Berry.YieldComponent.BunchesPerShoot as bunch.no.shoot
            [Grapevine].Berry.YieldComponent.BunchesPerVine  as bunch.no.vine
            [Grapevine].Berry.YieldComponent.BerryNum    as BerryNum
            [Grapevine].Berry.YieldComponent.BerryMass   as berry.fw.est
            [Grapevine].Berry.YieldPerVine               as yield.per.vine
        Manager TreeInitialisation
          CultivarName = SauvignonBlanc
          SowingDate = 02/25/2005 00:00:00
          VineDistance = 1.8
          BudNumber = 48
          CaneNumber = 4
          CaneDiameter = 10
          CaneLength = 0.9
          TrunkDiameter = 40
          TrunkLength = 0.8
          RootTrunkRatio = 1
          RootNSC = 0.2
          TrunkNSC = 0.2
          CaneNSC = 0.2
          StartAge = 3
```csharp
using Models.PMF.Phen;
using Models.Zones;
using Models.Soils;
using APSIM.Shared.Utilities;
using Models.PMF;
using Models.Core;
using System;
using Models.PMF.Struct;
        
namespace Models
{
    [Serializable] 
    [System.Xml.Serialization.XmlInclude(typeof(Model))]
    public class Script : Model
    {
        [Link] private Plant Grapevine;
        [Link] private Clock Clock;
        [Link] private Soil Soil;
        [Link] private Zone zone;
        [Link]
        private Structure structure;
        [Link]
        private Phenology phenology;

        [Display(Type = DisplayType.CultivarName)]
        [Description("Plant Type")]
        public string CultivarName { get; set; }

        [Description("Initialisation Date")]
        public DateTime SowingDate { get; set; }

        [Description("Vine distance(m)")]
        public double VineDistance { get; set; }
        //number of buds lay down in cane and spur. there is a function inside to calculate the number of buds per vine based on bud burst and from cane head
        [Description("Bud number(#)")]
        public double BudNumber { get; set; }
        //cane or spur biomass
        [Description("Cane number(#)")]
        public double CaneNumber { get; set; }
      
        [Description("Cane diameter(mm)")]
        public double CaneDiameter { get; set; }

        [Description("Cane length(m)")]
        public double CaneLength { get; set; }
        //trunk information
        [Description("Trunk diameter(mm)")]
        public double TrunkDiameter { get; set; }

        [Description("Trunk length(m)")]
        public double TrunkLength { get; set; }
        //root dry matter
        [Description("Fibrous root trunk ratio")]
        public double RootTrunkRatio { get; set; }
             
        //total nonstructural fraction in dry matter 
        [Description("Fibrous root nonstructural carbon fraction")]
        public double RootNSC { get; set; }

        [Description("Trunk nonstructural carbon fraction")]
        public double TrunkNSC { get; set; }

        [Description("Cane nonstructural carbon fraction")]
        public double CaneNSC { get; set; }

        [Description("Age of trees (in Years) at start of simulation)")]
        public int StartAge {get;set;}

        private RectangularZone RowZone {get; set;}

        [EventSubscribe("DoManagement")]
        private void OnDoManagement(object sender, EventArgs e)
        {
            if (Clock.Today.Date == SowingDate)
            {
                RowZone = this.Parent.Parent.Parent.FindInScope("Row") as RectangularZone;
                double pop = 1/RowZone.Width/VineDistance;  
                //sowing method
                Grapevine.Sow(cultivar: CultivarName,population: pop, 
                depth: 2000, rowSpacing: RowZone.Width, budNumber:BudNumber);
                double budsPerMeterRow = BudNumber/VineDistance; 
                zone.Set("[Grapevine].Structure.BudsPerMeterRow.FixedValue", budsPerMeterRow); 
                //cane biomass
                //calculate the biomass by length 1 meter time number of canes time wood density (0.5 g/mm2/m) * pop to covert the biomass into g/m2
                double woodDensity = 0.4; //g/mm2/m
                double CaneNumber = BudNumber/12; //recalculating cane number as we 
                double caneBiomass = 3.1415926*(CaneDiameter/2)*(CaneDiameter/2)*CaneLength*CaneNumber *woodDensity * pop; 
                double caneNSC = caneBiomass * CaneNSC;
                zone.Set("[Grapevine].Cane.CaneDiameter.FixedValue", CaneDiameter);
                zone.Set("[Grapevine].Cane.CaneLength.FixedValue", CaneLength);
                zone.Set("[Grapevine].Cane.CaneNumber.FixedValue", CaneNumber);

                zone.Set("[Grapevine].Cane.Live.StorageWt", caneNSC);                
                zone.Set("[Grapevine].Cane.Live.StructuralWt", caneBiomass - caneNSC);                

                //trunk biomass
                double trunkDensity = 0.5; //g/mm2/m
                double trunkBiomass = 3.1415926*(TrunkDiameter/2)*(TrunkDiameter/2)*TrunkLength *trunkDensity * pop; 
                double trunkNSC = trunkBiomass * TrunkNSC;

                zone.Set("[Grapevine].Trunk.TrunkDiameter.FixedValue", TrunkDiameter);
                zone.Set("[Grapevine].Trunk.TrunkLength.FixedValue", TrunkLength);

                zone.Set("[Grapevine].Trunk.Live.StorageWt", trunkNSC); 
                zone.Set("[Grapevine].Trunk.Live.StructuralWt", trunkBiomass - trunkNSC);              
                

                //Fibrous Root biomass is  per plant
                double rootBiomass = RootTrunkRatio * trunkBiomass; 
                double rootNSC = rootBiomass * RootNSC; 
                // zone.Set("[Grapevine].StructuralRoot.DMDemands.Structural.RootTrunkRatio",  RootTrunkRatio); 
                
                 zone.Set("[Grapevine].StructuralRoot.Live.StorageWt",    rootNSC ); //rootNSC*pop
                 zone.Set("[Grapevine].StructuralRoot.Live.StructuralWt", rootBiomass - rootNSC); 

                object StartAgeValue = StartAge;
                zone.Set("[Grapevine].Phenology.Age.Years",StartAgeValue);


            }
        }
    }
}
```
      RectangularZone Alley: Length=100; Width=1.5; Slope=0; AspectAngle=0; Altitude=50
        Report ReportAlley: EventNames=[Clock].DoReport
          VariableNames:
            [Clock].Today
            [Clock].Today.Year
            [Clock].Today.DayOfYear
            [Weather].DaysSinceWinterSolstice   as DAWS
            [PlantVariables].Script.Height 		as height
            [PlantVariables].Script.LAI         as lai
            [PlantVariables].Script.FRadInt     as f.rad.int
            [PlantVariables].Script.ET          as transpiration
            [PlantVariables].Script.ES          as Es
            [PlantVariables].Script.PET         as PET
            [PlantVariables].Script.RootDepth   as rootDepth
            [Soil].OutputLayers.SW
            sum([Soil].OutputLayers.SWmm)       as psw
            [Weather].Rain
            [Irrigation].IrrigationApplied
            [Soil].SoilWater.Drainage
        SurfaceOrganicMatter: InitialResidueName=wheat_stubble; InitialResidueType=wheat; InitialResidueMass=10; InitialStandingFraction=0; InitialCPR=0; InitialCNR=30
        Plant Slurp
        Fertiliser
        Irrigation
        Manager PastureInitialisation
          CultivarName = StaticCrop
          InitialRootDepth = 2000
          SowingDate = 02/25/2005 00:00:00
          RootDepth = 2000
          RFV = 10
          KLReductionFactor = -0.001
          KLReductionDepth = 150
          YKLModifiers =
          XDepth =
          MaxG = 0.004
          R50 = 150
```csharp
using Models.Interfaces;
using Models.PMF.Organs;
using System;
using Models.Core;
using Models.PMF;
using APSIM.Shared.Utilities;
using Models.Soils;
        
namespace Models
{
    [Serializable] 
    [System.Xml.Serialization.XmlInclude(typeof(Model))]
    public class Script : Model
    {
        [Link] private Plant Slurp;
        [Link] private Clock Clock;
        [Link] private Soil Soil;
        [Link] private Zone zone;
        [Link(Type = LinkType.Path, Path = "[Slurp].Root")]
        private Root root;
        [Link]
        private IPhysical soilPhysical;

        [Display(Type = DisplayType.CultivarName)]
        [Description("Plant Type")]
        public string CultivarName { get; set; }
        [Description("Initial Root Depth")]
        public double InitialRootDepth { get; set; }
        [Description("Initialisation Date")]
        public DateTime SowingDate { get; set; }
        [Description("Maximum Root Depth")]
        public double RootDepth { get; set; }
        [Description("Roof Front Velocity")]
        public double RFV { get; set; }
        [Description("Factor to change Kl modifier with Depth")]
        public double KLReductionFactor { get; set; }
        [Description("Depth that KL starts to decline")]
        public double KLReductionDepth { get; set; }
        
        public double[] YKLModifiers { get; set; }
        public double[] XDepth { get; set; }
        private double Depth { get; set; }
        
        [Description("Maximum Stomatal Conductance")]
        public double MaxG { get; set; }
        [Description("Stomatal Radn response")]
        public double R50 { get; set; }
        
        [EventSubscribe("DoManagement")]
        private void OnDoManagement(object sender, EventArgs e)
        {
            if (Clock.Today.Date == SowingDate)
            {
                Slurp.Sow(cultivar: CultivarName, population: 1, depth: InitialRootDepth, rowSpacing: 150);
                
                YKLModifiers = new double[soilPhysical.Thickness.Length];
                XDepth = new double[soilPhysical.Thickness.Length];
                Depth = 0;
                for (int layer = 0; layer < soilPhysical.Thickness.Length; layer++)
                {
                    Depth += soilPhysical.Thickness[layer] / 2;  //Add half of the thickness of the current layer so depth is the mid depth of that layer
                    if (Depth <= KLReductionDepth)
                    {
                        YKLModifiers[layer] = 1;
                        XDepth[layer] = Depth;
                    }
                    else
                    {
                        double KLMod = 1 * Math.Exp(-KLReductionFactor * (Depth - KLReductionDepth));
                        YKLModifiers[layer] = KLMod;
                        XDepth[layer] = Depth;
                    }
                    Depth += soilPhysical.Thickness[layer] / 2;  //Add the other half of the current layer so depth is the top of the next layer
                }
                object KLMods = YKLModifiers;
                zone.Set("Slurp.Root.KLModifier.XYPairs.Y", KLMods);
                object Depths = XDepth;
                zone.Set("Slurp.Root.KLModifier.XYPairs.X", Depths);
                object RD = RootDepth;
                zone.Set("Slurp.Root.MaximumRootDepth.FixedValue", RD);
                object RV = RFV;
                zone.Set("Slurp.Root.RootFrontVelocity.Potential.FixedValue", RV);
                object GMaxValue = MaxG;
                zone.Set("Slurp.Leaf.Gsmax350", GMaxValue); 
                object R50Value = R50; 
                zone.Set("Slurp.Leaf.R50", R50Value); 
                
            }
        }
    }
}
```
        Manager SetPastureVariables
          Ext_coef = 0.6
          MaximumHeight = 300
          MinimumHeight = 100
          Cover = 0
          LAI = 0
```csharp
using Models.Climate;
using System;
using Models.Core;
using System.Collections.Generic;
using System.Text;
using Models.PMF;
using Models;
using System.Xml.Serialization;
using APSIM.Shared.Utilities;
using System.Data;

namespace Models
{
    [Serializable] 
    //[System.Xml.Serialization.XmlInclude(typeof(Model))]
    public class Script : Model
    {
        [Link] Plant Slurp;
        [Link] Clock Clock;
        [Link] Zone zone;
        [Link] Weather weather;

        
        [Description("Extinction coefficient")]
        public  double Ext_coef { get; set; }
        [Description("Maximum height of leaves")]
        public double MaximumHeight { get; set; }
        [Description("Minimum height of leaves")]
        public double MinimumHeight { get; set; }
        
        public double Cover {get; private set;}
        public double LAI { get; private set; }
                
        [EventSubscribe("StartOfSimulation")]
        private void OnStartOfSimulation(object sender, EventArgs e)
        {
            Cover = 0.5;
        }
        
        [EventSubscribe("StartOfDay")]
        private void OnStartOfDay(object sender, EventArgs e)
        {
            Cover += weather.MeanT * 0.001;

            if (Cover >= 1.0)
            {
                Cover = 0.5;        
            }

              LAI = Math.Log(1 - Cover) / -Ext_coef;

            object LAIResetValue = LAI;
            zone.Set("Slurp.Leaf.Area.FixedValue", LAIResetValue);  
            object HeightResetValue = MinimumHeight + Cover * (MaximumHeight-MinimumHeight);
            zone.Set("Slurp.Leaf.Tallness.FixedValue", HeightResetValue);  
        }
    }
}
```
        Manager SetupPastureRootZones
          UseExtraZone = True
```csharp
using Models.PMF.Organs;
using System;
using Models.Core;
using System.Collections.Generic;
using System.Text;
using Models.PMF;
using Models;
using System.Xml.Serialization;
using APSIM.Shared.Utilities;
using Models.Functions;

namespace Models
{
    [Serializable] 
    public class Script : Model
    {
        [Link] private Plant Slurp;
        [Link] private Clock Clock;
        [Link] private Zone zone;
        [Link(Type = LinkType.Path, Path = "[Slurp].Root")]
        private Root root;

        [Description("Use extra root zone")]
        public bool UseExtraZone { get; set; }

        
        [EventSubscribe("StartOfSimulation")]
        private void OnSimulationCommencing(object sender, EventArgs e)
        {
            if (UseExtraZone)
            {
            root.ZoneNamesToGrowRootsIn.Add("Row");
            root.ZoneRootDepths.Add(600);
BiomassDemand InitialDM = new BiomassDemand();
Constant InitStruct = new Constant();
InitStruct.FixedValue = 10;
InitialDM.Structural = InitStruct;
Constant InitMetab = new Constant();
InitMetab.FixedValue = 0;
InitialDM.Metabolic = InitMetab;
Constant InitStor = new Constant();
InitStor.FixedValue = 0;
InitialDM.Storage = InitStor;
            root.ZoneInitialDM.Add(InitialDM);

            }
        }
    }
}
```
        Operations WinterRainfall
          2002-05-28  [Irrigation].Apply(200);
        Manager PlantVariables
```csharp
using Models.Core;
using System;

namespace Models
{
    [Serializable]
    public class Script : Model
    {
        
    }
}
```
        Manager Reset on date: same as Replacements.Reset on date
        Soil: same as ExampleSimulation.BaseSim.Row.Soil
  Folder Validation
    Folder Sauvignonblanc
      Experiment RetainedNodeNum
        Factors
          Factor Node: Specification=[TreeInitialisation].Script.BudNumber = 24, 36, 48, 60, 72
        Simulation RetainedNodNum
          Clock: Start=2005-02-25; End=2012-05-02
          Summary SummaryFile
          Weather: FileName=Blenheim.met
          MicroClimate: a_interception=0; b_interception=1; c_interception=0; d_interception=0; soil_albedo=0.3; SoilHeatFluxFraction=0.4; MinimumHeightDiffForNewLayer=0; NightInterceptionFraction=0.5; ReferenceHeight=2
          SoilArbitrator Soil Arbitrator
          RectangularZone Row: Length=100; Width=0.9; Slope=0; AspectAngle=0; Altitude=50
            Report: EventNames=[Clock].DoReport
            Memo: same as ExampleSimulation.BaseSim.Row.Memo
            Plant Grapevine: IsAlive=false; IsEnding=false; DaysAfterEnding=0
            Manager TreeInitialisation: same as ExampleSimulation.BaseSim.Row.TreeInitialisation
            Irrigation
            Fertiliser
            SurfaceOrganicMatter: InitialResidueName=wheat_stubble; InitialResidueType=wheat; InitialResidueMass=10000; InitialStandingFraction=0; InitialCPR=0; InitialCNR=20
            Manager SetupTreeRootZones
              UseExtraZone = True
              script: same as in ExampleSimulation.BaseSim.Row.SetupTreeRootZones
            Operations VineIrrigation
            Operations WinterRainfall
              2006-08-26  [Irrigation].Apply(45);
            Manager PlantVariables
              FRadInt = 0
              ET = 0
              ES = 0
              PET = 0
              LAI = 0
              LAIPerVine = 0
              Height = 0
              RootDepth = 0
              PlantWidth = 0
```csharp
using Models.PMF.Organs;
using Models.Zones;
using APSIM.Shared.Utilities;
using Models.Soils;
using System.Collections.Generic;
using Models.PMF;
using Models.Core;
using System;
using Models.Climate;

namespace Models
{
    [Serializable]
    public class Script : Model
    {
        [Link] private Weather weather;
        [Link(Type = LinkType.Path, Path = "[Grapevine].Root")]
        private Root root;
        private RectangularZone AlleyZone {get; set; }
        private RectangularZone RowZone {get; set;}
        private RectangularZone ThisZone {get; set;}
        private double AreaWidth {get; set;}

        public double FRadInt {get; set;}
        public double ET {get; set;}
        public double ES {get; set;}
        public double PET {get; set;}
        public double LAI {get; set;}
        public double LAIPerVine {get; set;}
        public double Height {get; set;}
        public double RootDepth {get; set;}
        public double PlantWidth {get; set;}

        [EventSubscribe("StartOfSimulation")]
        private void DoStartOfSimulation(object sender, EventArgs e)
        {
               
               ThisZone = this.Parent.Parent as RectangularZone;
               RowZone = this.Parent.Parent.Parent.FindInScope("Row") as RectangularZone;
               AlleyZone = (RectangularZone)this.Parent.Parent.Parent.FindInScope("Alley") as RectangularZone;
               AreaWidth = AlleyZone.Width + RowZone.Width;
               PlantWidth = 0;
        }
        
        [EventSubscribe("DoReportCalculations")]
        private void OnDoReportCalculations(object sender, EventArgs e)
        {
            if (ThisZone.Name == "Row")
                {
                FRadInt = ((double)RowZone.Get("Grapevine.Leaf.RadIntTot") * RowZone.Width)/(weather.Radn * AreaWidth);
                ET = (double)RowZone.Get("Grapevine.Leaf.Transpiration") * RowZone.Width/AreaWidth;
                LAI = (double)RowZone.Get("Grapevine.Leaf.LAI");
                LAIPerVine =  LAI*RowZone.Width*1.8;
                //TreeInitialisation.Script.VineDistance;
                //(double)RowZone.Get("Grapevine.Leaf.LAI");
                Height = (double)RowZone.Get("Grapevine.Leaf.Height");
                RootDepth = (double)RowZone.Get("Grapevine.Root.Depth");
                PlantWidth = (double)RowZone.Get("Grapevine.Leaf.Width");
                }
            else
                {
                FRadInt = ((double)AlleyZone.Get("Slurp.Leaf.RadIntTot") * ThisZone.Width)/ (weather.Radn * AreaWidth);
                ET = (double)AlleyZone.Get("Slurp.Leaf.Transpiration") * ThisZone.Width/AreaWidth;
                LAI = (double)AlleyZone.Get("Slurp.Leaf.LAI");
                Height = (double)AlleyZone.Get("Slurp.Leaf.Height");
                RootDepth = (double)AlleyZone.Get("Slurp.Root.Depth");
                }

            ES = (double)ThisZone.Get("Soil.SoilWater.Es") * ThisZone.Width/AreaWidth;
            double PETWidth = Math.Min(Math.Max(PlantWidth,ThisZone.Width),AreaWidth);
            PET = (double)ThisZone.Get("Soil.SoilWater.Eo") * PETWidth/AreaWidth;
        }
    }
}
```
            Manager HarvestNPruning
              LeafPluckingDAWS = 205
              HarvestDAWS = 305
              PruningDAWS = 341
              FrostDate1 = 10/03/2002 00:00:00
              FrostDate2 = 11/18/2002 00:00:00
```csharp
using Newtonsoft.Json;
using Models.PMF.Struct;
using Models.Climate;
using System;
using System.Collections.Generic;
using Models.Core;
using Models.PMF;
using Models.PMF.Interfaces;
using System.Xml.Serialization;
using Models.PMF.Organs;
using Models.PMF.Phen;

namespace Models
{
    [Serializable] 
    [System.Xml.Serialization.XmlInclude(typeof(Model))]
    public class Script : Model
    {
        [Link] private Plant Grapevine;
        [Link] private Clock Clock;
        [Link] private Zone zone;
        [Link] private Weather weather;
        [Link]
        private Root root;
        [Link(Type = LinkType.Path, Path = "[Grapevine].Structure")]
        private Structure structure;
        [Link(Type = LinkType.Path, Path = "[Grapevine].Phenology")]
        private Phenology phenology;
       
        [Description("SummerPruning_DAWS")]         
        public int LeafPluckingDAWS { get; set; }  //day

        [Description("Harvest_DAWS")]
        public int HarvestDAWS { get; set; }

        [Description("Pruning_DAWS")]         
        public int PruningDAWS { get; set; }  //day

        [Description("Frost Date 1")]
        public DateTime FrostDate1 { get; set; }
        [Description("Frost Date 2")]
        public DateTime FrostDate2 { get; set; }


        [JsonIgnore] private RemovalFractions Remove_1 { get; set; }
        [JsonIgnore] private RemovalFractions Remove_2 { get; set; }
        [JsonIgnore] private RemovalFractions Remove_3 { get; set; }
        [JsonIgnore] private RemovalFractions Remove_4 { get; set; }
        [JsonIgnore] private RemovalFractions Remove_5 { get; set; }
        [EventSubscribe("StartOfSimulation")]
        private void OnSimulationCommencing(object sender, EventArgs e)
        {
            Remove_1 = new RemovalFractions();
            Remove_2 = new RemovalFractions();
            Remove_3 = new RemovalFractions();
            Remove_4 = new RemovalFractions();
            Remove_5 = new RemovalFractions();
            zone.Set("[Grapevine].Phenology.AccumulatedChillingUnitBeforeWinterPruning.ChillBeforePrune.PruningTime.FixedValue", PruningDAWS);
        }
        
        [EventSubscribe("DoManagement")]
        private void OnDoManagement(object sender, EventArgs e)
        {
             //Set up  array of remove fractions to send with Cut method.  Each member in the array corresponds to an organ in the same order they are set up in.
             //PruneDate = DateTime.Parse(PruneDateString);
             if (weather.DaysSinceWinterSolstice == LeafPluckingDAWS && phenology.Stage >= 3)
             {
                //int TargetLeafRank = 20;    
                //int LeafTipsAppeared = 25;//(int)structure.LeafTipsAppeared;

                //int NodesToRemove = (int)Math.Max(LeafTipsAppeared - TargetLeafRank, 1); 
                double FractionToRemove = 0.2;//1- TargetLeafRank/LeafTipsAppeared;
            
                Remove_1.SetFractionToRemove("Leaf", 0, "live");
                Remove_1.SetFractionToRemove("Shoot", 0);
                Remove_1.SetFractionToRemove("Cane", 0);
                Remove_1.SetFractionToRemove("Trunk", 0);
                Remove_1.SetFractionToRemove("Root", 0);
                Remove_1.SetFractionToRemove("StructuralRoot", 0);
                Remove_1.SetFractionToRemove("Berry", 0);
            
                Remove_1.SetFractionToResidue("Leaf", FractionToRemove, "live");
                Remove_1.SetFractionToResidue("Shoot", FractionToRemove);
                Remove_1.SetFractionToResidue("Cane", 0);
                Remove_1.SetFractionToResidue("Trunk", 0);
                Remove_1.SetFractionToResidue("Root", 0);
                Remove_1.SetFractionToRemove("StructuralRoot", 0);
                Remove_1.SetFractionToResidue("Berry", 0);
            
               // Remove_1.NodesToRemove = NodesToRemove;
                Grapevine.RemoveBiomass("LeafPluck", Remove_1);
        
             }

           if (weather.DaysSinceWinterSolstice == HarvestDAWS && phenology.Stage >= 3)
           {
               
               Remove_2.SetFractionToRemove("Leaf", 0, "live");
               Remove_2.SetFractionToRemove("Shoot",  0);
               Remove_2.SetFractionToRemove("Cane", 0);
               Remove_2.SetFractionToRemove("Trunk",  0);
               Remove_2.SetFractionToRemove("Root",   0);
               Remove_2.SetFractionToRemove("StructuralRoot", 0);
               Remove_2.SetFractionToRemove("Berry",  1);
         
               Remove_2.SetFractionToResidue("Leaf",   0.1, "live");
               Remove_2.SetFractionToResidue("Shoot",  0);
               Remove_2.SetFractionToResidue("Cane", 0);
               Remove_2.SetFractionToResidue("Trunk",  0);
               Remove_2.SetFractionToResidue("Root",   0);
               Remove_2.SetFractionToRemove("StructuralRoot", 0);
               Remove_2.SetFractionToResidue("Berry",  0);
         
               Grapevine.RemoveBiomass("LeafPluck", Remove_2);
               zone.Set("[Grapevine].Berry.Brix.AfterVeraison.LessThanFunction.HarvestTime.FixedValue",HarvestDAWS); 

           }
                                   
            if (weather.DaysSinceWinterSolstice == PruningDAWS&& phenology.Stage >= 3)
            {
                Remove_3.SetPhenologyStage = 1;

                Remove_3.SetFractionToRemove("Leaf",   0, "live");
                Remove_3.SetFractionToRemove("Shoot",  0);
                Remove_3.SetFractionToRemove("Cane", 0);
                Remove_3.SetFractionToRemove("Trunk",  0);
                Remove_3.SetFractionToRemove("Root",   0);
                Remove_3.SetFractionToRemove("Berry",  0);

                Remove_3.SetFractionToResidue("Leaf",   1, "live");
                Remove_3.SetFractionToResidue("Shoot",  1);
                Remove_3.SetFractionToResidue("Cane", 1);
                Remove_3.SetFractionToResidue("Trunk",  0);
                Remove_3.SetFractionToResidue("Root",   0);
                Remove_3.SetFractionToRemove("StructuralRoot", 0);
                Remove_3.SetFractionToResidue("Berry",  1);

                Grapevine.RemoveBiomass("Prune", Remove_3);

                double budNumber = (double)zone.Get("Grapevine.Structure.BudsPerMeterRow.FixedValue"); 
                double caneNum = budNumber*1.8/12;
                double caneBiomass = 17.5 * caneNum; //g/m2 reset the cane biomass to the original value 
                double caneNSC = caneBiomass * 0.18;

                zone.Set("[Grapevine].Cane.Live.StorageWt", caneNSC);                
                zone.Set("[Grapevine].Cane.Live.StructuralWt", caneBiomass - caneNSC); 
                zone.Set("[Grapevine].Phenology.AccumulatedChillingUnitBeforeWinterPruning.ChillBeforePrune.PruningTime.FixedValue",PruningDAWS); 
                //zone.Set("[Grapevine].Trunk.Live.StructuralWt", 280);     
               // zone.Set("[Grapevine].Trunk.Live.StorageWt", 70);     

               // zone.Set("[Grapevine].Root.Live.StructuralWt", 1531);     
               // zone.Set("[Grapevine].Root.Live.StorageWt",  349);     

            }
           if (Clock.Today.Date == FrostDate1)      
           {
              Remove_4.SetFractionToRemove("Leaf", 0, "live");
              Remove_4.SetFractionToRemove("Shoot",  0);
              Remove_4.SetFractionToRemove("Cane", 0);
              Remove_4.SetFractionToRemove("Trunk",  0);
              Remove_4.SetFractionToRemove("Root",   0);
              Remove_4.SetFractionToRemove("StructuralRoot", 0);
              Remove_4.SetFractionToRemove("Berry",  0);
           //
              Remove_4.SetFractionToResidue("Leaf",   0.2, "live");
              Remove_4.SetFractionToResidue("Shoot",  0);
              Remove_4.SetFractionToResidue("Cane", 0);
              Remove_4.SetFractionToResidue("Trunk",  0);
              Remove_4.SetFractionToResidue("Root",   0);
              Remove_4.SetFractionToRemove("StructuralRoot", 0);
              Remove_4.SetFractionToResidue("Berry",  0);
           //
              Grapevine.RemoveBiomass("LeafPluck", Remove_4);
              //zone.Set("[Grapevine].Structure.FinalLeafNumber.FixedValue", 28); 
           //
           }  

           if (Clock.Today.Date == FrostDate2)      
           {
              Remove_5.SetFractionToRemove("Leaf", 0, "live");
              Remove_5.SetFractionToRemove("Shoot",  0);
              Remove_5.SetFractionToRemove("Cane", 0);
              Remove_5.SetFractionToRemove("Trunk",  0);
              Remove_5.SetFractionToRemove("Root",   0);
              Remove_5.SetFractionToRemove("StructuralRoot", 0);
              Remove_5.SetFractionToRemove("Berry",  0);
           //
              Remove_5.SetFractionToResidue("Leaf",   0.2, "live");
              Remove_5.SetFractionToResidue("Shoot",  0);
              Remove_5.SetFractionToResidue("Cane", 0);
              Remove_5.SetFractionToResidue("Trunk",  0);
              Remove_5.SetFractionToResidue("Root",   0);
              Remove_5.SetFractionToRemove("StructuralRoot", 0);
              Remove_5.SetFractionToResidue("Berry",  0);
           //
              Grapevine.RemoveBiomass("LeafPluck", Remove_5);
           //
           }  

        }
    }
}
```
            Manager DripIrrigator
              FertilizeDAWS = 100
              Amount = 40
              totalIrrigation = 0
```csharp
using Models.Climate;
using System;
using Models.Core;
using System.Collections.Generic;
using System.Text;
using Models.Soils;
using Models.PMF;
using Models;
using System.Xml.Serialization;
using APSIM.Shared.Utilities;

namespace Models
{
    [Serializable] 
    public class Script : Model
    {
       [Link] Irrigation irrigation;
       [Link] Clock Clock;
       [Link] Fertiliser Fertiliser;
       [Link] Summary Summary;
       [Link] Weather weather;

        [Description("Fertilize_DAWS")]
         public int FertilizeDAWS { get; set; }
        [Description("Amount of fertiliser to be applied")]
        public double Amount { get; set; }

       [EventSubscribe("DoManagement")]
        private void OnDoManagement(object sender, EventArgs e)
        {
          if (weather.DaysSinceWinterSolstice == FertilizeDAWS)
           Fertiliser.Apply(Amount: Amount, Type: Fertiliser.Types.NO3N);
        }


 void applyDripIrri(double amount)
        {
            double layerAmount = amount/4;
            irrigation.Apply(layerAmount, 0);
            irrigation.Apply(layerAmount*2, 220);
            irrigation.Apply(layerAmount, 420);

        }
        public double totalIrrigation {get; set;}
        [EventSubscribe("Irrigated")]
        private void OnIrrigated(object sender, 
        IrrigationApplicationType irrigData)
        {
            totalIrrigation += irrigData.Amount;
         }
    }
}
```
            Manager AutoIrrigationBasedOnWaterDeficit: same as ExampleSimulation.BaseSim.Row.AutoIrrigationBasedOnWaterDeficit
            Manager Fertilise on fixed dates
              FertiliserType = NH4NO3N
              FertiliserDates = 1-Nov, 1-Feb
              Amount = 20
              AmountType = True
              script: same as in Replacements.Fertilise on fixed dates
            Manager Reset on date
              ResetDate = 10-Jul
              ResetWater = Yes
              ResetNutrients = Yes
              ResetSOM = Yes
```csharp
using APSIM.Shared.Utilities;
using Models.Surface;
using Models.Utilities;
using Models.Soils.Nutrients;
using Models.Soils;
using Models.PMF;
using Models.Core;
using System;
using Models.Interfaces;

namespace Models
{
    [Serializable]
    public class Script : Model
    {
        [Link] private Clock Clock;
        [Link] private Plant Wheat;
        [Link] private ISoilWater SoilWater;
        [Link] private Nutrient nutrient;
        [Link] private SoilNitrogen nitrogen;
        [Link] private SurfaceOrganicMatter SOM;
        [Link] private Summary Summary;

        [Description("Date to reset on:")]
        public string ResetDate {get;set;}

        [Description("Reset Water? (Yes or No)")]
        public string ResetWater {get;set;}

        [Description("Reset Soil Nutrients ? (Yes or No)")]
        public string ResetNutrients {get;set;}

        [Description("Reset Surface Organic Matter? (Yes or No)")]
        public string ResetSOM {get;set;}

        [EventSubscribe("DoManagement")]
        private void OnDoManagement(object sender, EventArgs e)
        {
            if (DateUtilities.WithinDates(ResetDate, Clock.Today, ResetDate))
            {
                if (ResetWater == "Yes")
                {
                    Summary.WriteMessage(this, "Reset Water");
                    SoilWater.Reset();
                }
                if (ResetNutrients == "Yes")
                {
                    Summary.WriteMessage(this, "Reset Nitrogen");
                    nutrient.Reset();
                }
                 if (ResetNutrients == "Yes")
                {
                    Summary.WriteMessage(this, "Reset Nitrogen");
                    nitrogen.Reset();
                }

                if (ResetSOM == "Yes")
                {
                    Summary.WriteMessage(this, "Reset Surface OM");
                    SOM.Reset();
                }
            }
        }
    }
}
```
            Manager Fertilise topup
              FertiliserType = NO3N
              Threshold = 200
              script: same as in Replacements.Fertilise topup
            Soil: same as ExampleSimulation.BaseSim.Row.Soil
          RectangularZone Alley: Length=100; Width=1.9; Slope=0; AspectAngle=0; Altitude=50
            SurfaceOrganicMatter: InitialResidueName=wheat_stubble; InitialResidueType=wheat; InitialResidueMass=500; InitialStandingFraction=0; InitialCPR=0; InitialCNR=100
            Plant Slurp
            Fertiliser
            Irrigation
            Manager PastureInitialisation
              CultivarName = StaticCrop
              InitialRootDepth = 2000
              SowingDate = 02/25/2005 00:00:00
              RootDepth = 2000
              RFV = 10
              KLReductionFactor = -0.001
              KLReductionDepth = 150
              YKLModifiers =
              XDepth =
              MaxG = 0.004
              R50 = 150
```csharp
using Models.Interfaces;
using Models.Soils;
using APSIM.Shared.Utilities;
using Models.PMF;
using Models.Core;
using System;
using Models.PMF.Organs;
        
namespace Models
{
    [Serializable] 
    [System.Xml.Serialization.XmlInclude(typeof(Model))]
    public class Script : Model
    {
        [Link] private Plant Slurp;
        [Link] private Clock Clock;
        [Link] private Soil Soil;
        [Link] private Zone zone;
        [Link(Type = LinkType.Path, Path = "[Slurp].Root")]
        private Root root;
        [Link]
        private IPhysical soilPhysical;

        [Display(Type = DisplayType.CultivarName)]
        [Description("Plant Type")]
        public string CultivarName { get; set; }
        [Description("Initial Root Depth")]
        public double InitialRootDepth { get; set; }
        [Description("Initialisation Date")]
        public DateTime SowingDate { get; set; }
        [Description("Maximum Root Depth")]
        public double RootDepth { get; set; }
        [Description("Roof Front Velocity")]
        public double RFV { get; set; }
        [Description("Factor to change Kl modifier with Depth")]
        public double KLReductionFactor { get; set; }
        [Description("Depth that KL starts to decline")]
        public double KLReductionDepth { get; set; }
        
        public double[] YKLModifiers { get; set; }
        public double[] XDepth { get; set; }
        private double Depth { get; set; }
        
        [Description("Maximum Stomatal Conductance")]
        public double MaxG { get; set; }
        [Description("Stomatal Radn response")]
        public double R50 { get; set; }
        
        [EventSubscribe("DoManagement")]
        private void OnDoManagement(object sender, EventArgs e)
        {
            if (Clock.Today.Date == SowingDate)
            {
                Slurp.Sow(cultivar: CultivarName, population: 1, depth: InitialRootDepth, rowSpacing: 150);
                
                YKLModifiers = new double[soilPhysical.Thickness.Length];
                XDepth = new double[soilPhysical.Thickness.Length];
                Depth = 0;
                for (int layer = 0; layer < soilPhysical.Thickness.Length; layer++)
                {
                    Depth += soilPhysical.Thickness[layer] / 2;  //Add half of the thickness of the current layer so depth is the mid depth of that layer
                    if (Depth <= KLReductionDepth)
                    {
                        YKLModifiers[layer] = 1;
                        XDepth[layer] = Depth;
                    }
                    else
                    {
                        double KLMod = 1 * Math.Exp(-KLReductionFactor * (Depth - KLReductionDepth));
                        YKLModifiers[layer] = KLMod;
                        XDepth[layer] = Depth;
                    }
                    Depth += soilPhysical.Thickness[layer] / 2;  //Add the other half of the current layer so depth is the top of the next layer
                }
                object KLMods = YKLModifiers;
                zone.Set("Slurp.Root.KLModifier.XYPairs.Y", KLMods);
                object Depths = XDepth;
                zone.Set("Slurp.Root.KLModifier.XYPairs.X", Depths);
                object RD = RootDepth;
                zone.Set("Slurp.Root.MaximumRootDepth.FixedValue", RD);
                object RV = RFV;
                zone.Set("Slurp.Root.RootFrontVelocity.Potential.FixedValue", RV);
                object GMaxValue = MaxG;
                zone.Set("Slurp.Leaf.Gsmax350", GMaxValue); 
                object R50Value = R50; 
                zone.Set("Slurp.Leaf.R50", R50Value); 
                
            }
        }
    }
}
```
            Manager SetPastureVariables: same as ExampleSimulation.BaseSim.Alley.SetPastureVariables
            Manager SetupPastureRootZones
              UseExtraZone = False
              script: same as in ExampleSimulation.BaseSim.Alley.SetupPastureRootZones
            Operations WinterRainfall
              2006-08-26  [Irrigation].Apply(45);
            Manager PlantVariables
              FRadInt = 0
              ET = 0
              ES = 0
              PET = 0
              LAI = 0
              Height = 0
              RootDepth = 0
              PlantWidth = 0
```csharp
using Models.PMF.Organs;
using Models.Zones;
using APSIM.Shared.Utilities;
using Models.Soils;
using System.Collections.Generic;
using Models.PMF;
using Models.Core;
using System;
using Models.Climate;

namespace Models
{
    [Serializable]
    public class Script : Model
    {
        [Link] private Weather weather;
        [Link]
        private Root root;
        private RectangularZone AlleyZone {get; set; }
        private RectangularZone RowZone {get; set;}
        private RectangularZone ThisZone {get; set;}
        private double AreaWidth {get; set;}

        public double FRadInt {get; set;}
        public double ET {get; set;}
        public double ES {get; set;}
        public double PET {get; set;}
        public double LAI {get; set;}
        public double Height {get; set;}
        public double RootDepth {get; set;}
        public double PlantWidth {get; set;}

        [EventSubscribe("StartOfSimulation")]
        private void DoStartOfSimulation(object sender, EventArgs e)
        {
               
               ThisZone = this.Parent.Parent as RectangularZone;
               RowZone = this.Parent.Parent.Parent.FindInScope("Row") as RectangularZone;
               AlleyZone = (RectangularZone)this.Parent.Parent.Parent.FindInScope("Alley") as RectangularZone;
               AreaWidth = AlleyZone.Width + RowZone.Width;
               PlantWidth = 0;
        }
        
        [EventSubscribe("DoReportCalculations")]
        private void OnDoReportCalculations(object sender, EventArgs e)
        {
            if (ThisZone.Name == "Row")
                {
                FRadInt = ((double)RowZone.Get("Grapevine.Leaf.RadIntTot") * RowZone.Width)/(weather.Radn * AreaWidth);
                ET = (double)RowZone.Get("Grapevine.Leaf.Transpiration") * RowZone.Width/AreaWidth;
                LAI = (double)RowZone.Get("Grapevine.Leaf.LAI");
                Height = (double)RowZone.Get("Grapevine.Leaf.Height");
                RootDepth = (double)RowZone.Get("Grapevine.Root.Depth");
                PlantWidth = (double)RowZone.Get("Grapevine.Leaf.Width");
                }
            else
                {
                FRadInt = ((double)AlleyZone.Get("Slurp.Leaf.RadIntTot") * ThisZone.Width)/ (weather.Radn * AreaWidth);
                ET = (double)AlleyZone.Get("Slurp.Leaf.Transpiration") * ThisZone.Width/AreaWidth;
                LAI = (double)AlleyZone.Get("Slurp.Leaf.LAI");
                Height = (double)AlleyZone.Get("Slurp.Leaf.Height");
                RootDepth = (double)AlleyZone.Get("Slurp.Root.Depth");
                }

            ES = (double)ThisZone.Get("Soil.SoilWater.Es") * ThisZone.Width/AreaWidth;
            double PETWidth = Math.Min(Math.Max(PlantWidth,ThisZone.Width),AreaWidth);
            PET = (double)ThisZone.Get("Soil.SoilWater.Eo") * PETWidth/AreaWidth;
        }
    }
}
```
            Report ReportAlley: same as ExampleSimulation.BaseSim.Alley.ReportAlley
            Manager Reset on date: same as Validation.Sauvignonblanc.RetainedNodeNum.RetainedNodNum.Row.Reset on date
            Soil: same as ExampleSimulation.BaseSim.Row.Soil
      Experiment Marlborough_2Cane
        Factors
          Factor Climate
            Specification=[Weather].FileName = Site1001_BRA.met,Site1002_OYB.met,Site1003_SEA.met,Site1004_RPC.met
        Simulation VineFacts1
          Weather: FileName=Site1002_OYB.met
          Clock: Start=2003-02-25; End=2020-05-01
          Summary
          SoilArbitrator Soil Arbitrator
          MicroClimate: a_interception=0; b_interception=1; c_interception=0; d_interception=0; soil_albedo=0.23; SoilHeatFluxFraction=0.4; MinimumHeightDiffForNewLayer=0; NightInterceptionFraction=0.5; ReferenceHeight=2
          RectangularZone Row: Length=100; Width=0.9; Slope=0; AspectAngle=0; Altitude=50
            Report: EventNames=[Clock].DoReport
            Memo: same as ExampleSimulation.BaseSim.Row.Memo
            Plant Grapevine: IsAlive=false; IsEnding=false; DaysAfterEnding=0
            Manager TreeInitialisation
              CultivarName = SauvignonBlanc
              SowingDate = 02/25/2003 00:00:00
              VineDistance = 1.8
              BudNumber = 24
              CaneNumber = 2
              CaneDiameter = 10
              CaneLength = 0.9
              TrunkDiameter = 65
              TrunkLength = 0.8
              RootTrunkRatio = 1
              RootNSC = 0.2
              TrunkNSC = 0.2
              CaneNSC = 0.2
              StartAge = 8
              script: same as in ExampleSimulation.BaseSim.Row.TreeInitialisation
            Irrigation
            Fertiliser
            SurfaceOrganicMatter: InitialResidueName=wheat_stubble; InitialResidueType=Grapevine; InitialResidueMass=20; InitialStandingFraction=0; InitialCPR=0; InitialCNR=30
            Manager SetupTreeRootZones: same as Validation.Sauvignonblanc.RetainedNodeNum.RetainedNodNum.Row.SetupTreeRootZones
            Operations VineIrrigation
            Operations WinterRainfall
              2002-05-28  [Irrigation].Apply(200);
            Manager PlantVariables
              FRadInt = 0
              ET = 0
              ES = 0
              PET = 0
              LAI = 0
              Height = 0
              RootDepth = 0
              PlantWidth = 0
```csharp
using Models.PMF.Organs;
using Models.Zones;
using APSIM.Shared.Utilities;
using Models.Soils;
using System.Collections.Generic;
using Models.PMF;
using Models.Core;
using System;
using Models.Climate;

namespace Models
{
    [Serializable]
    public class Script : Model
    {
        [Link] private Weather weather;
        [Link(Type = LinkType.Path, Path = "[Grapevine].Root")]
        private Root root;
        private RectangularZone AlleyZone {get; set; }
        private RectangularZone RowZone {get; set;}
        private RectangularZone ThisZone {get; set;}
        private double AreaWidth {get; set;}

        public double FRadInt {get; set;}
        public double ET {get; set;}
        public double ES {get; set;}
        public double PET {get; set;}
        public double LAI {get; set;}
        public double Height {get; set;}
        public double RootDepth {get; set;}
        public double PlantWidth {get; set;}

        [EventSubscribe("StartOfSimulation")]
        private void DoStartOfSimulation(object sender, EventArgs e)
        {
               
               ThisZone = this.Parent.Parent as RectangularZone;
               RowZone = this.Parent.Parent.Parent.FindInScope("Row") as RectangularZone;
               AlleyZone = (RectangularZone)this.Parent.Parent.Parent.FindInScope("Alley") as RectangularZone;
               AreaWidth = AlleyZone.Width + RowZone.Width;
               PlantWidth = 0;
        }
        
        [EventSubscribe("DoReportCalculations")]
        private void OnDoReportCalculations(object sender, EventArgs e)
        {
            if (ThisZone.Name == "Row")
                {
                FRadInt = ((double)RowZone.Get("Grapevine.Leaf.RadIntTot") * RowZone.Width)/(weather.Radn * AreaWidth);
                ET = (double)RowZone.Get("Grapevine.Leaf.Transpiration") * RowZone.Width/AreaWidth;
                LAI = (double)RowZone.Get("Grapevine.Leaf.LAI");
                //LAIPerVine =  LAI*RowZone.Width*1.8;
                //TreeInitialisation.Script.VineDistance;
                //(double)RowZone.Get("Grapevine.Leaf.LAI");
                Height = (double)RowZone.Get("Grapevine.Leaf.Height");
                RootDepth = (double)RowZone.Get("Grapevine.Root.Depth");
                PlantWidth = (double)RowZone.Get("Grapevine.Leaf.Width");
                }
            else
                {
                FRadInt = ((double)AlleyZone.Get("Slurp.Leaf.RadIntTot") * ThisZone.Width)/ (weather.Radn * AreaWidth);
                ET = (double)AlleyZone.Get("Slurp.Leaf.Transpiration") * ThisZone.Width/AreaWidth;
                LAI = (double)AlleyZone.Get("Slurp.Leaf.LAI");
                Height = (double)AlleyZone.Get("Slurp.Leaf.Height");
                RootDepth = (double)AlleyZone.Get("Slurp.Root.Depth");
                }

            ES = (double)ThisZone.Get("Soil.SoilWater.Es") * ThisZone.Width/AreaWidth;
            double PETWidth = Math.Min(Math.Max(PlantWidth,ThisZone.Width),AreaWidth);
            PET = (double)ThisZone.Get("Soil.SoilWater.Eo") * PETWidth/AreaWidth;
        }
    }
}
```
            Manager DripIrrigator
              totalIrrigation = 0
```csharp
using Models.Climate;
using System;
using Models.Core;
using System.Collections.Generic;
using System.Text;
using Models.Soils;
using Models.PMF;
using Models;
using System.Xml.Serialization;
using APSIM.Shared.Utilities;

namespace Models
{
    [Serializable] 
    public class Script : Model
    {
       [Link] Irrigation irrigation;
       [Link] Clock Clock;
       [Link] Fertiliser Fertiliser;
       [Link] Summary Summary;
       [Link] Weather weather;
//
//        [Description("Fertilize_DAWS")]
//         public int FertilizeDAWS { get; set; }
//        [Description("Amount of fertiliser to be applied")]
//        public double Amount { get; set; }
//
//       [EventSubscribe("DoManagement")]
//        private void OnDoManagement(object sender, EventArgs e)
//        {
//          if (weather.DaysSinceWinterSolstice == FertilizeDAWS)
//           Fertiliser.Apply(Amount: Amount, Type: Fertiliser.Types.NO3N);
//        }


       public void applyDripIrri(double amount)
        {
            double layerAmount = amount/4;
            irrigation.Apply(layerAmount, 0);
            irrigation.Apply(layerAmount*2, 220);
            irrigation.Apply(layerAmount, 420);

        }
        public double totalIrrigation {get; set;}
        [EventSubscribe("Irrigated")]
        private void OnIrrigated(object sender, 
        IrrigationApplicationType irrigData)
        {
            totalIrrigation += irrigData.Amount;
         }
    }
}
```
            Manager HarvestNPruning
              LeafPluckingDAWS = 205
              HarvestDAWS = 305
              PruningDAWS = 341
              FrostDate1 = 10/03/2002 00:00:00
              FrostDate2 = 11/18/2002 00:00:00
              script: same as in Validation.Sauvignonblanc.RetainedNodeNum.RetainedNodNum.Row.HarvestNPruning
            Manager AutoIrrigationBasedOnWaterDeficit
              FASW = 0
              WaterDeficit = 0
              StartDate = 1-nov
              EndDate = 1-mar
              FASWThreshold = 0.7
              FASWDepth = 2000
              Amount = 20
              script: same as in Replacements.AutoIrrigationBasedOnWaterDeficit
            Manager Fertilise on fixed dates: same as ExampleSimulation.BaseSim.Row.Fertilise on fixed dates
            Manager Reset on date: same as Replacements.Reset on date
            Manager Fertilise topup: same as Replacements.Fertilise topup
            Soil: same as ExampleSimulation.BaseSim.Row.Soil
          RectangularZone Alley: Length=100; Width=1.5; Slope=0; AspectAngle=0; Altitude=50
            SurfaceOrganicMatter: InitialResidueName=wheat_stubble; InitialResidueType=Grapevine; InitialResidueMass=20; InitialStandingFraction=0; InitialCPR=0; InitialCNR=30
            Plant Slurp
            Fertiliser
            Irrigation
            Manager PastureInitialisation
              CultivarName = StaticCrop
              InitialRootDepth = 2000
              SowingDate = 02/25/2003 00:00:00
              RootDepth = 2000
              RFV = 10
              KLReductionFactor = -0.001
              KLReductionDepth = 150
              YKLModifiers =
              XDepth =
              MaxG = 0.004
              R50 = 150
              script: same as in Validation.Sauvignonblanc.RetainedNodeNum.RetainedNodNum.Alley.PastureInitialisation
            Manager SetPastureVariables: same as ExampleSimulation.BaseSim.Alley.SetPastureVariables
            Manager SetupPastureRootZones: same as Validation.Sauvignonblanc.RetainedNodeNum.RetainedNodNum.Alley.SetupPastureRootZones
            Operations WinterRainfall
              2002-05-28  [Irrigation].Apply(200);
            Manager PlantVariables
              script: same as in ExampleSimulation.BaseSim.Alley.PlantVariables
            Report ReportAlley: same as ExampleSimulation.BaseSim.Alley.ReportAlley
            Manager Reset on date: same as Replacements.Reset on date
            Manager Fertilise topup: same as Replacements.Fertilise topup
            Soil: same as ExampleSimulation.BaseSim.Row.Soil
      Experiment Marlborough_3Cane
        Factors
          Factor Climate: Specification=[Weather].FileName = TOH.met, WRV.met
        Simulation MRL3Cane
          Weather: FileName=Site1003_SEA.met
          Clock: Start=2014-02-25; End=2020-05-01
          Summary
          SoilArbitrator Soil Arbitrator
          MicroClimate: a_interception=0; b_interception=1; c_interception=0; d_interception=0; soil_albedo=0.23; SoilHeatFluxFraction=0.4; MinimumHeightDiffForNewLayer=0; NightInterceptionFraction=0.5; ReferenceHeight=2
          RectangularZone Row: Length=100; Width=0.9; Slope=0; AspectAngle=0; Altitude=50
            Report: EventNames=[Clock].DoReport
            Memo: same as ExampleSimulation.BaseSim.Row.Memo
            Plant Grapevine: IsAlive=false; IsEnding=false; DaysAfterEnding=0
            Manager TreeInitialisation
              CultivarName = SauvignonBlanc
              SowingDate = 02/25/2014 00:00:00
              VineDistance = 1.8
              BudNumber = 32
              CaneNumber = 3
              CaneDiameter = 10
              CaneLength = 0.9
              TrunkDiameter = 65
              TrunkLength = 0.8
              RootTrunkRatio = 1
              RootNSC = 0.2
              TrunkNSC = 0.2
              CaneNSC = 0.2
              StartAge = 8
              script: same as in ExampleSimulation.BaseSim.Row.TreeInitialisation
            Irrigation
            Fertiliser
            SurfaceOrganicMatter: InitialResidueName=wheat_stubble; InitialResidueType=wheat; InitialResidueMass=500; InitialStandingFraction=0; InitialCPR=0; InitialCNR=100
            Manager SetupTreeRootZones: same as Validation.Sauvignonblanc.RetainedNodeNum.RetainedNodNum.Row.SetupTreeRootZones
            Operations VineIrrigation
            Operations WinterRainfall
              2002-05-28  [Irrigation].Apply(200);
            Manager PlantVariables: same as Validation.Sauvignonblanc.Marlborough_2Cane.VineFacts1.Row.PlantVariables
            Manager DripIrrigator
              FertilizeDAWS = 100
              Amount = 20
              totalIrrigation = 0
              script: same as in ExampleSimulation.BaseSim.Row.DripIrrigator
            Manager HarvestNPruning: same as Validation.Sauvignonblanc.Marlborough_2Cane.VineFacts1.Row.HarvestNPruning
            Manager AutoIrrigationBasedOnWaterDeficit: same as ExampleSimulation.BaseSim.Row.AutoIrrigationBasedOnWaterDeficit
            Manager Fertilise on fixed dates: same as ExampleSimulation.BaseSim.Row.Fertilise on fixed dates
            Manager Reset on date: same as Replacements.Reset on date
            Manager Fertilise topup: same as Replacements.Fertilise topup
            Soil: same as ExampleSimulation.BaseSim.Row.Soil
          RectangularZone Alley: Length=100; Width=1.5; Slope=0; AspectAngle=0; Altitude=50
            SurfaceOrganicMatter: InitialResidueName=wheat_stubble; InitialResidueType=wheat; InitialResidueMass=500; InitialStandingFraction=0; InitialCPR=0; InitialCNR=100
            Plant Slurp
            Fertiliser
            Irrigation
            Manager PastureInitialisation
              CultivarName = StaticCrop
              InitialRootDepth = 2000
              SowingDate = 02/25/2014 00:00:00
              RootDepth = 2000
              RFV = 10
              KLReductionFactor = -0.001
              KLReductionDepth = 150
              YKLModifiers =
              XDepth =
              MaxG = 0.004
              R50 = 150
              script: same as in Validation.Sauvignonblanc.RetainedNodeNum.RetainedNodNum.Alley.PastureInitialisation
            Manager SetPastureVariables: same as ExampleSimulation.BaseSim.Alley.SetPastureVariables
            Manager SetupPastureRootZones: same as ExampleSimulation.BaseSim.Alley.SetupPastureRootZones
            Operations WinterRainfall
              2002-05-28  [Irrigation].Apply(200);
            Manager PlantVariables
              script: same as in ExampleSimulation.BaseSim.Alley.PlantVariables
            Report ReportAlley: same as ExampleSimulation.BaseSim.Alley.ReportAlley
            Manager Reset on date: same as Replacements.Reset on date
            Manager Fertilise topup: same as Replacements.Fertilise topup
            Soil: same as ExampleSimulation.BaseSim.Row.Soil
      Experiment Marlborough_4Cane
        Factors
          Factor Climate
            Specification=[Weather].FileName = Site1001_BRA.met,Site1002_OYB.met,Site1003_SEA.met,Site1004_RPC.met
        Simulation VineFacts2
          Weather: FileName=Site1003_SEA.met
          Clock: Start=2003-02-25; End=2020-05-01
          Summary
          SoilArbitrator Soil Arbitrator
          MicroClimate: a_interception=0; b_interception=1; c_interception=0; d_interception=0; soil_albedo=0.23; SoilHeatFluxFraction=0.4; MinimumHeightDiffForNewLayer=0; NightInterceptionFraction=0.5; ReferenceHeight=2
          RectangularZone Row: Length=100; Width=0.9; Slope=0; AspectAngle=0; Altitude=50
            Report: EventNames=[Clock].DoReport
            Memo: same as ExampleSimulation.BaseSim.Row.Memo
            Plant Grapevine: IsAlive=false; IsEnding=false; DaysAfterEnding=0
            Manager TreeInitialisation
              CultivarName = SauvignonBlanc
              SowingDate = 02/25/2003 00:00:00
              VineDistance = 1.8
              BudNumber = 40
              CaneNumber = 4
              CaneDiameter = 10
              CaneLength = 0.9
              TrunkDiameter = 65
              TrunkLength = 0.8
              RootTrunkRatio = 1
              RootNSC = 0.2
              TrunkNSC = 0.2
              CaneNSC = 0.2
              StartAge = 8
              script: same as in ExampleSimulation.BaseSim.Row.TreeInitialisation
            Irrigation
            Fertiliser
            SurfaceOrganicMatter: InitialResidueName=wheat_stubble; InitialResidueType=wheat; InitialResidueMass=500; InitialStandingFraction=0; InitialCPR=0; InitialCNR=100
            Manager SetupTreeRootZones: same as Validation.Sauvignonblanc.RetainedNodeNum.RetainedNodNum.Row.SetupTreeRootZones
            Operations VineIrrigation
            Operations WinterRainfall
              2002-05-28  [Irrigation].Apply(200);
            Manager PlantVariables: same as Validation.Sauvignonblanc.Marlborough_2Cane.VineFacts1.Row.PlantVariables
            Manager DripIrrigator: same as Validation.Sauvignonblanc.Marlborough_3Cane.MRL3Cane.Row.DripIrrigator
            Manager HarvestNPruning: same as Validation.Sauvignonblanc.Marlborough_2Cane.VineFacts1.Row.HarvestNPruning
            Manager AutoIrrigationBasedOnWaterDeficit: same as Validation.Sauvignonblanc.Marlborough_2Cane.VineFacts1.Row.AutoIrrigationBasedOnWaterDeficit
            Manager Fertilise on fixed dates: same as ExampleSimulation.BaseSim.Row.Fertilise on fixed dates
            Manager Reset on date: same as Replacements.Reset on date
            Manager Fertilise topup: same as Replacements.Fertilise topup
            Soil: same as ExampleSimulation.BaseSim.Row.Soil
          RectangularZone Alley: Length=100; Width=1.5; Slope=0; AspectAngle=0; Altitude=50
            SurfaceOrganicMatter: InitialResidueName=wheat_stubble; InitialResidueType=wheat; InitialResidueMass=500; InitialStandingFraction=0; InitialCPR=0; InitialCNR=100
            Plant Slurp
            Fertiliser
            Irrigation
            Manager PastureInitialisation: same as Validation.Sauvignonblanc.Marlborough_2Cane.VineFacts1.Alley.PastureInitialisation
            Manager SetPastureVariables: same as ExampleSimulation.BaseSim.Alley.SetPastureVariables
            Manager SetupPastureRootZones: same as Validation.Sauvignonblanc.RetainedNodeNum.RetainedNodNum.Alley.SetupPastureRootZones
            Operations WinterRainfall
              2002-05-28  [Irrigation].Apply(200);
            Manager PlantVariables
              script: same as in ExampleSimulation.BaseSim.Alley.PlantVariables
            Report ReportAlley: same as ExampleSimulation.BaseSim.Alley.ReportAlley
            Manager Fertilise topup: same as Replacements.Fertilise topup
            Manager Reset on date: same as Replacements.Reset on date
            Soil: same as ExampleSimulation.BaseSim.Row.Soil
      Experiment RPC_2000_2002
        DisabledSimNames=[Grape_Squire_1Irri70, Grape_Squire_1Irri80, Grape_SquireIrri20, Grape_SquireIrri40, Grape_SquireIrri70, Grape_SquireIrri80]
        Memo
          RPC corresponding to Central Rapaura in the manuscript "Developing perennial fruit crop models in APSIM Next Generation using grapevine as an example" that we just submitted.
        Factors
          Factor Irri: Specification=[VineIrrigation]
            Operations 100
              2002-02-14  [DripIrrigator].Script.applyDripIrri(10.6);
              2002-02-17  [DripIrrigator].Script.applyDripIrri(10.6);
              2002-02-19  [DripIrrigator].Script.applyDripIrri(10.6);
              2002-02-21  [DripIrrigator].Script.applyDripIrri(10.6);
              2002-02-25  [DripIrrigator].Script.applyDripIrri(10.6);
              2002-02-26  [DripIrrigator].Script.applyDripIrri(10.6);
              2002-03-03  [DripIrrigator].Script.applyDripIrri(10.6);
              2002-03-05  [DripIrrigator].Script.applyDripIrri(10.6);
              2002-03-07  [DripIrrigator].Script.applyDripIrri(10.6);
              2002-03-10  [DripIrrigator].Script.applyDripIrri(10.6);
              2002-03-12  [DripIrrigator].Script.applyDripIrri(10.6);
              2002-03-14  [DripIrrigator].Script.applyDripIrri(10.6);
              2002-03-19  [DripIrrigator].Script.applyDripIrri(10.6);
              2002-03-21  [DripIrrigator].Script.applyDripIrri(10.6);
              2002-03-24  [DripIrrigator].Script.applyDripIrri(10.6);
              2002-03-26  [DripIrrigator].Script.applyDripIrri(10.6);
              2002-04-01  [DripIrrigator].Script.applyDripIrri(10.6);
              2002-04-07  [DripIrrigator].Script.applyDripIrri(10.6);
              2002-04-10  [DripIrrigator].Script.applyDripIrri(10.6);
              2002-04-18  [DripIrrigator].Script.applyDripIrri(10.6);
              2002-04-21  [DripIrrigator].Script.applyDripIrri(10.6);
              2002-10-05  [DripIrrigator].Script.applyDripIrri(7.3);
              2002-10-08  [DripIrrigator].Script.applyDripIrri(7.3);
              2002-10-10  [DripIrrigator].Script.applyDripIrri(7.3);
              2002-10-12  [DripIrrigator].Script.applyDripIrri(7.3);
              2002-10-18  [DripIrrigator].Script.applyDripIrri(7.3);
              2002-10-23  [DripIrrigator].Script.applyDripIrri(7.3);
              2002-10-26  [DripIrrigator].Script.applyDripIrri(7.3);
              2002-10-28  [DripIrrigator].Script.applyDripIrri(7.3);
              2002-11-05  [DripIrrigator].Script.applyDripIrri(7.3);
              2002-11-08  [DripIrrigator].Script.applyDripIrri(7.3);
              2002-11-11  [DripIrrigator].Script.applyDripIrri(7.3);
              2002-11-18  [DripIrrigator].Script.applyDripIrri(7.3);
              2002-11-20  [DripIrrigator].Script.applyDripIrri(7.3);
              2002-11-23  [DripIrrigator].Script.applyDripIrri(7.3);
              2002-11-25  [DripIrrigator].Script.applyDripIrri(7.3);
              2002-11-29  [DripIrrigator].Script.applyDripIrri(7.3);
              2002-12-04  [DripIrrigator].Script.applyDripIrri(7.3);
              2002-12-09  [DripIrrigator].Script.applyDripIrri(7.3);
              2002-12-11  [DripIrrigator].Script.applyDripIrri(7.3);
              2002-12-19  [DripIrrigator].Script.applyDripIrri(7.3);
              2002-12-27  [DripIrrigator].Script.applyDripIrri(7.3);
              2002-12-31  [DripIrrigator].Script.applyDripIrri(7.3);
              2003-01-03  [DripIrrigator].Script.applyDripIrri(7.3);
              2003-01-08  [DripIrrigator].Script.applyDripIrri(7.3);
              2003-01-09  [DripIrrigator].Script.applyDripIrri(7.3);
              2003-01-11  [DripIrrigator].Script.applyDripIrri(7.3);
              2003-01-15  [DripIrrigator].Script.applyDripIrri(7.3);
              2003-01-18  [DripIrrigator].Script.applyDripIrri(7.3);
              2003-01-23  [DripIrrigator].Script.applyDripIrri(7.3);
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              2003-12-03  [DripIrrigator].Script.applyDripIrri(5.2);
              2003-12-07  [DripIrrigator].Script.applyDripIrri(7);
              2004-02-05  [DripIrrigator].Script.applyDripIrri(3.5);
              2005-02-26  [DripIrrigator].Script.applyDripIrri(6.9);
            Operations 60
              2002-02-14  [DripIrrigator].Script.applyDripIrri(6.3);
              2002-02-17  [DripIrrigator].Script.applyDripIrri(6.3);
              2002-02-19  [DripIrrigator].Script.applyDripIrri(6.3);
              2002-02-21  [DripIrrigator].Script.applyDripIrri(6.3);
              2002-02-25  [DripIrrigator].Script.applyDripIrri(6.3);
              2002-02-26  [DripIrrigator].Script.applyDripIrri(6.3);
              2002-03-03  [DripIrrigator].Script.applyDripIrri(6.3);
              2002-03-05  [DripIrrigator].Script.applyDripIrri(6.3);
              2002-03-07  [DripIrrigator].Script.applyDripIrri(6.3);
              2002-03-10  [DripIrrigator].Script.applyDripIrri(6.3);
              2002-03-12  [DripIrrigator].Script.applyDripIrri(6.3);
              2002-03-14  [DripIrrigator].Script.applyDripIrri(6.3);
              2002-03-19  [DripIrrigator].Script.applyDripIrri(6.3);
              2002-03-21  [DripIrrigator].Script.applyDripIrri(6.3);
              2002-03-24  [DripIrrigator].Script.applyDripIrri(6.3);
              2002-03-26  [DripIrrigator].Script.applyDripIrri(6.3);
              2002-04-01  [DripIrrigator].Script.applyDripIrri(6.3);
              2002-04-07  [DripIrrigator].Script.applyDripIrri(6.3);
              2002-04-10  [DripIrrigator].Script.applyDripIrri(6.3);
              2002-04-18  [DripIrrigator].Script.applyDripIrri(6.3);
              2002-04-21  [DripIrrigator].Script.applyDripIrri(6.3);
              2002-10-05  [DripIrrigator].Script.applyDripIrri(4.4);
              2002-10-08  [DripIrrigator].Script.applyDripIrri(4.4);
              2002-10-10  [DripIrrigator].Script.applyDripIrri(4.4);
              2002-10-12  [DripIrrigator].Script.applyDripIrri(4.4);
              2002-10-18  [DripIrrigator].Script.applyDripIrri(4.4);
              2002-10-23  [DripIrrigator].Script.applyDripIrri(4.4);
              2002-10-26  [DripIrrigator].Script.applyDripIrri(4.4);
              2002-10-28  [DripIrrigator].Script.applyDripIrri(4.4);
              2002-11-05  [DripIrrigator].Script.applyDripIrri(4.4);
              2002-11-08  [DripIrrigator].Script.applyDripIrri(4.4);
              2002-11-11  [DripIrrigator].Script.applyDripIrri(4.4);
              2002-11-18  [DripIrrigator].Script.applyDripIrri(4.4);
              2002-11-20  [DripIrrigator].Script.applyDripIrri(4.4);
              2002-11-23  [DripIrrigator].Script.applyDripIrri(4.4);
              2002-11-25  [DripIrrigator].Script.applyDripIrri(4.4);
              2002-11-29  [DripIrrigator].Script.applyDripIrri(4.4);
              2002-12-04  [DripIrrigator].Script.applyDripIrri(4.4);
              2002-12-09  [DripIrrigator].Script.applyDripIrri(4.4);
              2002-12-11  [DripIrrigator].Script.applyDripIrri(4.4);
              2002-12-19  [DripIrrigator].Script.applyDripIrri(4.4);
              2002-12-27  [DripIrrigator].Script.applyDripIrri(4.4);
              2002-12-31  [DripIrrigator].Script.applyDripIrri(4.4);
              2003-01-03  [DripIrrigator].Script.applyDripIrri(4.4);
              2003-01-08  [DripIrrigator].Script.applyDripIrri(4.4);
              2003-01-09  [DripIrrigator].Script.applyDripIrri(4.4);
              2003-01-11  [DripIrrigator].Script.applyDripIrri(4.4);
              2003-01-15  [DripIrrigator].Script.applyDripIrri(4.4);
              2003-01-18  [DripIrrigator].Script.applyDripIrri(4.4);
              2003-01-23  [DripIrrigator].Script.applyDripIrri(4.4);
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              2003-12-03  [DripIrrigator].Script.applyDripIrri(3.1);
              2003-12-07  [DripIrrigator].Script.applyDripIrri(4.2);
              2004-02-05  [DripIrrigator].Script.applyDripIrri(2.1);
              2005-02-26  [DripIrrigator].Script.applyDripIrri(4.1);
        Simulation RPC_1
          Clock: Start=2000-02-25; End=2002-05-02
          Summary SummaryFile
          Weather: FileName=Site1004_RPC.met
          MicroClimate: a_interception=0; b_interception=1; c_interception=0; d_interception=0; soil_albedo=0.3; SoilHeatFluxFraction=0.4; MinimumHeightDiffForNewLayer=0; NightInterceptionFraction=0.5; ReferenceHeight=2
          SoilArbitrator Soil Arbitrator
          RectangularZone Row: Length=100; Width=0.9; Slope=0; AspectAngle=0; Altitude=50
            Report: EventNames=[Clock].DoReport
            Memo: same as ExampleSimulation.BaseSim.Row.Memo
            Plant Grapevine: IsAlive=false; IsEnding=false; DaysAfterEnding=0
            Irrigation
            Fertiliser
            SurfaceOrganicMatter: InitialResidueName=wheat_stubble; InitialResidueType=wheat; InitialResidueMass=500; InitialStandingFraction=0; InitialCPR=0; InitialCNR=100
            Soil: Latitude=0; Longitude=0
              LayerStructure: Thickness=[200, 200, 200, 200, 200, 200, 400, 400, 400, 600]
              Chemical
                Thickness  NO3N     NH4N  PH
                100        10       0     6.6
                200        11.1111  0     6.2
                300        1.21212  0     5.7
                300        1.19048  0     5.5
                300        0        0     5.5
                300        0        0     5.5
              InitialWater Initial water: PercentMethod=1; FractionFull=1; RelativeTo=LL15
              Physical
                Thickness  BD    AirDry  LL15  DUL   SAT
                200        1.35  0.1     0.2   0.35  0.45
                250        1.35  0.1     0.2   0.35  0.45
                300        1.4   0.15    0.15  0.35  0.4
                150        1.4   0.13    0.13  0.33  0.35
                150        1.4   0.1     0.1   0.28  0.35
                1950       1.59  0.06    0.06  0.1   0.3
                SoilCrop GrapevineSoil: LL=[0.2, 0.2, 0.15, 0.13, 0.1, 0.06]; KL=[0.25, 0.1, 0.08, 0.05, 0.05, 0.01]; XF=[1, 1, 1, 1, 1, 1]
                SoilCrop SlurpSoil: LL=[0.2, 0.2, 0.15, 0.13, 0.1, 0.06]; KL=[0.11, 0.11, 0.11, 0.11, 0.11, 0.11]; XF=[1, 1, 1, 1, 1, 1]
              WaterBalance SoilWater: SummerDate=1-Nov; SummerU=4; SummerCona=1; WinterDate=1-Apr; WinterU=4; WinterCona=1; DiffusConst=88; DiffusSlope=35.4; Salb=0.18; CN2Bare=68; CNRed=20; CNCov=0.8; DischargeWidth=0; CatchmentArea=0
                Thickness  SWCON  KLAT
                150        0.55   0
                150        0.55   0
                100        0.55   0
                200        0.55   0
                200        0.55   0
                200        0.55   0
                200        0.55   0
                200        0.55   0
                200        0.55   0
                200        0.55   0
                200        0.55   0
                200        0.55   0
                400        0.55   0
              SoilNitrogen: same as ExampleSimulation.BaseSim.Row.Soil.SoilNitrogen
              Organic: same as ExampleSimulation.BaseSim.Row.Soil.Organic
              CERESSoilTemperature Temperature
              OutputLayers: Thickness=[150, 150, 150, 150, 150, 150, 150]
            Manager SetupTreeRootZones
              UseExtraZone = True
```csharp
using Models.PMF.Organs;
using System;
using Models.Core;
using System.Collections.Generic;
using System.Text;
using Models.PMF;
using Models;
using System.Xml.Serialization;
using APSIM.Shared.Utilities;
using Models.Functions;

namespace Models
{
    [Serializable] 
    public class Script : Model
    {
        [Link] private Plant Grapevine;
        [Link] private Clock Clock;
        [Link] private Zone zone;
        [Link(Type = LinkType.Path, Path = "[Grapevine].Root")]
        private Root root;

        [Description("Use extra root zone")]
        public bool UseExtraZone { get; set; }

        
        [EventSubscribe("StartOfSimulation")]
        private void OnSimulationCommencing(object sender, EventArgs e)
        {
            if (UseExtraZone)
            {
            root.ZoneNamesToGrowRootsIn.Add("Alley");
            root.ZoneRootDepths.Add(2600);
BiomassDemand InitialDM = new BiomassDemand();
Constant InitStruct = new Constant();
InitStruct.FixedValue = 500;
InitialDM.Structural = InitStruct;
Constant InitMetab = new Constant();
InitMetab.FixedValue = 0;
InitialDM.Metabolic = InitMetab;
Constant InitStor = new Constant();
InitStor.FixedValue = 100;
InitialDM.Storage = InitStor;
            root.ZoneInitialDM.Add(InitialDM);

            }
        }
    }
}
```
            Operations VineIrrigation
            Operations WinterRainfall
              2002-05-28  [Irrigation].Apply(200);
            Manager PlantVariables
              FRadInt = 0
              ET = 0
              ES = 0
              PET = 0
              LAI = 0
              LAIPerVine = 0
              Height = 0
              RootDepth = 0
              PlantWidth = 0
```csharp
using Models.Climate;
using System;
using Models.Core;
using Models.PMF;
using System.Collections.Generic;
using Models.Soils;
using APSIM.Shared.Utilities;
using Models.Zones;
using Models.PMF.Organs;

namespace Models
{
    [Serializable]
    public class Script : Model
    {
        [Link] private Weather weather;
        [Link(Type = LinkType.Path, Path = "[Grapevine].Root")]
        private Root root;
        private RectangularZone AlleyZone {get; set; }
        private RectangularZone RowZone {get; set;}
        private RectangularZone ThisZone {get; set;}
        private double AreaWidth {get; set;}

        public double FRadInt {get; set;}
        public double ET {get; set;}
        public double ES {get; set;}
        public double PET {get; set;}
        public double LAI {get; set;}
        public double LAIPerVine {get; set;}
        public double Height {get; set;}
        public double RootDepth {get; set;}
        public double PlantWidth {get; set;}

        [EventSubscribe("StartOfSimulation")]
        private void DoStartOfSimulation(object sender, EventArgs e)
        {
               
               ThisZone = this.Parent.Parent as RectangularZone;
               RowZone = this.Parent.Parent.Parent.FindInScope("Row") as RectangularZone;
               AlleyZone = (RectangularZone)this.Parent.Parent.Parent.FindInScope("Alley") as RectangularZone;
               AreaWidth = AlleyZone.Width + RowZone.Width;
               PlantWidth = 0;
        }
        
        [EventSubscribe("DoReportCalculations")]
        private void OnDoReportCalculations(object sender, EventArgs e)
        {
            if (ThisZone.Name == "Row")
                {
                FRadInt = ((double)RowZone.Get("Grapevine.Leaf.RadIntTot") * RowZone.Width)/(weather.Radn * AreaWidth);
                ET = (double)RowZone.Get("Grapevine.Leaf.Transpiration") * RowZone.Width/AreaWidth;
                LAI = (double)RowZone.Get("Grapevine.Leaf.LAI");
                LAIPerVine =  LAI*RowZone.Width*1.8;
                //TreeInitialisation.Script.VineDistance;
                //(double)RowZone.Get("Grapevine.Leaf.LAI");
                Height = (double)RowZone.Get("Grapevine.Leaf.Height");
                RootDepth = (double)RowZone.Get("Grapevine.Root.Depth");
                PlantWidth = (double)RowZone.Get("Grapevine.Leaf.Width");
                }
            else
                {
                FRadInt = ((double)AlleyZone.Get("Slurp.Leaf.RadIntTot") * ThisZone.Width)/ (weather.Radn * AreaWidth);
                ET = (double)AlleyZone.Get("Slurp.Leaf.Transpiration") * ThisZone.Width/AreaWidth;
                LAI = (double)AlleyZone.Get("Slurp.Leaf.LAI");
                Height = (double)AlleyZone.Get("Slurp.Leaf.Height");
                RootDepth = (double)AlleyZone.Get("Slurp.Root.Depth");
                }

            ES = (double)ThisZone.Get("Soil.SoilWater.Es") * ThisZone.Width/AreaWidth;
            double PETWidth = Math.Min(Math.Max(PlantWidth,ThisZone.Width),AreaWidth);
            PET = (double)ThisZone.Get("Soil.SoilWater.Eo") * PETWidth/AreaWidth;
        }
    }
}
```
            Manager DripIrrigator
              FertilizeDAWS = 100
              Amount = 50
              totalIrrigation = 0
              script: same as in ExampleSimulation.BaseSim.Row.DripIrrigator
            Manager TreeInitialisation
              CultivarName = SauvignonBlanc
              SowingDate = 02/25/2000 00:00:00
              VineDistance = 1.8
              BudNumber = 44
              CaneNumber = 4
              CaneDiameter = 10
              CaneLength = 0.9
              TrunkDiameter = 65
              TrunkLength = 0.8
              RootTrunkRatio = 1
              RootNSC = 0.2
              TrunkNSC = 0.2
              CaneNSC = 0.2
              StartAge = 8
              script: same as in ExampleSimulation.BaseSim.Row.TreeInitialisation
            Manager HarvestNPruning
              LeafPluckingDAWS = 209
              HarvestDAWS = 305
              PruningDAWS = 341
              FrostDate1 = 10/03/2002 00:00:00
              FrostDate2 = 11/18/2002 00:00:00
```csharp
using Newtonsoft.Json;
using Models.PMF.Struct;
using Models.Climate;
using System;
using System.Collections.Generic;
using Models.Core;
using Models.PMF;
using Models.PMF.Interfaces;
using System.Xml.Serialization;
using Models.PMF.Organs;
using Models.PMF.Phen;

namespace Models
{
    [Serializable] 
    [System.Xml.Serialization.XmlInclude(typeof(Model))]
    public class Script : Model
    {
        [Link] private Plant Grapevine;
        [Link] private Clock Clock;
        [Link] private Zone zone;
        [Link] private Weather weather;
        [Link]
        private Root root;
        [Link(Type = LinkType.Path, Path = "[Grapevine].Structure")]
        private Structure structure;
        [Link(Type = LinkType.Path, Path = "[Grapevine].Phenology")]
        private Phenology phenology;
       
        [Description("SummerPruning_DAWS")]         
        public int LeafPluckingDAWS { get; set; }  //day

        [Description("Harvest_DAWS")]
        public int HarvestDAWS { get; set; }

        [Description("Pruning_DAWS")]         
        public int PruningDAWS { get; set; }  //day

        [Description("Frost Date 1")]
        public DateTime FrostDate1 { get; set; }
        [Description("Frost Date 2")]
        public DateTime FrostDate2 { get; set; }


        [JsonIgnore] private RemovalFractions Remove_1 { get; set; }
        [JsonIgnore] private RemovalFractions Remove_2 { get; set; }
        [JsonIgnore] private RemovalFractions Remove_3 { get; set; }
        [JsonIgnore] private RemovalFractions Remove_4 { get; set; }
        [JsonIgnore] private RemovalFractions Remove_5 { get; set; }
        [EventSubscribe("StartOfSimulation")]
        private void OnSimulationCommencing(object sender, EventArgs e)
        {
            Remove_1 = new RemovalFractions();
            Remove_2 = new RemovalFractions();
            Remove_3 = new RemovalFractions();
            Remove_4 = new RemovalFractions();
            Remove_5 = new RemovalFractions();
            zone.Set("[Grapevine].Phenology.AccumulatedChillingUnitBeforeWinterPruning.ChillBeforePrune.PruningTime.FixedValue", PruningDAWS);
        }
        
        [EventSubscribe("DoManagement")]
        private void OnDoManagement(object sender, EventArgs e)
        {
             //Set up  array of remove fractions to send with Cut method.  Each member in the array corresponds to an organ in the same order they are set up in.
             //PruneDate = DateTime.Parse(PruneDateString);
             if (weather.DaysSinceWinterSolstice == LeafPluckingDAWS && phenology.Stage >= 3)
             {
                //int TargetLeafRank = 20;    
                //int LeafTipsAppeared = 25;//(int)structure.LeafTipsAppeared;

                //int NodesToRemove = (int)Math.Max(LeafTipsAppeared - TargetLeafRank, 1); 
                double FractionToRemove = 0.2;//1- TargetLeafRank/LeafTipsAppeared;
            
                Remove_1.SetFractionToRemove("Leaf", 0, "live");
                Remove_1.SetFractionToRemove("Shoot", 0);
                Remove_1.SetFractionToRemove("Cane", 0);
                Remove_1.SetFractionToRemove("Trunk", 0);
                Remove_1.SetFractionToRemove("Root", 0);
                Remove_1.SetFractionToRemove("StructuralRoot", 0);
                Remove_1.SetFractionToRemove("Berry", 0);
            
                Remove_1.SetFractionToResidue("Leaf", FractionToRemove, "live");
                Remove_1.SetFractionToResidue("Shoot", FractionToRemove);
                Remove_1.SetFractionToResidue("Cane", 0);
                Remove_1.SetFractionToResidue("Trunk", 0);
                Remove_1.SetFractionToResidue("Root", 0);
                Remove_1.SetFractionToRemove("StructuralRoot", 0);
                Remove_1.SetFractionToResidue("Berry", 0);
            
               // Remove_1.NodesToRemove = NodesToRemove;
                Grapevine.RemoveBiomass("LeafPluck", Remove_1);
        
             }

           if (weather.DaysSinceWinterSolstice == HarvestDAWS && phenology.Stage >= 3)
           {
               
               Remove_2.SetFractionToRemove("Leaf", 0, "live");
               Remove_2.SetFractionToRemove("Shoot",  0);
               Remove_2.SetFractionToRemove("Cane", 0);
               Remove_2.SetFractionToRemove("Trunk",  0);
               Remove_2.SetFractionToRemove("Root",   0);
               Remove_2.SetFractionToRemove("StructuralRoot", 0);
               Remove_2.SetFractionToRemove("Berry",  1);
         
               Remove_2.SetFractionToResidue("Leaf",   0.1, "live");
               Remove_2.SetFractionToResidue("Shoot",  0);
               Remove_2.SetFractionToResidue("Cane", 0);
               Remove_2.SetFractionToResidue("Trunk",  0);
               Remove_2.SetFractionToResidue("Root",   0);
               Remove_2.SetFractionToRemove("StructuralRoot", 0);
               Remove_2.SetFractionToResidue("Berry",  0);
         
               Grapevine.RemoveBiomass("LeafPluck", Remove_2);
           }
                                   
            if (weather.DaysSinceWinterSolstice == PruningDAWS&& phenology.Stage >= 3)
            {
                Remove_3.SetPhenologyStage = 1;

                Remove_3.SetFractionToRemove("Leaf",   0, "live");
                Remove_3.SetFractionToRemove("Shoot",  0);
                Remove_3.SetFractionToRemove("Cane", 0);
                Remove_3.SetFractionToRemove("Trunk",  0);
                Remove_3.SetFractionToRemove("Root",   0);
                Remove_3.SetFractionToRemove("Berry",  0);

                Remove_3.SetFractionToResidue("Leaf",   1, "live");
                Remove_3.SetFractionToResidue("Shoot",  1);
                Remove_3.SetFractionToResidue("Cane", 1);
                Remove_3.SetFractionToResidue("Trunk",  0);
                Remove_3.SetFractionToResidue("Root",   0);
                Remove_3.SetFractionToRemove("StructuralRoot", 0);
                Remove_3.SetFractionToResidue("Berry",  1);

                Grapevine.RemoveBiomass("Prune", Remove_3);

                double budNumber = (double)zone.Get("Grapevine.Structure.BudsPerMeterRow.FixedValue"); 
                double caneNum = budNumber*1.8/12;
                double caneBiomass = 17.5 * caneNum; //g/m2 reset the cane biomass to the original value 
                double caneNSC = caneBiomass * 0.18;

                zone.Set("[Grapevine].Cane.Live.StorageWt", caneNSC);                
                zone.Set("[Grapevine].Cane.Live.StructuralWt", caneBiomass - caneNSC); 
                zone.Set("[Grapevine].Phenology.AccumulatedChillingUnitBeforeWinterPruning.ChillBeforePrune.PruningTime.FixedValue",PruningDAWS); 
                //zone.Set("[Grapevine].Trunk.Live.StructuralWt", 280);     
               // zone.Set("[Grapevine].Trunk.Live.StorageWt", 70);     

               // zone.Set("[Grapevine].Root.Live.StructuralWt", 1531);     
               // zone.Set("[Grapevine].Root.Live.StorageWt",  349);     

            }
           if (Clock.Today.Date == FrostDate1)      
           {
              Remove_4.SetFractionToRemove("Leaf", 0, "live");
              Remove_4.SetFractionToRemove("Shoot",  0);
              Remove_4.SetFractionToRemove("Cane", 0);
              Remove_4.SetFractionToRemove("Trunk",  0);
              Remove_4.SetFractionToRemove("Root",   0);
              Remove_4.SetFractionToRemove("StructuralRoot", 0);
              Remove_4.SetFractionToRemove("Berry",  0);
           //
              Remove_4.SetFractionToResidue("Leaf",   0.2, "live");
              Remove_4.SetFractionToResidue("Shoot",  0);
              Remove_4.SetFractionToResidue("Cane", 0);
              Remove_4.SetFractionToResidue("Trunk",  0);
              Remove_4.SetFractionToResidue("Root",   0);
              Remove_4.SetFractionToRemove("StructuralRoot", 0);
              Remove_4.SetFractionToResidue("Berry",  0);
           //
              Grapevine.RemoveBiomass("LeafPluck", Remove_4);
              //zone.Set("[Grapevine].Structure.FinalLeafNumber.FixedValue", 28); 
           //
           }  

           if (Clock.Today.Date == FrostDate2)      
           {
              Remove_5.SetFractionToRemove("Leaf", 0, "live");
              Remove_5.SetFractionToRemove("Shoot",  0);
              Remove_5.SetFractionToRemove("Cane", 0);
              Remove_5.SetFractionToRemove("Trunk",  0);
              Remove_5.SetFractionToRemove("Root",   0);
              Remove_5.SetFractionToRemove("StructuralRoot", 0);
              Remove_5.SetFractionToRemove("Berry",  0);
           //
              Remove_5.SetFractionToResidue("Leaf",   0.2, "live");
              Remove_5.SetFractionToResidue("Shoot",  0);
              Remove_5.SetFractionToResidue("Cane", 0);
              Remove_5.SetFractionToResidue("Trunk",  0);
              Remove_5.SetFractionToResidue("Root",   0);
              Remove_5.SetFractionToRemove("StructuralRoot", 0);
              Remove_5.SetFractionToResidue("Berry",  0);
           //
              Grapevine.RemoveBiomass("LeafPluck", Remove_5);
           //
           }  

        }
    }
}
```
            Manager Fertilise on fixed dates: same as ExampleSimulation.BaseSim.Row.Fertilise on fixed dates
            Manager Fertilise topup: same as Replacements.Fertilise topup
          RectangularZone Alley: Length=100; Width=1.5; Slope=0; AspectAngle=0; Altitude=50
            Report ReportAlley: EventNames=[Clock].DoReport
              VariableNames:
                [Clock].Today
                [Clock].Today.Year
                [Clock].Today.DayOfYear
                [Weather].DaysSinceWinterSolstice as DAWS
                [PlantVariables].Script.Height as height
                [PlantVariables].Script.LAI as lai
                [PlantVariables].Script.FRadInt as f.rad.int
                [PlantVariables].Script.ET as transpiration
                [PlantVariables].Script.ES as Es
                [PlantVariables].Script.PET as PET
                [PlantVariables].Script.RootDepth as rootDepth
                [Soil].OutputLayers.SW
                sum([Soil].OutputLayers.SWmm) as psw
                [Weather].Rain
                [Irrigation].IrrigationApplied
                [Soil].SoilWater.Drainage
            SurfaceOrganicMatter: InitialResidueName=wheat_stubble; InitialResidueType=wheat; InitialResidueMass=500; InitialStandingFraction=0; InitialCPR=0; InitialCNR=100
            Plant Slurp
            Fertiliser
            Irrigation
            Manager PastureInitialisation
              CultivarName = StaticCrop
              InitialRootDepth = 2000
              SowingDate = 02/25/2000 00:00:00
              RootDepth = 2000
              RFV = 10
              KLReductionFactor = -0.001
              KLReductionDepth = 150
              YKLModifiers =
              XDepth =
              MaxG = 0.004
              R50 = 150
              script: same as in ExampleSimulation.BaseSim.Alley.PastureInitialisation
            Manager SetPastureVariables
              Ext_coef = 0.6
              MaximumHeight = 300
              MinimumHeight = 100
              Cover = 0
              LAI = 0
              script: same as in ExampleSimulation.BaseSim.Alley.SetPastureVariables
            Manager SetupPastureRootZones
              UseExtraZone = False
              script: same as in ExampleSimulation.BaseSim.Alley.SetupPastureRootZones
            Soil: Latitude=0; Longitude=0
              LayerStructure: Thickness=[200, 200, 200, 200, 200, 200, 400, 400, 400, 600]
              Chemical
                Thickness  NO3N     NH4N  PH
                100        160.741  0     6.6
                200        11.1111  0     6.2
                300        1.21212  0     5.7
                300        1.19048  0     5.5
                300        0        0     5.5
                300        0        0     5.5
              InitialWater Initial water: PercentMethod=1; FractionFull=1.00166; RelativeTo=LL15
              WaterBalance SoilWater: same as Validation.Sauvignonblanc.RPC_2000_2002.RPC_1.Row.Soil.SoilWater
              SoilNitrogen: same as ExampleSimulation.BaseSim.Row.Soil.SoilNitrogen
              Organic: same as ExampleSimulation.BaseSim.Row.Soil.Organic
              CERESSoilTemperature Temperature
              OutputLayers: Thickness=[150, 150, 150, 150, 150, 150, 150]
              Physical: same as Validation.Sauvignonblanc.RPC_2000_2002.RPC_1.Row.Soil.Physical
            Operations WinterRainfall
              2002-05-28  [Irrigation].Apply(200);
            Manager PlantVariables
              FRadInt = 0
              ET = 0
              ES = 0
              PET = 0
              LAI = 0
              Height = 0
              RootDepth = 0
              PlantWidth = 0
```csharp
using Models.Climate;
using System;
using Models.Core;
using Models.PMF;
using System.Collections.Generic;
using Models.Soils;
using APSIM.Shared.Utilities;
using Models.Zones;
using Models.PMF.Organs;

namespace Models
{
    [Serializable]
    public class Script : Model
    {
        [Link] private Weather weather;
        [Link(Type = LinkType.Path, Path = "[Grapevine].Root")]
        private Root root;
        private RectangularZone AlleyZone {get; set; }
        private RectangularZone RowZone {get; set;}
        private RectangularZone ThisZone {get; set;}
        private double AreaWidth {get; set;}

        public double FRadInt {get; set;}
        public double ET {get; set;}
        public double ES {get; set;}
        public double PET {get; set;}
        public double LAI {get; set;}
        public double Height {get; set;}
        public double RootDepth {get; set;}
        public double PlantWidth {get; set;}

        [EventSubscribe("StartOfSimulation")]
        private void DoStartOfSimulation(object sender, EventArgs e)
        {
               
               ThisZone = this.Parent.Parent as RectangularZone;
               RowZone = this.Parent.Parent.Parent.FindInScope("Row") as RectangularZone;
               AlleyZone = (RectangularZone)this.Parent.Parent.Parent.FindInScope("Alley") as RectangularZone;
               AreaWidth = AlleyZone.Width + RowZone.Width;
               PlantWidth = 0;
        }
        
        [EventSubscribe("DoReportCalculations")]
        private void OnDoReportCalculations(object sender, EventArgs e)
        {
            if (ThisZone.Name == "Row")
                {
                FRadInt = ((double)RowZone.Get("Grapevine.Leaf.RadIntTot") * RowZone.Width)/(weather.Radn * AreaWidth);
                ET = (double)RowZone.Get("Grapevine.Leaf.Transpiration") * RowZone.Width/AreaWidth;
                LAI = (double)RowZone.Get("Grapevine.Leaf.LAI");
                Height = (double)RowZone.Get("Grapevine.Leaf.Height");
                RootDepth = (double)RowZone.Get("Grapevine.Root.Depth");
                PlantWidth = (double)RowZone.Get("Grapevine.Leaf.Width");
                }
            else
                {
                FRadInt = ((double)AlleyZone.Get("Slurp.Leaf.RadIntTot") * ThisZone.Width)/ (weather.Radn * AreaWidth);
                ET = (double)AlleyZone.Get("Slurp.Leaf.Transpiration") * ThisZone.Width/AreaWidth;
                LAI = (double)AlleyZone.Get("Slurp.Leaf.LAI");
                Height = (double)AlleyZone.Get("Slurp.Leaf.Height");
                RootDepth = (double)AlleyZone.Get("Slurp.Root.Depth");
                }

            ES = (double)ThisZone.Get("Soil.SoilWater.Es") * ThisZone.Width/AreaWidth;
            double PETWidth = Math.Min(Math.Max(PlantWidth,ThisZone.Width),AreaWidth);
            PET = (double)ThisZone.Get("Soil.SoilWater.Eo") * PETWidth/AreaWidth;
        }
    }
}
```
            Manager Fertilise topup: same as Replacements.Fertilise topup
      Experiment RPC_2002_2006
        DisabledSimNames=[Grape_Squire_1Irri70, Grape_Squire_1Irri80, Grape_SquireIrri20, Grape_SquireIrri40, Grape_SquireIrri70, Grape_SquireIrri80]
        Factors
          Factor Irri: Specification=[VineIrrigation]
            Operations 20
              2002-02-14  [DripIrrigator].Script.applyDripIrri(2.1);
              2002-02-17  [DripIrrigator].Script.applyDripIrri(2.1);
              2002-02-19  [DripIrrigator].Script.applyDripIrri(2.1);
              2002-02-21  [DripIrrigator].Script.applyDripIrri(2.1);
              2002-02-25  [DripIrrigator].Script.applyDripIrri(2.1);
              2002-02-26  [DripIrrigator].Script.applyDripIrri(2.1);
              2002-03-03  [DripIrrigator].Script.applyDripIrri(2.1);
              2002-03-05  [DripIrrigator].Script.applyDripIrri(2.1);
              2002-03-07  [DripIrrigator].Script.applyDripIrri(2.1);
              2002-03-10  [DripIrrigator].Script.applyDripIrri(2.1);
              2002-03-12  [DripIrrigator].Script.applyDripIrri(2.1);
              2002-03-14  [DripIrrigator].Script.applyDripIrri(2.1);
              2002-03-19  [DripIrrigator].Script.applyDripIrri(2.1);
              2002-03-21  [DripIrrigator].Script.applyDripIrri(2.1);
              2002-03-24  [DripIrrigator].Script.applyDripIrri(2.1);
              2002-03-26  [DripIrrigator].Script.applyDripIrri(2.1);
              2002-04-01  [DripIrrigator].Script.applyDripIrri(2.1);
              2002-04-07  [DripIrrigator].Script.applyDripIrri(2.1);
              2002-04-10  [DripIrrigator].Script.applyDripIrri(2.1);
              2002-04-18  [DripIrrigator].Script.applyDripIrri(2.1);
              2002-04-21  [DripIrrigator].Script.applyDripIrri(2.1);
              2002-10-05  [DripIrrigator].Script.applyDripIrri(1.5);
              2002-10-08  [DripIrrigator].Script.applyDripIrri(1.5);
              2002-10-10  [DripIrrigator].Script.applyDripIrri(1.5);
              2002-10-12  [DripIrrigator].Script.applyDripIrri(1.5);
              2002-10-18  [DripIrrigator].Script.applyDripIrri(1.5);
              2002-10-23  [DripIrrigator].Script.applyDripIrri(1.5);
              2002-10-26  [DripIrrigator].Script.applyDripIrri(1.5);
              2002-10-28  [DripIrrigator].Script.applyDripIrri(1.5);
              2002-11-05  [DripIrrigator].Script.applyDripIrri(1.5);
              2002-11-08  [DripIrrigator].Script.applyDripIrri(1.5);
              2002-11-11  [DripIrrigator].Script.applyDripIrri(1.5);
              2002-11-18  [DripIrrigator].Script.applyDripIrri(1.5);
              2002-11-20  [DripIrrigator].Script.applyDripIrri(1.5);
              2002-11-23  [DripIrrigator].Script.applyDripIrri(1.5);
              2002-11-25  [DripIrrigator].Script.applyDripIrri(1.5);
              2002-11-29  [DripIrrigator].Script.applyDripIrri(1.5);
              2002-12-04  [DripIrrigator].Script.applyDripIrri(1.5);
              2002-12-09  [DripIrrigator].Script.applyDripIrri(1.5);
              2002-12-11  [DripIrrigator].Script.applyDripIrri(1.5);
              2002-12-19  [DripIrrigator].Script.applyDripIrri(1.5);
              2002-12-27  [DripIrrigator].Script.applyDripIrri(1.5);
              2002-12-31  [DripIrrigator].Script.applyDripIrri(1.5);
              2003-01-03  [DripIrrigator].Script.applyDripIrri(1.5);
              2003-01-08  [DripIrrigator].Script.applyDripIrri(1.5);
              2003-01-09  [DripIrrigator].Script.applyDripIrri(1.5);
              2003-01-11  [DripIrrigator].Script.applyDripIrri(1.5);
              2003-01-15  [DripIrrigator].Script.applyDripIrri(1.5);
              2003-01-18  [DripIrrigator].Script.applyDripIrri(1.5);
              2003-01-23  [DripIrrigator].Script.applyDripIrri(1.5);
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              2003-12-03  [DripIrrigator].Script.applyDripIrri(1);
              2003-12-07  [DripIrrigator].Script.applyDripIrri(1.4);
              2004-02-05  [DripIrrigator].Script.applyDripIrri(0.7);
              2004-12-18  [DripIrrigator].Script.applyDripIrri(1.6);
            Operations 100
              2002-02-14  [DripIrrigator].Script.applyDripIrri(6.3);
              2002-02-17  [DripIrrigator].Script.applyDripIrri(6.3);
              2002-02-19  [DripIrrigator].Script.applyDripIrri(6.3);
              2002-02-21  [DripIrrigator].Script.applyDripIrri(6.3);
              2002-02-25  [DripIrrigator].Script.applyDripIrri(6.3);
              2002-02-26  [DripIrrigator].Script.applyDripIrri(6.3);
              2002-03-03  [DripIrrigator].Script.applyDripIrri(6.3);
              2002-03-05  [DripIrrigator].Script.applyDripIrri(6.3);
              2002-03-07  [DripIrrigator].Script.applyDripIrri(6.3);
              2002-03-10  [DripIrrigator].Script.applyDripIrri(6.3);
              2002-03-12  [DripIrrigator].Script.applyDripIrri(6.3);
              2002-03-14  [DripIrrigator].Script.applyDripIrri(6.3);
              2002-03-19  [DripIrrigator].Script.applyDripIrri(6.3);
              2002-03-21  [DripIrrigator].Script.applyDripIrri(6.3);
              2002-03-24  [DripIrrigator].Script.applyDripIrri(6.3);
              2002-03-26  [DripIrrigator].Script.applyDripIrri(6.3);
              2002-04-01  [DripIrrigator].Script.applyDripIrri(6.3);
              2002-04-07  [DripIrrigator].Script.applyDripIrri(6.3);
              2002-04-10  [DripIrrigator].Script.applyDripIrri(6.3);
              2002-04-18  [DripIrrigator].Script.applyDripIrri(6.3);
              2002-04-21  [DripIrrigator].Script.applyDripIrri(6.3);
              2002-10-05  [DripIrrigator].Script.applyDripIrri(4.4);
              2002-10-08  [DripIrrigator].Script.applyDripIrri(4.4);
              2002-10-10  [DripIrrigator].Script.applyDripIrri(4.4);
              2002-10-12  [DripIrrigator].Script.applyDripIrri(4.4);
              2002-10-18  [DripIrrigator].Script.applyDripIrri(4.4);
              2002-10-23  [DripIrrigator].Script.applyDripIrri(4.4);
              2002-10-26  [DripIrrigator].Script.applyDripIrri(4.4);
              2002-10-28  [DripIrrigator].Script.applyDripIrri(4.4);
              2002-11-05  [DripIrrigator].Script.applyDripIrri(4.4);
              2002-11-08  [DripIrrigator].Script.applyDripIrri(4.4);
              2002-11-11  [DripIrrigator].Script.applyDripIrri(4.4);
              2002-11-18  [DripIrrigator].Script.applyDripIrri(4.4);
              2002-11-20  [DripIrrigator].Script.applyDripIrri(4.4);
              2002-11-23  [DripIrrigator].Script.applyDripIrri(4.4);
              2002-11-25  [DripIrrigator].Script.applyDripIrri(4.4);
              2002-11-29  [DripIrrigator].Script.applyDripIrri(4.4);
              2002-12-04  [DripIrrigator].Script.applyDripIrri(4.4);
              2002-12-09  [DripIrrigator].Script.applyDripIrri(4.4);
              2002-12-11  [DripIrrigator].Script.applyDripIrri(4.4);
              2002-12-19  [DripIrrigator].Script.applyDripIrri(4.4);
              2002-12-27  [DripIrrigator].Script.applyDripIrri(4.4);
              2002-12-31  [DripIrrigator].Script.applyDripIrri(4.4);
              2003-01-03  [DripIrrigator].Script.applyDripIrri(4.4);
              2003-01-08  [DripIrrigator].Script.applyDripIrri(4.4);
              2003-01-09  [DripIrrigator].Script.applyDripIrri(4.4);
              2003-01-11  [DripIrrigator].Script.applyDripIrri(4.4);
              2003-01-15  [DripIrrigator].Script.applyDripIrri(4.4);
              2003-01-18  [DripIrrigator].Script.applyDripIrri(4.4);
              2003-01-23  [DripIrrigator].Script.applyDripIrri(4.4);
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              2003-12-03  [DripIrrigator].Script.applyDripIrri(3.1);
              2003-12-07  [DripIrrigator].Script.applyDripIrri(4.2);
              2004-02-05  [DripIrrigator].Script.applyDripIrri(2.1);
              2005-02-26  [DripIrrigator].Script.applyDripIrri(4.1);
            Operations 60
              2002-02-14  [DripIrrigator].Script.applyDripIrri(6.3);
              2002-02-17  [DripIrrigator].Script.applyDripIrri(6.3);
              2002-02-19  [DripIrrigator].Script.applyDripIrri(6.3);
              2002-02-21  [DripIrrigator].Script.applyDripIrri(6.3);
              2002-02-25  [DripIrrigator].Script.applyDripIrri(6.3);
              2002-02-26  [DripIrrigator].Script.applyDripIrri(6.3);
              2002-03-03  [DripIrrigator].Script.applyDripIrri(6.3);
              2002-03-05  [DripIrrigator].Script.applyDripIrri(6.3);
              2002-03-07  [DripIrrigator].Script.applyDripIrri(6.3);
              2002-03-10  [DripIrrigator].Script.applyDripIrri(6.3);
              2002-03-12  [DripIrrigator].Script.applyDripIrri(6.3);
              2002-03-14  [DripIrrigator].Script.applyDripIrri(6.3);
              2002-03-19  [DripIrrigator].Script.applyDripIrri(6.3);
              2002-03-21  [DripIrrigator].Script.applyDripIrri(6.3);
              2002-03-24  [DripIrrigator].Script.applyDripIrri(6.3);
              2002-03-26  [DripIrrigator].Script.applyDripIrri(6.3);
              2002-04-01  [DripIrrigator].Script.applyDripIrri(6.3);
              2002-04-07  [DripIrrigator].Script.applyDripIrri(6.3);
              2002-04-10  [DripIrrigator].Script.applyDripIrri(6.3);
              2002-04-18  [DripIrrigator].Script.applyDripIrri(6.3);
              2002-04-21  [DripIrrigator].Script.applyDripIrri(6.3);
              2002-10-05  [DripIrrigator].Script.applyDripIrri(4.4);
              2002-10-08  [DripIrrigator].Script.applyDripIrri(4.4);
              2002-10-10  [DripIrrigator].Script.applyDripIrri(4.4);
              2002-10-12  [DripIrrigator].Script.applyDripIrri(4.4);
              2002-10-18  [DripIrrigator].Script.applyDripIrri(4.4);
              2002-10-23  [DripIrrigator].Script.applyDripIrri(4.4);
              2002-10-26  [DripIrrigator].Script.applyDripIrri(4.4);
              2002-10-28  [DripIrrigator].Script.applyDripIrri(4.4);
              2002-11-05  [DripIrrigator].Script.applyDripIrri(4.4);
              2002-11-08  [DripIrrigator].Script.applyDripIrri(4.4);
              2002-11-11  [DripIrrigator].Script.applyDripIrri(4.4);
              2002-11-18  [DripIrrigator].Script.applyDripIrri(4.4);
              2002-11-20  [DripIrrigator].Script.applyDripIrri(4.4);
              2002-11-23  [DripIrrigator].Script.applyDripIrri(4.4);
              2002-11-25  [DripIrrigator].Script.applyDripIrri(4.4);
              2002-11-29  [DripIrrigator].Script.applyDripIrri(4.4);
              2002-12-04  [DripIrrigator].Script.applyDripIrri(4.4);
              2002-12-09  [DripIrrigator].Script.applyDripIrri(4.4);
              2002-12-11  [DripIrrigator].Script.applyDripIrri(4.4);
              2002-12-19  [DripIrrigator].Script.applyDripIrri(4.4);
              2002-12-27  [DripIrrigator].Script.applyDripIrri(4.4);
              2002-12-31  [DripIrrigator].Script.applyDripIrri(4.4);
              2003-01-03  [DripIrrigator].Script.applyDripIrri(4.4);
              2003-01-08  [DripIrrigator].Script.applyDripIrri(4.4);
              2003-01-09  [DripIrrigator].Script.applyDripIrri(4.4);
              2003-01-11  [DripIrrigator].Script.applyDripIrri(4.4);
              2003-01-15  [DripIrrigator].Script.applyDripIrri(4.4);
              2003-01-18  [DripIrrigator].Script.applyDripIrri(4.4);
              2003-01-23  [DripIrrigator].Script.applyDripIrri(4.4);
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              2003-12-03  [DripIrrigator].Script.applyDripIrri(3.1);
              2003-12-07  [DripIrrigator].Script.applyDripIrri(4.2);
              2004-02-05  [DripIrrigator].Script.applyDripIrri(2.1);
              2005-02-26  [DripIrrigator].Script.applyDripIrri(4.1);
              2004-12-18  [DripIrrigator].Script.applyDripIrri(4.8);
        Simulation RPC_2
          Clock: Start=2002-02-25; End=2006-07-01
          Summary SummaryFile
          Weather: FileName=Site1004_RPC.met
          MicroClimate: a_interception=0; b_interception=1; c_interception=0; d_interception=0; soil_albedo=0.3; SoilHeatFluxFraction=0.4; MinimumHeightDiffForNewLayer=0; NightInterceptionFraction=0.5; ReferenceHeight=2
          SoilArbitrator Soil Arbitrator
          RectangularZone Row: Length=100; Width=0.9; Slope=0; AspectAngle=0; Altitude=50
            Report: EventNames=[Clock].DoReport
            Memo: same as ExampleSimulation.BaseSim.Row.Memo
            Plant Grapevine: IsAlive=false; IsEnding=false; DaysAfterEnding=0
            Irrigation
            Fertiliser
            SurfaceOrganicMatter: InitialResidueName=wheat_stubble; InitialResidueType=wheat; InitialResidueMass=500; InitialStandingFraction=0; InitialCPR=0; InitialCNR=100
            Manager SetupTreeRootZones
              UseExtraZone = True
              script: same as in ExampleSimulation.BaseSim.Row.SetupTreeRootZones
            Operations VineIrrigation
            Operations WinterRainfall
              2002-05-28  [Irrigation].Apply(200);
            Soil: Latitude=0; Longitude=0
              LayerStructure: Thickness=[200, 200, 200, 200, 200, 200, 400, 400, 400, 600]
              Chemical
                Thickness  NO3N     NH4N  PH
                100        160.741  0     6.6
                200        10.8108  0     6.2
                300        1.19048  0     5.7
                300        1.19048  0     5.5
                300        0        0     5.5
                300        0        0     5.5
              Physical
                Thickness  BD    AirDry  LL15  DUL   SAT
                150        1.35  0.06    0.12  0.28  0.36
                750        1.4   0.1     0.1   0.28  0.36
                150        1.4   0.005   0.05  0.28  0.35
                150        1.4   0.05    0.05  0.28  0.35
                1950       1.5   0.06    0.06  0.15  0.3
                SoilCrop GrapevineSoil: LL=[0.12, 0.1, 0.05, 0.05, 0.06]; KL=[0.1, 0.04, 0.03, 0.03, 0.02]; XF=[1, 1, 1, 1, 1]
                SoilCrop SlurpSoil: LL=[0.12, 0.1, 0.05, 0.05, 0.06]; KL=[0.1, 0.04, 0.01, 0, 0]; XF=[1, 1, 1, 1, 1]
              WaterBalance SoilWater: same as Validation.Sauvignonblanc.RPC_2000_2002.RPC_1.Row.Soil.SoilWater
              SoilNitrogen: same as ExampleSimulation.BaseSim.Row.Soil.SoilNitrogen
              Organic: same as ExampleSimulation.BaseSim.Row.Soil.Organic
              CERESSoilTemperature Temperature
              OutputLayers: Thickness=[150, 150, 150, 150, 150, 150, 150]
              InitialWater: PercentMethod=0; FractionFull=0.8
            Manager PlantVariables: same as Validation.Sauvignonblanc.RPC_2000_2002.RPC_1.Row.PlantVariables
            Manager DripIrrigator
              totalIrrigation = 0
```csharp
using APSIM.Shared.Utilities;
using System.Xml.Serialization;
using Models;
using Models.PMF;
using Models.Soils;
using System.Text;
using System.Collections.Generic;
using Models.Core;
using System;

namespace Models
{
    [Serializable] 
    public class Script : Model
    {
       [Link] Irrigation irrigation;
        public void applyDripIrri(double amount)
        {
            double layerAmount = amount/4;
            irrigation.Apply(layerAmount, 0);
            irrigation.Apply(layerAmount*2, 220);
            irrigation.Apply(layerAmount, 420);

        }
        public double totalIrrigation {get; set;}
        [EventSubscribe("Irrigated")]
        private void OnIrrigated(object sender, 
        IrrigationApplicationType irrigData)
        {
            totalIrrigation += irrigData.Amount;
         }
    }
}
```
            Manager TreeInitialisation
              CultivarName = SauvignonBlanc
              SowingDate = 02/25/2002 00:00:00
              VineDistance = 1.8
              BudNumber = 48
              CaneNumber = 4
              CaneDiameter = 10
              CaneLength = 0.9
              TrunkDiameter = 65
              TrunkLength = 0.8
              RootTrunkRatio = 1
              RootNSC = 0.2
              TrunkNSC = 0.2
              CaneNSC = 0.2
              StartAge = 8
              script: same as in ExampleSimulation.BaseSim.Row.TreeInitialisation
            Manager HarvestNPruning: same as Validation.Sauvignonblanc.RPC_2000_2002.RPC_1.Row.HarvestNPruning
            Manager Fertilise on fixed dates: same as ExampleSimulation.BaseSim.Row.Fertilise on fixed dates
          RectangularZone Alley: Length=100; Width=1.5; Slope=0; AspectAngle=0; Altitude=50
            SurfaceOrganicMatter: InitialResidueName=wheat_stubble; InitialResidueType=wheat; InitialResidueMass=500; InitialStandingFraction=0; InitialCPR=0; InitialCNR=100
            Plant Slurp
            Fertiliser
            Irrigation
            Manager PastureInitialisation
              CultivarName = StaticCrop
              InitialRootDepth = 2000
              SowingDate = 02/25/2002 00:00:00
              RootDepth = 2000
              RFV = 10
              KLReductionFactor = -0.001
              KLReductionDepth = 150
              YKLModifiers =
              XDepth =
              MaxG = 0.004
              R50 = 150
              script: same as in ExampleSimulation.BaseSim.Alley.PastureInitialisation
            Manager SetPastureVariables: same as Validation.Sauvignonblanc.RPC_2000_2002.RPC_1.Alley.SetPastureVariables
            Manager SetupPastureRootZones
              UseExtraZone = True
              script: same as in ExampleSimulation.BaseSim.Alley.SetupPastureRootZones
            Operations WinterRainfall
              2002-05-28  [Irrigation].Apply(200);
            Soil: Latitude=0; Longitude=0
              LayerStructure: Thickness=[200, 200, 200, 200, 200, 200, 400, 400, 400, 600]
              Chemical
                Thickness  NO3N     NH4N  PH
                100        10       0     6.6
                200        10.8108  0     6.2
                300        1.19048  0     5.7
                300        1.19048  0     5.5
                300        0        0     5.5
                300        0        0     5.5
              WaterBalance SoilWater: same as Validation.Sauvignonblanc.RPC_2000_2002.RPC_1.Row.Soil.SoilWater
              SoilNitrogen: same as ExampleSimulation.BaseSim.Row.Soil.SoilNitrogen
              Organic: same as ExampleSimulation.BaseSim.Row.Soil.Organic
              CERESSoilTemperature Temperature
              OutputLayers: Thickness=[150, 150, 150, 150, 150, 150, 150]
              InitialWater: PercentMethod=0; FractionFull=0.8
              Physical
                Thickness  BD    AirDry  LL15  DUL   SAT
                150        1.35  0.06    0.12  0.28  0.36
                750        1.4   0.1     0.1   0.28  0.36
                150        1.4   0.005   0.05  0.28  0.35
                150        1.4   0.05    0.05  0.28  0.35
                1950       1.5   0.06    0.06  0.15  0.3
                SoilCrop GrapevineSoil: LL=[0.12, 0.1, 0.05, 0.05, 0.06]; KL=[0.12, 0.05, 0.03, 0.03, 0.02]; XF=[1, 1, 1, 1, 1]
                SoilCrop SlurpSoil: LL=[0.12, 0.1, 0.05, 0.05, 0.06]; KL=[0.11, 0.11, 0.11, 0.11, 0.11]; XF=[1, 1, 1, 1, 1]
            Manager PlantVariables: same as Validation.Sauvignonblanc.RPC_2000_2002.RPC_1.Alley.PlantVariables
            Report ReportAlley: same as ExampleSimulation.BaseSim.Alley.ReportAlley
      Experiment Renwick_2002_2007
        DisabledSimNames=[Grape_Squire_1Irri70, Grape_Squire_1Irri80, Grape_SquireIrri20, Grape_SquireIrri40, Grape_SquireIrri70, Grape_SquireIrri80]
        Factors
          Factor Irri: Specification=[VineIrrigation]
            Operations 100
              2004-11-25  [DripIrrigator].Script.applyDripIrri(0.3);
              2004-12-02  [DripIrrigator].Script.applyDripIrri(32.3);
              2004-12-09  [DripIrrigator].Script.applyDripIrri(32.1);
              2004-12-23  [DripIrrigator].Script.applyDripIrri(10.6);
              2004-12-30  [DripIrrigator].Script.applyDripIrri(29.5);
              2005-01-06  [DripIrrigator].Script.applyDripIrri(9.4);
              2005-01-27  [DripIrrigator].Script.applyDripIrri(11.4);
              2005-02-03  [DripIrrigator].Script.applyDripIrri(12);
              2005-02-10  [DripIrrigator].Script.applyDripIrri(20.1);
              2005-02-17  [DripIrrigator].Script.applyDripIrri(32.1);
              2005-02-24  [DripIrrigator].Script.applyDripIrri(16);
              2005-03-03  [DripIrrigator].Script.applyDripIrri(24.1);
              2005-03-10  [DripIrrigator].Script.applyDripIrri(24.1);
              2005-03-17  [DripIrrigator].Script.applyDripIrri(23.9);
              2005-03-24  [DripIrrigator].Script.applyDripIrri(23.9);
              2005-03-31  [DripIrrigator].Script.applyDripIrri(15.9);
              2005-04-28  [DripIrrigator].Script.applyDripIrri(15.9);
              2005-11-03  [DripIrrigator].Script.applyDripIrri(0.8);
              2005-11-10  [DripIrrigator].Script.applyDripIrri(15.9);
              2005-11-17  [DripIrrigator].Script.applyDripIrri(15.9);
              2005-11-24  [DripIrrigator].Script.applyDripIrri(23.9);
              2005-12-01  [DripIrrigator].Script.applyDripIrri(23.6);
              2005-12-08  [DripIrrigator].Script.applyDripIrri(23.6);
              2005-12-15  [DripIrrigator].Script.applyDripIrri(15.9);
              2005-12-22  [DripIrrigator].Script.applyDripIrri(15.9);
              2005-12-29  [DripIrrigator].Script.applyDripIrri(35.5);
              2006-01-05  [DripIrrigator].Script.applyDripIrri(31.3);
              2006-01-12  [DripIrrigator].Script.applyDripIrri(32.4);
              2006-01-19  [DripIrrigator].Script.applyDripIrri(48.8);
              2006-01-26  [DripIrrigator].Script.applyDripIrri(8);
              2006-02-09  [DripIrrigator].Script.applyDripIrri(16);
              2006-02-16  [DripIrrigator].Script.applyDripIrri(16);
              2006-02-23  [DripIrrigator].Script.applyDripIrri(16);
              2006-03-02  [DripIrrigator].Script.applyDripIrri(24.1);
              2006-03-09  [DripIrrigator].Script.applyDripIrri(24.1);
              2006-03-16  [DripIrrigator].Script.applyDripIrri(24.1);
            Operations 50
              2004-11-25  [DripIrrigator].Script.applyDripIrri(0.5);
              2004-12-02  [DripIrrigator].Script.applyDripIrri(39.4);
              2004-12-09  [DripIrrigator].Script.applyDripIrri(21.5);
              2004-12-23  [DripIrrigator].Script.applyDripIrri(9.4);
              2004-12-30  [DripIrrigator].Script.applyDripIrri(20.4);
              2005-02-10  [DripIrrigator].Script.applyDripIrri(8.2);
              2005-02-17  [DripIrrigator].Script.applyDripIrri(16.2);
              2005-02-24  [DripIrrigator].Script.applyDripIrri(8);
              2005-03-03  [DripIrrigator].Script.applyDripIrri(8.2);
              2005-03-10  [DripIrrigator].Script.applyDripIrri(8.2);
              2005-03-17  [DripIrrigator].Script.applyDripIrri(8);
              2005-03-24  [DripIrrigator].Script.applyDripIrri(8.2);
              2005-11-03  [DripIrrigator].Script.applyDripIrri(0.9);
              2005-11-17  [DripIrrigator].Script.applyDripIrri(16.2);
              2005-11-24  [DripIrrigator].Script.applyDripIrri(24.2);
              2005-12-01  [DripIrrigator].Script.applyDripIrri(24.1);
              2005-12-08  [DripIrrigator].Script.applyDripIrri(23.9);
              2005-12-15  [DripIrrigator].Script.applyDripIrri(16);
              2005-12-22  [DripIrrigator].Script.applyDripIrri(15.9);
              2005-12-29  [DripIrrigator].Script.applyDripIrri(8.2);
              2006-01-05  [DripIrrigator].Script.applyDripIrri(9.3);
              2006-01-12  [DripIrrigator].Script.applyDripIrri(24.4);
              2006-01-19  [DripIrrigator].Script.applyDripIrri(9.9);
              2006-01-26  [DripIrrigator].Script.applyDripIrri(8);
              2006-02-09  [DripIrrigator].Script.applyDripIrri(8);
              2006-02-16  [DripIrrigator].Script.applyDripIrri(8);
              2006-02-23  [DripIrrigator].Script.applyDripIrri(8);
              2006-03-02  [DripIrrigator].Script.applyDripIrri(11.7);
              2006-03-09  [DripIrrigator].Script.applyDripIrri(12.3);
              2006-03-16  [DripIrrigator].Script.applyDripIrri(11.7);
            Operations 40
              2004-11-25  [DripIrrigator].Script.applyDripIrri(0.3);
              2004-12-02  [DripIrrigator].Script.applyDripIrri(15.1);
              2004-12-23  [DripIrrigator].Script.applyDripIrri(9.7);
              2005-02-17  [DripIrrigator].Script.applyDripIrri(15.7);
              2005-03-03  [DripIrrigator].Script.applyDripIrri(8);
              2005-03-10  [DripIrrigator].Script.applyDripIrri(7.9);
              2005-03-17  [DripIrrigator].Script.applyDripIrri(8);
              2005-03-24  [DripIrrigator].Script.applyDripIrri(8);
              2005-11-03  [DripIrrigator].Script.applyDripIrri(0.8);
              2005-11-24  [DripIrrigator].Script.applyDripIrri(23.6);
              2005-12-08  [DripIrrigator].Script.applyDripIrri(23.8);
              2005-12-15  [DripIrrigator].Script.applyDripIrri(15.7);
              2005-12-22  [DripIrrigator].Script.applyDripIrri(8);
              2005-12-29  [DripIrrigator].Script.applyDripIrri(15.7);
              2006-01-05  [DripIrrigator].Script.applyDripIrri(7.4);
              2006-01-12  [DripIrrigator].Script.applyDripIrri(16.5);
              2006-01-19  [DripIrrigator].Script.applyDripIrri(8);
              2006-01-26  [DripIrrigator].Script.applyDripIrri(8);
              2006-03-02  [DripIrrigator].Script.applyDripIrri(8);
              2006-03-09  [DripIrrigator].Script.applyDripIrri(8);
              2006-03-16  [DripIrrigator].Script.applyDripIrri(8);
            Operations 30
              2004-11-25  [DripIrrigator].Script.applyDripIrri(0.3);
              2004-12-23  [DripIrrigator].Script.applyDripIrri(10.2);
              2004-12-30  [DripIrrigator].Script.applyDripIrri(20.1);
              2005-02-24  [DripIrrigator].Script.applyDripIrri(8);
              2005-03-10  [DripIrrigator].Script.applyDripIrri(8.2);
              2005-03-24  [DripIrrigator].Script.applyDripIrri(8.2);
              2005-11-03  [DripIrrigator].Script.applyDripIrri(0.8);
              2005-11-24  [DripIrrigator].Script.applyDripIrri(22.1);
              2005-12-08  [DripIrrigator].Script.applyDripIrri(16);
              2005-12-29  [DripIrrigator].Script.applyDripIrri(12.7);
              2006-01-05  [DripIrrigator].Script.applyDripIrri(1.4);
              2006-01-12  [DripIrrigator].Script.applyDripIrri(16.8);
              2006-01-19  [DripIrrigator].Script.applyDripIrri(0.6);
              2006-03-02  [DripIrrigator].Script.applyDripIrri(8);
              2006-03-09  [DripIrrigator].Script.applyDripIrri(8);
              2006-03-16  [DripIrrigator].Script.applyDripIrri(8);
        Simulation Renwick
          Clock: Start=2002-02-25; End=2007-07-01
          Summary SummaryFile
          Weather: FileName=Site1004_RPC.met
          MicroClimate: a_interception=0; b_interception=1; c_interception=0; d_interception=0; soil_albedo=0.3; SoilHeatFluxFraction=0.4; MinimumHeightDiffForNewLayer=0; NightInterceptionFraction=0.5; ReferenceHeight=2
          SoilArbitrator Soil Arbitrator
          RectangularZone Row: Length=100; Width=0.9; Slope=0; AspectAngle=0; Altitude=50
            Report: EventNames=[Clock].DoReport
            Memo: same as ExampleSimulation.BaseSim.Row.Memo
            Plant Grapevine: IsAlive=false; IsEnding=false; DaysAfterEnding=0
            Irrigation
            Fertiliser
            SurfaceOrganicMatter: InitialResidueName=wheat_stubble; InitialResidueType=wheat; InitialResidueMass=500; InitialStandingFraction=0; InitialCPR=0; InitialCNR=100
            Soil: Latitude=0; Longitude=0
              LayerStructure: Thickness=[200, 200, 200, 200, 200, 200, 400, 400, 400, 600]
              Chemical: same as Validation.Sauvignonblanc.RPC_2000_2002.RPC_1.Alley.Soil.Chemical
              InitialWater Initial water: PercentMethod=1; FractionFull=1; RelativeTo=LL15
              Physical
                Thickness  BD    AirDry  LL15  DUL   SAT
                200        1.35  0.1     0.12  0.3   0.32
                300        1.35  0.1     0.12  0.27  0.32
                300        1.4   0.1     0.12  0.16  0.2
                200        1.4   0.1     0.11  0.14  0.2
                200        1.4   0.08    0.08  0.12  0.2
                1800       1.59  0.06    0.08  0.12  0.2
                SoilCrop GrapevineSoil: LL=[0.12, 0.12, 0.12, 0.11, 0.08, 0.08]; KL=[0.25, 0.1, 0.08, 0.05, 0.05, 0.01]; XF=[1, 1, 1, 1, 1, 1]
                SoilCrop SlurpSoil: LL=[0.12, 0.12, 0.12, 0.11, 0.08, 0.08]; KL=[0.11, 0.11, 0.11, 0.11, 0.11, 0.11]; XF=[1, 1, 1, 1, 1, 1]
              WaterBalance SoilWater: same as Validation.Sauvignonblanc.RPC_2000_2002.RPC_1.Row.Soil.SoilWater
              SoilNitrogen: same as ExampleSimulation.BaseSim.Row.Soil.SoilNitrogen
              Organic: same as ExampleSimulation.BaseSim.Row.Soil.Organic
              CERESSoilTemperature Temperature
              OutputLayers: Thickness=[200, 100, 100, 100, 100, 200, 200, 200]
            Manager SetupTreeRootZones: same as Validation.Sauvignonblanc.RPC_2002_2006.RPC_2.Row.SetupTreeRootZones
            Operations VineIrrigation
            Operations WinterRainfall
              2002-05-28  [Irrigation].Apply(200);
            Manager PlantVariables: same as Validation.Sauvignonblanc.RPC_2000_2002.RPC_1.Row.PlantVariables
            Manager DripIrrigator
              FertilizeDAWS = 100
              Amount = 20
              totalIrrigation = 0
              script: same as in ExampleSimulation.BaseSim.Row.DripIrrigator
            Manager TreeInitialisation
              CultivarName = SauvignonBlanc
              SowingDate = 02/25/2002 00:00:00
              VineDistance = 1.8
              BudNumber = 44
              CaneNumber = 4
              CaneDiameter = 10
              CaneLength = 0.9
              TrunkDiameter = 65
              TrunkLength = 0.8
              RootTrunkRatio = 1
              RootNSC = 0.2
              TrunkNSC = 0.2
              CaneNSC = 0.2
              StartAge = 8
              script: same as in ExampleSimulation.BaseSim.Row.TreeInitialisation
            Manager HarvestNPruning: same as Validation.Sauvignonblanc.RPC_2000_2002.RPC_1.Row.HarvestNPruning
            Manager AutoIrrigationBasedOnWaterDeficit: same as ExampleSimulation.BaseSim.Row.AutoIrrigationBasedOnWaterDeficit
            Manager Fertilise on fixed dates: same as ExampleSimulation.BaseSim.Row.Fertilise on fixed dates
            Manager Reset on date: same as Replacements.Reset on date
          RectangularZone Alley: Length=100; Width=1.8; Slope=0; AspectAngle=0; Altitude=50
            SurfaceOrganicMatter: InitialResidueName=wheat_stubble; InitialResidueType=wheat; InitialResidueMass=500; InitialStandingFraction=0; InitialCPR=0; InitialCNR=100
            Plant Slurp
            Fertiliser
            Irrigation
            Manager PastureInitialisation: same as Validation.Sauvignonblanc.RPC_2002_2006.RPC_2.Alley.PastureInitialisation
            Manager SetPastureVariables: same as Validation.Sauvignonblanc.RPC_2000_2002.RPC_1.Alley.SetPastureVariables
            Manager SetupPastureRootZones: same as Validation.Sauvignonblanc.RPC_2002_2006.RPC_2.Alley.SetupPastureRootZones
            Operations WinterRainfall
              2002-05-28  [Irrigation].Apply(200);
            Manager PlantVariables: same as Validation.Sauvignonblanc.RPC_2000_2002.RPC_1.Alley.PlantVariables
            Soil: same as Validation.Sauvignonblanc.Renwick_2002_2007.Renwick.Row.Soil
            Report ReportAlley: same as ExampleSimulation.BaseSim.Alley.ReportAlley
      Simulation Seaview_2Cane
        Clock: Start=2006-02-25; End=2007-07-01
        Summary SummaryFile
        Weather: FileName=Site1003_SEA.met
        MicroClimate: a_interception=0; b_interception=1; c_interception=0; d_interception=0; soil_albedo=0.3; SoilHeatFluxFraction=0.4; MinimumHeightDiffForNewLayer=0; NightInterceptionFraction=0.5; ReferenceHeight=2
        SoilArbitrator Soil Arbitrator
        RectangularZone Row: Length=100; Width=0.9; Slope=0; AspectAngle=0; Altitude=50
          Report: EventNames=[Clock].DoReport
          Memo: same as ExampleSimulation.BaseSim.Row.Memo
          Plant Grapevine: IsAlive=false; IsEnding=false; DaysAfterEnding=0
          Irrigation
          Fertiliser
          SurfaceOrganicMatter: InitialResidueName=wheat_stubble; InitialResidueType=wheat; InitialResidueMass=500; InitialStandingFraction=0; InitialCPR=0; InitialCNR=100
          Manager SetupTreeRootZones: same as Validation.Sauvignonblanc.RPC_2002_2006.RPC_2.Row.SetupTreeRootZones
          Operations VineIrrigation
          Operations WinterRainfall
            2006-08-26  [Irrigation].Apply(45);
          Manager PlantVariables: same as Validation.Sauvignonblanc.RPC_2000_2002.RPC_1.Row.PlantVariables
          Manager DripIrrigator: same as Validation.Sauvignonblanc.Renwick_2002_2007.Renwick.Row.DripIrrigator
          Soil: Latitude=0; Longitude=0
            LayerStructure: Thickness=[200, 200, 200, 200, 200, 200, 400, 400, 400, 600]
            Chemical
              Thickness  NO3N     NH4N  PH
              100        217      0     6.6
              200        15       0     6.2
              300        1.66667  0     5.7
              300        1.66667  0     5.5
              300        0        0     5.5
              300        0        0     5.5
            Physical
              Thickness  BD  AirDry  LL15  DUL   SAT
              300        1   0.3     0.3   0.5   0.6
              300        1   0.32    0.32  0.5   0.6
              300        1   0.18    0.18  0.35  0.5
              300        1   0.05    0.05  0.1   0.3
              1950       1   0.05    0.05  0.1   0.3
              SoilCrop GrapevineSoil: LL=[0.3, 0.32, 0.18, 0.05, 0.05]; KL=[0.1, 0.01, 0.05, 0.005, 0]; XF=[1, 1, 1, 1, 1]
              SoilCrop SlurpSoil: LL=[0.3, 0.32, 0.18, 0.05, 0.05]; KL=[0.11, 0.11, 0.11, 0.11, 0.11]; XF=[1, 1, 1, 1, 1]
            WaterBalance SoilWater: SummerDate=1-Nov; SummerU=9; SummerCona=4.4; WinterDate=1-Apr; WinterU=9; WinterCona=4.4; DiffusConst=88; DiffusSlope=35.4; Salb=0.18; CN2Bare=68; CNRed=20; CNCov=0.8; DischargeWidth=0; CatchmentArea=0
              Thickness  SWCON  KLAT
              150        0.55   0
              150        0.55   0
              100        0.55   0
              200        0.55   0
              200        0.55   0
              200        0.55   0
              200        0.55   0
              200        0.55   0
              200        0.55   0
              200        0.55   0
              200        0.55   0
              200        0.55   0
              400        0.55   0
            SoilNitrogen: same as ExampleSimulation.BaseSim.Row.Soil.SoilNitrogen
            Organic: same as ExampleSimulation.BaseSim.Row.Soil.Organic
            CERESSoilTemperature Temperature
            OutputLayers: Thickness=[300, 300, 300]
            InitialWater: PercentMethod=0; FractionFull=1
          Manager HarvestNPruning: same as Validation.Sauvignonblanc.RPC_2000_2002.RPC_1.Row.HarvestNPruning
          Manager TreeInitialisation
            CultivarName = SauvignonBlanc
            SowingDate = 02/25/2006 00:00:00
            VineDistance = 1.8
            BudNumber = 24
            CaneNumber = 2
            CaneDiameter = 10
            CaneLength = 0.9
            TrunkDiameter = 65
            TrunkLength = 0.8
            RootTrunkRatio = 1
            RootNSC = 0.2
            TrunkNSC = 0.2
            CaneNSC = 0.2
            StartAge = 3
            script: same as in ExampleSimulation.BaseSim.Row.TreeInitialisation
          Manager Fertilise on fixed dates: same as ExampleSimulation.BaseSim.Row.Fertilise on fixed dates
        RectangularZone Alley: Length=100; Width=1.5; Slope=0; AspectAngle=0; Altitude=50
          SurfaceOrganicMatter: InitialResidueName=wheat_stubble; InitialResidueType=wheat; InitialResidueMass=500; InitialStandingFraction=0; InitialCPR=0; InitialCNR=100
          Plant Slurp
          Fertiliser
          Irrigation
          Manager PastureInitialisation
            CultivarName = StaticCrop
            InitialRootDepth = 2000
            SowingDate = 02/25/2006 00:00:00
            RootDepth = 2000
            RFV = 10
            KLReductionFactor = -0.001
            KLReductionDepth = 150
            YKLModifiers =
            XDepth =
            MaxG = 0.004
            R50 = 150
            script: same as in ExampleSimulation.BaseSim.Alley.PastureInitialisation
          Manager SetPastureVariables: same as Validation.Sauvignonblanc.RPC_2000_2002.RPC_1.Alley.SetPastureVariables
          Manager SetupPastureRootZones: same as Validation.Sauvignonblanc.RPC_2002_2006.RPC_2.Alley.SetupPastureRootZones
          Operations WinterRainfall
            2006-08-26  [Irrigation].Apply(45);
          Manager PlantVariables: same as Validation.Sauvignonblanc.RPC_2000_2002.RPC_1.Alley.PlantVariables
          Soil: Latitude=0; Longitude=0
            LayerStructure: Thickness=[200, 200, 200, 200, 200, 200, 400, 400, 400, 600]
            Chemical: same as Validation.Sauvignonblanc.Seaview_2Cane.Row.Soil.Chemical
            WaterBalance SoilWater: same as Validation.Sauvignonblanc.Seaview_2Cane.Row.Soil.SoilWater
            SoilNitrogen: same as ExampleSimulation.BaseSim.Row.Soil.SoilNitrogen
            Organic: same as ExampleSimulation.BaseSim.Row.Soil.Organic
            CERESSoilTemperature Temperature
            OutputLayers: Thickness=[300, 300, 300]
            InitialWater: PercentMethod=1; FractionFull=0.79
            Physical: same as Validation.Sauvignonblanc.Seaview_2Cane.Row.Soil.Physical
          Report ReportAlley: same as ExampleSimulation.BaseSim.Alley.ReportAlley
      Simulation Seaview_4Cane
        Clock: Start=2006-02-25; End=2007-07-01
        Summary SummaryFile
        Weather: FileName=Site1003_SEA.met
        MicroClimate: a_interception=0; b_interception=1; c_interception=0; d_interception=0; soil_albedo=0.3; SoilHeatFluxFraction=0.4; MinimumHeightDiffForNewLayer=0; NightInterceptionFraction=0.5; ReferenceHeight=2
        SoilArbitrator Soil Arbitrator
        RectangularZone Row: Length=100; Width=0.9; Slope=0; AspectAngle=0; Altitude=50
          Report: EventNames=[Clock].DoReport
          Memo: same as ExampleSimulation.BaseSim.Row.Memo
          Plant Grapevine: IsAlive=false; IsEnding=false; DaysAfterEnding=0
          Irrigation
          Fertiliser
          SurfaceOrganicMatter: InitialResidueName=wheat_stubble; InitialResidueType=wheat; InitialResidueMass=500; InitialStandingFraction=0; InitialCPR=0; InitialCNR=100
          Manager SetupTreeRootZones: same as Validation.Sauvignonblanc.RPC_2002_2006.RPC_2.Row.SetupTreeRootZones
          Operations VineIrrigation
          Operations WinterRainfall
            2006-08-26  [Irrigation].Apply(45);
          Manager PlantVariables: same as Validation.Sauvignonblanc.RPC_2000_2002.RPC_1.Row.PlantVariables
          Manager DripIrrigator: same as Validation.Sauvignonblanc.Renwick_2002_2007.Renwick.Row.DripIrrigator
          Soil: same as Validation.Sauvignonblanc.Seaview_2Cane.Row.Soil
          Manager HarvestNPruning: same as Validation.Sauvignonblanc.RPC_2000_2002.RPC_1.Row.HarvestNPruning
          Manager TreeInitialisation
            CultivarName = SauvignonBlanc
            SowingDate = 02/25/2006 00:00:00
            VineDistance = 1.8
            BudNumber = 40
            CaneNumber = 4
            CaneDiameter = 10
            CaneLength = 0.9
            TrunkDiameter = 65
            TrunkLength = 0.8
            RootTrunkRatio = 1
            RootNSC = 0.2
            TrunkNSC = 0.2
            CaneNSC = 0.2
            StartAge = 3
            script: same as in ExampleSimulation.BaseSim.Row.TreeInitialisation
          Manager Fertilise on fixed dates: same as ExampleSimulation.BaseSim.Row.Fertilise on fixed dates
        RectangularZone Alley: same as Validation.Sauvignonblanc.Seaview_2Cane.Alley
      Simulation Seaview_4Cane08
        Clock: Start=2007-02-25; End=2008-07-01
        Summary SummaryFile
        Weather: FileName=Site1003_SEA.met
        MicroClimate: a_interception=0; b_interception=1; c_interception=0; d_interception=0; soil_albedo=0.3; SoilHeatFluxFraction=0.4; MinimumHeightDiffForNewLayer=0; NightInterceptionFraction=0.5; ReferenceHeight=2
        SoilArbitrator Soil Arbitrator
        RectangularZone Row: Length=100; Width=0.9; Slope=0; AspectAngle=0; Altitude=50
          Report: EventNames=[Clock].DoReport
          Memo: same as ExampleSimulation.BaseSim.Row.Memo
          Plant Grapevine: IsAlive=false; IsEnding=false; DaysAfterEnding=0
          Irrigation
          Fertiliser
          SurfaceOrganicMatter: InitialResidueName=wheat_stubble; InitialResidueType=wheat; InitialResidueMass=500; InitialStandingFraction=0; InitialCPR=0; InitialCNR=100
          Manager SetupTreeRootZones: same as Validation.Sauvignonblanc.RPC_2002_2006.RPC_2.Row.SetupTreeRootZones
          Operations VineIrrigation
          Operations WinterRainfall
            2006-08-26  [Irrigation].Apply(45);
          Manager PlantVariables: same as Validation.Sauvignonblanc.RPC_2000_2002.RPC_1.Row.PlantVariables
          Manager DripIrrigator: same as Validation.Sauvignonblanc.Renwick_2002_2007.Renwick.Row.DripIrrigator
          Soil: Latitude=0; Longitude=0
            LayerStructure: Thickness=[200, 200, 200, 200, 200, 200, 400, 400, 400, 600]
            Chemical
              Thickness  NO3N     NH4N  PH
              100        160.741  0     6.6
              200        11.1111  0     6.2
              300        1.19048  0     5.7
              300        1.19048  0     5.5
              300        0        0     5.5
              300        0        0     5.5
            Physical
              Thickness  BD    AirDry  LL15  DUL   SAT
              300        1.35  0.06    0.12  0.3   0.4
              300        1.4   0.1     0.12  0.3   0.4
              300        1.4   0.005   0.16  0.3   0.4
              300        1.4   0.05    0.05  0.28  0.35
              1950       1.5   0.06    0.06  0.15  0.3
              SoilCrop GrapevineSoil: LL=[0.12, 0.12, 0.16, 0.05, 0.06]; KL=[0.12, 0.04, 0.03, 0.03, 0.02]; XF=[1, 1, 1, 1, 1]
              SoilCrop SlurpSoil: LL=[0.12, 0.12, 0.16, 0.05, 0.06]; KL=[0.11, 0.11, 0.11, 0.11, 0.11]; XF=[1, 1, 1, 1, 1]
            WaterBalance SoilWater: same as Validation.Sauvignonblanc.RPC_2000_2002.RPC_1.Row.Soil.SoilWater
            SoilNitrogen: same as ExampleSimulation.BaseSim.Row.Soil.SoilNitrogen
            Organic: same as ExampleSimulation.BaseSim.Row.Soil.Organic
            CERESSoilTemperature Temperature
            OutputLayers: Thickness=[300, 300, 300]
            InitialWater: PercentMethod=1; FractionFull=1
          Manager HarvestNPruning: same as Validation.Sauvignonblanc.RPC_2000_2002.RPC_1.Row.HarvestNPruning
          Manager TreeInitialisation
            CultivarName = SauvignonBlanc
            SowingDate = 02/25/2007 00:00:00
            VineDistance = 1.8
            BudNumber = 48
            CaneNumber = 4
            CaneDiameter = 10
            CaneLength = 0.9
            TrunkDiameter = 40
            TrunkLength = 0.8
            RootTrunkRatio = 1
            RootNSC = 0.2
            TrunkNSC = 0.2
            CaneNSC = 0.2
            StartAge = 3
            script: same as in ExampleSimulation.BaseSim.Row.TreeInitialisation
          Manager Fertilise on fixed dates: same as ExampleSimulation.BaseSim.Row.Fertilise on fixed dates
        RectangularZone Alley: Length=100; Width=1.5; Slope=0; AspectAngle=0; Altitude=50
          SurfaceOrganicMatter: InitialResidueName=wheat_stubble; InitialResidueType=wheat; InitialResidueMass=500; InitialStandingFraction=0; InitialCPR=0; InitialCNR=100
          Plant Slurp
          Fertiliser
          Irrigation
          Manager PastureInitialisation
            CultivarName = StaticCrop
            InitialRootDepth = 2000
            SowingDate = 02/25/2007 00:00:00
            RootDepth = 2000
            RFV = 10
            KLReductionFactor = -0.001
            KLReductionDepth = 150
            YKLModifiers =
            XDepth =
            MaxG = 0.004
            R50 = 150
            script: same as in ExampleSimulation.BaseSim.Alley.PastureInitialisation
          Manager SetPastureVariables: same as Validation.Sauvignonblanc.RPC_2000_2002.RPC_1.Alley.SetPastureVariables
          Manager SetupPastureRootZones: same as Validation.Sauvignonblanc.RPC_2002_2006.RPC_2.Alley.SetupPastureRootZones
          Operations WinterRainfall
            2006-08-26  [Irrigation].Apply(45);
          Manager PlantVariables: same as Validation.Sauvignonblanc.RPC_2000_2002.RPC_1.Alley.PlantVariables
          Soil: Latitude=0; Longitude=0
            LayerStructure: Thickness=[200, 200, 200, 200, 200, 200, 400, 400, 400, 600]
            Chemical: same as Validation.Sauvignonblanc.Seaview_4Cane08.Row.Soil.Chemical
            WaterBalance SoilWater: same as Validation.Sauvignonblanc.RPC_2000_2002.RPC_1.Row.Soil.SoilWater
            SoilNitrogen: same as ExampleSimulation.BaseSim.Row.Soil.SoilNitrogen
            Organic: same as ExampleSimulation.BaseSim.Row.Soil.Organic
            CERESSoilTemperature Temperature
            OutputLayers: Thickness=[300, 300, 300]
            InitialWater: PercentMethod=1; FractionFull=1
            Physical: same as Validation.Sauvignonblanc.Seaview_4Cane08.Row.Soil.Physical
          Report ReportAlley: same as ExampleSimulation.BaseSim.Alley.ReportAlley
      Experiment OtherRegions
        Factors
          Factor Climate
            Specification=[Weather].FileName = Longlands.met, WAP.met, TOH.met, Dashwood.met, WRV.met
        Simulation OtherRegions
          Weather: FileName=WRV.met
          Clock: Start=2014-02-25; End=2020-05-01
          Summary
          SoilArbitrator Soil Arbitrator
          MicroClimate: a_interception=0; b_interception=1; c_interception=0; d_interception=0; soil_albedo=0.23; SoilHeatFluxFraction=0.4; MinimumHeightDiffForNewLayer=0; NightInterceptionFraction=0.5; ReferenceHeight=2
          RectangularZone Row: Length=100; Width=0.9; Slope=0; AspectAngle=0; Altitude=50
            Report: EventNames=[Clock].DoReport
            Memo: same as ExampleSimulation.BaseSim.Row.Memo
            Plant Grapevine: IsAlive=false; IsEnding=false; DaysAfterEnding=0
            Irrigation
            Fertiliser
            SurfaceOrganicMatter: InitialResidueName=wheat_stubble; InitialResidueType=wheat; InitialResidueMass=500; InitialStandingFraction=0; InitialCPR=0; InitialCNR=100
            Soil: Latitude=0; Longitude=0
              LayerStructure: Thickness=[200, 200, 200, 200, 200, 200, 400, 400, 400, 600]
              Chemical: same as Validation.Sauvignonblanc.RPC_2000_2002.RPC_1.Alley.Soil.Chemical
              InitialWater Initial water: PercentMethod=1; FractionFull=1; RelativeTo=LL15
              Physical: same as Validation.Sauvignonblanc.RPC_2000_2002.RPC_1.Row.Soil.Physical
              WaterBalance SoilWater: same as Validation.Sauvignonblanc.RPC_2000_2002.RPC_1.Row.Soil.SoilWater
              SoilNitrogen: same as ExampleSimulation.BaseSim.Row.Soil.SoilNitrogen
              Organic: same as ExampleSimulation.BaseSim.Row.Soil.Organic
              CERESSoilTemperature Temperature
              OutputLayers: Thickness=[150, 150, 150, 150, 150, 150, 150]
            Manager SetupTreeRootZones: same as Validation.Sauvignonblanc.RPC_2002_2006.RPC_2.Row.SetupTreeRootZones
            Operations VineIrrigation
            Operations WinterRainfall
              2002-05-28  [Irrigation].Apply(200);
            Manager PlantVariables: same as Validation.Sauvignonblanc.RPC_2000_2002.RPC_1.Row.PlantVariables
            Manager DripIrrigator: same as Validation.Sauvignonblanc.Renwick_2002_2007.Renwick.Row.DripIrrigator
            Manager HarvestNPruning: same as Validation.Sauvignonblanc.RPC_2000_2002.RPC_1.Row.HarvestNPruning
            Manager TreeInitialisation
              CultivarName = SauvignonBlanc
              SowingDate = 02/25/2014 00:00:00
              VineDistance = 1.8
              BudNumber = 48
              CaneNumber = 4
              CaneDiameter = 10
              CaneLength = 0.9
              TrunkDiameter = 40
              TrunkLength = 0.8
              RootTrunkRatio = 1
              RootNSC = 0.2
              TrunkNSC = 0.2
              CaneNSC = 0.2
              StartAge = 3
              script: same as in ExampleSimulation.BaseSim.Row.TreeInitialisation
            Manager Fertilise on fixed dates: same as ExampleSimulation.BaseSim.Row.Fertilise on fixed dates
            Manager AutoIrrigationBasedOnWaterDeficit: same as Validation.Sauvignonblanc.Marlborough_2Cane.VineFacts1.Row.AutoIrrigationBasedOnWaterDeficit
            Manager Fertilise topup: same as Replacements.Fertilise topup
            Manager Reset on date: same as Replacements.Reset on date
          RectangularZone Alley: Length=100; Width=1.5; Slope=0; AspectAngle=0; Altitude=50
            Manager PastureInitialisation
              CultivarName = StaticCrop
              InitialRootDepth = 2000
              SowingDate = 02/25/2014 00:00:00
              RootDepth = 2000
              RFV = 10
              KLReductionFactor = -0.001
              KLReductionDepth = 150
              YKLModifiers =
              XDepth =
              MaxG = 0.004
              R50 = 150
              script: same as in ExampleSimulation.BaseSim.Alley.PastureInitialisation
            SurfaceOrganicMatter: InitialResidueName=wheat_stubble; InitialResidueType=wheat; InitialResidueMass=500; InitialStandingFraction=0; InitialCPR=0; InitialCNR=100
            Plant Slurp
            Fertiliser
            Irrigation
            Manager SetPastureVariables: same as Validation.Sauvignonblanc.RPC_2000_2002.RPC_1.Alley.SetPastureVariables
            Manager SetupPastureRootZones: same as Validation.Sauvignonblanc.RPC_2002_2006.RPC_2.Alley.SetupPastureRootZones
            Soil: same as Validation.Sauvignonblanc.RPC_2000_2002.RPC_1.Alley.Soil
            Operations WinterRainfall
              2002-05-28  [Irrigation].Apply(200);
            Manager PlantVariables
              script: same as in ExampleSimulation.BaseSim.Alley.PlantVariables
            Report ReportAlley: same as ExampleSimulation.BaseSim.Alley.ReportAlley
            Manager Reset on date: same as Replacements.Reset on date
    Folder Chardonnay
      Experiment Chardonnay
        Factors
          Factor Climate
            Specification=[Weather].FileName = Dashwood.met, Crownthorpe.met, LawnRoad.met, Hexton.met, Site1002_OYB.met, Matawhero.met
        Simulation Chardonnay
          Weather: FileName=Site1001_BRA.met
          Clock: Start=2014-02-25; End=2020-05-01
          Summary
          SoilArbitrator Soil Arbitrator
          MicroClimate: a_interception=0; b_interception=1; c_interception=0; d_interception=0; soil_albedo=0.23; SoilHeatFluxFraction=0.4; MinimumHeightDiffForNewLayer=0; NightInterceptionFraction=0.5; ReferenceHeight=2
          RectangularZone Row: Length=100; Width=0.9; Slope=0; AspectAngle=0; Altitude=50
            Memo: same as ExampleSimulation.BaseSim.Row.Memo
            Report: EventNames=[Clock].DoReport
            Plant Grapevine: IsAlive=false; IsEnding=false; DaysAfterEnding=0
            Irrigation
            Fertiliser
            SurfaceOrganicMatter: InitialResidueName=wheat_stubble; InitialResidueType=wheat; InitialResidueMass=500; InitialStandingFraction=0; InitialCPR=0; InitialCNR=100
            Soil: same as Validation.Sauvignonblanc.OtherRegions.OtherRegions.Row.Soil
            Manager SetupTreeRootZones: same as Validation.Sauvignonblanc.RPC_2002_2006.RPC_2.Row.SetupTreeRootZones
            Operations VineIrrigation
            Operations WinterRainfall
              2002-05-28  [Irrigation].Apply(200);
            Manager PlantVariables: same as Validation.Sauvignonblanc.RPC_2000_2002.RPC_1.Row.PlantVariables
            Manager DripIrrigator: same as Validation.Sauvignonblanc.Renwick_2002_2007.Renwick.Row.DripIrrigator
            Manager TreeInitialisation
              CultivarName = Chardonnay
              SowingDate = 02/25/2014 00:00:00
              VineDistance = 1.8
              BudNumber = 48
              CaneNumber = 4
              CaneDiameter = 10
              CaneLength = 0.9
              TrunkDiameter = 40
              TrunkLength = 0.8
              RootTrunkRatio = 1
              RootNSC = 0.2
              TrunkNSC = 0.2
              CaneNSC = 0.2
              StartAge = 3
              script: same as in ExampleSimulation.BaseSim.Row.TreeInitialisation
            Manager HarvestNPruning: same as Validation.Sauvignonblanc.RPC_2000_2002.RPC_1.Row.HarvestNPruning
            Manager Fertilise on fixed dates: same as ExampleSimulation.BaseSim.Row.Fertilise on fixed dates
            Manager AutoIrrigationBasedOnWaterDeficit: same as Validation.Sauvignonblanc.Marlborough_2Cane.VineFacts1.Row.AutoIrrigationBasedOnWaterDeficit
          RectangularZone Alley: Length=100; Width=1.5; Slope=0; AspectAngle=0; Altitude=50
            Report ReportAlley: EventNames=[Row].Grapevine.Pruning
              VariableNames:
                [Clock].Today
                [Clock].Today.Year
                [Clock].Today.DayOfYear
                [Weather].DaysSinceWinterSolstice as DAWS
            SurfaceOrganicMatter: InitialResidueName=wheat_stubble; InitialResidueType=wheat; InitialResidueMass=500; InitialStandingFraction=0; InitialCPR=0; InitialCNR=100
            Plant Slurp
            Fertiliser
            Irrigation
            Manager PastureInitialisation: same as Validation.Sauvignonblanc.OtherRegions.OtherRegions.Alley.PastureInitialisation
            Manager SetPastureVariables: same as Validation.Sauvignonblanc.RPC_2000_2002.RPC_1.Alley.SetPastureVariables
            Manager SetupPastureRootZones: same as Validation.Sauvignonblanc.RPC_2002_2006.RPC_2.Alley.SetupPastureRootZones
            Soil: same as Validation.Sauvignonblanc.RPC_2000_2002.RPC_1.Alley.Soil
            Operations WinterRainfall
              2002-05-28  [Irrigation].Apply(200);
            Manager PlantVariables
              script: same as in ExampleSimulation.BaseSim.Alley.PlantVariables
    Folder Merlot
      Experiment Merlot
        Factors
          Factor Climate: Specification=[Weather].FileName = Longlands.met, Twyford.met
        Simulation Merlot
          Weather: FileName=LongLands.met
          Clock: Start=2014-02-25; End=2020-05-01
          Summary
          SoilArbitrator Soil Arbitrator
          MicroClimate: a_interception=0; b_interception=1; c_interception=0; d_interception=0; soil_albedo=0.23; SoilHeatFluxFraction=0.4; MinimumHeightDiffForNewLayer=0; NightInterceptionFraction=0.5; ReferenceHeight=2
          RectangularZone Row: Length=100; Width=0.9; Slope=0; AspectAngle=0; Altitude=50
            Memo: same as ExampleSimulation.BaseSim.Row.Memo
            Report: EventNames=[Clock].DoReport
            Plant Grapevine: IsAlive=false; IsEnding=false; DaysAfterEnding=0
            Irrigation
            Fertiliser
            SurfaceOrganicMatter: InitialResidueName=wheat_stubble; InitialResidueType=wheat; InitialResidueMass=500; InitialStandingFraction=0; InitialCPR=0; InitialCNR=100
            Soil: same as Validation.Sauvignonblanc.OtherRegions.OtherRegions.Row.Soil
            Manager SetupTreeRootZones: same as Validation.Sauvignonblanc.RPC_2002_2006.RPC_2.Row.SetupTreeRootZones
            Operations VineIrrigation
            Operations WinterRainfall
              2002-05-28  [Irrigation].Apply(200);
            Manager PlantVariables: same as Validation.Sauvignonblanc.RPC_2000_2002.RPC_1.Row.PlantVariables
            Manager DripIrrigator: same as Validation.Sauvignonblanc.Renwick_2002_2007.Renwick.Row.DripIrrigator
            Manager TreeInitialisation
              CultivarName = Merlot
              SowingDate = 02/25/2014 00:00:00
              VineDistance = 1.8
              BudNumber = 48
              CaneNumber = 4
              CaneDiameter = 10
              CaneLength = 0.9
              TrunkDiameter = 40
              TrunkLength = 0.8
              RootTrunkRatio = 1
              RootNSC = 0.2
              TrunkNSC = 0.2
              CaneNSC = 0.2
              StartAge = 3
              script: same as in ExampleSimulation.BaseSim.Row.TreeInitialisation
            Manager HarvestNPruning: same as Validation.Sauvignonblanc.RPC_2000_2002.RPC_1.Row.HarvestNPruning
            Manager Fertilise on fixed dates: same as ExampleSimulation.BaseSim.Row.Fertilise on fixed dates
            Manager AutoIrrigationBasedOnWaterDeficit: same as Validation.Sauvignonblanc.Marlborough_2Cane.VineFacts1.Row.AutoIrrigationBasedOnWaterDeficit
            Manager Reset on date: same as Replacements.Reset on date
          RectangularZone Alley: Length=100; Width=1.5; Slope=0; AspectAngle=0; Altitude=50
            Report ReportAlley: EventNames=[Row].Grapevine.Pruning
              VariableNames:
                [Clock].Today
                [Clock].Today.Year
                [Clock].Today.DayOfYear
                [Weather].DaysSinceWinterSolstice as DAWS
            SurfaceOrganicMatter: InitialResidueName=wheat_stubble; InitialResidueType=wheat; InitialResidueMass=500; InitialStandingFraction=0; InitialCPR=0; InitialCNR=100
            Plant Slurp
            Fertiliser
            Irrigation
            Manager PastureInitialisation: same as Validation.Sauvignonblanc.OtherRegions.OtherRegions.Alley.PastureInitialisation
            Manager SetPastureVariables: same as Validation.Sauvignonblanc.RPC_2000_2002.RPC_1.Alley.SetPastureVariables
            Manager SetupPastureRootZones: same as Validation.Sauvignonblanc.RPC_2002_2006.RPC_2.Alley.SetupPastureRootZones
            Soil: same as Validation.Sauvignonblanc.RPC_2000_2002.RPC_1.Alley.Soil
            Operations WinterRainfall
              2002-05-28  [Irrigation].Apply(200);
            Manager PlantVariables
              script: same as in ExampleSimulation.BaseSim.Alley.PlantVariables
            Manager Reset on date: same as Replacements.Reset on date
    Folder PinotNoir
      Experiment PinotNoir
        Factors
          Factor Climate
            Specification=[Weather].FileName = Site1001_BRA.met, Site1003_SEA.met, WAP.met, McArthur.met, Bannockburn.met, Gibbston.met, Pisa.met
        Simulation PinotNoir
          Weather: FileName=Pisa.met
          Clock: Start=2014-02-25; End=2020-05-01
          Summary
          SoilArbitrator Soil Arbitrator
          MicroClimate: a_interception=0; b_interception=1; c_interception=0; d_interception=0; soil_albedo=0.23; SoilHeatFluxFraction=0.4; MinimumHeightDiffForNewLayer=0; NightInterceptionFraction=0.5; ReferenceHeight=2
          RectangularZone Row: Length=100; Width=0.9; Slope=0; AspectAngle=0; Altitude=50
            Memo: same as ExampleSimulation.BaseSim.Row.Memo
            Report: EventNames=[Clock].DoReport
            Plant Grapevine: IsAlive=false; IsEnding=false; DaysAfterEnding=0
            Irrigation
            Fertiliser
            SurfaceOrganicMatter: InitialResidueName=wheat_stubble; InitialResidueType=wheat; InitialResidueMass=500; InitialStandingFraction=0; InitialCPR=0; InitialCNR=100
            Soil: same as Validation.Sauvignonblanc.OtherRegions.OtherRegions.Row.Soil
            Manager SetupTreeRootZones: same as Validation.Sauvignonblanc.RPC_2002_2006.RPC_2.Row.SetupTreeRootZones
            Operations VineIrrigation
            Operations WinterRainfall
              2002-05-28  [Irrigation].Apply(200);
            Manager PlantVariables: same as Validation.Sauvignonblanc.RPC_2000_2002.RPC_1.Row.PlantVariables
            Manager DripIrrigator: same as Validation.Sauvignonblanc.Renwick_2002_2007.Renwick.Row.DripIrrigator
            Manager TreeInitialisation
              CultivarName = PinotNoir
              SowingDate = 02/25/2014 00:00:00
              VineDistance = 1.8
              BudNumber = 48
              CaneNumber = 4
              CaneDiameter = 10
              CaneLength = 0.9
              TrunkDiameter = 40
              TrunkLength = 0.8
              RootTrunkRatio = 1
              RootNSC = 0.2
              TrunkNSC = 0.2
              CaneNSC = 0.2
              StartAge = 3
              script: same as in ExampleSimulation.BaseSim.Row.TreeInitialisation
            Manager HarvestNPruning: same as Validation.Sauvignonblanc.RPC_2000_2002.RPC_1.Row.HarvestNPruning
            Manager AutoIrrigationBasedOnWaterDeficit: same as Validation.Sauvignonblanc.Marlborough_2Cane.VineFacts1.Row.AutoIrrigationBasedOnWaterDeficit
            Manager Fertilise on fixed dates: same as ExampleSimulation.BaseSim.Row.Fertilise on fixed dates
            Manager Reset on date: same as Replacements.Reset on date
          RectangularZone Alley: Length=100; Width=1.5; Slope=0; AspectAngle=0; Altitude=50
            Report ReportAlley: EventNames=[Row].Grapevine.Pruning
              VariableNames:
                [Clock].Today
                [Clock].Today.Year
                [Clock].Today.DayOfYear
                [Weather].DaysSinceWinterSolstice as DAWS
            SurfaceOrganicMatter: InitialResidueName=wheat_stubble; InitialResidueType=wheat; InitialResidueMass=500; InitialStandingFraction=0; InitialCPR=0; InitialCNR=100
            Plant Slurp
            Fertiliser
            Irrigation
            Manager PastureInitialisation
              CultivarName = StaticCrop
              InitialRootDepth = 2000
              SowingDate = 01/01/2014 00:00:00
              RootDepth = 2000
              RFV = 10
              KLReductionFactor = -0.001
              KLReductionDepth = 150
              YKLModifiers =
              XDepth =
              MaxG = 0.004
              R50 = 150
              script: same as in ExampleSimulation.BaseSim.Alley.PastureInitialisation
            Manager SetPastureVariables: same as Validation.Sauvignonblanc.RPC_2000_2002.RPC_1.Alley.SetPastureVariables
            Manager SetupPastureRootZones: same as Validation.Sauvignonblanc.RPC_2002_2006.RPC_2.Alley.SetupPastureRootZones
            Soil: same as Validation.Sauvignonblanc.RPC_2000_2002.RPC_1.Alley.Soil
            Operations WinterRainfall
              2002-05-28  [Irrigation].Apply(200);
            Manager PlantVariables
              script: same as in ExampleSimulation.BaseSim.Alley.PlantVariables
    Folder PinotGris
      Experiment PinotGris
        Factors
          Factor Climate
            Specification=[Weather].FileName = Crownthorpe.met, Site1003_SEA.met, Site1004_RPC.met
        Simulation PinotGris
          Weather: FileName=LongLands.met
          Clock: Start=2014-02-25; End=2020-05-01
          Summary
          SoilArbitrator Soil Arbitrator
          MicroClimate: a_interception=0; b_interception=1; c_interception=0; d_interception=0; soil_albedo=0.23; SoilHeatFluxFraction=0.4; MinimumHeightDiffForNewLayer=0; NightInterceptionFraction=0.5; ReferenceHeight=2
          RectangularZone Row: Length=100; Width=0.9; Slope=0; AspectAngle=0; Altitude=50
            Memo: same as ExampleSimulation.BaseSim.Row.Memo
            Report: EventNames=[Clock].DoReport
            Plant Grapevine: IsAlive=false; IsEnding=false; DaysAfterEnding=0
            Irrigation
            Fertiliser
            SurfaceOrganicMatter: InitialResidueName=wheat_stubble; InitialResidueType=wheat; InitialResidueMass=500; InitialStandingFraction=0; InitialCPR=0; InitialCNR=100
            Soil: same as Validation.Sauvignonblanc.OtherRegions.OtherRegions.Row.Soil
            Manager SetupTreeRootZones: same as Validation.Sauvignonblanc.RPC_2002_2006.RPC_2.Row.SetupTreeRootZones
            Operations VineIrrigation
            Operations WinterRainfall
              2002-05-28  [Irrigation].Apply(200);
            Manager PlantVariables: same as Validation.Sauvignonblanc.RPC_2000_2002.RPC_1.Row.PlantVariables
            Manager DripIrrigator: same as Validation.Sauvignonblanc.Renwick_2002_2007.Renwick.Row.DripIrrigator
            Manager TreeInitialisation: same as Validation.PinotNoir.PinotNoir.PinotNoir.Row.TreeInitialisation
            Manager HarvestNPruning: same as Validation.Sauvignonblanc.RPC_2000_2002.RPC_1.Row.HarvestNPruning
            Manager Fertilise on fixed dates: same as ExampleSimulation.BaseSim.Row.Fertilise on fixed dates
            Manager AutoIrrigationBasedOnWaterDeficit: same as Validation.Sauvignonblanc.Marlborough_2Cane.VineFacts1.Row.AutoIrrigationBasedOnWaterDeficit
            Manager Reset on date: same as Replacements.Reset on date
          RectangularZone Alley: same as Validation.Merlot.Merlot.Merlot.Alley
  Folder SheepInVineyard
    Memo Notes
      This simulation example was made based on the Stock.apsimx AgistmentGrazing simulation.
      Agistment Grazing refers to a practise of bringing stock onto and then off a paddock based on a set of criteria. The location and management of the stock when not on the paddock are ignored.
      Bring sheep to vineyard is a common practice in NZ especially in winter to graze the interrows. Sometimes growers also use sheep a leaf plucking method. This simulation is more to test whether there is issues with adding sheep into the grapevine model due to the row structure and see what components will the sheep eat.

      Because we are not concerned with the disposition of the stock while not grazing the forage crop, this a single-paddock simulation. The paddock contains a forage crop, in this example we use plantain, that is irrigated and fertilised. The forage is sown in spring of the first year and is rejuvenated thereafter at the frequency set on the sowing rule in the paddock. In this simulation a new mob of animals are bought every time the forage is ready to be grazed and sold after each grazing event (note that here bought and sold only refer to acquiring and  disposing of animals not the financial transactions of such actions). The user sets the characteristics of the stock, the grazing rules and if/how any supplementary feeding is done.

      This example includes:

      * setting several commonly-needed stock characteristics
      * buying stock
      * finding out the current location of the stock
      * changing the location of the stock
      * feeding supplements based on a range of criteria
      * selling stock
    Simulation SheepInVineyard
      Weather: FileName=Site1003_SEA.met
      Clock: Start=2003-02-25; End=2008-05-01
      Summary
      SoilArbitrator Soil Arbitrator
      MicroClimate: a_interception=0; b_interception=1; c_interception=0; d_interception=0; soil_albedo=0.23; SoilHeatFluxFraction=0.4; MinimumHeightDiffForNewLayer=0; NightInterceptionFraction=0.5; ReferenceHeight=2
      RectangularZone Row: Length=1000; Width=0.9; Slope=0; AspectAngle=0; Altitude=50
        SurfaceOrganicMatter: InitialResidueName=Grapevine_residue; InitialResidueType=Grapevine; InitialResidueMass=10; InitialStandingFraction=0; InitialCPR=0; InitialCNR=30
        Memo: same as ExampleSimulation.BaseSim.Row.Memo
        Plant Grapevine: IsAlive=false; IsEnding=false; DaysAfterEnding=0
        Manager TreeInitialisation
          CultivarName = SauvignonBlanc
          SowingDate = 02/25/2003 00:00:00
          VineDistance = 1.8
          BudNumber = 24
          CaneNumber = 2
          CaneDiameter = 10
          CaneLength = 1
          TrunkDiameter = 40
          TrunkHeight = 0.9
          RootDM = 2000
          RootNSC = 0.3
          TrunkNSC = 0.3
          CaneNSC = 0.3
          StartAge = 10
```csharp
using Models.Zones;
using Models.Soils;
using APSIM.Shared.Utilities;
using Models.PMF;
using Models.Core;
using System;
        
namespace Models
{
    [Serializable] 
    [System.Xml.Serialization.XmlInclude(typeof(Model))]
    public class Script : Model
    {
        [Link] Plant Grapevine;
        [Link] Clock Clock;
        [Link] Soil Soil;
        [Link] Zone zone;

        [Display(Type = DisplayType.CultivarName)]
        [Description("Plant Type")]
        public string CultivarName { get; set; }

        [Description("Initialisation Date")]
        public DateTime SowingDate { get; set; }

        [Description("Vine distance(m)")]
        public double VineDistance { get; set; }
        //number of buds lay down in cane and spur. there is a function inside to calculate the number of buds per vine based on bud burst and from cane head
        [Description("Bud number(#)")]
        public double BudNumber { get; set; }
        //cane or spur biomass
        [Description("Cane number(#)")]
        public double CaneNumber { get; set; }
      
        [Description("Cane diameter(mm)")]
        public double CaneDiameter { get; set; }

        [Description("Cane length(m)")]
        public double CaneLength { get; set; }
        //trunk information
        [Description("Trunk diameter(mm)")]
        public double TrunkDiameter { get; set; }

        [Description("Trunk height(m)")]
        public double TrunkHeight { get; set; }
        //root dry matter
        [Description("Fibrous Root dry matter(g/vine)")]
        public double RootDM { get; set; }

        //total nonstructural fraction in dry matter 
        [Description("Fibrous root nonstructural carbon fraction")]
        public double RootNSC { get; set; }

        [Description("Trunk nonstructural carbon fraction")]
        public double TrunkNSC { get; set; }

        [Description("Cane nonstructural carbon fraction")]
        public double CaneNSC { get; set; }

        [Description("Age of trees (in Years) at start of simulation)")]
        public int StartAge {get;set;}

        private RectangularZone RowZone {get; set;}

        [EventSubscribe("DoManagement")]
        private void OnDoManagement(object sender, EventArgs e)
        {
            if (Clock.Today.Date == SowingDate)
            {
                RowZone = this.Parent.Parent.Parent.FindInScope("Row") as RectangularZone;
                double pop = 1/RowZone.Width/VineDistance;  
                //sowing method
                Grapevine.Sow(cultivar: CultivarName,population: pop, 
                depth: 2000, rowSpacing: RowZone.Width, budNumber:BudNumber);

                //cane biomass
                //calculate the biomass by length 1 meter time number of canes time wood density (0.5 g/mm2/m) * pop to covert the biomass into g/m2
                double caneBiomass = 3.1415926*(CaneDiameter/2)*(CaneDiameter/2)*CaneLength*CaneNumber*0.5 * pop; 
                double caneNSC = caneBiomass * CaneNSC;

                zone.Set("[Grapevine].Cane.Live.StorageWt", caneNSC);                
                zone.Set("[Grapevine].Cane.Live.StructuralWt", caneBiomass - caneNSC);                

                //trunk biomass
                double trunkBiomass = 3.1415926*(TrunkDiameter/2)*(TrunkDiameter/2)*TrunkHeight*0.5 * pop; 
                double trunkNSC = trunkBiomass * TrunkNSC;
               
                zone.Set("[Grapevine].Trunk.Live.StorageWt", trunkNSC); 
                zone.Set("[Grapevine].Trunk.Live.StructuralWt", trunkBiomass - trunkNSC);              
                

                //Root biomass is  per plant
                double rootBiomass = RootDM * pop;
                double rootNSC = RootDM * pop * RootNSC; 
                 zone.Set("[Grapevine].StructuralRoot.Live.StorageWt",    rootNSC ); //rootNSC*pop
                 zone.Set("[Grapevine].StructuralRoot.Live.StructuralWt", rootBiomass - rootNSC); 
               
            }
        }
    }
}
```
        Irrigation
        Fertiliser
        Manager SetupTreeRootZones: same as ExampleSimulation.BaseSim.Row.SetupTreeRootZones
        Operations VineIrrigation
        Operations WinterRainfall
          2002-05-28  [Irrigation].Apply(200);
        Manager PlantVariables: same as ExampleSimulation.BaseSim.Row.PlantVariables
        Manager DripIrrigator: same as ExampleSimulation.BaseSim.Row.DripIrrigator
        Manager HarvestNPruning: same as ExampleSimulation.BaseSim.Row.HarvestNPruning
        Manager AutoIrrigationBasedOnWaterDeficit: same as ExampleSimulation.BaseSim.Row.AutoIrrigationBasedOnWaterDeficit
        Manager Fertilise on fixed dates: same as ExampleSimulation.BaseSim.Row.Fertilise on fixed dates
        Manager Reset on date: same as Replacements.Reset on date
        Soil: Latitude=0; Longitude=0
          LayerStructure: Thickness=[200, 200, 200, 200, 200, 200, 400, 400, 400, 600]
          Physical
            Thickness  BD    AirDry  LL15  DUL   SAT
            200        1.35  0.1     0.2   0.35  0.45
            250        1.35  0.1     0.2   0.35  0.45
            300        1.4   0.15    0.15  0.35  0.4
            150        1.4   0.13    0.13  0.33  0.35
            150        1.4   0.1     0.1   0.28  0.35
            1950       1.59  0.06    0.06  0.1   0.3
            SoilCrop GrapevineSoil: LL=[0.2, 0.2, 0.15, 0.13, 0.1, 0.06]; KL=[0.25, 0.1, 0.08, 0.05, 0.05, 0.01]; XF=[1, 1, 1, 1, 1, 1]
            SoilCrop SlurpSoil: LL=[0.2, 0.2, 0.15, 0.13, 0.1, 0.06]; KL=[0.11, 0.11, 0.02, 0, 0, 0]; XF=[1, 1, 1, 1, 1, 1]
            SoilCrop PlantainSoil: LL=[0.15, 0.17, 0.19, 0.17, 0.1, 0.1]; KL=[0.1, 0.08, 0.05, 0.02, 0.01, 0.01]; XF=[1, 1, 1, 1, 1, 0.5]
          WaterBalance SoilWater: same as ExampleSimulation.BaseSim.Row.Soil.SoilWater
          Organic: same as ExampleSimulation.BaseSim.Row.Soil.Organic
          Chemical: same as ExampleSimulation.BaseSim.Row.Soil.Chemical
          CERESSoilTemperature Temperature
          InitialWater Initial water: PercentMethod=0; FractionFull=1.14286; RelativeTo=LL15
          OutputLayers: Thickness=[150, 150, 150, 150, 150, 150, 150]
          Sample Initial conditions: Depth=[0-180]; Thickness=[1800]; NH4=[1]; SWUnits=Volumetric; OCUnits=Total; PHUnits=Water
          SoilNitrogen: same as ExampleSimulation.BaseSim.Row.Soil.SoilNitrogen
        Manager GrazeVineyardRow
          Genotype = Medium Merino
          Sex = Female
          Age = 12
          Weight = 50
          Pregnant = 0
          Lactating = 0
          YoungNumber = 0
          YoungWt = 0
          StockingRate = 50
          CurrentLocation = Away
          PreGrazingDM = 1200
          MinGrazingDays = 7
          PostGrazingDM = 800
          DoNoGrazingWindow = True
          NoGrazeStartSpring = 05-sep
          NoGrazeEndSpring = 01-dec
          NoGrazeStartSummer = 15-jan
          NoGrazeEndSummer = 1-feb
          SupplementName = silage
          SupplementFirst = False
          SupplementEveryDay = 0
          SupplementOnPastureMass = 0
          TriggerPastureMass = 1200
          NumStock = 0
          GrazingSeasonIsOpen = False
          HarvestableBiomass = 0
          HarvestableBiomassYesterday = 0
```csharp
using Models.PMF.Interfaces;
using System.Diagnostics;
using Models.AgPasture;
using System.Linq;
using System.Collections.Generic;
using System.Collections;
using Models.Soils;
using Models.PMF;
using System.Xml.Serialization;
using APSIM.Shared.Utilities;
using Models.GrazPlan;
using Models.Utilities;
using Models.Core;
using Models;
using System;

namespace Models
{

    [Serializable]
    public class Script : Model
    {
        [Link] Clock clock;
        [Link] Stock stock;
        [Link] Supplement supplement;
        [Link] List<Zone> paddocks;
        [Link] ISummary summary;
        [Link] Simulation farm;
        [Link] List<IPlantDamage> forages = null;

        private int CurrentGroupNum = 1;    // animal group number
        private int CurrentLocationNum { get; set; }

        [Separator("Stock type info, the same type of stock are brought onto the paddock at each grazing")]

        [Description("Stock: genotype (e.g. Small Merino, Angus, Friesian):")] 
        [Display(Values="GetGenotypes")]
        public string Genotype { get; set; }

        [Description("Stock: sex (Female, Male, Castrate):")] 
        public ReproductiveType Sex { get; set; }

        [Description("Stock: age (months):")] 
        public double Age { get; set; }

        [Description("Stock: weight (kg liveweight /head):")] 
        public double Weight { get; set; }

        [Description("Stock: fertility status (0 if non-pregnant or days since conception):")] 
        public int Pregnant { get; set; }

        [Description("Stock: lactation status (0 if non-lactating or days since parturition):")]
        public int Lactating { get; set; }

        [Description("Stock: number of unweaned young:")]
        public int YoungNumber { get; set; }

        [Description("Stock: weight of unweaned young:")] 
        public double YoungWt { get; set; }

        [Separator("Grazing event information")]

        [Description("Paddock stocking rate (head/ha): ")] 
        public double StockingRate { get; set; }

        [Description("Initial location of the stock (give either the paddock name or 'Away'): ")] 
        public string CurrentLocation { get; set; }

        [Description("Standing biomass at which to bring the stock into the simulation (kg DM/ha): ")] 
        public double PreGrazingDM { get; set; }

        [Description("Require > X days of grazable forage before moving stock: ")] 
        [Tooltip("To prevent stock being moved too often, require that there be a minimum number of grazing-days of forage available before moving the stock on. The forage needed is very simply set as 3% of the stock liveweight")] 
        public int MinGrazingDays { get; set; }

        [Description("Standing biomass at which to exit  stock from the simulation (kg DM/ha): ")] 
        public double PostGrazingDM { get; set; }

        [Description("Implement a no-grazing window? (tick for yes): ")] 
        public bool DoNoGrazingWindow { get; set; }

        [Description("Start of the no-grazing window spring (dd-MMM)")] 
        public string NoGrazeStartSpring { get; set; }

        [Description("End of the no-grazing window spring (dd-MMM)")] 
        public string NoGrazeEndSpring { get; set; }

        [Description("Start of the no-grazing window Summer (dd-MMM)")] 
        public string NoGrazeStartSummer { get; set; }

        [Description("End of the no-grazing window Summer(dd-MMM)")] 
        public string NoGrazeEndSummer { get; set; }

        [Separator("Supplementary feeding")]

        [Description("Name of the supplement to feed: ")] 
        public string SupplementName { get; set; }

        [Description("Feed the supplement first (i.e. before the new forage is available to the stock)?: ")] 
        public bool SupplementFirst { get; set; }

        [Description("Amount of supplementary feeding offered every day (kg DM /head /day): ")] 
        public double SupplementEveryDay { get; set; }

        [Description("Additional amount of supplement offered when available biomass is low (kg DM /head /day): ")] 
        public double SupplementOnPastureMass { get; set; }

        [Description("Trigger biomass for above rule (kg DM /ha): ")] 
        public double TriggerPastureMass { get; set; }

        public int NumStock { get; set; }
        public bool GrazingSeasonIsOpen { get; set; } // number of stock on the whole farm
        public double HarvestableBiomass { get; set; }
        public double HarvestableBiomassYesterday { get; set; }

        // Return a list of genotypes to the properties tab.
        public string[] GetGenotypes()
        {
            if (stock != null)
                return stock.Genotypes.Names.ToArray();
            return null;
        }

        [EventSubscribe("StartOfSimulation")]
        private void OnStartOfSimulation(object sender, EventArgs e)
        {

            //Debugger.Break();

            summary.WriteMessage(this, "Initialising the paddock information");

            NumStock = (int)(Math.Round(StockingRate * farm.Area, 0));

            if (CurrentLocation.ToLower() != "away")
            {
                BuyStock();
                stock.Move(CurrentLocation);
                summary.WriteMessage(this, " The Stock have been moved to " + CurrentLocation);
            }

            summary.WriteMessage(this, "     The number of animals has been rounded to " + NumStock + " from " + (StockingRate * farm.Area));
            summary.WriteMessage(this, "     The animals will begin in " + CurrentLocation + " which is paddock number " + CurrentLocationNum + " in the simulation");
            summary.WriteMessage(this, "     The area of the whole farm is " + farm.Area + " ha");

        }

        [EventSubscribe("DoManagement")]
        private void OnDoManagement(object sender, EventArgs e)
        {
            GrazingSeasonIsOpen = true;
            if (DoNoGrazingWindow)
                GrazingSeasonIsOpen = !(DateUtilities.WithinDates(NoGrazeStartSpring, clock.Today, NoGrazeEndSpring) | DateUtilities.WithinDates(NoGrazeStartSummer, clock.Today, NoGrazeEndSummer));

			
            bool sellSomeStock = false;
            if (!GrazingSeasonIsOpen)
                sellSomeStock = true;

            // Calculate forage mass in the paddock
            HarvestableBiomass = 0.0;
            foreach (var forage in forages)
                foreach (var forageOrgan in forage.Organs)
                    if (forageOrgan.IsAboveGround)
                        HarvestableBiomass += forageOrgan.Live.Wt + forageOrgan.Dead.Wt;
            
            HarvestableBiomass *= 10;  // Convert to kg/ha

            if (clock.Today == clock.StartDate)
                HarvestableBiomassYesterday = HarvestableBiomass;

            double deltaHarvestableBiomass = Math.Max(0.0, HarvestableBiomass - HarvestableBiomassYesterday);

            if (HarvestableBiomass <= PostGrazingDM)
                sellSomeStock = true;

            if (CurrentLocation == "Away")
                sellSomeStock = false;

            // The 0.03 is the propostion of body mass that the stock might eat
            double minFodder = Math.Max(PreGrazingDM, Math.Max(0.0, (0.03 * MinGrazingDays * NumStock * Weight) - (deltaHarvestableBiomass * MinGrazingDays))); 
            HarvestableBiomassYesterday = HarvestableBiomass;

            if (CurrentLocation == "Away" && (HarvestableBiomass >= PreGrazingDM) && HarvestableBiomass >= (PostGrazingDM + minFodder) && GrazingSeasonIsOpen)
            {
                CurrentLocation = paddocks[0].Name;
                CurrentLocationNum = paddocks[0].Index;
                BuyStock();
                stock.Move(CurrentLocation);
                summary.WriteMessage(this, "     Buying stock ");
            }

            if (sellSomeStock)
            {
                CurrentLocation = "Away";
                CurrentLocationNum = -1;
                SellStock();
                summary.WriteMessage(this, "     Selling stock ");
            }

            if (CurrentLocation != "Away")
            {
                if (SupplementEveryDay > 0)
                {
                    double silageOnHand = supplement.Stores[2 - 1].Stored;
                    if (silageOnHand < SupplementEveryDay * stock.NumberAll)
                    {
                        supplement.Buy(SupplementEveryDay * 30.0 * stock.NumberAll, SupplementName);  // i.e. 1 months worth
                        summary.WriteMessage(this, "SupplementEveryDay: Buying " + SupplementName + " of total amount : " + (SupplementEveryDay * 90 * stock.NumberAll) + " kg DM");
                    }
                    supplement.Feed(SupplementName, SupplementEveryDay * stock.NumberAll, CurrentLocation, SupplementFirst);
                }

                if (SupplementOnPastureMass > 0 && HarvestableBiomass <= TriggerPastureMass)
                {
                    double silageOnHand = supplement.Stores[2 - 1].Stored;
                    if (silageOnHand < SupplementOnPastureMass * stock.NumberAll)
                    {
                        supplement.Buy(SupplementOnPastureMass * 30.0 * stock.NumberAll, SupplementName);  // i.e. 1 months worth
                        summary.WriteMessage(this, "SupplementOnBiomass: Buying " + SupplementName + " of total amount : " + (SupplementOnPastureMass * 90 * stock.NumberAll) + " kg DM");
                    }
                    supplement.Feed(SupplementName, SupplementOnPastureMass * stock.NumberAll, CurrentLocation, SupplementFirst);
                }
            }
        }


        public void BuyStock()
        {
            CurrentGroupNum = stock.NoGroups + 1;
            StockBuy purchase = new StockBuy();
            purchase.Genotype = Genotype;
            purchase.Number = NumStock;
            purchase.Sex = Sex;
            purchase.Age = Age;       // age in months
            purchase.Weight = Weight;  // live weight in kg
            purchase.UseTag = CurrentGroupNum + 1;
            purchase.MatedTo = purchase.Genotype;
            purchase.Pregnant = Pregnant;  // days pregnant, 0 = non pregnant, 1 = pregnant
            purchase.Lactating = Lactating;  // 0 for dry, 1 for lactating
            purchase.NumYoung = YoungNumber;
            purchase.YoungWt = YoungWt;

            stock.Buy(purchase);
        }

        public void SellStock()
        {
            int NumGroups = stock.NoGroups;

            NumGroups = stock.NoGroups;
            for (int gg = 1; gg <= NumGroups; gg++)
            {
                stock.Sell(stock.Number[gg - 1]);
            }
        }
    }
}
```
        Supplement: SpoilageTime=0
          Stores:
            Name    Stored  IsRoughage  DMContent  DMD   MEContent  CPConc  ProtDg  PConc   SConc   EEConc  ADIP2CP  AshAlk  MaxPassage
            fodder  0       true        0.85       0     0          0       0       0       0       0       0        0       0
            silage  0       true        1          0.75  12         0.18    0.8     0.0032  0.0024  0.02    0.06     0.6     0
        Stock: RandSeed=9999
        Memo SupplementMemo
          **Supplement store**

          The script GrazeForageCrop allows for optional supplementary feeding. In order to support that feeding it is necessary to include the Supplement model in the simulation. All the buying and feeding out is handled in GrazeForageCrop but here we name the supplement (“silage”) and give it some properties including the quality parameters of the supplement.

          In the quality parameters, note that we set the dry matter percentage to 100. This is does not affect the feeding quality of the supplement but means that all buy, sell, feed, etc. commands are given on a dry matter rather than wet matter basis. Once these quality parameters are set against a named supplement they are retained and all that is needed is to buy, sell or feed the named supplement.
        Memo Stock Memo
          **Stock**

          All the paramters for Stock are set in GrazeForageCrop.
        Memo GrazeForageCrop Memo
          **GrazeForageCrop**

          This is a Manager script that undertakes several duties.

          The first stack of parameters in GrazeForageCrop sets the type of animals that will be bought and then managed during the simulation. The available options are accessible using a combination of dropdown boxes and data entry fields.

          The middle stack of parameters sets:

          * The paddock stocking rate – the number of head bought is this times the area of the paddock (click on “Field” to set this away from its default of 1 ha).
          * At the start of the simulation the stock can be on the simulated paddock (enter the name of the paddock) absent from the simulation (enter “Away”). If the paddock name is given the stock will be bought at the beginning of the first day and drafted to the paddock.
          * The third parameter sets the forage crop biomass that triggers the buying of stock and drafting them onto the paddock. If there are multiple forage species in the paddock the biomass will be the sum of all.
          * When forage crop growth rates closely match animal demand, the simulation can oscillate with stock bought just above the grazing trigger and then during that day they graze below the exit value and are sold with the pattern repeating a few days later. To prevent this it is desirable to set a minimum gazing duration. Here this is done very simply by assuming a maximum intake of 3% of liveweight per day.
          * The fifth parameter is the biomass at which t terminate the grazing event and sell the stock.
          * The last three parameters allow the user to set a no-grazing window of time that overrides the parameters above. To enable this set a tick in the box and enter the date range as dd-mmm. The same window is used each year. Windows can cross year boundaries (e.g. 15-Dec to 10-Jan).

          The final stack of parameters set some options for supplementary feeding. As noted above, a type of silage has been set up in the supplement store. In this stack of parameters:

          * Give the name (case matters) of the supplement type.
          * Indicate if the supplement is to be fed before the stock have access to the crop. The alternative is that it is available day-long and the stock can select between supplement and crop. Ticking the box for feeding first will increase the intake of supplement and decrease the intake of crop. The magnitude of this will depend on the stock, the total feed on offer and the qualities of the supplement and crop.
          * The third parameter allows the user to feed the stock supplement on a per head basis every day regardless of the amount of forage crop available.
          * The last two parameters allow for feeding only when the forage crop biomass is low with an additional amount of supplement per head per day when the crop biomass is below a given value.
        Report ReportStockRow: EventNames=[Clock].EndOfDay
          VariableNames:
            [Clock].Today as Date
            [Stock].NumberAll as NumStockRow
            [Stock].IntakeAll.Weight as DMIntakeRow
            [Stock].SuppIntakeAll.Weight as SilageIntakeRow
            [Stock].CondScoreAll as ConditionScoreRow
            [GrazeVineyardRow].Script.HarvestableBiomass as HarvestableBiomassRow
            [GrazeVineyardRow].Script.CurrentLocation as StockLocationRow
            [Row].Grapevine.AboveGround.Wt as TotalAboveGroundRow
            [Row].Grapevine.Leaf.Removed.Wt
            [Row].Grapevine.Shoot.Removed.Wt
            [Row].Grapevine.Cane.Removed.Wt
            [Row].Grapevine.Trunk.Removed.Wt
            [Row].Grapevine.Berry.Removed.Wt
            [Row].Grapevine.Root.Removed.Wt
      RectangularZone Alley: Length=1000; Width=1.5; Slope=0; AspectAngle=0; Altitude=50
        SurfaceOrganicMatter: InitialResidueName=wheat_stubble; InitialResidueType=Grapevine; InitialResidueMass=10; InitialStandingFraction=0; InitialCPR=0; InitialCNR=30
        Fertiliser
        Irrigation
        Manager AutoIrrigationBasedOnWaterDeficit: same as ExampleSimulation.BaseSim.Row.AutoIrrigationBasedOnWaterDeficit
        Manager SowingRule
          StartDate = 1-oct
          EndDate = 30-oct
          MinESW = 50
          MinRain = 30
          RainDays = 5
          mustSow = yes
          SowingFreq = 1
          CultivarName = Tonic
          SowingDepth = 10
          RowSpacing = 150
          Population = 200
          Amount = 60
          CropAge = 0
```csharp
using Models.Interfaces;
using System.Linq;
using System;
using Models.Core;
using Models.PMF;
using Models.Soils;
using Models.Utilities;
using APSIM.Shared.Utilities;
using Models.Climate;

namespace Models
{
    [Serializable]
    public class Script : Model
    {
        [Link] private Clock Clock;
        [Link] private Fertiliser Fertiliser;
        [Link] private Summary Summary;
        [Link] private Plant Plantain;
        //[Link] private Plant AGPWhiteClover;
        //[Link] Plant WhiteClover;
        [Link] private Soil Soil;
        private Accumulator accumulatedRain;
        [Link]
        private ISoilWater waterBalance;

        [Separator("======= Sowing conditions =======")]
        [Description("Start of sowing window (dd-mmm)")] public string StartDate { get; set;}
        [Description("End of sowing window (dd-mmm)")] public string EndDate { get; set;}
        [Description("Minimum extractable soil water for sowing (mm)")] public double MinESW { get; set;}
        [Description("Accumulated rainfall required for sowing (mm)")] public double MinRain { get; set;}
        [Description("Duration of rainfall accumulation (d)")] public int RainDays { get; set;}
        [Description("Must sow at the end of the window?")] public answerType mustSow { get; set; }
        [Description("Frequency of sowing (years)")] public int SowingFreq { get; set; }
    

        [Separator("======= Sowing data =======")]
        [Description("Cultivar to be sown")] public string CultivarName { get; set;}
        [Description("Sowing depth (mm)")] public double SowingDepth { get; set;}        
        [Description("Row spacing (mm)")] public double RowSpacing { get; set;}    
        [Description("Plant population (/m2)")] public double Population { get; set;}    

        [Separator("======= Sowing fertiliser =======")]
        [Description("Amount of fertiliser to be applied (kg/ha)")] public double Amount { get; set;}


        public double CropAge { get; set; }

           public enum answerType
        {
            /// <summary>a positive answer</summary>
            yes,
            /// <summary>a negative answer</summary>
            no
        }

        
        [EventSubscribe("StartOfSimulation")]
        private void OnSimulationCommencing(object sender, EventArgs e)
        {
            accumulatedRain = new Accumulator(this, "[Weather].Rain", RainDays);
            CropAge = SowingFreq + 1.0;
        }
        

        [EventSubscribe("DoManagement")]
        private void OnDoManagement(object sender, EventArgs e)
        {
            accumulatedRain.Update();
            CropAge += 1.0 / 365.25;

            bool doSowing = false;
            if (DateUtilities.WithinDates(StartDate,Clock.Today,EndDate)&& !Plantain.IsAlive)
                doSowing = true;
            if ((MathUtilities.Sum(waterBalance.ESW) < MinESW) || (accumulatedRain.Sum < MinRain))
                doSowing = false;
            if ((mustSow == answerType.yes) && (DateUtilities.DatesEqual(EndDate, Clock.Today)))
                doSowing = true;
            if (CropAge < SowingFreq)
                doSowing = false;
            
            if (doSowing)
            {
               //WhiteClover.Sow(population: 500, cultivar: "Kopu", depth: 5, rowSpacing: 150);
               Plantain.Sow(population:Population, cultivar:CultivarName, depth:SowingDepth, rowSpacing:RowSpacing);
               Fertiliser.Apply(Amount: Amount, Type: Fertiliser.Types.NO3N);    
               CropAge = 0.0;
            }
        
        }
        
    }
}
```
        Plant Plantain
        Soil: Latitude=0; Longitude=0
          LayerStructure: Thickness=[200, 200, 200, 200, 200, 200, 400, 400, 400, 600]
          Physical
            Thickness  BD    AirDry  LL15  DUL   SAT
            200        1.35  0.1     0.2   0.35  0.45
            250        1.35  0.1     0.2   0.35  0.45
            300        1.4   0.15    0.15  0.35  0.4
            150        1.4   0.13    0.13  0.33  0.35
            150        1.4   0.1     0.1   0.28  0.35
            1950       1.59  0.06    0.06  0.1   0.3
            SoilCrop GrapevineSoil: LL=[0.2, 0.2, 0.15, 0.13, 0.1, 0.06]; KL=[0.25, 0.1, 0.08, 0.05, 0.05, 0.01]; XF=[1, 1, 1, 1, 1, 1]
            SoilCrop SlurpSoil: LL=[0.2, 0.2, 0.15, 0.13, 0.1, 0.06]; KL=[0.11, 0.11, 0.02, 0, 0, 0]; XF=[1, 1, 1, 1, 1, 1]
            SoilCrop PlantainSoil: LL=[0.15, 0.17, 0.19, 0.17, 0.1, 0.1]; KL=[0.1, 0.08, 0.05, 0.02, 0.01, 0.01]; XF=[1, 1, 1, 1, 1, 0.5]
            SoilCrop AGPWhiteCloverSoil: LL=[0.2, 0.2, 0.15, 0.13, 0.1, 0.06]; KL=[0.1, 0.05, 0, 0, 0, 0]; XF=[1, 0.75, 0, 0, 0, 0.5]
            SoilCrop AGPRyegrassSoil: LL=[0.2, 0.2, 0.15, 0.13, 0.1, 0.06]; KL=[0.1, 0.08, 0.05, 0.02, 0, 0]; XF=[1, 1, 1, 0.5, 0, 0.5]
            SoilCrop WhiteCloverSoil: LL=[0.15, 0.17, 0.19, 0.17, 0.1, 0.1]; KL=[0.1, 0.08, 0.04, 0.01, 0, 0]; XF=[1, 1, 1, 1, 0, 0]
          WaterBalance SoilWater: same as ExampleSimulation.BaseSim.Row.Soil.SoilWater
          Organic: same as ExampleSimulation.BaseSim.Row.Soil.Organic
          Chemical: same as ExampleSimulation.BaseSim.Row.Soil.Chemical
          CERESSoilTemperature Temperature
          InitialWater Initial water: PercentMethod=0; FractionFull=1.14286; RelativeTo=LL15
          OutputLayers: Thickness=[150, 150, 150, 150, 150, 150, 150]
          Sample Initial conditions: Depth=[0-180]; Thickness=[1800]; NH4=[1]; SWUnits=Volumetric; OCUnits=Total; PHUnits=Water
          SoilNitrogen: same as ExampleSimulation.BaseSim.Row.Soil.SoilNitrogen
        Supplement: same as SheepInVineyard.SheepInVineyard.Row.Supplement
        Manager GrazeVineyardAlley
          Genotype = Medium Merino
          Sex = Castrate
          Age = 12
          Weight = 50
          Pregnant = 0
          Lactating = 0
          YoungNumber = 0
          YoungWt = 0
          StockingRate = 50
          CurrentLocation = Away
          PreGrazingDM = 1500
          MinGrazingDays = 1
          PostGrazingDM = 1000
          DoNoGrazingWindow = True
          NoGrazeStartSpring = 05-sep
          NoGrazeEndSpring = 01-dec
          NoGrazeStartSummer = 15-jan
          NoGrazeEndSummer = 10-apr
          SupplementName = silage
          SupplementFirst = False
          SupplementEveryDay = 0
          SupplementOnPastureMass = 0
          TriggerPastureMass = 1500
          NumStock = 0
          GrazingSeasonIsOpen = False
          HarvestableBiomass = 0
          HarvestableBiomassYesterday = 0
          script: same as in SheepInVineyard.SheepInVineyard.Row.GrazeVineyardRow
        Stock: RandSeed=9999
        Report ReportStockAlley: EventNames=[Clock].EndOfDay
          VariableNames:
            [Clock].Today as Date
            [Stock].NumberAll as NumStockAlley
            [Stock].IntakeAll.Weight as DMIntakeAlley
            [Stock].SuppIntakeAll.Weight as SilageIntakeAlley
            [Stock].CondScoreAll as ConditionScoreAlley
            [GrazeVineyardAlley].Script.HarvestableBiomass as HarvestableBiomassAlley
            [GrazeVineyardAlley].Script.CurrentLocation as StockLocationAlley
            [Plantain].AboveGround.Wt
  Folder Sensibility
    Experiment IrrigationResponse
      Memo Notes
        This simulation experiment is set up to test the sensibility of the model output to water stress. The days of interval between two irrigation events was set as the experimental factor. The results show the model present reasonable water stress responses for leaf area, biomass dynamics of different organ, profile soil water storage, and non-structural carbohydrate. one caution should be note is for the Brix values. Brix was calculated based on water content, which is related to the berry dry weight and fresh weight. Dry weight response strongly to the water stress as carbon assimilation was reduced. For the response of fresh weight to water stress, only a emipirical function based on our rule of thumb was added. The effects of carbon status on berry fresh weight needed to be added based on experimental data as well.
      Factors
        Factor Node: Specification=[AutomaticIrrigation].Script.returndays = 1, 3, 5, 10, 20
      Simulation IrrigResponse
        Clock: Start=2005-02-25; End=2012-05-02
        Summary SummaryFile
        Weather: FileName=Blenheim.met
        MicroClimate: a_interception=0; b_interception=1; c_interception=0; d_interception=0; soil_albedo=0.3; SoilHeatFluxFraction=0.4; MinimumHeightDiffForNewLayer=0; NightInterceptionFraction=0.5; ReferenceHeight=2
        SoilArbitrator Soil Arbitrator
        Manager ClimateController
          AllowControl = True
          EnableDate = 01/01/1972 00:00:00
          WithinYearControl = False
          ControlStart =
          ControlEnd =
          RainfallMultiplier = 0
          RainfallAddition = 0
          RadiationMultiplier = 1
          RadiationAddition = 0
          MinTMultiplier = 1
          MinTAddition = 0
          MaxTMultiplier = 1
          MaxTAddition = 0
          WindMultiplier = 1
          WindAddition = 0
          VPMultiplier = 1
          VPAddition = 0
```csharp
using Newtonsoft.Json;
using APSIM.Shared.Utilities;
using Models.Interfaces;
using Models.Soils;
using Models.PMF;
using Models.Core;
using System.Xml.Serialization;
using System;
using Models.Soils.Nutrients;
using Models.Climate;

namespace Models
{
    [Serializable]
    public class Script : Model
    {
        // - Links to APSIM models
        [Link] Zone zone;
        [Link] Clock clock;
        [Link] Weather weather;
        [Link] ISummary summary = null;

        // - Paramters for this manager
        [Description("Enable? Set to 'No' to completely disable this manager")] public bool AllowControl { get; set; }

        [Separator("General settings")]
        [Description("Start the climate controls beginning on date (dd/mmm/yyyy): ")] public DateTime EnableDate { get; set; }
        [Description("Implement climate control only during part of the year?")] public bool WithinYearControl { get; set; }
        [Description("Within each year, the first day to start the climate controls is (dd-mmm)")] public string ControlStart { get; set; }
        [Description("Within each year, end last day of climate control is (dd-mmm)")] public string ControlEnd { get; set; }

        [Separator("Rainfall")]
        [Description("Rainfall multiplier (-): ")] public double RainfallMultiplier { get; set; }
        [Description("Rainfall addition (mm): ")] public double RainfallAddition { get; set; }

        [Separator("Radiation")]
        [Description("Radiation multiplier (-): ")] public double RadiationMultiplier { get; set; }
        [Description("Radiation addition (MJ/m2): ")] public double RadiationAddition { get; set; }

        [Separator("Minimum temperature")]
        [Description("Minimum temperature multiplier (-): ")] public double MinTMultiplier { get; set; }
        [Description("Minimum temperature addition (C): ")] public double MinTAddition { get; set; }

        [Separator("Maximum temperature")]
        [Description("Maximum temperature multiplier (-): ")] public double MaxTMultiplier { get; set; }
        [Description("Maximum temperature addition (C): ")] public double MaxTAddition { get; set; }

        [Separator("Wind speed")]
        [Description("Wind speed multiplier (-): ")] public double WindMultiplier { get; set; }
        [Description("Wind speed addition (m/s): ")] public double WindAddition { get; set; }

        [Separator("Vapour pressure")]
        [Description("Vapour pressure multiplier (-): ")] public double VPMultiplier { get; set; }
        [Description("Vapour pressure addition (hPa): ")] public double VPAddition { get; set; }

        [JsonIgnore] public bool DoControl { get; set; }
        [JsonIgnore] public int DoControlInt { get; set; }

        [EventSubscribe("PreparingNewWeatherData")] private void OnDoManagement(object sender, EventArgs e)
        {
            // Check if this manager is enabled
            if ((AllowControl) && (clock.Today >= EnableDate))
            {
                DoControl = true;
                if (WithinYearControl)
                    DoControl = DateUtilities.WithinDates(ControlStart, clock.Today, ControlEnd); 
            }

            if (DoControl)
                DoControlInt = 1;
            else
                DoControlInt = 0;

            if (DoControl)
            {
                // do the weather alterations 
                weather.Rain = RainfallMultiplier * weather.Rain + RainfallAddition;
                weather.Radn = RadiationMultiplier * weather.Radn + RadiationAddition;
                weather.MinT = MinTMultiplier * weather.MinT + MinTAddition;
                weather.MaxT = MaxTMultiplier * weather.MaxT + MaxTAddition;
                weather.Wind = WindMultiplier * weather.Wind + WindAddition;
                weather.VP = VPMultiplier * weather.VP + VPAddition;
            }
        }
    }
}
```
        RectangularZone Row: Length=100; Width=0.9; Slope=0; AspectAngle=0; Altitude=50
          Report: EventNames=[Clock].DoReport
          Memo: same as ExampleSimulation.BaseSim.Row.Memo
          Plant Grapevine: IsAlive=false; IsEnding=false; DaysAfterEnding=0
          Manager TreeInitialisation: same as ExampleSimulation.BaseSim.Row.TreeInitialisation
          Irrigation
          Fertiliser
          SurfaceOrganicMatter: InitialResidueName=wheat_stubble; InitialResidueType=wheat; InitialResidueMass=10000; InitialStandingFraction=0; InitialCPR=0; InitialCNR=20
          Manager SetupTreeRootZones: same as Validation.Sauvignonblanc.RetainedNodeNum.RetainedNodNum.Row.SetupTreeRootZones
          Operations VineIrrigation
          Operations WinterRainfall
            2006-08-26  [Irrigation].Apply(45);
          Manager PlantVariables: same as Validation.Sauvignonblanc.RetainedNodeNum.RetainedNodNum.Row.PlantVariables
          Manager HarvestNPruning: same as Validation.Sauvignonblanc.RetainedNodeNum.RetainedNodNum.Row.HarvestNPruning
          Manager DripIrrigator: same as Validation.Sauvignonblanc.RetainedNodeNum.RetainedNodNum.Row.DripIrrigator
          Manager Fertilise on fixed dates: same as Validation.Sauvignonblanc.RetainedNodeNum.RetainedNodNum.Row.Fertilise on fixed dates
          Manager Reset on date: same as Validation.Sauvignonblanc.RetainedNodeNum.RetainedNodNum.Row.Reset on date
          Manager Fertilise topup: same as Validation.Sauvignonblanc.RetainedNodeNum.RetainedNodNum.Row.Fertilise topup
          Soil: same as ExampleSimulation.BaseSim.Row.Soil
          Manager AutomaticIrrigation
            allowIrrigation = True
            seasonStart = 1-Oct
            seasonEnd = 30-May
            seasonsAllocation = 10000
            triggerDeficit = 50
            targetDeficit = 95
            returndays = 3
            maximumAmount = 10
            depthPAWC = 650
```csharp
using Newtonsoft.Json;
using APSIM.Shared.Utilities;
using System.Xml.Serialization;
using Models.Soils;
using Models.PMF;
using Models.Core;
using System;
using Models.Interfaces;



        
namespace Models
{
    [Serializable] 
    [System.Xml.Serialization.XmlInclude(typeof(Model))]
    public class Script : Model
    {
        [Link] private ISummary summary;
        [Link] private Irrigation Irrigation;
        [Link] private Clock Clock;
        [Link] private Soil Soil;
        [Link(IsOptional = true)] private IPlant existingCrop;
        private DateTime StartDate;
        private DateTime EndDate;
        private double TopDUL;
        private double TopLL;
        private int nLayers;
        [Link]
        private IPhysical soilPhysical;
        [Link]
        private ISoilWater waterBalance;
        //Communication to other modules
       
        //User inputs from properties tab
        [Description("Turn irrigation on?")]
        public bool allowIrrigation { get; set; }
        [Description("Start of irrigation season (dd-MMM)")]
        public string seasonStart { get; set; }
        [Description("End of irrigation season (dd-MMM)")]
        public string seasonEnd { get; set; }
        [Description("Season allocation (mm)")]
        public double seasonsAllocation { get; set; }
        [Description("Deficit to trigger irrigation (% PAWC)")]
        public double triggerDeficit { get; set; }
        [Description("Deficit to stop irrigaton (% PAWC)")]
        public double targetDeficit { get; set; }
        [Description("Minimum days for irrigation to return")]
        public double returndays { get; set; }
        [Description("Maximum irrigation application (mm/day)")]
        public double maximumAmount { get; set; }
        [Description("Depth to calculate PAWC (mm)")]
        public double depthPAWC { get; set; }

        //Class members
        [JsonIgnore] public double TopSWdeficit { get; set; }
        [JsonIgnore] public double TopSWC { get; set; }
        [JsonIgnore] public double DaysSinceIrrigation { get; set; }
        [JsonIgnore] public double AmountToApply { get; set; }
        [JsonIgnore] public double SeasonAppliedAmount { get; set; }
        
        private bool IrrigationIsAllowed { get; set; }
        private bool SeasonIsOpen { get; set; }
        private bool CropIsActive { get; set; }
        private bool IrrigatorIsAvailable { get; set; }
        private bool SoilIsDry { get; set; }

    
        //Calculate static soil variables
        [EventSubscribe("StartOfSimulation")]
        private void OnStartOfSimulation(object sender, EventArgs e)
        {   
            //Set the season dates
            StartDate = DateTime.Parse(seasonStart + "-" + Clock.Today.Year.ToString());
            EndDate = DateTime.Parse(seasonEnd + "-" + Clock.Today.Year.ToString());
            
            //Can we irrigate at all?
            IrrigationIsAllowed = false; 
            if (allowIrrigation)
                IrrigationIsAllowed = true; 

            //Calculate soil water variables
            double depthFromSurface = 0.0;
            double fracLayer = 0.0;
            nLayers = soilPhysical.Thickness.Length;
            for (int layer = 0; layer < nLayers; layer++)
            {
                fracLayer = Math.Min(1.0, (depthPAWC - depthFromSurface) / soilPhysical.Thickness[layer]);
                TopLL += soilPhysical.LL15mm[layer] * fracLayer;
                TopDUL += soilPhysical.DULmm[layer] * fracLayer;
                depthFromSurface += soilPhysical.Thickness[layer];
                if (depthFromSurface >= depthPAWC)
                    layer = nLayers;
            }
        }
             
        //Determine daily requirement for irrigation
        [EventSubscribe("StartOfDay")]
        private void OnStartOfDay(object sender, EventArgs e)
        {
            //Can we irrigate today?          
            SeasonIsOpen = isBetween(Clock.Today, StartDate, EndDate);
            if (!SeasonIsOpen)
                SeasonAppliedAmount = 0;

            //Is there a crop in the ground that needs irrigation?
            CropIsActive = false;
            if ((existingCrop != null) && (existingCrop.IsAlive))
                CropIsActive = true;
            //if ((existingCrop.Phenology.Stage >= 3.0) && (existingCrop.Phenology.Stage < 6.0))
          
            //Is the irrigator available?
            IrrigatorIsAvailable = false;
            DaysSinceIrrigation += 1;
            if (DaysSinceIrrigation >= returndays)
                IrrigatorIsAvailable = true;
          
            //Is the soil dry enough to require irrigation?
            SoilIsDry = false;
            double depthFromSurface = 0.0;
            double fracLayer = 0.0;
            TopSWC = 0.0;
            for (int layer = 0; layer < nLayers; layer++)
            //for (int layer = 0; depthFromSurface < depthPAWC + soilPhysical.Thickness[layer]; layer++)
            {
                fracLayer = Math.Min(1.0, (depthPAWC - depthFromSurface) / soilPhysical.Thickness[layer]);
                TopSWC += waterBalance.SWmm[layer] * fracLayer;
                depthFromSurface += soilPhysical.Thickness[layer];
                if (depthFromSurface >= depthPAWC)
                    layer = nLayers;
            }
            
            TopSWdeficit = TopSWC - TopDUL;
            if (Math.Max(0.0, -TopSWdeficit) >= (TopDUL - TopLL) * (100 - triggerDeficit) / 100)
                SoilIsDry = true;
                
            //Are all the conditions ratifying irrigation
            if (IrrigationIsAllowed && SeasonIsOpen && CropIsActive && IrrigatorIsAvailable && SoilIsDry)
            {
                //Lets bloody well irrigate then!!!!
                AmountToApply = TopDUL * targetDeficit / 100 - TopSWC;
                AmountToApply = Math.Max(0.0, Math.Min(AmountToApply, seasonsAllocation - SeasonAppliedAmount));
                AmountToApply = Math.Min(AmountToApply,maximumAmount);
                Irrigation.Apply(AmountToApply);
                DaysSinceIrrigation = 0;
                SeasonAppliedAmount += AmountToApply;
            }
        }
        
        ///Checks whether theDate is between iniDate and endDate (non-year specific)
        private bool isBetween(DateTime theDay, DateTime iniDate, DateTime endDate)
        {
            bool result = false;
            if (iniDate.DayOfYear < endDate.DayOfYear)
            {
                // period is within one year, ex: summer in the northern hemisphere
                if ((theDay.DayOfYear >= iniDate.DayOfYear) && (theDay.DayOfYear <= endDate.DayOfYear))
                    result = true;
            }
            else
            {
                // period goes over the end of the year, ex: summer in the southern hemisphere
                if ((theDay.DayOfYear >= iniDate.DayOfYear) || (theDay.DayOfYear <= endDate.DayOfYear))
                    result = true;
            }
            
            return result;
        }
    }
}
```
        RectangularZone Alley: same as Validation.Sauvignonblanc.RetainedNodeNum.RetainedNodNum.Alley
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