Simulations: Version=212
  DataStore
    ExcelInput: FileNames=[Obs 555.xlsx]; SheetNames=[default]
    PredictedObserved: PredictedTableName=Report_Harvest; ObservedTableName=default; FieldNameUsedForMatch=SimulationName; AllColumns=true
    PredictedObserved PredictedObservedDaily: PredictedTableName=TimeSeries; ObservedTableName=default; FieldNameUsedForMatch=SimulationName; FieldName2UsedForMatch=Clock.Today; AllColumns=false
    PredictedObserved PredictedObservedLAPerLeaf: PredictedTableName=TimeSeries; ObservedTableName=default; FieldNameUsedForMatch=SimulationName; FieldName2UsedForMatch=ExtraVariables.Script.LeafExpandedPosition; AllColumns=false
  Folder Replacements
    Report Report_Harvest: EventNames=[Maize].Harvesting
      VariableNames:
        [Maize].SowingDate
        [Maize].Phenology.FloweringDAS
        [Maize].Phenology.MaturityDAS
        [Maize].Grain.Wt
        [Maize].Grain.N
        [Maize].Grain.Wt/([Maize].AboveGround.Wt+0.00001) as HI
        [Maize].Grain.N/([Maize].AboveGround.N+0.00001) as NHI
        [Maize].AboveGround.Wt
        [Maize].AboveGround.N
        (([Maize].AboveGround.Wt) - ([Maize].Grain.Wt)) as StoverDM
        (([Maize].AboveGround.N) - ([Maize].Grain.N)) as StoverN
        [Maize].LAI
        [Maize].Rachis.CobNumber
        Divide([Maize].Grain.N, [Maize].Grain.Wt)*100 as GrainN_conc
        Divide(StoverN, StoverDM)*100 as StoverN_conc
        [Maize].Population
        [Maize].Grain.Size
        [Maize].Grain.Number
        Divide([Maize].Grain.Number,[Maize].Rachis.CobNumber) as GrainsPerCob
        sum([Soil].NO3.kgha[1:5]) as NO3_harvest_0to30cm
        sum([Soil].NO3.kgha[6:11]) as NO3_harvest_30to150cm
        [NO3].Flow[11] from [Maize].Sowing to [Maize].Harvesting as GS_leaching_150cm
        sum of sum([Soil].Nutrient.N2Oatm) from [Maize].Sowing to [Maize].Harvesting as GS_N20
        sum of sum([Soil].Nutrient.DenitrifiedN) from [Maize].Sowing to [Maize].Harvesting as GS_Denitrification
        sum of [Fertiliser].NitrogenApplied from [Maize].Sowing to [Maize].Harvesting as N_fertilizer
        sum of sum([Soil].Nutrient.MineralisedN + [SurfaceOrganicMatter].SurfaceResidue.Decomposition.MineralisedN) from [Maize].Sowing to [Maize].Harvesting as GS_NetNMineralization
        [Structure].FinalLeafNumber
        [Structure].AllLeavesAppeared
    Report TimeSeries: EventNames=[Clock].EndOfDay
      VariableNames:
        [Clock].Today
        [Clock].Today.Year
        [Maize].Phenology.CurrentStageName
        [Maize].Grain.Wt * 0.159/0.85 as Yield_buac
        [Maize].Grain.Wt
        [Maize].Phenology.EmergenceDAS
        [Maize].Phenology.FloweringDAS
        [Maize].Phenology.MaturityDAS
        [Maize].DaysAfterSowing
        [Maize].Population
        [Maize].AboveGround.Wt
        [Maize].AboveGround.N
        [Maize].Leaf.Wt
        [Maize].Stem.Wt
        [Maize].Rachis.Wt
        [Maize].Rachis.Wt + [Maize].Grain.Wt as GrainandCob
        [Maize].Husk.Wt as OtherWt
        [Maize].Leaf.AppearedCohortNo
        [Maize].Structure.LeafTipsAppeared
        [Maize].Leaf.ExpandedCohortNo
        [Maize].Leaf.LAI
        [ExtraVariables].Script.LeafExpandedPosition
        [ExtraVariables].Script.MostRecentlyExpandedLeafSize
        [Maize].Grain.Size
        [Maize].Grain.Number
        sum of [Fertiliser].NitrogenApplied from [Clock].EndOfYear to [Plant].Harvesting as Nrate
  Folder 5x5x5
    Folder 2019
      Experiment CS19
        Factors
          Permutation
            Factor N: Specification=[FertiliseRule].Script.Amount = 0, 67, 134, 202, 291
            Factor D: Specification=[Sowing].Script.Population= 3.7, 5.6, 7.5, 9.5, 11.4
            Factor H: Specification=[Sowing].Script.CultivarName = 1197AMXT, DKC60
        Simulation Base2019
          Clock: Start=2018-11-01; End=2019-12-31
          Summary SummaryFile
          Weather: FileName=Ames.2024.02.08.met
          SoilArbitrator Soil Arbitrator
          Zone Field: Area=1; Slope=0; AspectAngle=0; Altitude=50
            Fertiliser
            SurfaceOrganicMatter: InitialResidueName=soybean; InitialResidueType=soybean; InitialResidueMass=2000; InitialStandingFraction=0; InitialCPR=0; InitialCNR=35
            MicroClimate: a_interception=0; b_interception=1; c_interception=0; d_interception=0; SoilHeatFluxFraction=0.4; MinimumHeightDiffForNewLayer=0; NightInterceptionFraction=0.5; ReferenceHeight=2
            Plant Maize
            Irrigation
            Manager FertiliseRule
              FertiliserType = UAN_N
              FertiliserDates = 4-jun
              Amount = 160
              AmountType = False
```csharp
using Models.Soils;
using System;
using System.Linq;
using Models.Core;
using Models.PMF;
using APSIM.Shared.Utilities;
namespace Models
{
    [Serializable]
    public class Script : Model
    {
        [Link] Clock Clock;
        [Link] Fertiliser Fertiliser;
        
        [Separator("A component to apply fertiliser on one or more dates on every year of the simulation")]

        [Description("Type of fertiliser to apply? ")] 
        [Display(Type = DisplayType.FertiliserType)]public string FertiliserType { get; set; }

        [Description("Enter the fertilisation dates as dd-mmm with comma separation (any year information entered will be ignored): ")] 
        public string[] FertiliserDates { get; set; } 

        [Description("Amount of fertiliser to be applied (kg /ha)")] 
        public double Amount { get; set; }

        [Description("Is the above amount to be applied each time? (yes/ticked)? Or is it the total annual amount across all dates (no/unticked)")] 
        public bool AmountType { get; set; }
        
        [EventSubscribe("DoManagement")]
        private void OnDoManagement(object sender, EventArgs e)
        {
            foreach (string ddMMM in FertiliserDates)
            {
                if (DateUtilities.DatesEqual(ddMMM, Clock.Today))
                {
                    if (AmountType)
                        Fertiliser.Apply(amount: Amount, type: FertiliserType);
                    else
                        Fertiliser.Apply(amount: Amount / FertiliserDates.Length, type: FertiliserType);
                }
            }
        }
    }
}
```
            Manager Sowing
              Crop = [Maize]
              SowDate = 4-jun
              CultivarName =
              SowingDepth = 50
              RowSpacing = 760
              Population = 8.6
```csharp
using APSIM.Shared.Utilities;
using Models.Utilities;
using Models.Soils;
using Models.PMF;
using Models.Core;
using System;

namespace Models
{
    [Serializable]
    public class Script : Model
    {
        [Link] Clock Clock;
        [Link] Fertiliser Fertiliser;
        [Link] Summary Summary;
        [Link] Soil Soil;
        
        [Description("Crop")]
        public IPlant Crop { get; set; }

        [Description("Sowing date (d-mmm)")]
        public string SowDate { get; set; }

        [Display(Type = DisplayType.CultivarName)]
        [Description("Cultivar to be sown")]
        public string CultivarName { get; set; }

        [Description("Sowing depth (mm)")]
        public double SowingDepth { get; set; }

        [Description("Row spacing (mm)")]
        public double RowSpacing { get; set; }

        [Description("Plant population (/m2)")]
        public double Population { get; set; }

        [EventSubscribe("DoManagement")]
        private void OnDoManagement(object sender, EventArgs e)
        {
            if (DateUtilities.WithinDates(SowDate, Clock.Today, SowDate))
            {
                Crop.Sow(population: Population, cultivar: CultivarName, depth: SowingDepth, rowSpacing: RowSpacing);    
            }
        }
    }
}
```
            Manager Harvesting
              Crop = [Maize]
```csharp
using APSIM.Shared.Utilities;
using Models.Utilities;
using Models.Soils;
using Models.PMF;
using Models.Core;
using System;
using System.Linq;

namespace Models
{
    [Serializable] 
    public class Script : Model
    {
        [Description("Crop")]
        public IPlant Crop { get; set; }
        
        [EventSubscribe("DoManagement")]
        private void OnDoManagement(object sender, EventArgs e)
        {
            if (Crop.IsReadyForHarvesting)
            {
                Crop.Harvest();
                Crop.EndCrop();
            }
        }
    }
}
```
            Manager FallTillage
              TillageDate = 12-nov
              Fraction = 0.75
              Depth = 250
```csharp
using Models.Soils;
using System;
using System.Linq;
using Models.Core;
using Models.PMF;
using APSIM.Shared.Utilities;
using Models.Surface;

namespace Models
{
    [Serializable]
    public class Script : Model
    {
        [Link] Clock Clock;
        [Link] SurfaceOrganicMatter SOM;
        
        [Description("Tillage Date")]
        public string TillageDate { get; set; }
        
        [Description("Fraction of Residues To Incorporate (0-1)")]
        public double Fraction { get; set; }

        [Description("Depth of Tillage (mm)")]
        public double Depth { get; set; }

        [EventSubscribe("DoManagement")]
        private void OnDoManagement(object sender, EventArgs e)
        {
            if (DateUtilities.WithinDates(TillageDate, Clock.Today, TillageDate))
                SOM.Incorporate(Fraction, Depth);
        }
    }
}
```
            Manager SpringTillage
              TillageDate = 28-apr
              Fraction = 0.25
              Depth = 150
              script: same as in 5x5x5.2019.CS19.Base2019.Field.FallTillage
            Report Report_Harvest: EventNames=[Maize].Harvesting
              VariableNames:
                [Maize].SowingDate as SowingDate
                [Maize].Phenology.FloweringDAS as DTF
                [Maize].Phenology.MaturityDAS as DTM
                [Maize].Grain.Wt * 10 as Yield_kgha
                [Maize].Grain.N * 10 as GrainN_kgha
                [Maize].Grain.Wt * 10 * 0.0159/0.85 as Yield_buac
                [Maize].Grain.Wt/([Maize].AboveGround.Wt+0.00001) as HI
                [Maize].Grain.N/([Maize].AboveGround.N+0.00001) as NHI
                [Maize].AboveGround.Wt * 10 as Biomass_kgha
                [Maize].AboveGround.N * 10 as BiomassN_kgha
                (([Maize].AboveGround.Wt) - ([Maize].Grain.Wt))*10 as StoverDM_kgha
                (([Maize].AboveGround.N) - ([Maize].Grain.N))*10 as StoverN_kgha
                Divide (GrainN_kgha, Yield_kgha)*100 as GrainN_conc
                Divide (StoverN_kgha, StoverDM_kgha)*100 as StoverN_conc
                [Maize].Population
                [Maize].Grain.Size * 1000 as GrainSize_mg
                [Maize].Grain.Number as GrainNumber_m2
                sum([Soil].NO3.kgha[1:5]) as NO3_harvest_0to30cm
                sum([Soil].NO3.kgha[6:11]) as NO3_harvest_30to150cm
                sum of [Swim].FlowNO3[11] from [Maize].Sowing to [Maize].Harvesting as GS_leaching_150cm
                sum of sum([Soil].Nutrient.N2Oatm) from [Maize].Sowing to [Maize].Harvesting as GS_N20
                sum of sum([Soil].Nutrient.DenitrifiedN) from [Maize].Sowing to [Maize].Harvesting as GS_Denitrification
                sum of [Fertiliser].NitrogenApplied from [Maize].Sowing to [Maize].Harvesting as N_fertilizer
                sum of sum([Soil].Nutrient.MineralisedN + [SurfaceOrganicMatter].SurfaceResidue.Decomposition.MineralisedN) from [Maize].Sowing to [Maize].Harvesting as GS_NetNMineralization
                //[Maize].Grain.NConc as GrainN_conc  not working at harvest
            Soil: SoilType=Nicollet; NearestTown=Ames; Region=Boone; State=Iowa; Country=US; ApsoilNumber=34; Latitude=42.02204; Longitude=-93.769115; DataSource=mesured data and web soil survey; Comments=hydrological parameters and BD from Saxton and Rawls, 2006
              Physical
                Thickness  ParticleSizeSand  ParticleSizeSilt  ParticleSizeClay  Rocks     BD    AirDry  LL15   DUL    SAT         KS
                25         41.3              29.78             28.92             0         1.25  0.087   0.174  0.31   0.445       146
                25         41.3              29.78             28.92             0         1.25  0.087   0.174  0.31   0.455       146
                50         41.3              29.78             28.92             0.145161  1.25  0.087   0.174  0.3    0.42        146
                100        40.16             32.59             27.26             0.124808  1.25  0.132   0.165  0.25   0.43        146
                100        37.77             33.01             29.22             0.287634  1.25  0.12    0.12   0.22   0.35        146
                150        37.77             33.01             29.22             0.254756  1.35  0.11    0.11   0.21   0.34        146
                150        44.39             28.07             27.54             0.276675  1.35  0.102   0.102  0.22   0.33        133
                150        44.39             28.07             27.54             0.131908  1.36  0.126   0.126  0.265  0.393       133
                150        49.07             28.9              22.03             0.131908  1.36  0.133   0.133  0.261  0.393       133
                150        49.07             28.9              22.03             0.131908  1.36  0.128   0.128  0.253  0.393       388
                150        49.07             28.9              22.03             0         1.6   0.128   0.128  0.2    0.393       388
                300        49.07             28.9              22.03             0         1.6   0.09    0.09   0.2    0.393       388
                300        49.07             28.9              22.03             0.147947  1.6   0.09    0.09   0.2    0.313974    144.702
                300        49.07             28.9              22.03             0.176194  1.6   0.09    0.09   0.2    0.303565    105.594
                300        49.07             28.9              22.03             0.201861  1.6   0.09    0.09   0.2    0.29410679  77.0552
                300        49.07             28.9              22.03             0.225184  1.6   0.09    0.09   0.2    0.285512    56.2297
                300        49.07             28.9              22.03             0.246377  1.6   0.09    0.09   0.2    0.277703    41.0326
                300        49.07             28.9              22.03             0.265634  1.6   0.09    0.09   0.2    0.270607    29.9429
                300        49.07             28.9              22.03             0.283133  1.6   0.09    0.09   0.2    0.264159    21.8503
                300        49.07             28.9              22.03             0.299034  1.6   0.09    0.09   0.2    0.258299    15.9449
                Rocks source: Calculated
                SoilCrop MaizeSoil
                  LL=[0.174, 0.174, 0.174, 0.165, 0.12, 0.11, 0.128378, 0.165327, 0.176555, 0.177444, 0.16031, 0.147703, 0.15799, 0.167297, 0.175587, 0.182816, 0.188, 0.188, 0.188, 0.188]
                  KL=[0.08, 0.08, 0.08, 0.08, 0.08, 0.08, 0.08, 0.08, 0.08, 0.0519615, 0.0480162, 0.0422964, 0.0350564, 0.0282843, 0.022015, 0.0162927, 0.0111758, 0.0067466, 0.00313554, 0.000603434]
                  XF=[1, 1, 1, 1, 1, 1, 1, 1, 1, 1, 1, 1, 1, 0.25, 0, 0, 0, 0, 0, 0]
                SoilCrop SoybeanSoil: same as 5x5x5.2019.CS19.Base2019.Field.Soil.Physical.MaizeSoil
              Organic: FOMCNRatio=35; CarbonUnits=Total
                Thickness  Carbon  SoilCNRatio  FBiom       FInert      FOM
                25         1.976   11           0.0495      0.379308    229.5
                25         1.928   11           0.0495      0.379308    222.7
                50         1.928   11           0.0495      0.379308    209.7
                100        1.904   11           0.0495      0.41803888  186
                100        1.576   11           0.0495      0.4564836   165
                150        1.56    11           0.0495      0.4945239   137.8
                150        0.776   11           0.0470824   0.73649355  115.1
                150        0.776   11           0.0409631   0.75648885  96.1
                150        0.392   11           0.0366531   0.75725     80.3
                150        0.392   11           0.0334132   0.77675     67.1
                150        0.392   11           0.0308666   0.9698625   56
                300        0.392   11           0.0279011   0.983835    12
                300        0.392   11           0.02496552  0.999       3
                300        0.392   11           0.0227587   0.999       2
                300        0.392   11           0.0210241   0.999       1.5
                300        0.1     11           0.0196157   0.999       1
                300        0.1     11           0.0184435   0.999       0.1
                300        0.1     11           0.0174487   0.999       0.1
                300        0.1     11           0.0165911   0.999       0.1
                300        0.1     11           0.0158421   0.999       0.1
              Chemical: PHUnits=Water
                Thickness  PH    CEC
                25         7.48  25.8
                25         7.48  25.8
                50         7.48  25.8
                100        7.38  25.85
                100        7.43  26.57
                150        7.43  26.57
                150        7.73  23.41
                150        7.73  23.41
                150        8.08  33.6
                150        8.08  33.6
                150        8.08  33.6
                300        8.08  33.6
                300        8.08  33.6
                300        8.08  33.6
                300        8.08  33.6
                300        8.08  33.6
                300        8.08  33.6
                300        8.08  33.6
                300        8.08  33.6
                300        8.08  33.6
              Water: FilledFromTop=false
                Thickness=[25, 25, 50, 100, 100, 150, 150, 150, 150, 150, 150, 300, 300, 300, 300, 300, 300, 300, 300, 300]
                InitialValues=[0.31, 0.31, 0.3, 0.25, 0.22, 0.21, 0.22, 0.265, 0.261, 0.253, 0.2, 0.393, 0.285, 0.273, 0.263, 0.254, 0.246, 0.24, 0.234, 0.23]
              Nutrient
              Solute NO3: InitialValuesUnits=kg/ha; WaterTableConcentration=0; D0=0; DepthConstant=0; MaxDepthSoluteAccessible=0; RunoffEffectivenessAtMovingSolute=0; MaxEffectiveRunoff=0
                Thickness  InitialValues  Exco  FIP
                25         4.446          0     1
                25         4.338          0     1
                50         4.338          0     1
                100        4.284          0     1
                100        3.546          0     1
                150        3.51           0     1
                150        1.746          0     1
                150        1.746          0     1
                150        0.441          0     1
                150        0.441          0     1
                150        0.441          0     1
                300        0.441          0     1
                300        0.441          0     1
                300        0.441          0     1
                300        0.441          0     1
                300        0.375          0     1
                300        0.375          0     1
                300        0.375          0     1
                300        0.375          0     1
                300        0.375          0     1
              Solute NH4: InitialValuesUnits=kg/ha; WaterTableConcentration=1; D0=0; DepthConstant=0; MaxDepthSoluteAccessible=0; RunoffEffectivenessAtMovingSolute=0; MaxEffectiveRunoff=0
                Thickness  InitialValues  Exco  FIP
                25         4.446          1     1
                25         4.338          1     1
                50         4.338          1     1
                100        4.284          1     1
                100        3.546          1     1
                150        3.51           1     1
                150        1.746          1     1
                150        1.746          1     1
                150        0.441          1     1
                150        0.441          1     1
                150        0.441          1     1
                300        0.441          1     1
                300        0.441          1     1
                300        0.441          1     1
                300        0.441          1     1
                300        0.375          1     1
                300        0.375          1     1
                300        0.375          1     1
                300        0.375          1     1
                300        0.375          1     1
              Solute Urea: InitialValuesUnits=kg/ha; WaterTableConcentration=0; D0=0; DepthConstant=0; MaxDepthSoluteAccessible=0; RunoffEffectivenessAtMovingSolute=0; MaxEffectiveRunoff=0
                Thickness  InitialValues  Exco  FIP
                25         0              0     1
                25         0              0     1
                50         0              0     1
                100        0              0     1
                100        0              0     1
                150        0              0     1
                150        0              0     1
                150        0              0     1
                150        0              0     1
                150        0              0     1
                150        0              0     1
                300        0              0     1
                300        0              0     1
                300        0              0     1
                300        0              0     1
                300        0              0     1
                300        0              0     1
                300        0              0     1
                300        0              0     1
                300        0              0     1
              Swim3 Swim: Salb=0.13; CN2Bare=65; CNRed=20; CNCov=0.8; KDul=0.25; PSIDul=-250; VC=true; DTMin=0; DTMax=1440; MaxWaterIncrement=10; SpaceWeightingFactor=0; SoluteSpaceWeightingFactor=0; Dis=15; Disp=0.75; A=1; DTHC=0; DTHP=1; vcon1=7.28e-09; vcon2=7.26e-07; eo_time=06:00; eo_durn=720; default_rain_time=00:00; default_rain_duration=720; Diagnostics=false
              SoilTemperature
                Thickness=[25, 25, 50, 100, 100, 150, 150, 150, 150, 150, 150, 300, 300, 300, 300, 300, 300, 300, 300, 300]
                InitialValues=[10, 10, 10, 10, 10, 10, 10, 10, 10, 10, 10, 10, 10, 10, 10, 10, 10, 10, 10, 10]
            Manager SWIMSetLowerBC
              LowerBCType = potential
              LowerBCValue = 2400
```csharp
using Models.Climate;
using APSIM.Shared.Utilities;
using Models.Soils.Nutrients;
using Models.Soils;
using Models.PMF;
using Models.Core;
using System.Xml.Serialization;
using System;
using System.Linq;
using Models.AgPasture;
using Models.Interfaces;

namespace Models
{
    [Serializable] 
    [System.Xml.Serialization.XmlInclude(typeof(Model))]
    public class Script : Model
    {
        [Link] Clock clock;
        [Link] ISummary summary;
        [Link] private Swim3 swim;
        //[Link] private PastureSpecies ryegrass;
        //[Link] private SimpleGrazing grazing;
        
        public enum LowerBCTypeOptions {gradient,seepage,potential,watertable};

        [Separator("Sets the lower boundary condition type (and value if set to 'potential' for SWIM3. The change is applied at the beginning of the first day of the simulation.")]
        
        [Description("What lower boundary condition is wanted?")] public LowerBCTypeOptions LowerBCType { get; set; }


        [Display(VisibleCallback = "IsBCPotentialOrWater")]
        [Description("What should the lower BC potential be set to (should be positive for a watertable) (mm)?")] public double LowerBCValue { get; set; }
        
        public bool IsBCPotentialOrWater => LowerBCType == LowerBCTypeOptions.potential || LowerBCType == LowerBCTypeOptions.watertable;





        public double SoilWaterStart  { get; set; }
        public double SoilWaterEnd  { get; set; }

        [EventSubscribe("DoDailyInitialisation")]
        private void DoDailyInitialisation(object sender, EventArgs e)
        {
        }

        [EventSubscribe("DoReportCalculations")]
        private void DoReportCalculations(object sender, EventArgs e)
        {
        }

        [EventSubscribe("DoManagement")]
        private void DoDailyCalculations(object sender, EventArgs e)
        {
            if (clock.Today == clock.StartDate)
            {
                summary.WriteMessage(this, "Script is setting lower boundary condition to " + LowerBCType, MessageType.Diagnostic);
                if (LowerBCType == LowerBCTypeOptions.gradient)
                    swim.SetLowerBCForGradient(bbcGradient: 0.0);   // in cm/cm (ibbc=0) Note that this is the default setting
                else if (LowerBCType == LowerBCTypeOptions.potential)
                    swim.SetLowerBCForGivenPotential(bbcPotential: LowerBCValue /10.0 );    //  convert to cm (ibbc=1), DUL is -100 cm so values more positive will often result in inflow to the bottom of the soil profile. Input in mm so divide here.
                else if (LowerBCType == LowerBCTypeOptions.seepage)
                    swim.SetLowerBCForSeepage(bbcPotentialSeepage: 0.0);  // in cm (ibbc=3). This is for zero-tension lysimeters
                else if (LowerBCType == LowerBCTypeOptions.watertable)
                    swim.SetLowerBCForSeepage(LowerBCValue / 10.0);  // in cm (ibbc=4). This is for water tables
                else
                    throw new Exception("Wrong lower boundary condition type");
            }
        }
    }
}
```
    Folder 2021_CC
      Experiment CC21
        Factors
          Permutation
            Factor N: Specification=[FertiliseRule].Script.Amount = 0, 67, 146, 246, 336
            Factor D: Specification=[Sowing].Script.Population= 3.6, 5.5, 7.5, 9.4, 11.3
            Factor H: Specification=[Sowing].Script.CultivarName = DKC63, NK0748, P1108Q
        Simulation Base2021_CC
          Clock: Start=2020-11-01; End=2021-12-31
          Summary SummaryFile
          Weather: FileName=Ames.2024.02.08.met
          SoilArbitrator Soil Arbitrator
          Zone Field: Area=1; Slope=0; AspectAngle=0; Altitude=50
            Fertiliser
            SurfaceOrganicMatter: InitialResidueName=maize; InitialResidueType=maize; InitialResidueMass=8000; InitialStandingFraction=0; InitialCPR=0; InitialCNR=75
            MicroClimate: a_interception=0; b_interception=1; c_interception=0; d_interception=0; SoilHeatFluxFraction=0.4; MinimumHeightDiffForNewLayer=0; NightInterceptionFraction=0.5; ReferenceHeight=2
            Plant Maize
            Manager FertiliseRule
              FertiliserType = UAN_N
              FertiliserDates = 13-may
              Amount = 160
              AmountType = False
              script: same as in 5x5x5.2019.CS19.Base2019.Field.FertiliseRule
            Manager Sowing
              Crop = [Maize]
              SowDate = 13-may
              CultivarName =
              SowingDepth = 50
              RowSpacing = 760
              Population = 8.6
              script: same as in 5x5x5.2019.CS19.Base2019.Field.Sowing
            Manager Harvesting: same as 5x5x5.2019.CS19.Base2019.Field.Harvesting
            Manager FallTillage: same as 5x5x5.2019.CS19.Base2019.Field.FallTillage
            Manager SpringTillage
              TillageDate = 10-apr
              Fraction = 0.25
              Depth = 150
              script: same as in 5x5x5.2019.CS19.Base2019.Field.FallTillage
            Report Report_Harvest: same as 5x5x5.2019.CS19.Base2019.Field.Report_Harvest
            Soil: SoilType=Nicollet; NearestTown=Ames; Region=Boone; State=Iowa; Country=US; ApsoilNumber=34; Latitude=42.02204; Longitude=-93.769115; DataSource=mesured data and web soil survey; Comments=hydrological parameters and BD from Saxton and Rawls, 2006
              Physical: same as 5x5x5.2019.CS19.Base2019.Field.Soil.Physical
              Organic: same as 5x5x5.2019.CS19.Base2019.Field.Soil.Organic
              Chemical: PHUnits=Water
                Thickness  PH   CEC
                25         7.5  25.8
                25         7.5  25.8
                50         7.5  25.8
                100        7.4  25.85
                100        7.4  26.57
                150        7.4  26.57
                150        7.7  23.41
                150        7.7  23.41
                150        8.1  33.6
                150        8.1  33.6
                150        8.1  33.6
                300        8.1  33.6
                300        8.1  33.6
                300        8.1  33.6
                300        8.1  33.6
                300        8.1  33.6
                300        8.1  33.6
                300        8.1  33.6
                300        8.1  33.6
                300        8.1  33.6
              Water: FilledFromTop=false
                Thickness=[25, 25, 50, 100, 100, 150, 150, 150, 150, 150, 150, 300, 300, 300, 300, 300, 300, 300, 300, 300]
                InitialValues=[0.31, 0.31, 0.3, 0.25, 0.22, 0.21, 0.22, 0.265, 0.261, 0.253, 0.2, 0.393, 0.285, 0.273, 0.263, 0.254, 0.246, 0.24, 0.234, 0.23]
              Nutrient
              Solute NO3: InitialValuesUnits=kg/ha; WaterTableConcentration=0; D0=0; DepthConstant=0; MaxDepthSoluteAccessible=0; RunoffEffectivenessAtMovingSolute=0; MaxEffectiveRunoff=0
                Thickness  InitialValues  Exco  FIP
                25         5.3352         0     1
                25         5.2056         0     1
                50         5.2056         0     1
                100        5.1408         0     1
                100        4.2552         0     1
                150        4.212          0     1
                150        2.0952         0     1
                150        2.0952         0     1
                150        0.5292         0     1
                150        0.5292         0     1
                150        0.5292         0     1
                300        0.5292         0     1
                300        0.5292         0     1
                300        0.5292         0     1
                300        0.5292         0     1
                300        0.45           0     1
                300        0.45           0     1
                300        0.45           0     1
                300        0.45           0     1
                300        0.45           0     1
              Solute NH4: InitialValuesUnits=kg/ha; WaterTableConcentration=1; D0=0; DepthConstant=0; MaxDepthSoluteAccessible=0; RunoffEffectivenessAtMovingSolute=0; MaxEffectiveRunoff=0
                Thickness  InitialValues  Exco  FIP
                25         5.3352         1     1
                25         5.2056         1     1
                50         5.2056         1     1
                100        5.1408         1     1
                100        4.2552         1     1
                150        4.212          1     1
                150        2.0952         1     1
                150        2.0952         1     1
                150        0.5292         1     1
                150        0.5292         1     1
                150        0.5292         1     1
                300        0.5292         1     1
                300        0.5292         1     1
                300        0.5292         1     1
                300        0.5292         1     1
                300        0.45           1     1
                300        0.45           1     1
                300        0.45           1     1
                300        0.45           1     1
                300        0.45           1     1
              Solute Urea: same as 5x5x5.2019.CS19.Base2019.Field.Soil.Urea
              Swim3 Swim: same as 5x5x5.2019.CS19.Base2019.Field.Soil.Swim
              SoilTemperature
                Thickness=[25, 25, 50, 100, 100, 150, 150, 150, 150, 150, 150, 300, 300, 300, 300, 300, 300, 300, 300, 300]
                InitialValues=[10, 10, 10, 10, 10, 10, 10, 10, 10, 10, 10, 10, 10, 10, 10, 10, 10, 10, 10, 10]
            Manager SWIMSetLowerBC: same as 5x5x5.2019.CS19.Base2019.Field.SWIMSetLowerBC
    Folder 2021_CS
      Experiment CS21
        Factors: same as 5x5x5.2021_CC.CC21.Factors
        Simulation Base2021_CS
          Clock: Start=2020-11-01; End=2021-12-31
          Summary SummaryFile
          Weather: FileName=Ames.2024.02.08.met
          SoilArbitrator Soil Arbitrator
          Zone Field: Area=1; Slope=0; AspectAngle=0; Altitude=50
            Fertiliser
            SurfaceOrganicMatter: InitialResidueName=soybean; InitialResidueType=soybean; InitialResidueMass=3000; InitialStandingFraction=0; InitialCPR=0; InitialCNR=45
            MicroClimate: a_interception=0; b_interception=1; c_interception=0; d_interception=0; SoilHeatFluxFraction=0.4; MinimumHeightDiffForNewLayer=0; NightInterceptionFraction=0.5; ReferenceHeight=2
            Plant Maize
            Manager FertiliseRule: same as 5x5x5.2021_CC.CC21.Base2021_CC.Field.FertiliseRule
            Manager Sowing: same as 5x5x5.2021_CC.CC21.Base2021_CC.Field.Sowing
            Manager Harvesting: same as 5x5x5.2019.CS19.Base2019.Field.Harvesting
            Manager SpringTillage: same as 5x5x5.2021_CC.CC21.Base2021_CC.Field.SpringTillage
            Manager FallTillage: same as 5x5x5.2019.CS19.Base2019.Field.FallTillage
            Report Report_Harvest: same as 5x5x5.2019.CS19.Base2019.Field.Report_Harvest
            Soil: SoilType=Nicollet; NearestTown=Ames; Region=Boone; State=Iowa; Country=US; ApsoilNumber=34; Latitude=42.02204; Longitude=-93.769115; DataSource=mesured data and web soil survey; Comments=hydrological parameters and BD from Saxton and Rawls, 2006
              Physical: same as 5x5x5.2019.CS19.Base2019.Field.Soil.Physical
              Organic: same as 5x5x5.2019.CS19.Base2019.Field.Soil.Organic
              Chemical: same as 5x5x5.2019.CS19.Base2019.Field.Soil.Chemical
              Water: FilledFromTop=false
                Thickness=[25, 25, 50, 100, 100, 150, 150, 150, 150, 150, 150, 300, 300, 300, 300, 300, 300, 300, 300, 300]
                InitialValues=[0.31, 0.31, 0.3, 0.25, 0.22, 0.21, 0.22, 0.265, 0.261, 0.253, 0.2, 0.393, 0.285, 0.273, 0.263, 0.254, 0.246, 0.24, 0.234, 0.23]
              Nutrient
              Solute NO3: InitialValuesUnits=kg/ha; WaterTableConcentration=0; D0=0; DepthConstant=0; MaxDepthSoluteAccessible=0; RunoffEffectivenessAtMovingSolute=0; MaxEffectiveRunoff=0
                Thickness  InitialValues  Exco  FIP
                25         8.892          0     1
                25         8.676          0     1
                50         8.676          0     1
                100        8.568          0     1
                100        7.092          0     1
                150        7.02           0     1
                150        3.492          0     1
                150        3.492          0     1
                150        0.882          0     1
                150        0.882          0     1
                150        0.882          0     1
                300        0.882          0     1
                300        0.882          0     1
                300        0.882          0     1
                300        0.882          0     1
                300        0.75           0     1
                300        0.75           0     1
                300        0.75           0     1
                300        0.75           0     1
                300        0.75           0     1
              Solute NH4: InitialValuesUnits=kg/ha; WaterTableConcentration=1; D0=0; DepthConstant=0; MaxDepthSoluteAccessible=0; RunoffEffectivenessAtMovingSolute=0; MaxEffectiveRunoff=0
                Thickness  InitialValues  Exco  FIP
                25         8.892          1     1
                25         8.676          1     1
                50         8.676          1     1
                100        8.568          1     1
                100        7.092          1     1
                150        7.02           1     1
                150        3.492          1     1
                150        3.492          1     1
                150        0.882          1     1
                150        0.882          1     1
                150        0.882          1     1
                300        0.882          1     1
                300        0.882          1     1
                300        0.882          1     1
                300        0.882          1     1
                300        0.75           1     1
                300        0.75           1     1
                300        0.75           1     1
                300        0.75           1     1
                300        0.75           1     1
              Solute Urea: same as 5x5x5.2019.CS19.Base2019.Field.Soil.Urea
              Swim3 Swim: same as 5x5x5.2019.CS19.Base2019.Field.Soil.Swim
              SoilTemperature
                Thickness=[25, 25, 50, 100, 100, 150, 150, 150, 150, 150, 150, 300, 300, 300, 300, 300, 300, 300, 300, 300]
                InitialValues=[10, 10, 10, 10, 10, 10, 10, 10, 10, 10, 10, 10, 10, 10, 10, 10, 10, 10, 10, 10]
            Manager SWIMSetLowerBC: same as 5x5x5.2019.CS19.Base2019.Field.SWIMSetLowerBC
    Folder 2022_CC
      Experiment CC22
        Factors: same as 5x5x5.2021_CC.CC21.Factors
        Simulation Base2022_CC
          Clock: Start=2021-11-01; End=2022-12-31
          Summary SummaryFile
          Weather: FileName=Ames.2024.02.08.met
          SoilArbitrator Soil Arbitrator
          Zone Field: Area=1; Slope=0; AspectAngle=0; Altitude=50
            Fertiliser
            SurfaceOrganicMatter: InitialResidueName=maize; InitialResidueType=maize; InitialResidueMass=8500; InitialStandingFraction=0; InitialCPR=0; InitialCNR=75
            MicroClimate: a_interception=0; b_interception=1; c_interception=0; d_interception=0; SoilHeatFluxFraction=0.4; MinimumHeightDiffForNewLayer=0; NightInterceptionFraction=0.5; ReferenceHeight=2
            Plant Maize
            Manager FertiliseRule
              FertiliserType = UAN_N
              FertiliserDates = 23-may
              Amount = 160
              AmountType = False
              script: same as in 5x5x5.2019.CS19.Base2019.Field.FertiliseRule
            Manager Sowing
              Crop = [Maize]
              SowDate = 23-may
              CultivarName =
              SowingDepth = 50
              RowSpacing = 760
              Population = 8.6
              script: same as in 5x5x5.2019.CS19.Base2019.Field.Sowing
            Manager Harvesting: same as 5x5x5.2019.CS19.Base2019.Field.Harvesting
            Manager SpringTillage
              TillageDate = 10-apr
              Fraction = 0.05
              Depth = 150
              script: same as in 5x5x5.2019.CS19.Base2019.Field.FallTillage
            Manager FallTillage
              TillageDate = 12-nov
              Fraction = 0.05
              Depth = 150
              script: same as in 5x5x5.2019.CS19.Base2019.Field.FallTillage
            Report Report_Harvest: same as 5x5x5.2019.CS19.Base2019.Field.Report_Harvest
            Soil: SoilType=Nicollet; NearestTown=Ames; Region=Boone; State=Iowa; Country=US; ApsoilNumber=34; Latitude=42.02204; Longitude=-93.769115; DataSource=mesured data and web soil survey; Comments=hydrological parameters and BD from Saxton and Rawls, 2006
              Physical: same as 5x5x5.2019.CS19.Base2019.Field.Soil.Physical
              Organic: same as 5x5x5.2019.CS19.Base2019.Field.Soil.Organic
              Chemical: same as 5x5x5.2019.CS19.Base2019.Field.Soil.Chemical
              Water: FilledFromTop=false
                Thickness=[25, 25, 50, 100, 100, 150, 150, 150, 150, 150, 150, 300, 300, 300, 300, 300, 300, 300, 300, 300]
                InitialValues=[0.31, 0.31, 0.3, 0.25, 0.22, 0.21, 0.22, 0.265, 0.261, 0.253, 0.2, 0.393, 0.285, 0.273, 0.263, 0.254, 0.246, 0.24, 0.234, 0.23]
              Nutrient
              Solute NO3: InitialValuesUnits=kg/ha; WaterTableConcentration=0; D0=0; DepthConstant=0; MaxDepthSoluteAccessible=0; RunoffEffectivenessAtMovingSolute=0; MaxEffectiveRunoff=0
                Thickness  InitialValues  Exco  FIP
                25         6.9355         0     1
                25         6.76715        0     1
                50         6.76715        0     1
                100        6.6833         0     1
                100        5.5315         0     1
                150        5.4756         0     1
                150        2.7235         0     1
                150        2.7235         0     1
                150        0.6877         0     1
                150        0.6877         0     1
                150        0.6877         0     1
                300        0.6877         0     1
                300        0.6877         0     1
                300        0.6877         0     1
                300        0.6877         0     1
                300        0.585          0     1
                300        0.585          0     1
                300        0.585          0     1
                300        0.585          0     1
                300        0.585          0     1
              Solute NH4: InitialValuesUnits=kg/ha; WaterTableConcentration=1; D0=0; DepthConstant=0; MaxDepthSoluteAccessible=0; RunoffEffectivenessAtMovingSolute=0; MaxEffectiveRunoff=0
                Thickness  InitialValues  Exco  FIP
                25         6.9355         1     1
                25         6.76715        1     1
                50         6.76715        1     1
                100        6.6833         1     1
                100        5.5315         1     1
                150        5.4756         1     1
                150        2.7235         1     1
                150        2.7235         1     1
                150        0.6877         1     1
                150        0.6877         1     1
                150        0.6877         1     1
                300        0.6877         1     1
                300        0.6877         1     1
                300        0.6877         1     1
                300        0.6877         1     1
                300        0.585          1     1
                300        0.585          1     1
                300        0.585          1     1
                300        0.585          1     1
                300        0.585          1     1
              Solute Urea: same as 5x5x5.2019.CS19.Base2019.Field.Soil.Urea
              Swim3 Swim: same as 5x5x5.2019.CS19.Base2019.Field.Soil.Swim
              SoilTemperature
                Thickness=[25, 25, 50, 100, 100, 150, 150, 150, 150, 150, 150, 300, 300, 300, 300, 300, 300, 300, 300, 300]
                InitialValues=[10, 10, 10, 10, 10, 10, 10, 10, 10, 10, 10, 10, 10, 10, 10, 10, 10, 10, 10, 10]
            Manager SWIMSetLowerBC: same as 5x5x5.2019.CS19.Base2019.Field.SWIMSetLowerBC
            Manager ExtraVariables
```csharp
using APSIM.Core;
using Models.Climate;
using APSIM.Shared.Utilities;
using System.Xml.Serialization;
using Models;
using Models.PMF;
using Models.Soils.Nutrients;
using Models.Soils;
using System.Text;
using System.Collections.Generic;
using Models.Core;
using System;
using Newtonsoft.Json;

namespace Models
{
    [Serializable] 
    public class Script : Model, IStructureDependency
    {
        [Link] private Clock Clock;
        [Link] private Soils.Soil Soil;
        [Link] private Models.Surface.SurfaceOrganicMatter SOM;
        [Link] private Weather Met;
        [Link] private Fertiliser Fert;
        [Link] private Plant Maize;
        [Link] private Zone zone;
        public IStructure Structure { private get; set; }
                    
        [JsonIgnore] public bool InitialDay { get; set; }
        [JsonIgnore] public double LeafExpandedPosition { get; set; }
        [JsonIgnore] public double LeafAppearedPosition { get; set; }
        [JsonIgnore] public double ExpandedLeafNoYesterday { get; set; }
        [JsonIgnore] public double AppearedLeafNoYesterday { get; set; }
        [JsonIgnore] public double MostRecentlyExpandedLeafSize { get; set; }
        [JsonIgnore] public double MostRecentlyAppearedLeafMaxSize { get; set; }
        

        

        [EventSubscribe("StartOfSimulation")]
        private void OnSimulationCommencing(object sender, EventArgs e)
        {
            InitialDay = true;
            LeafExpandedPosition = 0;
            LeafAppearedPosition = 0;
            ExpandedLeafNoYesterday = 0;
            AppearedLeafNoYesterday = 0;
            MostRecentlyExpandedLeafSize = 0;
            MostRecentlyAppearedLeafMaxSize = 0;
        }
        
        [EventSubscribe("DoManagement")]
        private void OnDoManagement(object sender, EventArgs e)
        {
        }
        
        [EventSubscribe("DoManagementCalculations")]
        private void OnDoManagementCalculations(object sender, EventArgs e)
        {
           
            if (Convert.ToDouble(Structure.Get("Maize.Leaf.ExpandedCohortNo", relativeTo: zone)) > ExpandedLeafNoYesterday)
            {
                LeafExpandedPosition = Convert.ToDouble(Structure.Get("Maize.Leaf.ExpandedCohortNo", relativeTo: zone));
                MostRecentlyExpandedLeafSize = (double)Structure.Get("Maize.Leaf.CohortSize[" + (int)LeafExpandedPosition + "]", relativeTo: zone);
            }
             
            if (Convert.ToDouble(Structure.Get("Maize.Leaf.AppearedCohortNo", relativeTo: zone)) > AppearedLeafNoYesterday)
            {
                LeafAppearedPosition = Convert.ToDouble(Structure.Get("Maize.Leaf.AppearedCohortNo", relativeTo: zone));
                MostRecentlyAppearedLeafMaxSize = (double)Structure.Get("Maize.Leaf.CohortParameters.MaxArea.Value()", relativeTo: zone);
            }

        }
    }
}
```
            Report TimeSeries: same as Replacements.TimeSeries
    Folder 2022_CS
      Experiment CS22
        Factors: same as 5x5x5.2021_CC.CC21.Factors
        Simulation Base2022_CS
          Clock: Start=2021-11-01; End=2022-12-31
          Summary SummaryFile
          Weather: FileName=Ames.2024.02.08.met
          SoilArbitrator Soil Arbitrator
          Zone Field: Area=1; Slope=0; AspectAngle=0; Altitude=50
            Fertiliser
            SurfaceOrganicMatter: InitialResidueName=soybean; InitialResidueType=soybean; InitialResidueMass=3000; InitialStandingFraction=0; InitialCPR=0; InitialCNR=65
            MicroClimate: a_interception=0; b_interception=1; c_interception=0; d_interception=0; SoilHeatFluxFraction=0.4; MinimumHeightDiffForNewLayer=0; NightInterceptionFraction=0.5; ReferenceHeight=2
            Plant Maize
            Manager FertiliseRule: same as 5x5x5.2022_CC.CC22.Base2022_CC.Field.FertiliseRule
            Manager Sowing: same as 5x5x5.2022_CC.CC22.Base2022_CC.Field.Sowing
            Manager Harvesting: same as 5x5x5.2019.CS19.Base2019.Field.Harvesting
            Manager SpringTillage: same as 5x5x5.2021_CC.CC21.Base2021_CC.Field.SpringTillage
            Manager FallTillage: same as 5x5x5.2019.CS19.Base2019.Field.FallTillage
            Report Report_Harvest: same as 5x5x5.2019.CS19.Base2019.Field.Report_Harvest
            Soil: SoilType=Nicollet; NearestTown=Ames; Region=Boone; State=Iowa; Country=US; ApsoilNumber=34; Latitude=42.02204; Longitude=-93.769115; DataSource=mesured data and web soil survey; Comments=hydrological parameters and BD from Saxton and Rawls, 2006
              Physical: same as 5x5x5.2019.CS19.Base2019.Field.Soil.Physical
              Organic: same as 5x5x5.2019.CS19.Base2019.Field.Soil.Organic
              Chemical: same as 5x5x5.2019.CS19.Base2019.Field.Soil.Chemical
              Water: FilledFromTop=false
                Thickness=[25, 25, 50, 100, 100, 150, 150, 150, 150, 150, 150, 300, 300, 300, 300, 300, 300, 300, 300, 300]
                InitialValues=[0.31, 0.31, 0.3, 0.25, 0.22, 0.21, 0.22, 0.265, 0.261, 0.253, 0.2, 0.393, 0.285, 0.273, 0.263, 0.254, 0.246, 0.24, 0.234, 0.23]
              Nutrient
              Solute NO3: InitialValuesUnits=kg/ha; WaterTableConcentration=0; D0=0; DepthConstant=0; MaxDepthSoluteAccessible=0; RunoffEffectivenessAtMovingSolute=0; MaxEffectiveRunoff=0
                Thickness  InitialValues  Exco  FIP
                25         7.41           0     1
                25         7.23           0     1
                50         7.23           0     1
                100        7.14           0     1
                100        5.91           0     1
                150        5.85           0     1
                150        2.91           0     1
                150        2.91           0     1
                150        0.735          0     1
                150        0.735          0     1
                150        0.735          0     1
                300        0.735          0     1
                300        0.735          0     1
                300        0.735          0     1
                300        0.735          0     1
                300        0.625          0     1
                300        0.625          0     1
                300        0.625          0     1
                300        0.625          0     1
                300        0.625          0     1
              Solute NH4: InitialValuesUnits=kg/ha; WaterTableConcentration=1; D0=0; DepthConstant=0; MaxDepthSoluteAccessible=0; RunoffEffectivenessAtMovingSolute=0; MaxEffectiveRunoff=0
                Thickness  InitialValues  Exco  FIP
                25         7.41           1     1
                25         7.23           1     1
                50         7.23           1     1
                100        7.14           1     1
                100        5.91           1     1
                150        5.85           1     1
                150        2.91           1     1
                150        2.91           1     1
                150        0.735          1     1
                150        0.735          1     1
                150        0.735          1     1
                300        0.735          1     1
                300        0.735          1     1
                300        0.735          1     1
                300        0.735          1     1
                300        0.625          1     1
                300        0.625          1     1
                300        0.625          1     1
                300        0.625          1     1
                300        0.625          1     1
              Solute Urea: same as 5x5x5.2019.CS19.Base2019.Field.Soil.Urea
              Swim3 Swim: same as 5x5x5.2019.CS19.Base2019.Field.Soil.Swim
              SoilTemperature
                Thickness=[25, 25, 50, 100, 100, 150, 150, 150, 150, 150, 150, 300, 300, 300, 300, 300, 300, 300, 300, 300]
                InitialValues=[10, 10, 10, 10, 10, 10, 10, 10, 10, 10, 10, 10, 10, 10, 10, 10, 10, 10, 10, 10]
            Manager SWIMSetLowerBC: same as 5x5x5.2019.CS19.Base2019.Field.SWIMSetLowerBC
            Manager ExtraVariables: same as 5x5x5.2022_CC.CC22.Base2022_CC.Field.ExtraVariables
            Report TimeSeries: same as Replacements.TimeSeries
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