Simulations: Version=213
  DataStore
    Observations: FileNames=[Obs Ear Manipulation.xlsx]; SheetNames=[Obs_Brazil, Obs_USA, Obs_NZ, At_Harvest]
      ColumnNames=[Sowing, Stage, Treatment, Clock.Today, Location, Country, Cultivar, Experiment2, id, Maize.DaysAfterSowing, Maize.Leaf.Live.Wt, Maize.Leaf.Dead.Wt, Maize.Leaf.Wt, Maize.Stem.Wt, Tassel, Maize.Cob.Wt, Maize.Grain.Wt, Maize.GrainPlusCob.Wt, Husk, Shank, Maize.AboveGround.Wt, Maize.Grain.Number, Maize.Leaf.LAI, Maize.Grain.Size]
    PredictedObserved Pred_Obs_Brazil: PredictedTableName=ReportWt; ObservedTableName=Obs_Brazil; FieldNameUsedForMatch=SimulationName; FieldName2UsedForMatch=Clock.Today; AllColumns=false
    PredictedObserved Pred_Obs_NZ: PredictedTableName=ReportWt; ObservedTableName=Obs_NZ; FieldNameUsedForMatch=SimulationName; FieldName2UsedForMatch=Clock.Today; AllColumns=false
    PredictedObserved Pred_Obs_USA: PredictedTableName=ReportWt; ObservedTableName=Obs_USA; FieldNameUsedForMatch=SimulationName; FieldName2UsedForMatch=Clock.Today; AllColumns=false
    PredictedObserved: PredictedTableName=ReportWt; ObservedTableName=At_Harvest; FieldNameUsedForMatch=SimulationName; FieldName2UsedForMatch=Clock.Today; AllColumns=true
  Folder Replacements
    Report ReportWt: EventNames=[Clock].DoReport
      VariableNames:
        [Clock].Today
        [Clock].Today.DayOfYear
        [Maize].DaysAfterSowing
        [Maize].Phenology.CurrentStageName
        [Maize].Phenology.Stage
        [Maize].Phenology.FloweringDAS
        [Maize].Phenology.MaturityDAS
        [Maize].AboveGround.Wt
        [Maize].Leaf.LAI
        [Maize].Grain.Wt
        [Maize].Grain.N
        [Maize].Grain.Size
        [Maize].Grain.Number
        [Maize].Leaf.Live.Wt
        [Maize].Leaf.Live.N
        [Maize].Leaf.Dead.Wt
        [Maize].Leaf.Dead.N
        [Maize].Leaf.Wt
        [Maize].Stem.Wt
        [Maize].Stem.N
        [Structure].TotalStemPopn
        [Maize].Cob.Wt
        [Maize].Cob.N
        [Maize].Cob.CobNumber
        Divide([Maize].Grain.Number,[Maize].Cob.CobNumber) as GrainsPerCob
        [Maize].GrainPlusCob.Wt
        [Maize].Cob.CobSize
        [Maize].Grain.Number
        [Maize].Root.Depth
        [Maize].Root.Live.Wt
        [Maize].Root.Wt
        [Weather].Rain
        [Weather].MeanT
        [Weather].MaxT
        [Weather].MinT
        [Weather].Radn
        [Weather].VPD
        [Field].Irrigation.IrrigationApplied
        [Field].Fertiliser.NitrogenApplied
  Folder EarManipulation
    Folder BR_2021
      Simulation Ctrl_BR
        Clock: Start=2021-02-02; End=2021-10-10
        Summary SummaryFile
        Weather: FileName=goias.nasa.met
        SoilArbitrator Soil Arbitrator
        Zone Field: Area=1; Slope=0; AspectAngle=0; Altitude=50
          Fertiliser
          SurfaceOrganicMatter: InitialResidueName=maize; InitialResidueType=maize; InitialResidueMass=8000; InitialStandingFraction=0; InitialCPR=0; InitialCNR=70
          MicroClimate: a_interception=0; b_interception=1; c_interception=0; d_interception=0; SoilHeatFluxFraction=0.4; MinimumHeightDiffForNewLayer=0; NightInterceptionFraction=0.5; ReferenceHeight=2
          Plant Maize
          Operations
            2021-04-13  [Fertiliser].Apply(220, "UreaN", 50);
            2021-03-28  [Irrigation].Apply(8)
            2021-03-29  [Irrigation].Apply(9)
            2021-03-30  [Irrigation].Apply(9)
            2021-04-05  [Irrigation].Apply(39.5)
            2021-04-07  [Irrigation].Apply(4.5)
            2021-04-16  [Irrigation].Apply(12)
            2021-04-18  [Irrigation].Apply(6.5)
            2021-04-19  [Irrigation].Apply(3)
            2021-04-21  [Irrigation].Apply(15.5)
            2021-04-22  [Irrigation].Apply(0.5)
            2021-04-25  [Irrigation].Apply(15)
            2021-04-28  [Irrigation].Apply(15)
            2021-04-30  [Irrigation].Apply(34)
            2021-05-05  [Irrigation].Apply(10)
            2021-05-06  [Irrigation].Apply(0.5)
            2021-05-07  [Irrigation].Apply(19.5)
            2021-05-11  [Irrigation].Apply(16.5)
            2021-05-17  [Irrigation].Apply(9.5)
            2021-05-18  [Irrigation].Apply(8)
            2021-05-22  [Irrigation].Apply(10.5)
            2021-05-23  [Irrigation].Apply(9)
            2021-05-24  [Irrigation].Apply(0.5)
            2021-05-28  [Irrigation].Apply(8)
            2021-05-29  [Irrigation].Apply(8.5)
            2021-06-02  [Irrigation].Apply(8.5)
            2021-06-05  [Irrigation].Apply(8)
            2021-06-09  [Irrigation].Apply(9.5)
            2021-06-12  [Irrigation].Apply(9.5)
            2021-06-15  [Irrigation].Apply(4)
            2021-06-16  [Irrigation].Apply(9.5)
            2021-06-21  [Irrigation].Apply(9.5)
            2021-06-26  [Irrigation].Apply(10)
            2021-06-30  [Irrigation].Apply(7.5)
            2021-07-05  [Irrigation].Apply(8.5)
          Irrigation
          Manager Sow on a fixed date
            Crop = [Maize]
            SowDate = 24-Mar
            CultivarName = AG7800
            SowingDepth = 50
            RowSpacing = 500
            Population = 6
```csharp
using APSIM.Shared.Utilities;
using Models.Utilities;
using Models.Soils;
using Models.PMF;
using Models.Core;
using System;

namespace Models
{
    [Serializable]
    public class Script : Model
    {
        [Link] Clock Clock;
        [Link] Fertiliser Fertiliser;
        [Link] Summary Summary;
        [Link] Soil Soil;
        
        [Description("Crop")]
        public IPlant Crop { get; set; }

        [Description("Sowing date (d-mmm)")]
        public string SowDate { get; set; }

        [Display(Type = DisplayType.CultivarName)]
        [Description("Cultivar to be sown")]
        public string CultivarName { get; set; }

        [Description("Sowing depth (mm)")]
        public double SowingDepth { get; set; }

        [Description("Row spacing (mm)")]
        public double RowSpacing { get; set; }

        [Description("Plant population (/m2)")]
        public double Population { get; set; }

        [EventSubscribe("DoManagement")]
        private void OnDoManagement(object sender, EventArgs e)
        {
            if (DateUtilities.WithinDates(SowDate, Clock.Today, SowDate))
            {
                Crop.Sow(population: Population, cultivar: CultivarName, depth: SowingDepth, rowSpacing: RowSpacing);    
            }
        }
    }
}
```
          Manager Harvesting
            Crop = [Maize]
```csharp
using APSIM.Shared.Utilities;
using Models.Utilities;
using Models.Soils;
using Models.PMF;
using Models.Core;
using System;
using System.Linq;

namespace Models
{
    [Serializable] 
    public class Script : Model
    {
        [Description("Crop")]
        public IPlant Crop { get; set; }
        
        [EventSubscribe("DoManagement")]
        private void OnDoManagement(object sender, EventArgs e)
        {
            if (Crop.IsReadyForHarvesting)
            {
                Crop.Harvest();
                Crop.EndCrop();
            }
        }
    }
}
```
          Soil: ASCOrder=NA; ASCSubOrder=NA; SoilType=Haplic Ferralsols; Site=NA; NearestTown=NA; Region=NA; State=NA; Country=Brazil; NaturalVegetation=NA; ApsoilNumber=9999; Latitude=-16.125; Longitude=-49.625; LocationAccuracy=+- 250 m; YearOfSampling=2019; DataSource=ISRIC SoilGrids
            Physical
              Thickness  ParticleSizeSand  ParticleSizeSilt  ParticleSizeClay  BD     AirDry  LL15  DUL    SAT    KS
              150        45.7              20.7              33.3              1.222  0.073   0.18  0.337  0.487  200
              150        44                20                36                1.278  0.073   0.18  0.33   0.47   200
              150        42.2              19.5              39                1.284  0.19    0.19  0.333  0.473  200
              150        40.8              18.5              41                1.278  0.2     0.2   0.339  0.477  200
              200        40                18                42.2              1.276  0.21    0.21  0.342  0.48   150
              200        40                18                42.8              1.277  0.23    0.23  0.342  0.48   150
              200        40                18                42.9              1.278  0.23    0.23  0.342  0.48   100
              200        40                18                42.7              1.279  0.23    0.23  0.342  0.48   100
              300        40                18                42.4              1.281  0.23    0.23  0.342  0.48   100
              300        40                18                42.1              1.283  0.23    0.23  0.342  0.48   100
              400        40                18                42.9              1.281  0.23    0.23  0.342  0.48   50
              400        40                18                42.7              1.283  0.23    0.23  0.342  0.48   25
              400        40                18                42.4              1.281  0.23    0.23  0.342  0.48   12.5
              400        40                18                42.1              1.283  0.23    0.23  0.342  0.48   6
              SoilCrop MaizeSoil
                LL=[0.18, 0.18, 0.19, 0.2, 0.21, 0.23, 0.23, 0.23, 0.23, 0.23, 0.23, 0.23, 0.23, 0.23]
                KL=[0.08, 0.08, 0.08, 0.08, 0.08, 0.08, 0.07, 0.05, 0.04, 0.03, 0.03, 0.03, 0.03, 0.03]
                XF=[1, 1, 1, 1, 1, 1, 1, 1, 1, 1, 0, 0, 0, 0]
            Water: FilledFromTop=true
              Thickness=[150, 150, 150, 150, 200, 200, 200, 200, 300, 300, 400, 400, 400, 400]
              InitialValues=[0.337, 0.33, 0.333, 0.339, 0.342, 0.342, 0.342, 0.342, 0.342, 0.342, 0.342, 0.342, 0.342, 0.342]
            Organic: FOMCNRatio=40; CarbonUnits=Total
              Thickness  Carbon  SoilCNRatio  FBiom  FInert  FOM
              150        1.76    11.1         0.04   0.362   109.159
              150        1.076   11.1         0.031  0.567   87.165
              150        0.826   11.1         0.014  0.735   69.603
              150        0.704   11.1         0.01   0.866   55.579
              200        0.592   11.1         0.01   0.99    41.174
              200        0.49    11.1         0.01   0.99    30.502
              200        0.43    11.1         0.01   0.99    22.597
              200        0.414   11.1         0.01   0.99    16.74
              300        0.394   11.1         0.01   0.99    10.674
              300        0.37    11.1         0.01   0.99    6.806
              400        0.1     11           0.01   0.99    1
              400        0.1     11           0.01   0.99    1
              400        0.1     11           0.01   0.99    1
              400        0.1     11           0.01   0.99    1
            Chemical: PHUnits=Water
              Thickness=[150, 150, 150, 150, 200, 200, 200, 200, 300, 300, 400, 400, 400, 400]
              PH=[5.6, 5.6, 5.62, 5.68, 5.7, 5.7, 5.7, 5.7, 5.7, 5.7, 6, 6, 6, 6]
            Nutrient
            Solute NO3: InitialValuesUnits=kg/ha; WaterTableConcentration=7; D0=0; DepthConstant=0; MaxDepthSoluteAccessible=0; RunoffEffectivenessAtMovingSolute=0; MaxEffectiveRunoff=0
              Thickness  InitialValues  Exco  FIP
              150        15             0     1
              150        15             0     1
              150        15             0     1
              150        15             0     1
              200        15             0     1
              200        1              0     1
              200        1              0     1
              200        1              0     1
              300        1              0     1
              300        1              0     1
              400        1              0     1
              400        1              0     1
              400        1              0     1
              400        1              0     1
            Solute NH4: InitialValuesUnits=kg/ha; WaterTableConcentration=1; D0=0; DepthConstant=0; MaxDepthSoluteAccessible=0; RunoffEffectivenessAtMovingSolute=0; MaxEffectiveRunoff=0
              Thickness  InitialValues  Exco  FIP
              150        10             1     1
              150        10             1     1
              150        10             1     1
              150        10             1     1
              200        10             1     1
              200        1              1     1
              200        1              1     1
              200        1              1     1
              300        1              1     1
              300        1              1     1
              400        1              1     1
              400        1              1     1
              400        1              1     1
              400        1              1     1
            Solute Urea: InitialValuesUnits=kg/ha; WaterTableConcentration=0; D0=0; DepthConstant=0; MaxDepthSoluteAccessible=0; RunoffEffectivenessAtMovingSolute=0; MaxEffectiveRunoff=0
              Thickness  InitialValues  Exco  FIP
              150        0              0     1
              150        0              0     1
              150        0              0     1
              150        0              0     1
              200        0              0     1
              200        0              0     1
              200        0              0     1
              200        0              0     1
              300        0              0     1
              300        0              0     1
              400        0              0     1
              400        0              0     1
              400        0              0     1
              400        0              0     1
            Swim3 Swim: Salb=0.13; CN2Bare=65; CNRed=20; CNCov=0.8; KDul=0.25; PSIDul=-250; VC=true; DTMin=0; DTMax=1440; MaxWaterIncrement=10; SpaceWeightingFactor=0; SoluteSpaceWeightingFactor=0; Dis=15; Disp=0.75; A=1; DTHC=0; DTHP=1; vcon1=7.28e-09; vcon2=7.26e-07; eo_time=06:00; eo_durn=720; default_rain_time=00:00; default_rain_duration=720; Diagnostics=false
            SoilTemperature CERESSoilTemperature
          Report ReportWt: EventNames=[Clock].DoReport
            VariableNames:
              [Clock].Today
              [Clock].Today.DayOfYear
              [Maize].DaysAfterSowing
              [Maize].Phenology.CurrentStageName
              [Maize].Phenology.Stage
              [Maize].Phenology.FloweringDAS
              [Maize].Phenology.MaturityDAS
              [Maize].AboveGround.Wt
              [Maize].Leaf.LAI
              [Maize].Grain.Wt
              [Maize].Grain.N
              [Maize].Grain.Size
              [Maize].Grain.Number
              [Maize].Leaf.Live.Wt
              [Maize].Leaf.Live.N
              [Maize].Leaf.Dead.Wt
              [Maize].Leaf.Dead.N
              [Maize].Leaf.Wt
              [Maize].Stem.Wt
              [Maize].Stem.N
              [Structure].TotalStemPopn
              [Maize].Cob.Wt
              [Maize].Cob.N
              [Maize].Cob.CobNumber
              Divide([Maize].Grain.Number,[Maize].Cob.CobNumber) as GrainsPerCob
              [Maize].Cob.Wt + [Maize].Grain.Wt as EarWt
              [Maize].Cob.CobSize
              [Maize].Grain.Number
              [Maize].Root.Depth
              [Maize].Root.Live.Wt
              [Maize].Root.Wt
              [Weather].Rain
              [Weather].MeanT
              [Weather].MaxT
              [Weather].MinT
              [Weather].Radn
              [Weather].VPD
              [Field].Irrigation.IrrigationApplied
              [Field].Fertiliser.NitrogenApplied
          Report ReportSoil: EventNames=[Clock].DoReport
            VariableNames:
              [Clock].Today
              [Clock].Today.DayOfYear
              [Maize].DaysAfterSowing
              [Maize].Phenology.CurrentStageName
              [Maize].Phenology.Stage
              [Maize].Phenology.FloweringDAS as DTF
              [Maize].Phenology.MaturityDAS  as DTM
              sum([ISoilWater].SWmm[1]) as SW_10cm
              sum([ISoilWater].SWmm[2]) as SW_20cm
              sum([ISoilWater].SWmm[2:3])*0.5 as SW_30cm
              sum([ISoilWater].SWmm[4]) as SW_50cm
      Simulation EarCovr_BR
        Clock: Start=2021-02-02; End=2021-10-10
        Summary SummaryFile
        Weather: FileName=goias.nasa.met
        SoilArbitrator Soil Arbitrator
        Zone Field: Area=1; Slope=0; AspectAngle=0; Altitude=50
          Fertiliser
          SurfaceOrganicMatter: InitialResidueName=maize; InitialResidueType=maize; InitialResidueMass=8000; InitialStandingFraction=0; InitialCPR=0; InitialCNR=70
          MicroClimate: a_interception=0; b_interception=1; c_interception=0; d_interception=0; SoilHeatFluxFraction=0.4; MinimumHeightDiffForNewLayer=0; NightInterceptionFraction=0.5; ReferenceHeight=2
          Plant Maize
          Operations: same as EarManipulation.BR_2021.Ctrl_BR.Field.Operations
          Irrigation
          Manager Sow on a fixed date: same as EarManipulation.BR_2021.Ctrl_BR.Field.Sow on a fixed date
          Manager Harvesting: same as EarManipulation.BR_2021.Ctrl_BR.Field.Harvesting
          Soil: ASCOrder=NA; ASCSubOrder=NA; SoilType=Haplic Ferralsols; Site=NA; NearestTown=NA; Region=NA; State=NA; Country=Brazil; NaturalVegetation=NA; ApsoilNumber=9999; Latitude=-16.125; Longitude=-49.625; LocationAccuracy=+- 250 m; YearOfSampling=2019; DataSource=ISRIC SoilGrids
            Physical: same as EarManipulation.BR_2021.Ctrl_BR.Field.Soil.Physical
            Water: FilledFromTop=true
              Thickness=[150, 150, 150, 150, 200, 200, 200, 200, 300, 300, 400, 400, 400, 400]
              InitialValues=[0.337, 0.33, 0.333, 0.339, 0.342, 0.342, 0.342, 0.342, 0.342, 0.342, 0.342, 0.342, 0.342, 0.342]
            Organic: same as EarManipulation.BR_2021.Ctrl_BR.Field.Soil.Organic
            Chemical: same as EarManipulation.BR_2021.Ctrl_BR.Field.Soil.Chemical
            Nutrient
            Solute NO3: same as EarManipulation.BR_2021.Ctrl_BR.Field.Soil.NO3
            Solute NH4: same as EarManipulation.BR_2021.Ctrl_BR.Field.Soil.NH4
            Solute Urea: same as EarManipulation.BR_2021.Ctrl_BR.Field.Soil.Urea
            Swim3 Swim: same as EarManipulation.BR_2021.Ctrl_BR.Field.Soil.Swim
            SoilTemperature CERESSoilTemperature
          Report ReportWt: same as EarManipulation.BR_2021.Ctrl_BR.Field.ReportWt
          Manager RemoveGrain
            GrainNum = 15
            SetGrainNum = True
```csharp
using APSIM.Core;
using System.Diagnostics;
using Newtonsoft.Json;
using System;
using Models.Core;
using System.Collections.Generic;
using System.Text;
using Models.PMF;
using Models;
using System.Xml.Serialization;
using APSIM.Shared.Utilities;
using System.Data;
using Models.Soils;

namespace Models
{
    [Serializable] 
    //[System.Xml.Serialization.XmlInclude(typeof(Model))]
    public class Script : Model, IStructureDependency
    {
        [Link] private Clock clock;
        [Link] private Zone zone;
        [Link] private Simulation Simulation;
        public IStructure Structure { private get; set; }
        
        [Description("Grain Number to set per cob")]
        public  double GrainNum { get; set; }
        [Description("Is grain number set ?")]
        public bool SetGrainNum { get; set; }
           

        

        [EventSubscribe("StartOfDay")]
        private void OnStartOfDay(object sender, EventArgs e)
        {
            if (clock.Today == DateTime.Parse("1/11/2021"));
            {
                if (SetGrainNum)
                {
                    object GrainNumValue = GrainNum;
                    Structure.Set("Maize.Grain.MaximumGrainsPerCob.FixedValue", GrainNumValue, relativeTo: zone);  
                }
            }
        }
    }
}
```
      Simulation 1dayPolin_BR
        Clock: Start=2021-02-02; End=2021-10-10
        Summary SummaryFile
        Weather: FileName=goias.nasa.met
        SoilArbitrator Soil Arbitrator
        Zone Field: Area=1; Slope=0; AspectAngle=0; Altitude=50
          Fertiliser
          SurfaceOrganicMatter: InitialResidueName=maize; InitialResidueType=maize; InitialResidueMass=8000; InitialStandingFraction=0; InitialCPR=0; InitialCNR=70
          MicroClimate: a_interception=0; b_interception=1; c_interception=0; d_interception=0; SoilHeatFluxFraction=0.4; MinimumHeightDiffForNewLayer=0; NightInterceptionFraction=0.5; ReferenceHeight=2
          Plant Maize
          Operations: same as EarManipulation.BR_2021.Ctrl_BR.Field.Operations
          Irrigation
          Manager Sow on a fixed date: same as EarManipulation.BR_2021.Ctrl_BR.Field.Sow on a fixed date
          Manager Harvesting: same as EarManipulation.BR_2021.Ctrl_BR.Field.Harvesting
          Soil: same as EarManipulation.BR_2021.EarCovr_BR.Field.Soil
          Report ReportWt: same as EarManipulation.BR_2021.Ctrl_BR.Field.ReportWt
          Manager RemoveGrain
            GrainNum = 350
            SetGrainNum = True
            script: same as in EarManipulation.BR_2021.EarCovr_BR.Field.RemoveGrain
      Simulation LeafRemvR2_BR
        Clock: Start=2021-02-02; End=2021-10-10
        Summary SummaryFile
        Weather: FileName=goias.nasa.met
        SoilArbitrator Soil Arbitrator
        Zone Field: Area=1; Slope=0; AspectAngle=0; Altitude=50
          Fertiliser
          SurfaceOrganicMatter: InitialResidueName=maize; InitialResidueType=maize; InitialResidueMass=8000; InitialStandingFraction=0; InitialCPR=0; InitialCNR=70
          MicroClimate: a_interception=0; b_interception=1; c_interception=0; d_interception=0; SoilHeatFluxFraction=0.4; MinimumHeightDiffForNewLayer=0; NightInterceptionFraction=0.5; ReferenceHeight=2
          Plant Maize
          Operations: same as EarManipulation.BR_2021.Ctrl_BR.Field.Operations
          Irrigation
          Manager Sow on a fixed date: same as EarManipulation.BR_2021.Ctrl_BR.Field.Sow on a fixed date
          Manager Harvesting: same as EarManipulation.BR_2021.Ctrl_BR.Field.Harvesting
          Soil: same as EarManipulation.BR_2021.EarCovr_BR.Field.Soil
          Manager RemoveStuff
            TargetPlant = [Maize]
            Organ = Leaf
            ToRemove = 1
            Date = 5-Jun
```csharp
using APSIM.Core;
using APSIM.Shared.Utilities;
using Models.PMF.Interfaces;
using Models.PMF;
using Models.Interfaces;
using Models.Core;
using System;

namespace Models;

[Serializable]
public class Script : Model, IStructureDependency
{
        [Link] private IClock Clock;
        [Link] private ISummary Summary;
        private IHasDamageableBiomass theOrgan;
        
        public IStructure Structure { private get; set; }
    
    [Description("What crop.")]
    public IPlant TargetPlant { get; set; }
    
    [Description("Remove what Organ?")]
    public string Organ { get; set; }
    
    [Description("Removal amount.")]
    public double ToRemove { get; set; }
    
    [Description("Date to remove on (dd-mmm).")]
    public string Date { get; set; }
    
    [EventSubscribe("StartOfSimulation")]
    private void OnStartOfSimulation(object sender, EventArgs e)
    {
            theOrgan =   Structure.FindChild<IHasDamageableBiomass>(Organ, relativeTo: (INodeModel)TargetPlant);
            if (theOrgan is null)
                throw new Exception("Could not link organ!");
    }
    
    [EventSubscribe("DoManagement")]
    private void DoDailyCalculations(object sender, EventArgs e)
    {
        if (DateUtilities.DatesAreEqual(Date, Clock.Today))
        {
            theOrgan.RemoveBiomass(liveToRemove: 0.0, 
                                   deadToRemove: 0.0, 
                                   liveToResidue: ToRemove, 
                                   deadToResidue: ToRemove);
        }
    }
}
```
          Report ReportWt: same as EarManipulation.BR_2021.Ctrl_BR.Field.ReportWt
    Folder US_2021
      Folder Dekalb
        Simulation Ctrl_D_US21
          Clock: Start=2021-04-04; End=2021-11-11
          Summary SummaryFile
          Weather: FileName=Ames.2022.11.29.met
          SoilArbitrator Soil Arbitrator
          Zone Field: Area=1; Slope=0; AspectAngle=0; Altitude=50
            Fertiliser
            Soil: SoilType=Nicollet; NearestTown=Ames; Region=Boone; State=Iowa; Country=US; ApsoilNumber=34; Latitude=42.02204; Longitude=-93.769115; DataSource=mesured data and web soil survey; Comments=hydrological parameters and BD from Saxton and Rawls, 2006
              Physical
                Thickness  ParticleSizeSand  ParticleSizeSilt  ParticleSizeClay  BD    AirDry  LL15   DUL    SAT    KS
                25         41.3              29.78             28.92             1.25  0.087   0.174  0.31   0.445  146
                25         41.3              29.78             28.92             1.25  0.087   0.174  0.31   0.455  146
                50         41.3              29.78             28.92             1.25  0.087   0.174  0.3    0.42   146
                100        40.16             32.59             27.26             1.25  0.132   0.165  0.25   0.43   146
                100        37.77             33.01             29.22             1.25  0.12    0.12   0.22   0.35   146
                150        37.77             33.01             29.22             1.35  0.11    0.11   0.21   0.34   146
                150        44.39             28.07             27.54             1.35  0.102   0.102  0.22   0.33   133
                150        44.39             28.07             27.54             1.36  0.126   0.126  0.265  0.393  133
                150        49.07             28.9              22.03             1.36  0.133   0.133  0.261  0.393  133
                150        49.07             28.9              22.03             1.36  0.128   0.128  0.253  0.393  388
                150        49.07             28.9              22.03             1.6   0.128   0.128  0.2    0.393  388
                300        49.07             28.9              22.03             1.6   0.09    0.09   0.2    0.393  388
                300        49.07             28.9              22.03             1.6   0.09    0.09   0.2    0.285  54.236
                300        49.07             28.9              22.03             1.6   0.09    0.09   0.2    0.273  33.11
                300        49.07             28.9              22.03             1.6   0.09    0.09   0.2    0.263  20.213
                300        49.07             28.9              22.03             1.6   0.09    0.09   0.2    0.254  12.34
                300        49.07             28.9              22.03             1.6   0.09    0.09   0.2    0.246  7.533
                300        49.07             28.9              22.03             1.6   0.09    0.09   0.2    0.24   4.599
                300        49.07             28.9              22.03             1.6   0.09    0.09   0.2    0.234  2.808
                300        49.07             28.9              22.03             1.6   0.09    0.09   0.2    0.23   1.714
                SoilCrop MaizeSoil
                  LL=[0.174, 0.174, 0.174, 0.165, 0.12, 0.136, 0.144, 0.187, 0.198, 0.201, 0.174, 0.169, 0.179, 0.188, 0.188, 0.188, 0.188, 0.188, 0.188, 0.188]
                  KL=[0.08, 0.08, 0.08, 0.08, 0.08, 0.08, 0.08, 0.08, 0.08, 0.08, 0.08, 0.04, 0.04, 0.03, 0.02, 0.02, 0.01, 0.01, 0, 0]
                  XF=[1, 1, 1, 1, 1, 1, 1, 1, 1, 1, 1, 1, 1, 0.4, 0.4, 0, 0, 0, 0, 0]
                SoilCrop SoybeanSoil: same as EarManipulation.US_2021.Dekalb.Ctrl_D_US21.Field.Soil.Physical.MaizeSoil
              Organic: FOMCNRatio=29; CarbonUnits=Total
                Thickness  Carbon  SoilCNRatio  FBiom  FInert  FOM
                25         2.47    11           0.165  0.42    229.479
                25         2.41    11           0.165  0.42    222.697
                50         2.41    11           0.111  0.42    209.728
                100        2.38    11           0.07   0.483   186.012
                100        1.97    11           0.05   0.525   164.978
                150        1.95    11           0.038  0.803   137.801
                150        0.97    11           0.031  0.825   115.101
                150        0.97    11           0.026  0.849   96.14
                150        0.49    11           0.023  0.87    80.303
                150        0.49    11           0.02   0.999   67.075
                150        0.49    11           0.018  0.999   56.026
                300        0.49    11           0.016  0.999   12
                300        0.49    11           0.014  0.999   3
                300        0.49    11           0.013  0.999   2
                300        0.49    11           0.012  0.999   1.5
                300        0.1     11           0.011  0.999   1
                300        0.1     11           0.01   0.999   0.1
                300        0.1     11           0.009  0.999   0.1
                300        0.1     11           0.009  0.999   0.1
                300        0.1     11           0.008  0.999   0.1
              Chemical: PHUnits=Water
                Thickness  PH    CEC
                25         7.48  25.8
                25         7.48  25.8
                50         7.48  25.8
                100        7.38  25.85
                100        7.43  26.57
                150        7.43  26.57
                150        7.73  23.41
                150        7.73  23.41
                150        8.08  33.6
                150        8.08  33.6
                150        8.08  33.6
                300        8.08  33.6
                300        8.08  33.6
                300        8.08  33.6
                300        8.08  33.6
                300        8.08  33.6
                300        8.08  33.6
                300        8.08  33.6
                300        8.08  33.6
                300        8.08  33.6
              Water: FilledFromTop=false
                Thickness=[25, 25, 50, 100, 100, 150, 150, 150, 150, 150, 150, 300, 300, 300, 300, 300, 300, 300, 300, 300]
                InitialValues=[0.31, 0.31, 0.3, 0.25, 0.22, 0.21, 0.22, 0.265, 0.261, 0.253, 0.2, 0.393, 0.285, 0.273, 0.263, 0.254, 0.246, 0.24, 0.234, 0.23]
              Nutrient
              Solute NO3: InitialValuesUnits=kg/ha; WaterTableConcentration=7; D0=0; DepthConstant=0; MaxDepthSoluteAccessible=0; RunoffEffectivenessAtMovingSolute=0; MaxEffectiveRunoff=0
                Thickness  InitialValues  Exco  FIP
                25         7.04           0     1
                25         7.36           0     1
                50         4.8            0     1
                100        2.4            0     1
                100        1.6            0     1
                150        0.988          0     1
                150        0.988          0     1
                150        0.539          0     1
                150        0.539          0     1
                150        0.49           0     1
                150        0.292          0     1
                300        0.104          0     1
                300        0.188          0     1
                300        0.167          0     1
                300        0              0     1
                300        0.188          0     1
                300        0.188          0     1
                300        0.188          0     1
                300        0.167          0     1
                300        0              0     1
              Solute NH4: InitialValuesUnits=kg/ha; WaterTableConcentration=1; D0=0; DepthConstant=0; MaxDepthSoluteAccessible=0; RunoffEffectivenessAtMovingSolute=0; MaxEffectiveRunoff=0
                Thickness  InitialValues  Exco  FIP
                25         12.8           1     1
                25         12.8           1     1
                50         6.4            1     1
                100        3.2            1     1
                100        3.2            1     1
                150        1.975          1     1
                150        1.975          1     1
                150        0.49           1     1
                150        0.49           1     1
                150        0.49           1     1
                150        0.417          1     1
                300        0.063          1     1
                300        0.083          1     1
                300        0              1     1
                300        0              1     1
                300        0.083          1     1
                300        0.083          1     1
                300        0.083          1     1
                300        0              1     1
                300        0              1     1
              Solute Urea: InitialValuesUnits=kg/ha; WaterTableConcentration=0; D0=0; DepthConstant=0; MaxDepthSoluteAccessible=0; RunoffEffectivenessAtMovingSolute=0; MaxEffectiveRunoff=0
                Thickness  InitialValues  Exco  FIP
                25         0              0     1
                25         0              0     1
                50         0              0     1
                100        0              0     1
                100        0              0     1
                150        0              0     1
                150        0              0     1
                150        0              0     1
                150        0              0     1
                150        0              0     1
                150        0              0     1
                300        0              0     1
                300        0              0     1
                300        0              0     1
                300        0              0     1
                300        0              0     1
                300        0              0     1
                300        0              0     1
                300        0              0     1
                300        0              0     1
              Swim3 Swim: same as EarManipulation.BR_2021.Ctrl_BR.Field.Soil.Swim
              SoilTemperature Temperature
            SurfaceOrganicMatter: InitialResidueName=soybean; InitialResidueType=soybean; InitialResidueMass=2000; InitialStandingFraction=0; InitialCPR=0; InitialCNR=50
            MicroClimate: a_interception=0; b_interception=1; c_interception=0; d_interception=0; SoilHeatFluxFraction=0.4; MinimumHeightDiffForNewLayer=0; NightInterceptionFraction=0.5; ReferenceHeight=2
            Plant Maize
            Operations
              2021-05-12  [Fertiliser].Apply(168, "UreaN", 50);
            Irrigation
            Manager Sow on a fixed date
              Crop = [Maize]
              SowDate = 13-May
              CultivarName = DKC63
              SowingDepth = 70
              RowSpacing = 760
              Population = 8.6
              script: same as in EarManipulation.BR_2021.Ctrl_BR.Field.Sow on a fixed date
            Manager Harvesting: same as EarManipulation.BR_2021.Ctrl_BR.Field.Harvesting
            Report ReportWt: EventNames=[Clock].DoReport
              VariableNames:
                [Clock].Today
                [Clock].Today.DayOfYear
                [Maize].DaysAfterSowing
                [Maize].Phenology.CurrentStageName
                [Maize].Phenology.Stage
                [Maize].Phenology.FloweringDAS as DTF
                [Maize].Phenology.MaturityDAS  as DTM
                [Maize].AboveGround.Wt
                [Maize].Leaf.LAI
                [Maize].Grain.Wt
                [Maize].Grain.N
                [Maize].Grain.Size
                [Maize].Grain.Number
                [Maize].Leaf.Live.Wt
                [Maize].Leaf.Live.N
                [Maize].Leaf.Dead.Wt
                [Maize].Leaf.Dead.N
                [Maize].Leaf.Wt
                [Maize].Stem.Wt
                [Maize].Stem.N
                [Structure].TotalStemPopn
                [Maize].Cob.Wt
                [Maize].Cob.N
                [Maize].Cob.CobNumber
                Divide([Maize].Grain.Number,[Maize].Cob.CobNumber) as GrainsPerCob
                [Maize].Cob.Wt + [Maize].Grain.Wt as EarWt
                [Maize].Cob.CobSize
                [Maize].Grain.Number
                [Maize].Root.Depth
                [Maize].Root.Live.Wt
                [Maize].Root.Wt
            Manager SWIMSetLowerBC
              LowerBCType = potential
              LowerBCValue = 2600
```csharp
using Models.Climate;
using APSIM.Shared.Utilities;
using Models.Soils.Nutrients;
using Models.Soils;
using Models.PMF;
using Models.Core;
using System.Xml.Serialization;
using System;
using System.Linq;
using Models.AgPasture;
using Models.Interfaces;

namespace Models
{
    [Serializable] 
    [System.Xml.Serialization.XmlInclude(typeof(Model))]
    public class Script : Model
    {
        [Link] Clock clock;
        [Link] ISummary summary;
        [Link] private Swim3 swim;
        //[Link] private PastureSpecies ryegrass;
        //[Link] private SimpleGrazing grazing;
        
        public enum LowerBCTypeOptions {gradient,seepage,potential,watertable};

        [Separator("Sets the lower boundary condition type (and value if set to 'potential' for SWIM3. The change is applied at the beginning of the first day of the simulation.")]
        
        [Description("What lower boundary condition is wanted?")] public LowerBCTypeOptions LowerBCType { get; set; }


        [Display(VisibleCallback = "IsBCPotentialOrWater")]
        [Description("What should the lower BC potential be set to (should be positive for a watertable) (mm)?")] public double LowerBCValue { get; set; }
        
        public bool IsBCPotentialOrWater => LowerBCType == LowerBCTypeOptions.potential || LowerBCType == LowerBCTypeOptions.watertable;





        public double SoilWaterStart  { get; set; }
        public double SoilWaterEnd  { get; set; }

        [EventSubscribe("DoDailyInitialisation")]
        private void DoDailyInitialisation(object sender, EventArgs e)
        {
        }

        [EventSubscribe("DoReportCalculations")]
        private void DoReportCalculations(object sender, EventArgs e)
        {
        }

        [EventSubscribe("DoManagement")]
        private void DoDailyCalculations(object sender, EventArgs e)
        {
            if (clock.Today == clock.StartDate)
            {
                summary.WriteMessage(this, "Script is setting lower boundary condition to " + LowerBCType, MessageType.Diagnostic);
                if (LowerBCType == LowerBCTypeOptions.gradient)
                    swim.SetLowerBCForGradient(bbcGradient: 0.0);   // in cm/cm (ibbc=0) Note that this is the default setting
                else if (LowerBCType == LowerBCTypeOptions.potential)
                    swim.SetLowerBCForGivenPotential(bbcPotential: LowerBCValue /10.0 );    //  convert to cm (ibbc=1), DUL is -100 cm so values more positive will often result in inflow to the bottom of the soil profile. Input in mm so divide here.
                else if (LowerBCType == LowerBCTypeOptions.seepage)
                    swim.SetLowerBCForSeepage(bbcPotentialSeepage: 0.0);  // in cm (ibbc=3). This is for zero-tension lysimeters
                else if (LowerBCType == LowerBCTypeOptions.watertable)
                    swim.SetLowerBCForSeepage(LowerBCValue / 10.0);  // in cm (ibbc=4). This is for water tables
                else
                    throw new Exception("Wrong lower boundary condition type");
            }
        }
    }
}
```
        Simulation EarCovr_D_US21
          Clock: Start=2021-04-04; End=2021-11-11
          Summary SummaryFile
          Weather: FileName=Ames.2022.11.29.met
          SoilArbitrator Soil Arbitrator
          Zone Field: Area=1; Slope=0; AspectAngle=0; Altitude=50
            Fertiliser
            Soil: SoilType=Nicollet; NearestTown=Ames; Region=Boone; State=Iowa; Country=US; ApsoilNumber=34; Latitude=42.02204; Longitude=-93.769115; DataSource=mesured data and web soil survey; Comments=hydrological parameters and BD from Saxton and Rawls, 2006
              Physical: same as EarManipulation.US_2021.Dekalb.Ctrl_D_US21.Field.Soil.Physical
              Organic: same as EarManipulation.US_2021.Dekalb.Ctrl_D_US21.Field.Soil.Organic
              Chemical: same as EarManipulation.US_2021.Dekalb.Ctrl_D_US21.Field.Soil.Chemical
              Water: FilledFromTop=false
                Thickness=[25, 25, 50, 100, 100, 150, 150, 150, 150, 150, 150, 300, 300, 300, 300, 300, 300, 300, 300, 300]
                InitialValues=[0.31, 0.31, 0.3, 0.25, 0.22, 0.21, 0.22, 0.265, 0.261, 0.253, 0.2, 0.393, 0.285, 0.273, 0.263, 0.254, 0.246, 0.24, 0.234, 0.23]
              Nutrient
              Solute NO3: same as EarManipulation.US_2021.Dekalb.Ctrl_D_US21.Field.Soil.NO3
              Solute NH4: same as EarManipulation.US_2021.Dekalb.Ctrl_D_US21.Field.Soil.NH4
              Solute Urea: same as EarManipulation.US_2021.Dekalb.Ctrl_D_US21.Field.Soil.Urea
              Swim3 Swim: same as EarManipulation.BR_2021.Ctrl_BR.Field.Soil.Swim
              SoilTemperature Temperature
              Report Report_SWIM
                VariableNames:
                  [Clock].Today
                  [Clock].Today.DayOfYear
                  [Maize].DaysAfterSowing
                  [Maize].Phenology.CurrentStageName
                  [Maize].Arbitrator.FN
                  [Maize].Leaf.Photosynthesis.FW
                  [Maize].Leaf.ExtinctionCoeff.WaterStressImpact
                  [Maize].Leaf.Photosynthesis.FT
                  [Maize].Leaf.Photosynthesis.FN
                  [Maize].Phenology.FloweringDAS
                  [Maize].Phenology.MaturityDAS
                  [Swim].WaterTable
                  sum([Swim].SW[5:6])*0.5 as sw_30cm
                  sum([Swim].SW[7:8])*0.5 as sw_60cm
                  sum([Swim].SW[11:12])*0.5 as sw_120cm
                  [Weather].Rain
                  [Weather].MeanT
                  [Weather].MaxT
                  [Weather].MinT
                  sum of [Field].Soil.Swim.Runoff from [Maize].Sowing to [Clock].EndOfYear as CummRunoff
                  sum of [Weather].Rain from [Maize].Sowing to [Clock].EndOfYear as CummRain
                  sum of [Maize].Leaf.Transpiration from [Maize].Sowing to [Clock].EndOfYear as CummTranspiration
                  sum of [Swim].Es from [Maize].Sowing to [Clock].EndOfYear as CummEvaporation
                  sum of [Field].Soil.Swim.Drainage from [Maize].Sowing to [Clock].EndOfYear as CummDrainage
                  sum([Swim].SWmm[1:10]) - sum([Field].Soil.Physical.DULmm[1:10]) as SoilWaterDeficit
                  sum of [Field].Irrigation.IrrigationApplied from [Maize].Sowing to [Clock].EndOfYear as CummIrrigation
                  CummRain + CummIrrigation as RainPlusIrrigation
                  [Maize].Leaf.Transpiration + [Field].Soil.Swim.Es as CropET
                  sum([Field].Soil.Nutrient.NO3.kgha[1:10]) as NO3
                  sum([Field].Soil.NH4.kgha[1:10]) as NH4
                  [SurfaceOrganicMatter].N
                  sum of sum([Soil].Nutrient.DenitrifiedN) from [Maize].Sowing to [Clock].EndOfYear as CummDenitrif
                  sum of sum([Soil].Nutrient.N2Oatm) from [Maize].Sowing to [Clock].EndOfYear as CummN2O
                  sum of [Fertiliser].NitrogenApplied from [Maize].Sowing to [Clock].EndOfYear as CummNfertilizer
                  sum of sum([Soil].Nutrient.MineralisedN + [SurfaceOrganicMatter].SurfaceResidue.Decomposition.MineralisedN) from [Maize].Sowing to [Clock].EndOfYear as CummSoilNetMineral
                  sum of [Soil].Swim.LeachNO3 from [Maize].Sowing to [Clock].EndOfYear as CummNleaching
                  sum of (-1 * [Maize].Root.NUptake) from [Maize].Sowing to [Clock].EndOfYear as CummNUptake
                EventNames:
                  [Clock].DoReport
                  //[Maize].Harvesting
            SurfaceOrganicMatter: InitialResidueName=soybean; InitialResidueType=soybean; InitialResidueMass=2000; InitialStandingFraction=0; InitialCPR=0; InitialCNR=50
            MicroClimate: a_interception=0; b_interception=1; c_interception=0; d_interception=0; SoilHeatFluxFraction=0.4; MinimumHeightDiffForNewLayer=0; NightInterceptionFraction=0.5; ReferenceHeight=2
            Plant Maize
            Operations
              2021-05-12  [Fertiliser].Apply(168, "UreaN", 50);
            Irrigation
            Manager Sow on a fixed date: same as EarManipulation.US_2021.Dekalb.Ctrl_D_US21.Field.Sow on a fixed date
            Manager Harvesting: same as EarManipulation.BR_2021.Ctrl_BR.Field.Harvesting
            Report ReportWt: same as EarManipulation.US_2021.Dekalb.Ctrl_D_US21.Field.ReportWt
            Manager SWIMSetLowerBC: same as EarManipulation.US_2021.Dekalb.Ctrl_D_US21.Field.SWIMSetLowerBC
            Manager RemoveGrain
              GrainNum = 140
              SetGrainNum = True
              script: same as in EarManipulation.BR_2021.EarCovr_BR.Field.RemoveGrain
        Simulation 1dayPolin_D_US21
          Clock: Start=2021-04-04; End=2021-11-11
          Summary SummaryFile
          Weather: FileName=Ames.2022.11.29.met
          SoilArbitrator Soil Arbitrator
          Zone Field: Area=1; Slope=0; AspectAngle=0; Altitude=50
            Fertiliser
            Soil: same as EarManipulation.US_2021.Dekalb.Ctrl_D_US21.Field.Soil
            SurfaceOrganicMatter: InitialResidueName=soybean; InitialResidueType=soybean; InitialResidueMass=2000; InitialStandingFraction=0; InitialCPR=0; InitialCNR=50
            MicroClimate: a_interception=0; b_interception=1; c_interception=0; d_interception=0; SoilHeatFluxFraction=0.4; MinimumHeightDiffForNewLayer=0; NightInterceptionFraction=0.5; ReferenceHeight=2
            Plant Maize
            Operations
              2021-05-12  [Fertiliser].Apply(168, "UreaN", 50);
            Irrigation
            Manager Sow on a fixed date: same as EarManipulation.US_2021.Dekalb.Ctrl_D_US21.Field.Sow on a fixed date
            Manager Harvesting: same as EarManipulation.BR_2021.Ctrl_BR.Field.Harvesting
            Report ReportWt: same as EarManipulation.US_2021.Dekalb.Ctrl_D_US21.Field.ReportWt
            Manager SWIMSetLowerBC: same as EarManipulation.US_2021.Dekalb.Ctrl_D_US21.Field.SWIMSetLowerBC
            Manager RemoveGrain
              GrainNum = 265
              SetGrainNum = True
              script: same as in EarManipulation.BR_2021.EarCovr_BR.Field.RemoveGrain
        Simulation LeafRemvR2_D_US21
          Clock: Start=2021-04-04; End=2021-11-11
          Summary SummaryFile
          Weather: FileName=Ames.2022.11.29.met
          SoilArbitrator Soil Arbitrator
          Zone Field: Area=1; Slope=0; AspectAngle=0; Altitude=50
            Fertiliser
            Soil: same as EarManipulation.US_2021.Dekalb.Ctrl_D_US21.Field.Soil
            SurfaceOrganicMatter: InitialResidueName=soybean; InitialResidueType=soybean; InitialResidueMass=2000; InitialStandingFraction=0; InitialCPR=0; InitialCNR=50
            MicroClimate: a_interception=0; b_interception=1; c_interception=0; d_interception=0; SoilHeatFluxFraction=0.4; MinimumHeightDiffForNewLayer=0; NightInterceptionFraction=0.5; ReferenceHeight=2
            Plant Maize
            Operations
              2021-05-12  [Fertiliser].Apply(168, "UreaN", 50);
            Irrigation
            Manager Sow on a fixed date: same as EarManipulation.US_2021.Dekalb.Ctrl_D_US21.Field.Sow on a fixed date
            Manager Harvesting: same as EarManipulation.BR_2021.Ctrl_BR.Field.Harvesting
            Manager RemoveStuff
              TargetPlant = [Maize]
              Organ = Leaf
              ToRemove = 1
              Date = 26-jul
              script: same as in EarManipulation.BR_2021.LeafRemvR2_BR.Field.RemoveStuff
            Report ReportWt: same as EarManipulation.US_2021.Dekalb.Ctrl_D_US21.Field.ReportWt
            Manager SWIMSetLowerBC: same as EarManipulation.US_2021.Dekalb.Ctrl_D_US21.Field.SWIMSetLowerBC
      Folder Pioneer
        Simulation Ctrl_P_US21
          Clock: Start=2021-04-04; End=2021-11-11
          Summary SummaryFile
          Weather: FileName=Ames.2022.11.29.met
          SoilArbitrator Soil Arbitrator
          Zone Field: Area=1; Slope=0; AspectAngle=0; Altitude=50
            Fertiliser
            Soil: same as EarManipulation.US_2021.Dekalb.Ctrl_D_US21.Field.Soil
            SurfaceOrganicMatter: InitialResidueName=soybean; InitialResidueType=soybean; InitialResidueMass=2000; InitialStandingFraction=0; InitialCPR=0; InitialCNR=50
            MicroClimate: a_interception=0; b_interception=1; c_interception=0; d_interception=0; SoilHeatFluxFraction=0.4; MinimumHeightDiffForNewLayer=0; NightInterceptionFraction=0.5; ReferenceHeight=2
            Plant Maize
            Operations
              2021-05-12  [Fertiliser].Apply(168, "UreaN", 50);
            Irrigation
            Manager Sow on a fixed date
              Crop = [Maize]
              SowDate = 13-May
              CultivarName = P1108Q
              SowingDepth = 70
              RowSpacing = 760
              Population = 8.6
              script: same as in EarManipulation.BR_2021.Ctrl_BR.Field.Sow on a fixed date
            Manager Harvesting: same as EarManipulation.BR_2021.Ctrl_BR.Field.Harvesting
            Report ReportWt: same as EarManipulation.US_2021.Dekalb.Ctrl_D_US21.Field.ReportWt
            Manager SWIMSetLowerBC: same as EarManipulation.US_2021.Dekalb.Ctrl_D_US21.Field.SWIMSetLowerBC
        Simulation EarCovr_P_US21
          Clock: Start=2021-04-04; End=2021-11-11
          Summary SummaryFile
          Weather: FileName=Ames.2022.11.29.met
          SoilArbitrator Soil Arbitrator
          Zone Field: Area=1; Slope=0; AspectAngle=0; Altitude=50
            Fertiliser
            Soil: same as EarManipulation.US_2021.Dekalb.Ctrl_D_US21.Field.Soil
            SurfaceOrganicMatter: InitialResidueName=soybean; InitialResidueType=soybean; InitialResidueMass=2000; InitialStandingFraction=0; InitialCPR=0; InitialCNR=50
            MicroClimate: a_interception=0; b_interception=1; c_interception=0; d_interception=0; SoilHeatFluxFraction=0.4; MinimumHeightDiffForNewLayer=0; NightInterceptionFraction=0.5; ReferenceHeight=2
            Plant Maize
            Operations
              2021-05-12  [Fertiliser].Apply(168, "UreaN", 50);
            Irrigation
            Manager Sow on a fixed date: same as EarManipulation.US_2021.Pioneer.Ctrl_P_US21.Field.Sow on a fixed date
            Manager Harvesting: same as EarManipulation.BR_2021.Ctrl_BR.Field.Harvesting
            Report ReportWt: same as EarManipulation.US_2021.Dekalb.Ctrl_D_US21.Field.ReportWt
            Manager SWIMSetLowerBC: same as EarManipulation.US_2021.Dekalb.Ctrl_D_US21.Field.SWIMSetLowerBC
            Manager RemoveGrain
              GrainNum = 1.5
              SetGrainNum = True
              script: same as in EarManipulation.BR_2021.EarCovr_BR.Field.RemoveGrain
        Simulation 1dayPolin_P_US21
          Clock: Start=2021-04-04; End=2021-11-11
          Summary SummaryFile
          Weather: FileName=Ames.2022.11.29.met
          SoilArbitrator Soil Arbitrator
          Zone Field: Area=1; Slope=0; AspectAngle=0; Altitude=50
            Fertiliser
            Soil: same as EarManipulation.US_2021.Dekalb.Ctrl_D_US21.Field.Soil
            SurfaceOrganicMatter: InitialResidueName=soybean; InitialResidueType=soybean; InitialResidueMass=2000; InitialStandingFraction=0; InitialCPR=0; InitialCNR=50
            MicroClimate: a_interception=0; b_interception=1; c_interception=0; d_interception=0; SoilHeatFluxFraction=0.4; MinimumHeightDiffForNewLayer=0; NightInterceptionFraction=0.5; ReferenceHeight=2
            Plant Maize
            Operations
              2021-05-12  [Fertiliser].Apply(168, "UreaN", 50);
            Irrigation
            Manager Sow on a fixed date: same as EarManipulation.US_2021.Pioneer.Ctrl_P_US21.Field.Sow on a fixed date
            Manager Harvesting: same as EarManipulation.BR_2021.Ctrl_BR.Field.Harvesting
            Report ReportWt: same as EarManipulation.US_2021.Dekalb.Ctrl_D_US21.Field.ReportWt
            Manager SWIMSetLowerBC: same as EarManipulation.US_2021.Dekalb.Ctrl_D_US21.Field.SWIMSetLowerBC
            Manager RemoveGrain
              GrainNum = 275
              SetGrainNum = True
              script: same as in EarManipulation.BR_2021.EarCovr_BR.Field.RemoveGrain
        Simulation LeafRemvR2_P_US21
          Clock: Start=2021-04-04; End=2021-11-11
          Summary SummaryFile
          Weather: FileName=Ames.2022.11.29.met
          SoilArbitrator Soil Arbitrator
          Zone Field: Area=1; Slope=0; AspectAngle=0; Altitude=50
            Fertiliser
            Soil: same as EarManipulation.US_2021.Dekalb.Ctrl_D_US21.Field.Soil
            SurfaceOrganicMatter: InitialResidueName=soybean; InitialResidueType=soybean; InitialResidueMass=2000; InitialStandingFraction=0; InitialCPR=0; InitialCNR=50
            MicroClimate: a_interception=0; b_interception=1; c_interception=0; d_interception=0; SoilHeatFluxFraction=0.4; MinimumHeightDiffForNewLayer=0; NightInterceptionFraction=0.5; ReferenceHeight=2
            Plant Maize
            Operations
              2021-05-12  [Fertiliser].Apply(168, "UreaN", 50);
            Irrigation
            Manager Sow on a fixed date: same as EarManipulation.US_2021.Pioneer.Ctrl_P_US21.Field.Sow on a fixed date
            Manager Harvesting: same as EarManipulation.BR_2021.Ctrl_BR.Field.Harvesting
            Report ReportWt: same as EarManipulation.US_2021.Dekalb.Ctrl_D_US21.Field.ReportWt
            Manager RemoveStuff: same as EarManipulation.US_2021.Dekalb.LeafRemvR2_D_US21.Field.RemoveStuff
            Manager SWIMSetLowerBC: same as EarManipulation.US_2021.Dekalb.Ctrl_D_US21.Field.SWIMSetLowerBC
    Folder NZ_2021
      Experiment Ctrl
        Factors
          Factor _Factor_: Specification=[Operations]
            Operations N0_NZ
              2021-10-28  [Maize].Sow(population:12, cultivar:"P39G12", depth:50, rowSpacing:710);
              2021-11-28  [Fertiliser].Apply(0, "UreaN", 10);
              2021-12-22  [Fertiliser].Apply(0, "UreaN", 10);
              2021-10-29  [Irrigation].Apply(10);
              2021-11-08  [Irrigation].Apply(13);
              2021-11-18  [Irrigation].Apply(10);
              2021-12-23  [Irrigation].Apply(15);
              2021-12-28  [Irrigation].Apply(15);
              2022-01-07  [Irrigation].Apply(20);
              2022-01-11  [Irrigation].Apply(25);
              2022-01-19  [Irrigation].Apply(30);
              2022-03-04  [Irrigation].Apply(25);
              2022-03-10  [Irrigation].Apply(25);
            Operations N250_NZ
              2021-10-28  [Maize].Sow(population:12, cultivar:"P39G12", depth:50, rowSpacing:710);
              2021-11-28  [Fertiliser].Apply(75, "UreaN", 10);
              2021-12-22  [Fertiliser].Apply(175, "UreaN", 10);
              2021-10-29  [Irrigation].Apply(10);
              2021-11-08  [Irrigation].Apply(13);
              2021-11-18  [Irrigation].Apply(10);
              2021-12-23  [Irrigation].Apply(15);
              2021-12-28  [Irrigation].Apply(15);
              2022-01-07  [Irrigation].Apply(20);
              2022-01-11  [Irrigation].Apply(25);
              2022-01-19  [Irrigation].Apply(30);
              2022-03-04  [Irrigation].Apply(25);
              2022-03-10  [Irrigation].Apply(25);
        Simulation Ctrl_NZ
          Weather: FileName=Lincoln.met
          Clock: Start=2021-09-24; End=2022-06-25
          Summary summaryfile
          SoilArbitrator Soil Arbitrator
          Zone Field: Area=1; Slope=0; AspectAngle=0; Altitude=50
            Fertiliser
            SurfaceOrganicMatter: InitialResidueName=wheat; InitialResidueType=wheat; InitialResidueMass=0; InitialStandingFraction=0; InitialCPR=0; InitialCNR=80
            MicroClimate: a_interception=0; b_interception=1; c_interception=0; d_interception=0; SoilHeatFluxFraction=0.4; MinimumHeightDiffForNewLayer=0; NightInterceptionFraction=0.5; ReferenceHeight=2
            Plant Maize
            Operations
            Irrigation
            Soil Templeton Silt Loam: SoilType=lignin_FOM; Region=Generic soil types; State=Canterbury; Latitude=999999; Longitude=999999
              DataSource=Profile descriptions provided by Trevor Webb and data for functional horizions based on SWAMP project results
              Physical
                Thickness  BD     AirDry  LL15  DUL  SAT
                200        1      0.06    0.06  0.3  0.37
                200        1.3    0.12    0.12  0.3  0.37
                200        1.601  0.12    0.12  0.3  0.32
                200        1.4    0.12    0.12  0.3  0.3
                200        1.4    0.12    0.12  0.3  0.3
                200        1.4    0.12    0.12  0.3  0.3
                200        1.4    0.12    0.12  0.3  0.3
                200        1.4    0.12    0.12  0.3  0.3
                SoilCrop MaizeSoil: LL=[0.06, 0.12, 0.12, 0.13, 0.12, 0.15, 0.15, 0.15]; KL=[0.1, 0.075, 0.06, 0.06, 0.02, 0.005, 0.002, 0.001]; XF=[1, 0.7, 0.3, 0.3, 0.7, 1, 1, 1]
              WaterBalance SoilWater: SummerDate=1-Nov; SummerU=9; SummerCona=4.4; WinterDate=1-Apr; WinterU=6; WinterCona=3; DiffusConst=88; DiffusSlope=35; Salb=0.13; CN2Bare=73; CNRed=20; CNCov=0.8; PSIDul=-100; Thickness=[200, 200, 200, 200, 200, 200, 200, 200]; SWCON=[0.5, 0.56, 0.31, 0.7, 0.7, 0.7, 0.7, 0.7]
              Organic: FOMCNRatio=16; CarbonUnits=Total
                Thickness  Carbon  SoilCNRatio  FBiom  FInert  FOM
                200        3.6     11           0.03   0.2     2329.324
                200        2.2     11           0.02   0.4     1561.392
                200        0.42    11           0.01   0.8     1046.633
                300        0.23    11           0.01   0.9     574.404
                300        0.23    11           0.01   0.9     315.24
                300        0.23    11           0.01   0.9     173.007
              Chemical: Thickness=[200, 200, 200, 300, 300, 300]; PH=[6, 6, 6, 6, 6, 6]; PHUnits=Water
              Water: Thickness=[200, 200, 200, 300, 300, 300]; InitialValues=[0.3, 0.3, 0.3, 0.3, 0.3, 0.3]; FilledFromTop=false
              Nutrient
              Solute NO3: Thickness=[150, 150, 300, 300, 300, 300]; InitialValues=[18, 7.3, 1.7, 1, 1.2, 1]; InitialValuesUnits=ppm; WaterTableConcentration=0; D0=0; DepthConstant=0; MaxDepthSoluteAccessible=0; RunoffEffectivenessAtMovingSolute=0; MaxEffectiveRunoff=0
              Solute NH4: Thickness=[150, 150, 300, 300, 300, 300]; InitialValues=[1.3, 0.4, 0, 0, 0, 0]; InitialValuesUnits=ppm; WaterTableConcentration=0; D0=0; DepthConstant=0; MaxDepthSoluteAccessible=0; RunoffEffectivenessAtMovingSolute=0; MaxEffectiveRunoff=0
              Solute Urea: Thickness=[200, 200, 200, 300, 300, 300]; InitialValues=[0, 0, 0, 0, 0, 0]; InitialValuesUnits=kg/ha; WaterTableConcentration=0; D0=0; DepthConstant=0; MaxDepthSoluteAccessible=0; RunoffEffectivenessAtMovingSolute=0; MaxEffectiveRunoff=0
              SoilTemperature Temperature
            Manager Harvesting
```csharp
using Newtonsoft.Json;
using Models.Soils.Nutrients;
using System;
using Models.Core;
using System.Collections.Generic;
using System.Text;
using Models.Soils;
using Models.PMF;
using Models;
using System.Xml.Serialization;
using APSIM.Shared.Utilities;
using Models.PMF.Phen;

namespace Models
{
    [Serializable] 
    public class Script : Model
    {
        [Link] private Plant Maize;
        [Link] private Zone zone;
        [Link] private Simulation sim;
        [Link(Type = LinkType.Path, Path = "[Maize].Phenology")]
        private Phenology phenology;


        [JsonIgnore] private bool Harvested {get; set;}
                
        [EventSubscribe("StartOfSimulation")]
        private void OnSimulationCommencing(object sender, EventArgs e)
        {
        
        Harvested = false;
        }
        
        [EventSubscribe("DoManagement")]
        private void OnDoManagement(object sender, EventArgs e)
        {
            if ((phenology.CurrentPhase.Name == "ReadyForHarvesting") & (Harvested == false))
            {
                Maize.Harvest(removeBiomassFromOrgans: false);
                //Maize.EndCrop();
                Harvested = true;
            }
        }
        
        [EventSubscribe("DoManagementCalculations")]
        private void OnDoManagementCalculations(object sender, EventArgs e)
        {
            
        }
    }
}
```
            Report ReportWt: same as EarManipulation.US_2021.Dekalb.Ctrl_D_US21.Field.ReportWt
      Experiment EarCovr
        Factors: same as EarManipulation.NZ_2021.Ctrl.Factors
        Simulation EarCovr_NZ
          Weather: FileName=Lincoln.met
          Clock: Start=2021-09-24; End=2022-06-25
          Summary summaryfile
          SoilArbitrator Soil Arbitrator
          Zone Field: Area=1; Slope=0; AspectAngle=0; Altitude=50
            Fertiliser
            SurfaceOrganicMatter: InitialResidueName=wheat; InitialResidueType=wheat; InitialResidueMass=0; InitialStandingFraction=0; InitialCPR=0; InitialCNR=80
            MicroClimate: a_interception=0; b_interception=1; c_interception=0; d_interception=0; SoilHeatFluxFraction=0.4; MinimumHeightDiffForNewLayer=0; NightInterceptionFraction=0.5; ReferenceHeight=2
            Plant Maize
            Operations
            Irrigation
            Soil Templeton Silt Loam: same as EarManipulation.NZ_2021.Ctrl.Ctrl_NZ.Field.Templeton Silt Loam
            Manager Harvesting: same as EarManipulation.NZ_2021.Ctrl.Ctrl_NZ.Field.Harvesting
            Report ReportWt: same as EarManipulation.BR_2021.Ctrl_BR.Field.ReportWt
            Manager RemoveGrain
              GrainNum = 160
              SetGrainNum = True
              script: same as in EarManipulation.BR_2021.EarCovr_BR.Field.RemoveGrain
      Experiment LeafRemvR2
        Factors
          Factor _Factor_: Specification=[Operations]
            Operations N0_NZ: same as EarManipulation.NZ_2021.Ctrl.Factors._Factor_.N0_NZ
            Operations N250_NZ
              2021-10-28  [Maize].Sow(population:12, cultivar:"P39G12", depth:50, rowSpacing:710);
              2021-11-28  [Fertiliser].Apply(75, "UreaN", 10);
              2021-12-22  [Fertiliser].Apply(175, "UreaN", 10);
              2021-10-29  [Irrigation].Apply(10);
              2021-11-08  [Irrigation].Apply(13);
              2021-11-18  [Irrigation].Apply(10);
              2021-12-23  [Irrigation].Apply(15);
              2021-12-28  [Irrigation].Apply(15);
              2022-01-07  [Irrigation].Apply(20);
              2022-01-11  [Irrigation].Apply(25);
              2022-01-19  [Irrigation].Apply(30);
              2022-03-04  [Irrigation].Apply(25);
              2022-03-10  [Irrigation].Apply(25);
        Simulation LeafRemvR2_NZ
          Weather: FileName=Lincoln.met
          Clock: Start=2021-09-24; End=2022-06-25
          Summary summaryfile
          SoilArbitrator Soil Arbitrator
          Zone Field: Area=1; Slope=0; AspectAngle=0; Altitude=50
            Fertiliser
            SurfaceOrganicMatter: InitialResidueName=wheat; InitialResidueType=wheat; InitialResidueMass=0; InitialStandingFraction=0; InitialCPR=0; InitialCNR=80
            MicroClimate: a_interception=0; b_interception=1; c_interception=0; d_interception=0; SoilHeatFluxFraction=0.4; MinimumHeightDiffForNewLayer=0; NightInterceptionFraction=0.5; ReferenceHeight=2
            Plant Maize
            Operations
            Irrigation
            Manager RemoveStuff
              TargetPlant = [Maize]
              Organ = Leaf
              ToRemove = 1
              Date = 24-Jan
              script: same as in EarManipulation.BR_2021.LeafRemvR2_BR.Field.RemoveStuff
            Soil Templeton Silt Loam: same as EarManipulation.NZ_2021.Ctrl.Ctrl_NZ.Field.Templeton Silt Loam
            Manager Harvesting: same as EarManipulation.NZ_2021.Ctrl.Ctrl_NZ.Field.Harvesting
            Report ReportWt: same as EarManipulation.BR_2021.Ctrl_BR.Field.ReportWt
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