Simulations: Version=206
  Memo
    EXP 1 and 2 are Kaur (USA)

    EXP 3 is Tian (China)

    EXP 4 is Lisazo (USA)

    Kaur et al., 2017. https://doi.org/10.2134/agronj2016.07.0411

    Kaur et al., 2020. https://doi.org/10.3390/agronomy10030378

    Tian et al., 2020, https://doi.org/10.1016/j.eja.2020.126054

    Lisazo, Ritchie 1997, https://doi/10.2134/agronj1997.00021962008900010019x
  DataStore
    ExcelInput: FileNames=[LizasoObs.xlsx]; SheetNames=[LizasoInseason, LizasoHarvest]
    PredictedObserved InSeason: PredictedTableName=Report_Day; ObservedTableName=LizasoInseason; FieldNameUsedForMatch=SimulationName; FieldName2UsedForMatch=Clock.Today; AllColumns=false
    PredictedObserved Harvest: PredictedTableName=Report_Harvest; ObservedTableName=LizasoHarvest; FieldNameUsedForMatch=SimulationName; FieldName2UsedForMatch=Year; AllColumns=false
  Folder Replacements
    Report Report_Harvest: EventNames=[Maize].Harvesting
      VariableNames:
        [Clock].Today.Year as Year
        [Maize].Grain.Wt
    Report Report_Day: EventNames=[Clock].DoReport
      VariableNames:
        [Clock].Today
        divide(sum([Maize].Leaf.CohortArea), [Maize].SowingData.Population) / 100 as Maize.LeafAreaPerPlant
        [Maize].Leaf.LAI
        [Maize].AboveGround.Wt
  Folder Lizaso
    Experiment Exp4_1990
      Factors
        Permutation
          Factor _WL_: Specification=[WL]
            Operations control
            Operations early_4d
              1990-08-03  [SwimSubsurfaceDrain].Open = false
              1990-08-03  [DumpWater].Script.Dump = true
              1990-08-07  [SwimSubsurfaceDrain].Open = true
              1990-08-07  [DumpWater].Script.Dump = false
            Operations early_8d
              1990-08-03  [SwimSubsurfaceDrain].Open = false
              1990-08-03  [DumpWater].Script.Dump = true
              1990-08-11  [SwimSubsurfaceDrain].Open = true
              1990-08-11  [DumpWater].Script.Dump = false
            Operations late_4d
              1990-08-30  [SwimSubsurfaceDrain].Open = false
              1990-08-30  [DumpWater].Script.Dump = true
              1990-09-03  [SwimSubsurfaceDrain].Open = true
              1990-09-03  [DumpWater].Script.Dump = false
            Operations late_8d
              1990-08-30  [SwimSubsurfaceDrain].Open = false
              1990-08-30  [DumpWater].Script.Dump = true
              1990-09-07  [SwimSubsurfaceDrain].Open = true
              1990-09-07  [DumpWater].Script.Dump = false
      Simulation Exp4_1990
        Clock: Start=1990-01-01; End=1990-12-31
        Summary SummaryFile
        Weather: FileName=Lizaso.met
        SoilArbitrator Soil Arbitrator
        Zone Field: Area=1; Slope=0; AspectAngle=0; Altitude=50
          Soil CAP_Colwood_UpA: SoilType=CAP_Colwood_UpA; Region=CAP_Colwood_UpA; State=IL; Country=USA; ApsoilNumber=1; Latitude=0; Longitude=0; DataSource=ssurgo2apsim; Comments=None
            Physical
              Thickness  ParticleSizeSand  ParticleSizeSilt  ParticleSizeClay  Rocks     BD    AirDry  LL15   DUL    SAT    KS
              50         44                40.5              15.5              0.116667  1.45  0.0585  0.117  0.261  0.372  500
              50         44                40.5              15.5              0.116667  1.45  0.0585  0.117  0.261  0.372  500
              50         43.6              40.7              15.7              0.116667  1.45  0.059   0.118  0.262  0.372  500
              150        36.6              43.9              19.5              0.147536  1.45  0.12    0.12   0.267  0.359  500
              150        25.5              48.9              25.6              0.209274  1.45  0.126   0.126  0.253  0.333  399.4
              150        19                52.8              28.2              0.219391  1.46  0.13    0.13   0.253  0.326  277.4
              200        23.8              54.3              21.8              0.203612  1.48  0.135   0.135  0.253  0.327  100
              200        29.8              56                14.2              0.230897  1.52  0.134   0.134  0.253  0.305  50
              200        35.3              57.4              7.3               0.263247  1.54  0.13    0.13   0.236  0.287  20
              300        36.3              57.7              6                 0.287634  1.55  0.125   0.125  0.22   0.275  20
              300        36.3              57.7              6                 0.292815  1.55  0.123   0.123  0.21   0.273  20
              300        36.3              57.7              6                 0.352395  1.55  0.12    0.12   0.2    0.25   20
              300        36.3              57.7              6                 0.352395  1.55  0.115   0.115  0.196  0.25   20
              300        36.3              57.7              6                 0.378299  1.55  0.11    0.11   0.196  0.24   20
              300        36.3              57.7              6                 0.391251  1.55  0.11    0.11   0.196  0.235  20
              300        36.3              57.7              6                 0.404203  1.55  0.11    0.11   0.196  0.23   20
              300        36.3              57.7              6                 0.404203  1.55  0.11    0.11   0.196  0.23   5
              300        36.3              57.7              6                 0.404203  1.55  0.11    0.11   0.196  0.23   1
              Rocks source: Calculated
              SoilCrop MaizeSoil
                LL=[0.117, 0.117, 0.118, 0.12, 0.126, 0.13, 0.135, 0.134, 0.13, 0.125, 0.123, 0.12, 0.115, 0.11, 0.11, 0.11, 0.11, 0.11]
                KL=[0.08, 0.08, 0.08, 0.08, 0.08, 0.08, 0.08, 0.08, 0.08, 0.0422964, 0.0350564, 0.0282843, 0.022015, 0.0162927, 0.0111758, 0.0067466, 0.00313554, 0.000603434]
                XF=[1, 1, 1, 1, 1, 1, 1, 1, 1, 0.4, 0.4, 0.4, 0.4, 0, 0, 0, 0, 0]
            Swim3 Swim: Salb=0.15; CN2Bare=50; CNRed=20; CNCov=0.8; KDul=0.3; PSIDul=-300; VC=true; DTMin=0; DTMax=1440; MaxWaterIncrement=10; SpaceWeightingFactor=0; SoluteSpaceWeightingFactor=0; Dis=0; Disp=0; A=0; DTHC=0; DTHP=0; vcon1=7.28e-09; vcon2=7.26e-07; eo_time=06:00; eo_durn=720; default_rain_time=00:00; default_rain_duration=720; Diagnostics=false
              SwimSubsurfaceDrain: DrainDepth=1100; DrainSpacing=20000; DrainRadius=50; Klat=1000; ImpermDepth=3000; Open=true
            Solute NO3: InitialValuesUnits=ppm; WaterTableConcentration=0; D0=0; DepthConstant=0; MaxDepthSoluteAccessible=0; RunoffEffectivenessAtMovingSolute=0; MaxEffectiveRunoff=0
              Thickness  InitialValues  Exco  FIP
              50         8              0     1
              50         8              0     1
              50         7.875          0     1
              150        5.875          0     1
              150        2.7            0     1
              150        0.5            0     1
              200        0.5            0     1
              200        0.5            0     1
              200        0.5            0     1
              300        0.5            0     1
              300        0.5            0     1
              300        0.5            0     1
              300        0.5            0     1
              300        0.5            0     1
              300        0.5            0     1
              300        0.5            0     1
              300        0.5            0     1
              300        0.5            0     1
            Solute NH4: InitialValuesUnits=ppm; WaterTableConcentration=0; D0=0; DepthConstant=0; MaxDepthSoluteAccessible=0; RunoffEffectivenessAtMovingSolute=0; MaxEffectiveRunoff=0
              Thickness  InitialValues  Exco  FIP
              50         8              100   1
              50         8              100   1
              50         7.875          100   1
              150        5.875          100   1
              150        2.7            100   1
              150        0.5            100   1
              200        0.5            100   1
              200        0.5            100   1
              200        0.5            100   1
              300        0.5            100   1
              300        0.5            100   1
              300        0.5            100   1
              300        0.5            100   1
              300        0.5            100   1
              300        0.5            100   1
              300        0.5            100   1
              300        0.5            100   1
              300        0.5            100   1
            Solute Urea: InitialValuesUnits=kg/ha; WaterTableConcentration=0; D0=0; DepthConstant=0; MaxDepthSoluteAccessible=0; RunoffEffectivenessAtMovingSolute=0; MaxEffectiveRunoff=0
              Thickness  InitialValues  Exco  FIP
              50         0              0     1
              50         0              0     1
              50         0              0     1
              150        0              0     1
              150        0              0     1
              150        0              0     1
              200        0              0     1
              200        0              0     1
              200        0              0     1
              300        0              0     1
              300        0              0     1
              300        0              0     1
              300        0              0     1
              300        0              0     1
              300        0              0     1
              300        0              0     1
              300        0              0     1
              300        0              0     1
            Organic: FOMCNRatio=45; CarbonUnits=Total
              Thickness  Carbon  SoilCNRatio  FBiom       FInert    FOM
              50         3.2     13           0.215       0.365     125.774
              50         3.2     13           0.110863    0.365     121.028
              50         3.15    13           0.078973    0.365     116.462
              150        2.35    13           0.0534537   0.447125  103.77
              150        1.08    13           0.0380776   0.69875   92.4616
              150        0.18    13           0.0304538   0.71825   82.3855
              200        0.14    13           0.0251583   0.741     70.6376
              200        0.07    13           0.0212917   0.767     60.565
              200        0.04    13           0.01863554  0.939193  51.9287
              300        0.02    13           0.0162662   0.940054  41.2273
              300        0.01    13           0.014237    0.957855  32.7313
              300        0       13           0.01274218  0.975656  25.9861
              300        0       13           0.0115872   0.993457  20.631
              300        0       13           0.0106631   0.999     16.3794
              300        0       13           0.00990398  0.999     13.004
              300        0       13           0.0092672   0.999     10.3242
              300        0       13           0.00872398  0.999     8.19658
              300        0       13           0.0082541   0.999     6.50745
            Chemical: PHUnits=Water
              Thickness  PH    CEC
              50         7.94  14.2865
              50         7.94  14.2865
              50         7.94  14.2006
              150        7.94  12.9462
              150        7.94  10.9737
              150        8.01  9.2074
              200        8.27  7.7302
              200        8.57  5.9455
              200        8.84  4.4042
              300        8.89  4.0791
              300        8.89  4.0566
              300        8.89  4.0341
              300        8.89  4.0341
              300        8.89  4.0341
              300        8.89  4.0341
              300        8.89  4.0341
              300        8.89  4.0341
              300        8.89  4.0341
              CEC source: Calculated
            Water: FilledFromTop=false
              Thickness=[50, 50, 50, 150, 150, 150, 200, 200, 200, 300, 300, 300, 300, 300, 300, 300, 300, 300]
              InitialValues=[0.261, 0.261, 0.262, 0.267, 0.253, 0.253, 0.253, 0.253, 0.236, 0.22, 0.21, 0.2, 0.196, 0.196, 0.196, 0.196, 0.196, 0.196]
            Nutrient
            SoilTemperature Temperature
          Fertiliser
          Manager SWIMSetLowerBC
            LowerBCType = watertable
            LowerBCValue = 3000
```csharp
using Models.Climate;
using APSIM.Shared.Utilities;
using Models.Soils.Nutrients;
using Models.Soils;
using Models.PMF;
using Models.Core;
using System.Xml.Serialization;
using System;
using System.Linq;
using Models.AgPasture;
using Models.Interfaces;

namespace Models
{
    [Serializable] 
    [System.Xml.Serialization.XmlInclude(typeof(Model))]
    public class Script : Model
    {
        [Link] Clock clock;
        [Link] ISummary summary;
        [Link] private Swim3 swim;
        //[Link] private PastureSpecies ryegrass;
        //[Link] private SimpleGrazing grazing;
        
        public enum LowerBCTypeOptions {gradient,seepage,potential,watertable};

        [Separator("Sets the lower boundary condition type (and value if set to 'potential' for SWIM3. The change is applied at the beginning of the first day of the simulation.")]
        
        [Description("What lower boundary condition is wanted?")] public LowerBCTypeOptions LowerBCType { get; set; }


        [Display(VisibleCallback = "IsBCPotentialOrWater")]
        [Description("What should the lower BC potential be set to (should be positive for a watertable) (mm)?")] public double LowerBCValue { get; set; }
        
        public bool IsBCPotentialOrWater => LowerBCType == LowerBCTypeOptions.potential || LowerBCType == LowerBCTypeOptions.watertable;





        public double SoilWaterStart  { get; set; }
        public double SoilWaterEnd  { get; set; }

        [EventSubscribe("DoDailyInitialisation")]
        private void DoDailyInitialisation(object sender, EventArgs e)
        {
        }

        [EventSubscribe("DoReportCalculations")]
        private void DoReportCalculations(object sender, EventArgs e)
        {
        }

        [EventSubscribe("DoManagement")]
        private void DoDailyCalculations(object sender, EventArgs e)
        {
            if (clock.Today == clock.StartDate)
            {
                summary.WriteMessage(this, "Script is setting lower boundary condition to " + LowerBCType, MessageType.Diagnostic);
                if (LowerBCType == LowerBCTypeOptions.gradient)
                    swim.SetLowerBCForGradient(bbcGradient: 0.0);   // in cm/cm (ibbc=0) Note that this is the default setting
                else if (LowerBCType == LowerBCTypeOptions.potential)
                    swim.SetLowerBCForGivenPotential(bbcPotential: LowerBCValue /10.0 );    //  convert to cm (ibbc=1), DUL is -100 cm so values more positive will often result in inflow to the bottom of the soil profile. Input in mm so divide here.
                else if (LowerBCType == LowerBCTypeOptions.seepage)
                    swim.SetLowerBCForSeepage(bbcPotentialSeepage: 0.0);  // in cm (ibbc=3). This is for zero-tension lysimeters
                else if (LowerBCType == LowerBCTypeOptions.watertable)
                    swim.SetLowerBCForSeepage(LowerBCValue / 10.0);  // in cm (ibbc=4). This is for water tables
                else
                    throw new Exception("Wrong lower boundary condition type");
            }
        }
    }
}
```
          Manager SWIMSetSurfaceBC
            SurfaceBCType = PowerFunction
            MinimumSurfaceStorage = 10
            MaximumSurfaceStorage = 20
            InitialSurfaceStorage = 15
            PrecipitationConstant = 50
            RunoffRateFactor = 0.2
            RunoffRatePower = 2
```csharp
using Models.Climate;
using APSIM.Shared.Utilities;
using Models.Soils.Nutrients;
using Models.Soils;
using Models.PMF;
using Models.Core;
using System.Xml.Serialization;
using System;
using System.Linq;
using Models.AgPasture;
using Models.Interfaces;

namespace Models
{
    [Serializable] 
    [System.Xml.Serialization.XmlInclude(typeof(Model))]
    public class Script : Model
    {
        [Link] ISummary summary;
        [Link] private Swim3 swim;
        
        public enum SurfaceBCOptions { CurveNumber, PowerFunction };

        [Separator("Sets SWIMs surface boundary condition to either a curve number approach or a power function.")]
        

        [Description("What surface boundary condition?")] 
        public SurfaceBCOptions SurfaceBCType { get; set; }

        [Description("Minimum surface storage (mm):")] 
        [Display(EnabledCallback = "IsPowerFunction")] 
        public double MinimumSurfaceStorage { get; set; }

        [Description("Maximum surface storage (mm):")] 
        [Display(EnabledCallback = "IsPowerFunction")] 
        public double MaximumSurfaceStorage { get; set; }

        [Description("Initial surface storage (mm):")] 
        [Display(EnabledCallback = "IsPowerFunction")] 
        public double InitialSurfaceStorage { get; set; }

        [Description("Precipitation constant:")] 
        [Display(EnabledCallback = "IsPowerFunction")] 
        public double PrecipitationConstant { get; set; }

        [Description("Runoff rate factor:")] 
        [Display(EnabledCallback = "IsPowerFunction")] 
        public double RunoffRateFactor { get; set; }

        [Description("Runoff rate power:")] 
        [Display(EnabledCallback = "IsPowerFunction")] 
        public double RunoffRatePower { get; set; }

        /// <summary></summary>
        public bool IsPowerFunction => SurfaceBCType == SurfaceBCOptions.PowerFunction;


        [EventSubscribe("StartOfSimulation")]
        private void DoDailyInitialisation(object sender, EventArgs e)
        {
            summary.WriteMessage(this, "Script is setting surface boundary condition to " + SurfaceBCType, MessageType.Diagnostic);
            if (SurfaceBCType == SurfaceBCOptions.CurveNumber)
                swim.SetSurfaceBCForCurveNumber();
            else if (SurfaceBCType == SurfaceBCOptions.PowerFunction)
                swim.SetSurfaceBCForPowerFunction(minimumSurfaceStorage: 10, 
                                                    maximumSurfaceStorage: 20, 
                                                     initialSurfaceStorage: 15, 
                                                     precipitationConstant: 50, 
                                                     runoffRateFactor: 0.2, 
                                                     runoffRatePower: 2);
        }
    }
}
```
          SurfaceOrganicMatter: InitialResidueName=soybean; InitialResidueType=soybean; InitialResidueMass=2000; InitialStandingFraction=0; InitialCPR=0; InitialCNR=35
          MicroClimate: a_interception=0; b_interception=1; c_interception=0; d_interception=0; SoilHeatFluxFraction=0.4; MinimumHeightDiffForNewLayer=0; NightInterceptionFraction=0.5; ReferenceHeight=2
          Plant Maize
          Irrigation
          Operations WL
          Manager Fert_Preplant
            FertiliserType = UreaN
            FertiliserDates = 20-Jul
            Amount = 105
            AmountType = False
```csharp
using Models.Soils;
using System;
using System.Linq;
using Models.Core;
using Models.PMF;
using APSIM.Shared.Utilities;
namespace Models
{
    [Serializable]
    public class Script : Model
    {
        [Link] Clock Clock;
        [Link] Fertiliser Fertiliser;
        
        [Separator("A component to apply fertiliser on one or more dates on every year of the simulation")]

        [Description("Type of fertiliser to apply? ")] 
        [Display(Type = DisplayType.FertiliserType)]public string FertiliserType { get; set; }

        [Description("Enter the fertilisation dates as dd-mmm with comma separation (any year information entered will be ignored): ")] 
        public string[] FertiliserDates { get; set; } 

        [Description("Amount of fertiliser to be applied (kg /ha)")] 
        public double Amount { get; set; }

        [Description("Is the above amount to be applied each time? (yes/ticked)? Or is it the total annual amount across all dates (no/unticked)")] 
        public bool AmountType { get; set; }
        
        [EventSubscribe("DoManagement")]
        private void OnDoManagement(object sender, EventArgs e)
        {
            foreach (string ddMMM in FertiliserDates)
            {
                if (DateUtilities.DatesEqual(ddMMM, Clock.Today))
                {
                    if (AmountType)
                        Fertiliser.Apply(amount: Amount, type: FertiliserType);
                    else
                        Fertiliser.Apply(amount: Amount / FertiliserDates.Length, type: FertiliserType);
                }
            }
        }
    }
}
```
          Manager Fert_Postplant
            FertiliserType = UreaN
            FertiliserDates = 20-Aug
            Amount = 105
            AmountType = False
            script: same as in Lizaso.Exp4_1990.Exp4_1990.Field.Fert_Preplant
          Manager Sowing
            Crop = [Maize]
            SowDate = 20-Jul
            CultivarName = DeKalb_62_97VT3_Lizaso
            SowingDepth = 65
            RowSpacing = 760
            Population = 5
```csharp
using APSIM.Shared.Utilities;
using Models.Utilities;
using Models.Soils;
using Models.PMF;
using Models.Core;
using System;

namespace Models
{
    [Serializable]
    public class Script : Model
    {
        [Link] Clock Clock;
        [Link] Fertiliser Fertiliser;
        [Link] Summary Summary;
        [Link] Soil Soil;
        
        [Description("Crop")]
        public IPlant Crop { get; set; }

        [Description("Sowing date (d-mmm)")]
        public string SowDate { get; set; }

        [Display(Type = DisplayType.CultivarName)]
        [Description("Cultivar to be sown")]
        public string CultivarName { get; set; }

        [Description("Sowing depth (mm)")]
        public double SowingDepth { get; set; }

        [Description("Row spacing (mm)")]
        public double RowSpacing { get; set; }

        [Description("Plant population (/m2)")]
        public double Population { get; set; }

        [EventSubscribe("DoManagement")]
        private void OnDoManagement(object sender, EventArgs e)
        {
            if (DateUtilities.WithinDates(SowDate, Clock.Today, SowDate))
            {
                Crop.Sow(population: Population, cultivar: CultivarName, depth: SowingDepth, rowSpacing: RowSpacing);    
            }
        }
    }
}
```
          Manager Harvesting
            Crop = [Maize]
```csharp
using APSIM.Shared.Utilities;
using Models.Utilities;
using Models.Soils;
using Models.PMF;
using Models.Core;
using System;
using System.Linq;

namespace Models
{
    [Serializable] 
    public class Script : Model
    {
        [Description("Crop")]
        public IPlant Crop { get; set; }
        
        [EventSubscribe("DoManagement")]
        private void OnDoManagement(object sender, EventArgs e)
        {
            if (Crop.IsReadyForHarvesting)
            {
                Crop.Harvest();
                Crop.EndCrop();
            }
        }
    }
}
```
          Report Report_Harvest: EventNames=[Maize].Harvesting
            VariableNames:
              [Maize].SowingDate as SowingDate
          Manager DumpWater
            ApplicationAmount = 100
```csharp
using System;
using Models.Core;
using Models.Interfaces;
using Models.PMF;
using APSIM.Shared.Utilities;

namespace Models
{
    [Serializable]
    public class Script : Model
    {
        [Link] IClock Clock;
        [Link] ISummary Summary;
        [Link] Irrigation Irrigation;
        
        [Description("Ammount of water to dump (mm).")]
        public double ApplicationAmount { get; set; }
        
        public bool Dump { get; set;} = false;

        [EventSubscribe("DoManagement")]
        private void DoDailyCalculations(object sender, EventArgs e)
        {
            if (!Dump)
                return;
            Irrigation.Apply(ApplicationAmount);
        }
    }
}
```
          Report Report_Day: VariableNames=[Clock].Today; EventNames=[Clock].Today
    Experiment Exp4_1991
      Factors
        Permutation
          Factor _WL_: Specification=[WL]
            Operations control
            Operations early_4d
              1991-06-12  [SwimSubsurfaceDrain].Open = false
              1991-06-12  [DumpWater].Script.Dump = true
              1991-06-17  [SwimSubsurfaceDrain].Open = true
              1991-06-17  [DumpWater].Script.Dump = false
            Operations early_8d
              1991-06-12  [SwimSubsurfaceDrain].Open = false
              1991-06-12  [DumpWater].Script.Dump = true
              1991-06-20  [SwimSubsurfaceDrain].Open = true
              1991-06-20  [DumpWater].Script.Dump = false
            Operations late_4d
              1991-07-01  [SwimSubsurfaceDrain].Open = false
              1991-07-01  [DumpWater].Script.Dump = true
              1991-07-05  [SwimSubsurfaceDrain].Open = true
              1991-07-05  [DumpWater].Script.Dump = false
            Operations late_8d
              1991-07-01  [SwimSubsurfaceDrain].Open = false
              1991-07-01  [DumpWater].Script.Dump = true
              1991-07-10  [SwimSubsurfaceDrain].Open = true
              1991-07-10  [DumpWater].Script.Dump = false
      Simulation Exp4_1991
        Clock: Start=1991-01-01; End=1991-12-31
        Summary SummaryFile
        Weather: FileName=Lizaso.met
        SoilArbitrator Soil Arbitrator
        Zone Field: Area=1; Slope=0; AspectAngle=0; Altitude=50
          Soil CAP_Colwood_UpA: same as Lizaso.Exp4_1990.Exp4_1990.Field.CAP_Colwood_UpA
          Fertiliser
          Manager SWIMSetLowerBC: same as Lizaso.Exp4_1990.Exp4_1990.Field.SWIMSetLowerBC
          Manager SWIMSetSurfaceBC: same as Lizaso.Exp4_1990.Exp4_1990.Field.SWIMSetSurfaceBC
          SurfaceOrganicMatter: InitialResidueName=soybean; InitialResidueType=soybean; InitialResidueMass=2000; InitialStandingFraction=0; InitialCPR=0; InitialCNR=35
          MicroClimate: a_interception=0; b_interception=1; c_interception=0; d_interception=0; SoilHeatFluxFraction=0.4; MinimumHeightDiffForNewLayer=0; NightInterceptionFraction=0.5; ReferenceHeight=2
          Plant Maize
          Irrigation
          Operations WL
          Manager Fert_Preplant
            FertiliserType = UreaN
            FertiliserDates = 25-May
            Amount = 105
            AmountType = False
            script: same as in Lizaso.Exp4_1990.Exp4_1990.Field.Fert_Preplant
          Manager Sowing
            Crop = [Maize]
            SowDate = 25-May
            CultivarName = DeKalb_62_97VT3_Lizaso
            SowingDepth = 45
            RowSpacing = 760
            Population = 8.5
            script: same as in Lizaso.Exp4_1990.Exp4_1990.Field.Sowing
          Manager Harvesting: same as Lizaso.Exp4_1990.Exp4_1990.Field.Harvesting
          Report Report_Harvest: EventNames=[Maize].Harvesting
            VariableNames:
              [Maize].SowingDate as SowingDate
          Manager DumpWater: same as Lizaso.Exp4_1990.Exp4_1990.Field.DumpWater
          Report Report_Day: VariableNames=[Clock].Today; EventNames=[Clock].Today
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