Simulations: Version=212
  DataStore
    ExcelInput: FileNames=[Obs RM.xlsx]; SheetNames=[Yield, Leaf_Number, Tissues_Wt, Leaf_Size, LAI, Phenology]
    PredictedObserved: PredictedTableName=Report; ObservedTableName=Yield; FieldNameUsedForMatch=SimulationName; AllColumns=false
    PredictedObserved PredictedBiomass: PredictedTableName=TimeSeries; ObservedTableName=Tissues_Wt; FieldNameUsedForMatch=SimulationName; FieldName2UsedForMatch=Clock.Today; AllColumns=false
    PredictedObserved PredictedPhenology: PredictedTableName=Report; ObservedTableName=Phenology; FieldNameUsedForMatch=SimulationName; AllColumns=false
    PredictedObserved PredictedLAI: PredictedTableName=TimeSeries; ObservedTableName=LAI; FieldNameUsedForMatch=SimulationName; FieldName2UsedForMatch=Maize.DaysAfterSowing; AllColumns=false
    PredictedObserved PredictedLeafSize: PredictedTableName=TimeSeries; ObservedTableName=Leaf_Size; FieldNameUsedForMatch=SimulationName; FieldName2UsedForMatch=ExtraVariables.Script.LeafExpandedPosition; AllColumns=false
    PredictedObserved PredictedLeafNumber: PredictedTableName=TimeSeries; ObservedTableName=Leaf_Number; FieldNameUsedForMatch=SimulationName; FieldName2UsedForMatch=Maize.DaysAfterSowing; AllColumns=false
  Folder Replacements
    Report: EventNames=[Maize].Harvesting
      VariableNames:
        [Clock].Today
        [Clock].Today.Year
        [Maize].Phenology.CurrentStageName
        [Maize].Arbitrator.FN
        [Maize].Leaf.Photosynthesis.FW
        [Maize].Leaf.ExtinctionCoeff.WaterStressImpact
        [Maize].Leaf.Photosynthesis.FT
        [Maize].Leaf.Photosynthesis.FN
        [Swim].WaterTable
        [Maize].Grain.Wt
        [Maize].Phenology.EmergenceDAS
        [Maize].Phenology.FloweringDAS
        [Maize].Phenology.MaturityDAS
        [Maize].DaysAfterSowing
        [Maize].Population
        [Maize].AboveGround.Wt
        [Maize].AboveGround.N
        [Maize].Leaf.Wt
        [Maize].Stem.Wt
        [Maize].Rachis.Wt + [Maize].Grain.Wt as Maize.GrainPlusCob.Wt
        [Maize].Husk.Wt
        [Maize].Leaf.AppearedCohortNo
        [Maize].Structure.LeafTipsAppeared
        [Maize].Leaf.LAI
        sum of [Fertiliser].NitrogenApplied from [Clock].EndOfYear to [Plant].Harvesting as Nrate
    Report TimeSeries: EventNames=[Clock].EndOfDay
      VariableNames:
        [Clock].Today
        [Clock].Today.Year
        [Maize].Phenology.CurrentStageName
        [Maize].Arbitrator.FN
        [Maize].Leaf.Photosynthesis.FW
        [Maize].Leaf.ExtinctionCoeff.WaterStressImpact
        [Maize].Leaf.Photosynthesis.FT
        [Maize].Leaf.Photosynthesis.FN
        [Maize].Phenology.CurrentStageName
        [Swim].WaterTable
        [Maize].Grain.Wt
        [Maize].Phenology.EmergenceDAS
        [Maize].Phenology.FloweringDAS
        [Maize].Phenology.MaturityDAS
        [Maize].DaysAfterSowing
        [Maize].Population
        [Maize].AboveGround.Wt
        [Maize].AboveGround.N
        [Maize].Leaf.Wt
        [Maize].Stem.Wt
        [Maize].Rachis.Wt + [Maize].Grain.Wt as Maize.GrainPlusCob.Wt
        [Maize].Husk.Wt
        [Maize].Leaf.AppearedCohortNo
        [Maize].Structure.LeafTipsAppeared
        [Maize].Leaf.ExpandedCohortNo
        [Maize].Leaf.LAI
        [ExtraVariables].Script.LeafExpandedPosition
        [ExtraVariables].Script.MostRecentlyExpandedLeafSize
        sum of [Fertiliser].NitrogenApplied from [Clock].EndOfYear to [Plant].Harvesting as Nrate
  Folder RM
    Folder RM 2023
      Experiment RM2023
        Factors
          Permutation
            Factor _
              Specification=[Sowing].Script.CultivarName = P7211AM, DKC31-85RIB, G90S99-DV-EZ1, G03B19-AA-EZ1, DKC105-35RIB, P0924Q, P2089AML
        Simulation Base_1
          Weather: FileName=Ames.Jan21.2026.met
          Clock: Start=2022-11-11; End=2023-12-31
          Summary
          SoilArbitrator
          Zone Field: Area=1; Slope=0; AspectAngle=0; Altitude=50
            SurfaceOrganicMatter: InitialResidueName=soybean; InitialResidueType=soybean; InitialResidueMass=2834; InitialStandingFraction=0; InitialCPR=0; InitialCNR=65
            Fertiliser
            Plant Maize
            Report: EventNames=[Maize].Harvesting
              VariableNames:
                [Clock].Today
                [ReportHelper].Script.FertApplied as FertApplied
                [Maize].Grain.Wt * 0.159/0.85 as CornBuac
                [Soybean].Grain.Wt * 0.159/0.85 as SoyBuac
            Report TimeSeries: EventNames=[Clock].EndOfDay
              VariableNames:
                [Clock].Today
                [Clock].Today.Year as Year
                [Maize].Grain.Wt * 0.159/0.85 as Yield_buac
                [Maize].Grain.Wt * 10 as Yield_kgha
                [Maize].Phenology.EmergenceDAS as EmergenceDAS
                [Maize].Phenology.FloweringDAS as FloweringDAS
                [Maize].Phenology.MaturityDAS as MaturityDAS
                [Maize].Population as Plants
                [Maize].AboveGround.Wt * 10 as Biomass_kgha
                [Maize].AboveGround.N * 10 as BiomassN_kgha
                [Maize].Leaf.Wt * 10 as LeafWt_kgha
                [Maize].Stem.Wt * 10 as StemWt_kgha
                [Maize].Rachis.Wt * 10 as EarWt_kgha
                [Maize].Husk.Wt * 10 as OtherWt_kgha
                sum of [Fertiliser].NitrogenApplied from [Clock].EndOfYear to [Plant].Harvesting as Nrate
            MicroClimate: a_interception=0; b_interception=1; c_interception=0; d_interception=0; SoilHeatFluxFraction=0.4; MinimumHeightDiffForNewLayer=0; NightInterceptionFraction=0.5; ReferenceHeight=2
            Folder Operations
              Operations Tillage (disabled)
                2014-04-25  [SurfaceOrganicMatter].Incorporate(fraction:0.25, depth: 150)
                2014-10-31  [SurfaceOrganicMatter].Incorporate(fraction:0.5, depth: 250)
            Manager FertiliseMaize
              FertiliserType = UAN_N
              FertiliserDates = 21-Apr
              Amount = 168
              AmountType = True
```csharp
using Models.Soils;
using System;
using Models.Core;
using Models.PMF;
using APSIM.Shared.Utilities;
namespace Models
{
    [Serializable]
    public class Script : Model
    {
        [Link] Clock Clock;
        [Link] Fertiliser Fertiliser;
        
        [Separator("A component to apply fertiliser on one or more dates on every year of the simulation")]

        [Description("Type of fertiliser to apply? ")] 
        [Display(Type = DisplayType.FertiliserType)]public string FertiliserType { get; set; }

        [Description("Enter the fertilisation dates as dd-mmm with comma separation (any year information entered will be ignored): ")] 
        public string[] FertiliserDates { get; set; } 

        [Description("Amount of fertiliser to be applied (kg /ha)")] 
        public double Amount { get; set; }

        [Description("Is the above amount to be applied each time? (yes/ticked)? Or is it the total annual amount across all dates (no/unticked)")] 
        public bool AmountType { get; set; }
        
        [EventSubscribe("DoManagement")]
        private void OnDoManagement(object sender, EventArgs e)
        {
            foreach (string ddMMM in FertiliserDates)
            {
                if (DateUtilities.DatesEqual(ddMMM, Clock.Today))
                {
                    if (AmountType)
                        Fertiliser.Apply(amount: Amount, type: FertiliserType);
                    else
                        Fertiliser.Apply(amount: Amount / FertiliserDates.Length, type: FertiliserType);
                }
            }
        }
    }
}
```
            Irrigation
            Manager Harvesting
              Crop = [Maize]
```csharp
using APSIM.Shared.Utilities;
using Models.Utilities;
using Models.Soils;
using Models.PMF;
using Models.Core;
using System;
using System.Linq;

namespace Models
{
    [Serializable] 
    public class Script : Model
    {
        [Description("Crop")]
        public IPlant Crop { get; set; }
        
        [EventSubscribe("DoManagement")]
        private void OnDoManagement(object sender, EventArgs e)
        {
            if (Crop.IsReadyForHarvesting)
            {
                Crop.Harvest();
                Crop.EndCrop();
            }
        }
    }
}
```
            Soil: SoilType=Nicollet; NearestTown=Ames; Region=Boone; State=Iowa; Country=US; ApsoilNumber=34; Latitude=42.02204; Longitude=-93.769115; DataSource=mesured data and web soil survey; Comments=hydrological parameters and BD from Saxton and Rawls, 2006
              Physical
                Thickness  ParticleSizeSand  ParticleSizeSilt  ParticleSizeClay  Rocks     BD    AirDry  LL15   DUL    SAT    KS
                25         5                 65                30                0         1.25  0.087   0.174  0.31   0.445  146
                25         5                 65                30                0         1.25  0.087   0.174  0.31   0.455  146
                50         5                 65                30                0.145161  1.25  0.087   0.174  0.3    0.42   146
                100        5                 65                30                0.124808  1.25  0.132   0.165  0.25   0.43   146
                100        5                 65                30                0.287634  1.25  0.12    0.12   0.22   0.35   146
                150        5                 65                30                0.254756  1.35  0.11    0.11   0.21   0.34   146
                150        5                 65                30                0.276675  1.35  0.102   0.102  0.22   0.33   133
                150        5                 65                30                0.131908  1.36  0.126   0.126  0.265  0.393  133
                150        5                 65                30                0.131908  1.36  0.133   0.133  0.261  0.393  133
                150        5                 65                30                0.131908  1.36  0.128   0.128  0.253  0.393  388
                150        5                 65                30                0         1.6   0.128   0.128  0.2    0.393  388
                300        5                 65                30                0         1.6   0.09    0.09   0.2    0.393  388
                300        5                 65                30                0.226575  1.6   0.09    0.09   0.2    0.285  54.236
                300        5                 65                30                0.25914   1.6   0.09    0.09   0.2    0.273  33.11
                300        5                 65                30                0.286278  1.6   0.09    0.09   0.2    0.263  20.213
                300        5                 65                30                0.310701  1.6   0.09    0.09   0.2    0.254  12.34
                300        5                 65                30                0.332412  1.6   0.09    0.09   0.2    0.246  7.533
                300        5                 65                30                0.348694  1.6   0.09    0.09   0.2    0.24   4.599
                300        5                 65                30                0.364977  1.6   0.09    0.09   0.2    0.234  2.808
                300        5                 65                30                0.375832  1.6   0.09    0.09   0.2    0.23   1.714
                Rocks, ParticleSizeSand, ParticleSizeSilt, ParticleSizeClay source: Calculated
                SoilCrop MaizeSoil
                  LL=[0.174, 0.174, 0.174, 0.165, 0.12, 0.136, 0.144, 0.187, 0.198, 0.201, 0.174, 0.169, 0.179, 0.188, 0.188, 0.188, 0.188, 0.188, 0.188, 0.188]
                  KL=[0.08, 0.08, 0.08, 0.08, 0.08, 0.08, 0.08, 0.08, 0.08, 0.08, 0.08, 0.04, 0.04, 0.03, 0.02, 0.02, 0.01, 0.01, 0, 0]
                  XF=[1, 1, 1, 1, 1, 1, 1, 1, 1, 1, 1, 1, 1, 0.4, 0.4, 0, 0, 0, 0, 0]
                SoilCrop SoybeanSoil: same as RM.RM 2023.RM2023.Base_1.Field.Soil.Physical.MaizeSoil
              Organic: FOMCNRatio=36.5; CarbonUnits=Total
                Thickness  Carbon  SoilCNRatio  FBiom  FInert  FOM
                25         2.47    12.5         0.165  0.42    483.114
                25         2.41    12.5         0.165  0.42    468.836
                50         2.41    12.5         0.111  0.42    441.533
                100        2.38    12.5         0.07   0.483   391.605
                100        1.97    12.5         0.05   0.525   347.322
                150        1.95    12.5         0.038  0.803   290.108
                150        0.97    12.5         0.031  0.825   242.318
                150        0.97    12.5         0.026  0.849   202.401
                150        0.49    12.5         0.023  0.87    169.06
                150        0.49    12.5         0.02   0.999   141.211
                150        0.49    12.5         0.018  0.999   117.949
                300        0.49    12.5         0.016  0.999   82.29
                300        0.49    12.5         0.014  0.999   57.412
                300        0.49    12.5         0.013  0.999   40.055
                300        0.49    12.5         0.012  0.999   22.191
                300        0.1     12.5         0.011  0.999   22.191
                300        0.1     12.5         0.01   0.999   22.191
                300        0.1     12.5         0.009  0.999   22.191
                300        0.1     12.5         0.009  0.999   22.191
                300        0.1     12.5         0.008  0.999   22.191
              Chemical: PHUnits=Water
                Thickness  PH    CEC
                25         7.48  13.9025
                25         7.48  13.7675
                50         7.48  13.7675
                100        7.38  13.7
                100        7.43  12.7775
                150        7.43  12.7325
                150        7.73  10.5275
                150        7.73  10.5275
                150        8.08  9.4475
                150        8.08  9.4475
                150        8.08  9.4475
                300        8.08  9.4475
                300        8.08  9.4475
                300        8.08  9.4475
                300        8.08  9.4475
                300        8.08  8.57
                300        8.08  8.57
                300        8.08  8.57
                300        8.08  8.57
                300        8.08  8.57
                CEC source: Calculated
              Water: FilledFromTop=false
                Thickness=[25, 25, 50, 100, 100, 150, 150, 150, 150, 150, 150, 300, 300, 300, 300, 300, 300, 300, 300, 300]
                InitialValues=[0.31, 0.31, 0.3, 0.25, 0.22, 0.21, 0.22, 0.265, 0.261, 0.253, 0.2, 0.2, 0.2, 0.2, 0.2, 0.2, 0.2, 0.2, 0.2, 0.2]
              Nutrient
              Solute NO3: InitialValuesUnits=ppm; WaterTableConcentration=0; D0=0; DepthConstant=0; MaxDepthSoluteAccessible=0; RunoffEffectivenessAtMovingSolute=0; MaxEffectiveRunoff=0
                Thickness  InitialValues  Exco  FIP
                25         7.04           0     1
                25         7.36           0     1
                50         4.8            0     1
                100        2.4            0     1
                100        1.6            0     1
                150        0.988          0     1
                150        0.988          0     1
                150        0.539          0     1
                150        0.539          0     1
                150        0.49           0     1
                150        0.292          0     1
                300        0.104          0     1
                300        0.188          0     1
                300        0.167          0     1
                300        0              0     1
                300        0.188          0     1
                300        0.188          0     1
                300        0.188          0     1
                300        0.167          0     1
                300        0              0     1
              Solute NH4: InitialValuesUnits=ppm; WaterTableConcentration=0; D0=0; DepthConstant=0; MaxDepthSoluteAccessible=0; RunoffEffectivenessAtMovingSolute=0; MaxEffectiveRunoff=0
                Thickness  InitialValues  Exco  FIP
                25         12.8           1     1
                25         12.8           1     1
                50         6.4            1     1
                100        3.2            1     1
                100        3.2            1     1
                150        1.975          1     1
                150        1.975          1     1
                150        0.49           1     1
                150        0.49           1     1
                150        0.49           1     1
                150        0.417          1     1
                300        0.063          1     1
                300        0.083          1     1
                300        0              1     1
                300        0              1     1
                300        0.083          1     1
                300        0.083          1     1
                300        0.083          1     1
                300        0              1     1
                300        0              1     1
              Solute Urea: InitialValuesUnits=kg/ha; WaterTableConcentration=0; D0=0; DepthConstant=0; MaxDepthSoluteAccessible=0; RunoffEffectivenessAtMovingSolute=0; MaxEffectiveRunoff=0
                Thickness  InitialValues  Exco  FIP
                25         0              0     1
                25         0              0     1
                50         0              0     1
                100        0              0     1
                100        0              0     1
                150        0              0     1
                150        0              0     1
                150        0              0     1
                150        0              0     1
                150        0              0     1
                150        0              0     1
                300        0              0     1
                300        0              0     1
                300        0              0     1
                300        0              0     1
                300        0              0     1
                300        0              0     1
                300        0              0     1
                300        0              0     1
                300        0              0     1
              Swim3 Swim: Salb=0.13; CN2Bare=65; CNRed=20; CNCov=0.8; KDul=0.25; PSIDul=-300; VC=true; DTMin=0; DTMax=1440; MaxWaterIncrement=10; SpaceWeightingFactor=0; SoluteSpaceWeightingFactor=0; Dis=15; Disp=0.75; A=1; DTHC=0; DTHP=1; vcon1=7.28e-09; vcon2=7.26e-07; eo_time=06:00; eo_durn=720; default_rain_time=00:00; default_rain_duration=720; Diagnostics=false
                SwimSubsurfaceDrain: DrainDepth=1000; DrainSpacing=45000; DrainRadius=100; Klat=250; ImpermDepth=3900; Open=true
              SoilTemperature Temperature
            Manager Sowing
              Crop = [Maize]
              SowDate = 22-May
              CultivarName = Amethyst
              SowingDepth = 50
              RowSpacing = 760
              Population = 8.6
```csharp
using APSIM.Shared.Utilities;
using Models.Utilities;
using Models.Soils;
using Models.PMF;
using Models.Core;
using System;
using System.Linq;

namespace Models
{
    [Serializable]
    public class Script : Model
    {
        [Link] Clock Clock;
        [Link] Fertiliser Fertiliser;
        [Link] Summary Summary;
        [Link] Soil Soil;
        
        [Description("Crop")]
        public IPlant Crop { get; set; }

        [Description("Sowing date (d-mmm)")]
        public string SowDate { get; set; }

        [Display(Type = DisplayType.CultivarName)]
        [Description("Cultivar to be sown")]
        public string CultivarName { get; set; }

        [Description("Sowing depth (mm)")]
        public double SowingDepth { get; set; }

        [Description("Row spacing (mm)")]
        public double RowSpacing { get; set; }

        [Description("Plant population (/m2)")]
        public double Population { get; set; }

        [EventSubscribe("DoManagement")]
        private void OnDoManagement(object sender, EventArgs e)
        {
            if (DateUtilities.WithinDates(SowDate, Clock.Today, SowDate))
            {
                Crop.Sow(population: Population, cultivar: CultivarName, depth: SowingDepth, rowSpacing: RowSpacing);    
            }
        }
    }
}
```
            Manager SWIMSetLowerBC
              LowerBCType = potential
              LowerBCValue = 2400
```csharp
using Models.Climate;
using APSIM.Shared.Utilities;
using Models.Soils.Nutrients;
using Models.Soils;
using Models.PMF;
using Models.Core;
using System.Xml.Serialization;
using System;
using System.Linq;
using Models.AgPasture;
using Models.Interfaces;

namespace Models
{
    [Serializable] 
    [System.Xml.Serialization.XmlInclude(typeof(Model))]
    public class Script : Model
    {
        [Link] Clock clock;
        [Link] ISummary summary;
        [Link] private Swim3 swim;
        //[Link] private PastureSpecies ryegrass;
        //[Link] private SimpleGrazing grazing;
        
        public enum LowerBCTypeOptions {gradient,seepage,potential,watertable};

        [Separator("Sets the lower boundary condition type (and value if set to 'potential' for SWIM3. The change is applied at the beginning of the first day of the simulation.")]
        
        [Description("What lower boundary condition is wanted?")] public LowerBCTypeOptions LowerBCType { get; set; }


        [Display(VisibleCallback = "IsBCPotentialOrWater")]
        [Description("What should the lower BC potential be set to (should be positive for a watertable) (mm)?")] public double LowerBCValue { get; set; }
        
        public bool IsBCPotentialOrWater => LowerBCType == LowerBCTypeOptions.potential || LowerBCType == LowerBCTypeOptions.watertable;





        public double SoilWaterStart  { get; set; }
        public double SoilWaterEnd  { get; set; }

        [EventSubscribe("DoDailyInitialisation")]
        private void DoDailyInitialisation(object sender, EventArgs e)
        {
        }

        [EventSubscribe("DoReportCalculations")]
        private void DoReportCalculations(object sender, EventArgs e)
        {
        }

        [EventSubscribe("DoManagement")]
        private void DoDailyCalculations(object sender, EventArgs e)
        {
            if (clock.Today == clock.StartDate)
            {
                summary.WriteMessage(this, "Script is setting lower boundary condition to " + LowerBCType, MessageType.Diagnostic);
                if (LowerBCType == LowerBCTypeOptions.gradient)
                    swim.SetLowerBCForGradient(bbcGradient: 0.0);   // in cm/cm (ibbc=0) Note that this is the default setting
                else if (LowerBCType == LowerBCTypeOptions.potential)
                    swim.SetLowerBCForGivenPotential(bbcPotential: LowerBCValue /10.0 );    //  convert to cm (ibbc=1), DUL is -100 cm so values more positive will often result in inflow to the bottom of the soil profile. Input in mm so divide here.
                else if (LowerBCType == LowerBCTypeOptions.seepage)
                    swim.SetLowerBCForSeepage(bbcPotentialSeepage: 0.0);  // in cm (ibbc=3). This is for zero-tension lysimeters
                else if (LowerBCType == LowerBCTypeOptions.watertable)
                    swim.SetLowerBCForSeepage(LowerBCValue / 10.0);  // in cm (ibbc=4). This is for water tables
                else
                    throw new Exception("Wrong lower boundary condition type");
            }
        }
    }
}
```
            Manager ExtraVariables
```csharp
using APSIM.Core;
using Models.Climate;
using APSIM.Shared.Utilities;
using System.Xml.Serialization;
using Models;
using Models.PMF;
using Models.Soils.Nutrients;
using Models.Soils;
using System.Text;
using System.Collections.Generic;
using Models.Core;
using System;
using Newtonsoft.Json;

namespace Models
{
    [Serializable] 
    public class Script : Model, IStructureDependency
    {
        [Link] private Clock Clock;
        [Link] private Soils.Soil Soil;
        [Link] private Models.Surface.SurfaceOrganicMatter SOM;
        [Link] private Weather Met;
        [Link] private Fertiliser Fert;
        [Link] private Irrigation Irrig;
        [Link] private Plant Maize;
        [Link] private Zone zone;
        public IStructure Structure { private get; set; }
                    
        [JsonIgnore] public bool InitialDay { get; set; }
        [JsonIgnore] public double LeafExpandedPosition { get; set; }
        [JsonIgnore] public double LeafAppearedPosition { get; set; }
        [JsonIgnore] public double ExpandedLeafNoYesterday { get; set; }
        [JsonIgnore] public double AppearedLeafNoYesterday { get; set; }
        [JsonIgnore] public double MostRecentlyExpandedLeafSize { get; set; }
        [JsonIgnore] public double MostRecentlyAppearedLeafMaxSize { get; set; }
        

        

        [EventSubscribe("StartOfSimulation")]
        private void OnSimulationCommencing(object sender, EventArgs e)
        {
            InitialDay = true;
            LeafExpandedPosition = 0;
            LeafAppearedPosition = 0;
            ExpandedLeafNoYesterday = 0;
            AppearedLeafNoYesterday = 0;
            MostRecentlyExpandedLeafSize = 0;
            MostRecentlyAppearedLeafMaxSize = 0;
        }
        
        [EventSubscribe("DoManagement")]
        private void OnDoManagement(object sender, EventArgs e)
        {
        }
        
        [EventSubscribe("DoManagementCalculations")]
        private void OnDoManagementCalculations(object sender, EventArgs e)
        {
           
            if (Convert.ToDouble(Structure.Get("Maize.Leaf.ExpandedCohortNo", relativeTo: zone)) > ExpandedLeafNoYesterday)
            {
                LeafExpandedPosition = Convert.ToDouble(Structure.Get("Maize.Leaf.ExpandedCohortNo", relativeTo: zone));
                MostRecentlyExpandedLeafSize = (double)Structure.Get("Maize.Leaf.CohortSize[" + (int)LeafExpandedPosition + "]", relativeTo: zone);
            }
             
            if (Convert.ToDouble(Structure.Get("Maize.Leaf.AppearedCohortNo", relativeTo: zone)) > AppearedLeafNoYesterday)
            {
                LeafAppearedPosition = Convert.ToDouble(Structure.Get("Maize.Leaf.AppearedCohortNo", relativeTo: zone));
                MostRecentlyAppearedLeafMaxSize = (double)Structure.Get("Maize.Leaf.CohortParameters.MaxArea.Value()", relativeTo: zone);
            }

        }
    }
}
```
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