Simulations: Version=26
  Replacements
    Soil WURSoil: SoilType=Sand; Latitude=-27.581836; Longitude=151.320206
      Water
        Thickness  BD   AirDry  LL15  DUL   SAT   KS
        150        1.4  0.05    0.1   0.25  0.35  100
        150        1.4  0.05    0.1   0.25  0.35  100
        300        1.4  0.05    0.1   0.25  0.35  100
        300        1.4  0.05    0.1   0.2   0.3   100
        300        1.4  0.05    0.1   0.2   0.3   100
        300        1.4  0.05    0.1   0.2   0.3   100
        300        1.4  0.05    0.1   0.2   0.3   100
        SoilCrop WheatSoil: LL=[0.1, 0.1, 0.1, 0.1, 0.1, 0.1, 0.1]; KL=[0.06, 0.06, 0.06, 0.04, 0.04, 0.04, 0.04]; XF=[1, 1, 1, 1, 1, 1, 1]
        SoilCrop MaizeSoil: LL=[0.1, 0.1, 0.1, 0.1, 0.1, 0.1, 0.1]; KL=[0.06, 0.06, 0.06, 0.04, 0.04, 0.04, 0.04]; XF=[1, 1, 1, 1, 1, 1, 1]
      SoilWater: SummerDate=1-Mar; SummerU=2; SummerCona=2; WinterDate=1-Nov; WinterU=2; WinterCona=2; DiffusConst=40; DiffusSlope=16; Salb=0.18; CN2Bare=65; CNRed=20; CNCov=0.8; max_pond=0; Thickness=[150, 150, 300, 300, 300, 300, 300]; SWCON=[0.3, 0.3, 0.3, 0.3, 0.3, 0.3, 0.3]; residueinterception=0
      SoilNitrogen: fom_type=[default, manure, mucuna, lablab, shemp, stable]; fract_carb=[0.2, 0.3, 0.54, 0.57, 0.45, 0]; fract_cell=[0.7, 0.3, 0.37, 0.37, 0.47, 0.1]; fract_lign=[0.1, 0.4, 0.09, 0.06, 0.08, 0.9]
      SoilOrganicMatter: RootCN=40; RootWt=1000; SoilCN=14; EnrACoeff=7.4; EnrBCoeff=0.2; OCUnits=Total
        Thickness  OC    FBiom  FInert
        150        3     0.04   0.4
        150        0.96  0.02   0.6
        300        0.6   0.02   0.8
        300        0.3   0.02   1
        300        0.18  0.01   1
        300        0.12  0.01   1
        300        0.12  0.01   1
      Analysis: Thickness=[150, 150, 300, 300, 300, 300, 300]; PH=[8, 8, 8, 8, 8, 8, 8]; PHUnits=Water; BoronUnits=HotWater
      InitialWater: PercentMethod=EvenlyDistributed; FractionFull=1
      Sample InitialN: NO3Units=ppm; NH4Units=ppm; SWUnits=Volumetric; OCUnits=Total; PHUnits=Water
        Thickness  NO3  NH4
        150        10   0.1
        150        1    0.1
        300        1    0.1
        300        1    0.1
        300        1    0.1
        300        1    0.1
        300        1    0.1
      CERESSoilTemperature
    Report WURReport: EventNames=[Clock].DoReport
      VariableNames:
        [Clock].Today
        [Maize].Phenology.Photoperiod.Value()
        [Maize].Phenology.CurrentStageName
        [Maize].AboveGround.Wt
        [Maize].AboveGround.N
        [Maize].EarLive.Wt
        [Maize].Grain.Wt
        [Maize].Grain.Size
        [Maize].Grain.NumberFunction.Value()
        [Maize].Grain.N
        [Maize].Leaf.LAI
        [Maize].Leaf.Fw
        [Maize].Leaf.Fn
        [Maize].Leaf.Transpiration
        [Maize].Leaf.CoverTotal
        [Maize].Structure.LeafTipsAppeared
        [Maize].Leaf.ExpandedCohortNo
        [Maize].Structure.Height
        [Maize].Total.Wt
        sum([Soil].SoilWater.SWmm) as SWTot
        [Wheat].Phenology.Zadok.Stage
        [Wheat].Phenology.CurrentStageName
        [Wheat].AboveGround.Wt
        [Wheat].AboveGround.N
        [Wheat].Ear.Wt
        [Wheat].Grain.Total.Wt*10 as Yield
        [Wheat].Grain.Protein
        [Wheat].Grain.Size
        [Wheat].Grain.Number
        [Wheat].Grain.Total.Wt
        [Wheat].Grain.Total.N
        [Wheat].Leaf.LAI
        [Wheat].Total.Wt
        [Wheat].Leaf.Fw
        [Wheat].Leaf.Fn
        [Wheat].Root.Depth
        [Wheat].Leaf.Transpiration
        [Wheat].Leaf.CoverTotal
        [Wheat].Structure.LeafTipsAppeared
        [Wheat].Leaf.ExpandedCohortNo
        [Wheat].Structure.Height
        [Soil].SoilWater.Drainage
  DataStore
    ExcelInput Observed: FileName=Observed.xlsx; SheetNames=[Observed]
  Folder ScopingTest
    Simulation MicrometInFields
      Clock: StartDate=1900-01-01; EndDate=1900-12-31
      Summary SummaryFile
      Weather: FileName=%root%\Examples\WeatherFiles\Dalby.met
      Zone Field1: Area=1; Slope=0
        Report: EventNames=[Clock].DoReport
          VariableNames:
            [Clock].Today
            [Wheat].EP
        Fertiliser
        Soil: ASCOrder=Vertosol; ASCSubOrder=Black; SoilType=Clay; Site=Norwin; NearestTown=Norwin; Region=Darling Downs and Granite Belt; State=Queensland; Country=Australia; NaturalVegetation=Qld. Bluegrass, possible Qld. Blue gum; ApsoilNumber=900; Latitude=-27.581836; Longitude=151.320206; LocationAccuracy=+/- 20m
          DataSource=CSIRO Sustainable Ecosystems, Toowoomba; Characteriesd as part of the GRDC funded project"Doing it better, doing it smarter, managing soil water in Australian agriculture' 2011
          Comments=OC, CLL for all crops estimated-based on Bongeen Mywybilla Soil No1
          Water
            Thickness  BD       AirDry    LL15      DUL       SAT       KS
            150        1.01056  0.13025   0.2605    0.521     0.588655  20
            150        1.07146  0.198689  0.248362  0.496723  0.565677  20
            300        1.09394  0.28      0.28      0.488438  0.557193  20
            300        1.15861  0.28      0.28      0.480297  0.532787  20
            300        1.17301  0.28      0.28      0.471584  0.527354  20
            300        1.16287  0.28      0.28      0.457071  0.53118   20
            300        1.1875   0.28      0.28      0.452332  0.521888  20
            SoilCrop WheatSoil: LL=[0.261, 0.248, 0.28, 0.306, 0.36, 0.392, 0.446]; KL=[0.06, 0.06, 0.06, 0.04, 0.04, 0.02, 0.01]; XF=[1, 1, 1, 1, 1, 1, 1]
          SoilWater: SummerDate=1-Nov; SummerU=5; SummerCona=5; WinterDate=1-Apr; WinterU=5; WinterCona=5; DiffusConst=40; DiffusSlope=16; Salb=0.12; CN2Bare=73; CNRed=20; CNCov=0.8; max_pond=0; Thickness=[150, 150, 300, 300, 300, 300, 300]; SWCON=[0.3, 0.3, 0.3, 0.3, 0.3, 0.3, 0.3]; residueinterception=0
          SoilNitrogen: fom_type=[default, manure, mucuna, lablab, shemp, stable]; fract_carb=[0.2, 0.3, 0.54, 0.57, 0.45, 0]; fract_cell=[0.7, 0.3, 0.37, 0.37, 0.47, 0.1]; fract_lign=[0.1, 0.4, 0.09, 0.06, 0.08, 0.9]
          SoilOrganicMatter: RootCN=40; RootWt=1000; SoilCN=12; EnrACoeff=7.4; EnrBCoeff=0.2; OCUnits=Total
            Thickness  OC    FBiom  FInert
            150        1.2   0.04   0.4
            150        0.96  0.02   0.6
            300        0.6   0.02   0.8
            300        0.3   0.02   1
            300        0.18  0.01   1
            300        0.12  0.01   1
            300        0.12  0.01   1
          Analysis: Thickness=[150, 150, 300, 300, 300, 300, 300]; PH=[8, 8, 8, 8, 8, 8, 8]; PHUnits=Water; BoronUnits=HotWater
          InitialWater: PercentMethod=EvenlyDistributed; FractionFull=1
          Sample InitialN: NO3Units=ppm; NH4Units=ppm; SWUnits=Volumetric; OCUnits=Total; PHUnits=Water
            Thickness  NO3  NH4
            150        1    0.1
            150        1    0.1
            300        1    0.1
            300        1    0.1
            300        1    0.1
            300        1    0.1
            300        1    0.1
          CERESSoilTemperature
        SurfaceOrganicMatter: PoolName=wheat_stubble; type=wheat; mass=500; standing_fraction=0; cnr=100; CriticalResidueWeight=2000; OptimumDecompTemp=20; MaxCumulativeEOS=20; CNRatioDecompCoeff=0.277; CNRatioDecompThreshold=25; TotalLeachRain=25; MinRainToLeach=10; CriticalMinimumOrganicC=0.004; DefaultCPRatio=0; DefaultStandingFraction=0; StandingExtinctCoeff=0.5; FractionFaecesAdded=0.5
          Pools:
            {PoolName=wheat_stubble, ResidueType=wheat, Mass=500, CNRatio=100, StandingFraction=0}
          ResidueTypes: LoadFromResource=ResidueTypes
        Plant Wheat: CropType=Wheat
          Memo TitlePage
            # The APSIM Wheat Model

            _Brown, H.E., Huth, N.I. and Holzworth, D.P._

            The APSIM wheat model has been developed using the Plant Modelling Framework (PMF) of [brown_plant_2014]. This new framework provides a library of plant organ and process submodels that can be coupled, at runtime, to construct a model in much the same way that models can be coupled to construct a simulation. This means that dynamic composition of lower level process and organ classes (e.g. photosynthesis, leaf) into larger constructions (e.g. maize, wheat, sorghum) can be achieved by the model developer without additional coding.

            The model consists of:

            * a phenology model to simulate development between developmental phases
            * a structure model to simulate plant morphology
            * a collection of organs to simulate the various plant parts
            * an arbitrator to allocate resources (N, biomass) to the various plant organs
          OrganArbitrator Arbitrator
            RelativeAllocation NArbitrator
            RelativeAllocation DMArbitrator
          Phenology: DaysAfterSowing=0
            Memo
              Wheat exhibits a range of developmental responses to environment and these are strongly influences by genotype characteristics.
              Temperature effects development increasing development rates and decreasing phase durations as temperatures increase.  Theset affects are captured by thermal time, .  However, wheat also exhibits vernalisation and photoperiod sensitivities in its Vegetative phase and further photoperiod sensitivity in the EarlyReproducivePhase.  Photoperiod responses are seen as a reduction in the length of a phase for a photoperiod sensitive genotype in response to a longer photoperiod.  Vernalisation responses are more complicated as they are driven by temperature but interact with photoperiod.  For vernalisation sensitive varieties (Winter types) exposure to cool temperatures or short photoperiods during the Vegetative phase will reduce the thermal time duration of the vegetative phase.

              We draw on the Kirby Framework to capture these vernalisation and photoperiod responses.  This framework assumes that the timing of anthesis is a result of the timing of flag leaf and an additional thermal time passage from there to anthesis.  It also assumes the timing of flag leaf is a result of the Final Leaf Number which sets a target, and leaf appearance rate, which sets the rate of progress toward this target.  Leaf appearance rate is a function of Thermal time and a genotype specific Phyllochron which changes with Haun stage as described by [Jamieson_LeafAppearance_1995].

              Final Leaf Number (FLN) is modeled as the sum of three numbers:

              FLN = MinLeafNumber + VernalLeaves + PhotoLeaves

              Where MinLeafNumber is the number of leaves that a wheat crop will produce when vernalisation is satisified early in the crops duration (before 2nd true leaf) and it is grown in a long photoperiod..  VernalLeaves are the number of leaves that are added due to vernalisation effects.  For insensitive varieties this will always be zero but this is potentially a larger number for sensitivie varieties and the number progresively decreases as the crop encounters more vernalisation.  PhotoLeaves are the number of leaves that are added to the minimum leaf number as a result of short day exposure.  For insensitive varieties this will be zero but is potential larger for more sensitivie varieties and decreases as day length increases.  More detailed explinations of the components of phenology are provided below.
            DivideFunction MeanTemp
              AddFunction TempSum
                VariableReference MaxT: VariableName=[IWeather].MaxT
                VariableReference MinT: VariableName=[IWeather].MinT
              Constant Two: FixedValue=2
            AirTemperatureFunction ThermalTime
              XYPairs: X=[0, 26, 37]; Y=[0, 26, 0]
              Memo
                Thermal time determines the rate of developmental progress through many of the crops phases and is used by organs to determing potential growth rates.
            MultiplyFunction DailyVernalisation
              Memo
                Vernalisation responses are based on those described by [Brown_Anthesis_2013].   Vernalisation is assumed to be related to the expression of the Vrn1 Gene.  Its experssion is accumulated daily and daily upregulation as a function of development (DeltaHaunStage) and a TempResponseProfile that declines exponentially from a maximum at 1<sup>o</sup>C to zero at 0<sup>o</sup>C and at 18<sup>o</sup>C.
              VariableReference DeltaHaunStage: VariableName=[Structure].DeltaHaunStage
              AirTemperatureFunction TempResponseProfile
                XYPairs
                  X=[0, 1, 2, 3, 4, 5, 6, 7, 8, 9, 10, 11, 12, 13, 14, 15, 16, 17, 18, 19, 20, 30, 32]
                  Y=[0, 1.205, 1.037, 0.893, 0.768, 0.661, 0.569, 0.49, 0.422, 0.363, 0.312, 0.269, 0.231, 0.199, 0.171, 0.148, 0.127, 0.109, 0.094, 0.081, 0, 0, -0.5]
            PhotoperiodFunction Photoperiod: Twilight=-6; DayLength=0
            PhaseLookup PerceivedPhotoPeriod
              PhaseLookupValue ApexBelowGround: Start=Germination; End=Emergence
                Constant Photoperiod: FixedValue=0; Units=h
              PhaseLookupValue ApexAboveGround: Start=Emergence; End=HarvestRipe
                VariableReference Photoperiod: VariableName=[Phenology].Photoperiod.Value()
            MinimumFunction Vrn1
              Memo
                Vrn1 accumulation begins when Vrn4 experssion is down regulated to zero and stops, assuming vernalisation saturation, at a value of 1
              Constant Saturation: FixedValue=1; Units=Relative Experssion
              AccumulateFunction CurrentExpression: StartStageName=Germination; EndStageName=TerminalSpikelet; FractionRemovedOnCut=0; FractionRemovedOnHarvest=0; FractionRemovedOnGraze=0; FractionRemovedOnPrune=0
                LessThanFunction Vernalisation
                  VariableReference If_Vrn4: VariableName=[Phenology].Vrn4.Value()
                  VariableReference IsLessThanLag: VariableName=[Phenology].VernLag.Value()
                  Constant Return_Zero: FixedValue=0
                  VariableReference elseReturn_Vernalisation: VariableName=[Phenology].DailyVernalisation.Value()
            MinimumFunction Vrn4
              VariableReference MaxExpression: VariableName=[Phenology].VernLag.Value()
              AccumulateFunction CurrentExpression: StartStageName=Germination; EndStageName=TerminalSpikelet; FractionRemovedOnCut=0; FractionRemovedOnHarvest=0; FractionRemovedOnGraze=0; FractionRemovedOnPrune=0
                VariableReference VernalisationConditioning: VariableName=[Phenology].DailyVernalisation.Value()
            Constant MinimumLeafNumber: FixedValue=7; Units=Leaves
              Memo
                Number of leaves the plant will produce when fully vernalised early and grown in long photoperiod
            Constant VrnSensitivity: FixedValue=0; Units=Leaves
              Memo
                The difference between Inherent earlyness leaf number and the number of leaves produced when the plant is unvernalised and grown in long photoperiod
            Constant VernLag: FixedValue=1; Units=Unitless
              Memo
                The amount of vernalising temperature required before vernalisation response will be evident.  Value of relative to the amount offl vernalisation temperature required from the end of the lag until vernalisation saturation.  A value of 0 means there is no lag, a value of 1 means the lag is the same (in vernal time) as the vernalisation requirement and a value of 2 means the lag is twice as long as the vernalisation response phase
            Constant PpSensitivity: FixedValue=3; Units=Leaves
              Memo
                The reduction in leaf number going from 8 to 16 h Pp
            Constant EarlyReproductivePpSensitivity: FixedValue=0
              Memo
                The phyllochrons duration for the plant to go from flag leaf ligual appearance at 16 h Pp compared to the phyllochron duration for the same phase at 8 h Pp.
            Constant EarlyReproductiveLongDayBase: FixedValue=2.5
              Memo
                The phyllochrons duration for the plant to go from flag leaf ligual appearance at 16 h Pp.
            GerminatingPhase Germinating: Start=Sowing; End=Germination
            EmergingPhase Emerging: Start=Germination; End=Emergence; ShootLag=40; ShootRate=1.5
              VariableReference ThermalTime: VariableName=[Phenology].ThermalTime.Value()
            NodeNumberPhase Vegetative: Start=Emergence; End=TerminalSpikelet
              VariableReference ThermalTime: VariableName=[Phenology].ThermalTime.Value()
              VariableReference CompletionNodeNumber: VariableName=[Structure].HaunStageTerminalSpikelet.Value()
            LeafAppearancePhase StemElongation: Start=TerminalSpikelet; End=FlagLeaf
              Memo
                The Final leaf number is fixed at Terminal Spikelet and leaves contune to appear at a rate set by thermal time and phyllochron until flag leaf liguale appears and this phase is completed.
              VariableReference ThermalTime: VariableName=[Phenology].ThermalTime.Value()
            GenericPhase EarlyReproductive: Start=FlagLeaf; End=Flowering
              VariableReference ThermalTime: VariableName=[Phenology].ThermalTime.Value()
              MultiplyFunction Target
                VariableReference Phyllochron: VariableName=[Structure].Phyllochron.BasePhyllochron.Value()
                AddFunction Phyllochrons
                  VariableReference LongDayBase: VariableName=[Phenology].EarlyReproductiveLongDayBase.Value()
                  MultiplyFunction IncreaseDueToShortPhotoPeriod
                    LinearInterpolationFunction PhotoPeriodResponse: XProperty=[Phenology].Photoperiod.Value()
                      XYPairs: X=[11, 16]; Y=[1, 0]
                    VariableReference PpSensitivity: VariableName=[Phenology].EarlyReproductivePpSensitivity.Value()
            GenericPhase GrainDevelopment: Start=Flowering; End=StartGrainFill
              Constant Target: FixedValue=120
              VariableReference ThermalTime: VariableName=[Phenology].ThermalTime.Value()
            GenericPhase GrainFilling: Start=StartGrainFill; End=EndGrainFill
              Constant Target: FixedValue=545
              VariableReference ThermalTime: VariableName=[Phenology].ThermalTime.Value()
            GenericPhase Maturing: Start=EndGrainFill; End=Maturity
              Constant Target: FixedValue=35
              VariableReference ThermalTime: VariableName=[Phenology].ThermalTime.Value()
            GenericPhase Ripening: Start=Maturity; End=HarvestRipe
              Constant Target: FixedValue=300
              VariableReference ThermalTime: VariableName=[Phenology].ThermalTime.Value()
            EndPhase ReadyForHarvesting: Start=HarvestRipe; End=Unused
              VariableReference ThermalTime: VariableName=[Phenology].ThermalTime.Value()
            ZadokPMF Zadok
            OnEventFunction FlagLeafDAS: SetEvent=FlagLeaf; ReSetEvent=never
              Memo
                A function is used to provide flowering date as days after sowing(DAS).
              Constant PreEventValue: FixedValue=0
              VariableReference PostEventValue: VariableName=[Phenology].DaysAfterSowing
            OnEventFunction FloweringDAS: SetEvent=Flowering; ReSetEvent=never
              Memo
                A function is used to provide flowering date as days after sowing(DAS).
              Constant PreEventValue: FixedValue=0
              VariableReference PostEventValue: VariableName=[Phenology].DaysAfterSowing
            OnEventFunction MaturityDAS: SetEvent=Maturity; ReSetEvent=never
              Memo
                A function is used to provide maturity date as days after sowing(DAS).
              Constant PreEventValue: FixedValue=0
              VariableReference PostEventValue: VariableName=[Phenology].DaysAfterSowing
          Structure: Initialised=false; Germinated=false; Emerged=false; CohortToInitialise=0; TipToAppear=0; ApexNum=0
            VariableReference ThermalTime: VariableName=[Phenology].ThermalTime.Value()
            MultiplyFunction Phyllochron
              Memo Rational
                This is the thermal time between the emergence of leaf tips.  The model used here is based on [Jamieson_SIRIUS_1998] where leaf appearace could be described by a base phyllochron determined between leaves 2 and 7 and a phyllochron that was 70% of base phyllochron for leaves < 2 and 130% of base phyllochron for leaves > 7
              LinearInterpolationFunction LeafStageFactor: XProperty=[Leaf].AppearedCohortNo
                XYPairs: X=[0, 2, 3, 7, 8, 11, 12]; Y=[0.75, 0.75, 1, 1, 1.4, 1.4, 1.4]
              Constant BasePhyllochron: FixedValue=120; Units=oC.d
              LinearInterpolationFunction PhotoPeriodEffect: XProperty=[Phenology].Photoperiod.Value()
                XYPairs: X=[8, 12, 14]; Y=[1.6, 1, 1]
            MultiplyFunction BranchingRate
              Memo
                Potential branching rate is determined by the commonly observed pattern of tillering in wheat, in which each tiller emerges with the third leaf on its parent axis (e.g. first tiller emerges at the same time as the third leaf on the main stem, the first secondary tiller appears with the third leaf on tiller 1).  This is described as a simple function of main stem leaf number.
              PhaseLookup PotentialBranchingRate
                PhaseLookupValue Vegetative: Start=Emergence; End=TerminalSpikelet
                  LinearInterpolationFunction PotentialBranchingRate: XProperty=[Structure].LeafTipsAppeared
                    XYPairs: X=[1, 2, 3, 4, 5, 6, 7, 8]; Y=[0, 0, 1, 2, 4, 7, 12, 20]
                PhaseLookupValue Reproductive: Start=TerminalSpikelet; End=HarvestRipe
                  Constant Zero: FixedValue=0
              MinimumFunction StressFactors
                LinearInterpolationFunction NitrogenEffect: XProperty=[Arbitrator].FN
                  Memo
                    Inadequate Nitrogen supply is assumed to affect tillering prior to any effect on photosynthesis or leaf size.
                  XYPairs: X=[0.5, 2, 3]; Y=[0, 1, 1]
                LinearInterpolationFunction CoverEffect: XProperty=[Leaf].CoverTotal
                  Memo
                    Tillering is said to cease once a threshold fraction of incoming radiation has been achieved.  This captures shading effects on tillering described by [evers2006cessation].
                  XYPairs: X=[0, 0.1, 0.25]; Y=[1, 1, 0]
                LinearInterpolationFunction WaterStressEffect: XProperty=[Root].WaterTensionFactor
                  XYPairs: X=[0, 1]; Y=[0, 1]
            PhaseLookup BranchMortality
              PhaseLookupValue MortalityPhase: Start=FlagLeaf; End=Flowering
                MultiplyFunction Mortality
                  LinearInterpolationFunction MortalityPerDegDay: XProperty=[Structure].MeanTillerGrowthRate.Value()
                    XYPairs: X=[0, 0.005]; Y=[0.002, 0]
                  VariableReference ThermalTime: VariableName=[Phenology].ThermalTime.Value()
            HeightFunction HeightModel
              LinearInterpolationFunction PotentialHeight: XProperty=[Phenology].Stage
                XYPairs: X=[3, 4, 5, 6, 7]; Y=[10, 200, 1000, 1100, 1200]
              LinearInterpolationFunction WaterStress: XProperty=[Leaf].Fw
                XYPairs: X=[0.3, 1]; Y=[0, 1]
            MovingAverageFunction MeanTillerGrowthRate: NumberOfDays=5; StageToStartMovingAverage=Emergence
              Memo
                This is calculated to represent the supply of asslimilate to individual tillers over the past 5 days to use as an index to determine tiller mortality.  When tiller numbers are high or total crop assimilate supply is small there will not be enough assimilate to maintain all of the tillers so the model will senesce some.
              DivideFunction TillerGrowthRate
                VariableReference DailyGrowth: VariableName=[Arbitrator].DM.TotalFixationSupply
                VariableReference ThermalTime: VariableName=[Phenology].ThermalTime.Value()
                VariableReference StemPopulation: VariableName=[Structure].TotalStemPopn
            MovingAverageFunction MeanPhyllochron: NumberOfDays=300; StageToStartMovingAverage=Emergence
              VariableReference Phyllochron: VariableName=[Structure].Phyllochron.Value()
            HoldFunction FinalLeafNumber: WhenToHold=TerminalSpikelet
              AddFunction FinalNodeNumber
                VariableReference MinLeafNumber: VariableName=[Phenology].MinimumLeafNumber.Value()
                MultiplyFunction VernalLeaves
                  VariableReference UnVernalisedLeaves: VariableName=[Phenology].VrnSensitivity.Value()
                  SubtractFunction VernalisationReductionFactor
                    Constant One: FixedValue=1
                    VariableReference RelativeVrn1Expression: VariableName=[Phenology].Vrn1.Value()
                MultiplyFunction PhotoPLeaves
                  VariableReference ShortPpLeaves: VariableName=[Phenology].PpSensitivity.Value()
                  LinearInterpolationFunction PhotoPeriodReductionFactor: XProperty=[Phenology].Photoperiod.Value()
                    XYPairs: X=[10, 16]; Y=[1, 0]
            ExpressionFunction HaunStageTerminalSpikelet: Expression=([Structure].FinalLeafNumber.Value() - 2.85)/1.1
              Memo
                The Haun stage at which Terminal Spikelet occurs is determined from final leaf number using the approach described in [Brown_Anthesis_2013].
            AddFunction HaunStage
              VariableReference AppearedLeaves: VariableName=[Leaf].ExpandedCohortNo
              VariableReference ProportionOfExpandingLeaf: VariableName=[Leaf].NextExpandingLeafProportion
            Constant StemSenescenceAge: FixedValue=0
          ReproductiveOrgan Grain: GrowthRespiration=0; MaintenanceRespiration=0; RipeStage=Ripe
            HoldFunction NumberFunction: WhenToHold=Flowering
              MultiplyFunction GrainNumber
                Constant GrainsPerGramOfStem: FixedValue=26; Units=grains
                VariableReference StemMass: VariableName=[StemPlusSpike].Wt
            Constant DMConversionEfficiency: FixedValue=1
            Constant RemobilisationCost: FixedValue=0
            Constant InitialGrainProportion: FixedValue=0.05
            Constant MaximumPotentialGrainSize: FixedValue=0.05; Units=g
            PhaseLookup DMDemandFunction
              PhaseLookupValue InitialPhase: Start=Flowering; End=StartGrainFill
                FillingRateFunction
                  VariableReference NumberFunction: VariableName=[Grain].NumberFunction.Value()
                  VariableReference FillingDuration: VariableName=[Phenology].GrainDevelopment.Target.Value()
                  VariableReference ThermalTime: VariableName=[Phenology].ThermalTime.Value()
                  MultiplyFunction PotentialSizeIncrement
                    VariableReference InitialProportion: VariableName=[Grain].InitialGrainProportion.Value()
                    VariableReference MaximumSize: VariableName=[Grain].MaximumPotentialGrainSize.Value()
              PhaseLookupValue LinearPhase: Start=StartGrainFill; End=EndGrainFill
                FillingRateFunction
                  VariableReference NumberFunction: VariableName=[Grain].NumberFunction.Value()
                  VariableReference FillingDuration: VariableName=[Phenology].GrainFilling.Target.Value()
                  VariableReference ThermalTime: VariableName=[Phenology].ThermalTime.Value()
                  MultiplyFunction PotentialSizeIncrement
                    SubtractFunction ProportionLinearPhase
                      Constant One: FixedValue=1
                      VariableReference InitialProportion: VariableName=[Grain].InitialGrainProportion.Value()
                    VariableReference MaximumSize: VariableName=[Grain].MaximumPotentialGrainSize.Value()
            Constant MinimumNConc: FixedValue=0.0123
            Constant MaxNConcDailyGrowth: FixedValue=0.03
            Constant MaximumNConc: FixedValue=0.03
            PhaseLookup NFillingRate
              PhaseLookupValue GrainFilling: Start=Flowering; End=EndGrainFill
                FillingRateFunction
                  VariableReference NumberFunction: VariableName=[Grain].NumberFunction.Value()
                  AddFunction FillingDuration
                    VariableReference FloweringToGrainFilling: VariableName=[Phenology].GrainDevelopment.Target.Value()
                    VariableReference GrainFilling: VariableName=[Phenology].GrainFilling.Target.Value()
                  VariableReference ThermalTime: VariableName=[Phenology].ThermalTime.Value()
                  MultiplyFunction PotentialSizeIncrement
                    VariableReference MaximumSize: VariableName=[Grain].MaximumPotentialGrainSize.Value()
                    VariableReference MaximumNConc: VariableName=[Grain].MaximumNConc.Value()
            Constant WaterContent: FixedValue=0.12
            AccumulateFunction AccumThermalTime: StartStageName=Flowering; EndStageName=Maturity; FractionRemovedOnCut=0; FractionRemovedOnHarvest=0; FractionRemovedOnGraze=0; FractionRemovedOnPrune=0
              VariableReference DailyThermalTimeValue: VariableName=[Phenology].ThermalTime.Value()
            ExpressionFunction Protein
              Expression=([Grain].Live.N + [Grain].Dead.N)/([Grain].Live.Wt + [Grain].Dead.Wt) * 100 * 5.71
            BiomassRemoval BiomassRemovalDefaults
              OrganBiomassRemovalType Harvest: FractionLiveToRemove=1; FractionDeadToRemove=0; FractionLiveToResidue=0; FractionDeadToResidue=0
              OrganBiomassRemovalType Cut: FractionLiveToRemove=1; FractionDeadToRemove=0; FractionLiveToResidue=0; FractionDeadToResidue=0
              OrganBiomassRemovalType Prune: FractionLiveToRemove=0; FractionDeadToRemove=0; FractionLiveToResidue=0.8; FractionDeadToResidue=0
              OrganBiomassRemovalType Graze: FractionLiveToRemove=0.6; FractionDeadToRemove=0; FractionLiveToResidue=0.2; FractionDeadToResidue=0
              OrganBiomassRemovalType Thin: FractionLiveToRemove=0; FractionDeadToRemove=0; FractionLiveToResidue=0.05; FractionDeadToResidue=0
            Constant CarbonConcentration: FixedValue=0.4
            Live Biomass
            Dead Biomass
          Root: GrowthRespiration=0; MaintenanceRespiration=0
            Constant DMConversionEfficiency: FixedValue=1
            Constant RemobilisationCost: FixedValue=0
            Constant KLModifier: FixedValue=1
            Constant SoilWaterEffect: FixedValue=1
            Constant MaxDailyNUptake: FixedValue=20
            Constant SenescenceRate: FixedValue=0.005
            Constant StructuralFraction: FixedValue=1
            Constant MaximumRootDepth: FixedValue=1000000
            Constant MaximumNConc: FixedValue=0.01
            Constant MinimumNConc: FixedValue=0.01
            PhaseBasedSwitch NitrogenDemandSwitch: Start=Germination; End=Maturity
            BiomassRemoval BiomassRemovalDefaults
              OrganBiomassRemovalType Harvest: FractionLiveToRemove=0; FractionDeadToRemove=0; FractionLiveToResidue=0.2; FractionDeadToResidue=0
              OrganBiomassRemovalType Cut: FractionLiveToRemove=0; FractionDeadToRemove=0; FractionLiveToResidue=0.3; FractionDeadToResidue=0
              OrganBiomassRemovalType Prune: FractionLiveToRemove=0; FractionDeadToRemove=0; FractionLiveToResidue=0.1; FractionDeadToResidue=0
              OrganBiomassRemovalType Graze: FractionLiveToRemove=0; FractionDeadToRemove=0; FractionLiveToResidue=0.15; FractionDeadToResidue=0
              OrganBiomassRemovalType Thin: FractionLiveToRemove=0; FractionDeadToRemove=0; FractionLiveToResidue=0.05; FractionDeadToResidue=0
            Constant KNO3: FixedValue=0.02
            Constant KNH4: FixedValue=0.01
            Constant InitialDM: FixedValue=0.005; Units=g/plant
            Constant SpecificRootLength: FixedValue=105; Units=m/g
            MultiplyFunction RootFrontVelocity
              PhaseLookup PotentialRootFrontVelocity
                PhaseLookupValue PreEmergence: Start=Germination; End=Emergence
                  Constant Value: FixedValue=5; Units=mm/d
                PhaseLookupValue PostEmergence: Start=Emergence; End=Maturity
                  Constant Value: FixedValue=20; Units=mm/d
              WeightedTemperatureFunction TemperatureFactor: MaximumTemperatureWeighting=0.5
                XYPairs: X=[0, 15, 25, 35]; Y=[0, 1, 1, 0]
              LinearInterpolationFunction WaterFactor: XProperty=[SoilWaterScale]
                SoilWaterScale
                XYPairs: X=[0, 0.25, 1]; Y=[0, 1, 1]
            LinearInterpolationFunction NUptakeSWFactor: XProperty=[SoilWaterScale]
              SoilWaterScale
              XYPairs: X=[0, 1]; Y=[0, 1]
              Memo
                This is modelled in the same way as the old wheat model where potential N uptake is decreased as the soil dries as described by NUptakeSWFactor
            PartitionFractionDemandFunction DMDemandFunction
              PhaseLookup PartitionFraction
                PhaseLookupValue PreEmergence: Start=Germination; End=Emergence
                  Constant Value: FixedValue=0
                PhaseLookupValue PreFlowering: Start=Emergence; End=Flowering
                  LinearInterpolationFunction AgeFactor: XProperty=[Phenology].Stage
                    XYPairs: X=[3, 4]; Y=[0.5, 0.2]
                PhaseLookupValue PostFlowering: Start=Flowering; End=EndGrainFill
                  Constant Value: FixedValue=0.2
            Constant CarbonConcentration: FixedValue=0.4
            Constant MaintenanceRespirationFunction: FixedValue=0
          Leaf: MaxCover=1; Albedo=0.25; Gsmax=0.011; R50=150; MicroClimatePresent=true; KDead=0.3; MaximumMainStemLeafNumber=30
            zero: GrowthRespiration, MaintenanceRespiration, CurrentExpandingLeaf, StartFractionExpanded, FractionNextleafExpanded, DeadNodesYesterday, FRGR, PotentialEP, TipsAtEmergence, CohortsAtInitialisation, FractionDied
            LeafCohort InitialLeaves[1]: Rank=1; Area=200
              zero: NReallocationFactor, DMReallocationFactor, NRetranslocationFactor, DMRetranslocationFactor, ShadeInducedSenRate, SenescedFrac, DeltaPotentialArea, DeltaStressConstrainedArea, DeltaCarbonConstrainedArea, PotentialStructuralDMAllocation, PotentialMetabolicDMAllocation, MetabolicNReallocated, MetabolicWtReallocated, StorageNReallocated, StorageWtReallocated, MetabolicNRetranslocated, StorageNRetrasnlocated, DMRetranslocated, MetabolicNAllocation, StructuralDMAllocation, MetabolicDMAllocation, MaintenanceRespiration
            LeafCohort InitialLeaves[2]: Rank=2
              zero: NReallocationFactor, DMReallocationFactor, NRetranslocationFactor, DMRetranslocationFactor, ShadeInducedSenRate, SenescedFrac, DeltaPotentialArea, DeltaStressConstrainedArea, DeltaCarbonConstrainedArea, PotentialStructuralDMAllocation, PotentialMetabolicDMAllocation, MetabolicNReallocated, MetabolicWtReallocated, StorageNReallocated, StorageWtReallocated, MetabolicNRetranslocated, StorageNRetrasnlocated, DMRetranslocated, MetabolicNAllocation, StructuralDMAllocation, MetabolicDMAllocation, Area, MaintenanceRespiration
            ArrayBiomass CohortArrayLive: Propertys=[[Leaf].Live]; ArraySize=[Leaf].MaxNodeNo
            ArrayBiomass CohortArrayDead: Propertys=[[Leaf].Dead]; ArraySize=[Leaf].MaxNodeNo
            LeafCohortParameters CohortParameters: ExpansionStressValue=0
              Constant NReallocationFactor: FixedValue=1
              Constant RemobilisationCost: FixedValue=0
              Constant MaintenanceRespirationFunction: FixedValue=0
              Constant NRetranslocationFactor: FixedValue=0.03
              Constant DMReallocationFactor: FixedValue=1
              Constant DMRetranslocationFactor: FixedValue=1
              MinimumFunction CellDivisionStress
                LinearInterpolationFunction WaterStressEffect: XProperty=[Leaf].Fw
                  XYPairs: X=[0.5, 1]; Y=[0.1, 1]
                LinearInterpolationFunction NitrogenStressEffect: XProperty=[Wheat].Leaf.Fn
                  XYPairs: X=[0, 0.5, 1]; Y=[0.1, 0.1, 1]
              MinimumFunction ExpansionStress
                LinearInterpolationFunction WaterStressEffect: XProperty=[Root].WaterTensionFactor
                  XYPairs: X=[0.1, 1.1, 1.3]; Y=[0, 1, 1]
                LinearInterpolationFunction TemperatureEffect: XProperty=[Phenology].MeanTemp.Value()
                  XYPairs: X=[0, 12, 14]; Y=[0, 1, 1]
                LinearInterpolationFunction NitrogenStressEffect: XProperty=[Wheat].Leaf.Fn
                  XYPairs: X=[0, 0.5, 1]; Y=[0.1, 0.1, 1]
              MultiplyFunction MaxArea
                Constant AreaLargestLeaves: FixedValue=2600; Units=mm^2
                LinearInterpolationFunction AgeFactor: XProperty=[Phenology].Stage
                  XYPairs: X=[3, 3.45, 4]; Y=[0.1, 0.5, 1]
              MultiplyFunction GrowthDuration
                Constant Multiplier: FixedValue=1.3
                VariableReference Phyllochron: VariableName=[Structure].Phyllochron.Value()
              MultiplyFunction LagDuration
                LinearInterpolationFunction AgeFactor: XProperty=[Phenology].Stage
                  XYPairs: X=[3, 4]; Y=[0.4, 1]
                SubtractFunction LastLeafDuration
                  AddFunction ThermalTimeToRipe
                    VariableReference EarlyReproductive: VariableName=[Phenology].EarlyReproductive.Target.Value()
                    VariableReference GrainDevelopment: VariableName=[Phenology].GrainDevelopment.Target.Value()
                    VariableReference GrainFilling: VariableName=[Phenology].GrainFilling.Target.Value()
                    VariableReference Maturing: VariableName=[Phenology].Maturing.Target.Value()
                    VariableReference Ripening: VariableName=[Phenology].Ripening.Target.Value()
                  VariableReference SenescenceDuration: VariableName=[Leaf].CohortParameters.SenescenceDuration.Value()
              MultiplyFunction SenescenceDuration
                Constant Multiplier: FixedValue=3
                VariableReference Phyllochron: VariableName=[Structure].Phyllochron.Value()
              Constant DetachmentLagDuration: FixedValue=1000000
              Constant DetachmentDuration: FixedValue=1000000
              Constant RelativeBranchLeafSize: FixedValue=1
              LinearInterpolationFunction MaximumNConc: XProperty=[Phenology].Stage
                XYPairs: X=[3, 4, 6]; Y=[0.05, 0.05, 0.02]
              MultiplyFunction CriticalNConc
                LinearInterpolationFunction CriticalNConcAt350ppm: XProperty=[Phenology].Stage
                  XYPairs: X=[3, 4, 6]; Y=[0.04, 0.04, 0.015]
                LinearInterpolationFunction CO2Factor: XProperty=[IWeather].CO2
                  XYPairs: X=[350, 700]; Y=[1, 0.93]
              LinearInterpolationFunction MinimumNConc: XProperty=[Phenology].Stage
                XYPairs: X=[3, 4, 6]; Y=[0.01, 0.01, 0.01]
              AddFunction DroughtInducedLagAcceleration
                Constant One: FixedValue=1
                MultiplyFunction Stress
                  Constant StressResponseCoefficient: FixedValue=1
                  LinearInterpolationFunction StressFactor: XProperty=[Leaf].Fw
                    XYPairs: X=[0, 1]; Y=[2, 0]
              AddFunction DroughtInducedSenAcceleration: same as ScopingTest.MicrometInFields.Field1.Wheat.Leaf.CohortParameters.DroughtInducedLagAcceleration
              LinearInterpolationFunction SpecificLeafAreaMax: XProperty=[Phenology].Stage
                XYPairs: X=[3, 4, 6]; Y=[17000, 20000, 17000]
              LinearInterpolationFunction SpecificLeafAreaMin: XProperty=[Leaf].Fn
                XYPairs: X=[0.4, 1]; Y=[14000, 14000]
              Constant InitialNConc: FixedValue=0
              Constant StructuralFraction: FixedValue=0.5
              Constant StorageFraction: FixedValue=0.3
              Constant LeafSizeShapeParameter: FixedValue=0.3
              Constant SenessingLeafRelativeSize: FixedValue=1; Units=0-1
              MultiplyFunction ShadeInducedSenescenceRate
                Constant RatePerDegDay: FixedValue=0
                  Memo
                    1% per degree day means it takes one phyllochron for a shaded leaf to fully sceness
                VariableReference ThermalTime: VariableName=[Phenology].ThermalTime.Value()
              ArrayFunction LagDurationAgeMultiplier: Values=1 1 1
              ArrayFunction SenescenceDurationAgeMultiplier: Values=1 1 1
              ArrayFunction LeafSizeAgeMultiplier: Values=1 1 1 1 1 1 1 1 1 1 1 1
            RUEModel Photosynthesis
              Constant RUE: FixedValue=1.5
              WeightedTemperatureFunction FT: MaximumTemperatureWeighting=0.75
                XYPairs: X=[0, 15, 25, 35]; Y=[0, 1, 1, 0]
              LinearInterpolationFunction FN: XProperty=[Leaf].Fn
                XYPairs: X=[0, 1, 1.5]; Y=[0, 1, 1]
              LinearInterpolationFunction FW: XProperty=[Leaf].Fw
                XYPairs: X=[0, 1, 1]; Y=[0, 1, 1]
              LinearInterpolationFunction FVPD: XProperty=[Photosynthesis].VPD
                XYPairs: X=[0, 10, 40]; Y=[1, 1, 0]
              RUECO2Function FCO2: PhotosyntheticPathway=C3
              VariableReference RadnInt: VariableName=[Leaf].RadIntTot
            Constant FrostFraction: FixedValue=0
            Constant RemobilisationCost: FixedValue=0
            VariableReference ThermalTime: VariableName=[Phenology].ThermalTime.Value()
            MinimumFunction FRGRFunction
              VariableReference RUE_FT: VariableName=[Leaf].Photosynthesis.FT.Value()
              MinimumFunction Others
                VariableReference RUE_FN: VariableName=[Leaf].Photosynthesis.FN.Value()
                VariableReference RUE_FVPD: VariableName=[Leaf].Photosynthesis.FVPD.Value()
            BiomassRemoval BiomassRemovalDefaults
              OrganBiomassRemovalType Harvest: FractionLiveToRemove=0; FractionDeadToRemove=0; FractionLiveToResidue=0.3; FractionDeadToResidue=0.3
              OrganBiomassRemovalType Cut: FractionLiveToRemove=0.8; FractionDeadToRemove=0.8; FractionLiveToResidue=0; FractionDeadToResidue=0
              OrganBiomassRemovalType Prune: FractionLiveToRemove=0; FractionDeadToRemove=0; FractionLiveToResidue=0.6; FractionDeadToResidue=0.6
              OrganBiomassRemovalType Graze: FractionLiveToRemove=0.6; FractionDeadToRemove=0.6; FractionLiveToResidue=0.1; FractionDeadToResidue=0.1
              OrganBiomassRemovalType Thin: FractionLiveToRemove=0; FractionDeadToRemove=0; FractionLiveToResidue=0.05; FractionDeadToResidue=0.05
            MultiplyFunction ExtinctionCoeff
              Constant VegetativePhase: FixedValue=0.5
              LinearInterpolationFunction DevelopmentFactor: XProperty=[Phenology].Stage
                XYPairs: X=[3, 4.7, 5]; Y=[1, 1, 1.2]
                Memo
                  Exntiction coefficient increases at stem extension as leaves become more prostrate
            Constant StructuralFraction: FixedValue=0.5
            Constant DMConversionEfficiency: FixedValue=1
            Constant CarbonConcentration: FixedValue=0.4
            ApexStandard
          GenericOrgan Spike
            PartitionFractionDemandFunction DMDemandFunction
              LinearInterpolationFunction PartitionFraction: XProperty=[Phenology].Stage
                XYPairs: X=[3, 4, 4.7, 5, 7, 7.000001]; Y=[0, 0, 0.01, 0.7, 0.7, 0]
            Constant NReallocationFactor: FixedValue=0
            Constant RemobilisationCost: FixedValue=0
            PhaseLookup NRetranslocationFactor
              PhaseLookupValue EarlyGrowth: Start=Emergence; End=StartGrainFill
                Constant ValueDuringEarlyGrowth: FixedValue=0
              PhaseLookupValue ReproductiveGrowth: Start=StartGrainFill; End=EndGrainFill
                Constant ValueDuringGrainFill: FixedValue=0.5
            LinearInterpolationFunction MaximumNConc: XProperty=[Phenology].Stage
              XYPairs: X=[4, 4.5, 5.5, 6]; Y=[0.01, 0.01, 0.025, 0.025]
            PhaseLookup StructuralFraction
              PhaseLookupValue VegetativeGrowth: Start=Emergence; End=StartGrainFill
                Constant StructuralFractionEG: FixedValue=0.3
              PhaseLookupValue ReproductiveGrowth: Start=StartGrainFill; End=EndGrainFill
                Constant StructuralFractionGF: FixedValue=0
            Constant MinimumNConc: FixedValue=0.004
            BiomassRemoval BiomassRemovalDefaults
              OrganBiomassRemovalType Harvest: FractionLiveToRemove=0.5; FractionDeadToRemove=0; FractionLiveToResidue=0.1; FractionDeadToResidue=0
              OrganBiomassRemovalType Cut: FractionLiveToRemove=0.8; FractionDeadToRemove=0; FractionLiveToResidue=0; FractionDeadToResidue=0
              OrganBiomassRemovalType Prune: FractionLiveToRemove=0; FractionDeadToRemove=0; FractionLiveToResidue=0.6; FractionDeadToResidue=0
              OrganBiomassRemovalType Graze: FractionLiveToRemove=0.6; FractionDeadToRemove=0; FractionLiveToResidue=0.2; FractionDeadToResidue=0
              OrganBiomassRemovalType Thin: FractionLiveToRemove=0; FractionDeadToRemove=0; FractionLiveToResidue=0.05; FractionDeadToResidue=0
            PhaseBasedSwitch NitrogenDemandSwitch: Start=Emergence; End=StartGrainFill
            PhaseLookup DMRetranslocationFactor
              PhaseLookupValue VegetativeGrowth: Start=Emergence; End=StartGrainFill
                Constant DMRetranslocationFactor: FixedValue=0
              PhaseLookupValue ReproductiveGrowth: Start=StartGrainFill; End=EndGrainFill
                Constant DMRetranslocationFactor: FixedValue=0.5
            Constant InitialWtFunction: FixedValue=0; Units=g/m^2
            Constant DetachmentRateFunction: FixedValue=0; Units=/d
            Constant MaintenanceRespirationFunction: FixedValue=0; Units=0-1
            Constant DMConversionEfficiency: FixedValue=1; Units=0-1
            VariableReference HeadNumber: VariableName=[Structure].TotalStemPopn
            Constant DMReallocationFactor: FixedValue=0
            AddFunction CriticalNConc
              VariableReference MinimumNConc: VariableName=[Spike].MinimumNConc.Value()
              MultiplyFunction MetabolicNconc
                SubtractFunction NonStructuralN
                  VariableReference MaximumNConc: VariableName=[Spike].MaximumNConc.Value()
                  VariableReference MinimumNConc: VariableName=[Spike].MinimumNConc.Value()
                Constant Proportion: FixedValue=0.8
            LinearInterpolationFunction SenescenceRate: XProperty=[Phenology].Stage
              XYPairs: X=[3, 4, 5, 6]; Y=[0.07, 0.04, 0.015, 0.012]
            Constant CarbonConcentration: FixedValue=0.4
          GenericOrgan Stem
            PhaseLookup StructuralFraction
              PhaseLookupValue VegetativeGrowth: Start=Sowing; End=StartGrainFill
                Constant Fraction: FixedValue=0.3
              PhaseLookupValue ReproductiveGrowth: Start=StartGrainFill; End=HarvestRipe
                Constant Fraction: FixedValue=0.01
            LinearInterpolationFunction SenescenceRate: XProperty=[Phenology].Stage
              XYPairs: X=[3, 7, 8, 9]; Y=[0, 0, 0.2, 0.5]
            Constant RemobilisationCost: FixedValue=0
            LinearInterpolationFunction MaximumNConc: XProperty=[Phenology].Stage
              XYPairs: X=[3, 4, 5, 6]; Y=[0.07, 0.04, 0.015, 0.012]
            Constant MinimumNConc: FixedValue=0.0025
            PhaseBasedSwitch NitrogenDemandSwitch: Start=Emergence; End=StartGrainFill
            Constant NReallocationFactor: FixedValue=0
            PhaseLookup NRetranslocationFactor
              PhaseLookupValue VegetativeGrowth: Start=Sowing; End=Flowering
                Constant Fraction: FixedValue=0
              PhaseLookupValue ReproductiveGrowth: Start=Flowering; End=HarvestRipe
                Constant Fraction: FixedValue=0.5
            PhaseLookup DMRetranslocationFactor: same as ScopingTest.MicrometInFields.Field1.Wheat.Spike.DMRetranslocationFactor
            PartitionFractionDemandFunction DMDemandFunction
              PhaseLookup PartitionFraction
                PhaseLookupValue PreStemElongation: Start=Emergence; End=TerminalSpikelet
                  Constant StemFraction: FixedValue=0.2
                PhaseLookupValue StemElongation: Start=TerminalSpikelet; End=StartGrainFill
                  Constant StemFraction: FixedValue=0.7; Units=0
                PhaseLookupValue EarEmergence: Start=StartGrainFill; End=HarvestRipe
                  Constant StemFraction: FixedValue=0
            BiomassRemoval BiomassRemovalDefaults: same as ScopingTest.MicrometInFields.Field1.Wheat.Spike.BiomassRemovalDefaults
            DivideFunction PercentWSC
              VariableReference WSC: VariableName=[Stem].Live.StorageWt
              VariableReference StemWt: VariableName=[Stem].Live.Wt
            Constant InitialWtFunction: FixedValue=0; Units=g/m^2
            Constant DetachmentRateFunction: FixedValue=0; Units=/d
            Constant MaintenanceRespirationFunction: FixedValue=0; Units=0-1
            Constant DMConversionEfficiency: FixedValue=1; Units=0-1
            Constant DMReallocationFactor: FixedValue=0
            AddFunction CriticalNConc
              VariableReference MinimumNConc: VariableName=[Stem].MinimumNConc.Value()
              MultiplyFunction MetabolicNconc
                SubtractFunction NonStructuralN
                  VariableReference MaximumNConc: VariableName=[Stem].MaximumNConc.Value()
                  VariableReference MinimumNConc: VariableName=[Stem].MinimumNConc.Value()
                Constant Proportion: FixedValue=0.5
            Constant CarbonConcentration: FixedValue=0.4
          CompositeBiomass AboveGround
            Propertys=[[Leaf].Live, [Leaf].Dead, [Stem].Live, [Stem].Dead, [Spike].Live, [Spike].Dead, [Grain].Live, [Grain].Dead]
          CompositeBiomass AboveGroundLive: Propertys=[[Leaf].Live, [Stem].Live, [Spike].Live, [Grain].Live]
          CompositeBiomass AboveGroundDead: Propertys=[[Leaf].Dead, [Stem].Dead, [Spike].Dead, [Grain].Dead]
          CompositeBiomass BelowGround: Propertys=[[Root].Live, [Root].Dead]
          CompositeBiomass Total
            Propertys=[[Leaf].Live, [Leaf].Dead, [Stem].Live, [Stem].Dead, [Root].Live, [Root].Dead, [Spike].Live, [Spike].Dead, [Grain].Live, [Grain].Dead]
          CompositeBiomass TotalLive
            Propertys=[[Leaf].Live, [Stem].Live, [Root].Live, [Spike].Live, [Grain].Live]
          CompositeBiomass TotalDead
            Propertys=[[Leaf].Dead, [Stem].Dead, [Root].Dead, [Spike].Dead, [Grain].Dead]
          CompositeBiomass Ear: Propertys=[[Spike].Live, [Grain].Live, [Spike].Dead, [Grain].Dead]
            Memo
              The Ear composite biomass object includes the Live and dead pools of all organs within the Ear to allow output for total dry matter and Nutrient contents, including total structural, non-structural and metabolic pools.
          CompositeBiomass StemPlusSpike: Propertys=[[Stem].Live, [Spike].Live, [Stem].Dead, [Spike].Dead]
          CultivarFolder Cultivars
            CultivarFolder New Zealand
              Cultivar Alberic
                Command:
                  [Phenology].MinimumLeafNumber.FixedValue = 9
                  [Phenology].VrnSensitivity.FixedValue = 7
                  [Phenology].PpSensitivity.FixedValue = 3
              Cultivar Amarok
                Command:
                  [Phenology].MinimumLeafNumber.FixedValue = 9
                  [Phenology].VrnSensitivity.FixedValue = 10
                  [Phenology].PpSensitivity.FixedValue = 6
                  [Phenology].EarlyReproductivePpSensitivity.FixedValue = 5
                  [Structure].Phyllochron.BasePhyllochron.FixedValue = 80
              Cultivar Aspiring
                Command:
                  [Phenology].MinimumLeafNumber.FixedValue = 9
                  [Phenology].VrnSensitivity.FixedValue = 7
                  [Phenology].PpSensitivity.FixedValue = 3
              Cultivar BattenWinter
                Command:
                  [Phenology].MinimumLeafNumber.FixedValue = 8
                  [Phenology].VrnSensitivity.FixedValue = 8
                  [Phenology].PpSensitivity.FixedValue = 5
                  [Phenology].EarlyReproductivePpSensitivity.FixedValue = 3
                  [Structure].Phyllochron.BasePhyllochron.FixedValue = 100
                  [Leaf].ExtinctionCoeff.VegetativePhase.FixedValue = 0.7
                  [Grain].NumberFunction.GrainNumber.GrainsPerGramOfStem.FixedValue = 22
              Cultivar BattenSpring
                Command:
                  [Phenology].MinimumLeafNumber.FixedValue = 7
                  [Phenology].VrnSensitivity.FixedValue = 0
                  [Phenology].PpSensitivity.FixedValue = 5
                  [Phenology].EarlyReproductivePpSensitivity.FixedValue = 3
                  [Structure].Phyllochron.BasePhyllochron.FixedValue = 100
                  [Leaf].ExtinctionCoeff.VegetativePhase.FixedValue = 0.7
                  [Grain].NumberFunction.GrainNumber.GrainsPerGramOfStem.FixedValue = 22
              Cultivar Centaur
                Command:
                  [Phenology].MinimumLeafNumber.FixedValue = 9
                  [Phenology].VrnSensitivity.FixedValue = 7
                  [Phenology].PpSensitivity.FixedValue = 3
              Cultivar Claire
                Command:
                  [Phenology].MinimumLeafNumber.FixedValue = 8
                  [Phenology].VrnSensitivity.FixedValue = 8
                  [Phenology].PpSensitivity.FixedValue = 8
                  [Phenology].EarlyReproductivePpSensitivity.FixedValue = 3
                  [Structure].Phyllochron.BasePhyllochron.FixedValue = 100
              Cultivar Conquest
                Command:
                  [Phenology].MinimumLeafNumber.FixedValue = 7
                  [Phenology].VrnSensitivity.FixedValue = 0
                  [Phenology].PpSensitivity.FixedValue = 3
                  [Structure].Phyllochron.BasePhyllochron.FixedValue = 100
              Cultivar Discovery
                Command:
                  [Phenology].MinimumLeafNumber.FixedValue = 8.5
                  [Phenology].VrnSensitivity.FixedValue = 0
                  [Phenology].PpSensitivity.FixedValue = 0
                  [Structure].Phyllochron.BasePhyllochron.FixedValue = 80
                  [Leaf].CohortParameters.MaxArea.AreaLargestLeaves.FixedValue = 1600
                  [Grain].MaximumPotentialGrainSize.FixedValue = 0.051
                  [Grain].NumberFunction.GrainNumber.GrainsPerGramOfStem.FixedValue = 35
                  [Leaf].ExtinctionCoeff.VegetativePhase.FixedValue = 0.5
                  [Structure].BranchingRate.PotentialBranchingRate.Vegetative.PotentialBranchingRate.XYPairs.Y = 0,0,0,0,4,7,12,20
                  [Grain].MaximumNConc.FixedValue = 0.025
                  [Grain].MaxNConcDailyGrowth.FixedValue = 0.025
                  [Leaf].ExtinctionCoeff.DevelopmentFactor.XYPairs.Y = 1,1,1.4
                  [Leaf].CohortParameters.MinimumNConc.XYPairs.Y = 0.01,0.008,0.008
                  [Stem].MinimumNConc.FixedValue = 0.006
                  [Spike].DMRetranslocationFactor.ReproductiveGrowth.DMRetranslocationFactor.FixedValue = 0.05
                Memo
                  This is a spring wheat with a high grain number and later tillering
              Cultivar Einstein
                Command:
                  [Phenology].MinimumLeafNumber.FixedValue = 9
                  [Phenology].VrnSensitivity.FixedValue = 7
                  [Phenology].PpSensitivity.FixedValue = 3
              Cultivar Exceed
                Command:
                  [Phenology].MinimumLeafNumber.FixedValue = 9
                  [Phenology].VrnSensitivity.FixedValue = 7
                  [Phenology].PpSensitivity.FixedValue = 3
              Cultivar Majestic
                Command:
                  [Phenology].MinimumLeafNumber.FixedValue = 9
                  [Phenology].VrnSensitivity.FixedValue = 7
                  [Phenology].PpSensitivity.FixedValue = 3
              Cultivar Option
                Command:
                  [Phenology].MinimumLeafNumber.FixedValue = 9
                  [Phenology].VrnSensitivity.FixedValue = 7
                  [Phenology].PpSensitivity.FixedValue = 3
              Cultivar Otane
                Command:
                  [Phenology].MinimumLeafNumber.FixedValue = 6
                  [Phenology].VrnSensitivity.FixedValue = 0
                  [Phenology].PpSensitivity.FixedValue = 4
                  [Phenology].EarlyReproductivePpSensitivity.FixedValue = 2
                  [Structure].Phyllochron.BasePhyllochron.FixedValue = 100
              Cultivar Pennant
                Command:
                  [Phenology].MinimumLeafNumber.FixedValue = 9
                  [Phenology].VrnSensitivity.FixedValue = 7
                  [Phenology].PpSensitivity.FixedValue = 3
              Cultivar Regency
                Command:
                  [Phenology].MinimumLeafNumber.FixedValue = 9
                  [Phenology].VrnSensitivity.FixedValue = 7
                  [Phenology].PpSensitivity.FixedValue = 3
              Cultivar Richmond
                Command:
                  [Phenology].MinimumLeafNumber.FixedValue = 9
                  [Phenology].VrnSensitivity.FixedValue = 7
                  [Phenology].PpSensitivity.FixedValue = 3
              Cultivar Robigus
                Command:
                  [Phenology].MinimumLeafNumber.FixedValue = 9
                  [Phenology].VrnSensitivity.FixedValue = 7
                  [Phenology].PpSensitivity.FixedValue = 3
              Cultivar Rongotea
                Command:
                  [Phenology].MinimumLeafNumber.FixedValue = 7
                  [Phenology].VrnSensitivity.FixedValue = 0
                  [Phenology].PpSensitivity.FixedValue = 2
                  [Phenology].EarlyReproductivePpSensitivity.FixedValue = 3
                  [Structure].Phyllochron.BasePhyllochron.FixedValue = 100
              Cultivar Rubric
                Command:
                  [Phenology].MinimumLeafNumber.FixedValue = 9
                  [Phenology].VrnSensitivity.FixedValue = 7
                  [Phenology].PpSensitivity.FixedValue = 3
              Cultivar Sage
                Command:
                  [Phenology].MinimumLeafNumber.FixedValue = 9
                  [Phenology].VrnSensitivity.FixedValue = 7
                  [Phenology].PpSensitivity.FixedValue = 3
              Cultivar Saracen
                Command:
                  [Phenology].MinimumLeafNumber.FixedValue = 9
                  [Phenology].VrnSensitivity.FixedValue = 7
                  [Phenology].PpSensitivity.FixedValue = 3
              Cultivar Savannah
                Command:
                  [Phenology].MinimumLeafNumber.FixedValue = 9
                  [Phenology].VrnSensitivity.FixedValue = 7
                  [Phenology].PpSensitivity.FixedValue = 3
              Cultivar Solstice
                Command:
                  [Phenology].MinimumLeafNumber.FixedValue = 9
                  [Phenology].VrnSensitivity.FixedValue = 7
                  [Phenology].PpSensitivity.FixedValue = 3
              Cultivar Tanker
                Command:
                  [Phenology].MinimumLeafNumber.FixedValue = 9
                  [Phenology].VrnSensitivity.FixedValue = 7
                  [Phenology].PpSensitivity.FixedValue = 3
              Cultivar Tribute
                Command:
                  [Phenology].MinimumLeafNumber.FixedValue = 9
                  [Phenology].VrnSensitivity.FixedValue = 7
                  [Phenology].PpSensitivity.FixedValue = 3
              Cultivar Wakanui
                Command:
                  [Phenology].MinimumLeafNumber.FixedValue = 8
                  [Phenology].VrnSensitivity.FixedValue = 10
                  [Phenology].PpSensitivity.FixedValue = 0
                  [Phenology].EarlyReproductiveLongDayBase.FixedValue = 4
                  [Structure].Phyllochron.BasePhyllochron.FixedValue = 100
                  [Phenology].DailyVernalisation.TempResponseProfile.XYPairs.X = 0,1,8
                  [Phenology].DailyVernalisation.TempResponseProfile.XYPairs.Y = 0,1.204,0
                  [Leaf].ExtinctionCoeff.VegetativePhase.FixedValue = 0.7
                  [Grain].NumberFunction.GrainNumber.GrainsPerGramOfStem.FixedValue = 22
                  [Grain].MaximumPotentialGrainSize.FixedValue = 0.035
                  [Leaf].CohortParameters.MaxArea.AreaLargestLeaves.FixedValue = 3000
              Cultivar Weston
                Command:
                  [Phenology].MinimumLeafNumber.FixedValue = 9
                  [Phenology].VrnSensitivity.FixedValue = 7
                  [Phenology].PpSensitivity.FixedValue = 3
            CultivarFolder Australia
              Cultivar Axe
                Command:
                  [Phenology].MinimumLeafNumber.FixedValue = 5
                  [Phenology].VrnSensitivity.FixedValue = 0
                  [Phenology].PpSensitivity.FixedValue = 4
                  [Phenology].EarlyReproductivePpSensitivity.FixedValue = 0
                  [Structure].Phyllochron.BasePhyllochron.FixedValue = 100
              Cultivar Bolac
                Command:
                  [Phenology].MinimumLeafNumber.FixedValue = 6
                  [Phenology].VrnSensitivity.FixedValue = 0
                  [Phenology].PpSensitivity.FixedValue = 4
                  [Structure].Phyllochron.BasePhyllochron.FixedValue = 100
              Cultivar Cunningham
                Command:
                  [Phenology].MinimumLeafNumber.FixedValue = 6
                  [Phenology].VrnSensitivity.FixedValue = 0
                  [Phenology].PpSensitivity.FixedValue = 4
                  [Structure].Phyllochron.BasePhyllochron.FixedValue = 100
                Alias Anlace
                Alias Arrivato
                Alias Babbler
                Alias Barham
                Alias Baxter
                Alias Bowie
                Alias Buckley
                Alias Buckly
                Alias Burunga
                Alias Camm
                Alias Carinya
                Alias ChiefCLPlus
                Alias CLF_Janz
                Alias Dagger
                Alias DBAAurora
                Alias ElmoreCLPlus
                Alias Espada
                Alias Frame
                Alias Gazelle
                Alias Halberd
                Alias Hybrid_Meteor
                Alias JusticaCLPlus
                Alias Preston
                Alias Saphire
                Alias Scout
                Alias Stiletto
                Alias Ventura
                Alias Wallup
              Cultivar Derrimut
                Command:
                  [Phenology].MinimumLeafNumber.FixedValue = 6
                  [Phenology].VrnSensitivity.FixedValue = 0
                  [Phenology].PpSensitivity.FixedValue = 4
                  [Structure].Phyllochron.BasePhyllochron.FixedValue = 100
              Cultivar EGAGregory
                Command:
                  [Phenology].MinimumLeafNumber.FixedValue = 6
                  [Phenology].VrnSensitivity.FixedValue = 1
                  [Phenology].PpSensitivity.FixedValue = 4
                  [Structure].Phyllochron.BasePhyllochron.FixedValue = 100
                Alias Gregory
                Alias Lancer
              Cultivar GattonHartog
                Command:
                  [Phenology].MinimumLeafNumber.FixedValue = 8
                  [Phenology].VrnSensitivity.FixedValue = 0
                  [Phenology].PpSensitivity.FixedValue = 4
              Cultivar Gamenya
                Command:
                  [Phenology].MinimumLeafNumber.FixedValue = 5
                  [Phenology].VrnSensitivity.FixedValue = 0
                  [Phenology].PpSensitivity.FixedValue = 3.5
                  [Structure].Phyllochron.BasePhyllochron.FixedValue = 100
                  [Phenology].EarlyReproductivePpSensitivity.FixedValue = 0
                  [Phenology].EarlyReproductiveLongDayBase.FixedValue
              Cultivar Gauntlet
                Command:
                  [Phenology].MinimumLeafNumber.FixedValue = 5
                  [Phenology].VrnSensitivity.FixedValue = 0
                  [Phenology].PpSensitivity.FixedValue = 4
                  [Structure].Phyllochron.BasePhyllochron.FixedValue = 100
                Alias Braewood
                Alias Chara
                Alias Clearfield_stl
                Alias Drysdale
                Alias Envoy
                Alias Estoc
                Alias Giles
                Alias Harper
                Alias Krichauff
                Alias Magenta
                Alias Mitch
                Alias Phantom
                Alias Pugsley
                Alias Sentinel
                Alias Silverstar
                Alias Suneca
                Alias Sunlin
                Alias Sunvale
                Alias Trojan
                Alias Strzelecki
              Cultivar Gladius
                Command:
                  [Phenology].MinimumLeafNumber.FixedValue = 6
                  [Phenology].VrnSensitivity.FixedValue = 0
                  [Phenology].PpSensitivity.FixedValue = 5
                  [Structure].Phyllochron.BasePhyllochron.FixedValue = 100
              Cultivar Gutha
                Command:
                  [Phenology].MinimumLeafNumber.FixedValue = 6
                  [Phenology].VrnSensitivity.FixedValue = 0
                  [Phenology].PpSensitivity.FixedValue = 5
                  [Structure].Phyllochron.BasePhyllochron.FixedValue = 100
                  [Grain].MaximumPotentialGrainSize.FixedValue = 0.041
                  [Grain].NumberFunction.GrainNumber.GrainsPerGramOfStem.FixedValue = 17
              Cultivar H45
                Command:
                  [Phenology].MinimumLeafNumber.FixedValue = 6
                  [Phenology].VrnSensitivity.FixedValue = 0
                  [Phenology].PpSensitivity.FixedValue = 4
                  [Structure].Phyllochron.BasePhyllochron.FixedValue = 100
                  [Grain].NumberFunction.GrainNumber.GrainsPerGramOfStem.FixedValue = 20
                Alias Saintly
                Alias Tamarinrock
                Alias Waagin
                Alias Wollaroi
                Alias Zippy
              Cultivar H46
                Command:
                  [Phenology].MinimumLeafNumber.FixedValue = 8
                  [Phenology].VrnSensitivity.FixedValue = 0
                  [Phenology].PpSensitivity.FixedValue = 4
                  [Structure].Phyllochron.BasePhyllochron.FixedValue = 100
              Cultivar Hartog
                Command:
                  [Phenology].MinimumLeafNumber.FixedValue = 6
                  [Phenology].VrnSensitivity.FixedValue = 0
                  [Phenology].PpSensitivity.FixedValue = 5
                  [Structure].Phyllochron.BasePhyllochron.FixedValue = 100
                  [Grain].MaximumPotentialGrainSize.FixedValue = 0.041
                Alias Annuello
                Alias Carnamah
                Alias Catalina
                Alias CLF_Stiletto
                Alias Cobra
                Alias Corack
                Alias Correll
                Alias Diamondbird
                Alias Gladius
                Alias Goroke
                Alias GrenadeCLPlus
                Alias Guardian
                Alias Halbred
                Alias Impala
                Alias Justica
                Alias Kord
                Alias Merlin
                Alias Mitre
                Alias Peake
                Alias Shield
                Alias Spitfire
                Alias Sunguard
                Alias Sunstate
                Alias Yallaroi
                Alias Yawa
                Alias Yitpi
              Cultivar Hibred_Mercury
                Command:
                  [Phenology].MinimumLeafNumber.FixedValue = 6
                  [Phenology].VrnSensitivity.FixedValue = 0
                  [Phenology].PpSensitivity.FixedValue = 4
                  [Structure].Phyllochron.BasePhyllochron.FixedValue = 100
                Alias Agtscythe
                Alias Arrino
                Alias Bonnie_rock
                Alias Bowerbird
                Alias Condo
                Alias Dart
                Alias Dollarbird
                Alias Emurock
                Alias Hyperno
                Alias ImposeCLPlus
                Alias Kalka
                Alias Kirchauff
                Alias Kukri
                Alias Hunter
                Alias LRPBArrow
                Alias Mace
                Alias Ouyen
                Alias Ruby
                Alias Tamaroi
                Alias Young
                Alias Katana
              Cultivar Janz
                Command:
                  [Phenology].MinimumLeafNumber.FixedValue = 6
                  [Phenology].VrnSensitivity.FixedValue = 1
                  [Phenology].PpSensitivity.FixedValue = 4
                  [Structure].Phyllochron.BasePhyllochron.FixedValue = 100
              Cultivar Kelallac
                Command:
                  [Phenology].MinimumLeafNumber.FixedValue = 8
                  [Phenology].VrnSensitivity.FixedValue = 0
                  [Phenology].PpSensitivity.FixedValue = 4
                  [Structure].Phyllochron.BasePhyllochron.FixedValue = 100
                Alias Beaufort
                Alias Calingiri
                Alias Endure
                Alias Forrest
                Alias Scenario
                Alias Zen
              Cultivar Kennedy
                Command:
                  [Phenology].MinimumLeafNumber.FixedValue = 8
                  [Phenology].VrnSensitivity.FixedValue = 0
                  [Phenology].PpSensitivity.FixedValue = 4
                  [Structure].Phyllochron.BasePhyllochron.FixedValue = 100
              Cultivar Lang
                Command:
                  [Phenology].MinimumLeafNumber.FixedValue = 6
                  [Phenology].VrnSensitivity.FixedValue = 0
                  [Phenology].PpSensitivity.FixedValue = 5
                  [Structure].Phyllochron.BasePhyllochron.FixedValue = 100
              Cultivar Livingston
                Command:
                  [Phenology].MinimumLeafNumber.FixedValue = 5
                  [Phenology].VrnSensitivity.FixedValue = 0
                  [Phenology].PpSensitivity.FixedValue = 4
                  [Structure].Phyllochron.BasePhyllochron.FixedValue = 100
              Cultivar Lincoln
                Command:
                  [Phenology].MinimumLeafNumber.FixedValue = 6
                  [Phenology].VrnSensitivity.FixedValue = 0
                  [Phenology].PpSensitivity.FixedValue = 4
                  [Structure].Phyllochron.BasePhyllochron.FixedValue = 100
                Alias Crusader
              Cultivar Mace
                Command:
                  [Phenology].MinimumLeafNumber.FixedValue = 6
                  [Phenology].VrnSensitivity.FixedValue = 0
                  [Phenology].PpSensitivity.FixedValue = 4
                  [Structure].Phyllochron.BasePhyllochron.FixedValue = 100
              Cultivar MacKellar
                Command:
                  [Phenology].MinimumLeafNumber.FixedValue = 7
                  [Phenology].VrnSensitivity.FixedValue = 5
                  [Phenology].PpSensitivity.FixedValue = 5
                  [Phenology].EarlyReproductiveLongDayBase.FixedValue = 3.5
                  [Structure].Phyllochron.BasePhyllochron.FixedValue = 100
                Alias Adagio
                Alias Brennan
                Alias Declic
                Alias Revenue
              Cultivar Matong
                Command:
                  [Phenology].MinimumLeafNumber.FixedValue = 7
                  [Phenology].VrnSensitivity.FixedValue = 1
                  [Phenology].PpSensitivity.FixedValue = 4
                  [Structure].Phyllochron.BasePhyllochron.FixedValue = 100
                  [Grain].NumberFunction.GrainNumber.GrainsPerGramOfStem.FixedValue = 22
              Cultivar McCubbin
                Command:
                  [Phenology].MinimumLeafNumber.FixedValue = 8
                  [Phenology].VrnSensitivity.FixedValue = 0
                  [Phenology].PpSensitivity.FixedValue = 5
                  [Structure].Phyllochron.BasePhyllochron.FixedValue = 90
              Cultivar Mercury
                Command:
                  [Phenology].MinimumLeafNumber.FixedValue = 7
                  [Phenology].VrnSensitivity.FixedValue = 0
                  [Phenology].PpSensitivity.FixedValue = 4
                  [Phenology].EarlyReproductiveLongDayBase.FixedValue = 3.5
                  [Structure].Phyllochron.BasePhyllochron.FixedValue = 80
              Cultivar Ruby
                Command:
                  [Phenology].MinimumLeafNumber.FixedValue = 8
                  [Phenology].VrnSensitivity.FixedValue = 0
                  [Phenology].PpSensitivity.FixedValue = 4
                  [Structure].Phyllochron.BasePhyllochron.FixedValue = 100
              Cultivar Spear
                Command:
                  [Phenology].MinimumLeafNumber.FixedValue = 7
                  [Phenology].VrnSensitivity.FixedValue = 0
                  [Phenology].PpSensitivity.FixedValue = 4
                  [Structure].Phyllochron.BasePhyllochron.FixedValue = 100
                  [Grain].MaximumPotentialGrainSize.FixedValue = 0.045
              Cultivar Sunbri
                Command:
                  [Phenology].MinimumLeafNumber.FixedValue = 7
                  [Phenology].VrnSensitivity.FixedValue = 0
                  [Phenology].PpSensitivity.FixedValue = 5
                  [Structure].Phyllochron.BasePhyllochron.FixedValue = 100
              Cultivar Sunco
                Command:
                  [Phenology].MinimumLeafNumber.FixedValue = 6.5
                  [Phenology].VrnSensitivity.FixedValue = 0
                  [Phenology].PpSensitivity.FixedValue = 3.5
                  [Phenology].EarlyReproductivePpSensitivity.FixedValue = 4
                  [Structure].Phyllochron.BasePhyllochron.FixedValue = 100
                Alias Advantage
                Alias Bellaroi
                Alias Caparoi
                Alias Ellison
                Alias Suntop
              Cultivar Ventura
                Command:
                  [Phenology].MinimumLeafNumber.FixedValue = 8
                  [Phenology].VrnSensitivity.FixedValue = 0
                  [Phenology].PpSensitivity.FixedValue = 4
                  [Structure].Phyllochron.BasePhyllochron.FixedValue = 100
              Cultivar Wedgetail
                Command:
                  [Phenology].MinimumLeafNumber.FixedValue = 8
                  [Phenology].VrnSensitivity.FixedValue = 0
                  [Phenology].PpSensitivity.FixedValue = 4
                  [Structure].Phyllochron.BasePhyllochron.FixedValue = 100
                Alias Lorikeet
                Alias Rosella
                Alias Whistler
                Alias Wylah
                Alias Eaglehawk
              Cultivar Westonia
                Command:
                  [Phenology].MinimumLeafNumber.FixedValue = 5
                  [Phenology].VrnSensitivity.FixedValue = 0
                  [Phenology].PpSensitivity.FixedValue = 4
                  [Structure].Phyllochron.BasePhyllochron.FixedValue = 100
              Cultivar Wilgoyne
                Command:
                  [Phenology].MinimumLeafNumber.FixedValue = 6
                  [Phenology].VrnSensitivity.FixedValue = 0
                  [Phenology].PpSensitivity.FixedValue = 4
                  [Structure].Phyllochron.BasePhyllochron.FixedValue = 100
                  [Grain].NumberFunction.GrainNumber.GrainsPerGramOfStem.FixedValue = 20
                  [Grain].MaximumPotentialGrainSize.FixedValue = 0.045
              Cultivar Wyalkatchem
                Command:
                  [Phenology].MinimumLeafNumber.FixedValue = 8
                  [Phenology].VrnSensitivity.FixedValue = 0
                  [Phenology].PpSensitivity.FixedValue = 4
                  [Structure].Phyllochron.BasePhyllochron.FixedValue = 100
              Cultivar Yitpi
                Command:
                  [Phenology].MinimumLeafNumber.FixedValue = 8
                  [Phenology].VrnSensitivity.FixedValue = 0
                  [Phenology].PpSensitivity.FixedValue = 5
                  [Phenology].EarlyReproductiveLongDayBase.FixedValue = 2.5
                  [Phenology].EarlyReproductivePpSensitivity.FixedValue = 5
                  [Structure].Phyllochron.BasePhyllochron.FixedValue = 80
              Cultivar Young
                Command:
                  [Phenology].MinimumLeafNumber.FixedValue = 8
                  [Phenology].VrnSensitivity.FixedValue = 0
                  [Phenology].PpSensitivity.FixedValue = 4
                  [Structure].Phyllochron.BasePhyllochron.FixedValue = 100
            CultivarFolder Turkey
              Cultivar Konya
                Command:
                  [Phenology].MinimumLeafNumber.FixedValue = 7
                  [Phenology].VrnSensitivity.FixedValue = 4
                  [Phenology].PpSensitivity.FixedValue = 4
                  [Structure].Phyllochron.BasePhyllochron.FixedValue = 100
                  [Grain].NumberFunction.GrainNumber.GrainsPerGramOfStem.FixedValue = 16
                  [Grain].MaximumPotentialGrainSize.FixedValue = 0.050
                  [Grain].MaximumNConc.FixedValue = 0.026
                  [Phenology].GrainFilling.Target.FixedValue = 450
                  [Stem].DMRetranslocationFactor.ReproductiveGrowth.DMRetranslocationFactor.FixedValue = 0.2
                  [Stem].StructuralFraction.VegetativeGrowth.Fraction.FixedValue = 0.6
                  [Leaf].ExtinctionCoeff.VegetativePhase.FixedValue = 0.8
            CultivarFolder China
              Cultivar Keyu13
                Command:
                  [Phenology].MinimumLeafNumber.FixedValue = 7
                  [Phenology].VrnSensitivity.FixedValue = 5
                  [Phenology].PpSensitivity.FixedValue = 3
                  [Structure].Phyllochron.BasePhyllochron.FixedValue = 100
            CultivarFolder USA
              Cultivar Yecora
                Command:
                  [Phenology].MinimumLeafNumber.FixedValue = 6
                  [Phenology].VrnSensitivity.FixedValue = 0
                  [Phenology].PpSensitivity.FixedValue = 4
                  [Structure].Phyllochron.BasePhyllochron.FixedValue = 90
                  [Leaf].CohortParameters.MaxArea.AreaLargestLeaves.FixedValue = 4000
              Cultivar Rex
                Command:
                  [Phenology].MinimumLeafNumber.FixedValue = 7
                  [Phenology].VrnSensitivity.FixedValue = 6
                  [Phenology].PpSensitivity.FixedValue = 4
                  [Grain].NumberFunction.GrainNumber.GrainsPerGramOfStem.FixedValue = 18
                  [Grain].MaximumNConc.FixedValue = 0.02
              Cultivar Nugaines
                Command:
                  [Phenology].MinimumLeafNumber.FixedValue = 7
                  [Phenology].VrnSensitivity.FixedValue = 6
                  [Phenology].PpSensitivity.FixedValue = 4
                  [Grain].NumberFunction.GrainNumber.GrainsPerGramOfStem.FixedValue = 20
                  [Grain].MaximumNConc.FixedValue = 0.02
              Cultivar Hyslop
                Command:
                  [Phenology].MinimumLeafNumber.FixedValue = 7
                  [Phenology].VrnSensitivity.FixedValue = 6
                  [Phenology].PpSensitivity.FixedValue = 4
                  [Grain].NumberFunction.GrainNumber.GrainsPerGramOfStem.FixedValue = 22
                  [Grain].MaximumNConc.FixedValue = 0.02
              Cultivar Stephens
                Command:
                  [Phenology].MinimumLeafNumber.FixedValue = 7
                  [Phenology].VrnSensitivity.FixedValue = 6
                  [Phenology].PpSensitivity.FixedValue = 4
                  [Grain].NumberFunction.GrainNumber.GrainsPerGramOfStem.FixedValue = 25
                  [Grain].MaximumNConc.FixedValue = 0.02
            CultivarFolder Europe
              Cultivar Dekan
                Command:
                  [Phenology].MinimumLeafNumber.FixedValue = 9
                  [Phenology].VrnSensitivity.FixedValue = 7
                  [Phenology].PpSensitivity.FixedValue = 3
                  [Phenology].EarlyReproductivePpSensitivity.FixedValue = 3
                  [Structure].Phyllochron.BasePhyllochron.FixedValue = 100
                  [Leaf].ExtinctionCoeff.VegetativePhase.FixedValue = 0.8
              Cultivar Rosario
                Command:
                  [Phenology].MinimumLeafNumber.FixedValue = 9
                  [Phenology].VrnSensitivity.FixedValue = 7
                  [Phenology].PpSensitivity.FixedValue = 3
                  [Phenology].EarlyReproductivePpSensitivity.FixedValue = 3
                  [Structure].Phyllochron.BasePhyllochron.FixedValue = 100
                  [Leaf].ExtinctionCoeff.VegetativePhase.FixedValue = 0.8
              Cultivar Ararat
                Command:
                  [Phenology].MinimumLeafNumber.FixedValue = 9
                  [Phenology].VrnSensitivity.FixedValue = 7
                  [Phenology].PpSensitivity.FixedValue = 3
                  [Phenology].EarlyReproductivePpSensitivity.FixedValue = 3
                  [Structure].Phyllochron.BasePhyllochron.FixedValue = 100
                  [Leaf].ExtinctionCoeff.VegetativePhase.FixedValue = 0.8
            CultivarFolder Africa
              Cultivar HAR1685
                Command:
                  [Phenology].MinimumLeafNumber.FixedValue = 7
                  [Phenology].VrnSensitivity.FixedValue = 0
                  [Phenology].PpSensitivity.FixedValue = 3
                  [Structure].Phyllochron.BasePhyllochron.FixedValue = 100
                  [Grain].NumberFunction.GrainNumber.GrainsPerGramOfStem.FixedValue = 17
                  [Phenology].GrainFilling.Target.FixedValue = 350
            CultivarFolder Iran
              Cultivar Gorgan
                Command:
                  [Phenology].MinimumLeafNumber.FixedValue = 7
                  [Phenology].VrnSensitivity.FixedValue = 0
                  [Phenology].PpSensitivity.FixedValue = 4
                  [Structure].Phyllochron.BasePhyllochron.FixedValue = 100
        MicroClimate: a_interception=0; b_interception=1; c_interception=0; d_interception=0; soil_albedo=0.3; sun_angle=15; soil_heat_flux_fraction=0.4; night_interception_fraction=0.5; refheight=2; albedo=0.15; emissivity=0.96; RadIntTotal=0
        Manager SowingFertiliser
          Amount = 20
          CropName = wheat
```csharp
using System;
using Models.Core;
using Models.PMF;
namespace Models
{
    [Serializable]
    public class Script : Model
    {
        [Link] Clock Clock;
        [Link] Fertiliser Fertiliser;
        [Link] Summary Summary;
        
        
        [Description("Amount of fertiliser to be applied (kg/ha)")]
        public double Amount { get; set; }
        
        [Description("Crop to be fertilised")]
        public string CropName { get; set; }
        
        
        

        [EventSubscribe("Sowing")]
        private void OnSowing(object sender, EventArgs e)
        {
            Model crop = sender as Model;
            if (crop.Name.ToLower() == CropName.ToLower())
                Fertiliser.Apply(Amount: Amount, Type: Fertiliser.Types.NO3N);
        }
        
    }
}
```
        Manager SowingRule
          StartDate = 1-may
          EndDate = 10-jul
          MinESW = 100
          MinRain = 25
          RainDays = 7
          CultivarName = Hartog
          SowingDepth = 30
          RowSpacing = 250
          Population = 120
```csharp
using System;
using Models.Core;
using Models.PMF;
using Models.Soils;
using Models.Utilities;
using APSIM.Shared.Utilities;

namespace Models
{
    [Serializable]
    public class Script : Model
    {
        [Link] Clock Clock;
        [Link] Fertiliser Fertiliser;
        [Link] Summary Summary;
        [Link] Plant Wheat;
        [Link] Soil Soil; 
        Accumulator accumulatedRain;
        
        [Description("Start of sowing window (d-mmm)")]
        public string StartDate { get; set;}
        [Description("End of sowing window (d-mmm)")]
        public string EndDate { get; set;}
        [Description("Minimum extractable soil water for sowing (mm)")]
        public double MinESW { get; set;}
        [Description("Accumulated rainfall required for sowing (mm)")]
        public double MinRain { get; set;}
        [Description("Duration of rainfall accumulation (d)")]
        public int RainDays { get; set;}
        [Description("Cultivar to be sown")]
        public string CultivarName { get; set;}
        [Description("Sowing depth (mm)")]
        public double SowingDepth { get; set;}        
        [Description("Row spacing (mm)")]
        public double RowSpacing { get; set;}    
        [Description("Plant population (/m2)")]
        public double Population { get; set;}    
        
        
        [EventSubscribe("Commencing")]
        private void OnSimulationCommencing(object sender, EventArgs e)
        {
            accumulatedRain = new Accumulator(this, "[Weather].Rain", RainDays);
        }
        

        [EventSubscribe("DoManagement")]
        private void OnDoManagement(object sender, EventArgs e)
        {
            accumulatedRain.Update();
            
            if (DateUtilities.WithinDates(StartDate,Clock.Today,EndDate) &&
                !Wheat.IsAlive &&
                MathUtilities.Sum(Soil.SoilWater.ESW) > MinESW &&
                accumulatedRain.Sum > MinRain)
            {
               Wheat.Sow(population:Population, cultivar:CultivarName, depth:SowingDepth, rowSpacing:RowSpacing);    
            }
        
        }
        
    }
}
```
        SoluteManager
      Zone Field2: same as ScopingTest.MicrometInFields.Field1
      Zone Field3: Area=1; Slope=0
        Report: EventNames=[Clock].DoReport
          VariableNames:
            [Clock].Today
            [Wheat].EP
        Fertiliser
        Soil: same as ScopingTest.MicrometInFields.Field1.Soil
        SurfaceOrganicMatter: same as ScopingTest.MicrometInFields.Field1.SurfaceOrganicMatter
        Plant Wheat: same as ScopingTest.MicrometInFields.Field1.Wheat
        MicroClimate: a_interception=0; b_interception=1; c_interception=0; d_interception=0; soil_albedo=0.3; sun_angle=15; soil_heat_flux_fraction=0.4; night_interception_fraction=0.5; refheight=2; albedo=0.15; emissivity=0.96; RadIntTotal=0
        Manager SowingFertiliser
          Amount = 300
          CropName = wheat
          script: same as in ScopingTest.MicrometInFields.Field1.SowingFertiliser
        Manager SowingRule: same as ScopingTest.MicrometInFields.Field1.SowingRule
        SoluteManager
      SoilArbitrator
    Simulation MicrometTopLevel
      Clock: StartDate=1900-01-01; EndDate=1900-12-31
      Summary SummaryFile
      Weather: FileName=%root%\Examples\WeatherFiles\Dalby.met
      MicroClimate: a_interception=0; b_interception=1; c_interception=0; d_interception=0; soil_albedo=0.3; sun_angle=15; soil_heat_flux_fraction=0.4; night_interception_fraction=0.5; refheight=2; albedo=0.15; emissivity=0.96; RadIntTotal=0
      Zone Field1: Area=1; Slope=0
        Report: EventNames=[Clock].DoReport
          VariableNames:
            [Clock].Today
            [Wheat].EP
        Fertiliser
        Soil: same as ScopingTest.MicrometInFields.Field1.Soil
        SurfaceOrganicMatter: same as ScopingTest.MicrometInFields.Field1.SurfaceOrganicMatter
        Plant Wheat: same as ScopingTest.MicrometInFields.Field1.Wheat
        Manager SowingFertiliser: same as ScopingTest.MicrometInFields.Field1.SowingFertiliser
        Manager SowingRule: same as ScopingTest.MicrometInFields.Field1.SowingRule
        SoluteManager
        MicroClimate: a_interception=0; b_interception=1; c_interception=0; d_interception=0; soil_albedo=0.23; sun_angle=15; soil_heat_flux_fraction=0.4; night_interception_fraction=0.5; refheight=2; albedo=0.15; emissivity=0.96; RadIntTotal=0
      Zone Field2: Area=1; Slope=0
        Report: EventNames=[Clock].DoReport
          VariableNames:
            [Clock].Today
            [Wheat].EP
        Fertiliser
        Soil: same as ScopingTest.MicrometInFields.Field1.Soil
        SurfaceOrganicMatter: same as ScopingTest.MicrometInFields.Field1.SurfaceOrganicMatter
        Plant Wheat: same as ScopingTest.MicrometInFields.Field1.Wheat
        Manager SowingFertiliser: same as ScopingTest.MicrometInFields.Field1.SowingFertiliser
        Manager SowingRule: same as ScopingTest.MicrometInFields.Field1.SowingRule
        SoluteManager
      Zone Field3: Area=1; Slope=0
        Report: EventNames=[Clock].DoReport
          VariableNames:
            [Clock].Today
            [Wheat].EP
        Fertiliser
        Soil: same as ScopingTest.MicrometInFields.Field1.Soil
        SurfaceOrganicMatter: same as ScopingTest.MicrometInFields.Field1.SurfaceOrganicMatter
        Plant Wheat: same as ScopingTest.MicrometInFields.Field1.Wheat
        Manager SowingFertiliser: same as ScopingTest.MicrometInFields.Field3.SowingFertiliser
        Manager SowingRule: same as ScopingTest.MicrometInFields.Field1.SowingRule
        SoluteManager
      SoilArbitrator
  Folder StripCrop
    Simulation StripCropExample
      Clock: StartDate=1990-01-01; EndDate=1991-06-30
      Summary SummaryFile
      Weather: FileName=%root%\Examples\WeatherFiles\Dalby.met
      MicroClimate: a_interception=0; b_interception=1; c_interception=0; d_interception=0; soil_albedo=0.3; sun_angle=15; soil_heat_flux_fraction=0.4; night_interception_fraction=0.5; refheight=2; albedo=0.15; emissivity=0.96; RadIntTotal=0
      SoilArbitrator Soil Arbitrator
      StripCropZone: Area=0; Slope=0; Length=0; Width=0
        Zone MaizeStrip: Area=1; Slope=0
          Report: EventNames=[Clock].DoReport
            VariableNames:
              [Clock].Today
              [Maize].Phenology.CurrentStageName
              [Maize].AboveGround.Wt
              [Maize].AboveGround.N
              [Maize].Grain.Wt
              [Maize].Grain.Size
              [Maize].Grain.NumberFunction.Value()
              [Maize].Grain.N
              [Maize].Total.Wt
              sum([Soil].SoilWater.SWmm) as SWTot
          Fertiliser
          Soil: ASCOrder=Vertosol; ASCSubOrder=Black; SoilType=Clay; Site=Norwin; NearestTown=Norwin; Region=Darling Downs and Granite Belt; State=Queensland; Country=Australia; NaturalVegetation=Qld. Bluegrass, possible Qld. Blue gum; ApsoilNumber=900; Latitude=-27.581836; Longitude=151.320206; LocationAccuracy=+/- 20m
            DataSource=CSIRO Sustainable Ecosystems, Toowoomba; Characteriesd as part of the GRDC funded project"Doing it better, doing it smarter, managing soil water in Australian agriculture' 2011
            Comments=OC, CLL for all crops estimated-based on Bongeen Mywybilla Soil No1
            Water
              Thickness  BD       AirDry    LL15      DUL       SAT       KS
              150        1.01056  0.13025   0.2605    0.521     0.588655  20
              150        1.07146  0.198689  0.248362  0.496723  0.565677  20
              300        1.09394  0.28      0.28      0.488438  0.557193  20
              300        1.15861  0.28      0.28      0.480297  0.532787  20
              300        1.17301  0.28      0.28      0.471584  0.527354  20
              300        1.16287  0.28      0.28      0.457071  0.53118   20
              300        1.1875   0.28      0.28      0.452332  0.521888  20
              SoilCrop MaizeSoil: LL=[0.261, 0.248, 0.28, 0.306, 0.36, 0.392, 0.446]; KL=[0.06, 0.06, 0.06, 0.04, 0.04, 0.02, 0.01]; XF=[1, 1, 1, 1, 1, 1, 1]
            SoilWater: same as ScopingTest.MicrometInFields.Field1.Soil.SoilWater
            SoilNitrogen: fom_type=[default, manure, mucuna, lablab, shemp, stable]; fract_carb=[0.2, 0.3, 0.54, 0.57, 0.45, 0]; fract_cell=[0.7, 0.3, 0.37, 0.37, 0.47, 0.1]; fract_lign=[0.1, 0.4, 0.09, 0.06, 0.08, 0.9]
            SoilOrganicMatter: same as ScopingTest.MicrometInFields.Field1.Soil.SoilOrganicMatter
            Analysis: Thickness=[150, 150, 300, 300, 300, 300, 300]; PH=[8, 8, 8, 8, 8, 8, 8]; PHUnits=Water; BoronUnits=HotWater
            InitialWater: PercentMethod=EvenlyDistributed; FractionFull=1
            Sample InitialN: same as ScopingTest.MicrometInFields.Field1.Soil.InitialN
            CERESSoilTemperature
          SurfaceOrganicMatter: same as ScopingTest.MicrometInFields.Field1.SurfaceOrganicMatter
          Plant Maize: CropType=Maize
            OrganArbitrator Arbitrator
              RelativeAllocation NArbitrator
              RelativeAllocation DMArbitrator
            Phenology: DaysAfterSowing=0
              MultiplyFunction ThermalTime
                AirTemperatureFunction BaseThermalTime
                  XYPairs: X=[0, 18, 26, 34, 44]; Y=[0, 10, 18, 26, 0]
              GerminatingPhase Germinating: Start=Sowing; End=Germination
              EmergingPhase Emerging: Start=Germination; End=Emergence; ShootLag=55; ShootRate=0.6
                VariableReference ThermalTime: VariableName=[Phenology].ThermalTime.Value()
              GenericPhase Juvenile: Start=Emergence; End=EndJuvenile
                Constant Target: FixedValue=200; Units=deg day
                VariableReference ThermalTime: VariableName=[Phenology].ThermalTime.Value()
              GenericPhase Photosensitive: Start=EndJuvenile; End=FloralInitiation
                VariableReference ThermalTime: VariableName=[Phenology].ThermalTime.Value()
                LinearInterpolationFunction Target: XProperty=[Phenology].Photoperiod.Value()
                  Memo
                    The photoperiod is likely to vary with individual maize cultivars.  Therefore, the response shown here is indicative only.  See the descriptions of individual cultivars for more detail on photoperiod responses used by the maize model.
                  XYPairs: X=[0, 12.5, 24]; Y=[0, 0, 10]
              LeafAppearancePhase LeafAppearance: Start=FloralInitiation; End=FlagLeaf
                VariableReference ThermalTime: VariableName=[Phenology].ThermalTime.Value()
              GenericPhase FlagLeafToFlowering: Start=FlagLeaf; End=Flowering
                Constant Target: FixedValue=50; Units=deg day
                VariableReference ThermalTime: VariableName=[Phenology].ThermalTime.Value()
              GenericPhase FloweringToGrainFilling: Start=Flowering; End=StartGrainFill
                Constant Target: FixedValue=120; Units=deg day
                VariableReference ThermalTime: VariableName=[Phenology].ThermalTime.Value()
              GenericPhase GrainFilling: Start=StartGrainFill; End=EndGrainFill
                Constant Target: FixedValue=550; Units=deg day
                VariableReference ThermalTime: VariableName=[Phenology].ThermalTime.Value()
              GenericPhase Maturing: Start=EndGrainFill; End=Maturity
                Constant Target: FixedValue=10; Units=deg day
                VariableReference ThermalTime: VariableName=[Phenology].ThermalTime.Value()
              GenericPhase MaturityToHarvestRipe: Start=Maturity; End=HarvestRipe
                Constant Target: FixedValue=10; Units=deg day
                VariableReference ThermalTime: VariableName=[Phenology].ThermalTime.Value()
              EndPhase ReadyForHarvesting: Start=HarvestRipe; End=Unused
                VariableReference ThermalTime: VariableName=[Phenology].ThermalTime.Value()
              PhotoperiodFunction Photoperiod: Twilight=-6; DayLength=0
              OnEventFunction FloweringDAS: same as ScopingTest.MicrometInFields.Field1.Wheat.Phenology.FloweringDAS
              OnEventFunction MaturityDAS: same as ScopingTest.MicrometInFields.Field1.Wheat.Phenology.MaturityDAS
              DivideFunction MeanTemp: same as ScopingTest.MicrometInFields.Field1.Wheat.Phenology.MeanTemp
            Structure: Initialised=false; Germinated=false; Emerged=false; CohortToInitialise=0; TipToAppear=0; ApexNum=0
              Memo
                Though tillering is common in some maize varieties under certain agronomic conditions, no tillering is accounted for within this model.  Therefore all branching has been parameterised out of the current maize model.
              Constant StemSenescenceAge: FixedValue=0
              VariableReference ThermalTime: VariableName=[Phenology].ThermalTime.Value()
              PhaseLookup Phyllochron
                PhaseLookupValue Phyllochron: Start=Emergence; End=FlagLeaf
                  LinearInterpolationFunction Phyllochron: XProperty=[Structure].LeafTipsAppeared
                    XYPairs: X=[1, 3.4, 4]; Y=[30, 30, 42]
              HeightFunction HeightModel
                LinearInterpolationFunction PotentialHeight: XProperty=[Phenology].Stage
                  XYPairs: X=[3, 4, 5, 6]; Y=[20, 400, 450, 1700]
                LinearInterpolationFunction WaterStress: XProperty=[Maize].WaterSupplyDemandRatio
                  XYPairs: X=[0, 0.6]; Y=[0, 1]
              Constant BranchingRate: FixedValue=0
              AddFunction BranchMortality
                Constant ShadeInducedBranchMortality: FixedValue=0
                Constant DroughtInducedBranchMortality: FixedValue=0
              Constant zFinalLeafNumber: FixedValue=15
              HoldFunction FinalLeafNumber: WhenToHold=FloralInitiation
                AddFunction ValueToHold
                  Constant PrimordiaAtEmergence: FixedValue=6
                  DivideFunction PrimordiaDuringJuvenilePhase
                    AddFunction
                      VariableReference JuvenilePhaseDuration: VariableName=[Phenology].Juvenile.Target.Value()
                      VariableReference PhotoSensitivePhaseDuration: VariableName=[Phenology].Photosensitive.Target.Value()
                    PhaseLookup MeanPlastochron
                      PhaseLookupValue PreEmerg: Start=Germination; End=Emergence
                        Constant: FixedValue=15
                      PhaseLookupValue PostEmerg: Start=Emergence; End=FlagLeaf
                        DivideFunction MeanPlastochron
                          AccumulateFunction AccumulatedPlastochron: StartStageName=Emergence; EndStageName=FloralInitiation; FractionRemovedOnCut=0; FractionRemovedOnHarvest=0; FractionRemovedOnGraze=0; FractionRemovedOnPrune=0
                            MultiplyFunction Plastochron
                              VariableReference Phyllochron: VariableName=[Structure].Phyllochron.Value()
                              Constant LeafTipsPerPrimordia: FixedValue=0.5
                          AccumulateFunction Days: StartStageName=Emergence; EndStageName=FloralInitiation; FractionRemovedOnCut=0; FractionRemovedOnHarvest=0; FractionRemovedOnGraze=0; FractionRemovedOnPrune=0
                            Constant: FixedValue=1
            ReproductiveOrgan Grain: GrowthRespiration=0; MaintenanceRespiration=0
              Constant DMConversionEfficiency: FixedValue=1
              Constant RemobilisationCost: FixedValue=0
              Constant InitialGrainProportion: FixedValue=0.05
              Constant MaximumPotentialGrainSize: FixedValue=0.3; Units=g
              Constant MaximumGrainsPerCob: FixedValue=700; Units=number
              PhaseLookup DMDemandFunction
                PhaseLookupValue InitialPhase: Start=Flowering; End=StartGrainFill
                  FillingRateFunction
                    VariableReference NumberFunction: VariableName=[Grain].NumberFunction.Value()
                    VariableReference FillingDuration: VariableName=[Phenology].FloweringToGrainFilling.Target.Value()
                    VariableReference ThermalTime: VariableName=[Phenology].ThermalTime.Value()
                    MultiplyFunction PotentialSizeIncrement
                      VariableReference InitialProportion: VariableName=[Grain].InitialGrainProportion.Value()
                      VariableReference MaximumSize: VariableName=[Grain].MaximumPotentialGrainSize.Value()
                PhaseLookupValue LinearPhase: same as ScopingTest.MicrometInFields.Field1.Wheat.Grain.DMDemandFunction.LinearPhase
              Constant MinimumNConc: FixedValue=0.008; Units=g/g
              PhaseLookup MaximumNConc
                PhaseLookupValue InitialPhase: Start=Flowering; End=StartGrainFill
                  Constant InitialNconc: FixedValue=0.05
                PhaseLookupValue LinearPhase: Start=StartGrainFill; End=EndGrainFill
                  Constant FinalNconc: FixedValue=0.013
              Constant WaterContent: FixedValue=0.12; Units=g/g
              PhaseLookup NFillingRate
                PhaseLookupValue GrainFilling: Start=Flowering; End=EndGrainFill
                  FillingRateFunction
                    VariableReference NumberFunction: VariableName=[Grain].NumberFunction.Value()
                    AddFunction FillingDuration
                      VariableReference FloweringToGrainFilling: VariableName=[Phenology].FloweringToGrainFilling.Target.Value()
                      VariableReference GrainFilling: VariableName=[Phenology].GrainFilling.Target.Value()
                    VariableReference ThermalTime: VariableName=[Phenology].ThermalTime.Value()
                    MultiplyFunction PotentialSizeIncrement
                      VariableReference MaximumFinalNConc: VariableName=[Grain].MaximumNConc.LinearPhase.FinalNconc.Value()
                      VariableReference MaximumSize: VariableName=[Grain].MaximumPotentialGrainSize.Value()
              MultiplyFunction NumberFunction
                VariableReference PotentialGrainNumber: VariableName=[MaximumGrainsPerCob].Value()
                LinearInterpolationFunction GrowthRateFactor: XProperty=[GrowthRateGrainDevelopment].Value()
                  XYPairs: X=[0.55, 3.3, 6.6, 10]; Y=[0, 0.6, 1, 1]
                VariableReference Population: VariableName=[Maize].Population
              ExpressionFunction YieldBuPerAcre: Expression=[Grain].Live.Wt * 10 * 56 * 0.4536 * 2.471
              AccumulateFunction GrowthGrainDevelopment: StartStageName=FlagLeaf; EndStageName=StartGrainFill; FractionRemovedOnCut=0; FractionRemovedOnHarvest=0; FractionRemovedOnGraze=0; FractionRemovedOnPrune=0
                VariableReference DailyBiomassProduction: VariableName=[Arbitrator].DM.TotalFixationSupply
              AccumulateFunction DaysGrainDevelopment: StartStageName=FlagLeaf; EndStageName=StartGrainFill; FractionRemovedOnCut=0; FractionRemovedOnHarvest=0; FractionRemovedOnGraze=0; FractionRemovedOnPrune=0
                Constant LenthOfADay: FixedValue=1; Units=days/day
              DivideFunction GrowthRateGrainDevelopment
                VariableReference AccumulatedGrowth: VariableName=[GrowthGrainDevelopment].Value()
                VariableReference GrowthDuration: VariableName=[DaysGrainDevelopment].Value()
                VariableReference Population: VariableName=[Maize].Population
              BiomassRemoval BiomassRemovalDefaults
                OrganBiomassRemovalType Harvest: FractionLiveToRemove=1; FractionDeadToRemove=0; FractionLiveToResidue=0; FractionDeadToResidue=0
                OrganBiomassRemovalType Cut: FractionLiveToRemove=1; FractionDeadToRemove=0; FractionLiveToResidue=0; FractionDeadToResidue=0
                OrganBiomassRemovalType Prune: FractionLiveToRemove=0; FractionDeadToRemove=0; FractionLiveToResidue=0.8; FractionDeadToResidue=0
                OrganBiomassRemovalType Graze: FractionLiveToRemove=0.6; FractionDeadToRemove=0; FractionLiveToResidue=0.2; FractionDeadToResidue=0
              Constant CarbonConcentration: FixedValue=0.4
              Live Biomass
              Dead Biomass
            Root: GrowthRespiration=0; MaintenanceRespiration=0
              LinearInterpolationFunction KLModifier: XProperty=[Maize].Population
                Memo
                  The parameter KL is is described by Meinke et al (1993) to combine elements of soil conductivity (K) with root length (L) in determining root water uptake.  Peake et al (2013) demonstrated that in maize KL varied with plant population through impacts on root length density.  Here we adjust KL linearly with plant population.
                XYPairs: X=[0, 10]; Y=[1, 1]
              Constant DMConversionEfficiency: FixedValue=1
              Constant RemobilisationCost: FixedValue=0
              Constant SoilWaterEffect: FixedValue=1
                Memo
                  No effect of soil water content on root growth is currently captured in the model.
              Constant MaxDailyNUptake: FixedValue=20; Units=g/m2/d
                Memo
                  Maximum daily N uptake is set to an arbitrarily high value.
              Constant SenescenceRate: FixedValue=0.005; Units=/d
                Memo
                  Jones and Kiniry (1986) used a constant root senescence fraction in the CERES-Maize model.
              Constant StructuralFraction: FixedValue=1
              Constant MaximumRootDepth: FixedValue=1000000
              Constant MaximumNConc: FixedValue=0.01; Units=g/g
              Constant MinimumNConc: FixedValue=0.01; Units=g/g
              PartitionFractionDemandFunction DMDemandFunction
                LinearInterpolationFunction PartitionFraction: XProperty=[Phenology].Stage
                  XYPairs: X=[0, 2.99, 3, 6, 7]; Y=[0, 0, 0.2, 0.2, 0]
              MultiplyFunction RootFrontVelocity
                PhaseLookup PotentialRootFrontVelocity
                  Memo
                    [Hammer_etal_2009] used a constant extraction front velocity of 2.5cm per day in their analysis of historical maize yield trends in the US corn belt.
                  PhaseLookupValue PreFlowering: Start=Germination; End=Flowering
                    Constant RootFrontVelocity: FixedValue=25; Units=mm/d
                  PhaseLookupValue PostFlowering: Start=Flowering; End=Maturity
                    Constant RootFrontVelocity: FixedValue=0; Units=mm/d
                WeightedTemperatureFunction TemperatureFactor: MaximumTemperatureWeighting=0.5
                  XYPairs: X=[0, 8, 15, 35, 50]; Y=[0, 0, 1, 1, 0]
                LinearInterpolationFunction WaterFactor: XProperty=[SoilWaterScale]
                  SoilWaterScale
                  XYPairs: X=[0, 0.25, 1]; Y=[0, 1, 1]
              PhaseBasedSwitch NitrogenDemandSwitch: Start=Germination; End=Maturity
              BiomassRemoval BiomassRemovalDefaults
                OrganBiomassRemovalType Harvest: FractionLiveToRemove=0; FractionDeadToRemove=0; FractionLiveToResidue=0.2; FractionDeadToResidue=0
                OrganBiomassRemovalType Cut: FractionLiveToRemove=0; FractionDeadToRemove=0; FractionLiveToResidue=0.3; FractionDeadToResidue=0
                OrganBiomassRemovalType Prune: FractionLiveToRemove=0; FractionDeadToRemove=0; FractionLiveToResidue=0.1; FractionDeadToResidue=0
                OrganBiomassRemovalType Graze: FractionLiveToRemove=0; FractionDeadToRemove=0; FractionLiveToResidue=0.15; FractionDeadToResidue=0
              Constant InitialDM: FixedValue=0.2; Units=g/plant
              Constant SpecificRootLength: FixedValue=40; Units=m/g
              Constant KNO3: FixedValue=0.03
              Constant KNH4: FixedValue=0.02
              LinearInterpolationFunction NUptakeSWFactor: XProperty=[Root].RWC
                XYPairs: X=[0, 1]; Y=[0, 1]
              Constant MaintenanceRespirationFunction: FixedValue=0
              Constant CarbonConcentration: FixedValue=0.4
            Leaf: MaxCover=1; Albedo=0.18; Gsmax=0.009; R50=160; MicroClimatePresent=true; KDead=0.03; MaximumMainStemLeafNumber=30
              zero: GrowthRespiration, MaintenanceRespiration, CurrentExpandingLeaf, StartFractionExpanded, FractionNextleafExpanded, DeadNodesYesterday, FRGR, PotentialEP, TipsAtEmergence, CohortsAtInitialisation, FractionDied
              ApexStandard
              LeafCohort InitialLeaves[1]: Rank=1; Area=380
                zero: NReallocationFactor, DMReallocationFactor, NRetranslocationFactor, DMRetranslocationFactor, ShadeInducedSenRate, SenescedFrac, DeltaPotentialArea, DeltaStressConstrainedArea, DeltaCarbonConstrainedArea, PotentialStructuralDMAllocation, PotentialMetabolicDMAllocation, MetabolicNReallocated, MetabolicWtReallocated, StorageNReallocated, StorageWtReallocated, MetabolicNRetranslocated, StorageNRetrasnlocated, DMRetranslocated, MetabolicNAllocation, StructuralDMAllocation, MetabolicDMAllocation, MaintenanceRespiration
              LeafCohort InitialLeaves[2]: same as ScopingTest.MicrometInFields.Field1.Wheat.Leaf.InitialLeaves[2]
              ArrayBiomass CohortArrayLive: Propertys=[[Leaf].Live]; ArraySize=[Leaf].MaxNodeNo
              ArrayBiomass CohortArrayDead: Propertys=[[Leaf].Dead]; ArraySize=[Leaf].MaxNodeNo
              LeafCohortParameters CohortParameters: ExpansionStressValue=0
                Constant DMReallocationFactor: FixedValue=1
                Constant RemobilisationCost: FixedValue=0
                Constant LeafSizeShapeParameter: FixedValue=0.01
                Constant MaintenanceRespirationFunction: FixedValue=0
                Constant SenessingLeafRelativeSize: FixedValue=1; Units=0-1
                BellCurveFunction MaxArea
                  Memo
                    Potential leaf area is calculated from leaf number using the approach of Keating and Wafula (1992).
                    Individual leaf size is described using a bell-shaped curve, the parameters of which are derived from final leaf number.
                  MultiplyFunction LargestLeafPosition
                    VariableReference FinalLeafNumber: VariableName=[Structure].FinalLeafNumber.Value()
                    Constant RelativePositionOfLargestLeaf: FixedValue=0.67
                  LinearInterpolationFunction AreaMax: XProperty=[Structure].FinalLeafNumber.Value()
                    XYPairs: X=[0, 2, 7, 12, 17, 22]; Y=[32530, 39259, 49659, 60000, 75000, 90000]
                  LinearInterpolationFunction Breadth: XProperty=[Structure].FinalLeafNumber.Value()
                    XYPairs: X=[5, 10, 15, 20, 25]; Y=[-0.377, -0.144, -0.059, -0.027, -0.016]
                  Constant Skewness: FixedValue=0.00025
                Constant NReallocationFactor: FixedValue=1
                Constant NRetranslocationFactor: FixedValue=0
                Constant DMRetranslocationFactor: FixedValue=0.5
                LinearInterpolationFunction CellDivisionStress: XProperty=[Maize].WaterSupplyDemandRatio
                  XYPairs: X=[0.9, 1]; Y=[1, 1]
                MinimumFunction ExpansionStress
                  LinearInterpolationFunction WaterStressEffect: XProperty=[Root].WaterTensionFactor
                    XYPairs: X=[0, 0.9, 1.3]; Y=[0, 1, 1]
                  LinearInterpolationFunction TemperatureEffect: XProperty=[Phenology].MeanTemp.Value()
                    XYPairs: X=[0, 12, 14]; Y=[0, 1, 1]
                  LinearInterpolationFunction NitrogenStressEffect: XProperty=[Maize].Leaf.Fn
                    XYPairs: X=[0, 0.5, 1]; Y=[0.1, 0.1, 1]
                LinearInterpolationFunction GrowthDuration: XProperty=[Structure].RelativeNodeApperance
                  XYPairs: X=[0, 0.3, 0.5, 1]; Y=[1, 200, 250, 100]
                LinearInterpolationFunction LagDuration: XProperty=[Structure].RelativeNodeApperance
                  XYPairs: X=[0, 0.5, 0.7, 0.8, 1]; Y=[300, 300, 700, 900, 1300]
                LinearInterpolationFunction SenescenceDuration: XProperty=[Structure].RelativeNodeApperance
                  XYPairs: X=[0, 0.3, 0.5]; Y=[150, 150, 350]
                Constant DetachmentLagDuration: FixedValue=1000000
                Constant DetachmentDuration: FixedValue=1000000
                AddFunction MaximumNConc
                  VariableReference CriticalNConc: VariableName=[Leaf].CohortParameters.CriticalNConc.Value()
                  MultiplyFunction StorageNConc
                    LinearInterpolationFunction NonStructuralNConc: XProperty=[Structure].LeafTipsAppeared
                      XYPairs: X=[1, 10]; Y=[0.034, 0.01]
                    LinearInterpolationFunction WaterStressEffect: XProperty=[Root].WaterTensionFactor
                      XYPairs: X=[0.5, 0.95, 1]; Y=[0, 0, 1]
                Constant CriticalNConc: FixedValue=0.01; Units=g/g
                Constant MinimumNConc: FixedValue=0.005; Units=g/g
                AddFunction DroughtInducedLagAcceleration
                  Constant One: FixedValue=1
                  MultiplyFunction Stress
                    Constant StressResponseCoefficient: FixedValue=2
                    LinearInterpolationFunction StressFactor: XProperty=[Maize].WaterSupplyDemandRatio
                      XYPairs: X=[0.5, 1]; Y=[1, 0]
                AddFunction DroughtInducedSenAcceleration
                  Constant One: FixedValue=1
                  MultiplyFunction Stress
                    Constant StressResponseCoefficient: FixedValue=0
                    LinearInterpolationFunction StressFactor: XProperty=[Root].WaterTensionFactor
                      XYPairs: X=[0, 1]; Y=[1, 0]
                LinearInterpolationFunction SpecificLeafAreaMax: XProperty=[Structure].LeafTipsAppeared
                  XYPairs: X=[1, 9]; Y=[30000, 20000]
                LinearInterpolationFunction SpecificLeafAreaMin: XProperty=[Structure].LeafTipsAppeared
                  XYPairs: X=[1, 9]; Y=[25000, 15000]
                Constant StructuralFraction: FixedValue=0.3
                Constant StorageFraction: FixedValue=0.1
                LinearInterpolationFunction ShadeInducedSenescenceRate: XProperty=[Leaf].CohortCurrentRankCoverAbove
                  XYPairs: X=[0, 0.7, 0.8, 0.96, 0.99]; Y=[0, 0, 0, 0, 0]
                Constant InitialNConc: FixedValue=0; Units=g/g
                ArrayFunction LagDurationAgeMultiplier: Values=1 1 1
                ArrayFunction SenescenceDurationAgeMultiplier: Values=1 1 1
                ArrayFunction LeafSizeAgeMultiplier: Values=1 1 1 1 1 1 1 1 1 1 1 1
              RUEModel Photosynthesis
                Constant RUE: FixedValue=2
                WeightedTemperatureFunction FT: MaximumTemperatureWeighting=0.75
                  XYPairs: X=[0, 8, 15, 35, 50]; Y=[0, 0, 1, 1, 0]
                LinearInterpolationFunction FVPD: XProperty=[Leaf].Photosynthesis.VPD
                  XYPairs: X=[0, 10, 50]; Y=[1, 1, 1]
                LinearInterpolationFunction FN: XProperty=[Leaf].Fn
                  XYPairs: X=[0, 1]; Y=[0.3, 1]
                LinearInterpolationFunction FW: XProperty=[Leaf].Fw
                  XYPairs: X=[0, 0.3]; Y=[0, 1]
                RUECO2Function FCO2: PhotosyntheticPathway=C4
                VariableReference RadnInt: VariableName=[Leaf].RadIntTot
              MultiplyFunction ExtinctionCoeff
                Memo
                  Extinction coefficient is specified in terms of a potential extinction coefficient which is then discounted during periods of water stress to account for the impact of leaf curling.
                LinearInterpolationFunction PotentialExtinctionCoeff: XProperty=[Maize].SowingData.RowSpacing
                  XYPairs: X=[0.2, 0.5, 1]; Y=[0.7, 0.5, 0.4]
                LinearInterpolationFunction WaterStressImpact: XProperty=[Maize].WaterSupplyDemandRatio
                  XYPairs: X=[0, 0.7]; Y=[0.5, 1]
              LinearInterpolationFunction FrostFraction: XProperty=[Weather].MinT
                XYPairs: X=[-2, 2]; Y=[1, 0]
              VariableReference ThermalTime: VariableName=[Phenology].ThermalTime.Value()
              Constant RemobilisationCost: FixedValue=0
              MinimumFunction FRGRFunction
                VariableReference FT: VariableName=[Leaf].Photosynthesis.FT.Value()
                VariableReference FN: VariableName=[Leaf].Photosynthesis.FN.Value()
                VariableReference FVPD: VariableName=[Leaf].Photosynthesis.FVPD.Value()
              Constant StructuralFraction: FixedValue=0.7
              Constant DMConversionEfficiency: FixedValue=1; Units=0-1
              BiomassRemoval BiomassRemovalDefaults
                OrganBiomassRemovalType Harvest: FractionLiveToRemove=0; FractionDeadToRemove=0; FractionLiveToResidue=0.3; FractionDeadToResidue=0
                OrganBiomassRemovalType Cut: FractionLiveToRemove=0.8; FractionDeadToRemove=0; FractionLiveToResidue=0; FractionDeadToResidue=0
                OrganBiomassRemovalType Prune: FractionLiveToRemove=0; FractionDeadToRemove=0; FractionLiveToResidue=0.6; FractionDeadToResidue=0
                OrganBiomassRemovalType Graze: FractionLiveToRemove=0.6; FractionDeadToRemove=0; FractionLiveToResidue=0.1; FractionDeadToResidue=0
              Constant CarbonConcentration: FixedValue=0.4
            GenericOrgan Husk
              PopulationBasedDemandFunction DMDemandFunction
                VariableReference ThermalTime: VariableName=[Phenology].ThermalTime.Value()
                Constant StartStage: FixedValue=5.5
                Constant GrowthDuration: FixedValue=300
                Constant MaximumOrganWt: FixedValue=25
                VariableReference OrganPopulation: VariableName=[Rachis].CobNumber.Value()
                Constant SenescenceRate: FixedValue=0; Units=/d
                LinearInterpolationFunction ExpansionStress2: XProperty=[Maize].WaterSupplyDemandRatio
                  XYPairs: X=[0, 0.35]; Y=[0, 1]
                MinimumFunction ExpansionStress
                  LinearInterpolationFunction WaterStressEffect: XProperty=[Root].WaterTensionFactor
                    XYPairs: X=[0.1, 0.7, 1.3]; Y=[0, 1, 1]
                  LinearInterpolationFunction TemperatureEffect: XProperty=[Phenology].MeanTemp.Value()
                    XYPairs: X=[0, 12, 14]; Y=[0, 1, 1]
                  LinearInterpolationFunction NitrogenStressEffect: XProperty=[Maize].Leaf.Fn
                    XYPairs: X=[0, 0.5, 1]; Y=[0.1, 0.1, 1]
              Constant NReallocationFactor: FixedValue=0
              Constant RemobilisationCost: FixedValue=0
              Constant NRetranslocationFactor: FixedValue=0.1
              Constant MaximumNConc: FixedValue=0.007; Units=g/g
              PhaseLookup StructuralFraction
                PhaseLookupValue PreStemElongation: Start=Emergence; End=StartGrainFill
                  Constant StemFraction: FixedValue=0.5
                PhaseLookupValue StemElongation: Start=StartGrainFill; End=HarvestRipe
                  Constant StemFraction: FixedValue=1
              Constant SenescenceRate: FixedValue=0; Units=/d
              Constant MinimumNConc: FixedValue=0.005; Units=g/g
              Constant DMRetranslocationFactor: FixedValue=0.1
              BiomassRemoval BiomassRemovalDefaults
                OrganBiomassRemovalType Harvest: FractionLiveToRemove=0.5; FractionDeadToRemove=0; FractionLiveToResidue=0.1; FractionDeadToResidue=0
                OrganBiomassRemovalType Cut: FractionLiveToRemove=0.8; FractionDeadToRemove=0; FractionLiveToResidue=0; FractionDeadToResidue=0
                OrganBiomassRemovalType Prune: FractionLiveToRemove=0; FractionDeadToRemove=0; FractionLiveToResidue=0.6; FractionDeadToResidue=0
                OrganBiomassRemovalType Graze: FractionLiveToRemove=0.6; FractionDeadToRemove=0; FractionLiveToResidue=0.2; FractionDeadToResidue=0
              Constant InitialWtFunction: FixedValue=0; Units=g/m^2
              Constant DetachmentRateFunction: FixedValue=0; Units=/d
              Constant MaintenanceRespirationFunction: FixedValue=0; Units=0-1
              Constant DMConversionEfficiency: FixedValue=1; Units=0-1
              Constant DMReallocationFactor: FixedValue=0
              VariableReference CriticalNConc: VariableName=[Husk].MinimumNConc.Value()
              PhaseBasedSwitch NitrogenDemandSwitch: Start=Emergence; End=StartGrainFill
              Constant CarbonConcentration: FixedValue=0.4
            GenericOrgan Rachis
              MultiplyFunction CobNumber
                VariableReference StemNumber: VariableName=[Structure].TotalStemPopn
                Constant CobsPerStem: FixedValue=1.1
              DivideFunction CobSize
                VariableReference CobMass: VariableName=[Rachis].Live.Wt
                VariableReference CobNumber: VariableName=[Rachis].CobNumber.Value()
              PopulationBasedDemandFunction DMDemandFunction
                VariableReference ThermalTime: VariableName=[Phenology].ThermalTime.Value()
                Constant StartStage: FixedValue=5.5
                Constant GrowthDuration: FixedValue=300
                Constant MaximumOrganWt: FixedValue=23
                VariableReference OrganPopulation: VariableName=[Rachis].CobNumber.Value()
                MinimumFunction ExpansionStress: same as StripCrop.StripCropExample.StripCropZone.MaizeStrip.Maize.Husk.DMDemandFunction.ExpansionStress
              Constant NReallocationFactor: FixedValue=0
              Constant RemobilisationCost: FixedValue=0
              Constant NRetranslocationFactor: FixedValue=0.1
              Constant MaximumNConc: FixedValue=0.008; Units=g/g
              Constant StructuralFraction: FixedValue=1; Units=g/g
              Constant SenescenceRate: FixedValue=0; Units=/d
              Constant MinimumNConc: FixedValue=0.003; Units=g/g
              LinearInterpolationFunction ExpansionStress: XProperty=[Maize].WaterSupplyDemandRatio
                XYPairs: X=[0.1, 0.7]; Y=[0, 1]
              BiomassRemoval BiomassRemovalDefaults: same as StripCrop.StripCropExample.StripCropZone.MaizeStrip.Maize.Husk.BiomassRemovalDefaults
              Constant InitialWtFunction: FixedValue=0; Units=g/m^2
              Constant DetachmentRateFunction: FixedValue=0; Units=/d
              Constant MaintenanceRespirationFunction: FixedValue=0; Units=0-1
              Constant DMConversionEfficiency: FixedValue=1; Units=0-1
              Constant DMReallocationFactor: FixedValue=0
              Constant DMRetranslocationFactor: FixedValue=0
              VariableReference CriticalNConc: VariableName=[Rachis].MinimumNConc.Value()
              PhaseBasedSwitch NitrogenDemandSwitch: Start=Emergence; End=StartGrainFill
              Constant CarbonConcentration: FixedValue=0.4
            GenericOrgan Stem
              PhaseLookup StructuralFraction: same as StripCrop.StripCropExample.StripCropZone.MaizeStrip.Maize.Husk.StructuralFraction
              Constant RemobilisationCost: FixedValue=0
              LinearInterpolationFunction MaximumNConc: XProperty=[Structure].RelativeNodeApperance
                XYPairs: X=[0, 0.7, 1]; Y=[0.025, 0.025, 0.005]
              Constant MinimumNConc: FixedValue=0.004; Units=g/g
              PhaseBasedSwitch NitrogenDemandSwitch: Start=Emergence; End=StartGrainFill
              Constant NReallocationFactor: FixedValue=0
              PhaseLookup NRetranslocationFactor
                PhaseLookupValue PreStemElongation: Start=Emergence; End=FlagLeaf
                  Constant StemFraction: FixedValue=0
                PhaseLookupValue StemElongation: Start=FlagLeaf; End=HarvestRipe
                  Constant NRetranslocationFactor: FixedValue=0.05
              Constant DMRetranslocationFactor: FixedValue=0.1
              PartitionFractionDemandFunction DMDemandFunction
                LinearInterpolationFunction PartitionFraction: XProperty=[Phenology].Stage
                  XYPairs: X=[3, 5, 6, 7, 7.0001]; Y=[0.1, 0.1, 1, 1, 0]
              BiomassRemoval BiomassRemovalDefaults: same as StripCrop.StripCropExample.StripCropZone.MaizeStrip.Maize.Husk.BiomassRemovalDefaults
              Constant InitialWtFunction: FixedValue=0; Units=g/m^2
              Constant DetachmentRateFunction: FixedValue=0; Units=/d
              Constant SenescenceRate: FixedValue=0; Units=/d
              Constant MaintenanceRespirationFunction: FixedValue=0; Units=0-1
              Constant DMConversionEfficiency: FixedValue=1; Units=0-1
              Constant DMReallocationFactor: FixedValue=0
              AddFunction CriticalNConc
                VariableReference MinimumNConc: VariableName=[Stem].MinimumNConc.Value()
                MultiplyFunction MetabolicNConc
                  SubtractFunction NonStructuralNConc
                    VariableReference MaximumNConc: VariableName=[Stem].MaximumNConc.Value()
                    VariableReference MinimumNConc: VariableName=[Stem].MinimumNConc.Value()
                  Constant Proportion: FixedValue=0.2
              Constant CarbonConcentration: FixedValue=0.4
            CompositeBiomass AboveGround
              Propertys=[[Leaf].Live, [Leaf].Dead, [Stem].Live, [Stem].Dead, [Husk].Live, [Husk].Dead, [Grain].Live, [Grain].Dead, [Rachis].Live, [Rachis].Dead]
              Memo
                The AboveGround composite biomass object includes all organs occurring above the soil surface to allow output for total dry matter and Nutrient contents, including total structural, non-structural and metabolic pools.
            CompositeBiomass BelowGround: Propertys=[[Root].Live, [Root].Dead]
              Memo
                The BelowGround composite biomass object includes all root biomass pools to allow output for total dry matter and Nutrient contents, including total structural, non-structural and metabolic pools.
            CompositeBiomass Total
              Propertys=[[Leaf].Live, [Leaf].Dead, [Stem].Live, [Stem].Dead, [Husk].Live, [Husk].Dead, [Grain].Live, [Grain].Dead, [Rachis].Live, [Rachis].Dead, [Root].Live, [Root].Dead]
              Memo
                The Total composite biomass object includes all organs (above+below ground) to allow output for total dry matter and Nutrient contents, including total structural, non-structural and metabolic pools.
            CompositeBiomass TotalLive
              Propertys=[[Leaf].Live, [Stem].Live, [Husk].Live, [Grain].Live, [Rachis].Live, [Root].Live]
              Memo
                The TotalLive composite biomass object includes the Live pools of all organs (above+below ground) to allow output for total dry matter and Nutrient contents, including total structural, non-structural and metabolic pools.
            CompositeBiomass TotalDead
              Propertys=[[Leaf].Dead, [Stem].Dead, [Husk].Dead, [Grain].Dead, [Rachis].Dead, [Root].Dead]
              Memo
                The TotalDead composite biomass object includes the Dead pools of all organs (above+below ground) to allow output for total dry matter and Nutrient contents, including total structural, non-structural and metabolic pools.
            CompositeBiomass EarLive: Propertys=[[Husk].Live, [Grain].Live, [Rachis].Live]
              Memo
                The EarLive composite biomass object includes the Live pools of all organs within the Ear to allow output for total dry matter and Nutrient contents, including total structural, non-structural and metabolic pools.
            CompositeBiomass AboveGroundLive
              Propertys=[[Leaf].Live, [Stem].Live, [Husk].Live, [Grain].Live, [Rachis].Live]
              Memo
                The AboveGroundLive composite biomass object includes the Live pools of all organs occurring above the soil surface to allow output for total dry matter and Nutrient contents, including total structural, non-structural and metabolic pools.
            CompositeBiomass AboveGroundDead
              Propertys=[[Leaf].Dead, [Stem].Dead, [Husk].Dead, [Grain].Dead, [Rachis].Dead]
              Memo
                The AboveGroundDead composite biomass object includes the Dead pools of all organs occurring above the soil surface to allow output for total dry matter and Nutrient contents, including total structural, non-structural and metabolic pools.
            Memo Future Development Needs
              #Future Development requirements

              * Phenology not responding to stress events.  Requires better data sets for quantifying the effects of water and nitrogen on leaf apperance and the timing of development stages.
              * Phosphorus response
              * Improved parameterisation of supply and demand for N and DM from organs and arbitration of these resources.
              * Heat Stress responses in grain number
              * More validation under a wider range of environments with more detailed datasets
              * Seedling mortality
              * Water demand (MicroClimate) needs validation
            CultivarFolder
              Cultivar Hycorn_53
                Command:
                  [Phenology].Juvenile.Target.FixedValue = 190
                  [Phenology].Photosensitive.Target.XYPairs.X = 0, 12.5, 24
                  [Phenology].Photosensitive.Target.XYPairs.Y = 0, 0, 124
                  [Phenology].FlagLeafToFlowering.Target.FixedValue = 10
                  [Phenology].FloweringToGrainFilling.Target.FixedValue = 170
                  [Phenology].GrainFilling.Target.FixedValue = 520
                  [Rachis].DMDemandFunction.MaximumOrganWt.FixedValue = 25
                  [Grain].MaximumGrainsPerCob.FixedValue =  550
              Cultivar Pioneer_33M54
                Command:
                  [Phenology].GrainFilling.Target.FixedValue = 550
                  [Phenology].Juvenile.Target.FixedValue = 270
              Cultivar Pioneer_38H20
                Command:
                  [Phenology].Juvenile.Target.FixedValue = 210
                  [Phenology].GrainFilling.Target.FixedValue = 550
              Cultivar Pioneer_34K77
                Command:
                  [Phenology].Juvenile.Target.FixedValue = 280
                  [Phenology].GrainFilling.Target.FixedValue = 550
                Memo
                  VShort duration variety released in New Zealand by Pioneer
              Cultivar Pioneer_39V43
                Command:
                  [Phenology].Juvenile.Target.FixedValue = 100
                  [Phenology].GrainFilling.Target.FixedValue = 500
                  [Phenology].FloweringToGrainFilling.Target.FixedValue = 170
                  [Structure].Phyllochron.Phyllochron.Phyllochron.XYPairs.X = 1, 4, 4.2, 10.5, 11
                  [Structure].Phyllochron.Phyllochron.Phyllochron.XYPairs.Y = 26, 26, 46, 46, 70
                  [Rachis].DMDemandFunction.MaximumOrganWt.FixedValue = 18
                  [Structure].HeightModel.PotentialHeight.XYPairs.X = 3, 4, 5, 6
                  [Structure].HeightModel.PotentialHeight.XYPairs.Y = 20, 40, 50, 1300
                Memo
                  VShort duration variety released in New Zealand by Pioneer
              Cultivar Laila
                Command:
                  [Phenology].Juvenile.Target.FixedValue = 211
                  [Phenology].Photosensitive.Target.XYPairs.X = 0, 12.5, 24
                  [Phenology].Photosensitive.Target.XYPairs.Y = 0, 0, 0
                  [Phenology].FlagLeafToFlowering.Target.FixedValue = 1
                  [Phenology].FloweringToGrainFilling.Target.FixedValue = 170
                  [Phenology].GrainFilling.Target.FixedValue = 812
                  [Phenology].Maturing.Target.FixedValue = 1
                  [Phenology].MaturityToHarvestRipe.Target.FixedValue = 1
                  [Rachis].DMDemandFunction.MaximumOrganWt.FixedValue = 36
                  [Grain].MaximumGrainsPerCob.FixedValue =  720
              Cultivar GH_5019WX
                Command:
                  [Phenology].Juvenile.Target.FixedValue = 225
                  [Phenology].Photosensitive.Target.XYPairs.X = 0, 12.5, 24.0
                  [Phenology].Photosensitive.Target.XYPairs.Y = 0, 0, 124
                  [Phenology].FlagLeafToFlowering.Target.FixedValue = 101
                  [Phenology].FloweringToGrainFilling.Target.FixedValue = 170
                  [Phenology].GrainFilling.Target.FixedValue = 694
                  [Rachis].DMDemandFunction.MaximumOrganWt.FixedValue = 25
                  [Grain].MaximumGrainsPerCob.FixedValue = 550
              Cultivar Hycorn_40
                Command:
                  [Phenology].Juvenile.Target.FixedValue = 190
                  [Phenology].Photosensitive.Target.XYPairs.X = 0, 12.5, 24
                  [Phenology].Photosensitive.Target.XYPairs.Y = 0, 0, 124
                  [Phenology].FlagLeafToFlowering.Target.FixedValue = 50
                  [Phenology].FloweringToGrainFilling.Target.FixedValue = 170
                  [Phenology].GrainFilling.Target.FixedValue = 713
                  [Rachis].DMDemandFunction.MaximumOrganWt.FixedValue = 25
                  [Grain].MaximumGrainsPerCob.FixedValue =  550
              Cultivar GH_5009
                Command:
                  [Phenology].Juvenile.Target.FixedValue = 190
                  [Phenology].Photosensitive.Target.XYPairs.X = 0, 12.5, 24
                  [Phenology].Photosensitive.Target.XYPairs.Y = 0, 0, 300
                  [Phenology].FlagLeafToFlowering.Target.FixedValue = 50
                  [Phenology].FloweringToGrainFilling.Target.FixedValue = 170
                  [Phenology].GrainFilling.Target.FixedValue = 713
                  [Rachis].DMDemandFunction.MaximumOrganWt.FixedValue = 25
                  [Grain].MaximumGrainsPerCob.FixedValue =  550
              Cultivar Dekalb_XL82
                Command:
                  [Phenology].Juvenile.Target.FixedValue = 211
                  [Phenology].Photosensitive.Target.XYPairs.X = 0, 12.5, 24
                  [Phenology].Photosensitive.Target.XYPairs.Y = 0, 0, 472
                  [Phenology].FlagLeafToFlowering.Target.FixedValue = 101
                  [Phenology].FloweringToGrainFilling.Target.FixedValue = 170
                  [Phenology].GrainFilling.Target.FixedValue = 813
                  [Rachis].DMDemandFunction.MaximumOrganWt.FixedValue = 25
                  [Grain].MaximumGrainsPerCob.FixedValue = 550
              Cultivar malawi_local
                Command:
                  [Phenology].Juvenile.Target.FixedValue = 280
                  [Phenology].Photosensitive.Target.XYPairs.X = 0, 12.5, 24
                  [Phenology].Photosensitive.Target.XYPairs.Y = 0, 0, 264.5
                  [Phenology].FlagLeafToFlowering.Target.FixedValue = 10
                  [Phenology].FloweringToGrainFilling.Target.FixedValue = 170
                  [Phenology].GrainFilling.Target.FixedValue = 600
                  [Rachis].DMDemandFunction.MaximumOrganWt.FixedValue = 14
                  [Grain].MaximumGrainsPerCob.FixedValue = 360
                  [Grain].MaximumPotentialGrainSize.FixedValue = 0.217
                Memo
                  The variety malawi_local is a Malawian medium-late maturing local variety.  Photoperiod response is taken from Ellis et al Crop Sci 32:1225 for SR52.
              Cultivar mh19
                Command:
                  [Phenology].Juvenile.Target.FixedValue = 290
                  [Phenology].Photosensitive.Target.XYPairs.X = 0, 12.5, 24
                  [Phenology].Photosensitive.Target.XYPairs.Y = 0, 0, 264.5
                  [Phenology].FlagLeafToFlowering.Target.FixedValue = 10
                  [Phenology].FloweringToGrainFilling.Target.FixedValue = 170
                  [Phenology].GrainFilling.Target.FixedValue = 570
                  [Rachis].DMDemandFunction.MaximumOrganWt.FixedValue = 14
                  [Grain].MaximumGrainsPerCob.FixedValue = 504
                  [Grain].MaximumPotentialGrainSize.FixedValue = 0.361
                Memo
                  The variety mh19 is a Malawian medium-late maturing hybrid.  Photoperiod response is taken from Ellis et al Crop Sci 32:1225 for SR52.
              Cultivar mh17
                Command:
                  [Phenology].Juvenile.Target.FixedValue = 290
                  [Phenology].Photosensitive.Target.XYPairs.X = 0, 12.5, 24
                  [Phenology].Photosensitive.Target.XYPairs.Y = 0, 0, 264.5
                  [Phenology].FlagLeafToFlowering.Target.FixedValue = 10
                  [Phenology].FloweringToGrainFilling.Target.FixedValue = 170
                  [Phenology].GrainFilling.Target.FixedValue = 570
                  [Rachis].DMDemandFunction.MaximumOrganWt.FixedValue = 14
                  [Grain].MaximumGrainsPerCob.FixedValue = 504
                  [Grain].MaximumPotentialGrainSize.FixedValue = 0.361
                Memo
                  The variety mh17 is a Malawian medium-late maturing hybrid.  Photoperiod response is taken from Ellis et al Crop Sci 32:1225 for SR52.
              Cultivar mh16
                Command:
                  [Phenology].Juvenile.Target.FixedValue = 290
                  [Phenology].Photosensitive.Target.XYPairs.X = 0, 12.5, 24
                  [Phenology].Photosensitive.Target.XYPairs.Y = 0, 0, 264.5
                  [Phenology].FlagLeafToFlowering.Target.FixedValue = 10
                  [Phenology].FloweringToGrainFilling.Target.FixedValue = 170
                  [Phenology].GrainFilling.Target.FixedValue = 570
                  [Rachis].DMDemandFunction.MaximumOrganWt.FixedValue = 14
                  [Grain].MaximumGrainsPerCob.FixedValue = 504
                  [Grain].MaximumPotentialGrainSize.FixedValue = 0.361
                Memo
                  The variety mh16 is a Malawian medium-late maturing hybrid.  Photoperiod response is taken from Ellis et al Crop Sci 32:1225 for SR52.
              Cultivar mh12
                Command:
                  [Phenology].Juvenile.Target.FixedValue = 290
                  [Phenology].Photosensitive.Target.XYPairs.X = 0, 12.5, 24
                  [Phenology].Photosensitive.Target.XYPairs.Y = 0, 0, 264.5
                  [Phenology].FlagLeafToFlowering.Target.FixedValue = 10
                  [Phenology].FloweringToGrainFilling.Target.FixedValue = 170
                  [Phenology].GrainFilling.Target.FixedValue = 570
                  [Rachis].DMDemandFunction.MaximumOrganWt.FixedValue = 14
                  [Grain].MaximumGrainsPerCob.FixedValue = 504
                  [Grain].MaximumPotentialGrainSize.FixedValue = 0.361
                Memo
                  The variety mh12 is a Malawian medium-late maturing hybrid.  Photoperiod response is taken from Ellis et al Crop Sci 32:1225 for SR52.
              Cultivar sc623
                Command:
                  [Phenology].Juvenile.Target.FixedValue = 280
                  [Phenology].Photosensitive.Target.XYPairs.X = 0, 12.5, 24
                  [Phenology].Photosensitive.Target.XYPairs.Y = 0, 0, 264.5
                  [Phenology].FlagLeafToFlowering.Target.FixedValue = 10
                  [Phenology].FloweringToGrainFilling.Target.FixedValue = 170
                  [Phenology].GrainFilling.Target.FixedValue = 550
                  [Rachis].DMDemandFunction.MaximumOrganWt.FixedValue = 14
                  [Grain].MaximumGrainsPerCob.FixedValue = 504
                  [Grain].MaximumPotentialGrainSize.FixedValue = 0.361
                Memo
                  The variety sc623 is a Zimbabwean medium-late maturing hybrid.  Photoperiod response is taken from Ellis et al Crop Sci 32:1225 for SR52.
              Cultivar sc625
                Command:
                  [Phenology].Juvenile.Target.FixedValue = 280
                  [Phenology].Photosensitive.Target.XYPairs.X = 0, 12.5, 24
                  [Phenology].Photosensitive.Target.XYPairs.Y = 0, 0, 264.5
                  [Phenology].FlagLeafToFlowering.Target.FixedValue = 10
                  [Phenology].FloweringToGrainFilling.Target.FixedValue = 170
                  [Phenology].GrainFilling.Target.FixedValue = 570
                  [Rachis].DMDemandFunction.MaximumOrganWt.FixedValue = 14
                  [Grain].MaximumGrainsPerCob.FixedValue = 504
                  [Grain].MaximumPotentialGrainSize.FixedValue = 0.361
                Memo
                  The variety sc625 is a Zimbabwean medium-late maturing hybrid.  Photoperiod response is taken from Ellis et al Crop Sci 32:1225 for SR52.
              Cultivar sc601
                Command:
                  [Phenology].Juvenile.Target.FixedValue = 280
                  [Phenology].Photosensitive.Target.XYPairs.X = 0, 12.5, 24
                  [Phenology].Photosensitive.Target.XYPairs.Y = 0, 0, 264.5
                  [Phenology].FlagLeafToFlowering.Target.FixedValue = 10
                  [Phenology].FloweringToGrainFilling.Target.FixedValue = 170
                  [Phenology].GrainFilling.Target.FixedValue = 560
                  [Rachis].DMDemandFunction.MaximumOrganWt.FixedValue = 14
                  [Grain].MaximumGrainsPerCob.FixedValue = 495
                  [Grain].MaximumPotentialGrainSize.FixedValue = 0.361
                Memo
                  The variety sc601 is a Zimbabwean medium-late maturing hybrid.  Photoperiod response is taken from Ellis et al Crop Sci 32:1225 for SR52.
              Cultivar CG4141
                Command:
                  [Phenology].Juvenile.Target.FixedValue = 233
                  [Phenology].Photosensitive.Target.XYPairs.X = 0, 12.5, 24
                  [Phenology].Photosensitive.Target.XYPairs.Y = 0, 0, 264.5
                  [Phenology].FlagLeafToFlowering.Target.FixedValue = 10
                  [Phenology].FloweringToGrainFilling.Target.FixedValue = 170
                  [Phenology].GrainFilling.Target.FixedValue = 550
                  [Rachis].DMDemandFunction.MaximumOrganWt.FixedValue = 14
                  [Grain].MaximumGrainsPerCob.FixedValue = 468
                  [Grain].MaximumPotentialGrainSize.FixedValue = 0.361
                Memo
                  The variety CG4141 is a Zimbabwean early-medium maturing hybrid.  Photoperiod response is taken from Ellis et al Crop Sci 32:1225 for SR52.
              Cultivar mh18
                Command:
                  [Phenology].Juvenile.Target.FixedValue = 260
                  [Phenology].Photosensitive.Target.XYPairs.X = 0, 12.5, 24
                  [Phenology].Photosensitive.Target.XYPairs.Y = 0, 0, 264.5
                  [Phenology].FlagLeafToFlowering.Target.FixedValue = 10
                  [Phenology].FloweringToGrainFilling.Target.FixedValue = 170
                  [Phenology].GrainFilling.Target.FixedValue = 550
                  [Rachis].DMDemandFunction.MaximumOrganWt.FixedValue = 14
                  [Grain].MaximumGrainsPerCob.FixedValue = 486
                  [Grain].MaximumPotentialGrainSize.FixedValue = 0.361
                Memo
                  The variety mh18 is a Zimbabwean early-medium maturing hybrid.  Photoperiod response is taken from Ellis et al Crop Sci 32:1225 for SR52.
              Cultivar r215
                Command:
                  [Phenology].Juvenile.Target.FixedValue = 250
                  [Phenology].Photosensitive.Target.XYPairs.X = 0, 12.5, 24
                  [Phenology].Photosensitive.Target.XYPairs.Y = 0, 0, 264.5
                  [Phenology].FlagLeafToFlowering.Target.FixedValue = 10
                  [Phenology].FloweringToGrainFilling.Target.FixedValue = 170
                  [Phenology].GrainFilling.Target.FixedValue = 550
                  [Rachis].DMDemandFunction.MaximumOrganWt.FixedValue = 14
                  [Grain].MaximumGrainsPerCob.FixedValue = 468
                  [Grain].MaximumPotentialGrainSize.FixedValue = 0.361
                Memo
                  The variety r215 is a Zimbabwean early-medium maturing hybrid.  Photoperiod response is taken from Ellis et al Crop Sci 32:1225 for SR52.
              Cultivar Melkassa
                Command:
                  [Phenology].Juvenile.Target.FixedValue = 230
                  [Phenology].Photosensitive.Target.XYPairs.X = 0, 12.5, 24
                  [Phenology].Photosensitive.Target.XYPairs.Y = 0, 0, 264.5
                  [Phenology].FlagLeafToFlowering.Target.FixedValue = 10
                  [Phenology].FloweringToGrainFilling.Target.FixedValue = 160
                  [Phenology].GrainFilling.Target.FixedValue = 550
                  [Rachis].DMDemandFunction.MaximumOrganWt.FixedValue = 14
                  [Grain].MaximumGrainsPerCob.FixedValue = 387
                  [Grain].MaximumPotentialGrainSize.FixedValue = 0.33
                Memo
                  The variety Melkassa is a local early-medium maturing Ethiopian variety.
              Cultivar sr52
                Command:
                  [Phenology].Juvenile.Target.FixedValue = 250
                  [Phenology].Photosensitive.Target.XYPairs.X = 0, 12.5, 24
                  [Phenology].Photosensitive.Target.XYPairs.Y = 0, 0, 264.5
                  [Phenology].FlagLeafToFlowering.Target.FixedValue = 10
                  [Phenology].FloweringToGrainFilling.Target.FixedValue = 170
                  [Phenology].GrainFilling.Target.FixedValue = 550
                  [Rachis].DMDemandFunction.MaximumOrganWt.FixedValue = 14
                  [Grain].MaximumGrainsPerCob.FixedValue = 468
                  [Grain].MaximumPotentialGrainSize.FixedValue = 0.361
                Memo
                  The variety sr52 is a Zimbabwean early-medium maturing hybrid.  Photoperiod response is taken from Ellis et al Crop Sci 32:1225 for SR52.
              Cultivar sc501
                Command:
                  [Phenology].Juvenile.Target.FixedValue = 250
                  [Phenology].Photosensitive.Target.XYPairs.X = 0, 12.5, 24
                  [Phenology].Photosensitive.Target.XYPairs.Y = 0, 0, 264.5
                  [Phenology].FlagLeafToFlowering.Target.FixedValue = 10
                  [Phenology].FloweringToGrainFilling.Target.FixedValue = 170
                  [Phenology].GrainFilling.Target.FixedValue = 550
                  [Rachis].DMDemandFunction.MaximumOrganWt.FixedValue = 14
                  [Grain].MaximumGrainsPerCob.FixedValue = 468
                  [Grain].MaximumPotentialGrainSize.FixedValue = 0.361
                Memo
                  The variety sc501 is a Zimbabwean early-medium maturing hybrid.  Photoperiod response is taken from Ellis et al Crop Sci 32:1225 for SR52.
              Cultivar r201
                Command:
                  [Phenology].Juvenile.Target.FixedValue = 230
                  [Phenology].Photosensitive.Target.XYPairs.X = 0, 12.5, 24
                  [Phenology].Photosensitive.Target.XYPairs.Y = 0, 0, 264.5
                  [Phenology].FlagLeafToFlowering.Target.FixedValue = 10
                  [Phenology].FloweringToGrainFilling.Target.FixedValue = 170
                  [Phenology].GrainFilling.Target.FixedValue = 550
                  [Rachis].DMDemandFunction.MaximumOrganWt.FixedValue = 14
                  [Grain].MaximumGrainsPerCob.FixedValue = 450
                  [Grain].MaximumPotentialGrainSize.FixedValue = 0.375
                Memo
                  The variety r201 is a Zimbabwean early maturing hybrid.  Photoperiod response is taken from Ellis et al Crop Sci 32:1225 for SR52.
              Cultivar sc401
                Command:
                  [Phenology].Juvenile.Target.FixedValue = 230
                  [Phenology].Photosensitive.Target.XYPairs.X = 0, 12.5, 24
                  [Phenology].Photosensitive.Target.XYPairs.Y = 0, 0, 264.5
                  [Phenology].FlagLeafToFlowering.Target.FixedValue = 10
                  [Phenology].FloweringToGrainFilling.Target.FixedValue = 170
                  [Phenology].GrainFilling.Target.FixedValue = 550
                  [Rachis].DMDemandFunction.MaximumOrganWt.FixedValue = 14
                  [Grain].MaximumGrainsPerCob.FixedValue = 450
                  [Grain].MaximumPotentialGrainSize.FixedValue = 0.375
                Memo
                  The variety NSCM_41 is a Zimbabwean early maturing hybrid.  Photoperiod response is taken from Ellis et al Crop Sci 32:1225 for SR52.
              Cultivar NSCM_41: same as StripCrop.StripCropExample.StripCropZone.MaizeStrip.Maize.CultivarFolder.sc401
              Cultivar Makueni
                Command:
                  [Phenology].Juvenile.Target.FixedValue = 150
                  [Phenology].Photosensitive.Target.XYPairs.X = 0, 12.5, 24
                  [Phenology].Photosensitive.Target.XYPairs.Y = 0, 0, 115
                  [Phenology].FlagLeafToFlowering.Target.FixedValue = 10
                  [Phenology].FloweringToGrainFilling.Target.FixedValue = 120
                  [Phenology].GrainFilling.Target.FixedValue = 530
                  [Rachis].DMDemandFunction.MaximumOrganWt.FixedValue = 14
                  [Grain].MaximumGrainsPerCob.FixedValue = 432
                  [Grain].MaximumPotentialGrainSize.FixedValue = 0.375
                Memo
                  The variety Makueni Composite is a kenyan variety with similar phenology but slightly higher cob size than Katumani composite.
              Cultivar Katumani
                Command:
                  [Phenology].Juvenile.Target.FixedValue = 150
                  [Phenology].Photosensitive.Target.XYPairs.X = 0, 12.5, 24
                  [Phenology].Photosensitive.Target.XYPairs.Y = 0, 0, 115
                  [Phenology].FlagLeafToFlowering.Target.FixedValue = 10
                  [Phenology].FloweringToGrainFilling.Target.FixedValue = 120
                  [Phenology].GrainFilling.Target.FixedValue = 530
                  [Rachis].DMDemandFunction.MaximumOrganWt.FixedValue = 14
                  [Grain].MaximumGrainsPerCob.FixedValue = 405
                  [Grain].MaximumPotentialGrainSize.FixedValue = 0.375
                Memo
                  The variety Katumani Composite B was formed in 1966 and released in 1968 as part of the maize breeding work undertaken at the Katumani Research Station in Kenya which started in 1956.  Katumani Composite B was an advanced generation of Katumani Synthetic V X Katumani Synthetic VI.  It has slight photoperiod sensitivity and relatively small potential cob size.
              Cultivar Pioneer_3153
              Cultivar Pioneer_39G12
                Command:
                  [Phenology].Juvenile.Target.FixedValue = 180
                  [Phenology].GrainFilling.Target.FixedValue = 500
                  [Grain].MaximumGrainsPerCob.FixedValue = 550
                  [Grain].NumberFunction.GrowthRateFactor.XYPairs.X = 0.2,2,4,10
                  [Grain].NumberFunction.GrowthRateFactor.XYPairs.Y = 0,0.6,1,1
                  [Grain].MaximumPotentialGrainSize.FixedValue = 0.25
            CompositeBiomass Spike: Propertys=[[Husk].Live, [Rachis].Live]
              Memo
                The SpikeLive composite biomass object includes the Live pools of then non-grain organs within the reproductive spike to allow output for total dry matter and Nutrient contents, including total structural, non-structural and metabolic pools.
          Manager SowingFertiliser
            Amount = 160
            CropName = maize
            script: same as in ScopingTest.MicrometInFields.Field1.SowingFertiliser
          Manager SowingRule
            StartDate = 1-oct
            EndDate = 10-jan
            MinESW = 100
            MinRain = 25
            RainDays = 7
            CultivarName = Dekalb_XL82
            SowingDepth = 30
            RowSpacing = 750
            Population = 6
```csharp
using System;
using Models.Core;
using Models.PMF;
using Models.Soils;
using Models.Utilities;
using APSIM.Shared.Utilities;

namespace Models
{
    [Serializable]
    public class Script : Model
    {
        [Link] Clock Clock;
        [Link] Fertiliser Fertiliser;
        [Link] Summary Summary;
        [Link] Plant Maize;
        [Link] Soil Soil;
        Accumulator accumulatedRain;
        
        [Description("Start of sowing window (d-mmm)")]
        public string StartDate { get; set; }
        [Description("End of sowing window (d-mmm)")]
        public string EndDate { get; set; }
        [Description("Minimum extractable soil water for sowing (mm)")]
        public double MinESW { get; set; }
        [Description("Accumulated rainfall required for sowing (mm)")]
        public double MinRain { get; set; }
        [Description("Duration of rainfall accumulation (d)")]
        public int RainDays { get; set; }
        [Description("Cultivar to be sown")]
        public string CultivarName { get; set; }
        [Description("Sowing depth (mm)")]
        public double SowingDepth { get; set; }
        [Description("Row spacing (mm)")]
        public double RowSpacing { get; set; }
        [Description("Plant population (/m2)")]
        public double Population { get; set; }
        
        
        [EventSubscribe("Commencing")]
        private void OnSimulationCommencing(object sender, EventArgs e)
        {
            accumulatedRain = new Accumulator(this, "[Weather].Rain", RainDays);
        }
        

        [EventSubscribe("DoManagement")]
        private void OnDoManagement(object sender, EventArgs e)
        {
            accumulatedRain.Update();
            
            if (DateUtilities.WithinDates(StartDate, Clock.Today, EndDate) &&
                !Maize.IsAlive &&
                MathUtilities.Sum(Soil.SoilWater.ESW) > MinESW &&
                accumulatedRain.Sum > MinRain)
            {
                Maize.Sow(population: Population, cultivar: CultivarName, depth: SowingDepth, rowSpacing: RowSpacing);    
            }
        
        }
        
    }
}
```
          Manager Harvesting
```csharp
using System;
using Models.Core;
using System.Collections.Generic;
using System.Text;
using Models.Soils;
using Models.PMF;
using Models;
using System.Xml.Serialization;
using APSIM.Shared.Utilities;

namespace Models
{
    [Serializable] 
    public class Script : Model
    {
        [Link] Plant Maize;
        [Link] Zone zone;
                    
        
        [EventSubscribe("Commencing")]
        private void OnSimulationCommencing(object sender, EventArgs e)
        {
        }
        
        [EventSubscribe("DoManagement")]
        private void OnDoManagement(object sender, EventArgs e)
        {
            if (Maize.Phenology.CurrentPhaseName == "ReadyForHarvesting")
            {
                Maize.Harvest();
                Maize.EndCrop();
            }
        }
        
        [EventSubscribe("DoManagementCalculations")]
        private void OnDoManagementCalculations(object sender, EventArgs e)
        {
            
        }
    }
}
```
          SoluteManager
        Zone WheatStrip: Area=1; Slope=0
          Report: EventNames=[Clock].DoReport
            VariableNames:
              [Clock].Today
              [Wheat].Phenology.Zadok.Stage
              [Wheat].Phenology.CurrentStageName
              [Wheat].AboveGround.Wt
              [Wheat].AboveGround.N
              [Wheat].Grain.Total.Wt*10 as Yield
              [Wheat].Grain.Protein
              [Wheat].Grain.Size
              [Wheat].Grain.Number
              [Wheat].Grain.Total.Wt
              [Wheat].Grain.Total.N
              [Wheat].Total.Wt
              sum([Soil].SoilWater.SWmm) as SWTot
          Fertiliser
          Soil: same as ScopingTest.MicrometInFields.Field1.Soil
          SurfaceOrganicMatter: same as ScopingTest.MicrometInFields.Field1.SurfaceOrganicMatter
          Plant Wheat: same as ScopingTest.MicrometInFields.Field1.Wheat
          Manager SowingFertiliser
            Amount = 160
            CropName = wheat
            script: same as in ScopingTest.MicrometInFields.Field1.SowingFertiliser
          Manager Harvest
```csharp
using System;
using Models.Core;
using Models.PMF;
using Models.Soils;
using Models.Utilities;
using APSIM.Shared.Utilities;

namespace Models
{
    [Serializable]
    public class Script : Model
    {
        [Link] Plant Wheat;

        [EventSubscribe("DoManagement")]
        private void OnDoManagement(object sender, EventArgs e)
        {
            if (Wheat.IsReadyForHarvesting)
            {
               Wheat.Harvest();
               Wheat.EndCrop();    
            }
        
        }
        
    }
}
```
          SoluteManager
          Manager SowingRule1
            StartDate = 1-jun
            EndDate = 10-jul
            MinESW = 100
            MinRain = 10
            RainDays = 7
            CultivarName = Hartog
            SowingDepth = 30
            RowSpacing = 250
            Population = 120
```csharp
using System;
using Models.Core;
using Models.PMF;
using Models.Soils;
using Models.Utilities;
using APSIM.Shared.Utilities;

namespace Models
{
    [Serializable]
    public class Script : Model
    {
        [Link] Clock Clock;
        [Link] Fertiliser Fertiliser;
        [Link] Summary Summary;
        [Link] Plant Wheat;
        [Link] Soil Soil; 
        Accumulator accumulatedRain;
        
        [Description("Start of sowing window (d-mmm)")]
        public string StartDate { get; set;}
        [Description("End of sowing window (d-mmm)")]
        public string EndDate { get; set;}
        [Description("Minimum extractable soil water for sowing (mm)")]
        public double MinESW { get; set;}
        [Description("Accumulated rainfall required for sowing (mm)")]
        public double MinRain { get; set;}
        [Description("Duration of rainfall accumulation (d)")]
        public int RainDays { get; set;}
        [Description("Cultivar to be sown")]
        [Display(DisplayType = DisplayAttribute.DisplayTypeEnum.CultivarName)]
        public string CultivarName { get; set;}
        [Description("Sowing depth (mm)")]
        public double SowingDepth { get; set;}        
        [Description("Row spacing (mm)")]
        public double RowSpacing { get; set;}    
        [Description("Plant population (/m2)")]
        public double Population { get; set;}    
        
        
        [EventSubscribe("Commencing")]
        private void OnSimulationCommencing(object sender, EventArgs e)
        {
            accumulatedRain = new Accumulator(this, "[Weather].Rain", RainDays);
        }
        

        [EventSubscribe("DoManagement")]
        private void OnDoManagement(object sender, EventArgs e)
        {
            accumulatedRain.Update();
            
            if (DateUtilities.WithinDates(StartDate,Clock.Today,EndDate) &&
                !Wheat.IsAlive &&
                MathUtilities.Sum(Soil.SoilWater.ESW) > MinESW &&
                accumulatedRain.Sum > MinRain)
            {
               Wheat.Sow(population:Population, cultivar:CultivarName, depth:SowingDepth, rowSpacing:RowSpacing);    
            }
        
        }
        
    }
}
```
    Simulation SoleCropExample
      Clock: StartDate=1990-01-01; EndDate=1991-06-30
      Summary SummaryFile
      Weather: FileName=%root%\Examples\WeatherFiles\Dalby.met
      MicroClimate: a_interception=0; b_interception=1; c_interception=0; d_interception=0; soil_albedo=0.3; sun_angle=15; soil_heat_flux_fraction=0.4; night_interception_fraction=0.5; refheight=2; albedo=0.15; emissivity=0.96; RadIntTotal=0
      SoilArbitrator Soil Arbitrator
      Zone SoleMaize: same as StripCrop.StripCropExample.StripCropZone.MaizeStrip
      Zone SoleWheat: same as StripCrop.StripCropExample.StripCropZone.WheatStrip
  Folder Wageningen2013
    Simulation WUR2013SoleWheat
      Clock: StartDate=2013-03-01; EndDate=2013-12-31
      Summary SummaryFile
      Weather: FileName=Volkel.met
      MicroClimate: a_interception=0; b_interception=1; c_interception=0; d_interception=0; soil_albedo=0.3; sun_angle=15; soil_heat_flux_fraction=0.4; night_interception_fraction=0.5; refheight=2; albedo=0.15; emissivity=0.96; RadIntTotal=0
      SoilArbitrator Soil Arbitrator
      Zone SoleWheat: Area=1; Slope=0
        Report WURReport: EventNames=[Clock].DoReport
          VariableNames:
            [Clock].Today
            [Wheat].Phenology.Zadok.Stage
            [Wheat].Phenology.CurrentStageName
            [Wheat].AboveGround.Wt
            [Wheat].AboveGround.N
            [Wheat].Grain.Total.Wt*10 as Yield
            [Wheat].Grain.Protein
            [Wheat].Grain.Size
            [Wheat].Grain.Number
            [Wheat].Grain.Total.Wt
            [Wheat].Grain.Total.N
            [Wheat].Total.Wt
            sum([Soil].SoilWater.SWmm) as SWTot
            [Wheat].Leaf.Fw
            [Wheat].Leaf.Fn
            [Wheat].Root.Depth
        Fertiliser
        SurfaceOrganicMatter: same as ScopingTest.MicrometInFields.Field1.SurfaceOrganicMatter
        Soil WURSoil: ASCOrder=Vertosol; ASCSubOrder=Black; SoilType=Clay; Site=Norwin; NearestTown=Norwin; Region=Darling Downs and Granite Belt; State=Queensland; Country=Australia; NaturalVegetation=Qld. Bluegrass, possible Qld. Blue gum; ApsoilNumber=900; Latitude=-27.581836; Longitude=151.320206; LocationAccuracy=+/- 20m
          DataSource=CSIRO Sustainable Ecosystems, Toowoomba; Characteriesd as part of the GRDC funded project"Doing it better, doing it smarter, managing soil water in Australian agriculture' 2011
          Comments=OC, CLL for all crops estimated-based on Bongeen Mywybilla Soil No1
          Water
            Thickness  BD   AirDry  LL15  DUL  SAT  KS
            150        1.4  0.05    0.1   0.2  0.3  100
            150        1.4  0.05    0.1   0.2  0.3  100
            300        1.4  0.05    0.1   0.2  0.3  100
            300        1.4  0.05    0.1   0.2  0.3  100
            300        1.4  0.05    0.1   0.2  0.3  100
            300        1.4  0.05    0.1   0.2  0.3  100
            300        1.4  0.05    0.1   0.2  0.3  100
            SoilCrop WheatSoil: LL=[0.1, 0.1, 0.1, 0.1, 0.1, 0.1, 0.1]; KL=[0.06, 0.06, 0.06, 0.04, 0.04, 0.02, 0.01]; XF=[1, 1, 1, 1, 1, 1, 1]
            SoilCrop MaizeSoil: LL=[0.1, 0.1, 0.1, 0.1, 0.1, 0.1, 0.1]; KL=[0.06, 0.06, 0.06, 0.04, 0.04, 0.02, 0.01]; XF=[1, 1, 1, 1, 1, 1, 1]
          SoilWater: SummerDate=1-Apr; SummerU=6; SummerCona=3.5; WinterDate=1-Nov; WinterU=2; WinterCona=2; DiffusConst=40; DiffusSlope=16; Salb=0.12; CN2Bare=70; CNRed=20; CNCov=0.8; max_pond=0; Thickness=[150, 150, 300, 300, 300, 300, 300]; SWCON=[0.3, 0.3, 0.3, 0.3, 0.3, 0.3, 0.3]; residueinterception=0
          SoilNitrogen: fom_type=[default, manure, mucuna, lablab, shemp, stable]; fract_carb=[0.2, 0.3, 0.54, 0.57, 0.45, 0]; fract_cell=[0.7, 0.3, 0.37, 0.37, 0.47, 0.1]; fract_lign=[0.1, 0.4, 0.09, 0.06, 0.08, 0.9]
          SoilOrganicMatter: same as Replacements.WURSoil.SoilOrganicMatter
          Analysis: Thickness=[150, 150, 300, 300, 300, 300, 300]; PH=[8, 8, 8, 8, 8, 8, 8]; PHUnits=Water; BoronUnits=HotWater
          InitialWater: PercentMethod=EvenlyDistributed; FractionFull=1
          Sample InitialN: same as ScopingTest.MicrometInFields.Field1.Soil.InitialN
          CERESSoilTemperature
        Operations
          2013-03-21  [Wheat].Sow(population: 250, cultivar: Tybalt, depth: 30, rowSpacing: 125);
          2013-03-21  [Irrigation].Apply(amount: 15);
          2013-04-19  [Fertiliser].Apply(Amount: 57, Type: Fertiliser.Types.NO3N);
          2013-05-30  [Fertiliser].Apply(Amount: 75, Type: Fertiliser.Types.NO3N);
          2013-06-18  [Fertiliser].Apply(Amount: 27, Type: Fertiliser.Types.NO3N);
          2013-08-20  [Wheat].Harvest();
          2013-08-20  [Wheat].EndCrop();
          2013-07-12  [Irrigation].Apply(amount: 15);
          2013-07-19  [Irrigation].Apply(amount: 15);
          2013-07-22  [Irrigation].Apply(amount: 15);
          2013-07-26  [Irrigation].Apply(amount: 15);
          2013-09-06  [Irrigation].Apply(amount: 15);
          2013-07-01  [Irrigation].Apply(amount: 50);
        SoluteManager
        Plant Wheat: CropType=Wheat
        Plant Maize: CropType=Maize
        Irrigation
    Simulation WUR2013SoleMaize
      Clock: StartDate=2013-03-01; EndDate=2013-12-31
      Summary SummaryFile
      Weather: FileName=Volkel.met
      MicroClimate: a_interception=0; b_interception=1; c_interception=0; d_interception=0; soil_albedo=0.3; sun_angle=15; soil_heat_flux_fraction=0.4; night_interception_fraction=0.5; refheight=2; albedo=0.15; emissivity=0.96; RadIntTotal=0
      SoilArbitrator Soil Arbitrator
      Zone SoleMaize: Area=1; Slope=0
        Report WURReport: EventNames=[Clock].DoReport
          VariableNames:
            [Clock].Today
            [Maize].Phenology.CurrentStageName
            [Maize].AboveGround.Wt
            [Maize].AboveGround.N
            [Maize].Grain.Wt
            [Maize].Grain.Size
            [Maize].Grain.NumberFunction.Value()
            [Maize].Grain.N
            [Maize].Total.Wt
            sum([Soil].SoilWater.SWmm) as SWTot
        Fertiliser
        Soil WURSoil: ASCOrder=Vertosol; ASCSubOrder=Black; SoilType=Clay; Site=Norwin; NearestTown=Norwin; Region=Darling Downs and Granite Belt; State=Queensland; Country=Australia; NaturalVegetation=Qld. Bluegrass, possible Qld. Blue gum; ApsoilNumber=900; Latitude=-27.581836; Longitude=151.320206; LocationAccuracy=+/- 20m
          DataSource=CSIRO Sustainable Ecosystems, Toowoomba; Characteriesd as part of the GRDC funded project"Doing it better, doing it smarter, managing soil water in Australian agriculture' 2011
          Comments=OC, CLL for all crops estimated-based on Bongeen Mywybilla Soil No1
          Water
            Thickness  BD   AirDry  LL15  DUL  SAT  KS
            150        1.4  0.05    0.1   0.2  0.3  100
            150        1.4  0.05    0.1   0.2  0.3  100
            300        1.4  0.05    0.1   0.2  0.3  100
            300        1.4  0.05    0.1   0.2  0.3  100
            300        1.4  0.05    0.1   0.2  0.3  100
            300        1.4  0.05    0.1   0.2  0.3  100
            300        1.4  0.05    0.1   0.2  0.3  100
            SoilCrop MaizeSoil: LL=[0.1, 0.1, 0.1, 0.1, 0.1, 0.1, 0.1]; KL=[0.06, 0.06, 0.06, 0.04, 0.04, 0.02, 0.01]; XF=[1, 1, 1, 1, 1, 1, 1]
          SoilWater: same as ScopingTest.MicrometInFields.Field1.Soil.SoilWater
          SoilNitrogen: fom_type=[default, manure, mucuna, lablab, shemp, stable]; fract_carb=[0.2, 0.3, 0.54, 0.57, 0.45, 0]; fract_cell=[0.7, 0.3, 0.37, 0.37, 0.47, 0.1]; fract_lign=[0.1, 0.4, 0.09, 0.06, 0.08, 0.9]
          SoilOrganicMatter: same as Replacements.WURSoil.SoilOrganicMatter
          Analysis: Thickness=[150, 150, 300, 300, 300, 300, 300]; PH=[8, 8, 8, 8, 8, 8, 8]; PHUnits=Water; BoronUnits=HotWater
          InitialWater: PercentMethod=EvenlyDistributed; FractionFull=1
          Sample InitialN: same as ScopingTest.MicrometInFields.Field1.Soil.InitialN
          CERESSoilTemperature
        SurfaceOrganicMatter: same as ScopingTest.MicrometInFields.Field1.SurfaceOrganicMatter
        SoluteManager
        Irrigation
        Operations
          2013-05-14  [Maize].Sow(population: 10, cultivar: Atrium, depth: 30, rowSpacing: 750);
          2013-05-14  [Irrigation].Apply(amount: 15);
          2013-04-19  [Fertiliser].Apply(Amount: 57, Type: Fertiliser.Types.NO3N);
          2013-05-30  [Fertiliser].Apply(Amount: 75, Type: Fertiliser.Types.NO3N);
          2013-06-18  [Fertiliser].Apply(Amount: 27, Type: Fertiliser.Types.NO3N);
          2013-10-16  [Maize].Harvest();
          2013-10-16  [Maize].EndCrop();
          2013-07-12  [Irrigation].Apply(amount: 15);
          2013-07-19  [Irrigation].Apply(amount: 15);
          2013-07-22  [Irrigation].Apply(amount: 15);
          2013-07-26  [Irrigation].Apply(amount: 15);
          2013-09-06  [Irrigation].Apply(amount: 15);
          2013-07-01  [Irrigation].Apply(amount: 50);
        Plant Maize: CropType=Maize
        Plant Wheat: CropType=Wheat
  Folder Wageningen2014
    Simulation WUR2014SoleWheat
      Clock: StartDate=2014-01-01; EndDate=2014-12-31
      Summary SummaryFile
      Weather: FileName=Volkel.met
      MicroClimate: a_interception=0; b_interception=1; c_interception=0; d_interception=0; soil_albedo=0.3; sun_angle=15; soil_heat_flux_fraction=0.4; night_interception_fraction=0.5; refheight=2; albedo=0.15; emissivity=0.96; RadIntTotal=0
      SoilArbitrator Soil Arbitrator
      Zone SoleWheat: Area=1; Slope=0
        Report WURReport: same as Wageningen2013.WUR2013SoleWheat.SoleWheat.WURReport
        Fertiliser
        SurfaceOrganicMatter: same as ScopingTest.MicrometInFields.Field1.SurfaceOrganicMatter
        Soil WURSoil: same as Wageningen2013.WUR2013SoleWheat.SoleWheat.WURSoil
        Operations
          2014-03-13  [Wheat].Sow(population: 250, cultivar: Tybalt, depth: 30, rowSpacing: 125);
          2014-03-13  [Irrigation].Apply(amount: 15);
          2014-04-09  [Fertiliser].Apply(Amount: 70, Type: Fertiliser.Types.NO3N);
          2014-05-09  [Fertiliser].Apply(Amount: 76, Type: Fertiliser.Types.NO3N);
          2014-06-06  [Fertiliser].Apply(Amount: 27, Type: Fertiliser.Types.NO3N);
          2014-08-04  [Wheat].Harvest();
          2014-08-04  [Wheat].EndCrop();
          2014-07-01  [Irrigation].Apply(amount: 30);
          2014-07-04  [Irrigation].Apply(amount: 30);
          2014-07-22  [Irrigation].Apply(amount: 30);
        SoluteManager
        Plant Wheat: CropType=Wheat
        Plant Maize: CropType=Maize
        Irrigation
    Simulation WUR2014SoleMaize
      Clock: StartDate=2014-01-01; EndDate=2014-12-31
      Summary SummaryFile
      Weather: FileName=Volkel.met
      MicroClimate: a_interception=0; b_interception=1; c_interception=0; d_interception=0; soil_albedo=0.3; sun_angle=15; soil_heat_flux_fraction=0.4; night_interception_fraction=0.5; refheight=2; albedo=0.15; emissivity=0.96; RadIntTotal=0
      SoilArbitrator Soil Arbitrator
      Zone SoleMaize: Area=1; Slope=0
        Report WURReport: EventNames=[Clock].DoReport
          VariableNames:
            [Clock].Today
            [Maize].Phenology.CurrentStageName
            [Maize].AboveGround.Wt
            [Maize].AboveGround.N
            [Maize].Grain.Wt
            [Maize].Grain.Size
            [Maize].Grain.NumberFunction.Value()
            [Maize].Grain.N
            [Maize].Total.Wt
            sum([Soil].SoilWater.SWmm) as SWTot
        Fertiliser
        Soil WURSoil: same as Wageningen2013.WUR2013SoleMaize.SoleMaize.WURSoil
        SurfaceOrganicMatter: same as ScopingTest.MicrometInFields.Field1.SurfaceOrganicMatter
        SoluteManager
        Operations
          2014-05-07  [Maize].Sow(population: 10, cultivar: Atrium, depth: 30, rowSpacing: 750);
          2014-05-07  [Irrigation].Apply(amount: 15);
          2014-04-09  [Fertiliser].Apply(Amount: 70, Type: Fertiliser.Types.NO3N);
          2014-05-09  [Fertiliser].Apply(Amount: 76, Type: Fertiliser.Types.NO3N);
          2014-06-06  [Fertiliser].Apply(Amount: 27, Type: Fertiliser.Types.NO3N);
          2014-09-23  [Maize].Harvest();
          2014-09-23  [Maize].EndCrop();
          2014-07-01  [Irrigation].Apply(amount: 30);
          2014-07-04  [Irrigation].Apply(amount: 30);
          2014-07-22  [Irrigation].Apply(amount: 30);
        Plant Maize: CropType=Maize
        Plant Wheat: CropType=Wheat
        Irrigation
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