Simulations: Version=196
  Memo Introduction
    # The APSIM Mungbean Model

    The APSIM Mungbean model has been developed using the Plant Modelling Framework (PMF) of ([brown_plant_2014]). This new framework provides a library of plant organ and process submodels that can be coupled, at runtime, to construct a model in much the same way that models can be coupled to construct a simulation. This means that dynamic composition of lower level process and organ classes (e.g. photosynthesis, leaf) into larger constructions (e.g. maize, wheat, sorghum) can be achieved by the model developer without additional coding.

    The model consists of:

    * a phenology model to simulate development between growth phases
    * a structure model to simulate plant morphology
    * a collection of organs to simulate the various plant parts
    * an arbitrator to allocate resources (N, biomass) to the various plant organs
  Memo Differences between Classic and NextGen Models
    •While, when extensively calibrated to specific sites as it was in many papers, the APSIM classic mungbean model can accurately simulate a limited number of targeted scenarios, overall, it has a low level of simulation accuracy (RMSDYield = 470 kg ha-1, r2yield = 0.13; RMSDBiomass = 1823 kg ha-1, r2Biomass = 0.2). Therefore, the classic model has limited functionality and performance in forecasting analyses. Likewise, the classic model was built using old cultivars (Berken and King) which bear limited resemblance to the current popular cultivars (e.g., Jade-AU, Crystal, and Celera II-AU). We decided to source some parameter values from the classic model, but otherwise built the new model off of the template of the soybean APSIM NextGen model and Plant Modelling Framework. Parameter-wise, the following are the major ones that were changed:

    oThere was an added phase for thermal time accumulation to delay emergence in the spring. The shoot lag was extended from 10 to 25GDD, but now days to emergence is more temperature dependent.
    oThe base and optimal temperatures for vegetative thermal time were kept the same, but the optimal temperature window was extended to 43C and the max was at 45C, not 40C. This was to reflect the consistency in growth at the October, November, and January sowing dates. Reproductive had the same base, but a lower optimal window and max than Vegetative.
    oThe node appearance rate was 100 before, but is now 70 (in line with Geetika’s work)
    oThe k and RUE values are higher, sourced from Geetika’s work
    oA water deficit stress induced senescence was added
    oA photosynthesis respond to higher VPD was added
    oRoot depth rate was changed to reflect the collected soil water extraction data
    oWithout root:shoot biomass data, we kept the 0.2 biomass fraction to the root included in the soybean model which had extensive root data included in the model building dataset
    oThe critical nitrogen concentrations are a smaller range with a lower max and higher min. This data was drawn from Muchow et al., 1993 paper on accumulation (see model documentation)

    oThis is not a comprehensive list: We are sure that we are missing other items that were changed (likely the maximum fixation rate and the stem allocation fraction), but it was not always a simple adjustment to the parameters as the model framework itself has changed. The classic model required a good amount of further calibration by the model users in a way that we hope the new model won’t. That said, it is still customisable and we welcome any feedback about how it runs or what needs to be added or improved.
  Folder Replacements
    Report DailyReport: EventNames=[Clock].DoReport
      VariableNames:
        [Clock].Today
        [Mungbean].DaysAfterSowing
        [Mungbean].Phenology.Photoperiod.DayLength
        [Mungbean].Phenology.AccumulatedTT
        [Mungbean].Leaf.DeltaLAI.Vegetative.Delta.LAR
        [Weather].MinT
        [Weather].MeanT
        [Weather].MaxT
        [Soil].Temperature.Value
        ([Weather].MaxT-[Weather].MinT) as TempDiff
        [Phenology].Photoperiod
        [Mungbean].Root.NSupply
        [Soil].SoilWater.Eo
        [Soil].SoilWater.Es
        [Irrigation].IrrigationApplied
        [Root].WaterUptake
        [Weather].VP
        [Weather].VPD
        [Leaf].Photosynthesis.VPD
        [Soil].SoilWater.Drainage
        [Soil].SoilWater.Runoff
        [Soil].SoilWater.pond
        [Mungbean].Phenology.StartFloweringDAS
        [Mungbean].Phenology.StartGrainFillingDAS
        [Mungbean].Phenology.EndGrainFillDAS
        [Mungbean].Phenology.MaturityDAS
        [Mungbean].Phenology.AccumulatedTT
        [Mungbean].Leaf.NodeNumber
        [Mungbean].Phenology.CurrentPhaseName
        [Mungbean].Phenology.Stage
        [Mungbean].Phenology.CurrentStageName
        [Mungbean].Grain.Wt*10 as Yield
        [Mungbean].Grain.Wt
        [Mungbean].Shell.Wt
        [Mungbean].Shell.N+[Mungbean].Grain.N as Pod.N
        [Mungbean].Stem.Wt
        [Mungbean].Leaf.Wt
        [Mungbean].Root.Wt
        [Mungbean].Grain.Size
        [Mungbean].Leaf.Dead.Wt
        [Mungbean].AboveGround.Wt
        [Mungbean].AboveGroundLive.Wt
        [Mungbean].Grain.Dead.Wt
        [Mungbean].Pod.Wt
        [Mungbean].Grain.HarvestIndex
        [Mungbean].Grain.LiveOnlyHI
        [Mungbean].Leaf.Fw
        [Mungbean].Leaf.Fn
        [Mungbean].Grain.Number
        [Mungbean].Leaf.Area
        [Mungbean].Leaf.Photosynthesis.FT
        [Mungbean].Phenology.Photoperiod
        [Mungbean].Nodule.NFixed
        [Mungbean].Stem.Wt+[Mungbean].Pod.Wt as StemPodWt
        [Mungbean].Stem.N
        [Mungbean].Stem.NConc
        [Mungbean].Leaf.N
        [Mungbean].Stem.Live.N
        [Mungbean].Grain.N
        [Mungbean].Grain.Live.N
        [Mungbean].Shell.N
        [Mungbean].Shell.Live.N
        [Mungbean].Leaf.Live.N
        [Mungbean].Root.Live.N
        [Mungbean].Leaf.Live.NConc
        [Mungbean].Root.Live.NConc
        [Mungbean].Grain.NConc
        [Mungbean].Leaf.NConc
        [Mungbean].Stem.NConc
        [Mungbean].Pod.NConc
        [Mungbean].Shell.NConc
        [Mungbean].AboveGround.N
        [Mungbean].Grain.LiveOnlyNHI
        [Mungbean].Grain.NHI
        [Mungbean].Leaf.Dead.N
        [Mungbean].Pod.N
        [Mungbean].Nodule.NFixed
        [Mungbean].Root.RootFrontVelocity
        [Mungbean].Root.RootDepthStressFactor
        [Mungbean].Leaf.Transpiration
        [Mungbean].Leaf.WaterDemand
        [Mungbean].Root.Depth
        [Mungbean].Leaf.CoverTotal
        [Mungbean].Leaf.CoverTotal*100 as RadiationIntercepted
        [Mungbean].Leaf.CoverDead
        [Mungbean].Leaf.LAI
        [Mungbean].Leaf.LAITotal
        [Mungbean].Leaf.Height
        [Mungbean].Leaf.SpecificArea
        [Mungbean].Arbitrator.N.TotalPlantDemand
        [Mungbean].Arbitrator.DM.TotalFixationSupply
        [Mungbean].Arbitrator.DM.TotalPlantDemand
        [Mungbean].Leaf.DMDemand.Total
        [Mungbean].Grain.DMDemand.Total
        [Mungbean].Stem.DMDemand.Total
        [Mungbean].Shell.DMDemand.Total
        [Mungbean].Root.DMDemand.Total
        sum of [Mungbean].Nodule.NFixed from [Mungbean].Sowing to [Mungbean].Harvesting as CumulativeFixedN
        [Soil].Nutrient.MineralN[1] as SoilN_0_10cm
        ([Soil].Nutrient.MineralN[2])+(0.3*[Soil].Nutrient.MineralN[1]) as SoilN_10_30cm
        Sum([Soil].Nutrient.MineralN[3:4]) as SoilN_30_60cm
        Sum([Soil].Nutrient.MineralN[5:6]) as SoilN_60_90cm
        [Soil].Nutrient.MineralN[7] as SoilN_90_120cm
        Sum([Soil].Nutrient.MineralN[1:4]) as SoilN90cm
        Sum([Soil].Nutrient.MineralN[1:5]) as SoilN120cm
        Sum([Soil].Nutrient.MineralN[1:8]) as TotNO3150
        TotNO3150+(([Soil].Nutrient.MineralN[9]/3)) as TotNO3160
        Sum([Soil].SoilWater.PAWmm[1:2]) as SoilPAW0_30cm
        Sum([Soil].SoilWater.PAWmm[3:4]) as SoilPAW30_60cm
        Sum([Soil].SoilWater.PAWmm[5:6]) as SoilPAW60_90cm
        [Soil].SoilWater.PAWmm[7] as SoilPAW90_120cm
        [MicroClimate].PrecipitationInterception
        [MicroClimate].PetAerodynamicTerm
        [MicroClimate].PetRadiationTerm
        [Weather].Rain
        Sum([Soil].Water.MM[1:8]) as TotSWmm150
        (TotSWmm150+(0.33*[Soil].Water.MM[9])) as TotSWmm160
        ([Soil].Water.Volumetric[1]) as SW10
        ((0.5*[Soil].Water.Volumetric[1])+(0.5*[Soil].Water.Volumetric[2])) as SW15
        [Soil].Water.Volumetric[2] as SW20
        ((0.5*[Soil].Water.Volumetric[2])+(0.5*[Soil].Water.Volumetric[3])) as SW30
        [Soil].Water.Volumetric[3] as SW40
        [Soil].Water.Volumetric[4] as SW50
        ((0.5*[Soil].Water.Volumetric[4])+(0.5*[Soil].Water.Volumetric[5])) as SW60
        [Soil].Water.Volumetric[5] as SW70
        [Soil].Water.Volumetric[6] as SW80
        ((0.5*[Soil].Water.Volumetric[6])+(0.5*[Soil].Water.Volumetric[7])) as SW90
        [Soil].Water.Volumetric[7] as SW110
        ((0.5*[Soil].Water.Volumetric[7])+(0.5*[Soil].Water.Volumetric[8])) as SW120
        [Soil].Water.Volumetric[8] as SW130
        ((0.5*[Soil].Water.Volumetric[8])+(0.5*[Soil].Water.Volumetric[9])) as SW150
        [Mungbean].Arbitrator.DM.TotalFixationSupply
        sum([Mungbean].Arbitrator.N.Fixation) as NFixed
        [Mungbean].Arbitrator.DM.TotalPlantDemand
        [Mungbean].Stem.RetranslocationWt
        [Mungbean].Leaf.NSupply.Reallocation
        [Mungbean].Arbitrator.DM.TotalFixationSupply
        sum([Mungbean].Arbitrator.N.Fixation) as NFixed
        [Mungbean].Arbitrator.DM.TotalPlantDemand
        [Mungbean].Root.PlantWaterPotentialFactor
        [Mungbean].Leaf.NodeNumber
        [Mungbean].Leaf.BranchNumber
        [Mungbean].Leaf.Number
        [Mungbean].Leaf.ExtinctionCoefficient
        [Mungbean].Leaf.Live.Wt
        [Mungbean].Leaf.Live.StructuralWt
        [Mungbean].Leaf.Live.MetabolicWt
        [Mungbean].Leaf.Allocated.MetabolicWt
        [Mungbean].Leaf.Allocated.StructuralWt
        [Mungbean].Leaf.Total.StructuralN
        [Mungbean].Leaf.Live.StructuralN
        [Mungbean].Leaf.Total.StorageWt
        [Mungbean].Leaf.Total.MetabolicN
        [Mungbean].Leaf.Total.StorageN
        [Mungbean].Stem.PotentialGrowth
        [Mungbean].Leaf.Dead.StructuralWt
        [Mungbean].Leaf.Dead.MetabolicWt
        [Mungbean].Leaf.Live.N
        [Mungbean].Leaf.Live.NConc
        [Mungbean].Leaf.Dead.Wt
        [Mungbean].Leaf.Dead.N
        [Mungbean].Leaf.Dead.NConc
        [Mungbean].Leaf.SpecificArea
        [Mungbean].Leaf.SpecificAreaCanopy
        [Mungbean].Leaf.Senesced.Wt
        [Mungbean].Leaf.Transpiration
        [Mungbean].Leaf.Total.StructuralWt
        [Mungbean].Stem.Live.Wt
        [Mungbean].Stem.Senesced.Wt
        [Mungbean].Stem.Total.StructuralWt
        [Mungbean].Stem.Live.StructuralWt
        [Mungbean].Stem.Live.StructuralN
        [Mungbean].Stem.Total.StorageWt
        [Mungbean].Stem.PotentialGrowth
        [Mungbean].Leaf.MaximumNConc
        [Mungbean].Leaf.MinimumNConc
        [Mungbean].Leaf.CriticalNConc
        [Mungbean].Stem.MaximumNConc
        [Mungbean].Stem.MinimumNConc
        [Mungbean].Stem.CriticalNConc
        [Mungbean].Shell.MaximumNConc
        [Mungbean].Shell.MinimumNConc
        [Mungbean].Shell.CriticalNConc
        [Mungbean].Shell.Live.Wt
        [Mungbean].Shell.Total.StructuralWt
        [Mungbean].Shell.Live.StructuralWt
        [Mungbean].Shell.Live.StructuralN
        [Mungbean].Shell.Total.StorageWt
        [Mungbean].Shell.Total.StructuralN
        [Mungbean].Stem.Total.StructuralN
    Report HarvestReport: EventNames=[Mungbean].Harvesting
      VariableNames:
        [Clock].Today
        [Mungbean].Phenology.Stage
        [Mungbean].Phenology.CurrentStageName
        [Mungbean].AboveGround.Wt
        [Mungbean].AboveGround.N
        [Mungbean].Grain.Total.Wt*10 as Yield
        [Mungbean].Grain.NConc
        [Mungbean].Grain.Size
        [Mungbean].Grain.Number
        [Mungbean].Grain.Total.Wt
        [Mungbean].Grain.Total.N
        [Mungbean].Total.Wt
        [Mungbean].Phenology.EmergenceDAS
        [Mungbean].Phenology.StartFloweringDAS
        [Mungbean].Phenology.StartGrainFillingDAS
        [Mungbean].Phenology.StartPodDevDAS
        [Mungbean].Phenology.EndGrainFillDAS
        [Mungbean].Phenology.MaturityDAS
        [Mungbean].Leaf.NodeNumber
        [Mungbean].Leaf.Area
  DataStore
    ExcelInput: FileNames=[ObservedData.xlsx]
      SheetNames=[PlantBiomassObserved, NitrogenObserved, CanopyObserved, SoilWaterObserved, PhenologyObserved, PhenologyDailyObserved]
    PredictedObserved PredictedObservedBiomass: PredictedTableName=HarvestReport; ObservedTableName=PlantBiomassObserved; FieldNameUsedForMatch=SimulationName; FieldName2UsedForMatch=SimulationID; FieldName3UsedForMatch=Mungbean.Phenology.CurrentStageName; AllColumns=false
    PredictedObserved PredictedObservedPhenology: PredictedTableName=HarvestReport; ObservedTableName=PhenologyObserved; FieldNameUsedForMatch=SimulationName; FieldName2UsedForMatch=SimulationID; FieldName3UsedForMatch=Mungbean.Phenology.CurrentStageName; AllColumns=false
    Probability: TableName=HarvestReport; Exceedence=false; FieldToSplitOn=SimulationName
    PredictedObserved PredictedObservedCanopyDaily: PredictedTableName=DailyReport; ObservedTableName=CanopyObserved; FieldNameUsedForMatch=SimulationName; FieldName2UsedForMatch=SimulationID; FieldName3UsedForMatch=Clock.Today; AllColumns=false
    PredictedObserved PredictedObservedBiomassDaily: PredictedTableName=DailyReport; ObservedTableName=PlantBiomassObserved; FieldNameUsedForMatch=SimulationName; FieldName2UsedForMatch=SimulationID; FieldName3UsedForMatch=Clock.Today; AllColumns=false
    PredictedObserved PredictedObservedNitrogenDaily: PredictedTableName=DailyReport; ObservedTableName=NitrogenObserved; FieldNameUsedForMatch=SimulationName; FieldName2UsedForMatch=SimulationID; FieldName3UsedForMatch=Clock.Today; AllColumns=false
    PredictedObserved PredictedObservedPhenologyDaily: PredictedTableName=DailyReport; ObservedTableName=PhenologyDailyObserved; FieldNameUsedForMatch=SimulationName; FieldName2UsedForMatch=SimulationID; FieldName3UsedForMatch=Clock.Today; AllColumns=false
  Folder Validation
    Folder Thomas Dissertation
      Memo Thomas Dissertation data description
        Thomas Dissertation includes 3 experiments that look at different irrigation regimes/timings/cultivars and compares mungbean to soybean.
        These experiments were used to build the original generic legume model ([robertson_simulation_2002], [ThomasThesis_2000]).
      Experiment Experiment_1_Berken
        Memo
          Experiment at Gatton, QLD, sown on November 28 1996 on CSIRO Cooper field station. Soil type was a deep alluvial, weakly-cracking vertisol. There were 3 treatments: 1) well-watered, 2) rainfed and 3) rainfed+irrigation during pod filling. The cultivar used was Berken.
        Factors
          Permutation
            Factor Water
              CompositeFactor Irr
                Specifications:
                  [Operations]
                  [SowingRule].Script.CultivarName=Berken
                  [AutoIrr].Script.AutoIrrigationOn=True
                Operations Irr
                  1996-11-29  [Irrigation].Apply(amount:10)
                  1996-12-04  [Irrigation].Apply(amount: 20)
                  1996-12-10  [Irrigation].Apply(amount: 20)
                  1996-12-15  [Irrigation].Apply(amount: 20)
                  1996-12-22  [Irrigation].Apply(amount: 35)
                  1996-12-29  [Irrigation].Apply(amount: 35)
                  1997-01-06  [Irrigation].Apply(amount: 35)
                  1997-01-13  [Irrigation].Apply(amount: 35)
                  1997-01-20  [Irrigation].Apply(amount: 35)
                  1997-01-27  [Irrigation].Apply(amount: 35)
                  1997-02-03  [Irrigation].Apply(amount: 35)
                  1997-02-10  [Irrigation].Apply(amount: 35)
                  1997-02-17  [Irrigation].Apply(amount: 35)
                  1997-02-24  [Irrigation].Apply(amount: 35)
                  1997-03-01  [Irrigation].Apply(amount: 35)
                  1997-03-08  [Irrigation].Apply(amount: 35)
                  1997-03-15  [Irrigation].Apply(amount: 35)
                  1997-03-22  [Irrigation].Apply(amount: 35)
                  1997-03-29  [Irrigation].Apply(amount: 35)
              CompositeFactor RF
                Specifications:
                  [Operations]
                  [SowingRule].Script.CultivarName=Berken
                Operations Irr
                  1996-11-20  [Irrigation].Apply(amount:80)
                  1996-11-29  [Irrigation].Apply(amount:80)
                  1996-12-04  [Irrigation].Apply(amount: 80)
                  1996-12-10  [Irrigation].Apply(amount: 80)
                  1996-12-15  [Irrigation].Apply(amount: 80)
                  1996-12-18  [Irrigation].Apply(amount: 80)
                  1996-12-22  [Irrigation].Apply(amount: 80)
              CompositeFactor PodIrr
                Specifications:
                  [Operations]
                  [AutoIrr].Script.AutoIrrigationOn=True
                  [SowingRule].Script.CultivarName=Berken
                Operations Irr
                  1996-11-29  [Irrigation].Apply(amount:10)
                  1996-12-04  [Irrigation].Apply(amount: 20)
                  1996-12-10  [Irrigation].Apply(amount: 20)
                  1996-12-15  [Irrigation].Apply(amount: 20)
                  1997-01-27  [Irrigation].Apply(amount: 57)
                  1997-02-05  [Irrigation].Apply(amount: 57)
                  1997-02-12  [Irrigation].Apply(amount: 57)
        Simulation Exp1Berken
          Summary summaryfile
          SoilArbitrator Soil Arbitrator
          Clock: Start=1996-11-04; End=1997-04-30
          Weather: FileName=GattonThomas.xlsx; ExcelWorkSheetName=Hermitage
          Zone paddock: Area=1; Slope=0; AspectAngle=0; Altitude=50
            MicroClimate: a_interception=0; b_interception=1; c_interception=0; d_interception=0; SoilHeatFluxFraction=0.4; MinimumHeightDiffForNewLayer=0; NightInterceptionFraction=0.5; ReferenceHeight=2
            Irrigation
            Fertiliser
            SurfaceOrganicMatter: InitialResidueName=wheat; InitialResidueType=wheat; InitialResidueMass=500; InitialStandingFraction=0; InitialCPR=0; InitialCNR=40
            Report DailyReport: EventNames=[Clock].DoReport
              VariableNames:
                [Clock].Today
                [DiagnosticsVariables].Script.AccumPlantN
                [DiagnosticsVariables].Script.AccumMineralisation
                [DiagnosticsVariables].Script.AccumDenit
                [DiagnosticsVariables].Script.AccumFert
                [DiagnosticsVariables].Script.AccumLeach
                [DiagnosticsVariables].Script.AccumDetach
                [DiagnosticsVariables].Script.DeltaSoilOMN
                [DiagnosticsVariables].Script.DeltaSurfaceOMN
                [DiagnosticsVariables].Script.DeltaSoilMineralN
                [Mungbean].Root.NSupply
                [Soil].SoilWater.Eo
                [Soil].SoilWater.Es
                [DiagnosticsVariables].Script.SWC
                [DiagnosticsVariables].Script.DUL
                [Soil].SoilWater.Drainage
                [Soil].SoilWater.Runoff
                [DiagnosticsVariables].Script.OutFlowLat
                [Soil].SoilWater.pond
                [DiagnosticsVariables].Script.AccumEO
                [DiagnosticsVariables].Script.AccumEP
                [DiagnosticsVariables].Script.AccumES
                [DiagnosticsVariables].Script.AccumDrainage
                [DiagnosticsVariables].Script.AccumRunoff
                [DiagnosticsVariables].Script.AccumRainfall
                [DiagnosticsVariables].Script.AccumIrrigation
                [DiagnosticsVariables].Script.AccumOutflowLat
                [DiagnosticsVariables].Script.SoilWaterDeficit
                [Mungbean].Grain.Live.Wt
                [Mungbean].Shell.Live.Wt
                [Mungbean].Stem.Live.Wt
                [Mungbean].Stem.Live.Wt
                [Mungbean].Grain.Live.N
                [Mungbean].Shell.Live.N
                [Mungbean].Leaf.Live.Wt
                [Mungbean].Root.Live.Wt
                [Mungbean].Leaf.Live.N
                [Mungbean].Root.Live.N
                [Mungbean].Leaf.Live.NConc
                [Mungbean].Root.Live.NConc
                [Mungbean].Root.WaterSupply
                [Mungbean].Root.WaterUptake
                [Mungbean].Leaf.Transpiration
                [Mungbean].Leaf.WaterDemand
                [Mungbean].Root.Depth
                [Mungbean].Leaf.CoverTotal
                [Mungbean].Leaf.CoverDead
                [Mungbean].Leaf.LAI
                [Mungbean].Leaf.Height
                [Mungbean].Leaf.PotentialBiomass
                [Soil].Water.MM
                [Soil].NO3.kgha
                [DiagnosticsVariables].Script.SoilNitrogenContent
                [Mungbean].Arbitrator.N.TotalPlantDemand
                [MicroClimate].net_radn
                [MicroClimate].peta
                [MicroClimate].petr
                [DiagnosticsVariables].Script.FomN
                [DiagnosticsVariables].Script.HumN
                [DiagnosticsVariables].Script.BiomN
                [DiagnosticsVariables].Script.DltNMinRes
                [DiagnosticsVariables].Script.DltNMinTot
                [Mungbean].Leaf.Fw
                [Mungbean].Leaf.Fn
                [Mungbean].Phenology.CurrentPhase.Name
                [Mungbean].Phenology.Stage
                [Mungbean].Pod.Wt
                [Mungbean].Pod.N
                [Mungbean].Structure.LeafTipsAppeared
                [Mungbean].Structure.MainStemPrimordiaNo
                [Mungbean].Leaf.CohortArea[1]
                [Mungbean].Leaf.CohortArea[2]
                [Mungbean].Leaf.CohortArea[3]
                [Mungbean].Leaf.CohortArea[4]
                [Mungbean].Leaf.CohortArea[5]
                [Mungbean].Leaf.CohortArea[6]
                [Mungbean].Leaf.CohortArea[7]
                [Mungbean].Leaf.CohortArea[8]
                [Mungbean].Leaf.CohortArea[9]
                [Mungbean].Leaf.CohortArea[10]
                [Mungbean].Leaf.CohortArea[11]
                [Mungbean].Leaf.CohortArea[12]
                [Mungbean].Leaf.CohortArea[13]
                [Mungbean].Leaf.CohortArea[14]
                [Mungbean].Leaf.CohortArea[15]
                [Mungbean].Leaf.AppearedCohortNo
                [Mungbean].Leaf.DeadCohortNo
                [Mungbean].AboveGround.Wt
                [Mungbean].Phenology.Stage
                [Mungbean].Structure.MainStemPrimordiaNo
                [Mungbean].Phenology.NFF
                [MungbeanHarvestRule].Script.FinalTag
                [Mungbean].Grain.NumberFunction
                [Mungbean].Shell.PodNumber
                [Mungbean].Phenology.FN
                [Mungbean].Phenology.FN.TotalNodes
                [Mungbean].Phenology.FN.VegetativeNodes
            Report HarvestReport: EventNames=[Soybean].Harvesting
              VariableNames:
                [Clock].Today
                [Mungbean].Phenology.Stage
                [Mungbean].Phenology.CurrentStageName
                [Mungbean].AboveGround.Wt
                [Mungbean].AboveGround.N
                [Mungbean].Grain.Total.Wt*10 as Yield
                [Mungbean].Grain.NConc
                [Mungbean].Grain.Size
                [Mungbean].Grain.Number
                [Mungbean].Grain.Total.Wt
                [Mungbean].Grain.Total.N
                [Mungbean].Total.Wt
            Plant Mungbean
            Manager Irrigatefixeddates
              IrrigateDates = 27-oct
              Amount = 0
              Depth = 0
              Efficiency = 1
              WillRunoff = False
```csharp
using Models.Soils;
using System;
using Models.Core;
using Models.PMF;
using APSIM.Shared.Utilities;
namespace Models
{
    [Serializable]
    public class Script : Model
    {
        [Link] Clock Clock;
        [Link] Irrigation Irrigation;
        
        [Separator("A component to apply irrigation on one or more dates on every year of the simulation")]

        [Description("Enter the irrigation dates as dd-mmm with comma separation (any year information entered will be ignored)")] 
        public string[] IrrigateDates { get; set; }
        
        [Description("Amount of irrigation to be applied (mm)")] 
        public double Amount { get; set; }
        
        [Description("Depth in the soil to apply the  irrigation (mm)")] 
        public double Depth { get; set; }
        
        [Description("Efficiency of irrigation (0-1)")] 
        public double Efficiency { get; set; }
        
        [Description("Will the irrigation runoff?")] 
        public bool WillRunoff { get; set; }
        
        [EventSubscribe("DoManagement")]
        private void OnDoManagement(object sender, EventArgs e)
        {
            foreach (string ddMMM in IrrigateDates)
            {
                if (DateUtilities.DatesEqual(ddMMM, Clock.Today))
                    Irrigation.Apply(amount: Amount, depth: Depth, efficiency: Efficiency, willRunoff: WillRunoff);
            }
        }
    }
}
```
            Operations
            Soil: Latitude=0; Longitude=0
              WaterBalance SoilWater: SummerDate=1-Nov; SummerU=8.8; SummerCona=3.9; WinterDate=1-Apr; WinterU=6; WinterCona=3.9; DiffusConst=20; DiffusSlope=35.4; Salb=0.13; CN2Bare=62; CNRed=20; CNCov=0.8; PSIDul=-100
              Organic: FOMCNRatio=33; CarbonUnits=Total
                Thickness  Carbon  SoilCNRatio  FBiom  FInert  FOM
                150        2.2     14.5         0.02   0.36    0
                150        1.6     14.5         0.015  0.5     0
                150        1.35    14.5         0.01   0.59    0
                150        0.95    14.5         0.01   0.84    0
                150        1       14.5         0.01   0.8     0
                150        0.8     14.5         0.01   0.99    0
                300        0.45    14.5         0.01   0.99    0
                300        0.45    14.5         0.01   0.99    0
                300        0.45    14.5         0.01   0.99    0
              Chemical: PHUnits=Water
                Thickness  PH   CEC
                150        7.5  13.295
                150        8    11.945
                150        8    11.3825
                150        8    10.4825
                150        8    10.595
                150        8    10.145
                300        8    9.3575
                300        8    9.3575
                300        8    9.3575
                CEC source: Calculated
              Nutrient
              Physical
                Thickness  ParticleSizeSand  ParticleSizeSilt  ParticleSizeClay  Rocks  BD    AirDry  LL15  DUL   SAT   KS
                150        5                 65                30                0      1.37  0.1     0.22  0.48  0.48  0.01
                150        5                 65                30                0      1.27  0.19    0.22  0.48  0.48  0.01
                150        5                 65                30                0      1.28  0.19    0.24  0.48  0.48  0.01
                150        5                 65                30                0      1.33  0.19    0.24  0.38  0.42  0.01
                150        5                 65                30                0      1.37  0.2     0.26  0.38  0.42  0.01
                150        5                 65                30                0      1.42  0.2     0.26  0.38  0.42  0.01
                300        5                 65                30                0      1.36  0.2     0.26  0.33  0.42  0.01
                300        5                 65                30                0      1.35  0.2     0.27  0.35  0.42  0.01
                300        5                 65                30                0      1.35  0.2     0.27  0.35  0.42  0.01
                Rocks, ParticleSizeSand, ParticleSizeSilt, ParticleSizeClay source: Calculated
                SoilCrop MungbeanSoil: LL=[0.3, 0.3, 0.3, 0.32, 0.32, 0.32, 0.29, 0.29, 0.29]; KL=[0.04, 0.04, 0.04, 0.08, 0.08, 0.08, 0.08, 0.04, 0.04]; XF=[1, 1, 1, 1, 1, 1, 1, 1, 1]
              Water: Thickness=[150, 150, 150, 150, 150, 150, 300, 300, 300]; InitialValues=[0.42, 0.42, 0.4, 0.4, 0.39, 0.36, 0.33, 0.34, 0.34]; InitialPAWmm=205.5; RelativeTo=LL15; FilledFromTop=false
              Solute NO3: Thickness=[150, 150, 150, 150, 150, 150, 300, 300, 300]; InitialValues=[0.14, 0.32, 0.3, 0.15, 0.17, 0.08, 0.08, 0.09, 0.09]; InitialValuesUnits=ppm; WaterTableConcentration=0; D0=0; DepthConstant=0; MaxDepthSoluteAccessible=0; RunoffEffectivenessAtMovingSolute=0; MaxEffectiveRunoff=0
              Solute NH4: Thickness=[150, 150, 150, 150, 150, 150, 300, 300, 300]; InitialValues=[1, 1, 1, 1, 1, 1, 1, 1, 1]; InitialValuesUnits=ppm; WaterTableConcentration=0; D0=0; DepthConstant=0; MaxDepthSoluteAccessible=0; RunoffEffectivenessAtMovingSolute=0; MaxEffectiveRunoff=0
              Solute Urea: Thickness=[150, 150, 150, 150, 150, 150, 300, 300, 300]; InitialValues=[0, 0, 0, 0, 0, 0, 0, 0, 0]; InitialValuesUnits=kg/ha; WaterTableConcentration=0; D0=0; DepthConstant=0; MaxDepthSoluteAccessible=0; RunoffEffectivenessAtMovingSolute=0; MaxEffectiveRunoff=0
              SoilTemperature Temperature
            Manager SowingRule
              SowingDate = 11/28/1996 00:00:00
              CultivarName = Emerald
              RowSpacing = 375
              SowingDepth = 50
              SowingRate = 40
```csharp
using Models.Soils;
using System;
using Models.Core;
using Models.PMF;
using APSIM.Shared.Utilities;
        
        namespace Models
        {
           [Serializable] 
           [System.Xml.Serialization.XmlInclude(typeof(Model))]
            public class Script : Model
            {      
               [Link] Plant Mungbean;
               [Link] Clock Clock;

               [Description("Spacing (mm) between rows")]
               public double RowSpacing { get; set; }
               [Description("Depth (mm) Grains are planted")]
               public double SowingDepth { get; set; }
               [Description("Seeds sown (/m2)")]
               public double SowingRate { get; set; }
               [Description("Cultivar")]
               [Display(Type=DisplayType.CultivarName)]
               public string CultivarName { get; set; }
               [Description("Sowing Date")]
               public DateTime SowingDate { get; set; }

               [EventSubscribe("DoManagement")]
               private void OnDoManagement(object sender, EventArgs e)
               {
                if (Clock.Today.Date == SowingDate)
                    Mungbean.Sow(population:SowingRate, cultivar:CultivarName, depth:SowingDepth, rowSpacing:RowSpacing, budNumber:1);
               }
            }
        }
```
            Manager AutoIrr
              AutoIrrigationOn = False
              Crop = [Mungbean]
              FASWThreshold = 0.9
              FASWDepth = 600
              weeks = 2
              afterSowing = 20
```csharp
using APSIM.Numerics;
using Models.Interfaces;
using APSIM.Shared.Utilities;
using System.Xml.Serialization;
using Models;
using Models.PMF;
using Models.Soils;
using System.Text;
using System.Collections.Generic;
using Models.Core;
using System;
using Models.Interfaces;
namespace Models
{
    [Serializable] 
    public class Script : Model
    {
        [Link] private Zone zone;
        [Link] private Irrigation irrigation;
        [Link] private ISoilWater waterBalance;
        [Link] private IPhysical soilPhysical;
        public double FASW { get; set; }
        public double WaterDeficit  { get; set; }
    


        [Description("Crop to irrigate")]
        public IPlant Crop { get; set; }
        
        [Description("Auto irrigation on?")]
        public bool AutoIrrigationOn { get; set; }

        [Description("Threshold fraction available water (0-1)")]
        public double FASWThreshold { get; set; }

        [Description("Soil depth (mm) to which fraction available water is calculated")]
        public double FASWDepth { get; set; }

        [Description("Minimum weeks between irrigations")]
        public double weeks { get; set; }

        [Description("Minimum days after sowing for first irrigation")]
        public int afterSowing { get; set; }

        private double irrigationGap = 0;    // gap between irrigations

        /// <summary>Called at start of simulation. Performs some basic error checking. </summary>
        [EventSubscribe("StartOfSimulation")]
        private void ErrorChecking(object sender, EventArgs args)
        {
            if (Crop == null)
                throw new Exception("No crop was specified in script " + Parent.Name);
        }

        [EventSubscribe("DoManagement")]
        private void OnDoManagement(object sender, EventArgs e)
        {
            if (AutoIrrigationOn && Crop.IsAlive)
            {
                   irrigationGap += 1;                // increment gap between irrigations
                CalculateFASW();                // calc FASW and WaterDeficit
                if ((FASW < FASWThreshold) && (irrigationGap >= weeks * 7))
                {
                    irrigation.Apply(WaterDeficit, depth: 0);
                    irrigationGap = 0;            // reset
                }
            }
            else
            {
                irrigationGap = weeks * 7 - afterSowing - 1;    // allow irrigation a number of days after it becomes alive/sown
            }
        }

        // Calculate the fraction of the potential available sw
        // Calculate the deficit amount from DUL
        private void CalculateFASW()
        {
            double[] LL15 = MathUtilities.Multiply(soilPhysical.LL15, soilPhysical.Thickness);
            double[] DUL = MathUtilities.Multiply(soilPhysical.DUL, soilPhysical.Thickness);
        
            int nlayr = GetLayerIndex(FASWDepth);
            double cumdep = MathUtilities.Sum(soilPhysical.Thickness, 0, nlayr, 0.0);    // tricky function that sums up to before nlayr

            double part_layer = MathUtilities.Divide((FASWDepth - cumdep), soilPhysical.Thickness[nlayr], 0.0);

            // note that results may be strange if swdep < ll15
            double avail_sw = (MathUtilities.Sum(waterBalance.SWmm, 0, nlayr, 0.0) + part_layer * waterBalance.SWmm[nlayr])
                            - (MathUtilities.Sum(LL15, 0, nlayr, 0.0) + part_layer * LL15[nlayr]);

            double pot_avail_sw = (MathUtilities.Sum(DUL, 0, nlayr, 0.0) + part_layer * DUL[nlayr])
                                - (MathUtilities.Sum(LL15, 0, nlayr, 0.0) + part_layer * LL15[nlayr]);
            
            FASW = MathUtilities.Divide(avail_sw, pot_avail_sw, 0.0);
            WaterDeficit = MathUtilities.Constrain(pot_avail_sw - avail_sw, 0.0, 100000);
        }

        // Get index of the layer that has this depth in it 
        private int GetLayerIndex(double pointDepth)
        {
            double[] cumThickness = soilPhysical.ThicknessCumulative;
            int layerIdx = 0;
            while ((layerIdx < cumThickness.Length) && (pointDepth > cumThickness[layerIdx]))
            {
                layerIdx += 1;
            }

            return layerIdx;
        }
    }
}
```
            Manager HarvestAfterDate
              HarvestDate = 8-Mar
```csharp
using Models.Soils;
using System;
using Models.Core;
using System.Text;
using Models.PMF;
using Models;
using APSIM.Shared.Utilities;
using Models.PMF.Phen;

namespace Models
{
    [Serializable] 
    public class Script : Model
    {
        [Link] ISummary summary;
        [Link] private Plant mungbean;
        [Link(Type = LinkType.Path, Path = "[mungbean].Phenology")]
        private Phenology phenology;
                [Link] Clock Clock;

        private bool Harvestable = false;

        [Description("Harvest Date (d-mmm)")]
        public string HarvestDate { get; set; }   
      
        [EventSubscribe("DoManagement")]
        private void OnDoManagement(object sender, EventArgs e)
        {
           
            if (Harvestable && phenology.CurrentPhase.Name == "ReadyForHarvesting")
            {
                mungbean.Harvest();
                mungbean.EndCrop();                
            }
            
            if (DateUtilities.DatesAreEqual(HarvestDate, Clock.Today))
                Harvestable = true;

        }
    }
}
```
      Experiment Experiment_1_Emerald
        Memo
          Experiment at Gatton, QLD, sown on November 28 1996 on CSIRO Cooper field station. Soil type was a deep alluvial, weakly-cracking vertisol. There were 3 treatments: 1) well-watered, 2) rainfed and 3) rainfed+irrigation during pod filling. The cultivar used was Emerald.
        Factors
          Permutation
            Factor Water
              CompositeFactor Irr
                Specifications:
                  [Operations]
                  [SowingRule].Script.CultivarName=Emerald
                  [AutoIrr].Script.AutoIrrigationOn=True
                Operations Irr: same as Validation.Thomas Dissertation.Experiment_1_Berken.Factors.Permutation.Water.Irr.Irr
              CompositeFactor RF
                Specifications:
                  [Operations]
                  [SowingRule].Script.CultivarName=Emerald
                Operations Irr
                  1996-11-29  [Irrigation].Apply(amount:10)
                  1996-12-04  [Irrigation].Apply(amount: 20)
                  1996-12-10  [Irrigation].Apply(amount: 20)
                  1996-12-15  [Irrigation].Apply(amount: 20)
              CompositeFactor PodIrr
                Specifications:
                  [Operations]
                  [AutoIrr].Script.AutoIrrigationOn=False
                  [SowingRule].Script.CultivarName=Emerald
                Operations Irr: same as Validation.Thomas Dissertation.Experiment_1_Berken.Factors.Permutation.Water.PodIrr.Irr
        Simulation Exp1Emerald
          Summary summaryfile
          SoilArbitrator Soil Arbitrator
          Clock: Start=1996-11-04; End=1997-04-30
          Weather: FileName=GattonThomas.xlsx; ExcelWorkSheetName=Hermitage
          Zone paddock: Area=1; Slope=0; AspectAngle=0; Altitude=50
            MicroClimate: a_interception=0; b_interception=1; c_interception=0; d_interception=0; SoilHeatFluxFraction=0.4; MinimumHeightDiffForNewLayer=0; NightInterceptionFraction=0.5; ReferenceHeight=2
            Irrigation
            Fertiliser
            SurfaceOrganicMatter: InitialResidueName=wheat; InitialResidueType=wheat; InitialResidueMass=500; InitialStandingFraction=0; InitialCPR=0; InitialCNR=40
            Report DailyReport: same as Validation.Thomas Dissertation.Experiment_1_Berken.Exp1Berken.paddock.DailyReport
            Report HarvestReport: same as Validation.Thomas Dissertation.Experiment_1_Berken.Exp1Berken.paddock.HarvestReport
            Plant Mungbean
            Manager Irrigatefixeddates: same as Validation.Thomas Dissertation.Experiment_1_Berken.Exp1Berken.paddock.Irrigatefixeddates
            Operations
            Soil: Latitude=0; Longitude=0
              WaterBalance SoilWater: SummerDate=1-Nov; SummerU=8.8; SummerCona=3.9; WinterDate=1-Apr; WinterU=6; WinterCona=3.9; DiffusConst=20; DiffusSlope=35.4; Salb=0.13; CN2Bare=62; CNRed=20; CNCov=0.8; PSIDul=-100
              Organic: same as Validation.Thomas Dissertation.Experiment_1_Berken.Exp1Berken.paddock.soil.Organic
              Chemical: same as Validation.Thomas Dissertation.Experiment_1_Berken.Exp1Berken.paddock.soil.Chemical
              Nutrient
              Physical
                Thickness  ParticleSizeSand  ParticleSizeSilt  ParticleSizeClay  Rocks     BD    AirDry  LL15  DUL   SAT   KS
                150        5                 65                30                0         1.37  0.1     0.22  0.48  0.48  0.01
                150        5                 65                30                0         1.27  0.19    0.22  0.48  0.48  0.01
                150        5                 65                30                0         1.28  0.19    0.24  0.44  0.46  0.01
                150        5                 65                30                0         1.33  0.19    0.24  0.43  0.45  0.01
                150        5                 65                30                0         1.37  0.2     0.26  0.38  0.41  0.01
                150        5                 65                30                0         1.42  0.2     0.26  0.36  0.4   0.01
                300        5                 65                30                0.22689   1.36  0.2     0.26  0.32  0.35  0.01
                300        5                 65                30                0.232837  1.35  0.2     0.27  0.32  0.35  0.01
                300        5                 65                30                0.210918  1.35  0.2     0.27  0.35  0.36  0.01
                Rocks, ParticleSizeSand, ParticleSizeSilt, ParticleSizeClay source: Calculated
                SoilCrop MungbeanSoil: LL=[0.3, 0.3, 0.3, 0.32, 0.32, 0.32, 0.3, 0.3, 0.32]; KL=[0.08, 0.08, 0.08, 0.08, 0.08, 0.08, 0.08, 0.08, 0.08]; XF=[1, 1, 1, 1, 1, 1, 1, 1, 1]
              Water: Thickness=[150, 150, 150, 150, 150, 150, 300, 300, 300]; InitialValues=[0.48, 0.48, 0.44, 0.43, 0.39, 0.36, 0.33, 0.33, 0.34]; InitialPAWmm=231; RelativeTo=LL15; FilledFromTop=false
              Solute NO3: same as Validation.Thomas Dissertation.Experiment_1_Berken.Exp1Berken.paddock.soil.NO3
              Solute NH4: same as Validation.Thomas Dissertation.Experiment_1_Berken.Exp1Berken.paddock.soil.NH4
              Solute Urea: same as Validation.Thomas Dissertation.Experiment_1_Berken.Exp1Berken.paddock.soil.Urea
              SoilTemperature Temperature
            Manager SowingRule: same as Validation.Thomas Dissertation.Experiment_1_Berken.Exp1Berken.paddock.SowingRule
            Manager AutoIrr
              AutoIrrigationOn = False
              Crop = [Mungbean]
              FASWThreshold = 0.9
              FASWDepth = 600
              weeks = 0
              afterSowing = 0
              script: same as in Validation.Thomas Dissertation.Experiment_1_Berken.Exp1Berken.paddock.AutoIrr
            Manager HarvestAfterDate
              HarvestDate = 2-Apr
              script: same as in Validation.Thomas Dissertation.Experiment_1_Berken.Exp1Berken.paddock.HarvestAfterDate
      Experiment Experiment_2
        Memo
          Experiment at Gatton, QLD, sown on January 7 1997 on CSIRO Cooper field station. Soil type was a deep alluvial, weakly-cracking vertisol. There were 3 treatments: 1) well-watered, 2) rainfed and 3) terminal water stress with a rainout shelter. The cultivars used were Berken and Emerald.
        Factors
          Permutation
            Factor Water
              CompositeFactor IrrCultivar_Berken
                Specifications:
                  [Operations]
                  [SowingRule].Script.CultivarName=Berken
                  [AutoIrr].Script.AutoIrrigationOn=True
                Operations Irr
                  1997-01-08  [Irrigation].Apply(amount:10)
                  1997-01-13  [Irrigation].Apply(amount: 20)
                  1997-01-20  [Irrigation].Apply(amount: 20)
                  1997-01-27  [Irrigation].Apply(amount: 20)
                  1997-02-03  [Irrigation].Apply(amount: 65)
                  1997-02-10  [Irrigation].Apply(amount: 65)
                  1997-02-17  [Irrigation].Apply(amount: 65)
                  1997-02-24  [Irrigation].Apply(amount: 65)
                  1997-03-24  [Irrigation].Apply(amount: 65)
                  1997-03-31  [Irrigation].Apply(amount: 65)
              CompositeFactor IrrCultivar_Emerald
                Specifications:
                  [Operations]
                  [SowingRule].Script.CultivarName=Emerald
                  [AutoIrr].Script.AutoIrrigationOn=True
                Operations Irr
                  1997-01-08  [Irrigation].Apply(amount:10)
                  1997-01-13  [Irrigation].Apply(amount: 20)
                  1997-01-20  [Irrigation].Apply(amount: 20)
                  1997-01-27  [Irrigation].Apply(amount: 20)
                  1997-02-03  [Irrigation].Apply(amount: 35)
                  1997-02-10  [Irrigation].Apply(amount: 65)
                  1997-02-17  [Irrigation].Apply(amount: 65)
                  1997-02-24  [Irrigation].Apply(amount: 65)
                  1997-03-24  [Irrigation].Apply(amount: 65)
                  1997-03-31  [Irrigation].Apply(amount: 65)
              CompositeFactor RFCultivar_Berken
                Specifications:
                  [Operations]
                  [SowingRule].Script.CultivarName=Berken
                Operations Irr
                  1997-01-08  [Irrigation].Apply(amount:100)
                  1997-01-13  [Irrigation].Apply(amount: 120)
                  1997-01-20  [Irrigation].Apply(amount: 120)
              CompositeFactor RFCultivar_Emerald
                Specifications:
                  [Operations]
                  [SowingRule].Script.CultivarName=Emerald
                Operations Irr: same as Validation.Thomas Dissertation.Experiment_2.Factors.Permutation.Water.RFCultivar_Berken.Irr
              CompositeFactor TermStressCultivar_Berken
                Specifications:
                  [Operations]
                  [SowingRule].Script.CultivarName=Berken
                  [Soil].Water.InitialValues=0.330,0.330,0.330,0.30,0.30,0.30,0.27,0.270,0.270
                  [ClimateController].Script.RainfallMultiplier=0.4
                  [ClimateController].Script.ControlStart = 1-Feb
                  [ClimateController].Script.ControlEnd = 21-May
                Operations Irr
                  1997-01-08  [Irrigation].Apply(amount:60)
                  1997-01-13  [Irrigation].Apply(amount: 120)
                  1997-01-20  [Irrigation].Apply(amount: 120)
                  1997-01-27  [Irrigation].Apply(amount: 20)
                  1997-02-11  [Irrigation].Apply(amount: 25)
              CompositeFactor TermStressCultivar_Emerald
                Specifications:
                  [Operations]
                  [SowingRule].Script.CultivarName=Emerald
                  [Soil].Water.InitialValues=0.31,0.31,0.31,0.280,0.280,0.280,0.26,0.260,0.260
                  [ClimateController].Script.RainfallMultiplier=0.5
                  [ClimateController].Script.ControlStart = 1-Feb
                  [ClimateController].Script.ControlEnd = 21-May
                Operations Irr
                  1997-01-08  [Irrigation].Apply(amount:60)
                  1997-01-13  [Irrigation].Apply(amount: 20)
                  1997-01-20  [Irrigation].Apply(amount: 20)
                  1997-01-27  [Irrigation].Apply(amount: 20)
                  1997-02-11  [Irrigation].Apply(amount: 25)
        Simulation Exp2
          Summary summaryfile
          SoilArbitrator Soil Arbitrator
          Clock: Start=1996-12-04; End=1997-05-30
          Weather: FileName=GattonThomas.xlsx; ExcelWorkSheetName=Hermitage
          Zone paddock: Area=1; Slope=0; AspectAngle=0; Altitude=50
            Irrigation
            Fertiliser
            SurfaceOrganicMatter: InitialResidueName=wheat; InitialResidueType=wheat; InitialResidueMass=500; InitialStandingFraction=0; InitialCPR=0; InitialCNR=40
            Report DailyReport: EventNames=[Clock].DoReport
              VariableNames:
                [Clock].Today
                [DiagnosticsVariables].Script.AccumPlantN
                [DiagnosticsVariables].Script.AccumMineralisation
                [DiagnosticsVariables].Script.AccumDenit
                [DiagnosticsVariables].Script.AccumFert
                [DiagnosticsVariables].Script.AccumLeach
                [DiagnosticsVariables].Script.AccumDetach
                [DiagnosticsVariables].Script.DeltaSoilOMN
                [DiagnosticsVariables].Script.DeltaSurfaceOMN
                [DiagnosticsVariables].Script.DeltaSoilMineralN
                [Soybean].Root.NSupply
                [Soil].SoilWater.Eo
                [Soil].SoilWater.Es
                [DiagnosticsVariables].Script.SWC
                [DiagnosticsVariables].Script.DUL
                [Soil].SoilWater.Drainage
                [Soil].SoilWater.Runoff
                [DiagnosticsVariables].Script.OutFlowLat
                [Soil].SoilWater.pond
                [DiagnosticsVariables].Script.AccumEO
                [DiagnosticsVariables].Script.AccumEP
                [DiagnosticsVariables].Script.AccumES
                [DiagnosticsVariables].Script.AccumDrainage
                [DiagnosticsVariables].Script.AccumRunoff
                [DiagnosticsVariables].Script.AccumRainfall
                [DiagnosticsVariables].Script.AccumIrrigation
                [DiagnosticsVariables].Script.AccumOutflowLat
                [DiagnosticsVariables].Script.SoilWaterDeficit
                [Soybean].Grain.Live.Wt
                [Soybean].Shell.Live.Wt
                [Soybean].Stem.Live.Wt
                [Soybean].Stem.Live.Wt
                [Soybean].Grain.Live.N
                [Soybean].Shell.Live.N
                [Soybean].Leaf.Live.Wt
                [Soybean].Root.Live.Wt
                [Soybean].Leaf.Live.N
                [Soybean].Root.Live.N
                [Soybean].Leaf.Live.NConc
                [Soybean].Root.Live.NConc
                [Soybean].Root.WaterSupply
                [Soybean].Root.WaterUptake
                [Soybean].Leaf.Transpiration
                [Soybean].Leaf.WaterDemand
                [Soybean].Root.Depth
                [Soybean].Leaf.CoverTotal
                [Soybean].Leaf.CoverDead
                [Soybean].Leaf.LAI
                [Soybean].Leaf.Height
                [Soybean].Leaf.PotentialBiomass
                [Soil].Water.MM
                [Soil].NO3.kgha
                [DiagnosticsVariables].Script.SoilNitrogenContent
                [Soybean].Arbitrator.N.TotalPlantDemand
                [MicroClimate].net_radn
                [MicroClimate].peta
                [MicroClimate].petr
                [DiagnosticsVariables].Script.FomN
                [DiagnosticsVariables].Script.HumN
                [DiagnosticsVariables].Script.BiomN
                [DiagnosticsVariables].Script.DltNMinRes
                [DiagnosticsVariables].Script.DltNMinTot
                [Soybean].Leaf.Fw
                [Soybean].Leaf.Fn
                [Soybean].Phenology.CurrentPhase.Name
                [Soybean].Phenology.Stage
                [Soybean].Pod.Wt
                [Soybean].Pod.N
                [Soybean].Structure.LeafTipsAppeared
                [Soybean].Structure.MainStemPrimordiaNo
                [Soybean].Leaf.CohortArea[1]
                [Soybean].Leaf.CohortArea[2]
                [Soybean].Leaf.CohortArea[3]
                [Soybean].Leaf.CohortArea[4]
                [Soybean].Leaf.CohortArea[5]
                [Soybean].Leaf.CohortArea[6]
                [Soybean].Leaf.CohortArea[7]
                [Soybean].Leaf.CohortArea[8]
                [Soybean].Leaf.CohortArea[9]
                [Soybean].Leaf.CohortArea[10]
                [Soybean].Leaf.CohortArea[11]
                [Soybean].Leaf.CohortArea[12]
                [Soybean].Leaf.CohortArea[13]
                [Soybean].Leaf.CohortArea[14]
                [Soybean].Leaf.CohortArea[15]
                [Soybean].Leaf.AppearedCohortNo
                [Soybean].Leaf.DeadCohortNo
                [Soybean].AboveGround.Wt
                [Soybean].Phenology.Stage
                [Soybean].Structure.MainStemPrimordiaNo
                [Soybean].Phenology.NFF
                [SoybeanHarvestRule].Script.FinalTag
                [Soybean].Grain.NumberFunction
                [Soybean].Shell.PodNumber
                [Soybean].Phenology.FN
                [Soybean].Phenology.FN.TotalNodes
                [Soybean].Phenology.FN.VegetativeNodes
            Report HarvestReport: same as Validation.Thomas Dissertation.Experiment_1_Berken.Exp1Berken.paddock.HarvestReport
            Plant Mungbean
            Manager Irrigatefixeddates: same as Validation.Thomas Dissertation.Experiment_1_Berken.Exp1Berken.paddock.Irrigatefixeddates
            Operations
            Manager SowingRule
              SowingDate = 01/07/1997 00:00:00
              CultivarName = Emerald
              RowSpacing = 375
              SowingDepth = 50
              SowingRate = 40
              script: same as in Validation.Thomas Dissertation.Experiment_1_Berken.Exp1Berken.paddock.SowingRule
            Manager AutoIrr
              AutoIrrigationOn = False
              Crop = [Mungbean]
              FASWThreshold = 0.9
              FASWDepth = 600
              weeks = 1
              afterSowing = 10
              script: same as in Validation.Thomas Dissertation.Experiment_1_Berken.Exp1Berken.paddock.AutoIrr
            Soil: Latitude=0; Longitude=0
              WaterBalance SoilWater: SummerDate=1-Nov; SummerU=8.8; SummerCona=3.9; WinterDate=1-Apr; WinterU=6; WinterCona=3.9; DiffusConst=20; DiffusSlope=35.4; Salb=0.13; CN2Bare=62; CNRed=20; CNCov=0.8; PSIDul=-100
              Organic: same as Validation.Thomas Dissertation.Experiment_1_Berken.Exp1Berken.paddock.soil.Organic
              Chemical: same as Validation.Thomas Dissertation.Experiment_1_Berken.Exp1Berken.paddock.soil.Chemical
              Nutrient
              Physical
                Thickness  ParticleSizeSand  ParticleSizeSilt  ParticleSizeClay  Rocks     BD    AirDry  LL15  DUL    SAT   KS
                150        5                 65                30                0         1.37  0.15    0.22  0.48   0.48  0.01
                150        5                 65                30                0         1.27  0.2     0.22  0.48   0.48  0.01
                150        5                 65                30                0         1.28  0.2     0.24  0.48   0.48  0.01
                150        5                 65                30                0         1.33  0.2     0.24  0.45   0.45  0.01
                150        5                 65                30                0         1.37  0.2     0.26  0.37   0.41  0.01
                150        5                 65                30                0.142845  1.42  0.2     0.26  0.33   0.37  0.01
                300        5                 65                30                0.182712  1.36  0.2     0.26  0.325  0.37  0.01
                300        5                 65                30                0.188999  1.35  0.2     0.27  0.33   0.37  0.01
                300        5                 65                30                0.188999  1.35  0.2     0.27  0.33   0.37  0.01
                Rocks, ParticleSizeSand, ParticleSizeSilt, ParticleSizeClay source: Calculated
                SoilCrop MungbeanSoil: LL=[0.32, 0.32, 0.32, 0.34, 0.32, 0.32, 0.3, 0.28, 0.28]; KL=[0.08, 0.08, 0.06, 0.04, 0.04, 0.08, 0.08, 0.08, 0.08]; XF=[1, 1, 1, 1, 1, 1, 1, 1, 1]
              Water: Thickness=[150, 150, 150, 150, 150, 150, 300, 300, 300]; InitialValues=[0.48, 0.48, 0.48, 0.42, 0.37, 0.33, 0.325, 0.33, 0.33]; InitialPAWmm=223.5; RelativeTo=LL15; FilledFromTop=false
              Solute NO3: same as Validation.Thomas Dissertation.Experiment_1_Berken.Exp1Berken.paddock.soil.NO3
              Solute NH4: same as Validation.Thomas Dissertation.Experiment_1_Berken.Exp1Berken.paddock.soil.NH4
              Solute Urea: same as Validation.Thomas Dissertation.Experiment_1_Berken.Exp1Berken.paddock.soil.Urea
              SoilTemperature Temperature
            Manager ClimateController
              AllowControl = True
              EnableDate = 01/01/1997 00:00:00
              WithinYearControl = False
              ControlStart =
              ControlEnd =
              RainfallMultiplier = 1
              RainfallAddition = 0
              RadiationMultiplier = 1
              RadiationAddition = 0
              MinTMultiplier = 1
              MinTAddition = 0
              MaxTMultiplier = 1
              MaxTAddition = 0
              WindMultiplier = 1
              WindAddition = 0
              VPMultiplier = 1
              VPAddition = 0
```csharp
using Newtonsoft.Json;
using APSIM.Shared.Utilities;
using Models.Interfaces;
using Models.Soils;
using Models.PMF;
using Models.Core;
using System.Xml.Serialization;
using System;
using Models.Soils.Nutrients;
using Models.Climate;

namespace Models
{
    [Serializable]
    public class Script : Model
    {
        // - Links to APSIM models
        [Link] Zone zone;
        [Link] Clock clock;
        [Link] Weather weather;
        [Link] ISummary summary = null;

        // - Paramters for this manager
        [Description("Enable? Set to 'No' to completely disable this manager")] public bool AllowControl { get; set; }

        [Separator("General settings")]
        [Description("Start the climate controls beginning on date (dd/mmm/yyyy): ")] public DateTime EnableDate { get; set; }
        [Description("Implement climate control only during part of the year?")] public bool WithinYearControl { get; set; }
        [Description("Within each year, the first day to start the climate controls is (dd-mmm)")] public string ControlStart { get; set; }
        [Description("Within each year, end last day of climate control is (dd-mmm)")] public string ControlEnd { get; set; }

        [Separator("Rainfall")]
        [Description("Rainfall multiplier (-): ")] public double RainfallMultiplier { get; set; }
        [Description("Rainfall addition (mm): ")] public double RainfallAddition { get; set; }

        [Separator("Radiation")]
        [Description("Radiation multiplier (-): ")] public double RadiationMultiplier { get; set; }
        [Description("Radiation addition (MJ/m2): ")] public double RadiationAddition { get; set; }

        [Separator("Minimum temperature")]
        [Description("Minimum temperature multiplier (-): ")] public double MinTMultiplier { get; set; }
        [Description("Minimum temperature addition (C): ")] public double MinTAddition { get; set; }

        [Separator("Maximum temperature")]
        [Description("Maximum temperature multiplier (-): ")] public double MaxTMultiplier { get; set; }
        [Description("Maximum temperature addition (C): ")] public double MaxTAddition { get; set; }

        [Separator("Wind speed")]
        [Description("Wind speed multiplier (-): ")] public double WindMultiplier { get; set; }
        [Description("Wind speed addition (m/s): ")] public double WindAddition { get; set; }

        [Separator("Vapour pressure")]
        [Description("Vapour pressure multiplier (-): ")] public double VPMultiplier { get; set; }
        [Description("Vapour pressure addition (hPa): ")] public double VPAddition { get; set; }

        [JsonIgnore] public bool DoControl { get; set; }
        [JsonIgnore] public int DoControlInt { get; set; }

        [EventSubscribe("PreparingNewWeatherData")] private void OnDoManagement(object sender, EventArgs e)
        {
            // Check if this manager is enabled
            if ((AllowControl) && (clock.Today >= EnableDate))
            {
                DoControl = true;
                if (WithinYearControl)
                    DoControl = DateUtilities.WithinDates(ControlStart, clock.Today, ControlEnd); 
            }

            if (DoControl)
                DoControlInt = 1;
            else
                DoControlInt = 0;

            if (DoControl)
            {
                // do the weather alterations 
                weather.Rain = RainfallMultiplier * weather.Rain + RainfallAddition;
                weather.Radn = RadiationMultiplier * weather.Radn + RadiationAddition;
                weather.MinT = MinTMultiplier * weather.MinT + MinTAddition;
                weather.MaxT = MaxTMultiplier * weather.MaxT + MaxTAddition;
                weather.Wind = WindMultiplier * weather.Wind + WindAddition;
                weather.VP = VPMultiplier * weather.VP + VPAddition;
            }
        }
    }
}
```
            MicroClimate: a_interception=0; b_interception=1; c_interception=0; d_interception=0; SoilHeatFluxFraction=0.4; MinimumHeightDiffForNewLayer=0; NightInterceptionFraction=0.5; ReferenceHeight=2
            Manager PartialIrr
              AutoIrrigationOn = False
              Crop = [Mungbean]
              FASWThreshold = 0.9
              FASWDepth = 600
              weeks = 5
              afterSowing = 50
              script: same as in Validation.Thomas Dissertation.Experiment_1_Berken.Exp1Berken.paddock.AutoIrr
            Manager HarvestAfterDate
              HarvestDate = 28-Apr
              script: same as in Validation.Thomas Dissertation.Experiment_1_Berken.Exp1Berken.paddock.HarvestAfterDate
      Experiment Experiment_3
        Memo
          Experiment at Gatton, QLD, CSIRO Cooper field station. Soil type was a deep alluvial, weakly-cracking vertisol. There were 3 treatments: 1) well-watered, 2) rainfed and 3) stress with a rainout shelter for 4 weeks starting at different stages of mungbean growth imposed by having 3 sowing dates (3, 17, 30 December 1997). The cultivar used was Emerald.
        Factors
          Permutation
            Factor _Sow
              CompositeFactor Dec17Irr
                Specifications:
                  [SowingRule].Script.SowingDate=1997-12-17
                  [Operations]
                  [AutoIrr].Script.AutoIrrigationOn=True
                Operations _
                  1997-12-18  [Irrigation].Apply(amount: 20)
                  1998-01-02  [Irrigation].Apply(amount: 20)
                  1998-01-06  [Irrigation].Apply(amount: 25)
                  1998-01-13  [Irrigation].Apply(amount: 25)
                  1998-01-19  [Irrigation].Apply(amount: 30)
              CompositeFactor Dec17RF
                Specifications:
                  [SowingRule].Script.SowingDate=1997-12-17
                  [Operations]
                Operations _
                  1997-12-04  [Irrigation].Apply(amount: 40)
                  1997-12-18  [Irrigation].Apply(amount: 20)
                  1998-01-02  [Irrigation].Apply(amount: 20)
                  1998-01-06  [Irrigation].Apply(amount: 25)
                  1998-01-13  [Irrigation].Apply(amount: 25)
                  1998-01-19  [Irrigation].Apply(amount: 30)
              CompositeFactor Dec30RF
                Specifications:
                  [SowingRule].Script.SowingDate=1997-12-30
                  [Operations]
                Operations _
                  1997-12-04  [Irrigation].Apply(amount: 40)
                  1997-12-31  [Irrigation].Apply(amount: 25)
                  1998-01-02  [Irrigation].Apply(amount: 20)
                  1998-01-06  [Irrigation].Apply(amount: 25)
                  1998-01-13  [Irrigation].Apply(amount: 25)
                  1998-01-19  [Irrigation].Apply(amount: 30)
              CompositeFactor Dec3RO
                Specifications:
                  [SowingRule].Script.SowingDate=1997-12-3
                  [Operations]
                  [ClimateController].Script.RainfallMultiplier=0.1
                  [ClimateController].Script.ControlStart = 24-Jan
                  [ClimateController].Script.ControlEnd = 21-Feb
                Operations _
                  1997-12-04  [Irrigation].Apply(amount: 40)
                  1997-12-08  [Irrigation].Apply(amount: 40)
                  1997-12-12  [Irrigation].Apply(amount: 40)
                  1998-01-06  [Irrigation].Apply(amount: 35)
                  1998-02-24  [Irrigation].Apply(amount: 55)
                  1998-03-04  [Irrigation].Apply(amount: 55)
                  1998-03-11  [Irrigation].Apply(amount: 55)
                  1998-03-18  [Irrigation].Apply(amount: 55)
                  1998-03-25  [Irrigation].Apply(amount: 55)
              CompositeFactor Dec17RO
                Specifications:
                  [SowingRule].Script.SowingDate=1997-12-17
                  [Operations]
                  [ClimateController].Script.RainfallMultiplier=0.2
                  [ClimateController].Script.ControlStart = 24-Jan
                  [ClimateController].Script.ControlEnd = 21-Feb
                Operations _
                  1997-12-18  [Irrigation].Apply(amount: 26)
                  1997-12-23  [Irrigation].Apply(amount: 20)
                  1997-12-26  [Irrigation].Apply(amount: 23)
                  1998-01-02  [Irrigation].Apply(amount: 30)
                  1998-01-06  [Irrigation].Apply(amount: 26)
                  1998-02-05  [Irrigation].Apply(amount: 30)
                  1998-02-06  [Irrigation].Apply(amount: 30)
                  1998-02-13  [Irrigation].Apply(amount: 35)
                  1998-02-27  [Irrigation].Apply(amount: 35)
                  1998-03-04  [Irrigation].Apply(amount: 35)
                  1998-03-11  [Irrigation].Apply(amount: 35)
                  1998-03-18  [Irrigation].Apply(amount: 35)
                  1998-03-25  [Irrigation].Apply(amount: 35)
              CompositeFactor Dec30RO
                Specifications:
                  [SowingRule].Script.SowingDate=1997-12-30
                  [Operations]
                  [ClimateController].Script.RainfallMultiplier=0.3
                  [ClimateController].Script.ControlStart = 24-Jan
                  [ClimateController].Script.ControlEnd = 21-Feb
                Operations _
                  1997-12-31  [Irrigation].Apply(amount: 17)
                  1998-01-01  [Irrigation].Apply(amount: 33)
                  1998-01-02  [Irrigation].Apply(amount: 30)
                  1998-01-06  [Irrigation].Apply(amount: 26)
                  1998-01-13  [Irrigation].Apply(amount: 13)
                  1998-01-19  [Irrigation].Apply(amount: 20)
                  1998-02-18  [Irrigation].Apply(amount: 30)
                  1998-02-19  [Irrigation].Apply(amount: 30)
                  1998-03-04  [Irrigation].Apply(amount: 25)
                  1998-03-11  [Irrigation].Apply(amount: 25)
                  1998-03-18  [Irrigation].Apply(amount: 25)
                  1998-03-25  [Irrigation].Apply(amount: 25)
            Factor Cultivar: Specification=[SowingRule].Script.CultivarName=Emerald
        Simulation exp3
          Summary summaryfile
          SoilArbitrator Soil Arbitrator
          Clock: Start=1997-12-01; End=1998-04-30
          Weather: FileName=GattonThomas.xlsx; ExcelWorkSheetName=Hermitage
          MicroClimate: a_interception=0; b_interception=1; c_interception=0; d_interception=0; SoilHeatFluxFraction=0.4; MinimumHeightDiffForNewLayer=0; NightInterceptionFraction=0.5; ReferenceHeight=2
          Zone paddock: Area=1; Slope=0; AspectAngle=0; Altitude=50
            Irrigation
            Fertiliser
            SurfaceOrganicMatter: InitialResidueName=wheat; InitialResidueType=wheat; InitialResidueMass=500; InitialStandingFraction=0; InitialCPR=0; InitialCNR=40
            Report DailyReport: same as Validation.Thomas Dissertation.Experiment_1_Berken.Exp1Berken.paddock.DailyReport
            Manager HarvestRule
```csharp
using Models.PMF.Phen;
using APSIM.Shared.Utilities;
using System.Xml.Serialization;
using Models;
using Models.PMF;
using Models.Soils;
using System.Text;
using System.Collections.Generic;
using Models.Core;
using System;
using Models.Soils.Nutrients;

namespace Models
{
    [Serializable] 
    public class Script : Model
    {      
        [Link] private Plant Mungbean;
        [Link] private Zone zone;
        [Link(Type = LinkType.Path, Path = "[Mungbean].Phenology")]
        private Phenology phenology;
                    
        
        [EventSubscribe("StartOfSimulation")]
        private void OnSimulationCommencing(object sender, EventArgs e)
        {
        }       
        
        [EventSubscribe("DoManagement")]
        private void OnDoManagement(object sender, EventArgs e)
        {
        if (phenology.CurrentPhase.Name=="ReadyForHarvesting")
           {
           Mungbean.Harvest();
           Mungbean.EndCrop();
           }
        }
        
        [EventSubscribe("DoManagementCalculations")]
        private void OnDoManagementCalculations(object sender, EventArgs e)
        {
            
        }
    }
}
```
            Report HarvestReport: same as Validation.Thomas Dissertation.Experiment_1_Berken.Exp1Berken.paddock.HarvestReport
            Plant Mungbean
            Manager Irrigatefixeddates: same as Validation.Thomas Dissertation.Experiment_1_Berken.Exp1Berken.paddock.Irrigatefixeddates
            Operations
            Manager SowingRule
              SowingDate = 12/18/1997 00:00:00
              CultivarName = Emerald
              RowSpacing = 400
              SowingDepth = 50
              SowingRate = 40
              script: same as in Validation.Thomas Dissertation.Experiment_1_Berken.Exp1Berken.paddock.SowingRule
            Manager ClimateController: same as Validation.Thomas Dissertation.Experiment_2.Exp2.paddock.ClimateController
            Soil: Latitude=0; Longitude=0
              WaterBalance SoilWater: SummerDate=1-Nov; SummerU=8.8; SummerCona=3.9; WinterDate=1-Apr; WinterU=6; WinterCona=3.9; DiffusConst=20; DiffusSlope=35.4; Salb=0.13; CN2Bare=62; CNRed=20; CNCov=0.8; PSIDul=-100
              Organic: same as Validation.Thomas Dissertation.Experiment_1_Berken.Exp1Berken.paddock.soil.Organic
              Chemical: same as Validation.Thomas Dissertation.Experiment_1_Berken.Exp1Berken.paddock.soil.Chemical
              Nutrient
              Physical
                Thickness  ParticleSizeSand  ParticleSizeSilt  ParticleSizeClay  Rocks     BD    AirDry  LL15  DUL   SAT   KS
                150        5                 65                30                0         1.37  0.1     0.15  0.42  0.48  0.01
                150        5                 65                30                0         1.27  0.15    0.15  0.42  0.48  0.01
                150        5                 65                30                0         1.28  0.19    0.19  0.41  0.46  0.01
                150        5                 65                30                0         1.33  0.19    0.19  0.41  0.45  0.01
                150        5                 65                30                0         1.37  0.22    0.22  0.4   0.45  0.01
                150        5                 65                30                0         1.36  0.22    0.22  0.4   0.41  0.01
                300        5                 65                30                0.116446  1.36  0.25    0.25  0.34  0.4   0.01
                300        5                 65                30                0.123242  1.35  0.25    0.25  0.33  0.4   0.01
                300        5                 65                30                0.123242  1.35  0.25    0.25  0.32  0.4   0.01
                Rocks, ParticleSizeSand, ParticleSizeSilt, ParticleSizeClay source: Calculated
                SoilCrop MungbeanSoil: LL=[0.15, 0.15, 0.25, 0.25, 0.32, 0.32, 0.29, 0.29, 0.31]; KL=[0.04, 0.04, 0.06, 0.06, 0.06, 0.06, 0.08, 0.08, 0.08]; XF=[1, 1, 1, 1, 1, 1, 1, 1, 1]
              Water: Thickness=[150, 150, 150, 150, 150, 150, 300, 300, 300]; InitialValues=[0.15, 0.15, 0.32, 0.32, 0.34, 0.34, 0.29, 0.33, 0.32]; InitialPAWmm=132; RelativeTo=LL15; FilledFromTop=false
              Solute NO3: same as Validation.Thomas Dissertation.Experiment_1_Berken.Exp1Berken.paddock.soil.NO3
              Solute NH4: same as Validation.Thomas Dissertation.Experiment_1_Berken.Exp1Berken.paddock.soil.NH4
              Solute Urea: same as Validation.Thomas Dissertation.Experiment_1_Berken.Exp1Berken.paddock.soil.Urea
              SoilTemperature Temperature
            Manager AutoIrr: same as Validation.Thomas Dissertation.Experiment_1_Emerald.Exp1Emerald.paddock.AutoIrr
      Experiment Experiment_4
        Memo
          Experiment at Gatton, QLD, CSIRO Cooper field station. Soil type was a deep alluvial, weakly-cracking vertisol. There were 3 treatments: 1) well-watered, 2) rainfed and 3) rainfed+irrigated for first 3 weeks and at podfilling. The cultivar used was Emerald.
        Factors
          Permutation
            Factor _Water
              CompositeFactor Irr: Specifications=[Operations]
                Operations Irr
                  1998-02-16  [Irrigation].Apply(amount: 35)
                  1998-02-22  [Irrigation].Apply(amount: 35)
                  1998-03-01  [Irrigation].Apply(amount: 35)
                  1998-03-08  [Irrigation].Apply(amount: 35)
                  1998-03-15  [Irrigation].Apply(amount: 35)
                  1998-03-22  [Irrigation].Apply(amount: 35)
                  1998-03-29  [Irrigation].Apply(amount: 35)
                  1998-04-05  [Irrigation].Apply(amount: 35)
                  1998-04-12  [Irrigation].Apply(amount: 35)
                  1998-04-19  [Irrigation].Apply(amount: 35)
                  1998-04-26  [Irrigation].Apply(amount: 35)
                  1998-05-03  [Irrigation].Apply(amount: 35)
                  1998-05-10  [Irrigation].Apply(amount: 35)
                  1998-05-17  [Irrigation].Apply(amount: 35)
                  1998-05-24  [Irrigation].Apply(amount: 35)
              CompositeFactor RF
                Specifications:
                  [Operations]
                Operations RF
                  1998-02-16  [Irrigation].Apply(amount: 35)
                  1998-02-22  [Irrigation].Apply(amount: 35)
                  1998-03-01  [Irrigation].Apply(amount: 35)
                  1998-03-08  [Irrigation].Apply(amount: 35)
              CompositeFactor RF_Irr
                Specifications:
                  [Operations]
                Operations RF_Irr
                  1998-02-16  [Irrigation].Apply(amount: 35)
                  1998-02-22  [Irrigation].Apply(amount: 35)
                  1998-03-01  [Irrigation].Apply(amount: 35)
                  1998-03-08  [Irrigation].Apply(amount: 35)
                  1998-05-01  [Irrigation].Apply(amount: 20)
            Factor Cultivar: Specification=[SowingRule].Script.CultivarName=Emerald
        Simulation exp4
          Summary summaryfile
          SoilArbitrator Soil Arbitrator
          Clock: Start=1998-02-01; End=1998-06-30
          Weather: FileName=GattonThomas.xlsx; ExcelWorkSheetName=Hermitage
          Zone paddock: Area=1; Slope=0; AspectAngle=0; Altitude=50
            Irrigation
            Fertiliser
            SurfaceOrganicMatter: InitialResidueName=wheat; InitialResidueType=wheat; InitialResidueMass=500; InitialStandingFraction=0; InitialCPR=0; InitialCNR=40
            Report DailyReport: same as Validation.Thomas Dissertation.Experiment_1_Berken.Exp1Berken.paddock.DailyReport
            Manager HarvestRule: same as Validation.Thomas Dissertation.Experiment_3.exp3.paddock.HarvestRule
            Report HarvestReport: same as Validation.Thomas Dissertation.Experiment_1_Berken.Exp1Berken.paddock.HarvestReport
            Plant Mungbean
            Manager Irrigatefixeddates: same as Validation.Thomas Dissertation.Experiment_1_Berken.Exp1Berken.paddock.Irrigatefixeddates
            Operations
            Manager SowingRule
              SowingDate = 02/16/1998 00:00:00
              CultivarName = Emerald
              RowSpacing = 375
              SowingDepth = 50
              SowingRate = 40
              script: same as in Validation.Thomas Dissertation.Experiment_1_Berken.Exp1Berken.paddock.SowingRule
            MicroClimate: a_interception=0; b_interception=1; c_interception=0; d_interception=0; SoilHeatFluxFraction=0.4; MinimumHeightDiffForNewLayer=0; NightInterceptionFraction=0.5; ReferenceHeight=2
            Manager AutoIrr
              AutoIrrigationOn = False
              Crop = [Mungbean]
              FASWThreshold = 0.9
              FASWDepth = 600
              weeks = 0
              afterSowing = 2
              script: same as in Validation.Thomas Dissertation.Experiment_1_Berken.Exp1Berken.paddock.AutoIrr
            Soil: Latitude=0; Longitude=0
              WaterBalance SoilWater: SummerDate=1-Nov; SummerU=8.8; SummerCona=3.9; WinterDate=1-Apr; WinterU=6; WinterCona=3.9; DiffusConst=20; DiffusSlope=35.4; Salb=0.13; CN2Bare=62; CNRed=20; CNCov=0.8; PSIDul=-100
              Organic: same as Validation.Thomas Dissertation.Experiment_1_Berken.Exp1Berken.paddock.soil.Organic
              Chemical: same as Validation.Thomas Dissertation.Experiment_1_Berken.Exp1Berken.paddock.soil.Chemical
              Nutrient
              Physical
                Thickness  ParticleSizeSand  ParticleSizeSilt  ParticleSizeClay  Rocks     BD    AirDry  LL15  DUL   SAT   KS
                150        5                 65                30                0         1.37  0.1     0.15  0.38  0.42  0.01
                150        5                 65                30                0.132772  1.27  0.15    0.15  0.38  0.42  0.01
                150        5                 65                30                0.126442  1.28  0.19    0.19  0.38  0.42  0.01
                150        5                 65                30                0         1.33  0.19    0.19  0.38  0.42  0.01
                150        5                 65                30                0         1.37  0.22    0.22  0.38  0.42  0.01
                150        5                 65                30                0         1.36  0.22    0.22  0.38  0.41  0.01
                300        5                 65                30                0.116446  1.36  0.25    0.25  0.34  0.4   0.01
                300        5                 65                30                0.123242  1.35  0.25    0.25  0.33  0.4   0.01
                300        5                 65                30                0.123242  1.35  0.25    0.25  0.32  0.4   0.01
                Rocks, ParticleSizeSand, ParticleSizeSilt, ParticleSizeClay source: Calculated
                SoilCrop MungbeanSoil: LL=[0.25, 0.28, 0.32, 0.32, 0.32, 0.32, 0.29, 0.29, 0.29]; KL=[0.08, 0.08, 0.08, 0.08, 0.08, 0.08, 0.08, 0.08, 0.08]; XF=[1, 1, 1, 1, 1, 1, 1, 1, 1]
              Water: Thickness=[150, 150, 150, 150, 150, 150, 300, 300, 300]; InitialValues=[0.38, 0.38, 0.38, 0.38, 0.38, 0.38, 0.34, 0.33, 0.32]; InitialPAWmm=246; RelativeTo=LL15; FilledFromTop=true
              Solute NO3: same as Validation.Thomas Dissertation.Experiment_1_Berken.Exp1Berken.paddock.soil.NO3
              Solute NH4: same as Validation.Thomas Dissertation.Experiment_1_Berken.Exp1Berken.paddock.soil.NH4
              Solute Urea: same as Validation.Thomas Dissertation.Experiment_1_Berken.Exp1Berken.paddock.soil.Urea
              SoilTemperature Temperature
    Folder TOS
      Memo TOS data description
        These trials took place in Gatton on a vertisol at the Gilbert Site 2018-2021 looking at 6 cultivars (Jade, Crystal, CeleraII, Opal, Onyx, Berken) planted at 5-6 times in rainfed and irrigated (one year). The data has not been published yet, but was collected and will be published by Kylie Wenham. Berken was likely not a pure seed and cannot be compared to the results of Thomas' dissertation and so was removed from the model-building dataset. The first and second years of the experiment were entirely or patrially excluded from the model dataset because the data was concluded to be unreliable.
      Experiment TOSyear2Opal
        Factors
          Permutation
            Factor Sow
              CompositeFactor Irr
                Specifications:
                  [Operations]
                  [AutoIrr].Script.AutoIrrigationOn=True
                Operations Irr
                  2020-01-16  [Irrigation].Apply(amount:54.5)
                  2020-02-16  [Irrigation].Apply(amount:54.5)
                  2020-03-16  [Irrigation].Apply(amount:54.5)
              CompositeFactor RF: Specifications=[Operations]
                Operations Irr
                  2020-01-16  [Irrigation].Apply(amount:34.5)
                  2020-02-16  [Irrigation].Apply(amount:24.5)
                  2020-03-16  [Irrigation].Apply(amount:24.5)
            Factor Cv: Specification=[SowingRule].Script.CultivarName=Opal
        Simulation TOSyear2Opal
          Summary summaryfile
          SoilArbitrator Soil Arbitrator
          Clock: Start=2019-10-01; End=2020-05-24
          Weather: FileName=GattonKylie.xlsx; ExcelWorkSheetName=Kylie
          Zone paddock: Area=1; Slope=0; AspectAngle=0; Altitude=50
            Irrigation
            Fertiliser
            SurfaceOrganicMatter: InitialResidueName=wheat; InitialResidueType=wheat; InitialResidueMass=500; InitialStandingFraction=0; InitialCPR=0; InitialCNR=40
            Report DailyReport: same as Validation.Thomas Dissertation.Experiment_1_Berken.Exp1Berken.paddock.DailyReport
            Report HarvestReport: same as Validation.Thomas Dissertation.Experiment_1_Berken.Exp1Berken.paddock.HarvestReport
            Plant Mungbean
            Manager Irrigatefixeddates: same as Validation.Thomas Dissertation.Experiment_1_Berken.Exp1Berken.paddock.Irrigatefixeddates
            Operations
            Manager SowingRule
              SowingDate = 01/14/2020 00:00:00
              CultivarName = Opal
              RowSpacing = 540
              SowingDepth = 30
              SowingRate = 30.8
              script: same as in Validation.Thomas Dissertation.Experiment_1_Berken.Exp1Berken.paddock.SowingRule
            Manager AutoIrr: same as Validation.Thomas Dissertation.Experiment_1_Emerald.Exp1Emerald.paddock.AutoIrr
            MicroClimate: a_interception=0; b_interception=1; c_interception=0; d_interception=0; SoilHeatFluxFraction=0.4; MinimumHeightDiffForNewLayer=0; NightInterceptionFraction=0.5; ReferenceHeight=2
            Soil: SoilType=APS6Soil; LocalName=APS6Site; Site=APS6Site; NearestTown=Unknown; Region=Lawes; NaturalVegetation=Unknown; Latitude=0; Longitude=0
              WaterBalance SoilWater: SummerDate=1-Nov; SummerU=6; SummerCona=3.5; WinterDate=1-Apr; WinterU=6; WinterCona=3.5; DiffusConst=88; DiffusSlope=35.4; Salb=0.13; CN2Bare=60; CNRed=20; CNCov=0.8; DischargeWidth=0; CatchmentArea=0; PSIDul=-100
              Organic: FOMCNRatio=60; CarbonUnits=Total
                Thickness  Carbon  SoilCNRatio  FBiom  FInert  FOM
                150        2.08    14.5         0.03   0.45    34.7129
                150        1.21    14.5         0.02   0.6     27.0344
                150        1.21    14.5         0.01   0.78    16.3972
                150        1.15    14.5         0.01   0.78    16.397
                150        1       14.5         0.01   0.9     9.945
                150        1       14.5         0.01   0.9     9.945
                300        0.8     14.5         0.01   0.99    6.032
                300        0.45    14.5         0.01   0.99    3.659
                300        0.45    14.5         0.01   0.99    2.219
              Chemical: PHUnits=Water
                Thickness  PH   CEC
                150        7.5  13.025
                150        8    11.0675
                150        8    11.0675
                150        8    10.9325
                150        8    10.595
                150        8    10.595
                300        8    10.145
                300        8    9.3575
                300        8    9.3575
                CEC source: Calculated
              Nutrient
              Physical
                Thickness  ParticleSizeSand  ParticleSizeSilt  ParticleSizeClay  Rocks  BD    AirDry  LL15    DUL   SAT   KS
                150        5                 65                30                0      1.38  0.2     0.208   0.42  0.45  0.01
                150        5                 65                30                0      1.34  0.273   0.2731  0.42  0.45  0.01
                150        5                 65                30                0      1.35  0.286   0.2857  0.42  0.45  0.01
                150        5                 65                30                0      1.35  0.286   0.286   0.42  0.45  0.01
                150        5                 65                30                0      1.5   0.286   0.2863  0.4   0.43  0.01
                150        5                 65                30                0      1.5   0.286   0.286   0.4   0.43  0.01
                300        5                 65                30                0      1.49  0.286   0.286   0.36  0.4   0.01
                300        5                 65                30                0      1.46  0.286   0.286   0.36  0.4   0.01
                300        5                 65                30                0      1.46  0.286   0.286   0.36  0.4   0.01
                Rocks, ParticleSizeSand, ParticleSizeSilt, ParticleSizeClay source: Calculated
                SoilCrop MungbeanSoil
                  LL=[0.258, 0.273, 0.286, 0.286, 0.286, 0.286, 0.286, 0.286, 0.286]
                  KL=[0.08, 0.08, 0.06, 0.06, 0.06, 0.04, 0.02, 0.02, 0.01]
                  XF=[1, 1, 1, 1, 1, 1, 1, 1, 1]
              Water: Thickness=[150, 150, 150, 150, 150, 150, 300, 300, 300]; InitialPAWmm=7.485; RelativeTo=LL15; FilledFromTop=false
                InitialValues=[0.258, 0.273, 0.286, 0.286, 0.286, 0.286, 0.286, 0.286, 0.286]
              Solute NO3: Thickness=[150, 150, 150, 150, 150, 150, 300, 300, 300]; InitialValues=[10, 5, 3, 3, 2, 2, 1, 0.1, 0.1]; InitialValuesUnits=ppm; WaterTableConcentration=0; D0=0; DepthConstant=0; MaxDepthSoluteAccessible=0; RunoffEffectivenessAtMovingSolute=0; MaxEffectiveRunoff=0
              Solute NH4: Thickness=[150, 150, 150, 150, 150, 150, 300, 300, 300]; InitialValues=[3, 2, 1, 1, 0.8, 0.8, 0.8, 0.5, 0.5]; InitialValuesUnits=ppm; WaterTableConcentration=0; D0=0; DepthConstant=0; MaxDepthSoluteAccessible=0; RunoffEffectivenessAtMovingSolute=0; MaxEffectiveRunoff=0
              Solute Urea: same as Validation.Thomas Dissertation.Experiment_1_Berken.Exp1Berken.paddock.soil.Urea
              SoilTemperature Temperature
            Manager HarvestAfterDate
              HarvestDate = 27-Mar
              script: same as in Validation.Thomas Dissertation.Experiment_1_Berken.Exp1Berken.paddock.HarvestAfterDate
      Experiment TOSyear3
        Factors
          Permutation
            Factor Sow
              CompositeFactor Sept20
                Specifications:
                  [SowingRule].Script.SowingDate=2020-9-10
                  [Soil].Water.InitialValues=0.208,0.273,0.306,0.306,0.306,0.3,0.310,0.330,0.330
                  [Operations]
                  [AutoIrr].Script.AutoIrrigationOn=True
                  [HarvestAfterDate].Script.HarvestDate = 17-Dec
                Operations Irr
                  2020-09-10  [Irrigation].Apply(amount:18.5)
                  2020-09-17  [Irrigation].Apply(amount:17.5)
                  2020-09-30  [Irrigation].Apply(amount:19.5)
                  2020-10-09  [Irrigation].Apply(amount:21.5)
                  2020-11-24  [Irrigation].Apply(amount:17.5)
              CompositeFactor Oct20
                Specifications:
                  [SowingRule].Script.SowingDate=2020-10-15
                  [Soil].Water.InitialValues=0.408,0.373,0.386,0.386,0.386,0.3,0.310,0.330,0.330
                  [Operations]
                  [AutoIrr].Script.AutoIrrigationOn=True
                  [HarvestAfterDate].Script.HarvestDate = 4-Jan
                Operations Irr
                  2020-10-16  [Irrigation].Apply(amount:31.75)
                  2020-10-19  [Irrigation].Apply(amount:29.75)
                  2020-11-24  [Irrigation].Apply(amount:28.75)
              CompositeFactor Nov20
                Specifications:
                  [SowingRule].Script.SowingDate=2020-11-24
                  [Soil].Water.InitialValues=0.308,0.373,0.386,0.386,0.386,0.3,0.310,0.330,0.330
                  [Operations]
                  [SomeIrr].Script.AutoIrrigationOn=True
                  [HarvestAfterDate].Script.HarvestDate = 5-Feb
                Operations Irr
                  2020-11-24  [Irrigation].Apply(amount:9.75)
              CompositeFactor Jan21
                Specifications:
                  [SowingRule].Script.SowingDate=2021-1-14
                  [Operations]
                  [HarvestAfterDate].Script.HarvestDate = 31-Mar
                Operations Irr
                  2021-01-15  [Irrigation].Apply(amount:44.75)
                  2021-02-10  [Irrigation].Apply(amount:48.5)
                  2021-02-23  [Irrigation].Apply(amount:53.5)
                  2021-02-28  [Irrigation].Apply(amount:53.5)
                  2021-03-03  [Irrigation].Apply(amount:53.5)
                  2021-03-23  [Irrigation].Apply(amount:53.5)
              CompositeFactor Feb21
                Specifications:
                  [SowingRule].Script.SowingDate=2021-02-22
                  [Soil].Water.InitialValues=0.308,0.373,0.386,0.386,0.386,0.3,0.310,0.330,0.330
                  [Operations]
                  [HarvestAfterDate].Script.HarvestDate = 24-May
                Operations Irr
                  2021-01-15  [Irrigation].Apply(amount:14.75)
            Factor Cv
              Specification=[SowingRule].Script.CultivarName=Opal,Onyx,CeleraII,Crystal,Jade
        Simulation TOSyear3
          Summary summaryfile
          SoilArbitrator Soil Arbitrator
          Clock: Start=2020-09-01; End=2021-08-24
          Weather: FileName=GattKylAll.sim
          Zone paddock: Area=1; Slope=0; AspectAngle=0; Altitude=50
            Irrigation
            Fertiliser
            SurfaceOrganicMatter: InitialResidueName=wheat; InitialResidueType=wheat; InitialResidueMass=500; InitialStandingFraction=0; InitialCPR=0; InitialCNR=40
            Report DailyReport: same as Validation.Thomas Dissertation.Experiment_1_Berken.Exp1Berken.paddock.DailyReport
            Report HarvestReport: same as Validation.Thomas Dissertation.Experiment_1_Berken.Exp1Berken.paddock.HarvestReport
            Plant Mungbean
            Manager Irrigatefixeddates: same as Validation.Thomas Dissertation.Experiment_1_Berken.Exp1Berken.paddock.Irrigatefixeddates
            Operations
            Manager SowingRule
              CultivarName = Emerald
              RowSpacing = 540
              SowingDepth = 30
              SowingRate = 30.8
              SowingDate = 11/28/1996 00:00:00
              script: same as in Validation.Thomas Dissertation.Experiment_1_Berken.Exp1Berken.paddock.SowingRule
            Manager AutoIrr
              AutoIrrigationOn = False
              Crop = [Mungbean]
              FASWThreshold = 0.9
              FASWDepth = 600
              weeks = 3
              afterSowing = 20
              script: same as in Validation.Thomas Dissertation.Experiment_1_Berken.Exp1Berken.paddock.AutoIrr
            Manager HarvestAfterDate
              HarvestDate = 20-Nov
              script: same as in Validation.Thomas Dissertation.Experiment_1_Berken.Exp1Berken.paddock.HarvestAfterDate
            MicroClimate: a_interception=0; b_interception=1; c_interception=0; d_interception=0; SoilHeatFluxFraction=0.4; MinimumHeightDiffForNewLayer=0; NightInterceptionFraction=0.5; ReferenceHeight=2
            Soil: SoilType=APS6Soil; LocalName=APS6Site; Site=APS6Site; NearestTown=Unknown; Region=Lawes; NaturalVegetation=Unknown; Latitude=0; Longitude=0
              WaterBalance SoilWater: SummerDate=1-Nov; SummerU=6; SummerCona=3.5; WinterDate=1-Apr; WinterU=6; WinterCona=3.5; DiffusConst=88; DiffusSlope=35.4; Salb=0.13; CN2Bare=60; CNRed=20; CNCov=0.8; DischargeWidth=0; CatchmentArea=0; PSIDul=-100
              Organic: same as Validation.TOS.TOSyear2Opal.TOSyear2Opal.paddock.Soil.Organic
              Chemical: same as Validation.TOS.TOSyear2Opal.TOSyear2Opal.paddock.Soil.Chemical
              Nutrient
              Physical
                Thickness  ParticleSizeSand  ParticleSizeSilt  ParticleSizeClay  Rocks  BD    AirDry  LL15    DUL   SAT   KS
                150        5                 65                30                0      1.38  0.2     0.208   0.42  0.45  0.01
                150        5                 65                30                0      1.34  0.273   0.2731  0.42  0.45  0.01
                150        5                 65                30                0      1.35  0.286   0.2857  0.42  0.45  0.01
                150        5                 65                30                0      1.35  0.286   0.286   0.42  0.45  0.01
                150        5                 65                30                0      1.5   0.286   0.2863  0.4   0.43  0.01
                150        5                 65                30                0      1.5   0.286   0.286   0.4   0.43  0.01
                300        5                 65                30                0      1.49  0.286   0.286   0.36  0.4   0.01
                300        5                 65                30                0      1.46  0.286   0.286   0.36  0.4   0.01
                300        5                 65                30                0      1.46  0.286   0.286   0.36  0.4   0.01
                Rocks, ParticleSizeSand, ParticleSizeSilt, ParticleSizeClay source: Calculated
                SoilCrop MungbeanSoil: LL=[0.3, 0.31, 0.32, 0.33, 0.33, 0.33, 0.33, 0.33, 0.33]; KL=[0.08, 0.08, 0.06, 0.06, 0.06, 0.04, 0.02, 0.02, 0.01]; XF=[1, 1, 1, 1, 1, 1, 1, 1, 1]
              Water: Thickness=[150, 150, 150, 150, 150, 150, 300, 300, 300]; InitialValues=[0.32, 0.32, 0.32, 0.32, 0.38, 0.38, 0.36, 0.36, 0.36]; InitialPAWmm=128.835; RelativeTo=LL15; FilledFromTop=false
              Solute NO3: same as Validation.TOS.TOSyear2Opal.TOSyear2Opal.paddock.Soil.NO3
              Solute NH4: same as Validation.TOS.TOSyear2Opal.TOSyear2Opal.paddock.Soil.NH4
              Solute Urea: same as Validation.Thomas Dissertation.Experiment_1_Berken.Exp1Berken.paddock.soil.Urea
              SoilTemperature Temperature
            Manager SomeIrr
              AutoIrrigationOn = False
              Crop = [Mungbean]
              FASWThreshold = 0.9
              FASWDepth = 600
              weeks = 3
              afterSowing = 30
              script: same as in Validation.Thomas Dissertation.Experiment_1_Berken.Exp1Berken.paddock.AutoIrr
    Folder Muchow
      Memo
        This dataset ([Muchow_etal_1993]) includes the cultvar "King" grown under irrigated conditions in a subtropical environment at the Gatton Research Station in southeastern Queensland, Australia and Kimberly, NT, Australia.  Plants were sampled almost weekly for biomass partitioning, nitrogen and plant development.
      Simulation GattonJan91990
        Clock: Start=1990-01-01; End=1990-05-31
        Summary summaryfile
        Weather: FileName=Gatton.met
        SoilArbitrator Soil Arbitrator
        Zone paddock: Area=1; Slope=0; AspectAngle=0; Altitude=50
          MicroClimate: a_interception=0; b_interception=1; c_interception=0; d_interception=0; SoilHeatFluxFraction=0.4; MinimumHeightDiffForNewLayer=0; NightInterceptionFraction=0.5; ReferenceHeight=2
          Irrigation
          Fertiliser
          SurfaceOrganicMatter: InitialResidueName=maize; InitialResidueType=maize; InitialResidueMass=100; InitialStandingFraction=0; InitialCPR=0; InitialCNR=55
          Report DailyReport: same as Validation.Thomas Dissertation.Experiment_1_Berken.Exp1Berken.paddock.DailyReport
          Manager SowingRule
            SowingDate = 01/09/1990 00:00:00
            CultivarName = King
            RowSpacing = 200
            SowingDepth = 50
            SowingRate = 35
            script: same as in Validation.Thomas Dissertation.Experiment_1_Berken.Exp1Berken.paddock.SowingRule
          Report HarvestReport: EventNames=[Soybean].Harvesting
            VariableNames:
              [Clock].Today
              [Mungbean].Structure.MainStemPrimordiaNo
              [Mungbean].Phenology.NFF
              [Mungbean].Script.FinalTag
          Soil: SoilType=APS6Soil; LocalName=APS6Site; Site=APS6Site; NearestTown=Unknown; Region=Lawes; NaturalVegetation=Unknown; Latitude=0; Longitude=0
            Physical
              Thickness  ParticleSizeSand  ParticleSizeSilt  ParticleSizeClay  Rocks  BD    AirDry  LL15  DUL   SAT   KS
              150        5                 65                30                0      1.38  0.1     0.2   0.38  0.43  0.01
              150        5                 65                30                0      1.34  0.1     0.2   0.38  0.43  0.01
              150        5                 65                30                0      1.35  0.1     0.22  0.4   0.43  0.01
              150        5                 65                30                0      1.35  0.1     0.22  0.4   0.43  0.01
              150        5                 65                30                0      1.5   0.1     0.18  0.4   0.43  0.01
              150        5                 65                30                0      1.5   0.1     0.18  0.4   0.43  0.01
              300        5                 65                30                0      1.49  0.1     0.14  0.39  0.42  0.01
              300        5                 65                30                0      1.46  0.1     0.2   0.38  0.4   0.01
              300        5                 65                30                0      1.46  0.1     0.2   0.38  0.4   0.01
              Rocks, ParticleSizeSand, ParticleSizeSilt, ParticleSizeClay source: Calculated
              SoilCrop MungbeanSoil: LL=[0.2, 0.2, 0.22, 0.22, 0.18, 0.18, 0.14, 0.25, 0.28]; KL=[0.06, 0.05, 0.05, 0.05, 0.04, 0.04, 0.04, 0.04, 0.06]; XF=[1, 1, 1, 1, 1, 1, 1, 1, 1]
            WaterBalance SoilWater: SummerDate=1-Nov; SummerU=6; SummerCona=3.5; WinterDate=1-Apr; WinterU=6; WinterCona=3.5; DiffusConst=88; DiffusSlope=35.4; Salb=0.13; CN2Bare=60; CNRed=20; CNCov=0.8; DischargeWidth=0; CatchmentArea=0; PSIDul=-100
            Organic: FOMCNRatio=60; CarbonUnits=Total
              Thickness  Carbon  SoilCNRatio  FBiom  FInert  FOM
              150        2.2     14.5         0.03   0.45    34.7129
              150        1.6     14.5         0.02   0.6     27.0344
              150        1.15    14.5         0.01   0.78    16.3972
              150        1.15    14.5         0.01   0.78    16.397
              150        1       14.5         0.01   0.9     9.945
              150        1       14.5         0.01   0.9     9.945
              300        0.8     14.5         0.01   0.99    6.032
              300        0.45    14.5         0.01   0.99    3.659
              300        0.45    14.5         0.01   0.99    2.219
            Chemical: PHUnits=Water
              Thickness  PH   CEC
              150        7.5  13.295
              150        8    11.945
              150        8    10.9325
              150        8    10.9325
              150        8    10.595
              150        8    10.595
              300        8    10.145
              300        8    9.3575
              300        8    9.3575
              CEC source: Calculated
            Water: Thickness=[150, 150, 150, 150, 150, 150, 300, 300, 300]; InitialPAWmm=249.6; RelativeTo=LL15; FilledFromTop=false
              InitialValues=[0.326, 0.326, 0.346, 0.346, 0.333, 0.333, 0.315, 0.326, 0.326]
            Nutrient
            Solute NO3: same as Validation.TOS.TOSyear2Opal.TOSyear2Opal.paddock.Soil.NO3
            Solute NH4: same as Validation.TOS.TOSyear2Opal.TOSyear2Opal.paddock.Soil.NH4
            Solute Urea: same as Validation.Thomas Dissertation.Experiment_1_Berken.Exp1Berken.paddock.soil.Urea
            SoilTemperature Temperature
          Manager HarvestRule: same as Validation.Thomas Dissertation.Experiment_3.exp3.paddock.HarvestRule
          Plant Mungbean
          Manager AutoIrr
            AutoIrrigationOn = True
            Crop = [Mungbean]
            FASWThreshold = 0.9
            FASWDepth = 600
            weeks = 0
            afterSowing = 2
            script: same as in Validation.Thomas Dissertation.Experiment_1_Berken.Exp1Berken.paddock.AutoIrr
      Experiment Kimberly1980
        Factors
          Permutation
            Factor Dens: Specification=[SowingRule].Script.SowingRate=10,27,50
        Simulation Kimberly1980
          Clock: Start=1980-01-10; End=1980-05-31
          Summary summaryfile
          Weather: FileName=Kimberly1980.xlsx; ExcelWorkSheetName=Emerald
          SoilArbitrator Soil Arbitrator
          Zone paddock: Area=1; Slope=0; AspectAngle=0; Altitude=50
            MicroClimate: a_interception=0; b_interception=1; c_interception=0; d_interception=0; SoilHeatFluxFraction=0.4; MinimumHeightDiffForNewLayer=0; NightInterceptionFraction=0.5; ReferenceHeight=2
            Irrigation
            Manager AutomaticIrrigation
              AutoIrrigationOn = False
              FASWThreshold = 0.9
              FASWDepth = 900
```csharp
using APSIM.Numerics;
using Models.Soils.Nutrients;
using System;
using Models.Core;
using System.Collections.Generic;
using System.Text;
using Models.Soils;
using Models.PMF;
using Models;
using System.Xml.Serialization;
using APSIM.Shared.Utilities;
using Models.Interfaces;

namespace Models
{
    [Serializable] 
    public class Script : Model
    {
        [Link] private Zone zone;
        [Link] private Irrigation irrigation;
        [Link] private Soil soil;
        [Link]
        private IPhysical soilPhysical;
        [Link]
        private ISoilWater waterBalance;
        public double FASW { get; set; }
        public double WaterDeficit  { get; set; }
    
        
        [Description("Auto irrigation on?")]
        public bool AutoIrrigationOn { get; set; }

        [Description("Threshold fraction available water (0-1)")]
        public double FASWThreshold { get; set; }

        [Description("Soil depth (mm) to which fraction available water is calculated")]
        public double FASWDepth { get; set; }

        [EventSubscribe("DoManagement")]
        private void OnDoManagement(object sender, EventArgs e)
        {
            CalculateFASW();
            if (AutoIrrigationOn)
            {
                if (FASW < FASWThreshold)
                {
                    double amount = 10;
                    irrigation.Apply(WaterDeficit, depth: 0);
                }
            }
        }
        
        private void CalculateFASW()
        {
            double[] LL15 = MathUtilities.Multiply(soilPhysical.LL15, soilPhysical.Thickness);
            double[] DUL = MathUtilities.Multiply(soilPhysical.DUL, soilPhysical.Thickness);
        
            int nlayr = GetLayerIndex();
            double cumdep = MathUtilities.Sum(soilPhysical.Thickness, 0, nlayr, 0.0);

            double excess_fr = MathUtilities.Divide((cumdep - FASWDepth), soilPhysical.Thickness[nlayr], 0.0);

            // note that results may be strange if swdep < ll15
            double avail_sw = (MathUtilities.Sum(waterBalance.SWmm, 0, nlayr, 0.0)
                              - excess_fr * waterBalance.SWmm[nlayr])
                              - (MathUtilities.Sum(LL15, 0, nlayr, 0.0)
                              - excess_fr * LL15[nlayr]);


            double pot_avail_sw = (MathUtilities.Sum(DUL, 0, nlayr, 0.0)
                                  - excess_fr * DUL[nlayr])
                                  - (MathUtilities.Sum(LL15, 0, nlayr, 0.0)
                                  - excess_fr * LL15[nlayr]);

            FASW = MathUtilities.Divide(avail_sw, pot_avail_sw, 0.0);
            WaterDeficit = MathUtilities.Constrain(pot_avail_sw - avail_sw, 0.0, 100000);
        }

        private int GetLayerIndex()
        {
            double[] cumThickness = soilPhysical.ThicknessCumulative;
            for (int i = 1; i < cumThickness.Length; i++)
            {
                if (FASWDepth < cumThickness[i])
                    return i - 1;
            }
            
            return cumThickness.Length - 1;
        }

    }
}
```
            Fertiliser
            SurfaceOrganicMatter: InitialResidueName=maize; InitialResidueType=maize; InitialResidueMass=4500; InitialStandingFraction=0; InitialCPR=0; InitialCNR=55
            Manager SowingRule
              SowingDate = 01/11/1980 00:00:00
              CultivarName = Berken
              RowSpacing = 250
              SowingDepth = 40
              SowingRate = 35
              script: same as in Validation.Thomas Dissertation.Experiment_1_Berken.Exp1Berken.paddock.SowingRule
            Plant Mungbean
            Manager HarvestRule: same as Validation.Thomas Dissertation.Experiment_3.exp3.paddock.HarvestRule
            Report DailyReport: same as Validation.Thomas Dissertation.Experiment_1_Berken.Exp1Berken.paddock.DailyReport
            Report HarvestReport: same as Validation.Thomas Dissertation.Experiment_1_Berken.Exp1Berken.paddock.HarvestReport
            Soil NT1_soil: Latitude=0; Longitude=0
              WaterBalance SoilWater: SummerDate=1-Nov; SummerU=1.5; SummerCona=6.6; WinterDate=1-Apr; WinterU=1.5; WinterCona=6.6; DiffusConst=88; DiffusSlope=35.4; Salb=0.2; CN2Bare=70; CNRed=20; CNCov=0.8; DischargeWidth=5; CatchmentArea=10; PSIDul=-100
              Organic: FOMCNRatio=33; CarbonUnits=Total
                Thickness  Carbon  SoilCNRatio  FBiom  FInert  FOM
                150        1.27    14.5         0.05   0.39    0
                150        0.59    14.5         0.02   0.47    0
                150        0.34    14.5         0.015  0.52    0
                150        0.34    14.5         0.01   0.62    0
                150        0.26    14.5         0.01   0.74    0
                150        0.26    14.5         0.01   0.83    0
                300        0.25    14.5         0.01   0.93    0
                300        0.19    14.5         0.01   0.93    0
                300        0.21    14.5         0.01   0.93    0
              Chemical: PHUnits=Water
                Thickness  PH   CEC
                150        6.5  11.2025
                150        6.2  9.6725
                150        6.3  9.11
                150        6.4  9.11
                150        6.5  8.93
                150        6.6  8.93
                300        6.6  8.9075
                300        6.5  8.7725
                300        6.5  8.8175
                CEC source: Calculated
              Water: Thickness=[150, 150, 150, 150, 150, 150, 300, 300, 300]; InitialPAWmm=193.05; RelativeTo=LL15; FilledFromTop=true
                InitialValues=[0.304, 0.31, 0.31, 0.324, 0.328, 0.328, 0.325, 0.337, 0.35]
              Nutrient
              Physical
                Thickness  ParticleSizeSand  ParticleSizeSilt  ParticleSizeClay  Rocks     BD    AirDry  LL15   DUL    SAT    KS
                150        5                 65                30                0.176532  1.56  0.053   0.19   0.304  0.315  0.01
                150        5                 65                30                0.167856  1.52  0.08    0.21   0.31   0.33   0.01
                150        5                 65                30                0.193051  1.46  0.21    0.21   0.31   0.337  0.01
                150        5                 65                30                0.185868  1.46  0.223   0.223  0.324  0.34   0.01
                150        5                 65                30                0.212344  1.42  0.219   0.219  0.328  0.34   0.01
                150        5                 65                30                0.210027  1.42  0.219   0.219  0.328  0.341  0.01
                300        5                 65                30                0.17629   1.46  0.219   0.219  0.325  0.344  0.01
                300        5                 65                30                0.142683  1.5   0.229   0.229  0.337  0.346  0.01
                300        5                 65                30                0         1.53  0.237   0.237  0.35   0.37   0.01
                Rocks, ParticleSizeSand, ParticleSizeSilt, ParticleSizeClay source: Calculated
                SoilCrop MungbeanSoil
                  LL=[0.19, 0.21, 0.21, 0.235, 0.233, 0.242, 0.248, 0.277, 0.285]
                  KL=[0.16, 0.16, 0.12, 0.1, 0.1, 0.08, 0.06, 0.04, 0.03]
                  XF=[1, 1, 1, 1, 1, 1, 1, 0, 0]
              Solute NO3: Thickness=[150, 150, 150, 150, 150, 150, 300, 300, 300]; InitialValues=[2, 2, 2, 2, 2, 2, 2, 2, 1]; InitialValuesUnits=ppm; WaterTableConcentration=0; D0=0; DepthConstant=0; MaxDepthSoluteAccessible=0; RunoffEffectivenessAtMovingSolute=0; MaxEffectiveRunoff=0
              Solute NH4: Thickness=[150, 150, 150, 150, 150, 150, 300, 300, 300]; InitialValues=[1, 1, 1, 1, 1, 1, 1, 1, 0.2]; InitialValuesUnits=ppm; WaterTableConcentration=0; D0=0; DepthConstant=0; MaxDepthSoluteAccessible=0; RunoffEffectivenessAtMovingSolute=0; MaxEffectiveRunoff=0
              Solute Urea: same as Validation.Thomas Dissertation.Experiment_1_Berken.Exp1Berken.paddock.soil.Urea
              SoilTemperature Temperature
            Manager Automatic irrigation based on water deficit: same as Validation.Muchow.GattonJan91990.paddock.AutoIrr
      Simulation KatherineJan28WaterIrrigated
        Clock: Start=1989-01-10; End=1989-05-31
        Summary summaryfile
        Weather: FileName=katherine1989.met
        SoilArbitrator Soil Arbitrator
        Zone paddock: Area=1; Slope=0; AspectAngle=0; Altitude=50
          MicroClimate: a_interception=0; b_interception=1; c_interception=0; d_interception=0; SoilHeatFluxFraction=0.4; MinimumHeightDiffForNewLayer=0; NightInterceptionFraction=0.5; ReferenceHeight=2
          Irrigation
          Manager AutomaticIrrigation
            AutoIrrigationOn = True
            FASWThreshold = 0.9
            FASWDepth = 1200
            script: same as in Validation.Muchow.Kimberly1980.Kimberly1980.paddock.AutomaticIrrigation
          Fertiliser
          SurfaceOrganicMatter: InitialResidueName=maize; InitialResidueType=maize; InitialResidueMass=4500; InitialStandingFraction=0; InitialCPR=0; InitialCNR=55
          Manager SowingRule
            SowingRate = 35
            RowSpacing = 500
            SowingDepth = 40
            CultivarName = King
            SowingDate = 01/28/1989 00:00:00
            script: same as in Validation.Thomas Dissertation.Experiment_1_Berken.Exp1Berken.paddock.SowingRule
          Plant Mungbean
          Soil: Latitude=0; Longitude=0
            Physical
              Thickness  ParticleSizeSand  ParticleSizeSilt  ParticleSizeClay  Rocks     BD    AirDry  LL15  DUL   SAT   KS
              150        5                 65                30                0.189602  1.56  0.05    0.19  0.3   0.31  0.01
              150        5                 65                30                0.167856  1.52  0.08    0.21  0.31  0.33  0.01
              150        5                 65                30                0.185868  1.46  0.21    0.21  0.31  0.34  0.01
              150        5                 65                30                0.185868  1.46  0.22    0.22  0.32  0.34  0.01
              150        5                 65                30                0.212344  1.42  0.22    0.22  0.33  0.34  0.01
              150        5                 65                30                0.212344  1.42  0.22    0.22  0.33  0.34  0.01
              300        5                 65                30                0.185868  1.46  0.22    0.22  0.32  0.34  0.01
              300        5                 65                30                0.132772  1.5   0.23    0.23  0.34  0.35  0.01
              300        5                 65                30                0         1.53  0.24    0.24  0.35  0.37  0.01
              Rocks, ParticleSizeSand, ParticleSizeSilt, ParticleSizeClay source: Calculated
              SoilCrop MungbeanSoil: LL=[0.19, 0.21, 0.21, 0.23, 0.23, 0.24, 0.25, 0.28, 0.28]; KL=[0.16, 0.16, 0.12, 0.1, 0.1, 0.08, 0.06, 0.04, 0.03]; XF=[1, 1, 1, 1, 1, 1, 1, 0, 0]
            WaterBalance SoilWater: SummerDate=1-Nov; SummerU=1.5; SummerCona=6.6; WinterDate=1-Apr; WinterU=1.5; WinterCona=6.6; DiffusConst=88; DiffusSlope=35.4; Salb=0.2; CN2Bare=70; CNRed=20; CNCov=0.8; DischargeWidth=0; CatchmentArea=0; PSIDul=-100
            Organic: FOMCNRatio=36; CarbonUnits=Total
              Thickness  Carbon  SoilCNRatio  FBiom  FInert  FOM
              150        1.27    14.5         0.04   0.39    518.782
              150        0.59    14.5         0.02   0.47    404.028
              150        0.34    14.5         0.01   0.52    314.657
              150        0.34    14.5         0.01   0.62    245.055
              150        0.26    14.5         0.01   0.74    190.849
              150        0.26    14.5         0.01   0.83    148.634
              300        0.25    14.5         0.01   0.93    90.1508
              300        0.19    14.5         0.01   0.93    54.6792
              300        0.21    14.5         0.01   0.93    33.1646
            Chemical: same as Validation.Muchow.Kimberly1980.Kimberly1980.paddock.NT1_soil.Chemical
            Water: Thickness=[150, 150, 150, 150, 150, 150, 300, 300, 300]; InitialPAWmm=191.7; RelativeTo=LL15; FilledFromTop=false
              InitialValues=[0.304, 0.31, 0.31, 0.324, 0.328, 0.328, 0.325, 0.337, 0.35]
            Nutrient
            Solute NO3: Thickness=[150, 150, 150, 150, 150, 150, 300, 300, 300]; InitialValues=[2, 2, 2, 2, 2, 2, 2, 2, 2]; InitialValuesUnits=ppm; WaterTableConcentration=0; D0=0; DepthConstant=0; MaxDepthSoluteAccessible=0; RunoffEffectivenessAtMovingSolute=0; MaxEffectiveRunoff=0
            Solute NH4: same as Validation.Thomas Dissertation.Experiment_1_Berken.Exp1Berken.paddock.soil.NH4
            Solute Urea: same as Validation.Thomas Dissertation.Experiment_1_Berken.Exp1Berken.paddock.soil.Urea
            SoilTemperature Temperature
          Manager HarvestRule: same as Validation.Thomas Dissertation.Experiment_3.exp3.paddock.HarvestRule
          Report DailyReport: same as Validation.Thomas Dissertation.Experiment_1_Berken.Exp1Berken.paddock.DailyReport
          Report HarvestReport: same as Validation.Thomas Dissertation.Experiment_1_Berken.Exp1Berken.paddock.HarvestReport
      Simulation Katherine1989SowFeb07
        Clock: Start=1989-01-10; End=1989-05-31
        Summary summaryfile
        Weather: FileName=katherine1989.met
        SoilArbitrator Soil Arbitrator
        Zone paddock: Area=1; Slope=0; AspectAngle=0; Altitude=50
          MicroClimate: a_interception=0; b_interception=1; c_interception=0; d_interception=0; SoilHeatFluxFraction=0.4; MinimumHeightDiffForNewLayer=0; NightInterceptionFraction=0.5; ReferenceHeight=2
          Irrigation
          Fertiliser
          SurfaceOrganicMatter: InitialResidueName=maize; InitialResidueType=maize; InitialResidueMass=4500; InitialStandingFraction=0; InitialCPR=0; InitialCNR=55
          Report DailyReport: VariableNames=[Clock].Today; EventNames=[Clock].DoReport
          Manager HarvestRule: same as Validation.Thomas Dissertation.Experiment_3.exp3.paddock.HarvestRule
          Report HarvestReport: VariableNames=[Clock].Today; EventNames=[Mungbean].Harvesting
          Plant Mungbean
          Operations
          Manager Automatic irrigation based on water deficit
            AutoIrrigationOn = True
            Crop = [Mungbean]
            FASWThreshold = 0.9
            FASWDepth = 600
            weeks = 0
            afterSowing = 0
            script: same as in Validation.Thomas Dissertation.Experiment_1_Berken.Exp1Berken.paddock.AutoIrr
          Soil: Latitude=0; Longitude=0
            Physical: same as Validation.Muchow.KatherineJan28WaterIrrigated.paddock.Soil.Physical
            WaterBalance SoilWater: SummerDate=1-Nov; SummerU=1.5; SummerCona=6.6; WinterDate=1-Apr; WinterU=1.5; WinterCona=6.6; DiffusConst=88; DiffusSlope=35.4; Salb=0.2; CN2Bare=70; CNRed=20; CNCov=0.8; DischargeWidth=0; CatchmentArea=0; PSIDul=-100
            Organic: same as Validation.Muchow.KatherineJan28WaterIrrigated.paddock.Soil.Organic
            Chemical: same as Validation.Muchow.Kimberly1980.Kimberly1980.paddock.NT1_soil.Chemical
            Water: Thickness=[150, 150, 150, 150, 150, 150, 300, 300, 300]; InitialValues=[0.3, 0.31, 0.31, 0.32, 0.33, 0.33, 0.32, 0.34, 0.35]; InitialPAWmm=190.5; RelativeTo=LL15; FilledFromTop=true
            Nutrient
            Solute NO3: same as Validation.Muchow.KatherineJan28WaterIrrigated.paddock.Soil.NO3
            Solute NH4: same as Validation.Thomas Dissertation.Experiment_1_Berken.Exp1Berken.paddock.soil.NH4
            Solute Urea: same as Validation.Thomas Dissertation.Experiment_1_Berken.Exp1Berken.paddock.soil.Urea
            SoilTemperature Temperature
          Manager SowingRule
            RowSpacing = 360
            SowingDepth = 40
            SowingRate = 35
            CultivarName = King
            SowingDate = 02/07/1989 00:00:00
            script: same as in Validation.Thomas Dissertation.Experiment_1_Berken.Exp1Berken.paddock.SowingRule
    Simulation ExtraPhenSowOctCvJade
      Memo
        Additional small experiment at Gatton UQ field station on a vertisol. Sown on October 26, 2021. Node, leaf, and branch numbers were counted every week. After the 4th node, biomass samples were taken weekly too and partitioned into leaves and stems. Harvest data was not collected as the aim of the experiment was to nail down phenology.
      Summary summaryfile
      SoilArbitrator Soil Arbitrator
      Clock: Start=2021-10-01; End=2022-01-10
      Weather: FileName=GattonKylie.xlsx; ExcelWorkSheetName=Kylie
      Zone paddock: Area=1; Slope=0; AspectAngle=0; Altitude=50
        Irrigation
        Fertiliser
        SurfaceOrganicMatter: InitialResidueName=wheat; InitialResidueType=wheat; InitialResidueMass=500; InitialStandingFraction=0; InitialCPR=0; InitialCNR=40
        Report DailyReport: same as Validation.Thomas Dissertation.Experiment_1_Berken.Exp1Berken.paddock.DailyReport
        Manager HarvestRule: same as Validation.Thomas Dissertation.Experiment_3.exp3.paddock.HarvestRule
        Report HarvestReport: same as Validation.Thomas Dissertation.Experiment_1_Berken.Exp1Berken.paddock.HarvestReport
        Plant Mungbean
        Operations
        Manager SowingRule
          RowSpacing = 540
          SowingDepth = 30
          SowingRate = 30.8
          CultivarName = Jade
          SowingDate = 10/26/2021 00:00:00
          script: same as in Validation.Thomas Dissertation.Experiment_1_Berken.Exp1Berken.paddock.SowingRule
        MicroClimate: a_interception=0; b_interception=1; c_interception=0; d_interception=0; SoilHeatFluxFraction=0.4; MinimumHeightDiffForNewLayer=0; NightInterceptionFraction=0.5; ReferenceHeight=2
        Soil: same as Validation.TOS.TOSyear2Opal.TOSyear2Opal.paddock.Soil
    Folder Mungbean_DAF
      Memo Mungbean_DAF data description
        These trials were done by DAF in 2019 and 2020, largely looking at the impact of applying N and innoculating seeds. Data is recorded in annual reports but not published. Jade was the cultivar used on all. It is unclear why the recorded harvest date is so much later than the simulated as the simulated was confirmed within 10 days by the Thomas Dissertation and Dr. Wenham's TOS trials. Perhaps, like the Yield Gap studies, the crop was harvested much later than the earliest harvest date possible or else, as was see in one experiment in the Thomas Dissertation, the crop was semi-indeterminant and didn't reach a natural harvest ripe point when anticipated (the crop keeps growing if there is enough water) and so the date of the harvest recorded in the field corresponds to a date at which the crop was chemically or mechanically desiccated.
      Experiment ACRI
        Factors
          Permutation
            Factor N
              CompositeFactor 0N_Jade_rf: Specifications=[Operations]
                Operations Irr
                  2020-01-23  [Fertiliser].Apply(amount: 0, type: "UreaN", depth: 150)
                  2020-01-23  [Mungbean].Sow(population: 25, cultivar: "Jade", depth: 50, rowSpacing: 500)
              CompositeFactor 0N_Opal_rf: Specifications=[Operations]
                Operations Irr
                  2020-01-23  [Fertiliser].Apply(amount: 0, type: "UreaN", depth: 150)
                  2020-01-23  [Mungbean].Sow(population: 25, cultivar: "Opal", depth: 50, rowSpacing: 500)
        Simulation ACRI
          Clock: Start=2020-01-23; End=2020-05-08
          Summary summaryfile
          Weather: FileName=ACRI.xlsx; ExcelWorkSheetName=ACRI
          SoilArbitrator Soil Arbitrator
          Zone paddock: Area=1; Slope=0; AspectAngle=0; Altitude=50
            MicroClimate: a_interception=0; b_interception=1; c_interception=0; d_interception=0; SoilHeatFluxFraction=0; MinimumHeightDiffForNewLayer=0; NightInterceptionFraction=0; ReferenceHeight=2
            Irrigation
            Fertiliser
            SurfaceOrganicMatter: InitialResidueName=wheat; InitialResidueType=wheat; InitialResidueMass=500; InitialStandingFraction=0; InitialCPR=0; InitialCNR=40
            Report DailyReport: same as Validation.Thomas Dissertation.Experiment_1_Berken.Exp1Berken.paddock.DailyReport
            Manager SowingRule
              RowSpacing = 360
              SowingDepth = 40
              SowingRate = 35
              CultivarName = King
              SowingDate = 03/31/1980 00:00:00
              script: same as in Validation.Thomas Dissertation.Experiment_1_Berken.Exp1Berken.paddock.SowingRule
            Report HarvestReport: same as Validation.Thomas Dissertation.Experiment_1_Berken.Exp1Berken.paddock.HarvestReport
            Plant Mungbean
            Manager Irrigatefixeddates: same as Validation.Thomas Dissertation.Experiment_1_Berken.Exp1Berken.paddock.Irrigatefixeddates
            Operations
            Soil: Latitude=0; Longitude=0
              WaterBalance SoilWater: SummerDate=1-Nov; SummerU=6; SummerCona=3.5; WinterDate=1-Apr; WinterU=6; WinterCona=3.5; DiffusConst=88; DiffusSlope=35.4; Salb=0.13; CN2Bare=72; CNRed=20; CNCov=0.8; DischargeWidth=5; CatchmentArea=10; PSIDul=-100
              Organic: FOMCNRatio=33; CarbonUnits=Total
                Thickness  Carbon  SoilCNRatio  FBiom  FInert  FOM
                150        1.94    14.5         0.02   0.36    0
                150        1.38    14.5         0.015  0.5     0
                150        1       14.5         0.01   0.59    0
                150        0.9     14.5         0.01   0.84    0
                150        0.75    14.5         0.01   0.8     0
                150        0.6     14.5         0.01   0.99    0
                300        0.6     14.5         0.01   0.99    0
                300        0.45    14.5         0.01   0.99    0
                300        0.45    14.5         0.01   0.99    0
              Chemical: PHUnits=Water
                Thickness  PH   CEC
                150        8    12.71
                150        7.8  11.45
                150        7.8  10.595
                150        7.8  10.37
                150        7.8  10.0325
                150        7.8  9.695
                300        7.8  9.695
                300        7.8  9.3575
                300        7.8  9.3575
                CEC source: Calculated
              Nutrient
              Physical
                Thickness  ParticleSizeSand  ParticleSizeSilt  ParticleSizeClay  Rocks     BD    AirDry  LL15  DUL   SAT   KS
                150        5                 65                30                0         1.31  0.05    0.21  0.43  0.48  0.01
                150        5                 65                30                0         1.26  0.21    0.21  0.44  0.49  0.01
                150        5                 65                30                0         1.36  0.21    0.21  0.41  0.46  0.01
                150        5                 65                30                0         1.39  0.21    0.21  0.41  0.45  0.01
                150        5                 65                30                0         1.44  0.21    0.21  0.41  0.43  0.01
                150        5                 65                30                0         1.45  0.21    0.21  0.4   0.42  0.01
                300        5                 65                30                0         1.45  0.2     0.2   0.35  0.39  0.01
                300        5                 65                30                0.137978  1.46  0.19    0.19  0.35  0.36  0.01
                300        5                 65                30                0.161923  1.46  0.18    0.18  0.32  0.35  0.01
                Rocks, ParticleSizeSand, ParticleSizeSilt, ParticleSizeClay source: Calculated
                SoilCrop MungbeanSoil: LL=[0.21, 0.21, 0.21, 0.21, 0.21, 0.21, 0.2, 0.19, 0.18]; KL=[0.08, 0.08, 0.08, 0.08, 0.08, 0.08, 0.08, 0.08, 0.08]; XF=[1, 1, 1, 1, 1, 1, 1, 1, 1]
              Water: Thickness=[150, 150, 150, 150, 150, 150, 300, 300, 300]; InitialValues=[0.39, 0.36, 0.37, 0.37, 0.34, 0.32, 0.2, 0.2, 0.2]; InitialPAWmm=142.5; RelativeTo=LL15; FilledFromTop=false
              Solute NO3: Thickness=[150, 150, 150, 150, 150, 150, 300, 300, 300]; InitialValues=[5, 5, 5, 4, 2, 5, 5, 5, 0.08]; InitialValuesUnits=ppm; WaterTableConcentration=0; D0=0; DepthConstant=0; MaxDepthSoluteAccessible=0; RunoffEffectivenessAtMovingSolute=0; MaxEffectiveRunoff=0
              Solute NH4: Thickness=[150, 150, 150, 150, 150, 150, 300, 300, 300]; InitialValues=[0, 0, 2, 3, 2, 1, 1, 1, 1]; InitialValuesUnits=ppm; WaterTableConcentration=0; D0=0; DepthConstant=0; MaxDepthSoluteAccessible=0; RunoffEffectivenessAtMovingSolute=0; MaxEffectiveRunoff=0
              Solute Urea: same as Validation.Thomas Dissertation.Experiment_1_Berken.Exp1Berken.paddock.soil.Urea
              SoilTemperature Temperature
            Manager AutoIrr: same as Validation.Thomas Dissertation.Experiment_1_Emerald.Exp1Emerald.paddock.AutoIrr
            Manager HarvestAfterDate: same as Validation.Thomas Dissertation.Experiment_2.Exp2.paddock.HarvestAfterDate
        Memo
          ACRI trial in Narrabri with cultivars Opal and Jade. Detailed soil water measurements. Was supposed to be an N fertilizer trial, but not a priority in the model so we just looked at 0N rainfed.
      Simulation BreezaN0N
        Memo
          DAF trial on the Liverpool plains at the Liverpool Plains Research Station with cultivar Jade. Was supposed to be an N fertilizer trial, but not a priority in the model so we just looked at 0N.
        Clock: Start=2018-11-13; End=2019-06-16
        Summary summaryfile
        Weather: FileName=Breeza.xlsx; ExcelWorkSheetName=Breeza
        SoilArbitrator Soil Arbitrator
        Zone paddock: Area=1; Slope=0; AspectAngle=0; Altitude=50
          MicroClimate: a_interception=0; b_interception=1; c_interception=0; d_interception=0; SoilHeatFluxFraction=0; MinimumHeightDiffForNewLayer=0; NightInterceptionFraction=0; ReferenceHeight=2
          Irrigation
          Fertiliser
          SurfaceOrganicMatter: InitialResidueName=sorghum; InitialResidueType=sorghum; InitialResidueMass=5000; InitialStandingFraction=0; InitialCPR=0; InitialCNR=70
          Report DailyReport: same as Validation.Thomas Dissertation.Experiment_1_Berken.Exp1Berken.paddock.DailyReport
          Manager SowingRule
            RowSpacing = 360
            SowingDepth = 40
            SowingRate = 25
            CultivarName = Jade
            SowingDate = 01/09/2019 00:00:00
            script: same as in Validation.Thomas Dissertation.Experiment_1_Berken.Exp1Berken.paddock.SowingRule
          Manager HarvestRule: same as Validation.Thomas Dissertation.Experiment_3.exp3.paddock.HarvestRule
          Report HarvestReport: same as Validation.Thomas Dissertation.Experiment_1_Berken.Exp1Berken.paddock.HarvestReport
          Plant Mungbean
          Operations
            2019-01-23  [Fertiliser].Apply(amount: 0, type: "NH4N", depth: 150)
            2019-01-04  [Irrigation].Apply(amount: 50)
            2019-02-26  [Irrigation].Apply(amount: 50)
            2019-03-01  [Irrigation].Apply(amount: 50)
            2019-03-15  [Irrigation].Apply(amount: 50)
            2019-03-28  [Irrigation].Apply(amount: 50)
          Soil: Latitude=0; Longitude=0
            WaterBalance SoilWater: SummerDate=1-Nov; SummerU=6; SummerCona=3.5; WinterDate=1-Apr; WinterU=6; WinterCona=3.5; DiffusConst=88; DiffusSlope=35.4; Salb=0.13; CN2Bare=72; CNRed=20; CNCov=0.8; DischargeWidth=5; CatchmentArea=10; PSIDul=-100
            Organic: FOMCNRatio=33; CarbonUnits=Total
              Thickness  Carbon  SoilCNRatio  FBiom  FInert  FOM
              150        1.04    14.5         0.02   0.36    0
              150        0.79    14.5         0.015  0.5     0
              150        0.71    14.5         0.01   0.59    0
              150        0.52    14.5         0.01   0.84    0
              150        0.29    14.5         0.01   0.8     0
              150        0.3     14.5         0.01   0.99    0
              300        0.23    14.5         0.01   0.99    0
              300        0.23    14.5         0.01   0.99    0
              300        0.23    14.5         0.01   0.99    0
            Chemical: PHUnits=Water
              Thickness  PH   CEC
              150        8    10.685
              150        7.8  10.1225
              150        7.8  9.9425
              150        7.8  9.515
              150        7.8  8.9975
              150        7.8  9.02
              300        7.8  8.8625
              300        7.8  8.8625
              300        7.8  8.8625
              CEC source: Calculated
            Nutrient
            Physical
              Thickness  ParticleSizeSand  ParticleSizeSilt  ParticleSizeClay  Rocks  BD     AirDry  LL15   DUL   SAT    KS
              150        5                 65                30                0      1.043  0.15    0.16   0.41  0.526  0.01
              150        5                 65                30                0      1.063  0.28    0.28   0.5   0.519  0.01
              150        5                 65                30                0      1.03   0.3     0.3    0.5   0.531  0.01
              150        5                 65                30                0      1.042  0.354   0.354  0.51  0.527  0.01
              150        5                 65                30                0      1.06   0.354   0.354  0.5   0.52   0.01
              150        5                 65                30                0      1.065  0.354   0.354  0.48  0.518  0.01
              300        5                 65                30                0      1.065  0.354   0.354  0.44  0.518  0.01
              300        5                 65                30                0      1.084  0.354   0.354  0.44  0.511  0.01
              300        5                 65                30                0      1.084  0.354   0.354  0.4   0.511  0.01
              Rocks, ParticleSizeSand, ParticleSizeSilt, ParticleSizeClay source: Calculated
              SoilCrop MungbeanSoil: LL=[0.16, 0.28, 0.35, 0.354, 0.37, 0.37, 0.37, 0.37, 0.354]; KL=[0.08, 0.08, 0.08, 0.08, 0.08, 0.08, 0.08, 0.08, 0.08]; XF=[1, 1, 1, 1, 1, 1, 1, 1, 1]
            Water: Thickness=[150, 150, 150, 150, 150, 150, 300, 300, 300]; InitialValues=[0.41, 0.519, 0.531, 0.527, 0.52, 0.48, 0.44, 0.42, 0.4]; InitialPAWmm=237.15; RelativeTo=LL15; FilledFromTop=false
            Solute NO3: Thickness=[150, 150, 150, 150, 150, 150, 300, 300, 300]; InitialValues=[36, 9, 7, 4, 2, 0.08, 0.08, 0.08, 0.08]; InitialValuesUnits=ppm; WaterTableConcentration=0; D0=0; DepthConstant=0; MaxDepthSoluteAccessible=0; RunoffEffectivenessAtMovingSolute=0; MaxEffectiveRunoff=0
            Solute NH4: same as Validation.Mungbean_DAF.ACRI.ACRI.paddock.soil.NH4
            Solute Urea: same as Validation.Thomas Dissertation.Experiment_1_Berken.Exp1Berken.paddock.soil.Urea
            SoilTemperature Temperature
          Manager AutoIrr
            Crop = [Mungbean]
            AutoIrrigationOn = True
            FASWThreshold = 0.9
            FASWDepth = 900
            weeks = 1
            afterSowing = 0
            script: same as in Validation.Thomas Dissertation.Experiment_1_Berken.Exp1Berken.paddock.AutoIrr
      Simulation Emerald2019N0N
        Memo
          DAF trial in Emerald, QLD with cultivar Jade. Was supposed to be an N fertilizer trial, but not a priority in the model so we just looked at 0N.
        Clock: Start=2018-11-13; End=2019-08-16
        Summary summaryfile
        Weather: FileName=Emerald2009_2020.xlsx; ExcelWorkSheetName=Emerald
        SoilArbitrator Soil Arbitrator
        Zone paddock: Area=1; Slope=0; AspectAngle=0; Altitude=50
          MicroClimate: a_interception=0; b_interception=1; c_interception=0; d_interception=0; SoilHeatFluxFraction=0; MinimumHeightDiffForNewLayer=0; NightInterceptionFraction=0; ReferenceHeight=2
          Irrigation
          Fertiliser
          SurfaceOrganicMatter: InitialResidueName=sorghum; InitialResidueType=sorghum; InitialResidueMass=5000; InitialStandingFraction=0; InitialCPR=0; InitialCNR=70
          Report DailyReport: same as Validation.Thomas Dissertation.Experiment_1_Berken.Exp1Berken.paddock.DailyReport
          Manager SowingRule
            RowSpacing = 360
            SowingDepth = 40
            SowingRate = 21
            CultivarName = Jade
            SowingDate = 02/25/2019 00:00:00
            script: same as in Validation.Thomas Dissertation.Experiment_1_Berken.Exp1Berken.paddock.SowingRule
          Manager HarvestRule: same as Validation.Thomas Dissertation.Experiment_3.exp3.paddock.HarvestRule
          Report HarvestReport: same as Validation.Thomas Dissertation.Experiment_1_Berken.Exp1Berken.paddock.HarvestReport
          Plant Mungbean
          Operations
            2018-11-07  [Irrigation].Apply(amount: 75)
            2019-02-25  [Irrigation].Apply(amount: 75)
          Soil: Latitude=0; Longitude=0
            WaterBalance SoilWater: SummerDate=1-Nov; SummerU=6; SummerCona=3.5; WinterDate=1-Apr; WinterU=6; WinterCona=3.5; DiffusConst=88; DiffusSlope=35.4; Salb=0.13; CN2Bare=72; CNRed=20; CNCov=0.8; DischargeWidth=5; CatchmentArea=10; PSIDul=-100
            Organic: FOMCNRatio=33; CarbonUnits=Total
              Thickness  Carbon  SoilCNRatio  FBiom  FInert  FOM
              150        1.24    14.5         0.02   0.36    0
              150        1.24    14.5         0.015  0.5     0
              150        1.25    14.5         0.01   0.59    0
              150        1.1     14.5         0.01   0.84    0
              150        0.71    14.5         0.01   0.8     0
              150        0.34    14.5         0.01   0.99    0
              300        0.34    14.5         0.01   0.99    0
              300        0.34    14.5         0.01   0.99    0
              300        0.34    14.5         0.01   0.99    0
            Chemical: PHUnits=Water
              Thickness  PH   CEC
              150        8    11.135
              150        7.8  11.135
              150        7.8  11.1575
              150        7.8  10.82
              150        7.8  9.9425
              150        7.8  9.11
              300        7.8  9.11
              300        7.8  9.11
              300        7.8  9.11
              CEC source: Calculated
            Nutrient
            Physical
              Thickness  ParticleSizeSand  ParticleSizeSilt  ParticleSizeClay  Rocks  BD     AirDry  LL15   DUL    SAT    KS
              150        5                 65                30                0      1.422  0.05    0.124  0.384  0.463  0.01
              150        5                 65                30                0      1.431  0.148   0.148  0.379  0.46   0.01
              150        5                 65                30                0      1.46   0.153   0.153  0.353  0.449  0.01
              150        5                 65                30                0      1.44   0.153   0.153  0.365  0.449  0.01
              150        5                 65                30                0      1.416  0.153   0.153  0.387  0.449  0.01
              150        5                 65                30                0      1.394  0.153   0.153  0.401  0.449  0.01
              300        5                 65                30                0      1.394  0.153   0.153  0.401  0.449  0.01
              300        5                 65                30                0      1.407  0.153   0.153  0.396  0.449  0.01
              300        5                 65                30                0      1.407  0.153   0.153  0.396  0.449  0.01
              Rocks, ParticleSizeSand, ParticleSizeSilt, ParticleSizeClay source: Calculated
              SoilCrop MungbeanSoil
                LL=[0.124, 0.148, 0.153, 0.153, 0.153, 0.153, 0.153, 0.153, 0.153]
                KL=[0.08, 0.08, 0.08, 0.08, 0.08, 0.08, 0.08, 0.08, 0.08]
                XF=[1, 1, 1, 1, 1, 1, 1, 1, 1]
            Water: Thickness=[150, 150, 150, 150, 150, 150, 300, 300, 300]; InitialPAWmm=427.95; RelativeTo=LL15; FilledFromTop=false
              InitialValues=[0.384, 0.379, 0.353, 0.365, 0.387, 0.401, 0.401, 0.396, 0.396]
            Solute NO3: same as Validation.Mungbean_DAF.BreezaN0N.paddock.soil.NO3
            Solute NH4: same as Validation.Mungbean_DAF.ACRI.ACRI.paddock.soil.NH4
            Solute Urea: same as Validation.Thomas Dissertation.Experiment_1_Berken.Exp1Berken.paddock.soil.Urea
            SoilTemperature Temperature
          Manager AutoIrr: same as Validation.Mungbean_DAF.BreezaN0N.paddock.AutoIrr
      Experiment Emerald2020
        Factors
          Permutation
            Factor N
              CompositeFactor 0N_irr
                Specifications:
                  [Operations]
                  [AutoIrr].Script.AutoIrrigationOn=True
                Operations Irr
                  2019-12-16  [Irrigation].Apply(amount: 100)
                  2020-02-17  [Fertiliser].Apply(amount: 0, type: "UreaN", depth: 150)
              CompositeFactor 0N_rf: Specifications=[Operations]
                Operations Irr
                  2019-12-16  [Irrigation].Apply(amount: 100)
        Simulation Emerald2020
          Clock: Start=2020-01-01; End=2020-06-16
          Summary summaryfile
          Weather: FileName=Emerald2009_2020.xlsx; ExcelWorkSheetName=Emerald
          SoilArbitrator Soil Arbitrator
          Zone paddock: Area=1; Slope=0; AspectAngle=0; Altitude=50
            MicroClimate: a_interception=0; b_interception=1; c_interception=0; d_interception=0; SoilHeatFluxFraction=0; MinimumHeightDiffForNewLayer=0; NightInterceptionFraction=0; ReferenceHeight=2
            Irrigation
            Fertiliser
            SurfaceOrganicMatter: InitialResidueName=wheat; InitialResidueType=wheat; InitialResidueMass=500; InitialStandingFraction=0; InitialCPR=0; InitialCNR=40
            Report DailyReport: same as Validation.Thomas Dissertation.Experiment_1_Berken.Exp1Berken.paddock.DailyReport
            Manager SowingRule
              RowSpacing = 360
              SowingDepth = 40
              SowingRate = 30
              CultivarName = Jade
              SowingDate = 02/17/2020 00:00:00
              script: same as in Validation.Thomas Dissertation.Experiment_1_Berken.Exp1Berken.paddock.SowingRule
            Manager HarvestRule: same as Validation.Thomas Dissertation.Experiment_3.exp3.paddock.HarvestRule
            Report HarvestReport: same as Validation.Thomas Dissertation.Experiment_1_Berken.Exp1Berken.paddock.HarvestReport
            Plant Mungbean
            Operations
            Soil: Latitude=0; Longitude=0
              WaterBalance SoilWater: SummerDate=1-Nov; SummerU=6; SummerCona=3.5; WinterDate=1-Apr; WinterU=6; WinterCona=3.5; DiffusConst=88; DiffusSlope=35.4; Salb=0.13; CN2Bare=72; CNRed=20; CNCov=0.8; DischargeWidth=5; CatchmentArea=10; PSIDul=-100
              Organic: same as Validation.Mungbean_DAF.Emerald2019N0N.paddock.soil.Organic
              Chemical: same as Validation.Mungbean_DAF.Emerald2019N0N.paddock.soil.Chemical
              Nutrient
              Physical
                Thickness  ParticleSizeSand  ParticleSizeSilt  ParticleSizeClay  Rocks     BD     AirDry  LL15   DUL  SAT   KS
                150        5                 65                30                0.187857  1.422  0.05    0.124  0.3  0.35  0.01
                150        5                 65                30                0.181861  1.431  0.148   0.148  0.3  0.35  0.01
                150        5                 65                30                0.161923  1.46   0.153   0.153  0.3  0.35  0.01
                150        5                 65                30                0.175775  1.44   0.153   0.153  0.3  0.35  0.01
                150        5                 65                30                0.191806  1.416  0.153   0.153  0.3  0.35  0.01
                150        5                 65                30                0.205962  1.394  0.153   0.153  0.3  0.35  0.01
                300        5                 65                30                0.197657  1.407  0.153   0.153  0.3  0.35  0.01
                300        5                 65                30                0.205962  1.394  0.153   0.153  0.3  0.35  0.01
                300        5                 65                30                0.197657  1.407  0.153   0.153  0.3  0.35  0.01
                Rocks, ParticleSizeSand, ParticleSizeSilt, ParticleSizeClay source: Calculated
                SoilCrop MungbeanSoil: LL=[0.124, 0.148, 0.153, 0.16, 0.17, 0.18, 0.19, 0.2, 0.2]; KL=[0.08, 0.08, 0.08, 0.08, 0.08, 0.08, 0.08, 0.08, 0.08]; XF=[1, 1, 1, 1, 1, 1, 1, 1, 1]
              Water: Thickness=[150, 150, 150, 150, 150, 150, 300, 300, 300]; InitialValues=[0.3, 0.3, 0.3, 0.3, 0.3, 0.3, 0.3, 0.3, 0.3]; InitialPAWmm=269.7; RelativeTo=LL15; FilledFromTop=false
              Solute NO3: Thickness=[150, 150, 150, 150, 150, 150, 300, 300, 300]; InitialValues=[10, 9, 7, 4, 2, 0.08, 0.08, 0.08, 0.08]; InitialValuesUnits=ppm; WaterTableConcentration=0; D0=0; DepthConstant=0; MaxDepthSoluteAccessible=0; RunoffEffectivenessAtMovingSolute=0; MaxEffectiveRunoff=0
              Solute NH4: same as Validation.Mungbean_DAF.ACRI.ACRI.paddock.soil.NH4
              Solute Urea: same as Validation.Thomas Dissertation.Experiment_1_Berken.Exp1Berken.paddock.soil.Urea
              SoilTemperature Temperature
            Manager AutoIrr
              AutoIrrigationOn = False
              Crop = [Mungbean]
              FASWThreshold = 0.9
              FASWDepth = 900
              weeks = 3
              afterSowing = 20
              script: same as in Validation.Thomas Dissertation.Experiment_1_Berken.Exp1Berken.paddock.AutoIrr
        Memo
          DAF trial in Emerald, QLD with cultivar Jade. Was supposed to be an N fertilizer trial, but not a priority in the model so we just looked at 0N.
      Experiment HopelandSpring
        Memo
          DAF trial in Hopeland, QLD with cultivar Jade planted in Spring. Was supposed to be an N fertilizer trial, but not a priority in the model so we just looked at 0N.
        Factors
          Permutation
            Factor N: Specification=[Operations]
              CompositeFactor 0N_rf
                Specifications:
                  [Operations]
                  [AutoIrr].Script.AutoIrrigationOn=False
                Operations Irr
                  2019-10-14  [Fertiliser].Apply(amount: 3.6, type: "UreaN", depth: 150)
              CompositeFactor 0N_irr
                Specifications:
                  [Operations]
                  [AutoIrr].Script.AutoIrrigationOn=True
                Operations Irr
                  2019-10-14  [Fertiliser].Apply(amount: 0, type: "UreaN", depth: 150)
                  2019-11-20  [Irrigation].Apply(amount: 100)
                  2019-12-11  [Irrigation].Apply(amount: 100)
                  2019-12-12  [Irrigation].Apply(amount: 100)
                  2019-10-14  [Fertiliser].Apply(amount: 3.6, type: "UreaN", depth: 150)
        Simulation HopelandSpring
          Clock: Start=2019-10-14; End=2020-01-28
          Summary summaryfile
          Weather: FileName=Hopeland.xlsx; ExcelWorkSheetName=Hopeland
          SoilArbitrator Soil Arbitrator
          Zone paddock: Area=1; Slope=0; AspectAngle=0; Altitude=50
            MicroClimate: a_interception=0; b_interception=1; c_interception=0; d_interception=0; SoilHeatFluxFraction=0; MinimumHeightDiffForNewLayer=0; NightInterceptionFraction=0; ReferenceHeight=2
            Irrigation
            Fertiliser
            SurfaceOrganicMatter: InitialResidueName=wheat; InitialResidueType=wheat; InitialResidueMass=500; InitialStandingFraction=0; InitialCPR=0; InitialCNR=40
            Report DailyReport: same as Validation.Thomas Dissertation.Experiment_1_Berken.Exp1Berken.paddock.DailyReport
            Manager SowingRule
              RowSpacing = 500
              SowingDepth = 40
              SowingRate = 30
              CultivarName = Jade
              SowingDate = 10/14/2019 00:00:00
              script: same as in Validation.Thomas Dissertation.Experiment_1_Berken.Exp1Berken.paddock.SowingRule
            Manager HarvestRule: same as Validation.Thomas Dissertation.Experiment_3.exp3.paddock.HarvestRule
            Report HarvestReport: same as Validation.Thomas Dissertation.Experiment_1_Berken.Exp1Berken.paddock.HarvestReport
            Plant Mungbean
            Operations
            Soil: Latitude=0; Longitude=0
              WaterBalance SoilWater: SummerDate=1-Nov; SummerU=6; SummerCona=3.5; WinterDate=1-Apr; WinterU=6; WinterCona=3.5; DiffusConst=88; DiffusSlope=35.4; Salb=0.13; CN2Bare=72; CNRed=20; CNCov=0.8; DischargeWidth=5; CatchmentArea=10; PSIDul=-100
              Organic: FOMCNRatio=33; CarbonUnits=Total
                Thickness  Carbon  SoilCNRatio  FBiom  FInert  FOM
                150        1.94    14.5         0.02   0.36    0
                150        1.94    14.5         0.02   0.36    0
                150        1.38    14.5         0.015  0.5     0
                150        1       14.5         0.01   0.59    0
                150        1       14.5         0.01   0.59    0
                150        1       14.5         0.01   0.59    0
                300        0.9     14.5         0.01   0.84    0
                300        0.9     14.5         0.01   0.84    0
                300        0.9     14.5         0.01   0.84    0
              Chemical: PHUnits=Water
                Thickness  PH   CEC
                150        8    12.71
                150        8    12.71
                150        8    11.45
                150        8    10.595
                150        7.8  10.595
                150        7.8  10.595
                300        7.8  10.37
                300        7.8  10.37
                300        7.8  10.37
                CEC source: Calculated
              Nutrient
              Physical
                Thickness  ParticleSizeSand  ParticleSizeSilt  ParticleSizeClay  Rocks     BD    AirDry  LL15  DUL       SAT   KS
                150        5                 65                30                0         1.45  0.05    0.2   0.308729  0.4   0.01
                150        5                 65                30                0         1.45  0.05    0.2   0.309     0.4   0.01
                150        5                 65                30                0         1.45  0.19    0.19  0.32296   0.4   0.01
                150        5                 65                30                0         1.45  0.19    0.19  0.323     0.4   0.01
                150        5                 65                30                0.121416  1.45  0.24    0.24  0.323     0.37  0.01
                150        5                 65                30                0.121416  1.45  0.24    0.24  0.323     0.37  0.01
                300        5                 65                30                0.168907  1.45  0.24    0.24  0.298     0.35  0.01
                300        5                 65                30                0.168907  1.45  0.24    0.24  0.298     0.35  0.01
                300        5                 65                30                0.168907  1.45  0.24    0.24  0.298     0.35  0.01
                Rocks, ParticleSizeSand, ParticleSizeSilt, ParticleSizeClay source: Calculated
                SoilCrop MungbeanSoil: LL=[0.2, 0.2, 0.19, 0.19, 0.24, 0.24, 0.24, 0.24, 0.24]; KL=[0.08, 0.08, 0.08, 0.08, 0.08, 0.08, 0.08, 0.08, 0.08]; XF=[1, 1, 1, 1, 1, 1, 1, 1, 1]
              Water: Thickness=[150, 150, 150, 150, 150, 150, 300, 300, 300]; InitialPAWmm=149.653; RelativeTo=LL15; FilledFromTop=true
                InitialValues=[0.308729, 0.309, 0.32296, 0.323, 0.323, 0.323, 0.298, 0.298, 0.298]
              Solute NO3: Thickness=[150, 150, 150, 150, 150, 150, 300, 300, 300]; InitialValues=[36, 36, 36, 36, 9, 9, 7, 7, 4]; InitialValuesUnits=ppm; WaterTableConcentration=0; D0=0; DepthConstant=0; MaxDepthSoluteAccessible=0; RunoffEffectivenessAtMovingSolute=0; MaxEffectiveRunoff=0
              Solute NH4: Thickness=[150, 150, 150, 150, 150, 150, 300, 300, 300]; InitialValues=[0, 0, 0, 0, 0, 0, 2, 2, 3]; InitialValuesUnits=ppm; WaterTableConcentration=0; D0=0; DepthConstant=0; MaxDepthSoluteAccessible=0; RunoffEffectivenessAtMovingSolute=0; MaxEffectiveRunoff=0
              Solute Urea: same as Validation.Thomas Dissertation.Experiment_1_Berken.Exp1Berken.paddock.soil.Urea
              SoilTemperature Temperature
            Manager AutoIrr
              AutoIrrigationOn = False
              Crop = [Mungbean]
              FASWThreshold = 0.9
              FASWDepth = 900
              weeks = 0
              afterSowing = 0
              script: same as in Validation.Thomas Dissertation.Experiment_1_Berken.Exp1Berken.paddock.AutoIrr
      Experiment HopelandSummer
        Factors
          Permutation
            Factor N: Specification=[Operations]
              Operations 0N_rf
                2020-01-29  [Fertiliser].Apply(amount: 3.6, type: "NO3N", depth: 150)
              Operations 0N_irr
                2020-03-20  [Irrigation].Apply(amount: 200)
                2020-01-29  [Fertiliser].Apply(amount: 3.6, type: "NO3N", depth: 150)
        Simulation HopelandSummer
          Clock: Start=2020-01-08; End=2020-08-18
          Summary summaryfile
          Weather: FileName=Hopeland.xlsx; ExcelWorkSheetName=Hopeland
          SoilArbitrator Soil Arbitrator
          Zone paddock: Area=1; Slope=0; AspectAngle=0; Altitude=50
            MicroClimate: a_interception=0; b_interception=1; c_interception=0; d_interception=0; SoilHeatFluxFraction=0; MinimumHeightDiffForNewLayer=0; NightInterceptionFraction=0; ReferenceHeight=2
            Irrigation
            Fertiliser
            SurfaceOrganicMatter: InitialResidueName=wheat; InitialResidueType=wheat; InitialResidueMass=500; InitialStandingFraction=0; InitialCPR=0; InitialCNR=40
            Report DailyReport: same as Validation.Thomas Dissertation.Experiment_1_Berken.Exp1Berken.paddock.DailyReport
            Manager SowingRule
              RowSpacing = 500
              SowingDepth = 40
              SowingRate = 30
              CultivarName = Jade
              SowingDate = 01/29/2020 00:00:00
              script: same as in Validation.Thomas Dissertation.Experiment_1_Berken.Exp1Berken.paddock.SowingRule
            Report HarvestReport: same as Validation.Thomas Dissertation.Experiment_1_Berken.Exp1Berken.paddock.HarvestReport
            Plant Mungbean
            Operations
            Soil: Latitude=0; Longitude=0
              WaterBalance SoilWater: SummerDate=1-Nov; SummerU=6; SummerCona=3.5; WinterDate=1-Apr; WinterU=6; WinterCona=3.5; DiffusConst=88; DiffusSlope=35.4; Salb=0.13; CN2Bare=72; CNRed=20; CNCov=0.8; DischargeWidth=5; CatchmentArea=10; PSIDul=-100
              Organic: same as Validation.Mungbean_DAF.HopelandSpring.HopelandSpring.paddock.soil.Organic
              Chemical: same as Validation.Mungbean_DAF.HopelandSpring.HopelandSpring.paddock.soil.Chemical
              Nutrient
              Physical
                Thickness  ParticleSizeSand  ParticleSizeSilt  ParticleSizeClay  Rocks     BD    AirDry  LL15  DUL       SAT   KS
                150        5                 65                30                0         1.45  0.05    0.2   0.308729  0.4   0.01
                150        5                 65                30                0         1.45  0.05    0.2   0.309     0.4   0.01
                150        5                 65                30                0         1.45  0.19    0.19  0.32296   0.4   0.01
                150        5                 65                30                0         1.45  0.19    0.19  0.323     0.4   0.01
                150        5                 65                30                0.121416  1.45  0.24    0.24  0.323     0.37  0.01
                150        5                 65                30                0.121416  1.45  0.24    0.24  0.323     0.37  0.01
                300        5                 65                30                0.168907  1.45  0.27    0.27  0.298     0.35  0.01
                300        5                 65                30                0.168907  1.45  0.27    0.27  0.298     0.35  0.01
                300        5                 65                30                0.168907  1.45  0.27    0.27  0.298     0.35  0.01
                Rocks, ParticleSizeSand, ParticleSizeSilt, ParticleSizeClay source: Calculated
                SoilCrop MungbeanSoil: LL=[0.2, 0.2, 0.19, 0.19, 0.24, 0.24, 0.27, 0.27, 0.27]; KL=[0.08, 0.08, 0.08, 0.08, 0.08, 0.08, 0.08, 0.08, 0.08]; XF=[1, 1, 1, 1, 1, 1, 1, 1, 1]
              Water: Thickness=[150, 150, 150, 150, 150, 150, 300, 300, 300]; InitialPAWmm=122.653; RelativeTo=LL15; FilledFromTop=true
                InitialValues=[0.308729, 0.309, 0.32296, 0.323, 0.323, 0.323, 0.298, 0.298, 0.298]
              Solute NO3: same as Validation.Mungbean_DAF.HopelandSpring.HopelandSpring.paddock.soil.NO3
              Solute NH4: same as Validation.Mungbean_DAF.HopelandSpring.HopelandSpring.paddock.soil.NH4
              Solute Urea: same as Validation.Thomas Dissertation.Experiment_1_Berken.Exp1Berken.paddock.soil.Urea
              SoilTemperature Temperature
            Manager AutoIrr: same as Validation.Thomas Dissertation.Experiment_1_Emerald.Exp1Emerald.paddock.AutoIrr
            Manager HarvestAfterDate
              HarvestDate = 18-Apr
              script: same as in Validation.Thomas Dissertation.Experiment_1_Berken.Exp1Berken.paddock.HarvestAfterDate
        Memo
          DAF trial in Hopeland, QLD with cultivar Jade planted in Summer. Was supposed to be an N fertilizer trial, but not a priority in the model so we just looked at 0N.
      Simulation IrvingdaleN0N
        Clock: Start=2018-12-12; End=2019-04-08
        Summary summaryfile
        Weather: FileName=Irvingdale.xlsx; ExcelWorkSheetName=Irvingdale
        SoilArbitrator Soil Arbitrator
        Zone paddock: Area=1; Slope=0; AspectAngle=0; Altitude=50
          MicroClimate: a_interception=0; b_interception=1; c_interception=0; d_interception=0; SoilHeatFluxFraction=0; MinimumHeightDiffForNewLayer=0; NightInterceptionFraction=0; ReferenceHeight=2
          Irrigation
          Fertiliser
          SurfaceOrganicMatter: InitialResidueName=wheat; InitialResidueType=wheat; InitialResidueMass=500; InitialStandingFraction=0; InitialCPR=0; InitialCNR=40
          Report DailyReport: same as Validation.Thomas Dissertation.Experiment_1_Berken.Exp1Berken.paddock.DailyReport
          Manager SowingRule
            RowSpacing = 500
            SowingDepth = 40
            SowingRate = 30
            CultivarName = Jade
            SowingDate = 12/28/2018 00:00:00
            script: same as in Validation.Thomas Dissertation.Experiment_1_Berken.Exp1Berken.paddock.SowingRule
          Manager HarvestRule: same as Validation.Thomas Dissertation.Experiment_3.exp3.paddock.HarvestRule
          Report HarvestReport: same as Validation.Thomas Dissertation.Experiment_1_Berken.Exp1Berken.paddock.HarvestReport
          Plant Mungbean
          Operations
            2018-12-12  [Fertiliser].Apply(amount: 0, type: "NH4N", depth: 150)
            2019-01-09  [Irrigation].Apply(amount: 80)
            2019-02-08  [Irrigation].Apply(amount: 80)
            2018-12-28  [Fertiliser].Apply(amount: 3.6, type: "NO3N", depth: 150)
          Soil: Latitude=0; Longitude=0
            WaterBalance SoilWater: SummerDate=1-Nov; SummerU=6; SummerCona=3.5; WinterDate=1-Apr; WinterU=6; WinterCona=3.5; DiffusConst=88; DiffusSlope=35.4; Salb=0.13; CN2Bare=72; CNRed=20; CNCov=0.8; DischargeWidth=5; CatchmentArea=10; PSIDul=-100
            Organic: FOMCNRatio=33; CarbonUnits=Total
              Thickness  Carbon  SoilCNRatio  FBiom  FInert  FOM
              150        1.94    14.5         0.02   0.36    0
              150        1.38    14.5         0.015  0.5     0
              150        1       14.5         0.01   0.59    0
              150        1       14.5         0.01   0.59    0
              150        0.9     14.5         0.01   0.84    0
              150        0.9     14.5         0.01   0.84    0
              300        0.75    14.5         0.01   0.8     0
              300        0.75    14.5         0.01   0.8     0
              300        0.75    14.5         0.01   0.8     0
            Chemical: PHUnits=Water
              Thickness  PH   CEC
              150        5.6  12.71
              150        6.5  11.45
              150        7    10.595
              150        7    10.595
              150        7    10.37
              150        7    10.37
              300        7    10.0325
              300        7    10.0325
              300        7    10.0325
              CEC source: Calculated
            Nutrient
            Physical
              Thickness  ParticleSizeSand  ParticleSizeSilt  ParticleSizeClay  Rocks  BD    AirDry  LL15  DUL    SAT   KS
              150        5                 65                30                0      1.36  0.05    0.25  0.392  0.45  0.01
              150        5                 65                30                0      1.36  0.25    0.25  0.392  0.45  0.01
              150        5                 65                30                0      1.36  0.25    0.25  0.392  0.45  0.01
              150        5                 65                30                0      1.36  0.25    0.25  0.392  0.45  0.01
              150        5                 65                30                0      1.36  0.27    0.27  0.372  0.45  0.01
              150        5                 65                30                0      1.36  0.27    0.27  0.372  0.45  0.01
              300        5                 65                30                0      1.36  0.3     0.3   0.372  0.43  0.01
              300        5                 65                30                0      1.36  0.3     0.3   0.372  0.43  0.01
              300        5                 65                30                0      1.36  0.3     0.3   0.372  0.43  0.01
              Rocks, ParticleSizeSand, ParticleSizeSilt, ParticleSizeClay source: Calculated
              SoilCrop MungbeanSoil: LL=[0.25, 0.25, 0.25, 0.25, 0.27, 0.27, 0.3, 0.3, 0.3]; KL=[0.08, 0.08, 0.08, 0.08, 0.08, 0.08, 0.08, 0.08, 0.08]; XF=[1, 1, 1, 1, 1, 1, 1, 1, 1]
            Water: Thickness=[150, 150, 150, 150, 150, 150, 300, 300, 300]; InitialValues=[0.35, 0.35, 0.35, 0.35, 0.35, 0.35, 0.328, 0.328, 0.328]; InitialPAWmm=109.2; RelativeTo=LL15; FilledFromTop=false
            Solute NO3: Thickness=[150, 150, 150, 150, 150, 150, 300, 300, 300]; InitialValues=[18, 13, 6, 1, 1, 1, 3, 3, 3]; InitialValuesUnits=ppm; WaterTableConcentration=0; D0=0; DepthConstant=0; MaxDepthSoluteAccessible=0; RunoffEffectivenessAtMovingSolute=0; MaxEffectiveRunoff=0
            Solute NH4: Thickness=[150, 150, 150, 150, 150, 150, 300, 300, 300]; InitialValues=[10, 7, 5, 5, 5, 5, 6, 6, 6]; InitialValuesUnits=ppm; WaterTableConcentration=0; D0=0; DepthConstant=0; MaxDepthSoluteAccessible=0; RunoffEffectivenessAtMovingSolute=0; MaxEffectiveRunoff=0
            Solute Urea: same as Validation.Thomas Dissertation.Experiment_1_Berken.Exp1Berken.paddock.soil.Urea
            SoilTemperature Temperature
          Manager AutoIrr
            Crop = [Mungbean]
            AutoIrrigationOn = True
            FASWThreshold = 0.9
            FASWDepth = 600
            weeks = 2
            afterSowing = 20
            script: same as in Validation.Thomas Dissertation.Experiment_1_Berken.Exp1Berken.paddock.AutoIrr
        Memo
          DAF trial in Irvingdale, QLD with cultivar Jade planted. Was supposed to be an N fertilizer trial, but not a priority in the model so we just looked at 0N.
    Folder Yield_Gap
      Memo Mungbean Yield Gap Study
        CSIRO large-scale, primarily single year field studies that were looking to see what the leading yield limiters were. The data was organized by Brook Anderson (CSIRO) and is being written up by Marisa Collins (LaTrobe) and Lindsay Bell (CSIRO). The cultivar used was Jade with the exception of one site year where they used Crystal. Total biomass and days to maturity data were removed from the model-building dataset as well as a few treatments from the Pampas site after discussion with Lindsay Bell about the unreliability of this data. In some of the studies, the harvesting date in the field is much later than the simulated dates. These discrepancies are for the same reason the biomass and days to maturity data was removed: the crop was left in the ground for later than its maturity or earliest harvesting date, so the harvest date recorded by the field technicians are for that later date.
      Experiment Billa_Billa
        Factors
          Permutation
            Factor Sow
              CompositeFactor 2015
                Specifications:
                  [SowingRule].Script.SowingRate=30
                  [SowingRule].Script.SowingDepth=50
                  [SowingRule].Script.SowingDate=2015-01-13
                  [HarvestAfterDate].Script.HarvestDate = 12-apr
              CompositeFactor 2016
                Specifications:
                  [SowingRule].Script.SowingRate=25
                  [SowingRule].Script.CultivarName=Crystal
                  [SowingRule].Script.SowingDate=2016-01-15
                  [HarvestAfterDate].Script.HarvestDate = 12-apr-2016
              CompositeFactor 2016_17
                Specifications:
                  [SowingRule].Script.SowingRate=43
                  [SowingRule].Script.SowingDate=2016-12-23
                  [HarvestAfterDate].Script.HarvestDate = 24-mar-2017
        Simulation Billa_Billa
          Clock: Start=2015-01-13; End=2017-07-12
          Summary summaryfile
          Weather: FileName=Yield Gap Study/2.ClimateFiles/Glenaradale 41395.met
          SoilArbitrator Soil Arbitrator
          Zone paddock: Area=1; Slope=0; AspectAngle=0; Altitude=50
            MicroClimate: a_interception=0; b_interception=1; c_interception=0; d_interception=0; SoilHeatFluxFraction=0; MinimumHeightDiffForNewLayer=0; NightInterceptionFraction=0; ReferenceHeight=2
            Irrigation
            Fertiliser
            SurfaceOrganicMatter: InitialResidueName=fababeab; InitialResidueType=fababean; InitialResidueMass=2000; InitialStandingFraction=0; InitialCPR=0; InitialCNR=30
            Report DailyReport: same as Validation.Thomas Dissertation.Experiment_1_Berken.Exp1Berken.paddock.DailyReport
            Manager SowingRule
              RowSpacing = 250
              SowingDepth = 30
              SowingRate = 30
              CultivarName = Jade
              SowingDate = 01/13/2015 00:00:00
              script: same as in Validation.Thomas Dissertation.Experiment_1_Berken.Exp1Berken.paddock.SowingRule
            Report HarvestReport: same as Validation.Thomas Dissertation.Experiment_1_Berken.Exp1Berken.paddock.HarvestReport
            Plant Mungbean
            Manager Irrigatefixeddates: same as Validation.Thomas Dissertation.Experiment_1_Berken.Exp1Berken.paddock.Irrigatefixeddates
            Operations
            Soil Grey Vertosol (Billa Billa No220): ASCOrder=Vertosol; ASCSubOrder=Grey; SoilType=Clay; Site=Billa Billa; NearestTown=Goondiwindi; Region=Darling Downs and Granite Belt; State=Queensland; Country=Australia; NaturalVegetation=Brigalow scrub; ApsoilNumber=220; Latitude=-28.101; Longitude=150.328; LocationAccuracy=+/- 20m; YearOfSampling=0
              DataSource=Undertaken by Jeremy Whish, CSIRO Sustainable Ecosystems, Toowoomba in collaboration with MCA, Goondiwindi as part of GRDC Best Management Practice-Pulses project
              Comments=Calculated from a pond and tent during GRDC Best Management Practice-Pulses project. CLL for chickpea needs to be confirmed at depth, OC from soil (Billa Billa No. 036)
              Physical
                Thickness  ParticleSizeSand  ParticleSizeSilt  ParticleSizeClay  Rocks  BD     AirDry  LL15  DUL    SAT    KS
                150        5                 65                30                0      1.48   0.095   0.19  0.36   0.412  0.01
                150        5                 65                30                0      1.5    0.152   0.19  0.35   0.404  0.01
                150        5                 65                30                0      1.459  0.2     0.2   0.37   0.42   0.01
                150        5                 65                30                0      1.514  0.2     0.2   0.349  0.399  0.01
                150        5                 65                30                0      1.6    0.2     0.2   0.31   0.366  0.01
                150        5                 65                30                0      1.6    0.2     0.2   0.31   0.366  0.01
                300        5                 65                30                0      1.72   0.2     0.2   0.27   0.321  0.01
                300        5                 65                30                0      1.72   0.2     0.2   0.27   0.321  0.01
                300        5                 65                30                0      1.74   0.2     0.2   0.26   0.313  0.01
                BD source: Calculated from gravimetric moisture when profile wet but drained
                AirDry, LL15 source: Estimated based on local knowledge
                DUL source: Field measured and checked for sensibility
                SAT source: Calculated from measured, estimated or calculated BD
                Rocks, ParticleSizeSand, ParticleSizeSilt, ParticleSizeClay source: Calculated
                SoilCrop MungbeanSoil: LL=[0.19, 0.19, 0.2, 0.281, 0.288, 0.288, 0.27, 0.27, 0.26]; KL=[0.06, 0.06, 0.06, 0.04, 0.04, 0.04, 0.02, 0.02, 0.02]; XF=[1, 1, 1, 1, 1, 1, 1, 1, 1]
              WaterBalance SoilWater: SummerDate=1-Nov; SummerU=6; SummerCona=3.5; WinterDate=1-Apr; WinterU=4; WinterCona=2.5; DiffusConst=40; DiffusSlope=16; Salb=0.13; CN2Bare=73; CNRed=20; CNCov=0.8; PSIDul=-100
              Organic: FOMCNRatio=40; CarbonUnits=Total
                Thickness  Carbon  SoilCNRatio  FBiom  FInert  FOM
                150        1.24    12           0.04   0.4     347.129
                150        1.24    12           0.02   0.5     270.344
                150        1.25    12           0.02   0.5     163.972
                150        1.1     12           0.02   0.6     99.4541
                150        0.71    12           0.01   0.6     60.322
                150        0.71    12           0.01   0.6     60.322
                300        0.34    12           0.01   0.7     36.587
                300        0.34    12           0.01   0.7     36.587
                300        0.26    12           0.01   0.8     22.191
              Chemical: PHUnits=Water
                Thickness  PH   EC   CEC
                150        7.7  0.2  11.135
                150        8.2  0.2  11.135
                150        8.4  0.6  11.1575
                150        8.2  1.5  10.82
                150        7.8  1    9.9425
                150        7.8  1    9.9425
                300        6.9  0.8  9.11
                300        6.9  0.8  9.11
                300        6.9  0.8  8.93
                EC, CL, PH source: Measured
                CEC source: Calculated
              Water: Thickness=[150, 150, 150, 150, 150, 150, 300, 300, 300]; InitialValues=[0.36, 0.35, 0.37, 0.29643, 0.2, 0.2, 0.2, 0.2, 0.2]; InitialPAWmm=89.4645; RelativeTo=LL15; FilledFromTop=true
              Nutrient
              Solute NO3: Thickness=[150, 150, 150, 150, 150, 150, 300, 300, 300]; InitialValues=[22.4625, 13.3333, 9.13868, 8.80669, 1, 1, 1, 1, 1]; InitialValuesUnits=ppm; WaterTableConcentration=0; D0=0; DepthConstant=0; MaxDepthSoluteAccessible=0; RunoffEffectivenessAtMovingSolute=0; MaxEffectiveRunoff=0
              Solute NH4: Thickness=[150, 150, 150, 150, 150, 150, 300, 300, 300]; InitialValues=[0, 0, 0, 0, 0.2, 0.2, 0.2, 0.2, 0.2]; InitialValuesUnits=ppm; WaterTableConcentration=0; D0=0; DepthConstant=0; MaxDepthSoluteAccessible=0; RunoffEffectivenessAtMovingSolute=0; MaxEffectiveRunoff=0
              Solute Urea: same as Validation.Thomas Dissertation.Experiment_1_Berken.Exp1Berken.paddock.soil.Urea
              SoilTemperature Temperature
            Manager AutoIrr
              Crop = [Mungbean]
              AutoIrrigationOn = True
              FASWThreshold = 0.9
              FASWDepth = 600
              weeks = 2
              afterSowing = 0
              script: same as in Validation.Thomas Dissertation.Experiment_1_Berken.Exp1Berken.paddock.AutoIrr
            Manager HarvestAfterDate: same as Validation.TOS.TOSyear3.TOSyear3.paddock.HarvestAfterDate
      Experiment Emerald
        Factors
          Permutation
            Factor Sow
              CompositeFactor 2015_16S1
                Specifications:
                  [SowingRule].Script.SowingDate=2015-12-18
                  [Operations]
                Operations reset
                  2015-12-18  [InitialWaterReset].Script.ResetWater(0,17)
              CompositeFactor 2015_16S2
                Specifications:
                  [SowingRule].Script.SowingDate=2016-01-13
                  [Operations]
                Operations reset
                  2016-01-13  [InitialWaterReset].Script.ResetWater(0,36)
              CompositeFactor 2015_16S3
                Specifications:
                  [SowingRule].Script.SowingDate=2016-02-18
                  [Operations]
                Operations reset
                  2016-02-18  [InitialWaterReset].Script.ResetWater(0,36)
              CompositeFactor 2016_17S1
                Specifications:
                  [SowingRule].Script.SowingDate=2016-12-08
                  [Operations]
                Operations reset
                  2016-12-08  [InitialWaterReset].Script.ResetWater(0,33)
              CompositeFactor 2016_17S2
                Specifications:
                  [SowingRule].Script.SowingDate=2017-01-18
                  [Operations]
                  [HarvestAfterDate].Script.HarvestDate=22-apr
                Operations reset
                  2016-02-18  [InitialWaterReset].Script.ResetWater(0,62)
              CompositeFactor 2016_17S3
                Specifications:
                  [SowingRule].Script.SowingDate=2017-03-02
                  [Operations]
                  [HarvestAfterDate].Script.HarvestDate=1-jul
                Operations reset
                  2016-02-18  [InitialWaterReset].Script.ResetWater(0,28)
        Simulation EmeraldYieldGap
          Clock: Start=2016-12-18; End=2017-08-10
          Summary summaryfile
          Weather: FileName=Yield Gap Study/2.ClimateFiles/Glenaradale 41395.met
          SoilArbitrator Soil Arbitrator
          Zone paddock: Area=1; Slope=0; AspectAngle=0; Altitude=50
            MicroClimate: a_interception=0; b_interception=1; c_interception=0; d_interception=0; SoilHeatFluxFraction=0; MinimumHeightDiffForNewLayer=0; NightInterceptionFraction=0; ReferenceHeight=2
            Irrigation
            Fertiliser
            SurfaceOrganicMatter: InitialResidueName=fababean; InitialResidueType=fababean; InitialResidueMass=2000; InitialStandingFraction=0; InitialCPR=0; InitialCNR=30
            Report DailyReport: same as Validation.Thomas Dissertation.Experiment_1_Berken.Exp1Berken.paddock.DailyReport
            Manager SowingRule: same as Validation.Yield_Gap.Billa_Billa.Billa_Billa.paddock.SowingRule
            Report HarvestReport: same as Validation.Thomas Dissertation.Experiment_1_Berken.Exp1Berken.paddock.HarvestReport
            Plant Mungbean
            Manager Irrigatefixeddates: same as Validation.Thomas Dissertation.Experiment_1_Berken.Exp1Berken.paddock.Irrigatefixeddates
            Operations
            Manager InitialWaterReset
```csharp
using APSIM.Numerics;
using APSIM.Shared.Utilities;
using Models.Soils;
using Models.Interfaces;
using Models.Core;
using System;

namespace Models
{
    [Serializable]
    public class Script : Model
    {
        [Link] private ISummary summary;
        [Link] private IPhysical physical;
        [Link] private ISoilWater soilWater;

        public void ResetWater(int layer, double percentFull)
        {
            if (percentFull < 0 || percentFull > 100)
                throw new ArgumentException("percentFull must be in range [0, 100]");
            if (layer >= physical.Thickness.Length || layer < 0)
                throw new ArgumentException("layer must be in range [0, " + physical.Thickness.Length + "]");
            soilWater.SW[layer] = MathUtilities.Divide(percentFull, 100, 0) * physical.PAWC[layer] + physical.LL15[layer];
            soilWater.SWmm[layer] = MathUtilities.Divide(percentFull, 100, 0) * physical.PAWCmm[layer] + physical.LL15mm[layer];
        }
    }
}
```
            Soil Black Vertosol (Emerald No911): ASCOrder=Vertosol; ASCSubOrder=Black; SoilType=Clay; Site=Emerald; NearestTown=Emerald; Region=Central Highlands; State=Queensland; Country=Australia; ApsoilNumber=911; Latitude=-23.5211; Longitude=148.123; YearOfSampling=0; DataSource=Collected by Brett Cocks (CES) for NVT.
              Physical
                Thickness  ParticleSizeSand  ParticleSizeSilt  ParticleSizeClay  Rocks  BD     AirDry  LL15   DUL    SAT    KS
                150        5                 65                30                0      1.422  0.062   0.124  0.384  0.434  0.01
                150        5                 65                30                0      1.431  0.118   0.148  0.379  0.429  0.01
                150        5                 65                30                0      1.46   0.153   0.153  0.353  0.403  0.01
                150        5                 65                30                0      1.44   0.153   0.153  0.365  0.415  0.01
                150        5                 65                30                0      1.416  0.153   0.153  0.387  0.437  0.01
                150        5                 65                30                0      1.416  0.153   0.153  0.387  0.437  0.01
                300        5                 65                30                0      1.394  0.153   0.153  0.401  0.451  0.01
                300        5                 65                30                0      1.394  0.153   0.153  0.401  0.451  0.01
                300        5                 65                30                0      1.407  0.153   0.153  0.396  0.446  0.01
                BD, DUL source: Field measured and checked for sensibility
                Rocks, ParticleSizeSand, ParticleSizeSilt, ParticleSizeClay source: Calculated
                SoilCrop MungbeanSoil
                  LL=[0.124, 0.148, 0.153, 0.265, 0.336, 0.336, 0.401, 0.401, 0.396]
                  KL=[0.06, 0.06, 0.06, 0.04, 0.04, 0.04, 0.02, 0.02, 0.02]
                  XF=[1, 1, 1, 1, 1, 1, 1, 1, 1]
              WaterBalance SoilWater: SummerDate=1-Nov; SummerU=6; SummerCona=3.5; WinterDate=1-Apr; WinterU=2; WinterCona=2; DiffusConst=40; DiffusSlope=16; Salb=0.12; CN2Bare=73; CNRed=20; CNCov=0.8; PSIDul=-100
              Organic: FOMCNRatio=40; CarbonUnits=Total
                Thickness  Carbon  SoilCNRatio  FBiom  FInert  FOM
                150        1.24    12           0.04   0.4     347.129
                150        1.24    12           0.02   0.5     270.344
                150        1.25    12           0.02   0.7     163.972
                150        1.1     12           0.02   1       99.4541
                150        0.71    12           0.01   1       60.322
                150        0.71    12           0.01   1       60.322
                300        0.34    12           0.01   1       36.587
                300        0.34    12           0.01   1       36.587
                300        0.34    12           0.01   1       22.191
              Chemical: PHUnits=Water
                Thickness  PH   EC   CEC
                150        7.7  0.2  11.135
                150        8.3  0.3  11.135
                150        8.5  0.5  11.1575
                150        8.6  0.8  10.82
                150        8.2  1    9.9425
                150        8.2  1    9.9425
                300        7.6  1.3  9.11
                300        7.6  1.3  9.11
                300        7.7  1.3  9.11
                CEC source: Calculated
              Water: Thickness=[150, 150, 150, 150, 150, 150, 300, 300, 300]; InitialPAWmm=153.846; RelativeTo=LL15; FilledFromTop=true
                InitialValues=[0.384, 0.379, 0.353, 0.365, 0.27564, 0.153, 0.153, 0.153, 0.153]
              Nutrient
              Solute NO3: Thickness=[150, 150, 150, 150, 150, 150, 300, 300, 300]; InitialValues=[23.4117, 13.9762, 9.13242, 9.25926, 1, 1, 1, 1, 1]; InitialValuesUnits=ppm; WaterTableConcentration=0; D0=0; DepthConstant=0; MaxDepthSoluteAccessible=0; RunoffEffectivenessAtMovingSolute=0; MaxEffectiveRunoff=0
              Solute NH4: same as Validation.Yield_Gap.Billa_Billa.Billa_Billa.paddock.Grey Vertosol (Billa Billa No220).NH4
              Solute Urea: same as Validation.Thomas Dissertation.Experiment_1_Berken.Exp1Berken.paddock.soil.Urea
              SoilTemperature Temperature
            Manager AutoIrr
              Crop = [Mungbean]
              AutoIrrigationOn = True
              FASWThreshold = 0.9
              FASWDepth = 600
              weeks = 0
              afterSowing = 0
              script: same as in Validation.Thomas Dissertation.Experiment_1_Berken.Exp1Berken.paddock.AutoIrr
            Manager HarvestAfterDate: same as Validation.TOS.TOSyear3.TOSyear3.paddock.HarvestAfterDate
      Experiment HRS
        Factors
          Permutation
            Factor Sow
              CompositeFactor 2015_16S1
                Specifications:
                  [SowingRule].Script.SowingDate=2016-02-10
                  [Operations]
                  [HarvestAfterDate].Script.HarvestDate= 28-may
                Operations reset
                  2016-02-10  [InitialWaterReset].Script.ResetWater(0,49)
              CompositeFactor 2015_16S2
                Specifications:
                  [SowingRule].Script.SowingDate=2016-01-14
                  [Operations]
                  [HarvestAfterDate].Script.HarvestDate= 20-apr
                Operations reset
                  2016-01-14  [InitialWaterReset].Script.ResetWater(0,14)
              CompositeFactor 2015_16S3
                Specifications:
                  [SowingRule].Script.SowingDate=2015-12-08
                  [Operations]
                  [HarvestAfterDate].Script.HarvestDate= 13-mar
                Operations reset
                  2015-12-08  [InitialWaterReset].Script.ResetWater(0,11)
        Simulation HRSBase
          Clock: Start=2015-12-08; End=2016-06-06
          Summary summaryfile
          Weather: FileName=Hermitage.xlsx; ExcelWorkSheetName=Hermitage
          SoilArbitrator Soil Arbitrator
          Zone paddock: Area=1; Slope=0; AspectAngle=0; Altitude=50
            MicroClimate: a_interception=0; b_interception=1; c_interception=0; d_interception=0; SoilHeatFluxFraction=0; MinimumHeightDiffForNewLayer=0; NightInterceptionFraction=0; ReferenceHeight=2
            Irrigation
            Fertiliser
            SurfaceOrganicMatter: InitialResidueName=wheat; InitialResidueType=wheat; InitialResidueMass=0; InitialStandingFraction=0; InitialCPR=0; InitialCNR=80
            Report DailyReport: same as Validation.Thomas Dissertation.Experiment_1_Berken.Exp1Berken.paddock.DailyReport
            Manager SowingRule: same as Validation.Yield_Gap.Billa_Billa.Billa_Billa.paddock.SowingRule
            Plant Mungbean
            Manager Irrigatefixeddates: same as Validation.Thomas Dissertation.Experiment_1_Berken.Exp1Berken.paddock.Irrigatefixeddates
            Operations
            Manager InitialWaterReset: same as Validation.Yield_Gap.Emerald.EmeraldYieldGap.paddock.InitialWaterReset
            Soil Brown Vertosol-Talgai-shallow phase (Hermitage No033): ASCOrder=Vertosol; ASCSubOrder=Brown; SoilType=Clay; Site=Hermitage; NearestTown=Warwick, Q 4370; Region=Darling Downs and Granite Belt; State=Queensland; Country=Australia; NaturalVegetation=Poplar Box , Ironbark, Qld Blue Gum; ApsoilNumber=33; Latitude=-28.2; Longitude=152.101; LocationAccuracy=+/- 20m; YearOfSampling=0; Comments=oc and ph estimated
              DataSource=Data provided by I.  Broad, Queensland Department of Primary Industries
              Physical
                Thickness  ParticleSizeSand  ParticleSizeSilt  ParticleSizeClay  Rocks  BD    AirDry  LL15  DUL   SAT   KS
                150        5                 65                30                0      1.38  0.115   0.23  0.4   0.45  0.01
                150        5                 65                30                0      1.38  0.184   0.23  0.4   0.45  0.01
                150        5                 65                30                0      1.3   0.23    0.23  0.43  0.48  0.01
                150        5                 65                30                0      1.37  0.23    0.23  0.4   0.45  0.01
                150        5                 65                30                0      1.49  0.23    0.23  0.36  0.41  0.01
                150        5                 65                30                0      1.49  0.23    0.23  0.36  0.41  0.01
                300        5                 65                30                0      1.64  0.23    0.23  0.34  0.35  0.01
                300        5                 65                30                0      1.64  0.23    0.23  0.34  0.35  0.01
                300        5                 65                30                0      1.6   0.23    0.23  0.34  0.37  0.01
                BD, DUL source: Field measured and checked for sensibility
                AirDry, LL15 source: Estimated based on local knowledge
                SAT source: Calculated from measured, estimated or calculated BD
                Rocks, ParticleSizeSand, ParticleSizeSilt, ParticleSizeClay source: Calculated
                SoilCrop MungbeanSoil: LL=[0.19, 0.19, 0.23, 0.281, 0.288, 0.288, 0.3, 0.3, 0.26]; KL=[0.06, 0.06, 0.06, 0.04, 0.04, 0.04, 0.02, 0.02, 0.02]; XF=[1, 1, 1, 1, 1, 1, 1, 1, 1]
              WaterBalance SoilWater: SummerDate=1-Nov; SummerU=6; SummerCona=3.5; WinterDate=1-Apr; WinterU=4; WinterCona=2.5; DiffusConst=40; DiffusSlope=16; Salb=0.12; CN2Bare=73; CNRed=20; CNCov=0.8; PSIDul=-100
              Organic: FOMCNRatio=40; CarbonUnits=Total
                Thickness  Carbon  SoilCNRatio  FBiom  FInert  FOM
                150        1.24    12           0.04   0.4     347.129
                150        1.24    12           0.02   0.6     270.344
                150        1.25    12           0.02   0.8     163.972
                150        1.1     12           0.02   1       99.4541
                150        1.1     12           0.02   1       99.454
                150        0.71    12           0.01   1       60.322
                300        0.71    12           0.01   1       60.322
                300        0.34    12           0.01   1       36.587
                300        0.26    12           0.01   1       22.191
              Chemical: PHUnits=Water
                Thickness  PH  CEC
                150        8   11.135
                150        8   11.135
                150        8   11.1575
                150        8   10.82
                150        8   10.82
                150        8   9.9425
                300        8   9.9425
                300        8   9.11
                300        8   8.93
                CEC source: Calculated
                PH source: Estimated based on local knowledge
              Water: Thickness=[150, 150, 150, 150, 150, 150, 300, 300, 300]; InitialValues=[0.4, 0.4, 0.43, 0.4, 0.2861, 0.23, 0.23, 0.23, 0.23]; InitialPAWmm=114.915; RelativeTo=LL15; FilledFromTop=true
              Nutrient
              Solute NO3: Thickness=[150, 150, 150, 150, 150, 150, 300, 300, 300]; InitialValues=[24.1546, 14.4928, 10.2564, 9.73236, 1, 1, 1, 1, 1]; InitialValuesUnits=ppm; WaterTableConcentration=0; D0=0; DepthConstant=0; MaxDepthSoluteAccessible=0; RunoffEffectivenessAtMovingSolute=0; MaxEffectiveRunoff=0
              Solute NH4: same as Validation.Yield_Gap.Billa_Billa.Billa_Billa.paddock.Grey Vertosol (Billa Billa No220).NH4
              Solute Urea: same as Validation.Thomas Dissertation.Experiment_1_Berken.Exp1Berken.paddock.soil.Urea
              SoilTemperature Temperature
            Manager AutoIrr
              Crop = [Mungbean]
              AutoIrrigationOn = True
              FASWThreshold = 0.9
              FASWDepth = 600
              weeks = 1
              afterSowing = 0
              script: same as in Validation.Thomas Dissertation.Experiment_1_Berken.Exp1Berken.paddock.AutoIrr
            Manager HarvestAfterDate: same as Validation.TOS.TOSyear3.TOSyear3.paddock.HarvestAfterDate
      Experiment Pampas
        Factors
          Permutation
            Factor Sow
              CompositeFactor M10_dens33_canola
                Specifications:
                  [SowingRule].Script.SowingDate=2015-12-23
                  [SowingRule].Script.SowingRate=33
                  [SurfaceOrganicMatter].InitialResidueType=canola
                  [SurfaceOrganicMatter].InitialResidueMass=11000
                  [SurfaceOrganicMatter].InitialCNR=40
                  [HarvestAfterDate].Script.HarvestDate=31-mar
              CompositeFactor M11_dens26_canola
                Specifications:
                  [SowingRule].Script.SowingDate=2015-12-23
                  [SowingRule].Script.SowingRate=26
                  [SurfaceOrganicMatter].InitialResidueType=canola
                  [SurfaceOrganicMatter].InitialResidueMass=11000
                  [SurfaceOrganicMatter].InitialCNR=40
                  [HarvestAfterDate].Script.HarvestDate=31-mar
              CompositeFactor S3_Dec8_dens37_fallow: Specifications=[HarvestAfterDate].Script.HarvestDate=16-mar
              CompositeFactor S6_Dec8_dens36_fallow
                Specifications:
                  [SowingRule].Script.SowingDate=2015-12-08
                  [SowingRule].Script.SowingRate=36
                  [SurfaceOrganicMatter].InitialResidueType=fieldpea
                  [SurfaceOrganicMatter].InitialResidueMass=0
                  [SurfaceOrganicMatter].InitialCNR=0
                  [HarvestAfterDate].Script.HarvestDate=16-mar
              CompositeFactor S14_Jan19_dens23_fallow
                Specifications:
                  [SowingRule].Script.SowingDate=2016-1-19
                  [SowingRule].Script.SowingRate=23
                  [SurfaceOrganicMatter].InitialResidueType=fieldpea
                  [SurfaceOrganicMatter].InitialResidueMass=0
                  [SurfaceOrganicMatter].InitialCNR=0
                  [HarvestAfterDate].Script.HarvestDate=29-apr
        Simulation Pampas
          Clock: Start=2015-12-08; End=2016-06-06
          Summary summaryfile
          Weather: FileName=Yield Gap Study/2.ClimateFiles/Hermitage Stn 41044.met
          SoilArbitrator Soil Arbitrator
          Zone paddock: Area=1; Slope=0; AspectAngle=0; Altitude=50
            MicroClimate: a_interception=0; b_interception=1; c_interception=0; d_interception=0; SoilHeatFluxFraction=0; MinimumHeightDiffForNewLayer=0; NightInterceptionFraction=0; ReferenceHeight=2
            Irrigation
            Fertiliser
            SurfaceOrganicMatter: InitialResidueName=wheat; InitialResidueType=wheat; InitialResidueMass=0; InitialStandingFraction=0; InitialCPR=0; InitialCNR=80
            Report DailyReport: same as Validation.Thomas Dissertation.Experiment_1_Berken.Exp1Berken.paddock.DailyReport
            Manager SowingRule: same as Validation.Yield_Gap.Billa_Billa.Billa_Billa.paddock.SowingRule
            Report HarvestReport: same as Validation.Thomas Dissertation.Experiment_1_Berken.Exp1Berken.paddock.HarvestReport
            Plant Mungbean
            Manager Irrigatefixeddates: same as Validation.Thomas Dissertation.Experiment_1_Berken.Exp1Berken.paddock.Irrigatefixeddates
            Operations
            Manager InitialWaterReset: same as Validation.Yield_Gap.Emerald.EmeraldYieldGap.paddock.InitialWaterReset
            Soil: Latitude=0; Longitude=0; YearOfSampling=0
              Water: Thickness=[150, 150, 150, 150, 150, 150, 300, 300, 300]; InitialPAWmm=267.438; RelativeTo=LL15; FilledFromTop=true
                InitialValues=[0.45190891, 0.452859, 0.46217408, 0.46098, 0.461, 0.428, 0.428, 0.42, 0.4]
              Physical
                Thickness  ParticleSizeSand  ParticleSizeSilt  ParticleSizeClay  Rocks  BD     AirDry  LL15  DUL         SAT    KS
                150        5                 65                30                0      1.32   0.23    0.25  0.45190891  0.502  0.01
                150        5                 65                30                0      1.24   0.26    0.28  0.452859    0.503  0.01
                150        5                 65                30                0      1.24   0.29    0.29  0.46217408  0.512  0.01
                150        5                 65                30                0      1.29   0.29    0.29  0.46098     0.511  0.01
                150        5                 65                30                0      1.29   0.29    0.29  0.461       0.511  0.01
                150        5                 65                30                0      1.382  0.29    0.29  0.428       0.478  0.01
                300        5                 65                30                0      1.382  0.29    0.29  0.428       0.478  0.01
                300        5                 65                30                0      1.478  0.29    0.29  0.42        0.442  0.01
                300        5                 65                30                0      1.46   0.29    0.29  0.4         0.424  0.01
                Rocks, ParticleSizeSand, ParticleSizeSilt, ParticleSizeClay source: Calculated
                SoilCrop MungbeanSoil: LL=[0.25, 0.28, 0.31, 0.32, 0.32, 0.33, 0.33, 0.42, 0.4]; KL=[0.06, 0.06, 0.4, 0.4, 0.4, 0.3, 0.3, 0.02, 0.02]; XF=[1, 1, 1, 1, 1, 1, 1, 1, 1]
              WaterBalance SoilWater: SummerDate=1-Nov; SummerU=6; SummerCona=3.5; WinterDate=1-Apr; WinterU=6; WinterCona=3.5; DiffusConst=40; DiffusSlope=16; Salb=0.13; CN2Bare=73; CNRed=20; CNCov=0.8; PSIDul=-100
              Organic: FOMCNRatio=40; CarbonUnits=Total
                Thickness  Carbon  SoilCNRatio  FBiom  FInert  FOM
                150        1.22    12.5         0.025  0.4     82.9287
                150        1.13    12.5         0.02   0.6     55.5888
                150        1.016   12.5         0.015  0.8     30.5078
                150        0.854   12.5         0.01   0.9     16.743
                150        0.854   12.5         0.01   0.9     16.743
                150        0.517   12.5         0.01   0.95    9.189
                300        0.517   12.5         0.01   0.95    9.189
                300        0.306   12.5         0.01   0.95    5.043
                300        0.306   12.5         0.01   0.95    5.043
              Chemical: PHUnits=Water
                Thickness  PH    EC    CEC
                150        7.35  0.2   11.09
                150        8.05  0.25  10.8875
                150        8.48  0.31  10.631
                150        8.87  0.4   10.2665
                150        9.09  0.59  10.2665
                150        9.15  0.84  9.50825
                300        9.09  0.59  9.50825
                300        9.15  0.84  9.0335
                300        9.15  0.84  9.0335
                CEC source: Calculated
              Nutrient
              Solute NO3: Thickness=[150, 150, 150, 150, 150, 150, 300, 300, 300]; InitialValues=[11, 11, 10.25, 14, 1, 1, 1, 1, 1]; InitialValuesUnits=ppm; WaterTableConcentration=0; D0=0; DepthConstant=0; MaxDepthSoluteAccessible=0; RunoffEffectivenessAtMovingSolute=0; MaxEffectiveRunoff=0
              Solute NH4: Thickness=[150, 150, 150, 150, 150, 150, 300, 300, 300]; InitialValues=[2.75, 2.75, 2.5, 2.25, 0.2, 0.2, 0.2, 0.2, 0.2]; InitialValuesUnits=ppm; WaterTableConcentration=0; D0=0; DepthConstant=0; MaxDepthSoluteAccessible=0; RunoffEffectivenessAtMovingSolute=0; MaxEffectiveRunoff=0
              Solute Urea: same as Validation.Thomas Dissertation.Experiment_1_Berken.Exp1Berken.paddock.soil.Urea
              SoilTemperature Temperature
            Manager HarvestAfterDate: same as Validation.TOS.TOSyear3.TOSyear3.paddock.HarvestAfterDate
      Simulation TheGlen2013_14S
        Clock: Start=2014-02-18; End=2014-05-20
        Summary summaryfile
        Weather: FileName=Yield Gap Study/2.ClimateFiles/The_Glen.met
        SoilArbitrator Soil Arbitrator
        Zone paddock: Area=1; Slope=0; AspectAngle=0; Altitude=50
          MicroClimate: a_interception=0; b_interception=1; c_interception=0; d_interception=0; SoilHeatFluxFraction=0; MinimumHeightDiffForNewLayer=0; NightInterceptionFraction=0; ReferenceHeight=2
          Irrigation
          Fertiliser
          SurfaceOrganicMatter: InitialResidueName=wheat; InitialResidueType=wheat; InitialResidueMass=0; InitialStandingFraction=0; InitialCPR=0; InitialCNR=80
          Report DailyReport: same as Validation.Thomas Dissertation.Experiment_1_Berken.Exp1Berken.paddock.DailyReport
          Manager SowingRule
            RowSpacing = 250
            SowingDepth = 30
            SowingRate = 30
            CultivarName = Jade
            SowingDate = 02/18/2014 00:00:00
            script: same as in Validation.Thomas Dissertation.Experiment_1_Berken.Exp1Berken.paddock.SowingRule
          Report HarvestReport: same as Validation.Thomas Dissertation.Experiment_1_Berken.Exp1Berken.paddock.HarvestReport
          Plant Mungbean
          Manager Irrigatefixeddates: same as Validation.Thomas Dissertation.Experiment_1_Berken.Exp1Berken.paddock.Irrigatefixeddates
          Operations
          Soil Grey Vertosol Downs (Capella No1275): ASCOrder=Vertosol; SoilType=Grey Vertosol; LocalName=Downs; Site=Capella; NearestTown=Capella; Region=Central Highlands; State=Queensland; Country=Australia; NaturalVegetation=Brigalow; ApsoilNumber=1275; Latitude=-23.2321; Longitude=148.11336; LocationAccuracy=+/-20 m; YearOfSampling=2015; DataSource=Brett Cocks CSIRO Agriculture; Comments=Plain on back plain
            Physical
              Thickness  ParticleSizeSand  ParticleSizeSilt  ParticleSizeClay  Rocks  BD       AirDry    LL15      DUL       SAT       KS
              150        5                 65                30                0      1.30147  0.130581  0.261162  0.428878  0.478878  0.01
              150        5                 65                30                0      1.18974  0.20893   0.261162  0.471043  0.521043  0.01
              150        5                 65                30                0      1.18506  0.261162  0.261162  0.472806  0.522806  0.01
              150        5                 65                30                0      1.185    0.261162  0.261162  0.473     0.523     0.01
              150        5                 65                30                0      1.247    0.261162  0.261162  0.449     0.499     0.01
              150        5                 65                30                0      1.247    0.261     0.261     0.449     0.499     0.01
              300        5                 65                30                0      1.449    0.261     0.261     0.373     0.423     0.01
              300        5                 65                30                0      1.449    0.261     0.261     0.373     0.423     0.01
              300        5                 65                30                0      1.449    0.261     0.261     0.373     0.423     0.01
              BD, DUL source: Field measured and checked for sensibility
              AirDry, LL15 source: Estimated based on local knowledge
              SAT source: Calculated from measured, estimated or calculated BD
              Rocks, ParticleSizeSand, ParticleSizeSilt, ParticleSizeClay source: Calculated
              SoilCrop MungbeanSoil: LL=[0.225, 0.239, 0.261, 0.261, 0.36, 0.36, 0.34, 0.34, 0.34]; KL=[0.6, 0.6, 0.6, 0.6, 0.04, 0.04, 0.04, 0.04, 0.04]; XF=[1, 1, 1, 1, 1, 1, 1, 1, 1]
            WaterBalance SoilWater: SummerDate=1-nov; SummerU=6; SummerCona=3.5; WinterDate=1-apr; WinterU=4; WinterCona=2.5; DiffusConst=40; DiffusSlope=16; Salb=0.12; CN2Bare=73; CNRed=20; CNCov=0.08; PSIDul=-100
            Organic: FOMCNRatio=40; CarbonUnits=Total
              Thickness  Carbon  SoilCNRatio  FBiom  FInert  FOM
              150        0.806   12           0.6    0.4     523.082
              150        0.806   12           0.6    0.4     523.082
              150        0.689   12           0.4    0.6     317.265
              150        0.689   12           0.4    0.6     317.265
              150        0.715   12           0.2    0.8     116.715
              150        0.715   12           0.2    0.8     116.715
              300        0.494   12           0.05   0.95    42.937
              300        0.494   12           0.05   0.95    42.937
              300        0.494   12           0.05   0.95    42.937
            Chemical: PHUnits=Water
              Thickness  PH   EC     ESP      CEC
              150        7.4  0.096  1.62879  10.1585
              150        7.4  0.096  1.629    10.1585
              150        7.9  0.097  2.379    9.89525
              150        7.9  0.097  2.379    9.89525
              150        8.1  0.133  3.321    9.95375
              150        8.1  0.133  3.321    9.95375
              300        8.6  0.17   4.569    9.4565
              300        8.6  0.17   4.569    9.4565
              300        8.6  0.17   4.569    9.4565
              EC, CL, PH source: Measured
              CEC source: Calculated
              ESP source: C
            Water: Thickness=[150, 150, 150, 150, 150, 150, 300, 300, 300]; InitialPAWmm=277.338; RelativeTo=LL15; FilledFromTop=true
              InitialValues=[0.428878, 0.471043, 0.472806, 0.473, 0.449, 0.449, 0.373, 0.373, 0.373]
            Nutrient
            Solute NO3: Thickness=[150, 150, 150, 150, 150, 150, 300, 300, 300]; InitialValues=[11.6667, 11.667, 5, 5, 4, 4, 3, 3, 3]; InitialValuesUnits=ppm; WaterTableConcentration=0; D0=0; DepthConstant=0; MaxDepthSoluteAccessible=0; RunoffEffectivenessAtMovingSolute=0; MaxEffectiveRunoff=0
            Solute NH4: Thickness=[150, 150, 150, 150, 150, 150, 300, 300, 300]; InitialValues=[4, 4, 4, 4, 4, 4, 4, 4, 4]; InitialValuesUnits=ppm; WaterTableConcentration=0; D0=0; DepthConstant=0; MaxDepthSoluteAccessible=0; RunoffEffectivenessAtMovingSolute=0; MaxEffectiveRunoff=0
            Solute Urea: same as Validation.Thomas Dissertation.Experiment_1_Berken.Exp1Berken.paddock.soil.Urea
            SoilTemperature Temperature
          Manager HarvestAfterDate
            HarvestDate = 20-may-2014
            script: same as in Validation.Thomas Dissertation.Experiment_1_Berken.Exp1Berken.paddock.HarvestAfterDate
      Simulation Belvedere2013_14S
        Clock: Start=2014-12-19; End=2015-04-23
        Summary summaryfile
        Weather: FileName=Yield Gap Study/2.ClimateFiles/Belvedere.xlsx; ExcelWorkSheetName=Sheet1
        SoilArbitrator Soil Arbitrator
        Zone paddock: Area=1; Slope=0; AspectAngle=0; Altitude=50
          MicroClimate: a_interception=0; b_interception=1; c_interception=0; d_interception=0; SoilHeatFluxFraction=0; MinimumHeightDiffForNewLayer=0; NightInterceptionFraction=0; ReferenceHeight=2
          Irrigation
          Fertiliser
          SurfaceOrganicMatter: InitialResidueName=wheat; InitialResidueType=wheat; InitialResidueMass=5000; InitialStandingFraction=0; InitialCPR=0; InitialCNR=80
          Report DailyReport: same as Validation.Thomas Dissertation.Experiment_1_Berken.Exp1Berken.paddock.DailyReport
          Manager SowingRule
            RowSpacing = 250
            SowingDepth = 30
            SowingRate = 30
            CultivarName = Jade
            SowingDate = 12/20/2014 00:00:00
            script: same as in Validation.Thomas Dissertation.Experiment_1_Berken.Exp1Berken.paddock.SowingRule
          Report HarvestReport: same as Validation.Thomas Dissertation.Experiment_1_Berken.Exp1Berken.paddock.HarvestReport
          Plant Mungbean
          Manager Irrigatefixeddates: same as Validation.Thomas Dissertation.Experiment_1_Berken.Exp1Berken.paddock.Irrigatefixeddates
          Operations
          Soil Brown Clay-Kianga Red (Banana No045): ASCOrder=Vertosol; ASCSubOrder=Brown; SoilType=Clay; Site=Banana; NearestTown=Banana, Q 4702; Region=Capricornia; State=Queensland; Country=Australia; ApsoilNumber=45; Latitude=-24.42; Longitude=150.143; LocationAccuracy=+/- 20m; YearOfSampling=0; DataSource=Qld Department of Primary Industries and Fisheries (D Lack)
            Physical
              Thickness  ParticleSizeSand  ParticleSizeSilt  ParticleSizeClay  Rocks     BD    AirDry  LL15  DUL   SAT   KS
              150        5                 65                30                0.129935  1.34  0.09    0.18  0.35  0.4   0.01
              150        5                 65                30                0         1.36  0.144   0.18  0.41  0.46  0.01
              150        5                 65                30                0         1.42  0.22    0.22  0.38  0.43  0.01
              150        5                 65                30                0         1.42  0.22    0.22  0.38  0.43  0.01
              150        5                 65                30                0         1.58  0.2     0.2   0.32  0.37  0.01
              150        5                 65                30                0         1.58  0.2     0.2   0.32  0.37  0.01
              300        5                 65                30                0         1.55  0.19    0.19  0.34  0.39  0.01
              300        5                 65                30                0         1.55  0.19    0.19  0.34  0.39  0.01
              300        5                 65                30                0         1.55  0.19    0.19  0.34  0.39  0.01
              BD, DUL source: Field measured and checked for sensibility
              AirDry, LL15 source: Estimated based on local knowledge
              SAT source: Calculated from measured, estimated or calculated BD
              Rocks, ParticleSizeSand, ParticleSizeSilt, ParticleSizeClay source: Calculated
              SoilCrop MungbeanSoil
                LL=[0.228, 0.233, 0.242, 0.242, 0.266, 0.266, 0.311, 0.311, 0.311]
                KL=[0.07, 0.07, 0.07, 0.07, 0.05, 0.05, 0.05, 0.05, 0.05]
                XF=[1, 1, 1, 1, 1, 1, 1, 1, 1]
            WaterBalance SoilWater: SummerDate=1-Nov; SummerU=6; SummerCona=3.5; WinterDate=1-Apr; WinterU=4; WinterCona=2.5; DiffusConst=40; DiffusSlope=16; Salb=0.12; CN2Bare=73; CNRed=20; CNCov=0.8; PSIDul=-100
            Organic: FOMCNRatio=40; CarbonUnits=Total
              Thickness  Carbon  SoilCNRatio  FBiom  FInert  FOM
              150        1.19    12           0.04   1       446.88
              150        1.01    12           0.02   1       307.136
              150        1.01    12           0.02   1       307.136
              150        0.45    12           0.02   1       145.081
              150        0.45    12           0.02   1       145.081
              150        0.3     12           0.02   1       68.531
              300        0.3     12           0.02   1       68.531
              300        0.2     12           0.01   1       32.372
              300        0.2     12           0.01   1       32.372
            Chemical: PHUnits=Water
              Thickness  PH   CEC
              150        8.2  11.0225
              150        8.5  10.6175
              150        8.5  10.6175
              150        8.6  9.3575
              150        8.6  9.3575
              150        8.6  9.02
              300        8.6  9.02
              300        7.4  8.795
              300        7.4  8.795
              CEC source: Calculated
              PH source: Estimated based on local knowledge
            Water: Thickness=[150, 150, 150, 150, 150, 150, 300, 300, 300]; InitialValues=[0.35, 0.41, 0.38, 0.38, 0.32, 0.32, 0.34, 0.34, 0.34]; InitialPAWmm=279; RelativeTo=LL15; FilledFromTop=true
            Nutrient
            Solute NO3: Thickness=[150, 150, 150, 150, 150, 150, 300, 300, 300]; InitialValues=[3.66667, 3, 3, 2, 2, 1, 1, 4, 4]; InitialValuesUnits=ppm; WaterTableConcentration=0; D0=0; DepthConstant=0; MaxDepthSoluteAccessible=0; RunoffEffectivenessAtMovingSolute=0; MaxEffectiveRunoff=0
            Solute NH4: Thickness=[150, 150, 150, 150, 150, 150, 300, 300, 300]; InitialValues=[5, 5, 5, 5, 5, 5, 5, 5, 5]; InitialValuesUnits=ppm; WaterTableConcentration=0; D0=0; DepthConstant=0; MaxDepthSoluteAccessible=0; RunoffEffectivenessAtMovingSolute=0; MaxEffectiveRunoff=0
            Solute Urea: same as Validation.Thomas Dissertation.Experiment_1_Berken.Exp1Berken.paddock.soil.Urea
            SoilTemperature Temperature
          Manager HarvestAfterDate
            HarvestDate = 12-mar
            script: same as in Validation.Thomas Dissertation.Experiment_1_Berken.Exp1Berken.paddock.HarvestAfterDate
      Simulation Dalby2013_14S
        Clock: Start=2014-01-30; End=2014-05-23
        Summary summaryfile
        Weather: FileName=Yield Gap Study/2.ClimateFiles/Dalby.xlsx; ExcelWorkSheetName=Dalby
        SoilArbitrator Soil Arbitrator
        Zone paddock: Area=1; Slope=0; AspectAngle=0; Altitude=50
          MicroClimate: a_interception=0; b_interception=1; c_interception=0; d_interception=0; SoilHeatFluxFraction=0; MinimumHeightDiffForNewLayer=0; NightInterceptionFraction=0; ReferenceHeight=2
          Irrigation
          Fertiliser
          SurfaceOrganicMatter: InitialResidueName=wheat; InitialResidueType=wheat; InitialResidueMass=0; InitialStandingFraction=0; InitialCPR=0; InitialCNR=80
          Report DailyReport: same as Validation.Thomas Dissertation.Experiment_1_Berken.Exp1Berken.paddock.DailyReport
          Manager SowingRule
            RowSpacing = 250
            SowingDepth = 30
            SowingRate = 30
            CultivarName = Jade
            SowingDate = 01/30/2014 00:00:00
            script: same as in Validation.Thomas Dissertation.Experiment_1_Berken.Exp1Berken.paddock.SowingRule
          Report HarvestReport: same as Validation.Thomas Dissertation.Experiment_1_Berken.Exp1Berken.paddock.HarvestReport
          Plant Mungbean
          Manager Irrigatefixeddates: same as Validation.Thomas Dissertation.Experiment_1_Berken.Exp1Berken.paddock.Irrigatefixeddates
          Operations
          Soil Black Vertosol-Bongeen (Dalby No027): ASCOrder=Vertosol; ASCSubOrder=Black; SoilType=Clay; Site=Dalby; NearestTown=Dalby, Q 4405; Region=Darling Downs and Granite Belt; State=Queensland; Country=Australia; ApsoilNumber=27; Latitude=-27.12; Longitude=151.305; LocationAccuracy=+/- 20m; YearOfSampling=0; DataSource=CSIRO Sustainable Ecosystems, Toowoomba
            Comments=Toowoomba - Wheat ll,xf copied from sorghum. Wheat kl is just default apsim kl values for wheat.
            Physical
              Thickness  ParticleSizeSand  ParticleSizeSilt  ParticleSizeClay  Rocks  BD    AirDry  LL15  DUL   SAT   KS
              150        5                 65                30                0      1.25  0.115   0.23  0.45  0.5   0.01
              150        5                 65                30                0      1.31  0.184   0.23  0.43  0.48  0.01
              150        5                 65                30                0      1.31  0.184   0.23  0.43  0.48  0.01
              150        5                 65                30                0      1.23  0.23    0.23  0.46  0.51  0.01
              150        5                 65                30                0      1.23  0.23    0.23  0.46  0.51  0.01
              150        5                 65                30                0      1.24  0.23    0.23  0.45  0.5   0.01
              300        5                 65                30                0      1.25  0.23    0.23  0.45  0.5   0.01
              300        5                 65                30                0      1.26  0.23    0.23  0.44  0.49  0.01
              300        5                 65                30                0      1.29  0.23    0.23  0.43  0.48  0.01
              BD, DUL source: Field measured and checked for sensibility
              AirDry, LL15 source: Estimated based on local knowledge
              SAT source: Calculated from measured, estimated or calculated BD
              Rocks, ParticleSizeSand, ParticleSizeSilt, ParticleSizeClay source: Calculated
              SoilCrop MungbeanSoil: LL=[0.23, 0.24, 0.24, 0.29, 0.29, 0.395, 0.424, 0.44, 0.43]; KL=[0.06, 0.06, 0.06, 0.06, 0.06, 0.04, 0.04, 0.02, 0.01]; XF=[1, 1, 1, 1, 1, 1, 1, 1, 1]
            WaterBalance SoilWater: SummerDate=1-Nov; SummerU=6; SummerCona=3.5; WinterDate=1-Apr; WinterU=4; WinterCona=2.5; DiffusConst=40; DiffusSlope=16; Salb=0.12; CN2Bare=73; CNRed=20; CNCov=0.8; PSIDul=-100
            Organic: FOMCNRatio=40; CarbonUnits=Total
              Thickness  Carbon  SoilCNRatio  FBiom  FInert  FOM
              150        1.19    12           0.04   0.4     347.129
              150        1.01    12           0.02   0.6     270.344
              150        0.45    12           0.02   0.8     163.972
              150        0.3     12           0.02   1       99.4541
              150        0.3     12           0.02   1       99.454
              150        0.2     12           0.01   1       60.322
              300        0.2     12           0.01   1       60.322
              300        0.16    12           0.01   1       36.587
              300        0.17    12           0.01   1       22.191
            Chemical: PHUnits=Water
              Thickness  PH   CEC
              150        8.2  11.0225
              150        8.5  10.6175
              150        8.6  9.3575
              150        8.6  9.02
              150        7.4  9.02
              150        7.4  8.795
              300        5.3  8.795
              300        5.3  8.705
              300        5.3  8.7275
              CEC source: Calculated
              PH source: Estimated based on local knowledge
            Water: Thickness=[150, 150, 150, 150, 150, 150, 300, 300, 300]; InitialValues=[0.45, 0.43, 0.43, 0.3012, 0.23, 0.23, 0.23, 0.23, 0.23]; InitialPAWmm=103.68; RelativeTo=LL15; FilledFromTop=true
            Nutrient
            Solute NO3: Thickness=[150, 150, 150, 150, 150, 150, 300, 300, 300]; InitialValues=[26.4224, 15.2672, 10.8401, 10.7527, 1, 1, 1, 1, 1]; InitialValuesUnits=ppm; WaterTableConcentration=0; D0=0; DepthConstant=0; MaxDepthSoluteAccessible=0; RunoffEffectivenessAtMovingSolute=0; MaxEffectiveRunoff=0
            Solute NH4: same as Validation.Yield_Gap.Billa_Billa.Billa_Billa.paddock.Grey Vertosol (Billa Billa No220).NH4
            Solute Urea: same as Validation.Thomas Dissertation.Experiment_1_Berken.Exp1Berken.paddock.soil.Urea
            SoilTemperature Temperature
          Manager HarvestAfterDate
            HarvestDate = 10-may
            script: same as in Validation.Thomas Dissertation.Experiment_1_Berken.Exp1Berken.paddock.HarvestAfterDate
      Simulation Kingaroy
        Clock: Start=2015-11-20; End=2017-06-05
        Summary summaryfile
        Weather: FileName=Yield Gap Study/2.ClimateFiles/Kingaroy_Airport_40922.met
        SoilArbitrator Soil Arbitrator
        Zone paddock: Area=1; Slope=0; AspectAngle=0; Altitude=50
          MicroClimate: a_interception=0; b_interception=1; c_interception=0; d_interception=0; SoilHeatFluxFraction=0; MinimumHeightDiffForNewLayer=0; NightInterceptionFraction=0; ReferenceHeight=2
          Irrigation
          Fertiliser
          SurfaceOrganicMatter: InitialResidueName=wheat; InitialResidueType=wheat; InitialResidueMass=0; InitialStandingFraction=0; InitialCPR=0; InitialCNR=80
          Report DailyReport: same as Validation.Thomas Dissertation.Experiment_1_Berken.Exp1Berken.paddock.DailyReport
          Manager SowingRule
            RowSpacing = 250
            SowingDepth = 30
            SowingRate = 30
            CultivarName = Jade
            SowingDate = 02/10/2016 00:00:00
            script: same as in Validation.Thomas Dissertation.Experiment_1_Berken.Exp1Berken.paddock.SowingRule
          Report HarvestReport: same as Validation.Thomas Dissertation.Experiment_1_Berken.Exp1Berken.paddock.HarvestReport
          Plant Mungbean
          Manager Irrigatefixeddates: same as Validation.Thomas Dissertation.Experiment_1_Berken.Exp1Berken.paddock.Irrigatefixeddates
          Operations
          Manager InitialWaterReset: same as Validation.Yield_Gap.Emerald.EmeraldYieldGap.paddock.InitialWaterReset
          Soil Black Vertosol (Kumbia No162): ASCOrder=Vertosol; ASCSubOrder=Black; SoilType=Clay; Site=Hale Creek; NearestTown=Kumbia; Region=Wide Bay and Burnett; State=Queensland; Country=Australia; ApsoilNumber=162; Latitude=-26.688; Longitude=151.656; LocationAccuracy=+/- 10km; YearOfSampling=0; Comments=Wheat CLL estimated
            DataSource=CSIRO Tropical Crops and Pastures in collaboration with Agforce Queensland
            Physical
              Thickness  ParticleSizeSand  ParticleSizeSilt  ParticleSizeClay  Rocks  BD     AirDry  LL15  DUL    SAT    KS
              150        5                 65                30                0      1.032  0.155   0.31  0.53   0.58   0.01
              150        5                 65                30                0      1.054  0.248   0.31  0.522  0.572  0.01
              150        5                 65                30                0      1.026  0.31    0.31  0.533  0.583  0.01
              150        5                 65                30                0      1.026  0.31    0.31  0.533  0.583  0.01
              150        5                 65                30                0      1.05   0.31    0.31  0.524  0.574  0.01
              150        5                 65                30                0      1.05   0.31    0.31  0.524  0.574  0.01
              300        5                 65                30                0      1.142  0.31    0.31  0.489  0.539  0.01
              300        5                 65                30                0      1.213  0.31    0.31  0.462  0.512  0.01
              300        5                 65                30                0      1.249  0.31    0.31  0.449  0.499  0.01
              Rocks, ParticleSizeSand, ParticleSizeSilt, ParticleSizeClay source: Calculated
              SoilCrop MungbeanSoil: LL=[0.31, 0.31, 0.31, 0.31, 0.447, 0.447, 0.463, 0.462, 0.449]; KL=[0.06, 0.06, 0.06, 0.06, 0.04, 0.04, 0.04, 0.02, 0.01]; XF=[1, 1, 1, 1, 1, 1, 1, 1, 1]
            WaterBalance SoilWater: SummerDate=1-Nov; SummerU=6; SummerCona=3.5; WinterDate=1-Apr; WinterU=4; WinterCona=2.5; DiffusConst=40; DiffusSlope=16; Salb=0.12; CN2Bare=73; CNRed=20; CNCov=0.8; PSIDul=-100
            Organic: FOMCNRatio=40; CarbonUnits=Total
              Thickness  Carbon  SoilCNRatio  FBiom  FInert  FOM
              150        2.236   12           0.04   0.4     347.129
              150        1.794   12           0.02   0.6     270.344
              150        1.118   12           0.02   0.8     163.972
              150        0.559   12           0.02   1       99.4541
              150        0.559   12           0.02   1       99.454
              150        0.338   12           0.01   1       60.322
              300        0.338   12           0.01   1       60.322
              300        0.221   12           0.01   1       36.587
              300        0.221   12           0.01   1       22.191
            Chemical: PHUnits=Water
              Thickness  PH   EC   CEC
              150        6.9  0.1  13.376
              150        7.3  0.1  12.3815
              150        7.9  0.4  10.8605
              150        8.1  0.5  9.60275
              150        8.1  0.6  9.60275
              150        8.1  0.6  9.1055
              300        8.1  0.6  9.1055
              300        8.1  0.5  8.84225
              300        8.1  0.5  8.84225
              CEC source: Calculated
              PH source: Unknown source or quality of data
            Water: Thickness=[150, 150, 150, 150, 150, 150, 300, 300, 300]; InitialValues=[0.53, 0.522, 0.533, 0.533, 0.4427, 0.31, 0.31, 0.31, 0.31]; InitialPAWmm=151.605; RelativeTo=LL15; FilledFromTop=true
            Nutrient
            Solute NO3: Thickness=[150, 150, 150, 150, 150, 150, 300, 300, 300]; InitialValues=[32.1649, 18.9753, 12.9955, 12.6984, 1, 1, 1, 1, 1]; InitialValuesUnits=ppm; WaterTableConcentration=0; D0=0; DepthConstant=0; MaxDepthSoluteAccessible=0; RunoffEffectivenessAtMovingSolute=0; MaxEffectiveRunoff=0
            Solute NH4: same as Validation.Yield_Gap.Billa_Billa.Billa_Billa.paddock.Grey Vertosol (Billa Billa No220).NH4
            Solute Urea: same as Validation.Thomas Dissertation.Experiment_1_Berken.Exp1Berken.paddock.soil.Urea
            SoilTemperature Temperature
          Manager AutoIrr
            Crop = [Mungbean]
            AutoIrrigationOn = True
            FASWThreshold = 0.9
            FASWDepth = 600
            weeks = 1
            afterSowing = 10
            script: same as in Validation.Thomas Dissertation.Experiment_1_Berken.Exp1Berken.paddock.AutoIrr
          Manager HarvestAfterDate
            HarvestDate = 20-may
            script: same as in Validation.Thomas Dissertation.Experiment_1_Berken.Exp1Berken.paddock.HarvestAfterDate
      Experiment Warra
        Factors
          Permutation
            Factor Sow
              CompositeFactor 2014
                Specifications:
                  [SowingRule].Script.SowingDate=2014-12-23
                  [Operations]
                  [HarvestAfterDate].Script.HarvestDate=19-mar-2015
                Operations reset
                  2016-01-14  [InitialWaterReset].Script.ResetWater(0,14)
              CompositeFactor 2015
                Specifications:
                  [SowingRule].Script.SowingDate=2015-12-11
                  [Operations]
                  [HarvestAfterDate].Script.HarvestDate=8-mar-2016
                Operations reset
                  2015-12-08  [InitialWaterReset].Script.ResetWater(0,11)
        Simulation WarraBase
          Clock: Start=2013-01-01; End=2016-05-15
          Summary summaryfile
          Weather: FileName=Yield Gap Study/2.ClimateFiles/EhlmaPark.xlsx; ExcelWorkSheetName=EhlmaPark
          SoilArbitrator Soil Arbitrator
          Zone paddock: Area=1; Slope=0; AspectAngle=0; Altitude=50
            MicroClimate: a_interception=0; b_interception=1; c_interception=0; d_interception=0; SoilHeatFluxFraction=0; MinimumHeightDiffForNewLayer=0; NightInterceptionFraction=0; ReferenceHeight=2
            Irrigation
            Fertiliser
            SurfaceOrganicMatter: InitialResidueName=wheat; InitialResidueType=wheat; InitialResidueMass=5000; InitialStandingFraction=0; InitialCPR=0; InitialCNR=80
            Report DailyReport: same as Validation.Thomas Dissertation.Experiment_1_Berken.Exp1Berken.paddock.DailyReport
            Manager SowingRule
              SowingDate = 12/10/2013 00:00:00
              RowSpacing = 250
              SowingDepth = 30
              SowingRate = 30
              CultivarName = Jade
```csharp
using Models.Soils;
using System;
using Models.Core;
using Models.PMF;
using APSIM.Shared.Utilities;
        
        namespace Models
        {
           [Serializable] 
           [System.Xml.Serialization.XmlInclude(typeof(Model))]
            public class Script : Model
            {      
               [Link] Plant Mungbean;
               [Link] Clock Clock;

               [Description("Spacing (mm) between rows")]
               public double RowSpacing { get; set; }
               [Description("Depth (mm) Grains are planted")]
               public double SowingDepth { get; set; }
               [Description("Seeds sown (/m2)")]
               public double SowingRate { get; set; }
               [Description("Cultivar")]
               [Display(Type=DisplayType.CultivarName)]
               public string CultivarName { get; set; }
               [Description("Sowing Date")]
               public DateTime SowingDate { get; set; }

               [EventSubscribe("DoManagement")]
               private void OnDoManagement(object sender, EventArgs e)
               {
                if (Clock.Today.Date == SowingDate)
                    Sow();
           
                    
               }
               public void Sow()
               {Mungbean.Sow(population:SowingRate, cultivar:CultivarName, depth:SowingDepth, rowSpacing:RowSpacing, budNumber:1);
               }
            }
        }
```
            Report HarvestReport: same as Validation.Thomas Dissertation.Experiment_1_Berken.Exp1Berken.paddock.HarvestReport
            Plant Mungbean
            Manager Irrigatefixeddates: same as Validation.Thomas Dissertation.Experiment_1_Berken.Exp1Berken.paddock.Irrigatefixeddates
            Operations
            Soil Grey Vertosol-Brigalow (Haystack No022): ASCOrder=Vertosol; ASCSubOrder=Grey; SoilType=Clay; Site=Haystack; NearestTown=Brigalow, Q 4412; Region=Darling Downs and Granite Belt; State=Queensland; Country=Australia; NaturalVegetation=Brigalow scrub; ApsoilNumber=22; Latitude=-26.836; Longitude=150.855; LocationAccuracy=+/- 20m; YearOfSampling=0; DataSource=CSIRO Sustainable Ecosystems, Toowoomba
              WaterBalance SoilWater: SummerDate=1-Nov; SummerU=6; SummerCona=3.5; WinterDate=1-Apr; WinterU=4; WinterCona=2.5; DiffusConst=40; DiffusSlope=16; Salb=0.12; CN2Bare=73; CNRed=20; CNCov=0.8; PSIDul=-100
              Organic: FOMCNRatio=40; CarbonUnits=Total
                Thickness  Carbon  SoilCNRatio  FBiom  FInert  FOM
                150        1.19    12           0.04   0.4     347.129
                150        1.01    12           0.02   0.6     270.344
                150        0.45    12           0.02   0.8     163.972
                150        0.3     12           0.02   1       99.4541
                150        0.2     12           0.01   1       60.322
                150        0.2     12           0.01   1       60.322
                300        0.16    12           0.01   1       36.587
                300        0.16    12           0.01   1       36.587
                300        0.17    12           0.01   1       22.191
              Chemical: PHUnits=Water
                Thickness  PH   CEC
                150        8.2  11.0225
                150        8.5  10.6175
                150        8.6  9.3575
                150        8.6  9.02
                150        7.4  8.795
                150        7.4  8.795
                300        5.3  8.705
                300        5.3  8.705
                300        5.3  8.7275
                CEC source: Calculated
                PH source: Estimated based on local knowledge
              Physical
                Thickness  ParticleSizeSand  ParticleSizeSilt  ParticleSizeClay  Rocks  BD    AirDry  LL15  DUL   SAT   KS
                150        5                 65                30                0      1.42  0.095   0.19  0.39  0.44  0.01
                150        5                 65                30                0      1.42  0.152   0.19  0.38  0.43  0.01
                150        5                 65                30                0      1.43  0.19    0.19  0.38  0.43  0.01
                150        5                 65                30                0      1.42  0.19    0.19  0.38  0.43  0.01
                150        5                 65                30                0      1.4   0.19    0.19  0.39  0.44  0.01
                150        5                 65                30                0      1.4   0.19    0.19  0.39  0.44  0.01
                300        5                 65                30                0      1.45  0.19    0.19  0.37  0.42  0.01
                300        5                 65                30                0      1.45  0.19    0.19  0.37  0.42  0.01
                300        5                 65                30                0      1.47  0.19    0.19  0.36  0.41  0.01
                Rocks, ParticleSizeSand, ParticleSizeSilt, ParticleSizeClay source: Calculated
                SoilCrop MungbeanSoil: LL=[0.19, 0.19, 0.19, 0.2, 0.22, 0.23, 0.23, 0.23, 0.23]; KL=[0.06, 0.06, 0.06, 0.04, 0.04, 0.04, 0.02, 0.02, 0.02]; XF=[1, 1, 1, 1, 1, 1, 1, 1, 1]
              Nutrient
              Water: Thickness=[150, 150, 150, 150, 150, 150, 300, 300, 300]; InitialValues=[0.39, 0.38, 0.38, 0.38, 0.39, 0.39, 0.37, 0.37, 0.36]; InitialPAWmm=334.5; RelativeTo=LL15; FilledFromTop=true
              Solute NO3: Thickness=[150, 150, 150, 150, 150, 150, 300, 300, 300]; InitialValues=[23.4742, 14.0845, 9.32401, 9.38967, 1, 1, 1, 1, 1]; InitialValuesUnits=ppm; WaterTableConcentration=0; D0=0; DepthConstant=0; MaxDepthSoluteAccessible=0; RunoffEffectivenessAtMovingSolute=0; MaxEffectiveRunoff=0
              Solute NH4: same as Validation.Yield_Gap.Billa_Billa.Billa_Billa.paddock.Grey Vertosol (Billa Billa No220).NH4
              Solute Urea: same as Validation.Thomas Dissertation.Experiment_1_Berken.Exp1Berken.paddock.soil.Urea
              SoilTemperature Temperature
            Manager InitialWaterReset: same as Validation.Yield_Gap.Emerald.EmeraldYieldGap.paddock.InitialWaterReset
            Manager AutoIrr: same as Validation.Yield_Gap.Emerald.EmeraldYieldGap.paddock.AutoIrr
            Manager HarvestAfterDate: same as Validation.TOS.TOSyear3.TOSyear3.paddock.HarvestAfterDate
  Folder Sensibility
    Memo
      A factorial simulation of different sowing times by initial soil water level at three sites was run for 55 years, from 1963 to 2018, resetting the soil organic matter, N, and water on July 1 of each year. The baseline simulations for Gatton, Katherine, and Narrabri (-30.2 S, 147.6 E) were sourced from the calibration/testing dataset. Jade-AU was sown at early (September 15), mid (December 15), and late (February 15) in the growing season with initial soil water profile at 20%, 60%, and 100% of full representing a low, mid, high water status, respectively. The site descriptions of the three sites can be categorised according to their soils and climate: Gatton is a vertisol (195mm plant available water when the profile is full), with a temperate climate where the hot temperatures (20-30°C) ideal for mungbeans occur during a short window (early sowing results in potential heat stress at flowering and grain fill, late sowing results in low temperatures hindering grain fill) and so is termed in this study as “Short Season Temperate Vertisol.” Narrabri is also a vertisol (321mm plant available water when the profile is full), with a long hot (20-30°C) and dry growing season for mungbeans and so, is termed “Long Season Arid Vertisol.” Katherine soil is an alfisol (195mm plant available water when the profile is full), with very hot (30-35°C) conditions where average monthly rainfall only exceeded 40mm starting in November, suggesting that mungbeans need to be planted later there, and so, is termed “Late Season Arid Alfisol.” Probability analyses were then run on the resulting grain yields to test if the model outputs changed in a sensible way relative to the environment and growing conditions and in their response to more extreme environments. We expect the model to output a greater sensitivity to sowing date irrespective of water conditions in a “Short Season Temperate Vertisol,” to water conditions irrespective of sowing date in a “Long Season Arid Vertisol,” and to not be able to grow mungbeans at all at the early sowing date and when there is little initial water in the “Late Season Arid Alfisol.”
    Experiment Gatton
      Factors
        Permutation
          Factor Water
            CompositeFactor Low: Specifications=[Soil].Water.FractionFull=0.2
            CompositeFactor Medium: Specifications=[Soil].Water.FractionFull=0.6
            CompositeFactor High: Specifications=[Soil].Water.FractionFull=1
          Factor Sow
            CompositeFactor Early: Specifications=[SowingRule].Script.SowDate=15-sep
            CompositeFactor Mid: Specifications=[SowingRule].Script.SowDate=15-dec
            CompositeFactor Late: Specifications=[SowingRule].Script.SowDate=15-feb
      Simulation Gatton Scenario
        Summary summaryfile
        SoilArbitrator Soil Arbitrator
        Clock: Start=1963-09-01; End=2018-09-01
        Weather: FileName=GattonWeather.xlsx; ExcelWorkSheetName=Kylie
        Zone paddock: Area=1; Slope=0; AspectAngle=0; Altitude=50
          Fertiliser
          SurfaceOrganicMatter: InitialResidueName=wheat; InitialResidueType=wheat; InitialResidueMass=500; InitialStandingFraction=0; InitialCPR=0; InitialCNR=40
          Manager HarvestRule: same as Validation.Thomas Dissertation.Experiment_3.exp3.paddock.HarvestRule
          Report HarvestReport: same as Validation.Thomas Dissertation.Experiment_1_Berken.Exp1Berken.paddock.HarvestReport
          Plant Mungbean
          MicroClimate: a_interception=0; b_interception=1; c_interception=0; d_interception=0; SoilHeatFluxFraction=0.4; MinimumHeightDiffForNewLayer=0; NightInterceptionFraction=0.5; ReferenceHeight=2
          Soil: SoilType=APS6Soil; LocalName=APS6Site; Site=APS6Site; NearestTown=Unknown; Region=Lawes; NaturalVegetation=Unknown; Latitude=0; Longitude=0
            WaterBalance SoilWater: SummerDate=1-Nov; SummerU=6; SummerCona=3.5; WinterDate=1-Apr; WinterU=6; WinterCona=3.5; DiffusConst=88; DiffusSlope=35.4; Salb=0.13; CN2Bare=60; CNRed=20; CNCov=0.8; DischargeWidth=0; CatchmentArea=0; PSIDul=-100
            Organic: same as Validation.TOS.TOSyear2Opal.TOSyear2Opal.paddock.Soil.Organic
            Chemical: Thickness=[150, 150, 150, 150, 150, 150, 300, 300, 300]; PH=[7.5, 8, 8, 8, 8, 8, 8, 8, 8]; PHUnits=Water
            Nutrient
            Physical
              Thickness  BD    AirDry  LL15    DUL   SAT   KS
              150        1.38  0.2     0.208   0.42  0.45  0.01
              150        1.34  0.273   0.2731  0.42  0.45  0.01
              150        1.35  0.286   0.2857  0.42  0.45  0.01
              150        1.35  0.286   0.286   0.42  0.45  0.01
              150        1.5   0.286   0.2863  0.4   0.43  0.01
              150        1.5   0.286   0.286   0.4   0.43  0.01
              300        1.49  0.286   0.286   0.36  0.4   0.01
              300        1.46  0.286   0.286   0.36  0.4   0.01
              300        1.46  0.286   0.286   0.36  0.4   0.01
              SoilCrop MungbeanSoil: LL=[0.3, 0.31, 0.32, 0.33, 0.33, 0.33, 0.33, 0.33, 0.33]; KL=[0.08, 0.08, 0.06, 0.06, 0.06, 0.04, 0.02, 0.02, 0.01]; XF=[1, 1, 1, 1, 1, 1, 1, 1, 1]
            Water: Thickness=[150, 150, 150, 150, 150, 150, 300, 300, 300]; InitialValues=[0.42, 0.42, 0.42, 0.42, 0.4, 0.32444, 0.286, 0.286, 0.286]; InitialPAWmm=116.901; RelativeTo=LL15; FilledFromTop=true
            Solute NO3: same as Validation.TOS.TOSyear2Opal.TOSyear2Opal.paddock.Soil.NO3
            Solute NH4: same as Validation.TOS.TOSyear2Opal.TOSyear2Opal.paddock.Soil.NH4
            Solute Urea: same as Validation.Thomas Dissertation.Experiment_1_Berken.Exp1Berken.paddock.soil.Urea
            SoilTemperature Temperature
          Manager SowingRule
            SowDate = 24-Jul
            Crop = [Mungbean]
            CultivarName = Jade
            SowingDepth = 50
            RowSpacing = 500
            Population = 30
```csharp
using APSIM.Shared.Utilities;
using Models.Utilities;
using Models.Soils;
using Models.PMF;
using Models.Core;
using System;

namespace Models
{
    [Serializable]
    public class Script : Model
    {
        [Link] Clock Clock;
        [Link] Fertiliser Fertiliser;
        [Link] Summary Summary;
        [Link] Soil Soil;
        
        [Description("Crop")]
        public IPlant Crop { get; set; }

        [Description("Sowing date (d-mmm)")]
        public string SowDate { get; set; }

        [Display(Type = DisplayType.CultivarName)]
        [Description("Cultivar to be sown")]
        public string CultivarName { get; set; }

        [Description("Sowing depth (mm)")]
        public double SowingDepth { get; set; }

        [Description("Row spacing (mm)")]
        public double RowSpacing { get; set; }

        [Description("Plant population (/m2)")]
        public double Population { get; set; }

        [EventSubscribe("DoManagement")]
        private void OnDoManagement(object sender, EventArgs e)
        {
            if (DateUtilities.WithinDates(SowDate, Clock.Today, SowDate))
            {
                Crop.Sow(population: Population, cultivar: CultivarName, depth: SowingDepth, rowSpacing: RowSpacing);    
            }
        }
    }
}
```
          Manager Reset on sowing
            ResetWater = Yes
            ResetNutrients = Yes
            ResetSOM = Yes
```csharp
using Models.Soils.Nutrients;
using APSIM.Shared.Utilities;
using Models.Surface;
using Models.Utilities;
using Models.Soils.Nutrients;
using Models.Soils;
using Models.PMF;
using Models.Core;
using System;
using Models.Interfaces;

namespace Models
{
    [Serializable]
    public class Script : Model
    {
        [Link] private Plant Wheat;
        [Link] private ISoilWater SoilWater;
        [Link] private Nutrient nutrient;
        [Link] private SurfaceOrganicMatter SOM;
        [Link] private Summary Summary;

        [Description("Reset Water? (Yes or No)")]
        public string ResetWater {get;set;}

        [Description("Reset Soil Nutrients? (Yes or No)")]
        public string ResetNutrients {get;set;}

        [Description("Reset Surface Organic Matter? (Yes or No)")]
        public string ResetSOM {get;set;}

        [EventSubscribe("Sowing")]
        private void OnSowing(object sender, EventArgs e)
        {
            if (ResetWater == "Yes")
            {
                Summary.WriteMessage(this, "Reset Water", MessageType.Diagnostic);
                SoilWater.Reset();
            }
            if (ResetNutrients == "Yes")
            {
                Summary.WriteMessage(this, "Reset Nutrients", MessageType.Diagnostic);
                nutrient.Reset();
            }
            if (ResetSOM == "Yes")
            {
                Summary.WriteMessage(this, "Reset Surface OM", MessageType.Diagnostic);
                SOM.Reset();
            }
        }
    }
}
```
    Experiment Katherine
      Factors: same as Sensibility.Gatton.Factors
      Simulation Katherine Scenario
        Summary summaryfile
        SoilArbitrator Soil Arbitrator
        Clock: Start=1963-09-01; End=2018-09-01
        Weather: FileName=KatherineWeather.xlsx; ExcelWorkSheetName=Kylie
        Zone paddock: Area=1; Slope=0; AspectAngle=0; Altitude=50
          Fertiliser
          SurfaceOrganicMatter: InitialResidueName=wheat; InitialResidueType=wheat; InitialResidueMass=500; InitialStandingFraction=0; InitialCPR=0; InitialCNR=40
          Manager HarvestRule: same as Validation.Thomas Dissertation.Experiment_3.exp3.paddock.HarvestRule
          Report HarvestReport: same as Validation.Thomas Dissertation.Experiment_1_Berken.Exp1Berken.paddock.HarvestReport
          Plant Mungbean
          MicroClimate: a_interception=0; b_interception=1; c_interception=0; d_interception=0; SoilHeatFluxFraction=0.4; MinimumHeightDiffForNewLayer=0; NightInterceptionFraction=0.5; ReferenceHeight=2
          Manager SowingRule: same as Sensibility.Gatton.Gatton Scenario.paddock.SowingRule
          Manager Reset on sowing: same as Sensibility.Gatton.Gatton Scenario.paddock.Reset on sowing
          Soil: Latitude=0; Longitude=0
            Physical
              Thickness  BD    AirDry  LL15  DUL   SAT   KS
              150        1.56  0.05    0.19  0.3   0.31  0.01
              150        1.52  0.08    0.21  0.31  0.33  0.01
              150        1.46  0.21    0.21  0.31  0.34  0.01
              150        1.46  0.22    0.22  0.32  0.34  0.01
              150        1.42  0.22    0.22  0.33  0.34  0.01
              150        1.42  0.22    0.22  0.33  0.34  0.01
              300        1.46  0.22    0.22  0.32  0.34  0.01
              300        1.5   0.23    0.23  0.34  0.35  0.01
              300        1.53  0.24    0.24  0.35  0.37  0.01
              SoilCrop MungbeanSoil: LL=[0.19, 0.21, 0.21, 0.23, 0.23, 0.24, 0.25, 0.28, 0.28]; KL=[0.16, 0.16, 0.12, 0.1, 0.1, 0.08, 0.06, 0.04, 0.03]; XF=[1, 1, 1, 1, 1, 1, 1, 0, 0]
            WaterBalance SoilWater: SummerDate=1-Nov; SummerU=1.5; SummerCona=6.6; WinterDate=1-Apr; WinterU=1.5; WinterCona=6.6; DiffusConst=88; DiffusSlope=35.4; Salb=0.2; CN2Bare=70; CNRed=20; CNCov=0.8; DischargeWidth=0; CatchmentArea=0; PSIDul=-100
            Organic: same as Validation.Muchow.KatherineJan28WaterIrrigated.paddock.Soil.Organic
            Chemical: Thickness=[150, 150, 150, 150, 150, 150, 300, 300, 300]; PH=[6.5, 6.2, 6.3, 6.4, 6.5, 6.6, 6.6, 6.5, 6.5]; PHUnits=Water
            Water: Thickness=[150, 150, 150, 150, 150, 150, 300, 300, 300]; InitialValues=[0.3, 0.31, 0.31, 0.32, 0.33, 0.33, 0.286, 0.23, 0.24]; InitialPAWmm=114.3; RelativeTo=LL15; FilledFromTop=true
            Nutrient
            Solute NO3: same as Validation.Muchow.KatherineJan28WaterIrrigated.paddock.Soil.NO3
            Solute NH4: same as Validation.Thomas Dissertation.Experiment_1_Berken.Exp1Berken.paddock.soil.NH4
            Solute Urea: same as Validation.Thomas Dissertation.Experiment_1_Berken.Exp1Berken.paddock.soil.Urea
            SoilTemperature Temperature
    Experiment Narrabri
      Factors: same as Sensibility.Gatton.Factors
      Simulation Narrabri Scenario
        Summary summaryfile
        SoilArbitrator Soil Arbitrator
        Clock: Start=1963-09-01; End=2018-09-01
        Weather: FileName=NarrabriWeather.xlsx; ExcelWorkSheetName=Kylie
        Zone paddock: Area=1; Slope=0; AspectAngle=0; Altitude=50
          Fertiliser
          SurfaceOrganicMatter: InitialResidueName=wheat; InitialResidueType=wheat; InitialResidueMass=500; InitialStandingFraction=0; InitialCPR=0; InitialCNR=40
          Manager HarvestRule: same as Validation.Thomas Dissertation.Experiment_3.exp3.paddock.HarvestRule
          Report HarvestReport: same as Validation.Thomas Dissertation.Experiment_1_Berken.Exp1Berken.paddock.HarvestReport
          Plant Mungbean
          MicroClimate: a_interception=0; b_interception=1; c_interception=0; d_interception=0; SoilHeatFluxFraction=0.4; MinimumHeightDiffForNewLayer=0; NightInterceptionFraction=0.5; ReferenceHeight=2
          Manager SowingRule: same as Sensibility.Gatton.Gatton Scenario.paddock.SowingRule
          Manager Reset on sowing: same as Sensibility.Gatton.Gatton Scenario.paddock.Reset on sowing
          Soil: Latitude=0; Longitude=0
            WaterBalance SoilWater: SummerDate=1-Nov; SummerU=6; SummerCona=3.5; WinterDate=1-Apr; WinterU=6; WinterCona=3.5; DiffusConst=88; DiffusSlope=35.4; Salb=0.13; CN2Bare=72; CNRed=20; CNCov=0.8; DischargeWidth=5; CatchmentArea=10; PSIDul=-100
            Organic: same as Validation.Mungbean_DAF.ACRI.ACRI.paddock.soil.Organic
            Chemical: Thickness=[150, 150, 150, 150, 150, 150, 300, 300, 300]; PH=[8, 7.8, 7.8, 7.8, 7.8, 7.8, 7.8, 7.8, 7.8]; PHUnits=Water
            Nutrient
            Physical
              Thickness  BD    AirDry  LL15  DUL   SAT   KS
              150        1.31  0.05    0.21  0.43  0.48  0.01
              150        1.26  0.21    0.21  0.44  0.49  0.01
              150        1.36  0.21    0.21  0.41  0.46  0.01
              150        1.39  0.21    0.21  0.41  0.45  0.01
              150        1.44  0.21    0.21  0.41  0.43  0.01
              150        1.45  0.21    0.21  0.4   0.42  0.01
              300        1.45  0.2     0.2   0.35  0.39  0.01
              300        1.46  0.19    0.19  0.35  0.36  0.01
              300        1.46  0.18    0.18  0.32  0.35  0.01
              SoilCrop MungbeanSoil: LL=[0.21, 0.21, 0.21, 0.21, 0.21, 0.21, 0.2, 0.19, 0.18]; KL=[0.08, 0.08, 0.08, 0.08, 0.08, 0.08, 0.08, 0.08, 0.08]; XF=[1, 1, 1, 1, 1, 1, 1, 1, 1]
            Water: Thickness=[150, 150, 150, 150, 150, 150, 300, 300, 300]; InitialValues=[0.43, 0.44, 0.41, 0.41, 0.41, 0.4, 0.222, 0.19, 0.18]; InitialPAWmm=192.6; RelativeTo=LL15; FilledFromTop=true
            Solute NO3: same as Validation.Mungbean_DAF.ACRI.ACRI.paddock.soil.NO3
            Solute NH4: same as Validation.Mungbean_DAF.ACRI.ACRI.paddock.soil.NH4
            Solute Urea: same as Validation.Thomas Dissertation.Experiment_1_Berken.Exp1Berken.paddock.soil.Urea
            SoilTemperature Temperature
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