Simulations: Version=192
  DataStore
    ExcelInput ExcelMultiInput: FileNames=[%root%\Tests\Validation\NDVI\Lincoln2015RainShelter.xlsx]; SheetNames=[Observed]
    PredictedObserved NDVIObsPred: PredictedTableName=NDVIDailyReport; ObservedTableName=Observed; FieldNameUsedForMatch=SimulationName; FieldName2UsedForMatch=Clock.Today; AllColumns=false
      Tests: POName=DailyObsPred
        AcceptedStats:
          Name                   n     Slope         Intercept   SEslope      SEintercept  R2           RMSE       NSE         ME          MAE         RSR       RMR
          ET                     123   1.13169       -0.428525   0.0437149    0.169573     0.847065     0.75711    0.750672    0.0416707   0.558234    0.497294  0
          ProfileWater           1327  0.876588      76.0389     0.0130203    5.47947      0.7738       58.7876    0.702733    25.8355     33.06       0.545016  0
          Soil.SoilWater.SW(1)   1300  0.000187106   0.209326    0.000113886  0.00216848   0.00207521   18.9789    -0.0810339  -5.20763    5.28548     1.03933   0
          Soil.SoilWater.SW(10)  8     -0.411168     0.612361    0.204164     0.087484     0.403332     0.0113816  -3.15811    0.00772724  0.00919543  1.90744   0
          Soil.SoilWater.SW(2)   1323  -9.03035e-05  0.237103    7.90585e-05  0.00185795   0.000986689  23.4358    -0.0848838  -6.54813    6.60052     1.04118   0
          Soil.SoilWater.SW(3)   1323  7.41365e-05   0.225765    6.63683e-05  0.00193967   0.000943693  29.1595    -0.0857037  -8.19945    8.22086     1.04158   0
          Soil.SoilWater.SW(4)   1323  0.00032245    0.209832    5.67479e-05  0.00181599   0.0238581    31.9313    -0.0847602  -8.95944    8.97693     1.04112   0
          Soil.SoilWater.SW(5)   1323  0.000184327   0.244192    5.45151e-05  0.00180824   0.00858025   33.0939    -0.0856543  -9.31536    9.33089     1.04155   0
          Soil.SoilWater.SW(6)   1218  0.983201      0.00665286  0.00580358   0.00166975   0.959354     0.0168556  0.958159    0.00202203  0.00893392  0.204467  0
          Soil.SoilWater.SW(7)   1194  0.995766      0.00138347  0.00547865   0.00136097   0.965173     0.0121361  0.964171    0.00036727  0.00674653  0.189207  0
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        AcceptedStatsName=Name n Slope Intercept SEslope SEintercept R2 RMSE NSE ME MAE RSR
  Experiment Lincoln2015NDVICheck
    Memo
      ### Lincoln2012 (Rain-Shelter Trail)

      Testing of APSIM Maize under New Zealand conditions was undertaken using the data of [Teixeira_etal_2014].  This dataset includes the impact of three N (0 to 250 kg/ha N) and two water regimes (dryland and fully irrigated) using a rain-shelter structure.  Observations include biomass growth and nitrogen content of individual organs, soil water contents, leaf area index, phenology and yield components. Total biomass ranged from 8000 kg/ha for dryland nil N crops to up to 28000kg/ha for fully irrigated and N fertilised crops.  Dryland crops recovered 25 percent less N from applied fertilizer than irrigated crops.
    Factors
      Permutation
        Factor Irr
          CompositeFactor Wet
            Specifications:
              [Irrig]
              [StateFactors].Script.Irr = Full
            Operations Full
              2015-09-30  [Irrigation].Apply(10);
              2015-10-01  [Irrigation].Apply(5);
              2015-10-09  [Irrigation].Apply(10);
              2015-10-16  [Irrigation].Apply(15);
              2015-10-22  [Irrigation].Apply(15);
              2015-10-30  [Irrigation].Apply(30);
              2015-11-06  [Irrigation].Apply(12.2);
              2015-11-12  [Irrigation].Apply(13);
              2015-11-12  [Irrigation].Apply(13);
              2015-11-26  [Irrigation].Apply(39);
              2015-12-03  [Irrigation].Apply(40);
              2015-12-24  [Irrigation].Apply(35);
              2015-12-31  [Irrigation].Apply(30);
              2016-01-07  [Irrigation].Apply(30);
          CompositeFactor Dry
            Specifications:
              [Irrig]
              [StateFactors].Script.Irr = Nil
            Operations Nil
              2015-09-30  [Irrigation].Apply(10);
              2015-10-01  [Irrigation].Apply(5);
              2015-10-09  [Irrigation].Apply(10);
              2015-12-24  [Irrigation].Apply(25);
              2016-02-03  [Irrigation].Apply(30);
              2016-02-04  [Irrigation].Apply(40);
              Memo
                Have added an extra irrigation, on 3 Nov,

                Data indcates water applied but no notes of it RFZ
    Simulation Lincoln2015bare
      Weather: FileName=%root%\Tests\Validation\Wheat\met\lincoln.met; Latitude=-43.624; Tav=11.4; Amp=11.5
      Clock: Start=2015-09-07; End=2016-02-15
      Summary summaryfile
      SoilArbitrator Soil Arbitrator
      Zone RainShelter: Area=1; Slope=0; AspectAngle=0; Altitude=50
        Soil TempletonSiltLoam: SoilType=NZ_sedementary; Region=Plains; State=Canterbury; Country=New Zealand; Latitude=0; Longitude=0
          DataSource=Generic profile descriptions provided by Trevor Webb and data for functional horizions based on SWAMP project results
          Comments=Bulk density values were measured on the fine earth fraction so values entered into apsim soil are adjusted down to account for stone content (assuming stones are inert from all soil process so their mass and volume is removed from model paramaters).  SAT, DUL, LL15 and Air dry have been adjusted down to account for stone content.  OC has not been adjusted so the model will get the correct carbon and N amounts using the adjusted BD.
          Chemical: PHUnits=Water
            Thickness  PH  CEC
            180        6   15.095
            150        6   10.37
            400        6   9.056
            270        6   8.813
            500        6   8.7959
            300        6   8.795
            CEC source: Calculated
          WaterBalance SoilWater: SummerDate=1-oct; SummerU=6; SummerCona=3; WinterDate=1-Apr; WinterU=2; WinterCona=3; DiffusConst=0; DiffusSlope=0; Salb=0.13; CN2Bare=77; CNRed=0; CNCov=0.8; PSIDul=-100; Thickness=[200, 200, 200, 200, 200, 200, 200, 200, 200]; SWCON=[0.5, 0.5, 0.5, 0.5, 0.5, 0.5, 0.5, 0.5, 0.5]
          Organic: FOMCNRatio=20; CarbonUnits=Total
            Thickness  Carbon  SoilCNRatio  FBiom   FInert  FOM
            180        3       11           0.03    0.5     731.975
            150        0.9     11           0.02    0.7     584.494
            400        0.316   11           0.0117  0.85    320.777
            270        0.208   11           0.0102  0.945   213.951
            500        0.2004  11           0.01    0.9827  101.063
            500        0.2     11           0.01    0.93    47.7389
          Water: Thickness=[150, 150, 300, 300, 300, 300, 300]; InitialValues=[0.18, 0.18, 0.26, 0.26, 0.23, 0.28, 0.29]; InitialPAWmm=181.5; RelativeTo=LL15; FilledFromTop=false
            Memo
              Using the retest sample values.
          Physical
            Thickness  ParticleSizeSand  ParticleSizeSilt  ParticleSizeClay  Rocks     BD   AirDry  LL15  DUL   SAT
            150        5                 65                30                0.274682  1    0.05    0.05  0.28  0.42
            150        5                 65                30                0.227888  1.1  0.1     0.1   0.28  0.42
            300        5                 65                30                0         1.4  0.17    0.17  0.28  0.42
            300        5                 65                30                0.113501  1.3  0.17    0.17  0.28  0.42
            300        5                 65                30                0         1.4  0.16    0.16  0.28  0.42
            300        5                 65                30                0         1.4  0.16    0.16  0.28  0.42
            300        5                 65                30                0         1.4  0.16    0.16  0.28  0.42
            Rocks, ParticleSizeSand, ParticleSizeSilt, ParticleSizeClay source: Calculated
            SoilCrop WheatSoil: LL=[0.12, 0.1, 0.17, 0.17, 0.23, 0.23, 0.22]; KL=[0.06, 0.06, 0.04, 0.04, 0.03, 0.005, 0]; XF=[1, 0.4, 1, 1, 1, 1, 1]
          Nutrient
          Solute NO3: Thickness=[180, 150, 400, 270, 500, 300]; InitialValues=[8.38, 0.744, 2.68775, 2.70704, 2.136, 1.3618]; InitialValuesUnits=ppm; WaterTableConcentration=0; D0=0; DepthConstant=0; MaxDepthSoluteAccessible=0; RunoffEffectivenessAtMovingSolute=0; MaxEffectiveRunoff=0
          Solute NH4: Thickness=[180, 150, 400, 270, 500, 300]; InitialValues=[0.12, 0.096, 0.06175, 1.33815, 1.568, 0.365455]; InitialValuesUnits=ppm; WaterTableConcentration=0; D0=0; DepthConstant=0; MaxDepthSoluteAccessible=0; RunoffEffectivenessAtMovingSolute=0; MaxEffectiveRunoff=0
          Solute Urea: Thickness=[180, 150, 400, 270, 500, 300]; InitialValues=[0, 0, 0, 0, 0, 0]; InitialValuesUnits=kg/ha; WaterTableConcentration=0; D0=0; DepthConstant=0; MaxDepthSoluteAccessible=0; RunoffEffectivenessAtMovingSolute=0; MaxEffectiveRunoff=0
          SoilTemperature Temperature
        Plant Wheat
        MicroClimate: a_interception=0; b_interception=1; c_interception=0; d_interception=0; SoilHeatFluxFraction=0.4; MinimumHeightDiffForNewLayer=0; NightInterceptionFraction=0.5; ReferenceHeight=2
        Irrigation
        Fertiliser
        SurfaceOrganicMatter: InitialResidueName=wheat; InitialResidueType=wheat; InitialResidueMass=0; InitialStandingFraction=0; InitialCPR=0; InitialCNR=80
        Operations Irrig
        Manager ClimateControl
          StartDate = 10/01/2015 00:00:00
          EndDate = 02/28/2016 00:00:00
```csharp
using Models.Soils;
using System.Xml.Serialization;
using Models;
using Models.PMF;
using System.Text;
using System.Collections.Generic;
using APSIM.Shared.Utilities;
using Models.Core;
using System;
using Models.Climate;

namespace Models
{
    [Serializable] 
    [System.Xml.Serialization.XmlInclude(typeof(Model))]
    public class Script : Model
    {
        [Link] Weather Met;
        [Link] Clock Clock;
    
        [Description("Start Date")]
        public DateTime StartDate { get; set; }
        
        [Description("End Date")]
        public DateTime EndDate { get; set; }
 
    
        [EventSubscribe("PreparingNewWeatherData")]
        private void OnPreparingNewWeatherData(object sender, EventArgs e)
        {
            if ((Clock.Today.Date >= StartDate) && (Clock.Today.Date <= EndDate))
                Met.Rain = 0;        
        }
    }
}
```
        Manager StateFactors
```csharp
using Models.Interfaces;
using APSIM.Shared.Utilities;
using System.Xml.Serialization;
using Models;
using Models.PMF;
using Models.Soils;
using System.Text;
using System.Collections.Generic;
using Models.Core;
using System;
using Models.Soils.Nutrients;

namespace Models
{
    [Serializable] 
    public class Script : Model
    {
        [Link] private Clock Clock;
        [Link] private Irrigation Irrigation;
        [Link] private Soil ThisSoil;
        [Link] private Zone MyZone;
        [Link]
        private IPhysical soilPhysical;
        [Link]
        private ISoilWater waterBalance;
        public string Irr { get; set; }
        public double Nit { get; set; }
        
          
        private void SetSoilLayers()
        {
        
            int i = 0;
            if ((Irr == "Nil") && (Nit == 0))
            {
                if (soilPhysical.Thickness.Length != 7)
                {
                    throw new Exception("Soil layer exception");
                }
                soilPhysical.DUL[0] = 0.31;
                soilPhysical.DUL[1] = 0.34;
                soilPhysical.DUL[2] = 0.32;
                soilPhysical.DUL[3] = 0.23;
                soilPhysical.DUL[4] = 0.29;
                soilPhysical.DUL[5] = 0.29;
                soilPhysical.DUL[6] = 0.29;
                
                double[] nSW = { 0.18, 0.18, 0.26, 0.23, 0.29, 0.29, 0.27 };
                waterBalance.Reset();
                waterBalance.SW = nSW; 
            }   
            if ((Irr == "Nil") && (Nit == 50))
            {
                if (soilPhysical.Thickness.Length != 7)
                {
                    throw new Exception("Soil layer exception");
                }
                soilPhysical.DUL[0] = 0.30;
                soilPhysical.DUL[1] = 0.31;
                soilPhysical.DUL[2] = 0.29;
                soilPhysical.DUL[3] = 0.30;
                soilPhysical.DUL[4] = 0.31;
                soilPhysical.DUL[5] = 0.34;
                soilPhysical.DUL[6] = 0.30;
                
                double[] nSW = { 0.18, 0.18, 0.30, 0.25, 0.29, 0.34, 0.30 };
                waterBalance.Reset();
                waterBalance.SW = nSW; 
            }   
            if ((Irr == "Nil") && (Nit == 250))
            {
                if (soilPhysical.Thickness.Length != 7)
                {
                    throw new Exception("Soil layer exception");
                }
                soilPhysical.DUL[0] = 0.28;
                soilPhysical.DUL[1] = 0.24;
                soilPhysical.DUL[2] = 0.30;
                soilPhysical.DUL[3] = 0.27;
                soilPhysical.DUL[4] = 0.28;
                soilPhysical.DUL[5] = 0.36;
                soilPhysical.DUL[6] = 0.27;
                
                double[] nSW = { 0.18, 0.18, 0.3, 0.27, 0.28, 0.35, 0.27 };
                waterBalance.Reset();
                waterBalance.SW = nSW; 
            }   
            if ((Irr == "Full") && (Nit == 0))
            {
                if (soilPhysical.Thickness.Length != 7)
                {
                    throw new Exception("Soil layer exception");
                }
                soilPhysical.DUL[0] = 0.31;
                soilPhysical.DUL[1] = 0.34;
                soilPhysical.DUL[2] = 0.32;
                soilPhysical.DUL[3] = 0.23;
                soilPhysical.DUL[4] = 0.30;
                soilPhysical.DUL[5] = 0.33;
                soilPhysical.DUL[6] = 0.25;
                
                double[] nSW = { 0.18, 0.18, 0.26, 0.20, 0.30, 0.33, 0.25 };
                waterBalance.Reset();
                waterBalance.SW = nSW; 
            }   
            if ((Irr == "Full") && (Nit == 50))
            {
                if (soilPhysical.Thickness.Length != 7)
                {
                    throw new Exception("Soil layer exception");
                }
                soilPhysical.DUL[0] = 0.31;
                soilPhysical.DUL[1] = 0.28;
                soilPhysical.DUL[2] = 0.30;
                soilPhysical.DUL[3] = 0.29;
                soilPhysical.DUL[4] = 0.31;
                soilPhysical.DUL[5] = 0.33;
                soilPhysical.DUL[6] = 0.30;

                double[] nSW = { 0.18, 0.18, 0.28, 0.27, 0.28, 0.33, 0.30 };
                
                waterBalance.Reset();
                
                waterBalance.SW = nSW; 

            }
            if ((Irr == "Full") && (Nit == 250))
            {
                if (soilPhysical.Thickness.Length != 7)
                {
                    throw new Exception("Soil layer exception");
                }
                soilPhysical.DUL[0] = 0.26;
                soilPhysical.DUL[1] = 0.24;
                soilPhysical.DUL[2] = 0.26;
                soilPhysical.DUL[3] = 0.23;
                soilPhysical.DUL[4] = 0.27;
                soilPhysical.DUL[5] = 0.35;
                soilPhysical.DUL[6] = 0.22;
                
                double[] nSW = { 0.18, 0.18, 0.24, 0.23, 0.27, 0.35, 0.22 };
                waterBalance.Reset();
                waterBalance.SW = nSW; 
            }
        }

        [EventSubscribe("StartOfSimulation")]
        private void OnSimulationCommencing(object sender, EventArgs e)
        {
            SetSoilLayers();
        }
        
        [EventSubscribe("DoManagement")]
        private void OnDoManagement(object sender, EventArgs e)
        {
            //Specify irrigations that were only applied to some of the N treatments
            if (Irr == "Full")
            {
                if (Nit == 250)
                {
                    if ((DateUtilities.CompareDates("10-Dec", Clock.Today) == 0))
                        Irrigation.Apply(40);
                    if ((DateUtilities.CompareDates("17-Dec", Clock.Today) == 0))
                        Irrigation.Apply(39.7);
                    if ((DateUtilities.CompareDates("14-Jan", Clock.Today) == 0))
                        Irrigation.Apply(30);
                    if ((DateUtilities.CompareDates("21-Jan", Clock.Today) == 0))
                        Irrigation.Apply(20.1);
                }
                if (Nit == 50)
                {
                    if ((DateUtilities.CompareDates("10-Dec", Clock.Today) == 0))
                        Irrigation.Apply(40);
                    if ((DateUtilities.CompareDates("14-Jan", Clock.Today) == 0))
                        Irrigation.Apply(30);
                }
            }
            
        }
    }
}
```
        Manager HarvestOnly
```csharp
using Newtonsoft.Json;
using Models.Soils.Nutrients;
using System;
using Models.Core;
using System.Collections.Generic;
using System.Text;
using Models.Soils;
using Models.PMF;
using Models;
using System.Xml.Serialization;
using APSIM.Shared.Utilities;
using Models.PMF.Phen;

namespace Models
{
    [Serializable] 
    public class Script : Model
    {
        [Link] private Plant Wheat;
        [Link(Type = LinkType.Path, Path = "[Wheat].Phenology")]
        private Phenology phenology;


        [JsonIgnore] private bool Harvested {get; set;}
                
        [EventSubscribe("StartOfSimulation")]
        private void OnSimulationCommencing(object sender, EventArgs e)
        {
        
        Harvested = false;
        }

        [EventSubscribe("DoManagement")]
        private void OnDoManagement(object sender, EventArgs e)
        {
            if ((phenology.Stage >= 10) & (Harvested == false))
            {
                Wheat.Harvest(removeBiomassFromOrgans: false);
                Harvested = true;
            }
        }
    }
}
```
        NDVI: DrySoilNDVI=0.13; WetSoilNDVI=0.26; GreenCropNDVI=0.82; DeadCropNDVI=0.1; Value=0
        Report NDVIDailyReport: EventNames=[Clock].DoReport
          VariableNames:
            [Simulation].Name
            [Clock].Today
            [NDVI].Value
            [Wheat].SowingData.Cultivar
            [ISoilWater].SWmm
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