Simulations: Version=159
  Folder Replacements
    Report DailyReport: EventNames=[Clock].DoReport
      VariableNames:
        [Clock].Today
        [Soil].Water.Volumetric
        sum([Soil].Water.MM) as ProfileWater
        [Oats].AboveGround.N
        [Oats].AboveGround.NConc
        [Oats].AboveGround.Wt
        [Oats].AboveGroundLive.N
        [Oats].AboveGroundLive.Wt
        [Oats].AboveGroundDead.N
        [Oats].AboveGroundDead.Wt
        [Oats].Ear.N
        [Oats].Ear.Nconc
        [Oats].Ear.Wt
        [Oats].Grain.N
        [Oats].Grain.NConc
        [Oats].Grain.Number
        [Oats].Grain.Size
        [Oats].Grain.Wt
        [Oats].Leaf.CoverGreen
        [Oats].Leaf.CoverTotal
        [Oats].Leaf.Dead.N
        [Oats].Leaf.Dead.Wt
        [Oats].Leaf.Fn
        [Oats].Leaf.Fw
        [Oats].Leaf.Height
        [Oats].Leaf.LAI
        [Oats].Leaf.Live.N
        [Oats].Leaf.Live.NConc
        [Oats].AboveGroundLive.NConc
        [Oats].Leaf.Live.Wt
        [Oats].Leaf.SpecificArea
        [Phenology].CurrentPhase.Name
        [Phenology].CurrentStageName
        [Oats].Phenology.Stage
        [Oats].Stem.N
        [Oats].Stem.NConc
        [Oats].Stem.Live.NConc
        [Oats].Stem.Wt
        [Oats].SowingData.Cultivar
        [Oats].Leaf.Height
        [Oats].Leaf.LAI
        ([Oats].Leaf.Transpiration + [Soil].SoilWater.Es + [MicroClimate].PrecipitationInterception) as ET
        [Clock].Today.Year
        [Oats].Leaf.Senesced.Wt
        [Irrigation].IrrigationApplied
        [Fertiliser].NitrogenApplied
        [Soil].SoilWater.Drainage as Drainage
        [Soil].SoilWater.LeachNO3 as LeachedNO3
    Report HarvestReport: EventNames=[Oats].Harvesting
      VariableNames:
        [Leaf].Number
        [Leaf].FinalLeafNumber
        [Phenology].FlagLeafDAS
        [Phenology].FloweringDAS
        [Phenology].MaturityDAS
        [Phenology].CurrentPhase.Name
        [Phenology].CurrentStageName
        [Oats].AboveGroundLive.Wt
        [Oats].AboveGround.Wt
        [Oats].Grain.Wt
    Report EnviroReport: EventNames=[Clock].DoReport
      VariableNames:
        [Clock].Today
        [Weather].MeanT
        [Weather].Radn
        [Weather].Rain
        [Irrigation].IrrigationApplied
        [Oats].Leaf.Fw
        ([Oats].Leaf.Transpiration + [Soil].SoilWater.Es + [MicroClimate].PrecipitationInterception) as ET
        [MicroClimate].PrecipitationInterception as Interception
        [Soil].SoilWater.Es as Evaporation
        [Soil].SoilWater.Drainage as Drainage
        [Soil].SoilWater.Runoff as Runoff
        sum([Soil].Water.MM) as TotalSoilWater
        sum([Soil].Nutrient.MineralisedN) as MineralisedN
        [Fertiliser].NitrogenApplied as FertiliserN
        sum([Soil].Nutrient.Natm) as DenitrifiedN
        ([Soil].SoilWater.LeachUrea+[Soil].SoilWater.LeachNH4+[Soil].SoilWater.LeachNO3) as NLeached
        [SurfaceOrganicMatter].N as TotalSurfOMN
        sum([Soil].Nutrient.FOM.N) as TotalFOMN
        sum([Soil].Nutrient.Microbial.N) as TotalMicrobialN
        sum([Soil].Nutrient.Humic.N) as TotalHumicN
        (sum([Soil].NH4.kgha) + sum([Soil].NO3.kgha)) as TotalSoilN
        sum([Soil].Urea.kgha) as TotalUrea
        sum([Soil].NH4.kgha) as TotalNH4
        sum([Soil].NO3.kgha) as TotalNO3
    Report DailyReportWater_n_MineralN: EventNames=[Clock].EndOfDay
      VariableNames:
        [Clock].Today
        ([Soil].OutputNutrientLayers.NO3[1] + [Soil].OutputNutrientLayers.NH4[1]) as SoilN_0_15
        ([Soil].OutputNutrientLayers.NO3[2] + [Soil].OutputNutrientLayers.NH4[2]) as SoilN_15_30
        ([Soil].OutputNutrientLayers.NO3[3] + [Soil].OutputNutrientLayers.NH4[3]) as SoilN_30_60
        ([Soil].OutputNutrientLayers.NO3[4] + [Soil].OutputNutrientLayers.NH4[4]) as SoilN_60_90
        (SoilN_0_15 + SoilN_15_30 ) as SoilN_0_30
        (SoilN_0_15 + SoilN_15_30 + SoilN_30_60) as SoilN_0_60
        (SoilN_0_15 + SoilN_15_30 + SoilN_30_60 + SoilN_60_90) as SoilN_0_90
      Memo
        Measurements

        Soil samples will be collected from each plot:

        0-15, 15-30 and 30-60 cm depths (or to stones).

        Composite sample of 10 cores 1 m apart following a 10 m transect across the plot. The intensive regime is to account for urine patch variability, and ensure we intercept a proportionally accurate number of urine patches across the plot.

        Soil mineral N (nitrate and ammonium) measured at every depth.

        Basic mineral analysis for 0-15 cm depth (combined sample from all reps).

        Following emergence, plant counts will be performed to assess achieved plant population

        Crop canopy development will be monitored at regular intervals using a hand-held Greenseeker (reflectance measurements).

        Biomass will be measured at three key crop stages of the ‘control treatment’ (all treatments simultaneously measured at each sampling occasion):

        GS21 (tillering), September

        GS32 (2nd node), October

        GS45 (booting) = final harvest, November

        For each biomass harvest, 3x 0.5 m2 quadrats (1.5 m2 in total) in each plot will be cut at ground level and total fresh biomass weighed. A ≈300g subsample will be taken, weighed after drying at 60°C until constant weight (dry matter content), and then ground and analysed for total N content using a LECO CNS analyser in order to determine crop N uptake.

        At final harvest, a separate subsample will also be taken and sent to Hills Laboratories to measure feed quality.

        Climate data (rainfall, air and soil temperature, radiation) will be recorded via a local NIWA or on-site weather station for each site.
    Manager Harvesting
```csharp
using Models.PMF.Phen;
using APSIM.Shared.Utilities;
using System.Xml.Serialization;
using Models;
using Models.PMF;
using Models.Soils;
using System.Text;
using System.Collections.Generic;
using Models.Core;
using System;
using Models.Soils.Nutrients;

namespace Models
{
    [Serializable] 
    public class Script : Model
    {
        [Link] private Plant Oats;
        [Link(Type = LinkType.Path, Path = "[Oats].Phenology")]
        private Phenology phenology;
        [EventSubscribe("DoManagement")]
        private void OnDoManagement(object sender, EventArgs e)
        {
            if (phenology.CurrentPhase.Name == "Maturing")
            {
                Oats.Harvest();
                Oats.EndCrop();
            }
        }
    }
}
```
    ExpressionFunction HaunStageTerminalSpikelet: Expression=([Leaf].FinalLeafNumber - 5.85)/1.1
      Memo
        The Haun stage at which Terminal Spikelet occurs is determined from final leaf number using the approach described in [Brown_Anthesis_2013].
    Plant Oats: PlantType=Wheat; IsEnding=false; DaysAfterEnding=0
      Memo Introduction
        _Brown, H.E., Huth, N.I. and Holzworth, D.P._

        The APSIM wheat model has been developed using the Plant Modelling Framework (PMF) of [brown_plant_2014]. This new framework provides a library of plant organ and process submodels that can be coupled, at runtime, to construct a model in much the same way that models can be coupled to construct a simulation. This means that dynamic composition of lower level process and organ classes (e.g. photosynthesis, leaf) into larger constructions (e.g. maize, wheat, sorghum) can be achieved by the model developer without additional coding.

        The wheat model consists of:

        * a phenology model to simulate development through sequential developmental phases
        * a structure model to simulate plant morphology
        * a collection of organs to simulate the various plant parts
        * an arbitrator to allocate resources (N, biomass) to the various plant organs

        This work builds upon earlier APSIM Wheat models such as NWheat ([Asseng200225], [KeatingNWheat]), NWheatS ([Asseng1998163]), Cropmod-Wheat ([Wang2002GenericCropModel]), and the earlier versions developed in Plant (<a href=\"http://www.apsim.info/Documentation/Model,CropandSoil/CropModuleDocumentation/Wheat.aspx">APSIM Wheat 7.5</a>") and then within the Plant Modelling Framework ([brown_plant_2014]).
      OrganArbitrator Arbitrator
        BiomassTypeArbitrator DMArbitration
          Folder PotentialPartitioningMethods
            ReallocationMethod
            AllocateFixationMethod
            RetranslocationMethod
            SendPotentialDMAllocationsMethod
          Folder AllocationMethods
            NutrientConstrainedAllocationMethod
            DryMatterAllocationsMethod
          RelativeAllocation ArbitrationMethod
        BiomassTypeArbitrator NArbitration
          Folder PotentialPartitioningMethods
            ReallocationMethod
          Folder ActualPartitioningMethods
            AllocateFixationMethod
            RetranslocationMethod
          Folder AllocationMethods
            NitrogenAllocationsMethod
          RelativeAllocation ArbitrationMethod
          AllocateUptakesMethod
        WaterUptakeMethod
        NitrogenUptakeMethod
      Phenology
        Memo
          Wheat exhibits a range of developmental responses to environment and these are strongly influenced by genotype characteristics.
          Temperature is the primary driver of development, increasing development rates and decreasing phase durations as it increases.  These affects are captured by thermal time.  However, wheat also exhibits cold and photoperiod sensitivities in its Vernalisaing phase and further photoperiod sensitivity in the SpikeletDifferenation and HeadEmergence phases.  Photoperiod responses are seen as a reduction in the length of a phase for a photoperiod sensitive genotype in response to a longer photoperiod.  Vernalisation responses are more complicated as they are driven by cool temperature but interact with photoperiod.  For vernalisation sensitive varieties (Winter types), exposure to cool temperatures and/or short photoperiods during the Vernalising phase may reduce its thermal time duration.

          APSIM wheat implements the Cereal Anthesis Molecular Phenology (CAMP) model to simulate development.  It is based on the Kirby Framework which assumes the timing of anthesis is a result of the timing of flag leaf and an additional thermal time passage from there to heading then anthesis.  It also assumes the timing of flag leaf is a result of the Final Leaf Number (which sets a target) and leaf appearance rate (which sets the rate of progress toward the target).  Leaf appearance rate is a function of Thermal time and a genotype specific Phyllochron which changes with Haun stage as described by [Jamieson_LeafAppearance_1995].

          Final Leaf Number (FLN) is set on the day that terminal spikelet occurs as:

          FLN = 2.85 + 1.1 * TSHS

          Where TSHS is the Haun stage on the day terminal spikelet stage occurs.  Terminal spikelet is at the end of the SpikeletDifferentaiation phase which is preceeded by the Emerging and Vernalising phases.  The mechanisums for progress through each of these phase are described below
        DivideFunction MeanTemp
          AddFunction TempSum
            VariableReference MaxT: VariableName=[Weather].MaxT
            VariableReference MinT: VariableName=[Weather].MinT
          Constant Two: FixedValue=2
        HourlyInterpolation ThermalTime: agregationMethod=0
          XYPairs Response: X=[0, 26, 37]; Y=[0, 26, 0]
          Memo
            Thermal time determines the rate of developmental progress through many of the crops phases and is used by organs to determing potential growth rates.
          ThreeHourSin InterpolationMethod
        PhotoperiodFunction Photoperiod: Twilight=-6; DayLength=0
        GerminatingPhase Germinating: Start=Sowing; End=Germination
        EmergingPhase Emerging: Start=Germination; End=Emergence; TTForTimeStep=0
          VariableReference ThermalTime: VariableName=[Phenology].ThermalTime
          AddFunction Target
            Constant ShootLag: FixedValue=40
            MultiplyFunction DepthxRate
              VariableReference SowingDepth: VariableName=[Plant].SowingData.Depth
              Constant ShootRate: FixedValue=1.5
        VernalisationPhase Vernalising: Start=Emergence; End=VernalSaturation
          Memo
            Progress through the vernalising phase is determined by the apparent expression of Vrn1 and Vrn2 genes.  The CAMP model predicts the expression of these two genes.
            Vrn1 is the gene that orchestrates cold temperature responses in development.  To complete the vernalising stage firstly apparent Vrn1 expression must reach a value of at least 1.0.  In warm temperatures (>18oC), Vrn1 is expressed at a base rate that is genotype dependent.  This base rate is lower for vernalisation sensitive genotypes which will develop slower in the warm.  Vrn1 expression (relative to Haun stage increment) increases as temperature decreases so exposure to cold conditions will cause vernalisation sensitive varieties to develop faster (i.e. reach vernalisation at a lower Haun stage).  Vrn2 is up-regulated by longer photoperiods.  It blocks the expression of Vrn3 (which is required for progression through the spikelet differentiation phase) and must be down regulated completely before the vernalising phase is complete.  Vrn1 blocks Vrn2 expression so in effect the expression of Vrn2 raises the target for Vrn1 expression above 1.0.  The longer the photoperiod the greater the target increase so exposure to short days will reduce the target and length of the vernalising phase, a phenomena some times called short day vernalisation.  Vrn3 may also be active and accelerate the expression of Vrn1 during the vernalisation phase.  This effect is currently captured by VrnX in CAMP.
            The duration of the vernalising phase will be the result of a complex interaction between temperature, photoperiod and the genotypes tendency to express Vrn1 at warm temperatures (baseDeltaVrn1) and Vrn2 and Vrn3 under long photoperiods (MaxDpVrn2, MaxDVrnX).  These three rates are derived internally by the CAMP model from the genotypes FLNparams.
        GenericPhase SpikeletDifferentiation: Start=VernalSaturation; End=TerminalSpikelet
          VariableReference Progression: VariableName=[Phenology].CAMP.dVrn3
          Constant Target: FixedValue=1
          Memo
            Progress through the Spike differentiation phase is determined by the apparent expression of Vrn3 as predicted by CAMP.
            Vrn3 is a photoperiod sensitive gene that promotes expression of Vrn1.  Vrn1 is not able to express to adequate levels to achieve reproductive transition without Vrn3 upregulation.   Here we assume an apparent Vrn3 expression of 1.0 is sufficient to upregulate Vrn1 enough to trigger terminal spikelet.
             Each genotype has a base rate of Vrn3 expression (baseDVrn3) at low photoperiods and a maximum rate of Vrn3 expression (maxDVrn3) under long photoperiods.  These two rates are derived internally by the CAMP model from the genotypes FLNparams.
        GenericPhase StemElongation: Start=TerminalSpikelet; End=FlagLeaf
          VariableReference Progression: VariableName=[Leaf].HaunStage.Delta
          ExpressionFunction Target: Expression=[Phenology].CAMP.FLN - [Phenology].CAMP.TSHS
          Memo: same as Replacements.Oats.Phenology.SpikeletDifferentiation.Memo
        GenericPhase HeadEmergence: Start=FlagLeaf; End=Heading
          VariableReference Progression: VariableName=[Phenology].ThermalTime
          AddFunction Target
            VariableReference LongPpBase: VariableName=[Phenology].HeadEmergenceLongDayBase.FixedValue
            MultiplyFunction ShortPpExtension
              VariableReference LongPpBase: VariableName=[Phenology].HeadEmergenceLongDayBase.FixedValue
              VariableReference PpSens: VariableName=[Phenology].HeadEmergencePpSensitivity.FixedValue
              LinearInterpolationFunction PpResponse
                XYPairs: X=[6, 8, 20, 22]; Y=[1, 1, 0, 0]
                VariableReference XValue: VariableName=[Phenology].Photoperiod
        GenericPhase EarlyFlowering: Start=Heading; End=Flowering
          VariableReference Progression: VariableName=[Phenology].ThermalTime
          Constant Target: FixedValue=80; Units=oCd
        GenericPhase GrainDevelopment: Start=Flowering; End=StartGrainFill
          Constant Target: FixedValue=120
          VariableReference Progression: VariableName=[Phenology].ThermalTime
        GenericPhase GrainFilling: Start=StartGrainFill; End=EndGrainFill
          Constant Target: FixedValue=545
          VariableReference Progression: VariableName=[Phenology].ThermalTime
        GenericPhase Maturing: Start=EndGrainFill; End=Maturity
          Constant Target: FixedValue=35
          VariableReference Progression: VariableName=[Phenology].ThermalTime
        GenericPhase Ripening: Start=Maturity; End=HarvestRipe
          Constant Target: FixedValue=300
          VariableReference Progression: VariableName=[Phenology].ThermalTime
        EndPhase ReadyForHarvesting: Start=HarvestRipe; End=Unused
          VariableReference ThermalTime: VariableName=[Phenology].ThermalTime
        ZadokPMFWheat Zadok
          VariableReference HaunStage: VariableName=[Leaf].HaunStage
          VariableReference TillerNumber: VariableName=[Leaf].HaunStage
        Constant HeadEmergencePpSensitivity: FixedValue=2
          Memo
            The phyllochrons duration for the plant to go from flag leaf ligual appearance at 16 h Pp compared to the phyllochron duration for the same phase at 8 h Pp.
        Constant HeadEmergenceLongDayBase: FixedValue=200
          Memo
            The phyllochrons duration for the plant to go from flag leaf ligual appearance at 16 h Pp.
        OnEventFunction TerminalSpikeletDAS: SetEvent=TerminalSpikelet; ReSetEvent=never
          Memo
            A function is used to provide flowering date as days after sowing(DAS).
          Constant PreEventValue: FixedValue=0
          VariableReference PostEventValue: VariableName=[Plant].DaysAfterSowing
        OnEventFunction FlagLeafDAS: SetEvent=FlagLeaf; ReSetEvent=never
          Memo
            A function is used to provide flowering date as days after sowing(DAS).
          Constant PreEventValue: FixedValue=0
          VariableReference PostEventValue: VariableName=[Plant].DaysAfterSowing
        OnEventFunction HeadingDAS: SetEvent=Heading; ReSetEvent=never
          Memo
            A function is used to provide heading date as days after sowing(DAS).
          Constant PreEventValue: FixedValue=0
          VariableReference PostEventValue: VariableName=[Plant].DaysAfterSowing
        OnEventFunction FloweringDAS: SetEvent=Flowering; ReSetEvent=Germination
          Memo
            A function is used to provide flowering date as days after sowing(DAS).
          Constant PreEventValue: FixedValue=0
          VariableReference PostEventValue: VariableName=[Plant].DaysAfterSowing
        OnEventFunction MaturityDAS: SetEvent=Maturity; ReSetEvent=never
          Memo
            A function is used to provide maturity date as days after sowing(DAS).
          Constant PreEventValue: FixedValue=0
          VariableReference PostEventValue: VariableName=[Plant].DaysAfterSowing
        OnEventFunction EmergenceDAS: SetEvent=Emergence; ReSetEvent=never
          Memo
            A function is used to provide flowering date as days after sowing(DAS).
          Constant PreEventValue: FixedValue=0
          VariableReference PostEventValue: VariableName=[Plant].DaysAfterSowing
        CAMP
          VariableReference Tt: VariableName=[Phenology].ThermalTime
          LinearInterpolationFunction PpResponse
            XYPairs: X=[0, 8, 16, 24]; Y=[0, 0, 1, 1]
            VariableReference XValue: VariableName=[Phenology].Photoperiod
          HourlyInterpolation DailyColdVrn1: agregationMethod=1
            ColdUpRegVrn1 Response
              Constant k: FixedValue=-0.17; Units=/oCd
              Constant DeVernalisationTemp: FixedValue=20; Units=/oCd
              Constant DeVernalisationRate: FixedValue=0; Units=/oCd
            HourlySinPpAdjusted InterpolationMethod
          FinalLeafNumberSet FLNparams: MinLN=8.3; PpLN=3.8; VrnLN=5; VxPLN=-2
          FLNParameterEnvironment EnvData: VrnTreatTemp=6; VrnTreatDuration=60; TreatmentPTQ_L=1.2; TreatmentPTQ_S=0.6; TtEmerge=90
          CalcCAMPVrnRates
          Memo
            The CAMP model was derived to integrate molecular and physiological models of cereal flowering time to better capture G x E x M interactions and to provide a framework for linking genetic data to field behaviour.  It calculates the current levels of expression of Vrn1, 2 and 3 genes from daily deltas that are all calculated relative to haun stage deltas in addition to temperature (Vrn1) and photoperiod (Vrn 2 and 3).  To reach the vernalisation stage Vrn1 must be upregulated to a value of at least 1.0.  Where Vrn2 is also being expressed the target for Vrn1 expression increases in parallel as more Vrn1 expression is needed to block Vrn2 and allow Vrn3 expression.  Once Vrn2 expression is blocked Vrn3 will be upregulated and terminal spikelet occurs when its apparent expression reaches 1.0.  CAMP also predicts expression of VrnX which represents the relative contributions of Vrn2 and Vrn3 prior to vernalisation.  The genotype specific rates of gene expression are derived from final leaf number parameters (FLNparams):

            MinLN - The final leaf number (FLN) of the genotype when fully vernalised early and grown under long (>=16) photoperiod following vernalisation (FLN_LV).  These conditions maximise the expression of vernalisation and photoperiod genes and this parameter provides a measure of inherent earliness of the genotype. It may vary between 5 and 15 leaves (7 is typical).

            PpLN - The difference between MinLN and the FLN of a genotype when fully vernalised early and grown under short (<=8h) photoperiod following vernalisation (FLN_SV).  These conditions maximise Vrn1 expression but minimise Vrn2 and 3 expression and PpLN provides a measure of photoperiod sensitivity of the genotype.  It may vary between 0 and 8 leaves with 1 being typical of a low sensitivity genotype and 4 being typical of a high sensitivity genotype.

            VrnLN - The difference between MinLN and the FLN – PpLN of the genotype when not vernalised and grown under short photoperiod (FLN_SN).  These conditions minimise Vrn and Pp gene expression to base (minimal) values and VrnLN is a measure of vernalisation sensitivity of the genotype.  It may vary between 0 and 9 leaves with 1 being typical for an insensitive variety and 5 being typical for a sensitive variety.

            VxPLN - The difference between MinLN + VrnLN and the FLN of the genotype when not vernalised and grown under long photoperiod (FLN_LN).  These conditions minimise upregulation of Vrn1 and maximise upregulation of Vrn2 and 3 and this parameter provides a measure of the relative activities of Vrn2 and Vrn3 during the vernalisation phase. A positive value shows short days accelerate vernalisation and a negative value shows short days slow vernalisation.  The value of VxPLN should be greater than the negative of VrnLN and typically varies between +2 and -4.
      ReproductiveOrgan Grain: GrowthRespiration=0; MaintenanceRespiration=0; RipeStage=Ripe
        Biomass Live
        Biomass Dead
        HoldFunction NumberFunction: WhenToHold=Flowering
          MultiplyFunction GrainNumber
            Constant GrainsPerGramOfStem: FixedValue=26; Units=grains
            VariableReference StemMass: VariableName=[StemPlusPanicle].Wt
        Constant InitialGrainProportion: FixedValue=0.05
        Constant MaximumPotentialGrainSize: FixedValue=0.032; Units=g
        PhaseLookup DMDemandFunction
          PhaseLookupValue InitialPhase: Start=Flowering; End=StartGrainFill
            FillingRateFunction
              VariableReference NumberFunction: VariableName=[Grain].NumberFunction
              VariableReference FillingDuration: VariableName=[Phenology].GrainDevelopment.Target
              VariableReference ThermalTime: VariableName=[Phenology].ThermalTime
              MultiplyFunction PotentialSizeIncrement
                VariableReference InitialProportion: VariableName=[Grain].InitialGrainProportion
                VariableReference MaximumSize: VariableName=[Grain].MaximumPotentialGrainSize
          PhaseLookupValue LinearPhase: Start=StartGrainFill; End=EndGrainFill
            FillingRateFunction
              VariableReference NumberFunction: VariableName=[Grain].NumberFunction
              VariableReference FillingDuration: VariableName=[Phenology].GrainFilling.Target
              VariableReference ThermalTime: VariableName=[Phenology].ThermalTime
              MultiplyFunction PotentialSizeIncrement
                SubtractFunction ProportionLinearPhase
                  Constant One: FixedValue=1
                  VariableReference InitialProportion: VariableName=[Grain].InitialGrainProportion
                VariableReference MaximumSize: VariableName=[Grain].MaximumPotentialGrainSize
        Constant MinimumNConc: FixedValue=0.0123
        Constant MaxNConcDailyGrowth: FixedValue=0.03
        Constant MaximumNConc: FixedValue=0.03
        PhaseLookup NFillingRate
          PhaseLookupValue GrainFilling: Start=Flowering; End=EndGrainFill
            FillingRateFunction
              VariableReference NumberFunction: VariableName=[Grain].NumberFunction
              AddFunction FillingDuration
                VariableReference FloweringToGrainFilling: VariableName=[Phenology].GrainDevelopment.Target
                VariableReference GrainFilling: VariableName=[Phenology].GrainFilling.Target
              VariableReference ThermalTime: VariableName=[Phenology].ThermalTime
              MultiplyFunction PotentialSizeIncrement
                VariableReference MaximumSize: VariableName=[Grain].MaximumPotentialGrainSize
                VariableReference MaximumNConc: VariableName=[Grain].MaximumNConc
        Constant WaterContent: FixedValue=0.12
        AccumulateFunction AccumThermalTime: StartStageName=Flowering; EndStageName=Maturity; FractionRemovedOnCut=0; FractionRemovedOnHarvest=0; FractionRemovedOnGraze=0; FractionRemovedOnPrune=0
          VariableReference DailyThermalTimeValue: VariableName=[Phenology].ThermalTime
        ExpressionFunction Protein
          Expression=([Grain].Live.N + [Grain].Dead.N)/([Grain].Live.Wt + [Grain].Dead.Wt) * 100 * 5.71
        BiomassRemoval BiomassRemovalDefaults
          OrganBiomassRemovalType Harvest: FractionLiveToRemove=1; FractionDeadToRemove=1; FractionLiveToResidue=0; FractionDeadToResidue=0
          OrganBiomassRemovalType Cut: FractionLiveToRemove=1; FractionDeadToRemove=1; FractionLiveToResidue=0; FractionDeadToResidue=0
          OrganBiomassRemovalType Prune: FractionLiveToRemove=0; FractionDeadToRemove=0; FractionLiveToResidue=0; FractionDeadToResidue=0
          OrganBiomassRemovalType Graze: FractionLiveToRemove=0; FractionDeadToRemove=0; FractionLiveToResidue=0; FractionDeadToResidue=0
          OrganBiomassRemovalType Thin: FractionLiveToRemove=0; FractionDeadToRemove=0; FractionLiveToResidue=0; FractionDeadToResidue=0
        Constant DMConversionEfficiency: FixedValue=1
        Constant RemobilisationCost: FixedValue=0
        Constant CarbonConcentration: FixedValue=0.4
        NutrientPoolFunctions DMDemandPriorityFactors
          Constant Structural: FixedValue=1
          Constant Metabolic: FixedValue=1
          Constant Storage: FixedValue=1
        NutrientPoolFunctions NDemandPriorityFactors: same as Replacements.Oats.Grain.DMDemandPriorityFactors
      SimpleLeaf Leaf: Albedo=0.25; Gsmax350=0.015; R50=150; LeafInitialisationStage=Emergence; Height=0; BaseHeight=0; Width=0; FRGR=0; PotentialEP=0; WaterDemand=0; KDead=0.2; LAIDead=0
        RUEModel Photosynthesis
          Constant RUE: FixedValue=1.6
          WeightedTemperatureFunction FT: MaximumTemperatureWeighting=0.75
            XYPairs: X=[0, 15, 25, 35]; Y=[0, 1, 1, 0]
          LinearInterpolationFunction FN
            XYPairs: X=[0, 1, 1.5]; Y=[0, 1, 1]
            VariableReference XValue: VariableName=[Leaf].Fn
          LinearInterpolationFunction FW
            XYPairs: X=[0, 1, 1]; Y=[0, 1, 1]
            VariableReference XValue: VariableName=[SoilWaterScale]
          LinearInterpolationFunction FVPD
            XYPairs: X=[0, 10, 40]; Y=[1, 1, 0]
            VariableReference XValue: VariableName=[Leaf].Photosynthesis.VPD
          RUECO2Function FCO2: PhotosyntheticPathway=C3
          VariableReference RadnInt: VariableName=[Leaf].RadiationIntercepted
        StomatalConductanceCO2Modifier
          VariableReference PhotosynthesisCO2Modifier: VariableName=[Leaf].Photosynthesis.FCO2
        MaximumFunction Area
          AddFunction Calculation
            MultiplyFunction Initial
              Constant AreaPerPlant: FixedValue=1e-05; Units=m2
              VariableReference Population: VariableName=[Oats].Population
            SubtractFunction Change
              AccumulateAtEvent AreaGrowth: StartStageName=Emergence; EndStageName=Heading; AccumulateEventName=[Clock].DoActualPlantGrowth
                MultiplyFunction DeltaArea
                  VariableReference DeltaMass: VariableName=[Leaf].Allocated.StructuralWt
                  VariableReference SLA: VariableName=[Leaf].SpecificArea
              AccumulateAtEvent AreaSenesced: StartStageName=Emergence; EndStageName=HarvestRipe; AccumulateEventName=[Clock].DoActualPlantGrowth
                MultiplyFunction DeltaArea
                  VariableReference DeltaSenesced: VariableName=[Leaf].Senesced.StructuralWt
                  VariableReference SLA: VariableName=[Leaf].SpecificAreaCanopy
              AccumulateAtEvent AreaRemoved: StartStageName=Emergence; EndStageName=HarvestRipe; AccumulateEventName=[Clock].DoReportCalculations
                MultiplyFunction DeltaArea
                  VariableReference DeltaRemoved: VariableName=[Leaf].Removed.StructuralWt
                  VariableReference SLA: VariableName=[Leaf].SpecificAreaCanopy
          Constant Zero: FixedValue=0
        MinimumFunction FRGR
          VariableReference RUE_FT: VariableName=[Leaf].Photosynthesis.FT
          VariableReference RUE_FN: VariableName=[Leaf].Photosynthesis.FN
          VariableReference RUE_FVPD: VariableName=[Leaf].Photosynthesis.FVPD
        MultiplyFunction ExtinctionCoefficient
          Constant VegetativePhase: FixedValue=0.5
          LinearInterpolationFunction DevelopmentFactor
            XYPairs: X=[3, 4, 5, 5.7, 6]; Y=[1, 1, 1, 1, 1.2]
            Memo
              Exntiction coefficient increases at stem extension as leaves become more prostrate
            VariableReference XValue: VariableName=[Phenology].Stage
        HeightFunction Tallness
          LinearInterpolationFunction PotentialHeight
            XYPairs: X=[3, 4, 5, 6]; Y=[10, 200, 200, 1000]
            VariableReference XValue: VariableName=[Phenology].Stage
          LinearInterpolationFunction WaterStress
            XYPairs: X=[0.3, 1]; Y=[0, 1]
            VariableReference XValue: VariableName=[SoilWaterScale]
        AccumulateFunction HaunStage: StartStageName=Emergence; EndStageName=FlagLeaf; FractionRemovedOnCut=0; FractionRemovedOnHarvest=0; FractionRemovedOnGraze=0; FractionRemovedOnPrune=0
          DivideFunction Delta
            VariableReference ThermalTime: VariableName=[Phenology].ThermalTime
            VariableReference Phyllochron: VariableName=[Leaf].Phyllochron
        SubtractFunction TillerNumber
          AddFunction Total
            Constant One: FixedValue=1
            AccumulateFunction TillerNumber: StartStageName=Emergence; EndStageName=TerminalSpikelet; FractionRemovedOnCut=0; FractionRemovedOnHarvest=1; FractionRemovedOnGraze=0; FractionRemovedOnPrune=0
              MultiplyFunction DeltaTiller
                VariableReference DeltaNode: VariableName=[Leaf].HaunStage.Delta
                VariableReference TilleringRate: VariableName=[Leaf].TilleringRate
                MinimumFunction StressFactors
                  LinearInterpolationFunction NitrogenEffect
                    Memo
                      Inadequate Nitrogen supply is assumed to affect tillering prior to any effect on photosynthesis or leaf size.
                    XYPairs: X=[0.5, 2, 3]; Y=[0, 1, 1]
                    VariableReference XValue: VariableName=[Arbitrator].FN
                  LinearInterpolationFunction CoverEffect
                    Memo
                      Tillering is said to cease once a threshold fraction of incoming radiation has been achieved.  This captures shading effects on tillering described by [evers2006cessation].
                    XYPairs: X=[0, 0.1, 0.25]; Y=[1, 1, 0]
                    VariableReference XValue: VariableName=[Leaf].CoverTotal
                  LinearInterpolationFunction WaterStressEffect
                    XYPairs: X=[0, 1]; Y=[0, 1]
                    VariableReference XValue: VariableName=[SoilWaterScale]
          AccumulateFunction DeadTillers: StartStageName=FlagLeaf; EndStageName=Flowering; FractionRemovedOnCut=0; FractionRemovedOnHarvest=1; FractionRemovedOnGraze=0; FractionRemovedOnPrune=0
            MultiplyFunction DeadTillers
              VariableReference ThermalTime: VariableName=[Phenology].ThermalTime
              VariableReference AbortionRate: VariableName=[Leaf].TillerAbortionRate
        AccumulateFunction Number: StartStageName=Emergence; EndStageName=Flowering; FractionRemovedOnCut=1; FractionRemovedOnHarvest=1; FractionRemovedOnGraze=1; FractionRemovedOnPrune=0
          MultiplyFunction DailyNumberIncrease
            VariableReference DeltaNode: VariableName=[Leaf].HaunStage.Delta
            VariableReference TillerNumber: VariableName=[Leaf].TillerNumber
            VariableReference PlantNumber: VariableName=[Oats].SowingData.Population
        Constant NReallocationFactor: FixedValue=1
          Memo
            This model assumes that all metabolic and storage N is available for reallocation from senescing leaves.
        PhaseLookup SenescenceRate
          PhaseLookupValue Vegetative: Start=Emergence; End=Heading
            AddFunction Total
              LinearInterpolationFunction WaterStressRate
                XYPairs: X=[0, 0.3, 1]; Y=[0.05, 0, 0]
                VariableReference XValue: VariableName=[SoilWaterScale]
              LinearInterpolationFunction ShadingInducedRate
                XYPairs: X=[0, 0.9, 1]; Y=[0, 0, 0.02]
                VariableReference XValue: VariableName=[Leaf].CoverTotal
          PhaseLookupValue Reproductive: Start=Heading; End=Maturity
            MinimumFunction ConstrainedRate
              MultiplyFunction StressedRate
                DivideFunction AgeRate
                  VariableReference TT: VariableName=[Phenology].ThermalTime
                  SubtractFunction TTRemaining
                    ExpressionFunction TTRequired
                      Expression=[Phenology].EarlyFlowering.Target + [Phenology].GrainDevelopment.Target + [Phenology].GrainFilling.Target + [Phenology].Maturing.Target
                    ExpressionFunction TTComplete
                      Expression=[Phenology].EarlyFlowering.ProgressThroughPhase + [Phenology].GrainDevelopment.ProgressThroughPhase + [Phenology].GrainFilling.ProgressThroughPhase + [Phenology].Maturing.ProgressThroughPhase
                LinearInterpolationFunction WaterStressAcelleration
                  XYPairs: X=[0, 0.3, 1]; Y=[2, 1, 1]
                  VariableReference XValue: VariableName=[SoilWaterScale]
              Constant: FixedValue=1
            Memo
              Leaf senescence rate is calculated to ensure that all leaves are senesced by crop maturity.
            Memo Memo1
              There is no data on detachment rates and so a simple value was chosen to ensure that leaves were not retained in the canopy. In the future, with more data available a thermal time basis leaf detachment rate will be explored.
        Constant DetachmentRate: FixedValue=0.05; Units=/d
        MultiplyFunction InitialWt
          DivideFunction WeightPerPlant
            VariableReference Area: VariableName=[Oats].Leaf.Area.Calculation.Initial.AreaPerPlant
            VariableReference SLA: VariableName=[Oats].Leaf.SpecificArea
          VariableReference Population: VariableName=[Oats].SowingData.Population
        MultiplyFunction LAIDead
          VariableReference SLA: VariableName=[Leaf].SpecificArea
          VariableReference LeafDeadWt: VariableName=[Leaf].Dead.Wt
        LinearInterpolationFunction MaximumNConc
          XYPairs: X=[3, 4, 6]; Y=[0.08, 0.05, 0.02]
          VariableReference XValue: VariableName=[Phenology].Stage
        MultiplyFunction CriticalNConc
          LinearInterpolationFunction CriticalNConcAt350ppm
            XYPairs: X=[3, 4, 6]; Y=[0.07, 0.04, 0.015]
            VariableReference XValue: VariableName=[Phenology].Stage
          LinearInterpolationFunction CO2Factor
            XYPairs: X=[350, 700]; Y=[1, 0.93]
            VariableReference XValue: VariableName=[IWeather].CO2
        LinearInterpolationFunction MinimumNConc
          XYPairs: X=[3, 4, 6]; Y=[0.01, 0.005, 0.005]
          VariableReference XValue: VariableName=[Phenology].Stage
        Constant MaintenanceRespiration: FixedValue=0; Units=0-1
        Constant DMConversionEfficiency: FixedValue=1; Units=0-1
        BiomassRemoval BiomassRemovalDefaults
          OrganBiomassRemovalType Harvest: FractionLiveToRemove=0; FractionDeadToRemove=0; FractionLiveToResidue=0.8; FractionDeadToResidue=0.8
          OrganBiomassRemovalType Cut: FractionLiveToRemove=0.8; FractionDeadToRemove=0.5; FractionLiveToResidue=0.1; FractionDeadToResidue=0.1
          OrganBiomassRemovalType Prune: FractionLiveToRemove=0; FractionDeadToRemove=0; FractionLiveToResidue=0.6; FractionDeadToResidue=0.6
          OrganBiomassRemovalType Graze: FractionLiveToRemove=0.6; FractionDeadToRemove=0.6; FractionLiveToResidue=0.1; FractionDeadToResidue=0.1
          OrganBiomassRemovalType Thin: FractionLiveToRemove=0; FractionDeadToRemove=0; FractionLiveToResidue=0.05; FractionDeadToResidue=0.05
        Constant NRetranslocationFactor: FixedValue=0.03
        Constant DMReallocationFactor: FixedValue=1
        Constant DMRetranslocationFactor: FixedValue=1
        Constant RemobilisationCost: FixedValue=0
        Constant CarbonConcentration: FixedValue=0.4
        NutrientDemandFunctions DMDemands
          DivideFunction Structural
            PhaseLookup DeltaLAIPotential
              Memo
                DeltaLAI describes the LAI variation over the cycle and is calculated using the Area of Largest Leaf, relative leaf area, plant number, branch number and leaf appearance rate (thermal time/phyllochron).
              PhaseLookupValue Vegetative: Start=Emergence; End=Heading
                MultiplyFunction Delta
                  VariableReference MaxLeafArea: VariableName=[Leaf].MaxLeafArea
                  VariableReference PlantNumber: VariableName=[Oats].SowingData.Population
                  VariableReference Tillers: VariableName=[Leaf].TillerNumber
                  DivideFunction LAR
                    VariableReference TT: VariableName=[Phenology].ThermalTime
                    VariableReference Phyllochron: VariableName=[Leaf].Phyllochron
              PhaseLookupValue Reproductive: Start=Heading; End=HarvestRipe
                Constant: FixedValue=0
            VariableReference SLA: VariableName=[Leaf].SpecificArea
            Memo
              Growth in leaf area is used to calculate the leaf dry matter demand. The same was assumed in the original crop models in APSIM. Further model development can be taken once new experimental data for metabolic, structural and storage forms are provided.
            Memo Memo1
              DeltaLAI describes the LAI variation over the cycle and is calculated using the Area of Largest Leaf, relative leaf area, plant number, branch number and leaf appearance rate (thermal time/phyllochron).
          Constant Storage: FixedValue=0
          Constant Metabolic: FixedValue=0
          Constant QStructuralPriority: FixedValue=1
          Constant QMetabolicPriority: FixedValue=1
          Constant QStoragePriority: FixedValue=1
        NutrientDemandFunctions NDemands
          MultiplyFunction Structural
            VariableReference MinNconc: VariableName=[Leaf].minimumNconc
            VariableReference PotentialDMAllocation: VariableName=[Leaf].potentialDMAllocation.Structural
          MultiplyFunction Metabolic
            SubtractFunction MetabolicNconc
              VariableReference CritNconc: VariableName=[Leaf].criticalNConc
              VariableReference MinNconc: VariableName=[Leaf].minimumNconc
            VariableReference PotentialDMAllocation: VariableName=[Leaf].potentialDMAllocation.Structural
          StorageNDemandFunction Storage
            Constant NitrogenDemandSwitch: FixedValue=1
            VariableReference MaxNconc: VariableName=[Leaf].maximumNconc
          Constant QStructuralPriority: FixedValue=1
          Constant QMetabolicPriority: FixedValue=1
          Constant QStoragePriority: FixedValue=1
        Constant FrostFraction: FixedValue=0
        LinearInterpolationFunction SpecificArea
          XYPairs: X=[2, 3, 4]; Y=[25000, 30000, 40000]
          VariableReference XValue: VariableName=[Phenology].Stage
        Constant AreaLargestLeaf: FixedValue=4000; Units=mm^2
        DivideFunction SpecificAreaCanopy
          VariableReference LAI: VariableName=[Leaf].Area
          VariableReference LeafWt: VariableName=[Leaf].Live.Wt
        PhaseLookup TilleringRate
          PhaseLookupValue Vegetative: Start=Emergence; End=TerminalSpikelet
            LinearInterpolationFunction PotentialBranchingRate
              XYPairs: X=[1, 2, 3, 4, 5, 6, 7]; Y=[0, 1, 2, 3, 7, 12, 20]
              VariableReference XValue: VariableName=[Leaf].HaunStage
          PhaseLookupValue Reproductive: Start=TerminalSpikelet; End=HarvestRipe
            Constant Zero: FixedValue=0
          Memo
            Potential branching rate is determined by the commonly observed pattern of tillering in wheat, in which each tiller emerges with the third leaf on its parent axis (e.g. first tiller emerges at the same time as the third leaf on the main stem, the first secondary tiller appears with the third leaf on tiller 1).  This is described as a simple function of main stem leaf number.
        LinearInterpolationFunction TillerAbortionRate
          XYPairs: X=[0, 0.005]; Y=[0.002, 0]
          MovingAverageFunction XValue: NumberOfDays=5; StageToStartMovingAverage=Emergence
            Memo
              This is calculated to represent the supply of asslimilate to individual tillers over the past 5 days to use as an index to determine tiller mortality.  When tiller numbers are high or total crop assimilate supply is small there will not be enough assimilate to maintain all of the tillers so the model will senesce some.
            DivideFunction MeanTillerGrowthRate
              VariableReference DailyGrowth: VariableName=[Arbitrator].DM.TotalFixationSupply
              VariableReference ThermalTime: VariableName=[Phenology].ThermalTime
              VariableReference StemPopulation: VariableName=[Oats].Population
        VariableReference FinalLeafNumber: VariableName=[Phenology].CAMP.FLN
        MultiplyFunction Phyllochron
          Memo Rational
            This is the thermal time between the emergence of leaf tips.  The model used here is based on [Jamieson_SIRIUS_1998] where leaf appearace could be described by a base phyllochron determined between leaves 2 and 7 and a phyllochron that was 70% of base phyllochron for leaves < 2 and 130% of base phyllochron for leaves > 7
          LinearInterpolationFunction LeafStageFactor
            XYPairs: X=[0, 2, 3, 7, 8, 11]; Y=[0.75, 0.75, 1, 1, 1.4, 1.4]
            VariableReference XValue: VariableName=[Leaf].HaunStage
          Constant BasePhyllochron: FixedValue=120; Units=oC.d
          AddFunction PhotoperiodEffect
            Constant One: FixedValue=1; Units=oC.d
            MultiplyFunction PhotoperiodResponse
              VariableReference PhotoperiodSensitivity: VariableName=[Leaf].PhyllochronPpSensitivity
              LinearInterpolationFunction PhotoPeriodResponseShape
                XYPairs: X=[8, 12, 20]; Y=[1, 0, 0]
                VariableReference XValue: VariableName=[Phenology].Photoperiod
        Constant PhyllochronPpSensitivity: FixedValue=0.6
        MultiplyFunction MaxLeafArea
          Constant AreaLargestLeaf: FixedValue=4000; Units=mm^2
          LinearInterpolationFunction RelativeArea
            XYPairs: X=[3, 4.3, 5, 6]; Y=[0.1, 0.5, 1, 1]
            VariableReference XValue: VariableName=[Phenology].Stage
          Memo
            The maximum size of the current appearing leaf
        MultiplyFunction TillerPopulation
          VariableReference TillerNumber: VariableName=[Leaf].TillerNumber
          VariableReference PlantPopulation: VariableName=[Oats].SowingData.Population
      GenericOrgan Stem: IsAboveGround=true
        LinearInterpolationFunction SenescenceRate
          XYPairs: X=[3, 7, 8, 9]; Y=[0, 0, 0.2, 0.5]
          VariableReference XValue: VariableName=[Phenology].Stage
        LinearInterpolationFunction MaximumNConc
          XYPairs: X=[3, 4, 4.5, 6]; Y=[0.05, 0.04, 0.015, 0.012]
          VariableReference XValue: VariableName=[Phenology].Stage
        Constant MinimumNConc: FixedValue=0.0018
        PhaseLookupValue NitrogenDemandSwitch: Start=Emergence; End=StartGrainFill
          Constant: FixedValue=1
        Constant NReallocationFactor: FixedValue=0
        PhaseLookup NRetranslocationFactor
          PhaseLookupValue VegetativeGrowth: Start=Sowing; End=Flowering
            Constant Fraction: FixedValue=0
          PhaseLookupValue ReproductiveGrowth: Start=Flowering; End=HarvestRipe
            Constant Fraction: FixedValue=0.5
        PhaseLookup DMRetranslocationFactor
          PhaseLookupValue VegetativeGrowth: Start=Emergence; End=StartGrainFill
            Constant DMRetranslocationFactor: FixedValue=0
          PhaseLookupValue ReproductiveGrowth: Start=StartGrainFill; End=EndGrainFill
            Constant DMRetranslocationFactor: FixedValue=0.5
        BiomassRemoval BiomassRemovalDefaults
          OrganBiomassRemovalType Harvest: FractionLiveToRemove=0.5; FractionDeadToRemove=0; FractionLiveToResidue=0.6; FractionDeadToResidue=0.6
          OrganBiomassRemovalType Cut: FractionLiveToRemove=0.1; FractionDeadToRemove=0.5; FractionLiveToResidue=0.1; FractionDeadToResidue=0.1
          OrganBiomassRemovalType Prune: FractionLiveToRemove=0; FractionDeadToRemove=0; FractionLiveToResidue=0.6; FractionDeadToResidue=0
          OrganBiomassRemovalType Graze: FractionLiveToRemove=0.6; FractionDeadToRemove=0; FractionLiveToResidue=0.2; FractionDeadToResidue=0
          OrganBiomassRemovalType Thin: FractionLiveToRemove=0; FractionDeadToRemove=0; FractionLiveToResidue=0.05; FractionDeadToResidue=0
        DivideFunction PercentWSC
          VariableReference WSC: VariableName=[Stem].Live.StorageWt
          VariableReference StemWt: VariableName=[Stem].Live.Wt
        Constant DetachmentRateFunction: FixedValue=0; Units=/d
        Constant MaintenanceRespirationFunction: FixedValue=0; Units=0-1
        Constant DMConversionEfficiency: FixedValue=1; Units=0-1
        Constant DMReallocationFactor: FixedValue=0
        AddFunction CriticalNConc
          VariableReference MinimumNConc: VariableName=[Stem].MinimumNConc
          MultiplyFunction MetabolicNconc
            SubtractFunction NonStructuralN
              VariableReference MaximumNConc: VariableName=[Stem].MaximumNConc
              VariableReference MinimumNConc: VariableName=[Stem].MinimumNConc
            Constant Proportion: FixedValue=0.5
        Constant RemobilisationCost: FixedValue=0
        Constant CarbonConcentration: FixedValue=0.4
        NutrientDemandFunctions DMDemands
          MultiplyFunction Structural
            PartitionFractionDemandFunction DMDemandFunction
              PhaseLookup PartitionFraction
                PhaseLookupValue PreStemElongation: Start=Emergence; End=TerminalSpikelet
                  Constant StemFraction: FixedValue=0.4
                PhaseLookupValue StemElongation: Start=TerminalSpikelet; End=StartGrainFill
                  Constant StemFraction: FixedValue=0.7; Units=0
                PhaseLookupValue EarEmergence: Start=StartGrainFill; End=HarvestRipe
                  Constant StemFraction: FixedValue=0.7
            PhaseLookup StructuralFraction
              PhaseLookupValue VegetativeGrowth: Start=Sowing; End=StartGrainFill
                Constant Fraction: FixedValue=0.3
              PhaseLookupValue ReproductiveGrowth: Start=StartGrainFill; End=HarvestRipe
                Constant Fraction: FixedValue=0.01
          Constant Metabolic: FixedValue=0
          StorageDMDemandFunction Storage
            SubtractFunction StorageFraction
              Constant One: FixedValue=1
              VariableReference StructuralFraction: VariableName=[Stem].DMDemands.Structural.StructuralFraction
          Constant QStructuralPriority: FixedValue=1
          Constant QMetabolicPriority: FixedValue=1
          Constant QStoragePriority: FixedValue=1
        NutrientDemandFunctions NDemands
          MultiplyFunction Structural
            VariableReference MinNconc: VariableName=[Stem].minimumNconc
            VariableReference PotentialDMAllocation: VariableName=[Stem].potentialDMAllocation.Structural
          MultiplyFunction Metabolic
            SubtractFunction MetabolicNconc
              VariableReference CritNconc: VariableName=[Stem].criticalNConc
              VariableReference MinNconc: VariableName=[Stem].minimumNconc
            VariableReference PotentialDMAllocation: VariableName=[Stem].potentialDMAllocation.Structural
          StorageNDemandFunction Storage
            VariableReference NitrogenDemandSwitch: VariableName=[Stem].nitrogenDemandSwitch
            VariableReference MaxNconc: VariableName=[Stem].maximumNconc
          Constant QStructuralPriority: FixedValue=1
          Constant QMetabolicPriority: FixedValue=1
          Constant QStoragePriority: FixedValue=1
        RetranslocateNonStructural RetranslocateNitrogen
        NutrientPoolFunctions InitialWt
          Constant Structural: FixedValue=0; Units=g/m^2
          Constant Metabolic: FixedValue=0
          Constant Storage: FixedValue=0
        Constant Photosynthesis: FixedValue=0
        VariableReference initialNConcFunction: VariableName=[Stem].MinimumNConc
      Root: GrowthRespiration=0; MaintenanceRespiration=0
        RootShapeCylinder RootShape
        Constant KLModifier: FixedValue=1
        Constant SoilWaterEffect: FixedValue=1
        Constant MaxDailyNUptake: FixedValue=20
        Constant SenescenceRate: FixedValue=0.005
        Constant MaximumRootDepth: FixedValue=1000000
        Constant MaximumNConc: FixedValue=0.01
        Constant MinimumNConc: FixedValue=0.01
        PhaseLookupValue NitrogenDemandSwitch: Start=Germination; End=Maturity
          Constant: FixedValue=1
        BiomassRemoval BiomassRemovalDefaults
          OrganBiomassRemovalType Harvest: FractionLiveToRemove=0; FractionDeadToRemove=0; FractionLiveToResidue=1; FractionDeadToResidue=1
          OrganBiomassRemovalType Cut: FractionLiveToRemove=0; FractionDeadToRemove=0; FractionLiveToResidue=0.5; FractionDeadToResidue=0.5
          OrganBiomassRemovalType Prune: FractionLiveToRemove=0; FractionDeadToRemove=0; FractionLiveToResidue=0.1; FractionDeadToResidue=0
          OrganBiomassRemovalType Graze: FractionLiveToRemove=0; FractionDeadToRemove=0; FractionLiveToResidue=0.15; FractionDeadToResidue=0
          OrganBiomassRemovalType Thin: FractionLiveToRemove=0; FractionDeadToRemove=0; FractionLiveToResidue=0.05; FractionDeadToResidue=0
        Constant KNO3: FixedValue=0.02
        Constant KNH4: FixedValue=0.01
        Constant SpecificRootLength: FixedValue=105; Units=m/g
        MultiplyFunction RootFrontVelocity
          PhaseLookup PotentialRootFrontVelocity
            PhaseLookupValue PreEmergence: Start=Germination; End=Emergence
              Constant Value: FixedValue=5; Units=mm/d
            PhaseLookupValue PostEmergence: Start=Emergence; End=Maturity
              Constant Value: FixedValue=20; Units=mm/d
          WeightedTemperatureFunction TemperatureFactor: MaximumTemperatureWeighting=0.5
            XYPairs: X=[0, 15, 25, 35]; Y=[0, 1, 1, 0]
          LinearInterpolationFunction WaterFactor
            SoilWaterScale
            XYPairs: X=[0, 0.25, 1]; Y=[0, 1, 1]
            VariableReference XValue: VariableName=[SoilWaterScale]
        LinearInterpolationFunction NUptakeSWFactor
          SoilWaterScale
          XYPairs: X=[0, 1]; Y=[0, 1]
          Memo
            This is modelled in the same way as the old wheat model where potential N uptake is decreased as the soil dries as described by NUptakeSWFactor
          VariableReference XValue: VariableName=[SoilWaterScale]
        Constant DMConversionEfficiency: FixedValue=1
        Constant MaintenanceRespirationFunction: FixedValue=0
        Constant RemobilisationCost: FixedValue=0
        Constant CarbonConcentration: FixedValue=0.4
        NutrientDemandFunctions DMDemands
          MultiplyFunction Structural
            PartitionFractionDemandFunction DMDemandFunction
              PhaseLookup PartitionFraction
                PhaseLookupValue PreEmergence: Start=Germination; End=Emergence
                  Constant Value: FixedValue=0
                PhaseLookupValue PreFlowering: Start=Emergence; End=Flowering
                  LinearInterpolationFunction AgeFactor
                    XYPairs: X=[3, 4]; Y=[0.5, 0.2]
                    VariableReference XValue: VariableName=[Phenology].Stage
                PhaseLookupValue PostFlowering: Start=Flowering; End=EndGrainFill
                  Constant Value: FixedValue=0.2
            Constant StructuralFraction: FixedValue=1
          Constant Metabolic: FixedValue=0
          StorageDMDemandFunction Storage
            SubtractFunction StorageFraction
              Constant One: FixedValue=1
              VariableReference StructuralFraction: VariableName=[Root].DMDemands.Structural.StructuralFraction
          Constant QStructuralPriority: FixedValue=1
          Constant QMetabolicPriority: FixedValue=1
          Constant QStoragePriority: FixedValue=1
        NutrientDemandFunctions NDemands
          MultiplyFunction Structural
            VariableReference MinNconc: VariableName=[Root].minimumNconc
            VariableReference PotentialDMAllocation: VariableName=[Root].potentialDMAllocation.Structural
          MultiplyFunction Metabolic
            SubtractFunction MetabolicNconc
              VariableReference CritNconc: VariableName=[Root].criticalNConc
              VariableReference MinNconc: VariableName=[Root].minimumNconc
            VariableReference PotentialDMAllocation: VariableName=[Root].potentialDMAllocation.Structural
          StorageNDemandFunction Storage
            VariableReference NitrogenDemandSwitch: VariableName=[Root].nitrogenDemandSwitch
            VariableReference MaxNconc: VariableName=[Root].maximumNconc
          Constant QStructuralPriority: FixedValue=1
          Constant QMetabolicPriority: FixedValue=1
          Constant QStoragePriority: FixedValue=1
        VariableReference CriticalNConc: VariableName=[Root].MinimumNConc
        NutrientPoolFunctions InitialWt
          Constant Structural: FixedValue=0.005; Units=g/plant
          Constant Metabolic: FixedValue=0
          Constant Storage: FixedValue=0
      GenericOrgan Panicle: IsAboveGround=true
        Constant NReallocationFactor: FixedValue=0
        Constant NRetranslocationFactor: FixedValue=0.3
        Constant MaximumNConc: FixedValue=0.025
        Constant SenescenceRate: FixedValue=0; Units=/d
        Constant MinimumNConc: FixedValue=0.02
        BiomassRemoval BiomassRemovalDefaults
          Memo
            Prune, graze and thin have been set to zero as they will vary depending on the needs of the user, and they can be overwritten in the manager script.
          OrganBiomassRemovalType Harvest: FractionLiveToRemove=0; FractionDeadToRemove=0; FractionLiveToResidue=1; FractionDeadToResidue=1
          OrganBiomassRemovalType Cut: FractionLiveToRemove=1; FractionDeadToRemove=1; FractionLiveToResidue=0; FractionDeadToResidue=0
          OrganBiomassRemovalType Prune: FractionLiveToRemove=0; FractionDeadToRemove=0; FractionLiveToResidue=0; FractionDeadToResidue=0
          OrganBiomassRemovalType Graze: FractionLiveToRemove=0; FractionDeadToRemove=0; FractionLiveToResidue=0; FractionDeadToResidue=0
          OrganBiomassRemovalType Thin: FractionLiveToRemove=0; FractionDeadToRemove=0; FractionLiveToResidue=0; FractionDeadToResidue=0
        PhaseLookupValue NitrogenDemandSwitch: Start=Emergence; End=StartGrainFill
          Constant: FixedValue=1
        PhaseLookup DMRetranslocationFactor: same as Replacements.Oats.Stem.DMRetranslocationFactor
        Constant DetachmentRateFunction: FixedValue=0; Units=/d
        Constant MaintenanceRespirationFunction: FixedValue=0; Units=0-1
        Constant DMConversionEfficiency: FixedValue=1; Units=0-1
        MultiplyFunction HeadNumber
          VariableReference StemNumber: VariableName=[Structure].TotalStemPopn
          Constant PaniclesPerStem: FixedValue=0.83; Units=0-1
        Constant DMReallocationFactor: FixedValue=0
        VariableReference CriticalNConc: VariableName=[Panicle].MinimumNConc
        Constant RemobilisationCost: FixedValue=0
        Constant CarbonConcentration: FixedValue=0.4
        NutrientDemandFunctions DMDemands
          MultiplyFunction Structural
            PopulationBasedDemandFunction DMDemandFunction
              VariableReference ThermalTime: VariableName=[Phenology].ThermalTime
              MinimumFunction ExpansionStress
                LinearInterpolationFunction WaterStress
                  XYPairs: X=[0.1, 1, 1.3]; Y=[0, 1, 1]
                  VariableReference XValue: VariableName=[Root].WaterTensionFactor
                LinearInterpolationFunction TemperatureEffect
                  XYPairs: X=[0, 12, 14]; Y=[0, 1, 1]
                  VariableReference XValue: VariableName=[Phenology].MeanTemp
                LinearInterpolationFunction NitrogenStressFactor
                  XYPairs: X=[0, 0.5, 1]; Y=[0.1, 0.1, 1]
                  VariableReference XValue: VariableName=[Oats].Leaf.Fn
              VariableReference OrganPopulation: VariableName=[Panicle].HeadNumber
              Constant StartStage: FixedValue=4.8
              Constant MaximumOrganWt: FixedValue=0.4; Units=g
              AddFunction GrowthDuration
                VariableReference EarlyReproductive: VariableName=[Phenology].EarlyReproductive.Target
                VariableReference GrainDevelopment: VariableName=[Phenology].GrainDevelopment.Target
            Constant StructuralFraction: FixedValue=0.9
          Constant Metabolic: FixedValue=0
          StorageDMDemandFunction Storage
            SubtractFunction StorageFraction
              Constant One: FixedValue=1
              VariableReference StructuralFraction: VariableName=[Panicle].DMDemands.Structural.StructuralFraction
          Constant QStructuralPriority: FixedValue=1
          Constant QMetabolicPriority: FixedValue=1
          Constant QStoragePriority: FixedValue=1
        NutrientDemandFunctions NDemands
          MultiplyFunction Structural
            VariableReference MinNconc: VariableName=[Panicle].minimumNconc
            VariableReference PotentialDMAllocation: VariableName=[Panicle].potentialDMAllocation.Structural
          MultiplyFunction Metabolic
            SubtractFunction MetabolicNconc
              VariableReference CritNconc: VariableName=[Panicle].criticalNConc
              VariableReference MinNconc: VariableName=[Panicle].minimumNconc
            VariableReference PotentialDMAllocation: VariableName=[Panicle].potentialDMAllocation.Structural
          StorageNDemandFunction Storage
            VariableReference NitrogenDemandSwitch: VariableName=[Panicle].nitrogenDemandSwitch
            VariableReference MaxNconc: VariableName=[Panicle].maximumNconc
          Constant QStructuralPriority: FixedValue=1
          Constant QMetabolicPriority: FixedValue=1
          Constant QStoragePriority: FixedValue=1
        RetranslocateNonStructural RetranslocateNitrogen
        NutrientPoolFunctions InitialWt: same as Replacements.Oats.Stem.InitialWt
        Constant Photosynthesis: FixedValue=0
        VariableReference initialNConcFunction: VariableName=[Panicle].MinimumNConc
      CompositeBiomass AboveGround: OrganNames=[Leaf, Stem, Panicle, Grain]; IncludeLive=true; IncludeDead=true
      CompositeBiomass AboveGroundLive: OrganNames=[Leaf, Stem, Panicle, Grain]; IncludeLive=true; IncludeDead=false
      CompositeBiomass AboveGroundDead: OrganNames=[Leaf, Stem, Panicle, Grain]; IncludeLive=false; IncludeDead=true
      CompositeBiomass BelowGround: OrganNames=[Root]; IncludeLive=true; IncludeDead=true
      CompositeBiomass Total: OrganNames=[Leaf, Stem, Root, Panicle, Grain]; IncludeLive=true; IncludeDead=true
      CompositeBiomass TotalLive: OrganNames=[Leaf, Stem, Root, Panicle, Grain]; IncludeLive=true; IncludeDead=false
      CompositeBiomass TotalDead: OrganNames=[Leaf, Stem, Root, Panicle, Grain]; IncludeLive=false; IncludeDead=true
      CompositeBiomass Ear: OrganNames=[Panicle, Grain]; IncludeLive=true; IncludeDead=true
        Memo
          The Ear composite biomass object includes the Live and dead pools of all organs within the Ear to allow output for total dry matter and Nutrient contents, including total structural, non-structural and metabolic pools.
      CompositeBiomass StemPlusPanicle: OrganNames=[Stem, Panicle]; IncludeLive=true; IncludeDead=true
      Constant MortalityRate: FixedValue=0
      Constant SeedMortalityRate: FixedValue=0
      Folder Cultivars
        Memo
          Most crop parameters can be specified individually for cultivars. Customized cultivar parameters are reported in this section.
        Cultivar Drummond
          Command:
            [Phenology].CAMP.FLNparams.MinLN = 8.5
            [Phenology].CAMP.FLNparams.VrnLN  = 7
            [Phenology].CAMP.FLNparams.PpLN  = 3
            [Phenology].HeadEmergenceLongDayBase.FixedValue = 3
            [Phenology].HeadEmergenceLongDayBase.FixedValue = 3
            [Phenology].HeadEmergencePpSensitivity.FixedValue = 2
            [Leaf].Phyllochron.BasePhyllochron.FixedValue = 75
            [Leaf].TillerNumber.Total.TillerNumber.DeltaTiller.StressFactors.CoverEffect.XYPairs.X = 0,0.2,0.35
            [Leaf].MaxLeafArea.AreaLargestLeaf.FixedValue = 4000
            [Leaf].TilleringRate.Vegetative.PotentialBranchingRate.XYPairs.X = 1,2,3.99,4,5,6,7,8,9
            [Leaf].TilleringRate.Vegetative.PotentialBranchingRate.XYPairs.Y = 0,0,0,1,2,4,7,12,20
            [Grain].MaximumPotentialGrainSize.FixedValue = 0.05
            [Grain].NumberFunction.GrainNumber.GrainsPerGramOfStem.FixedValue = 40
        Cultivar Drummond_orig
          Command:
            [Phenology].CAMP.FLNparams.MinLN = 9
            [Phenology].CAMP.FLNparams.VrnLN  = 0
            [Phenology].CAMP.FLNparams.PpLN  = 10
            [Leaf].Phyllochron.BasePhyllochron.FixedValue = 80
            [Leaf].TillerNumber.Total.TillerNumber.DeltaTiller.StressFactors.CoverEffect.XYPairs.X = 0,0.2,0.35
            [Leaf].MaxLeafArea.AreaLargestLeaf.FixedValue = 4000
            [Leaf].TilleringRate.Vegetative.PotentialBranchingRate.XYPairs.X = 1,2,3.99,4,5,6,7,8,9
        Cultivar Milton
          Command:
            [Phenology].CAMP.FLNparams.MinLN = 8.5
            [Phenology].CAMP.FLNparams.VrnLN  = 7
            [Phenology].CAMP.FLNparams.PpLN  = 3
            [Phenology].HeadEmergenceLongDayBase.FixedValue = 2
            [Phenology].HeadEmergencePpSensitivity.FixedValue = 0
            [Leaf].Phyllochron.BasePhyllochron.FixedValue = 105
            [Leaf].MaxLeafArea.AreaLargestLeaf.FixedValue = 4000
            [Grain].MaximumPotentialGrainSize.FixedValue = 0.05
            [Grain].NumberFunction.GrainNumber.GrainsPerGramOfStem.FixedValue = 50
            [Leaf].ExtinctionCoefficient.VegetativePhase.FixedValue = 0.6
        Cultivar Hokonui
          Command:
            [Phenology].CAMP.FLNparams.MinLN = 9
            [Phenology].CAMP.FLNparams.VrnLN  = 0
            [Phenology].CAMP.FLNparams.PpLN  = 10
            [Leaf].Phyllochron.BasePhyllochron.FixedValue = 90
        Cultivar Stampede
          Command:
            [Phenology].CAMP.FLNparams.MinLN = 9
            [Phenology].CAMP.FLNparams.VrnLN  = 0
            [Phenology].CAMP.FLNparams.PpLN  = 10
            [Leaf].Phyllochron.BasePhyllochron.FixedValue = 80
        Cultivar Coolibah
          Command:
            [Phenology].CAMP.FLNparams.MinLN = 9
            [Phenology].CAMP.FLNparams.VrnLN  = 5.3
            [Phenology].CAMP.FLNparams.PpLN  = 3.0
            [Leaf].Phyllochron.BasePhyllochron.FixedValue = 90
            [Leaf].MaxLeafArea.AreaLargestLeaf.FixedValue = 5000
            [Phenology].HeadEmergencePpSensitivity.FixedValue = 0
            [Phenology].HeadEmergenceLongDayBase.FixedValue = 2
            [Leaf].TillerNumber.Total.TillerNumber.DeltaTiller.StressFactors.CoverEffect.XYPairs.X = 0,0.25,0.5
          Memo
            Leaf appearance rate calibrated using data from Gatton 2007 for Taipan and Coolibah
        Cultivar Taipan
          Command:
            [Phenology].CAMP.FLNparams.MinLN = 9
            [Phenology].CAMP.FLNparams.VrnLN  = 10
            [Phenology].CAMP.FLNparams.PpLN  = 7.5
            [Phenology].HeadEmergencePpSensitivity.FixedValue = 3
            [Phenology].HeadEmergenceLongDayBase.FixedValue = 3
            [Leaf].Phyllochron.BasePhyllochron.FixedValue = 90
            [Leaf].MaxLeafArea.AreaLargestLeaf.FixedValue = 8000
          Memo
            Leaf appearance rate calibrated using data from Gatton 2007 for Taipan and Coolibah
        Cultivar Wintaroo
          Command:
            [Phenology].CAMP.FLNparams.MinLN = 7
            [Phenology].CAMP.FLNparams.VrnLN  = 2
            [Phenology].CAMP.FLNparams.PpLN  = 2
            [Phenology].HeadEmergencePpSensitivity.FixedValue = 0
            [Phenology].HeadEmergenceLongDayBase.FixedValue = 2
            [Leaf].Phyllochron.BasePhyllochron.FixedValue = 90
        Cultivar Kangaroo
          Command:
            [Phenology].CAMP.FLNparams.MinLN = 7
            [Phenology].CAMP.FLNparams.VrnLN  = 4
            [Phenology].CAMP.FLNparams.PpLN  = 4
            [Phenology].HeadEmergencePpSensitivity.FixedValue = 0
            [Phenology].HeadEmergenceLongDayBase.FixedValue = 2
            [Leaf].Phyllochron.BasePhyllochron.FixedValue = 90
        Cultivar Brusher
          Command:
            [Phenology].CAMP.FLNparams.MinLN = 7
            [Phenology].CAMP.FLNparams.VrnLN  = 1
            [Phenology].CAMP.FLNparams.PpLN  = 1
            [Phenology].HeadEmergencePpSensitivity.FixedValue = 0
            [Phenology].HeadEmergenceLongDayBase.FixedValue = 2
            [Leaf].Phyllochron.BasePhyllochron.FixedValue = 80
        Cultivar Algerian
          Command:
            [Phenology].CAMP.FLNparams.MinLN = 9
            [Phenology].CAMP.FLNparams.VrnLN  = 12
            [Phenology].CAMP.FLNparams.PpLN  = 6
            [Phenology].HeadEmergencePpSensitivity.FixedValue = 4
            [Phenology].HeadEmergenceLongDayBase.FixedValue = 3
            [Leaf].Phyllochron.BasePhyllochron.FixedValue = 105
            [Leaf].MaxLeafArea.AreaLargestLeaf.FixedValue = 5000
            [Leaf].TillerNumber.Total.TillerNumber.DeltaTiller.StressFactors.CoverEffect.XYPairs.X = 0,0.4,0.7
        Cultivar Nugene
          Command:
            [Phenology].CAMP.FLNparams.MinLN = 9
            [Phenology].CAMP.FLNparams.VrnLN  = 10
            [Phenology].CAMP.FLNparams.PpLN  = 7.5
            [Phenology].HeadEmergencePpSensitivity.FixedValue = 3
            [Phenology].HeadEmergenceLongDayBase.FixedValue = 3
            [Leaf].Phyllochron.BasePhyllochron.FixedValue = 90
            [Leaf].MaxLeafArea.AreaLargestLeaf.FixedValue = 8000
        Cultivar Drover
          Command:
            [Phenology].CAMP.FLNparams.MinLN = 9
            [Phenology].CAMP.FLNparams.VrnLN  = 4
            [Phenology].CAMP.FLNparams.PpLN  = 9
            [Phenology].HeadEmergencePpSensitivity.FixedValue = 6
            [Phenology].HeadEmergenceLongDayBase.FixedValue = 3
            [Leaf].Phyllochron.BasePhyllochron.FixedValue = 80
            [Leaf].MaxLeafArea.AreaLargestLeaf.FixedValue = 8000
        Cultivar Genie: same as Replacements.Oats.Cultivars.Nugene
        Cultivar Aladdin: same as Replacements.Oats.Cultivars.Nugene
        Cultivar Comet: same as Replacements.Oats.Cultivars.Nugene
        Cultivar Wizard: same as Replacements.Oats.Cultivars.Nugene
        Cultivar Bond: same as Replacements.Oats.Cultivars.Nugene
  DataStore
    ExcelInput Observed: FileNames=[Observed.xlsx]; SheetNames=[Observed, MaxLeafSize, SLMACC, SAE, SoilMineralN]
    PredictedObserved DailyPO: PredictedTableName=DailyReport; ObservedTableName=Observed; FieldNameUsedForMatch=SimulationName; FieldName2UsedForMatch=Clock.Today; AllColumns=false
    PredictedObserved HarvestPO (disabled): PredictedTableName=HarvestReport; ObservedTableName=Observed; FieldNameUsedForMatch=SimulationName; FieldName2UsedForMatch=Oats.Phenology.CurrentStageName; AllColumns=false
    PredictedObserved DailyPOSAE: PredictedTableName=DailyReportWater_n_MineralN; ObservedTableName=Observed; FieldNameUsedForMatch=SimulationName; FieldName2UsedForMatch=Clock.Today; AllColumns=false
  Folder Validation
    Memo
      A test dataset has been developed to test the APSIM Oats model for a range of environmental (soil and climate) conditions, management options (sowing dates, populations, nitrogen rates, row spacing, irrigation), genetic backgrounds (different regions, cultivar types) and for special considerations such as defoliation (or simulated grazing).  These tests have been groups into various geographical regions to allow the user to evaluate the suitability of the model for their particular region of interest.  Graphs of model performance are provided for yield, biomass production, canopy development, phenological development, water and nitrogen uptake, and grain yield components.
    Folder Combined Results
      Memo Combined Results
        Simulation results for the combined datasets from the various countries are shown in the following graphs.  The model is able to adequately capture the influence of growing conditions (soil, climate) and management (population, Nitrogen, irrigation, sowing date).
    Folder New Zealand
      Experiment RS_Oats_9899
        Memo Experiment Description
          Data from:

          [martin2001effect]

          	The response of oats (Avena sativa L.) to timing and intensity of drought was determined in a mobile
          rainshelter, which excluded rainfall during crop growth. Ten irrigation treatments subjected the crops to
          drought of varying duration at different stages during plant growth; the crops were otherwise fully
          irrigated. Oat grain yield generally increased linearly with cumulative water use, and decreased linearly as
          the maximum potential soil moisture deficit experienced during crop growth increased, regardless of the
          timing of drought. The exception to this was the no drought (fully irrigated) treatment, where lodging
          reduced panicle number and grain weight compared to early drought treatments. Drought affected yield
          mainly by reducing panicle and grain number, effects on grain weight were small. . Relieving early drought
          through late irrigation led to more late tillers, more panicles, heavier grains, and later maturity. Full and
          late drought increased screenings.
        Factors
          Factor _Irrig
            CompositeFactor Nil
              Specifications:
                [Irrig]
                [Physical]
                [Water].Thickness=200,200,200,200,200,200,200,200
                [Water].InitialValues=0.32,0.3,0.27,0.24,0.23,0.23,0.13,0.17
              Operations Irrig
                1999-02-10  [Oats].Harvest();
                1999-02-10  [Oats].EndCrop();
              Physical
                Thickness  BD     AirDry  LL15  DUL   SAT   KS
                200        1.311  0.07    0.12  0.32  0.42  4832.039
                200        1.524  0.14    0.14  0.3   0.41  389.229
                200        1.65   0.14    0.14  0.27  0.34  16.362
                200        1.601  0.1     0.1   0.24  0.32  97.995
                200        1.601  0.05    0.14  0.23  0.35  97.995
                200        1.601  0.05    0.16  0.23  0.34  97.995
                200        1.601  0.09    0.09  0.13  0.31  97.995
                200        1.601  0.06    0.06  0.17  0.31  97.995
                SoilCrop OatsSoil: LL=[0.12, 0.14, 0.14, 0.1, 0.14, 0.16, 0.09, 0.06]; KL=[0.06, 0.07, 0.04, 0.04, 0.05, 0.03, 0.02, 0.01]; XF=[1, 1, 1, 1, 1, 1, 1, 1]
            CompositeFactor Full
              Specifications:
                [Irrig]
                [Physical]
                [Water].Thickness=200,200,200,200,200,200,200,200
                [Water].InitialValues=0.3,0.3,0.28,0.26,0.29,0.28,0.11,0.12
              Operations Irrig
                1998-10-31  [Irrigation].Apply(30);
                1998-11-09  [Irrigation].Apply(35.3);
                1998-11-16  [Irrigation].Apply(45);
                1998-11-23  [Irrigation].Apply(44);
                1998-11-30  [Irrigation].Apply(30.1);
                1998-12-07  [Irrigation].Apply(41.6);
                1998-12-14  [Irrigation].Apply(55);
                1998-12-21  [Irrigation].Apply(50);
                1998-12-28  [Irrigation].Apply(55);
                1999-01-05  [Irrigation].Apply(53);
                1999-01-11  [Irrigation].Apply(50.4);
                1999-01-18  [Irrigation].Apply(49);
                1999-01-25  [Irrigation].Apply(49);
                1999-02-01  [Irrigation].Apply(51.2);
                1999-02-08  [Irrigation].Apply(53);
                1999-02-15  [Irrigation].Apply(34);
                1999-02-22  [Irrigation].Apply(37);
                1999-03-01  [Irrigation].Apply(24);
                1999-03-03  [Oats].Harvest();
                1999-03-03  [Oats].EndCrop();
                Memo
                  Added an Irrigation on 30 Oct after looking at data and seeing a Panicle.
              Physical
                Thickness  BD     AirDry  LL15   DUL    SAT    KS
                200        1.311  0.05    0.1    0.3    0.419  4832.039
                200        1.524  0.05    0.1    0.3    0.405  389.229
                200        1.65   0.149   0.149  0.28   0.342  16.362
                200        1.601  0.129   0.129  0.255  0.322  97.995
                200        1.601  0.155   0.155  0.288  0.348  97.995
                200        1.601  0.05    0.149  0.28   0.342  97.995
                200        1.601  0.05    0.053  0.107  0.307  97.995
                200        1.601  0.061   0.061  0.122  0.31   97.995
                SoilCrop OatsSoil: LL=[0.1, 0.1, 0.149, 0.129, 0.155, 0.149, 0.053, 0.061]; KL=[0.06, 0.05, 0.04, 0.06, 0.05, 0.02, 0.02, 0]; XF=[1, 1, 1, 1, 1, 1, 1, 1]
            CompositeFactor LD1
              Specifications:
                [Irrig]
                [Physical]
                [Water].Thickness=200,200,200,200,200,200,200,200
                [Water].InitialValues=0.28,0.3,0.26,0.28,0.27,0.28,0.2,0.22
              Operations Irrig
                1998-10-27  [Irrigation].Apply(50);
                1998-11-02  [Irrigation].Apply(30);
                1999-02-10  [Oats].Harvest();
                1999-02-10  [Oats].EndCrop();
              Physical
                Thickness  BD     AirDry  LL15  DUL   SAT
                200        1.311  0.05    0.1   0.32  0.42
                200        1.524  0.12    0.12  0.3   0.41
                200        1.65   0.13    0.13  0.26  0.34
                200        1.601  0.1     0.13  0.28  0.32
                200        1.601  0.05    0.17  0.27  0.35
                200        1.601  0.05    0.18  0.28  0.34
                200        1.601  0.05    0.05  0.2   0.31
                200        1.601  0.06    0.06  0.22  0.31
                SoilCrop OatsSoil: LL=[0.1, 0.12, 0.13, 0.129, 0.17, 0.18, 0.053, 0.061]; KL=[0.06, 0.05, 0.04, 0.04, 0.04, 0.03, 0.02, 0.01]; XF=[1, 1, 1, 1, 1, 1, 1, 1]
            CompositeFactor LD4
              Specifications:
                [Irrig]
                [Physical]
                [Water].Thickness=200,200,200,200,200,200,200,200
                [Water].InitialValues=0.32,0.3,0.26,0.19,0.25,0.21,0.13,0.2
              Operations Irrig
                1998-10-27  [Irrigation].Apply(50)
                1998-11-02  [Irrigation].Apply(30)
                1998-11-09  [Irrigation].Apply( 35.3)
                1998-11-16  [Irrigation].Apply(45)
                1998-11-23  [Irrigation].Apply( 44)
                1998-11-30  [Irrigation].Apply(30.1 )
                1998-12-07  [Irrigation].Apply( 41.6)
                1999-02-10  [Oats].Harvest();
                1999-02-10  [Oats].EndCrop();
              Physical
                Thickness  BD     AirDry  LL15  DUL   SAT   KS
                200        1.311  0.05    0.1   0.32  0.42  4832.039
                200        1.524  0.13    0.13  0.3   0.41  389.229
                200        1.65   0.1     0.1   0.26  0.34  16.362
                200        1.601  0.08    0.08  0.24  0.32  97.995
                200        1.601  0.05    0.16  0.27  0.35  97.995
                200        1.601  0.05    0.16  0.23  0.34  97.995
                200        1.601  0.08    0.08  0.15  0.31  97.995
                200        1.601  0.06    0.06  0.2   0.31  97.995
                SoilCrop OatsSoil: LL=[0.1, 0.13, 0.1, 0.09, 0.16, 0.16, 0.08, 0.061]; KL=[0.06, 0.06, 0.05, 0.06, 0.05, 0.02, 0.02, 0.01]; XF=[1, 1, 1, 1, 1, 1, 1, 1]
            CompositeFactor ED1
              Specifications:
                [Irrig]
                [Physical]
                [Water].Thickness=200,200,200,200,200,200,200,200
                [Water].InitialValues=0.25,0.33,0.27,0.22,0.2,0.25,0.19,0.17
              Operations Irrig
                1998-11-16  [Irrigation].Apply(  45 )
                1998-11-23  [Irrigation].Apply(  44 )
                1998-11-30  [Irrigation].Apply(  30.1 )
                1998-12-07  [Irrigation].Apply(  41.6 )
                1998-12-14  [Irrigation].Apply(  55 )
                1998-12-21  [Irrigation].Apply(  50 )
                1998-12-28  [Irrigation].Apply(  55 )
                1999-01-05  [Irrigation].Apply(  53 )
                1999-01-11  [Irrigation].Apply( 50.4 )
                1999-01-18  [Irrigation].Apply(  49 )
                1999-01-25  [Irrigation].Apply(  49 )
                1999-02-01  [Irrigation].Apply(  51.2 )
                1999-02-08  [Irrigation].Apply(  53 )
                1999-02-15  [Irrigation].Apply(  34 )
                1999-02-22  [Irrigation].Apply(  37 )
                1999-03-01  [Irrigation].Apply(  24 )
                1999-03-03  [Oats].Harvest();
                1999-03-03  [Oats].EndCrop();
              Physical
                Thickness  BD    AirDry  LL15  DUL   SAT   KS
                200        1.31  0.05    0.1   0.25  0.42  4832.039
                200        1.52  0.1     0.1   0.33  0.41  389.229
                200        1.65  0.1     0.15  0.27  0.34  16.362
                200        1.6   0.14    0.14  0.22  0.32  97.995
                200        1.6   0.05    0.15  0.2   0.35  97.995
                200        1.6   0.05    0.15  0.25  0.34  97.995
                200        1.6   0.1     0.1   0.19  0.31  97.995
                200        1.6   0.06    0.06  0.17  0.31  97.995
                SoilCrop OatsSoil: LL=[0.1, 0.1, 0.149, 0.14, 0.15, 0.149, 0.1, 0.06]; KL=[0.06, 0.05, 0.04, 0.06, 0.05, 0.02, 0.02, 0]; XF=[1, 1, 1, 1, 1, 1, 1, 1]
        Simulation Rainshelter
          Clock: Start=1998-09-28; End=1999-04-01
          Summary summaryfile
          Weather: FileName=WeatherFiles\Lincoln.met
          SoilArbitrator Soil Arbitrator
          Zone paddock: Area=1; Slope=0; AspectAngle=0; Altitude=50
            Soil: SoilType=NZ_sedementary; Region=Plains; State=Canterbury; Country=New Zealnd; Latitude=0; Longitude=0
              Chemical: Thickness=[100, 200, 300, 300, 300, 300]; PH=[6.6, 6.2, 5.7, 5.5, 5.5, 5.5]; PHUnits=Water
              Physical
                Thickness  BD     AirDry  LL15   DUL   SAT    KS
                200        1.311  0.05    0.1    0.25  0.419  4832.039
                200        1.524  0.1     0.1    0.33  0.405  389.229
                200        1.65   0.149   0.149  0.27  0.342  16.362
                200        1.601  0.14    0.14   0.22  0.322  97.995
                200        1.601  0.05    0.15   0.2   0.348  97.995
                200        1.601  0.05    0.149  0.25  0.342  97.995
                200        1.601  0.1     0.1    0.19  0.307  97.995
                200        1.601  0.06    0.06   0.17  0.309  97.995
                SoilCrop OatsSoil: LL=[0.1, 0.1, 0.149, 0.14, 0.15, 0.149, 0.1, 0.06]; KL=[0.06, 0.05, 0.04, 0.06, 0.05, 0.02, 0.02, 0]; XF=[1, 0.2, 1, 1, 1, 1, 1, 1]
              WaterBalance SoilWater: SummerDate=1-Nov; SummerU=6; SummerCona=2; WinterDate=1-Apr; WinterU=9; WinterCona=4.4; DiffusConst=0; DiffusSlope=0; Salb=0.18; CN2Bare=68; CNRed=20; CNCov=0.8; DischargeWidth=0; CatchmentArea=0; PSIDul=-100
                Thickness  SWCON  KLAT
                200        0.7    0
                200        0.7    0
                200        0.95   0
                200        0.95   0
                200        0.95   0
                200        0.95   0
                200        0.95   0
                200        0.95   0
              Organic: FOMCNRatio=40; CarbonUnits=Total
                Thickness  Carbon  SoilCNRatio  FBiom  FInert  FOM
                180        2.625   11           0.033  0.437   427.528
                150        1.247   11           0.019  0.657   316.72
                400        0.316   11           0.012  0.85    142.312
                270        0.208   11           0.01   0.945   82.9318
                500        0.2     11           0.01   0.983   30.5089
              Water: Thickness=[200, 200, 200, 200, 200, 200, 200, 200]; InitialValues=[0.31, 0.31, 0.16, 0.15, 0.1, 0.1, 0.11, 0.12]; RelativeTo=LL15; FilledFromTop=false
              CERESSoilTemperature Temperature
              Nutrient
              Solute NO3: Thickness=[100, 200, 300, 300, 300, 300]; InitialValues=[202.213, 103.567, 4.67, 2.603, 1.562, 1.562]; InitialValuesUnits=ppm; WaterTableConcentration=0; D0=0; DepthConstant=0; MaxDepthSoluteAccessible=0; RunoffEffectivenessAtMovingSolute=0; MaxEffectiveRunoff=0
              Solute NH4: Thickness=[100, 200, 300, 300, 300, 300]; InitialValues=[3, 2.5, 1.333, 1, 1, 1]; InitialValuesUnits=ppm; WaterTableConcentration=0; D0=0; DepthConstant=0; MaxDepthSoluteAccessible=0; RunoffEffectivenessAtMovingSolute=0; MaxEffectiveRunoff=0
              Solute Urea: Thickness=[100, 200, 300, 300, 300, 300]; InitialValues=[0, 0, 0, 0, 0, 0]; InitialValuesUnits=kg/ha; WaterTableConcentration=0; D0=0; DepthConstant=0; MaxDepthSoluteAccessible=0; RunoffEffectivenessAtMovingSolute=0; MaxEffectiveRunoff=0
            MicroClimate: a_interception=0; b_interception=1; c_interception=0; d_interception=0; SoilHeatFluxFraction=0.4; MinimumHeightDiffForNewLayer=0; NightInterceptionFraction=0.5; ReferenceHeight=2
            Fertiliser
            SurfaceOrganicMatter Surface Organic Matter: InitialResidueName=wheat_stubble; InitialResidueType=wheat; InitialResidueMass=0; InitialStandingFraction=0; InitialCPR=0; InitialCNR=80
            Irrigation
            Plant Oats
            Manager ClimateControl
              StartDate = 10/17/1998 00:00:00
              EndDate = 04/01/1999 00:00:00
```csharp
using Models.Soils;
using System.Xml.Serialization;
using Models;
using Models.PMF;
using System.Text;
using System.Collections.Generic;
using APSIM.Shared.Utilities;
using Models.Core;
using System;
using Models.Climate;

namespace Models
{
    [Serializable] 
    [System.Xml.Serialization.XmlInclude(typeof(Model))]
    public class Script : Model
    {
        [Link] Weather Met;
        [Link] Clock Clock;
    
        [Description("Start Date")]
        public DateTime StartDate { get; set; }
        
        [Description("End Date")]
        public DateTime EndDate { get; set; }
 
    
        [EventSubscribe("PreparingNewWeatherData")]
        private void OnPreparingNewWeatherData(object sender, EventArgs e)
        {
            if ((Clock.Today.Date >= StartDate) && (Clock.Today.Date <= EndDate))
                Met.Rain = 0;        
        }
    }
}
```
            Folder Manager folder
              Operations
                1998-09-29  [Oats].Sow(population:300, cultivar:"Drummond", depth:20, rowSpacing:130);
              Operations Irrig
                1998-11-09  [Irrigation].Apply(35.3);
                1998-11-16  [Irrigation].Apply(45);
                1998-11-23  [Irrigation].Apply(44);
                1998-11-30  [Irrigation].Apply(30.1);
                1998-12-07  [Irrigation].Apply(41.6);
                1998-12-14  [Irrigation].Apply(55);
                1998-12-21  [Irrigation].Apply(50);
                1998-12-28  [Irrigation].Apply(55);
                1999-01-05  [Irrigation].Apply(53);
                1999-01-11  [Irrigation].Apply(50.4);
                1999-01-18  [Irrigation].Apply(49);
                1999-01-25  [Irrigation].Apply(49);
                1999-02-01  [Irrigation].Apply(51.2);
                1999-02-08  [Irrigation].Apply(53);
                1999-02-15  [Irrigation].Apply(34);
                1999-02-22  [Irrigation].Apply(37);
                1999-03-01  [Irrigation].Apply(24);
              Manager LeafSize
```csharp
using Newtonsoft.Json;
using APSIM.Shared.Utilities;
using System.Xml.Serialization;
using Models;
using Models.PMF;
using Models.Soils;
using System.Text;
using System.Collections.Generic;
using Models.Core;
using System;
using Models.Soils.Nutrients;

namespace Models
{
    [Serializable] 
    public class Script : Model
    {
        [Link] Clock Clock;
        [Link] Plant Oats;
        [Link] Zone zone;
                    
        [JsonIgnore] public bool InitialDay { get; set; }
        
        [JsonIgnore] public double LeafExpandedPosition { get; set; }
        [JsonIgnore] public double LeafAppearedPosition { get; set; }
        [JsonIgnore] public double ExpandedLeafNoYesterday { get; set; }
        [JsonIgnore] public double AppearedLeafNoYesterday { get; set; }
        [JsonIgnore] public double MostRecentlyExpandedLeafSize { get; set; }
        [JsonIgnore] public double MostRecentlyAppearedLeafMaxSize { get; set; }
        
        [EventSubscribe("StartOfSimulation")]
        private void OnSimulationCommencing(object sender, EventArgs e)
        {
            InitialDay = true;
            LeafExpandedPosition = 0;
            LeafAppearedPosition = 0;
            ExpandedLeafNoYesterday = 0;
            AppearedLeafNoYesterday = 0;
            MostRecentlyExpandedLeafSize = 0;
            MostRecentlyAppearedLeafMaxSize = 0;
        }
        
        [EventSubscribe("DoManagement")]
        private void OnDoManagement(object sender, EventArgs e)
        {
            ExpandedLeafNoYesterday = Convert.ToDouble(zone.Get("Oats.Leaf.ExpandedCohortNo"));
            AppearedLeafNoYesterday = Convert.ToDouble(zone.Get("Oats.Leaf.AppearedCohortNo"));
        }
        
        [EventSubscribe("DoManagementCalculations")]
        private void OnDoManagementCalculations(object sender, EventArgs e)
        {
            if (Convert.ToDouble(zone.Get("Oats.Leaf.ExpandedCohortNo")) > ExpandedLeafNoYesterday)
            {
                LeafExpandedPosition = Convert.ToDouble(zone.Get("Oats.Leaf.ExpandedCohortNo"));
                MostRecentlyExpandedLeafSize = (double)zone.Get("Oats.Leaf.CohortSize[" + (int)LeafExpandedPosition + "]");
            }
            
            if (Convert.ToDouble(zone.Get("Oats.Leaf.AppearedCohortNo")) > AppearedLeafNoYesterday)
            {
                LeafAppearedPosition = Convert.ToDouble(zone.Get("Oats.Leaf.AppearedCohortNo"));
                MostRecentlyAppearedLeafMaxSize = (double)zone.Get("Oats.Leaf.CohortParameters.MaxArea.Value()");
            }
            
        }
    }
}
```
            Report DailyReport
            Report HarvestReport
              VariableNames:
                [Leaf].Number
                [Leaf].FinalLeafNumber
                [Phenology].FlagLeafDAS
                [Phenology].FloweringDAS
                [Phenology].MaturityDAS
                [Phenology].CurrentPhase.Name
                [Phenology].CurrentStageName
                [Oats].AboveGroundLive.Wt
                [Oats].AboveGround.Wt
                [Oats].Grain.Wt
            Report SupReport: EventNames=[Clock].DoReport
              VariableNames:
                [Clock].Today
                [Phenology].ThermalTime
                [Oats].Arbitrator.DM.TotalFixationSupply
                [Oats].Arbitrator.FN
                [Oats].Leaf.Photosynthesis.FT
                [Oats].Leaf.Photosynthesis.FVPD
                [Oats].Leaf.Photosynthesis.RueAct
                sum([Soil].Water.MM[1:8]) as ProfileWater
                [LeafSize].Script.LeafAppearedPosition
                [LeafSize].Script.MostRecentlyAppearedLeafMaxSize
                [LeafSize].Script.LeafExpandedPosition
                [LeafSize].Script.MostRecentlyExpandedLeafSize
                [Grain].AccumThermalTime
                [Oats].Grain.NumberFunction
      Experiment WinterSowing2015
        Memo
          FRNL Experiment: Data from [malcolm2016catch]

          Note: the 2015 version of this experiment established inconsistently and data is not of the same quality as that generated in 2016.

          Grazing winter forage crops is an important management strategy for profitable livestock production in many New Zealand regions where there is commonly a pasture feed deficit during this period. However, the high stocking densities that are often associated with these systems can have negative environmental effects, such as nitrogen (N) leaching losses to groundwater. This field study investigated the potential biomass production and reduced risk of N leaching from establishing oats (Avena sativa L.) as a green-chop catch crop after winter-grazed forage kale (Brassica oleracea var. acephala L.) in Canterbury, New Zealand. Oat crops were direct-drilled on two sowing dates (early: 1 July 2015 and late: 1 August 2015) and were managed under high (400 kg N/ha) and low (0 kg N/ha) N load conditions, representing urine-patch and inter urine-patch areas. For the early-sown crops yields were 6.1 (low N) and 11.8 t DM/ha (high N) at final harvest (50% ear emergence) on 19 November 2015. For the late-sown crops yields were 6.7 (low N) and 10.1 t DM/ha (high N) at the same development stage (26 November 2015). By establishing oats as a catch crop in winter soil profile mineral-N (0-120 cm depth) was reduced by up to 86% (early) and 80% (late) in the high N (simulated urine-patch) treatments compared with the respective fallow treatment. These results indicated the technical feasibility of direct drilling oats as catch crops immediately after winter forage grazing, with likely production and environmental benefits such as the reduced risk of N leaching losses.
        Factors
          Permutation
            Factor Sow
              CompositeFactor July
                Specifications:
                  [Operations]
                  [Fertilise].Script.SDSwitch = 1.0
                Operations
                  2015-07-01  [Oats].Sow(population:180, cultivar:"Milton", depth:40, rowSpacing:150);
              CompositeFactor Aug
                Specifications:
                  [Operations]
                  [Fertilise].Script.SDSwitch = 2.0
                Operations
                  2015-08-01  [Oats].Sow(population:160, cultivar:"Milton", depth:40, rowSpacing:150);
            Factor Fert
              CompositeFactor 0: Specifications=[Fertilize]
                Operations Fertilize
                  2015-06-01  [Fertiliser].Apply(0, Fertiliser.Types.UreaN, 10);
              CompositeFactor 400: Specifications=[Fertilize]
                Operations Fertilize
                  2015-06-01  [Fertiliser].Apply(400, Fertiliser.Types.UreaN, 10);
        Simulation ABlock
          Clock: Start=2015-05-25; End=2015-12-01
          Weather: FileName=WeatherFiles\Lincoln.met
          Summary summaryfile
          SoilArbitrator Soil Arbitrator
          Zone paddock: Area=1; Slope=0; AspectAngle=0; Altitude=50
            Soil: Latitude=0; Longitude=0
              Chemical: Thickness=[100, 200, 300, 300, 300, 300]; PH=[6.6, 6.2, 5.7, 5.5, 5.5, 5.5]; PHUnits=Water
              Physical
                Thickness  BD   AirDry  LL15  DUL   SAT
                200        1.2  0.15    0.15  0.32  0.46
                200        1.2  0.15    0.15  0.32  0.46
                200        1.2  0.15    0.15  0.3   0.4
                200        1.2  0.15    0.15  0.3   0.4
                200        1.2  0.15    0.15  0.3   0.4
                200        1.2  0.15    0.15  0.3   0.4
                200        1.2  0.15    0.15  0.3   0.4
                200        1.2  0.15    0.15  0.3   0.4
                SoilCrop WheatSoil: LL=[0.15, 0.15, 0.15, 0.15, 0.15, 0.15, 0.15, 0.15]; KL=[0.06, 0.06, 0.06, 0.06, 0.04, 0.025, 0.01, 0.005]; XF=[1, 1, 1, 1, 1, 1, 1, 1]
                SoilCrop OatsSoil: LL=[0.15, 0.15, 0.15, 0.15, 0.15, 0.15, 0.15, 0.15]; KL=[0.06, 0.06, 0.06, 0.06, 0.04, 0.025, 0.01, 0.005]; XF=[1, 1, 1, 1, 1, 1, 1, 1]
              WaterBalance SoilWater: same as Validation.New Zealand.RS_Oats_9899.Rainshelter.paddock.Soil.SoilWater
              Organic: FOMCNRatio=30; CarbonUnits=Total
                Thickness  Carbon  SoilCNRatio  FBiom  FInert  FOM
                100        1.82    11.5         0.025  0.3     1243.93
                200        1.47    11.5         0.025  0.4     833.832
                300        1.2     11.5         0.015  0.75    457.617
                300        1.03    11.5         0.01   0.9     251.145
                300        0.47    11.5         0.01   0.96    137.831
                300        0.47    11.5         0.01   0.96    75.6435
              Water: Thickness=[200, 200, 200, 200, 200, 200, 200, 200]; InitialValues=[0.29, 0.28, 0.16, 0.15, 0.15, 0.15, 0.15, 0.15]; RelativeTo=LL15; FilledFromTop=false
              CERESSoilTemperature Temperature
              Nutrient
              Solute NO3: Thickness=[100, 200, 300, 300, 300, 300]; InitialValues=[16.6667, 12.5, 1.38889, 1.38889, 0, 0]; InitialValuesUnits=ppm; WaterTableConcentration=0; D0=0; DepthConstant=0; MaxDepthSoluteAccessible=0; RunoffEffectivenessAtMovingSolute=0; MaxEffectiveRunoff=0
              Solute NH4: Thickness=[100, 200, 300, 300, 300, 300]; InitialValues=[0, 0, 0, 0, 0, 0]; InitialValuesUnits=ppm; WaterTableConcentration=0; D0=0; DepthConstant=0; MaxDepthSoluteAccessible=0; RunoffEffectivenessAtMovingSolute=0; MaxEffectiveRunoff=0
              Solute Urea: same as Validation.New Zealand.RS_Oats_9899.Rainshelter.paddock.Soil.Urea
            Irrigation
            SurfaceOrganicMatter Surface Organic Matter: InitialResidueName=wheat_stubble; InitialResidueType=wheat; InitialResidueMass=0; InitialStandingFraction=0; InitialCPR=0; InitialCNR=80
            Fertiliser
            MicroClimate: a_interception=0; b_interception=1; c_interception=0; d_interception=0; SoilHeatFluxFraction=0.4; MinimumHeightDiffForNewLayer=0; NightInterceptionFraction=0.5; ReferenceHeight=2
            Plant Oats
            Folder Manager folder
              Operations
              Manager Fertilise
                SDSwitch = 0
                FertDate1 = 05-Aug
                FertDate2 = 01-Oct
                FertDate3 = 20-Oct
                FertDate4 = 25-Nov
                Amount1 = 0
                Amount2 = 0
                Amount3 = 0
                Amount4 = 0
```csharp
using Models.Soils;
using System;
using Models.Core;
using Models.PMF;
using APSIM.Shared.Utilities;
namespace Models
{
    [Serializable]
    public class Script : Model
    {
        [Link] Clock Clock;
        [Link] Fertiliser Fertiliser;
        
        [Description("Date to fertilise")]
        public string FertDate1 { get; set; }
        [Description("Date to fertilise")]
        public string FertDate2 { get; set; }
        [Description("Date to fertilise")]
        public string FertDate3 { get; set; }
        [Description("Date to fertilise")]
        public string FertDate4 { get; set; }
        
        [Description("Amount of fertiliser to be applied (kg/ha)")]
        public double Amount1 { get; set; }
        [Description("Amount of fertiliser to be applied (kg/ha)")]
        public double Amount2 { get; set; }
        [Description("Amount of fertiliser to be applied (kg/ha)")]
        public double Amount3 { get; set; }
        [Description("Amount of fertiliser to be applied (kg/ha)")]
        public double Amount4 { get; set; }
        
        [Description("Amount of fertiliser to be applied (kg/ha)")]
        public double SDSwitch { get; set; }
        
        [EventSubscribe("DoManagement")]
        private void OnDoManagement(object sender, EventArgs e)
        {
            if (DateUtilities.WithinDates(FertDate1, Clock.Today, FertDate1))
                Fertiliser.Apply(Amount: Amount1 * SDSwitch, Type: Fertiliser.Types.NO3N);
            if (DateUtilities.WithinDates(FertDate2, Clock.Today, FertDate2))
                Fertiliser.Apply(Amount: Amount2, Type: Fertiliser.Types.NO3N);
            if (DateUtilities.WithinDates(FertDate3, Clock.Today, FertDate3))
                Fertiliser.Apply(Amount: Amount3, Type: Fertiliser.Types.NO3N);
            if (DateUtilities.WithinDates(FertDate4, Clock.Today, FertDate4))
                Fertiliser.Apply(Amount: Amount4 * SDSwitch, Type: Fertiliser.Types.NO3N);
        }
    }
}
```
              Operations Fertilize
                2015-06-01  [Fertiliser].Apply(0, Fertiliser.Types.UreaN, 10);
              Operations Irr
                2015-10-15  [Irrigation].Apply(25);
                2015-11-03  [Irrigation].Apply(25);
                2015-11-15  [Irrigation].Apply(25);
                2015-11-20  [Irrigation].Apply(30);
              Manager Harvesting
```csharp
using Models.Soils.Nutrients;
using System;
using Models.Core;
using System.Collections.Generic;
using System.Text;
using Models.Soils;
using Models.Soils.Nutrients;
using Models.PMF;
using Models;
using System.Xml.Serialization;
using APSIM.Shared.Utilities;

namespace Models
{
    [Serializable] 
    public class Script : Model
    {

    }
}
```
            Report DailyReport
            Report HarvestReport
            Report SupReport: EventNames=[Clock].DoReport
              VariableNames:
                [Clock].Today
                [Oats].Arbitrator.DM.TotalFixationSupply
                [Oats].Arbitrator.FN
                [Oats].Leaf.Photosynthesis.FT
                [Oats].Leaf.Photosynthesis.FVPD
                [Oats].Leaf.Photosynthesis.RueAct
                sum([Soil].Water.MM[1:8]) as ProfileWater
      Experiment WinterSowing2016
        Memo
          FRNL Experiment: Data from [malcolm2016catch]

          Grazing winter forage crops is an important management strategy for profitable livestock production in many New Zealand regions where there is commonly a pasture feed deficit during this period. However, the high stocking densities that are often associated with these systems can have negative environmental effects, such as nitrogen (N) leaching losses to groundwater. This field study investigated the potential biomass production and reduced risk of N leaching from establishing oats (Avena sativa L.) as a green-chop catch crop after winter-grazed forage kale (Brassica oleracea var. acephala L.) in Canterbury, New Zealand. Oat crops were direct-drilled on two sowing dates (early: 1 July 2015 and late: 1 August 2015) and were managed under high (400 kg N/ha) and low (0 kg N/ha) N load conditions, representing urine-patch and inter urine-patch areas. For the early-sown crops yields were 6.1 (low N) and 11.8 t DM/ha (high N) at final harvest (50% ear emergence) on 19 November
          2015. For the late-sown crops yields were 6.7 (low N) and 10.1 t DM/ha (high N) at the same development stage (26 November 2015). By establishing oats as a catch crop in winter soil profile mineral-N (0-120 cm depth) was reduced by up to 86% (early) and 80% (late) in the high N (simulated urine-patch) treatments compared with the respective fallow treatment. These results indicated the technical feasibility of direct drilling oats as catch crops immediately after winter forage grazing, with likely production and environmental benefits such as the reduced risk of N leaching losses.
        Factors
          Permutation
            Factor Sow
              CompositeFactor July
                Specifications:
                  [Operations]
                  [Fertilise].Script.SDSwitch = 1.0
                Operations
                  2016-07-05  [Oats].Sow(population:400, cultivar:"Milton", depth:40, rowSpacing:150);
              CompositeFactor Aug
                Specifications:
                  [Operations]
                  [Fertilise].Script.SDSwitch = 2.0
                Operations
                  2016-07-29  [Oats].Sow(population:300, cultivar:"Milton", depth:40, rowSpacing:150);
            Factor Fert
              CompositeFactor 400: Specifications=[Fertilize]
                Operations Fertilize
                  2015-06-01  [Fertiliser].Apply(400, Fertiliser.Types.UreaN, 10);
        Simulation RS2016
          Clock: Start=2016-05-25; End=2016-12-01
          Weather: FileName=WeatherFiles\Lincoln.met
          Summary summaryfile
          SoilArbitrator Soil Arbitrator
          Zone paddock: Area=1; Slope=0; AspectAngle=0; Altitude=50
            Soil: Latitude=0; Longitude=0
              Chemical: Thickness=[100, 200, 300, 300, 300, 300]; PH=[6.6, 6.2, 5.7, 5.5, 5.5, 5.5]; PHUnits=Water
              Physical
                Thickness  BD   AirDry  LL15  DUL   SAT
                200        1.2  0.15    0.15  0.32  0.46
                200        1.2  0.15    0.15  0.32  0.46
                200        1.2  0.15    0.15  0.3   0.4
                200        1.2  0.15    0.15  0.3   0.4
                200        1.2  0.15    0.15  0.3   0.4
                200        1.2  0.15    0.15  0.3   0.4
                200        1.2  0.15    0.15  0.3   0.4
                200        1.2  0.15    0.15  0.3   0.4
                SoilCrop WheatSoil: LL=[0.15, 0.15, 0.15, 0.15, 0.15, 0.15, 0.15, 0.15]; KL=[0.06, 0.06, 0.06, 0.06, 0.04, 0.03, 0.01, 0.01]; XF=[1, 1, 1, 1, 1, 1, 1, 1]
                SoilCrop OatsSoil: LL=[0.15, 0.15, 0.15, 0.15, 0.15, 0.15, 0.15, 0.15]; KL=[0.06, 0.06, 0.06, 0.06, 0.04, 0.03, 0.01, 0.01]; XF=[1, 1, 1, 1, 1, 1, 1, 1]
              WaterBalance SoilWater: same as Validation.New Zealand.RS_Oats_9899.Rainshelter.paddock.Soil.SoilWater
              Organic: same as Validation.New Zealand.WinterSowing2015.ABlock.paddock.Soil.Organic
              Water: Thickness=[200, 200, 200, 200, 200, 200, 200, 200]; InitialValues=[0.29, 0.28, 0.16, 0.15, 0.15, 0.15, 0.15, 0.15]; RelativeTo=LL15; FilledFromTop=false
              CERESSoilTemperature Temperature
              Nutrient
              Solute NO3: Thickness=[100, 200, 300, 300, 300, 300]; InitialValues=[180.833, 12.5, 1.38889, 1.38889, 0, 0]; InitialValuesUnits=ppm; WaterTableConcentration=0; D0=0; DepthConstant=0; MaxDepthSoluteAccessible=0; RunoffEffectivenessAtMovingSolute=0; MaxEffectiveRunoff=0
              Solute NH4: same as Validation.New Zealand.WinterSowing2015.ABlock.paddock.Soil.NH4
              Solute Urea: same as Validation.New Zealand.RS_Oats_9899.Rainshelter.paddock.Soil.Urea
            Irrigation
            SurfaceOrganicMatter Surface Organic Matter: InitialResidueName=wheat_stubble; InitialResidueType=wheat; InitialResidueMass=0; InitialStandingFraction=0; InitialCPR=0; InitialCNR=80
            Fertiliser
            MicroClimate: a_interception=0; b_interception=1; c_interception=0; d_interception=0; SoilHeatFluxFraction=0.4; MinimumHeightDiffForNewLayer=0; NightInterceptionFraction=0.5; ReferenceHeight=2
            Plant Oats
            Folder Manager folder
              Operations
              Manager Fertilise
                FertDate1 = 05-Aug
                FertDate2 = 01-Oct
                FertDate3 = 20-Oct
                FertDate4 = 25-Nov
                Amount1 = 0
                Amount2 = 0
                Amount3 = 0
                Amount4 = 0
                SDSwitch = 0
                script: same as in Validation.New Zealand.WinterSowing2015.ABlock.paddock.Manager folder.Fertilise
              Operations Fertilize
                2015-06-01  [Fertiliser].Apply(0, Fertiliser.Types.UreaN, 10);
              Operations Irr
                2016-09-06  [Irrigation].Apply(25);
                2016-09-13  [Irrigation].Apply(28);
                2016-09-19  [Irrigation].Apply(25);
                2016-09-26  [Irrigation].Apply(25);
                2016-10-05  [Irrigation].Apply(30);
              Manager Harvesting
                script: same as in Validation.New Zealand.WinterSowing2015.ABlock.paddock.Manager folder.Harvesting
            Report DailyReport
            Report HarvestReport
      Experiment CPT
        Memo
          Jamieson, P. D. and C. A. Munro (1999). A simple method for the phenological evaluation of new cereal cultivars. Agronomy Society of New Zealand - Proceedings, Twenty-Ninth Annual Conference, 1999. J. G. Hampton and K. M. Pollock. 29: 63-68.

          This experiment is part of the ongoing Cultivar Prediction Trial at Plant & Food Lincoln wher a Cultivar is planted at 3 sowing dates throughout the year and the time of flowering, Final leaf number and Flag leaf are recorded.
        Factors
          Permutation
            Factor Sow
              Specification=[Clock].StartDate = 2002-03-07,2002-05-15,2002-09-09,2003-03-14,2003-05-21,2003-09-02,2004-03-23,2004-05-28,2004-09-06
            Factor Cult: Specification=[SowAndHarvest].Script.Cultivar = Hokonui,Stampede
        Simulation PaddockCPT
          Clock: Start=2002-03-01; End=2010-02-01
          Weather: FileName=WeatherFiles\Lincoln.met
          Summary summaryfile
          SoilArbitrator Soil Arbitrator
          Zone paddock: Area=1; Slope=0; AspectAngle=0; Altitude=50
            Soil: Latitude=0; Longitude=0
              Chemical: Thickness=[100, 200, 300, 300, 300, 300]; PH=[6.6, 6.2, 5.7, 5.5, 5.5, 5.5]; PHUnits=Water
              Physical
                Thickness  BD   AirDry  LL15  DUL   SAT
                200        1.2  0.05    0.1   0.32  0.46
                200        1.2  0.1     0.1   0.32  0.46
                200        1.2  0.07    0.07  0.13  0.4
                200        1.2  0.07    0.07  0.1   0.3
                200        1.2  0.08    0.08  0.11  0.3
                200        1.2  0.07    0.07  0.1   0.3
                200        1.2  0.07    0.07  0.1   0.3
                200        1.2  0.07    0.07  0.1   0.3
                SoilCrop WheatSoil: LL=[0.1, 0.1, 0.07, 0.07, 0.08, 0.07, 0.07, 0.07]; KL=[0.06, 0.06, 0.06, 0.06, 0.04, 0.025, 0.01, 0.005]; XF=[1, 1, 1, 1, 1, 1, 1, 1]
                SoilCrop OatsSoil: LL=[0.1, 0.1, 0.07, 0.07, 0.08, 0.07, 0.07, 0.07]; KL=[0.06, 0.06, 0.06, 0.06, 0.04, 0.025, 0.01, 0.005]; XF=[1, 1, 1, 1, 1, 1, 1, 1]
              WaterBalance SoilWater: same as Validation.New Zealand.RS_Oats_9899.Rainshelter.paddock.Soil.SoilWater
              Organic: same as Validation.New Zealand.WinterSowing2015.ABlock.paddock.Soil.Organic
              Water: Thickness=[200, 200, 200, 200, 200, 200, 200, 200]; InitialValues=[0.29, 0.28, 0.16, 0.15, 0.1, 0.1, 0.11, 0.12]; RelativeTo=LL15; FilledFromTop=false
              CERESSoilTemperature Temperature
              Nutrient
              Solute NO3: same as Validation.New Zealand.WinterSowing2016.RS2016.paddock.Soil.NO3
              Solute NH4: same as Validation.New Zealand.WinterSowing2015.ABlock.paddock.Soil.NH4
              Solute Urea: same as Validation.New Zealand.RS_Oats_9899.Rainshelter.paddock.Soil.Urea
            Irrigation
            SurfaceOrganicMatter Surface Organic Matter: InitialResidueName=wheat_stubble; InitialResidueType=wheat; InitialResidueMass=0; InitialStandingFraction=0; InitialCPR=0; InitialCNR=80
            Fertiliser
            MicroClimate: a_interception=0; b_interception=1; c_interception=0; d_interception=0; SoilHeatFluxFraction=0.4; MinimumHeightDiffForNewLayer=0; NightInterceptionFraction=0.5; ReferenceHeight=2
            Plant Oats
            Manager SowAndHarvest
              Cultivar = Otane
```csharp
using Models.Soils;
using Models.PMF.Phen;
using System;
using Models.Core;
using Models.PMF;
using APSIM.Shared.Utilities;
using System.Xml.Serialization;
using Newtonsoft.Json;
        
namespace Models
{
    [Serializable] 
    [System.Xml.Serialization.XmlInclude(typeof(Model))]
    public class Script : Model
    {
        [Link] private Plant Oats;
        [Link] private Clock Clock;
        [Link] private Simulation sim;
        [Link] private Summary Summary;
        [Link(Type = LinkType.Path, Path = "[Oats].Phenology")]
        private Phenology phenology;
        
        [Description("Cultivar")]
        public string Cultivar { get; set; }
        
        [JsonIgnore] public bool Sown { get; set; }
        [JsonIgnore] public bool Harvested { get; set; }
        [JsonIgnore] public bool EndSet { get; set; }
        
        [EventSubscribe("StartOfSimulation")]
        private void OnSimulationCommencing(object sender, EventArgs e)
        {
            Sown = false;
            Harvested = false;
            EndSet = false;
        }
        
        [EventSubscribe("DoManagement")]
        private void OnDoManagement(object sender, EventArgs e)
        {
            if (Sown == false)
            {
                Oats.Sow(population: 200, cultivar: Cultivar, depth: 15, rowSpacing: 150, budNumber: 1);
                Sown = true;
            }
            
            if (phenology.CurrentPhase.Name == "Maturing")
            {
                Oats.Harvest();
                Oats.EndCrop();
                Harvested = true;
                Summary.WriteMessage(this, "Maturity reached so setting end date to stop simulation", MessageType.Diagnostic);
            }
            
            if ((Harvested == true) && (EndSet == false))
            {
                sim.Set("Clock.EndDate", Clock.Today.AddDays(1));
                EndSet = true;
            }
        }
    }
}
```
            Report HarvestReport: EventNames=[Clock].EndOfSimulation
              VariableNames:
                [Leaf].Number
                [Leaf].FinalLeafNumber
                [Phenology].FlagLeafDAS
                [Phenology].FloweringDAS
                [Phenology].MaturityDAS
      Experiment RS_Oats_1718
        Memo Experiment Description
          #Experiment description

          ## Introduction
          This is a simulation of Oats in a crop rotation consisting of a forage species, fodder beet, grown over spring/summer and harvested in autumn, followed by the catch crop, oats. The actual experiment was done in two parts in the rain shelter facility of Plant and Food Research, Lincoln, NZ.  The experiments were designed to help develop the model for the respective plants and here they are used to further demonstrate that ApsimX can simulate water and nitrogen cycling in the field and then to examine whether catch crops are a good option for mitigating N leaching from forages.

           Part 1: Co-limitation of water and nitrogen on fodder beet physiology (no detail supplied for this experiment as it is not simulated herein)

           Part 2: Ability of oats to act as catch-crops over winter/spring
           - Irrigation: 2 treatments, low (enough to keep plants growing) or full irrigation (to match PET)
           - Nitrogen: 3 treatments, 80 kg N/ha, 125 kg N/ha & 320 kg N/ha at sowing (urea applied at sowing)

          Oats Experiment Management:
               - Cultivar: Milton
               - Sowing density: 300 plants/m2
                    row spacing: 15 cm
                          depth: 45 mm

              General actions:
                  05/07/2017 - Sowing
                  05/07/2017 - Fertiliser application (400kg/ha Potash, Urea: treat4=80kgN/ha, treat5=125kgN/ha, treat6=320kgN/ha)
                  24/07/2017 - Plants started to emerge
                  11/09/2017 - Irrigation started in treatements 4, 5, and 6
                  06/11/2017 - Irrigation extended to all plots
                  04-09/01/2018 - Plots harvested
        Factors
          Permutation
            Factor Nit
              CompositeFactor 80: Specifications=[TreatmentSpecificActions].Script.NitFactor = 0
              CompositeFactor 125: Specifications=[TreatmentSpecificActions].Script.NitFactor = 50
              CompositeFactor 320: Specifications=[TreatmentSpecificActions].Script.NitFactor = 300
            Factor Irr
              CompositeFactor Full
                Specifications:
                  [IrrigationSchedule]
                  [TreatmentSpecificActions].Script.IrrFactor = true
                Operations Full
                  2016-11-23  [Irrigation].Apply(30.0)
                  2016-11-30  [Irrigation].Apply(25.0)
                  2016-12-07  [Irrigation].Apply(25.0)
                  2016-12-21  [Irrigation].Apply(25.2)
                  2016-12-29  [Irrigation].Apply(30.0)
                  2017-01-04  [Irrigation].Apply(40.0)
                  2017-01-11  [Irrigation].Apply(32.9)
                  2017-01-18  [Irrigation].Apply(25.4)
                  2017-01-25  [Irrigation].Apply(31.3)
                  2017-02-08  [Irrigation].Apply(33.0)
                  2017-02-15  [Irrigation].Apply(35.0)
                  2017-02-22  [Irrigation].Apply(29.0)
                  2017-03-08  [Irrigation].Apply(34.0)
                  2017-03-22  [Irrigation].Apply(50.1)
                  2017-04-12  [Irrigation].Apply(30.9)
                  2017-04-27  [Irrigation].Apply(18.9)
                  2017-09-11  [Irrigation].Apply(20.9)
                  2017-09-12  [Irrigation].Apply(21.1)
                  2017-09-13  [Irrigation].Apply(21.4)
                  2017-10-10  [Irrigation].Apply(22.2)
                  2017-10-11  [Irrigation].Apply(22.5)
                  2017-10-12  [Irrigation].Apply(22.5)
                  Memo
                    Have added an extra irrigation, on 22 Oct,

                    Data indcates water applied but no notes of it RFZ

                    In Statefactors have donethe irrigations for
                      17/12  21/1 19/11 14/1
              CompositeFactor Nil
                Specifications:
                  [IrrigationSchedule]
                  [TreatmentSpecificActions].Script.IrrFactor = false
                Operations Nil
                  Memo
                    Have added an extra irrigation, on 3 Nov,

                    Data indcates water applied but no notes of it RFZ
        Simulation Rainshelter2017
          Clock: Start=2017-06-01; End=2018-01-15
          Weather: FileName=WeatherFiles\Lincoln.met
          Summary summaryfile
          SoilArbitrator Soil Arbitrator
          Zone paddock: Area=1; Slope=0; AspectAngle=0; Altitude=50
            Folder Manager folder
              Operations GeneralIrrigation
                2017-11-06  [Irrigation].Apply(45.0)
                2017-11-15  [Irrigation].Apply(30.0)
                2017-11-22  [Irrigation].Apply(29.7)
                2017-11-29  [Irrigation].Apply(35.0)
                2017-12-06  [Irrigation].Apply(46.7)
              Operations IrrigationSchedule
              Operations FertiliserSchedule
              Operations SowingHarvesting
                2017-07-05  [Oats].Sow(population: 400, cultivar: "Milton", depth: 45, rowSpacing: 45)
                2018-01-12  [Oats].Harvest()
              Manager ClimateControl
                StartDate = 10/17/2016 00:00:00
                EndDate = 06/30/2017 00:00:00
                OtherDateString = 27/07/2017 28/07/2017 09/08/2017 13/08/2017 14/08/2017 31/08/2017
```csharp
using Models.Soils;
using System.Globalization;
using System.Xml.Serialization;
using Models;
using Models.PMF;
using System.Text;
using System.Collections.Generic;
using APSIM.Shared.Utilities;
using Models.Core;
using System;
using Models.Climate;

// This script simulates a rainshelter, it controls the amount of rainfall (=0.0) and radiation (=95% of weather)
// It does that for a period between two dates, as well as at sporadic dates

namespace Models
{
    [Serializable] 
    [System.Xml.Serialization.XmlInclude(typeof(Model))]
    public class Script : Model
    {
        [Link] Weather Met;
        [Link] Clock Clock;
    
        [Description("Start date: ")]
        public DateTime StartDate { get; set; }
        [Description("End date: ")]
        public DateTime EndDate { get; set; }
         [Description("Other dates: ")]
         public string OtherDateString  { get; set; }
         
         private const string dateFormat = "dd/MM/yyyy";

         private DateTime[] OtherDates;
         private double todaysRain;

        [EventSubscribe("StartOfSimulation")]
        private void OnSimulationCommencing(object sender, EventArgs e)
        {
            //gather the dates the variables will be controlled
            string[] auxDates = OtherDateString.Split(new Char []{' ',','});
            OtherDates = new DateTime[auxDates.Length];
            for (int i = 0; i < auxDates.Length; i++)
                OtherDates[i] = DateTime.ParseExact(auxDates[i], dateFormat, CultureInfo.InvariantCulture);
        }

        [EventSubscribe("PreparingNewWeatherData")]
        private void OnPreparingNewWeatherData(object sender, EventArgs e)
        {
            if ((Clock.Today.Date >= StartDate.Date) && (Clock.Today.Date <= EndDate.Date))
            {
                todaysRain = Met.Rain;
                changeMetData();
            }
            else
            {
                for (int i = 0; i < OtherDates.Length; i++)
                    if (Clock.Today.Date == OtherDates[0].Date)
                        changeMetData();
            }

            // rain shelter partial day cover
            if (Clock.Today.Date == DateTime.ParseExact("01/09/2017", dateFormat, CultureInfo.InvariantCulture).Date)
                Met.Rain -= 2.0;
            
            // rain shelter cover removed for weekend
            if ((Clock.Today.Date == DateTime.ParseExact("03/06/2017", dateFormat, CultureInfo.InvariantCulture).Date)||(Clock.Today.Date == DateTime.ParseExact("04/06/2017", dateFormat, CultureInfo.InvariantCulture).Date))
            {
                Met.Rain = todaysRain;
                Met.Radn /= 0.95;
            }
        }

        private void changeMetData()
        {
            Met.Rain *= 0.0;
            Met.Radn *= 0.95;
        }
    }
}
```
              Manager TreatmentSpecificActions
                IrrFactor = False
                NitFactor = 0
```csharp
using Models.Interfaces;
using APSIM.Shared.Utilities;
using System.Xml.Serialization;
using Models;
using Models.PMF;
using Models.Soils;
using System.Text;
using System.Collections.Generic;
using Models.Core;
using System;
using Models.Soils.Nutrients;

// This script performs management actions that are not common to all treatments

namespace Models
{
    [Serializable] 
    public class Script : Model
    {
        [Link] private Clock Clock;
        [Link] private Irrigation Irrigation;
        [Link] private Fertiliser Fert;
        [Link] private Soil ThisSoil;
        [Link(ByName = true)] private ISolute no3;
        [Link(ByName = true)] private ISolute nh4;
        [Link]
        private IPhysical soilPhysical;

        [Description("Allow irrigation to be applied?")]
        public bool IrrFactor { get; set; }
        [Description("Amount of fertiliser to be applied (kg/ha)")]
        public double NitFactor { get; set; }


        private void SetSoilLayers()
        {
        
            int i = 0;

            if (soilPhysical.Thickness.Length != 7)
               throw new Exception("Soil layer exception");

            if ((IrrFactor == false) && (NitFactor == 300))
            {
                nh4.SetKgHa(SoluteSetterType.Fertiliser,new double[]{108,12,7,5,4,3,3});
                no3.SetKgHa(SoluteSetterType.Fertiliser,new double[] {55,30,25,12,3,5,5});
            }   
            else if ((IrrFactor == false) && (NitFactor == 50))
            {
                nh4.SetKgHa(SoluteSetterType.Fertiliser,new double[]{14.2,3.6,3.2,1.0,2.8,3.7,3});
                no3.SetKgHa(SoluteSetterType.Fertiliser,new double[] {34,16.8,15.8,7.7,1.8,2.3,5});
            }   
            else if ((IrrFactor == false) && (NitFactor == 0))
            {
                nh4.SetKgHa(SoluteSetterType.Fertiliser,new double[]{3.7,3.5,4.1,1.2,2.1,2.3,3});
                no3.SetKgHa(SoluteSetterType.Fertiliser,new double[] {18,13.7,10.8,4.2,1.9,2.8,5});
            }   
            else if ((IrrFactor == true) && (NitFactor == 300))
            {
                nh4.SetKgHa(SoluteSetterType.Fertiliser,new double[]{1.8,1.8,3.0,2.3,2.4,1.8,3});
                no3.SetKgHa(SoluteSetterType.Fertiliser,new double[] {12.6,6.4,5.3,2.8,2.2,2.2,5});
            }   
            else if ((IrrFactor == true) && (NitFactor == 50))
            {
                nh4.SetKgHa(SoluteSetterType.Fertiliser,new double[]{1.9,1.5,3.5,2.0,2.6,1.8,3});
                no3.SetKgHa(SoluteSetterType.Fertiliser,new double[] {8.5,5.4,1.9,1.5,1.8,2.7,5});
            }
            else if ((IrrFactor == true) && (NitFactor == 0))
            {
                nh4.SetKgHa(SoluteSetterType.Fertiliser,new double[]{2.5,2.4,3.1,3.4,5.6,2.5,3});
                no3.SetKgHa(SoluteSetterType.Fertiliser,new double[] {5.6,3.9,1.3,1.0,1.3,2.2,5});
            }
        }

        [EventSubscribe("DoManagement")]
        private void OnDoManagement(object sender, EventArgs e)
        {

            if (Clock.Today.Date == DateTime.Parse("02-Jun-2017"))
               SetSoilLayers();

        
            // Oats - Irrigation on dryland plots only, after harvest
            if (IrrFactor == false)
            {
                if ((Clock.Today.Date == DateTime.Parse("25-May-2017")) || (Clock.Today.Date == DateTime.Parse("26-May-2017")))
                    Irrigation.Apply(50.0);

                if (Clock.Today.Date == DateTime.Parse("29-May-2017"))
                if (NitFactor == 300)
                    Irrigation.Apply(64.0);

                if (Clock.Today.Date == DateTime.Parse("30-May-2017"))
                {
                    if (NitFactor == 0)
                        Irrigation.Apply(30.3);
                    if (NitFactor == 50)
                        Irrigation.Apply(51.0);
                }
            }

            // Oats - Irrigation on all 300N plots plus dryland 50N plots
            if (Clock.Today.Date == DateTime.Parse("13-Dec-2017"))
            {
                if (NitFactor == 300)
                    Irrigation.Apply(50.0);
                if ((NitFactor == 50) && (IrrFactor == false))
                    Irrigation.Apply(50.0);
            }

            // Oats - Fertiliser for irrigated plots only, on sowing
            if (Clock.Today.Date == DateTime.Parse("05-Jul-2017"))
            if (IrrFactor == true)
            {
                if (NitFactor == 0)
                    Fert.Apply(40, Models.Fertiliser.Types.UreaN, 10);
                if (NitFactor == 50)
                    Fert.Apply(85, Models.Fertiliser.Types.UreaN, 10);
                if (NitFactor == 300)
                    Fert.Apply(270, Models.Fertiliser.Types.UreaN, 10);
            }
        }
    }
}
```
              Manager LeafSize
                InitialDay = False
                LeafExpandedPosition = 0
                LeafAppearedPosition = 0
                ExpandedLeafNoYesterday = 0
                AppearedLeafNoYesterday = 0
                MostRecentlyExpandedLeafSize = 0
                MostRecentlyAppearedLeafMaxSize = 0
                script: same as in Validation.New Zealand.RS_Oats_9899.Rainshelter.paddock.Manager folder.LeafSize
            MicroClimate: a_interception=0; b_interception=1; c_interception=0; d_interception=0; SoilHeatFluxFraction=0.4; MinimumHeightDiffForNewLayer=0; NightInterceptionFraction=0.5; ReferenceHeight=2
            Irrigation
            Fertiliser
            SurfaceOrganicMatter Surface Organic Matter: InitialResidueName=oat_stubble; InitialResidueType=oats; InitialResidueMass=1000; InitialStandingFraction=0.5; InitialCPR=0; InitialCNR=20
            Soil: SoilType=Silt loam over sand; LocalName=Templeton; Site=RainShelter; NearestTown=Lincoln; Region=Plains; State=Canterbury; Country=New Zealand; Latitude=37.15; Longitude=172.28
              Memo Info
                # Soil Profile Description

                Templeton Silt Loam over sand, Typic Immature Pallic soil

                 Horizon  Depth (cm) Description
                 Ah         0-28     Very dark grayish brown (10YR 3/2); silt loam; no stones; moderately developed fine to medium blocky Leaf
                 Bw(f)     28-55     Dark yellowish brown (10YR 4/4); silt loam; no stones; weakly developed coarse to very coarse blocky Leaf
                 Bw(g)     55-95     Olive brown (2.5Y 4/4); fine sandy loam; no stones; apedal massive
                 2BC(g)    95-145    Olive brown (2.5Y 4/4); loamy sand;no stones; apedal single-grain
                 3BCg     145-153    Light yellowish brown (2.5Y 6/3); silt loam; no stones; apedal massive
                 4BCg     153-200+   Light yellowish brown (2.5Y 6/3); medium sand; no stones; apedal single-grain
                 ** 2BC(g) horizon contains a band of massive silt loam material between 115-130 cm

                Sampling layers:
                Layer  Depth (cm)
                 1	  0-15
                 2	 15-30
                 3	 30-60
                 4	 60-90
                 5	 90-120
                 6	120-150
                 7	150-180 -- Only for water
              Chemical: Thickness=[200, 150, 200, 150, 200, 150, 200, 250, 300]; PH=[6.1, 6.1, 6, 6, 6, 6, 6, 6, 6]; PHUnits=Water
              Physical
                Thickness  ParticleSizeClay  BD    AirDry  LL15  DUL   SAT    KS
                150        24                1.27  0.1     0.1   0.32  0.48   2911.1
                150        22.6667           1.38  0.1     0.1   0.31  0.47   711.9
                300        17.1667           1.39  0.08    0.08  0.32  0.475  442.9
                300        11.6667           1.45  0.14    0.14  0.37  0.44   171.9
                300        11.5              1.41  0.14    0.14  0.35  0.467  1973.9
                300        16.6667           1.49  0.12    0.12  0.34  0.437  1483.6
                300        16                1.49  0.07    0.07  0.2   0.437  944
                SoilCrop OatsSoil: LL=[0.1, 0.1, 0.08, 0.14, 0.14, 0.12, 0.07]; KL=[0.1, 0.1, 0.05, 0.04, 0.03, 0.01, 0]; XF=[1, 1, 1, 1, 1, 1, 1]
              WaterBalance SoilWater: SummerDate=1-Nov; SummerU=6; SummerCona=2; WinterDate=1-Apr; WinterU=9; WinterCona=4.4; DiffusConst=0; DiffusSlope=0; Salb=0.23; CN2Bare=50; CNRed=20; CNCov=0.8; DischargeWidth=0; CatchmentArea=0; PSIDul=-100; Thickness=[200, 150, 200, 150, 200, 150, 200, 250, 300]; SWCON=[0.9, 0.6, 0.6, 0.6, 0.546, 0.569, 0.533, 0.464, 0.541]
              Organic: FOMCNRatio=40; CarbonUnits=Total
                Thickness  Carbon  SoilCNRatio  FBiom  FInert  FOM
                200        3.4     11           0.06   0.2     271.505
                150        1.8     11           0.04   0.3     211.448
                200        0.3     11           0.012  0.85    151.509
                150        0.32    11           0.01   0.945   117.996
                200        0.14    11           0.01   0.983   84.5475
                150        0.21    11           0.01   0.98    65.8457
                200        0.2     11           0.01   0.99    47.1805
                250        0.2     11           0.01   0.99    31.1033
                300        0.17    11           0.01   0.99    18.8651
              Water: Thickness=[150, 150, 300, 300, 300, 300, 300]; InitialValues=[0.3, 0.244, 0.25, 0.25, 0.264, 0.256, 0.162]; RelativeTo=LL15; FilledFromTop=false
                Memo ReadThisIfInitialSoilNisOfInterest
                  Initial soil N varied from treatment to treatment depending on the irrigation and N treatment of the previous fodder beet trial.  These treatment specific initial N contents are set in a manager scrip called "TreatmentSpecificActions", over writing what is set in this node
              CERESSoilTemperature Temperature
              Nutrient
              Solute NO3: Thickness=[200, 150, 200, 150, 200, 150, 200, 250, 300]; InitialValuesUnits=ppm; WaterTableConcentration=0; D0=0; DepthConstant=0; MaxDepthSoluteAccessible=0; RunoffEffectivenessAtMovingSolute=0; MaxEffectiveRunoff=0
                InitialValues=[9.57863, 6.03621, 1.00719, 1.07136, 1.10345, 1.06383, 1.01599, 0.872483, 0.671141]
              Solute NH4: Thickness=[200, 150, 200, 150, 200, 150, 200, 250, 300]; InitialValuesUnits=ppm; WaterTableConcentration=0; D0=0; DepthConstant=0; MaxDepthSoluteAccessible=0; RunoffEffectivenessAtMovingSolute=0; MaxEffectiveRunoff=0
                InitialValues=[1.06518, 1.06848, 0.983213, 0.49632, 0.252874, 0.212766, 0.221096, 0.246085, 0.223714]
              Solute Urea: Thickness=[200, 150, 200, 150, 200, 150, 200, 250, 300]; InitialValues=[0, 0, 0, 0, 0, 0, 0, 0, 0]; InitialValuesUnits=kg/ha; WaterTableConcentration=0; D0=0; DepthConstant=0; MaxDepthSoluteAccessible=0; RunoffEffectivenessAtMovingSolute=0; MaxEffectiveRunoff=0
            Plant Oats
            Report EnviroReport: same as Replacements.EnviroReport
            Report DailyReport: EventNames=[Clock].DoReport
              VariableNames:
                [Clock].Today
                [Weather].MeanT
                [Soil].Water.Volumetric
                [Soil].Water.MM
                sum([Soil].Water.MM) as ProfileWater
                [SurfaceOrganicMatter].Wt
                sum([Soil].NO3.kgha) as TotalSoilNitrogen
                [Oats].AboveGround.N
                [Oats].AboveGround.Wt
                [Oats].AboveGroundLive.N
                [Oats].AboveGroundLive.Wt
                [Oats].AboveGroundDead.N
                [Oats].AboveGroundDead.Wt
                [Oats].Arbitrator.DMDemand
                [Oats].Arbitrator.DM.TotalFixationSupply
                [Oats].Ear.N
                [Oats].Ear.Nconc
                [Oats].Ear.Wt
                [Oats].Grain.N
                [Oats].Grain.NConc
                [Oats].Grain.Number
                [Oats].Grain.Size
                [Oats].Grain.Wt
                [Oats].Grain.Live.Wt
                [Oats].Leaf.AppearedCohortNo
                [Oats].Leaf.CoverDead
                [Oats].Leaf.CoverGreen
                [Oats].Leaf.CoverTotal
                [Oats].Leaf.Dead.N
                [Oats].Leaf.Dead.NConc
                [Oats].Leaf.Dead.Wt
                [Oats].Leaf.DeadCohortNo
                [Oats].Leaf.SenescingCohortNo
                [Oats].Leaf.ExpandedCohortNo
                [Oats].Leaf.Fn
                [Oats].Leaf.Fw
                [Oats].Leaf.Height
                [Oats].Leaf.InitialisedCohortNo
                [Oats].Leaf.LAI
                [Oats].Leaf.Live.N
                [Oats].Leaf.Live.NConc
                [Oats].Leaf.Live.Wt
                [Oats].Leaf.SpecificArea
                [Oats].Leaf.Transpiration
                [Phenology].CurrentPhase.Name
                [Phenology].CurrentStageName
                [Oats].Phenology.DailyVernalisation
                [Oats].Phenology.MeanTemp
                [Oats].Phenology.Photoperiod
                [Oats].Phenology.Stage
                [Oats].Phenology.ThermalTime
                [Oats].Phenology.ThermalTime
                [Oats].Phenology.Vrn1
                [Oats].Phenology.Vrn2
                [Oats].Phenology.Vrn4
                [Oats].Phenology.Zadok.Stage
                [Oats].Root.Depth
                [Oats].Root.N
                [Oats].Root.Wt
                [Oats].Root.Nconc
                [Oats].Root.WaterUptake
                [Oats].Panicle.N
                [Oats].Panicle.NConc
                [Oats].Panicle.Wt
                [Oats].Panicle.Live.StorageWt
                [Oats].Stem.N
                [Oats].Stem.NConc
                [Oats].Stem.Wt
                [Oats].Stem.PercentWSC
                [Oats].Stem.Live.StorageWt
                [Oats].StemPlusPanicle.Wt
                [Oats].StemPlusPanicle.N
                [Oats].SowingData.Cultivar
                [Oats].Leaf.HaunStageTerminalSpikelet
                [Oats].Leaf.HaunStage
                [Oats].Leaf.Height
                [Leaf].Number
                [Leaf].FinalLeafNumber
                [Leaf].FinalLeafNumber.ValueToHold.PhotoPLeaves
                [Oats].Leaf.MainStemPopn
                [Oats].Leaf.MeanTillerGrowthRate
                [Oats].Leaf.TillerPopulation
                [Oats].Total.N
                [Oats].Total.Wt
                [SurfaceOrganicMatter].Wt
                ([Oats].Leaf.Transpiration + [Soil].SoilWater.Es + [MicroClimate].PrecipitationInterception) as ET
                sum([Soil].NO3.kgha) as TotalSoilNitrogen
                [Phenology].FlagLeafDAS
                [Phenology].FloweringDAS
                [Phenology].MaturityDAS
                [Oats].Phenology.PhotoPeriod
                [Oats].Phenology.PhotoPeriodDeltaFunction
                [Oats].Phenology.Stage
                [Oats].Phenology.SoilTemperatureFunction
            Report HarvestReport
            Report SupReport: EventNames=[Clock].DoReport
              VariableNames:
                [Clock].Today
                [Phenology].ThermalTime
                [Leaf].CohortSize
                [Leaf].CohortParameters.MaxArea
                [Oats].Arbitrator.DM.TotalFixationSupply
                [Oats].Arbitrator.FN
                [Oats].Leaf.Phyllochron
                [Oats].Leaf.Photosynthesis.FT
                [Oats].Leaf.Photosynthesis.FVPD
                [Oats].Leaf.Photosynthesis.RueAct
                [Oats].Leaf.NextExpandingLeafProportion
                [Oats].Leaf.MeanTillerGrowthRate
                [LeafSize].Script.LeafAppearedPosition
                [LeafSize].Script.MostRecentlyAppearedLeafMaxSize
                [LeafSize].Script.LeafExpandedPosition
                [LeafSize].Script.MostRecentlyExpandedLeafSize
                [Grain].AccumThermalTime
                [Oats].Panicle.HeadNumber
                [Oats].Grain.NumberFunction
      Experiment SAE_Oats_2020
        Memo Experiment Description
          The aim of this SAE funded project is to assess contrasting plant traits in oats.

          The focus is on early-vigour as a critical plant trait in winter-sown oat catch crops.

          Early vigour influences N uptake rate by the catch crop and by association may also reduce the amount of residual soil N at risk of leaching.

          The treatments are 6 oat genotypes with potential differences for early canopy expansion.

          4 replicates

          400 kg N/ha at sowing to mimic  aurine patch to ne mopped by the oat catch crop

          Key differences in early vigour were due to individual leaf size in first 6 leaves
        Factors
          Factor Cultivars
            CompositeFactor Coronet: Specifications=[SowingHarvesting]
              Operations SowHar
                2020-07-23  [Oats].Sow(population: 350, cultivar: "Coronet", depth: 40, rowSpacing: 45)
                2020-11-12  [Oats].Harvest()
            CompositeFactor Armstrong: Specifications=[SowingHarvesting]
              Operations SowHar
                2020-07-23  [Oats].Sow(population: 350, cultivar: "Armstrong", depth: 40, rowSpacing: 45)
                2020-11-12  [Oats].Harvest()
            CompositeFactor Milton2: Specifications=[SowingHarvesting]
              Operations SowHar
                2020-07-23  [Oats].Sow(population: 350, cultivar: "Milton2", depth: 40, rowSpacing: 45)
                2020-11-12  [Oats].Harvest()
            CompositeFactor CROA146: Specifications=[SowingHarvesting]
              Operations SowHar
                2020-07-23  [Oats].Sow(population: 350, cultivar: "CROA146", depth: 40, rowSpacing: 45)
                2020-11-12  [Oats].Harvest()
            CompositeFactor 107_32: Specifications=[SowingHarvesting]
              Operations SowHar
                2020-07-23  [Oats].Sow(population: 350, cultivar: "107_32", depth: 40, rowSpacing: 45)
                2020-11-12  [Oats].Harvest()
            CompositeFactor 100_05: Specifications=[SowingHarvesting]
              Operations SowHar
                2020-07-23  [Oats].Sow(population: 350, cultivar: "100_05", depth: 40, rowSpacing: 45)
                2020-11-12  [Oats].Harvest()
            CompositeFactor Fallow: Specifications=[SowingHarvesting]
              Operations SowHar
                2010-07-23  [Oats].Sow(population: 1, cultivar: "100_05", depth: 40, rowSpacing: 45)
                2011-11-12  [Oats].Harvest()
                Memo
                  A work-around - Sowed one plant before start of simulation as the model did not accept sowing zero plants
        Simulation A_Block_2020
          Clock: Start=2020-06-29; End=2020-11-15
          Weather: FileName=WeatherFiles\weatherData.met
          Summary summaryfile
          SoilArbitrator Soil Arbitrator
          Zone paddock: Area=1; Slope=0; AspectAngle=0; Altitude=50
            Folder Manager folder
              Operations SowingHarvesting
                2020-07-23  [Oats].Sow(population: 350, cultivar: "Milton", depth: 30, rowSpacing: 45)
                2020-11-12  [Oats].Harvest()
              Operations IrrigationSchedule
                2020-09-29  [Irrigation].Apply(10.0)
                2020-09-30  [Irrigation].Apply(30.0)
                2020-10-08  [Irrigation].Apply(30.0)
                2020-10-22  [Irrigation].Apply(30.0)
                2020-10-29  [Irrigation].Apply(30.0)
                2020-11-20  [Irrigation].Apply(30.0)
              Operations FertiliserSchedule
                2020-07-23  [Fertiliser].Apply(Amount: 400, Type: Fertiliser.Types.UreaN, Depth: 10)
              Manager LeafSize: same as Validation.New Zealand.RS_Oats_9899.Rainshelter.paddock.Manager folder.LeafSize
            MicroClimate: a_interception=0; b_interception=1; c_interception=0; d_interception=0; SoilHeatFluxFraction=0.4; MinimumHeightDiffForNewLayer=0; NightInterceptionFraction=0.5; ReferenceHeight=2
            Irrigation
            Fertiliser
            SurfaceOrganicMatter Surface Organic Matter: InitialResidueName=oat_stubble; InitialResidueType=oats; InitialResidueMass=1000; InitialStandingFraction=0.5; InitialCPR=0; InitialCNR=20
            Plant Oats
              Folder NewCultivars
                Cultivar Coronet
                  Command:
                    [Phenology].CAMP.FLNparams.MinLN = 9
                    [Phenology].CAMP.FLNparams.VrnLN  = 0
                    [Phenology].CAMP.FLNparams.PpLN  = 0
                    [Leaf].Phyllochron.BasePhyllochron.FixedValue = 110
                    [Leaf].ExtinctionCoefficient.VegetativePhase.FixedValue = 0.5
                    [Leaf].MaxLeafArea.AreaLargestLeaf.FixedValue = 3073
                    [Leaf].InitialLeaves[1].Area = 28.4
                    [Leaf].HeightModel.PotentialHeight.XYPairs.Y = 10,150,550,750
                    [Leaf].TilleringRate.Vegetative.PotentialBranchingRate.XYPairs.X = 1,2,3,4,5,6,7,8
                    [Leaf].TilleringRate.Vegetative.PotentialBranchingRate.XYPairs.Y = 0,1,1,0,0,0,0,0
                    [Oats].Leaf.BranchingRate.StressFactors.CoverEffect.XYPairs.X = 1,1,1
                    [Stem].MaximumNConc.XYPairs.Y = 0.045,0.04,0.01
                    [Stem].MaximumNConc.XYPairs.X = 3.0, 4.2, 5
                    [Oats].Leaf.BranchMortality.MortalityPhase.Mortality.MortalityPerDegDay.XYPairs.Y[1] = 0.0008
                Cultivar CROA146
                  Command:
                    [Phenology].CAMP.FLNparams.MinLN = 9
                    [Phenology].CAMP.FLNparams.VrnLN  = 0
                    [Phenology].CAMP.FLNparams.PpLN  = 0
                    [Leaf].Phyllochron.BasePhyllochron.FixedValue = 110
                    [Leaf].ExtinctionCoefficient.VegetativePhase.FixedValue = 0.5
                    [Leaf].MaxLeafArea.AreaLargestLeaf.FixedValue = 4105
                    [Leaf].InitialLeaves[1].Area = 41.0
                    [Leaf].HeightModel.PotentialHeight.XYPairs.Y = 10,150,550,750
                    [Leaf].TilleringRate.Vegetative.PotentialBranchingRate.XYPairs.X = 1,2,3,4,5,6,7,8
                    [Leaf].TilleringRate.Vegetative.PotentialBranchingRate.XYPairs.Y = 0,0,0,0,0,1.7,0,0
                    [Oats].Leaf.BranchingRate.StressFactors.CoverEffect.XYPairs.X = 1,1,1
                Cultivar 107_32
                  Command:
                    [Phenology].CAMP.FLNparams.MinLN = 9
                    [Phenology].CAMP.FLNparams.VrnLN  = 0
                    [Phenology].CAMP.FLNparams.PpLN  = 0
                    [Leaf].Phyllochron.BasePhyllochron.FixedValue = 110
                    [Leaf].ExtinctionCoefficient.VegetativePhase.FixedValue = 0.5
                    [Leaf].MaxLeafArea.AreaLargestLeaf.FixedValue = 4289
                    [Leaf].InitialLeaves[1].Area = 68.5
                    [Leaf].HeightModel.PotentialHeight.XYPairs.Y = 10,150,550,750
                    [Leaf].TilleringRate.Vegetative.PotentialBranchingRate.XYPairs.X = 1,2,3,4,5,6,7,8
                    [Leaf].TilleringRate.Vegetative.PotentialBranchingRate.XYPairs.Y = 0,0,0,0,0,1.7,0,0
                Cultivar Armstrong
                  Command:
                    [Phenology].CAMP.FLNparams.MinLN = 9
                    [Phenology].CAMP.FLNparams.VrnLN  = 0
                    [Phenology].CAMP.FLNparams.PpLN  = 0
                    [Leaf].Phyllochron.BasePhyllochron.FixedValue = 135
                    [Leaf].ExtinctionCoefficient.VegetativePhase.FixedValue = 0.5
                    [Leaf].MaxLeafArea.AreaLargestLeaf.FixedValue = 4417
                    [Leaf].InitialLeaves[1].Area = 54.6
                    [Leaf].HeightModel.PotentialHeight.XYPairs.Y = 10,150,550,750
                    [Leaf].TilleringRate.Vegetative.PotentialBranchingRate.XYPairs.X = 1,2,3,4,5,6,7,8
                    [Leaf].TilleringRate.Vegetative.PotentialBranchingRate.XYPairs.Y = 0,0,0,0,0,1.7,0,0
                    [Oats].Leaf.BranchingRate.StressFactors.CoverEffect.XYPairs.X = 1,1,1
                Cultivar 100_05
                  Command:
                    [Phenology].CAMP.FLNparams.MinLN = 10.1
                    [Phenology].CAMP.FLNparams.VrnLN  = 0
                    [Phenology].CAMP.FLNparams.PpLN  = 0
                    [Leaf].Phyllochron.BasePhyllochron.FixedValue = 110
                    [Leaf].ExtinctionCoefficient.VegetativePhase.FixedValue = 0.5
                    [Leaf].MaxLeafArea.AreaLargestLeaf.FixedValue = 5814
                    [Leaf].InitialLeaves[1].Area = 71.2
                    [Leaf].HeightModel.PotentialHeight.XYPairs.Y = 10,150,550,750
                    [Leaf].TilleringRate.Vegetative.PotentialBranchingRate.XYPairs.X = 1,2,3,4,5,6,7,8
                    [Leaf].TilleringRate.Vegetative.PotentialBranchingRate.XYPairs.Y = 0,1,1,0,0,0,0,0
                    [Oats].Leaf.BranchingRate.StressFactors.CoverEffect.XYPairs.X = 1,1,1
                    [Stem].MaximumNConc.XYPairs.Y = 0.045,0.035,0.01
                    [Stem].MaximumNConc.XYPairs.X = 3.0, 4.2, 4.8
                    [Oats].Leaf.BranchMortality.MortalityPhase.Mortality.MortalityPerDegDay.XYPairs.Y[1] = 0.0022
                Cultivar Milton2
                  Command:
                    [Phenology].CAMP.FLNparams.MinLN = 9
                    [Phenology].CAMP.FLNparams.VrnLN  = 0
                    [Phenology].CAMP.FLNparams.PpLN  = 0
                    [Leaf].Phyllochron.BasePhyllochron.FixedValue = 110
                    [Leaf].ExtinctionCoefficient.VegetativePhase.FixedValue = 0.5
                    [Leaf].MaxLeafArea.AreaLargestLeaf.FixedValue = 3593
                    [Leaf].InitialLeaves[1].Area = 45.0
                    [Leaf].HeightModel.PotentialHeight.XYPairs.Y = 10,150,550,750
                    [Leaf].TilleringRate.Vegetative.PotentialBranchingRate.XYPairs.X = 1,2,3,4,5,6,7,8
                    [Leaf].TilleringRate.Vegetative.PotentialBranchingRate.XYPairs.Y = 0,0,0,0,0,1.7,0,0
                    [Oats].Leaf.BranchingRate.StressFactors.CoverEffect.XYPairs.X = 1,1,1
                Memo ReadMe
                  # Comparing cultivars Coronet and PFR 100-05

                  - Data collected by **Mike George**
                  - Data sits in: https://iplant.plantandfood.co.nz/project/I161208

                  ## Context:
                  - PFR 100-05 showed faster canopy cloure rates via drone aerial photos
                  - Field trial was done to identify mechanisms.

                  ##Main differences between cultivars were:

                  - Larger leaves by PRR 100-05 (45-80% larger)
                  - Taller stems by PFR 100-05 (50% taller)

                  ## Observations

                  - We agreed to keep only leaf size as genotype difference. Height also differed as:
                  - [Leaf].HeightModel.PotentialHeight.XYPairs.Y = 13,204,820,820
                  - [Leaf].HeightModel.PotentialHeight.XYPairs.Y = 20,300,1200,1200

                  ## Modifications (by RC, RZ, EK)
                  - Changed sowing depth to 40 mm to delay emergence
                  - Changed depth at which fertiliser N was applied to 10 cm (initially 40 cm which was an error)
                  - Removed the initialisation of the second leaf
                  - Changed maximum leaf area to match observations (cultivar-specific)
                  - Changed tillering dynamics (cultivar-specific)
                  - Changed phyllochron to improve leaf tip appearance (cultivar-specific)
                  - Changed the extinction coefficient (cultivar-specific)
                  - Changed stem height for a closer fit with measured values
                  - Changed stem maximum N conc
            Report EnviroReport: same as Replacements.EnviroReport
            Report DailyReport: EventNames=[Clock].DoReport
              VariableNames:
                [Clock].Today
                [Oats].Total.Wt
                [Oats].AboveGround.Wt
                [Oats].AboveGroundLive.Wt
                [Oats].Leaf.Live.Wt
                [Oats].Stem.Wt
                [Oats].AboveGroundDead.Wt
                [Oats].Leaf.Dead.Wt
                [Oats].Leaf.Senesced.Wt
                [Oats].Leaf.Height
                [Oats].Leaf.Height
                [Oats].Total.N
                [Oats].AboveGround.N
                [Oats].AboveGroundLive.N
                [Oats].Leaf.Live.N
                [Oats].Stem.N
                [Oats].AboveGroundDead.N
                [Oats].Leaf.Dead.N
                [Oats].AboveGround.NConc
                [Oats].AboveGroundLive.NConc
                [Oats].Leaf.Live.NConc
                [Oats].Stem.NConc
                [Oats].Stem.Live.NConc
                [Oats].Leaf.LAI
                [Leaf].Number
                [Oats].Leaf.TillerPopulation
                [Oats].Leaf.AppearedCohortNo
                [Oats].Leaf.CoverGreen
                [Oats].Leaf.CoverTotal
                [Oats].Leaf.SpecificArea
                [Phenology].CurrentPhase.Name
                [Phenology].CurrentStageName
                [Oats].Phenology.Zadok.Stage
                [Oats].Phenology.Stage
                [Oats].Leaf.Fn
                [Oats].Leaf.Fw
                [Oats].SowingData.Cultivar
                ([Oats].Leaf.Transpiration + [Soil].SoilWater.Es + [MicroClimate].PrecipitationInterception) as ET
                [MicroClimate].PrecipitationInterception as Interception
                [Weather].MeanT
                [Weather].Radn
                [Weather].Rain
                [Fertiliser].NitrogenApplied as FertiliserN
                [Irrigation].IrrigationApplied as Irrigation
                [Soil].SoilWater.Thickness
                [Soil].OutputWaterLayers.SW[1] as VWC_0_30
                [Soil].OutputWaterLayers.SW[2] as VWC_30_60
                [Soil].OutputWaterLayers.SW[3] as VWC_60_90
                ([Soil].OutputNutrientLayers.NO3[1] + [Soil].OutputNutrientLayers.NH4[1]) as SoilN_0_15
                ([Soil].OutputNutrientLayers.NO3[2] + [Soil].OutputNutrientLayers.NH4[2]) as SoilN_15_30
                ([Soil].OutputNutrientLayers.NO3[3] + [Soil].OutputNutrientLayers.NH4[3]) as SoilN_30_60
                ([Soil].OutputNutrientLayers.NO3[4] + [Soil].OutputNutrientLayers.NH4[4]) as SoilN_60_90
                (SoilN_0_15 + SoilN_15_30 + SoilN_30_60 + SoilN_60_90) as SoilN_0_90
                ([Soil].Nutrient.MineralisedN[1] + [Soil].Nutrient.MineralisedN[2] + [Soil].Nutrient.MineralisedN[3] + [Soil].Nutrient.MineralisedN[4]) as MineralisedN_0_90
            Report SupReport: EventNames=[Clock].DoReport
              VariableNames:
                [Clock].Today
                [Phenology].ThermalTime
                [Oats].Arbitrator.DM.TotalFixationSupply
                [Oats].Arbitrator.FN
                [Oats].Leaf.Phyllochron
                [Oats].Leaf.Photosynthesis.FT
                [Oats].Leaf.Photosynthesis.FVPD
                [Oats].Leaf.Photosynthesis.RueAct
                [LeafSize].Script.LeafAppearedPosition
                [LeafSize].Script.MostRecentlyAppearedLeafMaxSize
                [LeafSize].Script.LeafExpandedPosition
                [LeafSize].Script.MostRecentlyExpandedLeafSize
                [Grain].AccumThermalTime
                [Oats].Grain.NumberFunction
            Report HarvestReport: EventNames=[Oats].Harvesting
              VariableNames:
                [Leaf].Number
                [Leaf].FinalLeafNumber
                [Phenology].FlagLeafDAS
                [Phenology].FloweringDAS
                [Phenology].MaturityDAS
                [Phenology].CurrentPhase.Name
                [Phenology].CurrentStageName
                [Oats].AboveGroundLive.Wt
                [Oats].Grain.Wt
            Report DailyReportWater_n_MineralN: EventNames=[Clock].DoReport
              VariableNames:
                [Clock].Today
                [Oats].Total.Wt
                [Oats].AboveGround.Wt
                [Oats].AboveGroundLive.Wt
                [Oats].Leaf.Live.Wt
                [Oats].Stem.Wt
                [Oats].AboveGroundDead.Wt
                [Oats].Leaf.Dead.Wt
                [Oats].Leaf.Senesced.Wt
                [Oats].Leaf.Height
                [Oats].Leaf.Height
                [Oats].Total.N
                [Oats].AboveGround.N
                [Oats].AboveGroundLive.N
                [Oats].Leaf.Live.N
                [Oats].Stem.N
                [Oats].AboveGroundDead.N
                [Oats].Leaf.Dead.N
                [Oats].AboveGround.NConc
                [Oats].AboveGroundLive.NConc
                [Oats].Leaf.Live.NConc
                [Oats].Stem.NConc
                [Oats].Stem.Live.NConc
                [Oats].Leaf.LAI
                [Leaf].Number
                [Oats].Leaf.TillerPopulation
                [Oats].Leaf.AppearedCohortNo
                [Oats].Leaf.CoverGreen
                [Oats].Leaf.CoverTotal
                [Oats].Leaf.GreenCohortNo
                [Oats].Leaf.DeadCohortNo
                [Oats].Leaf.SenescingCohortNo
                [Oats].Leaf.ExpandedCohortNo
                [Oats].Leaf.SpecificArea
                [Phenology].CurrentPhase.Name
                [Phenology].CurrentStageName
                [Oats].Phenology.Zadok.Stage
                [Oats].Phenology.Stage
                [Oats].Leaf.Fn
                [Oats].Leaf.Fw
                [Oats].SowingData.Cultivar
                ([Oats].Leaf.Transpiration + [Soil].SoilWater.Es + [MicroClimate].PrecipitationInterception) as ET
                [MicroClimate].PrecipitationInterception as Interception
                [Weather].MeanT
                [Weather].Radn
                [Weather].Rain
                [Fertiliser].NitrogenApplied as FertiliserN
                [Irrigation].IrrigationApplied as Irrigation
                [Soil].SoilWater.Thickness
                [Soil].OutputWaterLayers.SW[1] as VWC_0_30
                [Soil].OutputWaterLayers.SW[2] as VWC_30_60
                [Soil].OutputWaterLayers.SW[3] as VWC_60_90
                ([Soil].OutputNutrientLayers.NO3[1] + [Soil].OutputNutrientLayers.NH4[1]) as SoilN_0_15
                ([Soil].OutputNutrientLayers.NO3[2] + [Soil].OutputNutrientLayers.NH4[2]) as SoilN_15_30
                ([Soil].OutputNutrientLayers.NO3[3] + [Soil].OutputNutrientLayers.NH4[3]) as SoilN_30_60
                ([Soil].OutputNutrientLayers.NO3[4] + [Soil].OutputNutrientLayers.NH4[4]) as SoilN_60_90
                (SoilN_0_15 + SoilN_15_30 ) as SoilN_0_30
                (SoilN_0_15 + SoilN_15_30 + SoilN_30_60) as SoilN_0_60
                (SoilN_0_15 + SoilN_15_30 + SoilN_30_60 + SoilN_60_90) as SoilN_0_90
                ([Soil].Nutrient.MineralisedN[1] + [Soil].Nutrient.MineralisedN[2] + [Soil].Nutrient.MineralisedN[3] + [Soil].Nutrient.MineralisedN[4]) as MineralisedN_0_90
            Soil: SoilType=Mottled Immature Pallic Soil; LocalName=Templeton-Wakanui; Site=A Block, Boundary Rd; NearestTown=Lincoln; Region=Plains; State=Canterbury; Country=New Zealnd; Latitude=-43.626; Longitude=172.486; YearOfSampling=2020; DataSource=Samples from the site analysed at PFR lab
              Memo
                Soil N in the first four layers (0-90 cm of profile) initialised using measured data. See https://iplant.plantandfood.co.nz/project/I190710/_layouts/15/WopiFrame.aspx?sourcedoc=/project/I190710/DataProtocols/SVS_LincolnPotatoOnion_SoilMinN.xlsx&action=default
              Physical
                Thickness  ParticleSizeClay  ParticleSizeSand  ParticleSizeSilt  Rocks  BD     AirDry  LL15   DUL    SAT    KS
                150        23                14.6              62.3              0      1.236  0.065   0.195  0.366  0.534  460.3
                125        23                14.6              62.3              0      1.251  0.176   0.195  0.37   0.528  445.2
                75         23.1              13.8              63.2              0      1.378  0.187   0.187  0.348  0.48   212.2
                150        17.4              16.3              66.3              0      1.672  0.151   0.151  0.331  0.369  72.8
                200        2.5               6.7               90.9              0      1.626  0.185   0.185  0.364  0.386  155.8
                150        2.5               9.6               87.8              0      1.599  0.163   0.163  0.351  0.397  195.5
                150        3.8               50.4              45.8              0      1.383  0.067   0.067  0.314  0.477  3097.2
                150        3.8               27.1              69.2              0      1.526  0.118   0.118  0.335  0.424  1203.7
                150        4.5               66.6              28.9              0      1.366  0.052   0.052  0.268  0.479  5247.5
                200        5                 64.7              30.3              0      1.367  0.052   0.052  0.282  0.484  5150.5
                300        5                 64.7              30.3              0      1.367  0.052   0.052  0.282  0.484  5150.5
                SoilCrop OatsSoil
                  LL=[0.195, 0.195, 0.187, 0.151, 0.185, 0.163, 0.067, 0.118, 0.052, 0.052, 0.052]
                  KL=[0.1, 0.1, 0.05, 0.04, 0.03, 0.01, 0, 0, 0, 0, 0]
                  XF=[1, 1, 1, 1, 1, 1, 1, 1, 1, 1, 1]
              WaterBalance SoilWater: SummerDate=1-Nov; SummerU=6; SummerCona=2.5; WinterDate=1-Apr; WinterU=2; WinterCona=2; DiffusConst=0; DiffusSlope=0; Salb=0.18; CN2Bare=68; CNRed=20; CNCov=0.8; DischargeWidth=0; CatchmentArea=0; PSIDul=-100
                Thickness  SWCON  KLAT
                150        0.526  0
                125        0.541  0
                75         0.543  0
                150        0.524  0
                200        0.55   0
                150        0.556  0
                150        0.579  0
                150        0.578  0
                150        0.589  0
                200        0.569  0
                300        0.569  0
              Chemical: Thickness=[150, 150, 300, 300, 300, 300, 300]; PH=[6.6, 6.2, 5.7, 5.5, 5.5, 5.5, 5.5]; PHUnits=Water
              Organic: FOMCNRatio=40; CarbonUnits=Total
                Thickness  Carbon  SoilCNRatio  FBiom  FInert  FOM
                150        2.89    12.5         0.058  0.424   1000.9
                125        2.43    12.3         0.024  0.692   478.1
                75         1.72    11.6         0.011  0.85    172.2
                150        0.47    11.5         0.008  0.869   176.2
                200        0.24    11.4         0.008  0.93    109.9
                150        0.23    11.3         0.008  0.962   33.7
                150        0.16    11.2         0.008  0.968   15.9
                150        0.2     11.2         0.008  0.989   7.5
                150        0.14    10.8         0.008  0.988   3.6
                200        0.14    10.9         0.008  0.99    2
                300        0.14    10.9         0.008  0.99    0
              Nutrient
              CERESSoilTemperature Temperature
              Water: Thickness=[150, 125, 75, 150, 200, 150, 150, 150, 150, 200, 300]; RelativeTo=LL15; FilledFromTop=true
                InitialValues=[0.366, 0.37, 0.348, 0.331, 0.364, 0.351, 0.314, 0.335, 0.268, 0.282, 0.282]
              OutputLayers OutputWaterLayers: Thickness=[300, 300, 300, 300, 300, 300]
              OutputLayers OutputNutrientLayers: Thickness=[150, 150, 300, 300, 300, 300, 300]
              Solute NO3: Thickness=[150, 150, 300, 300, 300, 300, 300]; InitialValues=[5.03, 2.44, 4.7, 0.81, 0.5, 1.15385, 1.016]; InitialValuesUnits=ppm; WaterTableConcentration=0; D0=0; DepthConstant=0; MaxDepthSoluteAccessible=0; RunoffEffectivenessAtMovingSolute=0; MaxEffectiveRunoff=0
              Solute NH4: Thickness=[150, 150, 300, 300, 300, 300, 300]; InitialValues=[0.94, 1.91, 1.6, 0.9, 1.92308, 1.92308, 0.221]; InitialValuesUnits=ppm; WaterTableConcentration=0; D0=0; DepthConstant=0; MaxDepthSoluteAccessible=0; RunoffEffectivenessAtMovingSolute=0; MaxEffectiveRunoff=0
              Solute Urea: Thickness=[150, 150, 300, 300, 300, 300, 300]; InitialValues=[0, 0, 0, 0, 0, 0, 0]; InitialValuesUnits=kg/ha; WaterTableConcentration=0; D0=0; DepthConstant=0; MaxDepthSoluteAccessible=0; RunoffEffectivenessAtMovingSolute=0; MaxEffectiveRunoff=0
        Folder Phenology
          Soil: same as Validation.New Zealand.SAE_Oats_2020.A_Block_2020.paddock.Soil
      Folder SLMACC
        Experiment SLMACC_Canterbury_2020
          Memo Experiment Description
            * 	Trial location: Springston, Canterbury
            *	Coordinates: 43.641°S, 172.349°E
            *	Soil: Balmoral
            *	Weather station: Broadfield
            *	This experiment evaluated oat populations (i.e. target of 0 [fallow],150, 300, 450 plants/m2)
            *	Two row spacings (75 & 150 cm) were also evaluated in the trial (see factors)
            *	Note that these ppopulations were not achieved so, actual plant counts are used in the model (see factors).
            * 	The paddock was previously in a kale crop
            *	This is a grazed field and grazing occured on the winter (kale) crop prior to sowing oats
            *	Irrigation: a total of 230 mm was applied to all treatmentments
          Factors
            Permutation
              Factor Rate
                CompositeFactor 0
                  Specifications:
                    [CropManagement].Script.CoverCropIsEnabled = false
                    [CropManagement].Script.CoverCropSowingPopulation = 0
                CompositeFactor 150: Specifications=[CropManagement].Script.CoverCropSowingPopulation = 130
                CompositeFactor 300: Specifications=[CropManagement].Script.CoverCropSowingPopulation = 250
                CompositeFactor 450: Specifications=[CropManagement].Script.CoverCropSowingPopulation = 375
              Factor Width
                CompositeFactor 75: Specifications=[CropManagement].Script.CoverCropSowingSpacing = 75
                CompositeFactor 150: Specifications=[CropManagement].Script.CoverCropSowingSpacing = 150
          Simulation SpringstonBalmoralSoil
            Clock: Start=2020-08-12; End=2020-12-10
            Weather: FileName=Lincoln.met
            Summary summaryfile
            SoilArbitrator Soil Arbitrator
            Zone Block: Area=1; Slope=0; AspectAngle=0; Altitude=50
              Folder Manager folder
                Manager FactorLabels
                  AGENT_NO = 999
                  Lat = 999
                  Lon = 999
                  SoilStamp = SiltLoam
                  GCM = Had
                  RCP = RCP25
                  TS = Baseline
```csharp
using Models.Soils;
using Models.Core;
using System;

namespace Models
{
    [Serializable]
    public class Script : Model
    {
        //> Links to other Apsim models
        [Link] Clock Clock;
        [Link] ISummary mySummary;

        //> User inputs from properties tab
        [Separator("Tags used to defined simulation factors")]
        [Description("Agent number: ")]
        public string AGENT_NO { get; set; }
        [Description("Latitude: ")]
        public string Lat { get; set; }
        [Description("Longitude: ")]
        public string Lon { get; set; }
        [Description("SoilStamp: ")]
        public string SoilStamp { get; set; }
        [Description("GCM: ")]
        public string GCM { get; set; }
        [Description("RCP: ")]
        public string RCP { get; set; }
        [Description("Time slice: ")]
        public string TS { get; set; }

        //> Internal variables
        private string someVar;
        
        [EventSubscribe("DoManagementCalculations")]
        private void OnDoManagementCalculations(object sender, EventArgs e)
        {
            // Sort out time slice classification
            if ((Clock.Today.Date.Year <= 2005))
            {
                TS = "Baseline";
            }
            else
            {
                TS = "Future";
            }
        }
    }
}
```
                Manager CropManagement
                  CoverCropIsEnabled = True
                  CoverCropSowingPopulation = 400
                  CoverCropSowingSpacing = 150
                  CoverCrop = [Oats]
                  CoverCropCultivar = Milton
                  CoverCropSowingDepth = 30
                  LinkSowingToMainCrop = False
                  PeriodAfterHarvestCrop = 5
                  CoverCropSowingDate = 19-Aug
                  CoverCropHarvestingDate = 11-Dec
                  CoverCropFractionToRemove = 0
```csharp
using Newtonsoft.Json;
using Models.Climate;
using APSIM.Shared.Utilities;
using Models.Interfaces;
using Models.PMF.Interfaces;
using Models.PMF;
using Models.Soils;
using Models.Core;
using System.Collections.Generic;
using System.Xml.Serialization;
using System;
using Models.PMF.Phen;

namespace Models
{
    [Serializable]
    [System.Xml.Serialization.XmlInclude(typeof(Model))]
    public class Script : Model
    {
        [Link] private Clock clock;
        [Link] private Zone myZone;
        [Link] private Weather weather;
        [Link] private ISummary mySummary;
        private int daysAfterHarvest;
        private string mainCropName;
        private string coverCropName;
        private double numberOfBuds;
        private string organToHarvestAsProduce;
        private double fractionToHarvestProduce;
        private double fractionToHarvestStoverMainCrop;
        private double fractionToHarvestStoverCoverCrop;
        private RemovalFractions removalFractionsMainCrop;
        private RemovalFractions removalFractionsCoverCrop;
        private double fractionOfGrainFillingPhaseToHarvestSillage;
        private double fractionToRemove;
        //> Links to other Apsim models
        [Link] Models.Surface.SurfaceOrganicMatter mySurfaceOM;

        //> User inputs from properties tab

        [Separator(" - Cover crop management")]
        [Description("  Sow cover crop?")]
        public bool CoverCropIsEnabled { get; set; }
        [Description("  Plant to sow as cover crop:")]
        public IPlant CoverCrop { get; set; }
        //[Display(Type = DisplayType.CultivarName)]  - This does not work. It picks the main crop cultivars only
        [Description("   Cultivar to be sown:")]
        public string CoverCropCultivar { get; set; }
        [Description("   Sowing depth (mm):")]
        public double CoverCropSowingDepth { get; set; }
        [Description("   Sowing population (/m2):")]
        public double CoverCropSowingPopulation { get; set; }
        [Description("   Sowing row spacing (mm):")]
        public double CoverCropSowingSpacing { get; set; }
        [Description("  Sowing date is linked to harvest of main crop?")]
        public bool LinkSowingToMainCrop { get; set; }
        [Description("  Period to wait for sowing after main crop harvest (days):")]
        public int PeriodAfterHarvestCrop { get; set; }
        [Description("  Sowing date, if not linking to main crop harvest (dd-mmm):")]
        public string CoverCropSowingDate { get; set; }
        [Description("  Harvesting date (dd-mmm)")]
        public string CoverCropHarvestingDate { get; set; }
        [Description("  Fraction of residues to remove after harvest (%):")]
        public double CoverCropFractionToRemove { get; set; }

        //> Outputs from this manager
        [JsonIgnore] public string CropSown { get; set; }
        [JsonIgnore] public string CropHarvested { get; set; }
        [JsonIgnore] public string CurrentCrop { get; set; }
        [JsonIgnore] public double SowDOY { get; set; }
        [JsonIgnore] public double HarvestDOY { get; set; }

        [JsonIgnore] public double HarvestedWt { get; set; }
        [JsonIgnore] public double HarvestedN { get; set; }
        [JsonIgnore] public double HarvestedNconc { get; set; }
        [JsonIgnore] public double CropYield { get; set; }

        [JsonIgnore] public DateTime MainCropSowDate { get; set; }
        [JsonIgnore] public double MainCropBiomassWt { get; set; }
        [JsonIgnore] public double MainCropBiomassN { get; set; }
        [JsonIgnore] public double MainCropBiomassNconc { get; set; }
        [JsonIgnore] public double CoverCropBiomassWt { get; set; }
        [JsonIgnore] public double CoverCropBiomassN { get; set; }
        [JsonIgnore] public double CoverCropBiomassNconc { get; set; }

        [JsonIgnore] public double MovingMeanAirTemperature { get; set; }
        [JsonIgnore] public bool IsTimeForSowingMainCrop { get; set; }
        [JsonIgnore] public bool IsTimeForSowingCoverCrop { get; set; }
        [JsonIgnore] public bool IsTimeToHarvestMainCrop { get; set; }
        [JsonIgnore] public bool IsTimeToHarvestCoverCrop { get; set; }

        [JsonIgnore] public double RemovedResidueWt { get; set; }
        [JsonIgnore] public double RemovedResidueN { get; set; }

        //> Internal variables
        private Queue<double> temperatureQueue;

        //Note: any above ground organ is assumed to be stover


        [EventSubscribe("Commencing")]
        private void OnSimulationCommencing(object sender, EventArgs e)
        {
            // initialise some variables
            CropSown = "";
            CropHarvested = "";
            CurrentCrop = "Fallow";
            IsTimeForSowingMainCrop = false;
            IsTimeToHarvestMainCrop = false;
            IsTimeForSowingCoverCrop = false;
            IsTimeToHarvestCoverCrop = false;
            daysAfterHarvest = -1;
            temperatureQueue = new Queue<double>();
            coverCropName = (CoverCrop as Plant).Name;
            //==========================================================================================================
            fractionToHarvestProduce = 1.0;
            fractionToHarvestStoverCoverCrop = 0.8;

            fractionOfGrainFillingPhaseToHarvestSillage = 0.8;
            //==========================================================================================================

            // write summary
            mySummary.WriteMessage(this," Crop management initialisation", MessageType.Diagnostic);
    
            if(CoverCropIsEnabled)
            {
                    mySummary.WriteMessage(this,"   Cover crop is " + coverCropName + ", sown on " + CoverCropSowingDate, MessageType.Diagnostic);
            }
            else
            {
                mySummary.WriteMessage(this,"   No cover crop is sown", MessageType.Diagnostic);
            }
        }

        [EventSubscribe("StartOfDay")]
        private void OnStartOfDay(object sender, EventArgs e)
        {
            // check whether initialisation is needed for removal fractions
            if(removalFractionsMainCrop == null)
            {
                initialiseRemovalFractions();
            }

            // get the moving mean temperature for the defined period
            MovingMeanAirTemperature = MovingAverageTemperature();

            // reset some variables
            if (CropSown != "")
            { // crop sown yesterday, clean up marker
                CropSown = "";
            }

            if (CropHarvested != "")
            { // harvested yesterday, clean up markers
                CropHarvested = "";
                CurrentCrop = "Fallow";

                // zero crop myOutputs
                HarvestedWt = 0.0;
                HarvestedN = 0.0;
                HarvestedNconc = 0.0;
                CropYield = 0.0;
                MainCropBiomassWt = 0.0;
                MainCropBiomassN = 0.0;
                MainCropBiomassNconc = 0.0;
                CoverCropBiomassWt = 0.0;
                CoverCropBiomassN = 0.0;
                CoverCropBiomassNconc = 0.0;
                RemovedResidueWt = 0.0;
                RemovedResidueN = 0.0;
            }
        }

        [EventSubscribe("DoManagement")]
        private void OnDoManagement(object sender, EventArgs e)
        {
            // do the management of cover crop
            if (CoverCropIsEnabled)
            {
                if (IsTimeForSowingCoverCrop)
                {
                    CoverCrop.Sow(cultivar: CoverCropCultivar, depth: CoverCropSowingDepth, population: CoverCropSowingPopulation, rowSpacing: CoverCropSowingSpacing);
                    CropSown = coverCropName;
                    CurrentCrop = CropSown;
                    SowDOY = clock.Today.DayOfYear;
                    daysAfterHarvest = -1;
                    IsTimeForSowingCoverCrop = false;
                }
                else if (IsTimeToHarvestCoverCrop)
                {
                    // get current biomass
                    recordBiomassOutputs();

                    // do the harvesting
                    harvestCrop(CoverCrop, removalFractionsCoverCrop);
                    IsTimeToHarvestCoverCrop = false;

                    // compute yield
                    CropYield = HarvestedWt;

                    // remove excess residues
                    postharvestTillage(CoverCropFractionToRemove);
                }
            }
        }

        [EventSubscribe("DoManagementCalculations")]
        private void OnDoManagementCalculations(object sender, EventArgs e)
        {
            // check management of main crop

            // check management of cover crop
            if (CoverCropIsEnabled)
            {
                if (CurrentCrop == "Fallow")
                { // no crop present, can we sow the cover crop?
                    if (LinkSowingToMainCrop)
                    {
                        if (daysAfterHarvest == PeriodAfterHarvestCrop - 1)
                        { // fallow period ends tomorrow, set sowing
                            IsTimeForSowingCoverCrop = true;
                        }
                        else if(daysAfterHarvest >= 0)
                        { // keep counting
                            daysAfterHarvest += 1;
                        }
                    }
                    else
                    {
                        if (DateUtilities.DatesEqual(CoverCropSowingDate, clock.Today.AddDays(1)))
                        { // sowing date is tomorrow, set sowing
                            IsTimeForSowingCoverCrop = true;
                        }
                    }
                }
                else if (CurrentCrop == coverCropName)
                { // cover crop is present, can we harvest it yet?
                    if (DateUtilities.DatesEqual(CoverCropHarvestingDate, clock.Today.AddDays(1)))
                    {
                        IsTimeToHarvestCoverCrop = true;
                    }
                }
            }

            // save the plant biomass - converted from g/m2 to kg/ha
            if (CurrentCrop != "Fallow")
            {
                if(CropHarvested == "")
                { //record all days, except when harvesting
                    recordBiomassOutputs();
                }
            }
        }


        //Initialise the fractions to remove at harvest of each organ in each crop
        private void initialiseRemovalFractions()
        {

            // set removal fractions for the cover crop (these overrides the default removals in the plant)           
            removalFractionsCoverCrop = new RemovalFractions();
            foreach(IOrgan organ in (CoverCrop as Plant).Organs)
            {
                fractionToRemove = 0.0;
                if((organ as IOrganDamage).IsAboveGround)
                {
                    fractionToRemove = fractionToHarvestStoverCoverCrop;
                }
                removalFractionsCoverCrop.SetFractionToRemove(organ.Name, fractionToRemove, "Live");
                removalFractionsCoverCrop.SetFractionToResidue(organ.Name, 0.0, "Live");
                removalFractionsCoverCrop.SetFractionToRemove(organ.Name, fractionToRemove, "Dead");
                removalFractionsCoverCrop.SetFractionToResidue(organ.Name, 0.0, "Dead");
            }
        }

        //Record the values of biomass for the two crops
        private void recordBiomassOutputs()
        {
            CoverCropBiomassWt = (CoverCrop as Plant).AboveGround.Wt * 10.0;
            CoverCropBiomassN = (CoverCrop as Plant).AboveGround.N * 10.0;
            CoverCropBiomassNconc = (CoverCrop as Plant).AboveGround.NConc * 100.0;
        }

        //Check whether the crop is ready for harvesting
        private bool cropIsReadyForHarvest(Plant crop, harvestPurposeTypes harvestPurpose)
        {
            Phenology phen = this.FindAllInScope("["+crop.Name+"].Phenology") as Phenology;
            bool result = false;
            if(harvestPurpose == harvestPurposeTypes.ForGreenChop)
            {
                if(phen.CurrentStageName.Equals("Flowering"))
                {
                    result = true;
                }
            }
            else if(harvestPurpose == harvestPurposeTypes.ForSilage)
            {
                if(phen.CurrentPhase.Name.Equals("GrainFilling") && (phen.FractionInCurrentPhase > fractionOfGrainFillingPhaseToHarvestSillage))
                {
                    result = true;
                }
            }
            else if(harvestPurpose == harvestPurposeTypes.ForGrainOrTuber)
            {
                if((crop as Plant).Name == "Potato")
                {
                    if(phen.CurrentPhase.Name.Equals("Maturity") && (phen.FractionInCurrentPhase >= 0.0))
                    {
                        result = true; 
                    }
                }
                else if(crop.IsReadyForHarvesting)
                {
                    result = true; 
                }
            }

            return result;
        }

        //Harvest and ends a given crop
        private void harvestCrop(IPlant crop, RemovalFractions organsRemovalFractions)
        {
            string cropName = (crop as Plant).Name;
            // get current biomass
            double preHarvestWt = (double)myZone.Get(cropName + ".Total.Wt");
            double preHarvestN = (double)myZone.Get(cropName + ".Total.N");
            // do the harvesting
            (crop as Plant).Harvest(organsRemovalFractions);
            HarvestDOY = clock.Today.DayOfYear;
            CropHarvested = cropName;
            // calc the harvested amounts
            HarvestedWt = (preHarvestWt - (double)myZone.Get(cropName + ".Total.Wt")) * 10.0;
            HarvestedN = (preHarvestN - (double)myZone.Get(cropName + ".Total.N")) * 10.0;
            HarvestedNconc = MathUtilities.Divide(HarvestedN, HarvestedWt, 0.0) * 100.0;
            // end the crop
            (crop as Plant).EndCrop();
        }

        //Remove excess residues after a harvest
        private void postharvestTillage(double fractionBeingRemoved)
        {
            if(fractionBeingRemoved > 0.0)
            {
                double iniWt = mySurfaceOM.Wt;
                double iniN = mySurfaceOM.N;
                mySurfaceOM.Incorporate(fractionBeingRemoved, 0);
                RemovedResidueWt = iniWt - mySurfaceOM.Wt;
                RemovedResidueN = iniN - mySurfaceOM.N;
            }
        }

        //Get the average temperature over the past x days
        private double MovingAverageTemperature()
        {
            // add today's air temperature to the queue
            temperatureQueue.Enqueue(weather.MeanT);

            {
                if (temperatureQueue.Count >= 14)
                { // remove old value
                    temperatureQueue.Dequeue();
                }

                // return average of queue
                double sumTemps = MathUtilities.Sum(temperatureQueue.ToArray());
                return sumTemps / temperatureQueue.Count;
            }
        }

        public enum harvestTriggerTypes
        {
            /// <summary>Harvest set to a given date</summary>
            OnFixedDateOnly,
            /// <summary>Harvest only when crop is mature</summary>
            OnCropMaturityOnly,
            /// <summary>Harvest on maturity or on set date at latest</summary>
            OnCropMaturityOrDate
        }

        public enum harvestPurposeTypes
        {
            /// <summary>Early green harvest, for fresh feed</summary>
            ForGreenChop,
            /// <summary>Late green harvest, for silage making</summary>
            ForSilage,
            /// <summary>Harvest on full grain/tuber maturity</summary>
            ForGrainOrTuber
        }
    }
}
```
                Manager ExtraVariables
                  StartDate = 01/01/1900 00:00:00
                  EndDate = 12/31/2100 00:00:00
                  DepthForReporting = 600
```csharp
using Newtonsoft.Json;
using Models.PMF.Phen;
using Models.Climate;
using System;
using System.Xml.Serialization;
using Models.Core;
using Models.Soils;
using Models.PMF;
using Models.Interfaces;
using APSIM.Shared.Utilities;
using Models.Soils.Nutrients;
using Models.PMF.Organs;
        
namespace Models
{
    [Serializable] 
    [System.Xml.Serialization.XmlInclude(typeof(Model))]
    public class Script : Model
    {
        [Link] private Clock clock;
        [Link] private Zone myZone;
        [Link] private Weather weather;
        [Link] private Fertiliser myFertiliser;
        [Link] private Irrigation myIrrigator;
        [Link(ByName = true)] private SoilNitrogen SoilNitrogen;
        [Link(ByName = true)] private ISolute NO3;
        [Link(ByName = true)] private ISolute NH4;
        [Link(ByName = true)] private ISolute Urea;
        [Link] private ISummary mySummary;
        private int reportingBottomLayer;
        private double reportingFractionLayer;
        private string simulationYearStartDate;
        [Link] private Models.Surface.SurfaceOrganicMatter SurfaceOM;
        [Link] private Soils.Soil Soil;
        [Link]
        private IPhysical soilPhysical;
        [Link]
        private ISoilWater waterBalance;
        //> Links to other Apsim models
        [Link(IsOptional = true)] private IPlant[] cropsInTheSimulation;

        //> User inputs from properties tab
        [Separator("Auxiliary manager for computing summary outputs")]
        [Description(" Date to start recording variables: ")]
        public DateTime StartDate { get; set; }
        [Description(" Date to end recording variables: ")]
        public DateTime EndDate { get; set; }
        [Description(" Depth of profile being recorded (mm):")]
        public double DepthForReporting { get; set; }

        //> Outputs from this manager
        [JsonIgnore] public double AccumRainfall { get; set; }
        [JsonIgnore] public double AccumIrrigation { get; set; }
        [JsonIgnore] public double AccumPET { get; set; }
        [JsonIgnore] public double AccumEvaporation { get; set; }
        [JsonIgnore] public double AccumTranspiration { get; set; }
        [JsonIgnore] public double AccumRunoff { get; set; }
        [JsonIgnore] public double AccumDrainage { get; set; }
        [JsonIgnore] public double AccumWaterFlowAtLayer { get; set; }
        [JsonIgnore] public double SumWaterAmountToLayer { get; set; }
        [JsonIgnore] public double DeltaSoilWaterTotal { get; set; }
        [JsonIgnore] public double DeltaSoilWaterToLayer { get; set; }
        [JsonIgnore] public double AverageMeanTemperature { get; set; }

        [JsonIgnore] public double AccumSurfaceOMMineralisation { get; set; }
        [JsonIgnore] public double AccumFertiliser { get; set; }
        [JsonIgnore] public double AccumUrine { get; set; }
        [JsonIgnore] public double AccumTotalSoilOMMineralised { get; set; }
        [JsonIgnore] public double AccumTotalDenitrifiedN { get; set; }
        [JsonIgnore] public double AccumTotalLeachedN { get; set; }
        [JsonIgnore] public double AccumUptakeN { get; set; }
        [JsonIgnore] public double AccumDetachedN { get; set; }

        [JsonIgnore] public double AccumSoilOMMineralisedToLayer { get; set; }
        [JsonIgnore] public double AccumDenitrifiedNToLayer { get; set; }
        [JsonIgnore] public double AccumFlowNAtLayer { get; set; }
        [JsonIgnore] public double SumUreaToLayer { get; set; }
        [JsonIgnore] public double SumNH4ToLayer { get; set; }
        [JsonIgnore] public double SumNO3ToLayer { get; set; }
        [JsonIgnore] public double SumMineralNToLayer { get; set; }
        [JsonIgnore] public double SumFOMNToLayer { get; set; }
        [JsonIgnore] public double SumMicrobialNToLayer { get; set; }
        [JsonIgnore] public double SumHumicNToLayer { get; set; }
        [JsonIgnore] public double SumOrganicNToLayer { get; set; }
        [JsonIgnore] public double SumOrganicCToLayer { get; set; }

        [JsonIgnore] public double DeltaSurfaceOMN { get; set; }
        [JsonIgnore] public double DeltaSoilFOMNTotal { get; set; }
        [JsonIgnore] public double DeltaSoilMBiomassNTotal { get; set; }
        [JsonIgnore] public double DeltaSoilHumicNTotal { get; set; }
        [JsonIgnore] public double DeltaSoilOrganicNTotal { get; set; }
        [JsonIgnore] public double DeltaSoilMineralNTotal { get; set; }
        [JsonIgnore] public double DeltaSoilOrganicCTotal { get; set; }

        [JsonIgnore] public double DeltaSoilFOMNToLayer { get; set; }
        [JsonIgnore] public double DeltaSoilMBiomassNToLayer { get; set; }
        [JsonIgnore] public double DeltaSoilHumicNToLayer { get; set; }
        [JsonIgnore] public double DeltaSoilOrganicNToLayer { get; set; }
        [JsonIgnore] public double DeltaSoilMineralNToLayer { get; set; }
        [JsonIgnore] public double DeltaSoilOrganicCToLayer { get; set; }

        [JsonIgnore] public double CropAboveGroundBiomassWt { get; set; }
        [JsonIgnore] public double CropAboveGroundBiomassN { get; set; }
        [JsonIgnore] public double CropAboveGroundBiomassNConc { get; set; }
        [JsonIgnore] public double CropTotalBiomassWt { get; set; }
        [JsonIgnore] public double CropTotalBiomassN { get; set; }
        [JsonIgnore] public double CropTotalBiomassNConc { get; set; }
        [JsonIgnore] public double CropWaterDeficitFactor { get; set; }
        [JsonIgnore] public double AccumLightInterception { get; set; }

        [JsonIgnore] public int TimeRecorded { get; set; }
        [JsonIgnore] public int ReportYear { get; set; }
        [JsonIgnore] public int NumberOfDaysWithWaterStress { get; set; }

        [JsonIgnore] public bool ResetTriggered { get; set; }

        //> Internal variables
        private string cropSown { get; set; }
        private string cropHarvested { get; set; }
        private string currentCrop = "none";
        private int numberDaysRecording {get; set;}

        private double initialWaterContentTotal { get; set; }
        private double initialSurfaceOMN { get; set; }
        private double initialSoilFOMNTotal { get; set; }
        private double initialSoilBiomNTotal { get; set; }
        private double initialSoilHumNTotal { get; set; }
        private double initialSoilUreaTotal { get; set; }
        private double initialSoilNH4Total { get; set; }
        private double initialSoilNO3Total { get; set; }
        private double initialSoilOrgCTotal { get; set; }

        private double initialWaterContentToLayer { get; set; }
        private double initialSoilFOMNToLayer { get; set; }
        private double initialSoilBiomNToLayer { get; set; }
        private double initialSoilHumNToLayer { get; set; }
        private double initialSoilUreaToLayer { get; set; }
        private double initialSoilNH4ToLayer { get; set; }
        private double initialSoilNO3ToLayer { get; set; }
        private double initialSoilOrgCToLayer { get; set; }

        private double meanTemperatureSum {get; set;}


        [EventSubscribe("Commencing")]
        private void OnSimulationCommencing(object sender, EventArgs e)
        {
            mySummary.WriteMessage(this," ExtraVariables manager initialisation", MessageType.Diagnostic);

            // initialise some variables
            ResetTriggered = false;

            // store the simulation start date, used to reset summaries
            simulationYearStartDate = clock.Today.ToString("dd-MMM");

            // get the index of layer down to which summaries will be calculated
            reportingBottomLayer = -1;
            reportingFractionLayer = 1.0;
            double depthFromSurface = 0.0;
            for (int z = 0; z < soilPhysical.Thickness.Length; z++)
            {
                if ((DepthForReporting - depthFromSurface) >= soilPhysical.Thickness[z])
                {
                    reportingBottomLayer = z;
                    depthFromSurface += soilPhysical.Thickness[z];
                }
                else
                {
                    reportingFractionLayer = (DepthForReporting - depthFromSurface) / soilPhysical.Thickness[z];
                    reportingFractionLayer = Math.Min(1.0, Math.Max(0.0, reportingFractionLayer));
                    z = soilPhysical.Thickness.Length;
                }
            }


            // check that there is a manager providing info about crops
            try
            {
                cropSown = (string)myZone.Get("[CropManagement].Script.CurrentCrop");
                if(cropSown.Length <= 1)
                { // need this to capture non-supply of crop info
                    mySummary.WriteMessage(this, "ERROR", MessageType.Warning);
                }
            }
            catch(Exception someException)
            {
                mySummary.WriteMessage(this, "\'CurrentCrop\' info is not being supplied by \'CropManagement\'", MessageType.Warning);
                cropSown = "NotAvailable";
            }

            // write summary
            if(cropSown == "NotAvailable")
            {
                mySummary.WriteMessage(this,"   Several soil variables will be summarised over the simulation run time (no resets as there is no crop info)", MessageType.Diagnostic);
            }
            else
            {
                mySummary.WriteMessage(this,"   Several plant-soil variables will be summarised for periods defined by land-use (reset each time it changes)", MessageType.Diagnostic);
            }
            mySummary.WriteMessage(this,"     Summaries are provided for the whole soil and for the top-soil down to the given depth of " + DepthForReporting.ToString("#0.0") + " mm", MessageType.Diagnostic);
        }

        [EventSubscribe("DoManagement")]
        private void OnDoManagement(object sender, EventArgs e)
        {
            // Check whether crop has changed
            cropSown = (string)myZone.Get("[CropManagement].Script.CurrentCrop");
            if (currentCrop != cropSown)
            {
                currentCrop = cropSown;
            }

            // check whether we need to reset variables (e.g. if crop has changed or if date is the same as start of simulation - triggered from outside)
            if (ResetTriggered)
            {
                ZeroVars();
                ResetTriggered = false;
            }

            cropHarvested = (string)myZone.Get("[CropManagement].Script.CropHarvested");
        }

        [EventSubscribe("DoManagementCalculations")]
        private void OnDoManagementCalculations(object sender, EventArgs e)
        {
            // summarise a series of variables
            if ((clock.Today.Date >= StartDate.Date) && (clock.Today.Date <= EndDate.Date))
            {
                SummariseVars();

                // record ReportYear
                if(clock.Today.Month <= 7)
                {
                    ReportYear = clock.Today.Year;
                }
                else
                {
                    ReportYear = clock.Today.Year + 1;
                }
            }
        }

        private void ZeroVars()
        {
            // zero accumulating variables
            numberDaysRecording = 0;
            meanTemperatureSum = 0.0;
            AccumRainfall = 0.0;
            AccumIrrigation = 0.0;
            AccumPET = 0.0;
            AccumTranspiration = 0.0;
            AccumEvaporation = 0.0;
            AccumRunoff = 0.0;
            AccumDrainage = 0.0;
            AccumWaterFlowAtLayer = 0.0;

            AccumSurfaceOMMineralisation = 0.0;
            AccumFertiliser = 0.0;
            AccumUrine = 0.0;
            AccumTotalSoilOMMineralised = 0.0;
            AccumTotalDenitrifiedN = 0.0;
            AccumTotalLeachedN = 0.0;
            AccumUptakeN = 0.0;
            AccumDetachedN = 0.0;

            AccumSoilOMMineralisedToLayer = 0.0;
            AccumDenitrifiedNToLayer = 0.0;
            AccumFlowNAtLayer = 0.0;
            SumUreaToLayer = 0.0;
            SumNH4ToLayer = 0.0;
            SumNO3ToLayer = 0.0;
            SumMineralNToLayer = 0.0;
            SumFOMNToLayer = 0.0;
            SumMicrobialNToLayer = 0.0;
            SumHumicNToLayer = 0.0;
            SumOrganicNToLayer = 0.0;
            SumOrganicCToLayer = 0.0;

            // get initial values
            initialSurfaceOMN = SurfaceOM.N;
            initialWaterContentTotal = MathUtilities.Sum(waterBalance.SWmm);
            initialSoilUreaTotal = MathUtilities.Sum(Urea.kgha);
            initialSoilNH4Total = MathUtilities.Sum(NH4.kgha);
            initialSoilNO3Total = MathUtilities.Sum(NO3.kgha);
            initialSoilFOMNTotal = MathUtilities.Sum(SoilNitrogen.FOMN);
            initialSoilBiomNTotal = MathUtilities.Sum(SoilNitrogen.MicrobialN);
            initialSoilHumNTotal = MathUtilities.Sum(SoilNitrogen.HumicN);
            initialSoilOrgCTotal = MathUtilities.Sum(SoilNitrogen.FOMC)
                                 + MathUtilities.Sum(SoilNitrogen.MicrobialC)
                                 + MathUtilities.Sum(SoilNitrogen.HumicC);

            initialWaterContentToLayer = sumOverLayers(waterBalance.SWmm, reportingBottomLayer, reportingFractionLayer);
            initialSoilUreaToLayer = sumOverLayers(Urea.kgha, reportingBottomLayer, reportingFractionLayer);
            initialSoilNH4ToLayer = sumOverLayers(NH4.kgha, reportingBottomLayer, reportingFractionLayer);
            initialSoilNO3ToLayer = sumOverLayers(NO3.kgha, reportingBottomLayer, reportingFractionLayer);
            initialSoilFOMNToLayer = sumOverLayers(SoilNitrogen.FOMN, reportingBottomLayer, reportingFractionLayer);
            initialSoilBiomNToLayer = sumOverLayers(SoilNitrogen.MicrobialN, reportingBottomLayer, reportingFractionLayer);
            initialSoilHumNToLayer = sumOverLayers(SoilNitrogen.HumicN, reportingBottomLayer, reportingFractionLayer);
            initialSoilOrgCToLayer = sumOverLayers(SoilNitrogen.FOMC, reportingBottomLayer, reportingFractionLayer)
                                   + sumOverLayers(SoilNitrogen.MicrobialC, reportingBottomLayer, reportingFractionLayer)
                                   + sumOverLayers(SoilNitrogen.HumicC, reportingBottomLayer, reportingFractionLayer);

            // crop outputs
            CropAboveGroundBiomassWt = 0.0;
            CropAboveGroundBiomassN = 0.0;
            CropAboveGroundBiomassNConc = 0.0;
            CropTotalBiomassWt = 0.0;
            CropTotalBiomassN = 0.0;
            CropTotalBiomassNConc = 0.0;
            CropWaterDeficitFactor = 0.0;
            NumberOfDaysWithWaterStress = 0;
            AccumLightInterception = 0.0;
        }

        private void SummariseVars()
        {
            numberDaysRecording += 1;
            TimeRecorded = numberDaysRecording;

            // get the water balance components
            AccumRainfall += weather.Rain;
            AccumIrrigation += myIrrigator.IrrigationApplied;
            AccumPET += waterBalance.Eo;
            foreach(Plant crop in cropsInTheSimulation)
            {
                Root root = this.FindAllInScope("["+crop.Name+"].Root") as Root;
                if (root != null)
                    AccumTranspiration += root.WaterUptake;
            }
            AccumEvaporation += waterBalance.Es;
            AccumRunoff += waterBalance.Runoff;
            AccumDrainage += waterBalance.Drainage;
            AccumWaterFlowAtLayer += evaluateAtLayer(waterBalance.Flux, reportingBottomLayer, reportingFractionLayer)
                                  - evaluateAtLayer(waterBalance.Flow, reportingBottomLayer, reportingFractionLayer);
            SumWaterAmountToLayer = sumOverLayers(waterBalance.SWmm, reportingBottomLayer, reportingFractionLayer);
            DeltaSoilWaterTotal = MathUtilities.Sum(waterBalance.SWmm) - initialWaterContentTotal;
            DeltaSoilWaterToLayer = MathUtilities.Sum(waterBalance.SWmm,0,1) - initialWaterContentToLayer;
            meanTemperatureSum += weather.MeanT;
            AverageMeanTemperature = meanTemperatureSum/TimeRecorded;

            // get the nitrogen balance components
            AccumSurfaceOMMineralisation += MathUtilities.Sum(SoilNitrogen.dlt_n_min_res);
            AccumFertiliser += myFertiliser.NitrogenApplied;
            //AccumUrine += (double)myZone.Get("[ReturnN].Script.AmountReturnedN");
            AccumTotalSoilOMMineralised += MathUtilities.Sum(SoilNitrogen.MineralisedN);
            AccumTotalDenitrifiedN += MathUtilities.Sum(SoilNitrogen.Denitrification);
            AccumTotalLeachedN += waterBalance.LeachNH4 + waterBalance.LeachNO3;
            foreach(Plant crop in cropsInTheSimulation)
            {
                Root root = this.FindAllInScope("["+crop.Name+"].Root") as Root;
                if (root != null)
                    AccumUptakeN -= root.NUptake;
                foreach(PMF.Interfaces.IOrgan organ in (crop as Plant).Organs)
                {
                    string cropOrgan = (crop as Plant).Name + "." + organ.Name;
                    AccumDetachedN += (double)myZone.Get(cropOrgan + ".Detached.N");
                }
            }
            AccumSoilOMMineralisedToLayer += sumOverLayers(SoilNitrogen.MineralisedN, reportingBottomLayer, reportingFractionLayer);
            AccumDenitrifiedNToLayer += sumOverLayers(SoilNitrogen.Denitrification, reportingBottomLayer, reportingFractionLayer);
            AccumFlowNAtLayer += evaluateAtLayer(waterBalance.FlowNH4, reportingBottomLayer, reportingFractionLayer)
                              + evaluateAtLayer(waterBalance.FlowNO3, reportingBottomLayer, reportingFractionLayer);

            SumUreaToLayer = sumOverLayers(Urea.kgha, reportingBottomLayer, reportingFractionLayer);
            SumNH4ToLayer = sumOverLayers(NH4.kgha, reportingBottomLayer, reportingFractionLayer);
            SumNO3ToLayer = sumOverLayers(NO3.kgha, reportingBottomLayer, reportingFractionLayer);
            SumMineralNToLayer = SumUreaToLayer + SumNH4ToLayer + SumNO3ToLayer;

            SumFOMNToLayer = sumOverLayers(SoilNitrogen.FOMN, reportingBottomLayer, reportingFractionLayer);
            SumMicrobialNToLayer = sumOverLayers(SoilNitrogen.MicrobialN, reportingBottomLayer, reportingFractionLayer);
            SumHumicNToLayer = sumOverLayers(SoilNitrogen.HumicN, reportingBottomLayer, reportingFractionLayer);
            SumOrganicNToLayer = SumFOMNToLayer + SumMicrobialNToLayer + SumHumicNToLayer;
            SumOrganicCToLayer = sumOverLayers(SoilNitrogen.FOMC, reportingBottomLayer, reportingFractionLayer)
                               + sumOverLayers(SoilNitrogen.MicrobialC, reportingBottomLayer, reportingFractionLayer)
                               + sumOverLayers(SoilNitrogen.HumicC, reportingBottomLayer, reportingFractionLayer);

            DeltaSurfaceOMN = SurfaceOM.N - initialSurfaceOMN;
            DeltaSoilFOMNTotal = MathUtilities.Sum(SoilNitrogen.FOMN) - initialSoilFOMNTotal;
            DeltaSoilMBiomassNTotal = MathUtilities.Sum(SoilNitrogen.MicrobialN) - initialSoilBiomNTotal;
            DeltaSoilHumicNTotal = MathUtilities.Sum(SoilNitrogen.HumicN) - initialSoilHumNTotal;
            DeltaSoilOrganicNTotal = (MathUtilities.Sum(SoilNitrogen.FOMN)
                                   + MathUtilities.Sum(SoilNitrogen.MicrobialN)
                                   + MathUtilities.Sum(SoilNitrogen.HumicN))
                                   - (initialSoilFOMNTotal + initialSoilBiomNTotal + initialSoilHumNTotal);
            DeltaSoilMineralNTotal = (MathUtilities.Sum(Urea.kgha)+MathUtilities.Sum(NH4.kgha)+MathUtilities.Sum(NO3.kgha))
                                   - (initialSoilUreaTotal + initialSoilNH4Total + initialSoilNO3Total);

            DeltaSoilOrganicCTotal = (MathUtilities.Sum(SoilNitrogen.FOMC)
                                   + MathUtilities.Sum(SoilNitrogen.MicrobialC)
                                   + MathUtilities.Sum(SoilNitrogen.HumicC))
                                   - initialSoilOrgCTotal;

            DeltaSoilFOMNToLayer = sumOverLayers(SoilNitrogen.FOMN, reportingBottomLayer, reportingFractionLayer) - initialSoilFOMNToLayer;
            DeltaSoilMBiomassNToLayer = sumOverLayers(SoilNitrogen.MicrobialN, reportingBottomLayer, reportingFractionLayer) - initialSoilBiomNToLayer;
            DeltaSoilHumicNToLayer = sumOverLayers(SoilNitrogen.HumicN, reportingBottomLayer, reportingFractionLayer) - initialSoilHumNToLayer;
            DeltaSoilOrganicNToLayer = (sumOverLayers(SoilNitrogen.FOMN, reportingBottomLayer, reportingFractionLayer)
                                     + sumOverLayers(SoilNitrogen.MicrobialN, reportingBottomLayer, reportingFractionLayer)
                                     + sumOverLayers(SoilNitrogen.HumicN, reportingBottomLayer, reportingFractionLayer))
                                     - (initialSoilFOMNToLayer + initialSoilBiomNToLayer + initialSoilHumNToLayer);
            DeltaSoilMineralNToLayer = (MathUtilities.Sum(Urea.kgha)+MathUtilities.Sum(NH4.kgha)+MathUtilities.Sum(NO3.kgha))
                                     - (initialSoilUreaToLayer + initialSoilNH4ToLayer + initialSoilNO3ToLayer);

            DeltaSoilOrganicCToLayer = (sumOverLayers(SoilNitrogen.FOMC, reportingBottomLayer, reportingFractionLayer)
                                     + sumOverLayers(SoilNitrogen.MicrobialC, reportingBottomLayer, reportingFractionLayer)
                                     + sumOverLayers(SoilNitrogen.HumicC, reportingBottomLayer, reportingFractionLayer))
                                     - initialSoilOrgCToLayer;

            // get the plant outputs
            if((currentCrop != "Fallow") && (cropHarvested == ""))
            { // skip recording on harvest day to avoid zeroing the outputs
                CropAboveGroundBiomassWt = 0.0;
                CropAboveGroundBiomassN = 0.0;
                CropAboveGroundBiomassNConc = 0.0;
                CropTotalBiomassWt = 0.0;
                CropTotalBiomassN = 0.0;
                CropTotalBiomassNConc = 0.0;
                double totalWaterDemand = 0.0;
                double totalWaterAllocation = 0.0;
                foreach(IPlant crop in cropsInTheSimulation)
                {
                    string cropName = (crop as Plant).Name;
                    if((double)myZone.Get(cropName + ".Phenology.Stage") > 1.0)
                    {
                        CropAboveGroundBiomassWt += (double)myZone.Get(cropName + ".AboveGround.Wt") * 10.0;
                        CropAboveGroundBiomassN += (double)myZone.Get(cropName + ".AboveGround.N") * 10.0;
                        CropAboveGroundBiomassNConc += (double)myZone.Get(cropName + ".AboveGround.NConc") * 100.0;
                        CropTotalBiomassWt += (double)myZone.Get(cropName + ".Total.Wt") * 10.0;
                        CropTotalBiomassN += (double)myZone.Get(cropName + ".Total.N") * 10.0;
                        CropTotalBiomassNConc += (double)myZone.Get(cropName + ".Total.NConc") * 100.0;
                        totalWaterDemand += (double)myZone.Get(cropName + ".Leaf.WaterDemand");
                        totalWaterAllocation += (double)myZone.Get(cropName + ".Leaf.WaterAllocation");
                        AccumLightInterception += (double)myZone.Get(cropName + ".Leaf.RadiationIntercepted");
                    }
                }

                CropWaterDeficitFactor = MathUtilities.Divide(totalWaterAllocation, totalWaterDemand, 1.0);
                if(CropWaterDeficitFactor < 0.999999999)
                {
                    NumberOfDaysWithWaterStress += 1;
                }
            }
        }

        private double sumOverLayers(double[] modelVariable,  int endLayer, double fracLayer)
        {
            double result = 0.0;
            if(endLayer >= 0)
            {
                result += MathUtilities.Sum(modelVariable, 0, endLayer);
            }

            if(endLayer < modelVariable.Length - 1)
            {
                result += modelVariable[endLayer + 1]*fracLayer;
            }

            return result;
        }

        private double evaluateAtLayer(double[] modelVariable,  int endLayer, double fracLayer)
        {
            double result = 0.0;
            if(fracLayer < 0.5)
            {
                result = modelVariable[Math.Max(0, endLayer)];
            }
            else
            {
                result = modelVariable[endLayer + 1];
            }

            return result;
        }
    }
}
```
                Operations IrrigationOperations
                  2020-09-23  [Irrigation].Apply(5);
                  2020-09-24  [Irrigation].Apply(5);
                  2020-09-25  [Irrigation].Apply(5);
                  2020-09-26  [Irrigation].Apply(5);
                  2020-09-27  [Irrigation].Apply(5);
                  2020-09-28  [Irrigation].Apply(5);
                  2020-09-29  [Irrigation].Apply(5);
                  2020-09-30  [Irrigation].Apply(5);
                  2020-10-01  [Irrigation].Apply(5);
                  2020-10-02  [Irrigation].Apply(5);
                  2020-10-03  [Irrigation].Apply(5);
                  2020-10-04  [Irrigation].Apply(5);
                  2020-10-05  [Irrigation].Apply(5);
                  2020-10-06  [Irrigation].Apply(5);
                  2020-10-07  [Irrigation].Apply(5);
                  2020-10-08  [Irrigation].Apply(5);
                  2020-10-09  [Irrigation].Apply(5);
                  2020-10-10  [Irrigation].Apply(5);
                  2020-10-11  [Irrigation].Apply(5);
                  2020-10-12  [Irrigation].Apply(5);
                  2020-10-13  [Irrigation].Apply(5);
                  2020-10-14  [Irrigation].Apply(5);
                  2020-10-15  [Irrigation].Apply(5);
                  2020-10-16  [Irrigation].Apply(5);
                  2020-10-17  [Irrigation].Apply(5);
                  2020-10-18  [Irrigation].Apply(5);
                  2020-10-19  [Irrigation].Apply(5);
                  2020-10-20  [Irrigation].Apply(5);
                  2020-10-21  [Irrigation].Apply(5);
                  2020-10-22  [Irrigation].Apply(5);
                  2020-10-23  [Irrigation].Apply(5);
                  2020-10-24  [Irrigation].Apply(5);
                  2020-10-25  [Irrigation].Apply(5);
                  2020-10-26  [Irrigation].Apply(5);
                  2020-10-27  [Irrigation].Apply(5);
                  2020-10-28  [Irrigation].Apply(5);
                  2020-10-29  [Irrigation].Apply(5);
                  2020-10-30  [Irrigation].Apply(5);
                  2020-10-31  [Irrigation].Apply(5);
                  2020-11-01  [Irrigation].Apply(5);
                  2020-11-02  [Irrigation].Apply(5);
                  2020-11-03  [Irrigation].Apply(5);
                  2020-11-04  [Irrigation].Apply(5);
                  2020-11-05  [Irrigation].Apply(5);
                  2020-11-06  [Irrigation].Apply(5);
                  2020-11-07  [Irrigation].Apply(5);
              MicroClimate: a_interception=0; b_interception=1; c_interception=0; d_interception=0; SoilHeatFluxFraction=0.4; MinimumHeightDiffForNewLayer=0; NightInterceptionFraction=0.5; ReferenceHeight=2
              Irrigation
              Fertiliser
              SurfaceOrganicMatter: InitialResidueName=oat_stubble; InitialResidueType=oats; InitialResidueMass=1500; InitialStandingFraction=0.5; InitialCPR=0; InitialCNR=50
              Plant Oats
              Report Output
                VariableNames:
                  [Clock].Today as ReportDate
                  [Clock].Today.Year as Year
                  [FactorLabels].Script.AGENT_NO as AGENT_NO
                  [FactorLabels].Script.Lat as Lat
                  [FactorLabels].Script.Lon as Lon
                  [FactorLabels].Script.GCM as GCM
                  [FactorLabels].Script.RCP as RCP
                  [FactorLabels].Script.TS as TimeSlice
                  [FactorLabels].Script.SoilStamp as SoilStamp
                  [CropManagement].Script.CurrentCrop as CropSpecies
                  sum([Soil].Water.MM) as SoilWater_Total
                  sum([Soil].Urea.kgha) as SoilUrea_Total
                  sum([Soil].NH4.kgha) as SoilNH4_Total
                  sum([Soil].NO3.kgha) as SoilNO3_Total
                  (sum([Soil].Urea.kgha) + sum([Soil].NH4.kgha) + sum([Soil].NO3.kgha)) as SoilMineralN_Total
                  [CropManagement].Script.HarvestedWt as HarvestedCropBiomass
                  [CropManagement].Script.HarvestedN as HarvestedCropN
                  [CropManagement].Script.HarvestedNconc as HarvestedCropNconc
                  [CropManagement].Script.CropYield as CropYield
                  [CropManagement].Script.SowDOY as SowingDOY
                  [CropManagement].Script.HarvestDOY as HarvestingDOY
                  [CropManagement].Script.CoverCropCultivar as CoverCropCultivar
                  [ExtraVariables].Script.CropAboveGroundBiomassN as UptakeN_Cum
                  [ExtraVariables].Script.AccumSoilOMMineralisedToLayer as SoilOMMineralisedNToGivenLayer_Cum
                  ([ExtraVariables].Script.AccumSoilOMMineralisedToLayer+[ExtraVariables].Script.AccumSurfaceOMMineralisation) as MineralisedNToGivenLayer_Cum
                  [ExtraVariables].Script.AccumDenitrifiedNToLayer as DenitrifiedNToGivenLayer_Cum
                  [ExtraVariables].Script.AccumFlowNAtLayer as LeachedNAtGivenLayer_Cum
                  [ExtraVariables].Script.SumUreaToLayer as UreaToGivenLayer_Sum
                  [ExtraVariables].Script.SumNH4ToLayer as NH4ToGivenLayer_Sum
                  [ExtraVariables].Script.SumNO3ToLayer as NO3ToGivenLayer_Sum
                  [ExtraVariables].Script.SumMineralNToLayer as MineralNToGivenLayer_Sum
                  [ExtraVariables].Script.SumFOMNToLayer as FOMNToGivenLayer_Sum
                  [ExtraVariables].Script.SumMicrobialNToLayer as MicrobialNToGivenLayer_Sum
                  [ExtraVariables].Script.SumHumicNToLayer as HumicNToGivenLayer_Sum
                  [ExtraVariables].Script.SumOrganicNToLayer as OrganicNToGivenLayer_Sum
                  [ExtraVariables].Script.SumOrganicCToLayer as OrganicCToGivenLayer_Sum
                  [Soil].SoilNitrogen.oc[1] as OC_TopLayer
                  [ExtraVariables].Script.DeltaSoilMineralNToLayer as SoilMineralN_DeltaToGivenLayer
                  [ExtraVariables].Script.DeltaSoilOrganicNToLayer as SoilOrganicN_DeltaToGivenLayer
                  [ExtraVariables].Script.CropAboveGroundBiomassWt as CropBiomass_Cum
                  [ExtraVariables].Script.CropAboveGroundBiomassN as CropN_Cum
                  [ExtraVariables].Script.CropAboveGroundBiomassNConc as CropNconc
                Memo: same as Replacements.DailyReportWater_n_MineralN.Memo
              Report DailyReport: EventNames=[Clock].EndOfDay
                VariableNames:
                  [Clock].Today
                  [Weather].MaxT
                  [Weather].MinT
                  [Weather].Radn
                  [Weather].Rain
                  [Oats].AboveGroundLive.Wt
                  [Oats].Leaf.LAI
                  [Oats].Leaf.CoverGreen
                  [Fertiliser].NitrogenApplied
                  [ExtraVariables].Script.AccumSoilOMMineralisedToLayer as SoilOMMineralisedNToGivenLayer_Cum
                  ([ExtraVariables].Script.AccumSoilOMMineralisedToLayer+[ExtraVariables].Script.AccumSurfaceOMMineralisation) as MineralisedNToGivenLayer_Cum
                  [ExtraVariables].Script.AccumDenitrifiedNToLayer as DenitrifiedNToGivenLayer_Cum
                  [ExtraVariables].Script.AccumFlowNAtLayer as LeachedNAtGivenLayer_Cum
                  [ExtraVariables].Script.SumUreaToLayer as UreaToGivenLayer_Sum
                  [ExtraVariables].Script.SumNH4ToLayer as NH4ToGivenLayer_Sum
                  [ExtraVariables].Script.SumNO3ToLayer as NO3ToGivenLayer_Sum
                  [ExtraVariables].Script.SumMineralNToLayer as MineralNToGivenLayer_Sum
                  [ExtraVariables].Script.CropAboveGroundBiomassWt as CropBiomass_Cum
                  [ExtraVariables].Script.CropAboveGroundBiomassN as CropN_Cum
                  [ExtraVariables].Script.CropAboveGroundBiomassNConc as CropNconc
                  [CropManagement].Script.HarvestedWt as HarvestedCropBiomass
                  [CropManagement].Script.HarvestedN as HarvestedCropN
                  [CropManagement].Script.HarvestedNconc as HarvestedCropNconc
                  [CropManagement].Script.CropYield as CropYield
                  [ExtraVariables].Script.depthForReporting as ReportDepth
                  [CropManagement].Script.SowDOY as SowingDOY
                  [CropManagement].Script.HarvestDOY as HarvestingDOY
                  [ExtraVariables].Script.AccumLightInterception as AccumLightInterc
                  [CropManagement].Script.CoverCropCultivar as CoverCropCultivar
                  [Oats].Leaf.Live.Wt as LeafBiomass
                  [Oats].Stem.Live.Wt as StemBiomass
                  [Oats].AboveGround.Wt as AboveBiomass
                  [Oats].Leaf.Live.N as LeafN
                  [Oats].Stem.Live.N as StemN
                  [Oats].AboveGround.N as AboveN
                  [Oats].AboveGround.NConc
                  [ExtraVariables].Script.AccumTotalLeachedN as TotalLeachedN_Cum
                  [ExtraVariables].Script.AccumUptakeN as UptakeN_Cum
                  [ExtraVariables].Script.AccumRainfall as Rainfall_Cum
                  [ExtraVariables].Script.AccumIrrigation as AppliedIrrigation_Cum
                  [ExtraVariables].Script.AccumFertiliser as AppliedFertiliserN_Cum
                  [Oats].Phenology.Stage
                  [Phenology].CurrentStageName
                  [Soil].SoilWater.Drainage as Drainage
                  [Soil].SoilWater.LeachNO3 as LeachedNO3
                Memo: same as Replacements.DailyReportWater_n_MineralN.Memo
              Report DailyReportWater_n_MineralN: EventNames=[Clock].EndOfDay
                VariableNames:
                  [Clock].Today
                  ([Soil].OutputNutrientLayers.NO3[1] + [Soil].OutputNutrientLayers.NH4[1]) as SoilN_0_15
                  ([Soil].OutputNutrientLayers.NO3[2] + [Soil].OutputNutrientLayers.NH4[2]) as SoilN_15_30
                  ([Soil].OutputNutrientLayers.NO3[3] + [Soil].OutputNutrientLayers.NH4[3]) as SoilN_30_60
                  ([Soil].OutputNutrientLayers.NO3[4] + [Soil].OutputNutrientLayers.NH4[4]) as SoilN_60_90
                  (SoilN_0_15 + SoilN_15_30 ) as SoilN_0_30
                  (SoilN_0_15 + SoilN_15_30 + SoilN_30_60) as SoilN_0_60
                  (SoilN_0_15 + SoilN_15_30 + SoilN_30_60 + SoilN_60_90) as SoilN_0_90
                  [Soil].SoilWater.Drainage as Drainage
                Memo: same as Replacements.DailyReportWater_n_MineralN.Memo
              Soil Balmoral: SoilType=Generic soil; Country=New Zealand; Latitude=37.5; Longitude=172.5
                Chemical: Thickness=[150, 150, 300, 300, 300, 300, 300, 200]; PH=[6, 6, 6, 6, 6, 6, 6, 6]; PHUnits=Water
                Physical
                  Thickness  ParticleSizeClay  ParticleSizeSand  ParticleSizeSilt  Rocks  BD     AirDry  LL15   DUL    SAT    KS
                  150        20                20                60                35     1.05   0.075   0.11   0.37   0.5    500
                  150        20                20                60                51     0.93   0.14    0.166  0.35   0.495  450
                  300        20                20                60                77     1.3    0.141   0.18   0.26   0.48   250
                  300        19                21                60                77     1.3    0.145   0.145  0.345  0.47   100
                  300        18                22                60                80     1.4    0.15    0.15   0.345  0.463  60
                  300        17                23                60                80     1.425  0.153   0.153  0.34   0.454  70
                  300        16                24                60                80     1.45   0.155   0.155  0.32   0.432  150
                  200        15                25                60                80     1.45   0.155   0.155  0.3    0.425  250
                  SoilCrop OatsSoil: LL=[0.15, 0.145, 0.141, 0.145, 0.15, 0.153, 0.155, 0.155]; KL=[0.08, 0.06, 0.045, 0.04, 0.01, 0.005, 0.003, 0.001]; XF=[1, 1, 1, 1, 1, 1, 1, 1]
                WaterBalance SoilWater: SummerDate=1-Oct; SummerU=8; SummerCona=4; WinterDate=1-Apr; WinterU=4; WinterCona=1.5; DiffusConst=88; DiffusSlope=35; Salb=0.2; CN2Bare=60; CNRed=10; CNCov=0.8; DischargeWidth=0; CatchmentArea=0; PSIDul=-100; Thickness=[150, 150, 300, 300, 300, 300, 300, 200]; SWCON=[0.5, 0.5, 0.43, 0.375, 0.34, 0.35, 0.4, 0.48]
                SoilNitrogen: fom_types=[default, manure, mucuna, lablab, shemp, stable]; fract_carb=[0.2, 0.3, 0.54, 0.57, 0.45, 0]; fract_cell=[0.7, 0.3, 0.37, 0.37, 0.47, 0.1]; fract_lign=[0.1, 0.4, 0.09, 0.06, 0.08, 0.9]; NPartitionApproach=0
                Organic: FOMCNRatio=40; CarbonUnits=Total
                  Thickness  Carbon  SoilCNRatio  FBiom  FInert  FOM
                  150        2.5     11           0.08   0.2     320.735
                  150        1.75    11           0.04   0.325   256.112
                  300        0.75    11           0.018  0.6     163.304
                  300        0.3     11           0.01   0.85    104.127
                  300        0.2     11           0.008  0.95    66.395
                  300        0.1     11           0.008  0.98    42.335
                  300        0.1     11           0.008  0.99    26.994
                  200        0.1     11           0.008  0.995   19.998
                CERESSoilTemperature Temperature
                Water: Thickness=[150, 150, 300, 300, 300, 300, 300, 200]; InitialValues=[0.37, 0.35, 0.26, 0.345, 0.345, 0.34, 0.32, 0.3]; RelativeTo=LL15; FilledFromTop=false
                SoilNitrogenNO3 NO3: Thickness=[150, 150, 300, 300, 300, 300, 300, 200]; InitialValues=[30.24, 5.41, 4.51, 1.282, 0.952, 0.702, 0.46, 0.345]; InitialValuesUnits=ppm; WaterTableConcentration=0; D0=0; DepthConstant=0; MaxDepthSoluteAccessible=0; RunoffEffectivenessAtMovingSolute=0; MaxEffectiveRunoff=0
                SoilNitrogenNH4 NH4: Thickness=[150, 150, 300, 300, 300, 300, 300, 200]; InitialValues=[10.16, 1.66, 0.5, 0.128, 0.119, 0.117, 0.115, 0.172]; InitialValuesUnits=ppm; WaterTableConcentration=0; D0=0; DepthConstant=0; MaxDepthSoluteAccessible=0; RunoffEffectivenessAtMovingSolute=0; MaxEffectiveRunoff=0
                SoilNitrogenUrea Urea: Thickness=[150, 150, 300, 300, 300, 300, 300, 200]; InitialValues=[0, 0, 0, 0, 0, 0, 0, 0]; InitialValuesUnits=kg/ha; WaterTableConcentration=0; D0=0; DepthConstant=0; MaxDepthSoluteAccessible=0; RunoffEffectivenessAtMovingSolute=0; MaxEffectiveRunoff=0
                OutputLayers OutputNutrientLayers: Thickness=[150, 150, 300, 300, 300, 300, 300]
              Soil Balmoral: SoilType=Generic soil; Country=New Zealand; Latitude=37.5; Longitude=172.5
                Chemical: Thickness=[150, 150, 300, 300, 300, 300, 300, 200]; PH=[6, 6, 6, 6, 6, 6, 6, 6]; PHUnits=Water
                Physical: same as Validation.New Zealand.SLMACC.SLMACC_Canterbury_2020.SpringstonBalmoralSoil.Block.Balmoral.Physical
                WaterBalance SoilWater: same as Validation.New Zealand.SLMACC.SLMACC_Canterbury_2020.SpringstonBalmoralSoil.Block.Balmoral.SoilWater
                SoilNitrogen: fom_types=[default, manure, mucuna, lablab, shemp, stable]; fract_carb=[0.2, 0.3, 0.54, 0.57, 0.45, 0]; fract_cell=[0.7, 0.3, 0.37, 0.37, 0.47, 0.1]; fract_lign=[0.1, 0.4, 0.09, 0.06, 0.08, 0.9]; NPartitionApproach=0
                Organic: same as Validation.New Zealand.SLMACC.SLMACC_Canterbury_2020.SpringstonBalmoralSoil.Block.Balmoral.Organic
                CERESSoilTemperature Temperature
                Water: Thickness=[150, 150, 300, 300, 300, 300, 300, 200]; InitialValues=[0.37, 0.35, 0.26, 0.345, 0.345, 0.34, 0.32, 0.3]; RelativeTo=LL15; FilledFromTop=false
                SoilNitrogenNO3 NO3: Thickness=[150, 150, 300, 300, 300, 300, 300, 200]; InitialValues=[24.24, 10.41, 4.51, 1.282, 0.952, 0.702, 0.46, 0.345]; InitialValuesUnits=ppm; WaterTableConcentration=0; D0=0; DepthConstant=0; MaxDepthSoluteAccessible=0; RunoffEffectivenessAtMovingSolute=0; MaxEffectiveRunoff=0
                SoilNitrogenNH4 NH4: Thickness=[150, 150, 300, 300, 300, 300, 300, 200]; InitialValues=[20.16, 1.66, 0.5, 0.128, 0.119, 0.117, 0.115, 0.172]; InitialValuesUnits=ppm; WaterTableConcentration=0; D0=0; DepthConstant=0; MaxDepthSoluteAccessible=0; RunoffEffectivenessAtMovingSolute=0; MaxEffectiveRunoff=0
                SoilNitrogenUrea Urea: same as Validation.New Zealand.SLMACC.SLMACC_Canterbury_2020.SpringstonBalmoralSoil.Block.Balmoral.Urea
                OutputLayers OutputNutrientLayers: Thickness=[150, 150, 300, 300, 300, 300, 300]
                Solute NO3: Thickness=[1800]; InitialValues=[3]; InitialValuesUnits=ppm; WaterTableConcentration=0; D0=0; DepthConstant=0; MaxDepthSoluteAccessible=0; RunoffEffectivenessAtMovingSolute=0; MaxEffectiveRunoff=0
                Solute NH4: Thickness=[1800]; InitialValues=[1]; InitialValuesUnits=ppm; WaterTableConcentration=0; D0=0; DepthConstant=0; MaxDepthSoluteAccessible=0; RunoffEffectivenessAtMovingSolute=0; MaxEffectiveRunoff=0
                Solute Urea: Thickness=[1800]; InitialValues=[0]; InitialValuesUnits=ppm; WaterTableConcentration=0; D0=0; DepthConstant=0; MaxDepthSoluteAccessible=0; RunoffEffectivenessAtMovingSolute=0; MaxEffectiveRunoff=0
        Experiment SLMACC_Canterbury_2021
          Memo Experiment Description
            * 	Trial location: Barhill, Canterbury
            *	Coordinates:43.757°S, 171.932°E
            *	Soil: Templeton
            *	Weather station: Chertsey Cws
            *	This experiment evaluated oat populations (i.e. target of 0 [fallow],150, 300 plants/m2)
            *	Note that these populations were not achieved so, actual plant counts are used in the model (see factors).
            * 	The paddock was previously in a kale crop
            *	This is a grazed field and grazing occured on the winter (kale) crop prior to sowing oats
          Memo ALARM_ReadAddressThenDelete_ENK
            1) Please check soil mineral N data - layer data missing; the 0-60 cm data different from what I had before - Check with BM/SM
          Factors
            Permutation
              Factor Rate
                CompositeFactor 0
                  Specifications:
                    [CropManagement].Script.CoverCropIsEnabled = false
                    [CropManagement].Script.CoverCropSowingPopulation = 0
                CompositeFactor 150: Specifications=[CropManagement].Script.CoverCropSowingPopulation = 160
                CompositeFactor 300: Specifications=[CropManagement].Script.CoverCropSowingPopulation = 280
          Simulation BarhillTempletonSoil
            Clock: Start=2021-08-25; End=2022-02-10
            Weather: FileName=WeatherFiles\Lincoln.met
            Summary summaryfile
            SoilArbitrator Soil Arbitrator
            Zone Block: Area=1; Slope=0; AspectAngle=0; Altitude=50
              Folder Manager folder
                Manager FactorLabels: same as Validation.New Zealand.SLMACC.SLMACC_Canterbury_2020.SpringstonBalmoralSoil.Block.Manager folder.FactorLabels
                Manager CropManagement
                  CoverCropIsEnabled = True
                  CoverCropSowingPopulation = 400
                  CoverCropSowingSpacing = 150
                  CoverCrop = [Oats]
                  CoverCropCultivar = Milton
                  CoverCropSowingDepth = 30
                  LinkSowingToMainCrop = False
                  PeriodAfterHarvestCrop = 5
                  CoverCropSowingDate = 1-Sep
                  CoverCropHarvestingDate = 11-Feb
                  CoverCropFractionToRemove = 0
                  script: same as in Validation.New Zealand.SLMACC.SLMACC_Canterbury_2020.SpringstonBalmoralSoil.Block.Manager folder.CropManagement
                Manager ExtraVariables: same as Validation.New Zealand.SLMACC.SLMACC_Canterbury_2020.SpringstonBalmoralSoil.Block.Manager folder.ExtraVariables
                Operations
              MicroClimate: a_interception=0; b_interception=1; c_interception=0; d_interception=0; SoilHeatFluxFraction=0.4; MinimumHeightDiffForNewLayer=0; NightInterceptionFraction=0.5; ReferenceHeight=2
              Irrigation
              Fertiliser
              SurfaceOrganicMatter: InitialResidueName=oat_stubble; InitialResidueType=oats; InitialResidueMass=1500; InitialStandingFraction=0.5; InitialCPR=0; InitialCNR=20
              Plant Oats
                Folder NewCultivars
                  Cultivar Coronet
                    Command:
                      [Phenology].CAMP.FLNparams.MinLN = 9
                      [Phenology].CAMP.FLNparams.VrnLN  = 0
                      [Phenology].CAMP.FLNparams.PpLN  = 0
                      [Phenology].HeadEmergenceLongDayBase.FixedValue = 0
                      [Phenology].HeadEmergencePpSensitivity.FixedValue = 0
                      [Leaf].Phyllochron.BasePhyllochron.FixedValue = 105
                      [Leaf].ExtinctionCoefficient.VegetativePhase.FixedValue = 0.6
                      [Leaf].MaxLeafArea.AreaLargestLeaf.FixedValue = 1640
                      [Leaf].InitialLeaves[1].Area = 200
                      [Leaf].InitialLeaves[2].Area = 400
                      [Leaf].CohortParameters.MaxArea.AgeFactor.XYPairs.X = 3,4,4.3
                      [Leaf].CohortParameters.MaxArea.AgeFactor.XYPairs.Y = 0.05,1,0.05
                  Cultivar PFR_100_05
                    Command:
                      [Phenology].CAMP.FLNparams.MinLN = 9
                      [Phenology].CAMP.FLNparams.VrnLN  = 0
                      [Phenology].CAMP.FLNparams.PpLN  = 0
                      [Phenology].HeadEmergenceLongDayBase.FixedValue = 0
                      [Phenology].HeadEmergencePpSensitivity.FixedValue = 0
                      [Leaf].Phyllochron.BasePhyllochron.FixedValue = 105
                      [Leaf].ExtinctionCoefficient.VegetativePhase.FixedValue = 0.6
                      [Leaf].MaxLeafArea.AreaLargestLeaf.FixedValue = 2500
                      [Leaf].InitialLeaves[1].Area = 340
                      [Leaf].InitialLeaves[2].Area = 660
                      [Leaf].CohortParameters.MaxArea.AgeFactor.XYPairs.X = 3,4,4.3
                      [Leaf].CohortParameters.MaxArea.AgeFactor.XYPairs.Y =  0.05,1,0.05
                  Memo ReadMe
                    # Comparing cultivars Coronet and PFR 100-05

                    - Data collected by **Mike George**
                    - Data sits in: https://iplant.plantandfood.co.nz/project/I161208

                    ## Context:
                    - PFR 100-05 showed faster canopy cloure rates via drone aerial photos
                    - Field trial was done to identify mechanisms.

                    ##Main differences between cultivars were:

                    - Larger leaves by PRR 100-05 (45-80% larger)
                    - Taller stems by PFR 100-05 (50% taller)

                    ## Observations

                    - We agreed to keep only leaf size as genotype difference. Height also differed as:
                    - [Leaf].HeightModel.PotentialHeight.XYPairs.Y = 13,204,820,820
                    - [Leaf].HeightModel.PotentialHeight.XYPairs.Y = 20,300,1200,1200
              Report Output: same as Validation.New Zealand.SLMACC.SLMACC_Canterbury_2020.SpringstonBalmoralSoil.Block.Output
              Report DailyReport: EventNames=[Clock].EndOfDay
                VariableNames:
                  [Clock].Today
                  [Weather].MaxT
                  [Weather].MinT
                  [Weather].Radn
                  [Weather].Rain
                  [Oats].AboveGroundLive.Wt
                  [Oats].Leaf.LAI
                  [Oats].Leaf.CoverGreen
                  [Fertiliser].NitrogenApplied
                  [ExtraVariables].Script.AccumSoilOMMineralisedToLayer as SoilOMMineralisedNToGivenLayer_Cum
                  ([ExtraVariables].Script.AccumSoilOMMineralisedToLayer+[ExtraVariables].Script.AccumSurfaceOMMineralisation) as MineralisedNToGivenLayer_Cum
                  [ExtraVariables].Script.AccumDenitrifiedNToLayer as DenitrifiedNToGivenLayer_Cum
                  [ExtraVariables].Script.AccumFlowNAtLayer as LeachedNAtGivenLayer_Cum
                  [ExtraVariables].Script.SumUreaToLayer as UreaToGivenLayer_Sum
                  [ExtraVariables].Script.SumNH4ToLayer as NH4ToGivenLayer_Sum
                  [ExtraVariables].Script.SumNO3ToLayer as NO3ToGivenLayer_Sum
                  [ExtraVariables].Script.SumMineralNToLayer as MineralNToGivenLayer_Sum
                  [ExtraVariables].Script.CropAboveGroundBiomassWt as CropBiomass_Cum
                  [ExtraVariables].Script.CropAboveGroundBiomassN as CropN_Cum
                  [ExtraVariables].Script.CropAboveGroundBiomassNConc as CropNconc
                  [CropManagement].Script.HarvestedWt as HarvestedCropBiomass
                  [CropManagement].Script.HarvestedN as HarvestedCropN
                  [CropManagement].Script.HarvestedNconc as HarvestedCropNconc
                  [CropManagement].Script.CropYield as CropYield
                  [ExtraVariables].Script.depthForReporting as ReportDepth
                  [CropManagement].Script.SowDOY as SowingDOY
                  [CropManagement].Script.HarvestDOY as HarvestingDOY
                  [ExtraVariables].Script.AccumLightInterception as AccumLightInterc
                  [CropManagement].Script.CoverCropCultivar as CoverCropCultivar
                  [Oats].Leaf.Live.Wt as LeafBiomass
                  [Oats].Stem.Live.Wt as StemBiomass
                  [Oats].AboveGround.Wt as AboveBiomass
                  [Oats].Leaf.Live.N as LeafN
                  [Oats].Stem.Live.N as StemN
                  [Oats].AboveGround.N as AboveN
                  [ExtraVariables].Script.AccumTotalLeachedN as TotalLeachedN_Cum
                  [ExtraVariables].Script.AccumUptakeN as UptakeN_Cum
                  [ExtraVariables].Script.AccumRainfall as Rainfall_Cum
                  [ExtraVariables].Script.AccumIrrigation as AppliedIrrigation_Cum
                  [ExtraVariables].Script.AccumFertiliser as AppliedFertiliserN_Cum
                  [Oats].Phenology.Stage
                  [Phenology].CurrentStageName
                Memo: same as Replacements.DailyReportWater_n_MineralN.Memo
              Report DailyReportWater_n_MineralN: EventNames=[Clock].EndOfDay
                VariableNames:
                  [Clock].Today
                  ([Soil].OutputNutrientLayers.NO3[1] + [Soil].OutputNutrientLayers.NH4[1]) as SoilN_0_15
                  ([Soil].OutputNutrientLayers.NO3[2] + [Soil].OutputNutrientLayers.NH4[2]) as SoilN_15_30
                  ([Soil].OutputNutrientLayers.NO3[3] + [Soil].OutputNutrientLayers.NH4[3]) as SoilN_30_60
                  ([Soil].OutputNutrientLayers.NO3[4] + [Soil].OutputNutrientLayers.NH4[4]) as SoilN_60_90
                  (SoilN_0_15 + SoilN_15_30 ) as SoilN_0_30
                  (SoilN_0_15 + SoilN_15_30 + SoilN_30_60) as SoilN_0_60
                  (SoilN_0_15 + SoilN_15_30 + SoilN_30_60 + SoilN_60_90) as SoilN_0_90
                Memo: same as Replacements.DailyReportWater_n_MineralN.Memo
              Soil TempletonABlock: Latitude=0; Longitude=0
                Chemical: Thickness=[150, 150, 300, 300, 300, 300, 300]; PH=[6.6, 6.2, 5.7, 5.5, 5.5, 5.5, 5.5]; PHUnits=Water
                Physical
                  Thickness  ParticleSizeClay  ParticleSizeSand  ParticleSizeSilt  Rocks  BD     AirDry  LL15   DUL    SAT    KS
                  100        22                15                63                0      1.23   0.063   0.14   0.3    0.535  480
                  100        22                15                63                0      1.235  0.065   0.16   0.325  0.53   420
                  200        21.5              12.5              66                0      1.375  0.074   0.185  0.35   0.481  240
                  200        20                15                65                0      1.66   0.06    0.15   0.315  0.374  24
                  200        22.5              5                 72.5              0      1.59   0.074   0.185  0.325  0.4    24
                  200        8                 45                47                0      1.44   0.04    0.1    0.315  0.45   1200
                  200        15                25                60                0      1.525  0.048   0.12   0.325  0.425  480
                  200        5                 60                35                0      1.36   0.028   0.07   0.28   0.475  720
                  200        6                 50                44                0      1.35   0.04    0.1    0.345  0.46   1200
                  200        6                 50                44                0      1.35   0.032   0.08   0.28   0.46   1140
                  SoilCrop OatsSoil
                    LL=[0.155, 0.17, 0.185, 0.15, 0.185, 0.1, 0.12, 0.07, 0.1, 0.08]
                    KL=[0.1, 0.08, 0.05, 0.035, 0.02, 0.01, 0.007, 0.003, 0.001, 0]
                    XF=[1, 1, 1, 1, 1, 1, 1, 1, 1, 1]
                Organic: FOMCNRatio=40; CarbonUnits=Total
                  Thickness  Carbon  SoilCNRatio  FBiom  FInert  FOM
                  100        3       12           0.06   0.315   850
                  100        2.75    12           0.046  0.522   500
                  200        1.85    11.5         0.01   0.785   450
                  200        0.4     10           0.008  0.899   175
                  200        0.25    9.5          0.008  0.953   75
                  200        0.2     9            0.008  0.969   25
                  200        0.2     9            0.008  0.989   7.5
                  200        0.15    9            0.008  0.99    2.5
                  200        0.1     9            0.008  0.987   0
                  200        0.1     9            0.008  0.988   0
                Water: Thickness=[100, 100, 200, 200, 200, 200, 200, 200, 200, 200]; RelativeTo=LL15; FilledFromTop=false
                  InitialValues=[0.3, 0.325, 0.35, 0.315, 0.325, 0.315, 0.325, 0.28, 0.345, 0.28]
                WaterBalance SoilWater: SummerDate=1-Nov; SummerU=9; SummerCona=4.4; WinterDate=1-Apr; WinterU=9; WinterCona=4.4; DiffusConst=88; DiffusSlope=35.4; Salb=0.18; CN2Bare=68; CNRed=20; CNCov=0.8; PSIDul=-100; Thickness=[100, 100, 200, 200, 200, 200, 200, 200, 200, 200]
                  SWCON=[0.563, 0.56, 0.481, 0.423, 0.437, 0.545, 0.53, 0.508, 0.534, 0.533]
                SoilNitrogen: fom_types=[default, manure, mucuna, lablab, shemp, stable]; fract_carb=[0.2, 0.3, 0.54, 0.57, 0.45, 0]; fract_cell=[0.7, 0.3, 0.37, 0.37, 0.47, 0.1]; fract_lign=[0.1, 0.4, 0.09, 0.06, 0.08, 0.9]; NPartitionApproach=0
                CERESSoilTemperature Temperature
                Memo SoilDoc
                  This soil was parameterised based on ....
                SoilNitrogenNO3 NO3: Thickness=[150, 150, 300, 300, 300, 300, 300]; InitialValues=[84.7, 33.78, 5, 2.564, 1.904, 1.404, 0.92]; InitialValuesUnits=ppm; WaterTableConcentration=0; D0=0; DepthConstant=0; MaxDepthSoluteAccessible=0; RunoffEffectivenessAtMovingSolute=0; MaxEffectiveRunoff=0
                SoilNitrogenNH4 NH4: Thickness=[150, 150, 300, 300, 300, 300, 300]; InitialValues=[20.44, 8.72, 0.556, 0.256, 0.238, 0.234, 0.23]; InitialValuesUnits=ppm; WaterTableConcentration=0; D0=0; DepthConstant=0; MaxDepthSoluteAccessible=0; RunoffEffectivenessAtMovingSolute=0; MaxEffectiveRunoff=0
                SoilNitrogenUrea Urea: Thickness=[150, 150, 300, 300, 300, 300, 300]; InitialValues=[0, 0, 0, 0, 0, 0, 0]; InitialValuesUnits=kg/ha; WaterTableConcentration=0; D0=0; DepthConstant=0; MaxDepthSoluteAccessible=0; RunoffEffectivenessAtMovingSolute=0; MaxEffectiveRunoff=0
                OutputLayers OutputNutrientLayers: Thickness=[150, 150, 300, 300, 300, 300, 300]
        Experiment SLMACC_Southland_2020
          DisabledSimNames=[SouthlandRate0Width75, SouthlandRate450Width75, SouthlandRate300Width75, SouthlandRate150Width75]
          Memo Experiment Description
            * 	Trial location: Winton, Southland
            *	Coordinates: 46.198°S, 168.307°E
            *	Soil: Caroline - descried as moderately deep (see https://greatsouth.nz/storage/app/media/data_sheets/R_13_4_5382.pdf)
            *	In the above web document, Caroline is said to be similar to Lumsden, Makarewa & Jacobstown soils.
            *	Weather station: On-site. However measurements were not taken daily and so the Gore NIWA station was used
            *	The experiment evaluated oat populations (i.e. target of 0 [fallow],150, 300, 450 plants/m2)- row spacing was 150 cm
            *	Note: target populations were not achieved and so, actual plant counts are used in the model (see factors).
            * 	The paddock was previously in a swedes
            *	This is a grazed field.
          Factors
            Permutation
              Factor Rate
                CompositeFactor 0
                  Specifications:
                    [CropManagement].Script.CoverCropIsEnabled = false
                    [CropManagement].Script.CoverCropSowingPopulation = 0
                CompositeFactor 150: Specifications=[CropManagement].Script.CoverCropSowingPopulation = 64
                CompositeFactor 300: Specifications=[CropManagement].Script.CoverCropSowingPopulation = 138
                CompositeFactor 450: Specifications=[CropManagement].Script.CoverCropSowingPopulation = 169
              Factor Width
                CompositeFactor 150: Specifications=[CropManagement].Script.CoverCropSowingSpacing = 150
          Simulation WintonMakarewaSoil
            Clock: Start=2020-08-12; End=2020-12-09
            Weather: FileName=WeatherFiles\gore.met
            Summary summaryfile
            SoilArbitrator Soil Arbitrator
            Zone Block: Area=1; Slope=0; AspectAngle=0; Altitude=50
              Manager LeafSizeScript
```csharp
using Newtonsoft.Json;
using System;
using Models.Core;
using System.Collections.Generic;
using System.Text;
using Models.Soils;
using Models.Soils.Nutrients;
using Models.PMF;
using Models;
using System.Xml.Serialization;
using APSIM.Shared.Utilities;
using Models.Climate;

namespace Models
{
    [Serializable] 
    public class Script : Model
    {
        [Link] Clock Clock;
        [Link] Soils.Soil Soil;
        [Link] Models.Surface.SurfaceOrganicMatter SOM;
        [Link] Weather Met;
        [Link] Fertiliser Fert;
        [Link] Irrigation Irrig;
        [Link] Plant Oats;
        [Link] Zone zone;
                    
        [JsonIgnore] public bool InitialDay { get; set; }
        [JsonIgnore] public double LeafExpandedPosition { get; set; }
        [JsonIgnore] public double LeafAppearedPosition { get; set; }
        [JsonIgnore] public double ExpandedLeafNoYesterday { get; set; }
        [JsonIgnore] public double AppearedLeafNoYesterday { get; set; }
        [JsonIgnore] public double MostRecentlyExpandedLeafSize { get; set; }
        [JsonIgnore] public double MostRecentlyAppearedLeafMaxSize { get; set; }
        
        [EventSubscribe("StartOfSimulation")]
        private void OnSimulationCommencing(object sender, EventArgs e)
        {
            InitialDay = true;
            LeafExpandedPosition = 0;
            LeafAppearedPosition = 0;
            ExpandedLeafNoYesterday = 0;
            AppearedLeafNoYesterday = 0;
            MostRecentlyExpandedLeafSize = 0;
            MostRecentlyAppearedLeafMaxSize = 0;
        }
        
        [EventSubscribe("DoManagement")]
        private void OnDoManagement(object sender, EventArgs e)
        {
        }
        
        [EventSubscribe("DoManagementCalculations")]
        private void OnDoManagementCalculations(object sender, EventArgs e)
        {
           
            if (Convert.ToDouble(zone.Get("Oats.Leaf.ExpandedCohortNo")) > ExpandedLeafNoYesterday)
            {
                LeafExpandedPosition = Convert.ToDouble(zone.Get("Oats.Leaf.ExpandedCohortNo"));
                MostRecentlyExpandedLeafSize = (double)zone.Get("Oats.Leaf.CohortSize[" + (int)LeafExpandedPosition + "]");
            }
             
            if (Convert.ToDouble(zone.Get("Oats.Leaf.AppearedCohortNo")) > AppearedLeafNoYesterday)
            {
                LeafAppearedPosition = Convert.ToDouble(zone.Get("Oats.Leaf.AppearedCohortNo"));
                MostRecentlyAppearedLeafMaxSize = (double)zone.Get("Oats.Leaf.CohortParameters.MaxArea.Value()");
            }

        }
    }
}
```
              Folder Manager folder
                Manager FactorLabels: same as Validation.New Zealand.SLMACC.SLMACC_Canterbury_2020.SpringstonBalmoralSoil.Block.Manager folder.FactorLabels
                Manager ExtraVariables
                  StartDate = 01/01/1900 00:00:00
                  EndDate = 12/31/2100 00:00:00
                  DepthForReporting = 300
```csharp
using Newtonsoft.Json;
using Models.PMF.Phen;
using Models.Climate;
using System;
using System.Xml.Serialization;
using Models.Core;
using Models.Soils;
using Models.PMF;
using Models.Interfaces;
using APSIM.Shared.Utilities;
using Models.Soils.Nutrients;
using Models.PMF.Organs;
        
namespace Models
{
    [Serializable] 
    [System.Xml.Serialization.XmlInclude(typeof(Model))]
    public class Script : Model
    {
        [Link] private Clock clock;
        [Link] private Zone myZone;
        [Link] private Weather weather;
        [Link] private Fertiliser myFertiliser;
        [Link] private Irrigation myIrrigator;
        [Link(ByName = true)] private SoilNitrogen SoilNitrogen;
        [Link(ByName = true)] private ISolute NO3;
        [Link(ByName = true)] private ISolute NH4;
        [Link(ByName = true)] private ISolute Urea;
        [Link] private ISummary mySummary;
        private int reportingBottomLayer;
        private double reportingFractionLayer;
        private string simulationYearStartDate;
        [Link] private Models.Surface.SurfaceOrganicMatter SurfaceOM;
        [Link] private Soils.Soil Soil;
        [Link]
        private IPhysical soilPhysical;
        [Link]
        private ISoilWater waterBalance;
        //> Links to other Apsim models
        [Link(IsOptional = true)] private IPlant[] cropsInTheSimulation;

        //> User inputs from properties tab
        [Separator("Auxiliary manager for computing summary outputs")]
        [Description(" Date to start recording variables: ")]
        public DateTime StartDate { get; set; }
        [Description(" Date to end recording variables: ")]
        public DateTime EndDate { get; set; }
        [Description(" Depth of profile being recorded (mm):")]
        public double DepthForReporting { get; set; }

        //> Outputs from this manager
        [JsonIgnore] public double AccumRainfall { get; set; }
        [JsonIgnore] public double AccumIrrigation { get; set; }
        [JsonIgnore] public double AccumPET { get; set; }
        [JsonIgnore] public double AccumEvaporation { get; set; }
        [JsonIgnore] public double AccumTranspiration { get; set; }
        [JsonIgnore] public double AccumRunoff { get; set; }
        [JsonIgnore] public double AccumDrainage { get; set; }
        [JsonIgnore] public double AccumWaterFlowAtLayer { get; set; }
        [JsonIgnore] public double SumWaterAmountToLayer { get; set; }
        [JsonIgnore] public double DeltaSoilWaterTotal { get; set; }
        [JsonIgnore] public double DeltaSoilWaterToLayer { get; set; }
        [JsonIgnore] public double AverageMeanTemperature { get; set; }

        [JsonIgnore] public double AccumSurfaceOMMineralisation { get; set; }
        [JsonIgnore] public double AccumFertiliser { get; set; }
        [JsonIgnore] public double AccumUrine { get; set; }
        [JsonIgnore] public double AccumTotalSoilOMMineralised { get; set; }
        [JsonIgnore] public double AccumTotalDenitrifiedN { get; set; }
        [JsonIgnore] public double AccumTotalLeachedN { get; set; }
        [JsonIgnore] public double AccumUptakeN { get; set; }
        [JsonIgnore] public double AccumDetachedN { get; set; }

        [JsonIgnore] public double AccumSoilOMMineralisedToLayer { get; set; }
        [JsonIgnore] public double AccumDenitrifiedNToLayer { get; set; }
        [JsonIgnore] public double AccumFlowNAtLayer { get; set; }
        [JsonIgnore] public double SumUreaToLayer { get; set; }
        [JsonIgnore] public double SumNH4ToLayer { get; set; }
        [JsonIgnore] public double SumNO3ToLayer { get; set; }
        [JsonIgnore] public double SumMineralNToLayer { get; set; }
        [JsonIgnore] public double MineralNLayer1 { get; set; }
        [JsonIgnore] public double MineralNLayer2 { get; set; }
        [JsonIgnore] public double MineralNLayer3 { get; set; }
        [JsonIgnore] public double SumFOMNToLayer { get; set; }
        [JsonIgnore] public double SumMicrobialNToLayer { get; set; }
        [JsonIgnore] public double SumHumicNToLayer { get; set; }
        [JsonIgnore] public double SumOrganicNToLayer { get; set; }
        [JsonIgnore] public double SumOrganicCToLayer { get; set; }

        [JsonIgnore] public double DeltaSurfaceOMN { get; set; }
        [JsonIgnore] public double DeltaSoilFOMNTotal { get; set; }
        [JsonIgnore] public double DeltaSoilMBiomassNTotal { get; set; }
        [JsonIgnore] public double DeltaSoilHumicNTotal { get; set; }
        [JsonIgnore] public double DeltaSoilOrganicNTotal { get; set; }
        [JsonIgnore] public double DeltaSoilMineralNTotal { get; set; }
        [JsonIgnore] public double DeltaSoilOrganicCTotal { get; set; }

        [JsonIgnore] public double DeltaSoilFOMNToLayer { get; set; }
        [JsonIgnore] public double DeltaSoilMBiomassNToLayer { get; set; }
        [JsonIgnore] public double DeltaSoilHumicNToLayer { get; set; }
        [JsonIgnore] public double DeltaSoilOrganicNToLayer { get; set; }
        [JsonIgnore] public double DeltaSoilMineralNToLayer { get; set; }
        [JsonIgnore] public double DeltaSoilOrganicCToLayer { get; set; }

        [JsonIgnore] public double CropAboveGroundBiomassWt { get; set; }
        [JsonIgnore] public double CropAboveGroundBiomassN { get; set; }
        [JsonIgnore] public double CropAboveGroundBiomassNConc { get; set; }
        [JsonIgnore] public double CropTotalBiomassWt { get; set; }
        [JsonIgnore] public double CropTotalBiomassN { get; set; }
        [JsonIgnore] public double CropTotalBiomassNConc { get; set; }
        [JsonIgnore] public double CropWaterDeficitFactor { get; set; }
        [JsonIgnore] public double AccumLightInterception { get; set; }

        [JsonIgnore] public int TimeRecorded { get; set; }
        [JsonIgnore] public int ReportYear { get; set; }
        [JsonIgnore] public int NumberOfDaysWithWaterStress { get; set; }

        [JsonIgnore] public bool ResetTriggered { get; set; }

        //> Internal variables
        private string cropSown { get; set; }
        private string cropHarvested { get; set; }
        private string currentCrop = "none";
        private int numberDaysRecording {get; set;}

        private double initialWaterContentTotal { get; set; }
        private double initialSurfaceOMN { get; set; }
        private double initialSoilFOMNTotal { get; set; }
        private double initialSoilBiomNTotal { get; set; }
        private double initialSoilHumNTotal { get; set; }
        private double initialSoilUreaTotal { get; set; }
        private double initialSoilNH4Total { get; set; }
        private double initialSoilNO3Total { get; set; }
        private double initialSoilOrgCTotal { get; set; }

        private double initialWaterContentToLayer { get; set; }
        private double initialSoilFOMNToLayer { get; set; }
        private double initialSoilBiomNToLayer { get; set; }
        private double initialSoilHumNToLayer { get; set; }
        private double initialSoilUreaToLayer { get; set; }
        private double initialSoilNH4ToLayer { get; set; }
        private double initialSoilNO3ToLayer { get; set; }
        private double initialSoilOrgCToLayer { get; set; }

        private double meanTemperatureSum {get; set;}


        [EventSubscribe("Commencing")]
        private void OnSimulationCommencing(object sender, EventArgs e)
        {
            mySummary.WriteMessage(this," ExtraVariables manager initialisation", MessageType.Diagnostic);

            // initialise some variables
            ResetTriggered = false;

            // store the simulation start date, used to reset summaries
            simulationYearStartDate = clock.Today.ToString("dd-MMM");

            // get the index of layer down to which summaries will be calculated
            reportingBottomLayer = -1;
            reportingFractionLayer = 1.0;
            double depthFromSurface = 0.0;
            for (int z = 0; z < soilPhysical.Thickness.Length; z++)
            {
                if ((DepthForReporting - depthFromSurface) >= soilPhysical.Thickness[z])
                {
                    reportingBottomLayer = z;
                    depthFromSurface += soilPhysical.Thickness[z];
                }
                else
                {
                    reportingFractionLayer = (DepthForReporting - depthFromSurface) / soilPhysical.Thickness[z];
                    reportingFractionLayer = Math.Min(1.0, Math.Max(0.0, reportingFractionLayer));
                    z = soilPhysical.Thickness.Length;
                }
            }


            // check that there is a manager providing info about crops
            try
            {
                cropSown = (string)myZone.Get("[CropManagement].Script.CurrentCrop");
                if(cropSown.Length <= 1)
                { // need this to capture non-supply of crop info
                    mySummary.WriteMessage(this, "ERROR", MessageType.Warning);
                }
            }
            catch(Exception someException)
            {
                mySummary.WriteMessage(this, "\'CurrentCrop\' info is not being supplied by \'CropManagement\'", MessageType.Warning);
                cropSown = "NotAvailable";
            }

            // write summary
            if(cropSown == "NotAvailable")
            {
                mySummary.WriteMessage(this,"   Several soil variables will be summarised over the simulation run time (no resets as there is no crop info)", MessageType.Diagnostic);
            }
            else
            {
                mySummary.WriteMessage(this,"   Several plant-soil variables will be summarised for periods defined by land-use (reset each time it changes)", MessageType.Diagnostic);
            }
            mySummary.WriteMessage(this,"     Summaries are provided for the whole soil and for the top-soil down to the given depth of " + DepthForReporting.ToString("#0.0") + " mm", MessageType.Diagnostic);
        }

        [EventSubscribe("DoManagement")]
        private void OnDoManagement(object sender, EventArgs e)
        {
            // Check whether crop has changed
            cropSown = (string)myZone.Get("[CropManagement].Script.CurrentCrop");
            if (currentCrop != cropSown)
            {
                currentCrop = cropSown;
            }

            // check whether we need to reset variables (e.g. if crop has changed or if date is the same as start of simulation - triggered from outside)
            if (ResetTriggered)
            {
                ZeroVars();
                ResetTriggered = false;
            }

            cropHarvested = (string)myZone.Get("[CropManagement].Script.CropHarvested");
        }

        [EventSubscribe("DoManagementCalculations")]
        private void OnDoManagementCalculations(object sender, EventArgs e)
        {
            // summarise a series of variables
            if ((clock.Today.Date >= StartDate.Date) && (clock.Today.Date <= EndDate.Date))
            {
                SummariseVars();

                // record ReportYear
                if(clock.Today.Month <= 7)
                {
                    ReportYear = clock.Today.Year;
                }
                else
                {
                    ReportYear = clock.Today.Year + 1;
                }
            }
        }

        private void ZeroVars()
        {
            // zero accumulating variables
            numberDaysRecording = 0;
            meanTemperatureSum = 0.0;
            AccumRainfall = 0.0;
            AccumIrrigation = 0.0;
            AccumPET = 0.0;
            AccumTranspiration = 0.0;
            AccumEvaporation = 0.0;
            AccumRunoff = 0.0;
            AccumDrainage = 0.0;
            AccumWaterFlowAtLayer = 0.0;

            AccumSurfaceOMMineralisation = 0.0;
            AccumFertiliser = 0.0;
            AccumUrine = 0.0;
            AccumTotalSoilOMMineralised = 0.0;
            AccumTotalDenitrifiedN = 0.0;
            AccumTotalLeachedN = 0.0;
            AccumUptakeN = 0.0;
            AccumDetachedN = 0.0;

            AccumSoilOMMineralisedToLayer = 0.0;
            AccumDenitrifiedNToLayer = 0.0;
            AccumFlowNAtLayer = 0.0;
            SumUreaToLayer = 0.0;
            SumNH4ToLayer = 0.0;
            SumNO3ToLayer = 0.0;
            SumMineralNToLayer = 0.0;
            SumFOMNToLayer = 0.0;
            SumMicrobialNToLayer = 0.0;
            SumHumicNToLayer = 0.0;
            SumOrganicNToLayer = 0.0;
            SumOrganicCToLayer = 0.0;

            // get initial values
            initialSurfaceOMN = SurfaceOM.N;
            initialWaterContentTotal = MathUtilities.Sum(waterBalance.SWmm);
            initialSoilUreaTotal = MathUtilities.Sum(Urea.kgha);
            initialSoilNH4Total = MathUtilities.Sum(NH4.kgha);
            initialSoilNO3Total = MathUtilities.Sum(NO3.kgha);
            initialSoilFOMNTotal = MathUtilities.Sum(SoilNitrogen.FOMN);
            initialSoilBiomNTotal = MathUtilities.Sum(SoilNitrogen.MicrobialN);
            initialSoilHumNTotal = MathUtilities.Sum(SoilNitrogen.HumicN);
            initialSoilOrgCTotal = MathUtilities.Sum(SoilNitrogen.FOMC)
                                 + MathUtilities.Sum(SoilNitrogen.MicrobialC)
                                 + MathUtilities.Sum(SoilNitrogen.HumicC);

            initialWaterContentToLayer = sumOverLayers(waterBalance.SWmm, reportingBottomLayer, reportingFractionLayer);
            initialSoilUreaToLayer = sumOverLayers(Urea.kgha, reportingBottomLayer, reportingFractionLayer);
            initialSoilNH4ToLayer = sumOverLayers(NH4.kgha, reportingBottomLayer, reportingFractionLayer);
            initialSoilNO3ToLayer = sumOverLayers(NO3.kgha, reportingBottomLayer, reportingFractionLayer);
            initialSoilFOMNToLayer = sumOverLayers(SoilNitrogen.FOMN, reportingBottomLayer, reportingFractionLayer);
            initialSoilBiomNToLayer = sumOverLayers(SoilNitrogen.MicrobialN, reportingBottomLayer, reportingFractionLayer);
            initialSoilHumNToLayer = sumOverLayers(SoilNitrogen.HumicN, reportingBottomLayer, reportingFractionLayer);
            initialSoilOrgCToLayer = sumOverLayers(SoilNitrogen.FOMC, reportingBottomLayer, reportingFractionLayer)
                                   + sumOverLayers(SoilNitrogen.MicrobialC, reportingBottomLayer, reportingFractionLayer)
                                   + sumOverLayers(SoilNitrogen.HumicC, reportingBottomLayer, reportingFractionLayer);

            // crop outputs
            CropAboveGroundBiomassWt = 0.0;
            CropAboveGroundBiomassN = 0.0;
            CropAboveGroundBiomassNConc = 0.0;
            CropTotalBiomassWt = 0.0;
            CropTotalBiomassN = 0.0;
            CropTotalBiomassNConc = 0.0;
            CropWaterDeficitFactor = 0.0;
            NumberOfDaysWithWaterStress = 0;
            AccumLightInterception = 0.0;
        }

        private void SummariseVars()
        {
            numberDaysRecording += 1;
            TimeRecorded = numberDaysRecording;

            // get the water balance components
            AccumRainfall += weather.Rain;
            AccumIrrigation += myIrrigator.IrrigationApplied;
            AccumPET += waterBalance.Eo;
            foreach(Plant crop in cropsInTheSimulation)
            {
                Root root = this.FindAllInScope("["+crop.Name+"].Root") as Root;
                if (root != null)
                    AccumTranspiration += root.WaterUptake;
            }
            AccumEvaporation += waterBalance.Es;
            AccumRunoff += waterBalance.Runoff;
            AccumDrainage += waterBalance.Drainage;
            AccumWaterFlowAtLayer += evaluateAtLayer(waterBalance.Flux, reportingBottomLayer, reportingFractionLayer)
                                  - evaluateAtLayer(waterBalance.Flow, reportingBottomLayer, reportingFractionLayer);
            SumWaterAmountToLayer = sumOverLayers(waterBalance.SWmm, reportingBottomLayer, reportingFractionLayer);
            DeltaSoilWaterTotal = MathUtilities.Sum(waterBalance.SWmm) - initialWaterContentTotal;
            DeltaSoilWaterToLayer = MathUtilities.Sum(waterBalance.SWmm,0,1) - initialWaterContentToLayer;
            meanTemperatureSum += weather.MeanT;
            AverageMeanTemperature = meanTemperatureSum/TimeRecorded;

            // get the nitrogen balance components
            AccumSurfaceOMMineralisation += MathUtilities.Sum(SoilNitrogen.dlt_n_min_res);
            AccumFertiliser += myFertiliser.NitrogenApplied;
            //AccumUrine += (double)myZone.Get("[ReturnN].Script.AmountReturnedN");
            AccumTotalSoilOMMineralised += MathUtilities.Sum(SoilNitrogen.MineralisedN);
            AccumTotalDenitrifiedN += MathUtilities.Sum(SoilNitrogen.Denitrification);
            AccumTotalLeachedN += waterBalance.LeachNH4 + waterBalance.LeachNO3;
            foreach(Plant crop in cropsInTheSimulation)
            {
                Root root = this.FindAllInScope("["+crop.Name+"].Root") as Root;
                if (root != null)
                    AccumUptakeN -= root.NUptake;
                foreach(PMF.Interfaces.IOrgan organ in (crop as Plant).Organs)
                {
                    string cropOrgan = (crop as Plant).Name + "." + organ.Name;
                    AccumDetachedN += (double)myZone.Get(cropOrgan + ".Detached.N");
                }
            }
            AccumSoilOMMineralisedToLayer += sumOverLayers(SoilNitrogen.MineralisedN, reportingBottomLayer, reportingFractionLayer);
            AccumDenitrifiedNToLayer += sumOverLayers(SoilNitrogen.Denitrification, reportingBottomLayer, reportingFractionLayer);
            AccumFlowNAtLayer += evaluateAtLayer(waterBalance.FlowNH4, reportingBottomLayer, reportingFractionLayer)
                              + evaluateAtLayer(waterBalance.FlowNO3, reportingBottomLayer, reportingFractionLayer);

            SumUreaToLayer = sumOverLayers(Urea.kgha, reportingBottomLayer, reportingFractionLayer);
            SumNH4ToLayer = sumOverLayers(NH4.kgha, reportingBottomLayer, reportingFractionLayer);
            SumNO3ToLayer = sumOverLayers(NO3.kgha, reportingBottomLayer, reportingFractionLayer);
            SumMineralNToLayer = SumUreaToLayer + SumNH4ToLayer + SumNO3ToLayer;

            MineralNLayer1 = Urea.kgha[0]+ NH4.kgha[0];
            MineralNLayer2 = Urea.kgha[1]+ NH4.kgha[1];
            MineralNLayer3 = Urea.kgha[2]+ NH4.kgha[2];

            SumFOMNToLayer = sumOverLayers(SoilNitrogen.FOMN, reportingBottomLayer, reportingFractionLayer);
            SumMicrobialNToLayer = sumOverLayers(SoilNitrogen.MicrobialN, reportingBottomLayer, reportingFractionLayer);
            SumHumicNToLayer = sumOverLayers(SoilNitrogen.HumicN, reportingBottomLayer, reportingFractionLayer);
            SumOrganicNToLayer = SumFOMNToLayer + SumMicrobialNToLayer + SumHumicNToLayer;
            SumOrganicCToLayer = sumOverLayers(SoilNitrogen.FOMC, reportingBottomLayer, reportingFractionLayer)
                               + sumOverLayers(SoilNitrogen.MicrobialC, reportingBottomLayer, reportingFractionLayer)
                               + sumOverLayers(SoilNitrogen.HumicC, reportingBottomLayer, reportingFractionLayer);

            DeltaSurfaceOMN = SurfaceOM.N - initialSurfaceOMN;
            DeltaSoilFOMNTotal = MathUtilities.Sum(SoilNitrogen.FOMN) - initialSoilFOMNTotal;
            DeltaSoilMBiomassNTotal = MathUtilities.Sum(SoilNitrogen.MicrobialN) - initialSoilBiomNTotal;
            DeltaSoilHumicNTotal = MathUtilities.Sum(SoilNitrogen.HumicN) - initialSoilHumNTotal;
            DeltaSoilOrganicNTotal = (MathUtilities.Sum(SoilNitrogen.FOMN)
                                   + MathUtilities.Sum(SoilNitrogen.MicrobialN)
                                   + MathUtilities.Sum(SoilNitrogen.HumicN))
                                   - (initialSoilFOMNTotal + initialSoilBiomNTotal + initialSoilHumNTotal);
            DeltaSoilMineralNTotal = (MathUtilities.Sum(Urea.kgha)+MathUtilities.Sum(NH4.kgha)+MathUtilities.Sum(NO3.kgha))
                                   - (initialSoilUreaTotal + initialSoilNH4Total + initialSoilNO3Total);

            DeltaSoilOrganicCTotal = (MathUtilities.Sum(SoilNitrogen.FOMC)
                                   + MathUtilities.Sum(SoilNitrogen.MicrobialC)
                                   + MathUtilities.Sum(SoilNitrogen.HumicC))
                                   - initialSoilOrgCTotal;

            DeltaSoilFOMNToLayer = sumOverLayers(SoilNitrogen.FOMN, reportingBottomLayer, reportingFractionLayer) - initialSoilFOMNToLayer;
            DeltaSoilMBiomassNToLayer = sumOverLayers(SoilNitrogen.MicrobialN, reportingBottomLayer, reportingFractionLayer) - initialSoilBiomNToLayer;
            DeltaSoilHumicNToLayer = sumOverLayers(SoilNitrogen.HumicN, reportingBottomLayer, reportingFractionLayer) - initialSoilHumNToLayer;
            DeltaSoilOrganicNToLayer = (sumOverLayers(SoilNitrogen.FOMN, reportingBottomLayer, reportingFractionLayer)
                                     + sumOverLayers(SoilNitrogen.MicrobialN, reportingBottomLayer, reportingFractionLayer)
                                     + sumOverLayers(SoilNitrogen.HumicN, reportingBottomLayer, reportingFractionLayer))
                                     - (initialSoilFOMNToLayer + initialSoilBiomNToLayer + initialSoilHumNToLayer);
            DeltaSoilMineralNToLayer = (MathUtilities.Sum(Urea.kgha)+MathUtilities.Sum(NH4.kgha)+MathUtilities.Sum(NO3.kgha))
                                     - (initialSoilUreaToLayer + initialSoilNH4ToLayer + initialSoilNO3ToLayer);

            DeltaSoilOrganicCToLayer = (sumOverLayers(SoilNitrogen.FOMC, reportingBottomLayer, reportingFractionLayer)
                                     + sumOverLayers(SoilNitrogen.MicrobialC, reportingBottomLayer, reportingFractionLayer)
                                     + sumOverLayers(SoilNitrogen.HumicC, reportingBottomLayer, reportingFractionLayer))
                                     - initialSoilOrgCToLayer;

            // get the plant outputs
            if((currentCrop != "Fallow") && (cropHarvested == ""))
            { // skip recording on harvest day to avoid zeroing the outputs
                CropAboveGroundBiomassWt = 0.0;
                CropAboveGroundBiomassN = 0.0;
                CropAboveGroundBiomassNConc = 0.0;
                CropTotalBiomassWt = 0.0;
                CropTotalBiomassN = 0.0;
                CropTotalBiomassNConc = 0.0;
                double totalWaterDemand = 0.0;
                double totalWaterAllocation = 0.0;
                foreach(IPlant crop in cropsInTheSimulation)
                {
                    string cropName = (crop as Plant).Name;
                    if((double)myZone.Get(cropName + ".Phenology.Stage") > 1.0)
                    {
                        CropAboveGroundBiomassWt += (double)myZone.Get(cropName + ".AboveGround.Wt") * 10.0;
                        CropAboveGroundBiomassN += (double)myZone.Get(cropName + ".AboveGround.N") * 10.0;
                        CropAboveGroundBiomassNConc += (double)myZone.Get(cropName + ".AboveGround.NConc") * 100.0;
                        CropTotalBiomassWt += (double)myZone.Get(cropName + ".Total.Wt") * 10.0;
                        CropTotalBiomassN += (double)myZone.Get(cropName + ".Total.N") * 10.0;
                        CropTotalBiomassNConc += (double)myZone.Get(cropName + ".Total.NConc") * 100.0;
                        totalWaterDemand += (double)myZone.Get(cropName + ".Leaf.WaterDemand");
                        totalWaterAllocation += (double)myZone.Get(cropName + ".Leaf.WaterAllocation");
                        AccumLightInterception += (double)myZone.Get(cropName + ".Leaf.RadiationIntercepted");
                    }
                }

                CropWaterDeficitFactor = MathUtilities.Divide(totalWaterAllocation, totalWaterDemand, 1.0);
                if(CropWaterDeficitFactor < 0.999999999)
                {
                    NumberOfDaysWithWaterStress += 1;
                }
            }
        }

        private double sumOverLayers(double[] modelVariable,  int endLayer, double fracLayer)
        {
            double result = 0.0;
            if(endLayer >= 0)
            {
                result += MathUtilities.Sum(modelVariable, 0, endLayer);
            }

            if(endLayer < modelVariable.Length - 1)
            {
                result += modelVariable[endLayer + 1]*fracLayer;
            }

            return result;
        }

        private double evaluateAtLayer(double[] modelVariable,  int endLayer, double fracLayer)
        {
            double result = 0.0;
            if(fracLayer < 0.5)
            {
                result = modelVariable[Math.Max(0, endLayer)];
            }
            else
            {
                result = modelVariable[endLayer + 1];
            }

            return result;
        }
    }
}
```
                Memo MemoManagementAndReport
                  # Crop management flow, reporting, and resetting

                  This memo describes primarily the general management of crops (sowing and harvesting). It also shows the links with reporting in soil reset, as these are (or can be) dependent on crop management.

                  ## Crop management
                  The CropManagement script has been developed to manage two crops, one called 'Main' crop, typically grown over summer (Maize and Potatoes were tested, but should handle most crops and timings), and another referred to as 'Cover' crop, generally a cereal grown over winter (e.g. Oats, but again it could be any other crop). The general premises for this management are described below.
                   - Dynamic sowing date:
                      .Main crop is sown using either of two criteria, a given date or a temperature threshold. For the later a given time window is set and if the temperature (average air temperature over the past 2 weeks) reaches the threshold then sowing is triggered. Compulsory sowing at the end of the window can also be set. The choice of criteria, the parameters for them and for sowing itself can be set up in the interface;
                      .Cover crop is also sown based on either two criteria, a set date or a given number of days after the harvest of the main crop. Date and sowing parameters are set up in the interface;
                   - Dynamic harvest date:
                      .Main crop can be harvested based on date or crop development stage. When using development stage, this can at maturity (for grains or tuber) or at an early stage (for silage or green chop), additionally a date can be given to trigger the harvest regardless whether the stage has been reached;
                      .Cover crop is harvest on a fixed date only;
                  	.Few parameters for harvest (main organ and proportion of DM removed) are hard-coded in the script and may change with harvest type (for MainCrop);
                   - Residue management:
                      .For main crop, a given fraction of residues is removed off field following its harvest. This avoids excessive build up of residues in the surface (assumes no tillage, i.e. no incorporation);
                      .For cover crop, most of biomass is removed upon harvest (as it is assumed to be green chop/silage), but a given fraction is returned as residue (simulating harvest inefficiency);
                  Note that sowing and harvest conditions are evaluated in the middle of the day (OnDoManagementCalculations), if conditions are met a flag (boolean) is raised and the action actually happens on the next day (OnDoManagement);

                  ## Soil reset
                  Soil and surface OM can be reset to their initial status using the ReportAndReset script, this can be trigger in one of three different ways:
                   - At a given date;
                   - Every time a simulation year is completed;
                   - At the time of sowing of the main crop;
                  Note that the reset happens at the start of the day at which the criterion is met.

                  ## Reporting
                  The recording of outputs can be triggered a few times over the year by the ReportAndReset script.  This also triggers the ExtraVariables script to reset its variables (cumulatives).
                  The trigger can be one or both of two options:
                   - When land-use changes (at sowing or harvest of any and all crops;
                   - Every time a simulation year is completed;
                  Note that reporting is triggered at the end of the day in which the criterion is met.

                  .............................................................................................................................................................................

                  ## Harvesting procedure
                  The main crop can be harvested, besides on a given date, according to its development stage.  This can be done based on three purposes:
                   - For green chop, with crops being harvested for feed at an early development stage (at time of flowering starts);
                   - For silage, where crops are also harvested for feed, but at a later stage, currently defined when it surpasses 50% of the grain filling phase;
                   - For grain/tuber, with crops harvested at full maturity (when 'IsReadyForHarvesting', except potatoes which are ready at the start of the maturity phase);
                  The CropManagement script takes one organ as being the main produce (grain or tuber), while all aboveground organs are defined as stover. Harvest fractions are defined for these two categories and for each harvesting purpose.  Note that all the biomass harvested is removed from the field.

                  .............................................................................................................................................................................

                  ## Time sequence procedure:
                  For triggering sowing/harvest and related report and soil reset
                  Note that indices are for days (d0: day zero, etc.)

                   SOWING						 HARVEST				 RESET-REPORT
                  OnStartOfDay(d0)				OnStartOfDay(d0)			OnStartOfDay(d0)
                    . GetMeanTemperature				  . .					  . CheckDate
                    . .						  . .					  . may ResetSoil
                  OnDoManagement(d0)				OnDoManagement(d0)			OnDoManagement(d0)
                    . . 						  . .					  . .
                  OnDoManagementCalculations(d0)			OnDoManagementCalculations(d0)		OnDoManagementCalculations(d0)
                    . CheckSowingCondition			  . CheckHarvestingCondition		  . .
                  OnEndOfDay(d0)					OnEndOfDay(d0)				OnEndOfDay(d0)
                    . .						  . .					  . CheckSowingFlag
                    . .						  . .					  . may DoOutput
                  OnStartOfDay(d1)				OnStartOfDay(d1)			OnStartOfDay(d1)
                    . .						  . .					  . may ResetSoil
                  OnDoManagement(d1)				OnDoManagement(d1)			OnDoManagement(d1)
                    . DoSowing					  . DoHarvesting			  . .
                    . SetCropSpecies				  . SetFallow				  . .
                  OnDoManagementCalculations(d1)			OnDoManagementCalculations(d1)		OnDoManagementCalculations(d1)
                    . RecordBiomass(if Plant.IsAlive)[CM]		  . .					  . .
                  OnEndOfDay(d1)  				OnEndOfDay(d1)				OnEndOfDay(d1)
                    . .						  . .					  . CheckHarvestFlag
                    . .						  . .					  . may DoOutput
                  OnStartOfDay(d2)				OnStartOfDay(d2)			OnStartOfDay(d2)
                    . ZeroSowVariables				  . ZeroHarvestVariables		  . .
                   ...						 ...					 ...

                  Note that plant processes happen between OnDoManagement and OnDoManagementCalculations
                  .............................................................................................................................................................................
                Operations
                Manager CropManagement
                  CoverCropIsEnabled = True
                  CoverCropSowingPopulation = 400
                  CoverCropSowingSpacing = 150
                  CoverCrop = [Oats]
                  CoverCropCultivar = Milton
                  CoverCropSowingDepth = 30
                  LinkSowingToMainCrop = False
                  PeriodAfterHarvestCrop = 5
                  CoverCropSowingDate = 28-Aug
                  CoverCropHarvestingDate = 5-Dec
                  CoverCropFractionToRemove = 0
                  script: same as in Validation.New Zealand.SLMACC.SLMACC_Canterbury_2020.SpringstonBalmoralSoil.Block.Manager folder.CropManagement
              MicroClimate: a_interception=0; b_interception=1; c_interception=0; d_interception=0; SoilHeatFluxFraction=0.4; MinimumHeightDiffForNewLayer=0; NightInterceptionFraction=0.5; ReferenceHeight=2
              Irrigation
              Fertiliser
              SurfaceOrganicMatter: InitialResidueName=oat_stubble; InitialResidueType=oats; InitialResidueMass=1500; InitialStandingFraction=0.5; InitialCPR=0; InitialCNR=20
              Soil Makarewa_3b1: SoilType=Generic soil; Country=New Zealand; Latitude=37.5; Longitude=172.5
                Chemical: Thickness=[150, 150, 300, 300, 300, 300, 300, 200]; PH=[6, 6, 6, 6, 6, 6, 6, 6]; PHUnits=Water
                SoilNitrogen: fom_types=[default, manure, mucuna, lablab, shemp, stable]; fract_carb=[0.2, 0.3, 0.54, 0.57, 0.45, 0]; fract_cell=[0.7, 0.3, 0.37, 0.37, 0.47, 0.1]; fract_lign=[0.1, 0.4, 0.09, 0.06, 0.08, 0.9]; NPartitionApproach=0
                CERESSoilTemperature Temperature
                SoilNitrogenNO3 NO3: Thickness=[150, 150, 300, 300, 300, 300, 300, 200]; InitialValues=[24.24, 19.41, 4.51, 1.282, 0.952, 0.702, 0.46, 0.345]; InitialValuesUnits=ppm; WaterTableConcentration=0; D0=0; DepthConstant=0; MaxDepthSoluteAccessible=0; RunoffEffectivenessAtMovingSolute=0; MaxEffectiveRunoff=0
                SoilNitrogenNH4 NH4: Thickness=[150, 150, 300, 300, 300, 300, 300, 200]; InitialValues=[29.16, 1.66, 0.5, 0.128, 0.119, 0.117, 0.115, 0.172]; InitialValuesUnits=ppm; WaterTableConcentration=0; D0=0; DepthConstant=0; MaxDepthSoluteAccessible=0; RunoffEffectivenessAtMovingSolute=0; MaxEffectiveRunoff=0
                SoilNitrogenUrea Urea: same as Validation.New Zealand.SLMACC.SLMACC_Canterbury_2020.SpringstonBalmoralSoil.Block.Balmoral.Urea
                OutputLayers OutputNutrientLayers: Thickness=[150, 150, 300, 300, 300, 300, 300]
                Physical
                  Thickness  ParticleSizeClay  ParticleSizeSand  ParticleSizeSilt  BD     AirDry  LL15   DUL    SAT    KS
                  200        45                12.5              42.5              0.918  0.138   0.276  0.541  0.592  960
                  175        45                12.5              42.5              0.918  0.197   0.276  0.541  0.592  960
                  325        45                12.5              42.5              1.073  0.285   0.329  0.539  0.567  72
                  325        45                12.5              42.5              1.073  0.329   0.329  0.539  0.567  72
                  325        45                12.5              42.5              1.073  0.329   0.329  0.539  0.567  72
                  325        45                12.5              42.5              1.073  0.329   0.329  0.539  0.567  72
                  325        45                12.5              42.5              1.073  0.308   0.329  0.539  0.567  72
                  SoilCrop OatsSoil: LL=[0.276, 0.276, 0.329, 0.329, 0.329, 0.329, 0.329]; KL=[0.09, 0.09, 0.013, 0.003, 0, 0, 0]; XF=[1, 1, 0.435, 0.435, 0.435, 0.435, 0.435]
                Organic: FOMCNRatio=40; CarbonUnits=Total
                  Thickness  Carbon  SoilCNRatio  FBiom  FInert  FOM
                  50         2.6     11           0.044  0.211   124.07
                  50         2.6     11           0.036  0.321   115.105
                  50         2.6     11           0.029  0.416   106.788
                  50         2.165   11           0.024  0.497   99.072
                  50         1.517   11           0.02   0.567   91.914
                  50         1.083   11           0.018  0.628   85.272
                  50         0.792   11           0.016  0.679   79.111
                  50         0.597   11           0.014  0.724   73.394
                  50         0.466   11           0.013  0.762   68.091
                  50         0.378   11           0.012  0.796   63.171
                  250        0.254   11           0.011  0.87    43.417
                  250        0.207   11           0.01   0.938   29.84
                  500        0.2     11           0.01   0.98    14.095
                  500        0.2     11           0.01   0.996   6.658
                Water: Thickness=[200, 175, 325, 325, 325, 325, 325]; InitialValues=[0.541, 0.541, 0.539, 0.539, 0.539, 0.539, 0.539]; RelativeTo=LL15; FilledFromTop=true
                WaterBalance SoilWater: SummerDate=1-oct; SummerU=9; SummerCona=4.4; WinterDate=1-apr; WinterU=9; WinterCona=4.4; DiffusConst=88; DiffusSlope=35; Salb=0.13; CN2Bare=73; CNRed=20; CNCov=0.8; DischargeWidth=0; CatchmentArea=0; PSIDul=-100
                  Thickness  SWCON  KLAT
                  200        0.35   0
                  175        0.35   0
                  1625       0.15   0
                Memo SoilDoc
                  *	Caroline soil is said to be similar to a number of soils including Makarewa so the Makarewa_3b1 used in Interoperable modelling project was imported as the first step
              Plant Oats: same as Validation.New Zealand.SLMACC.SLMACC_Canterbury_2021.BarhillTempletonSoil.Block.Oats
              Report Output
                VariableNames:
                  [Clock].Today as ReportDate
                  [Clock].Today.Year as Year
                  [FactorLabels].Script.AGENT_NO as AGENT_NO
                  [FactorLabels].Script.Lat as Lat
                  [FactorLabels].Script.Lon as Lon
                  [FactorLabels].Script.GCM as GCM
                  [FactorLabels].Script.RCP as RCP
                  [FactorLabels].Script.TS as TimeSlice
                  [FactorLabels].Script.SoilStamp as SoilStamp
                  [CropManagement].Script.CurrentCrop as CropSpecies
                  sum([Soil].Water.MM) as SoilWater_Total
                  sum([Soil].Urea.kgha) as SoilUrea_Total
                  sum([Soil].NH4.kgha) as SoilNH4_Total
                  sum([Soil].NO3.kgha) as SoilNO3_Total
                  (sum([Soil].Urea.kgha) + sum([Soil].NH4.kgha) + sum([Soil].NO3.kgha)) as SoilMineralN_Total
                  sum([Soil].SoilNitrogen.FOMN) as SoilFOMN_Total
                  sum([Soil].SoilNitrogen.MicrobialN) as SoilMicrobialN_Total
                  sum([Soil].SoilNitrogen.HumicN) as SoilHumicN_Total
                  (sum([Soil].SoilNitrogen.FOMN) + sum([Soil].SoilNitrogen.MicrobialN) + sum([Soil].SoilNitrogen.HumicN)) as SoilOrganicN_Total
                  (sum([Soil].SoilNitrogen.FOMC) + sum([Soil].SoilNitrogen.MicrobialC) + sum([Soil].SoilNitrogen.HumicC)) as SoilOrganicC_Total
                  [SurfaceOrganicMatter].N as SurfOMN_Total
                  [Soil].SoilNitrogen.oc[1] as OC_TopLayer
                  [CropManagement].Script.HarvestedWt as HarvestedCropBiomass
                  [CropManagement].Script.HarvestedN as HarvestedCropN
                  [CropManagement].Script.HarvestedNconc as HarvestedCropNconc
                  [CropManagement].Script.CropYield as CropYield
                  [CropManagement].Script.SowDOY as SowingDOY
                  [CropManagement].Script.HarvestDOY as HarvestingDOY
                  [CropManagement].Script.CoverCropCultivar as CoverCropCultivar
                  [ExtraVariables].Script.CropAboveGroundBiomassN as UptakeN_Cum
                  [ExtraVariables].Script.AccumSoilOMMineralisedToLayer as SoilOMMineralisedNToGivenLayer_Cum
                  ([ExtraVariables].Script.AccumSoilOMMineralisedToLayer+[ExtraVariables].Script.AccumSurfaceOMMineralisation) as MineralisedNToGivenLayer_Cum
                  [ExtraVariables].Script.AccumDenitrifiedNToLayer as DenitrifiedNToGivenLayer_Cum
                  [ExtraVariables].Script.AccumFlowNAtLayer as LeachedNAtGivenLayer_Cum
                  [ExtraVariables].Script.SumUreaToLayer as UreaToGivenLayer_Sum
                  [ExtraVariables].Script.SumNH4ToLayer as NH4ToGivenLayer_Sum
                  [ExtraVariables].Script.SumNO3ToLayer as NO3ToGivenLayer_Sum
                  [ExtraVariables].Script.SumMineralNToLayer as MineralNToGivenLayer_Sum
                  [ExtraVariables].Script.SumFOMNToLayer as FOMNToGivenLayer_Sum
                  [ExtraVariables].Script.SumMicrobialNToLayer as MicrobialNToGivenLayer_Sum
                  [ExtraVariables].Script.SumHumicNToLayer as HumicNToGivenLayer_Sum
                  [ExtraVariables].Script.SumOrganicNToLayer as OrganicNToGivenLayer_Sum
                  [ExtraVariables].Script.SumOrganicCToLayer as OrganicCToGivenLayer_Sum
                  [Soil].SoilNitrogen.oc[1] as OC_TopLayer
                  [ExtraVariables].Script.DeltaSoilMineralNToLayer as SoilMineralN_DeltaToGivenLayer
                  [ExtraVariables].Script.DeltaSoilOrganicNToLayer as SoilOrganicN_DeltaToGivenLayer
                  [ExtraVariables].Script.CropAboveGroundBiomassWt as CropBiomass_Cum
                  [ExtraVariables].Script.CropAboveGroundBiomassN as CropN_Cum
                  [ExtraVariables].Script.CropAboveGroundBiomassNConc as CropNconc
              Report DailyReport: EventNames=[Clock].EndOfDay
                VariableNames:
                  [Clock].Today
                  [Weather].MaxT
                  [Weather].MinT
                  [Weather].Radn
                  [Weather].Rain
                  [Oats].AboveGroundLive.Wt
                  [Oats].Leaf.LAI
                  [Oats].Leaf.CohortParameters.MaxArea
                  [Oats].Leaf.CohortParameters.SpecificLeafAreaMax
                  [LeafSizeScript].Script.LeafExpandedPosition
                  [LeafSizeScript].Script.MostRecentlyExpandedLeafSize
                  [LeafSizeScript].Script.LeafAppearedPosition
                  [LeafSizeScript].Script.MostRecentlyAppearedLeafMaxSize
                  //[Phenology].FlagLeafDAS
                  [Phenology].FloweringDAS
                  [Oats].Panicle.HeadNumber
                  [Fertiliser].NitrogenApplied
                  [ExtraVariables].Script.DeltaSurfaceOMN as SurfaceOMN_DeltaTotal
                  [ExtraVariables].Script.DeltaSoilMineralNTotal as SoilMineralN_DeltaTotal
                  [ExtraVariables].Script.DeltaSoilOrganicNTotal as SoilOrganicN_DeltaTotal
                  [ExtraVariables].Script.DeltaSoilOrganicCTotal as SoilOrganicC_DeltaTotal
                  [ExtraVariables].Script.AccumSoilOMMineralisedToLayer as SoilOMMineralisedNToGivenLayer_Cum
                  ([ExtraVariables].Script.AccumSoilOMMineralisedToLayer+[ExtraVariables].Script.AccumSurfaceOMMineralisation) as MineralisedNToGivenLayer_Cum
                  [ExtraVariables].Script.AccumDenitrifiedNToLayer as DenitrifiedNToGivenLayer_Cum
                  [ExtraVariables].Script.AccumFlowNAtLayer as LeachedNAtGivenLayer_Cum
                  [ExtraVariables].Script.SumUreaToLayer as UreaToGivenLayer_Sum
                  [ExtraVariables].Script.SumNH4ToLayer as NH4ToGivenLayer_Sum
                  [ExtraVariables].Script.SumNO3ToLayer as NO3ToGivenLayer_Sum
                  [ExtraVariables].Script.SumMineralNToLayer as MineralNToGivenLayer_Sum
                  [ExtraVariables].Script.SumFOMNToLayer as FOMNToGivenLayer_Sum
                  [ExtraVariables].Script.SumMicrobialNToLayer as MicrobialNToGivenLayer_Sum
                  [ExtraVariables].Script.SumHumicNToLayer as HumicNToGivenLayer_Sum
                  [ExtraVariables].Script.SumOrganicNToLayer as OrganicNToGivenLayer_Sum
                  [ExtraVariables].Script.SumOrganicCToLayer as OrganicCToGivenLayer_Sum
                  [Soil].SoilNitrogen.oc[1] as OC_TopLayer
                  [ExtraVariables].Script.DeltaSoilMineralNToLayer as SoilMineralN_DeltaToGivenLayer
                  [ExtraVariables].Script.DeltaSoilOrganicNToLayer as SoilOrganicN_DeltaToGivenLayer
                  [ExtraVariables].Script.CropAboveGroundBiomassWt as CropBiomass_Cum
                  [ExtraVariables].Script.CropAboveGroundBiomassN as CropN_Cum
                  [ExtraVariables].Script.CropAboveGroundBiomassNConc as CropNconc
                  [CropManagement].Script.HarvestedWt as HarvestedCropBiomass
                  [CropManagement].Script.HarvestedN as HarvestedCropN
                  [CropManagement].Script.HarvestedNconc as HarvestedCropNconc
                  [CropManagement].Script.CropYield as CropYield
                  [ExtraVariables].Script.depthForReporting as ReportDepth
                  [CropManagement].Script.SowDOY as SowingDOY
                  [CropManagement].Script.HarvestDOY as HarvestingDOY
                  [ExtraVariables].Script.AccumLightInterception as AccumLightInterc
                  [CropManagement].Script.CoverCropCultivar as CoverCropCultivar
                  [Oats].Panicle.HeadNumber
                  [Oats].Leaf.Live.Wt as LeafBiomass
                  [Oats].Stem.Live.Wt as StemBiomass
                  [Oats].AboveGround.Wt as AboveBiomass
                  [Oats].Leaf.AppearedCohortNo as LeafCountMainStem
                  [ExtraVariables].Script.AccumLightInterception
                  [ExtraVariables].Script.AccumTotalLeachedN as TotalLeachedN_Cum
                  [ExtraVariables].Script.AccumUptakeN as UptakeN_Cum
                  [ExtraVariables].Script.AccumRainfall as Rainfall_Cum
                  [ExtraVariables].Script.AccumIrrigation as AppliedIrrigation_Cum
                  [ExtraVariables].Script.AccumFertiliser as AppliedFertiliserN_Cum
                  [Oats].Phenology.Stage
                  [Phenology].CurrentStageName
              Report DailyReportWater_n_MineralN: same as Validation.New Zealand.SLMACC.SLMACC_Canterbury_2021.BarhillTempletonSoil.Block.DailyReportWater_n_MineralN
        Experiment SLMACC_Southland_2021
          DisabledSimNames=[SouthlandRate0Width75, SouthlandRate450Width75, SouthlandRate300Width75, SouthlandRate150Width75]
          Memo Experiment Description
            * 	Trial location: Wrey's Bush, Southland
            *	Coordinates: 46.021°S, 168.090°E
            *	Soil: Aparima
            *	Weather station: Birchwood Wxt Aws
            *	The experiment evaluated oat populations (i.e. target of 0 [fallow],150, 300, 450 plants/m2)- row spacing was 150 cm
            *	Note: target populations were not achieved and so, actual plant counts are used in the model (see factors).
            * 	The paddock was previously in a swedes
            *	This is a grazed field.
          Memo ReadMe
            1.	Negative values in interception data zeroed - ENK
          Factors
            Permutation
              Factor Rate
                CompositeFactor 0
                  Specifications:
                    [CropManagement].Script.CoverCropIsEnabled = false
                    [CropManagement].Script.CoverCropSowingPopulation = 0
                CompositeFactor 150: Specifications=[CropManagement].Script.CoverCropSowingPopulation = 67
                CompositeFactor 300: Specifications=[CropManagement].Script.CoverCropSowingPopulation = 82
                CompositeFactor 450: Specifications=[CropManagement].Script.CoverCropSowingPopulation = 125
          Simulation WreysBushAparimaSoil
            Clock: Start=2021-07-18; End=2021-12-01
            Weather: FileName=WeatherFiles\gore.met
            Summary summaryfile
            SoilArbitrator Soil Arbitrator
            Zone Block: Area=1; Slope=0; AspectAngle=0; Altitude=50
              Manager LeafSizeScript: same as Validation.New Zealand.SLMACC.SLMACC_Southland_2020.WintonMakarewaSoil.Block.LeafSizeScript
              Folder Manager folder
                Manager FactorLabels: same as Validation.New Zealand.SLMACC.SLMACC_Canterbury_2020.SpringstonBalmoralSoil.Block.Manager folder.FactorLabels
                Manager ExtraVariables: same as Validation.New Zealand.SLMACC.SLMACC_Southland_2020.WintonMakarewaSoil.Block.Manager folder.ExtraVariables
                Memo MemoManagementAndReport: same as Validation.New Zealand.SLMACC.SLMACC_Southland_2020.WintonMakarewaSoil.Block.Manager folder.MemoManagementAndReport
                Operations
                Manager CropManagement
                  CoverCropIsEnabled = True
                  CoverCropSowingPopulation = 400
                  CoverCropSowingSpacing = 150
                  CoverCrop = [Oats]
                  CoverCropCultivar = Milton
                  CoverCropSowingDepth = 30
                  LinkSowingToMainCrop = False
                  PeriodAfterHarvestCrop = 5
                  CoverCropSowingDate = 29-Jul
                  CoverCropHarvestingDate = 31-Nov
                  CoverCropFractionToRemove = 0
                  script: same as in Validation.New Zealand.SLMACC.SLMACC_Canterbury_2020.SpringstonBalmoralSoil.Block.Manager folder.CropManagement
              MicroClimate: a_interception=0; b_interception=1; c_interception=0; d_interception=0; SoilHeatFluxFraction=0.4; MinimumHeightDiffForNewLayer=0; NightInterceptionFraction=0.5; ReferenceHeight=2
              Irrigation
              Fertiliser
              SurfaceOrganicMatter: InitialResidueName=oat_stubble; InitialResidueType=oats; InitialResidueMass=1500; InitialStandingFraction=0.5; InitialCPR=0; InitialCNR=20
              Soil Aparima_6a1: SoilType=Generic soil; Country=New Zealand; Latitude=37.5; Longitude=172.5
                Chemical: Thickness=[150, 150, 300, 300, 300, 300, 300, 200]; PH=[6, 6, 6, 6, 6, 6, 6, 6]; PHUnits=Water
                SoilNitrogen: fom_types=[default, manure, mucuna, lablab, shemp, stable]; fract_carb=[0.2, 0.3, 0.54, 0.57, 0.45, 0]; fract_cell=[0.7, 0.3, 0.37, 0.37, 0.47, 0.1]; fract_lign=[0.1, 0.4, 0.09, 0.06, 0.08, 0.9]; NPartitionApproach=0
                CERESSoilTemperature Temperature
                SoilNitrogenNO3 NO3: Thickness=[150, 150, 300, 300, 300, 300, 300, 200]; InitialValues=[10.903, 8.73, 2.028, 0.577, 0.428, 0.316, 0.207, 0.155]; InitialValuesUnits=ppm; WaterTableConcentration=0; D0=0; DepthConstant=0; MaxDepthSoluteAccessible=0; RunoffEffectivenessAtMovingSolute=0; MaxEffectiveRunoff=0
                SoilNitrogenNH4 NH4: Thickness=[150, 150, 300, 300, 300, 300, 300, 200]; InitialValues=[13.115, 0.747, 0.225, 0.058, 0.054, 0.053, 0.052, 0.077]; InitialValuesUnits=ppm; WaterTableConcentration=0; D0=0; DepthConstant=0; MaxDepthSoluteAccessible=0; RunoffEffectivenessAtMovingSolute=0; MaxEffectiveRunoff=0
                SoilNitrogenUrea Urea: same as Validation.New Zealand.SLMACC.SLMACC_Canterbury_2020.SpringstonBalmoralSoil.Block.Balmoral.Urea
                OutputLayers OutputNutrientLayers: Thickness=[150, 150, 300, 300, 300, 300, 300]
                Physical
                  Thickness  ParticleSizeClay  ParticleSizeSand  ParticleSizeSilt  BD     AirDry  LL15   DUL    SAT    KS
                  250        30                15                55                1.081  0.126   0.252  0.457  0.551  1440
                  150        30                15                55                1.081  0.21    0.252  0.457  0.551  1440
                  225        30                15                55                1.301  0.278   0.278  0.449  0.473  192
                  343.8      30                15                55                1.301  0.278   0.278  0.449  0.473  24
                  343.8      30                15                55                1.301  0.278   0.278  0.449  0.473  24
                  343.8      30                15                55                1.301  0.278   0.278  0.449  0.473  24
                  343.8      30                15                55                1.301  0.278   0.278  0.449  0.473  24
                  SoilCrop OatsSoil: LL=[0.252, 0.252, 0.278, 0.278, 0.278, 0.278, 0.278]; KL=[0.09, 0.081, 0.03, 0.005, 0, 0, 0]; XF=[1, 1, 0.732, 0.154, 0.154, 0.154, 0.154]
                WaterBalance SoilWater: SummerDate=1-oct; SummerU=9; SummerCona=4.4; WinterDate=1-apr; WinterU=9; WinterCona=4.4; DiffusConst=88; DiffusSlope=35; Salb=0.13; CN2Bare=73; CNRed=20; CNCov=0.8; DischargeWidth=0; CatchmentArea=0; PSIDul=-100
                  Thickness  SWCON  KLAT
                  250        0.3    0
                  150        0.3    0
                  225        0.2    0
                  1375       0.15   0
                Organic: same as Validation.New Zealand.SLMACC.SLMACC_Southland_2020.WintonMakarewaSoil.Block.Makarewa_3b1.Organic
                Water: Thickness=[250, 150, 225, 343.8, 343.8, 343.8, 343.8]; InitialValues=[0.457, 0.457, 0.449, 0.449, 0.449, 0.449, 0.449]; RelativeTo=LL15; FilledFromTop=true
                Memo SoilDoc
                  *	The Aparima_6a1 used in Interoperable modelling project was imported as the first step
              Plant Oats: same as Validation.New Zealand.SLMACC.SLMACC_Canterbury_2021.BarhillTempletonSoil.Block.Oats
              Report Output: same as Validation.New Zealand.SLMACC.SLMACC_Southland_2020.WintonMakarewaSoil.Block.Output
              Report DailyReport: same as Validation.New Zealand.SLMACC.SLMACC_Southland_2020.WintonMakarewaSoil.Block.DailyReport
              Report DailyReportWater_n_MineralN: same as Validation.New Zealand.SLMACC.SLMACC_Canterbury_2021.BarhillTempletonSoil.Block.DailyReportWater_n_MineralN
        Experiment SLMACC_WestCoast1_2020
          Memo Experiment Description
            * 	Trial location: Hokitika, West Coast
            *	Coordinates: 42.771°S, 170.909°E
            *	Soil: Descriped as heavy glay - using Huangarua soil in this simulation
            *	Weather station: Hokitika AWS
            *	The experiment evaluated oat populations (i.e. target of 0 [fallow], 300 plants/m2)- row spacing was 150 cm
            *	Note: target populations were not achieved and so, actual plant counts are used in the model (see factors).
            * 	The paddock was previously in a turnip-swedes
            *	This is a grazed field.
          Factors
            Permutation
              Factor Rate
                CompositeFactor 0
                  Specifications:
                    [CropManagement].Script.CoverCropIsEnabled = false
                    [CropManagement].Script.CoverCropSowingPopulation = 0
                CompositeFactor 300: Specifications=[CropManagement].Script.CoverCropSowingPopulation = 280
              Factor Width
                CompositeFactor 150: Specifications=[CropManagement].Script.CoverCropSowingSpacing = 150
          Simulation Kowhotirangi
            Clock: Start=2020-08-12; End=2020-12-09
            Weather: FileName=WeatherFiles\Hokotika.met
            Summary summaryfile
            SoilArbitrator Soil Arbitrator
            Zone Block: Area=1; Slope=0; AspectAngle=0; Altitude=50
              Manager LeafSizeScript: same as Validation.New Zealand.SLMACC.SLMACC_Southland_2020.WintonMakarewaSoil.Block.LeafSizeScript
              Folder Manager folder
                Manager FactorLabels: same as Validation.New Zealand.SLMACC.SLMACC_Canterbury_2020.SpringstonBalmoralSoil.Block.Manager folder.FactorLabels
                Manager ExtraVariables
                  StartDate = 01/01/1900 00:00:00
                  EndDate = 12/31/2100 00:00:00
                  DepthForReporting = 800
                  script: same as in Validation.New Zealand.SLMACC.SLMACC_Canterbury_2020.SpringstonBalmoralSoil.Block.Manager folder.ExtraVariables
                Manager ReportAndReset
                  TriggerReportEveryYear = True
                  TriggerReportEachLandUseChange = True
                  ResetingSoilEveryYear = False
                  ResetingSoilOnSowing = False
                  ResetingSoilOnDate = True
                  DateForReset = 1-Apr
```csharp
using APSIM.Shared.Utilities;
using Models.Interfaces;
using Models.PMF.Interfaces;
using Models.PMF;
using Models.Soils;
using Models.Core;
using System.Collections.Generic;
using System.Xml.Serialization;
using System;

namespace Models
{
    [Serializable]
    [System.Xml.Serialization.XmlInclude(typeof(Model))]
    public class Script : Model
    {
        [Link] private Clock clock;
        [Link] private Zone myZone;
        [Link] private Soils.Soil mySoil;
        [Link(ByName = true)] private SoilNitrogen SoilNitrogen;
        [Link] private Models.Surface.SurfaceOrganicMatter mySurfaceOM;
        [Link(ByName = true)] private Models.Report Output;
        [Link] private ISummary mySummary;
        private bool isTimeForSowingMainCrop;
        private bool isTimeForSowingCoverCrop;
        private bool isTimeToHarvestMainCrop;
        private bool isTimeToHarvestCoverCrop;
        private bool isTimeToEndSimulationYear;
        private string simulationYearEndDate;
        [Link]
        private ISoilWater waterBalance;
        //> Links to other Apsim models

        //> User inputs from properties tab
        [Separator("Managing triggers for reporting and soil reset")]
        [Separator(" When reporting is to be made?")]
        [Description("  Trigger a report every time a simulation year ends?")]
        public bool TriggerReportEveryYear { get; set; }
        [Description("  Trigger a report every time land-use is changed?")]
        public bool TriggerReportEachLandUseChange { get; set; }

        [Separator(" When soil state is to be reset?")]
        [Description("  Reset soil every year on the same day simulation started?")]
        public bool ResetingSoilEveryYear { get; set; }
        [Description("  Reset soil when sowing main crop?")]
        public bool ResetingSoilOnSowing { get; set; }
        [Description("  Reset soil at a given date?")]
        public bool ResetingSoilOnDate { get; set; }
        [Description("   Date for reseting the soil (dd-mmm)")]
        public string DateForReset { get; set; }

        //> Internal variables


        [EventSubscribe("Commencing")]
        private void OnSimulationCommencing(object sender, EventArgs e)
        {
            // initialise some variables
            isTimeToEndSimulationYear = true;
            simulationYearEndDate = clock.Today.AddDays(-1).ToString("dd-MMM");

            // write summary
            mySummary.WriteMessage(this," Report and soil reset management - initialisation", MessageType.Diagnostic);
            mySummary.WriteMessage(this,"   Report will be saved on:", MessageType.Diagnostic);
            if(TriggerReportEveryYear)
            {
                mySummary.WriteMessage(this,"   - Every year on " + simulationYearEndDate, MessageType.Diagnostic);
            }
            if(TriggerReportEachLandUseChange)
            {
                mySummary.WriteMessage(this,"   - Every time land-use changes", MessageType.Diagnostic);
            }

            if (ResetingSoilEveryYear)
            {
                DateForReset = clock.StartDate.ToString("dd-MMM");
                ResetingSoilOnDate = true;
                mySummary.WriteMessage(this,"   Soil and residues will be reset every year on " + DateForReset, MessageType.Diagnostic);
            }
            else if (ResetingSoilOnSowing)
            {
                mySummary.WriteMessage(this,"   Soil and residues will be reset when sowing the main crop", MessageType.Diagnostic);
            }
            else if(ResetingSoilOnDate)
            {
                mySummary.WriteMessage(this,"   Soil and residues will be reset on " + DateForReset, MessageType.Diagnostic);
            }
        }

        [EventSubscribe("StartOfDay")]
        private void OnStartOfDay(object sender, EventArgs e)
        {
            // get some variables and check for actions
            isTimeToHarvestMainCrop = (bool)myZone.Get("[CropManagement].Script.IsTimeToHarvestMainCrop");
            isTimeToHarvestCoverCrop = (bool)myZone.Get("[CropManagement].Script.IsTimeToHarvestCoverCrop");

            // check date
            if(isTimeToEndSimulationYear)
            {  // reset the value, it was used yesterday
                isTimeToEndSimulationYear = false;
            }
            else
            { // check whether we're on the last day of the simulation year
                if(DateUtilities.DatesEqual(simulationYearEndDate, clock.Today))
                { // set new recording
                    isTimeToEndSimulationYear = true;
                }
            }

            // check whether soil should be reset
            bool resetTriggered = false;
            if(ResetingSoilOnSowing && isTimeForSowingMainCrop)
            {
                resetTriggered = true;
            }
            else if(ResetingSoilOnDate && DateUtilities.DatesEqual(DateForReset,clock.Today))
            {
                resetTriggered = true;
            }

            if(resetTriggered)
            {
                waterBalance.Reset();
                SoilNitrogen.Reset();
                mySurfaceOM.Reset();
            }
        }

        [EventSubscribe("EndOfDay")]
        private void OnEndOfDay(object sender, EventArgs e)
        {
            // get some variables from crop management
            isTimeForSowingMainCrop = (bool)myZone.Get("[CropManagement].Script.IsTimeForSowingMainCrop");
            isTimeForSowingCoverCrop = (bool)myZone.Get("[CropManagement].Script.IsTimeForSowingCoverCrop");

            // record outputs, if conditions are met
            if(TriggerReportEachLandUseChange)
            {
                if (isTimeToHarvestMainCrop || isTimeToHarvestCoverCrop)
                { // record data for the period with a crop
                    TriggerOutput();
                }
                else if (isTimeForSowingMainCrop || isTimeForSowingCoverCrop)
                { // record data for the fallow period
                    TriggerOutput();
                }
            }

            if(TriggerReportEveryYear)
            {
                if(isTimeToEndSimulationYear)
                { // record data for the fallow period ending on day to start new simulation year
                    TriggerOutput();
                }
            }
        }

        private void TriggerOutput()
        {
            Output.DoOutput();
            myZone.Set("[ExtraVariables].Script.ResetTriggered",true);
        }
    }
}
```
                Memo MemoManagementAndReport: same as Validation.New Zealand.SLMACC.SLMACC_Southland_2020.WintonMakarewaSoil.Block.Manager folder.MemoManagementAndReport
                Operations
                  2020-10-15  [Fertiliser].Apply(40, Fertiliser.Types.UreaN, 0);
                Manager CropManagement
                  CoverCropIsEnabled = True
                  CoverCropSowingPopulation = 400
                  CoverCropSowingSpacing = 150
                  CoverCrop = [Oats]
                  CoverCropCultivar = Milton
                  CoverCropSowingDepth = 30
                  LinkSowingToMainCrop = False
                  PeriodAfterHarvestCrop = 5
                  CoverCropSowingDate = 19-Aug
                  CoverCropHarvestingDate = 26-Nov
                  CoverCropFractionToRemove = 0
                  script: same as in Validation.New Zealand.SLMACC.SLMACC_Canterbury_2020.SpringstonBalmoralSoil.Block.Manager folder.CropManagement
              MicroClimate: a_interception=0; b_interception=1; c_interception=0; d_interception=0; SoilHeatFluxFraction=0.4; MinimumHeightDiffForNewLayer=0; NightInterceptionFraction=0.5; ReferenceHeight=2
              Irrigation
              Fertiliser
              SurfaceOrganicMatter: InitialResidueName=oat_stubble; InitialResidueType=oats; InitialResidueMass=1500; InitialStandingFraction=0.5; InitialCPR=0; InitialCNR=20
              Soil Huangarua: SoilType=Generic soil; Country=New Zealand; Latitude=37.5; Longitude=172.5
                Chemical: Thickness=[150, 150, 300, 300, 300, 300, 300, 200]; PH=[6, 6, 6, 6, 6, 6, 6, 6]; PHUnits=Water
                Physical
                  Thickness  ParticleSizeClay  ParticleSizeSand  ParticleSizeSilt  Rocks  BD     AirDry  LL15   DUL    SAT    KS
                  150        20                20                60                5      1.075  0.075   0.17   0.4    0.5    500
                  150        20                20                60                22     1.125  0.14    0.145  0.35   0.495  450
                  300        20                20                60                50     1.2    0.141   0.2    0.345  0.48   250
                  300        19                21                60                71     1.3    0.145   0.2    0.345  0.47   100
                  300        18                22                60                77     1.4    0.15    0.2    0.345  0.463  60
                  300        17                23                60                80     1.425  0.153   0.2    0.345  0.454  70
                  300        16                24                60                80     1.45   0.155   0.2    0.345  0.432  150
                  200        15                25                60                80     1.45   0.155   0.2    0.345  0.425  250
                  SoilCrop MaizeSoil: LL=[0.15, 0.145, 0.141, 0.145, 0.15, 0.153, 0.155, 0.155]; KL=[0.08, 0.06, 0.045, 0.04, 0.01, 0.005, 0.003, 0.001]; XF=[1, 1, 1, 1, 1, 1, 1, 1]
                  SoilCrop OatsSoil: LL=[0.15, 0.145, 0.141, 0.145, 0.15, 0.153, 0.155, 0.155]; KL=[0.08, 0.06, 0.045, 0.04, 0.01, 0.005, 0.003, 0.001]; XF=[1, 1, 1, 1, 1, 1, 1, 1]
                WaterBalance SoilWater: SummerDate=1-Oct; SummerU=8; SummerCona=4; WinterDate=1-Apr; WinterU=4; WinterCona=1.5; DiffusConst=88; DiffusSlope=35; Salb=0.2; CN2Bare=60; CNRed=10; CNCov=0.8; DischargeWidth=0; CatchmentArea=0; PSIDul=-100; Thickness=[150, 150, 300, 300, 300, 300, 300, 200]; SWCON=[0.5, 0.5, 0.43, 0.375, 0.34, 0.35, 0.4, 0.48]
                SoilNitrogen: fom_types=[default, manure, mucuna, lablab, shemp, stable]; fract_carb=[0.2, 0.3, 0.54, 0.57, 0.45, 0]; fract_cell=[0.7, 0.3, 0.37, 0.37, 0.47, 0.1]; fract_lign=[0.1, 0.4, 0.09, 0.06, 0.08, 0.9]; NPartitionApproach=0
                Organic: FOMCNRatio=30; CarbonUnits=Total
                  Thickness  Carbon  SoilCNRatio  FBiom  FInert  FOM
                  150        2.5     11           0.08   0.2     320.735
                  150        1.75    11           0.04   0.325   256.112
                  300        0.75    11           0.018  0.6     163.304
                  300        0.3     11           0.01   0.85    104.127
                  300        0.2     11           0.008  0.95    66.3946
                  300        0.1     11           0.008  0.98    42.335
                  300        0.1     11           0.008  0.99    26.994
                  200        0.1     11           0.008  0.995   19.9977
                CERESSoilTemperature Temperature
                Water: Thickness=[150, 150, 300, 300, 300, 300, 300, 200]; InitialValues=[0.4, 0.35, 0.345, 0.345, 0.345, 0.345, 0.345, 0.345]; RelativeTo=LL15; FilledFromTop=false
                Memo SoilDoc
                  This soil was parameterised based on ....
                SoilNitrogenNO3 NO3: Thickness=[150, 150, 300, 300, 300, 300, 300, 200]; InitialValuesUnits=ppm; WaterTableConcentration=0; D0=0; DepthConstant=0; MaxDepthSoluteAccessible=0; RunoffEffectivenessAtMovingSolute=0; MaxEffectiveRunoff=0
                  InitialValues=[9.097, 3.65, 2.069, 1.28205, 0.952381, 0.701754, 0.45977, 0.344828]
                SoilNitrogenNH4 NH4: Thickness=[150, 150, 300, 300, 300, 300, 300, 200]; InitialValuesUnits=ppm; WaterTableConcentration=0; D0=0; DepthConstant=0; MaxDepthSoluteAccessible=0; RunoffEffectivenessAtMovingSolute=0; MaxEffectiveRunoff=0
                  InitialValues=[21.79, 2.969, 0.65, 0.128205, 0.119048, 0.116959, 0.114943, 0.172414]
                SoilNitrogenUrea Urea: same as Validation.New Zealand.SLMACC.SLMACC_Canterbury_2020.SpringstonBalmoralSoil.Block.Balmoral.Urea
                OutputLayers OutputNutrientLayers: Thickness=[150, 150, 300, 300, 300, 300, 300]
              Plant Oats
                Folder NewCultivars
                  Cultivar Coronet
                    Command:
                      [Phenology].CAMP.FLNparams.MinLN = 9
                      [Phenology].CAMP.FLNparams.VrnLN  = 0
                      [Phenology].CAMP.FLNparams.PpLN  = 0
                      [Phenology].HeadEmergenceLongDayBase.FixedValue = 0
                      [Phenology].HeadEmergencePpSensitivity.FixedValue = 0
                      [Leaf].Phyllochron.BasePhyllochron.FixedValue = 105
                      [Leaf].ExtinctionCoefficient.VegetativePhase.FixedValue = 0.6
                      [Leaf].MaxLeafArea.AreaLargestLeaf.FixedValue = 1640
                      [Leaf].InitialLeaves[1].Area = 200
                      [Leaf].InitialLeaves[2].Area = 400
                  Cultivar PFR_100_05
                    Command:
                      [Phenology].CAMP.FLNparams.MinLN = 9
                      [Phenology].CAMP.FLNparams.VrnLN  = 0
                      [Phenology].CAMP.FLNparams.PpLN  = 0
                      [Phenology].HeadEmergenceLongDayBase.FixedValue = 0
                      [Phenology].HeadEmergencePpSensitivity.FixedValue = 0
                      [Leaf].Phyllochron.BasePhyllochron.FixedValue = 105
                      [Leaf].ExtinctionCoefficient.VegetativePhase.FixedValue = 0.6
                      [Leaf].MaxLeafArea.AreaLargestLeaf.FixedValue = 2500
                      [Leaf].InitialLeaves[1].Area = 340
                      [Leaf].InitialLeaves[2].Area = 660
                  Memo ReadMe: same as Validation.New Zealand.SLMACC.SLMACC_Canterbury_2021.BarhillTempletonSoil.Block.Oats.NewCultivars.ReadMe
              Report Output: same as Validation.New Zealand.SLMACC.SLMACC_Southland_2020.WintonMakarewaSoil.Block.Output
              Report DailyReport: EventNames=[Clock].EndOfDay
                VariableNames:
                  [Clock].Today
                  [Weather].MaxT
                  [Weather].MinT
                  [Weather].Radn
                  [Weather].Rain
                  [Oats].AboveGroundLive.Wt
                  [Oats].Leaf.LAI
                  [LeafSizeScript].Script.LeafExpandedPosition
                  [LeafSizeScript].Script.MostRecentlyExpandedLeafSize
                  [LeafSizeScript].Script.LeafAppearedPosition
                  [LeafSizeScript].Script.MostRecentlyAppearedLeafMaxSize
                  //[Phenology].FlagLeafDAS
                  [Phenology].FloweringDAS
                  [Oats].Panicle.HeadNumber
                  [Fertiliser].NitrogenApplied
                  [ExtraVariables].Script.DeltaSurfaceOMN as SurfaceOMN_DeltaTotal
                  [ExtraVariables].Script.DeltaSoilMineralNTotal as SoilMineralN_DeltaTotal
                  [ExtraVariables].Script.DeltaSoilOrganicNTotal as SoilOrganicN_DeltaTotal
                  [ExtraVariables].Script.DeltaSoilOrganicCTotal as SoilOrganicC_DeltaTotal
                  [ExtraVariables].Script.AccumSoilOMMineralisedToLayer as SoilOMMineralisedNToGivenLayer_Cum
                  ([ExtraVariables].Script.AccumSoilOMMineralisedToLayer+[ExtraVariables].Script.AccumSurfaceOMMineralisation) as MineralisedNToGivenLayer_Cum
                  [ExtraVariables].Script.AccumDenitrifiedNToLayer as DenitrifiedNToGivenLayer_Cum
                  [ExtraVariables].Script.AccumFlowNAtLayer as LeachedNAtGivenLayer_Cum
                  [ExtraVariables].Script.SumUreaToLayer as UreaToGivenLayer_Sum
                  [ExtraVariables].Script.SumNH4ToLayer as NH4ToGivenLayer_Sum
                  [ExtraVariables].Script.SumNO3ToLayer as NO3ToGivenLayer_Sum
                  [ExtraVariables].Script.SumMineralNToLayer as MineralNToGivenLayer_Sum
                  [ExtraVariables].Script.SumFOMNToLayer as FOMNToGivenLayer_Sum
                  [ExtraVariables].Script.SumMicrobialNToLayer as MicrobialNToGivenLayer_Sum
                  [ExtraVariables].Script.SumHumicNToLayer as HumicNToGivenLayer_Sum
                  [ExtraVariables].Script.SumOrganicNToLayer as OrganicNToGivenLayer_Sum
                  [ExtraVariables].Script.SumOrganicCToLayer as OrganicCToGivenLayer_Sum
                  [Soil].SoilNitrogen.oc[1] as OC_TopLayer
                  [ExtraVariables].Script.DeltaSoilMineralNToLayer as SoilMineralN_DeltaToGivenLayer
                  [ExtraVariables].Script.DeltaSoilOrganicNToLayer as SoilOrganicN_DeltaToGivenLayer
                  [ExtraVariables].Script.CropAboveGroundBiomassWt as CropBiomass_Cum
                  [ExtraVariables].Script.CropAboveGroundBiomassN as CropN_Cum
                  [ExtraVariables].Script.CropAboveGroundBiomassNConc as CropNconc
                  [CropManagement].Script.HarvestedWt as HarvestedCropBiomass
                  [CropManagement].Script.HarvestedN as HarvestedCropN
                  [CropManagement].Script.HarvestedNconc as HarvestedCropNconc
                  [CropManagement].Script.CropYield as CropYield
                  [ExtraVariables].Script.depthForReporting as ReportDepth
                  [CropManagement].Script.SowDOY as SowingDOY
                  [CropManagement].Script.HarvestDOY as HarvestingDOY
                  [ExtraVariables].Script.AccumLightInterception as AccumLightInterc
                  [CropManagement].Script.CoverCropCultivar as CoverCropCultivar
                  [Oats].Panicle.HeadNumber
                  [Oats].Leaf.Live.Wt as LeafBiomass
                  [Oats].Stem.Live.Wt as StemBiomass
                  [Oats].AboveGround.Wt as AboveBiomass
                  [Oats].Leaf.AppearedCohortNo as LeafCountMainStem
                  [ExtraVariables].Script.AccumLightInterception
                  [ExtraVariables].Script.AccumTotalLeachedN as TotalLeachedN_Cum
                  [ExtraVariables].Script.AccumUptakeN as UptakeN_Cum
                  [ExtraVariables].Script.AccumRainfall as Rainfall_Cum
                  [ExtraVariables].Script.AccumIrrigation as AppliedIrrigation_Cum
                  [ExtraVariables].Script.AccumFertiliser as AppliedFertiliserN_Cum
                  [Oats].Phenology.Stage
                  [Phenology].CurrentStageName
              Report DailyReportWater_n_MineralN: same as Validation.New Zealand.SLMACC.SLMACC_Canterbury_2021.BarhillTempletonSoil.Block.DailyReportWater_n_MineralN
        Experiment WestCoast2
          Memo Experiment Description
            1) Identify strategic sowing practices (e.g. species selection, plant populations and row spacing) of catch crops post winter forage crop grazing to achieve early canopy closure, greater soil protection, and higher rates of N uptake during the high-risk winter and spring periods in three regions of the South Island (Canterbury, Southland and the West Coast)
          Factors
            Permutation
              Factor Rate
                CompositeFactor 0
                  Specifications:
                    [CropManagement].Script.CoverCropIsEnabled = false
                    [CropManagement].Script.CoverCropSowingPopulation = 0
                CompositeFactor 300: Specifications=[CropManagement].Script.CoverCropSowingPopulation = 300
              Factor Width
                CompositeFactor 150: Specifications=[CropManagement].Script.CoverCropSowingSpacing = 150
          Simulation Cudmore
            Clock: Start=2020-08-12; End=2020-12-09
            Weather: FileName=WeatherFiles\Hokotika.met
            Summary summaryfile
            SoilArbitrator Soil Arbitrator
            Zone Block: Area=1; Slope=0; AspectAngle=0; Altitude=50
              Manager LeafSizeScript: same as Validation.New Zealand.SLMACC.SLMACC_Southland_2020.WintonMakarewaSoil.Block.LeafSizeScript
              Folder Manager folder
                Manager FactorLabels: same as Validation.New Zealand.SLMACC.SLMACC_Canterbury_2020.SpringstonBalmoralSoil.Block.Manager folder.FactorLabels
                Manager ExtraVariables: same as Validation.New Zealand.SLMACC.SLMACC_WestCoast1_2020.Kowhotirangi.Block.Manager folder.ExtraVariables
                Manager ReportAndReset: same as Validation.New Zealand.SLMACC.SLMACC_WestCoast1_2020.Kowhotirangi.Block.Manager folder.ReportAndReset
                Memo MemoManagementAndReport: same as Validation.New Zealand.SLMACC.SLMACC_Southland_2020.WintonMakarewaSoil.Block.Manager folder.MemoManagementAndReport
                Operations
                  2020-10-15  [Fertiliser].Apply(40, Fertiliser.Types.UreaN, 0);
                Manager CropManagement
                  CoverCropIsEnabled = True
                  CoverCropSowingPopulation = 400
                  CoverCropSowingSpacing = 150
                  CoverCrop = [Oats]
                  CoverCropCultivar = Milton
                  CoverCropSowingDepth = 30
                  LinkSowingToMainCrop = False
                  PeriodAfterHarvestCrop = 5
                  CoverCropSowingDate = 19-Aug
                  CoverCropHarvestingDate = 15-Nov
                  CoverCropFractionToRemove = 0
                  script: same as in Validation.New Zealand.SLMACC.SLMACC_Canterbury_2020.SpringstonBalmoralSoil.Block.Manager folder.CropManagement
              MicroClimate: a_interception=0; b_interception=1; c_interception=0; d_interception=0; SoilHeatFluxFraction=0.4; MinimumHeightDiffForNewLayer=0; NightInterceptionFraction=0.5; ReferenceHeight=2
              Irrigation
              Fertiliser
              SurfaceOrganicMatter: InitialResidueName=oat_stubble; InitialResidueType=oats; InitialResidueMass=1500; InitialStandingFraction=0.5; InitialCPR=0; InitialCNR=20
              Plant Oats: same as Validation.New Zealand.SLMACC.SLMACC_Canterbury_2021.BarhillTempletonSoil.Block.Oats
              Report Output: same as Validation.New Zealand.SLMACC.SLMACC_Southland_2020.WintonMakarewaSoil.Block.Output
              Report DailyReport: same as Validation.New Zealand.SLMACC.SLMACC_Southland_2020.WintonMakarewaSoil.Block.DailyReport
              Soil Huangarua: same as Validation.New Zealand.SLMACC.SLMACC_WestCoast1_2020.Kowhotirangi.Block.Huangarua
              Report DailyReportWater_n_MineralN: same as Validation.New Zealand.SLMACC.SLMACC_Canterbury_2021.BarhillTempletonSoil.Block.DailyReportWater_n_MineralN
    Folder Australia
      Memo
        The Oats model construction for Australian varieties was based primarily around the experiment at Gatton in 2007. Supporting phenology data was collected at the Leslie Research Centre (LRC) and Wellcamp Research Station for northern varieties, data kindly supplied by Bruce Winter, Oats Breeder with DAFQ. The model was then extended to data sets at Roma in QLD, and also sites in South Australia (Tarlee, Pinery) where additional adjustments were made to the relevant varieties.

        The Gatton, Roma, Tarlee, and Pinery experiments were used to construct the original APSIM Oats model and published at the Australian Agronomy Conference in 2008.

        Peake A, Whitbread A, Davoren B, Braun J and Limpus, S. (2008). The development of a model in APSIM for the simulation of grazing oats and oaten hay. In: Global Issues, Paddock Action. Proceedings of the 14th ASA Conference, 21-25 September 2008, Adelaide, South Australia.
      Folder Gatton2007
        Memo Experiment Description
          This experiment comprised an early and late sowing date, but full growth and soil water data was only collected for the early sowing date. The late sowing date was comprised of observation plots for phenology data collection only.

          Extinction coefficient and 'kl' values were measured on the early sowing date in addition to partitioned biomass data. Note that the kl values measured and used to simulated this irrigated trial were high, and may not apply to many dryland situations. Other simulations in the Australian validation data sets used the traditional wheat kl values for dryland situations.
        Folder Gatton2007early
          Experiment Gatton2007
            Factors
              Factor Cv: Specification=[Operations]
                Operations Coolibah
                  2007-05-24  [Oats].Sow(population:95, cultivar:"Coolibah", depth:20, rowSpacing:250);
                Operations Taipan
                  2007-05-24  [Oats].Sow(population:104, cultivar:"Taipan", depth:20, rowSpacing:250);
            Simulation Gatton2007Base
              Clock: Start=2007-05-01; End=2007-11-30
              Summary summaryfile
              Weather: FileName=WeatherFiles\Hybrid Gatton07 metfile.met
              SoilArbitrator Soil Arbitrator
              Zone paddock: Area=1; Slope=0; AspectAngle=0; Altitude=50
                Soil: Latitude=0; Longitude=0
                  Physical
                    Thickness  BD    AirDry  LL15  DUL    SAT
                    150        1.37  0.11    0.15  0.394  0.445
                    150        1.29  0.15    0.19  0.325  0.45
                    300        1.4   0.18    0.22  0.432  0.47
                    300        1.47  0.19    0.22  0.363  0.43
                    300        1.37  0.19    0.22  0.34   0.43
                    SoilCrop OatsSoil: LL=[0.21, 0.2, 0.29, 0.295, 0.24]; KL=[0.15, 0.13, 0.07, 0.03, 0.03]; XF=[1, 1, 1, 1, 1]
                  WaterBalance SoilWater: SummerDate=1-Nov; SummerU=5; SummerCona=3; WinterDate=1-Apr; WinterU=5; WinterCona=3; DiffusConst=40; DiffusSlope=16; Salb=0.13; CN2Bare=78; CNRed=20; CNCov=0.8; PSIDul=-100; Thickness=[150, 150, 300, 300, 300, 300, 300]; SWCON=[0.5, 0.5, 0.5, 0.5, 0.5, 0.5, 0.5]
                  Organic: FOMCNRatio=20; CarbonUnits=Total
                    Thickness  Carbon  SoilCNRatio  FBiom  FInert  FOM
                    150        1.65    14.5         0.035  0.45    173.565
                    150        1.13    14.5         0.02   0.55    135.172
                    300        0.68    14.5         0.015  0.8     81.9861
                    300        0.48    14.5         0.01   0.99    49.7271
                    300        0.3     14.5         0.01   0.99    30.161
                    300        0.39    14.5         0.01   0.99    18.2936
                    300        0.36    14.5         0.01   0.99    11.0956
                  Chemical: Thickness=[150, 150, 300, 300, 300, 300, 300]; PH=[7.3, 7.1, 7.1, 7.1, 7.4, 7.8, 7.9]; PHUnits=Water
                  Water: Thickness=[150, 150, 300, 300, 300, 300, 300]; InitialValues=[0.26, 0.33, 0.35, 0.33, 0.26, 0.27, 0.3]; RelativeTo=LL15; FilledFromTop=false
                  CERESSoilTemperature Temperature
                  Nutrient
                  Solute NO3: Thickness=[150, 150, 300, 300, 300, 300, 300]; InitialValues=[22.6, 5.50005, 1.30001, 0, 0, 0, 0]; InitialValuesUnits=ppm; WaterTableConcentration=0; D0=0; DepthConstant=0; MaxDepthSoluteAccessible=0; RunoffEffectivenessAtMovingSolute=0; MaxEffectiveRunoff=0
                  Solute NH4: Thickness=[150, 150, 300, 300, 300, 300, 300]; InitialValues=[0.300063, 0.300063, 0.300063, 0, 0, 0, 0]; InitialValuesUnits=ppm; WaterTableConcentration=0; D0=0; DepthConstant=0; MaxDepthSoluteAccessible=0; RunoffEffectivenessAtMovingSolute=0; MaxEffectiveRunoff=0
                  Solute Urea: same as Validation.New Zealand.SAE_Oats_2020.A_Block_2020.paddock.Soil.Urea
                Irrigation
                SurfaceOrganicMatter Surface Organic Matter: InitialResidueName=wheat_stubble; InitialResidueType=wheat; InitialResidueMass=0; InitialStandingFraction=0; InitialCPR=0; InitialCNR=80
                Fertiliser
                MicroClimate: a_interception=0; b_interception=1; c_interception=0; d_interception=0; SoilHeatFluxFraction=0.4; MinimumHeightDiffForNewLayer=0; NightInterceptionFraction=0.5; ReferenceHeight=2
                Plant Oats
                Folder Management
                  Operations IrrigandFert
                    2007-05-18  [Irrigation].Apply(140);
                    2007-05-31  [Irrigation].Apply(15);
                    2007-07-12  [Irrigation].Apply(15);
                    2007-07-24  [Irrigation].Apply(29);
                    2007-08-14  [Irrigation].Apply(45);
                    2007-05-14  [Fertiliser].Apply(150, Fertiliser.Types.UreaN, 40);
                    2007-07-23  [Fertiliser].Apply(90, Fertiliser.Types.UreaN, 10);
                    2007-08-13  [Fertiliser].Apply(110, Fertiliser.Types.UreaN, 10);
                    Memo
                      Additional N added to create non limiting as test. Urea first application now 300
                  Operations
                  Manager Harvesting
                    script: same as in Validation.New Zealand.WinterSowing2015.ABlock.paddock.Manager folder.Harvesting
                Report DailyReport
                Report HarvestReport
                Report SupReport: EventNames=[Clock].DoReport
                  VariableNames:
                    [Clock].Today
                    [Phenology].ThermalTime
                    [Oats].Arbitrator.DM.TotalFixationSupply
                    [Oats].Arbitrator.FN
                    [Oats].Leaf.Phyllochron
                    [Oats].Leaf.Photosynthesis.FVPD
                    [Oats].Leaf.Photosynthesis.RueAct
                    [Oats].Leaf.NextExpandingLeafProportion
                    [Oats].Leaf.MeanTillerGrowthRate
                    sum([Soil].Water.MM[1:5]) as ProfileWater
          Memo Leaf Rust after anthesis
            Field notes recorded leaf rust becoming severe in Coolibah on 12/9/07 - no biomass cuts were taken after this
        Folder Gatton2007LATEsown
          Experiment Gatton2007Late
            Memo Experiment Description
              The late sown experiment at Gatton in 2007 was comprised of observation plots of the two varieties used in the early sowing date. 4 plants were monitored for phenology (Leaf Appearance Rate and Zadoks stage) from each observation plot.
            Factors
              Factor Cv: Specification=[Operations]
                Operations CoolibahLate
                  2007-06-22  [Oats].Sow(population:95, cultivar:"Coolibah", depth:20, rowSpacing:250);
                Operations TaipanLate
                  2007-06-22  [Oats].Sow(population:104, cultivar:"Taipan", depth:20, rowSpacing:250);
            Simulation Gatton2007BaseLate
              Clock: Start=2007-05-01; End=2007-11-30
              Summary summaryfile
              Weather: FileName=WeatherFiles\Hybrid Gatton07 metfile.met
              SoilArbitrator Soil Arbitrator
              Zone paddock: Area=1; Slope=0; AspectAngle=0; Altitude=50
                Soil: same as Validation.Australia.Gatton2007.Gatton2007early.Gatton2007.Gatton2007Base.paddock.Soil
                Irrigation
                SurfaceOrganicMatter Surface Organic Matter: InitialResidueName=wheat_stubble; InitialResidueType=wheat; InitialResidueMass=0; InitialStandingFraction=0; InitialCPR=0; InitialCNR=80
                Fertiliser
                MicroClimate: a_interception=0; b_interception=1; c_interception=0; d_interception=0; SoilHeatFluxFraction=0.4; MinimumHeightDiffForNewLayer=0; NightInterceptionFraction=0.5; ReferenceHeight=2
                Plant Oats
                Folder Management: same as Validation.Australia.Gatton2007.Gatton2007early.Gatton2007.Gatton2007Base.paddock.Management
                Report DailyReport
                Report HarvestReport
                Report SupReport: EventNames=[Clock].DoReport
                  VariableNames:
                    [Clock].Today
                    [Phenology].ThermalTime
                    [Leaf].CohortSize
                    [Leaf].CohortParameters.MaxArea
                    [Oats].Arbitrator.FN
                    [Oats].Leaf.Phyllochron
                    [Oats].Leaf.CohortMaxSize
                    [Oats].Leaf.CohortParameters.GrowthDuration
                    [Oats].Leaf.CohortParameters.LagDuration
                    [Oats].Leaf.CohortParameters.SenescenceDuration
                    [Oats].Leaf.CohortParameters.SpecificLeafAreaMax
                    [Oats].Leaf.CohortParameters.SpecificLeafAreaMin
                    [Oats].Leaf.Photosynthesis.FT
                    [Oats].Leaf.Photosynthesis.FVPD
                    [Oats].Leaf.Photosynthesis.RueAct
                    [Oats].Leaf.NextExpandingLeafProportion
                    [Oats].Leaf.MeanTillerGrowthRate
                    sum([Soil].Water.MM[1:5]) as ProfileWater
      Folder Wellcamp2006
        Memo
          This experiment was run at DPI Wellcamp Research Station, Queensland in 2006.
          Phenology data (Zadok stage) was the only data collected.

          This experiment was a phenology experiment based on small and narrow observation plots (4 rows) in conjunction with a QDAF Oats breeing trial. The decision was taken to use a nearby SILO met-data set rather than the onsite weather station, due to the possibility that the onsite met station had not been calibrated for some time.
        Experiment Wellcamp2006
          Factors
            Permutation
              Factor Cv: Specification=[Sowing]
                Operations Coolibah
                  2006-04-03  [Oats].Sow(population:100, cultivar:"Coolibah", depth:30, rowSpacing:250);
                Operations Taipan
                  2006-04-03  [Oats].Sow(population:100, cultivar:"Taipan", depth:30, rowSpacing:250);
                Operations Algerian
                  2006-04-03  [Oats].Sow(population:100, cultivar:"Algerian", depth:30, rowSpacing:250);
                Operations Nugene
                  2006-04-03  [Oats].Sow(population:100, cultivar:"Nugene", depth:30, rowSpacing:250);
                Operations Drover
                  2006-04-03  [Oats].Sow(population:100, cultivar:"Drover", depth:30, rowSpacing:250);
              Factor Cut: Specification=[Cutting]
                Manager None
```csharp
using Models.Soils;
using System;
using System.Collections.Generic;
using Models.Core;
using Models.PMF;
using Models.PMF.Interfaces;
using System.Xml.Serialization;

namespace Models
{
    [Serializable] 
    [System.Xml.Serialization.XmlInclude(typeof(Model))]
    public class Script : Model
    {
        
    }
}
```
                Manager One
                  CutDate = 2006-08-10
```csharp
using Models.Soils;
using System.Xml.Serialization;
using Models.PMF.Interfaces;
using Models.PMF;
using Models.Core;
using System.Collections.Generic;
using System;
using Newtonsoft.Json;

namespace Models
{
    [Serializable] 
    [System.Xml.Serialization.XmlInclude(typeof(Model))]
    public class Script : Model
    {
        [Link] Plant Oats;
        [Link] Clock Clock;

        [Description("Cut Date")]
        public DateTime CutDate { get; set; }

        [JsonIgnore] private RemovalFractions Remove { get; set; }
        
        [EventSubscribe("StartOfSimulation")]
        private void OnSimulationCommencing(object sender, EventArgs e)
        {
            Remove = new RemovalFractions();
        }
        
        [EventSubscribe("DoManagement")]
        private void OnDoManagement(object sender, EventArgs e)
        {
            //Set up  array of remove fractions to send with Cut method.  Each member in the array corresponds to an organ in the same order they are set up in.
            if (Clock.Today.Date == CutDate)
            {
                //Remove.SetPhenologyStage = 3.5;
                Remove.SetFractionToRemove("Panicle", 1.0);
                Remove.SetFractionToResidue("Panicle", 0.0);
                Remove.SetFractionToRemove("Leaf", 0.8);
                Remove.SetFractionToResidue("Leaf", 0.0);
                Remove.SetFractionToRemove("Stem", 0.8);
                Remove.SetFractionToResidue("Stem", 0.0);
                Remove.SetFractionToRemove("Grain", 1.0);
                Remove.SetFractionToResidue("Grain", 0.0);
                Remove.SetFractionToRemove("Root", 0.0);
                Remove.SetFractionToResidue("Root", 0.0);
                Oats.RemoveBiomass("Cut", Remove);
            }
        }
    }
}
```
                Manager Two
                  CutDate1 = 2006-08-10
                  CutDate2 = 2006-09-04
```csharp
using Models.Soils;
using System.Xml.Serialization;
using Models.PMF.Interfaces;
using Models.PMF;
using Models.Core;
using System.Collections.Generic;
using System;
using Newtonsoft.Json;

namespace Models
{
    [Serializable] 
    [System.Xml.Serialization.XmlInclude(typeof(Model))]
    public class Script : Model
    {
        [Link] Plant Oats;
        [Link] Clock Clock;

        [Description("Cut Date1")]
        public DateTime CutDate1 { get; set; }
        [Description("Cut Date2")]
        public DateTime CutDate2 { get; set; }

        [JsonIgnore] private RemovalFractions Remove { get; set; }
        
        [EventSubscribe("StartOfSimulation")]
        private void OnSimulationCommencing(object sender, EventArgs e)
        {
            Remove = new RemovalFractions();
        }
        
        [EventSubscribe("DoManagement")]
        private void OnDoManagement(object sender, EventArgs e)
        {
            //Set up  array of remove fractions to send with Cut method.  Each member in the array corresponds to an organ in the same order they are set up in.
            if (Clock.Today.Date == CutDate1)
            {
                //Remove.SetPhenologyStage = 3.5;
                Remove.SetFractionToRemove("Panicle", 1.0);
                Remove.SetFractionToResidue("Panicle", 0.0);
                Remove.SetFractionToRemove("Leaf", 0.8);
                Remove.SetFractionToResidue("Leaf", 0.0);
                Remove.SetFractionToRemove("Stem", 0.8);
                Remove.SetFractionToResidue("Stem", 0.0);
                Remove.SetFractionToRemove("Grain", 1.0);
                Remove.SetFractionToResidue("Grain", 0.0);
                Remove.SetFractionToRemove("Root", 0.0);
                Remove.SetFractionToResidue("Root", 0.0);
                Oats.RemoveBiomass("Cut", Remove);
            }
            if (Clock.Today.Date == CutDate2)
            {
                //Remove.SetPhenologyStage = 3.5;
                Remove.SetFractionToRemove("Panicle", 1.0);
                Remove.SetFractionToResidue("Panicle", 0.0);
                Remove.SetFractionToRemove("Leaf", 0.8);
                Remove.SetFractionToResidue("Leaf", 0.0);
                Remove.SetFractionToRemove("Stem", 0.8);
                Remove.SetFractionToResidue("Stem", 0.0);
                Remove.SetFractionToRemove("Grain", 1.0);
                Remove.SetFractionToResidue("Grain", 0.0);
                Remove.SetFractionToRemove("Root", 0.0);
                Remove.SetFractionToResidue("Root", 0.0);
                Oats.RemoveBiomass("Cut", Remove);
            }
        }
    }
}
```
          Simulation Wellcamp2006Base
            Clock: Start=2006-02-25; End=2006-11-02
            Summary summaryfile
            Weather: FileName=WeatherFiles\cotswald hills moyola 2006.met
            SoilArbitrator Soil Arbitrator
            Zone paddock: Area=1; Slope=0; AspectAngle=0; Altitude=50
              Soil: Latitude=0; Longitude=0
                Physical
                  Thickness  BD    AirDry  LL15  DUL   SAT
                  150        0.9   0.11    0.22  0.52  0.59
                  150        1.01  0.306   0.34  0.53  0.59
                  300        1.02  0.3     0.38  0.54  0.59
                  300        1     0.3     0.36  0.54  0.59
                  300        1.06  0.3     0.4   0.52  0.57
                  300        1.14  0.3     0.36  0.49  0.54
                  300        1.23  0.3     0.38  0.46  0.51
                  SoilCrop WheatSoil: LL=[0.22, 0.34, 0.38, 0.36, 0.4, 0.36, 0.46]; KL=[0.1, 0.1, 0.08, 0.06, 0.04, 0.02, 0.01]; XF=[1, 1, 1, 1, 1, 1, 1]
                  SoilCrop OatsSoil: LL=[0.34, 0.34, 0.38, 0.36, 0.4, 0.36, 0.46]; KL=[0.06, 0.06, 0.04, 0.04, 0.02, 0.02, 0.01]; XF=[1, 1, 1, 1, 1, 1, 1]
                WaterBalance SoilWater: SummerDate=1-Nov; SummerU=6; SummerCona=3.5; WinterDate=1-Apr; WinterU=6; WinterCona=3.5; DiffusConst=40; DiffusSlope=16; Salb=0.13; CN2Bare=73; CNRed=20; CNCov=0.8; PSIDul=-100; Thickness=[150, 150, 300, 300, 300, 300, 300]; SWCON=[0.3, 0.3, 0.3, 0.3, 0.3, 0.3, 0.3]
                Organic: FOMCNRatio=40; CarbonUnits=Total
                  Thickness  Carbon  SoilCNRatio  FBiom  FInert  FOM
                  150        1.24    12.5         0.03   0.4     69.4258
                  150        1.24    12.5         0.02   0.6     54.0689
                  300        1.25    12.5         0.01   0.8     32.7944
                  300        1.1     12.5         0.01   0.9     19.8908
                  300        0.71    12.5         0.01   0.95    12.0644
                  300        0.34    12.5         0.01   0.95    7.31743
                  300        0.26    12.5         0.01   0.95    4.43824
                Chemical: Thickness=[150, 150, 300, 300, 300, 300, 300]; PH=[7, 7, 7, 7, 7, 7, 7]; PHUnits=Water
                Water: Thickness=[150, 150, 300, 300, 300, 300, 300]; InitialValues=[0.38, 0.46, 0.42, 0.37, 0.33, 0.35, 0.35]; RelativeTo=LL15; FilledFromTop=false
                CERESSoilTemperature Temperature
                Nutrient
                Solute NO3: Thickness=[150, 150, 300, 300, 300, 300, 300]; InitialValues=[26.8, 6.6, 5.8, 10.2, 12.9, 11.6, 11.6]; InitialValuesUnits=ppm; WaterTableConcentration=0; D0=0; DepthConstant=0; MaxDepthSoluteAccessible=0; RunoffEffectivenessAtMovingSolute=0; MaxEffectiveRunoff=0
                Solute NH4: Thickness=[150, 150, 300, 300, 300, 300, 300]; InitialValues=[0.6, 0.1, 0.1, 0.1, 0.1, 0.1, 0.1]; InitialValuesUnits=ppm; WaterTableConcentration=0; D0=0; DepthConstant=0; MaxDepthSoluteAccessible=0; RunoffEffectivenessAtMovingSolute=0; MaxEffectiveRunoff=0
                Solute Urea: same as Validation.New Zealand.SAE_Oats_2020.A_Block_2020.paddock.Soil.Urea
              Irrigation
              SurfaceOrganicMatter Surface Organic Matter: InitialResidueName=wheat_stubble; InitialResidueType=wheat; InitialResidueMass=0; InitialStandingFraction=0; InitialCPR=0; InitialCNR=80
              Fertiliser
              MicroClimate: a_interception=0; b_interception=1; c_interception=0; d_interception=0; SoilHeatFluxFraction=0.4; MinimumHeightDiffForNewLayer=0; NightInterceptionFraction=0.5; ReferenceHeight=2
              Plant Oats
              Folder Management
                Manager Cutting: same as Validation.Australia.Wellcamp2006.Wellcamp2006.Factors.Permutation.Cut.None
                Operations IrrigandFert
                  2006-04-03  [Fertiliser].Apply(35, Fertiliser.Types.NO3N, 20);
                  2006-05-10  [Irrigation].Apply(40);
                  2006-08-15  [Fertiliser].Apply(40, Fertiliser.Types.NO3N, 10);
                  2006-06-05  [Irrigation].Apply(60);
                Operations Sowing
                Manager Harvesting: same as Validation.Australia.Gatton2007.Gatton2007early.Gatton2007.Gatton2007Base.paddock.Management.Harvesting
              Report DailyReport
              Report HarvestReport
              Report SupReport: EventNames=[Clock].DoReport
                VariableNames:
                  [Clock].Today
                  [Phenology].ThermalTime
                  [Oats].Arbitrator.DM.TotalFixationSupply
                  [Oats].Arbitrator.FN
                  [Oats].Leaf.Phyllochron
                  [Oats].Leaf.Photosynthesis.FT
                  [Oats].Leaf.Photosynthesis.FVPD
                  [Oats].Leaf.Photosynthesis.RueAct
                  [Oats].Leaf.NextExpandingLeafProportion
                  [Oats].Leaf.MeanTillerGrowthRate
                  sum([Soil].Water.MM[1:7]) as ProfileWater
      Folder Roma2006
        Memo
          This experiment was run at Roma Research Station, Queensland in 2006.
           Two reps were used to generate cut and regrowth data (two cuts taken).
          The third rep was split in two, and one half was used to allow unlimited growth (no cutting), and the other half was only cut once. Soil water data for the ungrazed treatment was sourced exclusively from rep 3 except for the sowing PAW which was measured bulked across the experiment.

          Inaccuracy in the prediction of SLA and LAI was probably due to measurement error. The trial was heavily water stressed and it was difficult to accurately measure leaf area of curled, drought stress leaves, particularly when they were stored overnight.
        Experiment Roma2006
          Factors
            Permutation
              Factor Cv: Specification=[Sowing]
                Operations Coolibah
                  2006-05-25  [Oats].Sow(population:129, cultivar:"Coolibah", depth:30, rowSpacing:250);
                Operations Taipan
                  2006-05-25  [Oats].Sow(population:123, cultivar:"Taipan", depth:30, rowSpacing:250);
                Operations Algerian
                  2006-05-25  [Oats].Sow(population:105, cultivar:"Algerian", depth:30, rowSpacing:250);
              Factor Cut: Specification=[Cutting]
                Manager None: same as Validation.Australia.Wellcamp2006.Wellcamp2006.Factors.Permutation.Cut.None
                Manager One
                  CutDate = 2006-08-10
```csharp
using Models.Soils;
using System.Xml.Serialization;
using Models.PMF.Interfaces;
using Models.PMF;
using Models.Core;
using System.Collections.Generic;
using System;
using Newtonsoft.Json;

namespace Models
{
    [Serializable] 
    [System.Xml.Serialization.XmlInclude(typeof(Model))]
    public class Script : Model
    {
        [Link] Plant Oats;
        [Link] Clock Clock;

        [Description("Cut Date")]
        public DateTime CutDate { get; set; }

        [JsonIgnore] private RemovalFractions Remove { get; set; }
        
        [EventSubscribe("StartOfSimulation")]
        private void OnSimulationCommencing(object sender, EventArgs e)
        {
            Remove = new RemovalFractions();
        }
        
        [EventSubscribe("DoManagement")]
        private void OnDoManagement(object sender, EventArgs e)
        {
            //Set up  array of remove fractions to send with Cut method.  Each member in the array corresponds to an organ in the same order they are set up in.
            if (Clock.Today.Date == CutDate)
            {
                //Remove.SetPhenologyStage = 3.5;
                Remove.SetFractionToRemove("Panicle", 1.0);
                Remove.SetFractionToResidue("Panicle", 0.0);
                Remove.SetFractionToRemove("Leaf", 0.7);
                Remove.SetFractionToResidue("Leaf", 0.0);
                Remove.SetFractionToRemove("Stem", 0.7);
                Remove.SetFractionToResidue("Stem", 0.0);
                Remove.SetFractionToRemove("Grain", 1.0);
                Remove.SetFractionToResidue("Grain", 0.0);
                Remove.SetFractionToRemove("Root", 0.0);
                Remove.SetFractionToResidue("Root", 0.0);
                Oats.RemoveBiomass("Cut", Remove);
            }
        }
    }
}
```
                Manager Two
                  CutDate1 = 2006-08-10
                  CutDate2 = 2006-09-04
```csharp
using Models.Soils;
using System.Xml.Serialization;
using Models.PMF.Interfaces;
using Models.PMF;
using Models.Core;
using System.Collections.Generic;
using System;
using Newtonsoft.Json;

namespace Models
{
    [Serializable] 
    [System.Xml.Serialization.XmlInclude(typeof(Model))]
    public class Script : Model
    {
        [Link] Plant Oats;
        [Link] Clock Clock;

        [Description("Cut Date1")]
        public DateTime CutDate1 { get; set; }
        [Description("Cut Date2")]
        public DateTime CutDate2 { get; set; }

        [JsonIgnore] private RemovalFractions Remove { get; set; }
        
        [EventSubscribe("StartOfSimulation")]
        private void OnSimulationCommencing(object sender, EventArgs e)
        {
            Remove = new RemovalFractions();
        }
        
        [EventSubscribe("DoManagement")]
        private void OnDoManagement(object sender, EventArgs e)
        {
            //Set up  array of remove fractions to send with Cut method.  Each member in the array corresponds to an organ in the same order they are set up in.
            if (Clock.Today.Date == CutDate1)
            {
                //Remove.SetPhenologyStage = 3.5;
                Remove.SetFractionToRemove("Panicle", 1.0);
                Remove.SetFractionToResidue("Panicle", 0.0);
                Remove.SetFractionToRemove("Leaf", 0.7);
                Remove.SetFractionToResidue("Leaf", 0.0);
                Remove.SetFractionToRemove("Stem", 0.7);
                Remove.SetFractionToResidue("Stem", 0.0);
                Remove.SetFractionToRemove("Grain", 1.0);
                Remove.SetFractionToResidue("Grain", 0.0);
                Remove.SetFractionToRemove("Root", 0.0);
                Remove.SetFractionToResidue("Root", 0.0);
                Oats.RemoveBiomass("Cut", Remove);
            }
            if (Clock.Today.Date == CutDate2)
            {
                //Remove.SetPhenologyStage = 3.5;
                Remove.SetFractionToRemove("Panicle", 1.0);
                Remove.SetFractionToResidue("Panicle", 0.0);
                Remove.SetFractionToRemove("Leaf", 0.7);
                Remove.SetFractionToResidue("Leaf", 0.0);
                Remove.SetFractionToRemove("Stem", 0.7);
                Remove.SetFractionToResidue("Stem", 0.0);
                Remove.SetFractionToRemove("Grain", 1.0);
                Remove.SetFractionToResidue("Grain", 0.0);
                Remove.SetFractionToRemove("Root", 0.0);
                Remove.SetFractionToResidue("Root", 0.0);
                Oats.RemoveBiomass("Cut", Remove);
            }
        }
    }
}
```
          Simulation Roma2006Base
            Clock: Start=2006-05-24; End=2006-11-20
            Summary summaryfile
            Weather: FileName=WeatherFiles\Roma2006.met
            Zone paddock: Area=1; Slope=0; AspectAngle=0; Altitude=50
              Soil: Latitude=0; Longitude=0
                Physical
                  Thickness  BD    AirDry  LL15  DUL    SAT
                  150        1.25  0.11    0.19  0.4    0.45
                  150        1.33  0.15    0.19  0.389  0.44
                  300        1.32  0.18    0.21  0.422  0.47
                  300        1.47  0.19    0.22  0.317  0.4
                  300        1.52  0.19    0.22  0.332  0.38
                  300        1.55  0.19    0.22  0.33   0.38
                  SoilCrop OatsSoil: LL=[0.2, 0.2, 0.21, 0.26, 0.29, 0.3]; KL=[0.06, 0.05, 0.04, 0.03, 0.02, 0.02]; XF=[1, 1, 0.5, 0.2, 0.2, 0.2]
                WaterBalance SoilWater: SummerDate=1-Nov; SummerU=2; SummerCona=2; WinterDate=1-Apr; WinterU=2; WinterCona=2; DiffusConst=40; DiffusSlope=16; Salb=0.13; CN2Bare=78; CNRed=20; CNCov=0.8; PSIDul=-100; Thickness=[150, 150, 300, 300, 300, 300]; SWCON=[0.3, 0.3, 0.3, 0.5, 0.5, 0.5]
                Organic: FOMCNRatio=20; CarbonUnits=Total
                  Thickness  Carbon  SoilCNRatio  FBiom  FInert  FOM
                  150        1.46    14.5         0.035  0.45    195.299
                  150        0.7     14.5         0.02   0.55    144.681
                  300        0.3     14.5         0.015  0.8     79.4026
                  300        0.15    14.5         0.01   0.99    43.577
                  300        0.05    14.5         0.01   0.99    23.9156
                  300        0.05    14.5         0.01   0.99    13.1252
                Chemical: Thickness=[150, 150, 300, 300, 300, 300]; PH=[7.2, 7.9, 7.9, 7.3, 7.1, 7.1]; PHUnits=Water
                Water: Thickness=[150, 150, 300, 300, 300, 300]; InitialValues=[0.327, 0.333, 0.333, 0.262, 0.286, 0.29]; RelativeTo=LL15; FilledFromTop=false
                CERESSoilTemperature Temperature
                Nutrient
                Solute NO3: Thickness=[150, 150, 300, 300, 300, 300]; InitialValues=[16.1, 21.7, 24.3, 13.3, 7.9, 7.9]; InitialValuesUnits=ppm; WaterTableConcentration=0; D0=0; DepthConstant=0; MaxDepthSoluteAccessible=0; RunoffEffectivenessAtMovingSolute=0; MaxEffectiveRunoff=0
                Solute NH4: Thickness=[150, 150, 300, 300, 300, 300]; InitialValues=[0.3, 0.3, 0.3, 0.3, 0.3, 0.5]; InitialValuesUnits=ppm; WaterTableConcentration=0; D0=0; DepthConstant=0; MaxDepthSoluteAccessible=0; RunoffEffectivenessAtMovingSolute=0; MaxEffectiveRunoff=0
                Solute Urea: Thickness=[150, 150, 300, 300, 300, 300]; InitialValues=[0, 0, 0, 0, 0, 0]; InitialValuesUnits=kg/ha; WaterTableConcentration=0; D0=0; DepthConstant=0; MaxDepthSoluteAccessible=0; RunoffEffectivenessAtMovingSolute=0; MaxEffectiveRunoff=0
              Irrigation
              SurfaceOrganicMatter Surface Organic Matter: InitialResidueName=wheat_stubble; InitialResidueType=wheat; InitialResidueMass=0; InitialStandingFraction=0; InitialCPR=0; InitialCNR=80
              Fertiliser
              MicroClimate: a_interception=0; b_interception=1; c_interception=0; d_interception=0; SoilHeatFluxFraction=0.4; MinimumHeightDiffForNewLayer=0; NightInterceptionFraction=0.5; ReferenceHeight=2
              Plant Oats
              Folder Management
                Manager Cutting: same as Validation.Australia.Wellcamp2006.Wellcamp2006.Factors.Permutation.Cut.None
                Operations IrrigandFert
                  2006-05-25  [Fertiliser].Apply(35, Fertiliser.Types.NO3N, 20);
                  2006-05-29  [Irrigation].Apply(10);
                  2006-06-05  [Irrigation].Apply(10);
                  2006-08-15  [Fertiliser].Apply(40, Fertiliser.Types.NO3N, 10);
                  2006-06-05  [Irrigation].Apply(60);
                Operations Sowing
                Manager Harvesting: same as Validation.Australia.Gatton2007.Gatton2007early.Gatton2007.Gatton2007Base.paddock.Management.Harvesting
              Report DailyReport
              Report HarvestReport
              Report SupReport: EventNames=[Clock].DoReport
                VariableNames:
                  [Clock].Today
                  [Phenology].ThermalTime
                  [Oats].Arbitrator.DM.TotalFixationSupply
                  [Oats].Arbitrator.FN
                  [Oats].Leaf.Phyllochron
                  [Oats].Leaf.Photosynthesis.FT
                  [Oats].Leaf.Photosynthesis.FVPD
                  [Oats].Leaf.Photosynthesis.RueAct
                  [Oats].Leaf.NextExpandingLeafProportion
                  [Oats].Leaf.MeanTillerGrowthRate
                  sum([Soil].Water.MM[1:5]) as ProfileWater
            SoilArbitrator Soil Arbitrator
      Folder Tarlee2007
        Memo
          This experiment was run at Tarlee, South Australia, in 2007. Leaf disease (probably yellow spot) was observed to take hold in the latter stages of the experiment that may explain differences between observed and simulated LAI, leaf biomass and dead leaf biomass toward the end of the experiment.
        Experiment Tarlee2007
          Factors
            Factor AgRegime: Specification=[Operations]
              Operations HighInput
                2007-05-30  [Fertiliser].Apply(100, Fertiliser.Types.UreaN, 10);
                2007-08-27  [Irrigation].Apply(62);
                2007-09-17  [Irrigation].Apply(62);
              Operations LowInput
                2007-05-30  [Fertiliser].Apply(50, Fertiliser.Types.UreaN, 10);
          Simulation Tarlee2007Base
            Clock: Start=2007-05-03; End=2007-11-30
            Summary summaryfile
            Weather: FileName=WeatherFiles\MNHRZ_onsite_metdata07.met
            Zone paddock: Area=1; Slope=0; AspectAngle=0; Altitude=50
              Soil: SoilType=Clay Loam over Medium Clay; Site=Tarlee (TDS); NearestTown=Giles Corner; Region=Mid-north; State=South Australia; Latitude=-34.2367; Longitude=138.741; LocationAccuracy=+-20m; DataSource=University of Adelaide, Roseworthy
                Physical
                  Thickness  BD     AirDry  LL15   DUL    SAT
                  100        1.342  0.093   0.15   0.371  0.463
                  200        1.348  0.147   0.184  0.367  0.461
                  250        1.342  0.15    0.18   0.414  0.464
                  250        1.48   0.15    0.2    0.403  0.436
                  300        1.58   0.15    0.21   0.363  0.398
                  400        1.56   0.15    0.22   0.371  0.406
                  300        1.56   0.15    0.22   0.371  0.406
                  SoilCrop WheatSoil: LL=[0.186, 0.184, 0.228, 0.251, 0.261, 0.285, 0.285]; KL=[0.06, 0.06, 0.06, 0.04, 0.04, 0.02, 0.02]; XF=[1, 1, 1, 1, 1, 1, 1]
                  SoilCrop BarleySoil: LL=[0.186, 0.184, 0.228, 0.251, 0.261, 0.285, 0.285]; KL=[0.07, 0.07, 0.07, 0.05, 0.05, 0.03, 0.03]; XF=[1, 1, 1, 1, 1, 1, 1]
                  SoilCrop OatsSoil: LL=[0.15, 0.174, 0.216, 0.257, 0.263, 0.263, 0.263]; KL=[0.1, 0.1, 0.07, 0.07, 0.04, 0.03, 0.03]; XF=[1, 1, 1, 1, 1, 1, 1]
                  SoilCrop VetchSoil: LL=[0.186, 0.184, 0.216, 0.223, 0.237, 0.24, 0.24]; KL=[0.06, 0.06, 0.06, 0.04, 0.04, 0.02, 0.02]; XF=[1, 1, 1, 1, 1, 1, 1]
                WaterBalance SoilWater: SummerDate=1-Nov; SummerU=6; SummerCona=3.5; WinterDate=1-Apr; WinterU=2; WinterCona=2; DiffusConst=60; DiffusSlope=20; Salb=0.13; CN2Bare=73; CNRed=20; CNCov=0.8; PSIDul=-100; Thickness=[100, 200, 250, 250, 300, 400, 300]; SWCON=[0.5, 0.5, 0.5, 0.5, 0.5, 0.5, 0.5]
                Organic: FOMCNRatio=40; CarbonUnits=Total
                  Thickness  Carbon  SoilCNRatio  FBiom  FInert  FOM
                  100        1.56    12           0.04   0.4     351.498
                  200        0.74    12           0.02   0.5     251.859
                  250        0.48    12           0.02   0.7     166.036
                  250        0.2     12           0.02   1       109.458
                  300        0.13    12           0.01   1       66.3894
                  400        0.13    12           0.01   1       34.0855
                  300        0.13    12           0.01   1       20.6739
                Chemical: Thickness=[100, 200, 250, 250, 300, 400, 300]; PH=[7.2, 7.4, 8.1, 9, 9.3, 9.3, 9.3]; PHUnits=Water
                Water: Thickness=[100, 200, 250, 250, 300, 400, 300]; InitialValues=[0.22, 0.23, 0.255, 0.3, 0.332, 0.328, 0.328]; RelativeTo=LL15; FilledFromTop=false
                CERESSoilTemperature Temperature
                Nutrient
                Solute NO3: Thickness=[100, 200, 250, 250, 300, 400, 300]; InitialValues=[15.0001, 11, 8.00003, 4.39999, 2, 0.999999, 1]; InitialValuesUnits=ppm; WaterTableConcentration=0; D0=0; DepthConstant=0; MaxDepthSoluteAccessible=0; RunoffEffectivenessAtMovingSolute=0; MaxEffectiveRunoff=0
                Solute NH4: Thickness=[100, 200, 250, 250, 300, 400, 300]; InitialValuesUnits=ppm; WaterTableConcentration=0; D0=0; DepthConstant=0; MaxDepthSoluteAccessible=0; RunoffEffectivenessAtMovingSolute=0; MaxEffectiveRunoff=0
                  InitialValues=[1.00004, 1.99998, 1.00004, 0.999998, 0.0999905, 0.0999905, 0.1]
                Solute Urea: Thickness=[100, 200, 250, 250, 300, 400, 300]; InitialValues=[0, 0, 0, 0, 0, 0, 0]; InitialValuesUnits=kg/ha; WaterTableConcentration=0; D0=0; DepthConstant=0; MaxDepthSoluteAccessible=0; RunoffEffectivenessAtMovingSolute=0; MaxEffectiveRunoff=0
              Irrigation
              SurfaceOrganicMatter Surface Organic Matter: InitialResidueName=wheat_stubble; InitialResidueType=wheat; InitialResidueMass=0; InitialStandingFraction=0; InitialCPR=0; InitialCNR=80
              Fertiliser
              MicroClimate: a_interception=0; b_interception=1; c_interception=0; d_interception=0; SoilHeatFluxFraction=0.4; MinimumHeightDiffForNewLayer=0; NightInterceptionFraction=0.5; ReferenceHeight=2
              Plant Oats
              Folder Management
                Operations Sowing
                  2007-05-11  [Oats].Sow(population:200, cultivar:"Wintaroo", depth:30, rowSpacing:250);
                Operations
                Operations Harverst
                  2007-11-17  [Oats].Harvest()
              Report DailyReport
              Report HarvestReport
              Report SupReport: EventNames=[Clock].DoReport
                VariableNames:
                  [Clock].Today
                  [Phenology].ThermalTime
                  [Oats].Arbitrator.DM.TotalFixationSupply
                  [Oats].Arbitrator.FN
                  [Oats].Leaf.Phyllochron
                  [Oats].Leaf.Photosynthesis.FT
                  [Oats].Leaf.Photosynthesis.FVPD
                  [Oats].Leaf.Photosynthesis.RueAct
                  [Oats].Leaf.NextExpandingLeafProportion
                  [Oats].Leaf.MeanTillerGrowthRate
                  sum([Soil].Water.MM[1:6]) as ProfileWater
            SoilArbitrator Soil Arbitrator
      Folder LRCphenology
        Memo
          These simulations were used to develop phenology parameters for a range of cultivars used in northern Australia. Observed data was kindly supplied by Bruce Winter (Oats Breeder) and Richard Uebergang from experiments conducted at DAFQ Leslie Research Centre, Holberton St Toowoomba. SILO weather data from the nearby Toowoomba Airport was used. Approximated irrigation data and fertiliser regime was provided by LRC staff who managed the phenology screening trials to be non-water and N limiting.
        Experiment LRC2011
          Factors
            Permutation
              Factor Cv
                Specification=[SowAndCut].Script.Cultivar = Algerian, Nugene, Drover, Genie
              Factor Management: Specification=[SowAndCut].Script.Management = 1 to 3 step 1
          Simulation LRC2011Base
            Clock: Start=2011-02-01; End=2011-12-31
            Summary summaryfile
            Weather: FileName=WeatherFiles\Toowoomba_AP.met
            SoilArbitrator Soil Arbitrator
            Zone paddock: Area=1; Slope=0; AspectAngle=0; Altitude=50
              Soil: same as Validation.Australia.Wellcamp2006.Wellcamp2006.Wellcamp2006Base.paddock.Soil
              Irrigation
              SurfaceOrganicMatter Surface Organic Matter: InitialResidueName=wheat_stubble; InitialResidueType=wheat; InitialResidueMass=0; InitialStandingFraction=0; InitialCPR=0; InitialCNR=80
              Fertiliser
              MicroClimate: a_interception=0; b_interception=1; c_interception=0; d_interception=0; SoilHeatFluxFraction=0.4; MinimumHeightDiffForNewLayer=0; NightInterceptionFraction=0.5; ReferenceHeight=2
              Plant Oats
              Folder Management
                Operations IrrigandFert
                  2011-04-03  [Fertiliser].Apply(35, Fertiliser.Types.NO3N, 20);
                  2011-04-01  [Irrigation].Apply(40);
                  2011-08-15  [Fertiliser].Apply(40, Fertiliser.Types.NO3N, 10);
                  2011-06-30  [Irrigation].Apply(25);
                  2011-07-30  [Irrigation].Apply(25);
                  2011-08-15  [Irrigation].Apply(30);
                  2011-09-30  [Irrigation].Apply(40);
                  2011-10-30  [Irrigation].Apply(40);
                  2011-11-15  [Irrigation].Apply(40);
                Manager Harvesting: same as Validation.Australia.Gatton2007.Gatton2007early.Gatton2007.Gatton2007Base.paddock.Management.Harvesting
                Manager SowAndCut
                  Cultivar = Coolibah
                  Management = 0
```csharp
using Models.Soils;
using APSIM.Shared.Utilities;
using System.Xml.Serialization;
using Models.PMF.Interfaces;
using Models.PMF;
using Models.Core;
using System.Collections.Generic;
using System;
using Newtonsoft.Json;

namespace Models
{
    [Serializable] 
    [System.Xml.Serialization.XmlInclude(typeof(Model))]
    public class Script : Model
    {
        [Link] Plant Oats;
        [Link] Clock Clock;

        [Description("Cultivar")]
        public string Cultivar { get; set; }
        [Description("Management")]
        public int Management { get; set; }

        private string SowDate;
        private string CutDate1;
        private string CutDate2;


        [JsonIgnore] private RemovalFractions Remove { get; set; }
        
        [EventSubscribe("StartOfSimulation")]
        private void OnSimulationCommencing(object sender, EventArgs e)
        {
            Remove = new RemovalFractions();
            if (Management == 1)
            {
            SowDate = "9-feb";
            CutDate1 = "";
            CutDate2 = "";
            }
            else if (Management == 2)
            {
            SowDate = "8-mar";
            CutDate1 = "";
            CutDate2 = "";
            }
            else if (Management == 3)
            {
            SowDate = "5-apr";
            CutDate1 = "";
            CutDate2 = "";
            }
            else if (Management == 4)
            {
            SowDate = "9-feb";
            CutDate1 = "12-apr";
            CutDate2 = "10-may";
            }
            else if (Management == 5)
            {
            SowDate = "8-mar";
            CutDate1 = "9-may";
            CutDate2 = "6-jun";
            }
            else if (Management == 6)
            {
            SowDate = "5-apr";
            CutDate1 = "6-jun";
            CutDate2 = "4-jul";
            }

        }
        
        [EventSubscribe("DoManagement")]
        private void OnDoManagement(object sender, EventArgs e)
        {

            if (DateUtilities.WithinDates(SowDate,Clock.Today,SowDate) )
            {
                Oats.Sow(population:95, cultivar: Cultivar, depth:40, rowSpacing:250);
            }

            //Set up  array of remove fractions to send with Cut method.  Each member in the array corresponds to an organ in the same order they are set up in.
            if (CutDate1 !="")
                if (DateUtilities.WithinDates(CutDate1,Clock.Today,CutDate1))
                {
                    //Remove.SetPhenologyStage = 2.0;
                    Remove.SetFractionToRemove("Panicle", 1.0);
                    Remove.SetFractionToResidue("Panicle", 0.0);
                    Remove.SetFractionToRemove("Leaf", 0.8);
                    Remove.SetFractionToResidue("Leaf", 0.0);
                    Remove.SetFractionToRemove("Stem", 0.8);
                    Remove.SetFractionToResidue("Stem", 0.0);
                    Remove.SetFractionToRemove("Grain", 1.0);
                    Remove.SetFractionToResidue("Grain", 0.0);
                    Remove.SetFractionToRemove("Root", 0.0);
                    Remove.SetFractionToResidue("Root", 0.0);
                    Oats.RemoveBiomass("Cut", Remove);
                }
            //Set up  array of remove fractions to send with Cut method.  Each member in the array corresponds to an organ in the same order they are set up in.
            if (CutDate2 !="")
                if (DateUtilities.WithinDates(CutDate2,Clock.Today,CutDate2))
                {
                    //Remove.SetPhenologyStage = 2.0;
                    Remove.SetFractionToRemove("Panicle", 1.0);
                    Remove.SetFractionToResidue("Panicle", 0.0);
                    Remove.SetFractionToRemove("Leaf", 0.8);
                    Remove.SetFractionToResidue("Leaf", 0.0);
                    Remove.SetFractionToRemove("Stem", 0.8);
                    Remove.SetFractionToResidue("Stem", 0.0);
                    Remove.SetFractionToRemove("Grain", 1.0);
                    Remove.SetFractionToResidue("Grain", 0.0);
                    Remove.SetFractionToRemove("Root", 0.0);
                    Remove.SetFractionToResidue("Root", 0.0);
                    Oats.RemoveBiomass("Cut", Remove);
                }

            
        }
    }
}
```
              Report DailyReport
              Report HarvestReport
              Report SupReport: same as Validation.Australia.Wellcamp2006.Wellcamp2006.Wellcamp2006Base.paddock.SupReport
        Experiment LRC2012
          Factors
            Permutation
              Factor Cv
                Specification=[SowAndCut].Script.Cultivar = Algerian, Nugene, Drover, Genie, Aladdin
              Factor Management: Specification=[SowAndCut].Script.Management = 1 to 3 step 1
          Simulation LRC2012Base
            Clock: Start=2012-02-01; End=2012-12-31
            Summary summaryfile
            Weather: FileName=WeatherFiles\Toowoomba_AP.met
            SoilArbitrator Soil Arbitrator
            Zone paddock: Area=1; Slope=0; AspectAngle=0; Altitude=50
              Soil: same as Validation.Australia.Wellcamp2006.Wellcamp2006.Wellcamp2006Base.paddock.Soil
              Irrigation
              SurfaceOrganicMatter Surface Organic Matter: InitialResidueName=wheat_stubble; InitialResidueType=wheat; InitialResidueMass=0; InitialStandingFraction=0; InitialCPR=0; InitialCNR=80
              Fertiliser
              MicroClimate: a_interception=0; b_interception=1; c_interception=0; d_interception=0; SoilHeatFluxFraction=0.4; MinimumHeightDiffForNewLayer=0; NightInterceptionFraction=0.5; ReferenceHeight=2
              Plant Oats
              Folder Management
                Operations IrrigandFert
                  2012-04-03  [Fertiliser].Apply(35, Fertiliser.Types.NO3N, 20);
                  2012-04-10  [Irrigation].Apply(40);
                  2012-08-15  [Fertiliser].Apply(40, Fertiliser.Types.NO3N, 10);
                  2012-05-20  [Irrigation].Apply(30);
                  2012-08-10  [Irrigation].Apply(25);
                  2012-08-31  [Irrigation].Apply(30);
                  2012-09-20  [Irrigation].Apply(40);
                  2012-10-30  [Irrigation].Apply(40);
                  2012-11-15  [Irrigation].Apply(25);
                Manager Harvesting: same as Validation.Australia.Gatton2007.Gatton2007early.Gatton2007.Gatton2007Base.paddock.Management.Harvesting
                Manager SowAndCut
                  Cultivar = Coolibah
                  Management = 0
```csharp
using Models.Soils;
using APSIM.Shared.Utilities;
using System.Xml.Serialization;
using Models.PMF.Interfaces;
using Models.PMF;
using Models.Core;
using System.Collections.Generic;
using System;
using Newtonsoft.Json;

namespace Models
{
    [Serializable] 
    [System.Xml.Serialization.XmlInclude(typeof(Model))]
    public class Script : Model
    {
        [Link] Plant Oats;
        [Link] Clock Clock;

        [Description("Cultivar")]
        public string Cultivar { get; set; }
        [Description("Management")]
        public int Management { get; set; }

        private string SowDate;
        private string CutDate1;
        private string CutDate2;


        [JsonIgnore] private RemovalFractions Remove { get; set; }
        
        [EventSubscribe("StartOfSimulation")]
        private void OnSimulationCommencing(object sender, EventArgs e)
        {
            Remove = new RemovalFractions();
            if (Management == 1)
            {
            SowDate = "6-feb";
            CutDate1 = "";
            CutDate2 = "";
            }
            else if (Management == 2)
            {
            SowDate = "5-mar";
            CutDate1 = "";
            CutDate2 = "";
            }
            else if (Management == 3)
            {
            SowDate = "2-apr";
            CutDate1 = "";
            CutDate2 = "";
            }
            else if (Management == 4)
            {
            SowDate = "6-feb";
            CutDate1 = "2-apr";
            CutDate2 = "30-apr";
            }
            else if (Management == 5)
            {
            SowDate = "5-mar";
            CutDate1 = "30-apr";
            CutDate2 = "28-may";
            }
            else if (Management == 6)
            {
            SowDate = "2-apr";
            CutDate1 = "28-may";
            CutDate2 = "25-jun";
            }

        }
        
        [EventSubscribe("DoManagement")]
        private void OnDoManagement(object sender, EventArgs e)
        {

            if (DateUtilities.WithinDates(SowDate,Clock.Today,SowDate) )
            {
                Oats.Sow(population:95, cultivar: Cultivar, depth:40, rowSpacing:250);
            }

            //Set up  array of remove fractions to send with Cut method.  Each member in the array corresponds to an organ in the same order they are set up in.
            if (CutDate1 !="")
                if (DateUtilities.WithinDates(CutDate1,Clock.Today,CutDate1))
                {
                    //Remove.SetPhenologyStage = 2.0;
                    Remove.SetFractionToRemove("Panicle", 1.0);
                    Remove.SetFractionToResidue("Panicle", 0.0);
                    Remove.SetFractionToRemove("Leaf", 0.8);
                    Remove.SetFractionToResidue("Leaf", 0.0);
                    Remove.SetFractionToRemove("Stem", 0.8);
                    Remove.SetFractionToResidue("Stem", 0.0);
                    Remove.SetFractionToRemove("Grain", 1.0);
                    Remove.SetFractionToResidue("Grain", 0.0);
                    Remove.SetFractionToRemove("Root", 0.0);
                    Remove.SetFractionToResidue("Root", 0.0);
                    Oats.RemoveBiomass("Cut", Remove);
                }
            //Set up  array of remove fractions to send with Cut method.  Each member in the array corresponds to an organ in the same order they are set up in.
            if (CutDate2 !="")
                if (DateUtilities.WithinDates(CutDate2,Clock.Today,CutDate2))
                {
                    //Remove.SetPhenologyStage = 2.0;
                    Remove.SetFractionToRemove("Panicle", 1.0);
                    Remove.SetFractionToResidue("Panicle", 0.0);
                    Remove.SetFractionToRemove("Leaf", 0.8);
                    Remove.SetFractionToResidue("Leaf", 0.0);
                    Remove.SetFractionToRemove("Stem", 0.8);
                    Remove.SetFractionToResidue("Stem", 0.0);
                    Remove.SetFractionToRemove("Grain", 1.0);
                    Remove.SetFractionToResidue("Grain", 0.0);
                    Remove.SetFractionToRemove("Root", 0.0);
                    Remove.SetFractionToResidue("Root", 0.0);
                    Oats.RemoveBiomass("Cut", Remove);
                }

            
        }
    }
}
```
              Report DailyReport
              Report HarvestReport
              Report SupReport: EventNames=[Clock].DoReport
                VariableNames:
                  [Clock].Today
                  [Phenology].ThermalTime
                  [Oats].Arbitrator.DM.TotalFixationSupply
                  [Oats].Arbitrator.FN
                  [Oats].Leaf.Photosynthesis.FVPD
                  [Oats].Leaf.Photosynthesis.RueAct
                  [Oats].Leaf.NextExpandingLeafProportion
                  [Oats].Leaf.MeanTillerGrowthRate
                  sum([Soil].Water.MM[1:7]) as ProfileWater
        Experiment LRC2014
          Factors
            Permutation
              Factor Cv
                Specification=[SowAndCut].Script.Cultivar = Algerian, Drover, Genie, Aladdin, Comet, Taipan, Wizard
              Factor Management: Specification=[SowAndCut].Script.Management = 1 to 2 step 1
          Simulation LRC2014Base
            Clock: Start=2014-02-01; End=2014-12-31
            Summary summaryfile
            Weather: FileName=WeatherFiles\Toowoomba_AP.met
            SoilArbitrator Soil Arbitrator
            Zone paddock: Area=1; Slope=0; AspectAngle=0; Altitude=50
              Soil: same as Validation.Australia.Wellcamp2006.Wellcamp2006.Wellcamp2006Base.paddock.Soil
              Irrigation
              SurfaceOrganicMatter Surface Organic Matter: InitialResidueName=wheat_stubble; InitialResidueType=wheat; InitialResidueMass=0; InitialStandingFraction=0; InitialCPR=0; InitialCNR=80
              Fertiliser
              MicroClimate: a_interception=0; b_interception=1; c_interception=0; d_interception=0; SoilHeatFluxFraction=0.4; MinimumHeightDiffForNewLayer=0; NightInterceptionFraction=0.5; ReferenceHeight=2
              Plant Oats
              Folder Management
                Operations IrrigandFert
                  2014-02-01  [Irrigation].Apply(50);
                  2014-02-14  [Irrigation].Apply(25);
                  2014-03-01  [Irrigation].Apply(25);
                  2014-03-15  [Irrigation].Apply(40);
                  2014-03-21  [Fertiliser].Apply(35, Fertiliser.Types.NO3N, 20);
                  2014-04-21  [Irrigation].Apply(25);
                  2014-05-18  [Irrigation].Apply(25);
                  2014-08-15  [Fertiliser].Apply(40, Fertiliser.Types.NO3N, 10);
                  2014-06-03  [Irrigation].Apply(25);
                  2014-06-19  [Irrigation].Apply(25);
                  2014-07-10  [Irrigation].Apply(30);
                  2014-08-01  [Irrigation].Apply(25);
                  2014-09-05  [Irrigation].Apply(30);
                  2014-09-22  [Irrigation].Apply(25);
                  2014-10-03  [Irrigation].Apply(40);
                  2014-10-17  [Irrigation].Apply(25);
                  2014-10-30  [Irrigation].Apply(40);
                  2014-11-14  [Irrigation].Apply(25);
                  2014-11-30  [Irrigation].Apply(25);
                Manager Harvesting: same as Validation.Australia.Gatton2007.Gatton2007early.Gatton2007.Gatton2007Base.paddock.Management.Harvesting
                Manager SowAndCut
                  Cultivar = Coolibah
                  Management = 0
```csharp
using Models.Soils;
using APSIM.Shared.Utilities;
using System.Xml.Serialization;
using Models.PMF.Interfaces;
using Models.PMF;
using Models.Core;
using System.Collections.Generic;
using System;
using Newtonsoft.Json;

namespace Models
{
    [Serializable] 
    [System.Xml.Serialization.XmlInclude(typeof(Model))]
    public class Script : Model
    {
        [Link] Plant Oats;
        [Link] Clock Clock;

        [Description("Cultivar")]
        public string Cultivar { get; set; }
        [Description("Management")]
        public int Management { get; set; }

        private string SowDate;
        private string CutDate1;
        private string CutDate2;


        [JsonIgnore] private RemovalFractions Remove { get; set; }
        
        [EventSubscribe("StartOfSimulation")]
        private void OnSimulationCommencing(object sender, EventArgs e)
        {
            Remove = new RemovalFractions();
            if (Management == 1)
            {
            SowDate = "3-mar";
            CutDate1 = "";
            CutDate2 = "";
            }
            else if (Management == 2)
            {
            SowDate = "1-apr";
            CutDate1 = "";
            CutDate2 = "";
            }
            else if (Management == 3)
            {
            SowDate = "3-feb";
            CutDate1 = "1-jun";
            CutDate2 = "";
            }
            else if (Management == 4)
            {
            SowDate = "3-feb";
            CutDate1 = "24-mar";
            CutDate2 = "28-apr";
            }
            else if (Management == 5)
            {
            SowDate = "3-mar";
            CutDate1 = "28-apr";
            CutDate2 = "26-may";
            }
            else if (Management == 6)
            {
            SowDate = "1-apr";
            CutDate1 = "26-may";
            CutDate2 = "23-jun";
            }

        }
        
        [EventSubscribe("DoManagement")]
        private void OnDoManagement(object sender, EventArgs e)
        {

            if (DateUtilities.WithinDates(SowDate,Clock.Today,SowDate) )
            {
                Oats.Sow(population:95, cultivar: Cultivar, depth:40, rowSpacing:250);
            }

            //Set up  array of remove fractions to send with Cut method.  Each member in the array corresponds to an organ in the same order they are set up in.
            if (CutDate1 !="")
                if (DateUtilities.WithinDates(CutDate1,Clock.Today,CutDate1))
                {
                    //Remove.SetPhenologyStage = 2.0;
                    Remove.SetFractionToRemove("Panicle", 1.0);
                    Remove.SetFractionToResidue("Panicle", 0.0);
                    Remove.SetFractionToRemove("Leaf", 0.8);
                    Remove.SetFractionToResidue("Leaf", 0.0);
                    Remove.SetFractionToRemove("Stem", 0.8);
                    Remove.SetFractionToResidue("Stem", 0.0);
                    Remove.SetFractionToRemove("Grain", 1.0);
                    Remove.SetFractionToResidue("Grain", 0.0);
                    Remove.SetFractionToRemove("Root", 0.0);
                    Remove.SetFractionToResidue("Root", 0.0);
                    Oats.RemoveBiomass("Cut", Remove);
                }
            //Set up  array of remove fractions to send with Cut method.  Each member in the array corresponds to an organ in the same order they are set up in.
            if (CutDate2 !="")
                if (DateUtilities.WithinDates(CutDate2,Clock.Today,CutDate2))
                {
                    //Remove.SetPhenologyStage = 2.0;
                    Remove.SetFractionToRemove("Panicle", 1.0);
                    Remove.SetFractionToResidue("Panicle", 0.0);
                    Remove.SetFractionToRemove("Leaf", 0.8);
                    Remove.SetFractionToResidue("Leaf", 0.0);
                    Remove.SetFractionToRemove("Stem", 0.8);
                    Remove.SetFractionToResidue("Stem", 0.0);
                    Remove.SetFractionToRemove("Grain", 1.0);
                    Remove.SetFractionToResidue("Grain", 0.0);
                    Remove.SetFractionToRemove("Root", 0.0);
                    Remove.SetFractionToResidue("Root", 0.0);
                    Oats.RemoveBiomass("Cut", Remove);
                }

            
        }
    }
}
```
              Report DailyReport
              Report HarvestReport
              Report SupReport: EventNames=[Clock].DoReport
                VariableNames:
                  [Clock].Today
                  [Phenology].ThermalTime
                  [Oats].Arbitrator.DM.TotalFixationSupply
                  [Oats].Arbitrator.FN
                  [Oats].Leaf.Phyllochron
                  [Oats].Leaf.Photosynthesis.FVPD
                  [Oats].Leaf.Photosynthesis.RueAct
                  [Oats].Leaf.NextExpandingLeafProportion
                  [Oats].Leaf.MeanTillerGrowthRate
                  sum([Soil].Water.MM[1:7]) as ProfileWater
        Experiment LRC2015
          Factors
            Permutation
              Factor Cv
                Specification=[SowAndCut].Script.Cultivar = Algerian, Drover, Genie, Aladdin, Comet, Taipan, Wizard
              Factor Management: Specification=[SowAndCut].Script.Management = 1 to 3 step 1
          Simulation LRC2015Base
            Clock: Start=2015-02-01; End=2015-12-31
            Summary summaryfile
            Weather: FileName=WeatherFiles\Toowoomba_AP.met
            SoilArbitrator Soil Arbitrator
            Zone paddock: Area=1; Slope=0; AspectAngle=0; Altitude=50
              Soil: same as Validation.Australia.Wellcamp2006.Wellcamp2006.Wellcamp2006Base.paddock.Soil
              Irrigation
              SurfaceOrganicMatter Surface Organic Matter: InitialResidueName=wheat_stubble; InitialResidueType=wheat; InitialResidueMass=0; InitialStandingFraction=0; InitialCPR=0; InitialCNR=80
              Fertiliser
              MicroClimate: a_interception=0; b_interception=1; c_interception=0; d_interception=0; SoilHeatFluxFraction=0.4; MinimumHeightDiffForNewLayer=0; NightInterceptionFraction=0.5; ReferenceHeight=2
              Plant Oats
              Folder Management
                Operations IrrigandFert
                  2015-02-01  [Irrigation].Apply(50);
                  2015-02-14  [Irrigation].Apply(25);
                  2015-03-10  [Irrigation].Apply(40);
                  2015-03-21  [Fertiliser].Apply(35, Fertiliser.Types.NO3N, 20);
                  2015-04-15  [Irrigation].Apply(25);
                  2015-05-21  [Irrigation].Apply(25);
                  2015-08-15  [Fertiliser].Apply(40, Fertiliser.Types.NO3N, 10);
                  2015-06-03  [Irrigation].Apply(25);
                  2015-06-23  [Irrigation].Apply(25);
                  2015-07-07  [Irrigation].Apply(30);
                  2015-07-21  [Irrigation].Apply(30);
                  2015-08-12  [Irrigation].Apply(25);
                  2015-09-14  [Irrigation].Apply(40);
                  2015-09-28  [Irrigation].Apply(40);
                  2015-10-16  [Irrigation].Apply(40);
                  2015-11-21  [Irrigation].Apply(25);
                Manager Harvesting: same as Validation.Australia.Gatton2007.Gatton2007early.Gatton2007.Gatton2007Base.paddock.Management.Harvesting
                Manager SowAndCut
                  Cultivar = Coolibah
                  Management = 0
```csharp
using Models.Soils;
using APSIM.Shared.Utilities;
using System.Xml.Serialization;
using Models.PMF.Interfaces;
using Models.PMF;
using Models.Core;
using System.Collections.Generic;
using System;
using Newtonsoft.Json;

namespace Models
{
    [Serializable] 
    [System.Xml.Serialization.XmlInclude(typeof(Model))]
    public class Script : Model
    {
        [Link] Plant Oats;
        [Link] Clock Clock;

        [Description("Cultivar")]
        public string Cultivar { get; set; }
        [Description("Management")]
        public int Management { get; set; }

        private string SowDate;
        private string CutDate1;
        private string CutDate2;


        [JsonIgnore] private RemovalFractions Remove { get; set; }
        
        [EventSubscribe("StartOfSimulation")]
        private void OnSimulationCommencing(object sender, EventArgs e)
        {
            Remove = new RemovalFractions();
            if (Management == 1)
            {
            SowDate = "2-feb";
            CutDate1 = "";
            CutDate2 = "";
            }
            else if (Management == 2)
            {
            SowDate = "2-mar";
            CutDate1 = "";
            CutDate2 = "";
            }
            else if (Management == 3)
            {
            SowDate = "30-mar";
            CutDate1 = "";
            CutDate2 = "";
            }
            else if (Management == 4)
            {
            SowDate = "2-feb";
            CutDate1 = "30-mar";
            CutDate2 = "27-apr";
            }
            else if (Management == 5)
            {
            SowDate = "2-mar";
            CutDate1 = "27-apr";
            CutDate2 = "25-may";
            }
            else if (Management == 6)
            {
            SowDate = "30-mar";
            CutDate1 = "25-may";
            CutDate2 = "22-jun";
            }

        }
        
        [EventSubscribe("DoManagement")]
        private void OnDoManagement(object sender, EventArgs e)
        {

            if (DateUtilities.WithinDates(SowDate,Clock.Today,SowDate) )
            {
                Oats.Sow(population:95, cultivar: Cultivar, depth:40, rowSpacing:250);
            }

            //Set up  array of remove fractions to send with Cut method.  Each member in the array corresponds to an organ in the same order they are set up in.
            if (CutDate1 !="")
                if (DateUtilities.WithinDates(CutDate1,Clock.Today,CutDate1))
                {
                    //Remove.SetPhenologyStage = 2.0;
                    Remove.SetFractionToRemove("Panicle", 1.0);
                    Remove.SetFractionToResidue("Panicle", 0.0);
                    Remove.SetFractionToRemove("Leaf", 0.8);
                    Remove.SetFractionToResidue("Leaf", 0.0);
                    Remove.SetFractionToRemove("Stem", 0.8);
                    Remove.SetFractionToResidue("Stem", 0.0);
                    Remove.SetFractionToRemove("Grain", 1.0);
                    Remove.SetFractionToResidue("Grain", 0.0);
                    Remove.SetFractionToRemove("Root", 0.0);
                    Remove.SetFractionToResidue("Root", 0.0);
                    Oats.RemoveBiomass("Cut", Remove);
                }
            //Set up  array of remove fractions to send with Cut method.  Each member in the array corresponds to an organ in the same order they are set up in.
            if (CutDate2 !="")
                if (DateUtilities.WithinDates(CutDate2,Clock.Today,CutDate2))
                {
                    //Remove.SetPhenologyStage = 2.0;
                    Remove.SetFractionToRemove("Panicle", 1.0);
                    Remove.SetFractionToResidue("Panicle", 0.0);
                    Remove.SetFractionToRemove("Leaf", 0.8);
                    Remove.SetFractionToResidue("Leaf", 0.0);
                    Remove.SetFractionToRemove("Stem", 0.8);
                    Remove.SetFractionToResidue("Stem", 0.0);
                    Remove.SetFractionToRemove("Grain", 1.0);
                    Remove.SetFractionToResidue("Grain", 0.0);
                    Remove.SetFractionToRemove("Root", 0.0);
                    Remove.SetFractionToResidue("Root", 0.0);
                    Oats.RemoveBiomass("Cut", Remove);
                }

            
        }
    }
}
```
              Report DailyReport
              Report HarvestReport
              Report SupReport: same as Validation.Australia.Wellcamp2006.Wellcamp2006.Wellcamp2006Base.paddock.SupReport
        Experiment LRC2016
          Factors: same as Validation.Australia.LRCphenology.LRC2015.Factors
          Simulation LRC2016Base
            Clock: Start=2016-02-01; End=2016-12-31
            Summary summaryfile
            Weather: FileName=WeatherFiles\Toowoomba_AP.met
            SoilArbitrator Soil Arbitrator
            Zone paddock: Area=1; Slope=0; AspectAngle=0; Altitude=50
              Soil: same as Validation.Australia.Wellcamp2006.Wellcamp2006.Wellcamp2006Base.paddock.Soil
              Irrigation
              SurfaceOrganicMatter Surface Organic Matter: InitialResidueName=wheat_stubble; InitialResidueType=wheat; InitialResidueMass=0; InitialStandingFraction=0; InitialCPR=0; InitialCNR=80
              Fertiliser
              MicroClimate: a_interception=0; b_interception=1; c_interception=0; d_interception=0; SoilHeatFluxFraction=0.4; MinimumHeightDiffForNewLayer=0; NightInterceptionFraction=0.5; ReferenceHeight=2
              Plant Oats
              Folder Management
                Operations IrrigandFert
                  2016-02-01  [Irrigation].Apply(50);
                  2016-02-14  [Irrigation].Apply(25);
                  2016-03-01  [Irrigation].Apply(40);
                  2016-03-21  [Irrigation].Apply(25);
                  2016-03-21  [Fertiliser].Apply(35, Fertiliser.Types.NO3N, 20);
                  2016-04-08  [Irrigation].Apply(40);
                  2016-04-22  [Irrigation].Apply(40);
                  2016-05-06  [Irrigation].Apply(25);
                  2016-08-15  [Fertiliser].Apply(40, Fertiliser.Types.NO3N, 10);
                  2016-05-20  [Irrigation].Apply(25);
                  2016-07-21  [Irrigation].Apply(30);
                  2016-08-10  [Irrigation].Apply(25);
                  2016-09-02  [Irrigation].Apply(30);
                  2016-10-15  [Irrigation].Apply(25);
                  2016-10-30  [Irrigation].Apply(40);
                  2016-11-20  [Irrigation].Apply(40);
                Manager Harvesting: same as Validation.Australia.Gatton2007.Gatton2007early.Gatton2007.Gatton2007Base.paddock.Management.Harvesting
                Manager SowAndCut
                  Cultivar = Coolibah
                  Management = 0
```csharp
using Models.Soils;
using APSIM.Shared.Utilities;
using System.Xml.Serialization;
using Models.PMF.Interfaces;
using Models.PMF;
using Models.Core;
using System.Collections.Generic;
using System;
using Newtonsoft.Json;

namespace Models
{
    [Serializable] 
    [System.Xml.Serialization.XmlInclude(typeof(Model))]
    public class Script : Model
    {
        [Link] Plant Oats;
        [Link] Clock Clock;

        [Description("Cultivar")]
        public string Cultivar { get; set; }
        [Description("Management")]
        public int Management { get; set; }

        private string SowDate;
        private string CutDate1;
        private string CutDate2;


        [JsonIgnore] private RemovalFractions Remove { get; set; }
        
        [EventSubscribe("StartOfSimulation")]
        private void OnSimulationCommencing(object sender, EventArgs e)
        {
            Remove = new RemovalFractions();
            if (Management == 1)
            {
            SowDate = "1-feb";
            CutDate1 = "";
            CutDate2 = "";
            }
            else if (Management == 2)
            {
            SowDate = "29-feb";
            CutDate1 = "";
            CutDate2 = "";
            }
            else if (Management == 3)
            {
            SowDate = "29-mar";
            CutDate1 = "";
            CutDate2 = "";
            }
            else if (Management == 4)
            {
            SowDate = "1-feb";
            CutDate1 = "29-mar";
            CutDate2 = "26-apr";
            }
            else if (Management == 5)
            {
            SowDate = "29-feb";
            CutDate1 = "26-apr";
            CutDate2 = "24-may";
            }
            else if (Management == 6)
            {
            SowDate = "29-mar";
            CutDate1 = "24-may";
            CutDate2 = "21-jun";
            }
        }
        
        [EventSubscribe("DoManagement")]
        private void OnDoManagement(object sender, EventArgs e)
        {

            if (DateUtilities.WithinDates(SowDate,Clock.Today,SowDate) )
            {
                Oats.Sow(population:95, cultivar: Cultivar, depth:40, rowSpacing:250);
            }

            //Set up  array of remove fractions to send with Cut method.  Each member in the array corresponds to an organ in the same order they are set up in.
            if (CutDate1 !="")
                if (DateUtilities.WithinDates(CutDate1,Clock.Today,CutDate1))
                {
                    //Remove.SetPhenologyStage = 2.0;
                    Remove.SetFractionToRemove("Panicle", 1.0);
                    Remove.SetFractionToResidue("Panicle", 0.0);
                    Remove.SetFractionToRemove("Leaf", 0.8);
                    Remove.SetFractionToResidue("Leaf", 0.0);
                    Remove.SetFractionToRemove("Stem", 0.8);
                    Remove.SetFractionToResidue("Stem", 0.0);
                    Remove.SetFractionToRemove("Grain", 1.0);
                    Remove.SetFractionToResidue("Grain", 0.0);
                    Remove.SetFractionToRemove("Root", 0.0);
                    Remove.SetFractionToResidue("Root", 0.0);
                    Oats.RemoveBiomass("Cut", Remove);
                }
            //Set up  array of remove fractions to send with Cut method.  Each member in the array corresponds to an organ in the same order they are set up in.
            if (CutDate2 !="")
                if (DateUtilities.WithinDates(CutDate2,Clock.Today,CutDate2))
                {
                    //Remove.SetPhenologyStage = 2.0;
                    Remove.SetFractionToRemove("Panicle", 1.0);
                    Remove.SetFractionToResidue("Panicle", 0.0);
                    Remove.SetFractionToRemove("Leaf", 0.8);
                    Remove.SetFractionToResidue("Leaf", 0.0);
                    Remove.SetFractionToRemove("Stem", 0.8);
                    Remove.SetFractionToResidue("Stem", 0.0);
                    Remove.SetFractionToRemove("Grain", 1.0);
                    Remove.SetFractionToResidue("Grain", 0.0);
                    Remove.SetFractionToRemove("Root", 0.0);
                    Remove.SetFractionToResidue("Root", 0.0);
                    Oats.RemoveBiomass("Cut", Remove);
                }

            
        }
    }
}
```
              Report DailyReport
              Report HarvestReport
              Report SupReport: EventNames=[Clock].DoReport
                VariableNames:
                  [Clock].Today
                  [Phenology].ThermalTime
                  [Oats].Arbitrator.DM.TotalFixationSupply
                  [Oats].Arbitrator.FN
                  [Oats].Leaf.Phyllochron
                  [Oats].Leaf.Photosynthesis.FT
                  [Oats].Leaf.Photosynthesis.FVPD
                  [Oats].Leaf.Photosynthesis.RueAct
                  [Oats].Leaf.NextExpandingLeafProportion
                  [Oats].Leaf.MeanTillerGrowthRate
                  sum([Soil].Water.MM[1:7]) as ProfileWater
        Experiment LRC2017
          Factors
            Permutation
              Factor Cv
                Specification=[SowAndCut].Script.Cultivar = Algerian, Genie, Aladdin, Comet, Taipan, Wizard, Bond
              Factor Management: Specification=[SowAndCut].Script.Management = 1 to 3 step 1
          Simulation LRC2017Base
            Clock: Start=2017-02-01; End=2017-12-31
            Summary summaryfile
            Weather: FileName=WeatherFiles\Toowoomba_AP.met
            SoilArbitrator Soil Arbitrator
            Zone paddock: Area=1; Slope=0; AspectAngle=0; Altitude=50
              Soil: same as Validation.Australia.Wellcamp2006.Wellcamp2006.Wellcamp2006Base.paddock.Soil
              Irrigation
              SurfaceOrganicMatter Surface Organic Matter: InitialResidueName=wheat_stubble; InitialResidueType=wheat; InitialResidueMass=0; InitialStandingFraction=0; InitialCPR=0; InitialCNR=80
              Fertiliser
              MicroClimate: a_interception=0; b_interception=1; c_interception=0; d_interception=0; SoilHeatFluxFraction=0.4; MinimumHeightDiffForNewLayer=0; NightInterceptionFraction=0.5; ReferenceHeight=2
              Plant Oats
              Folder Management
                Operations IrrigandFert
                  2017-02-01  [Irrigation].Apply(50);
                  2017-02-14  [Irrigation].Apply(25);
                  2017-03-21  [Fertiliser].Apply(35, Fertiliser.Types.NO3N, 20);
                  2017-04-22  [Irrigation].Apply(25);
                  2017-05-09  [Irrigation].Apply(25);
                  2017-08-15  [Fertiliser].Apply(40, Fertiliser.Types.NO3N, 10);
                  2017-05-24  [Irrigation].Apply(25);
                  2017-07-05  [Irrigation].Apply(30);
                  2017-07-25  [Irrigation].Apply(25);
                  2017-08-14  [Irrigation].Apply(25);
                  2017-08-29  [Irrigation].Apply(30);
                  2017-09-11  [Irrigation].Apply(25);
                  2017-09-25  [Irrigation].Apply(40);
                  2017-11-11  [Irrigation].Apply(25);
                Manager Harvesting: same as Validation.Australia.Gatton2007.Gatton2007early.Gatton2007.Gatton2007Base.paddock.Management.Harvesting
                Manager SowAndCut
                  Cultivar = Coolibah
                  Management = 0
```csharp
using Models.Soils;
using APSIM.Shared.Utilities;
using System.Xml.Serialization;
using Models.PMF.Interfaces;
using Models.PMF;
using Models.Core;
using System.Collections.Generic;
using System;
using Newtonsoft.Json;

namespace Models
{
    [Serializable] 
    [System.Xml.Serialization.XmlInclude(typeof(Model))]
    public class Script : Model
    {
        [Link] Plant Oats;
        [Link] Clock Clock;

        [Description("Cultivar")]
        public string Cultivar { get; set; }
        [Description("Management")]
        public int Management { get; set; }

        private string SowDate;
        private string CutDate1;
        private string CutDate2;


        [JsonIgnore] private RemovalFractions Remove { get; set; }
        
        [EventSubscribe("StartOfSimulation")]
        private void OnSimulationCommencing(object sender, EventArgs e)
        {
            Remove = new RemovalFractions();
            if (Management == 1)
            {
            SowDate = "7-feb";
            CutDate1 = "";
            CutDate2 = "";
            }
            else if (Management == 2)
            {
            SowDate = "7-mar";
            CutDate1 = "";
            CutDate2 = "";
            }
            else if (Management == 3)
            {
            SowDate = "4-apr";
            CutDate1 = "";
            CutDate2 = "";
            }
            else if (Management == 4)
            {
            SowDate = "7-feb";
            CutDate1 = "4-apr";
            CutDate2 = "2-may";
            }
            else if (Management == 5)
            {
            SowDate = "7-mar";
            CutDate1 = "2-may";
            CutDate2 = "30-may";
            }
            else if (Management == 6)
            {
            SowDate = "4-apr";
            CutDate1 = "30-may";
            CutDate2 = "27-jun";
            }

        }
        
        [EventSubscribe("DoManagement")]
        private void OnDoManagement(object sender, EventArgs e)
        {

            if (DateUtilities.WithinDates(SowDate,Clock.Today,SowDate) )
            {
                Oats.Sow(population:95, cultivar: Cultivar, depth:40, rowSpacing:250);
            }

            //Set up  array of remove fractions to send with Cut method.  Each member in the array corresponds to an organ in the same order they are set up in.
            if (CutDate1 !="")
                if (DateUtilities.WithinDates(CutDate1,Clock.Today,CutDate1))
                {
                    //Remove.SetPhenologyStage = 2.0;
                    Remove.SetFractionToRemove("Panicle", 1.0);
                    Remove.SetFractionToResidue("Panicle", 0.0);
                    Remove.SetFractionToRemove("Leaf", 0.8);
                    Remove.SetFractionToResidue("Leaf", 0.0);
                    Remove.SetFractionToRemove("Stem", 0.8);
                    Remove.SetFractionToResidue("Stem", 0.0);
                    Remove.SetFractionToRemove("Grain", 1.0);
                    Remove.SetFractionToResidue("Grain", 0.0);
                    Remove.SetFractionToRemove("Root", 0.0);
                    Remove.SetFractionToResidue("Root", 0.0);
                    Oats.RemoveBiomass("Cut", Remove);
                }
            //Set up  array of remove fractions to send with Cut method.  Each member in the array corresponds to an organ in the same order they are set up in.
            if (CutDate2 !="")
                if (DateUtilities.WithinDates(CutDate2,Clock.Today,CutDate2))
                {
                    //Remove.SetPhenologyStage = 2.0;
                    Remove.SetFractionToRemove("Panicle", 1.0);
                    Remove.SetFractionToResidue("Panicle", 0.0);
                    Remove.SetFractionToRemove("Leaf", 0.8);
                    Remove.SetFractionToResidue("Leaf", 0.0);
                    Remove.SetFractionToRemove("Stem", 0.8);
                    Remove.SetFractionToResidue("Stem", 0.0);
                    Remove.SetFractionToRemove("Grain", 1.0);
                    Remove.SetFractionToResidue("Grain", 0.0);
                    Remove.SetFractionToRemove("Root", 0.0);
                    Remove.SetFractionToResidue("Root", 0.0);
                    Oats.RemoveBiomass("Cut", Remove);
                }

            
        }
    }
}
```
              Report DailyReport
              Report HarvestReport
              Report SupReport: same as Validation.Australia.Wellcamp2006.Wellcamp2006.Wellcamp2006Base.paddock.SupReport
  Folder Sensibility
    Experiment OatsExampleTarlee2007
      Factors: same as Validation.Australia.Tarlee2007.Tarlee2007.Factors
      Simulation Tarlee2007example
        Clock: Start=2007-05-03; End=2007-11-30
        Summary summaryfile
        Weather: FileName=WeatherFiles\MNHRZ_onsite_metdata07.met
        Zone paddock: Area=1; Slope=0; AspectAngle=0; Altitude=50
          Soil: same as Validation.Australia.Tarlee2007.Tarlee2007.Tarlee2007Base.paddock.Soil
          Irrigation
          SurfaceOrganicMatter Surface Organic Matter: InitialResidueName=wheat_stubble; InitialResidueType=wheat; InitialResidueMass=0; InitialStandingFraction=0; InitialCPR=0; InitialCNR=80
          Fertiliser
          MicroClimate: a_interception=0; b_interception=1; c_interception=0; d_interception=0; SoilHeatFluxFraction=0.4; MinimumHeightDiffForNewLayer=0; NightInterceptionFraction=0.5; ReferenceHeight=2
          Plant Oats
          Folder Management
            Operations Sowing
              2007-05-11  [Oats].Sow(population:200, cultivar:"Wintaroo", depth:30, rowSpacing:250);
            Operations Harvest
              2007-11-17  [Oats].Harvest()
            Operations
          Report DailyReport: EventNames=[Clock].DoReport
            VariableNames:
              [Clock].Today
              [Phenology].CurrentStageName
              [Weather].MeanT
              [Soil].Water.Volumetric
              [Soil].Water.MM
              sum([Soil].Water.MM) as ProfileWater
              [Oats].AboveGround.N
              [Oats].AboveGround.Wt
              [Oats].AboveGroundLive.N
              [Oats].AboveGroundLive.N*10 as UptakeNKgHA
              [Oats].AboveGroundLive.Wt
              [Oats].AboveGroundDead.N
              [Oats].AboveGroundDead.Wt
              [Oats].Arbitrator.DMDemand
              [Oats].Arbitrator.DM.TotalFixationSupply
              [Oats].Ear.N
              [Oats].Ear.Nconc
              [Oats].Ear.Wt
              [Oats].Grain.N
              [Oats].Grain.NConc
              [Oats].Grain.Number
              [Oats].Grain.Size
              [Oats].Grain.Wt
              [Oats].Grain.Live.Wt
              [Oats].Leaf.AppearedCohortNo
              [Oats].Leaf.CoverDead
              [Oats].Leaf.CoverGreen
              [Oats].Leaf.CoverTotal
              [Oats].Leaf.Dead.N
              [Oats].Leaf.Dead.NConc
              [Oats].Leaf.Dead.Wt
              [Oats].Leaf.DeadCohortNo
              [Oats].Leaf.GreenCohortNo
              [Oats].Leaf.SenescingCohortNo
              [Oats].Leaf.ExpandedCohortNo
              [Oats].Leaf.Fn
              [Oats].Leaf.Fw
              [Oats].Leaf.Height
              [Oats].Leaf.InitialisedCohortNo
              [Oats].Leaf.LAI
              [Oats].Leaf.Live.N
              [Oats].Leaf.Live.NConc
              [Oats].Leaf.Live.Wt
              [Oats].Leaf.SpecificArea
              [Oats].Leaf.Transpiration
              [Phenology].CurrentPhase.Name
              [Phenology].CurrentStageName
              [Oats].Phenology.DailyVernalisation
              [Oats].Phenology.MeanTemp
              [Oats].Phenology.Photoperiod
              [Oats].Phenology.Stage
              [Oats].Phenology.ThermalTime
              [Oats].Phenology.ThermalTime
              [Oats].Phenology.Vrn1
              [Oats].Phenology.Vrn2
              [Oats].Phenology.Vrn4
              [Oats].Phenology.Zadok.Stage
              [Oats].Root.Depth
              [Oats].Root.N
              [Oats].Root.Wt
              [Oats].Root.Nconc
              [Oats].Root.WaterUptake
              [Oats].Panicle.N
              [Oats].Panicle.NConc
              [Oats].Panicle.Wt
              [Oats].Panicle.Live.StorageWt
              [Oats].Stem.N
              [Oats].Stem.NConc
              [Oats].Stem.Wt
              [Oats].Stem.PercentWSC
              [Oats].Stem.Live.StorageWt
              [Oats].StemPlusPanicle.Wt
              [Oats].StemPlusPanicle.N
              [Oats].SowingData.Cultivar
              [Oats].Leaf.HaunStageTerminalSpikelet
              [Oats].Leaf.HaunStage
              [Oats].Leaf.Height
              [Leaf].Number
              [Leaf].FinalLeafNumber
              [Leaf].FinalLeafNumber.ValueToHold.PhotoPLeaves
              [Oats].Leaf.MainStemPopn
              [Oats].Leaf.MeanTillerGrowthRate
              [Oats].Leaf.TillerPopulation
              [Oats].Total.N
              [Oats].Total.Wt
              [SurfaceOrganicMatter].Wt
              ([Oats].Leaf.Transpiration + [Soil].SoilWater.Es + [MicroClimate].PrecipitationInterception) as ET
              sum([Soil].NO3.kgha) as TotalSoilNitrogen
              [Phenology].FlagLeafDAS
              [Phenology].FloweringDAS
              [Phenology].MaturityDAS
              [Oats].Phenology.PhotoPeriod
              [Oats].Phenology.PhotoPeriodDeltaFunction
              [Oats].Phenology.Stage
              [Oats].Phenology.SoilTemperatureFunction
              [Clock].Today.Year
          Report HarvestReport: EventNames=[Oats].Harvesting
            VariableNames:
              [Leaf].Number
              [Leaf].FinalLeafNumber
              [Phenology].FlagLeafDAS
              [Phenology].FloweringDAS
              [Phenology].MaturityDAS
              [Phenology].CurrentPhase.Name
              [Phenology].CurrentStageName
              [Oats].AboveGroundLive.Wt
              [Oats].AboveGroundLive.Wt
              [Oats].Grain.Wt
          Report SupReport: EventNames=[Clock].DoReport
            VariableNames:
              [Clock].Today
              [Phenology].ThermalTime
              [Leaf].CohortSize
              [Leaf].CohortParameters.MaxArea
              [Oats].Arbitrator.DM.TotalFixationSupply
              [Oats].Arbitrator.FN
              [Oats].Leaf.Phyllochron
              [Oats].Leaf.CohortMaxSize
              [Oats].Leaf.CohortParameters.GrowthDuration
              [Oats].Leaf.CohortParameters.LagDuration
              [Oats].Leaf.CohortParameters.SenescenceDuration
              [Oats].Leaf.CohortParameters.SpecificLeafAreaMax
              [Oats].Leaf.CohortParameters.SpecificLeafAreaMin
              [Oats].Leaf.Photosynthesis.FT
              [Oats].Leaf.Photosynthesis.FVPD
              [Oats].Leaf.Photosynthesis.RueAct
              [Oats].Leaf.NextExpandingLeafProportion
              [Oats].Leaf.MeanTillerGrowthRate
              sum([Soil].Water.MM[1:6]) as ProfileWater
        SoilArbitrator Soil Arbitrator
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