Simulations: Version=152
  Replacements
    Manager Defoliate
      Crop =
      cutPasture_StartDate = 12/13/2010 00:00:00
      cutPasture_EndDate = 05/30/2012 00:00:00
      defoliateType = Cut
      DefoliationHeight = 150
      ResidualHeight = 30
      interval2Cut = 0
      durationOfCut = 1
      removeAmountType = ResidualHeight
      herbageAmount = -
      fracDM2Remove = 1
      fracN2Remove = 1
      urineDepth = 10
      fracN2Dung = 0.4
      fracPopDecline = 0.05
```csharp
// Defoliates on a regular cycle or one-off via a schedule
// currently defoliates by the amount specified spread evenly over the specified period

using Newtonsoft.Json;
using APSIM.Shared.Utilities;
using System.Xml.Serialization;
using Models.PMF;
using Models.Soils;
using Models;
using System.Text;
using System.Collections.Generic;
using Models.Core;
using System;
using Models.Soils.Nutrients;

namespace Models
{
    [Serializable]
    public class Script : Model
    {
        [Link] Zone zone;
        [Link] Clock Clock;
        [Link] Plant Plantain;
        [Link] Fertiliser fertiliser;
        [Link] ISummary summary = null;

        [Description("Choose the crop to harvest:")]
        public IPlant Crop { get; set; }

        [Description("Enter the date to start the rotation (dd/mm/yyyy):")]
        public DateTime cutPasture_StartDate { get; set; }
        
        [Description("Enter the date to end the rotation (dd/mm/yyyy):")]
        public DateTime cutPasture_EndDate { get; set; }       

        [Description("Select type of defoliation:")]
        public defoliationTypes defoliateType { get; set; }
        
        [Description("Defoliation Height (mm)")]
        public double DefoliationHeight { get; set; }  
        
        [Description("Residual Height (mm)")]
        public double ResidualHeight { get; set; } 

        [Description("Enter the interval between defoliations (days):")]
        public int interval2Cut { get; set; }

        [Description("Enter the number of days to defoliate over (days):")]
        public int durationOfCut { get; set; }

        [Description("Choose what amount is being defined:")]
        public removeAmountTypes removeAmountType { get; set; }

        [Description("Enter the amount to use (kgDM/ha):")]
        public double herbageAmount { get; set; }

        [Description("Enter the fraction of DM that is removed from the field (0-1):")]
        public double fracDM2Remove { get; set; }

        [Description("Enter the fraction of N that is removed from the field (0-1):")]
        public double fracN2Remove { get; set; }

        [Description("Enter the depth down to which urine will applied (mm):")]
        public double urineDepth { get; set; }

        [Description("Enter the proportion of N returned in dung (0-1):")]
        public double fracN2Dung { get; set; }

        [Description("Enter the fraction of population decline due to defoliation (0-1):")]
        public double fracPopDecline { get; set; }

        //fraction of each plant part returned as residue (0-1), wastage
        private double leafResidueFrac = 0.01;
        private double stemResidueFrac = 0.01;
        private double flowerResidueFrac = 0.01;
        private double minLeafAmount = 5.0;

        //Outputs
        //Pasture DM defoliated today (kg/ha)
        [JsonIgnore] public double DefoliatedDM{ get; set; }
        [JsonIgnore] private RemovalFractions Remove { get; set; }
        //N defoliate today (kg/ha)
        [JsonIgnore] public double DefoliatedN{ get; set; }
        //Pasture DM harvested today (kg/ha)
        [JsonIgnore] public double HarvestedDM{ get; set; }
        //N harvested today (kg/ha)
        [JsonIgnore] public double HarvestedN{ get; set; }
        //DM removed from the paddock (kg/ha)
        [JsonIgnore] public double RemovedDM{ get; set; }
        //Height removed from the paddock 
        [JsonIgnore] public double RemovedHeight{ get; set; }
        //N removed from the paddock (kg/ha)
        [JsonIgnore] public double RemovedN{ get; set; }
        //DM returned to the paddock (kg/ha)
        [JsonIgnore] public double ReturnedDM{ get; set; }
        //N returned to the paddock (kg/ha)
        [JsonIgnore] public double ReturnedN{ get; set; }
        //N returned as dung (SurfaceOM)
        [JsonIgnore] public double NReturnedInDung{ get; set; }
        //N returned as urine (urea)
        [JsonIgnore] public double NReturnedInUrine{ get; set; }
        //Number of days after last harvest
        [JsonIgnore] public int DaysAfterCut{ get; set; }
        //Total standing DM (Leaf + Stem/Sheath) before cut
        [JsonIgnore] public double PreHarvestDM{ get; set; }
        //Total standing DM (Leaf + Stem/Sheath) after cut
        [JsonIgnore] public double PostHarvestDM{ get; set; }

        //Pasture DM harvested this rotation (kg/ha)
        [JsonIgnore] public double RotationHarvestedDM{ get; set; }
        //Pasture DM to be harvested this rotation (kg/ha)
        [JsonIgnore] public double RotationHarvestingDM{ get; set; }

        //N concentration of the defoliated material (kg/kg)
        [JsonIgnore] public double HarvestedNconc{ get; set; }

        //Internal variables
        private RemovalFractions removalFractions;
        //The fraction of urine to be applied in each layer
        private double[] FracLayer;
        // total herbage to remove in g/m2 per day
        private double herbageToRemove;
        // counter
        private int daysCutting = 0;
        // type of defoliation (Cut or Graze)
        private string defoliationType;
        // type of DM amount (ResidualDM or DMToRemove or ResidualHeight)
        private string amountType;
        // auxiliary
        private bool aCutHasHappened = false;
        private bool isStillCutting = false;
        private double cumAmountHarvested;

        // event to add residue / dung to surface OM
        public event BiomassRemovedDelegate BiomassRemoved;

        [EventSubscribe("StartOfSimulation")]
        private void OnSimulationCommencing(object sender, EventArgs e)
        {
            removalFractions = new RemovalFractions();
            DaysAfterCut = 0;
            resetVariables();
            if (defoliateType == defoliationTypes.Cut)
                defoliationType = "Cut";
            else
                defoliationType = "Graze";

            if (removeAmountType == removeAmountTypes.ResidualDM)
                amountType = "ResidualDM";
            else
                amountType = "DMToRemove";
                
            if (removeAmountType == removeAmountTypes.ResidualHeight)
                amountType = "ResidualHeight";
            else
                amountType = "DMToRemove";
                

            // make sure that rotation start when startDate<simulationStartDay
            if ((Clock.Today > cutPasture_StartDate) && (Clock.Today < cutPasture_EndDate))
                cutPasture_StartDate = Clock.Today;
                Remove = new RemovalFractions();

            // initialise variables
            resetVariables();
                   
        }

 
        [EventSubscribe("DoManagement")]
        private void OnDoManagement(object sender, EventArgs e)
        {
            
            if (Clock.Today == cutPasture_StartDate)
                DaysAfterCut = interval2Cut;
                

            if ((Clock.Today >= cutPasture_StartDate) && (Clock.Today <= cutPasture_EndDate))
            {
                // Check whether we should start cutting
                if ((Plantain.IsEmerged) && (DaysAfterCut > 0) && (DaysAfterCut == interval2Cut))
                {
                    Defoliate(defoliationType, herbageAmount * 0.1, amountType, durationOfCut);
                }
                
            if (Plantain.Leaf.Height>=DefoliationHeight)
           {
                      Plantain.RemoveBiomass("Cut", Remove);
                      daysCutting += 1;
           }
            }

            // Check whether we need to continue cutting
            //if ((daysCutting > 0) && (daysCutting <= durationOfCut))
            if (isStillCutting)
            {
                // reset outputs
                resetVariables();

                removeDM(herbageToRemove, defoliationType);
                returnExcreta();
                cumAmountHarvested += HarvestedDM;
                daysCutting += 1;
            }

            // reset outputs
            if (daysCutting < 0)
            {
                resetVariables();
                daysCutting = 0;
            }
        }

        [EventSubscribe("DoManagementCalculations")]
        private void OnDoManagementCalculations(object sender, EventArgs e)
        {
            if ((daysCutting > 0) && (daysCutting < durationOfCut))
                isStillCutting = true;

            if (daysCutting == durationOfCut)
            {
                PostHarvestDM = (double)zone.Get("Plantain.AboveGround.Wt");
                RotationHarvestedDM = cumAmountHarvested;
                aCutHasHappened = true;
                isStillCutting = false;
                daysCutting = -1;
                Plantain.Population = Plantain.Population * (1.0 - fracPopDecline);
            }

            if (aCutHasHappened && (daysCutting == 0))
                DaysAfterCut += 1;
        }

        public enum removeAmountTypes
        {
            /// <summary>Setting DM amount to remove</summary>
            DMToRemove,
            /// <summary>Setting residual DM amount</summary>
            ResidualDM,
            /// <summary>Setting residual Height</summary>
            ResidualHeight
        }

        public enum defoliationTypes
        {
            /// <summary>Cut</summary>
            Cut,
            /// <summary>Graze</summary>
            Graze
        }

        // resets the values of all outputs
        private void resetVariables()
        {
            DefoliatedDM = 0.0;
            DefoliatedN = 0.0;
            HarvestedDM = 0.0;
            HarvestedN = 0.0;
            RemovedDM = 0.0;
            RemovedN = 0.0;
            ReturnedDM = 0.0;
            ReturnedN = 0.0;
            NReturnedInDung = 0.0;
            NReturnedInUrine = 0.0;
            RotationHarvestedDM = 0.0;
            RotationHarvestingDM = 0.0;
            HarvestedNconc = 0.0;
        }

        // Perform the basic calculations for defoliation
        public void Defoliate(string defoliationType, double amountDM, string amountType, int duration)
        {
            // get the existing plant amount
            PreHarvestDM = (double)zone.Get("Plantain.AboveGround.Wt");
           

            // check duration
            if (duration <= 0)
                throw new Exception("Duration of graze/cut rotation is zero or negative");
            
            // check amount to remove
            if ((amountType == "DMToRemove") && (PreHarvestDM > 0.0))
            {
                summary.WriteMessage(this, "   Defoliating " + (10.0 * amountDM).ToString("#0.0") + "kg/ha over " + duration + " days", MessageType.Diagnostic);
                herbageToRemove = amountDM / duration;
            }
            else if ((amountType == "ResidualDM") && (PreHarvestDM > amountDM))
            {
                summary.WriteMessage(this, "   Defoliating down to approximately " + (10.0 * amountDM).ToString("#0.0") + "kg/ha over " + duration + " days", MessageType.Diagnostic);
                herbageToRemove = (PreHarvestDM - amountDM) / duration;
            }
            else
            {
                herbageToRemove = 0.0;
                summary.WriteMessage(this, "   Defoliation will not happend because there is not enough plant material", MessageType.Diagnostic);
                return;
            }

            RotationHarvestingDM = herbageToRemove * duration;
            durationOfCut = duration;
            // first defoliation
            removeDM(herbageToRemove, defoliationType);
            returnExcreta();
            cumAmountHarvested = HarvestedDM;
            daysCutting = 1;
            DaysAfterCut = 0;
        }

        private void removeDM(double removeAmount, string removeType)
        {
            // get the existing biomass
            double leafLiveWt = (double)zone.Get("Plantain.Leaf.Live.Wt");
            double stemLiveWt = (double)zone.Get("Plantain.Stem.Live.Wt");
            double flowerLiveWt = (double)zone.Get("Plantain.Inflorescence.Live.Wt");
            double leafDeadWt = (double)zone.Get("Plantain.Leaf.Dead.Wt");
            double stemDeadWt = (double)zone.Get("Plantain.Stem.Dead.Wt");
            double flowerDeadWt = (double)zone.Get("Plantain.Inflorescence.Dead.Wt");
            double leafLiveN = (double)zone.Get("Plantain.Leaf.Live.N");
            double stemLiveN = (double)zone.Get("Plantain.Stem.Live.N");
            double flowerLiveN = (double)zone.Get("Plantain.Inflorescence.Live.N");
            double leafDeadN = (double)zone.Get("Plantain.Leaf.Dead.N");
            double stemDeadN = (double)zone.Get("Plantain.Stem.Dead.N");
            double flowerDeadN = (double)zone.Get("Plantain.Inflorescence.Dead.N");

            double existingWt = leafLiveWt + leafDeadWt + stemLiveWt + stemDeadWt + flowerLiveWt + flowerDeadWt;
            double existingN = leafLiveN + leafDeadN + stemLiveN + stemDeadN + flowerLiveN + flowerDeadN;

            // Can we harvest anything?
            double removingWt = Math.Min(existingWt, removeAmount);
            if (removingWt > 0.0)
            {
                // get the fractions to remove for each organ (will override the default values)
                // the default is [Plantain].Leaf.BiomassRemovalDefaults.Cut.FractionRemoved, or equivalent
                // >> double leafFracToRemove = removeAmount * (leafLiveWt + leafDeadWt) / existingWt / existingWt;
                double fracToRemove = removingWt / existingWt;
                double leafFracToRemove = 0.0;
                if ((leafLiveWt + leafDeadWt) > 0.0)
                {
                    if (leafLiveWt < minLeafAmount)
                    {
                        // leafWt cannot go below a minimum
                        leafFracToRemove = (removingWt + leafLiveWt - minLeafAmount) / existingWt;
                    }
                    else
                        leafFracToRemove = fracToRemove;
                }

                double stemFracToRemove = ((stemLiveWt + stemDeadWt) > 0.0) ? fracToRemove : 0.0;
                double flowerFracToRemove = ((flowerLiveWt + flowerDeadWt) > 0.0) ? fracToRemove : 0.0;

                // get the fractions to residue (i.e. wastage - will override the default values)
                // the default is [Plantain].Leaf.BiomassRemovalDefaults.Cut.FractionToResidue, or equivalent
                double leafFracToResidue = leafResidueFrac * leafFracToRemove;
                double stemFracToResidue = stemResidueFrac * stemFracToRemove;
                double flowerFracToResidue = flowerResidueFrac * flowerFracToRemove;

                // correct the values to defoliate (so our removing = remove + residue)
                leafFracToRemove -= leafFracToResidue;
                stemFracToRemove -= stemFracToResidue;
                flowerFracToRemove -= flowerFracToResidue;

                // set removal fractions (these overrides the default removals in the plant)
                removalFractions.SetFractionToRemove("Leaf", leafFracToRemove, "Live");
                removalFractions.SetFractionToResidue("Leaf", leafFracToResidue, "Live");
                removalFractions.SetFractionToRemove("Leaf", leafFracToRemove, "Dead");
                removalFractions.SetFractionToResidue("Leaf", leafFracToResidue, "Dead");
                removalFractions.SetFractionToRemove("Stem", stemFracToRemove, "Live");
                removalFractions.SetFractionToResidue("Stem", stemFracToResidue, "Live");
                removalFractions.SetFractionToRemove("Stem", stemFracToRemove, "Dead");
                removalFractions.SetFractionToResidue("Stem", stemFracToResidue, "Dead");
                removalFractions.SetFractionToRemove("Inflorescence", flowerFracToRemove, "Live");
                removalFractions.SetFractionToResidue("Inflorescence", flowerFracToResidue, "Live");
                removalFractions.SetFractionToRemove("Inflorescence", flowerFracToRemove, "Dead");
                removalFractions.SetFractionToResidue("Inflorescence", flowerFracToResidue, "Dead");

                removalFractions.SetFractionToRemove("Root", 0.0);
                removalFractions.SetFractionToResidue("Root", 0.0);
                removalFractions.SetFractionToRemove("Taproot", 0.0);
                removalFractions.SetFractionToResidue("Taproot", 0.0);

                // Actually do the biomass removal
                Plantain.RemoveBiomass(removeType, removalFractions);

                // get the new existing plant amount
                double postHarvestWt = (double)zone.Get("Plantain.AboveGround.Wt");
                double postHarvestN = (double)zone.Get("Plantain.AboveGround.N");

                // get total defoliation (total plant stuff lost)
                DefoliatedDM = existingWt - postHarvestWt;
                DefoliatedN = existingN - postHarvestN;
                if (DefoliatedDM > 0.0)
                   HarvestedNconc = DefoliatedN/DefoliatedDM;

                // get total harvested (plant stuff removed from plants)
                HarvestedDM = (double)zone.Get("Plantain.Leaf.Removed.Wt")
                + (double)zone.Get("Plantain.Stem.Removed.Wt")
                + (double)zone.Get("Plantain.Inflorescence.Removed.Wt");
                HarvestedN = (double)zone.Get("Plantain.Leaf.Removed.N")
                + (double)zone.Get("Plantain.Stem.Removed.N")
                + (double)zone.Get("Plantain.Inflorescence.Removed.N");

                // get amounts actually removed from field and that to be returned (residue or dung/urine)
                RemovedDM = HarvestedDM * fracDM2Remove;
                RemovedN = HarvestedN * fracN2Remove;
                ReturnedDM = HarvestedDM - RemovedDM;
                ReturnedN = HarvestedN - RemovedN;
                NReturnedInDung = ReturnedN * fracN2Dung;
                NReturnedInUrine = ReturnedN - NReturnedInDung;
            }
            else
            {
            }
        }

        // Return dung and urine
        private void returnExcreta()
        {
            if ((ReturnedDM > 0.0) || (NReturnedInDung > 0.0))
            {
                PMF.BiomassRemovedType BiomassDung = new PMF.BiomassRemovedType();
                string[] type = new string[] { "RuminantDung_PastureFed" };
                float[] dltdm = new float[] { (Single)ReturnedDM };
                float[] dltn = new float[] { (Single)NReturnedInDung };
                float[] dltp = new float[] { 0 };
                float[] fraction = new float[] { 1 };     // fraction is always 1.0 here

                BiomassDung.crop_type = "RuminantDung_PastureFed";
                BiomassDung.dm_type = type;
                BiomassDung.dlt_crop_dm = dltdm;
                BiomassDung.dlt_dm_n = dltn;
                BiomassDung.dlt_dm_p = dltp;
                BiomassDung.fraction_to_residue = fraction;
                BiomassRemoved.Invoke(BiomassDung);
            }

            if (NReturnedInUrine > 0.0)
            {
                fertiliser.Apply(NReturnedInUrine * 10, Fertiliser.Types.UreaN, urineDepth);
            }
        }
    }
}
```
    Manager ExtraVariables
```csharp
using Newtonsoft.Json;
using Models.PMF.Organs;
using Models.Interfaces;
using System;
using Models.Core;
using System.Collections.Generic;
using System.Text;
using Models.Soils;
using Models.Soils.Nutrients;
using Models.PMF;
using Models;
using System.Xml.Serialization;
using APSIM.Shared.Utilities;
using Models.Climate;

namespace Models
{
    [Serializable] 
    public class Script : Model
    {
        [Link] private Clock Clock;
        [Link] private Weather Met;
        [Link] private Fertiliser Fert;
        [Link] private Irrigation Irrig;
        [Link] private Plant Plantain;
        [Link] private Zone zone;
        [Link] private ISummary summary;
        private DateTime YearStartDate;
        [Link(ByName = true)]
        private ISolute Urea;
        [Link(ByName = true)]
        private ISolute NO3;
        [Link(ByName = true)]
        private ISolute NH4;
        [Link(ByName = true)]
        private Nutrient nutrient;
        [Link(ByName = true)]
        private NutrientPool Humic;
        [Link(ByName = true)]
        private NutrientPool Microbial;
        [Link] private Soils.Soil Soil;
        [Link] private Models.Surface.SurfaceOrganicMatter SOM;
        [Link(Type = LinkType.Path, Path = "[Plantain].Root")]
        private Root root;
        [Link]
        private IPhysical soilPhysical;
        [Link]
        private ISoilWater waterBalance;



                    
        [JsonIgnore] public bool InitialDay { get; set; }
        [JsonIgnore] public double AccumPlantN { get; set; }
        [JsonIgnore] public double AccumMineralisation { get; set; }
        [JsonIgnore] public double AccumDenit { get; set; }
        [JsonIgnore] public double AccumFert { get; set; }
        [JsonIgnore] public double AccumLeach { get; set; }
        [JsonIgnore] public double AccumDetach { get; set; }
        [JsonIgnore] public double DeltaSoilOMN { get; set; }
        [JsonIgnore] public double DeltaSurfaceOMN { get; set; }
        [JsonIgnore] public double DeltaSoilMineralN { get; set; }
        [JsonIgnore] public double SoilNitrogenContent { get; set; }
        
        [JsonIgnore] public double AccumEO { get; set; }
        [JsonIgnore] public double AccumEP { get; set; }
        [JsonIgnore] public double AccumES { get; set; }
        [JsonIgnore] public double AccumDrainage { get; set; }
        [JsonIgnore] public double AccumRunoff { get; set; }
        [JsonIgnore] public double AccumOutflowLat { get; set; }
        [JsonIgnore] public double AccumIrrigation { get; set; }
        [JsonIgnore] public double AccumRainfall { get; set; }
        [JsonIgnore] public double SoilWaterDeficit { get; set; }
    
        [JsonIgnore] public double  InitialSoilOMN { get; set; }
        [JsonIgnore] public double  InitialSurfaceOMN { get; set; }
        [JsonIgnore] public double  InitialMineralN { get; set; }
        
        [JsonIgnore] public double SWC { get; set; }
        [JsonIgnore] public double DUL { get; set; }
        [JsonIgnore] public double OutFlowLat { get; set; }

        [JsonIgnore] public double FomN { get; set; }
        [JsonIgnore] public double BiomN { get; set; }
        [JsonIgnore] public double HumN { get; set; }
        [JsonIgnore] public double OrganicN { get; set; }
        [JsonIgnore] public double NO3N { get; set; }
        [JsonIgnore] public double NH4N { get; set; }
        [JsonIgnore] public double UreaN { get; set; }
        [JsonIgnore] public double MineralN { get; set; }
        //[JsonIgnore] public double DltNMinRes { get; set; }
        [JsonIgnore] public double DltNMinTot { get; set; }
        
        [JsonIgnore] public double LeafFraction { get; set; }
        [JsonIgnore] public double StemFraction { get; set; }
        [JsonIgnore] public double InflorescenceFraction { get; set; }
        
        [JsonIgnore] public double ShootRootRatio { get; set; }

        [JsonIgnore] public double Leaf_DMSupply { get; set; }
        [JsonIgnore] public double Stem_DMSupply { get; set; }
        [JsonIgnore] public double Inflorescence_DMSupply { get; set; }
        [JsonIgnore] public double Root_DMSupply { get; set; }
        [JsonIgnore] public double Taproot_DMSupply { get; set; }
        [JsonIgnore] public double Leaf_DMDemand { get; set; }
        [JsonIgnore] public double Stem_DMDemand { get; set; }
        [JsonIgnore] public double Inflorescence_DMDemand { get; set; }
        [JsonIgnore] public double Root_DMDemand { get; set; }
        [JsonIgnore] public double Taproot_DMDemand { get; set; }
        
        [JsonIgnore] public double Leaf_NSupply { get; set; }
        [JsonIgnore] public double Stem_NSupply { get; set; }
        [JsonIgnore] public double Inflorescence_NSupply { get; set; }
        [JsonIgnore] public double Taproot_NSupply { get; set; }
        [JsonIgnore] public double Root_NSupply { get; set; }
        [JsonIgnore] public double Leaf_NDemand { get; set; }
        [JsonIgnore] public double Stem_NDemand { get; set; }
        [JsonIgnore] public double Inflorescence_NDemand { get; set; }
        [JsonIgnore] public double Taproot_NDemand { get; set; }
        [JsonIgnore] public double Root_NDemand { get; set; }
        
        [JsonIgnore] public double Leaf_NSupplyReallocation { get; set; }
        [JsonIgnore] public double Stem_NSupplyReallocation { get; set; }
        [JsonIgnore] public double Root_NSupplyReallocation { get; set; }
        
        [JsonIgnore] public double AccumHarvestedWt { get; set; }

    
        [EventSubscribe("StartOfSimulation")]
        private void OnSimulationCommencing(object sender, EventArgs e)
        {
            InitialDay = true;
        }
        
        [EventSubscribe("DoManagement")]
        private void OnDoManagement(object sender, EventArgs e)
        {
            //!!!!!! Nitrogen balance components !!!!!!
            //!!!!!!^^^^^^^^^^^^^^^^^^^^^^^^^^^^^!!!!!!
            FomN = MathUtilities.Sum(nutrient.FOM.N);
            HumN = MathUtilities.Sum(Humic.N);
            BiomN = MathUtilities.Sum(Microbial.N);
            OrganicN = FomN + HumN + BiomN;
            NO3N = MathUtilities.Sum(NO3.kgha);
            NH4N = MathUtilities.Sum(NH4.kgha);
            UreaN = MathUtilities.Sum(Urea.kgha);
            MineralN = NO3N + NH4N + UreaN; 
            //DltNMinRes = MathUtilities.Sum(SoilNitrogen.dlt_n_min_res);
            DltNMinTot = MathUtilities.Sum(nutrient.MineralisedN);
            int layers = soilPhysical.Thickness.Length;
            if (InitialDay == true)
            {
                InitialSurfaceOMN = SOM.N;
                InitialSoilOMN = OrganicN;
                InitialMineralN = MineralN;
                InitialDay = false;

                // check whether we're in the north or south hemisphere
                if (Met.Latitude >= 0.0)
                    YearStartDate = new DateTime(2000, 1, 1);
                else
                    YearStartDate = new DateTime(2000, 7, 1);
            }
            DeltaSurfaceOMN = SOM.N - InitialSurfaceOMN;
            AccumLeach = AccumLeach - waterBalance.LeachNH4 - waterBalance.LeachNO3 - waterBalance.LeachUrea; //Fails
            AccumMineralisation += MathUtilities.Sum(nutrient.MineralisedN);
            AccumDenit -= MathUtilities.Sum(nutrient.Natm);
            AccumPlantN -= (double)zone.Get("Plantain.Root.NUptake");
            DeltaSoilOMN = OrganicN - InitialSoilOMN;
            DeltaSoilMineralN = MineralN - InitialMineralN;
            SoilNitrogenContent = MineralN;
            
            //!!!!!! Water balance components !!!!!!
            //!!!!!!^^^^^^^^^^^^^^^^^^^^^^^^^^!!!!!!

            AccumRainfall += Met.Rain;
            //AccumEP -= (double)zone.Get("[Plantain].Leaf.Transpiration");
            AccumEP -= (double)zone.Get("Plantain.Root.WaterUptake");
            SoilWaterDeficit = (SWC - DUL);
            double OutFlowLat = MathUtilities.Sum(waterBalance.LateralOutflow);
            AccumOutflowLat -= OutFlowLat;
            
            //!!!!!! Stem and leaf fraction !!!!!!
            if ((double)zone.Get("Plantain.AboveGround.Wt") > 0)
            {
                LeafFraction = (double)zone.Get("Plantain.Leaf.Wt") / (double)zone.Get("Plantain.AboveGround.Wt");
                StemFraction = (double)zone.Get("Plantain.Stem.Wt") / (double)zone.Get("Plantain.AboveGround.Wt");
                InflorescenceFraction = (double)zone.Get("Plantain.Inflorescence.Wt") / (double)zone.Get("Plantain.AboveGround.Wt");
            }
            else
            {
                LeafFraction = 0;
                StemFraction = 0;
            }
            
            //!!!!!! Plant DM components !!!!!!
            //!!!!!!^^^^^^^^^^^^^^^^^^^^^^^^^^!!!!!!
            ShootRootRatio = MathUtilities.Divide((double)zone.Get("Plantain.AboveGroundLive.Wt"), (double)zone.Get("Plantain.BelowGroundLive.Wt"), 0.0);
            PMF.Interfaces.BiomassSupplyType Leaf_DMSupplies = (PMF.Interfaces.BiomassSupplyType)zone.Get("Plantain.Leaf.DMSupply");
            PMF.Interfaces.BiomassSupplyType Stem_DMSupplies = (PMF.Interfaces.BiomassSupplyType)zone.Get("Plantain.Stem.DMSupply");
            PMF.Interfaces.BiomassSupplyType Inflorescence_DMSupplies = (PMF.Interfaces.BiomassSupplyType)zone.Get("Plantain.Inflorescence.DMSupply");
            PMF.Interfaces.BiomassSupplyType Root_DMSupplies = (PMF.Interfaces.BiomassSupplyType)zone.Get("Plantain.Root.DMSupply");
            PMF.Interfaces.BiomassSupplyType Taproot_DMSupplies = (PMF.Interfaces.BiomassSupplyType)zone.Get("Plantain.Taproot.DMSupply");
            PMF.Interfaces.BiomassPoolType Leaf_DMDemands = (PMF.Interfaces.BiomassPoolType)zone.Get("Plantain.Leaf.DMDemand");
            PMF.Interfaces.BiomassPoolType Stem_DMDemands = (PMF.Interfaces.BiomassPoolType)zone.Get("Plantain.Stem.DMDemand");
            PMF.Interfaces.BiomassPoolType Inflorescence_DMDemands = (PMF.Interfaces.BiomassPoolType)zone.Get("Plantain.Inflorescence.DMDemand");
            PMF.Interfaces.BiomassPoolType Root_DMDemands = (PMF.Interfaces.BiomassPoolType)zone.Get("Plantain.Root.DMDemand");
            PMF.Interfaces.BiomassPoolType Taproot_DMDemands = (PMF.Interfaces.BiomassPoolType)zone.Get("Plantain.Taproot.DMDemand");

            PMF.Interfaces.BiomassSupplyType Leaf_NSupplies = (PMF.Interfaces.BiomassSupplyType)zone.Get("Plantain.Leaf.NSupply");
            PMF.Interfaces.BiomassSupplyType Stem_NSupplies = (PMF.Interfaces.BiomassSupplyType)zone.Get("Plantain.Stem.NSupply");
            PMF.Interfaces.BiomassSupplyType Inflorescence_NSupplies = (PMF.Interfaces.BiomassSupplyType)zone.Get("Plantain.Inflorescence.NSupply");
            PMF.Interfaces.BiomassSupplyType Taproot_NSupplies = (PMF.Interfaces.BiomassSupplyType)zone.Get("Plantain.Taproot.NSupply");
            PMF.Interfaces.BiomassSupplyType Root_NSupplies = (PMF.Interfaces.BiomassSupplyType)zone.Get("Plantain.Root.NSupply");
            
            PMF.Interfaces.BiomassPoolType Leaf_NDemands = (PMF.Interfaces.BiomassPoolType)zone.Get("Plantain.Leaf.NDemand");
            PMF.Interfaces.BiomassPoolType Stem_NDemands = (PMF.Interfaces.BiomassPoolType)zone.Get("Plantain.Stem.NDemand");
            PMF.Interfaces.BiomassPoolType Inflorescence_NDemands = (PMF.Interfaces.BiomassPoolType)zone.Get("Plantain.Inflorescence.NDemand");
            PMF.Interfaces.BiomassPoolType Taproot_NDemands = (PMF.Interfaces.BiomassPoolType)zone.Get("Plantain.Taproot.NDemand");
            PMF.Interfaces.BiomassPoolType Root_NDemands = (PMF.Interfaces.BiomassPoolType)zone.Get("Plantain.Root.NDemand");
            
            Leaf_DMSupply = Leaf_DMSupplies.Fixation + Leaf_DMSupplies.Uptake + Leaf_DMSupplies.Reallocation + Leaf_DMSupplies.Retranslocation;
            Stem_DMSupply = Stem_DMSupplies.Fixation + Stem_DMSupplies.Uptake + Stem_DMSupplies.Reallocation + Stem_DMSupplies.Retranslocation;
            Inflorescence_DMSupply = Inflorescence_DMSupplies.Fixation + Inflorescence_DMSupplies.Uptake + Inflorescence_DMSupplies.Reallocation + Inflorescence_DMSupplies.Retranslocation;
            Root_DMSupply = Root_DMSupplies.Fixation + Root_DMSupplies.Uptake + Root_DMSupplies.Reallocation + Root_DMSupplies.Retranslocation;
            Taproot_DMSupply = Taproot_DMSupplies.Fixation + Taproot_DMSupplies.Uptake + Taproot_DMSupplies.Reallocation + Taproot_DMSupplies.Retranslocation;
            Leaf_DMDemand = Leaf_DMDemands.Structural + Leaf_DMDemands.Storage + Leaf_DMDemands.Metabolic;
            Stem_DMDemand = Stem_DMDemands.Structural + Stem_DMDemands.Storage + Stem_DMDemands.Metabolic;
            Inflorescence_DMDemand = Inflorescence_DMDemands.Structural + Inflorescence_DMDemands.Storage + Inflorescence_DMDemands.Metabolic;
            Root_DMDemand = Root_DMDemands.Structural + Root_DMDemands.Storage + Root_DMDemands.Metabolic;
            Taproot_DMDemand = Taproot_DMDemands.Structural + Taproot_DMDemands.Storage + Taproot_DMDemands.Metabolic;
            
            Leaf_NSupply = Leaf_NSupplies.Fixation + Leaf_NSupplies.Uptake + Leaf_NSupplies.Reallocation + Leaf_NSupplies.Retranslocation;
            Stem_NSupply = Stem_NSupplies.Fixation + Stem_NSupplies.Uptake + Stem_NSupplies.Reallocation + Stem_NSupplies.Retranslocation;
            Inflorescence_NSupply = Inflorescence_NSupplies.Fixation + Inflorescence_NSupplies.Uptake + Inflorescence_NSupplies.Reallocation + Inflorescence_NSupplies.Retranslocation;
            Taproot_NSupply = Taproot_NSupplies.Fixation + Taproot_NSupplies.Uptake + Taproot_NSupplies.Reallocation + Taproot_NSupplies.Retranslocation;
            Root_NSupply = Root_NSupplies.Fixation + Root_NSupplies.Uptake + Root_NSupplies.Reallocation + Root_NSupplies.Retranslocation;

            Leaf_NDemand = Leaf_NDemands.Structural + Leaf_NDemands.Storage + Leaf_NDemands.Metabolic;
            Stem_NDemand = Stem_NDemands.Structural + Stem_NDemands.Storage + Stem_NDemands.Metabolic;
            Inflorescence_NDemand = Inflorescence_NDemands.Structural + Inflorescence_NDemands.Storage + Inflorescence_NDemands.Metabolic;
            Taproot_NDemand = Taproot_NDemands.Structural + Taproot_NDemands.Storage + Taproot_NDemands.Metabolic;
            Root_NDemand = Root_NDemands.Structural + Root_NDemands.Storage + Root_NDemands.Metabolic;

            Leaf_NSupplyReallocation = Leaf_NSupplies.Reallocation;
            Stem_NSupplyReallocation = Stem_NSupplies.Reallocation;
            Root_NSupplyReallocation = Root_NSupplies.Reallocation;
        }
        
        [EventSubscribe("DoManagementCalculations")]
        private void OnDoManagementCalculations(object sender, EventArgs e)
        {
            FomN = MathUtilities.Sum(nutrient.FOM.N);
            HumN = MathUtilities.Sum(Humic.N);
            BiomN = MathUtilities.Sum(Microbial.N);
            AccumFert += Fert.NitrogenApplied;
            AccumIrrigation += Irrig.IrrigationApplied;
            
            
            AccumEO -= waterBalance.Eo;
            AccumES -= waterBalance.Es; 
            AccumDrainage -= waterBalance.Drainage;
            AccumRunoff -= waterBalance.Runoff;
            SWC = MathUtilities.Sum(waterBalance.SWmm);
            DUL = MathUtilities.Sum(soilPhysical.DULmm);
            
            //!!!!!! Plant Harvest !!!!!!
            if (Clock.Today.DayOfYear == YearStartDate.DayOfYear)
                AccumHarvestedWt = (double)zone.Get("[Defoliate].Script.DefoliatedDM");
            else
                AccumHarvestedWt += (double)zone.Get("[Defoliate].Script.DefoliatedDM");            
        }
    }
}
```
    Report: EventNames=[Clock].DoReport
      VariableNames:
        [Clock].Today as Date
        [Weather].Radn as SolarRadiation
        [Plantain].Leaf.RadiationIntercepted as InterceptedRadiation
        [Weather].Rain as Rainfall
        [Irrigation].IrrigationApplied as IrrigationApplied
        [Soil].SoilWater.Eo as Eo
        [Soil].SoilWater.Es as Evaporation
        [Plantain].Leaf.Transpiration as Transpiration
        [Soil].SoilWater.pond as PondedWater
        [Soil].SoilWater.Drainage as Drainage
        [Soil].SoilWater.Runoff as Runoff
        sum([Soil].SoilWater.LateralOutflow) as LateralFlow
        sum([Soil].Water.MM) as TotalSWC
        sum([Soil].Physical.DULmm) as TotalDUL
        [Fertiliser].NitrogenApplied as FertiliserN
        sum([Soil].Nutrient.Natm) as DenitrifiedN
        ([Soil].SoilWater.LeachNH4 + [Soil].SoilWater.LeachNO3) as LeachedN
        (-1*[Plantain].Root.NUptake) as UptakeN
        sum([Soil].Nutrient.MineralisedN) as MineralisedSoilN
        sum([Soil].Nutrient.SurfaceResidue.Decomposition.MineralisedN) as MineralisedSurfOMN
        ([Plantain].Leaf.Detached.N+[Plantain].Stem.Detached.N+[Plantain].Inflorescence.Detached.N) as DetachedAGN
        ([Plantain].Taproot.Detached.N+[Plantain].Root.Detached.N) as DetachedBGN
        (sum([Soil].Urea.kgha) + sum([Soil].NH4.kgha) + sum([Soil].NO3.kgha)) as SoilNContent
        sum([Soil].Urea.kgha) as SoilUrea
        sum([Soil].NH4.kgha) as SoilNH4
        sum([Soil].NO3.kgha) as SoilNO3
        (sum([Soil].NH4.kgha[1:3])+sum([Soil].NO3.kgha[1:3])) as TopSoilN
        [SurfaceOrganicMatter].N as TotalSurfOMN
        sum([Soil].Nutrient.FOM.N) as TotalFOMN
        sum([Soil].Nutrient.Humic.N) as TotalHumicN
        sum([Soil].Nutrient.Microbial.N as TotalMicrobialN
        ([Plantain].Total.N) as TotalPlantN
        [Defoliate].Script.RotationHarvestingDM
        [Defoliate].Script.RotationHarvestedDM as RotationHarvestedWt
        [Defoliate].Script.PreHarvestDM
        [Defoliate].Script.PostHarvestDM
        [Defoliate].Script.DefoliatedDM
        [Defoliate].Script.HarvestedDM
        [Defoliate].Script.RemovedDM
        [Defoliate].Script.DefoliatedN
        [Defoliate].Script.HarvestedN
        [Defoliate].Script.RemovedN
        [Defoliate].Script.NReturnedInDung
        [Defoliate].Script.NReturnedInUrine
        [Defoliate].Script.DefoliatedDM as HarvestedWt
        [Defoliate].Script.DaysAfterCut
        [ExtraVariables].Script.AccumHarvestedWt as CumulativeHarvestedWt
        [Defoliate].Script.HarvestedNconc
        [Plantain].Phenology.ThermalTime
        [Plantain].Phenology.Photoperiod
        [Plantain].Population
        [Plantain].Phenology.CurrentPhase.Name
        [Plantain].Phenology.Stage
        [Plantain].Root.LengthDensity
        [Plantain].Leaf.ExtinctionCoefficient
        [Plantain].AboveGroundLive.Wt
        ([Plantain].Leaf.Live.Wt / ([Plantain].AboveGroundLive.Wt + 0.000001)) as LeafFraction
        ([Plantain].Stem.Live.Wt / ([Plantain].AboveGroundLive.Wt + 0.000001)) as StemFraction
        ([Plantain].Inflorescence.Live.Wt / ([Plantain].AboveGroundLive.Wt + 0.000001)) as FlowerFraction
        ([Plantain].Taproot.Live.Wt / ([Plantain].BelowGround.Wt + 0.000001)) as TaprootFraction
        ([Plantain].Root.Live.Wt / ([Plantain].BelowGround.Wt + 0.000001)) as RootFraction
        [Plantain].Arbitrator.DM.TotalFixationSupply
        [Plantain].Arbitrator.DM.TotalPlantDemand
        [Plantain].Arbitrator.DM.Allocated
        [Plantain].Arbitrator.DM.SinkLimitation
        [Plantain].Arbitrator.DM.NutrientLimitation
        [Plantain].Arbitrator.FDM
        [ExtraVariables].Script.Leaf_DMSupply
        [ExtraVariables].Script.Stem_DMSupply
        [ExtraVariables].Script.Inflorescence_DMSupply
        [ExtraVariables].Script.Root_DMSupply
        [ExtraVariables].Script.Taproot_DMSupply
        [ExtraVariables].Script.Leaf_DMDemand
        [ExtraVariables].Script.Stem_DMDemand
        [ExtraVariables].Script.Inflorescence_DMDemand
        [ExtraVariables].Script.Root_DMDemand
        [ExtraVariables].Script.Taproot_DMDemand
        [Plantain].Arbitrator.N.TotalPlantSupply
        [Plantain].Arbitrator.N.TotalPlantDemand
        [Plantain].Arbitrator.N.Allocated
        [Plantain].Arbitrator.FN
        [Plantain].Root.NTakenUp
        [Plantain].Root.NSupply.Uptake
        [Plantain].Root.NUptake
        [ExtraVariables].Script.Leaf_NSupply
        [ExtraVariables].Script.Stem_NSupply
        [ExtraVariables].Script.Inflorescence_NSupply
        [ExtraVariables].Script.Root_NSupply
        [ExtraVariables].Script.Taproot_NSupply
        [ExtraVariables].Script.Leaf_NDemand
        [ExtraVariables].Script.Stem_NDemand
        [ExtraVariables].Script.Inflorescence_NDemand
        [ExtraVariables].Script.Root_NDemand
        [ExtraVariables].Script.Taproot_NDemand
        [Plantain].ShootRootRatio
        [Plantain].TargetShootRootRatio
        [Plantain].Leaf.DMDemands.Structural.DMDemandFunction.PartitionFraction
        [Plantain].Stem.DMDemands.Structural.DMDemandFunction.PartitionFraction
        [Plantain].Inflorescence.DMDemands.Structural.DMDemandFunction.PartitionFraction
        [Plantain].Taproot.DMDemands.Structural.DMDemandFunction.PartitionFraction
        [Plantain].StemsLeafRatio
        [Plantain].FlowerStemRatio
        [Plantain].TaprootRootRatio
        [Plantain].TargetStemsLeafRatio
        [Plantain].TargetFlowerStemRatio
        [Plantain].TargetTaprootRootRatio
        [Plantain].Total.Wt
        [Plantain].Total.N
        [Plantain].Total.NConc
        [Plantain].AboveGround.Wt
        [Plantain].BelowGround.Wt
        [Plantain].AboveGround.N
        [Plantain].BelowGround.N
        [Plantain].AboveGroundLive.NConc
        [Plantain].BelowGroundLive.NConc
        [Plantain].Leaf.Wt
        [Plantain].Leaf.Live.Wt
        [Plantain].Leaf.Live.N
        [Plantain].Leaf.Live.NConc
        [Plantain].Leaf.Dead.Wt
        [Plantain].Leaf.Dead.NConc
        [Plantain].Leaf.CoverTotal
        [Plantain].Leaf.CoverGreen
        [Plantain].Leaf.CoverDead
        [Plantain].Leaf.LAITotal
        [Plantain].Leaf.LAI
        [Plantain].Leaf.LAIDead
        [Plantain].Leaf.Height
        [Plantain].Leaf.Transpiration
        [Plantain].Leaf.Fw
        [Plantain].Leaf.Fn
        [Plantain].Leaf.Photosynthesis.FCO2
        [Plantain].Leaf.Photosynthesis.FN
        [Plantain].Leaf.Photosynthesis.FT
        [Plantain].Leaf.Photosynthesis.FW
        [Plantain].Leaf.Photosynthesis.FVPD
        [Plantain].Leaf.FRGR
        [Plantain].Leaf.LAI
        [Plantain].Stem.Live.Wt
        [Plantain].Stem.Live.N
        [Plantain].Stem.Live.NConc
        [Plantain].Stem.Dead.Wt
        [Plantain].Stem.Dead.NConc
        [Plantain].Inflorescence.Live.Wt
        [Plantain].Inflorescence.Live.N
        [Plantain].Inflorescence.Live.NConc
        [Plantain].Inflorescence.Dead.Wt
        [Plantain].Inflorescence.Dead.NConc
        [Plantain].Taproot.Live.Wt
        [Plantain].Taproot.Live.N
        [Plantain].Taproot.Live.NConc
        [Plantain].Taproot.Dead.Wt
        [Plantain].Taproot.Dead.NConc
        [Plantain].Root.Live.Wt
        [Plantain].Root.Live.N
        [Plantain].Root.Live.NConc
        [Plantain].Root.Dead.Wt
        [Plantain].Root.Dead.NConc
        [Plantain].Root.Depth
        [Plantain].Root.WaterUptake
        [Plantain].Leaf.Live.StructuralWt
        [Plantain].Leaf.Live.StorageWt
        [Plantain].Leaf.Live.MetabolicWt
        [Plantain].Leaf.Live.StructuralN
        [Plantain].Leaf.Live.StorageN
        [Plantain].Leaf.Live.MetabolicN
        [Plantain].Leaf.Dead.StructuralWt
        [Plantain].Leaf.Dead.StorageWt
        [Plantain].Leaf.Dead.MetabolicWt
        [Plantain].Leaf.Dead.StructuralN
        [Plantain].Leaf.Dead.StorageN
        [Plantain].Leaf.Dead.MetabolicN
        [Plantain].Stem.Live.StructuralWt
        [Plantain].Stem.Live.StorageWt
        [Plantain].Stem.Live.MetabolicWt
        [Plantain].Stem.Live.StructuralN
        [Plantain].Stem.Live.StorageN
        [Plantain].Inflorescence.Live.StructuralWt
        [Plantain].Inflorescence.Live.StorageWt
        [Plantain].Inflorescence.Live.StructuralN
        [Plantain].Inflorescence.Live.StorageN
        [Plantain].Root.Live.StructuralWt
        [Plantain].Root.Live.StorageWt
        [Plantain].Root.Live.StructuralN
        [Plantain].Root.Live.StorageN
        [Plantain].Taproot.Live.StructuralWt
        [Plantain].Taproot.Live.StorageWt
        [Plantain].Taproot.Live.StructuralN
        [Plantain].Taproot.Live.StorageN
        [Plantain].Leaf.Live.StructuralNConc
        [Plantain].Leaf.Live.StorageNConc
        [Plantain].Root.Live.StructuralNConc
        [Plantain].Root.Live.StorageNConc
        [Plantain].Leaf.DMDemands.Structural.DMDemandFunction.PartitionFraction
        [Plantain].Stem.DMDemands.Structural.DMDemandFunction.PartitionFraction
        [Plantain].Inflorescence.DMDemands.Structural.DMDemandFunction.PartitionFraction
        [Plantain].Taproot.DMDemands.Structural.DMDemandFunction.PartitionFraction
        [Plantain].Leaf.Allocated.Wt
        [Plantain].Stem.Allocated.Wt
        [Plantain].Inflorescence.Allocated.Wt
        [Plantain].Taproot.Allocated.Wt
        [Plantain].Root.Allocated.Wt
        [Plantain].Leaf.Senesced.Wt
        [Plantain].Stem.Senesced.Wt
        [Plantain].Inflorescence.Senesced.Wt
        [Plantain].Taproot.Senesced.Wt
        [Plantain].Root.Senesced.Wt
        [Plantain].Leaf.Detached.Wt
        [Plantain].Stem.Detached.Wt
        [Plantain].Inflorescence.Detached.Wt
        [Plantain].Taproot.Detached.Wt
        [Plantain].Root.Detached.Wt
        [Plantain].Leaf.Removed.Wt
        [Plantain].Stem.Removed.Wt
        [Plantain].Inflorescence.Removed.Wt
        [Plantain].Taproot.Removed.Wt
        [Plantain].Root.Removed.Wt
    Plant Plantain: PlantType=Plantain; IsAlive=false; IsEnding=false; DaysAfterEnding=0
      Memo GeneralDescription
        _Rogerio Cichota, AgResearch, New Zealand_

        ## Preamble

        Plantain (*Plantago lanceolata*), also know as English plantain, ribgrass, or ribwort, is a herbaceous perennial herb with a broad distribution in the native grasslands of Eurasia ([SagarHarper_1964]; [StewartPlantain_1996]).  It is now common around the world in suitable habitats with temperate and subtropical climates.  The plant consists of a rosette of basal semi-erect leaves which may have one or more flowering stalks.  The leaves are green to grey-green in colour, have a characteristic lanceolate shape with 3 to 5 parallel veins along the length and have few or no hairs.  The stems are leafless, growing some 10-15cm above the leaves and have scattered hairs toward the base of the plant.  Each stalk terminates in an ovoid inflorescence containing many small flowers each with a pointed bract.  The inflrescence is 1-4cm long and changes shape over time (from a cone to a cilinder) as the flowers mature from the based to the top, the colour also changes from the initial grey-green to light brown when mature.  The flowering period goes from late spring to early fall and varies between plants, it can last several months for a population of plants in a given locale.  Plantain does not need vernalisation to trigger flowering.  The flowers are wind-pollinated and are replaced by a small seed capsule containing two small seeds, with weight varying between 1.5 and 2.0 mg per seed. Seeds have an oblong shape and the colour varies from dark brown to black.  The root system consists of a relatively shallow crown of coarse fibrous roots including adventitious roots ([SandersonElwinger_2000a]) and although technically a taprooted species it does not have the typical solid deep taproot.  Plantain can allocate greater proportion of roots at depth, giving a competitive advantage over shallow root grasses ([StewartPlantain_1996]; [NieEtAl_2008]; [vanDenBergeEtAl_2014]).

        Selection of plantain cultivars for use as forage have focused mostly on narrow leaf varieties, which have an erect, bushy, growth habit and ability to tiller under grazing ([StewartPlantain_1996]), more recently some emphasis has also been put on the ability to growth over cold periods.  Forage plantain can grow large leaves, up to around 40cm instead of typical 15-25cm, and these are highly palatable to grazing animals, being specifically targeted by sheep ([SagarHarper_1964]; [StewartPlantain_1996]; [RumballKeog_1997]; [QuijadaThesis_2015]). Reproductive organs are less palatable and mature stalks are avoided by grazers ([StewartPlantain_1996]; [MoorheadPigot_2009]; [AyalaEtAl_2011]).  Plantain is highly nutritious, has good digestibility, and the mineral composition usually is higher than ryegras-clover swards ([StewartPlantain_1996]; [JacobsWard_2010]; [ElgersmaEtal_2014]; [LeeEtAlYields_2015]).  Potential medicinal effects of plantain have been suggested and few bio-active compounds that may alter rumen fermentation and N partitionin in the animal are being investigated ([StewartPlantain_1996]; [QuijadaThesis_2015]; [JansmaThesis_2016]).

        **Objective:**  The model presented here has been built using the Plant Modelling Framework (PMF) of [brown_plant_2014] to simulate the growth of a forage plantin crop.  Currently, the focus is on describing biomass accumulation and regrowth after harvest on monocultural swards. As part of APSIM's PMF, using plantain in mixed swards is possible, but this has not been properly tested yet.  Likewise, describing the effect of population decrease on plant growth was not attempted; for swards free of weeds and within typical population ranges, the changes in plant size (number of tillers) and LAI should compensate for loss of population, but competition with weeds and others would alter this pattern significantly.
        Simulating variations in plant N concentration (seasonal or due to changes in soil status)  is not a major focus of the current model.  Further development of PMF's supply/demand processes are needed for capturing the variations in N content typically seen in perennial species.

        ## Presentation

        This model has been built using the Plant Modelling Framework (PMF) of [brown_plant_2014] to simulate the growth of a forage plantain crop ( _Plantago lanceolata_ ).  The model focus, thus, on describing primarily the vegetative growth, with a simplified account of the reproductive phase, without explicit considering flowers and seeds (these may be included in future releases).  To simulate the aboveground plant structure, including the photosynthesis process, the plantain model uses the SimpleLeaf procedure of PMF.  The model describes a semi-perennial crop, with phenology rewinding to the vegetative stage at the end of the reproductive phase.

        ## Inclusion in APSIM simulations

        A forage plantain crop can be included in a simulation the same as any other APSIM crop.

         - The plantain object can be dragged or copied from the Crop folder in the tool box into a Field in your simulation;
         - To become active and grow, plantain needs to be sown using a manager script with a sowing rule. e.g.:
        ~~~
         Plantain.Sow(cultivar: Tonic, population: 300, depth: 10, rowSpacing: 150);
        ~~~
        If a specified cultivar is not available, a fatal error will be thrown.

        ### Harvest and biomass removal

        Plantain biomass can be removed by raising one of the valid methods: Harvest, Cut, Graze, or Prune; this is done using a manager script, similarly to other crops.  The proportion of the biomass of each organ that is removed from the system and/or added to the residue pools may be specified; otherwise defaults will be used.  Note that the sum of fractions removed and added to residue should be <= 1.0.  To specify the proportions for removal in a manager script, use a RemovalFractions class as shown below:
        ~~~
        [EventSubscribe("Commencing")]
        private void OnSimulationCommencing(object sender, EventArgs e)
        {
          RemoveFraction = new RemovalFractions(Plantain.Organs);
        }
        [EventSubscribe("DoManagement")]
        private void OnDoManagement(object sender, EventArgs e)
        {
          if (Clock.Today.Date == HarvestDate)
          {
            RemoveFraction.SetFractionToRemove("Leaf", 0.80);
            RemoveFraction.SetFractionToRemove("Stem", 0.50);
            RemoveFraction.SetFractionToResidue("leaf",0.05);
            Plantain.Harvest(RemoveFraction);
          }
        }
        ~~~
        The RemovalFractions class can be sent with Harvest, Cut, Graze, or Prune events. All parameters are optional, defaults are used whenever any value is not specified.

        ### Crop termination
        To fully terminate a crop the EndCrop event should be raised:
        ~~~
         Plantain.EndCrop();
        ~~~
        Once a crop has been ended the field is open to be used by another APSIM plant model, or another plantain crop.  Note that ending plantain is not necessary before sowing another crop, competition for resources will take place between crops when there is more than one in the field.

        ## Acknowledgements
        This model was developed with help from Brittany Paton and Russel McAuliffe organising data and simulations. Datasets were kindly shared by Julia M. Lee and the Forages for Reduced Nitrogen Leaching (FRNL) programme.
      Phenology
        Memo Description
          The duration of each phenologic phase in plantain is controlled either by the accumulation of thermal time or photoperiod.
        HourlyInterpolation ThermalTime: agregationMethod=0
          Memo Description
            The thermal time is calculated from the daily average temperature using three cardinal temperatures: minimum, maximum, and optimum.  Crop development acelerates as temperature increases from minimum to optimum and slows down after that, stopping completely when maximum temperature is reached.  There is very little information about these thresholds for plantain, the minimum temperature seem to be quite variable as one of the main traits that vary among cultivars is the growth over winter. For "chinese plantain" ( _Plantago  asiatica_ ) the minimum temperature varies between 3 and 14 oC ([IshikawaEtAl_2007]), which gives an idea of potential variations for this parameter in plantain. Plantain is tolerant to high temperatures ([StewartPlantain_1996]; [NieEtAl_2008]) and outgrows ryegrass over summer in subtropical climate ([MoorheadPigot_2009]). The data for chinese plantain suggest similar growth, and thus the optimum and maximum temperature for it, 30 and 38oC respectively ([IshikawaEtAl_2007]), should give a good indication of the values for forage plantain.
          XYPairs Response: X=[9, 30, 38]; Y=[0, 25, 0]
          ThreeHourSin InterpolationMethod
        AccumulateFunction ThermalTimeAfterCutting: StartStageName=Emergence; EndStageName=Ripening; FractionRemovedOnCut=1; FractionRemovedOnHarvest=1; FractionRemovedOnGraze=1; FractionRemovedOnPrune=1
          VariableReference ThermalTime: VariableName=[Phenology].ThermalTime
          Memo
            Thermal-time (oCd) from cutting until next harvest. Variable is used to calculate accumlated thermal time for each regrowth cycle.
        PhotoperiodFunction Photoperiod: Twilight=-6; DayLength=0
        GerminatingPhase Germinating: Start=Sowing; End=Germination
          Memo Description
            Germination will occur one day after sowing, provided that the amount of soil extractable water is greater than zero.  Germination rates in plantain typically vary between 75 and 95% when sown close to the surface (<10mm), in moist warm soil ([ReedEtAl_2008]; [DouglasEtAl_2013]; [LeeEtAlYields_2015]).  The plantain model, following convention of PMF, assumes 100% germination, and therefore the user must correct sowing rate when variations between sown and germinated plant density is considered important.
        EmergingPhase Emerging: Start=Germination; End=Emergence; TTForTimeStep=0
          Memo Description
             Plantain has small seeds and emergence is best when seeds are sown at depth <10mm (Peri et al., 2000; Sanderson et al., 2000), deeper seed may stay dormant for years in the soil ([Blom_1978]; [RobertsBoddrell_1984]).  Variations in germination rate due to depth are not explicitly simulated by the plantain model in the current version, however the sowing depth does affect timing of emergence.  This is controlled by the parameter ShootRate, which is the shoot elongation rate as function of thermal time (mm/oCd).
          VariableReference ThermalTime: VariableName=[Phenology].ThermalTime
          AddFunction Target
            Constant ShootLag: FixedValue=15
            MultiplyFunction DepthxRate
              VariableReference SowingDepth: VariableName=[Plant].SowingData.Depth
              Constant ShootRate: FixedValue=10
        GenericPhase Vegetative: Start=Emergence; End=Flowering
          Memo Description
            During this phase the plant only partitions biomass to leaf and root+taproot organs.  The phase starts when plants emerge from the ground, but it is also triggered after the end of the reproductive phase (phenology reset).  It ends when the reproductive phase starts, which is triggered by the accumulation of days with long sunlight ([SussexPlantain_1956]; [Rowarth_Plantain_1990]; [CaseLaceyHopkins_1996]; [LaceyRoach_2003]; [GonzalezParrado_2015]).  Stalk development have been recorded to start in October in NZ and in May in the USA ([Rowarth_Plantain_1990]; [LaceyRoach_2003]; [SandersonEtAl_2003]), with data suggesting a minimum of 25-30 days (non consecutive) with long daylight periods ([SussexPlantain_1956]; [FajerEtAl_1991]; [CaseLaceyHopkins_1996]).  The literature does not provide an indication of how long the sunlight period should be to trigger the reproductive phase, but it is clear that daylight should be grater that the period in darkness (14-16 hours been used to induce flowering in growth chambers).  The base plantain model uses the accumulation of days greater than 12hrs to trigger the end of the vegetative phase.
          Constant Target: FixedValue=30; Units=days
          LinearInterpolationFunction Progression
            XYPairs: X=[10, 11.5, 12, 13]; Y=[0, 0, 1, 1]
            VariableReference XValue: VariableName=[Phenology].Photoperiod
        GenericPhase Reproductive: Start=Flowering; End=Ripening
          Memo Description
            During this phase the plant is partitioning biomass to all organs, including reproductive organs (stems, flowers, and seeds). Flower stages and seeds development are not explicitly described in the current model, only a generic organ refered to as _inflorescence_ is defined.  This was done partly due to lack of data and partly because of the variability and complex phenology of plantain.  There is a lot of variation among plantain plants regarding when flowering occurs and how long it lasts, plus even the same plant can have flowering stalks, stalks with young seeds, as well as stalks with ripen seed at the same time ([Rowarth_Plantain_1990]; [RumballKeog_1997]; [LaceyRoach_2003]; [GonzalezParrado_2015]).  Seed ripenning is reached some 8-10 weeks after flowering, with commercial cultivars closer to the low end of the range.  The available data suggest an accumulation of 450oCd for the flowering period, with base temperature between 5 and 9oC ([Rowarth_Plantain_1990]; [RumballKeog_1997]; [GonzalezParrado_2015]).  Howerver flowering continues throughout the summer into autumn and seem to be curtailed only by frosts ([Rowarth_Plantain_1990]) and/or short days ([SandersonEtAl_2003]).  In the plantain model the photoperiod is used to define the end of reproductive phase, following the same approach used to start it.  And correspondelly, the accumulation of days shorter than 12 hours is used as the trigger the end of the phase (this approach also ensures phenology reset even in warmer climates).  Note that the DM partition functions also use photoperiod to change priority allocation into reproductive organs, with maximum allocation only when daylight length is greater than 14hours.  This was done to limit the allocation to reproductive organs on the sason shoulders when only few plants are actively in the reproductive phase (e.g. [SandersonEtAl_2003]).
          Constant Target: FixedValue=30; Units=days
          LinearInterpolationFunction Progression
            XYPairs: X=[10, 11, 12.5, 13]; Y=[1, 1, 0, 0]
            VariableReference XValue: VariableName=[Phenology].Photoperiod
        GotoPhase: Start=Ripening; PhaseNameToGoto=Vegetative
          Memo Description
            At the end of reproductive phase, plantain phenology is reset to 'Vegetative'.
      OrganArbitrator Arbitrator
        BiomassTypeArbitrator DMArbitration
          Folder PotentialPartitioningMethods
            ReallocationMethod
            AllocateFixationMethod
            RetranslocationMethod
            SendPotentialDMAllocationsMethod
          Folder AllocationMethods
            NutrientConstrainedAllocationMethod
            DryMatterAllocationsMethod
          RelativeAllocation ArbitrationMethod
            Memo Description
              Controls the allocation of biomass to each of the plant's organs. Partition is based on:
        BiomassTypeArbitrator NArbitration
          Folder PotentialPartitioningMethods
            ReallocationMethod
          Folder ActualPartitioningMethods
            AllocateFixationMethod
            RetranslocationMethod
          Folder AllocationMethods
            NitrogenAllocationsMethod
          RelativeAllocation ArbitrationMethod
            Memo Description
              Controls the allocation of N to each of the plant's organs. Partition is based on:
          AllocateUptakesMethod
        WaterUptakeMethod
        NitrogenUptakeMethod
      SimpleLeaf Leaf: Albedo=0.18; Gsmax350=0.015; R50=150; LeafInitialisationStage=Emergence; Height=0; BaseHeight=0; Width=0; FRGR=0; PotentialEP=0; WaterDemand=0; KDead=0; LAIDead=0
        Memo Description
          __Note:__ this organ represents all the leaves in the plant, without distinction between ages or placement in the canopy.
        Constant StomatalConductanceCO2Modifier: FixedValue=1
        MultiplyFunction InitialWt
          Constant InitialPlantWt: FixedValue=0.001; Units=g/plant
          VariableReference Population: VariableName=[Plant].Population
        Constant MinimumNConc: FixedValue=0.015; Units=gN/gDM
        Constant MaximumNConc: FixedValue=0.055; Units=gN/gDM
        RUEModel Photosynthesis
          Memo Description
            Data for photosynthesys in plantain is very sparse and so some of the data used here are from studies that employed wild varieties.  Values for CO2 assimilation rates are generally consistent ([PootDenBroek_1997]; [LabreveuxThesis_2002]; [vanDenBergeEtAl_2014]; [CranstonEtAl_2015]) and follow a classic relationhip with light intensity (directly proportional) as well with N concentration in the leaves (inversely proportional).  Reported values of photosynthetic rate indicate that these are similar or slightly higher in plantain when compared to Chicory ([LabreveuxThesis_2002]; [CranstonEtAl_2015]).  No reported values for RUE were found in the literature, but they can be infered as to be just under 2.0 g DM/MJ for wild vareties ([PootDenBroek_1997]).
            The current model assumes generic responses to enviromental factors, such as temperature and water availability.  Wild plantain is ubiquitous in meadows in subtropical climates around the world, and it is generally assumed to be tollerant to high temperatures but not to cold ([SagarHarper_1964]; [StewartPlantain_1996]).  Forage plantain shows large differences between cultivars, but generally can grow more over winter compared to wild varieties and still outperform temperate grasses in summer ([StewartPlantain_1996]; [MoorheadPigot_2009], [DouglasEtAl_2013]), although survivability in harsh winters in the USA was found to be low ([SandersonEtAl_2003], [SkinnerPlantain_2005]).  Forage plantain is also often mentioned as a drought tollerant species ([StewartPlantain_1996]; [DouglasEtAl_2013]; [QuijadaThesis_2015]), although less so than deep rooted species such as chicory or lucerne.  The use of reserves from the taproots seem to be mechanism used to confer drought resistance in plantain as is the case for many herbs ([CranstonEtAl_2015]; [QuijadaThesis_2015]).
          Constant RUE: FixedValue=2; Units=g/MJ
          RUECO2Function FCO2: PhotosyntheticPathway=C3
          LinearInterpolationFunction FN
            XYPairs: X=[0, 0.4, 0.8, 1.5]; Y=[0, 0.5, 1, 1]
            VariableReference XValue: VariableName=[Leaf].Fn
          WeightedTemperatureFunction FT: MaximumTemperatureWeighting=0.75
            XYPairs: X=[4, 10, 15, 21, 27, 35]; Y=[0, 0.075, 0.35, 1, 1, 0]
          LinearInterpolationFunction FW
            XYPairs: X=[0, 0.8, 1, 1.5]; Y=[0, 1, 1, 1]
            VariableReference XValue: VariableName=[Leaf].Fw
          LinearInterpolationFunction FVPD
            XYPairs: X=[0, 10, 50]; Y=[1, 1, 1]
            VariableReference XValue: VariableName=[Leaf].Photosynthesis.VPD
          VariableReference RadnInt: VariableName=[Leaf].RadiationIntercepted
        DivideFunction FRGR
          Memo Description
            This parameter represents the Fractional Growth Rate.  It is needed by the MicroClimate model, where it is used to compute the effect of growth rate on transpiration.
          VariableReference Photosynthesis: VariableName=[Leaf].Photosynthesis
          MultiplyFunction PotentialPhotosynthesis
            VariableReference RUE: VariableName=[Leaf].Photosynthesis.RUE
            MaximumFunction Radiation
              VariableReference RadnInt: VariableName=[Leaf].RadiationIntercepted
              Constant MinRadn: FixedValue=1e-05
        Constant DMConversionEfficiency: FixedValue=1; Units=0-1
        Constant MaintenanceRespiration: FixedValue=0; Units=0-1
        MultiplyFunction Area
          Constant SpecificLeafArea: FixedValue=0.02; Units=m^2/g
          VariableReference LiveLeafWeight: VariableName=[Leaf].Live.Wt
        MultiplyFunction LaiDead
          VariableReference SpecificLeafArea: VariableName=[Leaf].Area.SpecificLeafArea
          VariableReference DeadLeafWeight: VariableName=[Leaf].Dead.Wt
        Constant ExtinctionCoefficient: FixedValue=0.6; Units=0-1
        LinearInterpolationFunction Tallness
          Memo Description
            The average height of plantain is assumed here as a simple function of above ground biomass. Sward population and competition with other plant can have an influence on this relationship, but this is not currently accounted for by PMF.
          XYPairs: X=[0, 150, 390]; Y=[0, 225, 450]
          VariableReference XValue: VariableName=[Phenology].ThermalTimeAfterCutting
        MultiplyFunction SenescenceRate
          Memo Description
            The sparse availabe data suggests that plantain has a relativelly slow senescence rate compared to other medow herbs ([CalviereDuru_1995]; [SchippersOlff_2000]).  Generic relationships to enviromental factors, such as temperature and soil moisture, are assumed based on other plant models.
          Constant ReferenceRate: FixedValue=0.005; Units=/day
          LinearInterpolationFunction StageFactor
            XYPairs: X=[3, 4, 5]; Y=[0.5, 1, 1]
            VariableReference XValue: VariableName=[Phenology].Stage
          LinearInterpolationFunction CoverFactor
            XYPairs: X=[0, 0.5, 0.9, 0.95, 0.99, 1]; Y=[1, 1, 1, 1.1, 2, 3]
            VariableReference XValue: VariableName=[Leaf].CoverTotal
          WeightedTemperatureFunction TemperatureFactor: MaximumTemperatureWeighting=0.5
            XYPairs: X=[-15, -2, 2, 10, 20, 30]; Y=[1.5, 0.25, 0, 0, 1, 1]
          LinearInterpolationFunction SoilMoistureFactor
            XYPairs: X=[0, 0.5, 1]; Y=[2, 1, 1]
            VariableReference XValue: VariableName=[Leaf].Fw
        MultiplyFunction DetachmentRate
          Memo Description
            A generic relationship between detachment and soil moisture is assumed.  It implies that under dry conditions the detachment rate decreases due to the lower level of activity of decomposing microorganisms.
          Constant ReferenceRate: FixedValue=0.1; Units=/day
          LinearInterpolationFunction SoilMoistureFactor
            XYPairs: X=[0, 0.5, 1]; Y=[0.5, 0.5, 1]
            VariableReference XValue: VariableName=[Leaf].Fw
        Constant DMRetranslocationFactor: FixedValue=0; Units=/day
        Constant NRetranslocationFactor: FixedValue=0; Units=/day
        Constant NReallocationFactor: FixedValue=1; Units=/day
        BiomassRemoval BiomassRemovalDefaults
          OrganBiomassRemovalType Cut: FractionLiveToRemove=0.7; FractionDeadToRemove=0.5; FractionLiveToResidue=0; FractionDeadToResidue=0
          OrganBiomassRemovalType Graze: FractionLiveToRemove=0.7; FractionDeadToRemove=0.1; FractionLiveToResidue=0.1; FractionDeadToResidue=0.1
          OrganBiomassRemovalType Harvest: FractionLiveToRemove=0; FractionDeadToRemove=0; FractionLiveToResidue=0.1; FractionDeadToResidue=0.1
          OrganBiomassRemovalType Prune: FractionLiveToRemove=0; FractionDeadToRemove=0; FractionLiveToResidue=0.1; FractionDeadToResidue=0.1
        Constant NitrogenDemandSwitch: FixedValue=1
        Constant DMReallocationFactor: FixedValue=0
        VariableReference CriticalNConc: VariableName=[Leaf].MinimumNConc
        Constant RemobilisationCost: FixedValue=0
        Constant CarbonConcentration: FixedValue=0.4
        BiomassDemandAndPriority DMDemands
          MultiplyFunction Structural
            PartitionFractionDemandFunction DMDemandFunction
              Memo Description
                In the plantain model, the DM demand function attempts to keep the shoot to root ratio and then the stem to leaf ratio close to a target value (defined by the [TargetShootRootRatio].Value and [TargetStemsLeafRatio].Value), which may vary according to the phenolgical stage.  This approach ensures that the plantain plants will recovery after being cut or grazed.  In this case, biomass will be allocated to leaves preferably, even during reproductive phase.
              PhaseLookup PartitionFraction
                PhaseLookupValue Vegetative: Start=Emergence; End=Flowering
                  DivideFunction LeafFraction
                    MultiplyFunction Numerator
                      VariableReference TargetSR1: VariableName=[TargetShootRootRatio]
                      VariableReference TargetSR2: VariableName=[TargetShootRootRatio]
                    AddFunction Denominator
                      MultiplyFunction TargetSRs
                        VariableReference TargetSR1: VariableName=[TargetShootRootRatio]
                        VariableReference TargetSR2: VariableName=[TargetShootRootRatio]
                      VariableReference CurrentSR: VariableName=[ShootRootRatio]
                PhaseLookupValue Reproductive: Start=Flowering; End=Ripening
                  DivideFunction LeafFraction
                    MultiplyFunction Numerator
                      VariableReference TargetSR1: VariableName=[TargetShootRootRatio]
                      VariableReference TargetSR2: VariableName=[TargetShootRootRatio]
                      VariableReference CurrentSL: VariableName=[StemsLeafRatio]
                    MultiplyFunction Denominator
                      AddFunction SRs: same as Replacements.Plantain.Leaf.DMDemands.Structural.DMDemandFunction.PartitionFraction.Vegetative.LeafFraction.Denominator
                      AddFunction SLs
                        MultiplyFunction TargetSLs
                          VariableReference TargetSL1: VariableName=[TargetStemsLeafRatio]
                          VariableReference TargetSL2: VariableName=[TargetStemsLeafRatio]
                        VariableReference CurrentSL: VariableName=[StemsLeafRatio]
            Constant StructuralFraction: FixedValue=1; Units=g/g
          Constant Metabolic: FixedValue=0
          StorageDMDemandFunction Storage
            SubtractFunction StorageFraction
              Constant One: FixedValue=1
              VariableReference StructuralFraction: VariableName=[Leaf].DMDemands.Structural.StructuralFraction
          Constant QStructuralPriority: FixedValue=1
          Constant QMetabolicPriority: FixedValue=1
          Constant QStoragePriority: FixedValue=1
        BiomassDemandAndPriority NDemands
          MultiplyFunction Structural
            VariableReference MinNconc: VariableName=[Leaf].minimumNconc
            VariableReference PotentialDMAllocation: VariableName=[Leaf].potentialDMAllocation.Structural
          MultiplyFunction Metabolic
            SubtractFunction MetabolicNconc
              VariableReference CritNconc: VariableName=[Leaf].criticalNConc
              VariableReference MinNconc: VariableName=[Leaf].minimumNconc
            VariableReference PotentialDMAllocation: VariableName=[Leaf].potentialDMAllocation.Structural
          StorageNDemandFunction Storage
            VariableReference NitrogenDemandSwitch: VariableName=[Leaf].nitrogenDemandSwitch
            VariableReference MaxNconc: VariableName=[Leaf].maximumNconc
          Constant QStructuralPriority: FixedValue=1
          Constant QMetabolicPriority: FixedValue=1
          Constant QStoragePriority: FixedValue=1
      GenericOrgan Stem: IsAboveGround=true
        Memo Description
          __Note:__ this represents all the stems/stalks in the plant, without distinction between ages or placement in the canopy.
        Constant MinimumNConc: FixedValue=0.005; Units=gN/gDM
        Constant MaximumNConc: FixedValue=0.02; Units=gN/gDM
        Constant DMConversionEfficiency: FixedValue=1; Units=0-1
        Constant MaintenanceRespirationFunction: FixedValue=0; Units=0-1
        MultiplyFunction SenescenceRate
          Memo Description
            The reference senescence rate is adjusted using generic relationships to enviromental factors, such as temperature and soil moisture.  These are based on general knowledge from other plant models.
          Constant ReferenceRate: FixedValue=0.2; Units=/day
          LinearInterpolationFunction StageFactor
            XYPairs: X=[3, 3.999, 4, 4.5, 4.75, 5]; Y=[1, 1, 0.5, 0.55, 0.75, 1]
            VariableReference XValue: VariableName=[Phenology].Stage
          WeightedTemperatureFunction TemperatureFactor: MaximumTemperatureWeighting=0.5
            XYPairs: X=[-15, 0, 2, 10, 20, 30]; Y=[2, 0.2, 0, 0, 1, 1]
          LinearInterpolationFunction SoilMoistureFactor
            XYPairs: X=[0, 0.5, 1]; Y=[2, 1, 1]
            VariableReference XValue: VariableName=[Leaf].Fw
        MultiplyFunction DetachmentRateFunction
          Memo Description
            A generic relationship between detachment and soil moisture is assumed.  It implies that under dry conditions the detachment rate decreases due to the lower level of activity of decomposing microorganisms.
          Constant ReferenceRate: FixedValue=0.1; Units=/day
          LinearInterpolationFunction SoilMoistureFactor
            XYPairs: X=[0, 0.5, 0.75, 1]; Y=[0.1, 0.1, 0.25, 1]
            VariableReference XValue: VariableName=[Leaf].Fw
        Constant DMRetranslocationFactor: FixedValue=0; Units=/day
        Constant NRetranslocationFactor: FixedValue=0; Units=/day
        Constant NReallocationFactor: FixedValue=1; Units=/day
        BiomassRemoval BiomassRemovalDefaults
          OrganBiomassRemovalType Cut: FractionLiveToRemove=0.8; FractionDeadToRemove=0.65; FractionLiveToResidue=0; FractionDeadToResidue=0
          OrganBiomassRemovalType Graze: FractionLiveToRemove=0.8; FractionDeadToRemove=0.25; FractionLiveToResidue=0.1; FractionDeadToResidue=0.2
          OrganBiomassRemovalType Harvest: FractionLiveToRemove=0; FractionDeadToRemove=0; FractionLiveToResidue=0.1; FractionDeadToResidue=0.1
          OrganBiomassRemovalType Prune: FractionLiveToRemove=0; FractionDeadToRemove=0; FractionLiveToResidue=0.5; FractionDeadToResidue=0.2
        Constant NitrogenDemandSwitch: FixedValue=1
        Constant DMReallocationFactor: FixedValue=0
        VariableReference CriticalNConc: VariableName=[Stem].MinimumNConc
        Constant RemobilisationCost: FixedValue=0
        Constant CarbonConcentration: FixedValue=0.4
        BiomassDemandAndPriority DMDemands
          MultiplyFunction Structural
            PartitionFractionDemandFunction DMDemandFunction
              Memo Description
                A simple approach is used in the plantain model to define the allocation of biomass to various organs.  The proportion of the above ground biomass allocated to stems is determined based on the current state and two target ratios, the [TargetStemsLeafRatio].Value and [FlowerStemRatio].Value).  Allocation of biomass to stems can only occur during the reproductive phase.
              PhaseLookup PartitionFraction
                PhaseLookupValue Reproductive: Start=Flowering; End=Ripening
                  DivideFunction StemFraction
                    MultiplyFunction Numerator
                      VariableReference TargetSR1: VariableName=[TargetShootRootRatio]
                      VariableReference TargetSR2: VariableName=[TargetShootRootRatio]
                      VariableReference TargetSL1: VariableName=[TargetStemsLeafRatio]
                      VariableReference TargetSL2: VariableName=[TargetStemsLeafRatio]
                      VariableReference CurrentFS: VariableName=[FlowerStemRatio]
                    MultiplyFunction Denominator
                      AddFunction SRs: same as Replacements.Plantain.Leaf.DMDemands.Structural.DMDemandFunction.PartitionFraction.Vegetative.LeafFraction.Denominator
                      AddFunction SLs: same as Replacements.Plantain.Leaf.DMDemands.Structural.DMDemandFunction.PartitionFraction.Reproductive.LeafFraction.Denominator.SLs
                      AddFunction FSs
                        MultiplyFunction TargetFSs
                          VariableReference TargetFS1: VariableName=[TargetFlowerStemRatio]
                          VariableReference TargetFS2: VariableName=[TargetFlowerStemRatio]
                        VariableReference CurrentFS: VariableName=[FlowerStemRatio]
            Constant StructuralFraction: FixedValue=1; Units=g/g
          Constant Metabolic: FixedValue=0
          StorageDMDemandFunction Storage
            SubtractFunction StorageFraction
              Constant One: FixedValue=1
              VariableReference StructuralFraction: VariableName=[Stem].DMDemands.Structural.StructuralFraction
          Constant QStructuralPriority: FixedValue=1
          Constant QMetabolicPriority: FixedValue=1
          Constant QStoragePriority: FixedValue=1
        BiomassDemandAndPriority NDemands
          MultiplyFunction Structural
            VariableReference MinNconc: VariableName=[Stem].minimumNconc
            VariableReference PotentialDMAllocation: VariableName=[Stem].potentialDMAllocation.Structural
          MultiplyFunction Metabolic
            SubtractFunction MetabolicNconc
              VariableReference CritNconc: VariableName=[Stem].criticalNConc
              VariableReference MinNconc: VariableName=[Stem].minimumNconc
            VariableReference PotentialDMAllocation: VariableName=[Stem].potentialDMAllocation.Structural
          StorageNDemandFunction Storage
            VariableReference NitrogenDemandSwitch: VariableName=[Stem].nitrogenDemandSwitch
            VariableReference MaxNconc: VariableName=[Stem].maximumNconc
          Constant QStructuralPriority: FixedValue=1
          Constant QMetabolicPriority: FixedValue=1
          Constant QStoragePriority: FixedValue=1
        RetranslocateNonStructural RetranslocateNitrogen
        BiomassDemand InitialWt
          Constant Structural: FixedValue=1e-06; Units=g/plant
          Constant Metabolic: FixedValue=0
          Constant Storage: FixedValue=0
        Constant Photosynthesis: FixedValue=0
        VariableReference initialNConcFunction: VariableName=[Stem].MinimumNConc
      GenericOrgan Inflorescence: IsAboveGround=true
        Memo Description
          __Note:__ this represents all the reproductive parts of the plant, flowers, pods, seed, etc. No distinction is made between ages or placement in the canopy.
        Constant MinimumNConc: FixedValue=0.02; Units=gN/gDM
        Constant MaximumNConc: FixedValue=0.06; Units=gN/gDM
        Constant DMConversionEfficiency: FixedValue=1; Units=0-1
        Constant MaintenanceRespirationFunction: FixedValue=0; Units=0-1
        MultiplyFunction SenescenceRate
          Memo Description
            The sparse availabe data suggests that plantain has a relativelly slow senescence rate compared to other medow herbs ([CalviereDuru_1995]; [SchippersOlff_2000]).  Generic relationships to enviromental factors, such as temperature and soil moisture, are assumed based on other plant models.
          Constant ReferenceRate: FixedValue=0.25; Units=/day
          LinearInterpolationFunction StageFactor
            XYPairs: X=[3, 3.99, 4, 4.5, 5]; Y=[1, 1, 0.5, 0.65, 1]
            VariableReference XValue: VariableName=[Phenology].Stage
          WeightedTemperatureFunction TemperatureFactor: MaximumTemperatureWeighting=0.5
            XYPairs: X=[0, 5, 20, 30]; Y=[0, 0, 1, 1]
          LinearInterpolationFunction SoilMoistureFactor
            XYPairs: X=[0, 0.5, 1]; Y=[2, 1, 1]
            VariableReference XValue: VariableName=[Leaf].Fw
        MultiplyFunction DetachmentRateFunction
          Memo Description
            A generic relationship between detachment and soil moisture is assumed.  It implies that under dry conditions the detachment rate decreases due to the lower level of activity of decomposing microorganisms.
          Constant ReferenceRate: FixedValue=0.25; Units=/day
          LinearInterpolationFunction SoilMoistureFactor
            XYPairs: X=[0, 0.5, 1]; Y=[0, 0.5, 1]
            VariableReference XValue: VariableName=[Leaf].Fw
        Constant DMRetranslocationFactor: FixedValue=0; Units=/day
        Constant NRetranslocationFactor: FixedValue=0; Units=/day
        Constant NReallocationFactor: FixedValue=1; Units=/day
        BiomassRemoval BiomassRemovalDefaults
          OrganBiomassRemovalType Cut: FractionLiveToRemove=0.8; FractionDeadToRemove=0.25; FractionLiveToResidue=0; FractionDeadToResidue=0
          OrganBiomassRemovalType Graze: FractionLiveToRemove=0.8; FractionDeadToRemove=0.25; FractionLiveToResidue=0.1; FractionDeadToResidue=0.1
          OrganBiomassRemovalType Harvest: FractionLiveToRemove=0.8; FractionDeadToRemove=0.8; FractionLiveToResidue=0.1; FractionDeadToResidue=0.1
          OrganBiomassRemovalType Prune: FractionLiveToRemove=0; FractionDeadToRemove=0; FractionLiveToResidue=0.5; FractionDeadToResidue=0.25
        Constant NitrogenDemandSwitch: FixedValue=1
        Constant DMReallocationFactor: FixedValue=0
        VariableReference CriticalNConc: VariableName=[Inflorescence].MinimumNConc
        Constant RemobilisationCost: FixedValue=0
        Constant CarbonConcentration: FixedValue=0.4
        BiomassDemandAndPriority DMDemands
          MultiplyFunction Structural
            PartitionFractionDemandFunction DMDemandFunction
              Memo Description
                The plantain model uses a  simple approach to define the allocation of biomass to various organs.  The fraction of the above ground biomass allocated to inflorescence is determined based on the current proprotion and two target ratios, the [TargetStemsLeafRatio].Value and [FlowerStemRatio].Value).  Allocation to inflorescence can only occur during the reproductive phase.
              PhaseLookup PartitionFraction
                PhaseLookupValue Reproductive: Start=Flowering; End=Ripening
                  DivideFunction FlowerFraction
                    MultiplyFunction Numerator
                      VariableReference TargetSR1: VariableName=[TargetShootRootRatio]
                      VariableReference TargetSR2: VariableName=[TargetShootRootRatio]
                      VariableReference TargetSL1: VariableName=[TargetStemsLeafRatio]
                      VariableReference TargetSL2: VariableName=[TargetStemsLeafRatio]
                      VariableReference TargetFS1: VariableName=[TargetFlowerStemRatio]
                      VariableReference TargetFS2: VariableName=[TargetFlowerStemRatio]
                    MultiplyFunction Denominator: same as Replacements.Plantain.Stem.DMDemands.Structural.DMDemandFunction.PartitionFraction.Reproductive.StemFraction.Denominator
            Constant StructuralFraction: FixedValue=1; Units=g/g
          Constant Metabolic: FixedValue=0
          StorageDMDemandFunction Storage
            SubtractFunction StorageFraction
              Constant One: FixedValue=1
              VariableReference StructuralFraction: VariableName=[Inflorescence].DMDemands.Structural.StructuralFraction
          Constant QStructuralPriority: FixedValue=1
          Constant QMetabolicPriority: FixedValue=1
          Constant QStoragePriority: FixedValue=1
        BiomassDemandAndPriority NDemands
          MultiplyFunction Structural
            VariableReference MinNconc: VariableName=[Inflorescence].minimumNconc
            VariableReference PotentialDMAllocation: VariableName=[Inflorescence].potentialDMAllocation.Structural
          MultiplyFunction Metabolic
            SubtractFunction MetabolicNconc
              VariableReference CritNconc: VariableName=[Inflorescence].criticalNConc
              VariableReference MinNconc: VariableName=[Inflorescence].minimumNconc
            VariableReference PotentialDMAllocation: VariableName=[Inflorescence].potentialDMAllocation.Structural
          StorageNDemandFunction Storage
            VariableReference NitrogenDemandSwitch: VariableName=[Inflorescence].nitrogenDemandSwitch
            VariableReference MaxNconc: VariableName=[Inflorescence].maximumNconc
          Constant QStructuralPriority: FixedValue=1
          Constant QMetabolicPriority: FixedValue=1
          Constant QStoragePriority: FixedValue=1
        RetranslocateNonStructural RetranslocateNitrogen
        BiomassDemand InitialWt
          Constant Structural: FixedValue=0; Units=g/m^2
          Constant Metabolic: FixedValue=0
          Constant Storage: FixedValue=0
        Constant Photosynthesis: FixedValue=0
        VariableReference initialNConcFunction: VariableName=[Inflorescence].MinimumNConc
      GenericOrgan Taproot: IsAboveGround=false
        Memo Description
          __Note:__ this represents all the taproots of the plant.
          Taproots are the primary reserve organs and will supply sugars and N to burst growth especially early in spring and following defoliation.  To accomplish this, the taproots' biomass is partioned into structural and non-structural fractions, the later is available to be used in new growth (via biomass retranslocation).  There is very few data on how much reserves are kept in plantain taproots, results from [QuijadaThesis_2015] suggest that sugars plus fructan made up 4-11% of taproots biomass compared to 15-35% in chicory, which is consistent with plantain having much smaller taproots.  Based on these values, and some trial and error, the parameters related to retranslocation (StructuralFraction, DMRetranslocationFactor, and NRetranslocationFactor) were estimated.  These should be upgraded when more data is made available.
        Constant MinimumNConc: FixedValue=0.007; Units=gN/gDM
        Constant MaximumNConc: FixedValue=0.02; Units=gN/gDM
        Constant DMConversionEfficiency: FixedValue=1; Units=0-1
        Constant MaintenanceRespirationFunction: FixedValue=0; Units=0-1
        MultiplyFunction SenescenceRate
          Memo Description
            The reference senescence rate is adjusted according to enviromental factors, temperature and soil moisture.  Currently only sensitivity to temperature is considered, based on general knowledge from other plant models. The sensitivity of plantain roots to low moisture or water logging is not clear , so this will have to be upgrade in the future when more data is available.  According to [SagarHarper_1964], *P. major*, a similar species, is more tolerant to water logging than *P. lanceolata*, which rarely occurs in water logged sites ([vanTiederen_1992]).
          Constant ReferenceRate: FixedValue=0.001; Units=/day
          WeightedTemperatureFunction TemperatureFactor: MaximumTemperatureWeighting=0.5
            XYPairs: X=[0, 5, 22, 30]; Y=[0, 0, 1, 1]
          LinearInterpolationFunction SoilMoistureFactor
            XYPairs: X=[0, 0.5, 1]; Y=[1, 1, 1]
            VariableReference XValue: VariableName=[Leaf].FW
          Constant SoilAerationFactor: FixedValue=1; Units=0-1
        Constant DetachmentRateFunction: FixedValue=1; Units=/day
        Constant DMRetranslocationFactor: FixedValue=0.15; Units=/day
        Constant NRetranslocationFactor: FixedValue=0.2; Units=/day
        Constant NReallocationFactor: FixedValue=1; Units=/day
        BiomassRemoval BiomassRemovalDefaults
          OrganBiomassRemovalType Cut: FractionLiveToRemove=0; FractionDeadToRemove=0; FractionLiveToResidue=0.1; FractionDeadToResidue=0
          OrganBiomassRemovalType Graze: FractionLiveToRemove=0; FractionDeadToRemove=0; FractionLiveToResidue=0.1; FractionDeadToResidue=0
          OrganBiomassRemovalType Harvest: FractionLiveToRemove=0; FractionDeadToRemove=0; FractionLiveToResidue=0.1; FractionDeadToResidue=0
          OrganBiomassRemovalType Prune: FractionLiveToRemove=0; FractionDeadToRemove=0; FractionLiveToResidue=0.1; FractionDeadToResidue=0
        Constant NitrogenDemandSwitch: FixedValue=1
        Constant DMReallocationFactor: FixedValue=0
        VariableReference CriticalNConc: VariableName=[Taproot].MinimumNConc
        Constant RemobilisationCost: FixedValue=0
        Constant CarbonConcentration: FixedValue=0.4
        BiomassDemandAndPriority DMDemands
          MultiplyFunction Structural
            PartitionFractionDemandFunction DMDemandFunction
              Memo Description
                The plantain model computes the allocation of biomass to taproots assuming that there is a target ratio the biomass of root and taproot (defined by [TaprootRootRatio].Value).  The existing literature does not provide values for this parameter, and based on other herbs, such as chicory, a simple value which is further modified by plant specific biomass is assumed in the model. This should be update when more data becomes available.
              PhaseLookup PartitionFraction
                PhaseLookupValue AllPhases: Start=Emergence; End=Ripening
                  DivideFunction TaprootFraction
                    MultiplyFunction Numerator
                      VariableReference CurrentSR: VariableName=[ShootRootRatio]
                      VariableReference TargetTR1: VariableName=[TargetTaprootRootRatio]
                      VariableReference TargetTR2: VariableName=[TargetTaprootRootRatio]
                    MultiplyFunction Denominator
                      AddFunction SRs: same as Replacements.Plantain.Leaf.DMDemands.Structural.DMDemandFunction.PartitionFraction.Vegetative.LeafFraction.Denominator
                      AddFunction TRs
                        MultiplyFunction TargetTRs
                          VariableReference TargetTR1: VariableName=[TargetTaprootRootRatio]
                          VariableReference TargetTR2: VariableName=[TargetTaprootRootRatio]
                        VariableReference CurrentTR: VariableName=[TaprootRootRatio]
            Constant StructuralFraction: FixedValue=0.1; Units=g/g
          Constant Metabolic: FixedValue=0
          StorageDMDemandFunction Storage
            SubtractFunction StorageFraction
              Constant One: FixedValue=1
              VariableReference StructuralFraction: VariableName=[Taproot].DMDemands.Structural.StructuralFraction
          Constant QStructuralPriority: FixedValue=1
          Constant QMetabolicPriority: FixedValue=1
          Constant QStoragePriority: FixedValue=1
        BiomassDemandAndPriority NDemands
          MultiplyFunction Structural
            VariableReference MinNconc: VariableName=[Taproot].minimumNconc
            VariableReference PotentialDMAllocation: VariableName=[Taproot].potentialDMAllocation.Structural
          MultiplyFunction Metabolic
            SubtractFunction MetabolicNconc
              VariableReference CritNconc: VariableName=[Taproot].criticalNConc
              VariableReference MinNconc: VariableName=[Taproot].minimumNconc
            VariableReference PotentialDMAllocation: VariableName=[Taproot].potentialDMAllocation.Structural
          StorageNDemandFunction Storage
            VariableReference NitrogenDemandSwitch: VariableName=[Taproot].nitrogenDemandSwitch
            VariableReference MaxNconc: VariableName=[Taproot].maximumNconc
          Constant QStructuralPriority: FixedValue=1
          Constant QMetabolicPriority: FixedValue=1
          Constant QStoragePriority: FixedValue=1
        RetranslocateNonStructural RetranslocateNitrogen
        BiomassDemand InitialWt
          Constant Structural: FixedValue=0; Units=g/m^2
          Constant Metabolic: FixedValue=0
          Constant Storage: FixedValue=0
        Constant Photosynthesis: FixedValue=0
        VariableReference initialNConcFunction: VariableName=[Taproot].MinimumNConc
      Root: GrowthRespiration=0; MaintenanceRespiration=0
        RootShapeCylinder RootShape
        Memo Description
          __Note:__ this represents all the fine roots of the plant.  The root organ demands and is partitioned N and DM and its depth increases through time to provide a water uptake supply
          Memo Description
            This represents all the fine roots of the plant.  The root organ demands and is partitioned N and DM and its depth increases through time to provide a water uptake supply
        Constant MinimumNConc: FixedValue=0.005; Units=gN/gDM
        Constant MaximumNConc: FixedValue=0.015; Units=gN/gDM
        PhaseLookupValue NitrogenDemandSwitch: Start=Germination; End=Ripening
          Constant: FixedValue=1
        Constant MaximumRootDepth: FixedValue=1000; Units=mm
        PhaseLookup RootFrontVelocity
          PhaseLookupValue PreEmergence: Start=Germination; End=Emergence
            Constant ReferenceVelocity: FixedValue=5; Units=mm/day
          PhaseLookupValue Vegetative: Start=Emergence; End=Flowering
            Constant ReferenceVelocity: FixedValue=10; Units=mm/day
          PhaseLookupValue Reproductive: Start=Flowering; End=Ripening
            Constant ReferenceVelocity: FixedValue=7.5; Units=mm/day
        Constant TemperatureEffect: FixedValue=1
          Memo
            No effect of temperature on root growth is currently captured in the model.
        Constant SoilWaterEffect: FixedValue=1
          Memo
            No effect of soil water content on root growth is currently captured in the model.
        Constant SpecificRootLength: FixedValue=100; Units=m/g
        MultiplyFunction SenescenceRate
          Memo Description
            The reference senescence rate is adjusted according to enviromental factors, temperature and soil moisture.  Currently only sensitivity to temperature is considered, based on general knowledge from other plant models. The sensitivity of plantain roots to low moisture or water logging is not clear (according to [SagarHarper_1964], *P. major* is more tolerant to water logging than *P. lanceolata*) , so this will have to be upgrade in the future when more data is available.
          Constant ReferenceRate: FixedValue=0.005; Units=/day
          WeightedTemperatureFunction TemperatureFactor: MaximumTemperatureWeighting=0.5
            XYPairs: X=[0, 5, 20, 30]; Y=[0, 0, 1, 1]
          LinearInterpolationFunction SoilMoistureFactor
            XYPairs: X=[0, 0.5, 1]; Y=[1, 1, 1]
            VariableReference XValue: VariableName=[Leaf].FW
          Constant SoilAerationFactor: FixedValue=1
        Constant DMRetranslocationFactor: FixedValue=0; Units=/day
        Constant NRetranslocationFactor: FixedValue=0; Units=/day
        Constant NReallocationFactor: FixedValue=0; Units=/day
        LinearInterpolationFunction KLModifier
          Memo
            No adjustment of KL are considered for plantain at this stage.  More analyses, preferebly with support from data specific to this issue, are needed to improve the description of this relationship.
            Memo Description
              This represents all the fine roots of the plant.  The root organ demands and is partitioned N and DM and its depth increases through time to provide a water uptake supply
          XYPairs: X=[0, 1]; Y=[1, 1]
          VariableReference XValue: VariableName=[Root].LengthDensity
        LinearInterpolationFunction KNH4
          XYPairs: X=[0, 0.003]; Y=[0.01, 0.02]
          VariableReference XValue: VariableName=[Root].LengthDensity
        LinearInterpolationFunction KNO3
          XYPairs: X=[0, 0.003]; Y=[0.01, 0.02]
          VariableReference XValue: VariableName=[Root].LengthDensity
        Constant MaxDailyNUptake: FixedValue=10; Units=kgN/ha
        LinearInterpolationFunction NUptakeSWFactor
          XYPairs: X=[0, 0.5, 1]; Y=[0, 1, 1]
          VariableReference XValue: VariableName=[Root].RWC
        BiomassRemoval BiomassRemovalDefaults
          OrganBiomassRemovalType Cut: FractionLiveToRemove=0; FractionDeadToRemove=0; FractionLiveToResidue=0.05; FractionDeadToResidue=0
          OrganBiomassRemovalType Graze: FractionLiveToRemove=0; FractionDeadToRemove=0; FractionLiveToResidue=0.05; FractionDeadToResidue=0
          OrganBiomassRemovalType Harvest: FractionLiveToRemove=0; FractionDeadToRemove=0; FractionLiveToResidue=0.05; FractionDeadToResidue=0
          OrganBiomassRemovalType Prune: FractionLiveToRemove=0; FractionDeadToRemove=0; FractionLiveToResidue=0.05; FractionDeadToResidue=0
        Constant DMConversionEfficiency: FixedValue=1
        Constant MaintenanceRespirationFunction: FixedValue=1
        Constant RemobilisationCost: FixedValue=0
        Constant CarbonConcentration: FixedValue=0.4
        BiomassDemandAndPriority DMDemands
          MultiplyFunction Structural
            PartitionFractionDemandFunction DMDemandFunction
              PhaseLookup PartitionFraction
                Memo Description
                  The allocation of biomass below ground follows a simple approach in the plantain model.  The amount allocated to roots is computed based on current proportion and two target ratios (the [TargetShootRootRatio].Value and [TaprootRootRatio].Value).  There is little information in the literature about these parameters and they should vary with cultivar. Currently the model will attempt to keep a given proportion in ach organ, ho these porportions vary should be update when more data becomes available.
                PhaseLookupValue AllPhases: Start=Emergence; End=Ripening
                  DivideFunction RootFraction
                    MultiplyFunction Numerator
                      VariableReference CurrentSR: VariableName=[ShootRootRatio]
                      VariableReference CurrentTR: VariableName=[TaprootRootRatio]
                    MultiplyFunction Denominator: same as Replacements.Plantain.Taproot.DMDemands.Structural.DMDemandFunction.PartitionFraction.AllPhases.TaprootFraction.Denominator
            Constant StructuralFraction: FixedValue=1; Units=g/g
          Constant Metabolic: FixedValue=0
          StorageDMDemandFunction Storage
            SubtractFunction StorageFraction
              Constant One: FixedValue=1
              VariableReference StructuralFraction: VariableName=[Root].DMDemands.Structural.StructuralFraction
          Constant QStructuralPriority: FixedValue=1
          Constant QMetabolicPriority: FixedValue=1
          Constant QStoragePriority: FixedValue=1
        BiomassDemandAndPriority NDemands
          MultiplyFunction Structural
            VariableReference MinNconc: VariableName=[Root].minimumNconc
            VariableReference PotentialDMAllocation: VariableName=[Root].potentialDMAllocation.Structural
          MultiplyFunction Metabolic
            SubtractFunction MetabolicNconc
              VariableReference CritNconc: VariableName=[Root].criticalNConc
              VariableReference MinNconc: VariableName=[Root].minimumNconc
            VariableReference PotentialDMAllocation: VariableName=[Root].potentialDMAllocation.Structural
          StorageNDemandFunction Storage
            VariableReference NitrogenDemandSwitch: VariableName=[Root].nitrogenDemandSwitch
            VariableReference MaxNconc: VariableName=[Root].maximumNconc
          Constant QStructuralPriority: FixedValue=1
          Constant QMetabolicPriority: FixedValue=1
          Constant QStoragePriority: FixedValue=1
        VariableReference CriticalNConc: VariableName=[Root].MinimumNConc
        BiomassDemand InitialWt
          Constant Structural: FixedValue=0.002
          Constant Metabolic: FixedValue=0
          Constant Storage: FixedValue=0
      CompositeBiomass AboveGround: OrganNames=[Leaf, Stem, Inflorescence]; IncludeLive=true; IncludeDead=true
      CompositeBiomass AboveGroundLive: OrganNames=[Leaf, Stem, Inflorescence]; IncludeLive=true; IncludeDead=false
      CompositeBiomass BelowGround: OrganNames=[Root, Taproot]; IncludeLive=true; IncludeDead=true
      CompositeBiomass BelowGroundLive: OrganNames=[Root, Taproot]; IncludeLive=true; IncludeDead=false
      CompositeBiomass Total: OrganNames=[Leaf, Stem, Inflorescence, Root, Taproot]; IncludeLive=true; IncludeDead=true
      DivideFunction PerPlantBelowGroundWt
        Memo Description
          This represents the live biomass dry weight below ground for a specific plant (in g/plant)
        VariableReference BelowGroundWt: VariableName=[BelowGroundLive].Wt
        VariableReference Population: VariableName=[Plantain].Population
      PhaseLookup ShootRootRatio
        PhaseLookupValue AllPhases: Start=Emergence; End=Ripening
          DivideFunction CurrentSR
            VariableReference AbogeGroundDM: VariableName=[AboveGroundLive].Wt
            VariableReference BelowGroundDM: VariableName=[BelowGroundLive].Wt
      PhaseLookup TargetShootRootRatio
        Memo Description
          To ensure prompt regrowth of forage plantain after a defoliation, the model will adjust the allocation of new growth following any defoliation event. This is a simplified approach to biomass allocation plasticity (e.g. [Wilson_1988]; [LevangBrilz_2002]), it assumes that the plant switches allocation of towards leaves whenever the current shoot:root ratio differs from the target value.
          Published data for the shoot:root ratio in plantain is highly variable, with values as low as 1.0 for wild varieties and as high as 6.0 for seedlings of commercial cultivars with no water of nutrient limitations ([SchippersOlff_2000]; [LabreveuxThesis_2002]; [CranstonEtAl_2015]; [PankokeEtAl_2015]).  The data suggests mean values to be around 1.75-2.0 for adult plants.  This value is likely to be affected by environmental conditions, with water or nutrient deficit favouring root growth, while low light conditions leading to higher allocation above ground. However, these relationships can vary considerably in different plants and there is little data for plantain, so the model current ignores the influence of environmental factors on the shoot:root partition, this should be upgraded when data becomes available.
        PhaseLookupValue Vegetative: Start=Emergence; End=Flowering
          Constant TargetSR: FixedValue=1.75; Units=g/g
        PhaseLookupValue Reproductive: Start=Flowering; End=Ripening
          AddFunction TargetSR
            VariableReference MinTargetSR: VariableName=[TargetShootRootRatio].Vegetative.TargetSR
            MultiplyFunction PlusTarget
              SubtractFunction DeltaTarget
                Constant MaxTargetSR: FixedValue=2; Units=g/g
                VariableReference MinTargetSR: VariableName=[TargetShootRootRatio].Vegetative.TargetSR
              LinearInterpolationFunction PhotoperiodEffect
                XYPairs: X=[11, 12, 13, 13.75, 14, 15]; Y=[0, 0, 0.25, 0.85, 1, 1]
                VariableReference XValue: VariableName=[Phenology].Photoperiod
      PhaseLookup StemsLeafRatio
        PhaseLookupValue Reproductive: Start=Flowering; End=Ripening
          DivideFunction CurrentSL
            AddFunction StemFlowerDM
              VariableReference StemDM: VariableName=[Stem].Live.Wt
              VariableReference InflorescenceDM: VariableName=[Inflorescence].Live.Wt
            VariableReference LeafDM: VariableName=[Leaf].Live.Wt
      PhaseLookup TargetStemsLeafRatio
        Memo Description
          The  plantain model defines allocation of biomass above ground following a simple approach, it attempts to keep a given proportion among the various organs.  The allocation of biomass to leaves is defined primarily by the target shoo:root ratio, but during the reproductive phase, the partition is further modified based on the ratio of stems+inflorescence to leaves. This ratio may be affected by defoliation ([AyalaEtAl_2011]; [QuijadaThesis_2015]) and is probably affected by enviromental factors too. There is not enough data to describe these interactions.
          Published results suggest that reproductive parts represent a relatively small proportion of the biomass, about 10-25% in grazed swards, and about 40% if not grazed ([SchippersOlff_2000]; [LabreveuxThesis_2002]; [MoorheadPigot_2009]; [AyalaEtAl_2011]).
        PhaseLookupValue Reproductive: Start=Flowering; End=Ripening
          MultiplyFunction TargetSL
            Constant MaximumSL: FixedValue=0.25; Units=g/g
            LinearInterpolationFunction PhotoperiodEffect
              XYPairs: X=[11, 12.5, 13.25, 13.75, 14, 15]; Y=[0, 0, 0.2, 0.8, 1, 1]
              VariableReference XValue: VariableName=[Phenology].Photoperiod
      PhaseLookup FlowerStemRatio
        PhaseLookupValue Reproductive: Start=Flowering; End=Ripening
          DivideFunction CurrentFS
            VariableReference InflorescenceDM: VariableName=[Inflorescence].Live.Wt
            VariableReference StemDM: VariableName=[Stem].Live.Wt
      PhaseLookup TargetFlowerStemRatio
        Memo Description
          The allocation of biomass follows a simple approach in the plantain model.  Allocation during the reproductive phase will attempt to keep a ratio between stem and inflorescence biomass.  This ratio is probably affected by enviromental factors, but there is not data to determine how these would interact.  Because of the short period between stem elongation, flowering and seed maturity, and a relatively long reproductive phase, plantain plants will have ripe seeds as well as young stalks at the same time.  This makes quite difficult to define variation in biomass allocation to inflorescence.  Inference from published values suggest that the ratio of flower biomass to stems varies from around 0.1 to nearly 0.4 ([SchippersOlff_2000]).
        PhaseLookupValue Reproductive: Start=Flowering; End=Ripening
          MultiplyFunction TargetFS
            Constant MaximumFS: FixedValue=0.25; Units=g/g
            LinearInterpolationFunction PhotoperiodEffect
              XYPairs: X=[11, 12.75, 13.25, 13.75, 14, 15]; Y=[0, 0, 0.1, 0.75, 1, 1]
              VariableReference XValue: VariableName=[Phenology].Photoperiod
      PhaseLookup TaprootRootRatio
        PhaseLookupValue AllPhases: Start=Emergence; End=Ripening
          DivideFunction CurrentTR
            VariableReference TaprootDM: VariableName=[Taproot].Live.Wt
            VariableReference RootsDM: VariableName=[Root].Live.Wt
      PhaseLookup TargetTaprootRootRatio
        Memo Description
          The plantain model assumes that biomass is allocated so to mantain a given proportion of among the various organs (varying with phenological phase and other factors).  The ratio between taproot and root biomass is assumed to vary, increasing with the biomass below ground per plant, approaching a maximum target.  This is a simple approach and can describe the general behaviour of plantain plants, it may be upgraded if deemed necessary when more data becomes available.
        PhaseLookupValue AllPhases: Start=Emergence; End=Ripening
          MultiplyFunction TargetTR
            Constant MaximumTR: FixedValue=1; Units=g/g
            LinearInterpolationFunction BiomassFactor
              XYPairs: X=[0, 0.025, 0.1, 0.25, 0.5, 1, 1.5]; Y=[1e-05, 1e-05, 0.4, 0.75, 0.95, 1, 1]
              VariableReference XValue: VariableName=[PerPlantBelowGroundWt]
      CultivarFolder Cultivars
        Cultivar Tonic
          Memo Description
            *Tonic* is the basic forage plantain cultivar. It was develop later than *Lancelot* and was developed from a northern Portugal germplasm. It has very erect and large leaves, produce less tillers than *Lancelot* and perhaps less seed heads.  *Tonic* cultivar is heat tolerante and also witnter active, typically with higher yields when compared to *Lancelot*.
        Cultivar Lancelot
          Command:
            [Leaf].Photosynthesis.FT.XYPairs.X = 5, 10, 15, 21, 27, 35
            [Leaf].Photosynthesis.FT.XYPairs.Y = 0.0, 0.04, 0.3, 1.0, 1.0, 0.0
            [Leaf].Tallness.XYPairs.X = 10, 100, 500
            [Leaf].Tallness.XYPairs.Y = 100, 300, 400
          Memo Description
            *Lancelot* is the first forage plantain cultivar released, it was selected from New Zealand pastures. It has a semi-erect growth habit, medium to large leaves, and produce many tillers.  This cultivar has good heat tolerance but growth is low over winter.  *Lancelot*  has been used for many years as grazing forage, in monoculture or in mixed swards, in several countries worldwide.  However, currently the most common cultivar is *Tonic*.
      Constant MortalityRate: FixedValue=0
      Constant SeedMortalityRate: FixedValue=0
  DataStore
    ExcelInput Observed: FileNames=[Observed.xlsx]; SheetNames=[Observed]
    PredictedObserved: PredictedTableName=Report; ObservedTableName=Observed; FieldNameUsedForMatch=Date; AllColumns=false
  Folder Validation
    Memo Note
      The performance of the plantain model is evaluated in simulations based on experiments conducted primarily in New Zealand.  Datasets from USA have been added, but they should be taken with caution as there was limited information about the experiments and published results corresponded to annual or seasonal aggregates only.  Note that population is not explicitly simulated by the model, only a decrease in plant numbers as function of cuts or grazings is considered.  The literature suggest that severe defoliation may reduce population by increasing death rate, but mostly is infered from other species and even then the variation is high.  Plantain persistency has been shown to be low, usually restricted to 2-4 years, but very little actuall data is available.

      The model describes N content in the above ground tissues reasonably well only for treatments where N deficit was not high (See results for the FRNL datasets with annual fertiliser rates of 200 kgN/ha and above).  The measured data showed little effect on plant N concentration for the treatment  with nil or low N rates, wehreas the model predicts differences between them.  The variability among replicates is high and there wer only three or four replicates, this may blur some of the differences.   Also, there was no information from which potential sources of nitrogen, such as soil mineralisation or N fixation from 'weeds' (the present of white clover was noted), could be identified and used to adjust the simulations.  Besides these isses, some of the underlying PMF code may need to be upgraded in order to describe some processes under plant cut/grazing and re-growth conditions.  Processes for computing N demand and supply (especially regarding remobilisation within living tissues) are still under developement and this needs especific detailed datasets.  The SimpleLeaf module was employed to simulate the plant canopy in the plantain model, this was done because there was not enough data to parameterise the more complex PMF approach.  This means that the model has only one leaf cohort with simple N thresholds (only maximum and minimum), this may be too simplistic to capture the nuances of the re-growth processes especially when sustained by the remobilisation from storage organs (taproot and old tissue).  The model will be upgraded in the near future as the work on the code to improve the description of those specific processes is ongoing.
    Folder New Zealand
      Memo SubTitle
        ### All data from New Zealand
      Experiment FRNLLincoln
        Memo
          ###FRNL Lincoln###

          Simulation setup based on field trial performed at Lincoln University Research Dairy Farm, New Zealand, between 2014 and 2016.  The experiment was part of the FRNL (Forages for Reduced Nitrogen Leaching) program and the data is basically unpublished (references will be added when this come about).  Here only plots with pure plantain are used.
          The experiment consisted of six fertiliser treatments (N rates of 0, 50, 100, 200, 350 and 500 kg/ha/yr) in four replicates, and measurements comprised yield and quality indicators (here N content is used).
          Data supplied by Grant Edwards, Lincoln University.

          The soil at the experimental site was a Templeton fine sandy loam (an Immature Pallic soil, USDA: Udic Haplustept), the required parameters were inferred based on data from the New Zealand National Soils Database (Landcare Research).
          Weather data was obtained from nearby Broadfields weather station (NIWA).
        Factors
          Factor NRate: Specification=[NRate]
            Operations 0
            Operations 50
              2014-10-08  [Fertiliser].Apply(Amount: 5, Type: Fertiliser.Types.UreaN, Depth: 10)
              2014-10-31  [Fertiliser].Apply(Amount: 5, Type: Fertiliser.Types.UreaN, Depth: 10)
              2014-11-26  [Fertiliser].Apply(Amount: 5, Type: Fertiliser.Types.UreaN, Depth: 10)
              2014-12-17  [Fertiliser].Apply(Amount: 5, Type: Fertiliser.Types.UreaN, Depth: 10)
              2015-01-20  [Fertiliser].Apply(Amount: 5, Type: Fertiliser.Types.UreaN, Depth: 10)
              2015-02-12  [Fertiliser].Apply(Amount: 5, Type: Fertiliser.Types.UreaN, Depth: 10)
              2015-03-10  [Fertiliser].Apply(Amount: 5, Type: Fertiliser.Types.UreaN, Depth: 10)
              2015-04-17  [Fertiliser].Apply(Amount: 5, Type: Fertiliser.Types.UreaN, Depth: 10)
              2015-05-20  [Fertiliser].Apply(Amount: 5, Type: Fertiliser.Types.UreaN, Depth: 10)
              2015-09-09  [Fertiliser].Apply(Amount: 5, Type: Fertiliser.Types.UreaN, Depth: 10)
              2015-10-06  [Fertiliser].Apply(Amount: 5, Type: Fertiliser.Types.UreaN, Depth: 10)
              2015-11-06  [Fertiliser].Apply(Amount: 5, Type: Fertiliser.Types.UreaN, Depth: 10)
              2015-12-09  [Fertiliser].Apply(Amount: 5, Type: Fertiliser.Types.UreaN, Depth: 10)
              2016-01-07  [Fertiliser].Apply(Amount: 5, Type: Fertiliser.Types.UreaN, Depth: 10)
              2016-02-10  [Fertiliser].Apply(Amount: 5, Type: Fertiliser.Types.UreaN, Depth: 10)
              2016-03-07  [Fertiliser].Apply(Amount: 5, Type: Fertiliser.Types.UreaN, Depth: 10)
              2016-04-02  [Fertiliser].Apply(Amount: 5, Type: Fertiliser.Types.UreaN, Depth: 10)
              2016-05-04  [Fertiliser].Apply(Amount: 5, Type: Fertiliser.Types.UreaN, Depth: 10)
              2016-08-31  [Fertiliser].Apply(Amount: 5, Type: Fertiliser.Types.UreaN, Depth: 10)
              2016-10-05  [Fertiliser].Apply(Amount: 5, Type: Fertiliser.Types.UreaN, Depth: 10)
            Operations 100
              2014-10-08  [Fertiliser].Apply(Amount: 10, Type: Fertiliser.Types.UreaN, Depth: 10)
              2014-10-31  [Fertiliser].Apply(Amount: 10, Type: Fertiliser.Types.UreaN, Depth: 10)
              2014-11-26  [Fertiliser].Apply(Amount: 10, Type: Fertiliser.Types.UreaN, Depth: 10)
              2014-12-17  [Fertiliser].Apply(Amount: 10, Type: Fertiliser.Types.UreaN, Depth: 10)
              2015-01-20  [Fertiliser].Apply(Amount: 10, Type: Fertiliser.Types.UreaN, Depth: 10)
              2015-02-12  [Fertiliser].Apply(Amount: 10, Type: Fertiliser.Types.UreaN, Depth: 10)
              2015-03-10  [Fertiliser].Apply(Amount: 10, Type: Fertiliser.Types.UreaN, Depth: 10)
              2015-04-17  [Fertiliser].Apply(Amount: 10, Type: Fertiliser.Types.UreaN, Depth: 10)
              2015-05-20  [Fertiliser].Apply(Amount: 10, Type: Fertiliser.Types.UreaN, Depth: 10)
              2015-09-09  [Fertiliser].Apply(Amount: 10, Type: Fertiliser.Types.UreaN, Depth: 10)
              2015-10-06  [Fertiliser].Apply(Amount: 10, Type: Fertiliser.Types.UreaN, Depth: 10)
              2015-11-06  [Fertiliser].Apply(Amount: 10, Type: Fertiliser.Types.UreaN, Depth: 10)
              2015-12-09  [Fertiliser].Apply(Amount: 10, Type: Fertiliser.Types.UreaN, Depth: 10)
              2016-01-07  [Fertiliser].Apply(Amount: 10, Type: Fertiliser.Types.UreaN, Depth: 10)
              2016-02-10  [Fertiliser].Apply(Amount: 10, Type: Fertiliser.Types.UreaN, Depth: 10)
              2016-03-07  [Fertiliser].Apply(Amount: 10, Type: Fertiliser.Types.UreaN, Depth: 10)
              2016-04-02  [Fertiliser].Apply(Amount: 10, Type: Fertiliser.Types.UreaN, Depth: 10)
              2016-05-04  [Fertiliser].Apply(Amount: 10, Type: Fertiliser.Types.UreaN, Depth: 10)
              2016-08-31  [Fertiliser].Apply(Amount: 10, Type: Fertiliser.Types.UreaN, Depth: 10)
              2016-10-05  [Fertiliser].Apply(Amount: 10, Type: Fertiliser.Types.UreaN, Depth: 10)
            Operations 200
              2014-10-08  [Fertiliser].Apply(Amount: 20, Type: Fertiliser.Types.UreaN, Depth: 10)
              2014-10-31  [Fertiliser].Apply(Amount: 20, Type: Fertiliser.Types.UreaN, Depth: 10)
              2014-11-26  [Fertiliser].Apply(Amount: 20, Type: Fertiliser.Types.UreaN, Depth: 10)
              2014-12-17  [Fertiliser].Apply(Amount: 20, Type: Fertiliser.Types.UreaN, Depth: 10)
              2015-01-20  [Fertiliser].Apply(Amount: 20, Type: Fertiliser.Types.UreaN, Depth: 10)
              2015-02-12  [Fertiliser].Apply(Amount: 20, Type: Fertiliser.Types.UreaN, Depth: 10)
              2015-03-10  [Fertiliser].Apply(Amount: 20, Type: Fertiliser.Types.UreaN, Depth: 10)
              2015-04-17  [Fertiliser].Apply(Amount: 20, Type: Fertiliser.Types.UreaN, Depth: 10)
              2015-05-20  [Fertiliser].Apply(Amount: 20, Type: Fertiliser.Types.UreaN, Depth: 10)
              2015-09-09  [Fertiliser].Apply(Amount: 20, Type: Fertiliser.Types.UreaN, Depth: 10)
              2015-10-06  [Fertiliser].Apply(Amount: 20, Type: Fertiliser.Types.UreaN, Depth: 10)
              2015-11-06  [Fertiliser].Apply(Amount: 20, Type: Fertiliser.Types.UreaN, Depth: 10)
              2015-12-09  [Fertiliser].Apply(Amount: 20, Type: Fertiliser.Types.UreaN, Depth: 10)
              2016-01-07  [Fertiliser].Apply(Amount: 20, Type: Fertiliser.Types.UreaN, Depth: 10)
              2016-02-10  [Fertiliser].Apply(Amount: 20, Type: Fertiliser.Types.UreaN, Depth: 10)
              2016-03-07  [Fertiliser].Apply(Amount: 20, Type: Fertiliser.Types.UreaN, Depth: 10)
              2016-04-02  [Fertiliser].Apply(Amount: 20, Type: Fertiliser.Types.UreaN, Depth: 10)
              2016-05-04  [Fertiliser].Apply(Amount: 20, Type: Fertiliser.Types.UreaN, Depth: 10)
              2016-08-31  [Fertiliser].Apply(Amount: 20, Type: Fertiliser.Types.UreaN, Depth: 10)
              2016-10-05  [Fertiliser].Apply(Amount: 20, Type: Fertiliser.Types.UreaN, Depth: 10)
            Operations 350
              2014-10-08  [Fertiliser].Apply(Amount: 35, Type: Fertiliser.Types.UreaN, Depth: 10)
              2014-10-31  [Fertiliser].Apply(Amount: 35, Type: Fertiliser.Types.UreaN, Depth: 10)
              2014-11-26  [Fertiliser].Apply(Amount: 35, Type: Fertiliser.Types.UreaN, Depth: 10)
              2014-12-17  [Fertiliser].Apply(Amount: 35, Type: Fertiliser.Types.UreaN, Depth: 10)
              2015-01-20  [Fertiliser].Apply(Amount: 35, Type: Fertiliser.Types.UreaN, Depth: 10)
              2015-02-12  [Fertiliser].Apply(Amount: 35, Type: Fertiliser.Types.UreaN, Depth: 10)
              2015-03-10  [Fertiliser].Apply(Amount: 35, Type: Fertiliser.Types.UreaN, Depth: 10)
              2015-04-17  [Fertiliser].Apply(Amount: 35, Type: Fertiliser.Types.UreaN, Depth: 10)
              2015-05-20  [Fertiliser].Apply(Amount: 35, Type: Fertiliser.Types.UreaN, Depth: 10)
              2015-09-09  [Fertiliser].Apply(Amount: 35, Type: Fertiliser.Types.UreaN, Depth: 10)
              2015-10-06  [Fertiliser].Apply(Amount: 35, Type: Fertiliser.Types.UreaN, Depth: 10)
              2015-11-06  [Fertiliser].Apply(Amount: 35, Type: Fertiliser.Types.UreaN, Depth: 10)
              2015-12-09  [Fertiliser].Apply(Amount: 35, Type: Fertiliser.Types.UreaN, Depth: 10)
              2016-01-07  [Fertiliser].Apply(Amount: 35, Type: Fertiliser.Types.UreaN, Depth: 10)
              2016-02-10  [Fertiliser].Apply(Amount: 35, Type: Fertiliser.Types.UreaN, Depth: 10)
              2016-03-07  [Fertiliser].Apply(Amount: 35, Type: Fertiliser.Types.UreaN, Depth: 10)
              2016-04-02  [Fertiliser].Apply(Amount: 35, Type: Fertiliser.Types.UreaN, Depth: 10)
              2016-05-04  [Fertiliser].Apply(Amount: 35, Type: Fertiliser.Types.UreaN, Depth: 10)
              2016-08-31  [Fertiliser].Apply(Amount: 35, Type: Fertiliser.Types.UreaN, Depth: 10)
              2016-10-05  [Fertiliser].Apply(Amount: 35, Type: Fertiliser.Types.UreaN, Depth: 10)
            Operations 500
              2014-10-08  [Fertiliser].Apply(Amount: 50, Type: Fertiliser.Types.UreaN, Depth: 10)
              2014-10-31  [Fertiliser].Apply(Amount: 50, Type: Fertiliser.Types.UreaN, Depth: 10)
              2014-11-26  [Fertiliser].Apply(Amount: 50, Type: Fertiliser.Types.UreaN, Depth: 10)
              2014-12-17  [Fertiliser].Apply(Amount: 50, Type: Fertiliser.Types.UreaN, Depth: 10)
              2015-01-20  [Fertiliser].Apply(Amount: 50, Type: Fertiliser.Types.UreaN, Depth: 10)
              2015-02-12  [Fertiliser].Apply(Amount: 50, Type: Fertiliser.Types.UreaN, Depth: 10)
              2015-03-10  [Fertiliser].Apply(Amount: 50, Type: Fertiliser.Types.UreaN, Depth: 10)
              2015-04-17  [Fertiliser].Apply(Amount: 50, Type: Fertiliser.Types.UreaN, Depth: 10)
              2015-05-20  [Fertiliser].Apply(Amount: 50, Type: Fertiliser.Types.UreaN, Depth: 10)
              2015-09-09  [Fertiliser].Apply(Amount: 50, Type: Fertiliser.Types.UreaN, Depth: 10)
              2015-10-06  [Fertiliser].Apply(Amount: 50, Type: Fertiliser.Types.UreaN, Depth: 10)
              2015-11-06  [Fertiliser].Apply(Amount: 50, Type: Fertiliser.Types.UreaN, Depth: 10)
              2015-12-09  [Fertiliser].Apply(Amount: 50, Type: Fertiliser.Types.UreaN, Depth: 10)
              2016-01-07  [Fertiliser].Apply(Amount: 50, Type: Fertiliser.Types.UreaN, Depth: 10)
              2016-02-10  [Fertiliser].Apply(Amount: 50, Type: Fertiliser.Types.UreaN, Depth: 10)
              2016-03-07  [Fertiliser].Apply(Amount: 50, Type: Fertiliser.Types.UreaN, Depth: 10)
              2016-04-02  [Fertiliser].Apply(Amount: 50, Type: Fertiliser.Types.UreaN, Depth: 10)
              2016-05-04  [Fertiliser].Apply(Amount: 50, Type: Fertiliser.Types.UreaN, Depth: 10)
              2016-08-31  [Fertiliser].Apply(Amount: 50, Type: Fertiliser.Types.UreaN, Depth: 10)
              2016-10-05  [Fertiliser].Apply(Amount: 50, Type: Fertiliser.Types.UreaN, Depth: 10)
        Simulation FRNLLincoln
          Clock: Start=2014-03-01; End=2016-05-31
          Weather: FileName=Lincoln-Broadfields.met
          Summary summaryfile
          SoilArbitrator Soil Arbitrator
          Zone Field: Area=1; Slope=0; AspectAngle=0; Altitude=50
            Folder Management
              Operations Sowing
                2014-03-20  [Plantain].Sow(population: 200, cultivar: "Tonic", depth: 10, rowSpacing: 150)
              Operations IrrigationSchedule
                2014-10-31  [Irrigation].Apply(amount: 7)
                2014-11-03  [Irrigation].Apply(amount: 7)
                2014-11-05  [Irrigation].Apply(amount: 8)
                2014-11-07  [Irrigation].Apply(amount: 8)
                2014-11-10  [Irrigation].Apply(amount: 7)
                2014-11-11  [Irrigation].Apply(amount: 7)
                2014-11-12  [Irrigation].Apply(amount: 8)
                2014-11-17  [Irrigation].Apply(amount: 9)
                2014-11-18  [Irrigation].Apply(amount: 7)
                2014-11-19  [Irrigation].Apply(amount: 7)
                2014-11-24  [Irrigation].Apply(amount: 8)
                2014-11-25  [Irrigation].Apply(amount: 9)
                2014-11-27  [Irrigation].Apply(amount: 10)
                2014-12-01  [Irrigation].Apply(amount: 8)
                2014-12-02  [Irrigation].Apply(amount: 8)
                2014-12-04  [Irrigation].Apply(amount: 7)
                2014-12-08  [Irrigation].Apply(amount: 7)
                2014-12-09  [Irrigation].Apply(amount: 7)
                2014-12-12  [Irrigation].Apply(amount: 8)
                2014-12-15  [Irrigation].Apply(amount: 10)
                2014-12-17  [Irrigation].Apply(amount: 10)
                2014-12-19  [Irrigation].Apply(amount: 7)
                2014-12-20  [Irrigation].Apply(amount: 7)
                2014-12-21  [Irrigation].Apply(amount: 8)
                2014-12-22  [Irrigation].Apply(amount: 10)
                2014-12-25  [Irrigation].Apply(amount: 8)
                2014-12-26  [Irrigation].Apply(amount: 8)
                2014-12-27  [Irrigation].Apply(amount: 7)
                2014-12-28  [Irrigation].Apply(amount: 10)
                2014-12-29  [Irrigation].Apply(amount: 8)
                2014-12-30  [Irrigation].Apply(amount: 8)
                2015-01-02  [Irrigation].Apply(amount: 7)
                2015-01-05  [Irrigation].Apply(amount: 10)
                2015-01-08  [Irrigation].Apply(amount: 8)
                2015-01-09  [Irrigation].Apply(amount: 9)
                2015-01-12  [Irrigation].Apply(amount: 7)
                2015-01-13  [Irrigation].Apply(amount: 7)
                2015-01-16  [Irrigation].Apply(amount: 8)
                2015-01-19  [Irrigation].Apply(amount: 7)
                2015-01-20  [Irrigation].Apply(amount: 7)
                2015-01-21  [Irrigation].Apply(amount: 8)
                2015-01-26  [Irrigation].Apply(amount: 10)
                2015-01-27  [Irrigation].Apply(amount: 10)
                2015-01-29  [Irrigation].Apply(amount: 8)
                2015-02-02  [Irrigation].Apply(amount: 10)
                2015-02-04  [Irrigation].Apply(amount: 8)
                2015-02-05  [Irrigation].Apply(amount: 7)
                2015-02-09  [Irrigation].Apply(amount: 8)
                2015-02-11  [Irrigation].Apply(amount: 7)
                2015-02-12  [Irrigation].Apply(amount: 10)
                2015-02-16  [Irrigation].Apply(amount: 10)
                2015-02-17  [Irrigation].Apply(amount: 10)
                2015-02-18  [Irrigation].Apply(amount: 8)
                2015-02-24  [Irrigation].Apply(amount: 10)
                2015-02-26  [Irrigation].Apply(amount: 7)
                2015-02-27  [Irrigation].Apply(amount: 8)
                2015-03-02  [Irrigation].Apply(amount: 7)
                2015-03-03  [Irrigation].Apply(amount: 7)
                2015-03-05  [Irrigation].Apply(amount: 8)
                2015-03-10  [Irrigation].Apply(amount: 8)
                2015-03-12  [Irrigation].Apply(amount: 9)
                2015-03-13  [Irrigation].Apply(amount: 7)
                2015-03-16  [Irrigation].Apply(amount: 10)
                2015-03-19  [Irrigation].Apply(amount: 9)
                2015-03-20  [Irrigation].Apply(amount: 8)
                2015-03-23  [Irrigation].Apply(amount: 9)
                2015-03-24  [Irrigation].Apply(amount: 7)
                2015-03-26  [Irrigation].Apply(amount: 10)
                2015-03-30  [Irrigation].Apply(amount: 7)
                2015-04-02  [Irrigation].Apply(amount: 10)
                2015-04-03  [Irrigation].Apply(amount: 8)
                2015-04-06  [Irrigation].Apply(amount: 7)
                2015-04-08  [Irrigation].Apply(amount: 10)
                2015-04-17  [Irrigation].Apply(amount: 10)
                2015-05-20  [Irrigation].Apply(amount: 10)
                2015-06-09  [Irrigation].Apply(amount: 10)
                2015-09-09  [Irrigation].Apply(amount: 10)
                2015-09-30  [Irrigation].Apply(amount: 10)
                2015-10-02  [Irrigation].Apply(amount: 8)
                2015-10-06  [Irrigation].Apply(amount: 10)
                2015-10-09  [Irrigation].Apply(amount: 10)
                2015-10-12  [Irrigation].Apply(amount: 8)
                2015-10-13  [Irrigation].Apply(amount: 7)
                2015-10-16  [Irrigation].Apply(amount: 10)
                2015-10-20  [Irrigation].Apply(amount: 10)
                2015-10-21  [Irrigation].Apply(amount: 8)
                2015-10-23  [Irrigation].Apply(amount: 7)
                2015-10-26  [Irrigation].Apply(amount: 7)
                2015-10-27  [Irrigation].Apply(amount: 9)
                2015-11-02  [Irrigation].Apply(amount: 10)
                2015-11-03  [Irrigation].Apply(amount: 8)
                2015-11-04  [Irrigation].Apply(amount: 9)
                2015-11-06  [Irrigation].Apply(amount: 9)
                2015-11-09  [Irrigation].Apply(amount: 10)
                2015-11-11  [Irrigation].Apply(amount: 7)
                2015-11-16  [Irrigation].Apply(amount: 10)
                2015-11-18  [Irrigation].Apply(amount: 9)
                2015-11-20  [Irrigation].Apply(amount: 7)
                2015-11-23  [Irrigation].Apply(amount: 10)
                2015-11-24  [Irrigation].Apply(amount: 8)
                2015-11-25  [Irrigation].Apply(amount: 7)
                2015-11-27  [Irrigation].Apply(amount: 9)
                2015-11-30  [Irrigation].Apply(amount: 7)
                2015-12-01  [Irrigation].Apply(amount: 7)
                2015-12-04  [Irrigation].Apply(amount: 9)
                2015-12-07  [Irrigation].Apply(amount: 10)
                2015-12-09  [Irrigation].Apply(amount: 9)
                2015-12-10  [Irrigation].Apply(amount: 9)
                2015-12-22  [Irrigation].Apply(amount: 8)
                2015-12-24  [Irrigation].Apply(amount: 9)
                2015-12-26  [Irrigation].Apply(amount: 8)
                2015-12-29  [Irrigation].Apply(amount: 7)
                2015-12-31  [Irrigation].Apply(amount: 7)
                2016-01-01  [Irrigation].Apply(amount: 10)
                2016-01-07  [Irrigation].Apply(amount: 10)
                2016-01-09  [Irrigation].Apply(amount: 7)
                2016-01-11  [Irrigation].Apply(amount: 7)
                2016-01-12  [Irrigation].Apply(amount: 7)
                2016-01-13  [Irrigation].Apply(amount: 9)
                2016-01-15  [Irrigation].Apply(amount: 10)
                2016-01-21  [Irrigation].Apply(amount: 7)
                2016-01-25  [Irrigation].Apply(amount: 8)
                2016-01-30  [Irrigation].Apply(amount: 7)
                2016-02-02  [Irrigation].Apply(amount: 10)
                2016-02-03  [Irrigation].Apply(amount: 10)
                2016-02-05  [Irrigation].Apply(amount: 9)
                2016-02-08  [Irrigation].Apply(amount: 10)
                2016-02-11  [Irrigation].Apply(amount: 10)
                2016-02-12  [Irrigation].Apply(amount: 7)
                2016-02-15  [Irrigation].Apply(amount: 8)
                2016-02-16  [Irrigation].Apply(amount: 8)
                2016-02-22  [Irrigation].Apply(amount: 7)
                2016-02-23  [Irrigation].Apply(amount: 7)
                2016-02-25  [Irrigation].Apply(amount: 7)
                2016-02-26  [Irrigation].Apply(amount: 7)
                2016-03-01  [Irrigation].Apply(amount: 7)
                2016-03-02  [Irrigation].Apply(amount: 8)
                2016-03-04  [Irrigation].Apply(amount: 10)
                2016-03-07  [Irrigation].Apply(amount: 9)
                2016-03-08  [Irrigation].Apply(amount: 4)
                2016-03-10  [Irrigation].Apply(amount: 8)
                2016-03-14  [Irrigation].Apply(amount: 8)
                2016-03-15  [Irrigation].Apply(amount: 10)
                2016-03-18  [Irrigation].Apply(amount: 9)
                2016-03-21  [Irrigation].Apply(amount: 10)
                2016-03-22  [Irrigation].Apply(amount: 9)
                2016-03-23  [Irrigation].Apply(amount: 9)
                2016-03-28  [Irrigation].Apply(amount: 8)
                2016-04-02  [Irrigation].Apply(amount: 10)
                2016-04-08  [Irrigation].Apply(amount: 10)
                2016-05-04  [Irrigation].Apply(amount: 10)
                2016-08-31  [Irrigation].Apply(amount: 10)
                2016-10-05  [Irrigation].Apply(amount: 10)
                2016-10-18  [Irrigation].Apply(amount: 10)
                2016-10-26  [Irrigation].Apply(amount: 10)
              Operations NRate
              Manager Defoliate
                Message =
```csharp
using Models.Soils.Nutrients;
using System;
using Models.Core;
using System.Collections.Generic;
using System.Text;
using Models;
using Models.Soils;
using Models.Soils.Nutrients;
using Models.PMF;
using System.Xml.Serialization;
using APSIM.Shared.Utilities;

namespace Models
{
    [Serializable]
    public class Script : Model
    {
        [Description("This script is set in 'Replacements':")]
        public string Message { get; set; }
    }
}
```
              Operations DefoliationSchedule
                2014-10-08  [Defoliate].Script.Defoliate(defoliationType: "Cut", amountDM: 40, amountType: "ResidualDM", duration: 1)
                2014-10-30  [Defoliate].Script.Defoliate(defoliationType: "Cut", amountDM: 40, amountType: "ResidualDM", duration: 1)
                2014-11-25  [Defoliate].Script.Defoliate(defoliationType: "Cut", amountDM: 40, amountType: "ResidualDM", duration: 1)
                2014-12-17  [Defoliate].Script.Defoliate(defoliationType: "Cut", amountDM: 40, amountType: "ResidualDM", duration: 1)
                2015-01-16  [Defoliate].Script.Defoliate(defoliationType: "Cut", amountDM: 40, amountType: "ResidualDM", duration: 1)
                2015-02-11  [Defoliate].Script.Defoliate(defoliationType: "Cut", amountDM: 40, amountType: "ResidualDM", duration: 1)
                2015-03-10  [Defoliate].Script.Defoliate(defoliationType: "Cut", amountDM: 40, amountType: "ResidualDM", duration: 1)
                2015-04-16  [Defoliate].Script.Defoliate(defoliationType: "Cut", amountDM: 40, amountType: "ResidualDM", duration: 1)
                2015-05-20  [Defoliate].Script.Defoliate(defoliationType: "Cut", amountDM: 40, amountType: "ResidualDM", duration: 1)
                2015-09-02  [Defoliate].Script.Defoliate(defoliationType: "Cut", amountDM: 40, amountType: "ResidualDM", duration: 1)
                2015-10-06  [Defoliate].Script.Defoliate(defoliationType: "Cut", amountDM: 40, amountType: "ResidualDM", duration: 1)
                2015-11-06  [Defoliate].Script.Defoliate(defoliationType: "Cut", amountDM: 40, amountType: "ResidualDM", duration: 1)
                2015-12-07  [Defoliate].Script.Defoliate(defoliationType: "Cut", amountDM: 40, amountType: "ResidualDM", duration: 1)
                2016-01-07  [Defoliate].Script.Defoliate(defoliationType: "Cut", amountDM: 40, amountType: "ResidualDM", duration: 1)
                2016-02-04  [Defoliate].Script.Defoliate(defoliationType: "Cut", amountDM: 40, amountType: "ResidualDM", duration: 1)
                2016-03-04  [Defoliate].Script.Defoliate(defoliationType: "Cut", amountDM: 40, amountType: "ResidualDM", duration: 1)
                2016-03-31  [Defoliate].Script.Defoliate(defoliationType: "Cut", amountDM: 40, amountType: "ResidualDM", duration: 1)
                2016-05-04  [Defoliate].Script.Defoliate(defoliationType: "Cut", amountDM: 40, amountType: "ResidualDM", duration: 1)
              Manager ExtraVariables
```csharp
// This will be replaced by the "ExtraVariables" section in "Replacements"

using Models.Soils;
using System;
using Models.Core;

namespace Models
{
    [Serializable] 
    public class Script : Model
    {
    }
}
```
            MicroClimate: a_interception=0; b_interception=1; c_interception=0; d_interception=0; SoilHeatFluxFraction=0.4; MinimumHeightDiffForNewLayer=0; NightInterceptionFraction=0.5; ReferenceHeight=2
            Irrigation
            Fertiliser
            SurfaceOrganicMatter: InitialResidueName=grass; InitialResidueType=grass; InitialResidueMass=500; InitialStandingFraction=0; InitialCPR=0; InitialCNR=40
            Soil TempletonPaparua: SoilType=Udic Haplustept (US),  Immature Pallic Soil (NZ); LocalName=Templeton Fine Sandy Loam; Site=LURDF; NearestTown=Lincoln; Region=Canterbury; Country=New Zealand; Latitude=0; Longitude=0; DataSource=Adapted based on data from the NZ Natioanl Soils Database
              Comments=Different references name the soil at the site as either Templeton or Paparua (very similar soils)
              Chemical: Thickness=[150, 150, 200, 250, 250, 500]; PH=[6, 6, 6, 6, 6, 6]; PHUnits=Water
              Physical
                Thickness  ParticleSizeClay  ParticleSizeSand  ParticleSizeSilt  BD    AirDry  LL15   DUL    SAT    KS
                150        21.8              17.4              60.9              1.35  0.057   0.17   0.34   0.439  2913.761
                150        18.3              24.8              56.9              1.43  0.159   0.177  0.325  0.409  1052.63
                200        19.5              21                59.5              1.54  0.186   0.186  0.327  0.362  182.149
                250        10.3              37                52.6              1.54  0.13    0.132  0.251  0.358  1272.997
                250        9.5               43.6              46.9              1.48  0.116   0.116  0.24   0.365  1767.199
                500        16.6              24.2              59.3              1.41  0.138   0.138  0.273  0.39   586.553
                SoilCrop PlantainSoil: LL=[0.17, 0.18, 0.19, 0.13, 0.12, 0.14]; KL=[0.12, 0.11, 0.06, 0.03, 0.01, 0.01]; XF=[1, 1, 1, 1, 1, 1]
              WaterBalance SoilWater: SummerDate=1-Nov; SummerU=6; SummerCona=3.5; WinterDate=1-apr; WinterU=2; WinterCona=2; DiffusConst=88; DiffusSlope=35; Salb=0.13; CN2Bare=73; CNRed=20; CNCov=0.8
              Organic: FOMCNRatio=40; CarbonUnits=Total
                Thickness  Carbon  SoilCNRatio  FBiom  FInert  FOM
                150        2.6     11.3         0.045  0.475   358.617
                150        1.01    11.3         0.025  0.695   265.67
                200        0.4     11.3         0.022  0.845   178.084
                250        0.19    11.3         0.02   0.89    108.013
                250        0.22    11.3         0.01   0.96    65.5135
                500        0.18    11.3         0.01   0.99    24.1011
              Water: Thickness=[150, 150, 200, 250, 250, 500]; InitialValues=[0.34, 0.325, 0.327, 0.251, 0.24, 0.268917]; FilledFromTop=true
              CERESSoilTemperature Temperature
              Nutrient
              Solute NO3: Thickness=[150, 150, 200, 250, 250, 500]; InitialValues=[5, 4, 1.5, 1.5, 1.5, 0.780142]; InitialValuesUnits=ppm; WaterTableConcentration=0; D0=0
              Solute NH4: Thickness=[150, 150, 200, 250, 250, 500]; InitialValues=[0.493827, 0.34965, 0.2, 0.2, 0.135135, 0.070922]; InitialValuesUnits=ppm; WaterTableConcentration=0; D0=0
              Solute Urea: Thickness=[150, 150, 200, 250, 250, 500]; InitialValues=[0, 0, 0, 0, 0, 0]; InitialValuesUnits=kg/ha; WaterTableConcentration=0; D0=0
            Plant Plantain
            Report: EventNames=[Clock].DoReport
      Experiment FRNLRuakura
        Memo
          ###FRNL Ruakura###

          This simulation setup was based on field trials performed at DairyNZ's Scott Farm, in Ruakura, New Zealand, between 2014 and 2016.  The experiment was part of the FRNL (Forages for Reduced Nitrogen Leaching) program and the data is basically unpublished (references will be added when this come about).  Here only plots with pure plantain are used.
          The experiment consisted of six fertiliser treatments (N rates of 0, 50, 100, 200, 350 and 500 kg/ha/yr) in three replicates, and measurements comprised yield and quality indicators (here N content is used).
          Observed data supplied by Grant Edwards, Lincoln University.

          The soil at the experimental site was a Horotiu silt loam (an Orthic Allophanic soil; USDA: Typic Udivitrand), the parameters required were inferred using data from the New Zealand National Soils Database (Landcare Research).
          Weather data was obtained from nearby Ruakura weather station (NIWA).
        Factors
          Factor NRate: Specification=[NRate]
            Operations 0
            Operations 50
              2014-12-22  [Fertiliser].Apply(Amount: 5, Type: Fertiliser.Types.UreaN, Depth: 10)
              2015-01-19  [Fertiliser].Apply(Amount: 5, Type: Fertiliser.Types.UreaN, Depth: 10)
              2015-03-23  [Fertiliser].Apply(Amount: 5, Type: Fertiliser.Types.UreaN, Depth: 10)
              2015-05-01  [Fertiliser].Apply(Amount: 5, Type: Fertiliser.Types.UreaN, Depth: 10)
              2015-06-18  [Fertiliser].Apply(Amount: 5, Type: Fertiliser.Types.UreaN, Depth: 10)
              2015-09-09  [Fertiliser].Apply(Amount: 5, Type: Fertiliser.Types.UreaN, Depth: 10)
              2015-10-29  [Fertiliser].Apply(Amount: 5, Type: Fertiliser.Types.UreaN, Depth: 10)
              2015-10-09  [Fertiliser].Apply(Amount: 5, Type: Fertiliser.Types.UreaN, Depth: 10)
              2015-11-24  [Fertiliser].Apply(Amount: 5, Type: Fertiliser.Types.UreaN, Depth: 10)
              2015-12-17  [Fertiliser].Apply(Amount: 5, Type: Fertiliser.Types.UreaN, Depth: 10)
              2016-01-26  [Fertiliser].Apply(Amount: 5, Type: Fertiliser.Types.UreaN, Depth: 10)
              2016-04-12  [Fertiliser].Apply(Amount: 5, Type: Fertiliser.Types.UreaN, Depth: 10)
              2016-06-30  [Fertiliser].Apply(Amount: 5, Type: Fertiliser.Types.UreaN, Depth: 10)
            Operations 100
              2014-12-22  [Fertiliser].Apply(Amount: 10, Type: Fertiliser.Types.UreaN, Depth: 10)
              2015-01-19  [Fertiliser].Apply(Amount: 10, Type: Fertiliser.Types.UreaN, Depth: 10)
              2015-03-23  [Fertiliser].Apply(Amount: 10, Type: Fertiliser.Types.UreaN, Depth: 10)
              2015-05-01  [Fertiliser].Apply(Amount: 10, Type: Fertiliser.Types.UreaN, Depth: 10)
              2015-06-18  [Fertiliser].Apply(Amount: 10, Type: Fertiliser.Types.UreaN, Depth: 10)
              2015-09-09  [Fertiliser].Apply(Amount: 10, Type: Fertiliser.Types.UreaN, Depth: 10)
              2015-10-09  [Fertiliser].Apply(Amount: 10, Type: Fertiliser.Types.UreaN, Depth: 10)
              2015-10-29  [Fertiliser].Apply(Amount: 10, Type: Fertiliser.Types.UreaN, Depth: 10)
              2015-11-24  [Fertiliser].Apply(Amount: 10, Type: Fertiliser.Types.UreaN, Depth: 10)
              2015-12-17  [Fertiliser].Apply(Amount: 10, Type: Fertiliser.Types.UreaN, Depth: 10)
              2016-01-26  [Fertiliser].Apply(Amount: 10, Type: Fertiliser.Types.UreaN, Depth: 10)
              2016-04-12  [Fertiliser].Apply(Amount: 10, Type: Fertiliser.Types.UreaN, Depth: 10)
              2016-06-30  [Fertiliser].Apply(Amount: 10, Type: Fertiliser.Types.UreaN, Depth: 10)
            Operations 200
              2014-12-22  [Fertiliser].Apply(Amount: 20, Type: Fertiliser.Types.UreaN, Depth: 10)
              2015-01-19  [Fertiliser].Apply(Amount: 20, Type: Fertiliser.Types.UreaN, Depth: 10)
              2015-03-23  [Fertiliser].Apply(Amount: 20, Type: Fertiliser.Types.UreaN, Depth: 10)
              2015-05-01  [Fertiliser].Apply(Amount: 20, Type: Fertiliser.Types.UreaN, Depth: 10)
              2015-06-18  [Fertiliser].Apply(Amount: 20, Type: Fertiliser.Types.UreaN, Depth: 10)
              2015-09-09  [Fertiliser].Apply(Amount: 20, Type: Fertiliser.Types.UreaN, Depth: 10)
              2015-10-09  [Fertiliser].Apply(Amount: 20, Type: Fertiliser.Types.UreaN, Depth: 10)
              2015-10-29  [Fertiliser].Apply(Amount: 20, Type: Fertiliser.Types.UreaN, Depth: 10)
              2015-11-24  [Fertiliser].Apply(Amount: 20, Type: Fertiliser.Types.UreaN, Depth: 10)
              2015-12-17  [Fertiliser].Apply(Amount: 20, Type: Fertiliser.Types.UreaN, Depth: 10)
              2016-01-26  [Fertiliser].Apply(Amount: 20, Type: Fertiliser.Types.UreaN, Depth: 10)
              2016-04-12  [Fertiliser].Apply(Amount: 20, Type: Fertiliser.Types.UreaN, Depth: 10)
              2016-06-30  [Fertiliser].Apply(Amount: 20, Type: Fertiliser.Types.UreaN, Depth: 10)
            Operations 350
              2014-12-22  [Fertiliser].Apply(Amount: 35, Type: Fertiliser.Types.UreaN, Depth: 10)
              2015-01-19  [Fertiliser].Apply(Amount: 35, Type: Fertiliser.Types.UreaN, Depth: 10)
              2015-03-23  [Fertiliser].Apply(Amount: 35, Type: Fertiliser.Types.UreaN, Depth: 10)
              2015-05-01  [Fertiliser].Apply(Amount: 35, Type: Fertiliser.Types.UreaN, Depth: 10)
              2015-06-18  [Fertiliser].Apply(Amount: 35, Type: Fertiliser.Types.UreaN, Depth: 10)
              2015-09-09  [Fertiliser].Apply(Amount: 35, Type: Fertiliser.Types.UreaN, Depth: 10)
              2015-10-09  [Fertiliser].Apply(Amount: 35, Type: Fertiliser.Types.UreaN, Depth: 10)
              2015-10-29  [Fertiliser].Apply(Amount: 35, Type: Fertiliser.Types.UreaN, Depth: 10)
              2015-11-24  [Fertiliser].Apply(Amount: 35, Type: Fertiliser.Types.UreaN, Depth: 10)
              2015-12-17  [Fertiliser].Apply(Amount: 35, Type: Fertiliser.Types.UreaN, Depth: 10)
              2016-01-26  [Fertiliser].Apply(Amount: 35, Type: Fertiliser.Types.UreaN, Depth: 10)
              2016-04-12  [Fertiliser].Apply(Amount: 35, Type: Fertiliser.Types.UreaN, Depth: 10)
              2016-06-30  [Fertiliser].Apply(Amount: 35, Type: Fertiliser.Types.UreaN, Depth: 10)
            Operations 500
              2014-12-22  [Fertiliser].Apply(Amount: 50, Type: Fertiliser.Types.UreaN, Depth: 10)
              2015-01-19  [Fertiliser].Apply(Amount: 50, Type: Fertiliser.Types.UreaN, Depth: 10)
              2015-03-23  [Fertiliser].Apply(Amount: 50, Type: Fertiliser.Types.UreaN, Depth: 10)
              2015-05-01  [Fertiliser].Apply(Amount: 50, Type: Fertiliser.Types.UreaN, Depth: 10)
              2015-06-18  [Fertiliser].Apply(Amount: 50, Type: Fertiliser.Types.UreaN, Depth: 10)
              2015-09-09  [Fertiliser].Apply(Amount: 50, Type: Fertiliser.Types.UreaN, Depth: 10)
              2015-10-09  [Fertiliser].Apply(Amount: 50, Type: Fertiliser.Types.UreaN, Depth: 10)
              2015-10-29  [Fertiliser].Apply(Amount: 50, Type: Fertiliser.Types.UreaN, Depth: 10)
              2015-11-24  [Fertiliser].Apply(Amount: 50, Type: Fertiliser.Types.UreaN, Depth: 10)
              2015-12-17  [Fertiliser].Apply(Amount: 50, Type: Fertiliser.Types.UreaN, Depth: 10)
              2016-01-26  [Fertiliser].Apply(Amount: 50, Type: Fertiliser.Types.UreaN, Depth: 10)
              2016-04-12  [Fertiliser].Apply(Amount: 50, Type: Fertiliser.Types.UreaN, Depth: 10)
              2016-06-30  [Fertiliser].Apply(Amount: 50, Type: Fertiliser.Types.UreaN, Depth: 10)
        Simulation FRNLRuakura
          Clock: Start=2014-06-01; End=2016-06-30
          Weather: FileName=Ruakura.met
          Summary summaryfile
          SoilArbitrator Soil Arbitrator
          Zone Field: Area=1; Slope=0; AspectAngle=0; Altitude=50
            Folder Management
              Operations Sowing
                2014-10-10  [Plantain].Sow(population: 200, cultivar: "Tonic", depth: 10, rowSpacing: 150)
              Operations NRate
              Operations BaseFertiliser
                2014-10-13  [Fertiliser].Apply(Amount: 26.4, Type: Fertiliser.Types.UreaN, Depth: 10)
                2014-12-23  [Fertiliser].Apply(Amount: 3.9, Type: Fertiliser.Types.UreaN, Depth: 10)
              Manager Defoliate: same as Validation.New Zealand.FRNLLincoln.FRNLLincoln.Field.Management.Defoliate
              Operations DefoliationSchedule
                2014-12-16  [Defoliate].Script.Defoliate(defoliationType: "Cut", amountDM: 50, amountType: "ResidualDM", duration: 1)
                2015-01-14  [Defoliate].Script.Defoliate(defoliationType: "Cut", amountDM: 60, amountType: "ResidualDM", duration: 1)
                2015-03-18  [Defoliate].Script.Defoliate(defoliationType: "Cut", amountDM: 60, amountType: "ResidualDM", duration: 1)
                2015-04-28  [Defoliate].Script.Defoliate(defoliationType: "Cut", amountDM: 60, amountType: "ResidualDM", duration: 1)
                2015-06-17  [Defoliate].Script.Defoliate(defoliationType: "Cut", amountDM: 60, amountType: "ResidualDM", duration: 1)
                2015-09-07  [Defoliate].Script.Defoliate(defoliationType: "Cut", amountDM: 60, amountType: "ResidualDM", duration: 1)
                2015-10-07  [Defoliate].Script.Defoliate(defoliationType: "Cut", amountDM: 60, amountType: "ResidualDM", duration: 1)
                2015-10-28  [Defoliate].Script.Defoliate(defoliationType: "Cut", amountDM: 60, amountType: "ResidualDM", duration: 1)
                2015-11-23  [Defoliate].Script.Defoliate(defoliationType: "Cut", amountDM: 60, amountType: "ResidualDM", duration: 1)
                2015-12-16  [Defoliate].Script.Defoliate(defoliationType: "Cut", amountDM: 60, amountType: "ResidualDM", duration: 1)
                2016-01-25  [Defoliate].Script.Defoliate(defoliationType: "Cut", amountDM: 60, amountType: "ResidualDM", duration: 1)
                2016-04-11  [Defoliate].Script.Defoliate(defoliationType: "Cut", amountDM: 60, amountType: "ResidualDM", duration: 1)
                2016-06-29  [Defoliate].Script.Defoliate(defoliationType: "Cut", amountDM: 60, amountType: "ResidualDM", duration: 1)
                2016-09-21  [Defoliate].Script.Defoliate(defoliationType: "Cut", amountDM: 60, amountType: "ResidualDM", duration: 1)
              Manager ExtraVariables
                script: same as in Validation.New Zealand.FRNLLincoln.FRNLLincoln.Field.Management.ExtraVariables
            MicroClimate: a_interception=0; b_interception=1; c_interception=0; d_interception=0; SoilHeatFluxFraction=0.4; MinimumHeightDiffForNewLayer=0; NightInterceptionFraction=0.5; ReferenceHeight=2
            Irrigation
            Fertiliser
            SurfaceOrganicMatter: InitialResidueName=grass; InitialResidueType=grass; InitialResidueMass=500; InitialStandingFraction=0; InitialCPR=0; InitialCNR=40
            Soil HorotiuSoil: SoilType=Typic Udivitrand (US), Typic Orthic Allophanic Soil (NZ); LocalName=Horotiu silt loam; Site=Ruakura; NearestTown=Hamilton; Region=Waikato; Country=New Zealand; Latitude=0; Longitude=0; DataSource=Based primarily on data from Close et al, 2003
              Chemical: Thickness=[200, 200, 130, 140, 380, 230, 220]; PH=[6, 6, 6, 6, 6, 6, 6]; PHUnits=Water
              Physical
                Thickness  ParticleSizeClay  ParticleSizeSand  ParticleSizeSilt  BD    AirDry  LL15   DUL    SAT    KS
                200        20                47                33                0.88  0.114   0.228  0.373  0.581  553
                200        19                65                17                0.85  0.209   0.22   0.34   0.609  5083
                130        11                76                13                1.03  0.1     0.182  0.323  0.54   8353
                140        7                 84                10                1.11  0.1     0.15   0.282  0.5    13589
                380        5                 88                8                 1.11  0.1     0.142  0.2    0.5    38963
                230        3                 91                6                 1.03  0.1     0.103  0.16   0.446  45280
                220        1                 94                5                 1.03  0.08    0.08   0.13   0.37   53606
                SoilCrop PlantainSoil: LL=[0.23, 0.22, 0.18, 0.15, 0.14, 0.1, 0.08]; KL=[0.1, 0.08, 0.05, 0.02, 0.01, 0.01, 0]; XF=[1, 1, 1, 1, 1, 1, 0.5]
              WaterBalance SoilWater: SummerDate=21-Sep; SummerU=6; SummerCona=3.5; WinterDate=23-Mar; WinterU=6; WinterCona=2.5; DiffusConst=88; DiffusSlope=35; Salb=0.2; CN2Bare=0.7; CNRed=20; CNCov=0.8
              Organic: FOMCNRatio=40; CarbonUnits=Total
                Thickness  Carbon  SoilCNRatio  FBiom  FInert  FOM
                200        8       12.5         0.06   0.6     338.974
                200        1.88    12.5         0.03   0.645   227.221
                130        0.93    12.5         0.021  0.675   175.199
                140        0.43    12.5         0.01   0.7     132.413
                380        0.13    12.5         0.01   0.78    61.9249
                230        0.1     12.5         0.01   0.87    39.0922
                220        0.07    12.5         0.01   0.95    25.1768
              Water: Thickness=[200, 200, 130, 140, 380, 230, 220]; InitialValues=[0.3585, 0.328, 0.3089, 0.2688, 0.1942, 0.1543, 0.125]; FilledFromTop=false
              CERESSoilTemperature Temperature
              Nutrient
              Solute NO3: Thickness=[200, 200, 130, 140, 380, 230, 220]; InitialValues=[15, 10, 5, 5, 4.47368, 1, 1]; InitialValuesUnits=ppm; WaterTableConcentration=0; D0=0
              Solute NH4: Thickness=[200, 200, 130, 140, 380, 230, 220]; InitialValues=[0.5, 0.2, 0.093, 0.093, 0.093, 0.093, 0.093]; InitialValuesUnits=ppm; WaterTableConcentration=0; D0=0
              Solute Urea: Thickness=[200, 200, 130, 140, 380, 230, 220]; InitialValues=[0, 0, 0, 0, 0, 0, 0]; InitialValuesUnits=kg/ha; WaterTableConcentration=0; D0=0
            Plant Plantain
            Report: EventNames=[Clock].DoReport
      Experiment Hamilton
        Memo
          ###Hamilton###

          Simulation setup based on field trials conducted at DairyNZ’s Scott Farm in Hamilton, New Zealand between September 2010 and May 2012.  The experiment data were published (Lee et al., 2015).  Here only plots with pure plantain are used.

          The treatments consisted of four defoliation intervals x two residual heights,with five replicates. Defoliation intervals were based on the time taken for leaves to grow to extended heights of ~150, 250, 350 or 450 mm for plantain. Residual height treatments involved cutting the sward to a residual height of 30–50 or 60–80 mm.

          Data were extracted from a paper listed in reference.

          The soil type at the experimental site was a Horotiu silt loam,a Typic Orthic Allophanic soil under the New Zealand classification system or Typic Udivitrand in the USDA system. The required parameters were inferred based on data from the New Zealand National Soils Database (Landcare Research).
          Weather data was obtained from nearby weather station (NIWA).

          References:
          Lee Julia M., Hemmingson Nivonne R., Minnee Elena M. K., Clark Cameron E. F. (2015) Management strategies for chicory (Cichorium intybus) and plantain (Plantago lanceolata): impact on dry matter yield, nutritive characteristics and plant density. Crop and Pasture Science 66, 168-183.
        Factors
          Factor Defoliation
            CompositeFactor 15030: Specifications=[Defoliate]
              Manager Defoliate: same as Replacements.Defoliate
            CompositeFactor 15060: Specifications=[Defoliate]
              Manager Defoliate
                Crop =
                cutPasture_StartDate = 12/13/2010 00:00:00
                cutPasture_EndDate = 05/30/2012 00:00:00
                defoliateType = Cut
                DefoliationHeight = 150
                ResidualHeight = 60
                interval2Cut = 0
                durationOfCut = 1
                removeAmountType = ResidualHeight
                herbageAmount = -
                fracDM2Remove = 1
                fracN2Remove = 1
                urineDepth = 10
                fracN2Dung = 0.4
                fracPopDecline = 0.05
                script: same as in Replacements.Defoliate
            CompositeFactor 25030: Specifications=[Defoliate]
              Manager Defoliate
                Crop =
                cutPasture_StartDate = 12/13/2010 00:00:00
                cutPasture_EndDate = 05/30/2012 00:00:00
                defoliateType = Cut
                DefoliationHeight = 250
                ResidualHeight = 30
                interval2Cut = 0
                durationOfCut = 1
                removeAmountType = ResidualHeight
                herbageAmount = -
                fracDM2Remove = 1
                fracN2Remove = 1
                urineDepth = 10
                fracN2Dung = 0.4
                fracPopDecline = 0.05
```csharp
// Defoliates on a regular cycle or one-off via a schedule
// currently defoliates by the amount specified spread evenly over the specified period

using Newtonsoft.Json;
using APSIM.Shared.Utilities;
using System.Xml.Serialization;
using Models.PMF;
using Models.Soils;
using Models;
using System.Text;
using System.Collections.Generic;
using Models.Core;
using System;
using Models.Soils.Nutrients;

namespace Models
{
    [Serializable]
    public class Script : Model
    {
        [Link] Zone zone;
        [Link] Clock Clock;
        [Link] Plant Plantain;
        [Link] Fertiliser fertiliser;
        [Link] ISummary summary = null;

        [Description("Choose the crop to harvest:")]
        public IPlant Crop { get; set; }

        [Description("Enter the date to start the rotation (dd/mm/yyyy):")]
        public DateTime cutPasture_StartDate { get; set; }
        
        [Description("Enter the date to end the rotation (dd/mm/yyyy):")]
        public DateTime cutPasture_EndDate { get; set; }       

        [Description("Select type of defoliation:")]
        public defoliationTypes defoliateType { get; set; }
        
        [Description("Defoliation Height (mm)")]
        public double DefoliationHeight { get; set; }  
        
        [Description("Height (mm)")]
        public double ResidualHeight { get; set; } 

        [Description("Enter the interval between defoliations (days):")]
        public int interval2Cut { get; set; }

        [Description("Enter the number of days to defoliate over (days):")]
        public int durationOfCut { get; set; }

        [Description("Choose what amount is being defined:")]
        public removeAmountTypes removeAmountType { get; set; }

        [Description("Enter the amount to use (kgDM/ha):")]
        public double herbageAmount { get; set; }

        [Description("Enter the fraction of DM that is removed from the field (0-1):")]
        public double fracDM2Remove { get; set; }

        [Description("Enter the fraction of N that is removed from the field (0-1):")]
        public double fracN2Remove { get; set; }

        [Description("Enter the depth down to which urine will applied (mm):")]
        public double urineDepth { get; set; }

        [Description("Enter the proportion of N returned in dung (0-1):")]
        public double fracN2Dung { get; set; }

        [Description("Enter the fraction of population decline due to defoliation (0-1):")]
        public double fracPopDecline { get; set; }

        //fraction of each plant part returned as residue (0-1), wastage
        private double leafResidueFrac = 0.01;
        private double stemResidueFrac = 0.01;
        private double flowerResidueFrac = 0.01;
        private double minLeafAmount = 5.0;

        //Outputs
        //Pasture DM defoliated today (kg/ha)
        [JsonIgnore] public double DefoliatedDM{ get; set; }
        [JsonIgnore] private RemovalFractions Remove { get; set; }
        //N defoliate today (kg/ha)
        [JsonIgnore] public double DefoliatedN{ get; set; }
        //Pasture DM harvested today (kg/ha)
        [JsonIgnore] public double HarvestedDM{ get; set; }
        //N harvested today (kg/ha)
        [JsonIgnore] public double HarvestedN{ get; set; }
        //DM removed from the paddock (kg/ha)
        [JsonIgnore] public double RemovedDM{ get; set; }
        //Height removed from the paddock 
        [JsonIgnore] public double RemovedHeight{ get; set; }
        //N removed from the paddock (kg/ha)
        [JsonIgnore] public double RemovedN{ get; set; }
        //DM returned to the paddock (kg/ha)
        [JsonIgnore] public double ReturnedDM{ get; set; }
        //N returned to the paddock (kg/ha)
        [JsonIgnore] public double ReturnedN{ get; set; }
        //N returned as dung (SurfaceOM)
        [JsonIgnore] public double NReturnedInDung{ get; set; }
        //N returned as urine (urea)
        [JsonIgnore] public double NReturnedInUrine{ get; set; }
        //Number of days after last harvest
        [JsonIgnore] public int DaysAfterCut{ get; set; }
        //Total standing DM (Leaf + Stem/Sheath) before cut
        [JsonIgnore] public double PreHarvestDM{ get; set; }
        //Total standing DM (Leaf + Stem/Sheath) after cut
        [JsonIgnore] public double PostHarvestDM{ get; set; }

        //Pasture DM harvested this rotation (kg/ha)
        [JsonIgnore] public double RotationHarvestedDM{ get; set; }
        //Pasture DM to be harvested this rotation (kg/ha)
        [JsonIgnore] public double RotationHarvestingDM{ get; set; }

        //N concentration of the defoliated material (kg/kg)
        [JsonIgnore] public double HarvestedNconc{ get; set; }

        //Internal variables
        private RemovalFractions removalFractions;
        //The fraction of urine to be applied in each layer
        private double[] FracLayer;
        // total herbage to remove in g/m2 per day
        private double herbageToRemove;
        // counter
        private int daysCutting = 0;
        // type of defoliation (Cut or Graze)
        private string defoliationType;
        // type of DM amount (ResidualDM or DMToRemove or ResidualHeight)
        private string amountType;
        // auxiliary
        private bool aCutHasHappened = false;
        private bool isStillCutting = false;
        private double cumAmountHarvested;

        // event to add residue / dung to surface OM
        public event BiomassRemovedDelegate BiomassRemoved;

        [EventSubscribe("StartOfSimulation")]
        private void OnSimulationCommencing(object sender, EventArgs e)
        {
            removalFractions = new RemovalFractions();
            DaysAfterCut = 0;
            resetVariables();
            if (defoliateType == defoliationTypes.Cut)
                defoliationType = "Cut";
            else
                defoliationType = "Graze";

            if (removeAmountType == removeAmountTypes.ResidualDM)
                amountType = "ResidualDM";
            else
                amountType = "DMToRemove";
                
            if (removeAmountType == removeAmountTypes.ResidualHeight)
                amountType = "ResidualHeight";
            else
                amountType = "DMToRemove";
                

            // make sure that rotation start when startDate<simulationStartDay
            if ((Clock.Today > cutPasture_StartDate) && (Clock.Today < cutPasture_EndDate))
                cutPasture_StartDate = Clock.Today;
                Remove = new RemovalFractions();

            // initialise variables
            resetVariables();
                   
        }

 
        [EventSubscribe("DoManagement")]
        private void OnDoManagement(object sender, EventArgs e)
        {
            
            if (Clock.Today == cutPasture_StartDate)
                DaysAfterCut = interval2Cut;
                

            if ((Clock.Today >= cutPasture_StartDate) && (Clock.Today <= cutPasture_EndDate))
            {
                // Check whether we should start cutting
                if ((Plantain.IsEmerged) && (DaysAfterCut > 0) && (DaysAfterCut == interval2Cut))
                {
                    Defoliate(defoliationType, herbageAmount * 0.1, amountType, durationOfCut);
                }
                
            if (Plantain.Leaf.Height>=DefoliationHeight)
           {
                      Plantain.RemoveBiomass("Cut", Remove);
                      daysCutting += 1;
           }
            }

            // Check whether we need to continue cutting
            //if ((daysCutting > 0) && (daysCutting <= durationOfCut))
            if (isStillCutting)
            {
                // reset outputs
                resetVariables();

                removeDM(herbageToRemove, defoliationType);
                returnExcreta();
                cumAmountHarvested += HarvestedDM;
                daysCutting += 1;
            }

            // reset outputs
            if (daysCutting < 0)
            {
                resetVariables();
                daysCutting = 0;
            }
        }

        [EventSubscribe("DoManagementCalculations")]
        private void OnDoManagementCalculations(object sender, EventArgs e)
        {
            if ((daysCutting > 0) && (daysCutting < durationOfCut))
                isStillCutting = true;

            if (daysCutting == durationOfCut)
            {
                PostHarvestDM = (double)zone.Get("Plantain.AboveGround.Wt");
                RotationHarvestedDM = cumAmountHarvested;
                aCutHasHappened = true;
                isStillCutting = false;
                daysCutting = -1;
                Plantain.Population = Plantain.Population * (1.0 - fracPopDecline);
            }

            if (aCutHasHappened && (daysCutting == 0))
                DaysAfterCut += 1;
        }

        public enum removeAmountTypes
        {
            /// <summary>Setting DM amount to remove</summary>
            DMToRemove,
            /// <summary>Setting residual DM amount</summary>
            ResidualDM,
            /// <summary>Setting residual Height</summary>
            ResidualHeight
        }

        public enum defoliationTypes
        {
            /// <summary>Cut</summary>
            Cut,
            /// <summary>Graze</summary>
            Graze
        }

        // resets the values of all outputs
        private void resetVariables()
        {
            DefoliatedDM = 0.0;
            DefoliatedN = 0.0;
            HarvestedDM = 0.0;
            HarvestedN = 0.0;
            RemovedDM = 0.0;
            RemovedN = 0.0;
            ReturnedDM = 0.0;
            ReturnedN = 0.0;
            NReturnedInDung = 0.0;
            NReturnedInUrine = 0.0;
            RotationHarvestedDM = 0.0;
            RotationHarvestingDM = 0.0;
            HarvestedNconc = 0.0;
        }

        // Perform the basic calculations for defoliation
        public void Defoliate(string defoliationType, double amountDM, string amountType, int duration)
        {
            // get the existing plant amount
            PreHarvestDM = (double)zone.Get("Plantain.AboveGround.Wt");
           

            // check duration
            if (duration <= 0)
                throw new Exception("Duration of graze/cut rotation is zero or negative");
            
            // check amount to remove
            if ((amountType == "DMToRemove") && (PreHarvestDM > 0.0))
            {
                summary.WriteMessage(this, "   Defoliating " + (10.0 * amountDM).ToString("#0.0") + "kg/ha over " + duration + " days", MessageType.Diagnostic);
                herbageToRemove = amountDM / duration;
            }
            else if ((amountType == "ResidualDM") && (PreHarvestDM > amountDM))
            {
                summary.WriteMessage(this, "   Defoliating down to approximately " + (10.0 * amountDM).ToString("#0.0") + "kg/ha over " + duration + " days", MessageType.Diagnostic);
                herbageToRemove = (PreHarvestDM - amountDM) / duration;
            }
            else
            {
                herbageToRemove = 0.0;
                summary.WriteMessage(this, "   Defoliation will not happend because there is not enough plant material", MessageType.Diagnostic);
                return;
            }

            RotationHarvestingDM = herbageToRemove * duration;
            durationOfCut = duration;
            // first defoliation
            removeDM(herbageToRemove, defoliationType);
            returnExcreta();
            cumAmountHarvested = HarvestedDM;
            daysCutting = 1;
            DaysAfterCut = 0;
        }

        private void removeDM(double removeAmount, string removeType)
        {
            // get the existing biomass
            double leafLiveWt = (double)zone.Get("Plantain.Leaf.Live.Wt");
            double stemLiveWt = (double)zone.Get("Plantain.Stem.Live.Wt");
            double flowerLiveWt = (double)zone.Get("Plantain.Inflorescence.Live.Wt");
            double leafDeadWt = (double)zone.Get("Plantain.Leaf.Dead.Wt");
            double stemDeadWt = (double)zone.Get("Plantain.Stem.Dead.Wt");
            double flowerDeadWt = (double)zone.Get("Plantain.Inflorescence.Dead.Wt");
            double leafLiveN = (double)zone.Get("Plantain.Leaf.Live.N");
            double stemLiveN = (double)zone.Get("Plantain.Stem.Live.N");
            double flowerLiveN = (double)zone.Get("Plantain.Inflorescence.Live.N");
            double leafDeadN = (double)zone.Get("Plantain.Leaf.Dead.N");
            double stemDeadN = (double)zone.Get("Plantain.Stem.Dead.N");
            double flowerDeadN = (double)zone.Get("Plantain.Inflorescence.Dead.N");

            double existingWt = leafLiveWt + leafDeadWt + stemLiveWt + stemDeadWt + flowerLiveWt + flowerDeadWt;
            double existingN = leafLiveN + leafDeadN + stemLiveN + stemDeadN + flowerLiveN + flowerDeadN;

            // Can we harvest anything?
            double removingWt = Math.Min(existingWt, removeAmount);
            if (removingWt > 0.0)
            {
                // get the fractions to remove for each organ (will override the default values)
                // the default is [Plantain].Leaf.BiomassRemovalDefaults.Cut.FractionRemoved, or equivalent
                // >> double leafFracToRemove = removeAmount * (leafLiveWt + leafDeadWt) / existingWt / existingWt;
                double fracToRemove = removingWt / existingWt;
                double leafFracToRemove = 0.0;
                if ((leafLiveWt + leafDeadWt) > 0.0)
                {
                    if (leafLiveWt < minLeafAmount)
                    {
                        // leafWt cannot go below a minimum
                        leafFracToRemove = (removingWt + leafLiveWt - minLeafAmount) / existingWt;
                    }
                    else
                        leafFracToRemove = fracToRemove;
                }

                double stemFracToRemove = ((stemLiveWt + stemDeadWt) > 0.0) ? fracToRemove : 0.0;
                double flowerFracToRemove = ((flowerLiveWt + flowerDeadWt) > 0.0) ? fracToRemove : 0.0;

                // get the fractions to residue (i.e. wastage - will override the default values)
                // the default is [Plantain].Leaf.BiomassRemovalDefaults.Cut.FractionToResidue, or equivalent
                double leafFracToResidue = leafResidueFrac * leafFracToRemove;
                double stemFracToResidue = stemResidueFrac * stemFracToRemove;
                double flowerFracToResidue = flowerResidueFrac * flowerFracToRemove;

                // correct the values to defoliate (so our removing = remove + residue)
                leafFracToRemove -= leafFracToResidue;
                stemFracToRemove -= stemFracToResidue;
                flowerFracToRemove -= flowerFracToResidue;

                // set removal fractions (these overrides the default removals in the plant)
                removalFractions.SetFractionToRemove("Leaf", leafFracToRemove, "Live");
                removalFractions.SetFractionToResidue("Leaf", leafFracToResidue, "Live");
                removalFractions.SetFractionToRemove("Leaf", leafFracToRemove, "Dead");
                removalFractions.SetFractionToResidue("Leaf", leafFracToResidue, "Dead");
                removalFractions.SetFractionToRemove("Stem", stemFracToRemove, "Live");
                removalFractions.SetFractionToResidue("Stem", stemFracToResidue, "Live");
                removalFractions.SetFractionToRemove("Stem", stemFracToRemove, "Dead");
                removalFractions.SetFractionToResidue("Stem", stemFracToResidue, "Dead");
                removalFractions.SetFractionToRemove("Inflorescence", flowerFracToRemove, "Live");
                removalFractions.SetFractionToResidue("Inflorescence", flowerFracToResidue, "Live");
                removalFractions.SetFractionToRemove("Inflorescence", flowerFracToRemove, "Dead");
                removalFractions.SetFractionToResidue("Inflorescence", flowerFracToResidue, "Dead");

                removalFractions.SetFractionToRemove("Root", 0.0);
                removalFractions.SetFractionToResidue("Root", 0.0);
                removalFractions.SetFractionToRemove("Taproot", 0.0);
                removalFractions.SetFractionToResidue("Taproot", 0.0);

                // Actually do the biomass removal
                Plantain.RemoveBiomass(removeType, removalFractions);

                // get the new existing plant amount
                double postHarvestWt = (double)zone.Get("Plantain.AboveGround.Wt");
                double postHarvestN = (double)zone.Get("Plantain.AboveGround.N");

                // get total defoliation (total plant stuff lost)
                DefoliatedDM = existingWt - postHarvestWt;
                DefoliatedN = existingN - postHarvestN;
                if (DefoliatedDM > 0.0)
                   HarvestedNconc = DefoliatedN/DefoliatedDM;

                // get total harvested (plant stuff removed from plants)
                HarvestedDM = (double)zone.Get("Plantain.Leaf.Removed.Wt")
                + (double)zone.Get("Plantain.Stem.Removed.Wt")
                + (double)zone.Get("Plantain.Inflorescence.Removed.Wt");
                HarvestedN = (double)zone.Get("Plantain.Leaf.Removed.N")
                + (double)zone.Get("Plantain.Stem.Removed.N")
                + (double)zone.Get("Plantain.Inflorescence.Removed.N");

                // get amounts actually removed from field and that to be returned (residue or dung/urine)
                RemovedDM = HarvestedDM * fracDM2Remove;
                RemovedN = HarvestedN * fracN2Remove;
                ReturnedDM = HarvestedDM - RemovedDM;
                ReturnedN = HarvestedN - RemovedN;
                NReturnedInDung = ReturnedN * fracN2Dung;
                NReturnedInUrine = ReturnedN - NReturnedInDung;
            }
            else
            {
            }
        }

        // Return dung and urine
        private void returnExcreta()
        {
            if ((ReturnedDM > 0.0) || (NReturnedInDung > 0.0))
            {
                PMF.BiomassRemovedType BiomassDung = new PMF.BiomassRemovedType();
                string[] type = new string[] { "RuminantDung_PastureFed" };
                float[] dltdm = new float[] { (Single)ReturnedDM };
                float[] dltn = new float[] { (Single)NReturnedInDung };
                float[] dltp = new float[] { 0 };
                float[] fraction = new float[] { 1 };     // fraction is always 1.0 here

                BiomassDung.crop_type = "RuminantDung_PastureFed";
                BiomassDung.dm_type = type;
                BiomassDung.dlt_crop_dm = dltdm;
                BiomassDung.dlt_dm_n = dltn;
                BiomassDung.dlt_dm_p = dltp;
                BiomassDung.fraction_to_residue = fraction;
                BiomassRemoved.Invoke(BiomassDung);
            }

            if (NReturnedInUrine > 0.0)
            {
                fertiliser.Apply(NReturnedInUrine * 10, Fertiliser.Types.UreaN, urineDepth);
            }
        }
    }
}
```
            CompositeFactor 25060: Specifications=[Defoliate]
              Manager Defoliate
                Crop =
                cutPasture_StartDate = 12/13/2010 00:00:00
                cutPasture_EndDate = 05/30/2012 00:00:00
                defoliateType = Cut
                DefoliationHeight = 250
                ResidualHeight = 60
                interval2Cut = 0
                durationOfCut = 1
                removeAmountType = ResidualHeight
                herbageAmount = -
                fracDM2Remove = 1
                fracN2Remove = 1
                urineDepth = 10
                fracN2Dung = 0.4
                fracPopDecline = 0.05
                script: same as in Replacements.Defoliate
            CompositeFactor 35030: Specifications=[Defoliate]
              Manager Defoliate
                Crop =
                cutPasture_StartDate = 12/13/2010 00:00:00
                cutPasture_EndDate = 05/30/2012 00:00:00
                defoliateType = Cut
                DefoliationHeight = 350
                ResidualHeight = 30
                interval2Cut = 0
                durationOfCut = 1
                removeAmountType = ResidualHeight
                herbageAmount = -
                fracDM2Remove = 1
                fracN2Remove = 1
                urineDepth = 10
                fracN2Dung = 0.4
                fracPopDecline = 0.05
                script: same as in Replacements.Defoliate
            CompositeFactor 35060: Specifications=[Defoliate]
              Manager Defoliate
                Crop =
                cutPasture_StartDate = 12/13/2010 00:00:00
                cutPasture_EndDate = 05/30/2012 00:00:00
                defoliateType = Cut
                DefoliationHeight = 350
                ResidualHeight = 60
                interval2Cut = 0
                durationOfCut = 1
                removeAmountType = ResidualHeight
                herbageAmount = -
                fracDM2Remove = 1
                fracN2Remove = 1
                urineDepth = 10
                fracN2Dung = 0.4
                fracPopDecline = 0.05
                script: same as in Replacements.Defoliate
            CompositeFactor 45030: Specifications=[Defoliate]
              Manager Defoliate
                Crop =
                cutPasture_StartDate = 12/13/2010 00:00:00
                cutPasture_EndDate = 05/30/2012 00:00:00
                defoliateType = Cut
                DefoliationHeight = 450
                ResidualHeight = 30
                interval2Cut = 0
                durationOfCut = 1
                removeAmountType = ResidualHeight
                herbageAmount = -
                fracDM2Remove = 1
                fracN2Remove = 1
                urineDepth = 10
                fracN2Dung = 0.4
                fracPopDecline = 0.05
                script: same as in Replacements.Defoliate
            CompositeFactor 45060: Specifications=[Defoliate]
              Manager Defoliate
                Crop =
                cutPasture_StartDate = 12/13/2010 00:00:00
                cutPasture_EndDate = 05/30/2012 00:00:00
                defoliateType = Cut
                DefoliationHeight = 450
                ResidualHeight = 60
                interval2Cut = 0
                durationOfCut = 1
                removeAmountType = ResidualHeight
                herbageAmount = -
                fracDM2Remove = 1
                fracN2Remove = 1
                urineDepth = 10
                fracN2Dung = 0.4
                fracPopDecline = 0.05
                script: same as in Replacements.Defoliate
        Simulation Hamilton
          Clock: Start=2010-09-01; End=2012-05-30
          Weather: FileName=Ruakura.met
          Summary summaryfile
          SoilArbitrator Soil Arbitrator
          Zone Field: Area=1; Slope=0; AspectAngle=0; Altitude=50
            Folder Management
              Operations Sowing
                2010-10-13  [Plantain].Sow(population: 200, cultivar: "Tonic", depth: 10, rowSpacing: 150)
              Operations BaseFertiliser
                2010-12-13  [Fertiliser].Apply(Amount: 30, Type: Fertiliser.Types.UreaN, Depth: 10)
                2011-01-13  [Fertiliser].Apply(Amount: 30, Type: Fertiliser.Types.UreaN, Depth: 10)
                2011-02-13  [Fertiliser].Apply(Amount: 30, Type: Fertiliser.Types.UreaN, Depth: 10)
                2011-03-13  [Fertiliser].Apply(Amount: 30, Type: Fertiliser.Types.UreaN, Depth: 10)
                2011-04-13  [Fertiliser].Apply(Amount: 30, Type: Fertiliser.Types.UreaN, Depth: 10)
                2011-11-13  [Fertiliser].Apply(Amount: 28, Type: Fertiliser.Types.UreaN, Depth: 10)
                2012-01-13  [Fertiliser].Apply(Amount: 28, Type: Fertiliser.Types.UreaN, Depth: 10)
                2012-02-13  [Fertiliser].Apply(Amount: 28, Type: Fertiliser.Types.UreaN, Depth: 10)
                2012-03-13  [Fertiliser].Apply(Amount: 28, Type: Fertiliser.Types.UreaN, Depth: 10)
              Operations DefoliationSchedule
              Manager ExtraVariables
                script: same as in Validation.New Zealand.FRNLLincoln.FRNLLincoln.Field.Management.ExtraVariables
              Manager AutomaticIrrigation
                allowIrrigation = True
                seasonStart = 1-oct
                seasonEnd = 1-mar
                seasonsAllocation = 10000
                triggerDeficit = 26
                targetDeficit = 95
                returndays = 3
                maximumAmount = 30
                depthPAWC = 650
```csharp
using Newtonsoft.Json;
using APSIM.Shared.Utilities;
using System.Xml.Serialization;
using Models.Soils;
using Models.PMF;
using Models.Core;
using System;
using Models.Interfaces;



        
namespace Models
{
    [Serializable] 
    [System.Xml.Serialization.XmlInclude(typeof(Model))]
    public class Script : Model
    {
        [Link] private ISummary summary;
        [Link] private Irrigation Irrigation;
        [Link] private Clock Clock;
        [Link] private Soil Soil;
        [Link(IsOptional = true)] private IPlant existingCrop;
        private DateTime StartDate;
        private DateTime EndDate;
        private double TopDUL;
        private double TopLL;
        private int nLayers;
        [Link]
        private IPhysical soilPhysical;
        [Link]
        private ISoilWater waterBalance;
        //Communication to other modules
       
        //User inputs from properties tab
        [Description("Turn irrigation on?")]
        public bool allowIrrigation { get; set; }
        [Description("Start of irrigation season (dd-MMM)")]
        public string seasonStart { get; set; }
        [Description("End of irrigation season (dd-MMM)")]
        public string seasonEnd { get; set; }
        [Description("Season allocation (mm)")]
        public double seasonsAllocation { get; set; }
        [Description("Deficit to trigger irrigation (% PAWC)")]
        public double triggerDeficit { get; set; }
        [Description("Deficit to stop irrigaton (% PAWC)")]
        public double targetDeficit { get; set; }
        [Description("Minimum days for irrigation to return")]
        public double returndays { get; set; }
        [Description("Maximum irrigation application (mm/day)")]
        public double maximumAmount { get; set; }
        [Description("Depth to calculate PAWC (mm)")]
        public double depthPAWC { get; set; }

        //Class members
        [JsonIgnore] public double TopSWdeficit { get; set; }
        [JsonIgnore] public double TopSWC { get; set; }
        [JsonIgnore] public double DaysSinceIrrigation { get; set; }
        [JsonIgnore] public double AmountToApply { get; set; }
        [JsonIgnore] public double SeasonAppliedAmount { get; set; }
        
        private bool IrrigationIsAllowed { get; set; }
        private bool SeasonIsOpen { get; set; }
        private bool CropIsActive { get; set; }
        private bool IrrigatorIsAvailable { get; set; }
        private bool SoilIsDry { get; set; }

    
        //Calculate static soil variables
        [EventSubscribe("StartOfSimulation")]
        private void OnStartOfSimulation(object sender, EventArgs e)
        {   
            //Set the season dates
            StartDate = DateTime.Parse(seasonStart + "-" + Clock.Today.Year.ToString());
            EndDate = DateTime.Parse(seasonEnd + "-" + Clock.Today.Year.ToString());
            
            //Can we irrigate at all?
            IrrigationIsAllowed = false; 
            if (allowIrrigation)
                IrrigationIsAllowed = true; 

            //Calculate soil water variables
            double depthFromSurface = 0.0;
            double fracLayer = 0.0;
            nLayers = soilPhysical.Thickness.Length;
            for (int layer = 0; layer < nLayers; layer++)
            {
                fracLayer = Math.Min(1.0, (depthPAWC - depthFromSurface) / soilPhysical.Thickness[layer]);
                TopLL += soilPhysical.LL15mm[layer] * fracLayer;
                TopDUL += soilPhysical.DULmm[layer] * fracLayer;
                depthFromSurface += soilPhysical.Thickness[layer];
                if (depthFromSurface >= depthPAWC)
                    layer = nLayers;
            }
        }
             
        //Determine daily requirement for irrigation
        [EventSubscribe("StartOfDay")]
        private void OnStartOfDay(object sender, EventArgs e)
        {
            //Can we irrigate today?          
            SeasonIsOpen = isBetween(Clock.Today, StartDate, EndDate);
            if (!SeasonIsOpen)
                SeasonAppliedAmount = 0;

            //Is there a crop in the ground that needs irrigation?
            CropIsActive = false;
            if ((existingCrop != null) && (existingCrop.IsAlive))
                CropIsActive = true;
            //if ((existingCrop.Phenology.Stage >= 3.0) && (existingCrop.Phenology.Stage < 6.0))
          
            //Is the irrigator available?
            IrrigatorIsAvailable = false;
            DaysSinceIrrigation += 1;
            if (DaysSinceIrrigation >= returndays)
                IrrigatorIsAvailable = true;
          
            //Is the soil dry enough to require irrigation?
            SoilIsDry = false;
            double depthFromSurface = 0.0;
            double fracLayer = 0.0;
            TopSWC = 0.0;
            for (int layer = 0; layer < nLayers; layer++)
            //for (int layer = 0; depthFromSurface < depthPAWC + soilPhysical.Thickness[layer]; layer++)
            {
                fracLayer = Math.Min(1.0, (depthPAWC - depthFromSurface) / soilPhysical.Thickness[layer]);
                TopSWC += waterBalance.SWmm[layer] * fracLayer;
                depthFromSurface += soilPhysical.Thickness[layer];
                if (depthFromSurface >= depthPAWC)
                    layer = nLayers;
            }
            
            TopSWdeficit = TopSWC - TopDUL;
            if (Math.Max(0.0, -TopSWdeficit) >= (TopDUL - TopLL) * (100 - triggerDeficit) / 100)
                SoilIsDry = true;
                
            //Are all the conditions ratifying irrigation
            if (IrrigationIsAllowed && SeasonIsOpen && CropIsActive && IrrigatorIsAvailable && SoilIsDry)
            {
                //Lets bloody well irrigate then!!!!
                AmountToApply = TopDUL * targetDeficit / 100 - TopSWC;
                AmountToApply = Math.Max(0.0, Math.Min(AmountToApply, seasonsAllocation - SeasonAppliedAmount));
                AmountToApply = Math.Min(AmountToApply,maximumAmount);
                Irrigation.Apply(AmountToApply);
                DaysSinceIrrigation = 0;
                SeasonAppliedAmount += AmountToApply;
            }
        }
        
        ///Checks whether theDate is between iniDate and endDate (non-year specific)
        private bool isBetween(DateTime theDay, DateTime iniDate, DateTime endDate)
        {
            bool result = false;
            if (iniDate.DayOfYear < endDate.DayOfYear)
            {
                // period is within one year, ex: summer in the northern hemisphere
                if ((theDay.DayOfYear >= iniDate.DayOfYear) && (theDay.DayOfYear <= endDate.DayOfYear))
                    result = true;
            }
            else
            {
                // period goes over the end of the year, ex: summer in the southern hemisphere
                if ((theDay.DayOfYear >= iniDate.DayOfYear) || (theDay.DayOfYear <= endDate.DayOfYear))
                    result = true;
            }
            
            return result;
        }
    }
}
```
              Manager Defoliate
                Message =
```csharp
using Models.Soils.Nutrients;
using System;
using Models.Core;
using System.Collections.Generic;
using System.Text;
using Models;
using Models.Soils;
using Models.Soils.Nutrients;
using Models.PMF;
using System.Xml.Serialization;
using APSIM.Shared.Utilities;

namespace Models
{
    [Serializable]
    public class Script : Model
    {
        [Description("This script is set in 'Factors':")]
        public string Message { get; set; }
    }
}
```
            MicroClimate: a_interception=0; b_interception=1; c_interception=0; d_interception=0; SoilHeatFluxFraction=0.4; MinimumHeightDiffForNewLayer=0; NightInterceptionFraction=0.5; ReferenceHeight=2
            Irrigation
            Fertiliser
            SurfaceOrganicMatter: InitialResidueName=grass; InitialResidueType=grass; InitialResidueMass=500; InitialStandingFraction=0; InitialCPR=0; InitialCNR=40
            Soil HorotiuSoil: same as Validation.New Zealand.FRNLRuakura.FRNLRuakura.Field.HorotiuSoil
            Plant Plantain
            Report: EventNames=[Clock].DoReport
    Folder USA
      Experiment RELARC_01
        Memo
          ###RELARC 01###

          This simulation was adapted from a defoliation trial conducted in 1998-1999, at Russell E. Larson Agricultural Research Center, Pennsylvania, USA.  The trial consisted of small plots where two plantain cultivars ('*Lancelot*' and '*Tonic*') were sown separately in May-1997 (at 11.0 kg seed/ha).  Population decreased markedly after the 1998/99 winter and plantain plots were no longer used. Plots were fertilized with 27 kgP and 72 kgK/ha in October 1997. Fertilizer N was applied at 56 kg/ha in June and July of 1998.  Treatments were replicated five times and the soil at the site was a Hagerstown silt loam (fine, mixed, semiactive mesic Typic Hapludalfs).
          Each plot was divided in two, one-half was harvested every 3 wk and the other half every 5 wk. Each strip was cut to a 7-cm height with a rotary mower.  Dates for each cut were given, but only annual and treatment yields are reported;  population numbers were provided for few specific dates.  Yield for each harvest were arbitrarily inferred, therefore they should be seen as rough indication only.
          Met file was built using data obtained from NOAA website.  The data set was largely complete except for solar radiation, which was added from an alternative interpolated set for this location, also from NOAA.
          Information to assemble the soil data was obtained from USGS.

          References:
          Sanderson, M.A.; Labreveux, M.; Hall, M.H.; Elwinger, G.F. 2003. Forage yield and persistence of chicory and english plantain. Crop Science, 43: 995-1000.
        Factors
          Permutation
            Factor Cultivar: Specification=[Sowing]
              Operations Lancelot
                1997-05-16  [Plantain].Sow(population: 250, cultivar: "Lancelot", depth: 10, rowSpacing: 150)
              Operations Tonic
                1997-05-16  [Plantain].Sow(population: 250, cultivar: "Tonic", depth: 10, rowSpacing: 150)
            Factor CutFrequency: Specification=[Cuttings]
              Operations 3wks
                1998-05-19  [Defoliate].Script.Defoliate(defoliationType: "Cut", amountDM: 40, amountType: "ResidualDM", duration: 1)
                1998-06-10  [Defoliate].Script.Defoliate(defoliationType: "Cut", amountDM: 50, amountType: "ResidualDM", duration: 1)
                1998-06-30  [Defoliate].Script.Defoliate(defoliationType: "Cut", amountDM: 50, amountType: "ResidualDM", duration: 1)
                1998-07-21  [Defoliate].Script.Defoliate(defoliationType: "Cut", amountDM: 50, amountType: "ResidualDM", duration: 1)
                1998-08-11  [Defoliate].Script.Defoliate(defoliationType: "Cut", amountDM: 50, amountType: "ResidualDM", duration: 1)
                1998-09-02  [Defoliate].Script.Defoliate(defoliationType: "Cut", amountDM: 50, amountType: "ResidualDM", duration: 1)
                1998-09-23  [Defoliate].Script.Defoliate(defoliationType: "Cut", amountDM: 50, amountType: "ResidualDM", duration: 1)
                1999-05-20  [Defoliate].Script.Defoliate(defoliationType: "Cut", amountDM: 50, amountType: "ResidualDM", duration: 1)
                1999-06-10  [Defoliate].Script.Defoliate(defoliationType: "Cut", amountDM: 50, amountType: "ResidualDM", duration: 1)
                1999-07-01  [Defoliate].Script.Defoliate(defoliationType: "Cut", amountDM: 50, amountType: "ResidualDM", duration: 1)
                1999-07-22  [Defoliate].Script.Defoliate(defoliationType: "Cut", amountDM: 50, amountType: "ResidualDM", duration: 1)
                1999-08-12  [Defoliate].Script.Defoliate(defoliationType: "Cut", amountDM: 50, amountType: "ResidualDM", duration: 1)
                1999-09-02  [Defoliate].Script.Defoliate(defoliationType: "Cut", amountDM: 50, amountType: "ResidualDM", duration: 1)
                1999-09-23  [Defoliate].Script.Defoliate(defoliationType: "Cut", amountDM: 50, amountType: "ResidualDM", duration: 1)
              Operations 5wks
                1998-05-19  [Defoliate].Script.Defoliate(defoliationType: "Cut", amountDM: 40, amountType: "ResidualDM", duration: 1)
                1998-06-24  [Defoliate].Script.Defoliate(defoliationType: "Cut", amountDM: 50, amountType: "ResidualDM", duration: 1)
                1998-07-29  [Defoliate].Script.Defoliate(defoliationType: "Cut", amountDM: 50, amountType: "ResidualDM", duration: 1)
                1998-09-02  [Defoliate].Script.Defoliate(defoliationType: "Cut", amountDM: 50, amountType: "ResidualDM", duration: 1)
                1998-10-07  [Defoliate].Script.Defoliate(defoliationType: "Cut", amountDM: 50, amountType: "ResidualDM", duration: 1)
                1999-05-20  [Defoliate].Script.Defoliate(defoliationType: "Cut", amountDM: 50, amountType: "ResidualDM", duration: 1)
                1999-06-24  [Defoliate].Script.Defoliate(defoliationType: "Cut", amountDM: 50, amountType: "ResidualDM", duration: 1)
                1999-07-29  [Defoliate].Script.Defoliate(defoliationType: "Cut", amountDM: 50, amountType: "ResidualDM", duration: 1)
                1999-09-02  [Defoliate].Script.Defoliate(defoliationType: "Cut", amountDM: 50, amountType: "ResidualDM", duration: 1)
                1999-10-07  [Defoliate].Script.Defoliate(defoliationType: "Cut", amountDM: 50, amountType: "ResidualDM", duration: 1)
        Simulation RELARC_01
          Clock: Start=1997-05-01; End=1998-12-31
          Weather: FileName=StateCollege.met
          Summary
          SoilArbitrator Soil Arbitrator
          Zone Field: Area=1; Slope=0; AspectAngle=0; Altitude=50
            Folder Management
              Manager ExtraVariables
```csharp
using Models.Soils;
using System;
using Models.Core;

namespace Models
{
    [Serializable] 
    public class Script : Model
    {
    }
}
```
              Operations Sowing
              Operations FertiliserSchedule
                1998-06-01  [Fertiliser].Apply(Amount: 56, Type: Fertiliser.Types.NH4NO3N, Depth: 10)
                1998-07-15  [Fertiliser].Apply(Amount: 56, Type: Fertiliser.Types.NH4NO3N, Depth: 10)
              Operations BaseCut
                1997-09-15  [Defoliate].Script.Defoliate(defoliationType: "Cut", amountDM: 50, amountType: "ResidualDM", duration: 1)
              Operations Cuttings
              Manager Defoliate: same as Validation.New Zealand.FRNLLincoln.FRNLLincoln.Field.Management.Defoliate
            MicroClimate: a_interception=0; b_interception=1; c_interception=0; d_interception=0; SoilHeatFluxFraction=0.4; MinimumHeightDiffForNewLayer=0; NightInterceptionFraction=0.5; ReferenceHeight=2
            SurfaceOrganicMatter: InitialResidueName=grass; InitialResidueType=grass; InitialResidueMass=500; InitialStandingFraction=0; InitialCPR=0; InitialCNR=40
            Irrigation
            Fertiliser
            Soil HagerstownSoil: SoilType=Typic Hapludult (US); LocalName=Ramsey fine-loam; State=West Virginia; Country=USA; NaturalVegetation=Forest; Latitude=0; Longitude=0; DataSource=National Cooperative Soil Survey, US
              Comments=Generic soil description based on data of the same sol type from different locations
              Chemical: Thickness=[100, 120, 130, 200, 300, 300, 350]; PH=[6, 6, 6, 6, 6, 6, 6]; PHUnits=Water
              Physical
                Thickness  ParticleSizeClay  ParticleSizeSand  ParticleSizeSilt  BD    AirDry  LL15   DUL    SAT    KS
                100        21.7              11.4              66.9              1.3   0.048   0.12   0.277  0.465  1200
                120        22.4              10.9              66.7              1.38  0.085   0.094  0.264  0.421  420
                130        23.8              11.9              64.3              1.37  0.079   0.079  0.238  0.381  275
                200        25.5              13.7              60.8              1.41  0.05    0.094  0.222  0.381  200
                300        43.3              11.1              45.6              1.47  0.05    0.141  0.255  0.338  80
                300        51.4              8.7               39.9              1.48  0.155   0.155  0.28   0.359  40
                350        48                9.3               42.7              1.52  0.166   0.166  0.296  0.409  80
                SoilCrop PlantainSoil: LL=[0.12, 0.09, 0.08, 0.09, 0.14, 0.16, 0.17]; KL=[0.1, 0.09, 0.08, 0.05, 0.03, 0.02, 0.02]; XF=[1, 1, 1, 1, 1, 1, 1]
              WaterBalance SoilWater: SummerDate=21-Mar; SummerU=6; SummerCona=3.5; WinterDate=23-Sep; WinterU=6; WinterCona=2.5; DiffusConst=88; DiffusSlope=35; Salb=0.13; CN2Bare=73; CNRed=20; CNCov=0.8
              Organic: FOMCNRatio=40; CarbonUnits=Total
                Thickness  Carbon  SoilCNRatio  FBiom  FInert  FOM
                100        3.26    11           0.05   0.4     311.903
                120        1.17    11           0.03   0.6     245.352
                130        0.39    11           0.02   0.75    189.179
                200        0.4     11           0.015  0.875   126.81
                300        0.25    11           0.01   0.95    69.595
                300        0.2     11           0.01   0.99    38.1945
                350        0.15    11           0.01   0.99    18.9668
              Water: Thickness=[100, 120, 130, 200, 300, 300, 350]; InitialValues=[0.26915, 0.2555, 0.23005, 0.2156, 0.2493, 0.27375, 0.2895]; FilledFromTop=false
              CERESSoilTemperature Temperature
              Nutrient
              Solute NO3: Thickness=[100, 120, 130, 200, 300, 300, 350]; InitialValuesUnits=ppm; WaterTableConcentration=0; D0=0
                InitialValues=[15.3846, 9.05797, 2.17344, 2.17344, 0.352858, 0.352858, 0.352858]
              Solute NH4: Thickness=[100, 120, 130, 200, 300, 300, 350]; InitialValuesUnits=ppm; WaterTableConcentration=0; D0=0
                InitialValues=[1.53846, 1.20773, 0.217344, 0.217344, 0.0352858, 0.0352858, 0.0352858]
              Solute Urea: Thickness=[100, 120, 130, 200, 300, 300, 350]; InitialValues=[0, 0, 0, 0, 0, 0, 0]; InitialValuesUnits=kg/ha; WaterTableConcentration=0; D0=0
            Plant Plantain
            Report: EventNames=[Clock].DoReport
      Experiment RELARC_02
        Memo
          ###RELARC 02###

          This simulation was adapted from a defoliation trial conducted in 2000-2001, at Russell E. Larson Agricultural Research Center, Pennsylvania, USA.  The trial was established in small plots, replicated five times, with plantain sown in April-1999 (Cultivars '*Lancelot*' and '*Tonic*'.  Only data from the first year is used as the population declined markedly in the second winter.  All plots received 4.5 t/ha of limestone and were fertilized with 56 kg N/ha in April, June and July of 2000.  The soil at the site was a Hagerstown silt loam (fine, mixed, semiactive mesic Typic Hapludalfs).
          Each plot was mechanically mowed to height of 7cm every 4 weeks.  Only annual and treatment yields are reported, however population was given for specific dates.  Dates for each harvest were reported.  From these data, yield was arbitrarily inferred for each harvest, therefore they should be seen as rough approximation only (N variation between cultivars were considered here).
          Met file was built using data obtained from NOAA website.  The data set was largely complete except for solar radiation, which was added from an alternative interpolated set for this location, also from NOAA.
          Information to assemble the soil data was obtained from USGS.

          References:
          Sanderson, M.A.; Labreveux, M.; Hall, M.H.; Elwinger, G.F. 2003. Forage yield and persistence of chicory and english plantain. Crop Science, 43: 995-1000.
        Factors
          Factor Cultivar: Specification=[Sowing]
            Operations Lancelot
              1999-04-28  [Plantain].Sow(population: 300, cultivar: "Lancelot", depth: 10, rowSpacing: 150)
            Operations Tonic
              1999-04-28  [Plantain].Sow(population: 300, cultivar: "Tonic", depth: 10, rowSpacing: 150)
        Simulation RELARC_02
          Clock: Start=1999-04-01; End=2000-12-31
          Weather: FileName=StateCollege.met
          Summary
          SoilArbitrator Soil Arbitrator
          Zone Field: Area=1; Slope=0; AspectAngle=0; Altitude=50
            Folder Management
              Manager ExtraVariables
```csharp
using Newtonsoft.Json;
using Models.PMF.Organs;
using Models.Interfaces;
using System;
using Models.Core;
using System.Collections.Generic;
using System.Text;
using Models.Soils;
using Models.Soils.Nutrients;
using Models.PMF;
using Models;
using System.Xml.Serialization;
using APSIM.Shared.Utilities;
using Models.Climate;

namespace Models
{
    [Serializable] 
    public class Script : Model
    {
        [Link] private Clock Clock;
        [Link] private Weather Met;
        [Link] private Fertiliser Fert;
        [Link] private Irrigation Irrig;
        [Link] private Plant Plantain;
        [Link] private Zone zone;
        [Link(ByName = true)]
        private ISolute Urea;
        [Link(ByName = true)]
        private ISolute NO3;
        [Link(ByName = true)]
        private ISolute NH4;
        [Link(ByName = true)]
        private SoilNitrogen SoilNitrogen;
        [Link] private Soils.Soil Soil;
        [Link] private Models.Surface.SurfaceOrganicMatter SOM;
        [Link] private Nutrient Nutrient;
        [Link(Type = LinkType.Path, Path = "[Plantain].Root")]
        private Root root;
        [Link]
        private IPhysical soilPhysical;
        [Link]
        private ISoilWater waterBalance;
                    
        [JsonIgnore] public bool InitialDay { get; set; }
        
        [JsonIgnore] public double AccumPlantN { get; set; }
        [JsonIgnore] public double AccumMineralisation { get; set; }
        [JsonIgnore] public double AccumDenit { get; set; }
        [JsonIgnore] public double AccumFert { get; set; }
        [JsonIgnore] public double AccumLeach { get; set; }
        [JsonIgnore] public double AccumDetach { get; set; }
        [JsonIgnore] public double DeltaSoilOMN { get; set; }
        [JsonIgnore] public double DeltaSurfaceOMN { get; set; }
        [JsonIgnore] public double DeltaSoilMineralN { get; set; }
        [JsonIgnore] public double SoilNitrogenContent { get; set; }
        
        [JsonIgnore] public double AccumEO { get; set; }
        [JsonIgnore] public double AccumEP { get; set; }
        [JsonIgnore] public double AccumES { get; set; }
        [JsonIgnore] public double AccumDrainage { get; set; }
        [JsonIgnore] public double AccumRunoff { get; set; }
        [JsonIgnore] public double AccumOutflowLat { get; set; }
        [JsonIgnore] public double AccumIrrigation { get; set; }
        [JsonIgnore] public double AccumRainfall { get; set; }
        [JsonIgnore] public double SoilWaterDeficit { get; set; }
    
        [JsonIgnore] public double  InitialSoilOMN { get; set; }
        [JsonIgnore] public double  InitialSurfaceOMN { get; set; }
        [JsonIgnore] public double  InitialMineralN { get; set; }
        
        [JsonIgnore] public double SWC { get; set; }
        [JsonIgnore] public double DUL { get; set; }
        [JsonIgnore] public double OutFlowLat { get; set; }

        [JsonIgnore] public double FomN { get; set; }
        [JsonIgnore] public double BiomN { get; set; }
        [JsonIgnore] public double HumN { get; set; }
        [JsonIgnore] public double OrganicN { get; set; }
        [JsonIgnore] public double NO3N { get; set; }
        [JsonIgnore] public double NH4N { get; set; }
        [JsonIgnore] public double UreaN { get; set; }
        [JsonIgnore] public double MineralN { get; set; }
        [JsonIgnore] public double DltNMinRes { get; set; }
        [JsonIgnore] public double DltNMinTot { get; set; }
        
        [EventSubscribe("StartOfSimulation")]
        private void OnSimulationCommencing(object sender, EventArgs e)
        {
            InitialDay = true;
        }
        
        [EventSubscribe("DoManagement")]
        private void OnDoManagement(object sender, EventArgs e)
        {
            //!!!!!! Nitrogen balance components !!!!!!
            //!!!!!!^^^^^^^^^^^^^^^^^^^^^^^^^^^^^!!!!!!
            FomN = MathUtilities.Sum(Nutrient.FOM.N);
            HumN = MathUtilities.Sum(SoilNitrogen.HumicN);
            BiomN = MathUtilities.Sum(SoilNitrogen.MicrobialN);
            OrganicN = FomN + HumN + BiomN;
            NO3N = MathUtilities.Sum(NO3.kgha);
            NH4N = MathUtilities.Sum(NH4.kgha);
            UreaN = MathUtilities.Sum(Urea.kgha);
            MineralN = NO3N + NH4N + UreaN; 
            DltNMinRes = MathUtilities.Sum(SoilNitrogen.dlt_n_min_res);
            DltNMinTot = MathUtilities.Sum(Nutrient.MineralisedN);
            int layers = soilPhysical.Thickness.Length;
            if (InitialDay == true)
            {
                InitialSurfaceOMN = SOM.N;
                InitialSoilOMN = OrganicN;
                InitialMineralN = MineralN;
                InitialDay = false;
            }
            DeltaSurfaceOMN = SOM.N - InitialSurfaceOMN;
            AccumLeach = AccumLeach - waterBalance.LeachNH4 - waterBalance.LeachNO3 - waterBalance.LeachUrea; //Fails
            AccumMineralisation += MathUtilities.Sum(Nutrient.MineralisedN);
            AccumDenit -= MathUtilities.Sum(Nutrient.Natm);
            AccumPlantN -= (double)zone.Get("Plantain.Root.NUptake");
            DeltaSoilOMN = OrganicN - InitialSoilOMN;
            DeltaSoilMineralN = MineralN - InitialMineralN;
            SoilNitrogenContent = MineralN;
            
            //!!!!!! Water balance components !!!!!!
            //!!!!!!^^^^^^^^^^^^^^^^^^^^^^^^^^!!!!!!

            AccumRainfall += Met.Rain;
            //AccumEP -= (double)zone.Get("[Plantain].Leaf.Transpiration");
            AccumEP -= (double)zone.Get("Plantain.Root.WaterUptake");
            SoilWaterDeficit = (SWC - DUL);
            double OutFlowLat = MathUtilities.Sum(waterBalance.LateralOutflow);
            AccumOutflowLat -= OutFlowLat;
        }
        
        [EventSubscribe("DoManagementCalculations")]
        private void OnDoManagementCalculations(object sender, EventArgs e)
        {
            FomN = MathUtilities.Sum(Nutrient.FOM.N);
            HumN = MathUtilities.Sum(SoilNitrogen.HumicN);
            BiomN = MathUtilities.Sum(SoilNitrogen.MicrobialN);
            AccumFert += Fert.NitrogenApplied;
            AccumIrrigation += Irrig.IrrigationApplied;
            
            
            AccumEO -= waterBalance.Eo;
            AccumES -= waterBalance.Es; 
            AccumDrainage -= waterBalance.Drainage;
            AccumRunoff -= waterBalance.Runoff;
            SWC = MathUtilities.Sum(waterBalance.SWmm);
            DUL = MathUtilities.Sum(soilPhysical.DULmm);
        }
    }
}
```
              Operations Sowing
              Operations FertiliserSchedule
                2000-04-15  [Fertiliser].Apply(Amount: 56, Type: Fertiliser.Types.NH4NO3N, Depth: 10)
                2000-06-01  [Fertiliser].Apply(Amount: 56, Type: Fertiliser.Types.NH4NO3N, Depth: 10)
                2000-07-05  [Fertiliser].Apply(Amount: 56, Type: Fertiliser.Types.NH4NO3N, Depth: 10)
              Operations Cuttings
                1999-09-15  [Defoliate].Script.Defoliate(defoliationType: "Cut", amountDM: 50, amountType: "ResidualDM", duration: 1)
                2000-05-16  [Defoliate].Script.Defoliate(defoliationType: "Cut", amountDM: 50, amountType: "ResidualDM", duration: 1)
                2000-06-14  [Defoliate].Script.Defoliate(defoliationType: "Cut", amountDM: 50, amountType: "ResidualDM", duration: 1)
                2000-07-11  [Defoliate].Script.Defoliate(defoliationType: "Cut", amountDM: 50, amountType: "ResidualDM", duration: 1)
                2000-08-08  [Defoliate].Script.Defoliate(defoliationType: "Cut", amountDM: 60, amountType: "ResidualDM", duration: 1)
                2000-09-05  [Defoliate].Script.Defoliate(defoliationType: "Cut", amountDM: 60, amountType: "ResidualDM", duration: 1)
              Manager Defoliate: same as Validation.New Zealand.FRNLLincoln.FRNLLincoln.Field.Management.Defoliate
            MicroClimate: a_interception=0; b_interception=1; c_interception=0; d_interception=0; SoilHeatFluxFraction=0.4; MinimumHeightDiffForNewLayer=0; NightInterceptionFraction=0.5; ReferenceHeight=2
            SurfaceOrganicMatter: InitialResidueName=grass; InitialResidueType=grass; InitialResidueMass=500; InitialStandingFraction=0; InitialCPR=0; InitialCNR=40
            Irrigation
            Fertiliser
            Soil HagerstownSoil: same as Validation.USA.RELARC_01.RELARC_01.Field.HagerstownSoil
            Plant Plantain
            Report: EventNames=[Clock].DoReport
      Memo SubTitle
        ### All data from USA
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