Simulations: Version=129
  Memo TitlePage
    # The APSIM-PMF Red Clover Model

    _Rogerio Cichota, Plant and Food Research, New Zealand_

    ##Introduction

    Red clover (*Trifolium pratense*) is a herbaceous perennial herb in the Fabaceae family (former Leguminosae) native of Europe, west Asia, and north Africa ([HayThesis1985RedClover]; [FrameEtAll1998Book]; [BlackEtAl2009Clovers]).  It can now be be found in swards around the world in places with temperate and subtropical climates.  Although considered a perennial, red clover plants are typically short-lived in grazed conditions (2-4years).  The plant has deep taproots and long segmented semi-erect stems. From each stem segment tri-foliate leaves grow alternately and from their axils a flower stalk (peduncle) may grow, petioles are 1-4 cm long.  Roots are quite thick and can reach depths greater than 2.0 m.  The inflorescence is typically pink/red and grows from peduncles that are less than 1cm long.  As a legume, red clover can host N-fixing bacteria (*Rhizobium*) in a symbiotic relationship; from this, large quantities of N from the atmosphere can be incorporated to the soil ([HeichelEtAl1985]; [ChmelikovaEtAl2015]).  This is a major reason why red clover is sown alongside grasses in pastures, although red clover is also a valuable forage grown in monoculture, producing very high quality feed and is highly palatable to ruminants.

    **Objective:**  The model presented here was built using the Plant Modelling Framework (PMF) of [brown_plant_2014] to simulate the growth of red clover as forage crop.  The model current focus is on describing biomass accumulation and regrowth after harvest on monocultural swards. As a derivate of APSIM's PMF, it is readily possible to use the red clover model for mixed swards, but this has not been properly tested yet and should be done with caution.  The number of datasets available for the inital development of the model was quite limited, including data from only two environments and from experiments varying irrigation or fertiliser rates.  It is expected that more datasets will be added in the future to broaden the tests and support model improvements.
    The simulation of variations in N concentration over the growing season can also be considered as incipient and only reasonably good. The model should be updated and its performance revised in the future when more data becomes available.

    **Note:** The model structure and paramaters were developed based on findings and data collated from a literature review and supported by analyses of the datasets presented in the validation section. Thus, the data from these datasets were not explicitly separated for calibration and validation.  This was done firstly because calibration of any parameter against these data was minimal, and secondly because there was a limited amount of data and thus dividing them would be counter-productive.  This would limit even more the amount of data and increase uncertainties, the method used to separate the data could become more important to define the success of the model calibration or validation than the model itself(e.g. [SinclairAndSeligman2000_CropModeling]; [MouradEtAl2005_CalibValid]).
  Replacements
    Manager ExtraVariables
      InitialDay = False
      AccumPlantN = 0
      AccumMineralisation = 0
      AccumDenit = 0
      AccumFert = 0
      AccumFixed = 0
      AccumLeach = 0
      AccumDetach = 0
      DeltaSoilOMN = 0
      DeltaSurfaceOMN = 0
      DeltaSoilMineralN = 0
      SoilNitrogenContent = 0
      AccumEO = 0
      AccumEP = 0
      AccumES = 0
      AccumDrainage = 0
      AccumRunoff = 0
      AccumOutflowLat = 0
      AccumIrrigation = 0
      AccumRainfall = 0
      SoilWaterDeficit = 0
      InitialSoilOMN = 0
      InitialSurfaceOMN = 0
      InitialMineralN = 0
      SWC = 0
      DUL = 0
      OutFlowLat = 0
      FomN = 0
      BiomN = 0
      HumN = 0
      OrganicN = 0
      NO3N = 0
      NH4N = 0
      UreaN = 0
      MineralN = 0
      DltNMinRes = 0
      DltNMinTot = 0
      LeafFraction = 0
      StemFraction = 0
      PetioleFraction = 0
      InflorescenceFraction = 0
      ShootRootRatio = 0
      AccumHarvestedWt = 0
      AccumHarvestedN = 0
      HerbageNConc = 0
```csharp
using Models.Climate;
using APSIM.Shared.Utilities;
using System.Xml.Serialization;
using Models;
using Models.PMF;
using Models.Soils;
using System.Text;
using System.Collections.Generic;
using Models.Core;
using System;
using Models.Interfaces;
using Models.Soils.Nutrients;
using Models.PMF.Organs;

namespace Models
{
    [Serializable] 
    public class Script : Model
    {
        [Link] private Clock Clock;
        [Link] private Weather Met;
        [Link] private Fertiliser Fert;
        [Link] private Irrigation Irrig;
        [Link] private Plant RedClover;
        [Link] private Zone zone;
        [Link] private ISummary summary;
        private DateTime YearStartDate;
        private double yesterdayNconc;
        [Link(ByName = true)]
        private ISolute Urea;
        [Link(ByName = true)]
        private ISolute NO3;
        [Link(ByName = true)]
        private ISolute NH4;
        [Link(ByName = true)]
        private SoilNitrogen SoilNitrogen;
        [Link] private Soils.Soil Soil;
        [Link] private Models.Surface.SurfaceOrganicMatter SOM;
        [Link(Type = LinkType.Path, Path = "[RedClover].Root")]
        private Root root;
        [Link]
        private IPhysical soilPhysical;
        [Link]
        private ISoilWater waterBalance;
                    
        [XmlIgnore] public bool InitialDay { get; set; }
        
        [XmlIgnore] public double AccumPlantN { get; set; }
        [XmlIgnore] public double AccumMineralisation { get; set; }
        [XmlIgnore] public double AccumDenit { get; set; }
        [XmlIgnore] public double AccumFert { get; set; }
        [XmlIgnore] public double AccumFixed { get; set; }
        [XmlIgnore] public double AccumLeach { get; set; }
        [XmlIgnore] public double AccumDetach { get; set; }
        [XmlIgnore] public double DeltaSoilOMN { get; set; }
        [XmlIgnore] public double DeltaSurfaceOMN { get; set; }
        [XmlIgnore] public double DeltaSoilMineralN { get; set; }
        [XmlIgnore] public double SoilNitrogenContent { get; set; }
        
        [XmlIgnore] public double AccumEO { get; set; }
        [XmlIgnore] public double AccumEP { get; set; }
        [XmlIgnore] public double AccumES { get; set; }
        [XmlIgnore] public double AccumDrainage { get; set; }
        [XmlIgnore] public double AccumRunoff { get; set; }
        [XmlIgnore] public double AccumOutflowLat { get; set; }
        [XmlIgnore] public double AccumIrrigation { get; set; }
        [XmlIgnore] public double AccumRainfall { get; set; }
        [XmlIgnore] public double SoilWaterDeficit { get; set; }
    
        [XmlIgnore] public double  InitialSoilOMN { get; set; }
        [XmlIgnore] public double  InitialSurfaceOMN { get; set; }
        [XmlIgnore] public double  InitialMineralN { get; set; }
        
        [XmlIgnore] public double SWC { get; set; }
        [XmlIgnore] public double DUL { get; set; }
        [XmlIgnore] public double OutFlowLat { get; set; }

        [XmlIgnore] public double FomN { get; set; }
        [XmlIgnore] public double BiomN { get; set; }
        [XmlIgnore] public double HumN { get; set; }
        [XmlIgnore] public double OrganicN { get; set; }
        [XmlIgnore] public double NO3N { get; set; }
        [XmlIgnore] public double NH4N { get; set; }
        [XmlIgnore] public double UreaN { get; set; }
        [XmlIgnore] public double MineralN { get; set; }
        [XmlIgnore] public double DltNMinRes { get; set; }
        [XmlIgnore] public double DltNMinTot { get; set; }
        
        [XmlIgnore] public double LeafFraction { get; set; }
        [XmlIgnore] public double StemFraction { get; set; }
        [XmlIgnore] public double PetioleFraction { get; set; }
        [XmlIgnore] public double InflorescenceFraction { get; set; }

        [XmlIgnore] public double ShootRootRatio { get; set; }

        [XmlIgnore] public double AccumHarvestedWt { get; set; }
        [XmlIgnore] public double AccumHarvestedN { get; set; }
        [XmlIgnore] public double HerbageNConc { get; set; }


        [EventSubscribe("StartOfSimulation")]
        private void OnSimulationCommencing(object sender, EventArgs e)
        {
            InitialDay = true;
        }
        
        [EventSubscribe("StartOfDay")]
        private void OnStartOfDay(object sender, EventArgs e)
        {
            yesterdayNconc =  MathUtilities.Divide((double)zone.Get("RedClover.Leaf.N")+(double)zone.Get("RedClover.Petiole.N")+(double)zone.Get("RedClover.Stem.N"), (double)zone.Get("RedClover.Leaf.Wt")+(double)zone.Get("RedClover.Petiole.Wt")+(double)zone.Get("RedClover.Stem.Wt"), 0.0);
        }

        [EventSubscribe("DoManagement")]
        private void OnDoManagement(object sender, EventArgs e)
        {
            //!!!!!! Nitrogen balance components !!!!!!
            //!!!!!!^^^^^^^^^^^^^^^^^^^^^^^^^^^^^!!!!!!
            FomN = MathUtilities.Sum(SoilNitrogen.FOMN);
            HumN = MathUtilities.Sum(SoilNitrogen.HumicN);
            BiomN = MathUtilities.Sum(SoilNitrogen.MicrobialN);
            OrganicN = FomN + HumN + BiomN;
            NO3N = MathUtilities.Sum(NO3.kgha);
            NH4N = MathUtilities.Sum(NH4.kgha);
            UreaN = MathUtilities.Sum(Urea.kgha);
            MineralN = NO3N + NH4N + UreaN; 
            DltNMinRes = MathUtilities.Sum(SoilNitrogen.dlt_n_min_res);
            DltNMinTot = MathUtilities.Sum(SoilNitrogen.MineralisedN);
            int layers = soilPhysical.Thickness.Length;
            if (InitialDay == true)
            {
                InitialSurfaceOMN = SOM.N;
                InitialSoilOMN = OrganicN;
                InitialMineralN = MineralN;
                InitialDay = false;

                // check whether we're in the north or south hemisphere
                if (Met.Latitude >= 0.0)
                    YearStartDate = new DateTime(2000, 1, 1);
                else
                    YearStartDate = new DateTime(2000, 7, 1);
            }
            DeltaSurfaceOMN = SOM.N - InitialSurfaceOMN;
            AccumLeach = AccumLeach - waterBalance.LeachNH4 - waterBalance.LeachNO3 - waterBalance.LeachUrea; //Fails
            AccumMineralisation += MathUtilities.Sum(SoilNitrogen.MineralisedN);
            AccumDenit -= MathUtilities.Sum(SoilNitrogen.Denitrification);
            AccumPlantN -= (double)zone.Get("RedClover.Root.NUptake");
            DeltaSoilOMN = OrganicN - InitialSoilOMN;
            DeltaSoilMineralN = MineralN - InitialMineralN;
            SoilNitrogenContent = MineralN;

            //!!!!!! Water balance components !!!!!!
            //!!!!!!^^^^^^^^^^^^^^^^^^^^^^^^^^!!!!!!

            AccumRainfall += Met.Rain;
            //AccumEP -= (double)zone.Get("[RedClover].Leaf.Transpiration");
            AccumEP -= (double)zone.Get("RedClover.Root.WaterUptake");
            SoilWaterDeficit = (SWC - DUL);
            double OutFlowLat = MathUtilities.Sum(waterBalance.LateralOutflow);
            AccumOutflowLat -= OutFlowLat;
            
            //!!!!!! Stem and leaf fraction !!!!!!
            if ((double)zone.Get("RedClover.AboveGround.Wt") > 0.0)
            {
                LeafFraction = (double)zone.Get("RedClover.Leaf.Wt") / (double)zone.Get("RedClover.AboveGround.Wt");
                StemFraction = (double)zone.Get("RedClover.Stem.Wt") / (double)zone.Get("RedClover.AboveGround.Wt");
                PetioleFraction = (double)zone.Get("RedClover.Petiole.Wt") / (double)zone.Get("RedClover.AboveGround.Wt");
                InflorescenceFraction = (double)zone.Get("RedClover.Inflorescence.Wt") / (double)zone.Get("RedClover.AboveGround.Wt");
            }
            else
            {
                LeafFraction = 0.0;
                StemFraction = 0.0;
                PetioleFraction = 0.0;
            }
            
            //!!!!!! Plant DM components !!!!!!
            //!!!!!!^^^^^^^^^^^^^^^^^^^^^^^^^^!!!!!!
            ShootRootRatio = MathUtilities.Divide((double)zone.Get("RedClover.AboveGroundLive.Wt"), (double)zone.Get("RedClover.BelowGroundLive.Wt"), 0.0);
            HerbageNConc = yesterdayNconc;
        }
        
        [EventSubscribe("DoManagementCalculations")]
        private void OnDoManagementCalculations(object sender, EventArgs e)
        {
            FomN = MathUtilities.Sum(SoilNitrogen.FOMN);
            HumN = MathUtilities.Sum(SoilNitrogen.HumicN);
            BiomN = MathUtilities.Sum(SoilNitrogen.MicrobialN);
            AccumFert += Fert.NitrogenApplied;
            AccumIrrigation += Irrig.IrrigationApplied;
            
            
            AccumEO -= waterBalance.Eo;
            AccumES -= waterBalance.Es; 
            AccumDrainage -= waterBalance.Drainage;
            AccumRunoff -= waterBalance.Runoff;
            SWC = MathUtilities.Sum(waterBalance.SWmm);
            DUL = MathUtilities.Sum(soilPhysical.DULmm);

            //!!!!!! Plant Harvest !!!!!!
            if (Clock.Today.DayOfYear == YearStartDate.DayOfYear)
            {
                AccumHarvestedWt = (double)zone.Get("[DefoliationManager].Script.DefoliatedWt");
                AccumHarvestedN = (double)zone.Get("[DefoliationManager].Script.DefoliatedN");
                AccumFixed = (double)zone.Get("[RedClover].Nodule.NFixed");
            }
            else
            {
                AccumHarvestedWt += (double)zone.Get("[DefoliationManager].Script.DefoliatedWt");
                AccumHarvestedN += (double)zone.Get("[DefoliationManager].Script.DefoliatedN");
                AccumFixed += (double)zone.Get("[RedClover].Nodule.NFixed");
            }
        }
    }
}
```
    Manager DefoliationManager
      AutomaticManagementIsEnabled = False
      DefoliationRotationStartDate = 2000-01-15
      DefoliationRotationEndDate = 2100-12-31
      DefoliateType = Graze
      DefoliationTriggerType = FixedInterval
      IntervalBetweenDefoliations = 21
      TargetStandingBiomass = 200
      DurationOfEachDefoliation = 1
      RemoveAmountType = DMToRemove
      AmountForEachDefoliation = 500
      RemoveAllBiomassIsEnabled = True
      DMRemoveType = UserDefinedFraction
      FractionDMToRemove = 1
      NRemoveType = UserDefinedFraction
      FractionNToRemove = 1
      ReturnType = AsResidue
      NDungType = DefineCNratio
      ProportionN2Dung = 0.4
      CNRatioDung = 20
      UrineDepth = 250
```csharp
// Performs defoliations, or removes biomass, from any existing plant (PMF and/or AgPasture) based on a set of given rules.  
// Defoliations can be triggered automatically by this manager or be called from another Script or a Schedule model.
// Developed by RCichota, last updated in 31/Mar/2019

namespace Models
{
using Models.Soils.Nutrients;
using System;
using System.Xml.Serialization;
using System.Collections.Generic;
using APSIM.Shared.Utilities;
using Models.Core;
using Models.Soils;
using Models.PMF;
using Models.Interfaces;
using Models.PMF.Interfaces;
using System.Linq;

    [Serializable]
    public class Script : Model
    {
        [Link] private Clock clock;
        [Link] private Zone myZone;
        [Link] private Soil mySoil;
        [Link(ByName = true)] private ISolute Urea;
        [Link] private ISummary mySummary;
        public  event BiomassRemovedDelegate BiomassRemoved;
        private string baseDefoliationType;
        private string typeOfDefoliation;
        private string baseAmountType;
        private string typeOfAmount;
        private double amountGiven;
        private double herbageToRemove;
        private RemovalFractions defoliationFractions;
        private int durationOfDefoliation;
        private int daysDefoliating;
        private double cumAmountHarvested;
        private double atZ0;
        private double atZ1;
        private double fractionToRemove;
        private double fractionToResidue;
        private double speciesHarvestedWt;
        private double speciesHarvestedN;
        private double speciesFractionToRemove;
        [Link]
        private IPhysical soilPhysical;
        //> Links to other Apsim models
        //Auxiliary 'links'
        private List<Plant> PMFSpecies = new List<Plant>();
        private List<AgPasture.PastureSpecies> AgPSpecies = new List<AgPasture.PastureSpecies>();

        //> Events raised by this manager

        //> User inputs from properties tab
        [Separator("Generic defoliation management - removes biomass from PMF and AgPasture species, plus residue management")]
        [Description("Allow this manager to control defoliations? ")]
        public bool AutomaticManagementIsEnabled { get; set; }
        [Description("Date to start the defoliation management (dd/mm/yyyy): ")]
        public DateTime DefoliationRotationStartDate { get; set; }
        [Description("Date to end the defoliation management (dd/mm/yyyy): ")]
        public DateTime DefoliationRotationEndDate { get; set; }

        [Separator("Parameters defining how the defoliation is managed")]
        [Description("What type of defoliation should be triggered? ")]
        public DefoliationTypes DefoliateType { get; set; }
        [Description("How the defoliations should be triggered? ")]
        public DefoliationTriggerTypes DefoliationTriggerType { get; set; }
        [Description("  Minimum number of days between defoliations, used if trigger is an interval: ")]
        public int IntervalBetweenDefoliations { get; set; }
        [Description("  Minimum standing biomass to start defoliations, used if trigger is DM target(g/m2): ")]
        public int TargetStandingBiomass { get; set; }
        [Description("Duration of each defoliation event (days): ")]
        public int DurationOfEachDefoliation { get; set; }
        [Description("Which amount is being defined? ")]
        public DefoliateAmountTypes RemoveAmountType { get; set; }
        [Description("DM amount to use (g/m2): ")]
        public double AmountForEachDefoliation { get; set; }
        [Description("For PMF species, allow all biomass to be removed? ")]
        public bool RemoveAllBiomassIsEnabled { get; set; }

        [Separator("Parameters defining the management of the defoliated biomass")]
        [Description("How much of the DM defoliated is to be removed from the field? ")]
        public DMRemovalTypes DMRemoveType { get; set; }
        [Description("  Fraction of DM to remove off field, if using UserDefinedFraction (0-1): ")]
        public double FractionDMToRemove { get; set; }
        [Description("How much of the N defoliated is to be removed from the field? ")]
        public NRemovalTypes NRemoveType { get; set; }
        [Description("  Fraction of N to remove off field, if using UserDefinedFraction (0-1): ")]
        public double FractionNToRemove { get; set; }
        [Description("How the non-removed material is returned to the field? ")]
        public ReturnAsTypes ReturnType { get; set; }

        [Separator("Parameters for partitioning non-removed N into urine and dung")]
        [Description("How the partition of N to dung and urine is defined? ")]
        public DungNContentTypes NDungType { get; set; }
        [Description("  Proportion of N returned in dung, if using DefineProportion (0-1): ")]
        public double ProportionN2Dung { get; set; }
        [Description("  The C:N of dung, if using DefineCNratio (typically around 20): ")]
        public double CNRatioDung { get; set; }
        [Description("Soil depth down to which urine should be applied (mm): ")]
        public double UrineDepth { get; set; }

        //> Outputs from this manager
        [XmlIgnore][Units("g/m2")] // Pasture DM defoliated (removed from plants) today
        public double DefoliatedWt{ get; set; }
        [XmlIgnore][Units("g/m2")] // N in the pasture material defoliated today
        public double DefoliatedN{ get; set; }
        [XmlIgnore][Units("g/m2")] // Pasture DM harvested (removed from plants minus direct residue) today
        public double HarvestedWt{ get; set; }
        [XmlIgnore][Units("g/m2")] // N in the pasture material harvested today
        public double HarvestedN{ get; set; }
        [XmlIgnore][Units("g/m2")] // Pasture DM actually removed from the field
        public double RemovedWt{ get; set; }
        [XmlIgnore][Units("g/m2")] // N in the pasture material removed from the field
        public double RemovedN{ get; set; }
        [XmlIgnore][Units("g/m2")] // Pasture DM returned by this manager to the field
        public double ReturnedWt{ get; set; }
        [XmlIgnore][Units("g/m2")] // N in the pasture material returned by this manager to the field
        public double ReturnedN{ get; set; }
        [XmlIgnore][Units("g/m2")] // Non-removed N returned as dung (to SurfaceOM)
        public double NReturnedInDung{ get; set; }
        [XmlIgnore][Units("g/m2")] // Non-removed N returned as urine (soil urea)
        public double NReturnedInUrine{ get; set; }
        [XmlIgnore][Units("days")] // Number of days since the end of last defoliation event
        public int DaysSinceLastDefoliation{ get; set; }
        [XmlIgnore][Units("g/m2")] // Total standing aboveground DM before a defoliation
        public double PreHarvestDM{ get; set; }
        [XmlIgnore][Units("g/m2")] // Total standing aboveground DM after a defoliation
        public double PostHarvestDM{ get; set; }
        [XmlIgnore][Units("g/m2")] // Total pasture DM harvested over a complete defoliation event
        public double RotationHarvestedDM{ get; set; }

        //> Internal variables
        private double[] urineFraction;                  // fraction of urine to be applied in each soil layer
        // auxiliary boolean
        private bool aDefoliationHasHappened = false; // flag whether a defoliation has happened in this simulation run

        // auxiliary - lists of species and removal fractions
        private string[] swardSpeciesName;              // name of each species in the sward
        private string[] swardSpeciesType;              // type of each species in the sward (PMF or AgPasture)
        private double[] speciesFraction;              // biomass fraction of harvestable material of each species

        [EventSubscribe("StartOfSimulation")]
        private void OnSimulationCommencing(object sender, EventArgs e)
        {
            // check the type of defoliation given
            if (DefoliateType == DefoliationTypes.Cut)
                baseDefoliationType = "Cut";
            else if (DefoliateType == DefoliationTypes.Graze)
                baseDefoliationType = "Graze";
            else
                baseDefoliationType = "Harvest";

            // check the type of amount given
            if (RemoveAmountType == DefoliateAmountTypes.DMToRemove)
                baseAmountType = "DMToRemove";
            else if (RemoveAmountType == DefoliateAmountTypes.ResidualDM)
                baseAmountType = "ResidualDM";
            else
                baseAmountType = "UseDefoliationFractions";

            // check the interval between events
            if (IntervalBetweenDefoliations < 1)
                throw new Exception("The interval between defoliation events must be at least one day");

            // check the duration for each defoliation
            if(DurationOfEachDefoliation <= 0)
                throw new Exception("The duration of defoliations cannot be zero or negative!");

            // check the fraction of defoliated material to remove from the field
            if (DMRemoveType == DMRemovalTypes.RemoveAll)
                FractionDMToRemove = 1.0;
            else if (DMRemoveType == DMRemovalTypes.RemoveNone)
                FractionDMToRemove = 0.0;
            else if (DMRemoveType == DMRemovalTypes.BasedOnDigestibility)
                FractionDMToRemove = -1.0;  // will be calculated dynamically
            else // DMRemoveType == DMRemovalTypes.UserDefinedFraction
            {
                if (FractionDMToRemove < 0.0)
                    throw new Exception("The fraction of DM defoliated to remove from the field cannot be negative!");
            }

            // check the fraction of defoliated N to remove from the field
            if (NRemoveType == NRemovalTypes.RemoveAll)
                FractionNToRemove = 1.0;
            else if (NRemoveType == NRemovalTypes.RemoveNone)
                FractionNToRemove = 0.0;
            else if (NRemoveType == NRemovalTypes.ProportionalToDM)
                FractionNToRemove = FractionDMToRemove;
            else // NRemoveType == NRemovalTypes.UserDefinedFraction
            {
                if (FractionNToRemove < 0.0)
                    throw new Exception("The fraction of defoliated N to remove from the field cannot be negative!");
            }

            // set up the links to all plant species
            foreach (Plant species in myZone.FindAllChildren<Plant>().OfType<IModel>().ToList())
                PMFSpecies.Add(species);
            foreach (AgPasture.PastureSpecies species in myZone.FindAllChildren<AgPasture.PastureSpecies>().OfType<IModel>().ToList())
                AgPSpecies.Add(species);

            int numPlants = PMFSpecies.Count + AgPSpecies.Count;
            swardSpeciesName = new string[numPlants];
            swardSpeciesType = new string[numPlants];
            int i = 0;
            foreach (Plant species in myZone.FindAllChildren<Plant>().OfType<IModel>().ToList())
            {
                swardSpeciesName[i] = species.Name;
                swardSpeciesType[i] = "PMF";
                i += 1;
            }
            foreach (AgPasture.PastureSpecies species in myZone.FindAllChildren<AgPasture.PastureSpecies>().OfType<IModel>().ToList())
            {
                swardSpeciesName[i] = species.Name;
                swardSpeciesType[i] = "AgPasture";
                i += 1;
            }

            // make sure that management starts when RotationStartDate < simulationStartDay
            if ((clock.Today > DefoliationRotationStartDate) && (clock.Today < DefoliationRotationEndDate))
                DefoliationRotationStartDate = clock.Today;

            // initialise some variables
            speciesFraction = new double[numPlants];
            defoliationFractions = new RemovalFractions();
            DaysSinceLastDefoliation = 0;
            durationOfDefoliation = -1;
            daysDefoliating = 0;
            resetMyOutputs();

            // set the fraction of urine for each layer
            if (ReturnType == ReturnAsTypes.AsDungUrine)
            {
                double depthFromSurface = 0.0;
                for (int layer = 0; layer < soilPhysical.Thickness.Length; layer++)
                {
                    depthFromSurface += soilPhysical.Thickness[layer];
                    if (depthFromSurface >= UrineDepth)
                    { // bottom layer found
                        urineFraction = new double[layer + 1];
                        double distFactor = 1.5;
                        double totalProp = UrineDepth * Math.Pow(1.0, distFactor) / (distFactor + 1.0);
                        depthFromSurface = 0.0;
                        atZ1 = (UrineDepth - depthFromSurface) * Math.Pow(1.0 - depthFromSurface / UrineDepth, distFactor) / (distFactor + 1.0);
                        for (int z = 0; z < layer+1; z++)
                        {
                            atZ0 = atZ1;
                            depthFromSurface += soilPhysical.Thickness[z];
                            atZ1 = (UrineDepth - depthFromSurface) * Math.Pow(1.0 - depthFromSurface / UrineDepth, distFactor) / (distFactor + 1);
                            if (1.0 - (depthFromSurface / UrineDepth) < 0.0)
                                atZ1 = 0;
                            urineFraction[z] = (atZ0 - atZ1) / totalProp;
                        }
                        layer = soilPhysical.Thickness.Length;
                    }
                }
            }

            // write message in summary
            mySummary.WriteMessage(this," Automatic defoliation manager initialised");
            if (AutomaticManagementIsEnabled)
            {
                mySummary.WriteMessage(this, "   Defoliations will happen between " + DefoliationRotationStartDate.ToShortDateString()
                                          + " and " + DefoliationRotationEndDate.ToShortDateString() + ".");
                mySummary.WriteMessage(this, "   Biomass from the sward will be defoliated simulating a \"" + baseDefoliationType + "\" rotation.");
                if (DefoliationTriggerType == DefoliationTriggerTypes.TargetStandingBiomass)
                    mySummary.WriteMessage(this, "   Events will happen whenever aboveground biomass surpasses " + TargetStandingBiomass.ToString("#0.0") + " g/m2.");
                else
                    mySummary.WriteMessage(this, "   Events will happen every " + IntervalBetweenDefoliations + " days, if there is enough biomass.");
                if(baseAmountType == "ResidualDM")
                    mySummary.WriteMessage(this, "   Removing biomass down to a residual amount of " + AmountForEachDefoliation.ToString("#.0") + " g/m2 over " 
                                             + DurationOfEachDefoliation + " days.");
                else
                    mySummary.WriteMessage(this, "   Removing " + AmountForEachDefoliation.ToString("#.0") + " g/m2 of biomass per day over " 
                                             + DurationOfEachDefoliation + " days.");
            }
            else
            {
                mySummary.WriteMessage(this,"   Automatic defoliations are currently disabled, though defoliations can be triggered by another manager");
                mySummary.WriteMessage(this,"   If called, the manager will remove biomass from the sward simulating a \"" + baseDefoliationType + "\" event.");
            }

            if(ReturnType == ReturnAsTypes.AsDungUrine)
            {
                mySummary.WriteMessage(this,"   Non-removed material will be returned as dung and urine. Urine added to soil according to proportions: "
                + string.Join(", ",urineFraction));
            }
            else
                mySummary.WriteMessage(this,"   Non-removed material will be returned as residue.");
        }

        [EventSubscribe("DoManagement")]
        private void OnDoManagement(object sender, EventArgs e)
        {
            // check whether we need to continue defoliationg, i.e. within a multi-day defoliation event (need to check this first in the day)
            if ((daysDefoliating > 0) && (daysDefoliating < durationOfDefoliation))
            {
                // reset outputs
                resetMyOutputs();

                // re-check the amount to defoliate
                double harvestableBiomass = harvestableSwardBiomass("All", "Harvestable");
                if (typeOfAmount == "DMToRemove")
                {
                    if(harvestableBiomass > 0.001)
                        herbageToRemove = Math.Min(harvestableBiomass, (amountGiven - cumAmountHarvested) / (durationOfDefoliation - daysDefoliating));
                }
                else if (typeOfAmount == "ResidualDM")
                {
                    double currentDM = standingSwardBiomassWt;
                    if (currentDM > amountGiven)
                        herbageToRemove = Math.Min(harvestableBiomass, (currentDM - amountGiven) / (durationOfDefoliation - daysDefoliating));
                }

                // remove plant biomass and return residue
                if (Math.Abs(herbageToRemove) >= 0.001)
                {
                    // set biomass removal
mySummary.WriteMessage(this, "   Defoliation initialised on DoManagement - " + clock.Today.Date.ToShortDateString());
                    defoliateSward(herbageToRemove, typeOfDefoliation);

                    // return residue or excreta
                    if(ReturnedWt + ReturnedN > 0.0)
                    {
                        if (ReturnType == ReturnAsTypes.AsResidue)
                            returnResidues();
                        else
                            returnExcreta();
                    }

                    // gather amount removed this event
                    cumAmountHarvested += HarvestedWt;
                }

                daysDefoliating += 1;
            }

            // check whether a defoliation ended yesterday
            if (daysDefoliating < 0)
            { // clean up variables
                resetMyOutputs();
                daysDefoliating = 0;
            }

            // check whether automatic defoliations are enabled
            if (AutomaticManagementIsEnabled)
            {
                // check whether we are within the period in which defoliations can happen
                if ((clock.Today.Date >= DefoliationRotationStartDate.Date) && (clock.Today.Date <= DefoliationRotationEndDate.Date))
                {
                    if (clock.Today.Date == DefoliationRotationStartDate.Date)
                        DaysSinceLastDefoliation = IntervalBetweenDefoliations;

                    // check whether we should start a defoliation event
                    if (DefoliationTriggerType == DefoliationTriggerTypes.FixedInterval)
                    {
                        if (DaysSinceLastDefoliation == IntervalBetweenDefoliations)
                            Defoliate(baseDefoliationType, AmountForEachDefoliation, baseAmountType, DurationOfEachDefoliation);
                    }
                    else if (DefoliationTriggerType == DefoliationTriggerTypes.TargetInterval)
                    {
                        if (DaysSinceLastDefoliation >= IntervalBetweenDefoliations)
                            Defoliate(baseDefoliationType, AmountForEachDefoliation, baseAmountType, DurationOfEachDefoliation);
                    }
                    else  //DefoliationTriggerType == DefoliationTriggerTypes.TargetStandingBiomass
                    {
                        if (standingSwardBiomassWt >= TargetStandingBiomass)
                            Defoliate(baseDefoliationType, AmountForEachDefoliation, baseAmountType, DurationOfEachDefoliation);
                    }
                }
                //// Note: Only the code above, responsible for triggering automatic events, is limited by 'AutomaticManagementIsEnabled'. 
                ////       The rest of the code is still available to perform one-off defoliations.
                ////       It can be called from another manager or a schedulle thingy via Defoliate().
            }
        }

        [EventSubscribe("DoManagementCalculations")]
        private void OnDoManagementCalculations(object sender, EventArgs e)
        {
            // check whether a defoliation event has just been completed
            if (daysDefoliating == durationOfDefoliation)
            {
                // get amount of biomass remaining and zero counters
                PostHarvestDM = standingSwardBiomassWt;
                RotationHarvestedDM = cumAmountHarvested;
                aDefoliationHasHappened = true;
                daysDefoliating = -1;
            }

            // count the days after a defoliation
            if (aDefoliationHasHappened && (daysDefoliating == 0))
                DaysSinceLastDefoliation += 1;
        }

        /// <summary>Sets up a defoliation event.</summary>
        /// <param name="defoliationType">Type of defoliation (cut, graze, or harvest)</param>
        /// <param name="amountDM">Amount of biomass to use (g/m2)</param>
        /// <param name="amountType">How the DM amount is interpreted (toRemove, residual)</param>
        /// <param name="duration">Number of days to defoliate over</param>
        public void Defoliate(string defoliationType, double amountDM, string amountType, int duration)
        {
            // check whether there are plants in the sward that can be defoliated
            if (swardHasLivingPlants)
            {
                // check the defoliation type
                if (defoliationType.ToLower() == "cut")
                    typeOfDefoliation = "Cut";
                else if (defoliationType.ToLower() == "graze")
                    typeOfDefoliation = "Graze";
                else if (defoliationType.ToLower() == "harvest")
                    typeOfDefoliation = "Harvest";
                else
                    throw new Exception("Defoliation type should be either \"Cut\", \"Graze\", or \"Harvest\"!");

                // check DM amount given
                if (amountDM < 0.0)
                    throw new Exception("Amount to defoliate cannot be negative!");
                else
                    amountGiven = amountDM;

                // check the type of amount given
                if (amountType.ToLower() == "dmtoremove")
                    typeOfAmount = "DMToRemove";
                else if (amountType.ToLower() == "residualdm")
                    typeOfAmount = "ResidualDM";
                else if (amountType.ToLower() == "usedefoliationfractions")
                    typeOfAmount = "UseDefoliationFractions";
                else
                    throw new Exception("Amount type should be \"DMToRemove\", \"ResidualDM\", or \"UseDefoliationFractions\"!");

                // check duration given
                if (duration <= 0)
                    throw new Exception("Duration of defoliation cannot be zero or negative!");
                else
                    durationOfDefoliation = duration;

                // check existing biomass and amount to remove
                PreHarvestDM = standingSwardBiomassWt;
                herbageToRemove = 0.0;
                double harvestableBiomass = harvestableSwardBiomass("All", "Harvestable");
                if (typeOfAmount == "UseDefoliationFractions")
                { // amount given is ignored, removal based on fractions
                    amountGiven = 0.0;
                    if (harvestableBiomass > 0.0)
                        herbageToRemove = -1.0;

                    mySummary.WriteMessage(this, "   Defoliation triggered, removing biomass using the removal fractions (set or default), during " + durationOfDefoliation + " days");
                }
                else if (typeOfAmount == "DMToRemove")
                {
                    if (amountGiven > 0.001)
                    { // a meaningful amount was given, check whether all can be removed
                        if (harvestableBiomass > 0.001)
                            herbageToRemove = Math.Min(harvestableBiomass, amountGiven / durationOfDefoliation);

                        mySummary.WriteMessage(this, "   Defoliation triggered, attempting to remove " + amountGiven.ToString("#0.0") + " g/m2 of biomass over " + durationOfDefoliation + " days");
                    }
                }
                else if (typeOfAmount == "ResidualDM")
                {
                    // check how much biomass will be removed
                    if (PreHarvestDM > amountGiven)
                        herbageToRemove = Math.Min(harvestableBiomass, (PreHarvestDM - amountGiven) / durationOfDefoliation);

                    mySummary.WriteMessage(this, "   Defoliation triggered, attempting to remove biomass down to " + amountGiven.ToString("#0.0") + " g/m2 over " + durationOfDefoliation + " days");
                }

                // can defoliation begin?
                if (Math.Abs(herbageToRemove) >= 0.001)
                {
                    // set off first defoliation
mySummary.WriteMessage(this, "   Defoliation initialised on Defoliate - " + clock.Today.Date.ToShortDateString());
                    defoliateSward(herbageToRemove, typeOfDefoliation);

                    // return residue or excreta
                    if(ReturnedWt + ReturnedN > 0.0)
                    {
                        if (ReturnType == ReturnAsTypes.AsResidue)
                            returnResidues();
                        else
                            returnExcreta();
                    }

                    // gather values for this event
                    cumAmountHarvested = HarvestedWt;
                    daysDefoliating = 1;
                    DaysSinceLastDefoliation = 0;
                }
                else
                {
                    // abort command as there is not enough biomass, check interval type
                    if (DefoliationTriggerType == DefoliationTriggerTypes.FixedInterval)
                    { // count the event as if it did happen
                        cumAmountHarvested = 0.0;
                        daysDefoliating = 1;
                        DaysSinceLastDefoliation = 0;
                    }

                    mySummary.WriteMessage(this, "   Defoliation did not happend because current biomass (" + PreHarvestDM.ToString("#0.0") + " g/m2) is too low (total harvestable = " + harvestableBiomass.ToString("#0.0") + " g/m2)");
                }
            }
            else
            {
                mySummary.WriteMessage(this, "   Defoliation did not happend because there is no growing plants in the sward");
            }
        }

        /// <summary>Resets the values of outputs.</summary>
        private void resetMyOutputs()
        {
            DefoliatedWt = 0.0;
            DefoliatedN = 0.0;
            HarvestedWt = 0.0;
            HarvestedN = 0.0;
            RemovedWt = 0.0;
            RemovedN = 0.0;
            ReturnedWt = 0.0;
            ReturnedN = 0.0;
            NReturnedInDung = 0.0;
            NReturnedInUrine = 0.0;
            RotationHarvestedDM = 0.0;
        }

        /// <summary>Flags whether there is any living plant in the sward.</summary>
        private bool swardHasLivingPlants
        {
            get
            {
                bool result = false;
                foreach (Plant species in PMFSpecies)
                       result |= species.IsAlive;
                foreach (AgPasture.PastureSpecies species in AgPSpecies)
                       result |= species.IsAlive;
                return result;
            }
        }

        /// <summary>Amount of plant biomass aboveground (g/m2).</summary>
        private double standingSwardBiomassWt
        {
            get
            {
                double result = 0.0;
                foreach (Plant species in PMFSpecies)
                   result += (double)myZone.Get(species.Name+".AboveGround.Wt");
                foreach (AgPasture.PastureSpecies species in AgPSpecies)
                    result += species.Standing.Wt*0.1;
                return result;
            }
        }

        /// <summary>Amount of N in plant's biomass aboveground (g/m2).</summary>
        private double standingSwardBiomassN
        {
            get
            {
                double result = 0.0;
                foreach (Plant species in PMFSpecies)
                   result += (double)myZone.Get(species.Name+".AboveGround.N");
                foreach (AgPasture.PastureSpecies species in AgPSpecies)
                    result += species.Standing.N*0.1;
                return result;
            }
        }

        /// <summary>Amount of plant biomass from all organs available for defoliation (g/m2).</summary>
        /// <remarks>Assumes that organs with a BiomassRemoval.FractionToRemove > 0 are harvestable.
        /// For AgPasture, harvestable is based on minimum DM.</remarks>
        /// <param name="plantName">The name of the plant to retrieve its biomass</param>
        /// <param name="fractionType">The type of fraction to use (harvestable or total)</param>
        private double harvestableSwardBiomass(string plantName, string fractionType)
        {
            double amountWt = 0.0;
            double fraction = 0.0;
            foreach (Plant species in PMFSpecies)
            {
                if ((plantName == "All") || (species.Name == plantName))
                {
                    if (species.AboveGround.Wt > 0.0)
                    {
                        foreach (IOrgan organ in species.FindAllChildren<IOrgan>().OfType<IModel>().ToList())
                        { // consider only amounts toRemove
                            fraction = (double)myZone.Get(species.Name + "." + organ.Name + ".BiomassRemovalDefaults." + typeOfDefoliation + ".FractionLiveToRemove");
                            if ((fractionType == "Total") && (fraction > 0.0))
                                fraction = 1.0;
                            else if (RemoveAllBiomassIsEnabled && (fraction > 0.0))
                                fraction = 0.95;
                            amountWt += (double)myZone.Get(species.Name + "." + organ.Name + ".Live.Wt") * fraction;
                            fraction = (double)myZone.Get(species.Name + "." + organ.Name + ".BiomassRemovalDefaults." + typeOfDefoliation + ".FractionDeadToRemove");
                            if ((fractionType == "Total") && (fraction > 0.0))
                                fraction = 1.0;
                            else if (RemoveAllBiomassIsEnabled && (fraction > 0.0))
                                fraction = 0.95;
                            amountWt += (double)myZone.Get(species.Name + "." + organ.Name + ".Dead.Wt") * fraction;
                        }
                    }
                }
            }

            foreach (AgPasture.PastureSpecies species in AgPSpecies)
            {
                if ((plantName == "All") || (species.Name == plantName))
                {
                    if (fractionType == "Total")
                        amountWt += species.AboveGroundWt*0.1;
                    else
                        amountWt += species.Harvestable.Wt*0.1;
                }
            }

            return amountWt;
        }

        /// <summary>Triggers the actual biomass removal and gather DM and N amounts.</summary>
        /// <param name="amountToRemove">The total DM amount to remove (g/m2)</param>
        /// <param name="removalType">The type of removal (Cut, Graze, Harvest)</param>
        private void defoliateSward(double amountToRemove, string removalType)
        {
            // get the amounts of biomass and N before today's defoliation
            double preRemovalDM = standingSwardBiomassWt;
            double preRemovalN = standingSwardBiomassN;
            double fractionToRemove = 0.0;

            // gather the actual biomass removal fractions, checking whether they need to be adjusted
            double totalHarvestableAmount = harvestableSwardBiomass("All", "Harvestable");
            if (amountToRemove > 0.0)
            { // an amount was given for defoliation, adjust removal fractions for each species in order to remove the amount specified
                fractionToRemove = amountToRemove / totalHarvestableAmount;
            }
            else if (amountToRemove < 0.0)
            { // defoliation is not based on an amount, removal is determined simply by the removal fractions
                fractionToRemove = 1.0;
            }

            for (int i = 0; i < swardSpeciesName.Length; i++)
            {
                speciesFraction[i] = harvestableSwardBiomass(swardSpeciesName[i], "Harvestable") / totalHarvestableAmount;
                if (swardSpeciesType[i] == "PMF")
                {
                    // check whether the plant is alive
                    bool speciesIsAlive = (bool)myZone.Get(swardSpeciesName[i]+".IsEmerged");
                    if (speciesIsAlive)
                    {
                        // set removal fractions (these overrides the default removals in the plant)
                        setRemoveFraction(swardSpeciesName[i], fractionToRemove);

                        // do the actual biomass removal
                        foreach (Plant species in PMFSpecies)
                        {
                            if(species.Name == swardSpeciesName[i])
                            {
                                species.RemoveBiomass(removalType, defoliationFractions);
                                break;
                            }
                        }
                    }
                }
                else
                {
                    // check whether the plant is alive
                    bool speciesIsAlive = (bool)myZone.Get(swardSpeciesName[i]+".IsAlive");
                    if (speciesIsAlive)
                    {
                        // set removal amount (needs to be in kg/ha)
                        double amountRequired = (double)myZone.Get(swardSpeciesName[i]+".Harvestable.Wt");
                        if (amountToRemove > 0.0)
                            amountRequired = amountToRemove * speciesFraction[i] * 10.0;

                        // do the actual biomass removal
                        foreach (AgPasture.PastureSpecies species in AgPSpecies)
                        {
                            if(species.Name == swardSpeciesName[i])
                            {
                                species.RemoveBiomass(amount: amountRequired, type: "SetRemoveAmount");
                                break;
                            }
                        }
                    }
                }
            }

            // get the amounts of biomass and N after today's defoliation
            double postRemovalDM = standingSwardBiomassWt;
            double postRemovalN = standingSwardBiomassN;

            // get total defoliation (total plant stuff lost)
            DefoliatedWt = preRemovalDM - postRemovalDM;
            DefoliatedN = preRemovalN - postRemovalN;

            // get amounts harvested, removed, and returned
            manageDefoliatedBiomass();
        }

        /// <summary>Sets the biomass removal fractions for PMF plants.</summary>
        /// <param name="plantName">The name of PMF species</param>
        /// <param name="fractionHarvestable">The fraction of harvestable biomass to be removed (0-1)</param>
        private void setRemoveFraction(string plantName, double fractionHarvestable)
        {
            foreach (Plant species in PMFSpecies)
            {
                if ((species.Name == plantName) && (species.IsAlive))
                {

                    // set removal fractions (these overrides the default removals in the plant)
                    foreach (IOrgan organ in species.FindAllChildren<IOrgan>().OfType<IModel>().ToList())
                    {
                        // first get the removal for Live material
                        fractionToRemove = (double)myZone.Get(species.Name + "." + organ.Name + ".BiomassRemovalDefaults." + typeOfDefoliation + ".FractionLiveToRemove");
                        if (RemoveAllBiomassIsEnabled && (fractionToRemove > 0.0))
                            fractionToRemove = 0.95;
                        fractionToRemove = fractionHarvestable * fractionToRemove;
                        fractionToRemove = Math.Min(1.0, fractionToRemove);
                        defoliationFractions.SetFractionToRemove(organ.Name, fractionToRemove, "Live");
                        if (RemoveAllBiomassIsEnabled)
                            fractionToResidue = 0.0;
                        else
                            fractionToResidue = (double)myZone.Get(species.Name + "." + organ.Name + ".BiomassRemovalDefaults." + typeOfDefoliation + ".FractionLiveToResidue");
                        fractionToResidue = Math.Min(fractionHarvestable * fractionToResidue, 1.0 - fractionToRemove);
                        defoliationFractions.SetFractionToResidue(organ.Name, fractionToResidue, "Live");

                        // then get the removal for Dead material
                        fractionToRemove = (double)myZone.Get(species.Name + "." + organ.Name + ".BiomassRemovalDefaults." + typeOfDefoliation + ".FractionDeadToRemove");
                        if (RemoveAllBiomassIsEnabled && (fractionToRemove > 0.0))
                            fractionToRemove = 0.95;
                        fractionToRemove = fractionHarvestable * fractionToRemove;
                        fractionToRemove = Math.Min(1.0, fractionToRemove);
                        defoliationFractions.SetFractionToRemove(organ.Name, fractionToRemove, "Dead");
                        if (RemoveAllBiomassIsEnabled)
                            fractionToResidue = 0.0;
                        else
                            fractionToResidue = (double)myZone.Get(species.Name + "." + organ.Name + ".BiomassRemovalDefaults." + typeOfDefoliation + ".FractionDeadToResidue");
                        fractionToResidue = Math.Min(fractionHarvestable * fractionToResidue, 1.0 - fractionToRemove);
                        defoliationFractions.SetFractionToResidue(organ.Name, fractionToResidue, "Dead");
                    }
                }
            }
        }

        /// <summary>Gathers the DM and N amounts harvested, to be removed, and to be returned.</summary>
        private void manageDefoliatedBiomass()
        {
            double digestibilityStructural = 0.65;
            double digestibilityNonStrucutural = 1.0;

            if (DefoliatedWt > 0.0)
            {
                HarvestedWt = 0.0;
                HarvestedN = 0.0;
                RemovedWt = 0.0;
                RemovedN = 0.0;

                foreach (Plant species in PMFSpecies)
                {
                    if(species.AboveGround.Wt > 0.0)
                    {
                        // get the amount harvested (plant stuff removed from plants)
                        speciesHarvestedWt = 0.0;
                        speciesHarvestedN = 0.0;
                        foreach (IOrgan organ in species.FindAllChildren<IOrgan>().OfType<IModel>().ToList())
                        {
                            speciesHarvestedWt += (double)myZone.Get(species.Name+"."+organ.Name+".Removed.Wt");
                            speciesHarvestedN += (double)myZone.Get(species.Name+"."+organ.Name+".Removed.N");
                        }

                        HarvestedWt += speciesHarvestedWt;
                        HarvestedN += speciesHarvestedN;

                        // get the DM fraction to be removed
                        if(FractionDMToRemove>=0.0)
                        {
                            speciesFractionToRemove = FractionDMToRemove;
                        }
                        else
                        { // use digestibility to define the fraction
                            double fracStructural = species.AboveGround.StructuralWt/species.AboveGround.Wt;
                            speciesFractionToRemove = (1.0 - fracStructural)*digestibilityNonStrucutural + fracStructural*digestibilityStructural;
                            speciesFractionToRemove = Math.Min(1.0, Math.Max(0.0, speciesFractionToRemove));
                        }

                        // get the amounts actually removed from field
                        RemovedWt += speciesHarvestedWt * speciesFractionToRemove;
                        RemovedN += speciesHarvestedN * FractionNToRemove;
                   }
                }

                foreach (AgPasture.PastureSpecies species in AgPSpecies)
                {
                    if(species.AboveGroundWt > 0.0)
                    {
                        // get the amount harvested
                        speciesHarvestedWt = species.HarvestedWt*0.1;
                        speciesHarvestedN = species.HarvestedN*0.1;
                        HarvestedWt += speciesHarvestedWt;
                        HarvestedN += speciesHarvestedN;

                        // get fraction to be removed
                        if(FractionDMToRemove>=0.0)
                        {
                            speciesFractionToRemove = FractionDMToRemove;
                        }
                        else
                        { // use digestibility to define the fraction
                            speciesFractionToRemove = species.HarvestedDigestibility;
                        }

                        // get the amounts actually removed from field
                        RemovedWt += speciesHarvestedWt * speciesFractionToRemove;
                        RemovedN += speciesHarvestedN * FractionNToRemove;
                    }
                }

                // get the amounts to be returned to the field (as residue or dung+urine)
                ReturnedWt = HarvestedWt - RemovedWt;
                ReturnedN = HarvestedN - RemovedN;
                if (ReturnType == ReturnAsTypes.AsDungUrine)
                {
                    if (NDungType == DungNContentTypes.DefineProportion)
                        NReturnedInDung = ReturnedN * ProportionN2Dung;
                    else
                        NReturnedInDung = Math.Min(ReturnedN, ReturnedWt * 0.4 / CNRatioDung);
                    NReturnedInDung = Math.Min(NReturnedInDung, ReturnedN);
                    NReturnedInUrine = ReturnedN - NReturnedInDung;
                }
                else
                {
                    NReturnedInDung = 0.0;
                    NReturnedInUrine = 0.0;
                }
            }
        }

        /// <summary>Returns the material not removed off field as residue.</summary>
        private void returnResidues()
        {
            if ((ReturnedWt > 0.0) || (ReturnedN > 0.0))
            {
                PMF.BiomassRemovedType BiomassResidue = new PMF.BiomassRemovedType();
                string[] type = new string[] { "Grass" };
                float[] dltdm = new float[] { (float)(10.0 * ReturnedWt) };
                float[] dltn = new float[] { (float)(10.0 * ReturnedN) };
                float[] dltp = new float[] { 0 };
                float[] fraction = new float[] { 1 };     // fraction is always 1.0 here

                BiomassResidue.crop_type = "Grass";
                BiomassResidue.dm_type = type;
                BiomassResidue.dlt_crop_dm = dltdm;
                BiomassResidue.dlt_dm_n = dltn;
                BiomassResidue.dlt_dm_p = dltp;
                BiomassResidue.fraction_to_residue = fraction;
                BiomassRemoved.Invoke(BiomassResidue);
            }
        }

        /// <summary>Returns the material not removed off field as dung and urine).</summary>
        private void returnExcreta()
        {
            if ((ReturnedWt > 0.0) || (NReturnedInDung > 0.0))
            {
                PMF.BiomassRemovedType BiomassDung = new PMF.BiomassRemovedType();
                string[] type = new string[] { "RuminantDung_PastureFed" };
                float[] dltdm = new float[] { (float)(10.0 * ReturnedWt) };
                float[] dltn = new float[] { (float)(10.0 * NReturnedInDung) };
                float[] dltp = new float[] { 0 };
                float[] fraction = new float[] { 1 };     // fraction is always 1.0 here

                BiomassDung.crop_type = "RuminantDung_PastureFed";
                BiomassDung.dm_type = type;
                BiomassDung.dlt_crop_dm = dltdm;
                BiomassDung.dlt_dm_n = dltn;
                BiomassDung.dlt_dm_p = dltp;
                BiomassDung.fraction_to_residue = fraction;
                BiomassRemoved.Invoke(BiomassDung);
            }

            if (NReturnedInUrine > 0.0)
            {
                double[] myUrineDeposition = new double[soilPhysical.Thickness.Length];
                for (int z = 0; z < urineFraction.Length; z++)
                    myUrineDeposition[z] = NReturnedInUrine * 10.0 * urineFraction[z];
                Urea.AddKgHaDelta(SoluteSetterType.Fertiliser, myUrineDeposition);
            }
        }

        // Auxiliary bits and pieces  - - - - - - - - - - - - - - - - - - - - - - - - - - - - - - - - -

        /// <summary>Type of defoliation to use</summary>
        public enum DefoliationTypes
        {
            /// <summary>Cut</summary>
            Cut,
            /// <summary>Graze</summary>
            Graze,
            /// <summary>Harvest</summary>
            Harvest
        }

        /// <summary>Flag how defoliations will be triggered</summary>
        public enum DefoliationTriggerTypes
        {
            /// <summary>Setting a fixed interval</summary>
            FixedInterval,
            /// <summary>Setting a target (minimum) inteval</summary>
            TargetInterval,
            /// <summary>Setting a target (maximum) standing biomass</summary>
            TargetStandingBiomass
        }

        /// <summary>How the DM amount given is interpreted</summary>
        public enum DefoliateAmountTypes
        {
            /// <summary>Setting a DM amount to remove</summary>
            DMToRemove,
            /// <summary>Setting the residual DM amount</summary>
            ResidualDM,
            /// <summary>Remove according to crop's BiomassRemovalFractions</summary>
            None_UseDefoliationFractions
        }

        /// <summary>Fraction of defoliated DM to remove from field</summary>
        public enum DMRemovalTypes
        {
            /// <summary>Remove all DM</summary>
            RemoveAll,
            /// <summary>Remove no DM</summary>
            RemoveNone,
            /// <summary>Remove a user-defined fraction</summary>
            UserDefinedFraction,
            /// <summary>Remove a fraction based on plant digestibility</summary>
            BasedOnDigestibility
        }

        /// <summary>Fraction of N in the defoliated material to remove from field</summary>
        public enum NRemovalTypes
        {
            /// <summary>Remove all N</summary>
            RemoveAll,
            /// <summary>Remove no N</summary>
            RemoveNone,
            /// <summary>Remove a user-defined fraction</summary>
            UserDefinedFraction,
            /// <summary>Remove a fraction equal to DM removed</summary>
            ProportionalToDM
        }

        /// <summary>Define how the non-removed material is returned to the field</summary>
        public enum ReturnAsTypes
        {
            /// <summary>Return plant material as residue</summary>
            AsResidue,
            /// <summary>Return meterial as dung and urine</summary>
            AsDungUrine
        }

        /// <summary>Define how the proportion of N in dung is defined</summary>
        public enum DungNContentTypes
        {
            /// <summary>Define the proportion of N returned as dung</summary>
            DefineProportion,
            /// <summary>Define the C:N of dung</summary>
            DefineCNratio
        }
    }
}
```
    Report: EventNames=[Clock].DoReport
      VariableNames:
        [Clock].Today as Date
        [Clock].Today.DayOfYear as DayOfYear
        [Weather].Radn as SolarRadiation
        [MicroClimate].NetRadiation
        [RedClover].Leaf.RadiationIntercepted as InterceptedRadiation
        [Weather].MeanT
        [Weather].CO2
        [Weather].Rain as Rainfall
        [Irrigation].IrrigationApplied as IrrigationApplied
        [MicroClimate].PrecipitationInterception as PrecipitationInterception
        [MicroClimate].PetTotal
        [Soil].SoilWater.Eo as Eo
        [Soil].SoilWater.Es as Evaporation
        [RedClover].Leaf.Transpiration as Transpiration
        [Soil].SoilWater.pond as PondedWater
        [Soil].SoilWater.Drainage as Drainage
        [Soil].SoilWater.Runoff as Runoff
        sum([Soil].SoilWater.LateralOutflow) as LateralFlow
        sum([Soil].SoilWater.SWmm) as TotalSWC
        sum([Soil].Physical.DULmm) as TotalDUL
        sum([Soil].Physical.LL15mm) as TotalLL15
        [Soil].SoilWater.SW[1] as SWCTopLayer
        [Soil].Physical.DUL[1] as DULTopLayer
        [Fertiliser].NitrogenApplied as FertiliserN
        sum([Soil].SoilNitrogen.Denitrification) as DenitrifiedN
        ([Soil].SoilWater.LeachNH4 + [Soil].SoilWater.LeachNO3) as LeachedN
        (-1*[RedClover].Root.NUptake) as UptakeN
        sum([Soil].SoilNitrogen.MineralisedN) as MineralisedSoilN
        sum([Soil].SoilNitrogen.dlt_n_min_res) as MineralisedSurfOMN
        ([RedClover].Leaf.Detached.N+[RedClover].Stem.Detached.N+[RedClover].Petiole.Detached.N+[RedClover].Inflorescence.Detached.N) as DetachedAGN
        ([RedClover].Nodule.Detached.N+[RedClover].Taproot.Detached.N+[RedClover].Root.Detached.N) as DetachedBGN
        (10*([RedClover].Leaf.Detached.N+[RedClover].Stem.Detached.N+[RedClover].Petiole.Detached.N+[RedClover].Inflorescence.Detached.N+[RedClover].Nodule.Detached.N+[RedClover].Taproot.Detached.N+[RedClover].Root.Detached.N)) as DetachedTotalN
        (10*[RedClover].Nodule.NFixed) as RedClover.Nodule.NFixed
        (sum([Soil].SoilNitrogen.Urea.kgha) + sum([Soil].SoilNitrogen.NH4.kgha) + sum([Soil].SoilNitrogen.NO3.kgha)) as SoilNContent
        sum([Soil].SoilNitrogen.Urea.kgha) as SoilUrea
        sum([Soil].SoilNitrogen.NH4.kgha) as SoilNH4
        sum([Soil].SoilNitrogen.NO3.kgha) as SoilNO3
        (sum([Soil].SoilNitrogen.NH4.kgha[1:4])+sum([Soil].SoilNitrogen.NO3.kgha[1:4])) as TopSoilN
        [SurfaceOrganicMatter].N as TotalSurfOMN
        sum([Soil].SoilNitrogen.FOMN) as TotalFOMN
        sum([Soil].SoilNitrogen.HumicN) as TotalHumicN
        sum([Soil].SoilNitrogen.MicrobialN as TotalMicrobialN
        ([RedClover].Total.N) as TotalPlantN
        [ExtraVariables].Script.AccumFixed as CumulativeFixedN
        [DefoliationManager].Script.RotationHarvestedDM as RotationHarvestedWt
        [DefoliationManager].Script.PreHarvestDM
        [DefoliationManager].Script.PostHarvestDM
        [DefoliationManager].Script.DefoliatedWt
        [DefoliationManager].Script.HarvestedWt
        [DefoliationManager].Script.RemovedWt
        [DefoliationManager].Script.DefoliatedN as NTakenOff
        [DefoliationManager].Script.DefoliatedN
        [DefoliationManager].Script.HarvestedN
        (10*[DefoliationManager].Script.RemovedN) as DefoliationManager.Script.RemovedN
        [DefoliationManager].Script.NReturnedInDung
        [DefoliationManager].Script.NReturnedInUrine
        [DefoliationManager].Script.DefoliatedWt as HarvestedWt
        [ExtraVariables].Script.AccumHarvestedWt as CumulativeHarvestedWt
        [ExtraVariables].Script.AccumHarvestedN as CumulativeNTakenOff
        [RedClover].Phenology.ThermalTime
        [RedClover].Phenology.Photoperiod
        [RedClover].Phenology.PhotoperiodVariation
        [RedClover].Population
        [RedClover].Phenology.CurrentPhase.Name
        [RedClover].Phenology.Stage
        [RedClover].Root.LengthDensity
        [RedClover].Leaf.ExtinctionCoefficient
        [RedClover].Arbitrator.DM.TotalFixationSupply
        [RedClover].Arbitrator.DM.TotalPlantDemand
        [RedClover].Arbitrator.DM.Allocated
        [RedClover].Arbitrator.DM.SinkLimitation
        [RedClover].Arbitrator.DM.NutrientLimitation
        [RedClover].Arbitrator.FDM
        [RedClover].Leaf.DMSupply.Total
        [RedClover].Petiole.DMSupply.Total
        [RedClover].Stem.DMSupply.Total
        [RedClover].Inflorescence.DMSupply.Total
        [RedClover].Root.DMSupply.Total
        [RedClover].Taproot.DMSupply.Total
        [RedClover].Nodule.DMSupply.Total
        [RedClover].Leaf.DMDemand.Total
        [RedClover].Petiole.DMDemand.Total
        [RedClover].Stem.DMDemand.Total
        [RedClover].Inflorescence.DMDemand.Total
        [RedClover].Root.DMDemand.Total
        [RedClover].Taproot.DMDemand.Total
        [RedClover].Nodule.DMDemand.Total
        [RedClover].Arbitrator.N.TotalPlantSupply
        [RedClover].Arbitrator.N.TotalPlantDemand
        [RedClover].Arbitrator.N.Allocated
        [RedClover].Arbitrator.FN
        [RedClover].Arbitrator.N.TotalFixationSupply
        [RedClover].Arbitrator.N.TotalReallocationSupply
        [RedClover].Arbitrator.N.TotalRetranslocationSupply
        [RedClover].Arbitrator.N.TotalUptakeSupply
        [RedClover].Root.NTakenUp
        [RedClover].Root.NSupply.Uptake
        [RedClover].Root.NUptake
        [RedClover].Leaf.NSupply.Total
        [RedClover].Petiole.NSupply.Total
        [RedClover].Stem.NSupply.Total
        [RedClover].Inflorescence.NSupply.Total
        [RedClover].Root.NSupply.Total
        [RedClover].Taproot.NSupply.Total
        [RedClover].Nodule.NSupply.Total
        [RedClover].Leaf.NDemand.Total
        [RedClover].Petiole.NDemand.Total
        [RedClover].Stem.NDemand.Total
        [RedClover].Inflorescence.NDemand.Total
        [RedClover].Root.NDemand.Total
        [RedClover].Taproot.NDemand.Total
        [RedClover].Nodule.NDemand.Total
        [RedClover].ShootRootRatio
        [RedClover].TargetShootRootRatio
        [RedClover].TargetAboveGroundFraction
        ([RedClover].AboveGroundLive.Wt/([RedClover].TotalLive.Wt+0.000001)) as RedClover.CurrentAboveGroundFraction
        ([RedClover].Leaf.Live.Wt / ([RedClover].AboveGroundLive.Wt + 0.000001)) as LeafFraction
        ([RedClover].Stem.Live.Wt / ([RedClover].AboveGroundLive.Wt + 0.000001)) as StemFraction
        ([RedClover].Petiole.Live.Wt / ([RedClover].AboveGroundLive.Wt + 0.000001)) as PetioleFraction
        ([RedClover].Inflorescence.Live.Wt / ([RedClover].AboveGroundLive.Wt + 0.000001)) as FlowerFraction
        ([RedClover].Nodule.Live.Wt / ([RedClover].BelowGround.Wt + 0.000001)) as NoduleFraction
        ([RedClover].Taproot.Live.Wt / ([RedClover].BelowGround.Wt + 0.000001)) as TaprootFraction
        ([RedClover].Root.Live.Wt / ([RedClover].BelowGround.Wt + 0.000001)) as RootFraction
        [RedClover].Leaf.TargetBiomassProportion
        [RedClover].Petiole.TargetBiomassProportion
        [RedClover].Stem.TargetBiomassProportion
        [RedClover].Inflorescence.TargetBiomassProportion
        [RedClover].Taproot.TargetBiomassProportion
        [RedClover].Root.TargetBiomassProportion
        [RedClover].Nodule.TargetBiomassProportion
        [RedClover].Leaf.DMDemands.Structural.DMDemandFunction
        [RedClover].Stem.DMDemands.Structural.DMDemandFunction
        [RedClover].Petiole.DMDemands.Structural.DMDemandFunction
        [RedClover].Inflorescence.DMDemands.Structural.DMDemandFunction
        [RedClover].Root.DMDemands.Structural.DMDemandFunction
        [RedClover].Taproot.DMDemands.Structural.DMDemandFunction
        [RedClover].Nodule.DMDemands.Structural.DMDemandFunction
        [RedClover].Leaf.DMDemands.Structural.DMDemandFunction.OrganDMDemand.BaseBiomassDemand
        [RedClover].Leaf.DMDemands.Structural.DMDemandFunction.OrganDMDemand.DeficitBiomassDemand
        [RedClover].Petiole.DMDemands.Structural.DMDemandFunction.OrganDMDemand.BaseBiomassDemand
        [RedClover].Petiole.DMDemands.Structural.DMDemandFunction.OrganDMDemand.DeficitBiomassDemand
        [RedClover].Stem.DMDemands.Structural.DMDemandFunction.OrganDMDemand.BaseBiomassDemand
        [RedClover].Stem.DMDemands.Structural.DMDemandFunction.OrganDMDemand.DeficitBiomassDemand
        [RedClover].Inflorescence.DMDemands.Structural.DMDemandFunction.OrganDMDemand.BaseBiomassDemand
        [RedClover].Inflorescence.DMDemands.Structural.DMDemandFunction.OrganDMDemand.DeficitBiomassDemand
        [RedClover].Taproot.DMDemands.Structural.DMDemandFunction.OrganDMDemand.BaseBiomassDemand
        [RedClover].Taproot.DMDemands.Structural.DMDemandFunction.OrganDMDemand.DeficitBiomassDemand
        [RedClover].Root.DMDemands.Structural.DMDemandFunction.OrganDMDemand.BaseBiomassDemand
        [RedClover].Root.DMDemands.Structural.DMDemandFunction.OrganDMDemand.DeficitBiomassDemand
        [RedClover].Nodule.DMDemands.Structural.DMDemandFunction.OrganDMDemand.BaseBiomassDemand
        [RedClover].Nodule.DMDemands.Structural.DMDemandFunction.OrganDMDemand.DeficitBiomassDemand
        ([RedClover].Leaf.Allocated.Wt/([RedClover].Arbitrator.DM.Allocated+0.000001)) as LeafFractionDMAllocated
        ([RedClover].Stem.Allocated.Wt/([RedClover].Arbitrator.DM.Allocated+0.000001)) as StemFractionDMAllocated
        ([RedClover].Petiole.Allocated.Wt/([RedClover].Arbitrator.DM.Allocated+0.000001)) as PetioleFractionDMAllocated
        ([RedClover].Inflorescence.Allocated.Wt/([RedClover].Arbitrator.DM.Allocated+0.000001)) as InflorescenceFractionDMAllocated
        ([RedClover].Nodule.Allocated.Wt/([RedClover].Arbitrator.DM.Allocated+0.000001)) as NoduleFractionDMAllocated
        ([RedClover].Taproot.Allocated.Wt/([RedClover].Arbitrator.DM.Allocated+0.000001)) as TaprootFractionDMAllocated
        ([RedClover].Root.Allocated.Wt/([RedClover].Arbitrator.DM.Allocated+0.000001)) as RootFractionDMAllocated
        ([RedClover].Leaf.DMDemands.Structural.DMDemandFunction+[RedClover].Petiole.DMDemands.Structural.DMDemandFunction+[RedClover].Stem.DMDemands.Structural.DMDemandFunction+[RedClover].Inflorescence.DMDemands.Structural.DMDemandFunction+[RedClover].Nodule.DMDemands.Structural.DMDemandFunction+[RedClover].Taproot.DMDemands.Structural.DMDemandFunction+[RedClover].Root.DMDemands.Structural.DMDemandFunction) as TotalDMDemanded
        [RedClover].Leaf.DMPotentialAllocation.Total
        [RedClover].Petiole.DMPotentialAllocation.Total
        [RedClover].Stem.DMPotentialAllocation.Total
        [RedClover].Inflorescence.DMPotentialAllocation.Total
        [RedClover].Nodule.DMPotentialAllocation.Total
        [RedClover].Taproot.DMPotentialAllocation.Total
        [RedClover].Root.DMPotentialAllocation.Total
        ([RedClover].Leaf.DMPotentialAllocation.Total+[RedClover].Petiole.DMPotentialAllocation.Total+[RedClover].Stem.DMPotentialAllocation.Total+[RedClover].Inflorescence.DMPotentialAllocation.Total+[RedClover].Nodule.DMPotentialAllocation.Total+[RedClover].Taproot.DMPotentialAllocation.Total+[RedClover].Root.DMPotentialAllocation.Total) as TotalPotentialDMAllocated
        [RedClover].Total.Wt
        [RedClover].Total.N
        [RedClover].Total.NConc
        [RedClover].TotalLive.Wt
        [RedClover].AboveGround.Wt
        [RedClover].BelowGround.Wt
        [RedClover].AboveGround.N
        [RedClover].BelowGround.N
        [RedClover].AboveGroundLive.Wt
        [RedClover].BelowGroundLive.Wt
        [RedClover].AboveGroundLive.NConc
        [RedClover].BelowGroundLive.NConc
        [ExtraVariables].Script.HerbageNConc as HerbageNConc
        (([RedClover].Leaf.N+[RedClover].Petiole.N)/(([RedClover].Leaf.Wt+[RedClover].Petiole.Wt+0.000001)) as HerbageStandingNConc
        [RedClover].Leaf.Wt
        [RedClover].Leaf.Live.Wt
        [RedClover].Leaf.Live.N
        [RedClover].Leaf.Live.NConc
        [RedClover].Leaf.Dead.Wt
        [RedClover].Leaf.Dead.NConc
        [RedClover].Leaf.CoverTotal
        [RedClover].Leaf.CoverGreen
        [RedClover].Leaf.CoverDead
        [RedClover].Leaf.LAITotal
        [RedClover].Leaf.LAI
        [RedClover].Leaf.LAIDead
        [RedClover].Leaf.Height
        [RedClover].Leaf.Transpiration
        [RedClover].Leaf.Fw
        [RedClover].Leaf.Fn
        [RedClover].Leaf.FNmetabolic
        [RedClover].Leaf.Photosynthesis.FCO2
        [RedClover].Leaf.Photosynthesis.FN
        [RedClover].Leaf.Photosynthesis.FT
        [RedClover].Leaf.Photosynthesis.FW
        [RedClover].Leaf.Photosynthesis.FVPD
        [RedClover].Leaf.FRGR
        [RedClover].Stem.Live.Wt
        [RedClover].Stem.Live.N
        [RedClover].Stem.Live.NConc
        [RedClover].Stem.Dead.Wt
        [RedClover].Stem.Dead.NConc
        [RedClover].Petiole.Live.Wt
        [RedClover].Petiole.Live.N
        [RedClover].Petiole.Live.NConc
        [RedClover].Petiole.Dead.Wt
        [RedClover].Petiole.Dead.NConc
        [RedClover].Inflorescence.Live.Wt
        [RedClover].Inflorescence.Live.N
        [RedClover].Inflorescence.Live.NConc
        [RedClover].Inflorescence.Dead.Wt
        [RedClover].Inflorescence.Dead.NConc
        [RedClover].Nodule.Live.Wt
        [RedClover].Nodule.Live.N
        [RedClover].Nodule.Live.NConc
        [RedClover].Nodule.Dead.Wt
        [RedClover].Nodule.Dead.NConc
        [RedClover].Taproot.Live.Wt
        [RedClover].Taproot.Live.N
        [RedClover].Taproot.Live.NConc
        [RedClover].Taproot.Dead.Wt
        [RedClover].Taproot.Dead.NConc
        [RedClover].Root.Live.Wt
        [RedClover].Root.Live.N
        [RedClover].Root.Live.NConc
        [RedClover].Root.Dead.Wt
        [RedClover].Root.Dead.NConc
        [RedClover].Root.Depth
        [RedClover].Root.WaterUptake
        [RedClover].Leaf.Live.StructuralWt
        [RedClover].Leaf.Live.StorageWt
        [RedClover].Leaf.Live.MetabolicWt
        [RedClover].Leaf.Live.StructuralN
        [RedClover].Leaf.Live.StorageN
        [RedClover].Leaf.Live.MetabolicN
        [RedClover].Leaf.Dead.StructuralWt
        [RedClover].Leaf.Dead.StorageWt
        [RedClover].Leaf.Dead.MetabolicWt
        [RedClover].Leaf.Dead.StructuralN
        [RedClover].Leaf.Dead.StorageN
        [RedClover].Leaf.Dead.MetabolicN
        [RedClover].Stem.Live.StructuralWt
        [RedClover].Stem.Live.StorageWt
        [RedClover].Stem.Live.MetabolicWt
        [RedClover].Stem.Live.StructuralN
        [RedClover].Stem.Live.StorageN
        [RedClover].Stem.Live.MetabolicN
        [RedClover].Petiole.Live.StructuralWt
        [RedClover].Petiole.Live.StorageWt
        [RedClover].Petiole.Live.MetabolicWt
        [RedClover].Petiole.Live.StructuralN
        [RedClover].Petiole.Live.StorageN
        [RedClover].Petiole.Live.MetabolicN
        [RedClover].Inflorescence.Live.StructuralWt
        [RedClover].Inflorescence.Live.StorageWt
        [RedClover].Inflorescence.Live.MetabolicWt
        [RedClover].Inflorescence.Live.StructuralN
        [RedClover].Inflorescence.Live.StorageN
        [RedClover].Inflorescence.Live.MetabolicN
        [RedClover].Root.Live.StructuralWt
        [RedClover].Root.Live.StorageWt
        [RedClover].Root.Live.MetabolicWt
        [RedClover].Root.Live.StructuralN
        [RedClover].Root.Live.StorageN
        [RedClover].Root.Live.MetabolicN
        [RedClover].Taproot.Live.StructuralWt
        [RedClover].Taproot.Live.StorageWt
        [RedClover].Taproot.Live.MetabolicWt
        [RedClover].Taproot.Live.StructuralN
        [RedClover].Taproot.Live.StorageN
        [RedClover].Taproot.Live.MetabolicN
        [RedClover].Nodule.Live.StructuralWt
        [RedClover].Nodule.Live.StorageWt
        [RedClover].Nodule.Live.MetabolicWt
        [RedClover].Nodule.Live.StructuralN
        [RedClover].Nodule.Live.StorageN
        [RedClover].Nodule.Live.MetabolicN
        [RedClover].Leaf.Live.StructuralNConc
        [RedClover].Leaf.Live.StorageNConc
        [RedClover].Root.Live.StructuralNConc
        [RedClover].Root.Live.StorageNConc
        [RedClover].Leaf.Allocated.Wt
        [RedClover].Stem.Allocated.Wt
        [RedClover].Petiole.Allocated.Wt
        [RedClover].Inflorescence.Allocated.Wt
        [RedClover].Nodule.Allocated.Wt
        [RedClover].Taproot.Allocated.Wt
        [RedClover].Root.Allocated.Wt
        [RedClover].Leaf.Senesced.Wt
        [RedClover].Stem.Senesced.Wt
        [RedClover].Petiole.Senesced.Wt
        [RedClover].Inflorescence.Senesced.Wt
        [RedClover].Nodule.Senesced.Wt
        [RedClover].Taproot.Senesced.Wt
        [RedClover].Root.Senesced.Wt
        [RedClover].Leaf.Detached.Wt
        [RedClover].Stem.Detached.Wt
        [RedClover].Petiole.Detached.Wt
        [RedClover].Inflorescence.Detached.Wt
        [RedClover].Nodule.Detached.Wt
        [RedClover].Taproot.Detached.Wt
        [RedClover].Root.Detached.Wt
        [RedClover].Leaf.Removed.Wt
        [RedClover].Stem.Removed.Wt
        [RedClover].Petiole.Removed.Wt
        [RedClover].Inflorescence.Removed.Wt
        [RedClover].Nodule.Removed.Wt
        [RedClover].Taproot.Removed.Wt
        [RedClover].Root.Removed.Wt
        [RedClover].Leaf.Allocated.N
        [RedClover].Stem.Allocated.N
        [RedClover].Petiole.Allocated.N
        [RedClover].Inflorescence.Allocated.N
        [RedClover].Nodule.Allocated.N
        [RedClover].Taproot.Allocated.N
        [RedClover].Root.Allocated.N
        [RedClover].Leaf.Senesced.N
        [RedClover].Stem.Senesced.N
        [RedClover].Petiole.Senesced.N
        [RedClover].Inflorescence.Senesced.N
        [RedClover].Nodule.Senesced.N
        [RedClover].Taproot.Senesced.N
        [RedClover].Root.Senesced.N
        [RedClover].Leaf.Detached.N
        [RedClover].Stem.Detached.N
        [RedClover].Petiole.Detached.N
        [RedClover].Inflorescence.Detached.N
        [RedClover].Nodule.Detached.N
        [RedClover].Taproot.Detached.N
        [RedClover].Root.Detached.N
        [RedClover].Leaf.Removed.N
        [RedClover].Stem.Removed.N
        [RedClover].Petiole.Removed.N
        [RedClover].Inflorescence.Removed.N
        [RedClover].Nodule.Removed.N
        [RedClover].Taproot.Removed.N
        [RedClover].Root.Removed.N
  DataStore
    ExcelInput Observed: FileNames=[Observed.xlsx]; SheetNames=[Observed]
    ExcelInput ObservedMeans: FileNames=[Observed.xlsx]; SheetNames=[ObservedMeans]
    PredictedObserved: PredictedTableName=Report; ObservedTableName=Observed; FieldNameUsedForMatch=Date; AllColumns=false
      Tests: POName=PredictedObserved
        AcceptedStats:
          Name                      n    Slope       Intercept  SEslope    SEintercept  R2          RMSE        NSE        ME           MAE         RSR
          CumulativeHarvestedWt     588  0.795178    113.814    0.03018    19.95        0.542263    256.099     0.424242   -2.60269     198.718     0.758142
          CumulativeNTakenOff       498  0.680333    4.09215    0.0274783  0.753111     0.552753    10.6729     0.472836   -3.30239     7.91333     0.725331
          HarvestedWt               582  -0.0777377  181.277    0.0310379  4.99151      0.0106999   101.135     -0.857686  27.507       82.525      1.3618
          HerbageNConc              660  0.244251    0.0292903  0.0249988  0.00111277   0.126699    0.00672131  -0.566643  -0.00410467  0.00552725  1.25071
          NTakenOff                 498  -0.0520513  6.4214     0.0324875  0.21093      0.00514883  3.61772     -0.639537  0.271437     2.90444     1.27916
          RotationHarvestedWt       588  -0.0735546  178.649    0.0306001  4.90296      0.00976369  100.055     -0.825553  26.1106      81.5287     1.34998
          RedClover.AboveGround.Wt  162  0.424634    109.601    0.0634236  8.84965      0.218848    76.6438     -0.317721  39.107       59.2757     1.14437
        AcceptedStatsName=Name n Slope Intercept SEslope SEintercept R2 RMSE NSE ME MAE RSR
        Memo Note
          Where:
           - n: The number of PO (predicted-observed) pairs for the given variable;
           - Slope: The slope of the straight line linear regression. A perfect fit would have a value of 1;
           - Intercept: The intercept of the straight line linear regression. A perfect fit would have a value of 0;
           - SEslope: Standard error in the slope;
           - SEintercept: Standard error in the intercept.;
           - R2: The value for the coefficient of determination. It varies between 0 and 1, where 1 is a perfect fit;
           - RMSE: Root Mean Squared Error. 0 is a perfect fit. Values less than half the standard deviation of the observed data are acceptable;
           - NSE: Nash-Sutcliffe Efficiency. Indicates how well the PO data fits the 1:1 line. Ranges from -∞ to 1 with 1 being the optimal value while values  between 0 and 1 are generally viewed as acceptable. Values < 0 indicate unacceptable model performance;
           - ME: Mean Error between predicted and observed values. 0 is a perfect fit;
           - MAE: Mean Absolute Error. 0 is a perfect fit. Values less than half the standard deviation of the observed data are acceptable;
           - RSR: Ratio between the RMSE and the standard deviation of observations. 0 is a perfect fit;
    PredictedObserved PredictedObservedMeans: PredictedTableName=Report; ObservedTableName=ObservedMeans; FieldNameUsedForMatch=Date; AllColumns=false
      Tests: POName=PredictedObservedMeans
        AcceptedStats:
          Name                             n    Slope       Intercept  SEslope    SEintercept  R2           RMSE        NSE        ME           MAE        RSR
          CumulativeHarvestedWt            162  0.844837    84.5486    0.0558112  35.9564      0.588838     232.84      0.477503   -2.02338     183.07     0.720605
          CumulativeNTakenOff              132  0.722646    2.96025    0.0509111  1.3512       0.607816     9.62958     0.53177    -3.28086     7.33015    0.681677
          HarvestedWt                      162  -0.0519694  175.12     0.0636112  10.0018      0.00415432   94.5416     -0.900876  26.2743      76.753     1.37446
          HerbageNConc                     186  0.290509    0.0271952  0.0521192  0.00232256   0.144459     0.00635314  -0.811285  -0.0042435   0.0053289  1.34222
          NTakenOff                        132  -0.0167873  6.10316    0.0699225  0.441679     0.000443191  3.28928     -0.677122  0.222516     2.64537    1.29012
          RotationHarvestedWt              162  -0.051452   173.369    0.0629753  9.9018       0.00415468   93.7392     -0.868756  24.5964      75.9957    1.3628
          RedClover.AboveGround.Wt         54   0.476313    100.224    0.112952   15.5528      0.254829     70.7281     -0.267043  36.061       53.4428    1.11516
          RedClover.AboveGroundLive.NConc  186  0.183366    0.0288858  0.0473695  0.0021109    0.0753048    0.00879542  -2.47155   -0.00730056  0.0076042  1.85819
        AcceptedStatsName=Name n Slope Intercept SEslope SEintercept R2 RMSE NSE ME MAE RSR
        Memo Note: same as DataStore.PredictedObserved.Tests.Note
  Folder Validation
    Memo Note
      The performance of the red clover model is evaluated in simulations based on experiments conducted in New Zealand and Denmark.  These represent significant differences in environment and cover variations in irrigation and fertiliser rates, but the number of interactions are limited and thus more tests should be done for areas and management not considered here.  It is expected that more datasets will be added in the future with colaboration with end-users.

      **Note**: The definition of the main values compared (predicted versus measured) are given below to improve clarity.
       - AboveGroundWt: total biomass weight of plant material aboveground at the end of a given day;
       - HarvestedWt: biomass removed from the field at a given day;
       - RotationHarvestedWt: biomass removed from the field at the end of a defoliation event (used when defoliation occured over a few days);
       - CumulativeHarvestedWt: amount of harvested biomass accumulated over a growing season (between winters);
       - HerbageNc: average nitrogen concentration in the harvested material;
       - NTakenOff: amount of nitrogen taken off filed with the harvested material;
       - CumNTakenOff: amount of N harvested accumulated over a growing season;
    Folder New Zealand
      Experiment FRNLLincoln
        Memo
          ###FRNL Lincoln###

          Simulation setup based on field trial performed at Lincoln University Research Dairy Farm, New Zealand, between 2014 and 2016.  The experiment was part of the FRNL (Forages for Reduced Nitrogen Leaching) program (for more details see [MartinEtAl2017]).  Here only plots with pure red clover are used.
          The experiment consisted of six fertiliser treatments (N rates of 0, 50, 100, 200, 350 and 500 kg/ha/yr) in four replicates, and measurements comprised yield and quality indicators (here N content is used).
          Data supplied by Grant Edwards, Lincoln University.

          The soil at the experimental site was a Templeton fine sandy loam (an Immature Pallic soil, USDA: Udic Haplustept), the required parameters were inferred based on data from the New Zealand National Soils Database (Landcare Research).
          Weather data was obtained from nearby Broadfields weather station (NIWA).
        Factors
          Factor NRate: Specification=[FertiliserSchedule]
            Operations 0N
            Operations 50N
              2014-10-23  [Fertiliser].Apply(Amount: 5.6, Type: Fertiliser.Types.UreaN, Depth: 10)
              2014-11-26  [Fertiliser].Apply(Amount: 5.6, Type: Fertiliser.Types.UreaN, Depth: 10)
              2014-12-30  [Fertiliser].Apply(Amount: 5.6, Type: Fertiliser.Types.UreaN, Depth: 10)
              2015-02-05  [Fertiliser].Apply(Amount: 5.6, Type: Fertiliser.Types.UreaN, Depth: 10)
              2015-03-10  [Fertiliser].Apply(Amount: 5.6, Type: Fertiliser.Types.UreaN, Depth: 10)
              2015-04-17  [Fertiliser].Apply(Amount: 5.6, Type: Fertiliser.Types.UreaN, Depth: 10)
              2015-06-09  [Fertiliser].Apply(Amount: 5.6, Type: Fertiliser.Types.UreaN, Depth: 10)
              2015-10-06  [Fertiliser].Apply(Amount: 5.6, Type: Fertiliser.Types.UreaN, Depth: 10)
              2015-11-16  [Fertiliser].Apply(Amount: 5.6, Type: Fertiliser.Types.UreaN, Depth: 10)
              2015-12-16  [Fertiliser].Apply(Amount: 5.6, Type: Fertiliser.Types.UreaN, Depth: 10)
              2016-01-25  [Fertiliser].Apply(Amount: 5.6, Type: Fertiliser.Types.UreaN, Depth: 10)
              2016-02-26  [Fertiliser].Apply(Amount: 5.6, Type: Fertiliser.Types.UreaN, Depth: 10)
              2016-04-09  [Fertiliser].Apply(Amount: 5.6, Type: Fertiliser.Types.UreaN, Depth: 10)
              2016-05-24  [Fertiliser].Apply(Amount: 5.6, Type: Fertiliser.Types.UreaN, Depth: 10)
              2016-10-05  [Fertiliser].Apply(Amount: 5.6, Type: Fertiliser.Types.UreaN, Depth: 10)
              2016-11-10  [Fertiliser].Apply(Amount: 5.6, Type: Fertiliser.Types.UreaN, Depth: 10)
              2016-12-16  [Fertiliser].Apply(Amount: 5.6, Type: Fertiliser.Types.UreaN, Depth: 10)
            Operations 100N
              2014-10-23  [Fertiliser].Apply(Amount: 11.1, Type: Fertiliser.Types.UreaN, Depth: 10)
              2014-11-26  [Fertiliser].Apply(Amount: 11.1, Type: Fertiliser.Types.UreaN, Depth: 10)
              2014-12-30  [Fertiliser].Apply(Amount: 11.1, Type: Fertiliser.Types.UreaN, Depth: 10)
              2015-02-05  [Fertiliser].Apply(Amount: 11.1, Type: Fertiliser.Types.UreaN, Depth: 10)
              2015-03-10  [Fertiliser].Apply(Amount: 11.1, Type: Fertiliser.Types.UreaN, Depth: 10)
              2015-04-17  [Fertiliser].Apply(Amount: 11.1, Type: Fertiliser.Types.UreaN, Depth: 10)
              2015-06-09  [Fertiliser].Apply(Amount: 11.1, Type: Fertiliser.Types.UreaN, Depth: 10)
              2015-10-06  [Fertiliser].Apply(Amount: 11.1, Type: Fertiliser.Types.UreaN, Depth: 10)
              2015-11-16  [Fertiliser].Apply(Amount: 11.1, Type: Fertiliser.Types.UreaN, Depth: 10)
              2015-12-16  [Fertiliser].Apply(Amount: 11.1, Type: Fertiliser.Types.UreaN, Depth: 10)
              2016-01-25  [Fertiliser].Apply(Amount: 11.1, Type: Fertiliser.Types.UreaN, Depth: 10)
              2016-02-26  [Fertiliser].Apply(Amount: 11.1, Type: Fertiliser.Types.UreaN, Depth: 10)
              2016-04-09  [Fertiliser].Apply(Amount: 11.1, Type: Fertiliser.Types.UreaN, Depth: 10)
              2016-05-24  [Fertiliser].Apply(Amount: 11.1, Type: Fertiliser.Types.UreaN, Depth: 10)
              2016-10-05  [Fertiliser].Apply(Amount: 11.1, Type: Fertiliser.Types.UreaN, Depth: 10)
              2016-11-10  [Fertiliser].Apply(Amount: 11.1, Type: Fertiliser.Types.UreaN, Depth: 10)
              2016-12-16  [Fertiliser].Apply(Amount: 11.1, Type: Fertiliser.Types.UreaN, Depth: 10)
            Operations 200N
              2014-10-23  [Fertiliser].Apply(Amount: 22.2, Type: Fertiliser.Types.UreaN, Depth: 10)
              2014-11-26  [Fertiliser].Apply(Amount: 22.2, Type: Fertiliser.Types.UreaN, Depth: 10)
              2014-12-30  [Fertiliser].Apply(Amount: 22.2, Type: Fertiliser.Types.UreaN, Depth: 10)
              2015-02-05  [Fertiliser].Apply(Amount: 22.2, Type: Fertiliser.Types.UreaN, Depth: 10)
              2015-03-10  [Fertiliser].Apply(Amount: 22.2, Type: Fertiliser.Types.UreaN, Depth: 10)
              2015-04-17  [Fertiliser].Apply(Amount: 22.2, Type: Fertiliser.Types.UreaN, Depth: 10)
              2015-06-09  [Fertiliser].Apply(Amount: 22.2, Type: Fertiliser.Types.UreaN, Depth: 10)
              2015-10-06  [Fertiliser].Apply(Amount: 22.2, Type: Fertiliser.Types.UreaN, Depth: 10)
              2015-11-16  [Fertiliser].Apply(Amount: 22.2, Type: Fertiliser.Types.UreaN, Depth: 10)
              2015-12-16  [Fertiliser].Apply(Amount: 22.2, Type: Fertiliser.Types.UreaN, Depth: 10)
              2016-01-25  [Fertiliser].Apply(Amount: 22.2, Type: Fertiliser.Types.UreaN, Depth: 10)
              2016-02-26  [Fertiliser].Apply(Amount: 22.2, Type: Fertiliser.Types.UreaN, Depth: 10)
              2016-04-09  [Fertiliser].Apply(Amount: 22.2, Type: Fertiliser.Types.UreaN, Depth: 10)
              2016-05-24  [Fertiliser].Apply(Amount: 22.2, Type: Fertiliser.Types.UreaN, Depth: 10)
              2016-10-05  [Fertiliser].Apply(Amount: 22.2, Type: Fertiliser.Types.UreaN, Depth: 10)
              2016-11-10  [Fertiliser].Apply(Amount: 22.2, Type: Fertiliser.Types.UreaN, Depth: 10)
              2016-12-16  [Fertiliser].Apply(Amount: 22.2, Type: Fertiliser.Types.UreaN, Depth: 10)
            Operations 350N
              2014-10-23  [Fertiliser].Apply(Amount: 38.9, Type: Fertiliser.Types.UreaN, Depth: 10)
              2014-11-26  [Fertiliser].Apply(Amount: 38.9, Type: Fertiliser.Types.UreaN, Depth: 10)
              2014-12-30  [Fertiliser].Apply(Amount: 38.9, Type: Fertiliser.Types.UreaN, Depth: 10)
              2015-02-05  [Fertiliser].Apply(Amount: 38.9, Type: Fertiliser.Types.UreaN, Depth: 10)
              2015-03-10  [Fertiliser].Apply(Amount: 38.9, Type: Fertiliser.Types.UreaN, Depth: 10)
              2015-04-17  [Fertiliser].Apply(Amount: 38.9, Type: Fertiliser.Types.UreaN, Depth: 10)
              2015-06-09  [Fertiliser].Apply(Amount: 38.9, Type: Fertiliser.Types.UreaN, Depth: 10)
              2015-10-06  [Fertiliser].Apply(Amount: 38.9, Type: Fertiliser.Types.UreaN, Depth: 10)
              2015-11-16  [Fertiliser].Apply(Amount: 38.9, Type: Fertiliser.Types.UreaN, Depth: 10)
              2015-12-16  [Fertiliser].Apply(Amount: 38.9, Type: Fertiliser.Types.UreaN, Depth: 10)
              2016-01-25  [Fertiliser].Apply(Amount: 38.9, Type: Fertiliser.Types.UreaN, Depth: 10)
              2016-02-26  [Fertiliser].Apply(Amount: 38.9, Type: Fertiliser.Types.UreaN, Depth: 10)
              2016-04-09  [Fertiliser].Apply(Amount: 38.9, Type: Fertiliser.Types.UreaN, Depth: 10)
              2016-05-24  [Fertiliser].Apply(Amount: 38.9, Type: Fertiliser.Types.UreaN, Depth: 10)
              2016-10-05  [Fertiliser].Apply(Amount: 38.9, Type: Fertiliser.Types.UreaN, Depth: 10)
              2016-11-10  [Fertiliser].Apply(Amount: 38.9, Type: Fertiliser.Types.UreaN, Depth: 10)
              2016-12-16  [Fertiliser].Apply(Amount: 38.9, Type: Fertiliser.Types.UreaN, Depth: 10)
            Operations 500N
              2014-10-23  [Fertiliser].Apply(Amount: 55.6, Type: Fertiliser.Types.UreaN, Depth: 10)
              2014-11-26  [Fertiliser].Apply(Amount: 55.6, Type: Fertiliser.Types.UreaN, Depth: 10)
              2014-12-30  [Fertiliser].Apply(Amount: 55.6, Type: Fertiliser.Types.UreaN, Depth: 10)
              2015-02-05  [Fertiliser].Apply(Amount: 55.6, Type: Fertiliser.Types.UreaN, Depth: 10)
              2015-03-10  [Fertiliser].Apply(Amount: 55.6, Type: Fertiliser.Types.UreaN, Depth: 10)
              2015-04-17  [Fertiliser].Apply(Amount: 55.6, Type: Fertiliser.Types.UreaN, Depth: 10)
              2015-06-09  [Fertiliser].Apply(Amount: 55.6, Type: Fertiliser.Types.UreaN, Depth: 10)
              2015-10-06  [Fertiliser].Apply(Amount: 55.6, Type: Fertiliser.Types.UreaN, Depth: 10)
              2015-11-16  [Fertiliser].Apply(Amount: 55.6, Type: Fertiliser.Types.UreaN, Depth: 10)
              2015-12-16  [Fertiliser].Apply(Amount: 55.6, Type: Fertiliser.Types.UreaN, Depth: 10)
              2016-01-25  [Fertiliser].Apply(Amount: 55.6, Type: Fertiliser.Types.UreaN, Depth: 10)
              2016-02-26  [Fertiliser].Apply(Amount: 55.6, Type: Fertiliser.Types.UreaN, Depth: 10)
              2016-04-09  [Fertiliser].Apply(Amount: 55.6, Type: Fertiliser.Types.UreaN, Depth: 10)
              2016-05-24  [Fertiliser].Apply(Amount: 55.6, Type: Fertiliser.Types.UreaN, Depth: 10)
              2016-10-05  [Fertiliser].Apply(Amount: 55.6, Type: Fertiliser.Types.UreaN, Depth: 10)
              2016-11-10  [Fertiliser].Apply(Amount: 55.6, Type: Fertiliser.Types.UreaN, Depth: 10)
              2016-12-16  [Fertiliser].Apply(Amount: 55.6, Type: Fertiliser.Types.UreaN, Depth: 10)
        Simulation FRNLLincoln
          Clock: Start=2014-02-01; End=2016-11-30
          Weather: FileName=Lincoln-Broadfields.met
          Summary summaryfile
          SoilArbitrator Soil Arbitrator
          Zone Field: Area=1; Slope=0; AspectAngle=0; Altitude=50
            Folder Management
              Operations Sowing
                2014-03-20  [RedClover].Sow(population: 500, cultivar: "Colenso", depth: 5, rowSpacing: 150)
              Operations IrrigationSchedule
                2014-10-31  [Irrigation].Apply(amount: 7, efficiency: 0.8)
                2014-11-03  [Irrigation].Apply(amount: 7, efficiency: 0.8)
                2014-11-05  [Irrigation].Apply(amount: 8, efficiency: 0.8)
                2014-11-07  [Irrigation].Apply(amount: 8, efficiency: 0.8)
                2014-11-10  [Irrigation].Apply(amount: 7, efficiency: 0.8)
                2014-11-11  [Irrigation].Apply(amount: 7, efficiency: 0.8)
                2014-11-12  [Irrigation].Apply(amount: 8, efficiency: 0.8)
                2014-11-17  [Irrigation].Apply(amount: 9, efficiency: 0.8)
                2014-11-18  [Irrigation].Apply(amount: 7, efficiency: 0.8)
                2014-11-19  [Irrigation].Apply(amount: 7, efficiency: 0.8)
                2014-11-24  [Irrigation].Apply(amount: 8, efficiency: 0.8)
                2014-11-25  [Irrigation].Apply(amount: 9, efficiency: 0.8)
                2014-11-27  [Irrigation].Apply(amount: 10, efficiency: 0.8)
                2014-12-01  [Irrigation].Apply(amount: 8, efficiency: 0.8)
                2014-12-02  [Irrigation].Apply(amount: 8, efficiency: 0.8)
                2014-12-04  [Irrigation].Apply(amount: 7, efficiency: 0.8)
                2014-12-08  [Irrigation].Apply(amount: 7, efficiency: 0.8)
                2014-12-09  [Irrigation].Apply(amount: 7, efficiency: 0.8)
                2014-12-12  [Irrigation].Apply(amount: 8, efficiency: 0.8)
                2014-12-15  [Irrigation].Apply(amount: 10, efficiency: 0.8)
                2014-12-17  [Irrigation].Apply(amount: 10, efficiency: 0.8)
                2014-12-19  [Irrigation].Apply(amount: 7, efficiency: 0.8)
                2014-12-20  [Irrigation].Apply(amount: 7, efficiency: 0.8)
                2014-12-21  [Irrigation].Apply(amount: 8, efficiency: 0.8)
                2014-12-22  [Irrigation].Apply(amount: 10, efficiency: 0.8)
                2014-12-25  [Irrigation].Apply(amount: 8, efficiency: 0.8)
                2014-12-26  [Irrigation].Apply(amount: 8, efficiency: 0.8)
                2014-12-27  [Irrigation].Apply(amount: 7, efficiency: 0.8)
                2014-12-28  [Irrigation].Apply(amount: 10, efficiency: 0.8)
                2014-12-29  [Irrigation].Apply(amount: 8, efficiency: 0.8)
                2014-12-30  [Irrigation].Apply(amount: 8, efficiency: 0.8)
                2015-01-02  [Irrigation].Apply(amount: 7, efficiency: 0.8)
                2015-01-05  [Irrigation].Apply(amount: 10, efficiency: 0.8)
                2015-01-08  [Irrigation].Apply(amount: 8, efficiency: 0.8)
                2015-01-09  [Irrigation].Apply(amount: 9, efficiency: 0.8)
                2015-01-12  [Irrigation].Apply(amount: 7, efficiency: 0.8)
                2015-01-13  [Irrigation].Apply(amount: 7, efficiency: 0.8)
                2015-01-16  [Irrigation].Apply(amount: 8, efficiency: 0.8)
                2015-01-19  [Irrigation].Apply(amount: 7, efficiency: 0.8)
                2015-01-20  [Irrigation].Apply(amount: 7, efficiency: 0.8)
                2015-01-21  [Irrigation].Apply(amount: 8, efficiency: 0.8)
                2015-01-26  [Irrigation].Apply(amount: 10, efficiency: 0.8)
                2015-01-27  [Irrigation].Apply(amount: 10, efficiency: 0.8)
                2015-01-29  [Irrigation].Apply(amount: 8, efficiency: 0.8)
                2015-02-02  [Irrigation].Apply(amount: 10, efficiency: 0.8)
                2015-02-04  [Irrigation].Apply(amount: 8, efficiency: 0.8)
                2015-02-05  [Irrigation].Apply(amount: 7, efficiency: 0.8)
                2015-02-09  [Irrigation].Apply(amount: 8, efficiency: 0.8)
                2015-02-11  [Irrigation].Apply(amount: 7, efficiency: 0.8)
                2015-02-12  [Irrigation].Apply(amount: 10, efficiency: 0.8)
                2015-02-16  [Irrigation].Apply(amount: 10, efficiency: 0.8)
                2015-02-17  [Irrigation].Apply(amount: 10, efficiency: 0.8)
                2015-02-18  [Irrigation].Apply(amount: 8, efficiency: 0.8)
                2015-02-24  [Irrigation].Apply(amount: 10, efficiency: 0.8)
                2015-02-26  [Irrigation].Apply(amount: 7, efficiency: 0.8)
                2015-02-27  [Irrigation].Apply(amount: 8, efficiency: 0.8)
                2015-03-02  [Irrigation].Apply(amount: 7, efficiency: 0.8)
                2015-03-03  [Irrigation].Apply(amount: 7, efficiency: 0.8)
                2015-03-05  [Irrigation].Apply(amount: 8, efficiency: 0.8)
                2015-03-10  [Irrigation].Apply(amount: 8, efficiency: 0.8)
                2015-03-12  [Irrigation].Apply(amount: 9, efficiency: 0.8)
                2015-03-13  [Irrigation].Apply(amount: 7, efficiency: 0.8)
                2015-03-16  [Irrigation].Apply(amount: 10, efficiency: 0.8)
                2015-03-19  [Irrigation].Apply(amount: 9, efficiency: 0.8)
                2015-03-20  [Irrigation].Apply(amount: 8, efficiency: 0.8)
                2015-03-23  [Irrigation].Apply(amount: 9, efficiency: 0.8)
                2015-03-24  [Irrigation].Apply(amount: 7, efficiency: 0.8)
                2015-03-26  [Irrigation].Apply(amount: 10, efficiency: 0.8)
                2015-03-30  [Irrigation].Apply(amount: 7, efficiency: 0.8)
                2015-04-02  [Irrigation].Apply(amount: 10, efficiency: 0.8)
                2015-04-03  [Irrigation].Apply(amount: 8, efficiency: 0.8)
                2015-04-06  [Irrigation].Apply(amount: 7, efficiency: 0.8)
                2015-04-08  [Irrigation].Apply(amount: 10, efficiency: 0.8)
                2015-04-17  [Irrigation].Apply(amount: 10, efficiency: 0.8)
                2015-05-20  [Irrigation].Apply(amount: 10, efficiency: 0.8)
                2015-06-09  [Irrigation].Apply(amount: 10, efficiency: 0.8)
                2015-09-09  [Irrigation].Apply(amount: 10, efficiency: 0.8)
                2015-09-30  [Irrigation].Apply(amount: 10, efficiency: 0.8)
                2015-10-02  [Irrigation].Apply(amount: 8, efficiency: 0.8)
                2015-10-06  [Irrigation].Apply(amount: 10, efficiency: 0.8)
                2015-10-09  [Irrigation].Apply(amount: 10, efficiency: 0.8)
                2015-10-12  [Irrigation].Apply(amount: 8, efficiency: 0.8)
                2015-10-13  [Irrigation].Apply(amount: 7, efficiency: 0.8)
                2015-10-16  [Irrigation].Apply(amount: 10, efficiency: 0.8)
                2015-10-20  [Irrigation].Apply(amount: 10, efficiency: 0.8)
                2015-10-21  [Irrigation].Apply(amount: 8, efficiency: 0.8)
                2015-10-23  [Irrigation].Apply(amount: 7, efficiency: 0.8)
                2015-10-26  [Irrigation].Apply(amount: 7, efficiency: 0.8)
                2015-10-27  [Irrigation].Apply(amount: 9, efficiency: 0.8)
                2015-11-02  [Irrigation].Apply(amount: 10, efficiency: 0.8)
                2015-11-03  [Irrigation].Apply(amount: 8, efficiency: 0.8)
                2015-11-04  [Irrigation].Apply(amount: 9, efficiency: 0.8)
                2015-11-06  [Irrigation].Apply(amount: 9, efficiency: 0.8)
                2015-11-09  [Irrigation].Apply(amount: 10, efficiency: 0.8)
                2015-11-11  [Irrigation].Apply(amount: 7, efficiency: 0.8)
                2015-11-16  [Irrigation].Apply(amount: 10, efficiency: 0.8)
                2015-11-18  [Irrigation].Apply(amount: 9, efficiency: 0.8)
                2015-11-20  [Irrigation].Apply(amount: 7, efficiency: 0.8)
                2015-11-23  [Irrigation].Apply(amount: 10, efficiency: 0.8)
                2015-11-24  [Irrigation].Apply(amount: 8, efficiency: 0.8)
                2015-11-25  [Irrigation].Apply(amount: 7, efficiency: 0.8)
                2015-11-27  [Irrigation].Apply(amount: 9, efficiency: 0.8)
                2015-11-30  [Irrigation].Apply(amount: 7, efficiency: 0.8)
                2015-12-01  [Irrigation].Apply(amount: 7, efficiency: 0.8)
                2015-12-04  [Irrigation].Apply(amount: 9, efficiency: 0.8)
                2015-12-07  [Irrigation].Apply(amount: 10, efficiency: 0.8)
                2015-12-09  [Irrigation].Apply(amount: 9, efficiency: 0.8)
                2015-12-10  [Irrigation].Apply(amount: 9, efficiency: 0.8)
                2015-12-22  [Irrigation].Apply(amount: 8, efficiency: 0.8)
                2015-12-24  [Irrigation].Apply(amount: 9, efficiency: 0.8)
                2015-12-26  [Irrigation].Apply(amount: 8, efficiency: 0.8)
                2015-12-29  [Irrigation].Apply(amount: 7, efficiency: 0.8)
                2015-12-31  [Irrigation].Apply(amount: 7, efficiency: 0.8)
                2016-01-01  [Irrigation].Apply(amount: 10, efficiency: 0.8)
                2016-01-07  [Irrigation].Apply(amount: 10, efficiency: 0.8)
                2016-01-09  [Irrigation].Apply(amount: 7, efficiency: 0.8)
                2016-01-11  [Irrigation].Apply(amount: 7, efficiency: 0.8)
                2016-01-12  [Irrigation].Apply(amount: 7, efficiency: 0.8)
                2016-01-13  [Irrigation].Apply(amount: 9, efficiency: 0.8)
                2016-01-15  [Irrigation].Apply(amount: 10, efficiency: 0.8)
                2016-01-21  [Irrigation].Apply(amount: 7, efficiency: 0.8)
                2016-01-25  [Irrigation].Apply(amount: 8, efficiency: 0.8)
                2016-01-30  [Irrigation].Apply(amount: 7, efficiency: 0.8)
                2016-02-02  [Irrigation].Apply(amount: 10, efficiency: 0.8)
                2016-02-03  [Irrigation].Apply(amount: 10, efficiency: 0.8)
                2016-02-05  [Irrigation].Apply(amount: 9, efficiency: 0.8)
                2016-02-08  [Irrigation].Apply(amount: 10, efficiency: 0.8)
                2016-02-11  [Irrigation].Apply(amount: 10, efficiency: 0.8)
                2016-02-12  [Irrigation].Apply(amount: 7, efficiency: 0.8)
                2016-02-15  [Irrigation].Apply(amount: 8, efficiency: 0.8)
                2016-02-16  [Irrigation].Apply(amount: 8, efficiency: 0.8)
                2016-02-22  [Irrigation].Apply(amount: 7, efficiency: 0.8)
                2016-02-23  [Irrigation].Apply(amount: 7, efficiency: 0.8)
                2016-02-25  [Irrigation].Apply(amount: 7, efficiency: 0.8)
                2016-02-26  [Irrigation].Apply(amount: 7, efficiency: 0.8)
                2016-03-01  [Irrigation].Apply(amount: 7, efficiency: 0.8)
                2016-03-02  [Irrigation].Apply(amount: 8, efficiency: 0.8)
                2016-03-04  [Irrigation].Apply(amount: 10, efficiency: 0.8)
                2016-03-07  [Irrigation].Apply(amount: 9, efficiency: 0.8)
                2016-03-08  [Irrigation].Apply(amount: 4, efficiency: 0.8)
                2016-03-10  [Irrigation].Apply(amount: 8, efficiency: 0.8)
                2016-03-14  [Irrigation].Apply(amount: 8, efficiency: 0.8)
                2016-03-15  [Irrigation].Apply(amount: 10, efficiency: 0.8)
                2016-03-18  [Irrigation].Apply(amount: 9, efficiency: 0.8)
                2016-03-21  [Irrigation].Apply(amount: 10, efficiency: 0.8)
                2016-03-22  [Irrigation].Apply(amount: 9, efficiency: 0.8)
                2016-03-23  [Irrigation].Apply(amount: 9, efficiency: 0.8)
                2016-03-28  [Irrigation].Apply(amount: 8, efficiency: 0.8)
                2016-04-02  [Irrigation].Apply(amount: 10, efficiency: 0.8)
                2016-04-08  [Irrigation].Apply(amount: 10, efficiency: 0.8)
                2016-05-04  [Irrigation].Apply(amount: 10, efficiency: 0.8)
                2016-08-31  [Irrigation].Apply(amount: 10, efficiency: 0.8)
                2016-09-30  [Irrigation].Apply(amount: 7, efficiency: 0.8)
                2016-10-01  [Irrigation].Apply(amount: 8, efficiency: 0.8)
                2016-10-05  [Irrigation].Apply(amount: 10, efficiency: 0.8)
                2016-10-12  [Irrigation].Apply(amount: 10, efficiency: 0.8)
                2016-10-18  [Irrigation].Apply(amount: 10, efficiency: 0.8)
                2016-10-19  [Irrigation].Apply(amount: 8, efficiency: 0.8)
                2016-10-27  [Irrigation].Apply(amount: 10, efficiency: 0.8)
                2016-10-31  [Irrigation].Apply(amount: 9, efficiency: 0.8)
                2016-11-01  [Irrigation].Apply(amount: 8, efficiency: 0.8)
                2016-11-03  [Irrigation].Apply(amount: 8, efficiency: 0.8)
                2016-11-08  [Irrigation].Apply(amount: 7, efficiency: 0.8)
                2016-11-10  [Irrigation].Apply(amount: 8, efficiency: 0.8)
                2016-11-11  [Irrigation].Apply(amount: 9, efficiency: 0.8)
                2016-11-14  [Irrigation].Apply(amount: 7, efficiency: 0.8)
                2016-11-21  [Irrigation].Apply(amount: 7, efficiency: 0.8)
                2016-11-22  [Irrigation].Apply(amount: 8, efficiency: 0.8)
                2016-11-23  [Irrigation].Apply(amount: 7, efficiency: 0.8)
                2016-11-24  [Irrigation].Apply(amount: 7, efficiency: 0.8)
                2016-11-28  [Irrigation].Apply(amount: 8, efficiency: 0.8)
                2016-11-29  [Irrigation].Apply(amount: 9, efficiency: 0.8)
              Operations FertiliserSchedule
              Manager DefoliationManager
                Message =
```csharp
using APSIM.Shared.Utilities;
using System.Xml.Serialization;
using Models.PMF;
using Models.Soils;
using Models;
using System.Text;
using System.Collections.Generic;
using Models.Core;
using System;

namespace Models
{
    [Serializable]
    public class Script : Model
    {
        [Description("This script is set in 'Replacements':")]
        public string Message { get; set; }
    }
}
```
              Operations DefoliationSchedule
                2014-10-23  [DefoliationManager].Script.Defoliate(defoliationType: "Cut", amountDM: 40, amountType: "ResidualDM", duration: 1)
                2014-11-25  [DefoliationManager].Script.Defoliate(defoliationType: "Cut", amountDM: 40, amountType: "ResidualDM", duration: 1)
                2014-12-30  [DefoliationManager].Script.Defoliate(defoliationType: "Cut", amountDM: 40, amountType: "ResidualDM", duration: 1)
                2015-02-04  [DefoliationManager].Script.Defoliate(defoliationType: "Cut", amountDM: 40, amountType: "ResidualDM", duration: 1)
                2015-03-10  [DefoliationManager].Script.Defoliate(defoliationType: "Cut", amountDM: 40, amountType: "ResidualDM", duration: 1)
                2015-04-16  [DefoliationManager].Script.Defoliate(defoliationType: "Cut", amountDM: 40, amountType: "ResidualDM", duration: 1)
                2015-06-09  [DefoliationManager].Script.Defoliate(defoliationType: "Cut", amountDM: 40, amountType: "ResidualDM", duration: 1)
                2015-10-06  [DefoliationManager].Script.Defoliate(defoliationType: "Cut", amountDM: 40, amountType: "ResidualDM", duration: 1)
                2015-11-16  [DefoliationManager].Script.Defoliate(defoliationType: "Cut", amountDM: 40, amountType: "ResidualDM", duration: 1)
                2015-12-16  [DefoliationManager].Script.Defoliate(defoliationType: "Cut", amountDM: 40, amountType: "ResidualDM", duration: 1)
                2016-01-25  [DefoliationManager].Script.Defoliate(defoliationType: "Cut", amountDM: 40, amountType: "ResidualDM", duration: 1)
                2016-02-24  [DefoliationManager].Script.Defoliate(defoliationType: "Cut", amountDM: 40, amountType: "ResidualDM", duration: 1)
                2016-04-09  [DefoliationManager].Script.Defoliate(defoliationType: "Cut", amountDM: 40, amountType: "ResidualDM", duration: 1)
                2016-05-24  [DefoliationManager].Script.Defoliate(defoliationType: "Cut", amountDM: 40, amountType: "ResidualDM", duration: 1)
                2016-10-03  [DefoliationManager].Script.Defoliate(defoliationType: "Cut", amountDM: 40, amountType: "ResidualDM", duration: 1)
                2016-11-11  [DefoliationManager].Script.Defoliate(defoliationType: "Cut", amountDM: 40, amountType: "ResidualDM", duration: 1)
              Manager ExtraVariables
```csharp
// This will be replaced by the "ExtraVariables" section in "Replacements"

using Models.Core;
using System;

namespace Models
{
    [Serializable] 
    public class Script : Model
    {
    }
}
```
            MicroClimate: a_interception=0; b_interception=1; c_interception=0; d_interception=0; soil_albedo=0.23; SoilHeatFluxFraction=0.4; MinimumHeightDiffForNewLayer=0; NightInterceptionFraction=0.5; ReferenceHeight=2
            Irrigation
            Fertiliser
            SurfaceOrganicMatter: InitialResidueName=grass; InitialResidueType=grass; InitialResidueMass=1000; InitialStandingFraction=0; InitialCPR=0; InitialCNR=30
            Soil: SoilType=Udic Haplustept (US),  Immature Pallic Soil (NZ); LocalName=Paparua Deep Sandy Loam; Site=LURDF; NearestTown=Lincoln; Region=Canterbury; Country=New Zealand; Latitude=0; Longitude=0
              DataSource=Adapted based on data from the NZ National Soils Database plus published data (Carey et al, 2002; Schwaertzel et al, 2011; Woods et al, 2016)
              Comments=Different references name the soil at the site as either Templeton sandy loam or Paparua sandy loam (very similar soils)
              Chemical
                Thickness  NO3N       NH4N       PH
                100        11.1019    1.38773    6
                120        8.87479    1.00312    6
                150        4.05595    0.422709   6
                230        0.366719   0.0733439  6
                130        0.366719   0.0733439  6
                250        0.151593   0.0547699  6
                220        0.0729219  0.0170005  6
                300        0.0669254  0.0133851  6
              Physical
                Thickness  ParticleSizeClay  BD     AirDry  LL15   DUL    SAT    KS
                100        17.8              1.154  0.051   0.151  0.338  0.512  2559.2
                120        17.8              1.295  0.14    0.146  0.328  0.469  2142.3
                150        15.9              1.441  0.129   0.129  0.279  0.427  1019.5
                230        14.1              1.544  0.111   0.111  0.271  0.394  310.6
                130        7.3               1.505  0.08    0.08   0.244  0.413  434.9
                250        9.6               1.504  0.072   0.072  0.234  0.406  791
                220        7                 1.517  0.085   0.085  0.254  0.401  744.1
                300        9.5               1.479  0.082   0.082  0.257  0.413  411.2
                SoilCrop RedCloverSoil: LL=[0.151, 0.146, 0.129, 0.111, 0.08, 0.072, 0.085, 0.082]; KL=[0.12, 0.11, 0.08, 0.05, 0.02, 0.005, 0, 0]; XF=[1, 1, 1, 1, 1, 1, 1, 1]
              WaterBalance SoilWater: SummerDate=1-Oct; SummerU=8; SummerCona=4; WinterDate=1-Apr; WinterU=5; WinterCona=1.5; DiffusConst=88; DiffusSlope=35; Salb=0.2; CN2Bare=60; CNRed=20; CNCov=0.8; DischargeWidth=0; CatchmentArea=0; Thickness=[100, 120, 150, 230, 130, 250, 220, 300]; SWCON=[0.59, 0.59, 0.55, 0.48, 0.53, 0.5, 0.51, 0.45]
              SoilNitrogen: fom_types=[default, manure, mucuna, lablab, shemp, stable]; fract_carb=[0.2, 0.3, 0.54, 0.57, 0.45, 0]; fract_cell=[0.7, 0.3, 0.37, 0.37, 0.47, 0.1]; fract_lign=[0.1, 0.4, 0.09, 0.06, 0.08, 0.9]; NPartitionApproach=0
                SoilNitrogenNO3 NO3
                SoilNitrogenNH4 NH4
                SoilNitrogenUrea Urea
                SoilNitrogenPlantAvailableNO3 PlantAvailableNO3
                SoilNitrogenPlantAvailableNH4 PlantAvailableNH4
              Organic: FOMCNRatio=35
                Thickness  Carbon  SoilCNRatio  FBiom  FInert  FOM
                100        2.94    11.3         0.08   0.3     450
                120        2.17    11.3         0.055  0.45    412.5
                150        0.99    11.5         0.015  0.72    322.5
                230        0.35    11.75        0.009  0.87    150
                130        0.24    12           0.008  0.95    75
                250        0.2     12.25        0.007  0.99    45
                220        0.15    12.5         0.005  0.995   30
                300        0.1     12.5         0.005  0.995   15
              CERESSoilTemperature Temperature
              InitialWater Initial water: PercentMethod=1; FractionFull=0.75
            Plant RedClover
            Report: EventNames=[Clock].DoReport
      Experiment Iversen
        Memo
          This simulation setup was based on a dataset supplied by Hamish Brown, which was collected for his PhD thesis.  The trial was conducted at the Iversen field of Lincoln University, in Lincoln, New Zealand between 1996 and 2002 ([BrownThesis_2004]; [BrownEtAl_2005]).  The work was focused on understanding water use and its interaction with yield of dryland and irrigated forage crops (lucerne, chicory and red clover were used).
          The trial was implemented in spring of 1996, after conventional cultivation, including sub soiling and liming.  Red clover (cultivar '*Pawera*') was sown at a rate of 10.0 kg/ha and was grazed regularly by sheep.  There were annual applications of superphosphate but no N fertilisation (except excreta from grazing sheep).  The treatments consisted of irrigation versus dryland conditions.  The major parameters analysed were herbage growth and yield, population, nutritive characteristics, and water utilisation.  N concentration was inferred from the few measurements of crude protein and interpolated over time using a sinusoidal function; these values are for reference only and cannot be used to actually validate the model.
          Soil data was obtained from measurements presented by H. Brown Thesis ([BrownThesis_2004]) and complemented by S-MAP database from Landcare Research Limited. Weather data was obtained from the nearby Broadfield met station in Lincoln.
        Factors
          Factor Irrigation: Specification=[IrrigationSchedule]
            Operations Full
              1996-10-21  [Irrigation].Apply(amount: 40)
              1996-12-04  [Irrigation].Apply(amount: 40)
              1997-10-31  [Irrigation].Apply(amount: 30)
              1997-12-03  [Irrigation].Apply(amount: 50)
              1997-12-17  [Irrigation].Apply(amount: 40)
              1998-01-16  [Irrigation].Apply(amount: 30)
              1998-01-23  [Irrigation].Apply(amount: 26)
              1998-02-19  [Irrigation].Apply(amount: 62)
              1998-03-06  [Irrigation].Apply(amount: 23)
              1998-03-31  [Irrigation].Apply(amount: 31)
              1998-09-12  [Irrigation].Apply(amount: 90)
              1998-11-16  [Irrigation].Apply(amount: 150)
              1999-01-23  [Irrigation].Apply(amount: 127)
              1999-02-27  [Irrigation].Apply(amount: 70)
              1999-12-12  [Irrigation].Apply(amount: 30)
              2000-01-23  [Irrigation].Apply(amount: 50)
              2000-12-29  [Irrigation].Apply(amount: 75)
              2001-02-03  [Irrigation].Apply(amount: 95)
              2001-03-21  [Irrigation].Apply(amount: 65)
              2001-04-27  [Irrigation].Apply(amount: 45)
              2001-12-21  [Irrigation].Apply(amount: 65)
            Operations Nil
              1998-09-15  [Irrigation].Apply(amount: 150)
        Simulation Iversen
          Weather: FileName=Lincoln-Broadfields.met
          Clock: Start=1996-09-20; End=2000-06-30
          Summary summaryfile
          SoilArbitrator Soil Arbitrator
          Zone Field: Area=1; Slope=0; AspectAngle=0; Altitude=50
            Folder Management
              Operations Sowing
                1996-11-01  [RedClover].Sow(population: 350, cultivar: "Pawera", depth: 10, rowSpacing: 150)
              Operations IrrigationSchedule
              Operations ExcretaSchedule
                1997-02-25  [SurfaceOrganicMatter].Add(mass: 107.4, N: 19.2, P: 0.0, type: "RuminantDung_PastureFed", name "dung")
                1997-02-25  [Fertiliser].Apply(Amount: 28.8, Type: Fertiliser.Types.UreaN, Depth: 30)
                1997-06-07  [SurfaceOrganicMatter].Add(mass: 163.2, N: 29.1, P: 0.0, type: "RuminantDung_PastureFed", name "dung")
                1997-06-07  [Fertiliser].Apply(Amount: 43.7, Type: Fertiliser.Types.UreaN, Depth: 30)
                1997-10-09  [SurfaceOrganicMatter].Add(mass: 98.5, N: 17.6, P: 0.0, type: "RuminantDung_PastureFed", name "dung")
                1997-10-09  [Fertiliser].Apply(Amount: 26.4, Type: Fertiliser.Types.UreaN, Depth: 30)
                1997-11-22  [SurfaceOrganicMatter].Add(mass: 150.1, N: 26.8, P: 0.0, type: "RuminantDung_PastureFed", name "dung")
                1997-11-22  [Fertiliser].Apply(Amount: 40.2, Type: Fertiliser.Types.UreaN, Depth: 30)
                1997-12-26  [SurfaceOrganicMatter].Add(mass: 69.8, N: 12.5, P: 0.0, type: "RuminantDung_PastureFed", name "dung")
                1997-12-26  [Fertiliser].Apply(Amount: 18.7, Type: Fertiliser.Types.UreaN, Depth: 30)
                1998-02-05  [SurfaceOrganicMatter].Add(mass: 65.3, N: 11.7, P: 0.0, type: "RuminantDung_PastureFed", name "dung")
                1998-02-05  [Fertiliser].Apply(Amount: 17.5, Type: Fertiliser.Types.UreaN, Depth: 30)
                1998-03-14  [SurfaceOrganicMatter].Add(mass: 35.1, N: 6.3, P: 0.0, type: "RuminantDung_PastureFed", name "dung")
                1998-03-14  [Fertiliser].Apply(Amount: 9.4, Type: Fertiliser.Types.UreaN, Depth: 30)
                1998-05-31  [SurfaceOrganicMatter].Add(mass: 48.3, N: 8.6, P: 0.0, type: "RuminantDung_PastureFed", name "dung")
                1998-05-31  [Fertiliser].Apply(Amount: 12.9, Type: Fertiliser.Types.UreaN, Depth: 30)
                1998-10-04  [SurfaceOrganicMatter].Add(mass: 97.0, N: 17.3, P: 0.0, type: "RuminantDung_PastureFed", name "dung")
                1998-10-04  [Fertiliser].Apply(Amount: 26.0, Type: Fertiliser.Types.UreaN, Depth: 30)
                1998-11-13  [SurfaceOrganicMatter].Add(mass: 119.0, N: 21.2, P: 0.0, type: "RuminantDung_PastureFed", name "dung")
                1998-11-13  [Fertiliser].Apply(Amount: 31.9, Type: Fertiliser.Types.UreaN, Depth: 30)
                1998-12-18  [SurfaceOrganicMatter].Add(mass: 52.7, N: 9.4, P: 0.0, type: "RuminantDung_PastureFed", name "dung")
                1998-12-18  [Fertiliser].Apply(Amount: 14.1, Type: Fertiliser.Types.UreaN, Depth: 30)
                1999-01-15  [SurfaceOrganicMatter].Add(mass: 57.5, N: 10.3, P: 0.0, type: "RuminantDung_PastureFed", name "dung")
                1999-01-15  [Fertiliser].Apply(Amount: 15.4, Type: Fertiliser.Types.UreaN, Depth: 30)
                1999-02-20  [SurfaceOrganicMatter].Add(mass: 23.1, N: 4.1, P: 0.0, type: "RuminantDung_PastureFed", name "dung")
                1999-02-20  [Fertiliser].Apply(Amount: 6.2, Type: Fertiliser.Types.UreaN, Depth: 30)
                1999-04-15  [SurfaceOrganicMatter].Add(mass: 72.3, N: 12.9, P: 0.0, type: "RuminantDung_PastureFed", name "dung")
                1999-04-15  [Fertiliser].Apply(Amount: 19.4, Type: Fertiliser.Types.UreaN, Depth: 30)
                1999-06-25  [SurfaceOrganicMatter].Add(mass: 38.9, N: 6.9, P: 0.0, type: "RuminantDung_PastureFed", name "dung")
                1999-06-25  [Fertiliser].Apply(Amount: 10.4, Type: Fertiliser.Types.UreaN, Depth: 30)
                1999-10-02  [SurfaceOrganicMatter].Add(mass: 126.2, N: 22.5, P: 0.0, type: "RuminantDung_PastureFed", name "dung")
                1999-10-02  [Fertiliser].Apply(Amount: 33.8, Type: Fertiliser.Types.UreaN, Depth: 30)
                1999-11-13  [SurfaceOrganicMatter].Add(mass: 156.4, N: 27.9, P: 0.0, type: "RuminantDung_PastureFed", name "dung")
                1999-11-13  [Fertiliser].Apply(Amount: 41.9, Type: Fertiliser.Types.UreaN, Depth: 30)
                1999-12-23  [SurfaceOrganicMatter].Add(mass: 67.8, N: 12.1, P: 0.0, type: "RuminantDung_PastureFed", name "dung")
                1999-12-23  [Fertiliser].Apply(Amount: 18.2, Type: Fertiliser.Types.UreaN, Depth: 30)
                2000-01-23  [SurfaceOrganicMatter].Add(mass: 53.4, N: 9.5, P: 0.0, type: "RuminantDung_PastureFed", name "dung")
                2000-01-23  [Fertiliser].Apply(Amount: 14.3, Type: Fertiliser.Types.UreaN, Depth: 30)
                2000-03-15  [SurfaceOrganicMatter].Add(mass: 91.6, N: 16.4, P: 0.0, type: "RuminantDung_PastureFed", name "dung")
                2000-03-15  [Fertiliser].Apply(Amount: 24.5, Type: Fertiliser.Types.UreaN, Depth: 30)
                2000-05-27  [SurfaceOrganicMatter].Add(mass: 65.7, N: 11.7, P: 0.0, type: "RuminantDung_PastureFed", name "dung")
                2000-05-27  [Fertiliser].Apply(Amount: 17.6, Type: Fertiliser.Types.UreaN, Depth: 30)
                2000-09-26  [SurfaceOrganicMatter].Add(mass: 95.5, N: 17.1, P: 0.0, type: "RuminantDung_PastureFed", name "dung")
                2000-09-26  [Fertiliser].Apply(Amount: 25.6, Type: Fertiliser.Types.UreaN, Depth: 30)
                2000-11-13  [SurfaceOrganicMatter].Add(mass: 99.0, N: 17.7, P: 0.0, type: "RuminantDung_PastureFed", name "dung")
                2000-11-13  [Fertiliser].Apply(Amount: 26.5, Type: Fertiliser.Types.UreaN, Depth: 30)
                2000-12-23  [SurfaceOrganicMatter].Add(mass: 88.3, N: 15.8, P: 0.0, type: "RuminantDung_PastureFed", name "dung")
                2000-12-23  [Fertiliser].Apply(Amount: 23.7, Type: Fertiliser.Types.UreaN, Depth: 30)
                2001-01-27  [SurfaceOrganicMatter].Add(mass: 53.3, N: 9.5, P: 0.0, type: "RuminantDung_PastureFed", name "dung")
                2001-01-27  [Fertiliser].Apply(Amount: 14.3, Type: Fertiliser.Types.UreaN, Depth: 30)
                2001-03-14  [SurfaceOrganicMatter].Add(mass: 39.7, N: 7.1, P: 0.0, type: "RuminantDung_PastureFed", name "dung")
                2001-03-14  [Fertiliser].Apply(Amount: 10.6, Type: Fertiliser.Types.UreaN, Depth: 30)
                2001-05-04  [SurfaceOrganicMatter].Add(mass: 33.1, N: 5.9, P: 0.0, type: "RuminantDung_PastureFed", name "dung")
                2001-05-04  [Fertiliser].Apply(Amount: 8.9, Type: Fertiliser.Types.UreaN, Depth: 30)
                2001-06-29  [SurfaceOrganicMatter].Add(mass: 11.0, N: 2.0, P: 0.0, type: "RuminantDung_PastureFed", name "dung")
                2001-06-29  [Fertiliser].Apply(Amount: 3.0, Type: Fertiliser.Types.UreaN, Depth: 30)
                2001-10-06  [SurfaceOrganicMatter].Add(mass: 103.5, N: 18.5, P: 0.0, type: "RuminantDung_PastureFed", name "dung")
                2001-10-06  [Fertiliser].Apply(Amount: 27.7, Type: Fertiliser.Types.UreaN, Depth: 30)
                2001-11-23  [SurfaceOrganicMatter].Add(mass: 100.6, N: 18.0, P: 0.0, type: "RuminantDung_PastureFed", name "dung")
                2001-11-23  [Fertiliser].Apply(Amount: 26.9, Type: Fertiliser.Types.UreaN, Depth: 30)
                2001-12-26  [SurfaceOrganicMatter].Add(mass: 61.1, N: 10.9, P: 0.0, type: "RuminantDung_PastureFed", name "dung")
                2001-12-26  [Fertiliser].Apply(Amount: 16.4, Type: Fertiliser.Types.UreaN, Depth: 30)
                2002-02-10  [SurfaceOrganicMatter].Add(mass: 51.1, N: 9.1, P: 0.0, type: "RuminantDung_PastureFed", name "dung")
                2002-02-10  [Fertiliser].Apply(Amount: 13.7, Type: Fertiliser.Types.UreaN, Depth: 30)
                2002-04-10  [SurfaceOrganicMatter].Add(mass: 28.6, N: 5.1, P: 0.0, type: "RuminantDung_PastureFed", name "dung")
                2002-04-10  [Fertiliser].Apply(Amount: 7.7, Type: Fertiliser.Types.UreaN, Depth: 30)
                2002-06-29  [SurfaceOrganicMatter].Add(mass: 25.2, N: 4.5, P: 0.0, type: "RuminantDung_PastureFed", name "dung")
                2002-06-29  [Fertiliser].Apply(Amount: 6.8, Type: Fertiliser.Types.UreaN, Depth: 30)
              Manager DefoliationManager: same as Validation.New Zealand.FRNLLincoln.FRNLLincoln.Field.Management.DefoliationManager
              Operations DefoliationSchedule
                1997-02-21  [DefoliationManager].Script.Defoliate(defoliationType: "Graze", amountDM: 20, amountType: "ResidualDM", duration: 10)
                1997-06-05  [DefoliationManager].Script.Defoliate(defoliationType: "Graze", amountDM: 10, amountType: "ResidualDM", duration: 6)
                1997-10-06  [DefoliationManager].Script.Defoliate(defoliationType: "Graze", amountDM: 20, amountType: "ResidualDM", duration: 7)
                1997-11-19  [DefoliationManager].Script.Defoliate(defoliationType: "Graze", amountDM: 50, amountType: "ResidualDM", duration: 7)
                1997-12-23  [DefoliationManager].Script.Defoliate(defoliationType: "Graze", amountDM: 45, amountType: "ResidualDM", duration: 7)
                1998-02-03  [DefoliationManager].Script.Defoliate(defoliationType: "Graze", amountDM: 50, amountType: "ResidualDM", duration: 6)
                1998-03-12  [DefoliationManager].Script.Defoliate(defoliationType: "Graze", amountDM: 20, amountType: "ResidualDM", duration: 6)
                1998-05-29  [DefoliationManager].Script.Defoliate(defoliationType: "Graze", amountDM: 10, amountType: "ResidualDM", duration: 6)
                1998-09-29  [DefoliationManager].Script.Defoliate(defoliationType: "Graze", amountDM: 20, amountType: "ResidualDM", duration: 11)
                1998-11-11  [DefoliationManager].Script.Defoliate(defoliationType: "Graze", amountDM: 30, amountType: "ResidualDM", duration: 6)
                1998-12-15  [DefoliationManager].Script.Defoliate(defoliationType: "Graze", amountDM: 35, amountType: "ResidualDM", duration: 8)
                1999-01-11  [DefoliationManager].Script.Defoliate(defoliationType: "Graze", amountDM: 35, amountType: "ResidualDM", duration: 9)
                1999-02-17  [DefoliationManager].Script.Defoliate(defoliationType: "Graze", amountDM: 30, amountType: "ResidualDM", duration: 8)
                1999-04-09  [DefoliationManager].Script.Defoliate(defoliationType: "Graze", amountDM: 25, amountType: "ResidualDM", duration: 14)
                1999-06-24  [DefoliationManager].Script.Defoliate(defoliationType: "Graze", amountDM: 8, amountType: "ResidualDM", duration: 4)
                1999-09-29  [DefoliationManager].Script.Defoliate(defoliationType: "Graze", amountDM: 20, amountType: "ResidualDM", duration: 8)
                1999-11-09  [DefoliationManager].Script.Defoliate(defoliationType: "Graze", amountDM: 40, amountType: "ResidualDM", duration: 9)
                1999-12-20  [DefoliationManager].Script.Defoliate(defoliationType: "Graze", amountDM: 45, amountType: "ResidualDM", duration: 7)
                2000-01-21  [DefoliationManager].Script.Defoliate(defoliationType: "Graze", amountDM: 40, amountType: "ResidualDM", duration: 6)
                2000-03-13  [DefoliationManager].Script.Defoliate(defoliationType: "Graze", amountDM: 30, amountType: "ResidualDM", duration: 6)
                2000-05-25  [DefoliationManager].Script.Defoliate(defoliationType: "Graze", amountDM: 10, amountType: "ResidualDM", duration: 5)
              Manager ExtraVariables
                script: same as in Validation.New Zealand.FRNLLincoln.FRNLLincoln.Field.Management.ExtraVariables
            MicroClimate: a_interception=0; b_interception=1; c_interception=0; d_interception=0; soil_albedo=0.23; SoilHeatFluxFraction=0.4; MinimumHeightDiffForNewLayer=0; NightInterceptionFraction=0.5; ReferenceHeight=2
            Irrigation
            Fertiliser
            SurfaceOrganicMatter: InitialResidueName=maize; InitialResidueType=maize; InitialResidueMass=500; InitialStandingFraction=0; InitialCPR=0; InitialCNR=65
            Soil Wakanui-Iverseen: SoilType=Udic Ustochrept (US),  Immature Pallic Soil (NZ); LocalName=Wakanui Silt Loam; Site=Iverseen field; NearestTown=Lincoln; Region=Canterbury; Country=New Zealand; Latitude=0; Longitude=0; DataSource=Hamish Brown PhD Thesis
              Comments=The physical properties are averages from Hamish's Thesis, Ks and biochemical data from similar soils (from NZ-NSD), texture is a rough estimate only
              Chemical
                Thickness  NO3N      NH4N       PH
                150        7.5188    0.501253   6
                150        7.29927   0.486618   6
                400        3.44828   0.172414   6
                200        2.42131   0.242131   6
                150        1.77728   0.177728   6
                450        0.489237  0.0489237  6
                150        0.489237  0.0489237  6
                350        0.489237  0.0489237  6
                300        0.489237  0.0489237  6
              Physical
                Thickness  ParticleSizeClay  BD    AirDry  LL15  DUL   SAT    KS
                150        30                1.33  0.12    0.29  0.4   0.498  183.9
                150        30                1.37  0.22    0.25  0.38  0.48   95.1
                400        30                1.45  0.15    0.15  0.32  0.45   6.2
                200        30                1.42  0.13    0.13  0.36  0.464  1.1
                150        15                1.29  0.13    0.13  0.35  0.51   1.1
                450        20                1.49  0.25    0.25  0.38  0.438  0.7
                150        20                1.61  0.3     0.33  0.36  0.39   0.5
                350        20                1.61  0.3     0.3   0.36  0.39   0.6
                300        20                1.68  0.28    0.28  0.34  0.366  0.6
                SoilCrop RedCloverSoil
                  LL=[0.293, 0.246, 0.152, 0.131, 0.134, 0.25, 0.327, 0.3, 0.283]
                  KL=[0.12, 0.12, 0.09, 0.04, 0.01, 0.01, 0, 0, 0]
                  XF=[1, 1, 0.8, 0.7, 0.85, 0.3, 0, 0, 0]
              WaterBalance SoilWater: SummerDate=1-Nov; SummerU=6; SummerCona=3.5; WinterDate=1-apr; WinterU=2; WinterCona=2; DiffusConst=88; DiffusSlope=35; Salb=0.13; CN2Bare=73; CNRed=20; CNCov=0.8; Thickness=[150, 150, 400, 200, 150, 450, 150, 350, 300]; SWCON=[0.5, 0.45, 0.25, 0.25, 0.4, 0.1, 0.15, 0.1, 0.1]
              SoilNitrogen: same as Validation.New Zealand.FRNLLincoln.FRNLLincoln.Field.Soil.SoilNitrogen
              Organic: FOMCNRatio=40
                Thickness  Carbon  SoilCNRatio  FBiom  FInert  FOM
                150        4.25    11.3         0.085  0.55    309.801
                150        3.13    11.3         0.05   0.67    254.748
                400        0.88    11.3         0.02   0.8     151.19
                200        0.32    11.3         0.01   0.9     116.474
                150        0.25    11.3         0.008  0.95    95.7764
                450        0.17    11.3         0.005  0.99    53.2533
                800        0.1     11.3         0.005  0.99    18.7573
              InitialWater Initial water: PercentMethod=0; FractionFull=0.99
              CERESSoilTemperature Temperature
            Plant RedClover
            Report: EventNames=[Clock].DoReport
    Folder Denmark
      Experiment Foulum
        Memo
          ###Foulum species competition###

          This simulation setup was based on field trials performed at the the Foulumgaard Experimental Station, Aarhus University, Denmark, between 2013 and 2015.  The trial was part of an experiment studying species competition in multi-species sward in a dairy organic farming context.  This comprises the establishement of plots sown with various species in monoculture and in a few combinations, either varying the number and type of species or the relative sowing rate.  The plots received either no N fertiliser or a nominal annual rate of 250 kgN/ha applied as cattle slurry.  Details of the site and trial can be found in publications ([CongEtAl2017]; [CongAndEriksen2018]; and [CongEtAl2018]).  Here only a selection of plots with red clover are used, with each treatment having three replicates.
          Observed data supplied by Wen Feng Cong and Jorgen Eriksen, Aarhus University.

          The soil at the experimental site was a loamy sand (a Typic Hapludult on the USDA classification), the parameters required were derived from data published and slightly adjusted with measurements done at the experimental site ([JacobsenFoulum1989]; [HeidmannFoulum1989]).
          Weather data was obtained from nearby weather station (Aarhus University).
        Factors
          Factor NInputs: Specification=[FertiliserSchedule]
            Operations Nil
            Operations Slurry
              2014-04-01  [SurfaceOrganicMatter].Add(mass: 1022.7, N: 40.9, P: 0.0, type: "fym", name: "slurry")
              2014-04-01  [Fertiliser].Apply(Amount: 50.0, Type: Fertiliser.Types.NH4N, Depth: 5)
              2014-06-04  [SurfaceOrganicMatter].Add(mass: 481.5, N: 19.3, P: 0.0, type: "fym", name: "slurry")
              2014-06-04  [Fertiliser].Apply(Amount: 20.0, Type: Fertiliser.Types.NH4N, Depth: 5)
              2014-07-03  [SurfaceOrganicMatter].Add(mass: 478.6, N: 19.1, P: 0.0, type: "fym", name: "slurry")
              2014-07-03  [Fertiliser].Apply(Amount: 24.4, Type: Fertiliser.Types.NH4N, Depth: 5)
              2014-08-22  [SurfaceOrganicMatter].Add(mass: 560.5, N: 22.4, P: 0.0, type: "fym", name: "slurry")
              2014-08-22  [Fertiliser].Apply(Amount: 19.1, Type: Fertiliser.Types.NH4N, Depth: 5)
              2015-04-07  [SurfaceOrganicMatter].Add(mass: 1022.7, N: 40.9, P: 0.0, type: "fym", name: "slurry")
              2015-04-07  [Fertiliser].Apply(Amount: 50.0, Type: Fertiliser.Types.NH4N, Depth: 5)
              2015-06-10  [SurfaceOrganicMatter].Add(mass: 481.5, N: 19.3, P: 0.0, type: "fym", name: "slurry")
              2015-06-10  [Fertiliser].Apply(Amount: 20.0, Type: Fertiliser.Types.NH4N, Depth: 5)
              2015-07-21  [SurfaceOrganicMatter].Add(mass: 478.6, N: 19.1, P: 0.0, type: "fym", name: "slurry")
              2015-07-21  [Fertiliser].Apply(Amount: 24.4, Type: Fertiliser.Types.NH4N, Depth: 5)
              2015-09-03  [SurfaceOrganicMatter].Add(mass: 560.5, N: 22.4, P: 0.0, type: "fym", name: "slurry")
              2015-09-03  [Fertiliser].Apply(Amount: 19.1, Type: Fertiliser.Types.NH4N, Depth: 5)
        Simulation Foulum
          Clock: Start=2013-01-01; End=2015-12-31
          Weather: FileName=Foulum.met
          Summary summaryfile
          SoilArbitrator Soil Arbitrator
          Zone Field: Area=1; Slope=0; AspectAngle=0; Altitude=50
            Folder Management
              Operations Sowing
                2013-05-06  [RedClover].Sow(population: 380, cultivar: "Rajah", depth: 5, rowSpacing: 150)
              Operations BaseNApplication
                2013-05-03  [SurfaceOrganicMatter].Add(mass: 5114, N: 40.9, P: 0.0, type: "fym", name: "slurry")
                2013-05-03  [Fertiliser].Apply(Amount: 50, Type: Fertiliser.Types.NH4N, Depth: 5)
              Operations FertiliserSchedule
              Operations IrrigationSchedulle
                2013-07-17  [Irrigation].Apply(amount: 25)
                2013-08-28  [Irrigation].Apply(amount: 25)
                2014-12-06  [Irrigation].Apply(amount: 33)
                2014-07-04  [Irrigation].Apply(amount: 25)
              Manager DefoliationManager: same as Validation.New Zealand.FRNLLincoln.FRNLLincoln.Field.Management.DefoliationManager
              Operations DefoliationSchedule
                2013-07-04  [DefoliationManager].Script.Defoliate(defoliationType: "Cut", amountDM: 50, amountType: "ResidualDM", duration: 1)
                2013-10-01  [DefoliationManager].Script.Defoliate(defoliationType: "Cut", amountDM: 50, amountType: "ResidualDM", duration: 1)
                2014-05-22  [DefoliationManager].Script.Defoliate(defoliationType: "Cut", amountDM: 50, amountType: "ResidualDM", duration: 1)
                2014-07-02  [DefoliationManager].Script.Defoliate(defoliationType: "Cut", amountDM: 50, amountType: "ResidualDM", duration: 1)
                2014-08-20  [DefoliationManager].Script.Defoliate(defoliationType: "Cut", amountDM: 50, amountType: "ResidualDM", duration: 1)
                2014-10-06  [DefoliationManager].Script.Defoliate(defoliationType: "Cut", amountDM: 50, amountType: "ResidualDM", duration: 1)
                2015-06-01  [DefoliationManager].Script.Defoliate(defoliationType: "Cut", amountDM: 50, amountType: "ResidualDM", duration: 1)
                2015-07-14  [DefoliationManager].Script.Defoliate(defoliationType: "Cut", amountDM: 50, amountType: "ResidualDM", duration: 1)
                2015-08-24  [DefoliationManager].Script.Defoliate(defoliationType: "Cut", amountDM: 50, amountType: "ResidualDM", duration: 1)
                2015-10-19  [DefoliationManager].Script.Defoliate(defoliationType: "Cut", amountDM: 50, amountType: "ResidualDM", duration: 1)
              Manager ExtraVariables
                script: same as in Validation.New Zealand.FRNLLincoln.FRNLLincoln.Field.Management.ExtraVariables
            MicroClimate: a_interception=0; b_interception=1; c_interception=0; d_interception=0; soil_albedo=0.23; SoilHeatFluxFraction=0.4; MinimumHeightDiffForNewLayer=0; NightInterceptionFraction=0.5; ReferenceHeight=2
            Irrigation
            Fertiliser
            SurfaceOrganicMatter: InitialResidueName=grass; InitialResidueType=grass; InitialResidueMass=1000; InitialStandingFraction=0; InitialCPR=0; InitialCNR=40
            Soil: SoilType=Typic Hapludult (US); LocalName=Loamy Sandy Soil; Site=Foulum; NearestTown=Tjelle; Region=Viborg; Country=Denmark; Latitude=0; Longitude=0
              DataSource=Based on data published by Jacobsen (1989) and Heidmann et al (1989)
              Chemical
                Thickness  NO3N      NH4N       PH
                200        5.10204   0.340136   6
                250        1.94444   0.138889   6
                250        0.536769  0.0536769  6
                300        0.536769  0.0536769  6
                250        0.331492  0.0276243  6
                250        0.331492  0.0276243  6
              Physical
                Thickness  ParticleSizeClay  BD    AirDry  LL15   DUL    SAT    KS
                200        6.7               1.47  0.024   0.072  0.299  0.42   1467
                250        6.2               1.44  0.053   0.056  0.268  0.437  1039
                250        7.1               1.65  0.054   0.054  0.182  0.377  4748
                300        4.6               1.73  0.049   0.049  0.2    0.342  882
                250        7.7               1.76  0.054   0.054  0.219  0.305  655
                250        7.7               1.86  0.062   0.062  0.219  0.294  612
                SoilCrop RedCloverSoil: LL=[0.072, 0.056, 0.054, 0.049, 0.054, 0.062]; KL=[0.078, 0.07, 0.038, 0.012, 0.005, 0.002]; XF=[1, 1, 1, 1, 1, 1]
              WaterBalance SoilWater: SummerDate=15-Sep; SummerU=6; SummerCona=3; WinterDate=15-Apr; WinterU=3; WinterCona=1; DiffusConst=88; DiffusSlope=35; Salb=0.2; CN2Bare=70; CNRed=20; CNCov=0.8; DischargeWidth=0; CatchmentArea=0
                Thickness  SWCON  KLAT
                200        0.391  0
                250        0.304  0
                250        0.437  0
                300        0.291  0
                250        0.334  0
                250        0.343  0
              SoilNitrogen: same as Validation.New Zealand.FRNLLincoln.FRNLLincoln.Field.Soil.SoilNitrogen
              Organic: FOMCNRatio=40
                Thickness  Carbon  SoilCNRatio  FBiom  FInert  FOM
                200        1.89    11.9         0.065  0.1     1000
                250        0.99    11.9         0.02   0.275   750
                250        0.45    11.9         0.015  0.65    310
                300        0.12    11.9         0.01   0.8     160
                250        0.06    11.9         0.007  0.95    25
                250        0.06    11.9         0.005  0.99    5
              CERESSoilTemperature Temperature
              InitialWater Initial water: PercentMethod=1; FractionFull=1
            Plant RedClover
            Report: EventNames=[Clock].DoReport
  Memo Acknowledgements
    # Acknowledgements
    This model was developed with support and datasets provided by the Forages for Reduced Nitrogen Leaching (FRNL) programme, funded by the New Zealand Ministry of Business, Innovation and Employment.  The programme is a partnership between DairyNZ, AgResearch, Plant & Food Research, Lincoln University, the Foundation for Arable Research, and Landcare Research.
    The author is also thankful to Drs. Hamish Brown, Wen Feng Cong, and Grant Edwards for supplying the experimental data, acknowledging that many other people also contributed to their collection.
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