Simulations: Version=201
  DataStore
    ExcelInput: SheetNames=[Observed]
      FileNames=[C:\Jessica\GIT\ApsimX\ApsimX\Tests\Validation\Ryegrass\RainShelter.xlsx, C:\Jessica\GIT\ApsimX\ApsimX\Tests\Validation\Ryegrass\Observed.xlsx, C:\Jessica\GIT\ApsimX\ApsimX\Tests\Validation\Ryegrass\Mutdapilly9294.xlsx, C:\Jessica\GIT\ApsimX\ApsimX\Tests\Validation\Ryegrass\Kyabram9597.xlsx, C:\Jessica\GIT\ApsimX\ApsimX\Tests\Validation\Ryegrass\Gatton9597.xlsx]
    PredictedObserved: PredictedTableName=Report; ObservedTableName=Observed; FieldNameUsedForMatch=SimulationName; FieldName2UsedForMatch=Clock.Today; AllColumns=false
  Memo
    AgPasture is a model developed to simulate pasture growth in the APSIM framework. It was initially based on the plant physiological model of [thornley1990plant], as were the models SGS/DairyMod/EcoMod, presented by [johnson_dairymod_2008]. Today in AgPasture, the plant processes were adapted from EcoMod but all environmental factors and partition of resources is done by other models in the APSIM framework.The main purpose of AgPasture is to simulate mixed pastures but based on individual calculations for each species of photosynthesis, respiration, dry matter accumulation and partitioning and tissue turnover as presented by [li_modelling_2011]. It simulates pastures composed by C3 and C4 grasses, legumes and forbs. Now AgPasture has the sward component that is responsible for integrating the outputs obtained for each species and controlling management aspects, such as grazing.
    The base species in AgPasture is a generic temperate C3 grass parameterised as a generic ryegrass. All simulations are based on an stablished pasture, so there is no development from seeds. The proportion of species in the sward varies according to environmental effects, water and nutrient extraction ability and effects of harvests (cutting or grazing) on each of the species in the sward. Each species is described as a set of organs (Figure 1) and these organs are described by tissue pools (Figure 2).

    ![Description of plant species in AgPasture with the indication of a general class for plant parts.](AgPasturePlantSpecies.png)

    ![Tissue dynamics in AgPasture, from new growth until senescence.](AgPastureTissueDynamics.png)

    The water demand is calculated by the MicroClimate model (originally micromet; [snow_apsimmicromet_2004]). Water availability is then calculated according to the root distribution and the KL parameter in the soil. The communication wih the soil is mediated by SoilArbitrator, which is lso responsible to balance resource competition between plants. Similarly, SoilArbitrator mediates nitrogen availability. AgPasture receives this information and calculates plant potential growth through net photosynthesis and a series of growth limiting factors (GLF), related to water, nitrogen, temperature, fertility (to account for nutrient limitations, other than nitrogen) and a generic factor (to account for the effects of diseases, for example) are used to reach the actual plant growth. This actual plant growth is what is used for the further processes of tissue turnover and dry matter allocation presented in Figure 3. Dry matter transfer across tissues, how turnover rates act, and nitrogen balance are presented in Figure 4. In general, AgPasture calculates the turnover rates (γ) for each tissue pool of all plant organs. The rates are then passed on to each organ and the amounts to be potentially turned over (dDM) are calculated for each tissue pool. For nitrogen, basically AgPasture uses the nitrogen taken up from the soil and fixed by legumes. This nitrogen amount will then be available for new growth. The process of nitrogen uptake aims for the maximum concentration of nitrogen in new growth (Nmax*). This is not always achieved and the current nitrogen concentration will be added to the pool of tissue 0, which actively contributes with dry matter and nitrogen transfer for older tissues. The same happens for tissues 1 and 2. One of the modifications done in AgPasture for APSIMX is the definition of an adequate nitrogen concentration in these pools. Now tissues have a target concentration of nitrogen  and any extra nitrogen is put through the remobilisable nitrogen pool ([vogeler2016deriving]). The rate of nitrogen remobilisation is defined by kL, which mainly shows that the priority is the first leaf. When the first leaf becomes deficient, the remobilisation of extra nitrogen aims to fulfill the nitrogen need for this pool. At the same time, a minimum concentration of nitrogen is always transferred to the pool of tissue 3, resulting in a constant nitrogen concentration of this pool. This is then added to the litter pool. where dry matter that comes from the shoot is added to the surface organic matter pool whereas dry matter from roots goes to the soil fresh organic matter pool. The amount of nitrogen remobilisable that was not used is then added to the litter pool.

    ![Description of growth calculations done by AgPasture, from photosynthesis up to the partitioning of growth between shoot and root.](AgPastureGrowth.png)

    ![Nitrogen balance and dry matter transfer in AgPasture.](AgPastureBalance.png)

    AgPasture does not account for phenological development, therefore it does not simulate reproductive growth and seed production. Instead, the model mimics changes in growth rate and dry matter allocation by using a simple function (based on latitude and some species specific parameters) that changes in the shoot:root ratio of plants during this "reproductive period". Another limitation of the model is the lack of carbon remobilisation, which makes it difficult to simulate the proper remobilisation of reserves in the plant. More details are given in the supplementary documentation for AgPasture.
    Biomass removal can be simulated by the Graze (Figure 5) and RemoveBiomass (Figure 6) methods. The Graze method is a simple way to present the amount of biomass to be removed. It uses a parameter 'Amount', which sets up the amount of dry matter to be removed, and a parameter 'Type', which defines how the value of 'Amount' is interpreted. 'Type' can be set as 'ResidueAmount', where the target amount of dry matter is a value for the residual amount of biomass that will be left after harvest, or it can be set as 'RemoveAMount', where the target amount of dry matter is the value to be removed by the harvest. Both methods are dependent on a minimum above ground green dry matter that is set as a default of 100 kg DM/ha and can never be removed. Then a function 'RemoveDM' is responsible for the dry matter removal and partitions the amount to be removed among organs and pools. This is dependent on default preference values, which are currently set as 1. A series of checks is done to guarantee that mass balance is not affected by the removal of dry matter. The 'RemoveBiomass' method is more elaborate and allows to control the amount of each organ and pool that will be removed. The fractions to be removed can be set through a 'RemovalType' or a 'RemovalData' parameter. The 'RemovalType' is based on default fractions for organs (leaves, stems and stolons) with fractions for live and dead pools of dry matter to be removed and residual dry matter. The 'RemovalData' is optional and allows the fractions to be removed to be set up by the user.

    ![Graze method of biomass removal in AgPasture.](AgPastureGraze.png)

    ![Description of the RemoveBiomass method in AgPasture](AgPastureRemoveBiomass.png)

    Figure 6. RemoveBiomass method of biomass removal in AgPasture.

    Root distribution in AgPasture is give by a simple function, it follows an uniform distribution down to a certain depth, which can be set up by the user. From this depth on, the root system decreases following an exponential decline until no roots are present at the given maximum rooting depth (Figure 7).

    ![Example of a shallow, mid and deep distribution of roots in AgPasture.](AgPastureRootDistribution.png)
  Folder Validation
    Memo
      The validation of biomass production, N status, and relative species composition of AgPasture is done using a series of simulations based on a number of datasets.  The base validation uses the 'Radcliffe trials', a series of dataset of yield measured in exclusion cages on grass-clover pastures across New Zealand. The second set comprises of two long term dataset that contain more detailed informatin on management and pasture yield for each harvest, these are a subset of the 'Winchmore' irrigation and fertility trials, with data from ryegrass-clover mixed pastures under rainfed and irrigated conditions, and another set based on production trials in 'Ruakura' [mccall2003pasture]. The third set of simulations is based on a fertilisty trial conducted in 'Lincoln' and 'Ruakura' for the Forages for Reducing Nitorgen Leaching programme (FRNL); this encompases two years of biomass and N uptake measurements under six N fertilisation rates for monocultures of ryegrass and white clover, plus a mix of the two (only in Ruakura).
    Folder Australia
      Experiment Mutdapilly9294
        Factors
          Factor Irrigation: Specification=[Irrigated]
            Manager Full
              allowIrrigation = True
              seasonStart = 1-Jan
              seasonEnd = 31-Dec
              seasonsAllocation = 10000
              triggerDeficit = 80
              targetDeficit = 95
              returndays = 3
              maximumAmount = 30
              depthPAWC = 1200
```csharp
using Newtonsoft.Json;
using APSIM.Shared.Utilities;
using System.Xml.Serialization;
using Models.Soils;
using Models.PMF;
using Models.Core;
using System;
using System.Linq;
using Models.Interfaces;



        
namespace Models
{
    [Serializable] 
    [System.Xml.Serialization.XmlInclude(typeof(Model))]
    public class Script : Model
    {
        [Link] private ISummary summary;
        [Link] private Irrigation Irrigation;
        [Link] private Clock Clock;
        [Link] private Soil Soil;
        [Link(IsOptional = true)] private IPlant existingCrop;
        private DateTime StartDate;
        private DateTime EndDate;
        private double TopDUL;
        private double TopLL;
        private int nLayers;
        [Link]
        private IPhysical soilPhysical;
        [Link]
        private ISoilWater waterBalance;
        //Communication to other modules
       
        //User inputs from properties tab
        [Description("Turn irrigation on?")]
        public bool allowIrrigation { get; set; }
        [Description("Start of irrigation season (dd-MMM)")]
        public string seasonStart { get; set; }
        [Description("End of irrigation season (dd-MMM)")]
        public string seasonEnd { get; set; }
        [Description("Season allocation (mm)")]
        public double seasonsAllocation { get; set; }
        [Description("Deficit to trigger irrigation (% PAWC)")]
        public double triggerDeficit { get; set; }
        [Description("Deficit to stop irrigaton (% PAWC)")]
        public double targetDeficit { get; set; }
        [Description("Minimum days for irrigation to return")]
        public double returndays { get; set; }
        [Description("Maximum irrigation application (mm/day)")]
        public double maximumAmount { get; set; }
        [Description("Depth to calculate PAWC (mm)")]
        public double depthPAWC { get; set; }

        //Class members
        [JsonIgnore] public double TopSWdeficit { get; set; }
        [JsonIgnore] public double TopSWC { get; set; }
        [JsonIgnore] public double DaysSinceIrrigation { get; set; }
        [JsonIgnore] public double AmountToApply { get; set; }
        [JsonIgnore] public double SeasonAppliedAmount { get; set; }
        
        private bool IrrigationIsAllowed { get; set; }
        private bool SeasonIsOpen { get; set; }
        private bool CropIsActive { get; set; }
        private bool IrrigatorIsAvailable { get; set; }
        private bool SoilIsDry { get; set; }

    
        //Calculate static soil variables
        [EventSubscribe("StartOfSimulation")]
        private void OnStartOfSimulation(object sender, EventArgs e)
        {   
            //Set the season dates
            StartDate = DateTime.Parse(seasonStart + "-" + Clock.Today.Year.ToString());
            EndDate = DateTime.Parse(seasonEnd + "-" + Clock.Today.Year.ToString());
            
            //Can we irrigate at all?
            IrrigationIsAllowed = false; 
            if (allowIrrigation)
                IrrigationIsAllowed = true; 

            //Calculate soil water variables
            double depthFromSurface = 0.0;
            double fracLayer = 0.0;
            nLayers = soilPhysical.Thickness.Length;
            for (int layer = 0; layer < nLayers; layer++)
            {
                fracLayer = Math.Min(1.0, (depthPAWC - depthFromSurface) / soilPhysical.Thickness[layer]);
                TopLL += soilPhysical.LL15mm[layer] * fracLayer;
                TopDUL += soilPhysical.DULmm[layer] * fracLayer;
                depthFromSurface += soilPhysical.Thickness[layer];
                if (depthFromSurface >= depthPAWC)
                    layer = nLayers;
            }
        }
             
        //Determine daily requirement for irrigation
        [EventSubscribe("StartOfDay")]
        private void OnStartOfDay(object sender, EventArgs e)
        {
            //Can we irrigate today?          
            SeasonIsOpen = isBetween(Clock.Today, StartDate, EndDate);
            if (!SeasonIsOpen)
                SeasonAppliedAmount = 0;

            //Is there a crop in the ground that needs irrigation?
            CropIsActive = false;
            if ((existingCrop != null) && (existingCrop.IsAlive))
                CropIsActive = true;
            //if ((existingCrop.Phenology.Stage >= 3.0) && (existingCrop.Phenology.Stage < 6.0))
          
            //Is the irrigator available?
            IrrigatorIsAvailable = false;
            DaysSinceIrrigation += 1;
            if (DaysSinceIrrigation >= returndays)
                IrrigatorIsAvailable = true;
          
            //Is the soil dry enough to require irrigation?
            SoilIsDry = false;
            double depthFromSurface = 0.0;
            double fracLayer = 0.0;
            TopSWC = 0.0;
            for (int layer = 0; layer < nLayers; layer++)
            //for (int layer = 0; depthFromSurface < depthPAWC + soilPhysical.Thickness[layer]; layer++)
            {
                fracLayer = Math.Min(1.0, (depthPAWC - depthFromSurface) / soilPhysical.Thickness[layer]);
                TopSWC += waterBalance.SWmm[layer] * fracLayer;
                depthFromSurface += soilPhysical.Thickness[layer];
                if (depthFromSurface >= depthPAWC)
                    layer = nLayers;
            }
            
            TopSWdeficit = TopSWC - TopDUL;
            if (Math.Max(0.0, -TopSWdeficit) >= (TopDUL - TopLL) * (100 - triggerDeficit) / 100)
                SoilIsDry = true;
                
            //Are all the conditions ratifying irrigation
            if (IrrigationIsAllowed && SeasonIsOpen && CropIsActive && IrrigatorIsAvailable && SoilIsDry)
            {
                //Lets bloody well irrigate then!!!!
                AmountToApply = TopDUL * targetDeficit / 100 - TopSWC;
                AmountToApply = Math.Max(0.0, Math.Min(AmountToApply, seasonsAllocation - SeasonAppliedAmount));
                AmountToApply = Math.Min(AmountToApply,maximumAmount);
                Irrigation.Apply(AmountToApply);
                DaysSinceIrrigation = 0;
                SeasonAppliedAmount += AmountToApply;
            }
        }
        
        ///Checks whether theDate is between iniDate and endDate (non-year specific)
        private bool isBetween(DateTime theDay, DateTime iniDate, DateTime endDate)
        {
            bool result = false;
            if (iniDate.DayOfYear < endDate.DayOfYear)
            {
                // period is within one year, ex: summer in the northern hemisphere
                if ((theDay.DayOfYear >= iniDate.DayOfYear) && (theDay.DayOfYear <= endDate.DayOfYear))
                    result = true;
            }
            else
            {
                // period goes over the end of the year, ex: summer in the southern hemisphere
                if ((theDay.DayOfYear >= iniDate.DayOfYear) || (theDay.DayOfYear <= endDate.DayOfYear))
                    result = true;
            }
            
            return result;
        }
    }
}
```
        Simulation Mutdapilly9294Base
          Clock: Start=1992-04-01; End=1995-06-30
          Weather: FileName=Mutdapilly Research Station.met
          Summary summaryfile
          SoilArbitrator Soil Arbitrator
          MicroClimate: a_interception=0; b_interception=1; c_interception=0; d_interception=0; SoilHeatFluxFraction=0.4; MinimumHeightDiffForNewLayer=0; NightInterceptionFraction=0.5; ReferenceHeight=2
          Zone Field: Area=1; Slope=0; AspectAngle=0; Altitude=50
            Operations Management
              1992-04-01  [AgPRyegrass].Sow(population: 1, cultivar: "W", depth: 5, rowSpacing: 150)
              1992-04-01  [Fertiliser].Apply(amount: 50, type: "UreaN")
              1993-10-31  [Fertiliser].Apply(amount: 50, type: "UreaN")
              1993-11-30  [Fertiliser].Apply(amount: 50, type: "UreaN")
              1993-12-31  [Fertiliser].Apply(amount: 50, type: "UreaN")
              1994-01-31  [Fertiliser].Apply(amount: 50, type: "UreaN")
              1994-02-28  [Fertiliser].Apply(amount: 50, type: "UreaN")
              1994-03-31  [Fertiliser].Apply(amount: 50, type: "UreaN")
              1994-04-30  [Fertiliser].Apply(amount: 50, type: "UreaN")
              1994-05-31  [Fertiliser].Apply(amount: 50, type: "UreaN")
              1994-06-30  [Fertiliser].Apply(amount: 50, type: "UreaN")
              1994-07-31  [Fertiliser].Apply(amount: 50, type: "UreaN")
              1994-08-31  [Fertiliser].Apply(amount: 50, type: "UreaN")
              1994-09-30  [Fertiliser].Apply(amount: 50, type: "UreaN")
              1994-10-31  [Fertiliser].Apply(amount: 50, type: "UreaN")
              1994-11-30  [Fertiliser].Apply(amount: 50, type: "UreaN")
              1994-12-31  [Fertiliser].Apply(amount: 50, type: "UreaN")
              1995-01-31  [Fertiliser].Apply(amount: 50, type: "UreaN")
              1995-02-28  [Fertiliser].Apply(amount: 50, type: "UreaN")
              1995-03-31  [Fertiliser].Apply(amount: 50, type: "UreaN")
              1995-04-30  [Fertiliser].Apply(amount: 50, type: "UreaN")
              1995-05-31  [Fertiliser].Apply(amount: 50, type: "UreaN")
              1995-06-30  [Fertiliser].Apply(amount: 50, type: "UreaN")
            Irrigation
            Fertiliser
            SurfaceOrganicMatter: InitialResidueName=grass; InitialResidueType=grass; InitialResidueMass=1000; InitialStandingFraction=0; InitialCPR=0; InitialCNR=25
            PastureSpecies AGPRyegrass: doyGermination=275; daysEmergenceToAnthesis=120; daysAnthesisToMaturity=85; degreesDayForAnthesis=1100; degreesDayForMaturity=900; daysAnnualsFactor=45; CanopyType=PastureSpecies; InitialShootDM=1; InitialRootDM=1; InitialRootDepth=750; initialDMFractionsGrasses=[0.15, 0.25, 0.25, 0.05, 0.05, 0.1, 0.1, 0.05, 0, 0, 0]; initialDMFractionsForbs=[0.2, 0.2, 0.15, 0.05, 0.1, 0.15, 0.1, 0.05, 0, 0, 0]; PhotosyntheticEfficiency=0.01; PhotosynthesisCurveFactor=0.8; FractionPAR=0.5; ReferenceCO2=380; CO2EffectScaleFactor=700; CO2EffectOffsetFactor=600; CO2EffectMinimum=0.7; CO2EffectExponent=2; ReproSeasonDurationCoeff=2; ReproSeasonShouldersLengthFactor=1; ReproSeasonOnsetDurationFactor=0.6; RelativeTurnoverEmerging=2; DetachmentDroughtCoefficient=3; DetachmentDroughtEffectMin=0.1; TurnoverStockFactor=0.01; TurnoverDefoliationEffectMin=0.025; MinimumGreenLeafProp=0.8; MinimumGreenRootProp=0.5
              initialDMFractionsLegumes=[0.16, 0.23, 0.22, 0.05, 0.03, 0.05, 0.05, 0.01, 0.04, 0.08, 0.08]
              LinearInterpolationFunction FVPDFunction
            Report: EventNames=[Clock].DoReport
              VariableNames:
                [Clock].Today
                [Clock].Today.Year as Year
                [Irrigation].IrrigationApplied
                // plant outputs
                [AgPRyegrass].AboveGroundWt
                [AgPRyegrass].AboveGround.Wt
                [AgPRyegrass].AboveGroundNConc
                [AgPRyegrass].AboveGroundHarvestable.StructuralWt
                [AgPRyegrass].Leaf.DigestibilityLive
                [AgPRyegrass].Stem.DigestibilityLive
                [AgPRyegrass].Harvestable.Digestibility
                [AgPRyegrass].BelowGroundWt
                [AGPRyegrass].GlfWaterSupply
                [AGPRyegrass].GlfNContent
                [AgPRyegrass].Leaf.Live.Wt
                [AgPRyegrass].Leaf.Live.NConc
                ([AgPRyegrass].Leaf.Live.NConc *6.25) as LeafCrudeProtien
                [AgPRyegrass].Leaf.Dead.Wt
                [AgPRyegrass].LAIGreen
                [AgPRyegrass].Stem.Live.Wt
                [AgPRyegrass].Stem.Live.NConc
                ([AgPRyegrass].Stem.Live.NConc*6.25) as StemCrudeProtien
                [AgPRyegrass].TotalWt
                [AgPRyegrass].AboveGroundCrudeProtein
                sum([Soil].NO3.kgha)
            Manager Irrigated: same as Validation.Australia.Mutdapilly9294.Factors.Irrigation.Full
            Soil: SoilType=APS26Soil; LocalName=APS26Site; Site=APS26Site; NearestTown=Unknown; Region=Lawes; NaturalVegetation=Unknown; Latitude=0; Longitude=0
              Physical
                Thickness  ParticleSizeSand  ParticleSizeSilt  ParticleSizeClay  Rocks  BD    AirDry  LL15  DUL   SAT
                150        5                 65                30                0      1.38  0.1     0.2   0.38  0.44
                150        5                 65                30                0      1.38  0.1     0.2   0.38  0.44
                300        5                 65                30                0      1.38  0.1     0.2   0.38  0.44
                300        5                 65                30                0      1.38  0.1     0.2   0.38  0.44
                300        5                 65                30                0      1.46  0.1     0.21  0.38  0.43
                300        5                 65                30                0      1.51  0.1     0.19  0.4   0.42
                300        5                 65                30                0      1.49  0.1     0.14  0.38  0.43
                300        5                 65                30                0      1.47  0.1     0.14  0.38  0.43
                300        5                 65                30                0      1.47  0.1     0.19  0.33  0.43
                Rocks, ParticleSizeSand, ParticleSizeSilt, ParticleSizeClay source: Calculated
                SoilCrop AGPRyegrassSoil: LL=[0.24, 0.24, 0.22, 0.24, 0.23, 0.23, 0.18, 0.18, 0.18]; KL=[0.06, 0.045, 0.045, 0.04, 0.04, 0.06, 0.06, 0.06, 0.06]; XF=[1, 1, 1, 1, 1, 1, 1, 1, 1]
              WaterBalance SoilWater: SummerDate=1-Nov; SummerU=6; SummerCona=3.5; WinterDate=1-Apr; WinterU=6; WinterCona=3.5; DiffusConst=10; DiffusSlope=16; Salb=0.13; CN2Bare=78; CNRed=20; CNCov=0.8; DischargeWidth=0; CatchmentArea=0; PSIDul=-100
                Thickness  SWCON  KLAT
                150        0.3    0
                150        0.3    0
                150        0.3    0
                150        0.3    0
                300        0.3    0
                300        0.3    0
                300        0.3    0
                300        0.3    0
                300        0.3    0
                300        0.3    0
              Organic: FOMCNRatio=40; CarbonUnits=Total
                Thickness  Carbon  SoilCNRatio  FBiom  FInert  FOM
                150        2.2     14.5         0.05   0.45    118.866
                150        1.6     14.5         0.024  0.6     98.5437
                150        1.35    14.5         0.01   0.7     81.6956
                150        0.95    14.5         0.01   0.85    67.728
                300        1       14.5         0.01   0.9     46.5487
                300        0.8     14.5         0.01   0.95    31.9925
                300        0.45    14.5         0.01   0.95    21.9881
                300        0.45    14.5         0.01   0.95    15.1122
                300        0.45    14.5         0.01   0.95    10.3864
                300        0.45    14.5         0.01   0.95    7.13848
              Chemical: PHUnits=Water
                Thickness  PH   CEC
                150        7.5  13.295
                150        8    11.945
                150        8    11.3825
                150        8    10.4825
                300        8    10.595
                300        8    10.145
                300        8    9.3575
                300        8    9.3575
                300        8    9.3575
                300        8    9.3575
                CEC source: Calculated
              Water: Thickness=[150, 150, 150, 150, 300, 300, 300, 300, 300, 300]; FilledFromTop=false
                InitialValues=[0.3274, 0.3429, 0.334, 0.334, 0.3303, 0.3106, 0.306, 0.2694, 0.269, 0.269]
              Nutrient
              Solute NO3: Thickness=[150, 150, 150, 150, 300, 300, 300, 300, 300, 300]; InitialValues=[20, 30, 10, 1.5, 0.4, 0.2, 0.4, 0.3, 0.3, 0.3]; InitialValuesUnits=ppm; WaterTableConcentration=0; D0=0; DepthConstant=0; MaxDepthSoluteAccessible=0; RunoffEffectivenessAtMovingSolute=0; MaxEffectiveRunoff=0
              Solute NH4: Thickness=[150, 150, 150, 150, 300, 300, 300, 300, 300, 300]; InitialValues=[0.5, 0.8, 0.5, 0.5, 0.42, 0.42, 0.37, 0.25, 0.3, 0.3]; InitialValuesUnits=ppm; WaterTableConcentration=0; D0=0; DepthConstant=0; MaxDepthSoluteAccessible=0; RunoffEffectivenessAtMovingSolute=0; MaxEffectiveRunoff=0
              Solute Urea: Thickness=[150, 150, 150, 150, 300, 300, 300, 300, 300, 300]; InitialValues=[0, 0, 0, 0, 0, 0, 0, 0, 0, 0]; InitialValuesUnits=kg/ha; WaterTableConcentration=0; D0=0; DepthConstant=0; MaxDepthSoluteAccessible=0; RunoffEffectivenessAtMovingSolute=0; MaxEffectiveRunoff=0
              SoilTemperature Temperature
      Experiment Gatton9597
        Factors
          Factor Cultivar: Specification=[Sowing]
            Operations Aurora
              1995-03-01  [AgPRyegrass].Sow(population: 1, cultivar: "Aurora", depth: 5, rowSpacing: 150)
              1995-12-31  [AGPRyegrass].EndCrop()
              1996-03-01  [AgPRyegrass].Sow(population: 1, cultivar: "Aurora", depth: 5, rowSpacing: 150)
            Operations Ba11351
              1995-03-01  [AgPRyegrass].Sow(population: 1, cultivar: "Ba11351", depth: 5, rowSpacing: 150)
              1995-12-31  [AGPRyegrass].EndCrop()
              1996-03-01  [AgPRyegrass].Sow(population: 1, cultivar: "Ba11351", depth: 5, rowSpacing: 150)
            Operations Ellett
              1995-03-01  [AgPRyegrass].Sow(population: 1, cultivar: "Ellett", depth: 5, rowSpacing: 150)
              1995-12-31  [AGPRyegrass].EndCrop()
              1996-03-01  [AgPRyegrass].Sow(population: 1, cultivar: "Ellett", depth: 5, rowSpacing: 150)
            Operations Vedette
              1995-03-01  [AgPRyegrass].Sow(population: 1, cultivar: "Vedette", depth: 5, rowSpacing: 150)
              1995-12-31  [AGPRyegrass].EndCrop()
              1996-03-01  [AgPRyegrass].Sow(population: 1, cultivar: "Vedette", depth: 5, rowSpacing: 150)
            Operations KangarooValley
              1995-03-01  [AgPRyegrass].Sow(population: 1, cultivar: "KangarooValley", depth: 5, rowSpacing: 150)
              1995-12-31  [AGPRyegrass].EndCrop()
              1996-03-01  [AgPRyegrass].Sow(population: 1, cultivar: "KangarooValley", depth: 5, rowSpacing: 150)
        Simulation Gatton9597Base
          Clock: Start=1995-04-01; End=1997-06-30
          Weather: FileName=Gatton.met
          Summary summaryfile
          SoilArbitrator Soil Arbitrator
          MicroClimate: a_interception=0; b_interception=1; c_interception=0; d_interception=0; SoilHeatFluxFraction=0.4; MinimumHeightDiffForNewLayer=0; NightInterceptionFraction=0.5; ReferenceHeight=2
          Zone Field: Area=1; Slope=0; AspectAngle=0; Altitude=50
            Operations Sowing
            Operations FertiliserManagement
              1995-03-01  [Fertiliser].Apply(amount: 50, type: "UreaN")
              1995-10-31  [Fertiliser].Apply(amount: 50, type: "UreaN")
              1995-11-30  [Fertiliser].Apply(amount: 50, type: "UreaN")
              1995-12-31  [Fertiliser].Apply(amount: 50, type: "UreaN")
              1996-01-31  [Fertiliser].Apply(amount: 50, type: "UreaN")
              1996-02-28  [Fertiliser].Apply(amount: 50, type: "UreaN")
              1996-03-31  [Fertiliser].Apply(amount: 50, type: "UreaN")
              1996-04-30  [Fertiliser].Apply(amount: 50, type: "UreaN")
              1996-05-31  [Fertiliser].Apply(amount: 50, type: "UreaN")
              1996-06-30  [Fertiliser].Apply(amount: 50, type: "UreaN")
              1996-07-31  [Fertiliser].Apply(amount: 50, type: "UreaN")
              1996-08-31  [Fertiliser].Apply(amount: 50, type: "UreaN")
              1996-09-30  [Fertiliser].Apply(amount: 50, type: "UreaN")
              1996-10-31  [Fertiliser].Apply(amount: 50, type: "UreaN")
              1996-11-30  [Fertiliser].Apply(amount: 50, type: "UreaN")
              1996-12-31  [Fertiliser].Apply(amount: 50, type: "UreaN")
              1997-01-30  [Fertiliser].Apply(amount: 50, type: "UreaN")
              1997-02-28  [Fertiliser].Apply(amount: 50, type: "UreaN")
              1997-03-31  [Fertiliser].Apply(amount: 50, type: "UreaN")
              1997-04-30  [Fertiliser].Apply(amount: 50, type: "UreaN")
              1997-04-30  [Fertiliser].Apply(amount: 50, type: "UreaN")
              1997-05-31  [Fertiliser].Apply(amount: 50, type: "UreaN")
              1997-06-30  [Fertiliser].Apply(amount: 50, type: "UreaN")
              1997-07-31  [Fertiliser].Apply(amount: 50, type: "UreaN")
            Irrigation
            Fertiliser
            SurfaceOrganicMatter: InitialResidueName=grass; InitialResidueType=grass; InitialResidueMass=1000; InitialStandingFraction=0; InitialCPR=0; InitialCNR=25
            PastureSpecies AGPRyegrass: same as Validation.Australia.Mutdapilly9294.Mutdapilly9294Base.Field.AGPRyegrass
            Report: EventNames=[Clock].DoReport
              VariableNames:
                [Clock].Today
                [Clock].Today.Year as Year
                [Irrigation].IrrigationApplied
                // plant outputs
                [AgPRyegrass].AboveGroundWt
                [AgPRyegrass].AboveGround.Wt
                [AgPRyegrass].AboveGroundNConc
                [AgPRyegrass].AboveGroundHarvestable.StructuralWt
                [AgPRyegrass].Leaf.DigestibilityLive
                [AgPRyegrass].Stem.DigestibilityLive
                [AgPRyegrass].Harvestable.Digestibility
                [AgPRyegrass].BelowGroundWt
                [AGPRyegrass].GlfWaterSupply
                [AGPRyegrass].GlfNContent
                [AgPRyegrass].Leaf.Live.Wt
                [AgPRyegrass].Leaf.Live.NConc
                [AgPRyegrass].Leaf.Dead.Wt
                [AgPRyegrass].LAIGreen
                [AgPRyegrass].Stem.Live.Wt
                [AgPRyegrass].Stem.Live.NConc
                [AgPRyegrass].TotalWt
                [AgPRyegrass].AboveGroundCrudeProtein
                sum([Soil].NO3.kgha)
            Manager Irrigated: same as Validation.Australia.Mutdapilly9294.Factors.Irrigation.Full
            Soil: same as Validation.Australia.Mutdapilly9294.Mutdapilly9294Base.Field.Soil
            Operations DefoliationSchedule
              1995-06-05  [AgPRyegrass].RemoveBiomass(amount: 500, type: "SetResidueAmount")
              1995-07-03  [AgPRyegrass].RemoveBiomass(amount: 500, type: "SetResidueAmount")
              1995-07-31  [AgPRyegrass].RemoveBiomass(amount: 500, type: "SetResidueAmount")
              1995-08-28  [AgPRyegrass].RemoveBiomass(amount: 500, type: "SetResidueAmount")
              1995-09-20  [AgPRyegrass].RemoveBiomass(amount: 500, type: "SetResidueAmount")
              1995-10-19  [AgPRyegrass].RemoveBiomass(amount: 500, type: "SetResidueAmount")
              1995-11-24  [AgPRyegrass].RemoveBiomass(amount: 500, type: "SetResidueAmount")
              1995-05-18  [AgPRyegrass].RemoveBiomass(amount: 500, type: "SetResidueAmount")
              1996-09-06  [AgPRyegrass].RemoveBiomass(amount: 500, type: "SetResidueAmount")
              1996-10-03  [AgPRyegrass].RemoveBiomass(amount: 500, type: "SetResidueAmount")
              1996-10-31  [AgPRyegrass].RemoveBiomass(amount: 500, type: "SetResidueAmount")
              1996-11-27  [AgPRyegrass].RemoveBiomass(amount: 500, type: "SetResidueAmount")
              1996-12-23  [AgPRyegrass].RemoveBiomass(amount: 500, type: "SetResidueAmount")
              1997-01-20  [AgPRyegrass].RemoveBiomass(amount: 500, type: "SetResidueAmount")
              1997-02-20  [AgPRyegrass].RemoveBiomass(amount: 500, type: "SetResidueAmount")
              1997-03-20  [AgPRyegrass].RemoveBiomass(amount: 500, type: "SetResidueAmount")
              1997-04-28  [AgPRyegrass].RemoveBiomass(amount: 500, type: "SetResidueAmount")
              1997-05-22  [AgPRyegrass].RemoveBiomass(amount: 500, type: "SetResidueAmount")
      Experiment Kyabram9597
        Factors
          Factor Cultivar: Specification=[Sowing]
            Operations Aurora
              1995-03-01  [AgPRyegrass].Sow(population: 1, cultivar: "Aurora", depth: 5, rowSpacing: 150)
            Operations Ba11351
              1995-03-01  [AgPRyegrass].Sow(population: 1, cultivar: "Ba11351", depth: 5, rowSpacing: 150)
            Operations Ellett
              1995-03-01  [AgPRyegrass].Sow(population: 1, cultivar: "Ellett", depth: 5, rowSpacing: 150)
            Operations Vedette
              1995-03-01  [AgPRyegrass].Sow(population: 1, cultivar: "Vedette", depth: 5, rowSpacing: 150)
            Operations KangarooValley
              1995-03-01  [AgPRyegrass].Sow(population: 1, cultivar: "KangarooValley", depth: 5, rowSpacing: 150)
        Simulation Kyabram9597
          Clock: Start=1995-04-01; End=1997-06-30
          Weather
            FileName=C:/Jessica/GIT/ApsimX/ApsimX/Tests/Validation/Ryegrass/Kyabram.met
          Summary summaryfile
          SoilArbitrator Soil Arbitrator
          MicroClimate: a_interception=0; b_interception=1; c_interception=0; d_interception=0; SoilHeatFluxFraction=0.4; MinimumHeightDiffForNewLayer=0; NightInterceptionFraction=0.5; ReferenceHeight=2
          Zone Field: Area=1; Slope=0; AspectAngle=0; Altitude=50
            Operations Sowing
            Operations FertiliserManagement: same as Validation.Australia.Gatton9597.Gatton9597Base.Field.FertiliserManagement
            Irrigation
            Fertiliser
            SurfaceOrganicMatter: InitialResidueName=grass; InitialResidueType=grass; InitialResidueMass=1000; InitialStandingFraction=0; InitialCPR=0; InitialCNR=25
            PastureSpecies AGPRyegrass: same as Validation.Australia.Mutdapilly9294.Mutdapilly9294Base.Field.AGPRyegrass
            Report: EventNames=[Clock].DoReport
              VariableNames:
                [Clock].Today
                [Clock].Today.Year as Year
                [Irrigation].IrrigationApplied
                // plant outputs
                [AgPRyegrass].AboveGroundWt
                [AgPRyegrass].AboveGround.Wt
                [AgPRyegrass].AboveGroundHarvestable.StructuralWt
                //[AgPRyegrass].HarvestableLive.Wt
                [AgPRyegrass].AboveGroundNConc
                [AgPRyegrass].Leaf.DigestibilityLive
                [AgPRyegrass].Stem.DigestibilityLive
                [AgPRyegrass].Harvestable.Digestibility
                [AgPRyegrass].BelowGroundWt
                [AGPRyegrass].GlfWaterSupply
                [AGPRyegrass].GlfNContent
                [AgPRyegrass].Leaf.Live.Wt
                [AgPRyegrass].Leaf.Live.NConc
                [AgPRyegrass].Leaf.Dead.Wt
                [AgPRyegrass].LAIGreen
                [AgPRyegrass].Stem.Live.Wt
                [AgPRyegrass].Stem.Live.NConc
                [AgPRyegrass].TotalWt
                [AgPRyegrass].AboveGroundCrudeProtein
                sum([Soil].NO3.kgha)
            Manager Irrigated: same as Validation.Australia.Mutdapilly9294.Factors.Irrigation.Full
            Soil: same as Validation.Australia.Mutdapilly9294.Mutdapilly9294Base.Field.Soil
            Operations DefoliationSchedule
              1995-08-30  [AgPRyegrass].RemoveBiomass(amount: 500, type: "SetResidueAmount")
              1995-09-26  [AgPRyegrass].RemoveBiomass(amount: 500, type: "SetResidueAmount")
              1995-10-19  [AgPRyegrass].RemoveBiomass(amount: 500, type: "SetResidueAmount")
              1995-11-10  [AgPRyegrass].RemoveBiomass(amount: 500, type: "SetResidueAmount")
              1995-12-27  [AgPRyegrass].RemoveBiomass(amount: 500, type: "SetResidueAmount")
              1995-02-16  [AgPRyegrass].RemoveBiomass(amount: 500, type: "SetResidueAmount")
              1996-03-18  [AgPRyegrass].RemoveBiomass(amount: 500, type: "SetResidueAmount")
              1996-05-18  [AgPRyegrass].RemoveBiomass(amount: 500, type: "SetResidueAmount")
              1996-05-05  [AgPRyegrass].RemoveBiomass(amount: 500, type: "SetResidueAmount")
    Folder NewZealand
      Folder Lincoln
        Experiment RainShelter: DisabledSimNames=[Iversen_8Waterdry]
          Memo
            This experiment grew tall fescue and ryegrass with different irrigation treatments under the rain-out shelter at Lincoln
          Factors
            Permutation
              Factor Irrigation
                CompositeFactor Weekly: Specifications=[IrrigationEvents]
                  Operations IrrigationEvents
                    2006-08-07  [Irrigation].Apply(7)
                    2006-08-14  [Irrigation].Apply(7)
                    2006-08-21  [Irrigation].Apply(15)
                    2006-08-28  [Irrigation].Apply(13)
                    2006-09-04  [Irrigation].Apply(23)
                    2006-09-11  [Irrigation].Apply(16)
                    2006-09-18  [Irrigation].Apply(20.4)
                    2006-09-25  [Irrigation].Apply(24)
                    2006-10-02  [Irrigation].Apply(21)
                    2006-10-09  [Irrigation].Apply(21)
                    2006-10-16  [Irrigation].Apply(37)
                    2006-10-24  [Irrigation].Apply(32)
                    2006-10-30  [Irrigation].Apply(25)
                    2006-11-06  [Irrigation].Apply(29)
                    2006-11-13  [Irrigation].Apply(29.4)
                    2006-11-20  [Irrigation].Apply(30.4)
                    2006-11-27  [Irrigation].Apply(40)
                    2006-12-04  [Irrigation].Apply(44)
                    2006-12-11  [Irrigation].Apply(34)
                    2006-12-18  [Irrigation].Apply(32)
                    2006-12-25  [Irrigation].Apply(33.6)
                    2007-01-01  [Irrigation].Apply(37)
                    2007-01-08  [Irrigation].Apply(28.6)
                    2007-01-15  [Irrigation].Apply(24.4)
                    2007-01-22  [Irrigation].Apply(31)
                    2007-01-29  [Irrigation].Apply(30)
                    2007-02-05  [Irrigation].Apply(32)
                    2007-02-12  [Irrigation].Apply(31)
                    2007-02-19  [Irrigation].Apply(27)
                    2007-02-26  [Irrigation].Apply(31)
                    2007-03-05  [Irrigation].Apply(50)
                    2007-03-12  [Irrigation].Apply(17.8)
                    2007-03-19  [Irrigation].Apply(25)
                    2007-03-26  [Irrigation].Apply(27)
                    2007-04-02  [Irrigation].Apply(22)
                    2007-04-09  [Irrigation].Apply(22)
                    2007-04-16  [Irrigation].Apply(15.5)
                    2007-04-23  [Irrigation].Apply(12)
                    2007-04-30  [Irrigation].Apply(8)
                    2007-05-07  [Irrigation].Apply(10.5)
                    2007-08-13  [Irrigation].Apply(16.5)
                    2007-08-20  [Irrigation].Apply(8)
                    2007-08-27  [Irrigation].Apply(21.7)
                    2007-09-03  [Irrigation].Apply(15.6)
                    2007-09-10  [Irrigation].Apply(16.9)
                    2007-09-17  [Irrigation].Apply(19.1)
                    2007-09-24  [Irrigation].Apply(14.2)
                    2007-09-27  [Irrigation].Apply(9)
                    2007-10-01  [Irrigation].Apply(16)
                    2007-10-08  [Irrigation].Apply(28)
                    2007-10-15  [Irrigation].Apply(14.1018518518519)
                    2007-10-16  [Irrigation].Apply(3)
                    2007-10-23  [Irrigation].Apply(36.3)
                    2007-10-29  [Irrigation].Apply(35)
                    2007-11-05  [Irrigation].Apply(32)
                    2007-11-12  [Irrigation].Apply(29)
                    2007-11-15  [Irrigation].Apply(3.5)
                    2007-11-19  [Irrigation].Apply(31)
                    2007-11-26  [Irrigation].Apply(39)
                    2007-12-03  [Irrigation].Apply(30.4)
                    2007-12-05  [Irrigation].Apply(4.5)
                    2007-12-10  [Irrigation].Apply(34.8958333333333)
                    2007-12-17  [Irrigation].Apply(27)
                    2007-12-24  [Irrigation].Apply(32.2)
                    2007-12-31  [Irrigation].Apply(35)
                    2007-12-31  [Irrigation].Apply(3.7)
                    2008-01-07  [Irrigation].Apply(34.9)
                    2008-01-14  [Irrigation].Apply(40)
                    2008-01-21  [Irrigation].Apply(39.1)
                    2008-01-24  [Irrigation].Apply(8)
                    2008-01-28  [Irrigation].Apply(38)
                    2008-02-04  [Irrigation].Apply(43.0347222222222)
                    2008-02-11  [Irrigation].Apply(37)
                    2008-02-18  [Irrigation].Apply(28.7)
                    2008-02-25  [Irrigation].Apply(39.5)
                    2008-03-03  [Irrigation].Apply(35.6)
                    2008-03-10  [Irrigation].Apply(33.3)
                    2008-03-17  [Irrigation].Apply(33.1)
                    2008-03-19  [Irrigation].Apply(7.7)
                    2008-03-25  [Irrigation].Apply(35.9)
                    2008-03-31  [Irrigation].Apply(25.1)
                    2008-04-07  [Irrigation].Apply(29.2)
                    2008-04-14  [Irrigation].Apply(20.9)
                    2008-04-15  [Irrigation].Apply(4.9)
                    2008-04-21  [Irrigation].Apply(11.8)
                    2008-04-28  [Irrigation].Apply(10.6)
                    2008-05-12  [Irrigation].Apply(8.9)
                CompositeFactor SpringDrought: Specifications=[IrrigationEvents]
                  Operations IrrigationEvents
                    2007-01-08  [Irrigation].Apply(28.6)
                    2007-01-15  [Irrigation].Apply(24.4)
                    2007-01-22  [Irrigation].Apply(31)
                    2007-01-29  [Irrigation].Apply(30)
                    2007-02-05  [Irrigation].Apply(32)
                    2007-02-12  [Irrigation].Apply(31)
                    2007-02-19  [Irrigation].Apply(27)
                    2007-02-26  [Irrigation].Apply(31)
                    2007-03-05  [Irrigation].Apply(50)
                    2007-03-12  [Irrigation].Apply(17.8)
                    2007-03-19  [Irrigation].Apply(25)
                    2007-03-26  [Irrigation].Apply(27)
                    2007-04-02  [Irrigation].Apply(22)
                    2007-04-09  [Irrigation].Apply(22)
                    2007-04-16  [Irrigation].Apply(15.5)
                    2007-04-23  [Irrigation].Apply(12)
                    2007-04-30  [Irrigation].Apply(8)
                    2007-05-07  [Irrigation].Apply(10.5)
                    2007-08-13  [Irrigation].Apply(16.5)
                    2007-08-20  [Irrigation].Apply(8)
                    2007-09-27  [Irrigation].Apply(9)
                    2007-11-01  [Irrigation].Apply(5)
                    2008-01-17  [Irrigation].Apply(4.4)
                    2008-02-04  [Irrigation].Apply(43)
                    2008-02-11  [Irrigation].Apply(37)
                    2008-02-18  [Irrigation].Apply(28.7)
                    2008-02-25  [Irrigation].Apply(39.5)
                    2008-03-03  [Irrigation].Apply(35.6)
                    2008-03-10  [Irrigation].Apply(33.3)
                    2008-03-17  [Irrigation].Apply(33.1)
                    2008-03-19  [Irrigation].Apply(7.7)
                    2008-03-25  [Irrigation].Apply(35.9)
                    2008-03-31  [Irrigation].Apply(25.1)
                    2008-04-07  [Irrigation].Apply(29.2)
                    2008-04-14  [Irrigation].Apply(20.9)
                    2008-04-15  [Irrigation].Apply(5.9)
                    2008-04-21  [Irrigation].Apply(11.8)
                    2008-04-22  [Irrigation].Apply(5.8)
                    2008-04-28  [Irrigation].Apply(10.6)
                    2008-05-12  [Irrigation].Apply(8.9)
                CompositeFactor AutumnDrought: Specifications=[IrrigationEvents]
                  Operations IrrigationEvents
                    2006-08-07  [Irrigation].Apply(7)
                    2006-08-14  [Irrigation].Apply(7)
                    2006-08-21  [Irrigation].Apply(15)
                    2006-08-28  [Irrigation].Apply(13)
                    2006-09-04  [Irrigation].Apply(23)
                    2006-09-11  [Irrigation].Apply(16)
                    2006-09-18  [Irrigation].Apply(20.4)
                    2006-09-25  [Irrigation].Apply(24)
                    2006-10-02  [Irrigation].Apply(21)
                    2006-10-09  [Irrigation].Apply(21)
                    2006-10-16  [Irrigation].Apply(37)
                    2006-10-24  [Irrigation].Apply(32)
                    2006-10-30  [Irrigation].Apply(25)
                    2006-11-06  [Irrigation].Apply(29)
                    2006-11-13  [Irrigation].Apply(29.4)
                    2006-11-20  [Irrigation].Apply(30.4)
                    2006-11-27  [Irrigation].Apply(40)
                    2006-12-04  [Irrigation].Apply(44)
                    2006-12-11  [Irrigation].Apply(3)
                    2007-03-05  [Irrigation].Apply(18)
                    2007-04-16  [Irrigation].Apply(15.5)
                    2007-05-07  [Irrigation].Apply(10.5)
                    2007-08-13  [Irrigation].Apply(16.5)
                    2007-08-20  [Irrigation].Apply(8)
                    2007-08-27  [Irrigation].Apply(21.7)
                    2007-09-03  [Irrigation].Apply(15.6)
                    2007-09-10  [Irrigation].Apply(16.9)
                    2007-09-17  [Irrigation].Apply(19.1)
                    2007-09-24  [Irrigation].Apply(14.2)
                    2007-09-27  [Irrigation].Apply(9)
                    2007-10-01  [Irrigation].Apply(16)
                    2007-10-08  [Irrigation].Apply(28)
                    2007-10-15  [Irrigation].Apply(14.1018518518519)
                    2007-10-16  [Irrigation].Apply(3)
                    2007-10-23  [Irrigation].Apply(36.3)
                    2007-10-29  [Irrigation].Apply(35)
                    2007-11-05  [Irrigation].Apply(32)
                    2007-11-12  [Irrigation].Apply(29)
                    2007-11-15  [Irrigation].Apply(3.5)
                    2007-12-06  [Irrigation].Apply(3.3)
                    2008-01-17  [Irrigation].Apply(4.4)
                    2008-03-17  [Irrigation].Apply(36.2)
                    2008-03-25  [Irrigation].Apply(35.9)
                    2008-03-31  [Irrigation].Apply(25.1)
                    2008-04-07  [Irrigation].Apply(29.2)
                    2008-04-14  [Irrigation].Apply(20.9)
                    2008-04-21  [Irrigation].Apply(11.8)
                    2008-04-28  [Irrigation].Apply(10.6)
                    2008-05-12  [Irrigation].Apply(8.9)
                CompositeFactor 2Weekly: Specifications=[IrrigationEvents]
                  Operations IrrigationEvents
                    2006-08-07  [Irrigation].Apply(7)
                    2006-08-21  [Irrigation].Apply(15)
                    2006-09-04  [Irrigation].Apply(23)
                    2006-09-18  [Irrigation].Apply(20.4)
                    2006-10-02  [Irrigation].Apply(21)
                    2006-10-16  [Irrigation].Apply(37)
                    2006-10-30  [Irrigation].Apply(25)
                    2006-11-13  [Irrigation].Apply(29.4)
                    2006-11-27  [Irrigation].Apply(40)
                    2006-12-11  [Irrigation].Apply(34)
                    2006-12-25  [Irrigation].Apply(33.6)
                    2007-01-08  [Irrigation].Apply(28.6)
                    2007-01-22  [Irrigation].Apply(31)
                    2007-02-05  [Irrigation].Apply(32)
                    2007-02-19  [Irrigation].Apply(27)
                    2007-03-05  [Irrigation].Apply(50)
                    2007-03-19  [Irrigation].Apply(25)
                    2007-04-02  [Irrigation].Apply(22)
                    2007-04-16  [Irrigation].Apply(15.5)
                    2007-04-30  [Irrigation].Apply(8)
                    2007-08-13  [Irrigation].Apply(16.5)
                    2007-08-20  [Irrigation].Apply(8)
                    2007-09-03  [Irrigation].Apply(15.6)
                    2007-09-17  [Irrigation].Apply(20.4)
                    2007-09-27  [Irrigation].Apply(5.7)
                    2007-10-01  [Irrigation].Apply(16)
                    2007-10-15  [Irrigation].Apply(14.1018518518519)
                    2007-10-29  [Irrigation].Apply(35)
                    2007-10-30  [Irrigation].Apply(4)
                    2007-11-12  [Irrigation].Apply(29.2)
                    2007-11-26  [Irrigation].Apply(39)
                    2007-12-05  [Irrigation].Apply(3.6)
                    2007-12-10  [Irrigation].Apply(34.8958333333333)
                    2007-12-24  [Irrigation].Apply(32.2)
                    2007-12-31  [Irrigation].Apply(3.7)
                    2008-01-07  [Irrigation].Apply(34.9)
                    2008-01-21  [Irrigation].Apply(39.1)
                    2008-02-04  [Irrigation].Apply(43.2)
                    2008-02-07  [Irrigation].Apply(9.3)
                    2008-02-18  [Irrigation].Apply(28.7)
                    2008-03-03  [Irrigation].Apply(35.6)
                    2008-03-17  [Irrigation].Apply(33.1)
                    2008-03-19  [Irrigation].Apply(7.7)
                    2008-03-31  [Irrigation].Apply(25.1)
                    2008-04-14  [Irrigation].Apply(20.9)
                    2008-04-15  [Irrigation].Apply(4.9)
                    2008-04-28  [Irrigation].Apply(10.4)
                    2008-05-12  [Irrigation].Apply(9.2)
                CompositeFactor 2WeeksIn3: Specifications=[IrrigationEvents]
                  Operations IrrigationEvents
                    2006-08-07  [Irrigation].Apply(7)
                    2006-08-14  [Irrigation].Apply(7)
                    2006-08-28  [Irrigation].Apply(13)
                    2006-09-04  [Irrigation].Apply(23)
                    2006-09-18  [Irrigation].Apply(20.4)
                    2006-09-25  [Irrigation].Apply(24)
                    2006-10-09  [Irrigation].Apply(21)
                    2006-10-16  [Irrigation].Apply(37)
                    2006-10-30  [Irrigation].Apply(25)
                    2006-11-06  [Irrigation].Apply(29)
                    2006-11-20  [Irrigation].Apply(30.4)
                    2006-11-27  [Irrigation].Apply(40)
                    2006-12-11  [Irrigation].Apply(34)
                    2006-12-18  [Irrigation].Apply(32)
                    2007-01-01  [Irrigation].Apply(37)
                    2007-01-08  [Irrigation].Apply(28.6)
                    2007-01-22  [Irrigation].Apply(31)
                    2007-01-29  [Irrigation].Apply(30)
                    2007-02-12  [Irrigation].Apply(31)
                    2007-02-19  [Irrigation].Apply(27)
                    2007-03-05  [Irrigation].Apply(50)
                    2007-03-12  [Irrigation].Apply(17.8)
                    2007-03-26  [Irrigation].Apply(27)
                    2007-04-02  [Irrigation].Apply(22)
                    2007-04-16  [Irrigation].Apply(15.5)
                    2007-04-23  [Irrigation].Apply(12)
                    2007-05-07  [Irrigation].Apply(10.5)
                    2007-08-13  [Irrigation].Apply(16.5)
                    2007-08-20  [Irrigation].Apply(8)
                    2007-08-27  [Irrigation].Apply(21.7)
                    2007-09-03  [Irrigation].Apply(15.6)
                    2007-09-17  [Irrigation].Apply(20.4)
                    2007-09-24  [Irrigation].Apply(14.2)
                    2007-09-27  [Irrigation].Apply(5.7)
                    2007-10-08  [Irrigation].Apply(28)
                    2007-10-15  [Irrigation].Apply(14.9861111111111)
                    2007-10-29  [Irrigation].Apply(35)
                    2007-10-30  [Irrigation].Apply(4)
                    2007-11-05  [Irrigation].Apply(32)
                    2007-11-12  [Irrigation].Apply(29.2)
                    2007-11-19  [Irrigation].Apply(31)
                    2007-11-26  [Irrigation].Apply(39)
                    2007-12-06  [Irrigation].Apply(3.3)
                    2007-12-10  [Irrigation].Apply(34.9236111111111)
                    2007-12-17  [Irrigation].Apply(27)
                    2007-12-31  [Irrigation].Apply(35)
                    2008-01-07  [Irrigation].Apply(34.9)
                    2008-01-17  [Irrigation].Apply(1.2)
                    2008-01-21  [Irrigation].Apply(39.1)
                    2008-01-28  [Irrigation].Apply(38)
                    2008-02-07  [Irrigation].Apply(9.3)
                    2008-02-11  [Irrigation].Apply(37)
                    2008-02-18  [Irrigation].Apply(28.7)
                    2008-03-03  [Irrigation].Apply(35.6)
                    2008-03-10  [Irrigation].Apply(33.3)
                    2008-03-19  [Irrigation].Apply(7.7)
                    2008-03-25  [Irrigation].Apply(35.9)
                    2008-03-31  [Irrigation].Apply(25.1)
                    2008-04-14  [Irrigation].Apply(20.9)
                    2008-04-21  [Irrigation].Apply(11.8)
                    2008-04-22  [Irrigation].Apply(5.8)
                    2008-05-12  [Irrigation].Apply(9.2)
                CompositeFactor 1WeekIn4: Specifications=[IrrigationEvents]
                  Operations IrrigationEvents
                    2006-08-21  [Irrigation].Apply(15)
                    2006-09-18  [Irrigation].Apply(20.4)
                    2006-10-16  [Irrigation].Apply(37)
                    2006-11-13  [Irrigation].Apply(29.4)
                    2006-12-11  [Irrigation].Apply(34)
                    2007-01-08  [Irrigation].Apply(28.6)
                    2007-02-05  [Irrigation].Apply(32)
                    2007-03-05  [Irrigation].Apply(50)
                    2007-04-02  [Irrigation].Apply(22)
                    2007-04-30  [Irrigation].Apply(8)
                    2007-08-13  [Irrigation].Apply(16.5)
                    2007-08-20  [Irrigation].Apply(8)
                    2007-09-17  [Irrigation].Apply(20.4)
                    2007-09-27  [Irrigation].Apply(5.7)
                    2007-10-15  [Irrigation].Apply(14.9861111111111)
                    2007-10-30  [Irrigation].Apply(4)
                    2007-12-10  [Irrigation].Apply(34.9236111111111)
                    2008-01-07  [Irrigation].Apply(34.9)
                    2008-01-24  [Irrigation].Apply(8)
                    2008-02-04  [Irrigation].Apply(43.2)
                    2008-03-03  [Irrigation].Apply(35.6)
                    2008-03-31  [Irrigation].Apply(25.1)
                    2008-04-28  [Irrigation].Apply(10.4)
              Factor Species
                CompositeFactor Ryegrass: Specifications=[GrassSpecies]
                  SprumPastureInstance GrassSpecies: AgeAtSimulationStart=2; YearsToMaxDimension=1; RUE=0.6; Presidue=0.15; RsenRate=0.01; Proot=0.1; PSBaseT=0; PSLOptT=17; PSUOptT=20; PSMaxT=35; GRINZ=false; MaxRD=1000; MaxHeight=400; MaxPrunedHeight=50; MaxCover=0.97; MinCover=0.85; ExtinctCoeff=0.6; RegrowthDuration=200; FullCanopyDuration=10000; BaseT=6; OptT=25; MaxT=35; RootNConc=0.01; LeafNConc=0.05; ResidueNConc=0.01; LegumePropn=1; GSMax=0.008; R50=200; SurfaceKL=0.1; WaterStress=true
                CompositeFactor TallFescue: Specifications=[GrassSpecies]
                  SprumPastureInstance GrassSpecies: AgeAtSimulationStart=2; YearsToMaxDimension=1; RUE=0.75; Presidue=0.15; RsenRate=0.01; Proot=0.1; PSBaseT=0; PSLOptT=20; PSUOptT=25; PSMaxT=40; GRINZ=false; MaxRD=1600; MaxHeight=400; MaxPrunedHeight=50; MaxCover=0.97; MinCover=0.85; ExtinctCoeff=0.6; RegrowthDuration=200; FullCanopyDuration=10000; BaseT=6; OptT=25; MaxT=35; RootNConc=0.01; LeafNConc=0.05; ResidueNConc=0.01; LegumePropn=1; GSMax=0.008; R50=200; SurfaceKL=0.1; WaterStress=true
          Simulation RainShelter
            Clock: Start=2006-07-01; End=2008-07-01
            Summary summaryfile
            Weather: FileName=%root%/Examples/WeatherFiles/NZ_Lincoln.met
            SoilArbitrator Soil Arbitrator
            MicroClimate: a_interception=0; b_interception=1; c_interception=0; d_interception=0; SoilHeatFluxFraction=0.4; MinimumHeightDiffForNewLayer=0; NightInterceptionFraction=0.5; ReferenceHeight=2
            Zone paddock: Area=1; Slope=0; AspectAngle=0; Altitude=50
              Irrigation
              Fertiliser
              SurfaceOrganicMatter surface organic matter: InitialResidueName=wheat; InitialResidueType=wheat; InitialResidueMass=0; InitialStandingFraction=0; InitialCPR=0; InitialCNR=80
              Operations IrrigationEvents
              Soil TempletonSiltLoam: SoilType=NZ_sedementary; Region=Plains; State=Canterbury; Country=New Zealand; Latitude=0; Longitude=0
                DataSource=Generic profile descriptions provided by Trevor Webb and data for functional horizions based on SWAMP project results
                Comments=Bulk density values were measured on the fine earth fraction so values entered into apsim soil are adjusted down to account for stone content (assuming stones are inert from all soil process so their mass and volume is removed from model paramaters).  SAT, DUL, LL15 and Air dry have been adjusted down to account for stone content.  OC has not been adjusted so the model will get the correct carbon and N amounts using the adjusted BD.
                Chemical: PHUnits=Water
                  Thickness  PH  CEC
                  180        6   14.2515
                  150        6   11.150525
                  400        6   9.056
                  270        6   8.813
                  500        6   8.7959
                  CEC source: Calculated
                Physical
                  Thickness  ParticleSizeSand  ParticleSizeSilt  ParticleSizeClay  Rocks  BD     AirDry  LL15  DUL   SAT
                  200        5                 65                30                0      1      0.05    0.1   0.35  0.42
                  200        5                 65                30                0      1.324  0.12    0.12  0.32  0.37
                  200        5                 65                30                0      1.35   0.1     0.1   0.31  0.37
                  200        5                 65                30                0      1.301  0.08    0.08  0.32  0.37
                  200        5                 65                30                0      1.301  0.08    0.08  0.33  0.36
                  200        5                 65                30                0      1.301  0.12    0.12  0.33  0.36
                  200        5                 65                30                0      1.301  0.18    0.18  0.33  0.37
                  200        5                 65                30                0      1.301  0.12    0.12  0.3   0.31
                  ParticleSizeSand, ParticleSizeSilt, ParticleSizeClay source: Calculated
                  SoilCrop SPRUMSoil: LL=[0.1, 0.12, 0.1, 0.08, 0.08, 0.12, 0.18, 0.12]; KL=[0.1, 0.1, 0.1, 0.1, 0.1, 0.1, 0.1, 0.1]; XF=[1, 1, 1, 1, 1, 1, 1, 1]
                WaterBalance SoilWater: SummerDate=1-oct; SummerU=9; SummerCona=5; WinterDate=1-Apr; WinterU=9; WinterCona=5; DiffusConst=0; DiffusSlope=0; Salb=0.13; CN2Bare=0; CNRed=0; CNCov=0.8; PSIDul=-100; Thickness=[200, 200, 200, 200, 200, 200, 200, 200]; SWCON=[0.7, 0.7, 0.7, 0.7, 0.7, 0.7, 0.7, 0.7]
                Organic: FOMCNRatio=40; CarbonUnits=Total
                  Thickness  Carbon  SoilCNRatio  FBiom   FInert  FOM
                  180        2.6251  11           0.0333  0.4371  427.528
                  150        1.2469  11           0.0187  0.6569  316.72
                  400        0.316   11           0.0117  0.8496  142.312
                  270        0.208   11           0.0102  0.945   82.9318
                  500        0.2004  11           0.01    0.9827  30.5089
                Water: Thickness=[200, 200, 200, 200, 200, 200, 200, 200]; InitialValues=[0.35, 0.32, 0.31, 0.32, 0.33, 0.33, 0.33, 0.3]; FilledFromTop=false
                Nutrient
                Solute NO3: Thickness=[180, 150, 400, 270, 500]; InitialValues=[265, 40.2427, 5.01813, 2.41979, 1.9216]; InitialValuesUnits=ppm; WaterTableConcentration=0; D0=0; DepthConstant=0; MaxDepthSoluteAccessible=0; RunoffEffectivenessAtMovingSolute=0; MaxEffectiveRunoff=0
                Solute NH4: Thickness=[180, 150, 400, 270, 500]; InitialValues=[1.5, 0.854582, 0.442264, 0.38432, 0.38432]; InitialValuesUnits=ppm; WaterTableConcentration=0; D0=0; DepthConstant=0; MaxDepthSoluteAccessible=0; RunoffEffectivenessAtMovingSolute=0; MaxEffectiveRunoff=0
                Solute Urea: Thickness=[180, 150, 400, 270, 500]; InitialValues=[0, 0, 0, 0, 0]; InitialValuesUnits=kg/ha; WaterTableConcentration=0; D0=0; DepthConstant=0; MaxDepthSoluteAccessible=0; RunoffEffectivenessAtMovingSolute=0; MaxEffectiveRunoff=0
                SoilTemperature Temperature
                OutputLayers Output: Thickness=[200, 200, 200, 200, 200, 200, 200, 200]
              BiomassRemovalEvents CutPasture: NameOfPlantToRemoveFrom=SPRUM; RemovalType=0; StageToSet=GrazingComplete
                BiomassRemovalFractions:
                  PlantName  OrganName  TypeString  LiveToRemove  DeadToRemove  LiveToResidue  DeadToResidue
                  SPRUM      Residue    Cutting     0.7           0             0              0
                  SPRUM      Leaf       Cutting     0.9           0             0.05           0.75
                  SPRUM      Nodule     Cutting     0             0             0              0
                  SPRUM      Root       Cutting     0             0             0              0
              Plant SPRUM
              SprumPastureInstance GrassSpecies: AgeAtSimulationStart=0; YearsToMaxDimension=2; RUE=1.6; Presidue=0.15; RsenRate=0.01; Proot=0.1; PSBaseT=0; PSLOptT=20; PSUOptT=25; PSMaxT=40; GRINZ=false; MaxRD=2500; MaxHeight=600; MaxPrunedHeight=50; MaxCover=0.98; MinCover=0.05; ExtinctCoeff=0.7; RegrowthDuration=300; FullCanopyDuration=10000; BaseT=6; OptT=25; MaxT=35; RootNConc=0.01; LeafNConc=0.05; ResidueNConc=0.01; LegumePropn=1; GSMax=0.006; R50=175; SurfaceKL=0.11; WaterStress=true
              Report: EventNames=[Clock].EndOfDay
                VariableNames:
                  [Clock].Today
                  [SurfaceOrganicMatter].Wt
                  [Soil].Output.SW
                  sum([Soil].Output.SWmm)
                  [Soil].SoilWater.Es
                  [Soil].SoilWater.Eos
                  [Soil].SoilWater.Runoff
                  [Soil].SoilWater.Infiltration
                  [Soil].SoilWater.Drainage
                  [SPRUM].Leaf.Canopy.CoverDead
                  [SPRUM].Leaf.Canopy.CoverGreen
                  [SPRUM].Leaf.Canopy.CoverTotal
                  [SPRUM].Height
                  [SPRUM].Leaf.Canopy.LAI
                  [SPRUM].Root.Network.Depth
                  [SPRUM].Root.Wt
                  [SPRUM].Leaf.Wt
                  [SPRUM].Residue.Wt
                  [SPRUM].AboveGround.Wt
                  [SPRUM].Arbitrator.FN
                  [SPRUM].Leaf.Canopy.FW
              Manager Grazing
```csharp
using System;
using Models.Core;
using APSIM.Shared.Utilities;
using System.Collections.Generic;
using Models.Management;
using System.Diagnostics;
        
namespace Models
{
    [Serializable] 
    [System.Xml.Serialization.XmlInclude(typeof(Model))]
    public class Script : Model
    {
        [Link] Clock Clock;
        [Link(Type = LinkType.Ancestor)] Simulation thisSim;
        [Link(Type = LinkType.Scoped)] BiomassRemovalEvents graze;
        
        private string simName;
        private List<string> grazings = new List<string>();        

        private Dictionary<string, List<string>> GrazeDates = new Dictionary<string, List<string>>()
        {
            {"RainShelterIrrigation1WeekIn4SpeciesRyegrass", new List<string>{"13/09/2006","4/10/2006","1/11/2006","5/01/2007","21/02/2007","11/04/2007","14/05/2007","25/09/2007","23/10/2007","21/01/2008","29/04/2008","14/05/2008"}},
            {"RainShelterIrrigation1WeekIn4SpeciesTallFescue", new List<string>{"6/09/2006","4/10/2006","1/11/2006","7/12/2006","17/01/2007","21/03/2007","14/05/2007","25/09/2007","30/10/2007","21/01/2008","29/04/2008","14/05/2008"}},
            {"RainShelterIrrigation2WeeklySpeciesRyegrass", new List<string>{"13/09/2006","4/10/2006","27/10/2006","22/11/2006","27/12/2006","17/01/2007","31/01/2007","21/02/2007","21/03/2007","11/04/2007","1/05/2007","14/05/2007","25/09/2007","16/10/2007","23/11/2007","20/12/2007","31/01/2008","27/02/2008","10/04/2008","14/05/2008"}},
            {"RainShelterIrrigation2WeeklySpeciesTallFescue", new List<string>{"7/09/2006","4/10/2006","1/11/2006","22/11/2006","21/12/2006","17/01/2007","31/01/2007","21/02/2007","16/03/2007","11/04/2007","14/05/2007","25/09/2007","23/10/2007","23/11/2007","3/01/2008","27/02/2008","10/04/2008","14/05/2008"}},
            {"RainShelterIrrigation2WeeksIn3SpeciesRyegrass", new List<string>{"13/09/2006","4/10/2006","1/11/2006","22/11/2006","21/12/2006","10/01/2007","24/01/2007","14/02/2007","16/03/2007","24/04/2007","14/05/2007","21/09/2007","16/10/2007","4/12/2007","3/01/2008","5/02/2008","10/03/2008","16/04/2008","14/05/2008"}},
            {"RainShelterIrrigation2WeeksIn3SpeciesTallFescue", new List<string>{"6/09/2006","4/10/2006","1/11/2006","28/11/2006","27/12/2006","17/01/2007","5/02/2007","21/02/2007","21/03/2007","11/04/2007","14/05/2007","21/09/2007","16/10/2007","23/11/2007","3/01/2008","5/02/2008","10/03/2008","10/04/2008","14/05/2008"}},
            {"RainShelterIrrigationAutumnDroughtSpeciesRyegrass", new List<string>{"13/09/2006","4/10/2006","27/10/2006","8/11/2006","28/11/2006","18/12/2006","10/01/2007","12/03/2007","13/04/2007","14/05/2007","21/09/2007","11/10/2007","12/11/2007","4/12/2007","8/01/2008","29/04/2008","14/05/2008"}},
            {"RainShelterIrrigationAutumnDroughtSpeciesTallFescue", new List<string>{"7/09/2006","4/10/2006","1/11/2006","22/11/2006","18/12/2006","17/01/2007","12/03/2007","13/04/2007","14/05/2007","21/09/2007","11/10/2007","7/11/2007","4/12/2007","8/01/2008","29/04/2008","14/05/2008"}},
            {"RainShelterIrrigationSpringDroughtSpeciesRyegrass", new List<string>{"13/09/2006","10/10/2006","8/11/2006","5/01/2007","31/01/2007","14/02/2007","9/03/2007","27/03/2007","27/04/2007","14/05/2007","25/09/2007","30/10/2007","8/01/2008","7/03/2008","26/03/2008","16/04/2008","14/05/2008"}},
            {"RainShelterIrrigationSpringDroughtSpeciesTallFescue", new List<string>{"6/09/2006","4/10/2006","8/11/2006","5/01/2007","31/01/2007","21/02/2007","15/03/2007","5/04/2007","1/05/2007","14/05/2007","25/09/2007","30/10/2007","8/01/2008","7/03/2008","26/03/2008","16/04/2008","14/05/2008"}},
            {"RainShelterIrrigationWeeklySpeciesRyegrass", new List<string> {"13/09/2006","4/10/2006","27/10/2006","22/11/2006","21/12/2006","10/01/2007","24/01/2007","14/02/2007","9/03/2007","27/03/2007","27/04/2007","14/05/2007","21/09/2007","11/10/2007","7/11/2007","27/11/2007","20/12/2007","21/01/2008","23/02/2008","10/04/2008","14/05/2008"}},
            {"RainShelterIrrigationWeeklySpeciesTallFescue", new List<string>{"6/09/2006","27/09/2006","20/10/2006","8/11/2006","28/11/2006","21/12/2006","10/01/2007","24/01/2007","14/02/2007","15/03/2007","5/04/2007","14/05/2007","21/09/2007","11/10/2007","7/11/2007","27/11/2007","20/12/2007","21/01/2008","23/02/2008","26/03/2008","5/05/2008","14/05/2008"}}
        };
                      
        [EventSubscribe("DoManagement")]
        private void OnDoManagement(object sender, EventArgs e)
        {
                foreach (string date in grazings)
                {
                    if (DateUtilities.CompareDates(date, Clock.Today) == 0)
                    { // date match, trigger a removal
                        graze.Remove();
                    }
                }
        }
        
        [EventSubscribe("StartOfSimulation")]
        private void OnStartOfSimulation (object sender, EventArgs e)
        {
            simName = thisSim.Name;
            grazings = GrazeDates[simName];
            //Debugger.Break();
        }                                       
    }
}
```
              Manager ClimateController
                AllowControl = True
                EnableDate = 01/01/1972 00:00:00
                WithinYearControl = False
                ControlStart =
                ControlEnd =
                RainfallMultiplier = 0
                RainfallAddition = 0
                RadiationMultiplier = 1
                RadiationAddition = 0
                MinTMultiplier = 1
                MinTAddition = 0
                MaxTMultiplier = 1
                MaxTAddition = 0
                WindMultiplier = 1
                WindAddition = 0
                VPMultiplier = 1
                VPAddition = 0
```csharp
using Newtonsoft.Json;
using APSIM.Shared.Utilities;
using Models.Interfaces;
using Models.Soils;
using Models.PMF;
using Models.Core;
using System.Xml.Serialization;
using System;
using System.Linq;
using Models.Soils.Nutrients;
using Models.Climate;

namespace Models
{
    [Serializable]
    public class Script : Model
    {
        // - Links to APSIM models
        [Link] Zone zone;
        [Link] Clock clock;
        [Link] Weather weather;
        [Link] ISummary summary = null;

        // - Parameters for this manager
        [Description("Enabled (untick to disable this manager)")] public bool AllowControl { get; set; }

        [Separator("General settings")]
        [Description("Start the climate controls beginning on date (dd/mmm/yyyy): ")] public DateTime EnableDate { get; set; }
        [Description("Implement climate control only during part of the year?")] public bool WithinYearControl { get; set; }
        [Description("Within each year, the first day to start the climate controls is (dd-mmm)")] public string ControlStart { get; set; }
        [Description("Within each year, end last day of climate control is (dd-mmm)")] public string ControlEnd { get; set; }

        [Separator("Rainfall")]
        [Description("Rainfall multiplier (-): ")] public double RainfallMultiplier { get; set; }
        [Description("Rainfall addition (mm): ")] public double RainfallAddition { get; set; }

        [Separator("Radiation")]
        [Description("Radiation multiplier (-): ")] public double RadiationMultiplier { get; set; }
        [Description("Radiation addition (MJ/m2): ")] public double RadiationAddition { get; set; }

        [Separator("Minimum temperature")]
        [Description("Minimum temperature multiplier (-): ")] public double MinTMultiplier { get; set; }
        [Description("Minimum temperature addition (C): ")] public double MinTAddition { get; set; }

        [Separator("Maximum temperature")]
        [Description("Maximum temperature multiplier (-): ")] public double MaxTMultiplier { get; set; }
        [Description("Maximum temperature addition (C): ")] public double MaxTAddition { get; set; }

        [Separator("Wind speed")]
        [Description("Wind speed multiplier (-): ")] public double WindMultiplier { get; set; }
        [Description("Wind speed addition (m/s): ")] public double WindAddition { get; set; }

        [Separator("Vapour pressure")]
        [Description("Vapour pressure multiplier (-): ")] public double VPMultiplier { get; set; }
        [Description("Vapour pressure addition (hPa): ")] public double VPAddition { get; set; }

        [JsonIgnore] public bool DoControl { get; set; }
        [JsonIgnore] public int DoControlInt { get; set; }

        [EventSubscribe("PreparingNewWeatherData")] private void OnDoManagement(object sender, EventArgs e)
        {
            // Check if this manager is enabled
            if ((AllowControl) && (clock.Today >= EnableDate))
            {
                DoControl = true;
                if (WithinYearControl)
                    DoControl = DateUtilities.WithinDates(ControlStart, clock.Today, ControlEnd); 
            }

            if (DoControl)
                DoControlInt = 1;
            else
                DoControlInt = 0;

            if (DoControl)
            {
                // do the weather alterations 
                weather.Rain = RainfallMultiplier * weather.Rain + RainfallAddition;
                weather.Radn = RadiationMultiplier * weather.Radn + RadiationAddition;
                weather.MinT = MinTMultiplier * weather.MinT + MinTAddition;
                weather.MaxT = MaxTMultiplier * weather.MaxT + MaxTAddition;
                weather.Wind = WindMultiplier * weather.Wind + WindAddition;
                weather.VP = VPMultiplier * weather.VP + VPAddition;
            }
        }
    }
}
```
              Operations Rewetting
                2007-06-21  [Irrigation].Apply(25)
                2007-06-22  [Irrigation].Apply(25)
                2007-06-23  [Irrigation].Apply(25)
                2007-06-24  [Irrigation].Apply(25)
                2007-07-03  [Irrigation].Apply(25)
                2007-07-04  [Irrigation].Apply(25)
                2007-07-23  [Irrigation].Apply(25)
                2007-07-24  [Irrigation].Apply(25)
            Manager ApplyFertOnDates
              FertiliserType = NO3N
              FertiliserDates = 1-Aug, 15-Aug, 1-Sep, 15-Sep, 1-Nov, 15-Nov, 1-dec, 15-dec, 1-Jan, 15-Jan, 1-Feb, 15-Feb, 1-Mar, 15-Mar
              Amount = 0
              AmountType = False
```csharp
using Models.Soils;
using System;
using Models.Core;
using Models.PMF;
using APSIM.Shared.Utilities;
namespace Models
{
    [Serializable]
    public class Script : Model
    {
        [Link] Clock Clock;
        [Link] Fertiliser Fertiliser;
        
        [Separator("A component to apply fertiliser on one or more dates on every year of the simulation")]

        [Description("Type of fertiliser to apply? ")] 
        [Display(Type = DisplayType.FertiliserType)]public string FertiliserType { get; set; }

        [Description("Enter the fertilisation dates as dd-mmm with comma separation (any year information entered will be ignored): ")] 
        public string[] FertiliserDates { get; set; } 

        [Description("Amount of fertiliser to be applied (kg /ha)")] 
        public double Amount { get; set; }

        [Description("Is the above amount to be applied each time? (yes/ticked)? Or is it the total annual amount across all dates (no/unticked)")] 
        public bool AmountType { get; set; }
        
        [EventSubscribe("DoManagement")]
        private void OnDoManagement(object sender, EventArgs e)
        {
            foreach (string ddMMM in FertiliserDates)
            {
                if (DateUtilities.DatesEqual(ddMMM, Clock.Today))
                {
                    if (AmountType)
                        Fertiliser.Apply(amount: Amount, type: FertiliserType);
                    else
                        Fertiliser.Apply(amount: Amount / FertiliserDates.Length, type: FertiliserType);
                }
            }
        }
    }
}
```
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