Simulations: Version=38
  DataStore
    ExcelInput RainShelter: SheetNames=[Observed]
      FileName=%root%\Tests\Validation\Maize\Observations\MaizeObservations.xlsx
    Input ABlockObserved: FileName=%root%\Tests\Validation\SCRUM\AblockObserved.txt
      ErrorMessage=The process cannot access the file 'C:\ApsimX\Tests\SCRUM\AblockObserved.txt' because it is being used by another process.
    Input ABlockSWC: ErrorMessage=The specified file does not exist.; FileName=%root%\Tests\Validation\SCRUM\AblockSWC.txt
    PredictedObserved: PredictedTableName=PredictedLeach; ObservedTableName=ObservedLeach; FieldNameUsedForMatch=Clock.Today
      Tests: POName=PredictedObserved
        AcceptedStats:
          Name       n   Slope     Intercept  SEslope    SEintercept  R2        RMSE     NSE       ME      MAE      RSR
          N          36  1         0          0          0            1         0        1         0       0        0
          NLeaching  36  0.958419  13.1282    0.0754741  7.50894      0.825869  32.4458  0.783278  10.176  16.0194  0.459023
        AcceptedStatsName=Name n Slope Intercept SEslope SEintercept R2 RMSE NSE ME MAE RSR
    PredictedObserved PredictedObserved_RSSoilWater: PredictedTableName=Report; ObservedTableName=Observed; FieldNameUsedForMatch=Clock.Today
      Tests: POName=PredictedObserved_RSSoilWater
        AcceptedStats:
          Name                  n    Slope       Intercept    SEslope    SEintercept  R2         RMSE       NSE          ME            MAE        RSR
          ProfileWater          126  1.1592      -37.8029     0.0490602  15.5401      0.818257   26.9272    0.593019     12.1736       19.6857    0.635414
          Soil.SoilWater.SW(1)  126  1.25789     -0.00648064  0.035765   0.00649649   0.90889    0.0519074  0.574294     0.0356309     0.037277   0.649867
          Soil.SoilWater.SW(2)  126  1.1717      -0.03291     0.0452973  0.00964034   0.84365    0.0287878  0.714034     0.00244251    0.0226019  0.532632
          Soil.SoilWater.SW(3)  126  0.965056    0.0122203    0.0308585  0.00623278   0.887481   0.0179183  0.868892     0.00537741    0.0147627  0.360648
          Soil.SoilWater.SW(4)  126  0.709467    0.066874     0.0284471  0.0057517    0.833779   0.0178229  0.750964     0.00905499    0.0153507  0.497051
          Soil.SoilWater.SW(5)  126  0.296212    0.151906     0.0505935  0.0102712    0.216569   0.0308806  0.0734977    0.0108218     0.0261216  0.958723
          Soil.SoilWater.SW(6)  126  0.0964378   0.186707     0.0256049  0.00512132   0.102656   0.0209168  -0.00966551  0.00696481    0.0176272  1.00083
          Soil.SoilWater.SW(7)  126  -0.0536994  0.211694     0.0111469  0.00226074   0.157652   0.0264472  -0.125935    -0.000390067  0.0216854  1.05688
          Soil.SoilWater.SW(8)  126  -0.0578702  0.207785     0.0201434  0.00415981   0.0624073  0.0287743  -0.297288    -0.00903432   0.0221687  1.13446
        AcceptedStatsName=Name n Slope Intercept SEslope SEintercept R2 RMSE NSE ME MAE RSR
  Simulation SCRUMTestBase
    Weather: FileName=%root%\Tests\WeatherFiles\lincoln.met
    Clock: StartDate=1998-10-14; EndDate=1999-07-01
    Summary
    SoilArbitrator Soil Arbitrator
    Zone Field: Area=1; Slope=0
      Soil: Latitude=0; Longitude=0
        Analysis: Thickness=[100, 200, 300, 300, 300, 300]; PH=[6.6, 6.2, 5.7, 5.5, 5.5, 5.5]; PHUnits=Water; BoronUnits=HotWater
        InitialWater Initial water: PercentMethod=EvenlyDistributed; FractionFull=1
        Water
          Thickness  BD   AirDry  LL15  DUL   SAT
          100        1.2  0.08    0.13  0.33  0.5
          200        1.2  0.13    0.13  0.33  0.5
          300        1.2  0.1     0.1   0.31  0.44
          300        1.2  0.06    0.06  0.15  0.46
          300        1.2  0.04    0.04  0.1   0.44
          300        1.2  0.02    0.02  0.06  0.44
          SoilCrop SCRUMSoil: LL=[0.13, 0.13, 0.1, 0.08, 0.11, 0.11]; KL=[0.1, 0.1, 0.1, 0.1, 0.1, 0.1]; XF=[1, 1, 1, 1, 1, 1]
          SoilCrop PotatoSoil: LL=[0.13, 0.13, 0.27, 0.27, 0.3, 0.3]; KL=[0.1, 0.06, 0.03, 0.01, 0, 0]; XF=[1, 1, 0.1, 0, 0, 0]
        SoilWater: SummerDate=1-Nov; SummerU=9; SummerCona=4.4; WinterDate=1-Apr; WinterU=9; WinterCona=4.4; DiffusConst=88; DiffusSlope=35.4; Salb=0.18; CN2Bare=68; CNRed=20; CNCov=0.8; slope=0; discharge_width=0; catchment_area=0; max_pond=0; ResidueInterception=0
          Thickness  SWCON  KLAT
          100        0.55   0
          200        0.55   0
          300        0.55   0
          300        0.55   0
          300        0.55   0
          300        0.55   0
        SoilNitrogen: fom_type=[default, manure, mucuna, lablab, shemp, stable]; fract_carb=[0.2, 0.3, 0.54, 0.57, 0.45, 0]; fract_cell=[0.7, 0.3, 0.37, 0.37, 0.47, 0.1]; fract_lign=[0.1, 0.4, 0.09, 0.06, 0.08, 0.9]
        SoilOrganicMatter: RootCN=30; RootWt=3000; SoilCN=11.5; EnrACoeff=7.4; EnrBCoeff=0.2; OCUnits=Total
          Thickness  OC    FBiom  FInert
          100        1.82  0.025  0.3
          200        1.47  0.025  0.4
          300        1.2   0.015  0.75
          300        1.03  0.01   0.9
          300        0.47  0.01   0.96
          300        0.47  0.01   0.96
        Sample Initial nitrogen: NO3Units=kgha; NH4Units=ppm; SWUnits=Volumetric; OCUnits=Total; PHUnits=Water
          Thickness  NO3  NH4
          100        270  0
          200        30   0
          300        5    0
          300        5    0
          300        0    0
          300        0    0
        LayerStructure
          Thickness=[100, 100, 100, 100, 100, 100, 100, 100, 100, 100, 100, 100, 100, 100, 100]
        CERESSoilTemperature
      SurfaceOrganicMatter surface organic matter: InitialResidueName=wheat; InitialResidueType=wheat; InitialResidueMass=2000; InitialStandingFraction=0; InitialCPR=0; InitialCNR=80
      MicroClimate: a_interception=0; b_interception=1; c_interception=0; d_interception=0; soil_albedo=0.23; SoilHeatFluxFraction=0.4; NightInterceptionFraction=0.5; ReferenceHeight=2
      Plant SCRUM: CropType=SCRUM
      Irrigation
      Fertiliser
      Manager SCRUMSowingRule
        CultivarName = Maize_Short
        InitialRootDepth = 10
        SowingDate = 1998-10-14
```csharp
using System;
using Models.Core;
using Models.PMF;
namespace Models
{
    [Serializable] 
    [System.Xml.Serialization.XmlInclude(typeof(Model))]
    public class Script : Model
    {
        [Link] Plant SCRUM;
        [Link] Clock Clock;

        [Description("Cultivar")]
        public string CultivarName { get; set; }
        [Description("Initial Root Depth")]
        public double InitialRootDepth { get; set; }
        [Description("Sowing Date")]
        public DateTime SowingDate { get; set; }

               
        [EventSubscribe("DoManagement")]
        private void OnDoManagement(object sender, EventArgs e)
        {
            if (Clock.Today.Date == SowingDate)
                SCRUM.Sow(cultivar: CultivarName, population: 1, depth: InitialRootDepth, rowSpacing: 150);
                
            //PMFCrop.Sow(... Contains the following arguements:
            //Population  double  Optional  Seeds sowing/m2.  Default is zero
            //Cultivar    string  Required  "NameOfCultivar"
            //Depth       double  Optional  Depth (mm) seed sown.   Default is 100mm 
            //MaxCover    double  Optional  Proportion (0-1) of the ground row crop will cover.   Default is 1.0
            //BudNumber   double  Optional  Number of mainstems per seed sown.  Default is 1.0
            //RowSpacing  double  Optional  Spaceing (mm) between drill rows when crop is sown.  Default is 150mm
            //CropClass   string  Optional  Crop class to instantiate when crop is sown.  Default is "Plant"
        }
    }
}
```
      Manager ExtraVariables
```csharp
using System;
using Models.Core;
using System.Collections.Generic;
using System.Text;
using Models.Soils;
using Models.PMF;
using Models;
using System.Xml.Serialization;
using APSIM.Shared.Utilities;

namespace Models
{
    [Serializable] 
    public class Script : Model
    {
        [Link] Clock Clock;
        [Link] Soils.Soil Soil;
        [Link] Models.Surface.SurfaceOrganicMatter SOM;
        [Link] Weather Met;
        [Link] Fertiliser Fert;
        [Link] Irrigation Irrig;
        [Link] Plant SCRUM;
        [Link] Zone zone;
                    
        [XmlIgnore] public bool InitialDay { get; set; }
        
        [XmlIgnore] public double AccumPlantN { get; set; }
        [XmlIgnore] public double AccumMineralisation { get; set; }
        [XmlIgnore] public double AccumDenit { get; set; }
        [XmlIgnore] public double AccumFert { get; set; }
        [XmlIgnore] public double AccumLeach { get; set; }
        [XmlIgnore] public double AccumDetach { get; set; }
        [XmlIgnore] public double DeltaSoilOMN { get; set; }
        [XmlIgnore] public double DeltaSurfaceOMN { get; set; }
        [XmlIgnore] public double DeltaSoilMineralN { get; set; }
        [XmlIgnore] public double SoilNitrogenContent { get; set; }
        
        [XmlIgnore] public double AccumEO { get; set; }
        [XmlIgnore] public double AccumEP { get; set; }
        [XmlIgnore] public double AccumES { get; set; }
        [XmlIgnore] public double AccumDrainage { get; set; }
        [XmlIgnore] public double AccumRunoff { get; set; }
        [XmlIgnore] public double AccumOutflowLat { get; set; }
        [XmlIgnore] public double AccumIrrigation { get; set; }
        [XmlIgnore] public double AccumRainfall { get; set; }
        [XmlIgnore] public double SoilWaterDeficit { get; set; }
    
        [XmlIgnore] public double  InitialSoilOMN { get; set; }
        [XmlIgnore] public double  InitialSurfaceOMN { get; set; }
        [XmlIgnore] public double  InitialMineralN { get; set; }
        
        [XmlIgnore] public double SWC { get; set; }
        [XmlIgnore] public double DUL { get; set; }
        [XmlIgnore] public double OutFlowLat { get; set; }

        [XmlIgnore] public double FomN { get; set; }
        [XmlIgnore] public double BiomN { get; set; }
        [XmlIgnore] public double HumN { get; set; }
        [XmlIgnore] public double OrganicN { get; set; }
        [XmlIgnore] public double NO3N { get; set; }
        [XmlIgnore] public double NH4N { get; set; }
        [XmlIgnore] public double UreaN { get; set; }
        [XmlIgnore] public double MineralN { get; set; }
        [XmlIgnore] public double DltNMinRes { get; set; }
        [XmlIgnore] public double DltNMinTot { get; set; }
        
        [EventSubscribe("Commencing")]
        private void OnSimulationCommencing(object sender, EventArgs e)
        {
            InitialDay = true;
        }
        
        [EventSubscribe("DoManagement")]
        private void OnDoManagement(object sender, EventArgs e)
        {
            //!!!!!! Nitrogen balance components !!!!!!
            //!!!!!!^^^^^^^^^^^^^^^^^^^^^^^^^^^^^!!!!!!
            FomN = MathUtilities.Sum(Soil.SoilNitrogen.FOMN);
            HumN = MathUtilities.Sum(Soil.SoilNitrogen.HumicN);
            BiomN = MathUtilities.Sum(Soil.SoilNitrogen.MicrobialN);
            OrganicN = FomN + HumN + BiomN;
            NO3N = MathUtilities.Sum(Soil.NO3N);
            NH4N = MathUtilities.Sum(Soil.NH4N);
            UreaN = MathUtilities.Sum(Soil.SoilNitrogen.urea);
            MineralN = NO3N + NH4N + UreaN; 
            DltNMinRes = MathUtilities.Sum(Soil.SoilNitrogen.dlt_n_min_res);
            DltNMinTot = MathUtilities.Sum(Soil.SoilNitrogen.MineralisedN);
            int layers = Soil.Thickness.Length;
            if (InitialDay == true)
            {
                InitialSurfaceOMN = SOM.N;
                InitialSoilOMN = OrganicN;
                InitialMineralN = MineralN;
                InitialDay = false;
            }
            DeltaSurfaceOMN = SOM.N - InitialSurfaceOMN;
            AccumLeach = AccumLeach - Soil.SoilWater.LeachNH4 - Soil.SoilWater.LeachNO3 - Soil.SoilWater.LeachUrea; //Fails
            AccumMineralisation += MathUtilities.Sum(Soil.SoilNitrogen.MineralisedN);
            AccumDenit -= MathUtilities.Sum(Soil.SoilNitrogen.Denitrification);
            AccumPlantN -= (double)zone.Get("SCRUM.Root.NUptake");
            DeltaSoilOMN = OrganicN - InitialSoilOMN;
            DeltaSoilMineralN = MineralN - InitialMineralN;
            SoilNitrogenContent = MineralN;
            
            //!!!!!! Water balance components !!!!!!
            //!!!!!!^^^^^^^^^^^^^^^^^^^^^^^^^^!!!!!!

            AccumRainfall += Met.Rain;
            //AccumEP -= (double)zone.Get("[SCRUM].Stover.Transpiration");
            AccumEP -= (double)zone.Get("SCRUM.Root.WaterUptake");
            SoilWaterDeficit =  (SWC - DUL);
            double OutFlowLat = MathUtilities.Sum(Soil.SoilWater.LateralOutflow);
            AccumOutflowLat -= OutFlowLat;
        }
        
        [EventSubscribe("DoManagementCalculations")]
        private void OnDoManagementCalculations(object sender, EventArgs e)
        {
            FomN = MathUtilities.Sum(Soil.SoilNitrogen.FOMN);
            HumN = MathUtilities.Sum(Soil.SoilNitrogen.HumicN);
            BiomN = MathUtilities.Sum(Soil.SoilNitrogen.MicrobialN);
            AccumFert += Fert.NitrogenApplied;
            AccumIrrigation += Irrig.IrrigationApplied;
            
            
            AccumEO -= Soil.SoilWater.Eo;
            AccumES -= Soil.SoilWater.Es; 
            AccumDrainage -= Soil.SoilWater.Drainage;
            AccumRunoff -= Soil.SoilWater.Runoff;
            SWC = MathUtilities.Sum(Soil.SoilWater.SWmm);
            DUL = MathUtilities.Sum(Soil.DULmm);
        }
    }
}
```
      Manager AutomaticIrrigation
        Irrigation_Yes_No = yes
        Season_Start = 1-Oct
        Season_End = 30-Apr
        Season_Allocation = 1000
        Refull_Frac = 0.9
        Trigger_Frac = 0.7
        Return_days = 3
        Maximum_Irrigation_Amount = 40
        Top_Depth = 600
```csharp
using System;
using Models.Core;
using Models.PMF;
using Models.Soils;
using System.Xml.Serialization;
using Models.PMF;
using APSIM.Shared.Utilities;

        
namespace Models
{
    [Serializable] 
    [System.Xml.Serialization.XmlInclude(typeof(Model))]
    public class Script : Model
    {
        //Communication to other modules
        [Link] ISummary summary = null;
        [Link] Irrigation Irrigation;
        [Link] Clock Clock;
        [Link] Soil Soil;
        [Link] Plant SCRUM;
       
        //User inputs from properties tab
        [Description("Irrigation on (yes or no)")]
        public string Irrigation_Yes_No { get; set; }
        [Description("SeasonStart (dd-MMM)")]
        public string Season_Start { get; set; }
        [Description("SeasonEnd (dd-MMM)")]
        public string Season_End { get; set; }
        [Description("Season Allocation (mm)")]
        public double Season_Allocation { get; set; }
        [Description("% PAWC to refill soil to (0-1)")]
        public double Refull_Frac { get; set; }
        [Description("% PAWC to trigger irrigation (0-1)")]
        public double Trigger_Frac { get; set; }
        [Description("Minimum days for irrigation to return")]
        public double Return_days { get; set; }
        [Description("Maximum irrigation application (mm)")]
        public double Maximum_Irrigation_Amount { get; set; }
        [Description("Depth to calculate PAWC (mm)")]
        public double Top_Depth { get; set; }
       
        //Class members
        [XmlIgnore] private bool IrrigationIsAvailable { get; set; }
        [XmlIgnore] public bool SeasonIsOpen { get; set; }
        [XmlIgnore] private bool CropIsActive { get; set; }
        [XmlIgnore] private bool IrrigatorIsAvailable { get; set; }
        [XmlIgnore] private bool SoilIsDry { get; set; }
        [XmlIgnore] public double Top_DUL { get; set; }
        [XmlIgnore] public double Top_Refull { get; set; }
        [XmlIgnore] public double Top_Trigger { get; set; }
        [XmlIgnore] public double Top_LL { get; set; }
        [XmlIgnore] public double Top_SW { get; set; }
        [XmlIgnore] public double Accumulated_depth { get; set; }
        [XmlIgnore] public double Days_since_irrigation { get; set; }
        [XmlIgnore] public double Amount_to_apply { get; set; }
        [XmlIgnore] public double Season_Application { get; set; }
        
        //Variables for date logic testing
        [XmlIgnore] public string StartString { get; set; }
        [XmlIgnore] public string EndString { get; set; }
        [XmlIgnore] public DateTime StartDate { get; set; }
        [XmlIgnore] public DateTime EndDate { get; set; }
        [XmlIgnore] public int TodayYear { get; set; }
        [XmlIgnore] public int TodayMonth { get; set; }
        [XmlIgnore] public int StartMonth { get; set; }
        [XmlIgnore] public int EndMonth { get; set; }
        [XmlIgnore] public int TodayDay { get; set; }
        [XmlIgnore] public int StartDay { get; set; }
        [XmlIgnore] public int EndDay { get; set; }
       
    
        //Calculate static soil variables
        [EventSubscribe("StartOfSimulation")]
        private void OnStartOfSimulation(object sender, EventArgs e)
        {   
            //Calculated soil water variables
            Accumulated_depth = 0;
            for (int layer = 0; Accumulated_depth < Top_Depth; layer++)
            {
                Top_LL += Soil.LL15mm[layer];
                Top_DUL += Soil.DULmm[layer];
                Accumulated_depth += Soil.Thickness[layer];
            }
            Top_Refull = Top_LL + (Top_DUL - Top_LL) * Refull_Frac;
        }
       
      
        //Determine daily requirement for irrigation
        [EventSubscribe("StartOfDay")]
        private void OnStartOfDay(object sender, EventArgs e)
        { 
            //Can we irrigate?
            IrrigationIsAvailable = false; 
            if (Irrigation_Yes_No == "yes")
                IrrigationIsAvailable = true; 
    
            //Are we Allowed to Irrigate?
            TodayYear = Clock.Today.Year;
            StartString = Season_Start + "-" + TodayYear.ToString();
            EndString = Season_End + "-" + TodayYear.ToString();
            StartDate = DateTime.Parse(StartString);
            EndDate = DateTime.Parse(EndString);
            TodayMonth = Clock.Today.Month;
            TodayDay = Clock.Today.Day;
            StartDay = StartDate.Day;
            StartMonth = StartDate.Month;
            EndDay = EndDate.Day;
            EndMonth = EndDate.Month;
          
            SeasonIsOpen = false;
            //if we are in the spring and after the start date then yes
            if ((Clock.Today.Month > 6) && (Clock.Today >= StartDate))
                SeasonIsOpen = true;
            //if we are in the autumn and before the end date then yes
            if ((Clock.Today.Month <= 6) && (Clock.Today <= EndDate))
                SeasonIsOpen = true;
          
            //Is there a crop in the ground that needs irrigation?
            CropIsActive = false;
            if ((SCRUM.Phenology.Stage >= 3.0) && (SCRUM.Phenology.Stage < 6.0))
                CropIsActive = true;
          
            //Is the irrigator available?
            IrrigatorIsAvailable = false;
            Days_since_irrigation += 1;
            if (Days_since_irrigation >= Return_days)
                IrrigatorIsAvailable = true;
          
            //Is the soil dry enough to require irrigation?
            SoilIsDry = false;
            double CurrentRootDepth = 0;
            double RootDepth = SCRUM.Root.Depth;
            CurrentRootDepth = Math.Max(RootDepth, CurrentRootDepth);
          
            double RelativeRootDepth = Math.Min(1.0, CurrentRootDepth / Top_Depth);
            Top_Trigger = Math.Min(Top_Refull, Top_DUL - (Top_DUL - Top_LL) * RelativeRootDepth * (1 - Trigger_Frac)); 
          
            Accumulated_depth = 0;
            Top_SW = 0;
            for (int layer = 0; Accumulated_depth < Top_Depth; layer++)
            {
                Top_SW += Soil.SoilWater.SWmm[layer];
                Accumulated_depth += Soil.Thickness[layer];
            }
            if (Top_SW <= Top_Trigger)
                SoilIsDry = true;
                
            //Lets bloody well irrigate then!!!!
            if ((IrrigationIsAvailable) && (SeasonIsOpen) && (CropIsActive) && (IrrigatorIsAvailable) && (SoilIsDry)) //The conditions are rife for irrigation
            {
                Amount_to_apply = Math.Min(Top_Refull - Top_SW, Maximum_Irrigation_Amount);
                Amount_to_apply = Math.Min(Amount_to_apply, Season_Allocation - Season_Application); 
                Amount_to_apply = Math.Max(Amount_to_apply, 0.0);
                Irrigation.Apply(Amount_to_apply);
                Days_since_irrigation = 0;
                Season_Application += Amount_to_apply;
                summary.WriteMessage(this, "Automatic Irrigation");
            
            }
        }
    }
}
```
      Manager AutomaticFertiliser
        Fertiliser_Yes_No = no
        Season_Start = 1-Aug
        Season_End = 30-Apr
        Season_Allocation = 1000
        TriggerN = 50
        NApplicationAmount = 25
        Return_days = 3
        Top_Depth = 300
```csharp
using System;
using Models.Core;
using Models.PMF;
using Models.Soils;
using System.Xml.Serialization;
using Models.PMF;
using APSIM.Shared.Utilities;

        
namespace Models
{
    [Serializable] 
    [System.Xml.Serialization.XmlInclude(typeof(Model))]
    public class Script : Model
    {
        //Communication to other modules
        [Link] ISummary summary = null;
        [Link] Fertiliser Fertiliser;
        [Link] Clock Clock;
        [Link] Soils.Soil Soil;
        [Link] Plant SCRUM;
       
        //User inputs from properties tab
        [Description("Fertiliser on (yes or no)")]
        public string Fertiliser_Yes_No { get; set; }
        [Description("SeasonStart (dd-MMM)")]
        public string Season_Start { get; set; }
        [Description("SeasonEnd (dd-MMM)")]
        public string Season_End { get; set; }
        [Description("Season Allocation (kg/ha)")]
        public double Season_Allocation { get; set; }
        [Description("Mineral N to maintain soil above (kg/ha)")]
        public double TriggerN { get; set; }
        [Description("Amount of N to apply (kg/ha)")]
        public double NApplicationAmount { get; set; }
        [Description("Minimum days for Fertiliser spreader to return")]
        public double Return_days { get; set; }
        [Description("Depth to calculate mineral N (mm)")]
        public double Top_Depth { get; set; }
       
        //Class members
        [XmlIgnore] private bool FertiliserIsAvailable { get; set; }
        [XmlIgnore] public bool SeasonIsOpen { get; set; }
        [XmlIgnore] private bool CropIsActive { get; set; }
        [XmlIgnore] private bool FertSpreaderIsAvailable { get; set; }
        [XmlIgnore] private bool SoilNIsLow { get; set; }
        [XmlIgnore] public double Top_SoilN { get; set; }
        [XmlIgnore] public double Accumulated_depth { get; set; }
        [XmlIgnore] public double Days_since_fertiliser { get; set; }
        [XmlIgnore] public double Season_Application { get; set; }
        
        //Variables for date logic testing
        [XmlIgnore] public string StartString { get; set; }
        [XmlIgnore] public string EndString { get; set; }
        [XmlIgnore] public DateTime StartDate { get; set; }
        [XmlIgnore] public DateTime EndDate { get; set; }
        [XmlIgnore] public int TodayYear { get; set; }
        [XmlIgnore] public int TodayMonth { get; set; }
        [XmlIgnore] public int StartMonth { get; set; }
        [XmlIgnore] public int EndMonth { get; set; }
        [XmlIgnore] public int TodayDay { get; set; }
        [XmlIgnore] public int StartDay { get; set; }
        [XmlIgnore] public int EndDay { get; set; }
              
        //Determine daily requirement for fertiliser
        [EventSubscribe("StartOfDay")]
        private void OnStartOfDay(object sender, EventArgs e)
        { 
            //Can we irrigate?
            FertiliserIsAvailable = false; 
            if (Fertiliser_Yes_No == "yes")
                FertiliserIsAvailable = true; 
    
            //Are we Allowed to Irrigate?
            TodayYear = Clock.Today.Year;
            StartString = Season_Start + "-" + TodayYear.ToString();
            EndString = Season_End + "-" + TodayYear.ToString();
            StartDate = DateTime.Parse(StartString);
            EndDate = DateTime.Parse(EndString);
            TodayMonth = Clock.Today.Month;
            TodayDay = Clock.Today.Day;
            StartDay = StartDate.Day;
            StartMonth = StartDate.Month;
            EndDay = EndDate.Day;
            EndMonth = EndDate.Month;
          
            SeasonIsOpen = false;
            //if we are in the spring and after the start date then yes
            if ((Clock.Today.Month > 6) && (Clock.Today >= StartDate))
                SeasonIsOpen = true;
            //if we are in the autumn and before the end date then yes
            if ((Clock.Today.Month <= 6) && (Clock.Today <= EndDate))
                SeasonIsOpen = true;
          
            //Is there a crop in the ground that needs irrigation?
            CropIsActive = false;
            if ((SCRUM.Phenology.Stage >= 3.0) && (SCRUM.Phenology.Stage < 6.0))
                CropIsActive = true;
          
            //Is the irrigator available?
            FertSpreaderIsAvailable = false;
            Days_since_fertiliser += 1;
            if (Days_since_fertiliser >= Return_days)
                FertSpreaderIsAvailable = true;
          
            //Is the soil N low enough to require fertiliser?
            SoilNIsLow = false;
            double CurrentRootDepth = 0;
            double RootDepth = SCRUM.Root.Depth;
            CurrentRootDepth = Math.Max(RootDepth, CurrentRootDepth);
          
            Accumulated_depth = 0;
            Top_SoilN = 0;
            for (int layer = 0; Accumulated_depth < Top_Depth; layer++)
            {
                Top_SoilN += Soil.NO3N[layer];
                Accumulated_depth += Soil.Thickness[layer];
            }
            if (Top_SoilN <= TriggerN)
                SoilNIsLow = true;
                
            //Lets bloody well irrigate then!!!!
            if ((FertiliserIsAvailable) && (SeasonIsOpen) && (CropIsActive) && (FertSpreaderIsAvailable) && (SoilNIsLow)) //The conditions are rife for irrigation
            {
                Fertiliser.Apply(NApplicationAmount, Fertiliser.Types.UreaN, 10);
                Days_since_fertiliser = 0;
                Season_Application += NApplicationAmount;
                summary.WriteMessage(this, "Automatic Fertiliser");
            
            }
        }
    }
}
```
      Report: EventNames=[Clock].DoReport
        VariableNames:
          [Clock].Today
          [ExtraVariables].Script.AccumPlantN
          [ExtraVariables].Script.AccumMineralisation
          [ExtraVariables].Script.AccumDenit
          [ExtraVariables].Script.AccumFert
          [ExtraVariables].Script.AccumLeach
          [ExtraVariables].Script.AccumDetach
          [ExtraVariables].Script.DeltaSoilOMN
          [ExtraVariables].Script.DeltaSurfaceOMN
          [ExtraVariables].Script.DeltaSoilMineralN
          [ExtraVariables].Script.SWC
          [ExtraVariables].Script.DUL
          [ExtraVariables].Script.OutFlowLat
          [ExtraVariables].Script.AccumEO
          [ExtraVariables].Script.AccumEP
          [ExtraVariables].Script.AccumES
          [ExtraVariables].Script.AccumDrainage
          [ExtraVariables].Script.AccumRunoff
          [ExtraVariables].Script.AccumRainfall
          [ExtraVariables].Script.AccumIrrigation
          [ExtraVariables].Script.AccumOutflowLat
          [ExtraVariables].Script.SoilWaterDeficit
          [ExtraVariables].Script.SoilNitrogenContent
          [ExtraVariables].Script.FomN
          [ExtraVariables].Script.HumN
          [ExtraVariables].Script.BiomN
          [ExtraVariables].Script.DltNMinRes
          [ExtraVariables].Script.DltNMinTot
          [MicroClimate].net_radn
          [MicroClimate].peta
          [MicroClimate].petr
          [Soil].SoilWater.Drainage
          [Soil].SoilWater.Runoff
          [Soil].SoilWater.Eo
          [Soil].SoilWater.Es
          [Soil].SoilWater.pond
          [Soil].SoilWater.SWmm
          [Soil].NO3N
          [SCRUM].Stover.Live.Wt
          [SCRUM].Root.Live.Wt
          [SCRUM].Product.Live.Wt
          [SCRUM].Stover.Live.N
          [SCRUM].Root.Live.N
          [SCRUM].Product.Live.N
          [SCRUM].Stover.Live.NConc
          [SCRUM].Root.Live.NConc
          [SCRUM].Product.Live.NConc
          [SCRUM].Root.WaterSupply
          [SCRUM].Root.WaterUptake
          [SCRUM].Stover.Transpiration
          [SCRUM].Stover.WaterDemand
          [SCRUM].Root.Depth
          [SCRUM].Stover.CoverTotal
          [SCRUM].Stover.CoverDead
          [SCRUM].Stover.LAI
          [SCRUM].Stover.Height
          [SCRUM].Stover.PotentialBiomass.Value()
          [SCRUM].Product.LiveFWt
          [SCRUM].Arbitrator.N.TotalPlantDemand
          [SCRUM].Arbitrator.N.TotalPlantSupply
          [SCRUM].Stover.Fw
          [SCRUM].Stover.Fn
          [SCRUM].Total.Wt
          [SCRUM].ExpectedYield.Value()
          [SCRUM].DryYield.Value()
          [SCRUM].TotalBiomassAtStartReproductive.Value()
          [SCRUM].TotalBiomassAtStartSenescence.Value()
          [SCRUM].Ymax.Value()
          [SCRUM].Total.N
          [SCRUM].Arbitrator.DM.TotalFixationSupply
          [SCRUM].Arbitrator.DM.TotalPlantDemand
          [SCRUM].Phenology.AccumulatedEmergedTT
          [SCRUM].Arbitrator.DM.SinkLimitation
          [SCRUM].Arbitrator.DM.NutrientLimitation
          [SCRUM].Phenology.ThermalTime.Value()
          [SCRUM].Phenology.CurrentPhaseName
          [SCRUM].Phenology.Stage
          [AutomaticIrrigation].Script.Top_Refull
          [AutomaticIrrigation].Script.Top_Trigger
          [AutomaticIrrigation].Script.Top_SW
          [AutomaticIrrigation].Script.Top_DUL
          [Irrigation].IrrigationApplied
          [AutomaticIrrigation].Script.Amount_to_apply
          [AutomaticIrrigation].Script.StartDate
          [Clock].Today
          [AutomaticIrrigation].Script.SeasonIsOpen
          [AutomaticIrrigation].Script.EndDate
          [AutomaticIrrigation].Script.TodayYear
          [SCRUM].Arbitrator.FN
          [SCRUM].Arbitrator.N.TotalPlantSupply
      SoluteManager
    Memo Caption
      # SCRUM: the Simple Crop Resource Uptake Model

      _Hamish Brown and Rob Zyskowski, Plant and Food Research, New Zealand_

      This model has been built to simulate a range of different crops in simulations where water and nitrogen balance are of interest but a fully mechanistic plant model is not needed. It is a daily time step implementation of the crop model that is used on the Overseer nutrient balance model (Cichota_etal_2010).  It uses simple sigmoidal functions for estimating daily cover and biomass deltas to give realistic water and nitrogen demands. It does not simulate potential yield, this is specified as an input. Yield will be reduced below the specified potential yield if N or water supplies from the soil are insufficient to meet demand. The model has been paramaterised for simulating water and nitrogen balances of cropping rotations in New Zealand (where over 50 different crop types are grown and it is not feasible to produce full crop models for each of these). It may be adapted for other purposes and other crop types may be added but the user will need to keep in mind that it is empirical and the parameters might need changing for crops from different locations.
  Simulation Simple test with Biomass Cut
    Memo
      In this test an Autumn wheat crop is planted, and defoliated part way through its growth.  The series of graphs show how SCRUM accumulates biomass and nitrogen and what happens when a biomass removal event is invoked.  The also demonstrate that componenst of the Nitrogen and water balances are behaving sensibly with the inclusion of SCRUM in a simulation.
    Weather: FileName=%root%\Tests\WeatherFiles\lincoln.met
    Clock: StartDate=2010-10-01; EndDate=2011-07-31
    Summary
    SoilArbitrator Soil Arbitrator
    Zone Field: Area=1; Slope=0
      Soil: Latitude=0; Longitude=0
        Analysis: Thickness=[100, 200, 300, 300, 300, 300]; PH=[6.6, 6.2, 5.7, 5.5, 5.5, 5.5]; PHUnits=Water; BoronUnits=HotWater
        InitialWater Initial water: PercentMethod=EvenlyDistributed; FractionFull=1
        Water: same as SCRUMTestBase.Field.Soil.Water
        SoilWater: same as SCRUMTestBase.Field.Soil.SoilWater
        SoilNitrogen: fom_type=[default, manure, mucuna, lablab, shemp, stable]; fract_carb=[0.2, 0.3, 0.54, 0.57, 0.45, 0]; fract_cell=[0.7, 0.3, 0.37, 0.37, 0.47, 0.1]; fract_lign=[0.1, 0.4, 0.09, 0.06, 0.08, 0.9]
        SoilOrganicMatter: same as SCRUMTestBase.Field.Soil.SoilOrganicMatter
        Sample Initial nitrogen: NO3Units=kgha; NH4Units=ppm; SWUnits=Volumetric; OCUnits=Total; PHUnits=Water
          Thickness  NO3  NH4
          100        270  0
          200        30   0
          300        5    0
          300        5    0
          300        0    0
          300        0    0
        CERESSoilTemperature
      SurfaceOrganicMatter surface organic matter: InitialResidueName=wheat; InitialResidueType=wheat; InitialResidueMass=2000; InitialStandingFraction=0; InitialCPR=0; InitialCNR=80
      MicroClimate: a_interception=0; b_interception=1; c_interception=0; d_interception=0; soil_albedo=0.23; SoilHeatFluxFraction=0.4; NightInterceptionFraction=0.5; ReferenceHeight=2
      Plant SCRUM: CropType=SCRUM
      Irrigation
      Fertiliser
      Manager SowingAndCutting
        CultivarName = Green_Peas
        InitialRootDepth = 10
        SowingDate = 2010-10-14
        CutDate = 2010-12-14
        CutDate2 = 2012-02-14
        CutDate3 = 2013-01-14
        EndCropDate = 2011-05-14
```csharp
using System;
using System.Collections.Generic;
using Models.Core;
using Models.PMF;
using Models.PMF.Interfaces;
using System.Xml.Serialization;

namespace Models
{
    [Serializable] 
    [System.Xml.Serialization.XmlInclude(typeof(Model))]
    public class Script : Model
    {
        [Link] Plant SCRUM;
        [Link] Clock Clock;

        [Description("Cultivar")]
        public string CultivarName { get; set; }
        [Description("Initial Root Depth")]
        public double InitialRootDepth { get; set; }
        [Description("Sowing Date")]
        public DateTime SowingDate { get; set; }
        [Description("Cut Date")]
        public DateTime CutDate { get; set; }
        [Description("Cut Date2")]
        public DateTime CutDate2 { get; set; }
        [Description("Cut Date3")]
        public DateTime CutDate3 { get; set; }
        [Description("EndCrop Date")]
        public DateTime EndCropDate { get; set; }
        
        [XmlIgnore] private RemovalFractions Remove { get; set; }
        
        [EventSubscribe("Commencing")]
        private void OnSimulationCommencing(object sender, EventArgs e)
        {
            Remove = new RemovalFractions();
        }
        
        [EventSubscribe("DoManagement")]
        private void OnDoManagement(object sender, EventArgs e)
        {
            //Set up  array of remove fractions to send with Cut method.  Each member in the array corresponds to an organ in the same order they are set up in.

            if (Clock.Today.Date == SowingDate)
                SCRUM.Sow(cultivar: CultivarName, population: 1, depth: InitialRootDepth, rowSpacing: 150);
            else if (Clock.Today.Date == CutDate)
            {
                Remove.SetPhenologyStage = 3.5;
                Remove.SetFractionToRemove("Stover", 0.5);
                Remove.SetFractionToResidue("Stover", 0.2);
                Remove.SetFractionToRemove("Product", 0.8);
                Remove.SetFractionToResidue("Product", 0.1);
                Remove.SetFractionToRemove("Root", 0.0);
                Remove.SetFractionToResidue("Root", 0.2);
                SCRUM.RemoveBiomass("Cut", Remove);
            }
            else if (Clock.Today.Date == EndCropDate)
                SCRUM.EndCrop();
            
            /*//Change fractions to remove
            if (Clock.Today.Date == SowingDate2)
                SCRUM.Sow(cultivar: CultivarName, population: 1, depth: InitialRootDepth, rowSpacing: 150);
            else if (Clock.Today.Date == CutDate2)
            {
                //Harvest with manager specified removal fractions
                Remove.SetFractionToRemove("Product", 0.3);
                Remove.SetFractionToRemove("Stover", 0.1);
                Remove.SetFractionToResidue("Product", 0.3);
                Remove.SetFractionToResidue("Stover", 0.7);
                SCRUM.RemoveBiomass("Cut", Remove);
            }
            else if (Clock.Today.Date == EndCropDate2)
                SCRUM.EndCrop();
            
            //Change fractions to remove
            if (Clock.Today.Date == SowingDate3)
                SCRUM.Sow(cultivar: CultivarName, population: 1, depth: InitialRootDepth, rowSpacing: 150);
            else if (Clock.Today.Date == CutDate3)
            {
                Remove.SetFractionToRemove("Product", 0.5);
                Remove.SetFractionToRemove("Stover", 0.3);
                Remove.SetFractionToResidue("Product", 0.3);
                Remove.SetFractionToResidue("Stover", 0.7);
                SCRUM.RemoveBiomass("Cut", Remove);
            }
            else if (Clock.Today.Date == EndCropDate3)
                SCRUM.EndCrop();*/
            //PMFCrop.Sow(... Contains the following arguements:
            //Population  double  Optional  Seeds sowing/m2.  Default is zero
            //Cultivar    string  Required  "NameOfCultivar"
            //Depth       double  Optional  Depth (mm) seed sown.   Default is 100mm 
            //MaxCover    double  Optional  Proportion (0-1) of the ground row crop will cover.   Default is 1.0
            //BudNumber   double  Optional  Number of mainstems per seed sown.  Default is 1.0
            //RowSpacing  double  Optional  Spaceing (mm) between drill rows when crop is sown.  Default is 150mm
            //CropClass   string  Optional  Crop class to instantiate when crop is sown.  Default is "Plant"
        }
    }
}
```
      Manager ExtraVariables
        script: same as in SCRUMTestBase.Field.ExtraVariables
      Report: EventNames=[Clock].DoReport
        VariableNames:
          [Clock].Today
          [ExtraVariables].Script.AccumPlantN
          [ExtraVariables].Script.AccumMineralisation
          [ExtraVariables].Script.AccumDenit
          [ExtraVariables].Script.AccumFert
          [ExtraVariables].Script.AccumLeach
          [ExtraVariables].Script.AccumDetach
          [ExtraVariables].Script.DeltaSoilOMN
          [ExtraVariables].Script.DeltaSurfaceOMN
          [ExtraVariables].Script.DeltaSoilMineralN
          [ExtraVariables].Script.SWC
          [ExtraVariables].Script.DUL
          [ExtraVariables].Script.OutFlowLat
          [ExtraVariables].Script.AccumEO
          [ExtraVariables].Script.AccumEP
          [ExtraVariables].Script.AccumES
          [ExtraVariables].Script.AccumDrainage
          [ExtraVariables].Script.AccumRunoff
          [ExtraVariables].Script.AccumRainfall
          [ExtraVariables].Script.AccumIrrigation
          [ExtraVariables].Script.AccumOutflowLat
          [ExtraVariables].Script.SoilWaterDeficit
          [ExtraVariables].Script.SoilNitrogenContent
          [ExtraVariables].Script.FomN
          [ExtraVariables].Script.HumN
          [ExtraVariables].Script.BiomN
          [ExtraVariables].Script.DltNMinRes
          [ExtraVariables].Script.DltNMinTot
          [MicroClimate].net_radn
          [MicroClimate].peta
          [MicroClimate].petr
          [Soil].SoilWater.Drainage
          [Soil].SoilWater.Runoff
          [Soil].SoilWater.Eo
          [Soil].SoilWater.Es
          [Soil].SoilWater.pond
          [Soil].SoilWater.SWmm
          [Soil].NO3N
          [SCRUM].Stover.Live.Wt
          [SCRUM].Root.Live.Wt
          [SCRUM].Product.Live.Wt
          [SCRUM].Stover.Live.N
          [SCRUM].Root.Live.N
          [SCRUM].Product.Live.N
          [SCRUM].Stover.Live.NConc
          [SCRUM].Root.Live.NConc
          [SCRUM].Product.Live.NConc
          [SCRUM].Root.WaterSupply
          [SCRUM].Root.WaterUptake
          [SCRUM].Stover.Transpiration
          [SCRUM].Stover.WaterDemand
          [SCRUM].Root.Depth
          [SCRUM].Stover.CoverTotal
          [SCRUM].Stover.CoverDead
          [SCRUM].Stover.LAI
          [SCRUM].Stover.Height
          [SCRUM].Stover.PotentialBiomass.Value()
          [SCRUM].Product.LiveFWt
          [SCRUM].Arbitrator.N.TotalPlantDemand
          [SCRUM].Arbitrator.N.TotalPlantSupply
          [SCRUM].Stover.Fw
          [SCRUM].Stover.Fn
          [SCRUM].Total.Wt
          [SCRUM].ExpectedYield.Value()
          [SCRUM].DryYield.Value()
          [SCRUM].TotalBiomassAtStartReproductive.Value()
          [SCRUM].TotalBiomassAtStartSenescence.Value()
          [SCRUM].Ymax.Value()
          [SCRUM].Total.N
          [SCRUM].Arbitrator.DM.TotalFixationSupply
          [SCRUM].Arbitrator.DM.TotalPlantDemand
          [SCRUM].Phenology.AccumulatedThermalTime.Value()
          [SCRUM].Arbitrator.DM.SinkLimitation
          [SCRUM].Arbitrator.DM.NutrientLimitation
          [SCRUM].Phenology.ThermalTime.Value()
          [SCRUM].Phenology.CurrentPhaseName
          [SCRUM].Phenology.Stage
          [AutomaticIrrigation].Script.Top_Refull
          [AutomaticIrrigation].Script.Top_Trigger
          [AutomaticIrrigation].Script.Top_SW
          [AutomaticIrrigation].Script.Top_DUL
          [Irrigation].IrrigationApplied
          [AutomaticIrrigation].Script.Amount_to_apply
          [AutomaticIrrigation].Script.StartDate
          [Clock].Today
          [AutomaticIrrigation].Script.SeasonIsOpen
          [AutomaticIrrigation].Script.EndDate
          [AutomaticIrrigation].Script.TodayYear
          [SCRUM].Arbitrator.FN
          [SurfaceOrganicMatter].wt
          sum([Soil].SoilNitrogen.FOMN)
          [SCRUM].Phenology.AccumulatedEmergedTT
          [SCRUM].Stover.CoverGreen
      SoluteManager
  Experiment Crop Comparisions
    Memo Description
      This test simply simulates a range of different SCRUM crop types to show how they differ in their canopy and biomass accumulation patterns.  The 5 graphs demonstrate the differences in:
       - The speed at which cover is attained
       - The maximum cover that is achieved
       - The speed and which cover is senesced again
       - The speed and extent of biomass and N accumulation
       - The timing and extent of dry and fresh yield productin
      These graphs are intended to demonstrate how SCRUM represents approximate differences in differnt crops types with simple yet realistic temporal patterns
    Factors
      Factor Crop
        Factor SpringWheat
          Specifications:
            [SCRUMSowingRule].Script.CultivarName = Wheat_Spring
            [SCRUMSowingRule].Script.SowingDate = 1998-09-15
        Factor AutumnWheat
          Specifications:
            [SCRUMSowingRule].Script.CultivarName = Wheat_Autumn
            [SCRUMSowingRule].Script.SowingDate = 1998-05-15
        Factor Potatoes
          Specifications:
            [SCRUMSowingRule].Script.CultivarName = Potatoes_Long
            [SCRUMSowingRule].Script.SowingDate = 1998-10-15
        Factor Peas
          Specifications:
            [SCRUMSowingRule].Script.CultivarName = Green_Peas
            [SCRUMSowingRule].Script.SowingDate = 1998-10-15
        Factor Maize
          Specifications:
            [SCRUMSowingRule].Script.CultivarName = Maize_Short
            [SCRUMSowingRule].Script.SowingDate = 1998-11-15
        Factor Spinach
          Specifications:
            [SCRUMSowingRule].Script.CultivarName = Spinach
            [SCRUMSowingRule].Script.SowingDate = 1998-05-15
        Factor Kale
          Specifications:
            [SCRUMSowingRule].Script.CultivarName = Kale
            [SCRUMSowingRule].Script.SowingDate = 1998-10-15
        Factor Rape
          Specifications:
            [SCRUMSowingRule].Script.CultivarName = Rape
            [SCRUMSowingRule].Script.SowingDate = 1998-10-15
    Simulation CropCompBase
      Weather: FileName=%root%\Tests\WeatherFiles\lincoln.met
      Clock: StartDate=1998-05-01; EndDate=1999-07-01
      Summary
      SoilArbitrator Soil Arbitrator
      Zone Field: Area=1; Slope=0
        Soil: Latitude=0; Longitude=0
          Analysis: Thickness=[100, 200, 300, 300, 300, 300]; PH=[6.6, 6.2, 5.7, 5.5, 5.5, 5.5]; PHUnits=Water; BoronUnits=HotWater
          InitialWater Initial water: PercentMethod=EvenlyDistributed; FractionFull=1
          Water
            Thickness  BD   AirDry  LL15  DUL   SAT
            100        1.2  0.08    0.13  0.33  0.5
            200        1.2  0.13    0.13  0.33  0.5
            300        1.2  0.1     0.1   0.31  0.44
            300        1.2  0.06    0.06  0.15  0.46
            300        1.2  0.04    0.04  0.1   0.44
            300        1.2  0.02    0.02  0.06  0.44
            SoilCrop SCRUMSoil: LL=[0.13, 0.13, 0.1, 0.08, 0.11, 0.11]; KL=[0.08, 0.08, 0.08, 0.08, 0.08, 0.08]; XF=[1, 1, 1, 1, 1, 1]
            SoilCrop PotatoSoil: LL=[0.13, 0.13, 0.27, 0.27, 0.3, 0.3]; KL=[0.1, 0.06, 0.03, 0.01, 0, 0]; XF=[1, 1, 0.1, 0, 0, 0]
          SoilWater: same as SCRUMTestBase.Field.Soil.SoilWater
          SoilNitrogen: fom_type=[default, manure, mucuna, lablab, shemp, stable]; fract_carb=[0.2, 0.3, 0.54, 0.57, 0.45, 0]; fract_cell=[0.7, 0.3, 0.37, 0.37, 0.47, 0.1]; fract_lign=[0.1, 0.4, 0.09, 0.06, 0.08, 0.9]
          SoilOrganicMatter: same as SCRUMTestBase.Field.Soil.SoilOrganicMatter
          Sample Initial nitrogen: NO3Units=kgha; NH4Units=ppm; SWUnits=Volumetric; OCUnits=Total; PHUnits=Water
            Thickness  NO3  NH4
            100        270  0
            200        30   0
            300        5    0
            300        5    0
            300        0    0
            300        0    0
          CERESSoilTemperature
        MicroClimate: a_interception=0; b_interception=1; c_interception=0; d_interception=0; soil_albedo=0.23; SoilHeatFluxFraction=0.4; NightInterceptionFraction=0.5; ReferenceHeight=2
        Irrigation
        Fertiliser
        Manager SCRUMSowingRule
          CultivarName = Barley_Spring
          InitialRootDepth = 10
          SowingDate = 1998-10-14
          script: same as in SCRUMTestBase.Field.SCRUMSowingRule
        Manager ExtraVariables
          script: same as in SCRUMTestBase.Field.ExtraVariables
        SurfaceOrganicMatter surface organic matter: InitialResidueName=wheat; InitialResidueType=wheat; InitialResidueMass=2000; InitialStandingFraction=0; InitialCPR=0; InitialCNR=80
        Report: EventNames=[Clock].DoReport
          VariableNames:
            [Clock].Today
            [ExtraVariables].Script.AccumPlantN
            [ExtraVariables].Script.AccumMineralisation
            [ExtraVariables].Script.AccumDenit
            [ExtraVariables].Script.AccumFert
            [ExtraVariables].Script.AccumLeach
            [ExtraVariables].Script.AccumDetach
            [ExtraVariables].Script.DeltaSoilOMN
            [ExtraVariables].Script.DeltaSurfaceOMN
            [ExtraVariables].Script.DeltaSoilMineralN
            [ExtraVariables].Script.SWC
            [ExtraVariables].Script.DUL
            [ExtraVariables].Script.OutFlowLat
            [ExtraVariables].Script.AccumEO
            [ExtraVariables].Script.AccumEP
            [ExtraVariables].Script.AccumES
            [ExtraVariables].Script.AccumDrainage
            [ExtraVariables].Script.AccumRunoff
            [ExtraVariables].Script.AccumRainfall
            [ExtraVariables].Script.AccumIrrigation
            [ExtraVariables].Script.AccumOutflowLat
            [ExtraVariables].Script.SoilWaterDeficit
            [ExtraVariables].Script.SoilNitrogenContent
            [ExtraVariables].Script.FomN
            [ExtraVariables].Script.HumN
            [ExtraVariables].Script.BiomN
            [ExtraVariables].Script.DltNMinRes
            [ExtraVariables].Script.DltNMinTot
            [MicroClimate].net_radn
            [MicroClimate].peta
            [MicroClimate].petr
            [Soil].SoilWater.Drainage
            [Soil].SoilWater.Runoff
            [Soil].SoilWater.Eo
            [Soil].SoilWater.Es
            [Soil].SoilWater.pond
            [Soil].SoilWater.SWmm
            [Soil].NO3N
            [SCRUM].Stover.Live.Wt
            [SCRUM].Root.Live.Wt
            [SCRUM].Product.Live.Wt
            [SCRUM].Stover.Live.N
            [SCRUM].Root.Live.N
            [SCRUM].Product.Live.N
            [SCRUM].Stover.Live.NConc
            [SCRUM].Root.Live.NConc
            [SCRUM].Product.Live.NConc
            [SCRUM].Root.WaterSupply
            [SCRUM].Root.WaterUptake
            [SCRUM].Stover.Transpiration
            [SCRUM].Stover.WaterDemand
            [SCRUM].Root.Depth
            [SCRUM].Stover.CoverTotal
            [SCRUM].Stover.CoverDead
            [SCRUM].Stover.CoverGreen
            [SCRUM].Stover.LAI
            [SCRUM].Stover.Height
            [SCRUM].Stover.PotentialBiomass.Value()
            [SCRUM].Product.LiveFWt
            [SCRUM].Arbitrator.N.TotalPlantDemand
            [SCRUM].Arbitrator.N.TotalPlantSupply
            [SCRUM].Stover.Fw
            [SCRUM].Stover.Fn
            [SCRUM].Total.Wt
            [SCRUM].ExpectedYield.Value()
            [SCRUM].DryYield.Value()
            [SCRUM].TotalBiomassAtStartReproductive.Value()
            [SCRUM].TotalBiomassAtStartSenescence.Value()
            [SCRUM].Ymax.Value()
            [SCRUM].Total.N
            [SCRUM].Arbitrator.DM.TotalFixationSupply
            [SCRUM].Arbitrator.DM.TotalPlantDemand
            [SCRUM].Phenology.AccumulatedEmergedTT
            [SCRUM].Arbitrator.DM.SinkLimitation
            [SCRUM].Arbitrator.DM.NutrientLimitation
            [SCRUM].Phenology.ThermalTime.Value()
            [SCRUM].Phenology.CurrentPhaseName
            [SCRUM].Phenology.Stage
        Plant SCRUM: CropType=SCRUM
        Manager AutomaticIrrigation
          Irrigation_Yes_No = yes
          Season_Start = 1-Oct
          Season_End = 30-Apr
          Season_Allocation = 1000
          Refull_Frac = 0.9
          Trigger_Frac = 0.7
          Return_days = 3
          Maximum_Irrigation_Amount = 40
          Top_Depth = 600
          script: same as in SCRUMTestBase.Field.AutomaticIrrigation
        Manager AutomaticFertiliser
          Fertiliser_Yes_No = yes
          Season_Start = 1-Aug
          Season_End = 30-Apr
          Season_Allocation = 1000
          TriggerN = 50
          NApplicationAmount = 25
          Return_days = 3
          Top_Depth = 300
          script: same as in SCRUMTestBase.Field.AutomaticFertiliser
        SoluteManager
  Experiment Lincoln2012
    Memo
      Testing of SCRUM under New Zealand conditions was undertaken using the data Maize data of Teixeira et al (2014).  This dataset includes the impact of three N (0 to 250 kg/ha N) and two water regimes (dryland and fully irrigated) using a rain-shelter structure.  Observations include biomass and nitrogen accumulation, soil water contents. Total biomass ranged from 8000 kg/ha for dryland nil N crops to up to 28000kg/ha for fully irrigated and N fertilised crops.  Dryland crops recovered 25 percent less N from applied fertilizer than irrigated crops.  The expected yields were set to 18 t/ha (the yield achieved in the fully irrigation Med N plots) for all treatments and the simple N and water responses of SCRUM were allowed to predict treatment effects.  The three graphs below show that SCRUM gave adequate estimations of biomass and N accumulations in respone to irrigation and fertiliser treatments and adequate estimations of soil water content.  This suggests Scum is suitable for its intended purpose of providing realistic N and water uptake patterns for N and water balance studies.
    Factors
      Factor Nit: Specifications=[Fert]
        Operations Nil
          2012-11-15  [Fertiliser].Apply(0, Fertiliser.Types.UreaN, 10);
          2012-12-20  [Fertiliser].Apply(0, Fertiliser.Types.UreaN, 10);
          2013-01-31  [Fertiliser].Apply(0, Fertiliser.Types.UreaN, 10);
        Operations Low
          2012-11-15  [Fertiliser].Apply(25, Fertiliser.Types.UreaN, 10);
          2012-12-20  [Fertiliser].Apply(50, Fertiliser.Types.UreaN, 10);
        Operations Med
          2012-11-15  [Fertiliser].Apply(50, Fertiliser.Types.UreaN, 10);
          2012-12-20  [Fertiliser].Apply(100, Fertiliser.Types.UreaN, 10);
          2013-01-31  [Fertiliser].Apply(100, Fertiliser.Types.UreaN, 10);
      Factor Irr: Specifications=[Irrig]
        Operations Full
          2012-10-24  [Irrigation].Apply(16);
          2012-10-26  [Irrigation].Apply(10);
          2012-11-03  [Irrigation].Apply(13);
          2012-11-11  [Irrigation].Apply(19.5);
          2012-11-15  [Irrigation].Apply(3.1);
          2012-11-23  [Irrigation].Apply(20);
          2012-11-29  [Irrigation].Apply(20);
          2012-11-30  [Irrigation].Apply(30);
          2012-12-13  [Irrigation].Apply(19);
          2012-12-20  [Irrigation].Apply(26);
          2012-12-20  [Irrigation].Apply(4);
          2012-12-27  [Irrigation].Apply(22);
          2013-01-03  [Irrigation].Apply(39.7);
          2013-01-10  [Irrigation].Apply(42.1);
          2013-01-17  [Irrigation].Apply(46.2);
          2013-01-24  [Irrigation].Apply(44.7);
          2013-01-31  [Irrigation].Apply(49.0);
          2013-02-07  [Irrigation].Apply(37);
          2013-02-14  [Irrigation].Apply(38);
          2013-02-21  [Irrigation].Apply(38);
          2013-02-28  [Irrigation].Apply(33.4);
          2013-03-07  [Irrigation].Apply(39.7);
          2013-03-14  [Irrigation].Apply(31.3);
          2013-03-21  [Irrigation].Apply(24);
          2013-03-28  [Irrigation].Apply(34);
          2013-04-04  [Irrigation].Apply(27.5);
        Operations Nil
          2012-10-24  [Irrigation].Apply(16);
          2012-10-26  [Irrigation].Apply(10);
          2012-11-03  [Irrigation].Apply(13);
          2012-11-11  [Irrigation].Apply(19.5);
          2012-11-15  [Irrigation].Apply(3.1);
          2012-11-23  [Irrigation].Apply(25);
          2012-11-29  [Irrigation].Apply(25);
          2012-12-20  [Irrigation].Apply(4);
          2013-01-31  [Irrigation].Apply(4.3);
    Simulation Lincoln2012
      Weather: FileName=%root%\Tests\Validation\Maize\lincoln.met
      Clock: StartDate=2012-10-01; EndDate=2013-04-25
      Summary summaryfile
      SoilArbitrator Soil Arbitrator
      Zone RainShelter: Area=1; Slope=0
        Soil paparoa_silt_loam: SoilType=lignin_FOM; Region=Generic soil types; State=Canterbury; Latitude=999999; Longitude=999999
          DataSource=Profile descriptions provided by Trevor Webb and data for functional horizions based on SWAMP project results
          SoilWater: SummerDate=1-Nov; SummerU=9; SummerCona=4.4; WinterDate=1-Apr; WinterU=6; WinterCona=3; DiffusConst=88; DiffusSlope=35; Salb=0.13; CN2Bare=73; CNRed=20; CNCov=0.8; max_pond=0; Thickness=[200, 200, 200, 200, 200, 200, 200, 200]; SWCON=[0.5, 0.56, 0.31, 0.7, 0.7, 0.7, 0.7, 0.7]; ResidueInterception=0
          SoilNitrogen: fom_type=[default, manure, mucuna, lablab, shemp, stable]; fract_carb=[0.2, 0.3, 0.54, 0.57, 0.45, 0]; fract_cell=[0.7, 0.3, 0.37, 0.37, 0.47, 0.1]; fract_lign=[0.1, 0.4, 0.09, 0.06, 0.08, 0.9]
          Analysis: Thickness=[200, 200, 200, 300, 300, 300]; PH=[6, 6, 6, 6, 6, 6]; PHUnits=Water; BoronUnits=HotWater
          Water
            Thickness  BD     AirDry  LL15  DUL   SAT
            200        1.311  0.06    0.06  0.3   0.37
            200        1.474  0.12    0.12  0.3   0.37
            200        1.601  0.1     0.12  0.26  0.32
            200        1.68   0.13    0.13  0.24  0.3
            200        1.68   0.12    0.12  0.24  0.3
            200        1.68   0.15    0.15  0.21  0.3
            200        1.68   0.15    0.15  0.21  0.3
            200        1.68   0.15    0.15  0.21  0.3
            SoilCrop SCRUMSoil: LL=[0.084, 0.12, 0.12, 0.15, 0.15, 0.06, 0.06, 0.06]; KL=[0.1, 0.1, 0.1, 0.1, 0.1, 0.01, 0.01, 0.01]; XF=[1, 1, 0.5, 1, 1, 1, 1, 1]
          Sample Initial nitrogen: NO3Units=kgha; NH4Units=kgha; SWUnits=Volumetric; OCUnits=Total; PHUnits=Water
            Thickness  NO3    NH4   SW
            200        16.2   0.9   0.06
            200        10.76  2.92  0.25
            200        7.83   0.57  0.2
            300        6.85   0.98  0.2
            300        4.88   0.84  0.2
            300        1.74   0.54  0.2
          SoilOrganicMatter: RootCN=16; RootWt=6000; SoilCN=11; EnrACoeff=7.4; EnrBCoeff=0.2; OCUnits=Total
            Thickness  OC    FBiom  FInert
            200        3.6   0.03   0.3
            200        0.97  0.02   0.6
            200        0.42  0.01   0.8
            300        0.23  0.01   0.9
            300        0.23  0.01   0.9
            300        0.23  0.01   0.9
          CERESSoilTemperature
        Plant SCRUM: CropType=SCRUM
        MicroClimate: a_interception=0; b_interception=1; c_interception=0; d_interception=0; soil_albedo=0.23; SoilHeatFluxFraction=0.4; NightInterceptionFraction=0.5; ReferenceHeight=2
        Irrigation
        Fertiliser
        SurfaceOrganicMatter: InitialResidueName=wheat; InitialResidueType=wheat; InitialResidueMass=0; InitialStandingFraction=0; InitialCPR=0; InitialCNR=80
        Operations Irrig
          2012-10-24  [Irrigation].Apply(16);
          2012-10-26  [Irrigation].Apply(10);
          2012-11-03  [Irrigation].Apply(13);
          2012-11-11  [Irrigation].Apply(19.5);
          2012-11-15  [Irrigation].Apply(3.1);
          2012-11-23  [Irrigation].Apply(20);
          2012-11-29  [Irrigation].Apply(20);
          2012-11-30  [Irrigation].Apply(30);
          2012-12-13  [Irrigation].Apply(19);
          2012-12-20  [Irrigation].Apply(26);
          2012-12-20  [Irrigation].Apply(4);
          2012-12-27  [Irrigation].Apply(22);
          2013-01-03  [Irrigation].Apply(39.7);
          2013-01-10  [Irrigation].Apply(42.1);
          2013-01-17  [Irrigation].Apply(46.2);
          2013-01-24  [Irrigation].Apply(44.7);
          2013-01-31  [Irrigation].Apply(44.7);
          2013-01-31  [Irrigation].Apply(4.3);
          2013-02-07  [Irrigation].Apply(37);
          2013-02-14  [Irrigation].Apply(38);
          2013-02-21  [Irrigation].Apply(38);
          2013-02-28  [Irrigation].Apply(33.4);
          2013-03-07  [Irrigation].Apply(39.7);
          2013-03-14  [Irrigation].Apply(31.3);
          2013-03-21  [Irrigation].Apply(24);
          2013-03-28  [Irrigation].Apply(34);
          2013-04-04  [Irrigation].Apply(27.5);
        Operations Fert: same as Lincoln2012.Factors.Nit.Med
        Operations Sow
          2012-10-23  [SCRUM].Sow(population:11, cultivar:"Maize_Short", depth:10, rowSpacing:710);
        Manager ExtraVariables
```csharp
using System;
using Models.Core;
using System.Collections.Generic;
using System.Text;
using Models.Soils;
using Models.PMF;
using Models;
using System.Xml.Serialization;
using APSIM.Shared.Utilities;

namespace Models
{
    [Serializable] 
    public class Script : Model
    {
        [Link] Clock Clock;
        [Link] Soils.Soil Soil;
        [Link] Models.Surface.SurfaceOrganicMatter SOM;
        [Link] Weather Met;
        [Link] Fertiliser Fert;
        [Link] Irrigation Irrig;
        [Link] Plant SCRUM;
        [Link] Zone zone;
                    
        [XmlIgnore] public bool InitialDay { get; set; }
        
        [XmlIgnore] public double AccumPlantN { get; set; }
        [XmlIgnore] public double AccumMineralisation { get; set; }
        [XmlIgnore] public double AccumDenit { get; set; }
        [XmlIgnore] public double AccumFert { get; set; }
        [XmlIgnore] public double AccumLeach { get; set; }
        [XmlIgnore] public double AccumDetach { get; set; }
        [XmlIgnore] public double DeltaSoilOMN { get; set; }
        [XmlIgnore] public double DeltaSurfaceOMN { get; set; }
        [XmlIgnore] public double DeltaSoilMineralN { get; set; }
        [XmlIgnore] public double SoilNitrogenContent { get; set; }
        
        [XmlIgnore] public double AccumEO { get; set; }
        [XmlIgnore] public double AccumEP { get; set; }
        [XmlIgnore] public double AccumES { get; set; }
        [XmlIgnore] public double AccumDrainage { get; set; }
        [XmlIgnore] public double AccumRunoff { get; set; }
        [XmlIgnore] public double AccumOutflowLat { get; set; }
        [XmlIgnore] public double AccumIrrigation { get; set; }
        [XmlIgnore] public double AccumRainfall { get; set; }
        [XmlIgnore] public double SoilWaterDeficit { get; set; }
    
        [XmlIgnore] public double  InitialSoilOMN { get; set; }
        [XmlIgnore] public double  InitialSurfaceOMN { get; set; }
        [XmlIgnore] public double  InitialMineralN { get; set; }
        
        [XmlIgnore] public double SWC { get; set; }
        [XmlIgnore] public double DUL { get; set; }
        [XmlIgnore] public double OutFlowLat { get; set; }

        [XmlIgnore] public double FomN { get; set; }
        [XmlIgnore] public double BiomN { get; set; }
        [XmlIgnore] public double HumN { get; set; }
        [XmlIgnore] public double OrganicN { get; set; }
        [XmlIgnore] public double NO3N { get; set; }
        [XmlIgnore] public double NH4N { get; set; }
        [XmlIgnore] public double UreaN { get; set; }
        [XmlIgnore] public double MineralN { get; set; }
        [XmlIgnore] public double DltNMinRes { get; set; }
        [XmlIgnore] public double DltNMinTot { get; set; }
        
        [XmlIgnore] public double StoverExpandedPosition { get; set; }
        [XmlIgnore] public double StoverAppearedPosition { get; set; }
        [XmlIgnore] public double ExpandedStoverNoYesterday { get; set; }
        [XmlIgnore] public double AppearedStoverNoYesterday { get; set; }
        [XmlIgnore] public double MostRecentlyExpandedStoverSize { get; set; }
        [XmlIgnore] public double MostRecentlyAppearedStoverMaxSize { get; set; }
        
        [EventSubscribe("Commencing")]
        private void OnSimulationCommencing(object sender, EventArgs e)
        {
            InitialDay = true;
            StoverExpandedPosition = 0;
            StoverAppearedPosition = 0;
            ExpandedStoverNoYesterday = 0;
            AppearedStoverNoYesterday = 0;
            MostRecentlyExpandedStoverSize = 0;
            MostRecentlyAppearedStoverMaxSize = 0;
        }
        
        [EventSubscribe("DoManagement")]
        private void OnDoManagement(object sender, EventArgs e)
        {
            //!!!!!! Nitrogen balance components !!!!!!
            //!!!!!!^^^^^^^^^^^^^^^^^^^^^^^^^^^^^!!!!!!
            FomN = MathUtilities.Sum(Soil.SoilNitrogen.FOMN);
            HumN = MathUtilities.Sum(Soil.SoilNitrogen.HumicN);
            BiomN = MathUtilities.Sum(Soil.SoilNitrogen.MicrobialN);
            OrganicN = FomN + HumN + BiomN;
            NO3N = MathUtilities.Sum(Soil.NO3N);
            NH4N = MathUtilities.Sum(Soil.NH4N);
            UreaN = MathUtilities.Sum(Soil.SoilNitrogen.urea);
            MineralN = NO3N + NH4N + UreaN; 
            DltNMinRes = MathUtilities.Sum(Soil.SoilNitrogen.dlt_n_min_res);
            DltNMinTot = MathUtilities.Sum(Soil.SoilNitrogen.MineralisedN);
            int layers = Soil.Thickness.Length;
            if (InitialDay == true)
            {
                InitialSurfaceOMN = SOM.N;
                InitialSoilOMN = OrganicN;
                InitialMineralN = MineralN;
                InitialDay = false;
            }
            AccumFert += Fert.NitrogenApplied;
            DeltaSurfaceOMN = SOM.N - InitialSurfaceOMN;
            AccumLeach = AccumLeach - Soil.SoilWater.LeachNH4 - Soil.SoilWater.LeachNO3 - Soil.SoilWater.LeachUrea; //Fails
            AccumMineralisation += MathUtilities.Sum(Soil.SoilNitrogen.MineralisedN);
            AccumDenit -= MathUtilities.Sum(Soil.SoilNitrogen.Denitrification);
            AccumPlantN -= (double)zone.Get("SCRUM.Root.NUptake");
            DeltaSoilOMN = OrganicN - InitialSoilOMN;
            DeltaSoilMineralN = MineralN - InitialMineralN;
            SoilNitrogenContent = MineralN;
            
            //!!!!!! Water balance components !!!!!!
            //!!!!!!^^^^^^^^^^^^^^^^^^^^^^^^^^!!!!!!

            AccumIrrigation += Irrig.IrrigationApplied;
            AccumRainfall += Met.Rain;
            //AccumEP -= (double)zone.Get("[SCRUM].Stover.Transpiration");
            AccumEP -= (double)zone.Get("SCRUM.Root.WaterUptake");
            SoilWaterDeficit = (SWC - DUL);
            double OutFlowLat = MathUtilities.Sum(Soil.SoilWater.LateralOutflow);
            AccumOutflowLat -= OutFlowLat;
            
        }
        
        [EventSubscribe("DoManagementCalculations")]
        private void OnDoManagementCalculations(object sender, EventArgs e)
        {
            FomN = MathUtilities.Sum(Soil.SoilNitrogen.FOMN);
            HumN = MathUtilities.Sum(Soil.SoilNitrogen.HumicN);
            BiomN = MathUtilities.Sum(Soil.SoilNitrogen.MicrobialN);
            
            
            AccumEO -= Soil.SoilWater.Eo;
            AccumES -= Soil.SoilWater.Es; 
            AccumDrainage -= Soil.SoilWater.Drainage;
            AccumRunoff -= Soil.SoilWater.Runoff;
            SWC = MathUtilities.Sum(Soil.SoilWater.SWmm);
            DUL = MathUtilities.Sum(Soil.DULmm);
            
            
            
        }
    }
}
```
        Manager Harvesting
```csharp
using System;
using Models.Core;
using System.Collections.Generic;
using System.Text;
using Models.Soils;
using Models.PMF;
using Models;
using System.Xml.Serialization;
using APSIM.Shared.Utilities;

namespace Models
{
    [Serializable] 
    public class Script : Model
    {
        [Link] Plant SCRUM;
        [Link] Zone zone;
                    
        
        [EventSubscribe("Commencing")]
        private void OnSimulationCommencing(object sender, EventArgs e)
        {
        }
        
        [EventSubscribe("DoManagement")]
        private void OnDoManagement(object sender, EventArgs e)
        {
            if (SCRUM.Phenology.CurrentPhaseName == "ReadyForHarvesting")
            {
                SCRUM.Harvest();
                SCRUM.EndCrop();
            }
        }
        
        [EventSubscribe("DoManagementCalculations")]
        private void OnDoManagementCalculations(object sender, EventArgs e)
        {
            
        }
    }
}
```
        Manager SetSCRUMYield
          OverRidePath = SCRUM.Product.ExpectedYield.FixedValue
          OverRideInterger = 1800
          ChangeDate = 2012-10-23
```csharp
using System;
using Models.Core;
using System.Collections.Generic;
using System.Text;
using Models.PMF;
using Models;
using System.Xml.Serialization;
using APSIM.Shared.Utilities;

namespace Models
{
    [Serializable] 
    public class Script : Model
    {
        [Link] Plant Plant;
        [Link] Clock Clock;
        [Link] Zone zone;
        
        [Description("Path for coefficient to be Overwritten")]
        public string OverRidePath { get; set; }
        [Description("Value for new coefficient Interger")]
        public int OverRideInterger { get; set; }
        [Description("Sowing Date")]
        public DateTime ChangeDate { get; set; }
        
        [EventSubscribe("DoManagement")]
        private void OnDoManagement(object sender, EventArgs e)
        {
            if (Clock.Today.Date == ChangeDate)
            {
                object ResetValue = OverRideInterger;
                zone.Set(OverRidePath, ResetValue);
            }
        }
    }
}
```
        Manager SetSCRUMCoverMax
          OverRidePath = SCRUM.Stover.CoverFunction.Expanding.SigCoverFunction.Ymax.FixedValue
          OverRideDouble = 0.9
          ChangeDate = 2012-10-23
```csharp
using System;
using Models.Core;
using System.Collections.Generic;
using System.Text;
using Models.PMF;
using Models;
using System.Xml.Serialization;
using APSIM.Shared.Utilities;

namespace Models
{
    [Serializable] 
    public class Script : Model
    {
        [Link] Plant Plant;
        [Link] Clock Clock;
        [Link] Zone zone;
        
        [Description("Path for coefficient to be Overwritten")]
        public string OverRidePath { get; set; }
        [Description("Value for new coefficient Interger")]
        public double OverRideDouble { get; set; }
        [Description("Sowing Date")]
        public DateTime ChangeDate { get; set; }
        
        [EventSubscribe("DoManagement")]
        private void OnDoManagement(object sender, EventArgs e)
        {
            if (Clock.Today.Date == ChangeDate)
            {
                object ResetValue = OverRideDouble;
                zone.Set(OverRidePath, ResetValue);
            }
        }
    }
}
```
        Report: EventNames=[Clock].DoReport
          VariableNames:
            [Clock].Today
            [ExtraVariables].Script.AccumPlantN
            [ExtraVariables].Script.AccumMineralisation
            [ExtraVariables].Script.AccumDenit
            [ExtraVariables].Script.AccumFert
            [ExtraVariables].Script.AccumLeach
            [ExtraVariables].Script.AccumDetach
            [ExtraVariables].Script.DeltaSoilOMN
            [ExtraVariables].Script.DeltaSurfaceOMN
            [ExtraVariables].Script.DeltaSoilMineralN
            [ExtraVariables].Script.SWC
            [ExtraVariables].Script.DUL
            [ExtraVariables].Script.OutFlowLat
            [ExtraVariables].Script.AccumEO
            [ExtraVariables].Script.AccumEP
            [ExtraVariables].Script.AccumES
            [ExtraVariables].Script.AccumDrainage
            [ExtraVariables].Script.AccumRunoff
            [ExtraVariables].Script.AccumRainfall
            [ExtraVariables].Script.AccumIrrigation
            [ExtraVariables].Script.AccumOutflowLat
            [ExtraVariables].Script.SoilWaterDeficit
            [ExtraVariables].Script.SoilNitrogenContent
            [ExtraVariables].Script.FomN
            [ExtraVariables].Script.HumN
            [ExtraVariables].Script.BiomN
            [ExtraVariables].Script.DltNMinRes
            [ExtraVariables].Script.DltNMinTot
            [Soil].SoilWater.SW
            [Soil].SoilWater.Eo
            [Soil].SoilWater.Es
            [Soil].SoilWater.Drainage
            [Soil].SoilWater.Runoff
            sum([Soil].SoilWater.SWmm) as ProfileWater
            [Soil].NO3N
            [MicroClimate].net_radn
            [MicroClimate].peta
            [MicroClimate].petr
            [SCRUM].Product.Live.Wt
            [SCRUM].Stover.Live.Wt
            [SCRUM].Root.Live.Wt
            [SCRUM].Product.Live.N
            [SCRUM].Stover.Live.N
            [SCRUM].Root.Live.N
            [SCRUM].Root.WaterUptake
            [SCRUM].Stover.Transpiration
            [SCRUM].Stover.WaterDemand
            [SCRUM].Root.Depth
            [SCRUM].Stover.CoverTotal
            [SCRUM].Stover.LAI
            [SCRUM].Stover.Height
            [SCRUM].Phenology.Stage
            [SCRUM].AboveGround.N
            [SCRUM].AboveGround.Wt
            [SCRUM].Total.N
            [SCRUM].Total.Wt
            [SCRUM].Arbitrator.N.TotalPlantDemand
            [SCRUM].Arbitrator.N.TotalPlantSupply
            [SCRUM].Arbitrator.DM.TotalFixationSupply
            [SCRUM].Arbitrator.DM.TotalPlantDemand
            [SCRUM].Arbitrator.DM.Allocated
            [SCRUM].Arbitrator.DM.SinkLimitation
            [SCRUM].Arbitrator.DM.NutrientLimitation
            [SCRUM].Stover.MaximumNConc.Value()
            [SCRUM].Stover.MinimumNConc.Value()
            [SCRUM].Stover.Live.NConc
            [SCRUM].Stover.Live.NConc
            [SCRUM].Product.Live.NConc
            [SCRUM].Stover.FRGRFunction.Value()
            [SCRUM].Stover.Fw
            [SCRUM].Arbitrator.FN
        Manager ClimateControl
          StartDate = 2012-10-23
          EndDate = 2013-04-10
```csharp
using System;
using Models.Core;
using APSIM.Shared.Utilities;



using System.Collections.Generic;
using System.Text;
using Models.PMF;
using Models;
using System.Xml.Serialization;

namespace Models
{
    [Serializable] 
    [System.Xml.Serialization.XmlInclude(typeof(Model))]
    public class Script : Model
    {
        [Link] Weather Met;
        [Link] Clock Clock;
    
        [Description("Start Date")]
        public DateTime StartDate { get; set; }
        
        [Description("End Date")]
        public DateTime EndDate { get; set; }
 
    
        [EventSubscribe("PreparingNewWeatherData")]
        private void OnPreparingNewWeatherData(object sender, EventArgs e)
        {
            if ((Clock.Today.Date >= StartDate) && (Clock.Today.Date <= EndDate))
                Met.Rain = 0;        
        }
    }
}
```
        SoluteManager
  Experiment ABlock
    Memo
      In this test we use SCRUM to represent differnt crops in two different rotation treatments (Potatoes -> Wheat -> Potatoes and Potatoes -> Peas -> Potatoes) with two irrigation (W1 and W2) and three N fertiliser treatments (N0, N1 and N2).  These rotations ran over three years and were conducted to provide data for testing N leaching predictions of different models.  SCRUM yields were set to the High N full irrigation treatment values for each crop and SCRUMs N and water responses were allowed to predict any differences in crop N uptake.  It is importnat to note that the soilN organic matter degridation coefficients were set to custom (non-release) values as this has been necessary to predict accurate N mineralisation values in new zealand arable soils.

      SCRUM gave reasionable predictions of Product N removals, soil water contents and accumulated leaching from each crop treatment.  This provides further support that SCRUM is adequate for the task of providing realistic N and Water uptakes for the purpose of N and water balance studies.
    Factors
      Factor Rot
        Factor PP_
          Specifications:
            [Sowing_Yield].Script.Crop2 = Dried_Peas
            [Sowing_Yield].Script.SowingDate2 = 2005-09-28
            [Sowing_Yield].Script.HarvestDate2 = 2006-02-24
            [TreatmentID].Script.Rotation = PP
            [InF].Script.NFert = 0
            [InF].Script.Irr1 = 55
            [InF].Script.Irr2 = 0
            [InF].Script.Irr3 = 38
            [InF].Script.Irr4 = 40
            [Sowing_Yield].Script.CropNConc = 0.05
        Factor PW_
          Specifications:
            [Sowing_Yield].Script.Crop2 = Wheat_Autumn
            [Sowing_Yield].Script.SowingDate2 = 2005-05-13
            [Sowing_Yield].Script.HarvestDate2 = 2006-02-24
            [TreatmentID].Script.Rotation = PW
            [InF].Script.NFert = 100
            [InF].Script.Irr1 = 94
            [InF].Script.Irr2 = 34
            [InF].Script.Irr3 = 61
            [InF].Script.Irr4 = 0
            [Sowing_Yield].Script.CropNConc = 0.025
      Factor W
        Factor 1_
          Specifications:
            [Irrig]
            [TreatmentID].Script.Irrigation = W1
            [InF].Script.IrrFact1 = 0
            [InF].Script.IrrFact2 = 1
            [InF].Script.IrrFact3 = 1
            [InF].Script.IrrFact4 = 0
          Operations Irrig
            2004-12-08  [Irrigation].Apply(66);
            2005-01-05  [Irrigation].Apply(59);
            2005-01-19  [Irrigation].Apply(45);
            2005-01-26  [Irrigation].Apply(48);
            2005-02-02  [Irrigation].Apply(35);
            2005-02-09  [Irrigation].Apply(38);
            2005-02-23  [Irrigation].Apply(48);
            2005-03-02  [Irrigation].Apply(29);
            2005-11-09  [Irrigation].Apply(50);
            2005-11-30  [Irrigation].Apply(21);
            2005-12-13  [Irrigation].Apply(18);
            2005-12-21  [Irrigation].Apply(26);
            2005-12-29  [Irrigation].Apply(13);
            2006-01-05  [Irrigation].Apply(39);
            2006-01-12  [Irrigation].Apply(44);
            2006-12-20  [Irrigation].Apply(22);
            2007-01-24  [Irrigation].Apply(22);
            2007-01-25  [Irrigation].Apply(10);
            2007-01-31  [Irrigation].Apply(32);
            2007-02-07  [Irrigation].Apply(23);
            2007-02-21  [Irrigation].Apply(32);
            2007-02-28  [Irrigation].Apply(31);
        Factor 2_
          Specifications:
            [Irrig]
            [TreatmentID].Script.Irrigation = W2
            [InF].Script.IrrFact1 = 1
            [InF].Script.IrrFact2 = 0
            [InF].Script.IrrFact3 = 0
            [InF].Script.IrrFact4 = 1
          Operations Irrig
            2004-12-08  [Irrigation].Apply(66);
            2004-12-22  [Irrigation].Apply(55);
            2005-01-05  [Irrigation].Apply(102);
            2005-01-19  [Irrigation].Apply(78);
            2005-01-26  [Irrigation].Apply(76);
            2005-02-02  [Irrigation].Apply(64);
            2005-02-09  [Irrigation].Apply(67);
            2005-02-23  [Irrigation].Apply(85);
            2005-03-02  [Irrigation].Apply(50);
            2005-12-14  [Irrigation].Apply(71);
            2006-01-12  [Irrigation].Apply(68);
            2007-01-25  [Irrigation].Apply(10);
            2007-02-07  [Irrigation].Apply(60);
      Factor N
        Factor 0
          Specifications:
            [Nit]
            [TreatmentID].Script.Nitrogen = N0
            [InF].Script.TreatFact = 0
          Operations Nit
        Factor 1
          Specifications:
            [Nit]
            [TreatmentID].Script.Nitrogen = N1
            [InF].Script.TreatFact = 1
          Operations Nit
            2004-10-13  [Fertiliser].Apply(100, [Fertiliser].Types.UreaN, 50);
            2004-12-20  [Fertiliser].Apply(50, [Fertiliser].Types.UreaN, 50);
            2005-01-24  [Fertiliser].Apply(50, [Fertiliser].Types.UreaN, 50);
            2005-10-26  [Fertiliser].Apply(50, [Fertiliser].Types.UreaN, 50);
            2006-10-10  [Fertiliser].Apply(100, [Fertiliser].Types.UreaN, 50);
            2006-12-29  [Fertiliser].Apply(50, [Fertiliser].Types.UreaN, 50);
            2007-01-16  [Fertiliser].Apply(50, [Fertiliser].Types.UreaN, 50);
        Factor 2
          Specifications:
            [Nit]
            [TreatmentID].Script.Nitrogen = N2
            [InF].Script.TreatFact = 2
          Operations Nit
            2004-10-13  [Fertiliser].Apply(200, [Fertiliser].Types.UreaN, 50);
            2004-12-20  [Fertiliser].Apply(100, [Fertiliser].Types.UreaN, 50);
            2005-01-24  [Fertiliser].Apply(100, [Fertiliser].Types.UreaN, 50);
            2005-10-26  [Fertiliser].Apply(100, [Fertiliser].Types.UreaN, 50);
            2006-10-10  [Fertiliser].Apply(200, [Fertiliser].Types.UreaN, 50);
            2006-12-29  [Fertiliser].Apply(100, [Fertiliser].Types.UreaN, 50);
            2007-01-16  [Fertiliser].Apply(100, [Fertiliser].Types.UreaN, 50);
    Simulation ABlock
      Weather: FileName=%root%\Tests\WeatherFiles\lincoln.met
      Clock: StartDate=2004-10-12; EndDate=2007-03-31
      Summary
      SoilArbitrator Soil Arbitrator
      Manager TreatmentID
```csharp
using System;
using Models.Core;
using System.Collections.Generic;
using System.Text;
using Models.PMF;
using Models;
using System.Xml.Serialization;
using APSIM.Shared.Utilities;
using System.IO;
using System.Data;
      

namespace Models
{
    [Serializable] 
    public class Script : Model
    {
        [XmlIgnore] public string Rotation { get; set; }
        [XmlIgnore] public string Irrigation { get; set; }
        [XmlIgnore] public string Nitrogen { get; set; }
        
        [XmlIgnore] public string TreatmentName { get; set; }
        
        [EventSubscribe("StartOfSimulation")]
        private void OnStartOfSimulation(object sender, EventArgs e)
        {
            TreatmentName = Rotation + "_" + Irrigation + "_" + Nitrogen;
        }
    }
}
```
      Zone Field: Area=1; Slope=0
        Plant SCRUM: CropType=SCRUM
        Soil: Region=Plains; State=Canterbury; Country=New Zealand; Latitude=0; Longitude=0
          DataSource=Generic profile descriptions provided by Trevor Webb and data for functional horizions based on SWAMP project results
          Comments=Bulk density values were measured on the fine earth fraction so values entered into apsim soil are adjusted down to account for stone content (assuming stones are inert from all soil process so their mass and volume is removed from model paramaters).  SAT, DUL, LL15 and Air dry have been adjusted down to account for stone content.  OC has not been adjusted so the model will get the correct carbon and N amounts using the adjusted BD.
          Analysis: Thickness=[100, 200, 200, 100, 300, 200, 100, 300]; PH=[6, 6, 6, 6, 6, 6, 6, 6]; PHUnits=Water; BoronUnits=HotWater
          Water
            Thickness  BD     AirDry  LL15   DUL   SAT
            100        1      0.05    0.1    0.27  0.419
            200        1      0.05    0.1    0.27  0.395
            300        1.59   0.157   0.157  0.29  0.36
            200        1.57   0.173   0.173  0.3   0.366
            100        1.57   0.173   0.173  0.3   0.366
            200        1.6    0.165   0.165  0.3   0.358
            100        1.6    0.165   0.165  0.3   0.358
            300        1.601  0.115   0.115  0.3   0.316
            SoilCrop SCRUMSoil: LL=[0.1, 0.1, 0.157, 0.173, 0.173, 0.165, 0.165, 0.115]; KL=[0.1, 0.1, 0.1, 0.1, 0.1, 0.1, 0.1, 0.1]; XF=[1, 1, 1, 1, 1, 1, 1, 1]
          SoilWater: SummerDate=1-oct; SummerU=9; SummerCona=4.4; WinterDate=1-Apr; WinterU=2; WinterCona=1.5; DiffusConst=88; DiffusSlope=35; Salb=0.13; CN2Bare=73; CNRed=20; CNCov=0.8; max_pond=0; Thickness=[100, 200, 300, 200, 100, 200, 100, 300]; SWCON=[0.9, 0.6, 0.4, 0.4, 0.4, 0.9, 0.9, 0.9]; ResidueInterception=0
          SoilNitrogen: fom_type=[default, manure, mucuna, lablab, shemp, stable]; fract_carb=[0.2, 0.3, 0.54, 0.57, 0.45, 0]; fract_cell=[0.7, 0.3, 0.37, 0.37, 0.47, 0.1]; fract_lign=[0.1, 0.4, 0.09, 0.06, 0.08, 0.9]
          SoilOrganicMatter: RootCN=31.5; RootWt=1500; SoilCN=11; EnrACoeff=7.4; EnrBCoeff=0.2; OCUnits=Total
            Thickness  OC     FBiom  FInert
            100        2.677  0.025  0.45
            200        2.784  0.025  0.6
            300        1.454  0.015  0.75
            200        0.383  0.01   0.9
            100        0.243  0.01   0.96
            200        0.243  0.01   0.96
            100        0.243  0.01   0.96
            300        0.243  0.01   0.96
          Sample: NO3Units=kgha; NH4Units=kgha; SWUnits=Volumetric; OCUnits=Total; PHUnits=Water
            Thickness  NO3  NH4
            100        35   6.18
            200        30   6.18
            300        29   3.21
            200        2    1.3
            100        2    1.3
            200        1    0.9
            100        1    0.1
            300        1    0.1
          InitialWater: PercentMethod=FilledFromTop; FractionFull=0.9
          CERESSoilTemperature
        SurfaceOrganicMatter: InitialResidueName=grass; InitialResidueType=grass; InitialResidueMass=2500; InitialStandingFraction=0; InitialCPR=0; InitialCNR=15
        MicroClimate: a_interception=0; b_interception=1; c_interception=0; d_interception=0; soil_albedo=0.23; SoilHeatFluxFraction=0.4; NightInterceptionFraction=0.5; ReferenceHeight=2
        Irrigation
        Fertiliser
        Folder Management
          Manager SetSoilParams
```csharp
using System;
using Models.Core;
using System.Collections.Generic;
using System.Text;
using Models.Soils;
using Models.PMF;
using Models;
using System.Xml.Serialization;
using APSIM.Shared.Utilities;

namespace Models
{
    [Serializable] 
    public class Script : Model
    {
        [Link] Soils.Soil Soil;

        [EventSubscribe("DoInitialSummary")]
        private void OnDoInitialSummary(object sender, EventArgs e)
        {
            //Soil.SoilNitrogen.rd_hum = new double[] { 0.000363, 0.00007 };
            //Soil.SoilNitrogen.rd_lign = new double[] { 0.001392, 0.003 };
            //Soil.SoilNitrogen.rd_cell = new double[] { 0.05, 0.25 };
            //Soil.SoilNitrogen.rd_carb = new double[] { 0.756438, 0.1 };
            //Soil.SoilNitrogen.rd_biom = new double[] { 0.010295, 0.004 };
            //Soil.SoilNitrogen.opt_temp = new double[] { 26.5, 32.0 };
            //Soil.SoilNitrogen.stfMiner_FctrZero = new double[] { 0.05, 0.0 }; 
            //Soil.SoilNitrogen.swfMiner_y = new double[] { 0.0, 0.5, 0.9, 1.0, 1.0 };

            Soil.SoilNitrogen.AHumusTurnOverRate = new double[] { 0.000363, 0.00007 };
            Soil.SoilNitrogen.Pool3FOMTurnOverRate = new double[] { 0.001392, 0.003 };
            Soil.SoilNitrogen.Pool2FOMTurnOverRate = new double[] { 0.05, 0.25 };
            Soil.SoilNitrogen.Pool1FOMTurnOverRate = new double[] { 0.756438, 0.1 };
            Soil.SoilNitrogen.MBiomassTurnOverRate = new double[] { 0.010295, 0.004 };
            Soil.SoilNitrogen.FOMDecomp_TOptimum = new double[] { 26.5, 32.0 };
            Soil.SoilNitrogen.SOMMiner_TOptimum = new double[] { 26.5, 32.0 };
            Soil.SoilNitrogen.Nitrification_TOptimum = new double[] { 26.5, 32.0 };
            //Soil.SoilNitrogen.SOMMiner_FactorAtZero = new double[] { 0.05, 0.0 }; 
            //Soil.SoilNitrogen.SOMMiner_MoistureFactors = new double[] { 0.0, 0.5, 0.9, 1.0, 1.0 };
        }
            
    }
}
```
          Manager Sowing_Yield
            YieldFile = %root%\Tests\Validation\SCRUM\YieldsToSet.csv
            InitialRootDepth = 10
            Crop1 = Potatoes_Short
            SowingDate1 = 2004-10-15
            HarvestDate1 = 2005-03-14
            Yield1 = 5500
            Crop2 = Dried_Peas
            SowingDate2 = 2005-09-28
            HarvestDate2 = 2006-02-24
            Yield2 = 958
            CropNConc = 0
            Crop3 = Potatoes_Short
            SowingDate3 = 2006-10-11
            HarvestDate3 = 2007-03-12
            Yield3 = 2200
            Treatment =
```csharp
using System;
using Models.Core;
using System.Collections.Generic;
using System.Text;
using Models.PMF;
using Models;
using System.Xml.Serialization;
using APSIM.Shared.Utilities;
using System.Data;
using Models.PMF.Interfaces;
using Models.Surface;

namespace Models
{
    [Serializable] 
    //[System.Xml.Serialization.XmlInclude(typeof(Model))]
    public class Script : Model
    {
        [Link] Plant SCRUM;
        [Link] Clock Clock;
        [Link] Zone zone;
        [Link] Simulation Simulation;
        [Link] SurfaceOrganicMatter SurfOM;
        
        [Description("File of Yields")]
        public string YieldFile { get; set; }
        
        public string FullFileName
        {
            get
            {
                return PathUtilities.GetAbsolutePath(YieldFile, Simulation.FileName);
            }
        }
        
        [XmlIgnore] private DataTable Yields { get; set; }
        
        [Description("Initial Root Depth")]
        public double InitialRootDepth { get; set; }
        
        [Description("First Crop")]
        public string Crop1 { get; set; }
        [Description("First Sowing Date")]
        public DateTime SowingDate1 { get; set; }
        [Description("First Harvest Date")]
        public DateTime HarvestDate1 { get; set; }
        [Description("First Crop Yield (g/m2 fresh wt)")]
        public int Yield1 { get; set; }
        
        [Description("Second Crop")]
        public string Crop2 { get; set; }
        [Description("Second Sowing Date")]
        public DateTime SowingDate2 { get; set; }
        [Description("Second Harvest Date")]
        public DateTime HarvestDate2 { get; set; }
        [Description("Second Crop Yield (g/m2 fresh wt)")]
        public int Yield2 { get; set; }
        public double CropNConc { get; set; }

        [Description("Third Crop")]
        public string Crop3 { get; set; }
        [Description("Third Sowing Date")]
        public DateTime SowingDate3 { get; set; }
        [Description("Third Harvest Date")]
        public DateTime HarvestDate3 { get; set; }
        [Description("Third Crop Yield (g/m2 fresh wt)")]
        public int Yield3 { get; set; }
        
        public string Treatment { get; set; }
        
        [XmlIgnore] private RemovalFractions Remove { get; set; }
        
        
        
        
        [EventSubscribe("Commencing")]
        private void OnSimulationCommencing(object sender, EventArgs e)
        {
            Remove = new RemovalFractions();
        }
        
        [EventSubscribe("StartOfSimulation")]
        private void OnStartOfSimulation(object sender, EventArgs e)
        {
            Treatment = (string)Apsim.Get(Simulation, "TreatmentID.Script.TreatmentName");
            
            ApsimTextFile textFile = new ApsimTextFile();
            textFile.Open(FullFileName);
            Yields = textFile.ToTable();
            textFile.Close();
            
            Remove.SetFractionToRemove("Stover", 0);
            Remove.SetFractionToResidue("Stover", 1);
            Remove.SetFractionToRemove("Product", 1);
            Remove.SetFractionToResidue("Product", 0);
            Remove.SetFractionToRemove("Root", 0.0);
            Remove.SetFractionToResidue("Root", 0.2);
        }
        
        [EventSubscribe("DoManagement")]
        private void OnDoManagement(object sender, EventArgs e)
        {
            if (Clock.Today.Date == SowingDate1)
            {
                SCRUM.Sow(cultivar: Crop1, population: 1, depth: InitialRootDepth, rowSpacing: 150);
                object ResetValue = Convert.ToDouble(Yields.Rows[0][Treatment]);
                zone.Set("[SCRUM].Product.ExpectedYield.FixedValue", ResetValue);
                ResetValue = 0.025;
                zone.Set("[SCRUM].Product.MaximumNConc.FixedValue", ResetValue);
            }
            else if (Clock.Today.Date == HarvestDate1)
            {
                SCRUM.Harvest(Remove);
                SCRUM.EndCrop();
            }
            else if (Clock.Today.Date == SowingDate2)
            {
                SCRUM.Sow(cultivar: Crop2, population: 1, depth: InitialRootDepth, rowSpacing: 150);
                object ResetValue = Convert.ToDouble(Yields.Rows[1][Treatment]);
                zone.Set("[SCRUM].Product.ExpectedYield.FixedValue", ResetValue);
                ResetValue = CropNConc;
                zone.Set("[SCRUM].Product.MaximumNConc.FixedValue", ResetValue);
            }
            else if (Clock.Today.Date == HarvestDate2)
            {
                SCRUM.Harvest(Remove);
                SCRUM.EndCrop();
                SurfOM.Incorporate(0.8, 10);
            }
            else if (Clock.Today.Date == SowingDate3)
            {
                SurfOM.Incorporate(1, 10);
                SCRUM.Sow(cultivar: Crop3, population: 1, depth: InitialRootDepth, rowSpacing: 150);
                object ResetValue = Convert.ToDouble(Yields.Rows[2][Treatment]);
                zone.Set("[SCRUM].Product.ExpectedYield.FixedValue", ResetValue);
                ResetValue = 0.025;
                zone.Set("[SCRUM].Product.MaximumNConc.FixedValue", ResetValue);
        
            }
            else if (Clock.Today.Date == HarvestDate3)
            {
                SCRUM.Harvest(Remove);
                SCRUM.EndCrop();
            }
            //PMFCrop.Sow(... Contains the following arguements:
            //Population  double  Optional  Seeds sowing/m2.  Default is zero
            //Cultivar    string  Required  "NameOfCultivar"
            //Depth       double  Optional  Depth (mm) seed sown.   Default is 100mm 
            //MaxCover    double  Optional  Proportion (0-1) of the ground row crop will cover.   Default is 1.0
            //BudNumber   double  Optional  Number of mainstems per seed sown.  Default is 1.0
            //RowSpacing  double  Optional  Spaceing (mm) between drill rows when crop is sown.  Default is 150mm
            //CropClass   string  Optional  Crop class to instantiate when crop is sown.  Default is "Plant"
        }
    }
}
```
          Operations Nit: same as ABlock.Factors.N.1.Nit
          Operations Irrig
            2004-12-08  [Irrigation].Apply(66);
            2005-01-05  [Irrigation].Apply(59);
            2005-01-19  [Irrigation].Apply(45);
            2005-01-26  [Irrigation].Apply(48);
            2005-02-02  [Irrigation].Apply(35);
            2005-02-09  [Irrigation].Apply(38);
            2005-02-23  [Irrigation].Apply(48);
            2005-03-02  [Irrigation].Apply(29);
            2005-11-09  [Irrigation].Apply(50);
            2005-11-30  [Irrigation].Apply(21);
            2005-12-07  [Irrigation].Apply(38);
            2005-12-13  [Irrigation].Apply(18);
            2005-12-21  [Irrigation].Apply(26);
            2005-12-29  [Irrigation].Apply(13);
            2006-01-05  [Irrigation].Apply(39);
            2006-01-12  [Irrigation].Apply(44);
            2006-12-20  [Irrigation].Apply(22);
            2007-01-24  [Irrigation].Apply(22);
            2007-01-25  [Irrigation].Apply(10);
            2007-01-31  [Irrigation].Apply(32);
            2007-02-07  [Irrigation].Apply(23);
            2007-02-21  [Irrigation].Apply(32);
            2007-02-28  [Irrigation].Apply(31);
          Manager InF
            FertDate1 = 2005-10-26
            FertDate2 = 2005-11-25
            NFert = 0
            TreatFact = 0
            IrrDate1 = 2005-11-18
            Irr1 = 0
            IrrFact1 = 0
            IrrDate2 = 2005-11-23
            Irr2 = 0
            IrrFact2 = 0
            IrrDate3 = 2005-12-07
            Irr3 = 0
            IrrFact3 = 0
            IrrDate4 = 2005-12-29
            Irr4 = 0
            IrrFact4 = 0
```csharp
using System;
using Models.Core;
using System.Collections.Generic;
using System.Text;
using Models.PMF;
using Models;
using System.Xml.Serialization;
using APSIM.Shared.Utilities;
using System.Data;

namespace Models
{
    [Serializable] 
    //[System.Xml.Serialization.XmlInclude(typeof(Model))]
    public class Script : Model
    {
        [Link] Plant SCRUM;
        [Link] Clock Clock;
        [Link] Zone zone;
        [Link] Simulation Simulation;
        [Link] Fertiliser Fert;
        [Link] Irrigation Irrigation;
        
        [Description("Date of Fert on Wheat")]
        public DateTime FertDate1 { get; set; }
        [Description("Date of Fert on Wheat")]
        public DateTime FertDate2 { get; set; }
        public int NFert { get; set; }
        public double TreatFact { get; set; }
    
        [Description("Date of Irrig on Wheat")]
        public DateTime IrrDate1 { get; set; }
        public int Irr1 { get; set; }
        public double IrrFact1 { get; set; }
        [Description("Date of Irrig on Wheat")]
        public DateTime IrrDate2 { get; set; }
        public int Irr2 { get; set; }
        public double IrrFact2 { get; set; }
        [Description("Date of Irrig on Wheat")]
        public DateTime IrrDate3 { get; set; }
        public int Irr3 { get; set; }
        public double IrrFact3 { get; set; }
        [Description("Date of Irrig on Wheat")]
        public DateTime IrrDate4 { get; set; }
        public int Irr4 { get; set; }
        public double IrrFact4 { get; set; }
        
        
        [EventSubscribe("DoManagement")]
        private void OnDoManagement(object sender, EventArgs e)
        {
            if (Clock.Today.Date == FertDate1)
            {
                Fert.Apply(NFert * TreatFact * 0.5, Fertiliser.Types.UreaN, 50);
            }
            if (Clock.Today.Date == FertDate2)
            {
                Fert.Apply(NFert * TreatFact, Fertiliser.Types.UreaN, 50);
            }
            if (Clock.Today.Date == IrrDate1)
            {
                Irrigation.Apply(Irr1 * IrrFact1);
            }
            if (Clock.Today.Date == IrrDate2)
            {
                Irrigation.Apply(Irr2 * IrrFact2);
            }
            if (Clock.Today.Date == IrrDate3)
            {
                Irrigation.Apply(Irr3 * IrrFact3);
            }
            if (Clock.Today.Date == IrrDate4)
            {
                Irrigation.Apply(Irr4 * IrrFact4);
            }
        }
    }
}
```
        Report: EventNames=[Clock].DoReport
          VariableNames:
            [Clock].Today
            [ExtraVariables].Script.AccumPlantN
            [ExtraVariables].Script.AccumMineralisation
            [ExtraVariables].Script.AccumDenit
            [ExtraVariables].Script.AccumFert
            [ExtraVariables].Script.AccumLeach as LeachNo3
            [ExtraVariables].Script.AccumDetach
            [ExtraVariables].Script.DeltaSoilOMN
            [ExtraVariables].Script.DeltaSurfaceOMN as SOM_N
            [ExtraVariables].Script.DeltaSoilMineralN
            [ExtraVariables].Script.DltNMinRes as Residue_N
            [ExtraVariables].Script.SWC as SWC
            [ExtraVariables].Script.DUL
            [ExtraVariables].Script.OutFlowLat
            [ExtraVariables].Script.AccumEO
            [ExtraVariables].Script.AccumEP
            [ExtraVariables].Script.AccumES
            [ExtraVariables].Script.AccumDrainage as Drainage
            [ExtraVariables].Script.AccumRunoff
            [ExtraVariables].Script.AccumRainfall
            [ExtraVariables].Script.AccumIrrigation
            [ExtraVariables].Script.AccumOutflowLat
            [ExtraVariables].Script.SoilWaterDeficit
            [ExtraVariables].Script.SoilNitrogenContent as TotalSoilN
            [ExtraVariables].Script.FomN
            [ExtraVariables].Script.HumN
            [ExtraVariables].Script.BiomN
            [ExtraVariables].Script.DltNMinRes
            [ExtraVariables].Script.DltNMinTot
            [MicroClimate].net_radn
            [MicroClimate].peta
            [MicroClimate].petr
            [Soil].SoilWater.Drainage
            [Soil].SoilWater.Runoff
            [Soil].SoilWater.Eo
            [Soil].SoilWater.Es
            [Soil].SoilWater.pond
            [Soil].SoilWater.SWmm
            [Soil].NO3N
            [SCRUM].Stover.Live.Wt
            [SCRUM].Root.Live.Wt
            [SCRUM].Product.Live.Wt
            [SCRUM].Stover.Live.N
            [SCRUM].Root.Live.N
            [SCRUM].Product.Live.N
            [SCRUM].Stover.Live.NConc
            [SCRUM].Root.Live.NConc
            [SCRUM].Product.Live.NConc
            [SCRUM].Root.WaterSupply
            [SCRUM].Root.WaterUptake
            [SCRUM].Stover.Transpiration
            [SCRUM].Stover.WaterDemand
            [SCRUM].Root.Depth
            [SCRUM].Stover.CoverTotal
            [SCRUM].Stover.CoverDead
            [SCRUM].Stover.LAI
            [SCRUM].Stover.Height
            [SCRUM].Stover.PotentialBiomass.Value()
            [SCRUM].Arbitrator.N.TotalPlantDemand
            [SCRUM].Arbitrator.N.TotalPlantSupply
            [SCRUM].Stover.Fw
            [SCRUM].Stover.Fn
            [SCRUM].Total.Wt
            [SCRUM].ExpectedYield.Value()
            [SCRUM].DryYield.Value()
            [SCRUM].TotalBiomassAtStartReproductive.Value()
            [SCRUM].TotalBiomassAtStartSenescence.Value()
            [SCRUM].Ymax.Value()
            [SCRUM].Total.N
            [SCRUM].Arbitrator.DM.TotalFixationSupply
            [SCRUM].Arbitrator.DM.TotalPlantDemand
            [SCRUM].Phenology.AccumulatedThermalTime.Value()
            [SCRUM].Arbitrator.DM.SinkLimitation
            [SCRUM].Arbitrator.DM.NutrientLimitation
            [SCRUM].Phenology.ThermalTime.Value()
            [SCRUM].Phenology.CurrentPhaseName
            [SCRUM].Phenology.Stage
            [AutomaticIrrigation].Script.Top_Refull
            [AutomaticIrrigation].Script.Top_Trigger
            [AutomaticIrrigation].Script.Top_SW
            [AutomaticIrrigation].Script.Top_DUL
            [Irrigation].IrrigationApplied
            [AutomaticIrrigation].Script.Amount_to_apply
            [AutomaticIrrigation].Script.StartDate
            [AutomaticIrrigation].Script.SeasonIsOpen
            [AutomaticIrrigation].Script.EndDate
            [AutomaticIrrigation].Script.TodayYear
            [SCRUM].Arbitrator.FN
            [NConcReps].Script.TotalLeach
            [NConcReps].Script.ObservedLeach1
            [NConcReps].Script.ObservedLeach2
            [NConcReps].Script.ObservedLeach3
            [NConcReps].Script.ObservedLeach4
            [NConcReps].Script.ObservedLeach5
            [NConcReps].Script.Leach_60
            [Soil].SoilWater.solute_flow_eff
            [Soil].SoilWater.solute_flux_eff
            [SCRUM].Total.N
            [Soil].SoilWater.FlowNO3
            [TreatmentID].Script.TreatmentName as Treat
            [Sowing_Yield].Script.Treatment
            [TreatmentID].Script.Rotation as RotTreat
            [TreatmentID].Script.Irrigation as IrrigTreat
            [TreatmentID].Script.Nitrogen as NitTreat
            [SurfaceOrganicMatter].N
            [SurfaceOrganicMatter].wt
            [SurfaceOrganicMatter].Cover
        Report PredictedLeach: EventNames=[SCRUM].Harvesting
          VariableNames:
            [Clock].Today
            [NConcReps].Script.TotalLeach as NLeaching
        Report ObservedLeach: EventNames=[SCRUM].Harvesting
          VariableNames:
            [Clock].Today
            [NConcReps].Script.NLeachMean as NLeaching
        Manager ExtraVariables
```csharp
using System;
using Models.Core;
using System.Collections.Generic;
using System.Text;
using Models.Soils;
using Models.PMF;
using Models;
using System.Xml.Serialization;
using APSIM.Shared.Utilities;

namespace Models
{
    [Serializable] 
    public class Script : Model
    {
        [Link] Clock Clock;
        [Link] Soils.Soil Soil;
        [Link] Models.Surface.SurfaceOrganicMatter SOM;
        [Link] Weather Met;
        [Link] Fertiliser Fert;
        [Link] Irrigation Irrig;
        [Link] Plant SCRUM;
        [Link] Zone zone;
                    
        [XmlIgnore] public bool InitialDay { get; set; }
        
        [XmlIgnore] public double AccumPlantN { get; set; }
        [XmlIgnore] public double AccumMineralisation { get; set; }
        [XmlIgnore] public double AccumDenit { get; set; }
        [XmlIgnore] public double AccumFert { get; set; }
        [XmlIgnore] public double AccumLeach { get; set; }
        [XmlIgnore] public double AccumDetach { get; set; }
        [XmlIgnore] public double DeltaSoilOMN { get; set; }
        [XmlIgnore] public double DeltaSurfaceOMN { get; set; }
        [XmlIgnore] public double DeltaSoilMineralN { get; set; }
        [XmlIgnore] public double SoilNitrogenContent { get; set; }
        
        
        
        [XmlIgnore] public double AccumEO { get; set; }
        [XmlIgnore] public double AccumEP { get; set; }
        [XmlIgnore] public double AccumES { get; set; }
        [XmlIgnore] public double AccumDrainage { get; set; }
        [XmlIgnore] public double AccumRunoff { get; set; }
        [XmlIgnore] public double AccumOutflowLat { get; set; }
        [XmlIgnore] public double AccumIrrigation { get; set; }
        [XmlIgnore] public double AccumRainfall { get; set; }
        [XmlIgnore] public double SoilWaterDeficit { get; set; }
    
        [XmlIgnore] public double  InitialSoilOMN { get; set; }
        [XmlIgnore] public double  InitialSurfaceOMN { get; set; }
        [XmlIgnore] public double  InitialMineralN { get; set; }
        
        
        [XmlIgnore] public double SWC { get; set; }
        [XmlIgnore] public double DUL { get; set; }
        [XmlIgnore] public double OutFlowLat { get; set; }

        [XmlIgnore] public double FomN { get; set; }
        [XmlIgnore] public double BiomN { get; set; }
        [XmlIgnore] public double HumN { get; set; }
        [XmlIgnore] public double OrganicN { get; set; }
        [XmlIgnore] public double NO3N { get; set; }
        [XmlIgnore] public double NH4N { get; set; }
        [XmlIgnore] public double UreaN { get; set; }
        [XmlIgnore] public double MineralN { get; set; }
        [XmlIgnore] public double DltNMinRes { get; set; }
        [XmlIgnore] public double DltNMinTot { get; set; }
        [XmlIgnore] public double ResidueWt{ get; set; }
        
        
        [EventSubscribe("Commencing")]
        private void OnSimulationCommencing(object sender, EventArgs e)
        {
            InitialDay = true;
        }
        
        [EventSubscribe("DoManagement")]
        private void OnDoManagement(object sender, EventArgs e)
        {
            //!!!!!! Nitrogen balance components !!!!!!
            //!!!!!!^^^^^^^^^^^^^^^^^^^^^^^^^^^^^!!!!!!
            FomN = MathUtilities.Sum(Soil.SoilNitrogen.FOMN);
            HumN = MathUtilities.Sum(Soil.SoilNitrogen.HumicN);
            BiomN = MathUtilities.Sum(Soil.SoilNitrogen.MicrobialN);
            OrganicN = FomN + HumN + BiomN;
            NO3N = MathUtilities.Sum(Soil.NO3N);
            NH4N = MathUtilities.Sum(Soil.NH4N);
            UreaN = MathUtilities.Sum(Soil.SoilNitrogen.urea);
            MineralN = NO3N + NH4N + UreaN; 
            DltNMinRes = MathUtilities.Sum(Soil.SoilNitrogen.dlt_n_min_res);
            DltNMinTot = MathUtilities.Sum(Soil.SoilNitrogen.MineralisedN);
        
            //Residue components//
            ResidueWt = SOM.Wt;
            //MathUtilities.Sum(SOM.dlt_SurfaceOM_wt);    Failed:)
            
            int layers = Soil.Thickness.Length;
            if (InitialDay == true)
            {
                InitialSurfaceOMN = SOM.N;
                InitialSoilOMN = OrganicN;
                InitialMineralN = MineralN;
                InitialDay = false;
            }
            DeltaSurfaceOMN = SOM.N - InitialSurfaceOMN;
            //AccumLeach = AccumLeach + Soil.SoilWater.LeachNH4 + Soil.SoilWater.LeachNO3 + Soil.SoilWater.LeachUrea; //Fails
            AccumLeach = AccumLeach + Soil.SoilWater.LeachNO3;
            AccumMineralisation += MathUtilities.Sum(Soil.SoilNitrogen.MineralisedN);
            AccumDenit -= MathUtilities.Sum(Soil.SoilNitrogen.Denitrification);
            AccumPlantN += (double)zone.Get("SCRUM.Root.NUptake");
            DeltaSoilOMN = OrganicN - InitialSoilOMN;
            DeltaSoilMineralN = MineralN - InitialMineralN;
            SoilNitrogenContent = MineralN;
    
            
            
            //!!!!!! Water balance components !!!!!!
            //!!!!!!^^^^^^^^^^^^^^^^^^^^^^^^^^!!!!!!

            AccumRainfall += Met.Rain;
            //AccumEP -= (double)zone.Get("[SCRUM].Stover.Transpiration");
            AccumEP -= (double)zone.Get("SCRUM.Root.WaterUptake");
            SoilWaterDeficit = (SWC - DUL);
            double OutFlowLat = MathUtilities.Sum(Soil.SoilWater.LateralOutflow);
            AccumOutflowLat -= OutFlowLat;
        }
        
        [EventSubscribe("DoManagementCalculations")]
        private void OnDoManagementCalculations(object sender, EventArgs e)
        {
            FomN = MathUtilities.Sum(Soil.SoilNitrogen.FOMN);
            HumN = MathUtilities.Sum(Soil.SoilNitrogen.HumicN);
            BiomN = MathUtilities.Sum(Soil.SoilNitrogen.MicrobialN);
            AccumFert += Fert.NitrogenApplied;
            AccumIrrigation += Irrig.IrrigationApplied;
            
            
            AccumEO -= Soil.SoilWater.Eo;
            AccumES -= Soil.SoilWater.Es; 
            AccumDrainage += Soil.SoilWater.Drainage;
            AccumRunoff -= Soil.SoilWater.Runoff;
            SWC = MathUtilities.Sum(Soil.SoilWater.SWmm);
            DUL = MathUtilities.Sum(Soil.DULmm);
        }
        
        [EventSubscribe("PlantEnding")]
        private void OnPlantEnding(object sender, EventArgs e)
        {
            AccumFert = 0;
            AccumIrrigation = 0;
            
            
            AccumEO = 0;
            AccumES = 0;
            AccumDrainage = 0;
            AccumRunoff = 0;
            
            AccumLeach = 0;
            AccumMineralisation = 0;
            AccumDenit = 0;
            AccumPlantN = 0;
            
            AccumRainfall = 0;
            AccumEP = 0;
            AccumOutflowLat = 0;
            
        }
    }
}
```
        Manager NConcReps
          NConcFile = %root%\Tests\Validation\SCRUM\NO3.csv
          TotalLeach = 0
          Leach_60 = 0
          ObservedLeach1 = 0
          ObservedLeach2 = 0
          ObservedLeach3 = 0
          ObservedLeach4 = 0
          ObservedLeach5 = 0
          NConc1 = 0
          NConc2 = 0
          NConc3 = 0
          NConc4 = 0
          NConc5 = 0
          Treat_Rep1 =
          Treat_Rep2 =
          Treat_Rep3 =
          Treat_Rep4 =
          Treat_Rep5 =
          NLeachMean = 0
```csharp
using System;
using Models.Core;
using System.Collections.Generic;
using System.Text;
using Models.Soils;
using Models.PMF;
using Models;
using System.Xml.Serialization;
using APSIM.Shared.Utilities;
using System.Data;

namespace Models
{
    [Serializable] 
    public class Script : Model
    {
        [Link] Clock Clock;
        [Link] Soils.Soil Soil;
        [Link] Models.Surface.SurfaceOrganicMatter SOM;
        [Link] Weather Met;
        [Link] Fertiliser Fert;
        [Link] Irrigation Irrig;
        [Link] Plant SCRUM;
        [Link] Zone zone;
        [Link] Simulation Simulation;
        
        [Description("File of Nconcs")]
        public string NConcFile { get; set; }
        
        public string FullFileName
        {
            get
            {
                return PathUtilities.GetAbsolutePath(NConcFile, Simulation.FileName);
            }
        }
        
        public double TotalLeach { get; set; }
        public double Leach_60 { get; set; }
        public double ObservedLeach1 { get; set; }
        public double ObservedLeach2 { get; set; }
        public double ObservedLeach3 { get; set; }
        public double ObservedLeach4 { get; set; }
        public double ObservedLeach5 { get; set; }
        public double NConc1 { get; set; }
        public double NConc2 { get; set; }
        public double NConc3 { get; set; }
        public double NConc4 { get; set; }
        public double NConc5 { get; set; }
    
        public string Treat_Rep1 { get; set; }
        public string Treat_Rep2 { get; set; }
        public string Treat_Rep3 { get; set; }
        public string Treat_Rep4 { get; set; }
        public string Treat_Rep5 { get; set; }
        
        public double NLeachMean { get; set; }
        
        [XmlIgnore] private DataTable NConcs { get; set; }
    
        private DateTime Date1 { get; set; }
        
        [EventSubscribe("StartOfSimulation")]
        private void OnStartOfSimulation(object sender, EventArgs e)
        {
            ApsimTextFile textFile = new ApsimTextFile();
            textFile.Open(FullFileName);
            NConcs = textFile.ToTable();
            textFile.Close();
            
            Treat_Rep1 = (string)Apsim.Get(Simulation, "TreatmentID.Script.TreatmentName") + "_1";
            Treat_Rep2 = (string)Apsim.Get(Simulation, "TreatmentID.Script.TreatmentName") + "_2";
            Treat_Rep3 = (string)Apsim.Get(Simulation, "TreatmentID.Script.TreatmentName") + "_3";
            Treat_Rep4 = (string)Apsim.Get(Simulation, "TreatmentID.Script.TreatmentName") + "_4";
            Treat_Rep5 = (string)Apsim.Get(Simulation, "TreatmentID.Script.TreatmentName") + "_5";
        }
        
        [EventSubscribe("DoInitialSummary")]
        private void OnDoInitialSummary(object sender, EventArgs e)
        {
            TotalLeach = 0;
            Leach_60 = 0;
            NConc1 = 0;
            NConc2 = 0;
            NConc3 = 0;
            NConc4 = 0;
            NConc5 = 0;
            ObservedLeach1 = 0;
            ObservedLeach2 = 0;
            ObservedLeach3 = 0;
            ObservedLeach4 = 0;
            ObservedLeach5 = 0;
        }
        
        [EventSubscribe("StartOfDay")]
        private void OnStartOfDay(object sender, EventArgs e)
        {
            try
            {
                foreach (DataRow row in NConcs.Rows)
                {
                    DateTime TodayDate = Convert.ToDateTime(row["Date"]);
                    if (TodayDate.Date == Clock.Today.Date)
                    {
                        NConc1 = Convert.ToDouble(row[Treat_Rep1]);
                        NConc2 = Convert.ToDouble(row[Treat_Rep2]);
                        NConc3 = Convert.ToDouble(row[Treat_Rep3]);
                        NConc4 = Convert.ToDouble(row[Treat_Rep4]);
                        NConc5 = Convert.ToDouble(row[Treat_Rep5]);
                    }
                }
            }
            finally
            {
            }
        }
        
        [EventSubscribe("DoManagement")]
        private void OnDoManagement(object sender, EventArgs e)
        {
            DateTime Potato1Start = new DateTime(2004, 12, 9);
            DateTime Potato1End = new DateTime(2005, 3, 14);
        
            if ((Clock.Today.Date >= Potato1Start) && (Clock.Today.Date <= Potato1End))
            {
                Leach_60 = Leach_60 + (Soil.SoilWater.FlowNO3[3]);
                ObservedLeach1 = ObservedLeach1 + ((Soil.SoilWater.Flow[3] + Soil.SoilWater.Flux[3]) * NConc1) / 100;
                ObservedLeach2 = ObservedLeach2 + ((Soil.SoilWater.Flow[3] + Soil.SoilWater.Flux[3]) * NConc2) / 100;
                ObservedLeach3 = ObservedLeach3 + ((Soil.SoilWater.Flow[3] + Soil.SoilWater.Flux[3]) * NConc3) / 100;
                ObservedLeach4 = ObservedLeach4 + ((Soil.SoilWater.Flow[3] + Soil.SoilWater.Flux[3]) * NConc4) / 100;
                ObservedLeach5 = ObservedLeach5 + ((Soil.SoilWater.Flow[3] + Soil.SoilWater.Flux[3]) * NConc5) / 100;
                if (ObservedLeach5 > 0)
                    NLeachMean = (ObservedLeach1 + ObservedLeach2 + ObservedLeach3 + ObservedLeach4 + ObservedLeach5) / 5;
                else
                    NLeachMean = (ObservedLeach1 + ObservedLeach2 + ObservedLeach3) / 3;
                    
                TotalLeach = TotalLeach + (Soil.SoilWater.FlowNO3[2] + Soil.SoilWater.FlowNH4[2]);
            }
            else if (Clock.Today.Date > Potato1End)
            {    
                Leach_60 = 0;
                ObservedLeach1 = ObservedLeach1 + (Soil.SoilWater.Drainage * NConc1) / 100;
                ObservedLeach2 = ObservedLeach2 + (Soil.SoilWater.Drainage * NConc2) / 100;
                ObservedLeach3 = ObservedLeach3 + (Soil.SoilWater.Drainage * NConc3) / 100;
                ObservedLeach4 = ObservedLeach4 + (Soil.SoilWater.Drainage * NConc4) / 100;
                ObservedLeach5 = ObservedLeach5 + (Soil.SoilWater.Drainage * NConc5) / 100;
                if (ObservedLeach5 > 0)
                    NLeachMean = (ObservedLeach1 + ObservedLeach2 + ObservedLeach3 + ObservedLeach4 + ObservedLeach5) / 5;
                else
                    NLeachMean = (ObservedLeach1 + ObservedLeach2 + ObservedLeach3) / 3;
                //TotalLeach = TotalLeach + Soil.SoilWater.LeachNH4 + Soil.SoilWater.LeachNO3 + Soil.SoilWater.LeachUrea;
                TotalLeach = TotalLeach + (Soil.SoilWater.FlowNO3[7] + Soil.SoilWater.FlowNH4[7]);
            }
        }
        
        [EventSubscribe("PlantEnding")]
        private void OnPlantEnding(object sender, EventArgs e)
        {
            Leach_60 = 0;
            ObservedLeach1 = 0;
            ObservedLeach2 = 0;
            ObservedLeach3 = 0;
            ObservedLeach4 = 0;
            ObservedLeach5 = 0;
            TotalLeach = 0;
            
            
        }
    }
}
```
        SoluteManager
    Folder LeachingObsPre
      Memo
        Predictions working well for all but the high N treatment in the final wheat crop following the potato crop.  I suspect the model is under predicting Denitrification here
  Replacements
    Plant Chicory: CropType=Chicory
      Memo GeneralDescription
        # Presentation

        This model has been developed to simulate the growth of a forage chicory crop.  The chicory model focus, thus, on describing primarily the vegetative growth, with a simplified account of the reproductive phase, without explicit considering flowers and seeds (these may be included in future releases).  The model was built using the Plant Modelling Framework (PMF) described by [brown_plant_2014].  To simulate the aboveground plant structure, including the photosynthesis process, the Chicory model uses the SimpleLeaf organ type of PMF.  The model describes a semi-perennial crop, with phenology rewinding to the vegetative stage at the end of the reproductive phase.

        # Inclusion in APSIM simulations
        A forage chicory crop can be included in a simulation the same as any other APSIM crop.

          * - The chicory object can be dragged or copied from the Crop folder in the tool box into a Field in your simulation;
          * - To become active, chicory needs to be sown using a manager script with a sowing rule. e.g.:
        ~~~
          Chicory.Sow(cultivar: Puna, population: 200, depth: 10, rowSpacing: 150);
        ~~~
        If a specified cultivar is not available, a fatal error will be thrown.

        ## Harvest and biomass removal
        Chicory biomass can be removed by raising one of the valid methods: Harvest, Cut, Graze, or Prune; this is done using a manager script, like for other crops.  The proportion of the biomass of each organ that is removed from the system and/or added to the residue pools may be specified; otherwise defaults will be used.  Note that the sum of fractions removed and added to residue should be <= 1.0.  To specify the proportions for removal in a manager script, use a RemovalFractions class as shown below:
        ~~~
        [EventSubscribe("Commencing")]
        private void OnSimulationCommencing(object sender, EventArgs e)
        {
          RemoveFraction = new RemovalFractions(Chicory.Organs);
        }
        [EventSubscribe("DoManagement")]
        private void OnDoManagement(object sender, EventArgs e)
        {
          if (Clock.Today.Date == HarvestDate)
          {
            RemoveFraction.SetFractionToRemove("Leaf", 0.80);
            RemoveFraction.SetFractionToRemove("Stem", 0.50);
            RemoveFraction.SetFractionToResidue("leaf",0.05);
            Chicory.Harvest(RemoveFraction);
          }
        }
        ~~~
        The RemovalFractions class can be sent with Harvest, Cut, Graze, or Prune events. All parameters are optional, defaults are used whenever any value is not specified.

        ## Crop termination
        To fully terminate a crop the EndCrop event should be raised:
        ~~~
          Chicory.EndCrop();
        ~~~
        Once a crop has been ended the field is open to be used by another APSIM plant model, or another chicory crop.  Note that ending chicory is not necessary before sowing another crop, competition for resources will take place between crops when there is more than one in the field.

        # Acknowledgements
        This model was developed with help from Russel McAuliffe and Brittany Paton organising data and simulations. Datasets were kindly shared by Julia M. Lee, Hamish E. Brown, and the Forages for Reduced Nitrogen Leaching (FRNL) programme.
      Phenology
        Memo Description
          The duration of each phenologic phase in Chicory is controlled in general by the accumulation of thermal time; for the reproductive phase, vernalisation and photoperiod are also used.
        AirTemperatureFunction ThermalTime
          Memo Description
            The thermal time is calculated from the daily average temperature using three cardinal temperatures: minimum, maximum, and optimum.  Crop development acelerates as temperature increases from minimum to optimum and slows down after that, stopping completely when maximum temperature is reached.  For chicory, the minimum temperature seems to be around 3-5oC ([AmaducciEtAl_1998]; [MootEtAl_2000]; [ClaphamEtAl_2001]), although growth and emergence have been reported to be greatly reduced for temperatures below 10-14oC ([JungEtAl_1996]; [Schittenhelm_2001]).  Optimum temperature is reported to be around 20-25oC ([MootEtAl_2000]; [Schittenhelm_2001]; [MathieuEtAl_2014]) whereas the maximum temperature should be close to 35oC ([MathieuEtAl_2014]; [LangworthyEtAl_2015]).
          XYPairs: X=[5, 25, 35]; Y=[0, 25, 0]
        PhotoperiodFunction Photoperiod: Twilight=-6; DayLength=0
        Vernalisation: StartStage=Emergence; EndStage=Bolting; ResetStage=Ripening
          Memo Description
            Vernalisation is the process whereby the plant acquires the ability to go into reproductive phase after been exposed to a period of time at low temperatures ([Wiebe_1990]; [DemeulemeesterEtAl_1998]). For chicory the temperature range for vernalisation is between 0 and 12oC, with optimum about 4-6oC ([Wiebe_1989]; [Wiebe_1990]; [Gianquinto_1997]; [DielenEtAl_2005]).
                    The reversal of vernalisation, or de-vernalisation, can happen on chicory ([Wiebe_1990]; [Gianquinto_1997]), if plants are exposed to sufficiently high temperatures soon after the period under vernalisation the effects of vernalisation are cancelled out. Most plants show small reversal at relatively lower temperatures (above something in between 15 and 20oC), and larger at temperatures above 30oC. For chicory, the more effective temperature to reverse vernalisation seem to be around 30-35oC ([Gianquinto_1997]; [GoodgerThesis_2013]). Intermediate temperatures stabilise the vernalisation, and after 5-10 days reversal is no longer possible.
                    The number of days required for full vernalisation is quite variable in chicory and specific to each cultivar, with 30-50 days often given for full vernalisation ([Wiebe_1990]; [Gianquinto_1997]; [DielenEtAl_2005]). However, some plants of leafy cultivars can go into reproductive phase if exposed to cold conditions for about a week or less ([Gianquinto_1997]). For forage chicory (cv. Puna) at field conditions in the USA, about 50-60% of the plants reached reproductive stage after winter ([ClaphamEtAl_2001]; [SandersonEtAl_2003]), and plants that bolted on one year tended to remain vegetative the following year and vice-versa. In New Zealand conditions, reproductive phase seems to occur every year after winter ([HareEtAl_1990]), although the extent of it has not been reported. The data published suggest a minimum number of days for vernalisation (approximately 10 days) and a progressive increase in the number of plants vernalised as the number of days the plants are kept under cold conditions increases. This is simulated by the model by assuming that the change in biomass fixation during stem elongation and reproductive phases (prioritising stems and flowers) is a function of vernalisation.
          AirTemperatureFunction VernalisingDays
            XYPairs: X=[0, 4, 6, 12]; Y=[0, 1, 1, 0]
          AirTemperatureFunction DevernalisingDays
            XYPairs: X=[0, 15, 30, 40]; Y=[0, 0, 1, 1]
          Constant DaysToStabilise: FixedValue=10; Units=days
        GerminatingPhase Germinating: Start=Sowing; End=Germination
          Memo Description
            Germination will occur one day after sowing, provided that soil extractable water is greater than zero.  Germination rates for chicory typically vary between 70 and 95% when sown close to the surface (<10mm), with plenty of moisture and at good temperature ([MootEtAl_2000]; [SandersonElwinger_2000b]; [ReedEtAl_2008]; [LeeEtAlYields_2015]).  The chicory model assumes 100% germination, and therefore the user must correct sowing rate if variation between actual sowing rate and germination is considered important.
        EmergingPhase Emerging: ShootLag=75; ShootRate=10; Start=Germination; End=Emergence; TTForTimeStep=0
          Memo Description
             Chicory has small seeds and emergence has been shown to be strongly affected by sowing depth ([PeriEtAl_2000]; [SandersonElwinger_2000a]), with best performace for seeds at <10mm and practically no emergence from a depth of 60 mm (for forage cultivars).  This effect is not explicitly simulated by the chicory model in the current version.
          VariableReference ThermalTime: VariableName=[Phenology].ThermalTime.Value()
        GenericPhase Vegetative: Start=Emergence; End=Vernalised
          Memo Description
            During this phase the plant only partitions biomass to leaf and root+taproot organs.  The phase start initially after emergence, but it is also re-called after the end of the reproductive phase (phenology reset).  It ends when a minimum level of vernalisation has been reached.
                    Most leaf chicory cultivars (e.g. Radicchio) seem to have a facultative or quantitative response to vernalisation, that is, flowering can occurs without it if other conditions are right, but flowering will be hastened and enhanced by vernalisation ([Gianquinto_1997]; [DielenEtAl_2005]).  Root cultivars have an absolute need for vernalisation and also seem to require a certain age to be able to be vernalised, whereas leaf cultivars can be vernalised at any age ([Gianquinto_1997]; [Schittenhelm_2001]).  Forage chicory seem to be in between these two extremes, with reports that at least some vernalisation is required ([HareEtAl_1990]; [MoloneyMilne_1993]).
                    The chicory model considers that a minimum vernalisation is needed, but this is quite small (mostly based on data from [Gianquinto_1997]). Vernalisation will have a greater effect on the extent of stem and flowers growth ([Wiebe_1989]; [Gianquinto_1997]; [DielenEtAl_2005]), and thus vernalisation accumulation is considered throughout the inductive phase.
          Constant Target: FixedValue=10; Units=<sup>o</sup>Cd
          VariableReference Progression: VariableName=[Phenology].Vernalisation.TodaysVernalisation
        GenericPhase Inductive: Start=Vernalised; End=Bolting
          Memo Description
            This phase represents the period when the plant awaits for the cue to start of the reproductive growth, for chicory this is given by photoperiod ([Wiebe_1990]; [MoloneyMilne_1993]). For forage chicory the end of this phase seem to occur when the daylight is around 12-14 hours ([HareEtAl_1990]; [MoloneyMilne_1993]; [Gianquinto_1997]; [ClaphamEtAl_2001]). During this phase the plant still only allocates biomass to leaf and root+taproot organs. Vernalisation continues to accumulate throught this phase and will have an effect on the extent that biomass partition changes during reproductive growth ([Wiebe_1989]; [Gianquinto_1997]; [SandersonEtAl_2003]; [DielenEtAl_2005]).
          Constant Target: FixedValue=30; Units=<sup>o</sup>Cd
          LinearInterpolationFunction Progression: XProperty=[Phenology].Photoperiod.Value()
            XYPairs: X=[10, 11.5, 14, 15]; Y=[0, 0, 1, 1]
        GenericPhase StemElongation: Start=Bolting; End=Flowering
          Memo Description
            During this phase the chicory plant switches biomass partitioning, strongly prioritising stem organs, although leaf and root+taproot can still grow.  Stem growth intensity decreases when flower buds start to appear ([HareEtAl_1990]; [ClaphamEtAl_2001]).  In the USA, stem growth of forage chicory has been observed to occur for a period of time equivalent to the accumulation of thermal time of about 800-1000 oCd after bolting ([ClaphamEtAl_2001]).  These values agreed well with the qualitative description of chicory development in New Zealand  ([HareEtAl_1990]).
          Constant Target: FixedValue=800; Units=<sup>o</sup>Cd
          VariableReference Progression: VariableName=[Phenology].ThermalTime.Value()
        GenericPhase Reproductive: Start=Flowering; End=Ripening
          Memo Description
            During this phase the plant is partitioning biomass to all organs, but prioritising reproductive organs (flowers and seed). In the current model, seeds are not explicitly described and only a generic organ refered to as inflorescence is defined.  This was done partly due to lack of data and partly because of the complex physiology of chicory. There is a great level of variability among chicory plants on when and for how long flowering occurs, plus even the same plant can have flowers, young seeds, as well as ripen seeds at the same time ([HareEtAl_1990]; [MoloneyMilne_1993]; [ClaphamEtAl_2001]).
                    Data from the USA and New Zealand suggest that the reproductive phase lasts for the equivalent of the accumualtion of thermal time of about 800-1000oCd ([HareEtAl_1990]; [ClaphamEtAl_2001]).
          Constant Target: FixedValue=800; Units=<sup>o</sup>Cd
          VariableReference Progression: VariableName=[Phenology].ThermalTime.Value()
        GotoPhase: Start=Ripening; End=Ripening; PhaseNameToGoto=Vegetative
          Memo Description
            For chicory, the phase used to reset phenology is 'Vegetative'.
      OrganArbitrator Arbitrator
        RelativeAllocation NArbitrator
          Memo Description
            Controls the allocation of N to each of the plant's organs.  Partition is based on:
        RelativeAllocation DMArbitrator
          Memo Description
            Controls the allocation of biomass to each of the plant's organs. Partition is based on:
      SimpleLeaf Leaf: CohortsInitialised=false; Albedo=0.18; Gsmax=0.015; R50=150; MicroClimatePresent=true; LeafInitialisationStage=Emergence
        zero: ApicalCohortNo, InitialisedCohortNo, TipsAtEmergence, CohortsAtInitialisation, AppearedCohortNo, PlantAppearedLeafNo, LAI, Height, FRGR, PotentialEP, KDead, LAIDead
        Memo Description
          __Note:__ Represents all leaves in the plant.  There is no distiction between age or place in the canopy.
        MultiplyFunction InitialWtFunction
          Memo Description
            It is assumed that 1/3 of the seed biomass is apportioned to shoot upon emergence.  Seed weight for chicory varies between 1.4 and 1.7 g/1000 seeds ([HareEtAl_1990]; [ReedEtAl_2008]).
          Constant InitialPlantWt: FixedValue=0.0007; Units=g/plant
          VariableReference Population: VariableName=[Plant].Population
        Constant StructuralFraction: FixedValue=1; Units=g/g
          Memo Description
            This is the default value for PMF.
        Constant RemobilisationCost: FixedValue=0
        Constant MinimumNConc: FixedValue=0.0215; Units=gN/gDM
          Memo Description
            This is the lowest N concentration that leaves can have and still be able to grow.  It represents the N content for structural tissues and is the concentration of dead material.  Published values suggest that the lowest concentration for leaves is around 1.2-2.5% ([ClarkEtAl_1990a]; [ClarkEtAl_1990b]; [AmezianeEtAl_1995]; [BausenweinEtAl_2001]; [BeleskyEtAl_2004]; unpublished FRNL data).
        Constant MaximumNConc: FixedValue=0.055; Units=gN/gDM
          Memo Description
            This represents the maximum limit for N concentration in leaves.  Some of this N is not essential for growth, but can affect photosynthesis.  Literature data, plus that from the FRNL programme (used in the validation tests) suggest that values for maximum N concentration are about 5.0-6.0% ([ZagalEtAl_2001]; [NeelEtAl_2002]; [AlloushEtAl_2003]; [BeleskyEtAl_2004]; [LeeEtAlYields_2015]).
        Constant CriticalNConc: FixedValue=0.04; Units=gN/gDM
          Memo Description
            This is the N concentration below which growth is limited.  Uptake can increase N content above this level, up to that defined by the maximum N concentration.  This parameter is difficult to define without specific experimental data, which is not currently available, and thus might have to be updated in the future.  Based on general plant physiology and considering the values published in several studies ([McCoyEtAl_1997]; [ClarkEtAl_1990b]; [NeelEtAl_2002]; [AlloushEtAl_2003]; [BeleskyEtAl_2004]; [LeeEtAlYields_2015]) the critical N concentration seem to be around 3.5-4.5%.
        RUEModel Photosynthesis
          Memo Description
            Data for photosynthesis or radiation use efficiency (RUE) for chicory are not abundant and most data from Europe are for root cultivars.  Reported maximum photosynthetic rates vary between 7 and 15 μmol(CO2)/m2.s ([LabreveuxThesis_2002]; [DevachtEtAl_2009]). Estimates for RUE go from 1.9 up to 2.3, for the whole plant  ([MontiEtAl_2005]; [DevachtEtAl_2009]).  Data is also sparse for the effect  of enviromental factors on photosynthesis, so the chicory model uses generic functions for the effects of temperature, moisture, and N supply, but these are ajusted based on data published ([LabreveuxThesis_2002]; [MontiEtAl_2005]; [DevachtEtAl_2009]; [KovarEtAl_2012]; [MathieuEtAl_2014]).
          Constant RUE: FixedValue=2.1; Units=g/MJ
          RUECO2Function FCO2: PhotosyntheticPathway=C3
          LinearInterpolationFunction FN: XProperty=[Leaf].Fn
            XYPairs: X=[0, 0.4, 0.8, 1.5]; Y=[0, 0.5, 1, 1]
          WeightedTemperatureFunction FT: MaximumTemperatureWeighting=0.75
            XYPairs: X=[5, 11, 16, 21, 26, 35]; Y=[0, 0.1, 0.35, 1, 1, 0]
          LinearInterpolationFunction FW: XProperty=[Leaf].Fw
            XYPairs: X=[0, 0.9, 1, 1.5]; Y=[0, 0.95, 1, 1]
          Constant FVPD: FixedValue=1
          VariableReference RadnInt: VariableName=[Leaf].RadIntTot
        DivideFunction FRGRFunction
          Memo Description
            This parameter represents the Fractional Growth Rate, which  is required by the MicroClimate model.  That model uses FRGR to calculate the effect of growth rate on transpiration.
          VariableReference Photosynthesis: VariableName=[Leaf].Photosynthesis.Value()
          MultiplyFunction PotentialPhotosynthesis
            VariableReference PotentialRUE: VariableName=[Leaf].Photosynthesis.RUE.Value()
            MaximumFunction Radiation
              VariableReference RadnInt: VariableName=[Leaf].RadIntTot
              Constant MinRadn: FixedValue=1E-05
        PartitionFractionDemandFunction DMDemandFunction
          Memo Description
            DM demand function attempts to keep the shoot to root ratio (defined by the [TargetShootRootRatio].Value) and then the leaf to stem ratio (set by [TargetStemsLeafRatio].Value) close to a target value, which varies according to the development phase.  This is necessary to ensure that the chicory plants will recover after grazing, that is partitoning a considerable amount of biomass to growing leaves even during reproductive phase.
          PhaseLookup PartitionFraction
            PhaseLookupValue VegetativeAndInductive: Start=Emergence; End=Bolting
              DivideFunction LeafFraction
                MultiplyFunction Numerator
                  VariableReference TargetSR1: VariableName=[TargetShootRootRatio].Value()
                  VariableReference TargetSR2: VariableName=[TargetShootRootRatio].Value()
                AddFunction Denominator
                  MultiplyFunction TargetSRs
                    VariableReference TargetSR1: VariableName=[TargetShootRootRatio].Value()
                    VariableReference TargetSR2: VariableName=[TargetShootRootRatio].Value()
                  VariableReference CurrentSR: VariableName=[ShootRootRatio].Value()
            PhaseLookupValue StemElongationAndReproductive: Start=Bolting; End=Ripening
              DivideFunction LeafFraction
                MultiplyFunction Numerator
                  VariableReference TargetSR1: VariableName=[TargetShootRootRatio].Value()
                  VariableReference TargetSR2: VariableName=[TargetShootRootRatio].Value()
                  VariableReference CurrentSL: VariableName=[StemsLeafRatio].Value()
                MultiplyFunction Denominator
                  AddFunction SRs: same as Replacements.Chicory.Leaf.DMDemandFunction.PartitionFraction.VegetativeAndInductive.LeafFraction.Denominator
                  AddFunction SLs
                    MultiplyFunction TargetSLs
                      VariableReference TargetSL1: VariableName=[TargetStemsLeafRatio].Value()
                      VariableReference TargetSL2: VariableName=[TargetStemsLeafRatio].Value()
                    VariableReference CurrentSL: VariableName=[StemsLeafRatio].Value()
        Constant DMConversionEfficiency: FixedValue=1; Units=/day
          Memo Description
            This is the default value for PMF.
        Constant MaintenanceRespirationFunction: FixedValue=0; Units=/day
          Memo Description
            This is the default value for PMF.
        MultiplyFunction LAIFunction
          Memo Description
            The leaf area index (LAI) for green leaves is defined based on the specific leaf area (SLA).  Currently the value for SLA is assumed to be constant in the chicory model, but data for other plants indicates that age and some environmental factors can affect this value.  Although some data for chicory does suggest that SLA varies with light intensity, temperature, soil ioninc strength and moisture ([AlloushEtAl_2003]; DevachtEtAl_2009]; [LabreveuxThesis_2002]; [MathieuEtAl_2014]), there is not enough values to draw function for these relationships, this should be updated in the future when more data is made available.  Based on the available data ([LiEtAl_1997a]; [SandersonElwinger_2000a]; [LabreveuxThesis_2002]; [AlloushEtAl_2003]; [DevachtEtAl_2009]; [KovarEtAl_2012]; [MathieuEtAl_2014]; [LeeEtAlYields_2015]), forage chicory should have SLA from 0.015 to 0.045 m2/g.
          Constant SpecificLeafArea: FixedValue=0.03; Units=m^2/g
          VariableReference LiveLeafWeight: VariableName=[Leaf].Live.Wt
        MultiplyFunction LaiDeadFunction
          Memo Description
            No specific data for LAI or SLA were found for chicory, The value of SLA is thus assumed to be the same as that of live leaves (this is consistent for the model as no biomass reallocation occurs during senescence.
          VariableReference SpecificLeafArea: VariableName=[Leaf].LAIFunction.SpecificLeafArea.Value()
          VariableReference DeadLeafWeight: VariableName=[Leaf].Dead.Wt
        Constant ExtinctionCoefficientFunction: FixedValue=0.6
          Memo Description
            Only two studies were found with references to light interception or the light extinction coefficient of chicory ([SapkotaEtAl_2012]; [LeeEtAlYields_2015]).  The data from these suggest a light extinction coefficient approximately of 0.60-0.65.
        LinearInterpolationFunction HeightFunction: XProperty=[Chicory].AboveGround.Wt
          Memo Description
            The average height of chicory is assumed in the model to be a simple function of above ground biomass. Sward population and competition with other plant should have an influence on this relationship, but more importanly, the presence of stem during reproductive phase should have a major impact on biomass distribtuion in the canopy.  The available data is not enough for developing relationship realiably, so they are not currently accounted for by the model.  Currently this should have only a minor effect as the sensitivity to height of light competition or evapotranspiration calculations is low, but this should be uptaded in the future.
          XYPairs: X=[10, 100, 500]; Y=[100, 400, 1200]
        MultiplyFunction SenescenceRate
          Memo Description
            Availabe data for senescence in chicory is very sparse. Coinsiderable differences were found between plants in vegetative and those with reproductive growth ([ClaphamEtAl_2001]), and drought had less pronounced effect on leaf senesce in chicory than in lucerne or phalaris ([KempEtAl_2002]).  Generic relationships to enviromental factors, such as temperature and soil moisture, are assumed taking that in consideration and based on other plant models.
          Constant ReferenceRate: FixedValue=0.005; Units=/day
          LinearInterpolationFunction StageFactor: XProperty=[Phenology].Stage
            XYPairs: X=[3, 4, 5, 6, 7]; Y=[0.5, 1, 1, 1, 1]
          LinearInterpolationFunction CoverFactor: XProperty=[Leaf].CoverTotal
            XYPairs: X=[0, 0.5, 0.9, 0.95, 0.99, 1]; Y=[1, 1, 1, 1.1, 2, 3]
          WeightedTemperatureFunction TemperatureFactor: MaximumTemperatureWeighting=0.5
            XYPairs: X=[0, 5, 15, 20, 30]; Y=[0, 0, 0.4, 1, 1]
          LinearInterpolationFunction SoilMoistureFactor: XProperty=[Leaf].Fw
            XYPairs: X=[0, 0.5, 1]; Y=[2, 1, 1]
        MultiplyFunction DetachmentRateFunction
          Memo Description
            A generic relationship between detachment and soil moisture is assumed.  It implies that under dry conditions the detachment rate decreases due to the lower level of activity of decomposing microorganisms.
          Constant ReferenceRate: FixedValue=0.1; Units=/day
          LinearInterpolationFunction SoilMoistureFactor: XProperty=[Leaf].Fw
            XYPairs: X=[0, 0.5, 1]; Y=[0.5, 0.5, 0.1]
        Constant DMRetranslocationFactor: FixedValue=0; Units=/day
          Memo Description
            This is the default value for PMF.
        Constant DMReallocationFactor: FixedValue=1; Units=/day
          Memo Description
            This is the default value for PMF.
        Constant NRetranslocationFactor: FixedValue=0; Units=/day
          Memo Description
            This parameter control the remobilisation of N above the critical N concentration towards new growth, the value used here is a initial guess, but conforms with the data used in the validation.
        Constant NReallocationFactor: FixedValue=1; Units=/day
          Memo Description
            This is the default value for PMF.
        BiomassRemoval BiomassRemovalDefaults
          OrganBiomassRemovalType Cut: FractionLiveToRemove=0.7; FractionDeadToRemove=0.5; FractionLiveToResidue=0; FractionDeadToResidue=0
          OrganBiomassRemovalType Graze: FractionLiveToRemove=0.7; FractionDeadToRemove=0.1; FractionLiveToResidue=0.1; FractionDeadToResidue=0.1
          OrganBiomassRemovalType Harvest: FractionLiveToRemove=0; FractionDeadToRemove=0; FractionLiveToResidue=0.1; FractionDeadToResidue=0.1
          OrganBiomassRemovalType Prune: FractionLiveToRemove=0; FractionDeadToRemove=0; FractionLiveToResidue=0.1; FractionDeadToResidue=0.1
        Constant NitrogenDemandSwitch: FixedValue=1
        Constant CarbonConcentration: FixedValue=0.4
      GenericOrgan Stem
        Memo Description
          __Note:__ Represents all the stems and branches in the plant, without any distinction between age or the position in the canopy.
        Constant RemobilisationCost: FixedValue=0
        Constant InitialWtFunction: FixedValue=0; Units=g/m^2
        Constant StructuralFraction: FixedValue=0.9; Units=g/g
          Memo Description
            This is the default value for PMF.
        Constant MinimumNConc: FixedValue=0.007; Units=gN/gDM
          Memo Description
            This is the lowest N concentration for stems and represents the N content for structural tissues, as well as the concentration of dead material.  Published values suggest that the values should be lower than 1.00% ([ClarkEtAl_1990a]; [ClarkEtAl_1990b]; [JungEtAl_1996]), but the actuall value  has not been defined yet.
        LinearInterpolationFunction MaximumNConc: XProperty=[Phenology].Stage
          Memo Description
            This represents the upper limit for N concentration of stems.  Published studies suggest that smal, youger stems and branches have a higher N content as compare to older larger (woody) stem ([ClarkEtAl_1990b]).  As the model does not differntiate stems by age, it was assumed that N concentration in the stems is a function of growth stage, with values varying between 1.2 and 2.2% ([ClarkEtAl_1990a]; [ClarkEtAl_1990b]; [LiEtAl_1997c]; [JungEtAl_1996]).
          XYPairs: X=[5, 5.5, 6, 6.5, 7]; Y=[0.0225, 0.0225, 0.016, 0.014, 0.013]
        PartitionFractionDemandFunction DMDemandFunction
          Memo Description
            The allocation of growth biomass to the various organs in the chicory model is done using simple approach.  It is assumed that the proportion of the above ground biomass is allocated to stems based on two target ratios, the [TargetStemsLeafRatio].Value and [FlowerStemRatio].Value).  Allocation of biomass to stems attempts to keep the current ratios close to the targets. Note that stem can only grow during the stem elongation and reproductive phases.
          PhaseLookup PartitionFraction
            PhaseLookupValue StemElongation: Start=Bolting; End=Flowering
              DivideFunction StemFraction
                MultiplyFunction Numerator
                  VariableReference TargetSR1: VariableName=[TargetShootRootRatio].Value()
                  VariableReference TargetSR2: VariableName=[TargetShootRootRatio].Value()
                  VariableReference TargetSL1: VariableName=[TargetStemsLeafRatio].Value()
                  VariableReference TargetSL2: VariableName=[TargetStemsLeafRatio].Value()
                MultiplyFunction Denominator: same as Replacements.Chicory.Leaf.DMDemandFunction.PartitionFraction.StemElongationAndReproductive.LeafFraction.Denominator
            PhaseLookupValue Reproductive: Start=Flowering; End=Ripening
              DivideFunction StemFraction
                MultiplyFunction Numerator
                  VariableReference TargetSR1: VariableName=[TargetShootRootRatio].Value()
                  VariableReference TargetSR2: VariableName=[TargetShootRootRatio].Value()
                  VariableReference TargetSL1: VariableName=[TargetStemsLeafRatio].Value()
                  VariableReference TargetSL2: VariableName=[TargetStemsLeafRatio].Value()
                  VariableReference CurrentFS: VariableName=[FlowerStemRatio].Value()
                MultiplyFunction Denominator
                  AddFunction SRs: same as Replacements.Chicory.Leaf.DMDemandFunction.PartitionFraction.VegetativeAndInductive.LeafFraction.Denominator
                  AddFunction SLs: same as Replacements.Chicory.Leaf.DMDemandFunction.PartitionFraction.StemElongationAndReproductive.LeafFraction.Denominator.SLs
                  AddFunction FSs
                    MultiplyFunction TargetFSs
                      VariableReference TargetFS1: VariableName=[TargetFlowerStemRatio].Value()
                      VariableReference TargetFS2: VariableName=[TargetFlowerStemRatio].Value()
                    VariableReference CurrentFS: VariableName=[FlowerStemRatio].Value()
        Constant DMConversionEfficiency: FixedValue=1; Units=/day
          Memo Description
            This is the default value for PMF.
        Constant MaintenanceRespirationFunction: FixedValue=0; Units=/day
          Memo Description
            This is the default value for PMF.
        MultiplyFunction SenescenceRate
          Memo Description
            The reference senescence rate is adjusted using generic relationships with enviromental factors, such as temperature and soil moisture.  These are based on general knowledge from other plant models.
          Constant ReferenceRate: FixedValue=0.1; Units=/day
          LinearInterpolationFunction StageFactor: XProperty=[Phenology].Stage
            XYPairs: X=[3, 4.99, 5, 6, 6.5, 6.75, 7]; Y=[1, 1, 0, 0, 0.1, 0.3, 1]
          WeightedTemperatureFunction TemperatureFactor: MaximumTemperatureWeighting=0.5
            XYPairs: X=[0, 5, 15, 20, 30]; Y=[0, 0, 0.4, 1, 1]
          LinearInterpolationFunction SoilMoistureFactor: XProperty=[Leaf].Fw
            XYPairs: X=[0, 0.5, 1]; Y=[2, 1, 1]
        MultiplyFunction DetachmentRateFunction
          Memo Description
            A generic relationship between detachment and soil moisture is assumed.  It implies that under dry conditions the detachment rate decreases due to the lower level of activity of decomposing microorganisms.
          Constant ReferenceRate: FixedValue=0.1; Units=/day
          LinearInterpolationFunction SoilMoistureFactor: XProperty=[Leaf].Fw
            XYPairs: X=[0, 0.5, 0.75, 1]; Y=[0, 0, 0.25, 1]
        LinearInterpolationFunction DMRetranslocationFactor: XProperty=[Phenology].Stage
          Memo Description
            This represent the potential rate that non-structural biomass of stems can be used as a supply.  It is assumed this is a function of growth stage, as older stems release the reserves towards new growth.
          XYPairs: X=[5, 5.5, 6, 6.5, 7]; Y=[0, 0, 0.005, 0.01, 0.01]
        Constant DMReallocationFactor: FixedValue=1; Units=/day
          Memo Description
            This is the default value for PMF.
        LinearInterpolationFunction NRetranslocationFactor: XProperty=[Phenology].Stage
          Memo Description
            This parameter represents the proportion of N above the minimum content that can can be used for new growth.  It is assumed that this value varies with growth stage as stems become woody and need has lower N concentrations ([ClarkEtAl_1990b]).  The magnitude is guessed based on results shown in the validation tests.
          XYPairs: X=[5, 5.5, 6, 6.5, 7]; Y=[0, 0, 0.01, 0.05, 0.05]
        Constant NReallocationFactor: FixedValue=1; Units=/day
          Memo Description
            This is the default value for PMF.
        BiomassRemoval BiomassRemovalDefaults
          OrganBiomassRemovalType Cut: FractionLiveToRemove=0.7; FractionDeadToRemove=0.5; FractionLiveToResidue=0; FractionDeadToResidue=0
          OrganBiomassRemovalType Graze: FractionLiveToRemove=0.5; FractionDeadToRemove=0; FractionLiveToResidue=0.1; FractionDeadToResidue=0.1
          OrganBiomassRemovalType Harvest: FractionLiveToRemove=0; FractionDeadToRemove=0; FractionLiveToResidue=0.1; FractionDeadToResidue=0.1
          OrganBiomassRemovalType Prune: FractionLiveToRemove=0; FractionDeadToRemove=0; FractionLiveToResidue=0.5; FractionDeadToResidue=0.1
        Constant NitrogenDemandSwitch: FixedValue=1
        VariableReference CriticalNConc: VariableName=[Stem].MinimumNConc.Value()
        Constant CarbonConcentration: FixedValue=0.4
      GenericOrgan Inflorescence
        Memo Description
          __Note:__ Represents the reproductive parts of the plant, flowers, pods, seeds, etc.
        Constant RemobilisationCost: FixedValue=0
        Constant InitialWtFunction: FixedValue=0; Units=g/m^2
        Constant StructuralFraction: FixedValue=1; Units=g/g
          Memo Description
            This is the default value for PMF.
        LinearInterpolationFunction MinimumNConc: XProperty=[Phenology].Stage
          Memo Description
            The N concentration in the inflorescence of chicory plants seem to be higher than in other organs ([ClarkEtAl_1990b]). This higher N content seem to be related to flowering or seed development, but it is not carried out to seeds, which have a relatively low N content, about 2.5-3.0% ([JurgonskiEtAl_2011]; [Wen-Ying_2012]).  Because chicory plants can have flower buds, open flowers, and mature seeds at the same time, the N concentration is assumed to vary as a function of stage development, increasing fast at the beggining of the reproductive phase and stabilising after the peak of the season is reached, decreasing only at the very end of the season.
          XYPairs: X=[6, 6.1, 6.3, 6.8, 7]; Y=[0.04, 0.055, 0.07, 0.07, 0.06]
        LinearInterpolationFunction MaximumNConc: XProperty=[Phenology].Stage
          Memo Description
            It is assume in the chicory model that the maximum N concentration varies with time in a similar fashion as the minimum N concentration, just at a little higher level.
          XYPairs: X=[6, 6.1, 6.3, 6.8, 7]; Y=[0.05, 0.06, 0.075, 0.075, 0.06]
        PartitionFractionDemandFunction DMDemandFunction
          Memo Description
            The chicory model defines the allocation of biomass to various organs based on simple approach.  The fraction of the above ground biomass allocated to inflorescence is computed by weighting up the current proportion in relation to stems and that of  the target ratio ([FlowerStemRatio].Value).  Note that partiton to inflorescence only occurs during the reproductive phase.
          PhaseLookup PartitionFraction
            PhaseLookupValue Reproductive: Start=Flowering; End=Ripening
              DivideFunction FlowerFraction
                MultiplyFunction Numerator
                  VariableReference TargetSR1: VariableName=[TargetShootRootRatio].Value()
                  VariableReference TargetSR2: VariableName=[TargetShootRootRatio].Value()
                  VariableReference TargetSL1: VariableName=[TargetStemsLeafRatio].Value()
                  VariableReference TargetSL2: VariableName=[TargetStemsLeafRatio].Value()
                  VariableReference TargetFS1: VariableName=[TargetFlowerStemRatio].Value()
                  VariableReference TargetFS2: VariableName=[TargetFlowerStemRatio].Value()
                MultiplyFunction Denominator: same as Replacements.Chicory.Stem.DMDemandFunction.PartitionFraction.Reproductive.StemFraction.Denominator
        Constant DMConversionEfficiency: FixedValue=1; Units=/day
          Memo Description
            This is the default value for PMF.
        Constant MaintenanceRespirationFunction: FixedValue=0; Units=/day
          Memo Description
            This is the default value for PMF.
        MultiplyFunction SenescenceRate
          Memo Description
            Generic relationships to enviromental factors, such as temperature and soil moisture, are assumed based on other plant models.
          Constant ReferenceRate: FixedValue=0.25; Units=/day
          LinearInterpolationFunction StageFactor: XProperty=[Phenology].Stage
            XYPairs: X=[3, 5.99, 6, 6.5, 7]; Y=[1, 1, 0, 0.25, 1]
          WeightedTemperatureFunction TemperatureFactor: MaximumTemperatureWeighting=0.5
            XYPairs: X=[0, 5, 15, 20, 30]; Y=[0, 0, 0.4, 1, 1]
          LinearInterpolationFunction SoilMoistureFactor: XProperty=[Leaf].Fw
            XYPairs: X=[0, 0.5, 1]; Y=[2, 1, 1]
        MultiplyFunction DetachmentRateFunction
          Memo Description
            A generic relationship between detachment and soil moisture is assumed.  It implies that under dry conditions the detachment rate decreases due to the lower level of activity of decomposing microorganisms.
          Constant ReferenceRate: FixedValue=0.25; Units=/day
          LinearInterpolationFunction SoilMoistureFactor: XProperty=[Leaf].Fw
            XYPairs: X=[0, 0.5, 1]; Y=[0, 0.5, 1]
        Constant DMRetranslocationFactor: FixedValue=0; Units=/day
          Memo Description
            This is the default value for PMF.
        Constant DMReallocationFactor: FixedValue=0; Units=/day
          Memo Description
            This is the default value for PMF.
        LinearInterpolationFunction NRetranslocationFactor: XProperty=[Phenology].Stage
          Memo Description
            It is assumed that this parameter varies with growth stage, with potential retranslocation higher later in the reproductive season as the proportion of older flowers is higher, and also because flowers have a much larger N concentration that seeds ([ClarkEtAl_1990b]; [JurgonskiEtAl_2011]).
          XYPairs: X=[6, 6.25, 6.5, 6.75, 7]; Y=[0, 0.01, 0.025, 0.05, 0.05]
        Constant NReallocationFactor: FixedValue=1; Units=/day
          Memo Description
            This is the default value for PMF.
        BiomassRemoval BiomassRemovalDefaults
          OrganBiomassRemovalType Cut: FractionLiveToRemove=0.8; FractionDeadToRemove=0.1; FractionLiveToResidue=0; FractionDeadToResidue=0
          OrganBiomassRemovalType Graze: FractionLiveToRemove=0.8; FractionDeadToRemove=0.1; FractionLiveToResidue=0.1; FractionDeadToResidue=0.1
          OrganBiomassRemovalType Harvest: FractionLiveToRemove=0.8; FractionDeadToRemove=0.8; FractionLiveToResidue=0.1; FractionDeadToResidue=0.1
          OrganBiomassRemovalType Prune: FractionLiveToRemove=0; FractionDeadToRemove=0; FractionLiveToResidue=0.5; FractionDeadToResidue=0.1
        Constant NitrogenDemandSwitch: FixedValue=1
        VariableReference CriticalNConc: VariableName=[Inflorescence].MinimumNConc.Value()
        Constant CarbonConcentration: FixedValue=0.4
      GenericOrgan Taproot
        Memo Description
          __Note:__ This represents all the taproots of the plant.
                Taproots are quite important for chicory growth, they are the a major reserve organ and can supply N and sugars whenever the plant needs are not fully satified by uptake or photosynthesis.  This can prompt growth especially at the end of winter and following defoliation.  To mimic this process, the chicory model can use the non-structural fraction of taproots' biomass to complement demand for new growth; this is done via biomass retranslocation.  There is a considerable amount of information about the build up of reserves in roots of chicory, although most of it is for root cultivars, some developed specifically for high sugar content in roots ().  Mono- and di-saccharides (fructose and sucrose) and especilly fructans (inulin) reserves build up over the growing season in the taproot and their content can reach 60-80% of dry mater before winter ([AmezianeEtAl_1995]; [ErnstEtAl_1995]; [DemeulemeesterEtAl_1998]; [MontiEtAl_2005]).  This content is much lower for leaf varieties, reaching 20-30% ([LiEtAl_1997a]; [ErnstEtAl_1995];  [QuijadaThesis_2015]), and this can be further reduced if defoliation is severe or the plants have bolted ([Arias-carbajalThesis_1994]; [LiEtAl_1997a]; [Schittenhelm_2001]; [CranstonEtAl_2016]).  Build up of N reserves (as proteins and amino-acids) in taproots has also been show to occur at the end of growing season, and then being used for shoot development after winter ([LimamiEtAl_1996]; [BewleyDerek_2002]).  The controls for the build up of reserves of the rate that they can be used for new growth are still mostly unknown.  Defoliation and environmental stress (drought) have been shown to reduce the reserves ([LiEtAl_1997a], [MontiEtAl_2005]), but it is not clear whether this is a direct affect or due to the greater usage of reserves to cope with the stresses.
                For the chicory model the set of parameters related to the storage of reserves and their utilisation (StructuralFraction, DMRetranslocationFactor, and NRetranslocationFactor) were manipulated in order to reflect the trends shown in the literature review and attempting to reproduce the results of the available experimental datasets (used in the validation tests).  These should be upgraded when data more specific to the retranslocation process is made available.
        Constant RemobilisationCost: FixedValue=0
        Constant InitialWtFunction: FixedValue=0; Units=g/m^2
        Constant StructuralFraction: FixedValue=0.5; Units=g/g
          Memo Description
            The fraction of non-structural biomass in chicory taproots can be quite high, reaching 60-80% of dry mater weight ([AmezianeEtAl_1995]; [ErnstEtAl_1995]; [DemeulemeesterEtAl_1998]; [MontiEtAl_2005]).  However, for forage cultivars, especially under defoliation, the actual content is much smaller, with values around 20-30% being reported ([ErnstEtAl_1995]; [LiEtAl_1997a]; [QuijadaThesis_2015]).  As the chicory model aim to describe forage cultivars primarily, the *potential* fraction of non-structural biomass should be between these two levels.
        Constant MinimumNConc: FixedValue=0.007; Units=gN/gDM
          Memo Description
            The lowest N concentration for taproots is quite difficult to stablish as N can be constantly retranslocated within the plant.  This represents the N content for structural tissues and the lower level for dead material.  Published values suggest that the concentration for taproots under N stress or after winter is around 0.5-1.0% ([AmezianeEtAl_1995]; [ZagalEtAl_2001]; [BausenweinEtAl_2001]; [BewleyDerek_2002]).
        Constant MaximumNConc: FixedValue=0.015; Units=gN/gDM
          Memo Description
            This is the upper limit for N concentration and it is not essential for growth.  The N between the minimum and maximum conentration is considered reserves and is available for retranslocation and reallocation towards new growth.  published data suggest that N concentration in taproots can reach values up to about 1.5-2.0% ([AmezianeEtAl_1995]; [ZagalEtAl_2001]; [BewleyDerek_2002]; [JurgonskiEtAl_2011]).
        PartitionFractionDemandFunction DMDemandFunction
          Memo Description
            Allocation of biomass to taproots in the chicory model is computed assuming that there is a target ratio for the biomass of root and taproot (defined by [TaprootRootRatio].Value).  There is little data in literature that could be used to estimate values for this parameter ([LiEtAl_1997a]; [LabreveuxThesis_2002]; [AlloushEtAl_2003]), and there seem to be large differences between cultivars (those selected for root harvesting have a large proportion of overall biomass allocated to taproots, e.g. [LiEtAl_1997a] or [DevachtEtAl_2009], but no information was found for fine roots). This parameter should be updated when more data becomes available.
          PhaseLookup PartitionFraction
            PhaseLookupValue AllPhases: Start=Emergence; End=Ripening
              DivideFunction TaprootFraction
                MultiplyFunction Numerator
                  VariableReference CurrentSR: VariableName=[ShootRootRatio].Value()
                  VariableReference TargetTR1: VariableName=[TargetTaprootRootRatio].Value()
                  VariableReference TargetTR2: VariableName=[TargetTaprootRootRatio].Value()
                MultiplyFunction Denominator
                  AddFunction SRs: same as Replacements.Chicory.Leaf.DMDemandFunction.PartitionFraction.VegetativeAndInductive.LeafFraction.Denominator
                  AddFunction TRs
                    MultiplyFunction TargetTRs
                      VariableReference TargetTR1: VariableName=[TargetTaprootRootRatio].Value()
                      VariableReference TargetTR2: VariableName=[TargetTaprootRootRatio].Value()
                    VariableReference CurrentTR: VariableName=[TaprootRootRatio].Value()
        Constant DMConversionEfficiency: FixedValue=1; Units=/day
          Memo Description
            This is the default value for PMF.
        Constant MaintenanceRespirationFunction: FixedValue=0; Units=/day
          Memo Description
            This is the default value for PMF.
        MultiplyFunction SenescenceRate
          Memo Description
            The reference senescence rate is adjusted using generic relationships with enviromental factors, such as temperature and soil moisture.  These are based on general knowledge from other plant models.
          Constant ReferenceRate: FixedValue=0.001; Units=/day
          WeightedTemperatureFunction TemperatureFactor: MaximumTemperatureWeighting=0.5
            XYPairs: X=[0, 5, 15, 20, 30]; Y=[0, 0, 0.4, 1, 1]
          LinearInterpolationFunction SoilMoistureFactor: XProperty=[Leaf].FW
            XYPairs: X=[0, 0.5, 1]; Y=[1, 1, 1]
          Constant SoilAerationFactor: FixedValue=1; Units=0-1
        Constant DetachmentRateFunction: FixedValue=1; Units=/day
          Memo Description
            Folowing convention used for roots in PMF, any taproot senesced is automatically detached and added to the soil fresh organic matter.
        MultiplyFunction DMRetranslocationFactor
          Memo Description
            This parameter controls the rate at which reserves can be used by the plant for new growth.  There is little information on how the plant controls the use of reserves, but it is mostly used after winter when potential growth is high, and after defoliations (e.g. [LimamiEtAl_1996], [LiEtAl_1997c], and [CranstonEtAl_2016]).  For the model, it was assume that the rate of retranslocation was affected by temperature and moisture, which affect growth too.  This ensures that retranslocation is minimal over winter and that reserves are not burn of too quickly in drought conditions (as most plants tend to stop growing is such conditions).  This assumption must be revised when more data is available.
          Constant ReferenceFactor: FixedValue=0.05; Units=/day
          WeightedTemperatureFunction TemperatureFactor: MaximumTemperatureWeighting=0.5
            XYPairs: X=[5, 11, 16, 21, 26, 35]; Y=[0, 0.1, 0.35, 1, 1, 0]
          LinearInterpolationFunction SoilMoistureFactor: XProperty=[Leaf].FW
            XYPairs: X=[0, 0.7, 0.85, 1.5]; Y=[0, 0, 0, 0]
        Constant DMReallocationFactor: FixedValue=1; Units=/day
          Memo Description
            This is the default value for PMF.
        MultiplyFunction NRetranslocationFactor
          Memo Description
            This is assumed to follow the same trend as biomass retranslocation.
          Constant ReferenceFactor: FixedValue=0.05; Units=/day
          WeightedTemperatureFunction TemperatureFactor: MaximumTemperatureWeighting=0.5
            XYPairs: X=[5, 11, 16, 21, 26, 35]; Y=[0, 0.1, 0.35, 1, 1, 0]
          LinearInterpolationFunction SoilMoistureFactor: XProperty=[Leaf].FW
            XYPairs: X=[0, 0.7, 0.85, 1.5]; Y=[0, 0, 0, 0]
        Constant NReallocationFactor: FixedValue=1; Units=/day
          Memo Description
            This is the default value for PMF.
        BiomassRemoval BiomassRemovalDefaults
          OrganBiomassRemovalType Cut: FractionLiveToRemove=0; FractionDeadToRemove=0; FractionLiveToResidue=0.1; FractionDeadToResidue=0
          OrganBiomassRemovalType Graze: FractionLiveToRemove=0; FractionDeadToRemove=0; FractionLiveToResidue=0.1; FractionDeadToResidue=0
          OrganBiomassRemovalType Harvest: FractionLiveToRemove=0; FractionDeadToRemove=0; FractionLiveToResidue=0.1; FractionDeadToResidue=0
          OrganBiomassRemovalType Prune: FractionLiveToRemove=0; FractionDeadToRemove=0; FractionLiveToResidue=0.1; FractionDeadToResidue=0
        Constant NitrogenDemandSwitch: FixedValue=1
        VariableReference CriticalNConc: VariableName=[Taproot].MinimumNConc.Value()
        Constant CarbonConcentration: FixedValue=0.4
      Root: GrowthRespiration=0; MaintenanceRespiration=0
        Memo Description
          __Note:__  this represents all the fine roots of the plant.
                There is no distinction of age, but root biomass is allocated separately for each soil layer within the root zone.   The depth of the root zone can change over time as root grows.
        Constant RemobilisationCost: FixedValue=0
        Constant InitialDM: FixedValue=0.001; Units=g/plant
          Memo Description
            The model assumes that 2/3 of the seed biomass is converted to root biomass by the time of emergence.  The weight of chicory seeds varies From 1.4 to 1.7 g/1000 seeds ([HareEtAl_1990]; [ReedEtAl_2008]).
        Constant StructuralFraction: FixedValue=1; Units=g/g
          Memo Description
            This is the default value for PMF.
        Constant MinimumNConc: FixedValue=0.014; Units=gN/gDM
          Memo Description
            This lowest N concentration for roots and represents the N content for structural tissues.  Published values suggest that the concentration in roots is much less variable than for taproots and it is on average higher too.  The lower values vary around 1.4% ([BausenweinEtAl_2001]; [ZagalEtAl_2001]; [JurgonskiEtAl_2011]).
        Constant MaximumNConc: FixedValue=0.016; Units=gN/gDM
          Memo Description
            The upper limit for N concentration in chicory roots seem to be similar to that of taproots and published data suggest values around 1.6-1.7% ([BausenweinEtAl_2001]; [ZagalEtAl_2001]; [JurgonskiEtAl_2011]).
        PhaseBasedSwitch NitrogenDemandSwitch: Start=Germination; End=Ripening
        PartitionFractionDemandFunction DMDemandFunction
          PhaseLookup PartitionFraction
            Memo Description
              The chicory model allocates biomass below ground following a simple approach.  The amount allocated to below ground is computed based on the [TargetShootRootRatio].Value, and then the partiton between roots and taproot is controlled by the [TaprootRootRatio].Value).  There is only a few data in literature about the relative amounts of fine roots and taproots ([LiEtAl_1997a]; [LabreveuxThesis_2002]; [AlloushEtAl_2003]), so the parameterisation of DM partition should be revised when more data is available.
            PhaseLookupValue AllPhases: Start=Emergence; End=Ripening
              DivideFunction RootFraction
                MultiplyFunction Numerator
                  VariableReference CurrentSR: VariableName=[ShootRootRatio].Value()
                  VariableReference CurrentTR: VariableName=[TaprootRootRatio].Value()
                MultiplyFunction Denominator: same as Replacements.Chicory.Taproot.DMDemandFunction.PartitionFraction.AllPhases.TaprootFraction.Denominator
        Constant DMConversionEfficiency: FixedValue=1; Units=/day
          Memo Description
            This is the default value for PMF.
        Constant MaintenanceRespirationFunction: FixedValue=0; Units=/day
          Memo Description
            This is the default value for PMF.
        Constant MaximumRootDepth: FixedValue=2000; Units=mm
          Memo Description
            Chicory is typically describe as a deep rooted species and values of about 2.0 m have been reported ([LiKemp_2005]; [BrownThesis_2004]; [SapkotaEtAl_2012]).
        PhaseLookup RootFrontVelocity
          Memo Description
            Growth of roots are a priority for plants after germination and should slow down as plants grow; when in the reproductive phase growth is very much focused on above ground biomass.  Thus the chicory model assumes that growth rate of roots vary with phenological phase. No estimate value for the parameter was found, so it was set based on available information ([BrownThesis_2004]; [SapkotaEtAl_2012]) and general knowledge from other models.
          PhaseLookupValue PreEmergence: Start=Germination; End=Emergence
            Constant ReferenceVelocity: FixedValue=5; Units=mm/day
          PhaseLookupValue Vegetative: Start=Emergence; End=Bolting
            Constant ReferenceVelocity: FixedValue=10; Units=mm/day
          PhaseLookupValue Reproductive: Start=Bolting; End=Ripening
            Constant ReferenceVelocity: FixedValue=1; Units=mm/day
        Constant SpecificRootLength: FixedValue=40; Units=m/g
          Memo Description
            The PMF model converts root biomass into root length using the specific root length (SRL), and this may be used to regulate uptake processes.  Available data for chicory is highly variable and the disticntion between fine roots and taproot is not always considered, value range from 10 m/g for seedlings up to 100 m/g ([SandersonElwinger_2000a]; [LabreveuxThesis_2002]; [SapkotaEtAl_2012]; [LiuEtAl2015]; [CranstonEtAl_2016]).
        MultiplyFunction SenescenceRate
          Memo Description
            The rate of senescence for chicory roots is not really know, but it should be affected to enviromental factors, such as temperature and soil moisture.  Currently the reference rate is adjusted for temperature only, following general knowledge from other plant models.
          Constant ReferenceRate: FixedValue=0.005; Units=/day
          WeightedTemperatureFunction TemperatureFactor: MaximumTemperatureWeighting=0.5
            XYPairs: X=[0, 5, 15, 20, 30]; Y=[0, 0, 0.4, 1, 1]
          LinearInterpolationFunction SoilMoistureFactor: XProperty=[Leaf].FW
            XYPairs: X=[0, 0.5, 1]; Y=[1, 1, 1]
          Constant SoilAerationFactor: FixedValue=1
        Constant DMRetranslocationFactor: FixedValue=0; Units=/day
          Memo Description
            This is the default value for PMF.
        Constant DMReallocationFactor: FixedValue=0; Units=/day
          Memo Description
            This is the default value for PMF.
        Constant NRetranslocationFactor: FixedValue=0; Units=/day
          Memo Description
            This is the default value for PMF.
        Constant NReallocationFactor: FixedValue=0; Units=/day
          Memo Description
            This is the default value for PMF.
        LinearInterpolationFunction KLModifier: XProperty=[Root].LengthDensity
          XYPairs: X=[0, 1]; Y=[1, 1]
        LinearInterpolationFunction KNH4: XProperty=[Root].LengthDensity
          XYPairs: X=[0, 0.003]; Y=[0.01, 0.02]
        LinearInterpolationFunction KNO3: XProperty=[Root].LengthDensity
          XYPairs: X=[0, 0.003]; Y=[0.02, 0.03]
        Constant MaxDailyNUptake: FixedValue=10; Units=kgN/ha
          Memo Description
            This represent the upper limit for N uptake, its value should be affected by soil type (capacity for supply, or transport) as well as plant type (capacity to explore the soil volume).  The value used is based on general knowledge from other models.
                    Note that atual uptake is regulated by soil water content and may be due to root density, so the value here is just the uppr limit.
        LinearInterpolationFunction NUptakeSWFactor: XProperty=[Root].RWC
          Memo Description
            This is used to down-regulate N uptake when there is water limitations in the soil, it accounts for the fact that transport of nutrient is reduced when soil moisture is low.
          XYPairs: X=[0, 0.5, 1]; Y=[0, 1, 1]
        BiomassRemoval BiomassRemovalDefaults
          OrganBiomassRemovalType Cut: FractionLiveToRemove=0; FractionDeadToRemove=0; FractionLiveToResidue=0.05; FractionDeadToResidue=0
          OrganBiomassRemovalType Graze: FractionLiveToRemove=0; FractionDeadToRemove=0; FractionLiveToResidue=0.05; FractionDeadToResidue=0
          OrganBiomassRemovalType Harvest: FractionLiveToRemove=0; FractionDeadToRemove=0; FractionLiveToResidue=0.05; FractionDeadToResidue=0
          OrganBiomassRemovalType Prune: FractionLiveToRemove=0; FractionDeadToRemove=0; FractionLiveToResidue=0.05; FractionDeadToResidue=0
        Constant CarbonConcentration: FixedValue=0.4
      CompositeBiomass AboveGround: DMDOfStructural=0.6
        Propertys=[[Leaf].Live, [Leaf].Dead, [Stem].Live, [Stem].Dead, [Inflorescence].Live, [Inflorescence].Dead]
        Memo Description
          This contains the sum of all biomass (live and dead) of Leaf, Stem and Inflorescence.
      CompositeBiomass AboveGroundLive: DMDOfStructural=0.6; Propertys=[[Leaf].Live, [Stem].Live, [Inflorescence].Live]
        Memo Description
          This contains the sum of live biomass of Leaf, Stem and Inflorescence.
      CompositeBiomass BelowGround: DMDOfStructural=0.6; Propertys=[[Root].Live, [Root].Dead, [Taproot].Live, [Taproot].Dead]
        Memo Description
          This contains the sum of all biomass (live and dead) of Taproot and Root.
      CompositeBiomass BelowGroundLive: DMDOfStructural=0.6; Propertys=[[Root].Live, [Taproot].Live]
        Memo Description
          This contains the sum of live biomass of Taproot and Root.
      CompositeBiomass Total: DMDOfStructural=0.6
        Propertys=[[Leaf].Live, [Leaf].Dead, [Stem].Live, [Stem].Dead, [Inflorescence].Live, [Inflorescence].Dead, [Root].Live, [Root].Dead, [Taproot].Live, [Taproot].Dead]
        Memo Description
          This contains the sum of all plant biomass, live and dead of Leaf, Stem, Inflorescence,Taproot, and Root.
      DivideFunction PerPlantBelowGroundWt
        Memo Description
          This represents the live biomass dry weight below ground for a specific plant (in g/plant)
        VariableReference BelowGroundWt: VariableName=[BelowGroundLive].Wt
        VariableReference Population: VariableName=[Chicory].Population
      PhaseLookup ShootRootRatio
        PhaseLookupValue AllPhases: Start=Emergence; End=Ripening
          DivideFunction CurrentSR
            VariableReference AbogeGroundDM: VariableName=[AboveGroundLive].StructuralWt
            VariableReference BelowGroundDM: VariableName=[BelowGroundLive].StructuralWt
      PhaseLookup TargetShootRootRatio
        Memo Description
          The target shoot:root ratio is used by the chicory model to ensure prompt regrowth after a defoliation event.   The model will change the allocation of new growth attempting to keep a balance in organ biomass distribution. This is a simplified approach to biomass allocation plasticity (e.g. [Wilson_1988]; [LevangBrilz_2002]), it assumes that the plant adjusts the allocation biomass whenever the current shoot:root ratio differs from the target value.
                Estimated values for the shoot:root ratio of chicory based on published data vary considerably and are linked to cultivar (e.g. [LiEtAl_1997a]; [ZagalEtAl_2001]; [BeleskyEtAl_2004]).  Varieties bred for root harvesting can have shoot:root ratios al low as 1.0 whereas for leaf cultivars the values may be up to around 5.0.  Data for forage chicory suggest values around 2.0 for adult plants ([LiEtAl_1997a]; [LabreveuxThesis_2002]; [AlloushEtAl_2003]; [CranstonEtAl_2015]).  This value is likely to be affected by environmental conditions, with water or nutrient deficit causing a shift towards root growth, while leaf growth is favoured during low light conditions.  However, these relationships can vary considerably in different plants or cultivars and little data is available for forage chicory.  The model currently does not account fort the influence of environmental factors on the shoot:root partition, but it does account for vernalisation.
                Stem elongation, or bolting, only occurs when chicory is vernalised and it has been shown happen in only a fraction of the plants in a sward each year ([ClaphamEtAl_2001]; [SandersonEtAl_2003]; [DielenEtAl_2005]).  This variation seems to be linked to the extent of vernalisation ([Gianquinto_1997]; [DielenEtAl_2005]).  Thus, to account for the growth of both bolting and non-bolting plants, the chicory model assumes that the changes in biomass allocation are a function of vernalisation as well as phenological phase.
        PhaseLookupValue Vegetative: Start=Emergence; End=Vernalised
          Constant TargetSR: FixedValue=1.5; Units=g/g
        PhaseLookupValue InductiveElongation: Start=Vernalised; End=Flowering
          AddFunction TargetSR
            VariableReference MinTargetSR: VariableName=[TargetShootRootRatio].Vegetative.TargetSR.Value()
            MultiplyFunction DeltaTarget
              SubtractFunction MaximumIncrease
                Constant MaxTargetSR: FixedValue=4; Units=g/g
                VariableReference MinTargetSR: VariableName=[TargetShootRootRatio].Vegetative.TargetSR.Value()
              LinearInterpolationFunction VernalisationEffect: XProperty=[Phenology].Vernalisation.DaysVernalised
                XYPairs: X=[9.9, 10, 20, 30, 40, 50, 60, 70, 80, 90, 100]; Y=[0, 0.05, 0.1, 0.18, 0.3, 0.45, 0.6, 0.8, 0.95, 1, 1]
              LinearInterpolationFunction StageEffect: XProperty=[Phenology].Stage
                XYPairs: X=[4, 4.1, 4.25, 4.5, 4.7, 5, 6]; Y=[0.01, 0.35, 0.65, 0.91, 0.98, 1, 1]
        PhaseLookupValue Reproductive: Start=Flowering; End=Ripening
          AddFunction TargetSR
            VariableReference MinTargetSR: VariableName=[TargetShootRootRatio].Vegetative.TargetSR.Value()
            MultiplyFunction PlusTarget
              SubtractFunction DeltaTarget
                VariableReference MaxTargetSR: VariableName=[TargetShootRootRatio].InductiveElongation.TargetSR.Value()
                VariableReference MinTargetSR: VariableName=[TargetShootRootRatio].Vegetative.TargetSR.Value()
              LinearInterpolationFunction StageEffect: XProperty=[Phenology].Stage
                XYPairs: X=[6, 6.25, 6.4, 6.6, 6.8, 6.9, 7]; Y=[1, 1, 0.95, 0.75, 0.25, 0.05, 0]
      PhaseLookup StemsLeafRatio
        PhaseLookupValue AllPhasesWithStems: Start=Bolting; End=Ripening
          DivideFunction CurrentSL
            AddFunction StemFlowerDM
              VariableReference StemDM: VariableName=[Stem].Live.Wt
              VariableReference InflorescenceDM: VariableName=[Inflorescence].Live.Wt
            VariableReference LeafDM: VariableName=[Leaf].Live.Wt
      PhaseLookup TargetStemsLeafRatio
        Memo Description
          The chicory model will change the allocation of biomass above ground attempting to keep a given proportion among the various organs.  The allocation of biomass to leaves is defined primarily by the target shoo:root ratio, but during the stem elongation and reproductive phases, the partition is modified favouring stems and inflorescence.  This is controlled by the target ratio of stems+inflorescence to leaves. This ratio may be affected by defoliation ([ClarkEtAl_1990a]; [LiEtAl_1994]; [QuijadaThesis_2015]) and is probably affected by enviromental factors too. There is not enough data to describe these interactions.
                The allocation of biomass to stems is difficult to inferr because there are many confounding issues, such as growth stage, vernalisation level, graze intensity, etc.  Under lax grazing conditions and after some vernalisation, stem fraction is about 25-50%, but can be as high as 70%, values around 15-25% are reported for intensive grazing ([ClarkEtAl_1990b]; [LiEtAl_1994]; [JungEtAl_1996]; [LiEtAl_1997a]; [LiEtAl_1997c]).  The Stem:leaf ratio is thus between 0.25 and 1.0 for grazed plants.
                Bolting only occur in a fraction of plant each year, around 50% ([ClaphamEtAl_2001]; [SandersonEtAl_2003]; [DielenEtAl_2005]). So, as a compromise, it assumed in the chicory model that the stem:leaf ratio increases sharply at the beginning of the stem elongation phase, reaching a maximum value and then is constant until near the end of flowering when if decreases again.  This maximum should be not too high to account for non bolting plants.
        PhaseLookupValue AllPhasesWithStems: Start=Bolting; End=Ripening
          MultiplyFunction TargetSL
            Constant MaximumSL: FixedValue=1; Units=g/g
            VariableReference VernalisationEffect
              VariableName=[TargetShootRootRatio].InductiveElongation.TargetSR.DeltaTarget.VernalisationEffect.Value()
            LinearInterpolationFunction StageEffect: XProperty=[Phenology].Stage
              XYPairs: X=[5, 5.1, 5.25, 5.4, 5.5, 6.5, 6.75, 7]; Y=[0.1, 0.45, 0.8, 0.97, 1, 1, 0.9, 0.5]
      PhaseLookup FlowerStemRatio
        PhaseLookupValue Reproductive: Start=Flowering; End=Ripening
          DivideFunction CurrentFS
            VariableReference InflorescenceDM: VariableName=[Inflorescence].Live.Wt
            VariableReference StemDM: VariableName=[Stem].Live.Wt
      PhaseLookup TargetFlowerStemRatio
        Memo Description
          The allocation of biomass during the reproductive phase will attempt to keep a ratio between stem and inflorescence biomass.  This ratio is difficult to define as there is little data available and because of the flowering behaviour of chicory (plants can have ripe seeds as well as young flower buds at the same time).  Inference from published values suggest that the ratio of flower biomass to stems should be around 0.1 ([HareEtAl_1990]; [ClarkEtAl_1990a]; [JungEtAl_1996]; [ClaphamEtAl_2001]).
        PhaseLookupValue Reproductive: Start=Flowering; End=Ripening
          MultiplyFunction TargetSL
            Constant MaximumFS: FixedValue=0.1; Units=g/g
            LinearInterpolationFunction StageEffect: XProperty=[Phenology].Stage
              XYPairs: X=[6, 6.1, 6.25, 6.4, 6.5, 7]; Y=[0.05, 0.4, 0.75, 0.96, 1, 1]
      PhaseLookup TaprootRootRatio
        PhaseLookupValue AllPhases: Start=Emergence; End=Ripening
          DivideFunction CurrentTR
            VariableReference TaprootDM: VariableName=[Taproot].Live.Wt
            VariableReference RootsDM: VariableName=[Root].Live.Wt
      PhaseLookup TargetTaprootRootRatio
        Memo Description
          The chicory model assumes that biomass is allocated to the various organs in a manner to mantain a given proportion each each organ (this can vary with phenological phase and other factors).  The ratio between taproot and root biomass is assumed to increase as the biomass below ground per plant increases, but it approaches a maximum target asymptotically.  This is a simple approach and can describe the general behaviour of chicory plants, it may be upgraded if deemed necessary when more data becomes available.
        PhaseLookupValue AllPhases: Start=Emergence; End=Ripening
          MultiplyFunction TargetTR
            Constant MaximumTR: FixedValue=2; Units=g/g
            LinearInterpolationFunction BiomassFactor: XProperty=[PerPlantBelowGroundWt].Value()
              XYPairs: X=[0, 0.05, 0.5, 1, 1.5, 2, 2.5]; Y=[1E-05, 1E-05, 0.4, 0.74, 0.93, 1, 1]
      CultivarFolder Cultivars
        Cultivar Puna
          Memo Description
            *Puna* is the basic forage chicory cultivar. It represents one of the first chicory cultivars selected for seed production and it has been used for forage grazing, in monoculture or in mixed swards, in several countries worldwide.
        Cultivar Choice
          Command:
            [Leaf].Photosynthesis.FT.XYPairs.X = 4, 10, 15, 20, 26, 34
            [Leaf].Photosynthesis.FT.XYPairs.Y = 0.0, 0.1, 0.4, 1.0, 1.0, 0.0
          Memo Description
            *Choice* is forage chicory cultivar derived from *Puna*, to which it is very similar.  It has advertised as a winter active forage and is commonly used in monoculture swards.
    Plant Maize: CropType=Maize
      OrganArbitrator Arbitrator
        RelativeAllocation NArbitrator
        RelativeAllocation DMArbitrator
      Phenology
        MultiplyFunction ThermalTime
          AirTemperatureFunction BaseThermalTime
            XYPairs: X=[0, 18, 26, 34, 44]; Y=[0, 10, 18, 26, 0]
        GerminatingPhase Germinating: Start=Sowing; End=Germination
        EmergingPhase Emerging: ShootLag=55; ShootRate=0.6; Start=Germination; End=Emergence; TTForTimeStep=0
          VariableReference ThermalTime: VariableName=[Phenology].ThermalTime.Value()
        GenericPhase Juvenile: Start=Emergence; End=EndJuvenile
          Constant Target: FixedValue=200; Units=deg day
          VariableReference Progression: VariableName=[Phenology].ThermalTime.Value()
        GenericPhase Photosensitive: Start=EndJuvenile; End=FloralInitiation
          VariableReference Progression: VariableName=[Phenology].ThermalTime.Value()
          LinearInterpolationFunction Target: XProperty=[Phenology].Photoperiod.Value()
            Memo
              The photoperiod is likely to vary with individual maize cultivars.  Therefore, the response shown here is indicative only.  See the descriptions of individual cultivars for more detail on photoperiod responses used by the maize model.
            XYPairs: X=[0, 12.5, 24]; Y=[0, 0, 10]
        LeafAppearancePhase LeafAppearance: Start=FloralInitiation; End=FlagLeaf
          VariableReference ThermalTime: VariableName=[Phenology].ThermalTime.Value()
        GenericPhase FlagLeafToFlowering: Start=FlagLeaf; End=Flowering
          Constant Target: FixedValue=50; Units=deg day
          VariableReference Progression: VariableName=[Phenology].ThermalTime.Value()
        GenericPhase FloweringToGrainFilling: Start=Flowering; End=StartGrainFill
          Constant Target: FixedValue=120; Units=deg day
          VariableReference Progression: VariableName=[Phenology].ThermalTime.Value()
        GenericPhase GrainFilling: Start=StartGrainFill; End=EndGrainFill
          Constant Target: FixedValue=550; Units=deg day
          VariableReference Progression: VariableName=[Phenology].ThermalTime.Value()
        GenericPhase Maturing: Start=EndGrainFill; End=Maturity
          Constant Target: FixedValue=10; Units=deg day
          VariableReference Progression: VariableName=[Phenology].ThermalTime.Value()
        GenericPhase MaturityToHarvestRipe: Start=Maturity; End=HarvestRipe
          Constant Target: FixedValue=10; Units=deg day
          VariableReference Progression: VariableName=[Phenology].ThermalTime.Value()
        EndPhase ReadyForHarvesting: Start=HarvestRipe; End=Unused
          VariableReference ThermalTime: VariableName=[Phenology].ThermalTime.Value()
        PhotoperiodFunction Photoperiod: Twilight=-6; DayLength=0
        OnEventFunction FloweringDAS: SetEvent=Flowering; ReSetEvent=never
          Memo
            A function is used to provide flowering date as days after sowing(DAS).
          Constant PreEventValue: FixedValue=0
          VariableReference PostEventValue: VariableName=[Phenology].DaysAfterSowing
        OnEventFunction MaturityDAS: SetEvent=Maturity; ReSetEvent=never
          Memo
            A function is used to provide maturity date as days after sowing(DAS).
          Constant PreEventValue: FixedValue=0
          VariableReference PostEventValue: VariableName=[Phenology].DaysAfterSowing
        BBCH
      Structure: CohortInitialisationStage=Germination; LeafInitialisationStage=Emergence
        Memo
          Though tillering is common in some maize varieties under certain agronomic conditions, no tillering is accounted for within this model.  Therefore all branching has been parameterised out of the current maize model.
        Constant StemSenescenceAge: FixedValue=0
        VariableReference ThermalTime: VariableName=[Phenology].ThermalTime.Value()
        PhaseLookup Phyllochron
          PhaseLookupValue Phyllochron: Start=Emergence; End=FlagLeaf
            LinearInterpolationFunction Phyllochron: XProperty=[Structure].LeafTipsAppeared
              XYPairs: X=[1, 3.4, 4]; Y=[30, 30, 42]
        HeightFunction HeightModel
          LinearInterpolationFunction PotentialHeight: XProperty=[Phenology].Stage
            XYPairs: X=[3, 4, 5, 6]; Y=[20, 400, 450, 1700]
          LinearInterpolationFunction WaterStress: XProperty=[Maize].Leaf.Fw
            XYPairs: X=[0, 0.6]; Y=[0, 1]
        Constant BranchingRate: FixedValue=0
        AddFunction BranchMortality
          Constant ShadeInducedBranchMortality: FixedValue=0
          Constant DroughtInducedBranchMortality: FixedValue=0
        Constant zFinalLeafNumber: FixedValue=15
        HoldFunction FinalLeafNumber: WhenToHold=FloralInitiation
          AddFunction ValueToHold
            Constant PrimordiaAtEmergence: FixedValue=6
            DivideFunction PrimordiaDuringJuvenilePhase
              AddFunction
                VariableReference JuvenilePhaseDuration: VariableName=[Phenology].Juvenile.Target.Value()
                VariableReference PhotoSensitivePhaseDuration: VariableName=[Phenology].Photosensitive.Target.Value()
              PhaseLookup MeanPlastochron
                PhaseLookupValue PreEmerg: Start=Germination; End=Emergence
                  Constant: FixedValue=15
                PhaseLookupValue PostEmerg: Start=Emergence; End=FlagLeaf
                  DivideFunction MeanPlastochron
                    AccumulateFunction AccumulatedPlastochron: StartStageName=Emergence; EndStageName=FloralInitiation; FractionRemovedOnCut=0; FractionRemovedOnHarvest=0; FractionRemovedOnGraze=0; FractionRemovedOnPrune=0
                      MultiplyFunction Plastochron
                        VariableReference Phyllochron: VariableName=[Structure].Phyllochron.Value()
                        Constant LeafTipsPerPrimordia: FixedValue=0.5
                    AccumulateFunction Days: StartStageName=Emergence; EndStageName=FloralInitiation; FractionRemovedOnCut=0; FractionRemovedOnHarvest=0; FractionRemovedOnGraze=0; FractionRemovedOnPrune=0
                      Constant: FixedValue=1
      ReproductiveOrgan Grain: GrowthRespiration=0; MaintenanceRespiration=0
        Constant DMConversionEfficiency: FixedValue=1
        Constant RemobilisationCost: FixedValue=0
        Constant InitialGrainProportion: FixedValue=0.05
        Constant MaximumPotentialGrainSize: FixedValue=0.3; Units=g
        Constant MaximumGrainsPerCob: FixedValue=700; Units=number
        PhaseLookup DMDemandFunction
          PhaseLookupValue InitialPhase: Start=Flowering; End=StartGrainFill
            FillingRateFunction
              VariableReference NumberFunction: VariableName=[Grain].NumberFunction.Value()
              VariableReference FillingDuration: VariableName=[Phenology].FloweringToGrainFilling.Target.Value()
              VariableReference ThermalTime: VariableName=[Phenology].ThermalTime.Value()
              MultiplyFunction PotentialSizeIncrement
                VariableReference InitialProportion: VariableName=[Grain].InitialGrainProportion.Value()
                VariableReference MaximumSize: VariableName=[Grain].MaximumPotentialGrainSize.Value()
          PhaseLookupValue LinearPhase: Start=StartGrainFill; End=EndGrainFill
            FillingRateFunction
              VariableReference NumberFunction: VariableName=[Grain].NumberFunction.Value()
              VariableReference FillingDuration: VariableName=[Phenology].GrainFilling.Target.Value()
              VariableReference ThermalTime: VariableName=[Phenology].ThermalTime.Value()
              MultiplyFunction PotentialSizeIncrement
                SubtractFunction ProportionLinearPhase
                  Constant One: FixedValue=1
                  VariableReference InitialProportion: VariableName=[Grain].InitialGrainProportion.Value()
                VariableReference MaximumSize: VariableName=[Grain].MaximumPotentialGrainSize.Value()
        Constant MinimumNConc: FixedValue=0.008; Units=g/g
        PhaseLookup MaximumNConc
          PhaseLookupValue InitialPhase: Start=Flowering; End=StartGrainFill
            Constant InitialNconc: FixedValue=0.05
          PhaseLookupValue LinearPhase: Start=StartGrainFill; End=EndGrainFill
            Constant FinalNconc: FixedValue=0.013
        Constant WaterContent: FixedValue=0.12; Units=g/g
        PhaseLookup NFillingRate
          PhaseLookupValue GrainFilling: Start=Flowering; End=EndGrainFill
            FillingRateFunction
              VariableReference NumberFunction: VariableName=[Grain].NumberFunction.Value()
              AddFunction FillingDuration
                VariableReference FloweringToGrainFilling: VariableName=[Phenology].FloweringToGrainFilling.Target.Value()
                VariableReference GrainFilling: VariableName=[Phenology].GrainFilling.Target.Value()
              VariableReference ThermalTime: VariableName=[Phenology].ThermalTime.Value()
              MultiplyFunction PotentialSizeIncrement
                VariableReference MaximumFinalNConc: VariableName=[Grain].MaximumNConc.LinearPhase.FinalNconc.Value()
                VariableReference MaximumSize: VariableName=[Grain].MaximumPotentialGrainSize.Value()
        MultiplyFunction NumberFunction
          VariableReference PotentialGrainNumber: VariableName=[MaximumGrainsPerCob].Value()
          LinearInterpolationFunction GrowthRateFactor: XProperty=[GrowthRateGrainDevelopment].Value()
            XYPairs: X=[0.55, 3.3, 6.6, 10]; Y=[0, 0.6, 1, 1]
          VariableReference Population: VariableName=[Maize].Population
        ExpressionFunction YieldBuPerAcre: Expression=[Grain].Live.Wt * 10 * 56 * 0.4536 * 2.471
        AccumulateFunction GrowthGrainDevelopment: StartStageName=FlagLeaf; EndStageName=StartGrainFill; FractionRemovedOnCut=0; FractionRemovedOnHarvest=0; FractionRemovedOnGraze=0; FractionRemovedOnPrune=0
          VariableReference DailyBiomassProduction: VariableName=[Arbitrator].DM.TotalFixationSupply
        AccumulateFunction DaysGrainDevelopment: StartStageName=FlagLeaf; EndStageName=StartGrainFill; FractionRemovedOnCut=0; FractionRemovedOnHarvest=0; FractionRemovedOnGraze=0; FractionRemovedOnPrune=0
          Constant LenthOfADay: FixedValue=1; Units=days/day
        DivideFunction GrowthRateGrainDevelopment
          VariableReference AccumulatedGrowth: VariableName=[GrowthGrainDevelopment].Value()
          VariableReference GrowthDuration: VariableName=[DaysGrainDevelopment].Value()
          VariableReference Population: VariableName=[Maize].Population
        BiomassRemoval BiomassRemovalDefaults
          OrganBiomassRemovalType Harvest: FractionLiveToRemove=1; FractionDeadToRemove=0; FractionLiveToResidue=0; FractionDeadToResidue=0
          OrganBiomassRemovalType Cut: FractionLiveToRemove=1; FractionDeadToRemove=0; FractionLiveToResidue=0; FractionDeadToResidue=0
          OrganBiomassRemovalType Prune: FractionLiveToRemove=0; FractionDeadToRemove=0; FractionLiveToResidue=0.8; FractionDeadToResidue=0
          OrganBiomassRemovalType Graze: FractionLiveToRemove=0.6; FractionDeadToRemove=0; FractionLiveToResidue=0.2; FractionDeadToResidue=0
        Constant CarbonConcentration: FixedValue=0.4
        Live Biomass: DMDOfStructural=0.6
        Dead Biomass: DMDOfStructural=0.6
      Root: GrowthRespiration=0; MaintenanceRespiration=0
        LinearInterpolationFunction KLModifier: XProperty=[Maize].Population
          Memo
            The parameter KL is is described by Meinke et al (1993) to combine elements of soil conductivity (K) with root length (L) in determining root water uptake.  Peake et al (2013) demonstrated that in maize KL varied with plant population through impacts on root length density.  Here we adjust KL linearly with plant population.
          XYPairs: X=[0, 10]; Y=[1, 1]
        Constant DMConversionEfficiency: FixedValue=1
        Constant RemobilisationCost: FixedValue=0
        Constant SoilWaterEffect: FixedValue=1
          Memo
            No effect of soil water content on root growth is currently captured in the model.
        Constant MaxDailyNUptake: FixedValue=20; Units=g/m2/d
          Memo
            Maximum daily N uptake is set to an arbitrarily high value.
        Constant SenescenceRate: FixedValue=0.005; Units=/d
          Memo
            Jones and Kiniry (1986) used a constant root senescence fraction in the CERES-Maize model.
        Constant StructuralFraction: FixedValue=1
        Constant MaximumRootDepth: FixedValue=1000000
        Constant MaximumNConc: FixedValue=0.01; Units=g/g
        Constant MinimumNConc: FixedValue=0.01; Units=g/g
        PartitionFractionDemandFunction DMDemandFunction
          LinearInterpolationFunction PartitionFraction: XProperty=[Phenology].Stage
            XYPairs: X=[0, 2.99, 3, 6, 7]; Y=[0, 0, 0.2, 0.2, 0]
        MultiplyFunction RootFrontVelocity
          PhaseLookup PotentialRootFrontVelocity
            Memo
              [Hammer_etal_2009] used a constant extraction front velocity of 2.5cm per day in their analysis of historical maize yield trends in the US corn belt.
            PhaseLookupValue PreFlowering: Start=Germination; End=Flowering
              Constant RootFrontVelocity: FixedValue=25; Units=mm/d
            PhaseLookupValue PostFlowering: Start=Flowering; End=Maturity
              Constant RootFrontVelocity: FixedValue=0; Units=mm/d
          WeightedTemperatureFunction TemperatureFactor: MaximumTemperatureWeighting=0.5
            XYPairs: X=[0, 8, 15, 35, 50]; Y=[0, 0, 1, 1, 0]
          LinearInterpolationFunction WaterFactor: XProperty=[SoilWaterScale]
            SoilWaterScale
            XYPairs: X=[0, 0.25, 1]; Y=[0, 1, 1]
        PhaseBasedSwitch NitrogenDemandSwitch: Start=Germination; End=Maturity
        BiomassRemoval BiomassRemovalDefaults
          OrganBiomassRemovalType Harvest: FractionLiveToRemove=0; FractionDeadToRemove=0; FractionLiveToResidue=0.2; FractionDeadToResidue=0
          OrganBiomassRemovalType Cut: FractionLiveToRemove=0; FractionDeadToRemove=0; FractionLiveToResidue=0.3; FractionDeadToResidue=0
          OrganBiomassRemovalType Prune: FractionLiveToRemove=0; FractionDeadToRemove=0; FractionLiveToResidue=0.1; FractionDeadToResidue=0
          OrganBiomassRemovalType Graze: FractionLiveToRemove=0; FractionDeadToRemove=0; FractionLiveToResidue=0.15; FractionDeadToResidue=0
        Constant InitialDM: FixedValue=0.2; Units=g/plant
        Constant SpecificRootLength: FixedValue=40; Units=m/g
        Constant KNO3: FixedValue=0.03
        Constant KNH4: FixedValue=0.02
        LinearInterpolationFunction NUptakeSWFactor: XProperty=[Root].RWC
          XYPairs: X=[0, 1]; Y=[0, 1]
        Constant MaintenanceRespirationFunction: FixedValue=0
        Constant CarbonConcentration: FixedValue=0.4
      Leaf: MaxCover=1; Albedo=0.18; Gsmax=0.009; R50=160; MicroClimatePresent=true; KDead=0.03; MaximumMainStemLeafNumber=30
        zero: CurrentExpandingLeaf, StartFractionExpanded, FractionNextleafExpanded, DeadNodesYesterday, GrowthRespiration, FRGR, PotentialEP, TipsAtEmergence, CohortsAtInitialisation, FractionDied
        LeafCohort InitialLeaves[1]: Rank=1; Area=380
          zero: NReallocationFactor, DMReallocationFactor, NRetranslocationFactor, DMRetranslocationFactor, ShadeInducedSenRate, SenescedFrac, DeltaPotentialArea, DeltaStressConstrainedArea, DeltaCarbonConstrainedArea, PotentialStructuralDMAllocation, PotentialMetabolicDMAllocation, MetabolicNReallocated, MetabolicWtReallocated, StorageNReallocated, StorageWtReallocated, MetabolicNRetranslocated, StorageNRetrasnlocated, DMRetranslocated, MetabolicNAllocation, StructuralDMAllocation, MetabolicDMAllocation, MaintenanceRespiration
        LeafCohort InitialLeaves[2]: Rank=2
          zero: NReallocationFactor, DMReallocationFactor, NRetranslocationFactor, DMRetranslocationFactor, ShadeInducedSenRate, SenescedFrac, DeltaPotentialArea, DeltaStressConstrainedArea, DeltaCarbonConstrainedArea, PotentialStructuralDMAllocation, PotentialMetabolicDMAllocation, MetabolicNReallocated, MetabolicWtReallocated, StorageNReallocated, StorageWtReallocated, MetabolicNRetranslocated, StorageNRetrasnlocated, DMRetranslocated, MetabolicNAllocation, StructuralDMAllocation, MetabolicDMAllocation, Area, MaintenanceRespiration
        ArrayBiomass CohortArrayLive: Propertys=[[Leaf].Live]; ArraySize=[Leaf].MaxNodeNo
        ArrayBiomass CohortArrayDead: Propertys=[[Leaf].Dead]; ArraySize=[Leaf].MaxNodeNo
        LeafCohortParameters CohortParameters: ExpansionStressValue=0
          Constant DMReallocationFactor: FixedValue=1
          Constant RemobilisationCost: FixedValue=0
          Constant LeafSizeShapeParameter: FixedValue=0.01
          Constant MaintenanceRespirationFunction: FixedValue=0
          Constant SenessingLeafRelativeSize: FixedValue=1; Units=0-1
          BellCurveFunction MaxArea
            Memo
              Potential leaf area is calculated from leaf number using the approach of Keating and Wafula (1992).
              Individual leaf size is described using a bell-shaped curve, the parameters of which are derived from final leaf number.
            MultiplyFunction LargestLeafPosition
              VariableReference FinalLeafNumber: VariableName=[Structure].FinalLeafNumber.Value()
              Constant RelativePositionOfLargestLeaf: FixedValue=0.67
            LinearInterpolationFunction AreaMax: XProperty=[Structure].FinalLeafNumber.Value()
              XYPairs: X=[0, 2, 7, 12, 17, 22]; Y=[32530, 39259, 49659, 60000, 75000, 90000]
            LinearInterpolationFunction Breadth: XProperty=[Structure].FinalLeafNumber.Value()
              XYPairs: X=[5, 10, 15, 20, 25]; Y=[-0.377, -0.144, -0.059, -0.027, -0.016]
            Constant Skewness: FixedValue=0.00025
          Constant NReallocationFactor: FixedValue=1
          Constant NRetranslocationFactor: FixedValue=0
          Constant DMRetranslocationFactor: FixedValue=0.5
          LinearInterpolationFunction CellDivisionStress: XProperty=[Maize].Leaf.Fw
            XYPairs: X=[0.9, 1]; Y=[1, 1]
          MinimumFunction ExpansionStress
            LinearInterpolationFunction WaterStressEffect: XProperty=[Root].WaterTensionFactor
              XYPairs: X=[0, 0.9, 1.3]; Y=[0, 1, 1]
            LinearInterpolationFunction TemperatureEffect: XProperty=[IWeather].MeanT
              XYPairs: X=[0, 12, 14]; Y=[0, 1, 1]
            LinearInterpolationFunction NitrogenStressEffect: XProperty=[Maize].Leaf.Fn
              XYPairs: X=[0, 0.5, 1]; Y=[0.1, 0.1, 1]
          LinearInterpolationFunction GrowthDuration: XProperty=[Structure].RelativeNodeApperance
            XYPairs: X=[0, 0.3, 0.5, 1]; Y=[1, 200, 250, 100]
          LinearInterpolationFunction LagDuration: XProperty=[Structure].RelativeNodeApperance
            XYPairs: X=[0, 0.5, 0.7, 0.8, 1]; Y=[300, 300, 700, 900, 1300]
          LinearInterpolationFunction SenescenceDuration: XProperty=[Structure].RelativeNodeApperance
            XYPairs: X=[0, 0.3, 0.5]; Y=[150, 150, 350]
          Constant DetachmentLagDuration: FixedValue=1000000
          Constant DetachmentDuration: FixedValue=1000000
          AddFunction MaximumNConc
            VariableReference CriticalNConc: VariableName=[Leaf].CohortParameters.CriticalNConc.Value()
            MultiplyFunction StorageNConc
              LinearInterpolationFunction NonStructuralNConc: XProperty=[Structure].LeafTipsAppeared
                XYPairs: X=[1, 10]; Y=[0.034, 0.01]
              LinearInterpolationFunction WaterStressEffect: XProperty=[Root].WaterTensionFactor
                XYPairs: X=[0.5, 0.95, 1]; Y=[0, 0, 1]
          Constant CriticalNConc: FixedValue=0.01; Units=g/g
          Constant MinimumNConc: FixedValue=0.005; Units=g/g
          AddFunction DroughtInducedLagAcceleration
            Constant One: FixedValue=1
            MultiplyFunction Stress
              Constant StressResponseCoefficient: FixedValue=2
              LinearInterpolationFunction StressFactor: XProperty=[Maize].Leaf.Fw
                XYPairs: X=[0.5, 1]; Y=[1, 0]
          AddFunction DroughtInducedSenAcceleration
            Constant One: FixedValue=1
            MultiplyFunction Stress
              Constant StressResponseCoefficient: FixedValue=0
              LinearInterpolationFunction StressFactor: XProperty=[Root].WaterTensionFactor
                XYPairs: X=[0, 1]; Y=[1, 0]
          LinearInterpolationFunction SpecificLeafAreaMax: XProperty=[Structure].LeafTipsAppeared
            XYPairs: X=[1, 9]; Y=[30000, 20000]
          LinearInterpolationFunction SpecificLeafAreaMin: XProperty=[Structure].LeafTipsAppeared
            XYPairs: X=[1, 9]; Y=[25000, 15000]
          Constant StructuralFraction: FixedValue=0.3
          Constant StorageFraction: FixedValue=0.1
          LinearInterpolationFunction ShadeInducedSenescenceRate: XProperty=[Leaf].CohortCurrentRankCoverAbove
            XYPairs: X=[0, 0.7, 0.8, 0.96, 0.99]; Y=[0, 0, 0, 0, 0]
          Constant InitialNConc: FixedValue=0; Units=g/g
          ArrayFunction LagDurationAgeMultiplier: Values=1 1 1
          ArrayFunction SenescenceDurationAgeMultiplier: Values=1 1 1
          ArrayFunction LeafSizeAgeMultiplier: Values=1 1 1 1 1 1 1 1 1 1 1 1
        RUEModel Photosynthesis
          Constant RUE: FixedValue=2
          WeightedTemperatureFunction FT: MaximumTemperatureWeighting=0.75
            XYPairs: X=[0, 8, 15, 35, 50]; Y=[0, 0, 1, 1, 0]
          LinearInterpolationFunction FVPD: XProperty=[Leaf].Photosynthesis.VPD
            XYPairs: X=[0, 10, 50]; Y=[1, 1, 1]
          LinearInterpolationFunction FN: XProperty=[Leaf].Fn
            XYPairs: X=[0, 1]; Y=[0.3, 1]
          LinearInterpolationFunction FW: XProperty=[Leaf].Fw
            XYPairs: X=[0, 0.3]; Y=[0, 1]
          RUECO2Function FCO2: PhotosyntheticPathway=C4
          VariableReference RadnInt: VariableName=[Leaf].RadIntTot
        MultiplyFunction ExtinctionCoeff
          Memo
            Extinction coefficient is specified in terms of a potential extinction coefficient which is then discounted during periods of water stress to account for the impact of leaf curling.
          LinearInterpolationFunction PotentialExtinctionCoeff: XProperty=[Maize].SowingData.RowSpacing
            XYPairs: X=[0.2, 0.5, 1]; Y=[0.7, 0.5, 0.4]
          LinearInterpolationFunction WaterStressImpact: XProperty=[Maize].Leaf.Fw
            XYPairs: X=[0, 0.7]; Y=[0.5, 1]
        LinearInterpolationFunction FrostFraction: XProperty=[Weather].MinT
          XYPairs: X=[-2, 2]; Y=[1, 0]
        VariableReference ThermalTime: VariableName=[Phenology].ThermalTime.Value()
        Constant RemobilisationCost: FixedValue=0
        MinimumFunction FRGRFunction
          VariableReference FT: VariableName=[Leaf].Photosynthesis.FT.Value()
          VariableReference FN: VariableName=[Leaf].Photosynthesis.FN.Value()
          VariableReference FVPD: VariableName=[Leaf].Photosynthesis.FVPD.Value()
        Constant StructuralFraction: FixedValue=0.7
        Constant DMConversionEfficiency: FixedValue=1; Units=0-1
        BiomassRemoval BiomassRemovalDefaults
          OrganBiomassRemovalType Harvest: FractionLiveToRemove=0; FractionDeadToRemove=0; FractionLiveToResidue=0.3; FractionDeadToResidue=0
          OrganBiomassRemovalType Cut: FractionLiveToRemove=0.8; FractionDeadToRemove=0; FractionLiveToResidue=0; FractionDeadToResidue=0
          OrganBiomassRemovalType Prune: FractionLiveToRemove=0; FractionDeadToRemove=0; FractionLiveToResidue=0.6; FractionDeadToResidue=0
          OrganBiomassRemovalType Graze: FractionLiveToRemove=0.6; FractionDeadToRemove=0; FractionLiveToResidue=0.1; FractionDeadToResidue=0
        Constant CarbonConcentration: FixedValue=0.4
      GenericOrgan Husk
        PopulationBasedDemandFunction DMDemandFunction
          VariableReference ThermalTime: VariableName=[Phenology].ThermalTime.Value()
          Constant StartStage: FixedValue=5.5
          Constant GrowthDuration: FixedValue=300
          Constant MaximumOrganWt: FixedValue=25
          VariableReference OrganPopulation: VariableName=[Rachis].CobNumber.Value()
          Constant SenescenceRate: FixedValue=0; Units=/d
          LinearInterpolationFunction ExpansionStress2: XProperty=[Maize].Leaf.Fw
            XYPairs: X=[0, 0.35]; Y=[0, 1]
          MinimumFunction ExpansionStress
            LinearInterpolationFunction WaterStressEffect: XProperty=[Root].WaterTensionFactor
              XYPairs: X=[0.1, 0.7, 1.3]; Y=[0, 1, 1]
            LinearInterpolationFunction TemperatureEffect: XProperty=[IWeather].MeanT
              XYPairs: X=[0, 12, 14]; Y=[0, 1, 1]
            LinearInterpolationFunction NitrogenStressEffect: XProperty=[Maize].Leaf.Fn
              XYPairs: X=[0, 0.5, 1]; Y=[0.1, 0.1, 1]
        Constant NReallocationFactor: FixedValue=0
        Constant RemobilisationCost: FixedValue=0
        Constant NRetranslocationFactor: FixedValue=0.1
        Constant MaximumNConc: FixedValue=0.007; Units=g/g
        PhaseLookup StructuralFraction
          PhaseLookupValue PreStemElongation: Start=Emergence; End=StartGrainFill
            Constant StemFraction: FixedValue=0.5
          PhaseLookupValue StemElongation: Start=StartGrainFill; End=HarvestRipe
            Constant StemFraction: FixedValue=1
        Constant SenescenceRate: FixedValue=0; Units=/d
        Constant MinimumNConc: FixedValue=0.005; Units=g/g
        Constant DMRetranslocationFactor: FixedValue=0.1
        BiomassRemoval BiomassRemovalDefaults
          OrganBiomassRemovalType Harvest: FractionLiveToRemove=0.5; FractionDeadToRemove=0; FractionLiveToResidue=0.1; FractionDeadToResidue=0
          OrganBiomassRemovalType Cut: FractionLiveToRemove=0.8; FractionDeadToRemove=0; FractionLiveToResidue=0; FractionDeadToResidue=0
          OrganBiomassRemovalType Prune: FractionLiveToRemove=0; FractionDeadToRemove=0; FractionLiveToResidue=0.6; FractionDeadToResidue=0
          OrganBiomassRemovalType Graze: FractionLiveToRemove=0.6; FractionDeadToRemove=0; FractionLiveToResidue=0.2; FractionDeadToResidue=0
        Constant InitialWtFunction: FixedValue=0; Units=g/m^2
        Constant DetachmentRateFunction: FixedValue=0; Units=/d
        Constant MaintenanceRespirationFunction: FixedValue=0; Units=0-1
        Constant DMConversionEfficiency: FixedValue=1; Units=0-1
        Constant DMReallocationFactor: FixedValue=0
        VariableReference CriticalNConc: VariableName=[Husk].MinimumNConc.Value()
        PhaseBasedSwitch NitrogenDemandSwitch: Start=Emergence; End=StartGrainFill
        Constant CarbonConcentration: FixedValue=0.4
      GenericOrgan Rachis
        MultiplyFunction CobNumber
          VariableReference StemNumber: VariableName=[Structure].TotalStemPopn
          Constant CobsPerStem: FixedValue=1.1
        DivideFunction CobSize
          VariableReference CobMass: VariableName=[Rachis].Live.Wt
          VariableReference CobNumber: VariableName=[Rachis].CobNumber.Value()
        PopulationBasedDemandFunction DMDemandFunction
          VariableReference ThermalTime: VariableName=[Phenology].ThermalTime.Value()
          Constant StartStage: FixedValue=5.5
          Constant GrowthDuration: FixedValue=300
          Constant MaximumOrganWt: FixedValue=23
          VariableReference OrganPopulation: VariableName=[Rachis].CobNumber.Value()
          MinimumFunction ExpansionStress: same as Replacements.Maize.Husk.DMDemandFunction.ExpansionStress
        Constant NReallocationFactor: FixedValue=0
        Constant RemobilisationCost: FixedValue=0
        Constant NRetranslocationFactor: FixedValue=0.1
        Constant MaximumNConc: FixedValue=0.008; Units=g/g
        Constant StructuralFraction: FixedValue=1; Units=g/g
        Constant SenescenceRate: FixedValue=0; Units=/d
        Constant MinimumNConc: FixedValue=0.003; Units=g/g
        LinearInterpolationFunction ExpansionStress: XProperty=[Maize].Leaf.Fw
          XYPairs: X=[0.1, 0.7]; Y=[0, 1]
        BiomassRemoval BiomassRemovalDefaults: same as Replacements.Maize.Husk.BiomassRemovalDefaults
        Constant InitialWtFunction: FixedValue=0; Units=g/m^2
        Constant DetachmentRateFunction: FixedValue=0; Units=/d
        Constant MaintenanceRespirationFunction: FixedValue=0; Units=0-1
        Constant DMConversionEfficiency: FixedValue=1; Units=0-1
        Constant DMReallocationFactor: FixedValue=0
        Constant DMRetranslocationFactor: FixedValue=0
        VariableReference CriticalNConc: VariableName=[Rachis].MinimumNConc.Value()
        PhaseBasedSwitch NitrogenDemandSwitch: Start=Emergence; End=StartGrainFill
        Constant CarbonConcentration: FixedValue=0.4
      GenericOrgan Stem
        PhaseLookup StructuralFraction: same as Replacements.Maize.Husk.StructuralFraction
        Constant RemobilisationCost: FixedValue=0
        LinearInterpolationFunction MaximumNConc: XProperty=[Structure].RelativeNodeApperance
          XYPairs: X=[0, 0.7, 1]; Y=[0.025, 0.025, 0.005]
        Constant MinimumNConc: FixedValue=0.004; Units=g/g
        PhaseBasedSwitch NitrogenDemandSwitch: Start=Emergence; End=StartGrainFill
        Constant NReallocationFactor: FixedValue=0
        PhaseLookup NRetranslocationFactor
          PhaseLookupValue PreStemElongation: Start=Emergence; End=FlagLeaf
            Constant StemFraction: FixedValue=0
          PhaseLookupValue StemElongation: Start=FlagLeaf; End=HarvestRipe
            Constant NRetranslocationFactor: FixedValue=0.05
        Constant DMRetranslocationFactor: FixedValue=0.1
        PartitionFractionDemandFunction DMDemandFunction
          LinearInterpolationFunction PartitionFraction: XProperty=[Phenology].Stage
            XYPairs: X=[3, 5, 6, 7, 7.0001]; Y=[0.1, 0.1, 1, 1, 0]
        BiomassRemoval BiomassRemovalDefaults: same as Replacements.Maize.Husk.BiomassRemovalDefaults
        Constant InitialWtFunction: FixedValue=0; Units=g/m^2
        Constant DetachmentRateFunction: FixedValue=0; Units=/d
        Constant SenescenceRate: FixedValue=0; Units=/d
        Constant MaintenanceRespirationFunction: FixedValue=0; Units=0-1
        Constant DMConversionEfficiency: FixedValue=1; Units=0-1
        Constant DMReallocationFactor: FixedValue=0
        AddFunction CriticalNConc
          VariableReference MinimumNConc: VariableName=[Stem].MinimumNConc.Value()
          MultiplyFunction MetabolicNConc
            SubtractFunction NonStructuralNConc
              VariableReference MaximumNConc: VariableName=[Stem].MaximumNConc.Value()
              VariableReference MinimumNConc: VariableName=[Stem].MinimumNConc.Value()
            Constant Proportion: FixedValue=0.2
        Constant CarbonConcentration: FixedValue=0.4
      CompositeBiomass AboveGround: DMDOfStructural=0.6
        Propertys=[[Leaf].Live, [Leaf].Dead, [Stem].Live, [Stem].Dead, [Husk].Live, [Husk].Dead, [Grain].Live, [Grain].Dead, [Rachis].Live, [Rachis].Dead]
        Memo
          The AboveGround composite biomass object includes all organs occurring above the soil surface to allow output for total dry matter and Nutrient contents, including total structural, non-structural and metabolic pools.
      CompositeBiomass BelowGround: DMDOfStructural=0.6; Propertys=[[Root].Live, [Root].Dead]
        Memo
          The BelowGround composite biomass object includes all root biomass pools to allow output for total dry matter and Nutrient contents, including total structural, non-structural and metabolic pools.
      CompositeBiomass Total: DMDOfStructural=0.6
        Propertys=[[Leaf].Live, [Leaf].Dead, [Stem].Live, [Stem].Dead, [Husk].Live, [Husk].Dead, [Grain].Live, [Grain].Dead, [Rachis].Live, [Rachis].Dead, [Root].Live, [Root].Dead]
        Memo
          The Total composite biomass object includes all organs (above+below ground) to allow output for total dry matter and Nutrient contents, including total structural, non-structural and metabolic pools.
      CompositeBiomass TotalLive: DMDOfStructural=0.6
        Propertys=[[Leaf].Live, [Stem].Live, [Husk].Live, [Grain].Live, [Rachis].Live, [Root].Live]
        Memo
          The TotalLive composite biomass object includes the Live pools of all organs (above+below ground) to allow output for total dry matter and Nutrient contents, including total structural, non-structural and metabolic pools.
      CompositeBiomass TotalDead: DMDOfStructural=0.6
        Propertys=[[Leaf].Dead, [Stem].Dead, [Husk].Dead, [Grain].Dead, [Rachis].Dead, [Root].Dead]
        Memo
          The TotalDead composite biomass object includes the Dead pools of all organs (above+below ground) to allow output for total dry matter and Nutrient contents, including total structural, non-structural and metabolic pools.
      CompositeBiomass EarLive: DMDOfStructural=0.6; Propertys=[[Husk].Live, [Grain].Live, [Rachis].Live]
        Memo
          The EarLive composite biomass object includes the Live pools of all organs within the Ear to allow output for total dry matter and Nutrient contents, including total structural, non-structural and metabolic pools.
      CompositeBiomass AboveGroundLive: DMDOfStructural=0.6
        Propertys=[[Leaf].Live, [Stem].Live, [Husk].Live, [Grain].Live, [Rachis].Live]
        Memo
          The AboveGroundLive composite biomass object includes the Live pools of all organs occurring above the soil surface to allow output for total dry matter and Nutrient contents, including total structural, non-structural and metabolic pools.
      CompositeBiomass AboveGroundDead: DMDOfStructural=0.6
        Propertys=[[Leaf].Dead, [Stem].Dead, [Husk].Dead, [Grain].Dead, [Rachis].Dead]
        Memo
          The AboveGroundDead composite biomass object includes the Dead pools of all organs occurring above the soil surface to allow output for total dry matter and Nutrient contents, including total structural, non-structural and metabolic pools.
      Memo Future Development Needs
        #Future Development requirements

        * Phenology not responding to stress events.  Requires better data sets for quantifying the effects of water and nitrogen on leaf apperance and the timing of development stages.
        * Phosphorus response
        * Improved parameterisation of supply and demand for N and DM from organs and arbitration of these resources.
        * Heat Stress responses in grain number
        * More validation under a wider range of environments with more detailed datasets
        * Seedling mortality
        * Water demand (MicroClimate) needs validation
      CultivarFolder
        Cultivar Hycorn_53
          Command:
            [Phenology].Juvenile.Target.FixedValue = 190
            [Phenology].Photosensitive.Target.XYPairs.X = 0, 12.5, 24
            [Phenology].Photosensitive.Target.XYPairs.Y = 0, 0, 124
            [Phenology].FlagLeafToFlowering.Target.FixedValue = 10
            [Phenology].FloweringToGrainFilling.Target.FixedValue = 170
            [Phenology].GrainFilling.Target.FixedValue = 520
            [Rachis].DMDemandFunction.MaximumOrganWt.FixedValue = 25
            [Grain].MaximumGrainsPerCob.FixedValue =  550
        Cultivar Pioneer_33M54
          Command:
            [Phenology].GrainFilling.Target.FixedValue = 550
            [Phenology].Juvenile.Target.FixedValue = 270
        Cultivar Pioneer_38H20
          Command:
            [Phenology].Juvenile.Target.FixedValue = 210
            [Phenology].GrainFilling.Target.FixedValue = 550
        Cultivar Pioneer_34K77
          Command:
            [Phenology].Juvenile.Target.FixedValue = 280
            [Phenology].GrainFilling.Target.FixedValue = 550
          Memo
            VShort duration variety released in New Zealand by Pioneer
        Cultivar Pioneer_39V43
          Command:
            [Phenology].Juvenile.Target.FixedValue = 100
            [Phenology].GrainFilling.Target.FixedValue = 500
            [Phenology].FloweringToGrainFilling.Target.FixedValue = 170
            [Structure].Phyllochron.Phyllochron.Phyllochron.XYPairs.X = 1, 4, 4.2, 10.5, 11
            [Structure].Phyllochron.Phyllochron.Phyllochron.XYPairs.Y = 26, 26, 46, 46, 70
            [Rachis].DMDemandFunction.MaximumOrganWt.FixedValue = 18
            [Structure].HeightModel.PotentialHeight.XYPairs.X = 3, 4, 5, 6
            [Structure].HeightModel.PotentialHeight.XYPairs.Y = 20, 40, 50, 1300
          Memo
            VShort duration variety released in New Zealand by Pioneer
        Cultivar Atrium
          Command:
            [Phenology].Juvenile.Target.FixedValue = 150
            [Phenology].GrainFilling.Target.FixedValue = 500
            [Phenology].FloweringToGrainFilling.Target.FixedValue = 170
            [Structure].Phyllochron.Phyllochron.Phyllochron.XYPairs.X = 1, 4, 4.2, 10.5, 11
            [Structure].Phyllochron.Phyllochron.Phyllochron.XYPairs.Y = 26, 26, 46, 46, 70
            [Rachis].DMDemandFunction.MaximumOrganWt.FixedValue = 18
            [Structure].HeightModel.PotentialHeight.XYPairs.X = 3, 4, 5, 6
            [Structure].HeightModel.PotentialHeight.XYPairs.Y = 20, 40, 50, 2370
          Memo
            Maize variety used in trials at Wageningen University
        Cultivar Laila
          Command:
            [Phenology].Juvenile.Target.FixedValue = 211
            [Phenology].Photosensitive.Target.XYPairs.X = 0, 12.5, 24
            [Phenology].Photosensitive.Target.XYPairs.Y = 0, 0, 0
            [Phenology].FlagLeafToFlowering.Target.FixedValue = 1
            [Phenology].FloweringToGrainFilling.Target.FixedValue = 170
            [Phenology].GrainFilling.Target.FixedValue = 812
            [Phenology].Maturing.Target.FixedValue = 1
            [Phenology].MaturityToHarvestRipe.Target.FixedValue = 1
            [Rachis].DMDemandFunction.MaximumOrganWt.FixedValue = 36
            [Grain].MaximumGrainsPerCob.FixedValue =  720
        Cultivar GH_5019WX
          Command:
            [Phenology].Juvenile.Target.FixedValue = 225
            [Phenology].Photosensitive.Target.XYPairs.X = 0, 12.5, 24.0
            [Phenology].Photosensitive.Target.XYPairs.Y = 0, 0, 124
            [Phenology].FlagLeafToFlowering.Target.FixedValue = 101
            [Phenology].FloweringToGrainFilling.Target.FixedValue = 170
            [Phenology].GrainFilling.Target.FixedValue = 694
            [Rachis].DMDemandFunction.MaximumOrganWt.FixedValue = 25
            [Grain].MaximumGrainsPerCob.FixedValue = 550
        Cultivar Hycorn_40
          Command:
            [Phenology].Juvenile.Target.FixedValue = 190
            [Phenology].Photosensitive.Target.XYPairs.X = 0, 12.5, 24
            [Phenology].Photosensitive.Target.XYPairs.Y = 0, 0, 124
            [Phenology].FlagLeafToFlowering.Target.FixedValue = 50
            [Phenology].FloweringToGrainFilling.Target.FixedValue = 170
            [Phenology].GrainFilling.Target.FixedValue = 713
            [Rachis].DMDemandFunction.MaximumOrganWt.FixedValue = 25
            [Grain].MaximumGrainsPerCob.FixedValue =  550
        Cultivar GH_5009
          Command:
            [Phenology].Juvenile.Target.FixedValue = 190
            [Phenology].Photosensitive.Target.XYPairs.X = 0, 12.5, 24
            [Phenology].Photosensitive.Target.XYPairs.Y = 0, 0, 300
            [Phenology].FlagLeafToFlowering.Target.FixedValue = 50
            [Phenology].FloweringToGrainFilling.Target.FixedValue = 170
            [Phenology].GrainFilling.Target.FixedValue = 713
            [Rachis].DMDemandFunction.MaximumOrganWt.FixedValue = 25
            [Grain].MaximumGrainsPerCob.FixedValue =  550
        Cultivar Dekalb_XL82
          Command:
            [Phenology].Juvenile.Target.FixedValue = 211
            [Phenology].Photosensitive.Target.XYPairs.X = 0, 12.5, 24
            [Phenology].Photosensitive.Target.XYPairs.Y = 0, 0, 472
            [Phenology].FlagLeafToFlowering.Target.FixedValue = 101
            [Phenology].FloweringToGrainFilling.Target.FixedValue = 170
            [Phenology].GrainFilling.Target.FixedValue = 813
            [Rachis].DMDemandFunction.MaximumOrganWt.FixedValue = 25
            [Grain].MaximumGrainsPerCob.FixedValue = 550
        Cultivar malawi_local
          Command:
            [Phenology].Juvenile.Target.FixedValue = 280
            [Phenology].Photosensitive.Target.XYPairs.X = 0, 12.5, 24
            [Phenology].Photosensitive.Target.XYPairs.Y = 0, 0, 264.5
            [Phenology].FlagLeafToFlowering.Target.FixedValue = 10
            [Phenology].FloweringToGrainFilling.Target.FixedValue = 170
            [Phenology].GrainFilling.Target.FixedValue = 600
            [Rachis].DMDemandFunction.MaximumOrganWt.FixedValue = 14
            [Grain].MaximumGrainsPerCob.FixedValue = 360
            [Grain].MaximumPotentialGrainSize.FixedValue = 0.217
          Memo
            The variety malawi_local is a Malawian medium-late maturing local variety.  Photoperiod response is taken from Ellis et al Crop Sci 32:1225 for SR52.
        Cultivar mh19
          Command:
            [Phenology].Juvenile.Target.FixedValue = 290
            [Phenology].Photosensitive.Target.XYPairs.X = 0, 12.5, 24
            [Phenology].Photosensitive.Target.XYPairs.Y = 0, 0, 264.5
            [Phenology].FlagLeafToFlowering.Target.FixedValue = 10
            [Phenology].FloweringToGrainFilling.Target.FixedValue = 170
            [Phenology].GrainFilling.Target.FixedValue = 570
            [Rachis].DMDemandFunction.MaximumOrganWt.FixedValue = 14
            [Grain].MaximumGrainsPerCob.FixedValue = 504
            [Grain].MaximumPotentialGrainSize.FixedValue = 0.361
          Memo
            The variety mh19 is a Malawian medium-late maturing hybrid.  Photoperiod response is taken from Ellis et al Crop Sci 32:1225 for SR52.
        Cultivar mh17
          Command:
            [Phenology].Juvenile.Target.FixedValue = 290
            [Phenology].Photosensitive.Target.XYPairs.X = 0, 12.5, 24
            [Phenology].Photosensitive.Target.XYPairs.Y = 0, 0, 264.5
            [Phenology].FlagLeafToFlowering.Target.FixedValue = 10
            [Phenology].FloweringToGrainFilling.Target.FixedValue = 170
            [Phenology].GrainFilling.Target.FixedValue = 570
            [Rachis].DMDemandFunction.MaximumOrganWt.FixedValue = 14
            [Grain].MaximumGrainsPerCob.FixedValue = 504
            [Grain].MaximumPotentialGrainSize.FixedValue = 0.361
          Memo
            The variety mh17 is a Malawian medium-late maturing hybrid.  Photoperiod response is taken from Ellis et al Crop Sci 32:1225 for SR52.
        Cultivar mh16
          Command:
            [Phenology].Juvenile.Target.FixedValue = 290
            [Phenology].Photosensitive.Target.XYPairs.X = 0, 12.5, 24
            [Phenology].Photosensitive.Target.XYPairs.Y = 0, 0, 264.5
            [Phenology].FlagLeafToFlowering.Target.FixedValue = 10
            [Phenology].FloweringToGrainFilling.Target.FixedValue = 170
            [Phenology].GrainFilling.Target.FixedValue = 570
            [Rachis].DMDemandFunction.MaximumOrganWt.FixedValue = 14
            [Grain].MaximumGrainsPerCob.FixedValue = 504
            [Grain].MaximumPotentialGrainSize.FixedValue = 0.361
          Memo
            The variety mh16 is a Malawian medium-late maturing hybrid.  Photoperiod response is taken from Ellis et al Crop Sci 32:1225 for SR52.
        Cultivar mh12
          Command:
            [Phenology].Juvenile.Target.FixedValue = 290
            [Phenology].Photosensitive.Target.XYPairs.X = 0, 12.5, 24
            [Phenology].Photosensitive.Target.XYPairs.Y = 0, 0, 264.5
            [Phenology].FlagLeafToFlowering.Target.FixedValue = 10
            [Phenology].FloweringToGrainFilling.Target.FixedValue = 170
            [Phenology].GrainFilling.Target.FixedValue = 570
            [Rachis].DMDemandFunction.MaximumOrganWt.FixedValue = 14
            [Grain].MaximumGrainsPerCob.FixedValue = 504
            [Grain].MaximumPotentialGrainSize.FixedValue = 0.361
          Memo
            The variety mh12 is a Malawian medium-late maturing hybrid.  Photoperiod response is taken from Ellis et al Crop Sci 32:1225 for SR52.
        Cultivar sc623
          Command:
            [Phenology].Juvenile.Target.FixedValue = 280
            [Phenology].Photosensitive.Target.XYPairs.X = 0, 12.5, 24
            [Phenology].Photosensitive.Target.XYPairs.Y = 0, 0, 264.5
            [Phenology].FlagLeafToFlowering.Target.FixedValue = 10
            [Phenology].FloweringToGrainFilling.Target.FixedValue = 170
            [Phenology].GrainFilling.Target.FixedValue = 550
            [Rachis].DMDemandFunction.MaximumOrganWt.FixedValue = 14
            [Grain].MaximumGrainsPerCob.FixedValue = 504
            [Grain].MaximumPotentialGrainSize.FixedValue = 0.361
          Memo
            The variety sc623 is a Zimbabwean medium-late maturing hybrid.  Photoperiod response is taken from Ellis et al Crop Sci 32:1225 for SR52.
        Cultivar sc625
          Command:
            [Phenology].Juvenile.Target.FixedValue = 280
            [Phenology].Photosensitive.Target.XYPairs.X = 0, 12.5, 24
            [Phenology].Photosensitive.Target.XYPairs.Y = 0, 0, 264.5
            [Phenology].FlagLeafToFlowering.Target.FixedValue = 10
            [Phenology].FloweringToGrainFilling.Target.FixedValue = 170
            [Phenology].GrainFilling.Target.FixedValue = 570
            [Rachis].DMDemandFunction.MaximumOrganWt.FixedValue = 14
            [Grain].MaximumGrainsPerCob.FixedValue = 504
            [Grain].MaximumPotentialGrainSize.FixedValue = 0.361
          Memo
            The variety sc625 is a Zimbabwean medium-late maturing hybrid.  Photoperiod response is taken from Ellis et al Crop Sci 32:1225 for SR52.
        Cultivar sc601
          Command:
            [Phenology].Juvenile.Target.FixedValue = 280
            [Phenology].Photosensitive.Target.XYPairs.X = 0, 12.5, 24
            [Phenology].Photosensitive.Target.XYPairs.Y = 0, 0, 264.5
            [Phenology].FlagLeafToFlowering.Target.FixedValue = 10
            [Phenology].FloweringToGrainFilling.Target.FixedValue = 170
            [Phenology].GrainFilling.Target.FixedValue = 560
            [Rachis].DMDemandFunction.MaximumOrganWt.FixedValue = 14
            [Grain].MaximumGrainsPerCob.FixedValue = 495
            [Grain].MaximumPotentialGrainSize.FixedValue = 0.361
          Memo
            The variety sc601 is a Zimbabwean medium-late maturing hybrid.  Photoperiod response is taken from Ellis et al Crop Sci 32:1225 for SR52.
        Cultivar CG4141
          Command:
            [Phenology].Juvenile.Target.FixedValue = 233
            [Phenology].Photosensitive.Target.XYPairs.X = 0, 12.5, 24
            [Phenology].Photosensitive.Target.XYPairs.Y = 0, 0, 264.5
            [Phenology].FlagLeafToFlowering.Target.FixedValue = 10
            [Phenology].FloweringToGrainFilling.Target.FixedValue = 170
            [Phenology].GrainFilling.Target.FixedValue = 550
            [Rachis].DMDemandFunction.MaximumOrganWt.FixedValue = 14
            [Grain].MaximumGrainsPerCob.FixedValue = 468
            [Grain].MaximumPotentialGrainSize.FixedValue = 0.361
          Memo
            The variety CG4141 is a Zimbabwean early-medium maturing hybrid.  Photoperiod response is taken from Ellis et al Crop Sci 32:1225 for SR52.
        Cultivar mh18
          Command:
            [Phenology].Juvenile.Target.FixedValue = 260
            [Phenology].Photosensitive.Target.XYPairs.X = 0, 12.5, 24
            [Phenology].Photosensitive.Target.XYPairs.Y = 0, 0, 264.5
            [Phenology].FlagLeafToFlowering.Target.FixedValue = 10
            [Phenology].FloweringToGrainFilling.Target.FixedValue = 170
            [Phenology].GrainFilling.Target.FixedValue = 550
            [Rachis].DMDemandFunction.MaximumOrganWt.FixedValue = 14
            [Grain].MaximumGrainsPerCob.FixedValue = 486
            [Grain].MaximumPotentialGrainSize.FixedValue = 0.361
          Memo
            The variety mh18 is a Zimbabwean early-medium maturing hybrid.  Photoperiod response is taken from Ellis et al Crop Sci 32:1225 for SR52.
        Cultivar r215
          Command:
            [Phenology].Juvenile.Target.FixedValue = 250
            [Phenology].Photosensitive.Target.XYPairs.X = 0, 12.5, 24
            [Phenology].Photosensitive.Target.XYPairs.Y = 0, 0, 264.5
            [Phenology].FlagLeafToFlowering.Target.FixedValue = 10
            [Phenology].FloweringToGrainFilling.Target.FixedValue = 170
            [Phenology].GrainFilling.Target.FixedValue = 550
            [Rachis].DMDemandFunction.MaximumOrganWt.FixedValue = 14
            [Grain].MaximumGrainsPerCob.FixedValue = 468
            [Grain].MaximumPotentialGrainSize.FixedValue = 0.361
          Memo
            The variety r215 is a Zimbabwean early-medium maturing hybrid.  Photoperiod response is taken from Ellis et al Crop Sci 32:1225 for SR52.
        Cultivar Melkassa
          Command:
            [Phenology].Juvenile.Target.FixedValue = 230
            [Phenology].Photosensitive.Target.XYPairs.X = 0, 12.5, 24
            [Phenology].Photosensitive.Target.XYPairs.Y = 0, 0, 264.5
            [Phenology].FlagLeafToFlowering.Target.FixedValue = 10
            [Phenology].FloweringToGrainFilling.Target.FixedValue = 160
            [Phenology].GrainFilling.Target.FixedValue = 550
            [Rachis].DMDemandFunction.MaximumOrganWt.FixedValue = 14
            [Grain].MaximumGrainsPerCob.FixedValue = 387
            [Grain].MaximumPotentialGrainSize.FixedValue = 0.33
          Memo
            The variety Melkassa is a local early-medium maturing Ethiopian variety.
        Cultivar sr52
          Command:
            [Phenology].Juvenile.Target.FixedValue = 250
            [Phenology].Photosensitive.Target.XYPairs.X = 0, 12.5, 24
            [Phenology].Photosensitive.Target.XYPairs.Y = 0, 0, 264.5
            [Phenology].FlagLeafToFlowering.Target.FixedValue = 10
            [Phenology].FloweringToGrainFilling.Target.FixedValue = 170
            [Phenology].GrainFilling.Target.FixedValue = 550
            [Rachis].DMDemandFunction.MaximumOrganWt.FixedValue = 14
            [Grain].MaximumGrainsPerCob.FixedValue = 468
            [Grain].MaximumPotentialGrainSize.FixedValue = 0.361
          Memo
            The variety sr52 is a Zimbabwean early-medium maturing hybrid.  Photoperiod response is taken from Ellis et al Crop Sci 32:1225 for SR52.
        Cultivar sc501
          Command:
            [Phenology].Juvenile.Target.FixedValue = 250
            [Phenology].Photosensitive.Target.XYPairs.X = 0, 12.5, 24
            [Phenology].Photosensitive.Target.XYPairs.Y = 0, 0, 264.5
            [Phenology].FlagLeafToFlowering.Target.FixedValue = 10
            [Phenology].FloweringToGrainFilling.Target.FixedValue = 170
            [Phenology].GrainFilling.Target.FixedValue = 550
            [Rachis].DMDemandFunction.MaximumOrganWt.FixedValue = 14
            [Grain].MaximumGrainsPerCob.FixedValue = 468
            [Grain].MaximumPotentialGrainSize.FixedValue = 0.361
          Memo
            The variety sc501 is a Zimbabwean early-medium maturing hybrid.  Photoperiod response is taken from Ellis et al Crop Sci 32:1225 for SR52.
        Cultivar r201
          Command:
            [Phenology].Juvenile.Target.FixedValue = 230
            [Phenology].Photosensitive.Target.XYPairs.X = 0, 12.5, 24
            [Phenology].Photosensitive.Target.XYPairs.Y = 0, 0, 264.5
            [Phenology].FlagLeafToFlowering.Target.FixedValue = 10
            [Phenology].FloweringToGrainFilling.Target.FixedValue = 170
            [Phenology].GrainFilling.Target.FixedValue = 550
            [Rachis].DMDemandFunction.MaximumOrganWt.FixedValue = 14
            [Grain].MaximumGrainsPerCob.FixedValue = 450
            [Grain].MaximumPotentialGrainSize.FixedValue = 0.375
          Memo
            The variety r201 is a Zimbabwean early maturing hybrid.  Photoperiod response is taken from Ellis et al Crop Sci 32:1225 for SR52.
        Cultivar sc401
          Command:
            [Phenology].Juvenile.Target.FixedValue = 230
            [Phenology].Photosensitive.Target.XYPairs.X = 0, 12.5, 24
            [Phenology].Photosensitive.Target.XYPairs.Y = 0, 0, 264.5
            [Phenology].FlagLeafToFlowering.Target.FixedValue = 10
            [Phenology].FloweringToGrainFilling.Target.FixedValue = 170
            [Phenology].GrainFilling.Target.FixedValue = 550
            [Rachis].DMDemandFunction.MaximumOrganWt.FixedValue = 14
            [Grain].MaximumGrainsPerCob.FixedValue = 450
            [Grain].MaximumPotentialGrainSize.FixedValue = 0.375
          Memo
            The variety NSCM_41 is a Zimbabwean early maturing hybrid.  Photoperiod response is taken from Ellis et al Crop Sci 32:1225 for SR52.
        Cultivar NSCM_41: same as Replacements.Maize.CultivarFolder.sc401
        Cultivar Makueni
          Command:
            [Phenology].Juvenile.Target.FixedValue = 150
            [Phenology].Photosensitive.Target.XYPairs.X = 0, 12.5, 24
            [Phenology].Photosensitive.Target.XYPairs.Y = 0, 0, 115
            [Phenology].FlagLeafToFlowering.Target.FixedValue = 10
            [Phenology].FloweringToGrainFilling.Target.FixedValue = 120
            [Phenology].GrainFilling.Target.FixedValue = 530
            [Rachis].DMDemandFunction.MaximumOrganWt.FixedValue = 14
            [Grain].MaximumGrainsPerCob.FixedValue = 432
            [Grain].MaximumPotentialGrainSize.FixedValue = 0.375
          Memo
            The variety Makueni Composite is a kenyan variety with similar phenology but slightly higher cob size than Katumani composite.
        Cultivar Katumani
          Command:
            [Phenology].Juvenile.Target.FixedValue = 150
            [Phenology].Photosensitive.Target.XYPairs.X = 0, 12.5, 24
            [Phenology].Photosensitive.Target.XYPairs.Y = 0, 0, 115
            [Phenology].FlagLeafToFlowering.Target.FixedValue = 10
            [Phenology].FloweringToGrainFilling.Target.FixedValue = 120
            [Phenology].GrainFilling.Target.FixedValue = 530
            [Rachis].DMDemandFunction.MaximumOrganWt.FixedValue = 14
            [Grain].MaximumGrainsPerCob.FixedValue = 405
            [Grain].MaximumPotentialGrainSize.FixedValue = 0.375
          Memo
            The variety Katumani Composite B was formed in 1966 and released in 1968 as part of the maize breeding work undertaken at the Katumani Research Station in Kenya which started in 1956.  Katumani Composite B was an advanced generation of Katumani Synthetic V X Katumani Synthetic VI.  It has slight photoperiod sensitivity and relatively small potential cob size.
        Cultivar Pioneer_3153
        Cultivar Pioneer_39G12
          Command:
            [Phenology].Juvenile.Target.FixedValue = 180
            [Phenology].GrainFilling.Target.FixedValue = 500
            [Grain].MaximumGrainsPerCob.FixedValue = 550
            [Grain].NumberFunction.GrowthRateFactor.XYPairs.X = 0.2,2,4,10
            [Grain].NumberFunction.GrowthRateFactor.XYPairs.Y = 0,0.6,1,1
            [Grain].MaximumPotentialGrainSize.FixedValue = 0.25
      CompositeBiomass Spike: DMDOfStructural=0.6; Propertys=[[Husk].Live, [Rachis].Live]
        Memo
          The SpikeLive composite biomass object includes the Live pools of then non-grain organs within the reproductive spike to allow output for total dry matter and Nutrient contents, including total structural, non-structural and metabolic pools.
    OilPalm: interception=0; UnderstoryCoverMax=0.4; UnderstoryLegumeFraction=1; InterceptionFraction=0; MaximumRootDepth=5000; RootDepth=0; DltDM=0; ReproductiveGrowthFraction=0; UnderstoryCoverGreen=0
      Memo
        The base configuration of the oil palm model has been configured to match commercial dura x pisifera palms developed in Dami, West New Britain in Papua New Guinea.  Other varieties are specified in terms of how they differ from this base variety.
      Cultivar Dami
      Cultivar SuperFamily
        Command:
          [FrondMaxArea].XYPairs.X = 0,2,4.5,8.5,14
          [FrondMaxArea].XYPairs.Y = 0.1,0.9,0.63,10.8,12.6
      Cultivar Nigeria_IRHO
        Command:
          [BunchSizeMax].XYPairs.X = 0, 1,3,7,11,15
          [BunchSizeMax].XYPairs.Y = 0, 53,265,7000,11600,12750
          [FrondAppearanceRate].XYPairs.X =     0,    2,     5,   10,   15
          [FrondAppearanceRate].XYPairs.Y =  10.1,  7.7,   10.1,  11,   11
      Cultivar Nigeria_SOCFINDO
        Command:
          [BunchSizeMax].XYPairs.X = 0, 1,3,7,11,15
          [BunchSizeMax].XYPairs.Y = 0, 53,265,7000,11600,12750
          [FrondAppearanceRate].XYPairs.X =     0,    2,     5,    8,   15
          [FrondAppearanceRate].XYPairs.Y =  10.1,  7.7,   10.1,  11,   11
      Constant KNO3: FixedValue=0.02
      Constant RootFraction: FixedValue=0.1
        Memo
          The proportion of plant growth  partitioned to roots has been set to 10% as this value lies between estimates used by Henson and Dolmat (2003) and van Kraalingen et al. (1989).
      Constant RootNConcentration: FixedValue=0.39
        Memo
          Root nitrogen concentration is set at 0.39% (Goh, 2005)
      Constant RootSenescenceRate: FixedValue=0.001
        Memo
          A constant root turnover rate of 0.001 d-1 is used for all soil layers.  This value is larger than the value of 0.00065 which can be calculated from the root turnover functions given by Henson and Dolmat (2003), reflecting the slightly higher fraction of growth partitioned to roots in this model.
      Constant InitialFrondNumber: FixedValue=5
      AirTemperatureFunction RelativeDevelopmentalRate
        XYPairs: X=[13, 32, 35, 46]; Y=[0, 1, 1, 0]
      LinearInterpolationFunction FrondAppearanceRate: XProperty=[OilPalm].Age
        Memo
          This value has been fitted to frond appearance data from Papua New Guinea (see model validation documentation)
        XYPairs: X=[0, 2, 5, 10, 15]; Y=[5.25, 5.25, 7.725, 10.1, 10.1]
      Constant ExpandingFronds: FixedValue=5
      Constant FrondMaximumNConcentration: FixedValue=1.15
      Constant FrondCriticalNConcentration: FixedValue=1.1
      Constant FrondMinimumNConcentration: FixedValue=0.5
      SplineInterpolationFunction FrondMaxArea: XProperty=[OilPalm].Age
        Memo
          This value has been fitted to frond area data from Papua New Guinea (see model validation documentation)
        XYPairs: X=[0, 2, 4.5, 8.5, 14]; Y=[0.1, 1, 7, 12, 14]
      LinearInterpolationFunction BunchSizeMax: XProperty=[OilPalm].Age
        Memo
          This value has been fitted to bunch size data from Papua New Guinea (see model validation documentation)
        XYPairs: X=[0, 2, 6, 10, 14]; Y=[53, 265, 7000, 11600, 12750]
      LinearInterpolationFunction HarvestFrondNumber: XProperty=[OilPalm].Age
        Memo
          This function frond number data from Papua New Guinea (see model validation documentation)
        XYPairs: X=[0, 6, 10]; Y=[51, 41, 34]
      Constant FemaleFlowerFraction: FixedValue=0.8
        Memo
          Sex determination is calculated during a phase occurring 49 to 57 fronds before bunch maturity. A constant value is assumed for Female Flower Fraction at the beginning of this phase.  This represents the fraction of female flowers in the absence of any further stress effect.
      LinearInterpolationFunction FFFStressImpact: XProperty=[OilPalm].CarbonStress
        Memo
          Sex determination is calculated during a phase occurring 49 to 57 fronds before bunch maturity. Combres et al. (2013) showed that variation in the proportion of female inflorescences could be modelled in response to the ratio of assimilate supply to demand (RSD) within the whole plant. We use a similar approach here in which the female inflorescence fraction (FIF) for each cohort within the sex determination phase is decreased each day at a rate of 0.06 x (1 – RSD).
        XYPairs: X=[0, 1]; Y=[0.06, 0]
      LinearInterpolationFunction StemToFrondFraction: XProperty=[OilPalm].Age
        Memo
          The proportion of daily assimilation partitioned to stem is calculated from daily frond growth using a ratio of stem to frond dry mass, calculated from data used in this study, which increases from 0 at planting to 0.25 by seven years of age.
        XYPairs: X=[0, 4, 7, 12]; Y=[0, 0.15, 0.25, 0.25]
      LinearInterpolationFunction StemNConcentration: XProperty=[OilPalm].Age
        Memo
          Average whole stem N concentration decreases with plant age.  We use the equation of Goh (2005) which specifies that stem N concentration decreases from 1.37% to 0.35% by the age of 8.5 years and then remains constant.
        XYPairs: X=[0, 8.5]; Y=[1.37, 0.351]
      Constant BunchOilConversionFactor: FixedValue=1.55
      Constant RipeBunchWaterContent: FixedValue=0.47
      Constant BunchNConcentration: FixedValue=0.603
      LinearInterpolationFunction SpecificLeafArea: XProperty=[OilPalm].Age
        Memo
           A value of 0.003 m2 g-1 was calculated by combining the allometric equations for frond mass and area (Corley et al., 1971)
        XYPairs: X=[1, 5, 13]; Y=[0.003, 0.003, 0.003]
      LinearInterpolationFunction SpecificLeafAreaMax: XProperty=[OilPalm].Age
        XYPairs: X=[1, 5, 13]; Y=[0.0035, 0.0035, 0.0035]
      LinearInterpolationFunction FlowerAbortionFraction: XProperty=[OilPalm].CarbonStress
        Memo
          Inflorescence abortion is calculated during a phase 10 to 12 fronds after the spear leaf stage.   Inflorescence abortion and bunch failure fractions are calculated as 0.15 x (1 – RSD) during the abortion and bunch failure phases. The values of the constants in these two equations were derived via calibration and provide approximately the same yield impact for the two processes due to the different lengths of the abortion and failure phases.
        XYPairs: X=[0, 1]; Y=[0.15, 0]
      LinearInterpolationFunction BunchFailureFraction: XProperty=[OilPalm].CarbonStress
        Memo
          Bunch failure is determined 21 fronds after spear leaf over the course of a single frond.  Inflorescence abortion and bunch failure fractions are calculated as 0.15 x (1 – RSD) during the abortion and bunch failure phases. The values of the constants in these two equations were derived via calibration and provide approximately the same yield impact for the two processes due to the different lengths of the abortion and failure phases.
        XYPairs: X=[0, 1]; Y=[0.15, 0]
      LinearInterpolationFunction DirectExtinctionCoeff: XProperty=[OilPalm].Population
        Memo
          Light interception is calculated using the Beer-Lambert law with extinction coefficients derived from data from a nearby site in West New Britain, PNG (Breure, 1988a) and other modelling (van Kraalingen et al., 1989)
        XYPairs: X=[0.0056, 0.0186]; Y=[0.175, 0.35]
      LinearInterpolationFunction DiffuseExtinctionCoeff: XProperty=[OilPalm].Population
        Memo
          Light interception is calculated using the Beer-Lambert law with extinction coefficients derived from data from a nearby site in West New Britain, PNG (Breure, 1988a) and other modelling (van Kraalingen et al., 1989)
        XYPairs: X=[0.0056, 0.0186]; Y=[0.225, 0.45]
      Constant RUE: FixedValue=1.22
        Memo
          Photosynthesis is calculated using a radiation use efficiency (RUE) of 1.22 g MJ-1 of intercepted direct beam total short wave radiation.  RUE for diffuse light increases from this direct beam value by up to 33%, in proportion to the fraction of daily intercepted radiation, corresponding with the observed impact of diffuse light penetration on forest growth (Alton et al., 2007).  Daily average RUE is calculated as the average of the direct and diffuse beam RUE values, weighted toward the diffuse light RUE using the square of the daily diffuse light fraction (van Kraalingen et al., 1989).  This approach yields a value of 1.35 for a clear day with approximately 30% diffuse light which matches estimates provided by Henson and Dolmat (2003) assuming a density of 140 palms ha-1.
      Constant RootFrontVelocity: FixedValue=30
        Memo
          Fixed root front velocity taken from Carr(2011).
      Memo Reference List
        **References**

        Alton, P.B., North, P.R., Los, S.O., 2007. The impact of diffuse sunlight on canopy light-use efficiency, gross photosynthetic product and net ecosystem exchange in three forest biomes. Global Change Biology 13(4) 776-787.

        Araujo, L.C., Santos, P.M., Rodriguez, D., Pezzopane, J.R.M., Oliveira, P.P.A., Cruz, P.G., 2013. Simulating Guinea Grass Production: Empirical and Mechanistic Approaches. Agronomy Journal 105(1) 61-69.

        Banabas, M., 2007. Study of Nitrogen loss pathways in oil palm (Elaeis guineensis Jacq.) growing agro-ecosystems in volcanic ash soils in Papua New Guinea, Soil Science. Massey University: Palmerston North, New Zealand.

        Banabas, M., Scotter, D.R., Turner, M.A., 2008a. Losses of nitrogen fertiliser under oil palm in Papua New Guinea: 2. Nitrogen transformations and leaching, and a residence time model. Australian Journal of Soil Research 46(4) 340-347.

        Banabas, M., Turner, M.A., Scotter, D.R., Nelson, P.N., 2008b. Losses of nitrogen fertiliser under oil palm in Papua New Guinea: 1. Water balance, and nitrogen in soil solution and runoff. Australian Journal of Soil Research 46(4) 332-339.

        Breure, C.J., 1988a. The effect of different planting densities on yield trends in oil palm. Experimental Agriculture 24(1) 37-52.

        Breure, C.J., 1988b. The effect of palm age and planting density on the partitioning of assimilates in oil palm (Elaeis-guineensis). Experimental Agriculture 24(1) 53-66.

        Brown, H.E., Huth, N.I., Holzworth, D.P., Teixeira, E.I., Zyskowski, R.F., Hargreaves, J.N.G., Moot, D.J., these proceedings. Plant Modelling Framework: Software for building and running crop models on the APSIM platform. Environmental Modelling and Software.

        Carr, M.K.V., 2011. The water relations and irrigation requirements of oil palm (Elaeis guineensis): A review. Experimental Agriculture 47(4) 629-652.

        Combres, J.-C., Pallas, B., Rouan, L., Mialet-Serra, I., Caliman, J.-P., Braconnier, S., Soulie, J.-C., Dingkuhn, M., 2013. Simulation of inflorescence dynamics in oil palm and estimation of environment-sensitive phenological phases: a model based analysis. Functional Plant Biology 40(3) 263-279.

        Corley, R.H.V., Hardon, J.J., Tan, G.Y., 1971. Analysis of growth of oil palm (Elaeis-guineensis Jacq) .1. Estimation of growth parameters and application in breeding. Euphytica 20(2) 307-315.

        Goh, K.J., 2005. Fertilizer recommendation systems for oil palm: estimating the fertilizer rates.

        Henson, I.E., Dolmat, M.T., 2003. Physiological analysis of an oil palm density trial on a peat soil. Journal of Oil Palm Research 15(2) 1-27.

        Henson, I.E., Yahya, Z., Noor, M.R.M., Harun, M.H., Mohammed, A.T., 2007. Predicting soil water status, evapotranspiration, growth and yield of young oil palm in a seasonally dry region of Malaysia. Journal of Oil Palm Research 19 398-415.

        Jones, L.H., 1997. The effects of leaf pruning and other stresses on sex determination in the oil palm and their representation by a computer model. Journal of Theoretical Biology 187 241-260.

        Keshvadi, A., Bin Endan, J., Harun, H., Ahmad, D., Saleena, F., 2012. The reflection of moisture content on palm oil development during the ripening process of fresh fruits. Journal of Food Agriculture and Environment 10(1) 203-209.

        Nelson, P.N., Banabas, M., Scotter, D.R., Webb, M.J., 2006. Using soil water depletion to measure spatial distribution of root activity in oil palm (Elaeis guineensis Jacq.) plantations. Plant and Soil 286(1-2) 109-121.

        Nelson, P.N., Webb, M.J., Banabas, M., Nake, S., Goodrick, I., Gordon, J., O'Grady, D., Dubos, B., 2014. Methods to account for tree-scale variability in soil- and plant-related parameters in oil palm plantations. Plant and Soil 374(1-2) 459-471.

        Nelson, P.N., Webb, M.J., Orrell, I., van Rees, H., Banabas, M., Berthelsen, S., Sheaves, M., Bakani, F., Pukam, O., Hoare, M., Griffiths, W., King, G., Carberry, P., Pipai, R., McNeill, A., Meekers, P., Lord, S., Butler, J., Pattison, T., Armour, J., Dewhurst, C., 2010. Environmental sustainability of oil palm cultivation in Papua New Guinea. Australian Centre for International Agricultural Research, Canberra, Australia.

        Nelson, R.A., Cramb, R.A., Mamicpic, M.A., 1998. Erosion/productivity modelling of maize farming in the Philippine uplands part III: Economic analysis of alternative farming methods. Agricultural Systems 58(2) 165-183.

        Pipai, R., 2013. Biological Nitrogen Fixation By Cover Legumes Under Oil Palm Plantations In Papua New Guinea, School of Agriculture, Food and Wine. Faculty of Sciences. The University of Adelaide: Australia.

        Priestley, C.H.B., Taylor, R.J., 1972. On the assessment of surface heat flux and evaporation using large scale parameters. Monthly Weather Review 100 81-92.

        Robertson, M.J., Carberry, P.S., Huth, N.I., Turpin, J.E., Probert, M.E., Poulton, P.L., Bell, M., Wright, G.C., Yeates, S.J., Brinsmead, R.B., 2002. Simulation of growth and development of diverse legume species in APSIM. Australian Journal of Agricultural Research 53 429-446.

        Romero, C.C., Hoogenboom, G., Baigorria, G.A., Koo, J., Gijsman, A.J., Wood, S., 2012. Reanalysis of a global soil database for crop and environmental modeling. Environmental Modelling and Software 35 163-170.

        Schultz, H.R., 1992. An empirical model for the simulation of leaf appearance and leaf area development of promary shoots of several grapevine (Vitis-vinifera L) canopy systems. Scientia Horticulturae 52(3) 179-200.

        Sheil, D., Casson, A., Meijaard, E., van Noordwijk, M., Gaskell, J., Sunderland-Groves, J., Wertz, K., Kanninen, M., 2009. The Impacts and Opportunities of Oil Palm in Southeast Asia: What Do We Know and What Do We Need to Know? , Occasional Paper. Center for International Forestry Research: Bogor, Indonesia.

        van Kraalingen, D.W.G., Breure, C.J., Spitters, C.J.T., 1989. Simulation of oil palm growth and yield. Agricultural and Forest Meteorology 46(3) 227-244.

        Van Noordwijk, M., Lusiana, B., Khasanah, N., Mulia, R., 2011. WaNuLCAS version 4.0: Background on a model of water, nutrient and light capture in agroforestry systems. World Agroforestry Centre (ICRAF): Bogor, Indonesia, p. 224.

        von Uexküll, H., Henson, I.E., Fairhurst, T., 2003. Canopy management to optimize yield, In: Fairhurst, T., Härdter, R. (Eds.), The Oil Palm – Management for Large and Sustainable Yields. Potash and Phosphate Institute of Canada, Potash and Phosphate Institute, International Potash Institute: Singapore, pp. 163-180.
    Plant Plantain: CropType=Plantain
      Memo GeneralDescription
        ## Presentation

        This model has been built using the Plant Modelling Framework (PMF) of [brown_plant_2014] to simulate the growth of a forage plantain crop ( _Plantago lanceolata_ ).  The model focus, thus, on describing primarily the vegetative growth, with a simplified account of the reproductive phase, without explicit considering flowers and seeds (these may be included in future releases).  To simulate the aboveground plant structure, including the photosynthesis process, the plantain model uses the SimpleLeaf procedure of PMF.  The model describes a semi-perennial crop, with phenology rewinding to the vegetative stage at the end of the reproductive phase.

        ##Inclusion in APSIM simulations
        A forage plantain crop can be included in a simulation the same as any other APSIM crop.

         * - The plantain object can be dragged or copied from the Crop folder in the tool box into a Field in your simulation;
         * - To become active and grow, plantain needs to be sown using a manager script with a sowing rule. e.g.:
        ~~~
         Plantain.Sow(cultivar: Tonic, population: 300, depth: 10, rowSpacing: 150);
        ~~~
        If a specified cultivar is not available, a fatal error will be thrown.

        ###Harvest and biomass removal
        Plantain biomass can be removed by raising one of the valid methods: Harvest, Cut, Graze, or Prune; this is done using a manager script, similarly to other crops.  The proportion of the biomass of each organ that is removed from the system and/or added to the residue pools may be specified; otherwise defaults will be used.  Note that the sum of fractions removed and added to residue should be <= 1.0.  To specify the proportions for removal in a manager script, use a RemovalFractions class as shown below:
        ~~~
        [EventSubscribe("Commencing")]
        private void OnSimulationCommencing(object sender, EventArgs e)
        {
          RemoveFraction = new RemovalFractions(Plantain.Organs);
        }
        [EventSubscribe("DoManagement")]
        private void OnDoManagement(object sender, EventArgs e)
        {
          if (Clock.Today.Date == HarvestDate)
          {
            RemoveFraction.SetFractionToRemove("Leaf", 0.80);
            RemoveFraction.SetFractionToRemove("Stem", 0.50);
            RemoveFraction.SetFractionToResidue("leaf",0.05);
            Plantain.Harvest(RemoveFraction);
          }
        }
        ~~~
        The RemovalFractions class can be sent with Harvest, Cut, Graze, or Prune events. All parameters are optional, defaults are used whenever any value is not specified.

        ###Crop termination
        To fully terminate a crop the EndCrop event should be raised:
        ~~~
         Plantain.EndCrop();
        ~~~
        Once a crop has been ended the field is open to be used by another APSIM plant model, or another plantain crop.  Note that ending plantain is not necessary before sowing another crop, competition for resources will take place between crops when there is more than one in the field.

        ## Acknowledgements
        This model was developed with help from Brittany Paton and Russel McAuliffe organising data and simulations. Datasets were kindly shared by Julia M. Lee and the Forages for Reduced Nitrogen Leaching (FRNL) programme.
      Phenology
        Memo Description
          The duration of each phenologic phase in plantain is controlled either by the accumulation of thermal time or photoperiod.
        AirTemperatureFunction ThermalTime
          Memo Description
            The thermal time is calculated from the daily average temperature using three cardinal temperatures: minimum, maximum, and optimum.  Crop development acelerates as temperature increases from minimum to optimum and slows down after that, stopping completely when maximum temperature is reached.  There is very little information about these thresholds for plantain, the minimum temperature seem to be quite variable as one of the main traits that vary among cultivars is the growth over winter. For "chinese plantain" ( _Plantago  asiatica_ ) the minimum temperature varies between 3 and 14 oC ([IshikawaEtAl_2007]), which gives an idea of potential variations for this parameter in plantain. Plantain is tolerant to high temperatures ([StewartPlantain_1996]; [NieEtAl_2008]) and outgrows ryegrass over summer in subtropical climate ([MoorheadPigot_2009]). The data for chinese plantain suggest similar growth, and thus the optimum and maximum temperature for it, 30 and 38oC respectively ([IshikawaEtAl_2007]), should give a good indication of the values for forage plantain.
          XYPairs: X=[9, 30, 38]; Y=[0, 25, 0]
        PhotoperiodFunction Photoperiod: Twilight=-6; DayLength=0
        GerminatingPhase Germinating: Start=Sowing; End=Germination
          Memo Description
            Germination will occur one day after sowing, provided that the amount of soil extractable water is greater than zero.  Germination rates in plantain typically vary between 75 and 95% when sown close to the surface (<10mm), in moist warm soil ([ReedEtAl_2008]; [DouglasEtAl_2013]; [LeeEtAlYields_2015]).  The plantain model, following convention of PMF, assumes 100% germination, and therefore the user must correct sowing rate when variations between sown and germinated plant density is considered important.
        EmergingPhase Emerging: ShootLag=15; ShootRate=10; Start=Germination; End=Emergence; TTForTimeStep=0
          Memo Description
             Plantain has small seeds and emergence is best when seeds are sown at depth <10mm (Peri et al., 2000; Sanderson et al., 2000), deeper seed may stay dormant for years in the soil ([Blom_1978]; [RobertsBoddrell_1984]).  Variations in germination rate due to depth are not explicitly simulated by the plantain model in the current version, however the sowing depth does affect timing of emergence.  This is controlled by the parameter ShootRate, which is the shoot elongation rate as function of thermal time (mm/oCd).
          VariableReference ThermalTime: VariableName=[Phenology].ThermalTime.Value()
        GenericPhase Vegetative: Start=Emergence; End=Flowering
          Memo Description
            During this phase the plant only partitions biomass to leaf and root+taproot organs.  The phase starts when plants emerge from the ground, but it is also triggered after the end of the reproductive phase (phenology reset).  It ends when the reproductive phase starts, which is triggered by the accumulation of days with long sunlight ([SussexPlantain_1956]; [Rowarth_Plantain_1990]; [CaseLaceyHopkins_1996]; [LaceyRoach_2003]; [GonzalezParrado_2015]).  Stalk development have been recorded to start in October in NZ and in May in the USA ([Rowarth_Plantain_1990]; [LaceyRoach_2003]; [SandersonEtAl_2003]), with data suggesting a minimum of 25-30 days (non consecutive) with long daylight periods ([SussexPlantain_1956]; [FajerEtAl_1991]; [CaseLaceyHopkins_1996]).  The literature does not provide an indication of how long the sunlight period should be to trigger the reproductive phase, but it is clear that daylight should be grater that the period in darkness (14-16 hours been used to induce flowering in growth chambers).  The base plantain model uses the accumulation of days greater than 12hrs to trigger the end of the vegetative phase.
          Constant Target: FixedValue=30; Units=days
          LinearInterpolationFunction Progression: XProperty=[Phenology].Photoperiod.Value()
            XYPairs: X=[10, 11.5, 12, 13]; Y=[0, 0, 1, 1]
        GenericPhase Reproductive: Start=Flowering; End=Ripening
          Memo Description
            During this phase the plant is partitioning biomass to all organs, including reproductive organs (stems, flowers, and seeds). Flower stages and seeds development are not explicitly described in the current model, only a generic organ refered to as _inflorescence_ is defined.  This was done partly due to lack of data and partly because of the variability and complex phenology of plantain.  There is a lot of variation among plantain plants regarding when flowering occurs and how long it lasts, plus even the same plant can have flowering stalks, stalks with young seeds, as well as stalks with ripen seed at the same time ([Rowarth_Plantain_1990]; [RumballKeog_1997]; [LaceyRoach_2003]; [GonzalezParrado_2015]).  Seed ripenning is reached some 8-10 weeks after flowering, with commercial cultivars closer to the low end of the range.  The available data suggest an accumulation of 450oCd for the flowering period, with base temperature between 5 and 9oC ([Rowarth_Plantain_1990]; [RumballKeog_1997]; [GonzalezParrado_2015]).  Howerver flowering continues throughout the summer into autumn and seem to be curtailed only by frosts ([Rowarth_Plantain_1990]) and/or short days ([SandersonEtAl_2003]).  In the plantain model the photoperiod is used to define the end of reproductive phase, following the same approach used to start it.  And correspondelly, the accumulation of days shorter than 12 hours is used as the trigger the end of the phase (this approach also ensures phenology reset even in warmer climates).  Note that the DM partition functions also use photoperiod to change priority allocation into reproductive organs, with maximum allocation only when daylight length is greater than 14hours.  This was done to limit the allocation to reproductive organs on the sason shoulders when only few plants are actively in the reproductive phase (e.g. [SandersonEtAl_2003]).
          Constant Target: FixedValue=30; Units=days
          LinearInterpolationFunction Progression: XProperty=[Phenology].Photoperiod.Value()
            XYPairs: X=[10, 11, 12.5, 13]; Y=[1, 1, 0, 0]
        GotoPhase: Start=Ripening; End=Ripening; PhaseNameToGoto=Vegetative
          Memo Description
            At the end of reproductive phase, plantain phenology is reset to 'Vegetative'.
      OrganArbitrator Arbitrator
        RelativeAllocation NArbitrator
          Memo Description
            Controls the allocation of N to each of the plant's organs. Partition is based on:
        RelativeAllocation DMArbitrator
          Memo Description
            Controls the allocation of biomass to each of the plant's organs. Partition is based on:
      SimpleLeaf Leaf: CohortsInitialised=false; Albedo=0.18; Gsmax=0.015; R50=150; MicroClimatePresent=true; LeafInitialisationStage=Emergence
        zero: ApicalCohortNo, InitialisedCohortNo, TipsAtEmergence, CohortsAtInitialisation, AppearedCohortNo, PlantAppearedLeafNo, LAI, Height, FRGR, PotentialEP, KDead, LAIDead
        Memo Description
          __Note:__ this organ represents all the leaves in the plant, without distinction between ages or placement in the canopy.
        MultiplyFunction InitialWtFunction
          Constant InitialPlantWt: FixedValue=0.001; Units=g/plant
          VariableReference Population: VariableName=[Plant].Population
        Constant StructuralFraction: FixedValue=1; Units=g/g
        Constant MinimumNConc: FixedValue=0.015; Units=gN/gDM
        Constant MaximumNConc: FixedValue=0.055; Units=gN/gDM
        RUEModel Photosynthesis
          Memo Description
            Data for photosynthesys in plantain is very sparse and so some of the data used here are from studies that employed wild varieties.  Values for CO2 assimilation rates are generally consistent ([PootDenBroek_1997]; [LabreveuxThesis_2002]; [vanDenBergeEtAl_2014]; [CranstonEtAl_2015]) and follow a classic relationhip with light intensity (directly proportional) as well with N concentration in the leaves (inversely proportional).  Reported values of photosynthetic rate indicate that these are similar or slightly higher in plantain when compared to Chicory ([LabreveuxThesis_2002]; [CranstonEtAl_2015]).  No reported values for RUE were found in the literature, but they can be infered as to be just under 2.0 g DM/MJ for wild vareties ([PootDenBroek_1997]).
            The current model assumes generic responses to enviromental factors, such as temperature and water availability.  Wild plantain is ubiquitous in meadows in subtropical climates around the world, and it is generally assumed to be tollerant to high temperatures but not to cold ([SagarHarper_1964]; [StewartPlantain_1996]).  Forage plantain shows large differences between cultivars, but generally can grow more over winter compared to wild varieties and still outperform temperate grasses in summer ([StewartPlantain_1996]; [MoorheadPigot_2009], [DouglasEtAl_2013]), although survivability in harsh winters in the USA was found to be low ([SandersonEtAl_2003], [SkinnerPlantain_2005]).  Forage plantain is also often mentioned as a drought tollerant species ([StewartPlantain_1996]; [DouglasEtAl_2013]; [QuijadaThesis_2015]), although less so than deep rooted species such as chicory or lucerne.  The use of reserves from the taproots seem to be mechanism used to confer drought resistance in plantain as is the case for many herbs ([CranstonEtAl_2015]; [QuijadaThesis_2015]).
          Constant RUE: FixedValue=2; Units=g/MJ
          RUECO2Function FCO2: PhotosyntheticPathway=C3
          LinearInterpolationFunction FN: XProperty=[Leaf].Fn
            XYPairs: X=[0, 0.4, 0.8, 1.5]; Y=[0, 0.5, 1, 1]
          WeightedTemperatureFunction FT: MaximumTemperatureWeighting=0.75
            XYPairs: X=[4, 10, 15, 21, 27, 35]; Y=[0, 0.075, 0.35, 1, 1, 0]
          LinearInterpolationFunction FW: XProperty=[Leaf].Fw
            XYPairs: X=[0, 0.8, 1, 1.5]; Y=[0, 1, 1, 1]
          LinearInterpolationFunction FVPD: XProperty=[Leaf].Photosynthesis.VPD
            XYPairs: X=[0, 10, 50]; Y=[1, 1, 1]
          VariableReference RadnInt: VariableName=[Leaf].RadIntTot
        DivideFunction FRGRFunction
          Memo Description
            This parameter represents the Fractional Growth Rate.  It is needed by the MicroClimate model, where it is used to compute the effect of growth rate on transpiration.
          VariableReference Photosynthesis: VariableName=[Leaf].Photosynthesis.Value()
          MultiplyFunction PotentialPhotosynthesis
            VariableReference RUE: VariableName=[Leaf].Photosynthesis.RUE.Value()
            MaximumFunction Radiation
              VariableReference RadnInt: VariableName=[Leaf].RadIntTot
              Constant MinRadn: FixedValue=1E-05
        PartitionFractionDemandFunction DMDemandFunction
          Memo Description
            In the plantain model, the DM demand function attempts to keep the shoot to root ratio and then the stem to leaf ratio close to a target value (defined by the [TargetShootRootRatio].Value and [TargetStemsLeafRatio].Value), which may vary according to the phenolgical stage.  This approach ensures that the plantain plants will recovery after being cut or grazed.  In this case, biomass will be allocated to leaves preferably, even during reproductive phase.
          PhaseLookup PartitionFraction
            PhaseLookupValue Vegetative: Start=Emergence; End=Flowering
              DivideFunction LeafFraction: same as Replacements.Chicory.Leaf.DMDemandFunction.PartitionFraction.VegetativeAndInductive.LeafFraction
            PhaseLookupValue Reproductive: Start=Flowering; End=Ripening
              DivideFunction LeafFraction: same as Replacements.Chicory.Leaf.DMDemandFunction.PartitionFraction.StemElongationAndReproductive.LeafFraction
        Constant DMConversionEfficiency: FixedValue=1; Units=0-1
        Constant MaintenanceRespirationFunction: FixedValue=0; Units=0-1
        MultiplyFunction LAIFunction
          Constant SpecificLeafArea: FixedValue=0.022; Units=m^2/g
          VariableReference LiveLeafWeight: VariableName=[Leaf].Live.Wt
        MultiplyFunction LaiDeadFunction
          VariableReference SpecificLeafArea: VariableName=[Leaf].LAIFunction.SpecificLeafArea.Value()
          VariableReference DeadLeafWeight: VariableName=[Leaf].Dead.Wt
        Constant ExtinctionCoefficientFunction: FixedValue=0.6; Units=0-1
        LinearInterpolationFunction HeightFunction: XProperty=[Plantain].AboveGround.Wt
          Memo Description
            The average height of plantain is assumed here as a simple function of above ground biomass. Sward population and competition with other plant can have an influence on this relationship, but this is not currently accounted for by PMF.
          XYPairs: X=[10, 100, 500]; Y=[100, 350, 500]
        MultiplyFunction SenescenceRate
          Memo Description
            The sparse availabe data suggests that plantain has a relativelly slow senescence rate compared to other medow herbs ([CalviereDuru_1995]; [SchippersOlff_2000]).  Generic relationships to enviromental factors, such as temperature and soil moisture, are assumed based on other plant models.
          Constant ReferenceRate: FixedValue=0.005; Units=/day
          LinearInterpolationFunction StageFactor: XProperty=[Phenology].Stage
            XYPairs: X=[3, 4, 5]; Y=[0.5, 1, 1]
          LinearInterpolationFunction CoverFactor: XProperty=[Leaf].CoverTotal
            XYPairs: X=[0, 0.5, 0.9, 0.95, 0.99, 1]; Y=[1, 1, 1, 1.1, 2, 3]
          WeightedTemperatureFunction TemperatureFactor: MaximumTemperatureWeighting=0.5
            XYPairs: X=[-15, -2, 2, 10, 20, 30]; Y=[1.5, 0.25, 0, 0, 1, 1]
          LinearInterpolationFunction SoilMoistureFactor: XProperty=[Leaf].Fw
            XYPairs: X=[0, 0.5, 1]; Y=[2, 1, 1]
        MultiplyFunction DetachmentRateFunction
          Memo Description
            A generic relationship between detachment and soil moisture is assumed.  It implies that under dry conditions the detachment rate decreases due to the lower level of activity of decomposing microorganisms.
          Constant ReferenceRate: FixedValue=0.1; Units=/day
          LinearInterpolationFunction SoilMoistureFactor: XProperty=[Leaf].Fw
            XYPairs: X=[0, 0.5, 1]; Y=[0.5, 0.5, 1]
        Constant DMRetranslocationFactor: FixedValue=0; Units=/day
        Constant NRetranslocationFactor: FixedValue=0; Units=/day
        Constant NReallocationFactor: FixedValue=1; Units=/day
        BiomassRemoval BiomassRemovalDefaults: same as Replacements.Chicory.Leaf.BiomassRemovalDefaults
        Constant NitrogenDemandSwitch: FixedValue=1
        Constant DMReallocationFactor: FixedValue=0
        VariableReference CriticalNConc: VariableName=[Leaf].MinimumNConc.Value()
        Constant RemobilisationCost: FixedValue=0
        Constant CarbonConcentration: FixedValue=0.4
      GenericOrgan Stem
        Memo Description
          __Note:__ this represents all the stems/stalks in the plant, without distinction between ages or placement in the canopy.
        Constant InitialWtFunction: FixedValue=1E-06; Units=g/plant
        Constant StructuralFraction: FixedValue=1; Units=g/g
        Constant MinimumNConc: FixedValue=0.005; Units=gN/gDM
        Constant MaximumNConc: FixedValue=0.02; Units=gN/gDM
        PartitionFractionDemandFunction DMDemandFunction
          Memo Description
            A simple approach is used in the plantain model to define the allocation of biomass to various organs.  The proportion of the above ground biomass allocated to stems is determined based on the current state and two target ratios, the [TargetStemsLeafRatio].Value and [FlowerStemRatio].Value).  Allocation of biomass to stems can only occur during the reproductive phase.
          PhaseLookup PartitionFraction
            PhaseLookupValue Reproductive: same as Replacements.Chicory.Stem.DMDemandFunction.PartitionFraction.Reproductive
        Constant DMConversionEfficiency: FixedValue=1; Units=0-1
        Constant MaintenanceRespirationFunction: FixedValue=0; Units=0-1
        MultiplyFunction SenescenceRate
          Memo Description
            The reference senescence rate is adjusted using generic relationships to enviromental factors, such as temperature and soil moisture.  These are based on general knowledge from other plant models.
          Constant ReferenceRate: FixedValue=0.2; Units=/day
          LinearInterpolationFunction StageFactor: XProperty=[Phenology].Stage
            XYPairs: X=[3, 3.999, 4, 4.5, 4.75, 5]; Y=[1, 1, 0.5, 0.55, 0.75, 1]
          WeightedTemperatureFunction TemperatureFactor: MaximumTemperatureWeighting=0.5
            XYPairs: X=[-15, 0, 2, 10, 20, 30]; Y=[2, 0.2, 0, 0, 1, 1]
          LinearInterpolationFunction SoilMoistureFactor: XProperty=[Leaf].Fw
            XYPairs: X=[0, 0.5, 1]; Y=[2, 1, 1]
        MultiplyFunction DetachmentRateFunction
          Memo Description
            A generic relationship between detachment and soil moisture is assumed.  It implies that under dry conditions the detachment rate decreases due to the lower level of activity of decomposing microorganisms.
          Constant ReferenceRate: FixedValue=0.1; Units=/day
          LinearInterpolationFunction SoilMoistureFactor: XProperty=[Leaf].Fw
            XYPairs: X=[0, 0.5, 0.75, 1]; Y=[0.1, 0.1, 0.25, 1]
        Constant DMRetranslocationFactor: FixedValue=0; Units=/day
        Constant NRetranslocationFactor: FixedValue=0; Units=/day
        Constant NReallocationFactor: FixedValue=1; Units=/day
        BiomassRemoval BiomassRemovalDefaults
          OrganBiomassRemovalType Cut: FractionLiveToRemove=0.8; FractionDeadToRemove=0.65; FractionLiveToResidue=0; FractionDeadToResidue=0
          OrganBiomassRemovalType Graze: FractionLiveToRemove=0.8; FractionDeadToRemove=0.25; FractionLiveToResidue=0.1; FractionDeadToResidue=0.2
          OrganBiomassRemovalType Harvest: FractionLiveToRemove=0; FractionDeadToRemove=0; FractionLiveToResidue=0.1; FractionDeadToResidue=0.1
          OrganBiomassRemovalType Prune: FractionLiveToRemove=0; FractionDeadToRemove=0; FractionLiveToResidue=0.5; FractionDeadToResidue=0.2
        Constant NitrogenDemandSwitch: FixedValue=1
        Constant DMReallocationFactor: FixedValue=0
        VariableReference CriticalNConc: VariableName=[Stem].MinimumNConc.Value()
        Constant RemobilisationCost: FixedValue=0
        Constant CarbonConcentration: FixedValue=0.4
      GenericOrgan Inflorescence
        Memo Description
          __Note:__ this represents all the reproductive parts of the plant, flowers, pods, seed, etc. No distinction is made between ages or placement in the canopy.
        Constant InitialWtFunction: FixedValue=0; Units=g/m^2
        Constant StructuralFraction: FixedValue=1; Units=g/g
        Constant MinimumNConc: FixedValue=0.02; Units=gN/gDM
        Constant MaximumNConc: FixedValue=0.06; Units=gN/gDM
        PartitionFractionDemandFunction DMDemandFunction
          Memo Description
            The plantain model uses a  simple approach to define the allocation of biomass to various organs.  The fraction of the above ground biomass allocated to inflorescence is determined based on the current proprotion and two target ratios, the [TargetStemsLeafRatio].Value and [FlowerStemRatio].Value).  Allocation to inflorescence can only occur during the reproductive phase.
          PhaseLookup PartitionFraction: same as Replacements.Chicory.Inflorescence.DMDemandFunction.PartitionFraction
        Constant DMConversionEfficiency: FixedValue=1; Units=0-1
        Constant MaintenanceRespirationFunction: FixedValue=0; Units=0-1
        MultiplyFunction SenescenceRate
          Memo Description
            The sparse availabe data suggests that plantain has a relativelly slow senescence rate compared to other medow herbs ([CalviereDuru_1995]; [SchippersOlff_2000]).  Generic relationships to enviromental factors, such as temperature and soil moisture, are assumed based on other plant models.
          Constant ReferenceRate: FixedValue=0.25; Units=/day
          LinearInterpolationFunction StageFactor: XProperty=[Phenology].Stage
            XYPairs: X=[3, 3.99, 4, 4.5, 5]; Y=[1, 1, 0.5, 0.65, 1]
          WeightedTemperatureFunction TemperatureFactor: MaximumTemperatureWeighting=0.5
            XYPairs: X=[0, 5, 20, 30]; Y=[0, 0, 1, 1]
          LinearInterpolationFunction SoilMoistureFactor: XProperty=[Leaf].Fw
            XYPairs: X=[0, 0.5, 1]; Y=[2, 1, 1]
        MultiplyFunction DetachmentRateFunction: same as Replacements.Chicory.Inflorescence.DetachmentRateFunction
        Constant DMRetranslocationFactor: FixedValue=0; Units=/day
        Constant NRetranslocationFactor: FixedValue=0; Units=/day
        Constant NReallocationFactor: FixedValue=1; Units=/day
        BiomassRemoval BiomassRemovalDefaults
          OrganBiomassRemovalType Cut: FractionLiveToRemove=0.8; FractionDeadToRemove=0.25; FractionLiveToResidue=0; FractionDeadToResidue=0
          OrganBiomassRemovalType Graze: FractionLiveToRemove=0.8; FractionDeadToRemove=0.25; FractionLiveToResidue=0.1; FractionDeadToResidue=0.1
          OrganBiomassRemovalType Harvest: FractionLiveToRemove=0.8; FractionDeadToRemove=0.8; FractionLiveToResidue=0.1; FractionDeadToResidue=0.1
          OrganBiomassRemovalType Prune: FractionLiveToRemove=0; FractionDeadToRemove=0; FractionLiveToResidue=0.5; FractionDeadToResidue=0.25
        Constant NitrogenDemandSwitch: FixedValue=1
        Constant DMReallocationFactor: FixedValue=0
        VariableReference CriticalNConc: VariableName=[Inflorescence].MinimumNConc.Value()
        Constant RemobilisationCost: FixedValue=0
        Constant CarbonConcentration: FixedValue=0.4
      GenericOrgan Taproot
        Memo Description
          __Note:__ this represents all the taproots of the plant.
          Taproots are the primary reserve organs and will supply sugars and N to burst growth especially early in spring and following defoliation.  To accomplish this, the taproots' biomass is partioned into structural and non-structural fractions, the later is available to be used in new growth (via biomass retranslocation).  There is very few data on how much reserves are kept in plantain taproots, results from [QuijadaThesis_2015] suggest that sugars plus fructan made up 4-11% of taproots biomass compared to 15-35% in chicory, which is consistent with plantain having much smaller taproots.  Based on these values, and some trial and error, the parameters related to retranslocation (StructuralFraction, DMRetranslocationFactor, and NRetranslocationFactor) were estimated.  These should be upgraded when more data is made available.
        Constant InitialWtFunction: FixedValue=0; Units=g/m^2
        Constant StructuralFraction: FixedValue=0.1; Units=g/g
        Constant MinimumNConc: FixedValue=0.007; Units=gN/gDM
        Constant MaximumNConc: FixedValue=0.02; Units=gN/gDM
        PartitionFractionDemandFunction DMDemandFunction
          Memo Description
            The plantain model computes the allocation of biomass to taproots assuming that there is a target ratio the biomass of root and taproot (defined by [TaprootRootRatio].Value).  The existing literature does not provide values for this parameter, and based on other herbs, such as chicory, a simple value which is further modified by plant specific biomass is assumed in the model. This should be update when more data becomes available.
          PhaseLookup PartitionFraction: same as Replacements.Chicory.Taproot.DMDemandFunction.PartitionFraction
        Constant DMConversionEfficiency: FixedValue=1; Units=0-1
        Constant MaintenanceRespirationFunction: FixedValue=0; Units=0-1
        MultiplyFunction SenescenceRate
          Memo Description
            The reference senescence rate is adjusted according to enviromental factors, temperature and soil moisture.  Currently only sensitivity to temperature is considered, based on general knowledge from other plant models. The sensitivity of plantain roots to low moisture or water logging is not clear , so this will have to be upgrade in the future when more data is available.  According to [SagarHarper_1964], *P. major*, a similar species, is more tolerant to water logging than *P. lanceolata*, which rarely occurs in water logged sites ([vanTiederen_1992]).
          Constant ReferenceRate: FixedValue=0.001; Units=/day
          WeightedTemperatureFunction TemperatureFactor: MaximumTemperatureWeighting=0.5
            XYPairs: X=[0, 5, 22, 30]; Y=[0, 0, 1, 1]
          LinearInterpolationFunction SoilMoistureFactor: XProperty=[Leaf].FW
            XYPairs: X=[0, 0.5, 1]; Y=[1, 1, 1]
          Constant SoilAerationFactor: FixedValue=1; Units=0-1
        Constant DetachmentRateFunction: FixedValue=1; Units=/day
        Constant DMRetranslocationFactor: FixedValue=0.15; Units=/day
        Constant NRetranslocationFactor: FixedValue=0.2; Units=/day
        Constant NReallocationFactor: FixedValue=1; Units=/day
        BiomassRemoval BiomassRemovalDefaults: same as Replacements.Chicory.Taproot.BiomassRemovalDefaults
        Constant NitrogenDemandSwitch: FixedValue=1
        Constant DMReallocationFactor: FixedValue=0
        VariableReference CriticalNConc: VariableName=[Taproot].MinimumNConc.Value()
        Constant RemobilisationCost: FixedValue=0
        Constant CarbonConcentration: FixedValue=0.4
      Root: GrowthRespiration=0; MaintenanceRespiration=0
        Memo Description
          __Note:__ this represents all the fine roots of the plant.  The root organ demands and is partitioned N and DM and its depth increases through time to provide a water uptake supply
          Memo Description
            This represents all the fine roots of the plant.  The root organ demands and is partitioned N and DM and its depth increases through time to provide a water uptake supply
        MultiplyFunction InitialDM
          Constant InitialRootWt: FixedValue=0.001; Units=g/plant
          VariableReference Population: VariableName=[Plant].Population
        Constant StructuralFraction: FixedValue=1; Units=g/g
        Constant MinimumNConc: FixedValue=0.005; Units=gN/gDM
        Constant MaximumNConc: FixedValue=0.015; Units=gN/gDM
        PhaseBasedSwitch NitrogenDemandSwitch: Start=Germination; End=Ripening
        Constant MaximumRootDepth: FixedValue=1000; Units=mm
        PhaseLookup RootFrontVelocity
          PhaseLookupValue PreEmergence: Start=Germination; End=Emergence
            Constant ReferenceVelocity: FixedValue=5; Units=mm/day
          PhaseLookupValue Vegetative: Start=Emergence; End=Flowering
            Constant ReferenceVelocity: FixedValue=10; Units=mm/day
          PhaseLookupValue Reproductive: Start=Flowering; End=Ripening
            Constant ReferenceVelocity: FixedValue=7.5; Units=mm/day
        Constant TemperatureEffect: FixedValue=1
          Memo
            No effect of temperature on root growth is currently captured in the model.
        Constant SoilWaterEffect: FixedValue=1
          Memo
            No effect of soil water content on root growth is currently captured in the model.
        Constant SpecificRootLength: FixedValue=100; Units=m/g
        MultiplyFunction SenescenceRate
          Memo Description
            The reference senescence rate is adjusted according to enviromental factors, temperature and soil moisture.  Currently only sensitivity to temperature is considered, based on general knowledge from other plant models. The sensitivity of plantain roots to low moisture or water logging is not clear (according to [SagarHarper_1964], *P. major* is more tolerant to water logging than *P. lanceolata*) , so this will have to be upgrade in the future when more data is available.
          Constant ReferenceRate: FixedValue=0.005; Units=/day
          WeightedTemperatureFunction TemperatureFactor: MaximumTemperatureWeighting=0.5
            XYPairs: X=[0, 5, 20, 30]; Y=[0, 0, 1, 1]
          LinearInterpolationFunction SoilMoistureFactor: XProperty=[Leaf].FW
            XYPairs: X=[0, 0.5, 1]; Y=[1, 1, 1]
          Constant SoilAerationFactor: FixedValue=1
        Constant DMRetranslocationFactor: FixedValue=0; Units=/day
        Constant NRetranslocationFactor: FixedValue=0; Units=/day
        Constant NReallocationFactor: FixedValue=0; Units=/day
        LinearInterpolationFunction KLModifier: XProperty=[Root].LengthDensity
          Memo
            No adjustment of KL are considered for plantain at this stage.  More analyses, preferebly with support from data specific to this issue, are needed to improve the description of this relationship.
            Memo Description
              This represents all the fine roots of the plant.  The root organ demands and is partitioned N and DM and its depth increases through time to provide a water uptake supply
          XYPairs: X=[0, 1]; Y=[1, 1]
        LinearInterpolationFunction KNH4: XProperty=[Root].LengthDensity
          XYPairs: X=[0, 0.003]; Y=[0.01, 0.02]
        LinearInterpolationFunction KNO3: XProperty=[Root].LengthDensity
          XYPairs: X=[0, 0.003]; Y=[0.02, 0.03]
        Constant MaxDailyNUptake: FixedValue=10; Units=kgN/ha
        LinearInterpolationFunction NUptakeSWFactor: XProperty=[Root].RWC
          XYPairs: X=[0, 0.5, 1]; Y=[0, 1, 1]
        BiomassRemoval BiomassRemovalDefaults: same as Replacements.Chicory.Root.BiomassRemovalDefaults
        PartitionFractionDemandFunction DMDemandFunction
          PhaseLookup PartitionFraction
            Memo Description
              The allocation of biomass below ground follows a simple approach in the plantain model.  The amount allocated to roots is computed based on current proportion and two target ratios (the [TargetShootRootRatio].Value and [TaprootRootRatio].Value).  There is little information in the literature about these parameters and they should vary with cultivar. Currently the model will attempt to keep a given proportion in ach organ, ho these porportions vary should be update when more data becomes available.
            PhaseLookupValue AllPhases: same as Replacements.Chicory.Root.DMDemandFunction.PartitionFraction.AllPhases
        Constant DMConversionEfficiency: FixedValue=1
        Constant MaintenanceRespirationFunction: FixedValue=1
        Constant RemobilisationCost: FixedValue=0
        Constant CarbonConcentration: FixedValue=0.4
      CompositeBiomass AboveGround: DMDOfStructural=0.6
        Propertys=[[Leaf].Live, [Leaf].Dead, [Stem].Live, [Stem].Dead, [Inflorescence].Live, [Inflorescence].Dead]
      CompositeBiomass AboveGroundLive: DMDOfStructural=0.6; Propertys=[[Leaf].Live, [Stem].Live, [Inflorescence].Live]
      CompositeBiomass BelowGround: DMDOfStructural=0.6; Propertys=[[Root].Live, [Root].Dead, [Taproot].Live, [Taproot].Dead]
      CompositeBiomass BelowGroundLive: DMDOfStructural=0.6; Propertys=[[Root].Live, [Taproot].Live]
      CompositeBiomass Total: DMDOfStructural=0.6
        Propertys=[[Leaf].Live, [Leaf].Dead, [Stem].Live, [Stem].Dead, [Inflorescence].Live, [Inflorescence].Dead, [Root].Live, [Root].Dead, [Taproot].Live, [Taproot].Dead]
      DivideFunction PerPlantBelowGroundWt
        Memo Description
          This represents the live biomass dry weight below ground for a specific plant (in g/plant)
        VariableReference BelowGroundWt: VariableName=[BelowGroundLive].Wt
        VariableReference Population: VariableName=[Plantain].Population
      PhaseLookup ShootRootRatio
        PhaseLookupValue AllPhases: Start=Emergence; End=Ripening
          DivideFunction CurrentSR
            VariableReference AbogeGroundDM: VariableName=[AboveGroundLive].Wt
            VariableReference BelowGroundDM: VariableName=[BelowGroundLive].Wt
      PhaseLookup TargetShootRootRatio
        Memo Description
          To ensure prompt regrowth of forage plantain after a defoliation, the model will adjust the allocation of new growth following any defoliation event. This is a simplified approach to biomass allocation plasticity (e.g. [Wilson_1988]; [LevangBrilz_2002]), it assumes that the plant switches allocation of towards leaves whenever the current shoot:root ratio differs from the target value.
          Published data for the shoot:root ratio in plantain is highly variable, with values as low as 1.0 for wild varieties and as high as 6.0 for seedlings of commercial cultivars with no water of nutrient limitations ([SchippersOlff_2000]; [LabreveuxThesis_2002]; [CranstonEtAl_2015]; [PankokeEtAl_2015]).  The data suggests mean values to be around 1.75-2.0 for adult plants.  This value is likely to be affected by environmental conditions, with water or nutrient deficit favouring root growth, while low light conditions leading to higher allocation above ground. However, these relationships can vary considerably in different plants and there is little data for plantain, so the model current ignores the influence of environmental factors on the shoot:root partition, this should be upgraded when data becomes available.
        PhaseLookupValue Vegetative: Start=Emergence; End=Flowering
          Constant TargetSR: FixedValue=1.75; Units=g/g
        PhaseLookupValue Reproductive: Start=Flowering; End=Ripening
          AddFunction TargetSR
            VariableReference MinTargetSR: VariableName=[TargetShootRootRatio].Vegetative.TargetSR.Value()
            MultiplyFunction PlusTarget
              SubtractFunction DeltaTarget
                Constant MaxTargetSR: FixedValue=2; Units=g/g
                VariableReference MinTargetSR: VariableName=[TargetShootRootRatio].Vegetative.TargetSR.Value()
              LinearInterpolationFunction PhotoperiodEffect: XProperty=[Phenology].Photoperiod.Value()
                XYPairs: X=[11, 12, 13, 13.75, 14, 15]; Y=[0, 0, 0.25, 0.85, 1, 1]
      PhaseLookup StemsLeafRatio
        PhaseLookupValue Reproductive: Start=Flowering; End=Ripening
          DivideFunction CurrentSL: same as Replacements.Chicory.StemsLeafRatio.AllPhasesWithStems.CurrentSL
      PhaseLookup TargetStemsLeafRatio
        Memo Description
          The  plantain model defines allocation of biomass above ground following a simple approach, it attempts to keep a given proportion among the various organs.  The allocation of biomass to leaves is defined primarily by the target shoo:root ratio, but during the reproductive phase, the partition is further modified based on the ratio of stems+inflorescence to leaves. This ratio may be affected by defoliation ([AyalaEtAl_2011]; [QuijadaThesis_2015]) and is probably affected by enviromental factors too. There is not enough data to describe these interactions.
          Published results suggest that reproductive parts represent a relatively small proportion of the biomass, about 10-25% in grazed swards, and about 40% if not grazed ([SchippersOlff_2000]; [LabreveuxThesis_2002]; [MoorheadPigot_2009]; [AyalaEtAl_2011]).
        PhaseLookupValue Reproductive: Start=Flowering; End=Ripening
          MultiplyFunction TargetSL
            Constant MaximumSL: FixedValue=0.25; Units=g/g
            LinearInterpolationFunction PhotoperiodEffect: XProperty=[Phenology].Photoperiod.Value()
              XYPairs: X=[11, 12.5, 13.25, 13.75, 14, 15]; Y=[0, 0, 0.2, 0.8, 1, 1]
      PhaseLookup FlowerStemRatio: same as Replacements.Chicory.FlowerStemRatio
      PhaseLookup TargetFlowerStemRatio
        Memo Description
          The allocation of biomass follows a simple approach in the plantain model.  Allocation during the reproductive phase will attempt to keep a ratio between stem and inflorescence biomass.  This ratio is probably affected by enviromental factors, but there is not data to determine how these would interact.  Because of the short period between stem elongation, flowering and seed maturity, and a relatively long reproductive phase, plantain plants will have ripe seeds as well as young stalks at the same time.  This makes quite difficult to define variation in biomass allocation to inflorescence.  Inference from published values suggest that the ratio of flower biomass to stems varies from around 0.1 to nearly 0.4 ([SchippersOlff_2000]).
        PhaseLookupValue Reproductive: Start=Flowering; End=Ripening
          MultiplyFunction TargetFS
            Constant MaximumFS: FixedValue=0.25; Units=g/g
            LinearInterpolationFunction PhotoperiodEffect: XProperty=[Phenology].Photoperiod.Value()
              XYPairs: X=[11, 12.75, 13.25, 13.75, 14, 15]; Y=[0, 0, 0.1, 0.75, 1, 1]
      PhaseLookup TaprootRootRatio: same as Replacements.Chicory.TaprootRootRatio
      PhaseLookup TargetTaprootRootRatio
        Memo Description
          The plantain model assumes that biomass is allocated so to mantain a given proportion of among the various organs (varying with phenological phase and other factors).  The ratio between taproot and root biomass is assumed to vary, increasing with the biomass below ground per plant, approaching a maximum target.  This is a simple approach and can describe the general behaviour of plantain plants, it may be upgraded if deemed necessary when more data becomes available.
        PhaseLookupValue AllPhases: Start=Emergence; End=Ripening
          MultiplyFunction TargetTR
            Constant MaximumTR: FixedValue=1; Units=g/g
            LinearInterpolationFunction BiomassFactor: XProperty=[PerPlantBelowGroundWt].Value()
              XYPairs: X=[0, 0.025, 0.1, 0.25, 0.5, 1, 1.5]; Y=[1E-05, 1E-05, 0.4, 0.75, 0.95, 1, 1]
      CultivarFolder Cultivars
        Cultivar Tonic
          Memo Description
            *Tonic* is the basic forage plantain cultivar. It was develop later than *Lancelot* and was developed from a northern Portugal germplasm. It has very erect and large leaves, produce less tillers than *Lancelot* and perhaps less seed heads.  *Tonic* cultivar is heat tolerante and also witnter active, typically with higher yields when compared to *Lancelot*.
        Cultivar Lancelot
          Command:
            [Leaf].Photosynthesis.FT.XYPairs.X = 5, 10, 15, 21, 27, 35
            [Leaf].Photosynthesis.FT.XYPairs.Y = 0.0, 0.04, 0.3, 1.0, 1.0, 0.0
            [Leaf].HeightFunction.XYPairs.X = 10, 100, 500
            [Leaf].HeightFunction.XYPairs.Y = 100, 300, 400
          Memo Description
            *Lancelot* is the first forage plantain cultivar released, it was selected from New Zealand pastures. It has a semi-erect growth habit, medium to large leaves, and produce many tillers.  This cultivar has good heat tolerance but growth is low over winter.  *Lancelot*  has been used for many years as grazing forage, in monoculture or in mixed swards, in several countries worldwide.  However, currently the most common cultivar is *Tonic*.
    Plant Potato: CropType=Potato
      Memo TitlePage
        # The APSIM Potato Model

        _Brown, H.E., Huth, N.I. and Holzworth, D.P._

        #Building the model.
        The APSIM potato model has been described in part by [Brown_etal_2011] and developed using the Plant Modelling Framework (PMF) of [brown_plant_2014]. This new framework provides a library of plant organ and process submodels that can be coupled, at runtime, to construct a model in much the same way that models can be coupled to construct a simulation. This means that dynamic composition of lower level process and organ classes (e.g. photosynthesis, leaf) into larger constructions (e.g. maize, wheat, sorghum) can be achieved by the model developer without additional coding.

        The model consists of:

        * a phenology model to simulate development between growth phases
        * a structure model to simulate plant morphology
        * a collection of organs to simulate the biomass (N and Weight) of various plant parts
        * an arbitrator to allocate biomass to the various plant organs

        #Pecularities of potato
        Potato is a challenging crop to model because it is vegetatviely propigated.  For seed propigated crops, plants are always equally dormant at planting and their development begins from there.  With potato the physiological status of the seed tubers vary depending on:

        * the conditions the mother plant encountered late in its life (Stress, Desication etc)
        * the conditions that the tuber was stored in (Cool store, ground store, dry store etc)
        * treatment of the seed prior to planting (chitting, cutting etc).

        All of these factors infuence the developmental behaviour of the crop that is produced including:

        * The timing of emergence
        * The number of stems produced per plant and subsequent tuber number and canopy development
        * The timing of tuber initiation and subsequent growth and partitioning
        * The duration of haulm growth and subsequent tuber filling duration

        There are an enormous number of potato cultivars and they all differ in their responses of post planting behavour due to pre planting seed conditions, there is not a good quantitative understanding of how environment and managemet of seed potato prior to planting influences post planting behaviour and it is beyond the scope of the current APSIM infrastructure to provide environmental conditions during storage of seed.  We have tried but with a list of excuses this long we have not yet succeeded in building the effects of seed physiology into the potato model in anything other than a very elementry way.  However, it is possible to set the model up to capture seed effects for specific simulations.

        #Including a potato crop in an APSIM simulation
        There is a Potato example simulation available by clicking the "Open an Example" icon available on the first tab displayed when APSIM Next Gen is opened.  This provides a useful demonstration of how to simulate a potato crop and provides some useful graphs for viewing models predictions.
        To incluce a potato crop in a simulation the "Potato" model needs to be added to the paddock, field or zone in which it is to be grown.  This can be done by right clicking on the "Paddock", selecting "Add" from the drop down menu and then selecting "Potato" from the list that comes up.  A sowing action also needs to be set to start the crop off and a harvest event to remove the potato crop so the next crop can be simulated.  The "PotatoPlantAndHarvest" manager module that is included in the "Potato" example simulation has script written to instigate these events and can be copied from the example simulation into other simulations.
        ##Setting sowing depth (emergence date)
        The potato model predicts emergence date as a function of sowing depth and all subsequent phenology is dependent on this timing.  Because this date is effected by seed physiology and can't yet be modeled we recommend that planting depth is not set at the actual planting depth, but varied to ensure the model predicts a realistic emergence date.  Planting depth is set in the 'PotatoPlantAndHarvest' module
        ##Setting stem number (tuber number and early canopy growth)
        The 'PotatoPlantAndHarvest' script sets the "Number of stems per seed piece".  This varies enormiously due to seed physiology and variety and should be set to a number that is realistic for the cultivar being simulated and the pre-planting treatment of the seed tubers.  This parameter influences tuber number and the early development of the canopy so should be set carefully.
        ##Setting final leaf number (Crop duration)
        The duration of a potato crop is determined by the number of leaves that the mainstem produces and how long it takes for these to appear and seness.  This responds to photoperiod in many varieties and is influenced by the pre-planting treatment of seed tubers.  As such this parameter is given a default value for each cultivar but can also be set in the "PotatoPlantAndHarvest" script if more is know about the expected determinany of the potatoes under the circumstances being simulated.  Please read  [Brown_etal_2011] for a clear definition of final leaf number.
      Phenology
        AirTemperatureFunction ThermalTime
          Memo
            Thermal time drives progress through all phenological phases, including those which are driven by leaf apparance and senescence.  The base temperature of  2 degrees was determined by [Brown_etal_2011] and [Oliveria_2015] and the upper threshold of 30 degrees is from [VanKeulen_1995].  The optimum of 20 degrees was determined in an unpublished model fitting exercise (Brown pers com).
          XYPairs: X=[2, 20, 30]; Y=[0, 18, 0]
        GenericPhase Dormant: Start=Planting; End=Peeping
          VariableReference Progression: VariableName=[Phenology].ThermalTime.Value()
          Constant Target: FixedValue=1
          Memo
            This phase is currenttly set with a very short duration and is a place holder until we have a suitalbe method for modelling tuber dormancy
        EmergingPhase Sprouting: ShootLag=72; ShootRate=1.35; Start=Peeping; End=Emergence; TTForTimeStep=0
          VariableReference ThermalTime: VariableName=[Phenology].ThermalTime.Value()
          Memo
            The sprouting phase controls when the crop emerges.  In potato this is influenced by the physiological state of the seed tuber when it is planted.  This is difficult to model as the seed tubers physiological status begins when it is still on the mother plant and is influenced by the treatment of the mother plant, the storage conditions of the tuber, conditions when the seed is being prepared for planting and the variety of potato.  There is currently no good way of modelling this as it would require environmental information from beyond the field where the crop is to be grown which is currently beyond the scope of APSIM.  In the absence of something more elegent, we recommend that the user adjusts sowing depth to achieve a realistic emergence date and let the model deal with phenological develpment there after.
        GenericPhase Vegetative: Start=Emergence; End=TuberInitiation
          Constant Target: FixedValue=300
          VariableReference Progression: VariableName=[Phenology].ThermalTime.Value()
          Memo
            During the *Vegetative Phase* the crop is only growing stem, root and leaf.  Tuber initiation usually occurs soon after *Emergence* and the duration of this phase can be influenced by the physiological status of the seed tuber at planting.  As discussed above, we do not have a suitable method for modelling this yet so we have treated the time from emergence to tuber initiation as a thermal time constant.
        LeafAppearancePhase EarlyTuber: Start=TuberInitiation; End=FinalLeaf
          Memo
            The *FinalLeafNumber* responds to photoperiod in many varieties and is influenced by the pre-planting treatment
            of seed tubers. Therefore *FinalLeafNumber* is given a default value for each cultivar but can also be set in the
            "PotatoPlantAndHarvest" script if more is know about the expected determinany of the potatoes under the circumstances being simulated.
        LeafDeathPhase LateTuber: Start=FinalLeaf; End=FullSenescence
        GenericPhase Senesced: Start=FullSenescence; End=Maturity
          Constant Target: FixedValue=200
          VariableReference Progression: VariableName=[Phenology].ThermalTime.Value()
          Memo
            During this phase the potato crop has no live shoots above ground but the tubers may be left in the ground to allow their skins to harden so they are not damaged by mechanical digging.
        EndPhase Maturity: Start=Maturity; End=Eternity
          VariableReference ThermalTime: VariableName=[Phenology].ThermalTime.Value()
      OrganArbitrator Arbitrator
        PrioritythenRelativeAllocation NArbitrator
        RelativeAllocation DMArbitrator
      Structure: CohortInitialisationStage=Peeping; LeafInitialisationStage=Emergence
        VariableReference ThermalTime: VariableName=[Phenology].ThermalTime.Value()
        PhaseLookup Phyllochron
          PhaseLookupValue Phyllochron: Start=Emergence; End=FinalLeaf
            LinearInterpolationFunction Phyllochron: XProperty=[Structure].RelativeNodeApperance
              XYPairs: X=[0, 0.15, 0.74, 0.75, 1]; Y=[20, 30, 30, 60, 60]
        Constant FinalLeafNumber: FixedValue=34
          Memo
            A default *FinalLeafNumber* is given for Potato but most cultivars overwrite this with different values and it may also be overwritten in the sowing rule as described in the section "Including a potato crop in an APSIM simulation" above.
        LinearInterpolationFunction HeightModel: XProperty=[Stem].Live.Wt
          XYPairs: X=[0, 200, 1200, 4000]; Y=[20, 300, 700, 900]
        MultiplyFunction BranchingRate
          LinearInterpolationFunction PotentialBranchingRate: XProperty=[Structure].LeafTipsAppeared
            XYPairs: X=[0, 7, 8, 13, 14, 34]; Y=[0, 0, 0.5, 0.5, 0, 0]
          LinearInterpolationFunction CrowdingFunction: XProperty=[Leaf].CoverGreen
            XYPairs: X=[0, 0.4, 0.55, 0.8, 1]; Y=[1, 1, 0.45, 0, 0]
          Memo
            Branching rate is calculated as the product of a potential brainching rate, which specifies the branching pattern of widely spaces plants, and a crowding function which decreases branching rate as green cover increases.
        Constant BranchMortality: FixedValue=0
        Constant StemSenescenceAge: FixedValue=0
      GenericOrgan Tuber
        PhaseLookup DMDemandFunction
          PhaseLookupValue TuberFilling: Start=TuberInitiation; End=Maturity
            MultiplyFunction DailyDemand
              MultiplyFunction OrganNumber
                Constant TuberNumberPerStem: FixedValue=5
                VariableReference: VariableName=[Structure].MainStemPopn
              MultiplyFunction PotentialGrowthIncrement
                LinearInterpolationFunction PotentialGrowthIncrementPer_oCd: XProperty=[Phenology].Stage
                  XYPairs: X=[4, 4.04, 4.32, 4.52, 4.95, 6.54]; Y=[0.017, 0.017, 0.06, 0.06, 0.018, 0]
                AirTemperatureFunction ThermalTime
                  XYPairs: X=[2, 20, 35]; Y=[0, 18, 0]
        Constant SenescenceRate: FixedValue=0; Units=/d
        DivideFunction LiveFWt
          VariableReference: VariableName=[Tuber].Live.Wt
          LinearInterpolationFunction DryMatterContent: XProperty=[Phenology].Stage
            XYPairs: X=[4, 4.5]; Y=[0.13, 0.22]
            Memo
              Defalt values are set for *DryMatterContent* but this is normally overwritten in the cultivar description
        LinearInterpolationFunction MaximumNConc: XProperty=[Phenology].Stage
          XYPairs: X=[3, 4, 5, 6]; Y=[0.023, 0.023, 0.018, 0.015]
        LinearInterpolationFunction MinimumNConc: XProperty=[Phenology].Stage
          XYPairs: X=[4, 4.1, 7]; Y=[0.02, 0.006, 0.006]
        BiomassRemoval BiomassRemovalDefaults: same as Replacements.Maize.Husk.BiomassRemovalDefaults
        Constant InitialWtFunction: FixedValue=0; Units=g/m^2
        Constant StructuralFraction: FixedValue=1; Units=g/g
        Constant DetachmentRateFunction: FixedValue=0; Units=/d
        Constant NReallocationFactor: FixedValue=0
        Constant MaintenanceRespirationFunction: FixedValue=0; Units=0-1
        Constant DMConversionEfficiency: FixedValue=1; Units=0-1
        Constant NRetranslocationFactor: FixedValue=0
        Constant NitrogenDemandSwitch: FixedValue=1
        Constant DMReallocationFactor: FixedValue=0
        Constant DMRetranslocationFactor: FixedValue=0
        VariableReference CriticalNConc: VariableName=[Tuber].MinimumNConc.Value()
        Constant RemobilisationCost: FixedValue=0
        Constant CarbonConcentration: FixedValue=0.4
      Root: GrowthRespiration=0; MaintenanceRespiration=0
        PhaseBasedSwitch NitrogenDemandSwitch: Start=Planting; End=FinalLeaf
        PhaseLookup RootFrontVelocity
          PhaseLookupValue: Start=Peeping; End=FinalLeaf
            Constant: FixedValue=10
        Constant MaximumNConc: FixedValue=0.01
        Constant MaxDailyNUptake: FixedValue=6
        Constant MinimumNConc: FixedValue=0.01
        Constant MaximumRootDepth: FixedValue=1000000
        LinearInterpolationFunction SenescenceRate: XProperty=[Leaf].FractionDied
          XYPairs: X=[0, 1]; Y=[0, 0.1]
        LinearInterpolationFunction NUptakeSWFactor: XProperty=[Root].RWC
          XYPairs: X=[0, 0.25, 1]; Y=[0, 1, 1]
        Constant KNO3: FixedValue=0.03
        Constant KNH4: FixedValue=0.03
        BiomassRemoval BiomassRemovalDefaults
          OrganBiomassRemovalType Harvest: FractionLiveToRemove=0; FractionDeadToRemove=0; FractionLiveToResidue=0.2; FractionDeadToResidue=0
          OrganBiomassRemovalType Cut: FractionLiveToRemove=0; FractionDeadToRemove=0; FractionLiveToResidue=0.3; FractionDeadToResidue=0
          OrganBiomassRemovalType Prune: FractionLiveToRemove=0; FractionDeadToRemove=0; FractionLiveToResidue=0.1; FractionDeadToResidue=0
          OrganBiomassRemovalType Graze: FractionLiveToRemove=0; FractionDeadToRemove=0; FractionLiveToResidue=0.15; FractionDeadToResidue=0
          OrganBiomassRemovalType Thin: FractionLiveToRemove=0; FractionDeadToRemove=0; FractionLiveToResidue=0.05; FractionDeadToResidue=0
        Constant InitialDM: FixedValue=5; Units=g/plant
        Constant SpecificRootLength: FixedValue=40; Units=m/g
        PartitionFractionDemandFunction DMDemandFunction
          PhaseLookup PartitionFraction
            PhaseLookupValue: Start=Emergence; End=TuberInitiation
              Constant: FixedValue=0.3
            PhaseLookupValue: Start=TuberInitiation; End=FinalLeaf
              Constant: FixedValue=0.05
            PhaseLookupValue: Start=FinalLeaf; End=FullSenescence
              Constant: FixedValue=0
        Constant KLModifier: FixedValue=1
          Memo
            KL is not modified by any plant or soil attribute and so a constant value of 1 is used for this KL modifier.
        Constant DMConversionEfficiency: FixedValue=1
        Constant MaintenanceRespirationFunction: FixedValue=1
        Constant RemobilisationCost: FixedValue=0
        Constant CarbonConcentration: FixedValue=0.4
      Leaf: CurrentExpandingLeaf=34; StartFractionExpanded=0.83819; FractionNextleafExpanded=0.926641; DeadNodesYesterday=0; MaxCover=1; GrowthRespiration=0; Albedo=0.26; Gsmax=0.03; R50=200; FRGR=0; PotentialEP=0; MicroClimatePresent=true; KDead=0.3; MaximumMainStemLeafNumber=40; TipsAtEmergence=0; CohortsAtInitialisation=0; FractionDied=0
        VariableReference ThermalTime: VariableName=[Phenology].ThermalTime.Value()
        LeafCohort InitialLeaf1: Rank=1; Area=900
          zero: NReallocationFactor, DMReallocationFactor, NRetranslocationFactor, DMRetranslocationFactor, ShadeInducedSenRate, SenescedFrac, DeltaPotentialArea, DeltaStressConstrainedArea, DeltaCarbonConstrainedArea, PotentialStructuralDMAllocation, PotentialMetabolicDMAllocation, MetabolicNReallocated, MetabolicWtReallocated, StorageNReallocated, StorageWtReallocated, MetabolicNRetranslocated, StorageNRetrasnlocated, DMRetranslocated, MetabolicNAllocation, StructuralDMAllocation, MetabolicDMAllocation, MaintenanceRespiration
        LeafCohort InitialLeaf2: Rank=2; Area=600
          zero: NReallocationFactor, DMReallocationFactor, NRetranslocationFactor, DMRetranslocationFactor, ShadeInducedSenRate, SenescedFrac, DeltaPotentialArea, DeltaStressConstrainedArea, DeltaCarbonConstrainedArea, PotentialStructuralDMAllocation, PotentialMetabolicDMAllocation, MetabolicNReallocated, MetabolicWtReallocated, StorageNReallocated, StorageWtReallocated, MetabolicNRetranslocated, StorageNRetrasnlocated, DMRetranslocated, MetabolicNAllocation, StructuralDMAllocation, MetabolicDMAllocation, MaintenanceRespiration
        LeafCohort InitialLeaf3: Rank=3; Area=300
          zero: NReallocationFactor, DMReallocationFactor, NRetranslocationFactor, DMRetranslocationFactor, ShadeInducedSenRate, SenescedFrac, DeltaPotentialArea, DeltaStressConstrainedArea, DeltaCarbonConstrainedArea, PotentialStructuralDMAllocation, PotentialMetabolicDMAllocation, MetabolicNReallocated, MetabolicWtReallocated, StorageNReallocated, StorageWtReallocated, MetabolicNRetranslocated, StorageNRetrasnlocated, DMRetranslocated, MetabolicNAllocation, StructuralDMAllocation, MetabolicDMAllocation, MaintenanceRespiration
        LeafCohortParameters CohortParameters: ExpansionStressValue=0
          Constant SenessingLeafRelativeSize: FixedValue=1; Units=0-1
          LinearInterpolationFunction MaxArea: XProperty=[Structure].RelativeNodeApperance
            XYPairs: X=[0, 0.15, 0.3, 0.44, 0.59, 0.73]; Y=[2000, 18000, 27000, 15000, 6000, 1500]
          LinearInterpolationFunction GrowthDuration: XProperty=[Structure].RelativeNodeApperance
            XYPairs: X=[0, 0.3, 0.4, 1]; Y=[200, 400, 400, 400]
          LinearInterpolationFunction LagDuration: XProperty=[Structure].RelativeNodeApperance
            XYPairs: X=[0, 0.15, 0.3, 0.4, 0.73, 1]; Y=[350, 350, 350, 350, 350, 20]
          LinearInterpolationFunction SenescenceDuration: XProperty=[Structure].RelativeNodeApperance
            XYPairs: X=[0, 0.15, 0.3, 0.4, 0.73, 1]; Y=[350, 350, 350, 350, 350, 100]
          Constant DetachmentLagDuration: FixedValue=1000000
          Constant DetachmentDuration: FixedValue=1000000
          LinearInterpolationFunction SpecificLeafAreaMax: XProperty=[Structure].RelativeNodeApperance
            XYPairs: X=[0, 1]; Y=[40000, 25000]
          Constant SpecificLeafAreaMin: FixedValue=25000
          Constant StructuralFraction: FixedValue=0.5
          Constant MaximumNConc: FixedValue=0.07
          Constant MinimumNConc: FixedValue=0.03
          Constant InitialNConc: FixedValue=0
          Constant NReallocationFactor: FixedValue=1
          Constant NRetranslocationFactor: FixedValue=0.01
          LinearInterpolationFunction ExpansionStress: XProperty=[Potato].Leaf.Fw
            XYPairs: X=[0.5, 1]; Y=[0, 1]
          Constant CriticalNConc: FixedValue=0.05
          Constant DMRetranslocationFactor: FixedValue=0.5
          Constant ShadeInducedSenescenceRate: FixedValue=0
            Memo
              The model assumes no impact of shading on leaf senescence.
          Constant StorageFraction: FixedValue=0.2
          Constant DMReallocationFactor: FixedValue=0
          Constant LeafSizeShapeParameter: FixedValue=0.01
          Constant MaintenanceRespirationFunction: FixedValue=0
          Constant DroughtInducedSenAcceleration: FixedValue=1
          Constant CellDivisionStress: FixedValue=1; Units=0-1
          Constant DroughtInducedLagAcceleration: FixedValue=1
          ArrayFunction LagDurationAgeMultiplier: Values=1 1 1
          ArrayFunction SenescenceDurationAgeMultiplier: Values=1 1 1
          ArrayFunction LeafSizeAgeMultiplier: Values=1 1 1 1 1 1 1 1 1 1 1 1
          Constant RemobilisationCost: FixedValue=0
        RUEModel Photosynthesis
          Constant RUE: FixedValue=1.2
          RUECO2Function FCO2: PhotosyntheticPathway=C3
          LinearInterpolationFunction FN: XProperty=[Leaf].Fn
            XYPairs: X=[0, 1, 1.5]; Y=[1, 1, 1]
          WeightedTemperatureFunction FT: MaximumTemperatureWeighting=0.5
            XYPairs: X=[2, 12, 24, 34]; Y=[0, 1, 1, 0]
          LinearInterpolationFunction FW: XProperty=[Leaf].Fw
            XYPairs: X=[0, 0.4, 1.5]; Y=[0, 1, 1]
          VariableReference RadnInt: VariableName=[Leaf].RadIntTot
          Constant FVPD: FixedValue=1; Units=0-1
            Memo
              This model assumes no impact of VPD on stomatal conductance or photosynthesis.
        MinimumFunction FRGRFunction
          VariableReference RUE_FT: VariableName=[Leaf].Photosynthesis.FT.Value()
          MinimumFunction Others
            VariableReference RUE_FN: VariableName=[Leaf].Photosynthesis.FN.Value()
            VariableReference RUE_FVPD: VariableName=[Leaf].Photosynthesis.FVPD.Value()
        MultiplyFunction ExtinctionCoeff
          Constant: FixedValue=0.8
          LinearInterpolationFunction: XProperty=[Potato].Leaf.Fw
            XYPairs: X=[0, 1]; Y=[0.5, 1]
        LinearInterpolationFunction FrostFraction: XProperty=[Weather].MinT
          XYPairs: X=[-1, 0]; Y=[0, 0]
        CompositeBiomass Total: DMDOfStructural=0.6; Propertys=[[Leaf].Live, [Leaf].Dead]
        ArrayBiomass CohortArrayLive: Propertys=[[Leaf].Live]; ArraySize=[Leaf].MaxNodeNo
        ArrayBiomass CohortArrayDead: Propertys=[[Leaf].Dead]; ArraySize=[Leaf].MaxNodeNo
        BiomassRemoval BiomassRemovalDefaults: same as Replacements.Potato.Root.BiomassRemovalDefaults
        Constant StructuralFraction: FixedValue=0.5
        Constant DMConversionEfficiency: FixedValue=1
        Constant RemobilisationCost: FixedValue=0
        Constant CarbonConcentration: FixedValue=0.4
      GenericOrgan Stem
        MultiplyFunction DMDemandFunction
          VariableReference DeltaNodesPerStem: VariableName=[Structure].DeltaTipNumber
          Constant InterNodeWt: FixedValue=0.2
          VariableReference StemNumber: VariableName=[Structure].TotalStemPopn
        Constant NReallocationFactor: FixedValue=0
        Constant NRetranslocationFactor: FixedValue=0.05
        PhaseBasedSwitch NitrogenDemandSwitch: Start=Planting; End=FinalLeaf
        Constant DMRetranslocationFactor: FixedValue=0
        Constant SenescenceRate: FixedValue=0; Units=/d
        LinearInterpolationFunction MaximumNConc: XProperty=[Phenology].Stage
          XYPairs: X=[3, 4, 5.3]; Y=[0.06, 0.05, 0.025]
        Constant MinimumNConc: FixedValue=0.006
        BiomassRemoval BiomassRemovalDefaults: same as Replacements.Potato.Root.BiomassRemovalDefaults
        Constant InitialWtFunction: FixedValue=0; Units=g/m^2
        Constant StructuralFraction: FixedValue=1; Units=g/g
        Constant DetachmentRateFunction: FixedValue=0; Units=/d
        Constant MaintenanceRespirationFunction: FixedValue=0; Units=0-1
        Constant DMConversionEfficiency: FixedValue=1; Units=0-1
        Constant DMReallocationFactor: FixedValue=0
        VariableReference CriticalNConc: VariableName=[Stem].MinimumNConc.Value()
        Constant RemobilisationCost: FixedValue=0
        Constant CarbonConcentration: FixedValue=0.4
      CompositeBiomass AboveGround: DMDOfStructural=0.6; Propertys=[[Leaf].Live, [Leaf].Dead, [Stem].Live, [Stem].Dead]
      CompositeBiomass BelowGround: DMDOfStructural=0.6; Propertys=[[Root].Live, [Root].Dead, [Tuber].Live, [Tuber].Dead]
      CompositeBiomass Total: DMDOfStructural=0.6
        Propertys=[[Leaf].Live, [Leaf].Dead, [Stem].Live, [Stem].Dead, [Root].Live, [Root].Dead, [Tuber].Live, [Tuber].Dead]
      CompositeBiomass TotalLive: DMDOfStructural=0.6; Propertys=[[Leaf].Live, [Stem].Live, [Root].Live, [Tuber].Live]
      CompositeBiomass TotalDead: DMDOfStructural=0.6; Propertys=[[Leaf].Dead, [Stem].Dead, [Root].Dead, [Tuber].Dead]
      CultivarFolder
        Cultivar Coliban
          Command:
            [Tuber].LiveFWt.DryMatterContent.XYPairs.Y = 0.10,0.19
            [Phenology].Vegetative.Target.FixedValue = 200
        Cultivar Horizon
          Command:
            [Structure].FinalLeafNumber.FixedValue = 28
            [Tuber].LiveFWt.DryMatterContent.XYPairs.Y = 0.12,0.16
        Cultivar IlamHardy
          Command:
            [Structure].FinalLeafNumber.FixedValue = 26
            [Tuber].LiveFWt.DryMatterContent.XYPairs.Y = 0.13,0.18
            [Phenology].Vegetative.Target.FixedValue = 200
        Cultivar JerseyBenny
          Command:
            [Structure].FinalLeafNumber.FixedValue = 19
            [Structure].BranchingRate.PotentialBranchingRate.XYPairs.X = 0,6,7,10,11
            [Structure].BranchingRate.PotentialBranchingRate.XYPairs.Y = 0,0,0.5,0.5,0
            [Tuber].DMDemandFunction.TuberFilling.DailyDemand.OrganNumber.TuberNumberPerStem.FixedValue = 3
            [Tuber].LiveFWt.DryMatterContent.XYPairs.Y = 0.13,0.2
        Cultivar Karaka
          Command:
            [Structure].FinalLeafNumber.FixedValue = 29
            [Tuber].LiveFWt.DryMatterContent.XYPairs.Y = 0.13,0.2
        Cultivar Nadine
          Command:
            [Structure].FinalLeafNumber.FixedValue = 29
            [Tuber].LiveFWt.DryMatterContent.XYPairs.Y = 0.11,0.15
        Cultivar Nooksac
          Command:
            [Structure].FinalLeafNumber.FixedValue = 36
            [Tuber].LiveFWt.DryMatterContent.XYPairs.Y = 0.13,0.21
        Cultivar RedRascal: Command=[Tuber].LiveFWt.DryMatterContent.XYPairs.Y = 0.13,0.2
        Cultivar Rua
          Command:
            [Structure].FinalLeafNumber.FixedValue = 29
            [Tuber].LiveFWt.DryMatterContent.XYPairs.Y = 0.13,0.21
            [Structure].Phyllochron.Phyllochron.Phyllochron.XYPairs.X = 0,0.15,0.74,0.75,1
            [Structure].Phyllochron.Phyllochron.Phyllochron.XYPairs.Y = 5,40,40,60,60
            [Structure].BranchingRate.PotentialBranchingRate.XYPairs.X = 0,6,7,20,21
            [Structure].BranchingRate.PotentialBranchingRate.XYPairs.Y = 0,0,0.5,0.5,0
        Cultivar RussetBurbank: Command=[Structure].FinalLeafNumber.FixedValue = 34
          Alias Fianna
          Alias RussetRanger
          Alias Moonlight
          Alias Agria
          Alias Bondi
          Alias Crop39
    Plant SCRUM: CropType=SCRUM
      Memo TitlePage
        # SCRUM: the Simple Crop Resource Uptake Model

        _Hamish Brown and Rob Zyskowski, Plant and Food Research, New Zealand_

        This model has been built using the Plant Modelling Framework (PMF) of [brown_plant_2014] to simulate a range of different crops in simulations where water and nitrogen balance are of interest but a fully mechanistic plant model is not needed or is not available. It is a daily time step implementation of the crop model that is used on the Overseer nutrient balance model [Cichota_etal_2010].  It uses simple sigmoidal functions for estimating daily cover and biomass deltas to give realistic water and nitrogen demands. It does not simulate potential yield, this is specified as an input. Yield will be reduced below the specified potential yield if N or water supplies from the soil are insufficient to meet demand. The model has been paramaterised for simulating water and nitrogen balances of cropping rotations in New Zealand (where over 50 different crop types are grown and it is not feasible to produce full crop models for each of these).  Because of this the model is not as generically applicable as full APSIM crop models.   It may be adapted for other purposes and other crop types may be added but the user will need to keep in mind that because it is a simple model the the parameters might need changing for crops in different locations or for crops sown at different times of the year.  Some sensibility testing or validation is recommended before application in different sutuations.

        SCRUM has a simple phenology model which divides the crop growth into three main phases; a vegetative phase when the canopy is expanding, a reproductive phase when product is being formed and a senescing phase when the canopy is contracting.  SCRUM has 4 organ classes to represent different biomass components and the real biomass components that these classes represent changes from crop to crop:
           1. A Simple leaf class called <b>Stover</b> which represents the unharvested parts of the plant.  Generally, this represents the leaf and stem components of the crop but for crops where stem and leaf are part of the harvested product (e.g forages and leafy vegetables) than stover is the residual fraction of leaf and stem that is not harvested.
           2. A Generic organ class called <b>Product</b> which represents the plant parts that are harvested and removed from the field.  This could represent grain, fruits, tubers, leaf or stem depending on what sort of crop is being represented.
           3. A Root organ which extracts water and nitrogen from the soil for plant growth and returns biomass to the soil on harvest
           4. A Nodule organ which is only activated and fixes nitrogen for the legume crops.
        An Arbitrator is also included which determines the allocation of drymatter and nitrogen biomass between each of these organs.

        #Inclusion in APSIM simulations
        A scrum crop is included in a simulation the same as any other APSIM crop
         * The SCRUM object needs to be dragged or copied from the Crop folder in the tool box into the field of your simulation.
         * It is then planted with a sowing rule
        ~~~
        SCRUM.Sow(cultivar: Wheat_Autumn, population: 1, depth: 10, rowSpacing: 150);
        ~~~
          * Note that SCRUM has no notion of population or rowSpacing but these parameters are required by the Sow method so filler values are provided
          * To specify an expected Expected Yield that differs to the defalt value provided, included the following code in a manager script to be executed on the day of sowing.
        ~~~
         zone.Set("[SCRUM].Product.ExpectedYield.Value()", ResetValue);
        ~~~
        * SCRUM can be Harvested, Cut, Grazed and Pruned like other crops.  Defalt proportions of the biomass in each organ are removed from the sysem and/or added to the fields residue pools.  Note that defalt removal fraction for product on harvest is 0 (becaue it is represented with a generic organ) so more appropriate removal fractions should be sepcified in a manager script as follows:
        ~~~
        [EventSubscribe("Commencing")]
        private void OnSimulationCommencing(object sender, EventArgs e)
        {
          Remove = new RemovalFractions(SCRUM.Organs);
        }
        [EventSubscribe("DoManagement")]
        private void OnDoManagement(object sender, EventArgs e)
        {
          if (Clock.Today.Date == HarvestDate2)
          {
            Remove.SetFractionLiveToRemove("Product", 1.0);
            Remove.SetFractionLiveToRemove("Stover", 0.05);
            Remove.SetFractionLiveToResidue("Stover",0.95)
            SCRUM.Harvest(Remove);
            SCRUM.EndCrop();
          }
        }
        ~~~
        * A Remove class as shown above can be sent with Harvest, Cut, Graze and Prune events to specificy the proportions of removals.
         * Once a crop has been ended the field is open to plant another crop using another APSIM crop model or sowing another SCRUM crop.
      Phenology
        AirTemperatureFunction ThermalTime
          Memo Description
            Progression through each of the phenological stages is driven by thermal time.  As temperature increases from zero to 30 degrees, development acelerates and then slows down again above 30 degress
          XYPairs: X=[0, 30, 40]; Y=[0, 30, 0]
        Memo Description1
          As ThermalTime accumulates the crop progresses through the following phases:
        GerminatingPhase Germinating: Start=Sowing; End=Germination
        EmergingPhase Emerging: ShootLag=0; ShootRate=0; Start=Germination; End=Emergence; TTForTimeStep=0
          VariableReference ThermalTime: VariableName=[Phenology].ThermalTime.Value()
          Memo Description
            Currently the duration of the Emergence phase is set to zero because the period of zero cover and biomass production following sowing is accounted for in the cover and biomass accumulation functions.  However this phase is included if parameterisations of other crops in the future wish to give this phase a duration.
        GenericPhase CanopyExpanding: Start=Emergence; End=StartReproductive
          Memo Description
            During this phase the plant only partitions biomass to Root and Stover (leaf and stem) Organs
          Constant Target: FixedValue=1000; Units=<sup>o</sup>Cd
          VariableReference Progression: VariableName=[Phenology].ThermalTime.Value()
        GenericPhase YieldIncreasing: Start=StartReproductive; End=StartSenescence
          Memo Description
            During this phase the plant is partitioning biomass to Root, Stover and Product organs.
          Constant Target: FixedValue=600; Units=<sup>o</sup>Cd
          VariableReference Progression: VariableName=[Phenology].ThermalTime.Value()
        GenericPhase Senescing: Start=StartSenescence; End=EndReproductive
          Memo Description
            During this phase the plant is partitioning biomass to Root and Product organs and the canopy cover decreases from its maximum to zero
          Constant Target: FixedValue=600; Units=<sup>o</sup>Cd
          VariableReference Progression: VariableName=[Phenology].ThermalTime.Value()
        GenericPhase Mature: Start=EndReproductive; End=Maturity
          Constant Target: FixedValue=600; Units=<sup>o</sup>Cd
          VariableReference Progression: VariableName=[Phenology].ThermalTime.Value()
          Memo Description
            During this phase the plant has completed its growth and is drying ready for harvest.
        EndPhase ReadyForHarvest: Start=Maturity; End=Unused
          VariableReference ThermalTime: VariableName=[Phenology].ThermalTime.Value()
      OrganArbitrator Arbitrator
        RelativeAllocation NArbitrator
        RelativeAllocation DMArbitrator
      GenericOrgan Product
        Memo Description
          It is the biomass that is removed from the crop at harvest and may include grain, root, leaf, stem, pod or any other organ type depending on the type of crop and how it is harvested.
        Constant MaximumNConc: FixedValue=0.012
        Constant MinimumNConc: FixedValue=0.008
        Constant NReallocationFactor: FixedValue=0
        Constant RemobilisationCost: FixedValue=0
        PartitionFractionDemandFunction DMDemandFunction
          PhaseLookup PartitionFraction
            PhaseLookupValue YieldIncreasing: Start=StartReproductive; End=StartSenescence
              SubtractFunction ProductProportion
                Constant One: FixedValue=1
                VariableReference RootFraction: VariableName=[Root].RootProportion.Value()
                VariableReference StoverFraction
                  VariableName=[Stover].DMDemandFunction.PartitionFraction.YieldIncreasing.Value()
            PhaseLookupValue Senescing: Start=StartSenescence; End=EndReproductive
              SubtractFunction StoverFraction
                Constant One: FixedValue=1
                VariableReference RootFraction: VariableName=[Root].RootProportion.Value()
        Constant ExpectedYield: FixedValue=800
          Memo Description
            This is the Product yield (g/m2 fresh weight) that SCRUM will predict provided nitrogen and water supply are non-limiting
        Constant DryMatterContent: FixedValue=0.87
          Memo Description
            This is the dry matter content of the harvested yield and is used to convert fresh yield into *DryYield* which are subsequently used in determining *Ymax* (total biomass production), daily dry matter production, *HarvestIndex* and the *PartitioningFraction* of each organ
        MultiplyFunction DryYield
          Memo Description
            This variable is the product yield of the crop in g/m2 dry weight
          VariableReference FreshYld: VariableName=[Product].ExpectedYield.Value()
          VariableReference DMPercent: VariableName=[Product].DryMatterContent.Value()
        SubtractFunction WaterContent
          Memo Description
            This is used to convert the total Dry Matter of this organ back to fresh mass once daily partitining is complete.
          Constant One: FixedValue=1
          VariableReference DMcontent: VariableName=[Product].DryMatterContent.Value()
        Constant HarvestIndex: FixedValue=0.46
          Memo Description
            This is the Product yield (g/m2 fresh weight) that SCRUM will predict provided nitrogen and water supply are non-limiting
        Constant SenescenceRate: FixedValue=0; Units=/d
        BiomassRemoval BiomassRemovalDefaults: same as Replacements.Maize.Husk.BiomassRemovalDefaults
        Constant InitialWtFunction: FixedValue=0; Units=g/m^2
        Constant StructuralFraction: FixedValue=1; Units=0-1
        Constant DetachmentRateFunction: FixedValue=0; Units=/d
        Constant MaintenanceRespirationFunction: FixedValue=0; Units=0-1
        Constant DMConversionEfficiency: FixedValue=1; Units=0-1
        Constant NRetranslocationFactor: FixedValue=0
        Constant NitrogenDemandSwitch: FixedValue=1
        Constant DMReallocationFactor: FixedValue=0
        Constant DMRetranslocationFactor: FixedValue=0
        VariableReference CriticalNConc: VariableName=[Product].MinimumNConc.Value()
        Constant CarbonConcentration: FixedValue=0.4
      SimpleLeaf Stover: CohortsInitialised=false; Albedo=0.18; Gsmax=0.01; R50=150; MicroClimatePresent=true; LeafInitialisationStage=Emergence
        zero: ApicalCohortNo, InitialisedCohortNo, TipsAtEmergence, CohortsAtInitialisation, AppearedCohortNo, PlantAppearedLeafNo, LAI, Height, FRGR, PotentialEP, KDead, LAIDead
        Memo Description
          Stover represents any part of the crop that is not removed at harvest (i.e not part of the product).
        Constant NReallocationFactor: FixedValue=0
        Constant RemobilisationCost: FixedValue=0
        Constant SenescenceRate: FixedValue=0
        Constant DetachmentRateFunction: FixedValue=0; Units=/d
        Constant StructuralFraction: FixedValue=1; Units=0-1
        MultiplyFunction InitialWtFunction
          Constant InitialPlantWt: FixedValue=0; Units=g/plant
          VariableReference Population: VariableName=[Plant].Population
        Constant LaiDeadFunction: FixedValue=0; Units=m^2/m^2
        MultiplyFunction Photosynthesis
          DeltaFunction UnStressedBiomass: StartStageName=Emergence
            SigmoidFunction Integral
              VariableReference Ymax: VariableName=[Stover].Ymax.Value()
              VariableReference XValue: VariableName=[Phenology].AccumulatedEmergedTT
              VariableReference Xo: VariableName=[Stover].XoBiomass.Value()
              VariableReference b: VariableName=[Stover].bBiomass.Value()
          LinearInterpolationFunction WaterStressFactor: XProperty=[Stover].Fw
            XYPairs: X=[0, 0, 0.5, 1]; Y=[0, 0, 1, 1]
        MinimumFunction FRGRFunction
          AirTemperatureFunction FRGRFunctionTemp
            XYPairs: X=[0, 10, 25, 40]; Y=[0, 1, 1, 0]
        PartitionFractionDemandFunction DMDemandFunction
          Memo Description
            DM demand is based on a simple partitioning coefficients.  At harvest the biomass partitioned to the stover = TotalDM * (1 - RootProportion) * (1 - Harvest index).  However the partitioningFraction is more complicated that this as it partitions more biomass to the stover in the CanopyExpanding Phase and less in the Yield increasing phase to give realistic patterns of accumulation of biomass in the Stover and Product over the duration of the crop
          PhaseLookup PartitionFraction
            PhaseLookupValue Expanding: Start=Emergence; End=StartReproductive
              SubtractFunction DMPartitionCoefficient
                Constant One: FixedValue=1
                VariableReference RootFraction: VariableName=[Root].RootProportion.Value()
            PhaseLookupValue YieldIncreasing: Start=StartReproductive; End=StartSenescence
              DivideFunction DMPartitionCoefficient
                SubtractFunction StoverBiomass
                  MultiplyFunction StoverAtMaturity
                    SubtractFunction AboveGroundProportion
                      Constant One: FixedValue=1
                      VariableReference RootFraction: VariableName=[Root].RootProportion.Value()
                    SubtractFunction StoverProportion
                      Constant One: FixedValue=1
                      VariableReference HI: VariableName=[Product].HarvestIndex.Value()
                    VariableReference BiomassAtMaturity: VariableName=[Stover].TotalBiomassAtMaturity.Value()
                  MultiplyFunction StoverAtStartReproductive
                    VariableReference BiomassAtStartReproductive: VariableName=[Stover].TotalBiomassAtStartReproductive.Value()
                    SubtractFunction AboveGroundProportion
                      Constant One: FixedValue=1
                      VariableReference RootFraction: VariableName=[Root].RootProportion.Value()
                SubtractFunction TotalBiomass
                  VariableReference BiomassAtStartSenescence: VariableName=[Stover].TotalBiomassAtStartSenescence.Value()
                  VariableReference BiomassAtStartReproductive: VariableName=[Stover].TotalBiomassAtStartReproductive.Value()
        PhaseLookup CoverFunction
          PhaseLookupValue Expanding: Start=Emergence; End=StartSenescence
            SigmoidFunction SigCoverFunction
              Constant Ymax: FixedValue=0.97
              VariableReference XValue: VariableName=[Phenology].AccumulatedEmergedTT
              Constant Xo: FixedValue=540
              Constant b: FixedValue=120
          PhaseLookupValue Senescence: Start=StartSenescence; End=Maturity
            MultiplyFunction DecreasingCover
              HoldFunction MaxCover: WhenToHold=StartSenescence
                VariableReference ValueToHold: VariableName=[Stover].CoverGreen
              SubtractFunction ProportionLost
                Constant One: FixedValue=1
                DivideFunction ProportionRemaining
                  SubtractFunction TTSenesce
                    VariableReference AccumulatedThermalTime: VariableName=[Phenology].AccumulatedEmergedTT
                    AddFunction ThermalTimeAtStartSenescence
                      VariableReference CanopyExpandingTT: VariableName=[Phenology].CanopyExpanding.Target.Value()
                      VariableReference YieldIncreasingTT: VariableName=[Phenology].YieldIncreasing.Target.Value()
                  VariableReference SenescentPhaseDuration: VariableName=[Phenology].Senescing.Target.Value()
        Constant ExtinctionCoefficientFunction: FixedValue=0.5
          Memo Description
            The extinction coefficient is used to calculate a LAI value (needed by MicroClimate) from the canopy cover
        LinearInterpolationFunction HeightFunction: XProperty=[Phenology].Stage
          XYPairs: X=[3, 5, 6]; Y=[100, 800, 1200]
        Constant MaximumNConc: FixedValue=0.008
        Constant MinimumNConc: FixedValue=0
        PhaseLookupValue NitrogenDemandSwitch: Start=Emergence; End=StartSenescence
          Constant One: FixedValue=1
        Constant XoBiomass: FixedValue=800
          Memo Description
            Is a coefficient for the potential biomass accumulation function
        Constant bBiomass: FixedValue=800
          Memo Description
            Is another coefficient for the potential biomass accumulation function
        DivideFunction Ymax
          Memo Description
            This variable is the total biomass (g/m2dry weight) that the crop will produce at maturity in the absence of stress
          VariableReference DryYield: VariableName=[Product].DryYield.Value()
          SubtractFunction AboveGroundDMProportion
            Constant One: FixedValue=1
            VariableReference RootFraction: VariableName=[Root].RootProportion.Value()
          VariableReference HarvestIndex: VariableName=[Product].HarvestIndex.Value()
        SigmoidFunction TotalBiomassAtStartReproductive
          VariableReference XValue: VariableName=[Phenology].CanopyExpanding.Target.Value()
          VariableReference Ymax: VariableName=[Stover].Ymax.Value()
          VariableReference Xo: VariableName=[Stover].XoBiomass.Value()
          VariableReference b: VariableName=[Stover].bBiomass.Value()
        SigmoidFunction TotalBiomassAtStartSenescence
          AddFunction XValue
            VariableReference CanopyExpandingTT: VariableName=[Phenology].CanopyExpanding.Target.Value()
            VariableReference YieldIncreasingTT: VariableName=[Phenology].YieldIncreasing.Target.Value()
          VariableReference Ymax: VariableName=[Stover].Ymax.Value()
          VariableReference Xo: VariableName=[Stover].XoBiomass.Value()
          VariableReference b: VariableName=[Stover].bBiomass.Value()
        SigmoidFunction TotalBiomassAtMaturity
          AddFunction XValue
            VariableReference CanopyExpandingTT: VariableName=[Phenology].CanopyExpanding.Target.Value()
            VariableReference YieldIncreasingTT: VariableName=[Phenology].YieldIncreasing.Target.Value()
            VariableReference SenescingTT: VariableName=[Phenology].Senescing.Target.Value()
          VariableReference Ymax: VariableName=[Stover].Ymax.Value()
          VariableReference Xo: VariableName=[Stover].XoBiomass.Value()
          VariableReference b: VariableName=[Stover].bBiomass.Value()
        BiomassRemoval BiomassRemovalDefaults: same as Replacements.Maize.Leaf.BiomassRemovalDefaults
        Constant MaintenanceRespirationFunction: FixedValue=0; Units=0-1
        Constant DMConversionEfficiency: FixedValue=1; Units=0-1
        Constant NRetranslocationFactor: FixedValue=0
        Constant DMReallocationFactor: FixedValue=0
        Constant DMRetranslocationFactor: FixedValue=0
        VariableReference CriticalNConc: VariableName=[Stover].MinimumNConc.Value()
        Constant CarbonConcentration: FixedValue=0.4
      Root: GrowthRespiration=0; MaintenanceRespiration=0
        Memo Description
          The root organ demands and is partitioned N and DM and its depth increases through time to provide a water uptake supply
        Constant DMConversionEfficiency: FixedValue=1; Units=0-1
        Constant RemobilisationCost: FixedValue=0
        LinearInterpolationFunction KLModifier: XProperty=[Root].LayerMidPointDepth
          XYPairs
            X=[0, 50, 100, 150, 200, 250, 300, 350, 400, 450, 500, 550, 600, 650, 700, 750, 800, 850, 900, 950, 1000, 1050, 1100, 1150, 1200, 1250, 1300, 1350, 1400, 1450]
            Y=[1, 1, 1, 1, 1, 1, 1, 1, 1, 1, 1, 1, 1, 1, 1, 1, 1, 1, 1, 1, 1, 1, 1, 1, 1, 1, 1, 1, 1, 1]
          Memo Description
            This is important in SCRUM as it is set for each species to represent their differences in rooting patterns between crop species.  The values for  each crop type are calculated externally from APSIM using the root depth of the crop and an exponential of the form:

            ~~~
            for (int layer = 0; layer lessthan  Soil.Thickness.Length; layer++)
            {
            if (layer.depth lessthan 305)
             layer.KLModifier = 1;
            else if (layer.depth lessthan Crop.RootDepth)
             layer.KLModifier = 1*exp(-.002*(1500/(Crop.RootDepth-300)*(layer.depth-300)));
            else:
             layer.KLModifier = 0;
            }
            ~~~

            This gives KLModifiers that decline exponentially from 1 in the top 300mm of soil to 0 at the crops maximum rooting depth.

            It is important to note that these modifiers are applied to the kl value specified in the SCRUMSoil node under the soil in your field so the values on the soil node should be set to 0.1 throughout the depth of the profile to produce sensible kl values.
        Constant SoilWaterEffect: FixedValue=1
        Constant MaxDailyNUptake: FixedValue=12
        Constant SenescenceRate: FixedValue=0
        Constant MaximumNConc: FixedValue=0.009
        Constant MinimumNConc: FixedValue=0.009
        PhaseBasedSwitch NitrogenDemandSwitch: Start=Germination; End=Maturity
        Constant MaximumRootDepth: FixedValue=1500
        MultiplyFunction RootFrontVelocity
          LessThanFunction RootFrontVelocity
            VariableReference TestVariable: VariableName=[Phenology].AccumulatedEmergedTT
            AddFunction GrowthDuration
              VariableReference CanopyExpandingTT: VariableName=[Phenology].CanopyExpanding.Target.Value()
              VariableReference YieldIncreasingTT: VariableName=[Phenology].YieldIncreasing.Target.Value()
            DivideFunction IfTrue
              VariableReference MaxRootDepth: VariableName=[Root].MaximumRootDepth.Value()
              VariableReference GrowthDuration
                VariableName=[Root].RootFrontVelocity.RootFrontVelocity.GrowthDuration.Value()
            Constant IfFalse: FixedValue=0
          VariableReference ThermalTime: VariableName=[Phenology].ThermalTime.Value()
        PartitionFractionDemandFunction DMDemandFunction
          PhaseLookupValue PartitionFraction: Start=Emergence; End=EndReproductive
            VariableReference RootProportion: VariableName=[Root].RootProportion.Value()
        Constant RootProportion: FixedValue=0.1
          Memo Description
            This is the proportion of total biomass that is paritioned into the roots and is used to set the partitioning fraction for the roots
        BiomassRemoval BiomassRemovalDefaults: same as Replacements.Maize.Root.BiomassRemovalDefaults
        Constant InitialDM: FixedValue=0.2; Units=g/plant
        Constant SpecificRootLength: FixedValue=40; Units=m/g
        LinearInterpolationFunction KNO3: XProperty=[Root].LengthDensity
          XYPairs: X=[0, 0.003]; Y=[0.02, 0.02]
        LinearInterpolationFunction KNH4: XProperty=[Root].LengthDensity
          XYPairs: X=[0, 0.003]; Y=[0, 0]
        LinearInterpolationFunction NUptakeSWFactor: XProperty=[Root].RWC
          XYPairs: X=[0, 1]; Y=[0, 1]
        Constant MaintenanceRespirationFunction: FixedValue=0
        Constant CarbonConcentration: FixedValue=0.4
      Nodule
        Memo Description
          The nodule organ is unparameterised and simply has a switch that is turned on for legume crops (so they can fix what ever N the crop demands) and switched off for non legume crops (which fix no N)
        Constant MaximumNConc: FixedValue=0
        Constant RemobilisationCost: FixedValue=0
        Constant MinimumNConc: FixedValue=0
        Constant NReallocationFactor: FixedValue=0
        Constant SenescenceRate: FixedValue=0
        Constant FixationRate: FixedValue=0
        BiomassRemoval BiomassRemovalDefaults
          OrganBiomassRemovalType Harvest: FractionLiveToRemove=0; FractionDeadToRemove=0; FractionLiveToResidue=0; FractionDeadToResidue=0
          OrganBiomassRemovalType Cut: FractionLiveToRemove=0; FractionDeadToRemove=0; FractionLiveToResidue=0; FractionDeadToResidue=0
          OrganBiomassRemovalType Prune: FractionLiveToRemove=0; FractionDeadToRemove=0; FractionLiveToResidue=0; FractionDeadToResidue=0
          OrganBiomassRemovalType Graze: FractionLiveToRemove=0; FractionDeadToRemove=0; FractionLiveToResidue=0; FractionDeadToResidue=0
        Constant StructuralFraction: FixedValue=1; Units=0-1
        Constant DMDemandFunction: FixedValue=0; Units=g/m^2
        Constant InitialWtFunction: FixedValue=0; Units=g/m^2
        Constant DetachmentRateFunction: FixedValue=0; Units=/d
        Constant FixationMetabolicCost: FixedValue=0
        Constant MaintenanceRespirationFunction: FixedValue=0; Units=0-1
        Constant DMConversionEfficiency: FixedValue=1; Units=0-1
        Constant NRetranslocationFactor: FixedValue=0
        Constant NitrogenDemandSwitch: FixedValue=1
        Constant DMReallocationFactor: FixedValue=0
        Constant DMRetranslocationFactor: FixedValue=0
        VariableReference CriticalNConc: VariableName=[Nodule].MinimumNConc.Value()
        Constant CarbonConcentration: FixedValue=0.4
      CompositeBiomass Total: DMDOfStructural=0.6
        Propertys=[[Stover].Live, [Stover].Dead, [Product].Live, [Product].Dead, [Root].Live, [Root].Dead]
      CompositeBiomass AboveGround: DMDOfStructural=0.6
        Propertys=[[Stover].Live, [Stover].Dead, [Product].Live, [Product].Dead]
        Memo
          The AboveGround composite biomass object includes Stover and Product organs.
      Cultivar Barley_Autumn
        Command:
          [Nodule].FixationMetabolicCost.FixedValue = 0
          [Nodule].FixationRate.FixedValue = 0
          [Phenology].CanopyExpanding.Target.FixedValue = 1461.0
          [Phenology].Senescing.Target.FixedValue = 600
          [Phenology].YieldIncreasing.Target.FixedValue = 939.0
          [Product].DryMatterContent.FixedValue = 0.87
          [Product].ExpectedYield.FixedValue = 1100
          [Product].HarvestIndex.FixedValue = 0.41
          [Product].MaximumNConc.FixedValue = 0.013
          [Product].MinimumNConc.FixedValue = 0.0091
          [Root].KLModifier.XYPairs.Y = 1,1,1,1,1,1,1,0.882,0.779,0.687,0.607,0.535,0.472,0.417,0.368,0.325,0.287,0.253,0.223,0.197,0.174,0.153,0.135,0.119,0.105,0.093,0.082,0.072,0.064,0.056
          [Root].MaximumNConc.FixedValue = 0.009
          [Root].MaximumRootDepth.FixedValue = 1500
          [Root].MinimumNConc.FixedValue = 0.009
          [Root].RootProportion.FixedValue = 0.1
          [Stover].CoverFunction.Expanding.SigCoverFunction.Xo.FixedValue = 540
          [Stover].CoverFunction.Expanding.SigCoverFunction.Ymax.FixedValue = 0.96
          [Stover].CoverFunction.Expanding.SigCoverFunction.b.FixedValue = 120
          [Stover].MaximumNConc.FixedValue = 0.005
          [Stover].MinimumNConc.FixedValue = 0.005
          [Stover].XoBiomass.FixedValue = 1500.0
          [Stover].bBiomass.FixedValue = 300.0
      Cultivar Barley_Spring
        Command:
          [Nodule].FixationMetabolicCost.FixedValue = 0
          [Nodule].FixationRate.FixedValue = 0
          [Phenology].CanopyExpanding.Target.FixedValue = 848.0
          [Phenology].Senescing.Target.FixedValue = 300
          [Phenology].YieldIncreasing.Target.FixedValue = 652.0
          [Product].DryMatterContent.FixedValue = 0.87
          [Product].ExpectedYield.FixedValue = 800
          [Product].HarvestIndex.FixedValue = 0.46
          [Product].MaximumNConc.FixedValue = 0.012
          [Product].MinimumNConc.FixedValue = 0.0084
          [Root].KLModifier.XYPairs.Y = 1,1,1,1,1,1,1,0.807,0.651,0.526,0.424,0.343,0.276,0.223,0.18,0.145,0.117,0.095,0.076,0.062,0,0,0,0,0,0,0,0,0,0
          [Root].MaximumNConc.FixedValue = 0.009
          [Root].MaximumRootDepth.FixedValue = 1000
          [Root].MinimumNConc.FixedValue = 0.009
          [Root].RootProportion.FixedValue = 0.1
          [Stover].CoverFunction.Expanding.SigCoverFunction.Xo.FixedValue = 540
          [Stover].CoverFunction.Expanding.SigCoverFunction.Ymax.FixedValue = 0.96
          [Stover].CoverFunction.Expanding.SigCoverFunction.b.FixedValue = 120
          [Stover].MaximumNConc.FixedValue = 0.005
          [Stover].MinimumNConc.FixedValue = 0.005
          [Stover].XoBiomass.FixedValue = 900.0
          [Stover].bBiomass.FixedValue = 180.0
      Cultivar Barley_SpringForage
        Command:
          [Nodule].FixationMetabolicCost.FixedValue = 0
          [Nodule].FixationRate.FixedValue = 0
          [Phenology].CanopyExpanding.Target.FixedValue = 326.0
          [Phenology].Senescing.Target.FixedValue = 300
          [Phenology].YieldIncreasing.Target.FixedValue = 1174.0
          [Product].DryMatterContent.FixedValue = 0.4
          [Product].ExpectedYield.FixedValue = 2000
          [Product].HarvestIndex.FixedValue = 0.95
          [Product].MaximumNConc.FixedValue = 0.013
          [Product].MinimumNConc.FixedValue = 0.0091
          [Root].KLModifier.XYPairs.Y = 1,1,1,1,1,1,1,0.882,0.779,0.687,0.607,0.535,0.472,0.417,0.368,0.325,0.287,0.253,0.223,0.197,0.174,0.153,0.135,0.119,0.105,0.093,0.082,0.072,0.064,0.056
          [Root].MaximumNConc.FixedValue = 0.009
          [Root].MaximumRootDepth.FixedValue = 1500
          [Root].MinimumNConc.FixedValue = 0.009
          [Root].RootProportion.FixedValue = 0.1
          [Stover].CoverFunction.Expanding.SigCoverFunction.Xo.FixedValue = 540
          [Stover].CoverFunction.Expanding.SigCoverFunction.Ymax.FixedValue = 0.96
          [Stover].CoverFunction.Expanding.SigCoverFunction.b.FixedValue = 120
          [Stover].MaximumNConc.FixedValue = 0.005
          [Stover].MinimumNConc.FixedValue = 0.005
          [Stover].XoBiomass.FixedValue = 900.0
          [Stover].bBiomass.FixedValue = 180.0
      Cultivar Beets
        Command:
          [Nodule].FixationMetabolicCost.FixedValue = 0
          [Nodule].FixationRate.FixedValue = 0
          [Phenology].CanopyExpanding.Target.FixedValue = 874.0
          [Phenology].Senescing.Target.FixedValue = 750
          [Phenology].YieldIncreasing.Target.FixedValue = 1076.0
          [Product].DryMatterContent.FixedValue = 0.14
          [Product].ExpectedYield.FixedValue = 5500
          [Product].HarvestIndex.FixedValue = 0.815
          [Product].MaximumNConc.FixedValue = 0.015
          [Product].MinimumNConc.FixedValue = 0.0105
          [Root].KLModifier.XYPairs.Y = 1,1,1,1,1,1,1,0.472,0.223,0.105,0,0,0,0,0,0,0,0,0,0,0,0,0,0,0,0,0,0,0,0
          [Root].MaximumNConc.FixedValue = 0.01
          [Root].MaximumRootDepth.FixedValue = 500
          [Root].MinimumNConc.FixedValue = 0.01
          [Root].RootProportion.FixedValue = 0.1
          [Stover].CoverFunction.Expanding.SigCoverFunction.Xo.FixedValue = 690
          [Stover].CoverFunction.Expanding.SigCoverFunction.Ymax.FixedValue = 0.95
          [Stover].CoverFunction.Expanding.SigCoverFunction.b.FixedValue = 120
          [Stover].MaximumNConc.FixedValue = 0.02
          [Stover].MinimumNConc.FixedValue = 0.02
          [Stover].XoBiomass.FixedValue = 1350.0
          [Stover].bBiomass.FixedValue = 270.0
      Cultivar Beets_Seed
        Command:
          [Nodule].FixationMetabolicCost.FixedValue = 0
          [Nodule].FixationRate.FixedValue = 0
          [Phenology].CanopyExpanding.Target.FixedValue = 1831.0
          [Phenology].Senescing.Target.FixedValue = 300
          [Phenology].YieldIncreasing.Target.FixedValue = 1169.0
          [Product].DryMatterContent.FixedValue = 0.85
          [Product].ExpectedYield.FixedValue = 150
          [Product].HarvestIndex.FixedValue = 0.2
          [Product].MaximumNConc.FixedValue = 0.03
          [Product].MinimumNConc.FixedValue = 0.0105
          [Root].KLModifier.XYPairs.Y = 1,1,1,1,1,1,1,0.472,0.223,0.105,0,0,0,0,0,0,0,0,0,0,0,0,0,0,0,0,0,0,0,0
          [Root].MaximumNConc.FixedValue = 0.01
          [Root].MaximumRootDepth.FixedValue = 500
          [Root].MinimumNConc.FixedValue = 0.01
          [Root].RootProportion.FixedValue = 0.1
          [Stover].CoverFunction.Expanding.SigCoverFunction.Xo.FixedValue = 690
          [Stover].CoverFunction.Expanding.SigCoverFunction.Ymax.FixedValue = 0.95
          [Stover].CoverFunction.Expanding.SigCoverFunction.b.FixedValue = 120
          [Stover].MaximumNConc.FixedValue = 0.02
          [Stover].MinimumNConc.FixedValue = 0.02
          [Stover].XoBiomass.FixedValue = 1650.0
          [Stover].bBiomass.FixedValue = 330.0
      Cultivar Brassica
        Command:
          [Nodule].FixationMetabolicCost.FixedValue = 0
          [Nodule].FixationRate.FixedValue = 0
          [Phenology].CanopyExpanding.Target.FixedValue = 420.0
          [Phenology].Senescing.Target.FixedValue = 0
          [Phenology].YieldIncreasing.Target.FixedValue = 1230.0
          [Product].DryMatterContent.FixedValue = 1.0
          [Product].ExpectedYield.FixedValue = 800
          [Product].HarvestIndex.FixedValue = 0.9
          [Product].MaximumNConc.FixedValue = 0.03
          [Product].MinimumNConc.FixedValue = 0.021
          [Root].KLModifier.XYPairs.Y = 1,1,1,1,1,1,1,0.687,0.472,0.325,0.223,0.153,0.105,0.072,0,0,0,0,0,0,0,0,0,0,0,0,0,0,0,0
          [Root].MaximumNConc.FixedValue = 0.01
          [Root].MaximumRootDepth.FixedValue = 700
          [Root].MinimumNConc.FixedValue = 0.01
          [Root].RootProportion.FixedValue = 0.1
          [Stover].CoverFunction.Expanding.SigCoverFunction.Xo.FixedValue = 690
          [Stover].CoverFunction.Expanding.SigCoverFunction.Ymax.FixedValue = 0.96
          [Stover].CoverFunction.Expanding.SigCoverFunction.b.FixedValue = 60
          [Stover].MaximumNConc.FixedValue = 0.03
          [Stover].MinimumNConc.FixedValue = 0.03
          [Stover].XoBiomass.FixedValue = 825.0
          [Stover].bBiomass.FixedValue = 165.0
      Cultivar Broccoli_Seed
        Command:
          [Nodule].FixationMetabolicCost.FixedValue = 0
          [Nodule].FixationRate.FixedValue = 0
          [Phenology].CanopyExpanding.Target.FixedValue = 1064.0
          [Phenology].Senescing.Target.FixedValue = 300
          [Phenology].YieldIncreasing.Target.FixedValue = 436.0
          [Product].DryMatterContent.FixedValue = 0.84
          [Product].ExpectedYield.FixedValue = 150
          [Product].HarvestIndex.FixedValue = 0.1
          [Product].MaximumNConc.FixedValue = 0.03
          [Product].MinimumNConc.FixedValue = 0.02
          [Root].KLModifier.XYPairs.Y = 1,1,1,1,1,1,1,0.807,0.651,0.526,0.424,0.343,0.276,0.223,0.18,0.145,0.117,0.095,0.076,0.062,0,0,0,0,0,0,0,0,0,0
          [Root].MaximumNConc.FixedValue = 0.008
          [Root].MaximumRootDepth.FixedValue = 1000
          [Root].MinimumNConc.FixedValue = 0.008
          [Root].RootProportion.FixedValue = 0.1
          [Stover].CoverFunction.Expanding.SigCoverFunction.Xo.FixedValue = 540
          [Stover].CoverFunction.Expanding.SigCoverFunction.Ymax.FixedValue = 0.96
          [Stover].CoverFunction.Expanding.SigCoverFunction.b.FixedValue = 120
          [Stover].MaximumNConc.FixedValue = 0.02
          [Stover].MinimumNConc.FixedValue = 0.02
          [Stover].XoBiomass.FixedValue = 900.0
          [Stover].bBiomass.FixedValue = 180.0
      Cultivar Broccoli_summer
        Command:
          [Nodule].FixationMetabolicCost.FixedValue = 0
          [Nodule].FixationRate.FixedValue = 0
          [Phenology].CanopyExpanding.Target.FixedValue = 1664.0
          [Phenology].Senescing.Target.FixedValue = 900
          [Phenology].YieldIncreasing.Target.FixedValue = 436.0
          [Product].DryMatterContent.FixedValue = 0.11
          [Product].ExpectedYield.FixedValue = 1200
          [Product].HarvestIndex.FixedValue = 0.2
          [Product].MaximumNConc.FixedValue = 0.035
          [Product].MinimumNConc.FixedValue = 0.0245
          [Root].KLModifier.XYPairs.Y = 1,1,1,1,1,1,1,0.472,0.223,0.105,0,0,0,0,0,0,0,0,0,0,0,0,0,0,0,0,0,0,0,0
          [Root].MaximumNConc.FixedValue = 0.009
          [Root].MaximumRootDepth.FixedValue = 500
          [Root].MinimumNConc.FixedValue = 0.009
          [Root].RootProportion.FixedValue = 0.1
          [Stover].CoverFunction.Expanding.SigCoverFunction.Xo.FixedValue = 450
          [Stover].CoverFunction.Expanding.SigCoverFunction.Ymax.FixedValue = 0.8
          [Stover].CoverFunction.Expanding.SigCoverFunction.b.FixedValue = 120
          [Stover].MaximumNConc.FixedValue = 0.038
          [Stover].MinimumNConc.FixedValue = 0.038
          [Stover].XoBiomass.FixedValue = 1500.0
          [Stover].bBiomass.FixedValue = 300.0
      Cultivar Broccoli_winter_spring
        Command:
          [Nodule].FixationMetabolicCost.FixedValue = 0
          [Nodule].FixationRate.FixedValue = 0
          [Phenology].CanopyExpanding.Target.FixedValue = 1739.0
          [Phenology].Senescing.Target.FixedValue = 900
          [Phenology].YieldIncreasing.Target.FixedValue = 361.0
          [Product].DryMatterContent.FixedValue = 0.11
          [Product].ExpectedYield.FixedValue = 800
          [Product].HarvestIndex.FixedValue = 0.13
          [Product].MaximumNConc.FixedValue = 0.035
          [Product].MinimumNConc.FixedValue = 0.0245
          [Root].KLModifier.XYPairs.Y = 1,1,1,1,1,1,1,0.472,0.223,0.105,0,0,0,0,0,0,0,0,0,0,0,0,0,0,0,0,0,0,0,0
          [Root].MaximumNConc.FixedValue = 0.009
          [Root].MaximumRootDepth.FixedValue = 500
          [Root].MinimumNConc.FixedValue = 0.009
          [Root].RootProportion.FixedValue = 0.1
          [Stover].CoverFunction.Expanding.SigCoverFunction.Xo.FixedValue = 450
          [Stover].CoverFunction.Expanding.SigCoverFunction.Ymax.FixedValue = 0.8
          [Stover].CoverFunction.Expanding.SigCoverFunction.b.FixedValue = 120
          [Stover].MaximumNConc.FixedValue = 0.038
          [Stover].MinimumNConc.FixedValue = 0.038
          [Stover].XoBiomass.FixedValue = 1500.0
          [Stover].bBiomass.FixedValue = 300.0
      Cultivar BrusselSprouts
        Command:
          [Nodule].FixationMetabolicCost.FixedValue = 0
          [Nodule].FixationRate.FixedValue = 0
          [Phenology].CanopyExpanding.Target.FixedValue = 1470.0
          [Phenology].Senescing.Target.FixedValue = 900
          [Phenology].YieldIncreasing.Target.FixedValue = 630.0
          [Product].DryMatterContent.FixedValue = 0.2
          [Product].ExpectedYield.FixedValue = 1500
          [Product].HarvestIndex.FixedValue = 0.4
          [Product].MaximumNConc.FixedValue = 0.035
          [Product].MinimumNConc.FixedValue = 0.0245
          [Root].KLModifier.XYPairs.Y = 1,1,1,1,1,1,1,0.472,0.223,0.105,0,0,0,0,0,0,0,0,0,0,0,0,0,0,0,0,0,0,0,0
          [Root].MaximumNConc.FixedValue = 0.009
          [Root].MaximumRootDepth.FixedValue = 500
          [Root].MinimumNConc.FixedValue = 0.009
          [Root].RootProportion.FixedValue = 0.1
          [Stover].CoverFunction.Expanding.SigCoverFunction.Xo.FixedValue = 450
          [Stover].CoverFunction.Expanding.SigCoverFunction.Ymax.FixedValue = 0.8
          [Stover].CoverFunction.Expanding.SigCoverFunction.b.FixedValue = 120
          [Stover].MaximumNConc.FixedValue = 0.038
          [Stover].MinimumNConc.FixedValue = 0.038
          [Stover].XoBiomass.FixedValue = 1500.0
          [Stover].bBiomass.FixedValue = 300.0
      Cultivar Cabbage_summer
        Command:
          [Nodule].FixationMetabolicCost.FixedValue = 0
          [Nodule].FixationRate.FixedValue = 0
          [Phenology].CanopyExpanding.Target.FixedValue = 1080.0
          [Phenology].Senescing.Target.FixedValue = 900
          [Phenology].YieldIncreasing.Target.FixedValue = 1020.0
          [Product].DryMatterContent.FixedValue = 0.08
          [Product].ExpectedYield.FixedValue = 7000
          [Product].HarvestIndex.FixedValue = 0.75
          [Product].MaximumNConc.FixedValue = 0.026
          [Product].MinimumNConc.FixedValue = 0.0182
          [Root].KLModifier.XYPairs.Y = 1,1,1,1,1,1,1,0.472,0.223,0.105,0,0,0,0,0,0,0,0,0,0,0,0,0,0,0,0,0,0,0,0
          [Root].MaximumNConc.FixedValue = 0.009
          [Root].MaximumRootDepth.FixedValue = 500
          [Root].MinimumNConc.FixedValue = 0.009
          [Root].RootProportion.FixedValue = 0.1
          [Stover].CoverFunction.Expanding.SigCoverFunction.Xo.FixedValue = 360
          [Stover].CoverFunction.Expanding.SigCoverFunction.Ymax.FixedValue = 0.8
          [Stover].CoverFunction.Expanding.SigCoverFunction.b.FixedValue = 120
          [Stover].MaximumNConc.FixedValue = 0.03
          [Stover].MinimumNConc.FixedValue = 0.03
          [Stover].XoBiomass.FixedValue = 1500.0
          [Stover].bBiomass.FixedValue = 300.0
      Cultivar Cabbage_winter_spring
        Command:
          [Nodule].FixationMetabolicCost.FixedValue = 0
          [Nodule].FixationRate.FixedValue = 0
          [Phenology].CanopyExpanding.Target.FixedValue = 1269.0
          [Phenology].Senescing.Target.FixedValue = 900
          [Phenology].YieldIncreasing.Target.FixedValue = 831.0
          [Product].DryMatterContent.FixedValue = 0.12
          [Product].ExpectedYield.FixedValue = 5000
          [Product].HarvestIndex.FixedValue = 0.6
          [Product].MaximumNConc.FixedValue = 0.026
          [Product].MinimumNConc.FixedValue = 0.0182
          [Root].KLModifier.XYPairs.Y = 1,1,1,1,1,1,1,0.472,0.223,0.105,0,0,0,0,0,0,0,0,0,0,0,0,0,0,0,0,0,0,0,0
          [Root].MaximumNConc.FixedValue = 0.009
          [Root].MaximumRootDepth.FixedValue = 500
          [Root].MinimumNConc.FixedValue = 0.009
          [Root].RootProportion.FixedValue = 0.1
          [Stover].CoverFunction.Expanding.SigCoverFunction.Xo.FixedValue = 360
          [Stover].CoverFunction.Expanding.SigCoverFunction.Ymax.FixedValue = 0.8
          [Stover].CoverFunction.Expanding.SigCoverFunction.b.FixedValue = 120
          [Stover].MaximumNConc.FixedValue = 0.03
          [Stover].MinimumNConc.FixedValue = 0.03
          [Stover].XoBiomass.FixedValue = 1500.0
          [Stover].bBiomass.FixedValue = 300.0
      Cultivar Carrots
        Command:
          [Nodule].FixationMetabolicCost.FixedValue = 0
          [Nodule].FixationRate.FixedValue = 0
          [Phenology].CanopyExpanding.Target.FixedValue = 955.0
          [Phenology].Senescing.Target.FixedValue = 750
          [Phenology].YieldIncreasing.Target.FixedValue = 2045.0
          [Product].DryMatterContent.FixedValue = 0.12
          [Product].ExpectedYield.FixedValue = 7000
          [Product].HarvestIndex.FixedValue = 0.9
          [Product].MaximumNConc.FixedValue = 0.01
          [Product].MinimumNConc.FixedValue = 0.007
          [Root].KLModifier.XYPairs.Y = 1,1,1,1,1,1,1,0.472,0.223,0.105,0,0,0,0,0,0,0,0,0,0,0,0,0,0,0,0,0,0,0,0
          [Root].MaximumNConc.FixedValue = 0.01
          [Root].MaximumRootDepth.FixedValue = 500
          [Root].MinimumNConc.FixedValue = 0.01
          [Root].RootProportion.FixedValue = 0.1
          [Stover].CoverFunction.Expanding.SigCoverFunction.Xo.FixedValue = 690
          [Stover].CoverFunction.Expanding.SigCoverFunction.Ymax.FixedValue = 0.9
          [Stover].CoverFunction.Expanding.SigCoverFunction.b.FixedValue = 120
          [Stover].MaximumNConc.FixedValue = 0.02
          [Stover].MinimumNConc.FixedValue = 0.02
          [Stover].XoBiomass.FixedValue = 1875.0
          [Stover].bBiomass.FixedValue = 375.0
      Cultivar Cauliflower_summer
        Command:
          [Nodule].FixationMetabolicCost.FixedValue = 0
          [Nodule].FixationRate.FixedValue = 0
          [Phenology].CanopyExpanding.Target.FixedValue = 1422.0
          [Phenology].Senescing.Target.FixedValue = 900
          [Phenology].YieldIncreasing.Target.FixedValue = 678.0
          [Product].DryMatterContent.FixedValue = 0.09
          [Product].ExpectedYield.FixedValue = 5000
          [Product].HarvestIndex.FixedValue = 0.45
          [Product].MaximumNConc.FixedValue = 0.035
          [Product].MinimumNConc.FixedValue = 0.0245
          [Root].KLModifier.XYPairs.Y = 1,1,1,1,1,1,1,0.472,0.223,0.105,0,0,0,0,0,0,0,0,0,0,0,0,0,0,0,0,0,0,0,0
          [Root].MaximumNConc.FixedValue = 0.009
          [Root].MaximumRootDepth.FixedValue = 500
          [Root].MinimumNConc.FixedValue = 0.009
          [Root].RootProportion.FixedValue = 0.1
          [Stover].CoverFunction.Expanding.SigCoverFunction.Xo.FixedValue = 450
          [Stover].CoverFunction.Expanding.SigCoverFunction.Ymax.FixedValue = 0.8
          [Stover].CoverFunction.Expanding.SigCoverFunction.b.FixedValue = 120
          [Stover].MaximumNConc.FixedValue = 0.038
          [Stover].MinimumNConc.FixedValue = 0.038
          [Stover].XoBiomass.FixedValue = 1500.0
          [Stover].bBiomass.FixedValue = 300.0
      Cultivar Cauliflower_winter_spring
        Command:
          [Nodule].FixationMetabolicCost.FixedValue = 0
          [Nodule].FixationRate.FixedValue = 0
          [Phenology].CanopyExpanding.Target.FixedValue = 1566.0
          [Phenology].Senescing.Target.FixedValue = 900
          [Phenology].YieldIncreasing.Target.FixedValue = 534.0
          [Product].DryMatterContent.FixedValue = 0.1
          [Product].ExpectedYield.FixedValue = 3000
          [Product].HarvestIndex.FixedValue = 0.3
          [Product].MaximumNConc.FixedValue = 0.035
          [Product].MinimumNConc.FixedValue = 0.0245
          [Root].KLModifier.XYPairs.Y = 1,1,1,1,1,1,1,0.472,0.223,0.105,0,0,0,0,0,0,0,0,0,0,0,0,0,0,0,0,0,0,0,0
          [Root].MaximumNConc.FixedValue = 0.009
          [Root].MaximumRootDepth.FixedValue = 500
          [Root].MinimumNConc.FixedValue = 0.009
          [Root].RootProportion.FixedValue = 0.1
          [Stover].CoverFunction.Expanding.SigCoverFunction.Xo.FixedValue = 450
          [Stover].CoverFunction.Expanding.SigCoverFunction.Ymax.FixedValue = 0.8
          [Stover].CoverFunction.Expanding.SigCoverFunction.b.FixedValue = 120
          [Stover].MaximumNConc.FixedValue = 0.038
          [Stover].MinimumNConc.FixedValue = 0.038
          [Stover].XoBiomass.FixedValue = 1500.0
          [Stover].bBiomass.FixedValue = 300.0
      Cultivar Chicory_Seed
        Command:
          [Nodule].FixationMetabolicCost.FixedValue = 0
          [Nodule].FixationRate.FixedValue = 0
          [Phenology].CanopyExpanding.Target.FixedValue = 2017.0
          [Phenology].Senescing.Target.FixedValue = 300
          [Phenology].YieldIncreasing.Target.FixedValue = 983.0
          [Product].DryMatterContent.FixedValue = 0.85
          [Product].ExpectedYield.FixedValue = 150
          [Product].HarvestIndex.FixedValue = 0.05
          [Product].MaximumNConc.FixedValue = 0.03
          [Product].MinimumNConc.FixedValue = 0.0105
          [Root].KLModifier.XYPairs.Y = 1,1,1,1,1,1,1,0.472,0.223,0.105,0,0,0,0,0,0,0,0,0,0,0,0,0,0,0,0,0,0,0,0
          [Root].MaximumNConc.FixedValue = 0.01
          [Root].MaximumRootDepth.FixedValue = 500
          [Root].MinimumNConc.FixedValue = 0.01
          [Root].RootProportion.FixedValue = 0.1
          [Stover].CoverFunction.Expanding.SigCoverFunction.Xo.FixedValue = 690
          [Stover].CoverFunction.Expanding.SigCoverFunction.Ymax.FixedValue = 0.95
          [Stover].CoverFunction.Expanding.SigCoverFunction.b.FixedValue = 120
          [Stover].MaximumNConc.FixedValue = 0.02
          [Stover].MinimumNConc.FixedValue = 0.02
          [Stover].XoBiomass.FixedValue = 1650.0
          [Stover].bBiomass.FixedValue = 330.0
      Cultivar Clover_1styear
        Command:
          [Nodule].FixationMetabolicCost.FixedValue = 0
          [Nodule].FixationRate.FixedValue = 1000
          [Phenology].CanopyExpanding.Target.FixedValue = 2141.0
          [Phenology].Senescing.Target.FixedValue = 300
          [Phenology].YieldIncreasing.Target.FixedValue = 1159.0
          [Product].DryMatterContent.FixedValue = 0.85
          [Product].ExpectedYield.FixedValue = 60
          [Product].HarvestIndex.FixedValue = 0.09
          [Product].MaximumNConc.FixedValue = 0.035
          [Product].MinimumNConc.FixedValue = 0.0245
          [Root].KLModifier.XYPairs.Y = 1,1,1,1,1,1,1,0.779,0.607,0.472,0.368,0.287,0.223,0.174,0.135,0.105,0.082,0.064,0,0,0,0,0,0,0,0,0,0,0,0
          [Root].MaximumNConc.FixedValue = 0.01
          [Root].MaximumRootDepth.FixedValue = 900
          [Root].MinimumNConc.FixedValue = 0.01
          [Root].RootProportion.FixedValue = 0.1
          [Stover].CoverFunction.Expanding.SigCoverFunction.Xo.FixedValue = 750
          [Stover].CoverFunction.Expanding.SigCoverFunction.Ymax.FixedValue = 0.8
          [Stover].CoverFunction.Expanding.SigCoverFunction.b.FixedValue = 120
          [Stover].MaximumNConc.FixedValue = 0.04
          [Stover].MinimumNConc.FixedValue = 0.04
          [Stover].XoBiomass.FixedValue = 1800.0
          [Stover].bBiomass.FixedValue = 360.0
      Cultivar Clover_2ndyear
        Command:
          [Nodule].FixationMetabolicCost.FixedValue = 0
          [Nodule].FixationRate.FixedValue = 1000
          [Phenology].CanopyExpanding.Target.FixedValue = 1249.0
          [Phenology].Senescing.Target.FixedValue = 300
          [Phenology].YieldIncreasing.Target.FixedValue = 551.0
          [Product].DryMatterContent.FixedValue = 0.85
          [Product].ExpectedYield.FixedValue = 60
          [Product].HarvestIndex.FixedValue = 0.09
          [Product].MaximumNConc.FixedValue = 0.035
          [Product].MinimumNConc.FixedValue = 0.0245
          [Root].KLModifier.XYPairs.Y = 1,1,1,1,1,1,1,0.779,0.607,0.472,0.368,0.287,0.223,0.174,0.135,0.105,0.082,0.064,0,0,0,0,0,0,0,0,0,0,0,0
          [Root].MaximumNConc.FixedValue = 0.01
          [Root].MaximumRootDepth.FixedValue = 900
          [Root].MinimumNConc.FixedValue = 0.01
          [Root].RootProportion.FixedValue = 0.1
          [Stover].CoverFunction.Expanding.SigCoverFunction.Xo.FixedValue = 300
          [Stover].CoverFunction.Expanding.SigCoverFunction.Ymax.FixedValue = 0.96
          [Stover].CoverFunction.Expanding.SigCoverFunction.b.FixedValue = 120
          [Stover].MaximumNConc.FixedValue = 0.04
          [Stover].MinimumNConc.FixedValue = 0.04
          [Stover].XoBiomass.FixedValue = 1050.0
          [Stover].bBiomass.FixedValue = 210.0
      Cultivar Dried_Beans
        Command:
          [Nodule].FixationMetabolicCost.FixedValue = 0
          [Nodule].FixationRate.FixedValue = 1000
          [Phenology].CanopyExpanding.Target.FixedValue = 755.0
          [Phenology].Senescing.Target.FixedValue = 300
          [Phenology].YieldIncreasing.Target.FixedValue = 595.0
          [Product].DryMatterContent.FixedValue = 0.86
          [Product].ExpectedYield.FixedValue = 350
          [Product].HarvestIndex.FixedValue = 0.5
          [Product].MaximumNConc.FixedValue = 0.035
          [Product].MinimumNConc.FixedValue = 0.0245
          [Root].KLModifier.XYPairs.Y = 1,1,1,1,1,1,1,0.687,0.472,0.325,0.223,0.153,0.105,0.072,0,0,0,0,0,0,0,0,0,0,0,0,0,0,0,0
          [Root].MaximumNConc.FixedValue = 0.015
          [Root].MaximumRootDepth.FixedValue = 700
          [Root].MinimumNConc.FixedValue = 0.015
          [Root].RootProportion.FixedValue = 0.1
          [Stover].CoverFunction.Expanding.SigCoverFunction.Xo.FixedValue = 690
          [Stover].CoverFunction.Expanding.SigCoverFunction.Ymax.FixedValue = 0.96
          [Stover].CoverFunction.Expanding.SigCoverFunction.b.FixedValue = 60
          [Stover].MaximumNConc.FixedValue = 0.02
          [Stover].MinimumNConc.FixedValue = 0.02
          [Stover].XoBiomass.FixedValue = 825.0
          [Stover].bBiomass.FixedValue = 165.0
      Cultivar Dried_Peas
        Command:
          [Nodule].FixationMetabolicCost.FixedValue = 0
          [Nodule].FixationRate.FixedValue = 1000
          [Phenology].CanopyExpanding.Target.FixedValue = 755.0
          [Phenology].Senescing.Target.FixedValue = 300
          [Phenology].YieldIncreasing.Target.FixedValue = 595.0
          [Product].DryMatterContent.FixedValue = 0.86
          [Product].ExpectedYield.FixedValue = 350
          [Product].HarvestIndex.FixedValue = 0.5
          [Product].MaximumNConc.FixedValue = 0.035
          [Product].MinimumNConc.FixedValue = 0.0245
          [Root].KLModifier.XYPairs.Y = 1,1,1,1,1,1,1,0.846,0.717,0.607,0.513,0.435,0.368,0.311,0.264,0.223,0.189,0.16,0.135,0.115,0.097,0.082,0.069,0.059,0,0,0,0,0,0
          [Root].MaximumNConc.FixedValue = 0.015
          [Root].MaximumRootDepth.FixedValue = 1200
          [Root].MinimumNConc.FixedValue = 0.015
          [Root].RootProportion.FixedValue = 0.1
          [Stover].CoverFunction.Expanding.SigCoverFunction.Xo.FixedValue = 690
          [Stover].CoverFunction.Expanding.SigCoverFunction.Ymax.FixedValue = 0.96
          [Stover].CoverFunction.Expanding.SigCoverFunction.b.FixedValue = 60
          [Stover].MaximumNConc.FixedValue = 0.02
          [Stover].MinimumNConc.FixedValue = 0.02
          [Stover].XoBiomass.FixedValue = 825.0
          [Stover].bBiomass.FixedValue = 165.0
      Cultivar Green_Beans
        Command:
          [Nodule].FixationMetabolicCost.FixedValue = 0
          [Nodule].FixationRate.FixedValue = 1000
          [Phenology].CanopyExpanding.Target.FixedValue = 782.0
          [Phenology].Senescing.Target.FixedValue = 300
          [Phenology].YieldIncreasing.Target.FixedValue = 568.0
          [Product].DryMatterContent.FixedValue = 0.21
          [Product].ExpectedYield.FixedValue = 800
          [Product].HarvestIndex.FixedValue = 0.45
          [Product].MaximumNConc.FixedValue = 0.035
          [Product].MinimumNConc.FixedValue = 0.0245
          [Root].KLModifier.XYPairs.Y = 1,1,1,1,1,1,1,0.687,0.472,0.325,0.223,0.153,0.105,0.072,0,0,0,0,0,0,0,0,0,0,0,0,0,0,0,0
          [Root].MaximumNConc.FixedValue = 0.015
          [Root].MaximumRootDepth.FixedValue = 700
          [Root].MinimumNConc.FixedValue = 0.015
          [Root].RootProportion.FixedValue = 0.1
          [Stover].CoverFunction.Expanding.SigCoverFunction.Xo.FixedValue = 690
          [Stover].CoverFunction.Expanding.SigCoverFunction.Ymax.FixedValue = 0.8
          [Stover].CoverFunction.Expanding.SigCoverFunction.b.FixedValue = 60
          [Stover].MaximumNConc.FixedValue = 0.03
          [Stover].MinimumNConc.FixedValue = 0.03
          [Stover].XoBiomass.FixedValue = 825.0
          [Stover].bBiomass.FixedValue = 165.0
      Cultivar Green_Peas
        Command:
          [Nodule].FixationMetabolicCost.FixedValue = 0
          [Nodule].FixationRate.FixedValue = 1000
          [Phenology].CanopyExpanding.Target.FixedValue = 782.0
          [Phenology].Senescing.Target.FixedValue = 300
          [Phenology].YieldIncreasing.Target.FixedValue = 568.0
          [Product].DryMatterContent.FixedValue = 0.21
          [Product].ExpectedYield.FixedValue = 800
          [Product].HarvestIndex.FixedValue = 0.45
          [Product].MaximumNConc.FixedValue = 0.035
          [Product].MinimumNConc.FixedValue = 0.0245
          [Root].KLModifier.XYPairs.Y = 1,1,1,1,1,1,1,0.846,0.717,0.607,0.513,0.435,0.368,0.311,0.264,0.223,0.189,0.16,0.135,0.115,0.097,0.082,0.069,0.059,0,0,0,0,0,0
          [Root].MaximumNConc.FixedValue = 0.015
          [Root].MaximumRootDepth.FixedValue = 1200
          [Root].MinimumNConc.FixedValue = 0.015
          [Root].RootProportion.FixedValue = 0.1
          [Stover].CoverFunction.Expanding.SigCoverFunction.Xo.FixedValue = 690
          [Stover].CoverFunction.Expanding.SigCoverFunction.Ymax.FixedValue = 0.96
          [Stover].CoverFunction.Expanding.SigCoverFunction.b.FixedValue = 60
          [Stover].MaximumNConc.FixedValue = 0.03
          [Stover].MinimumNConc.FixedValue = 0.03
          [Stover].XoBiomass.FixedValue = 825.0
          [Stover].bBiomass.FixedValue = 165.0
      Cultivar Kale
        Command:
          [Nodule].FixationMetabolicCost.FixedValue = 0
          [Nodule].FixationRate.FixedValue = 0
          [Phenology].CanopyExpanding.Target.FixedValue = 1150.0
          [Phenology].Senescing.Target.FixedValue = 0
          [Phenology].YieldIncreasing.Target.FixedValue = 1850.0
          [Product].DryMatterContent.FixedValue = 0.16
          [Product].ExpectedYield.FixedValue = 7500
          [Product].HarvestIndex.FixedValue = 0.7
          [Product].MaximumNConc.FixedValue = 0.03
          [Product].MinimumNConc.FixedValue = 0.02
          [Root].KLModifier.XYPairs.Y = 1,1,1,1,1,1,1,0.946,0.895,0.846,0.801,0.757,0.717,0.678,0.641,0.607,0.574,0.543,0.513,0.486,0.459,0.435,0.411,0.389,0.368,0.348,0.329,0.311,0.295,0.279
          [Root].MaximumNConc.FixedValue = 0.008
          [Root].MaximumRootDepth.FixedValue = 3000
          [Root].MinimumNConc.FixedValue = 0.008
          [Root].RootProportion.FixedValue = 0.1
          [Stover].CoverFunction.Expanding.SigCoverFunction.Xo.FixedValue = 867
          [Stover].CoverFunction.Expanding.SigCoverFunction.Ymax.FixedValue = 0.96
          [Stover].CoverFunction.Expanding.SigCoverFunction.b.FixedValue = 141
          [Stover].MaximumNConc.FixedValue = 0.01
          [Stover].MinimumNConc.FixedValue = 0.01
          [Stover].XoBiomass.FixedValue = 1500.0
          [Stover].bBiomass.FixedValue = 300.0
      Cultivar Kumara
        Command:
          [Nodule].FixationMetabolicCost.FixedValue = 0
          [Nodule].FixationRate.FixedValue = 0
          [Phenology].CanopyExpanding.Target.FixedValue = 716.0
          [Phenology].Senescing.Target.FixedValue = 750
          [Phenology].YieldIncreasing.Target.FixedValue = 1234.0
          [Product].DryMatterContent.FixedValue = 0.23
          [Product].ExpectedYield.FixedValue = 5000
          [Product].HarvestIndex.FixedValue = 0.89
          [Product].MaximumNConc.FixedValue = 0.018
          [Product].MinimumNConc.FixedValue = 0.0126
          [Root].KLModifier.XYPairs.Y = 1,1,1,1,1,1,1,0.472,0.223,0.105,0,0,0,0,0,0,0,0,0,0,0,0,0,0,0,0,0,0,0,0
          [Root].MaximumNConc.FixedValue = 0.01
          [Root].MaximumRootDepth.FixedValue = 500
          [Root].MinimumNConc.FixedValue = 0.01
          [Root].RootProportion.FixedValue = 0.1
          [Stover].CoverFunction.Expanding.SigCoverFunction.Xo.FixedValue = 690
          [Stover].CoverFunction.Expanding.SigCoverFunction.Ymax.FixedValue = 0.96
          [Stover].CoverFunction.Expanding.SigCoverFunction.b.FixedValue = 120
          [Stover].MaximumNConc.FixedValue = 0.02
          [Stover].MinimumNConc.FixedValue = 0.02
          [Stover].XoBiomass.FixedValue = 1350.0
          [Stover].bBiomass.FixedValue = 270.0
      Cultivar Lentils: same as Replacements.SCRUM.Dried_Beans
      Cultivar Lettuce
        Command:
          [Nodule].FixationMetabolicCost.FixedValue = 0
          [Nodule].FixationRate.FixedValue = 0
          [Phenology].CanopyExpanding.Target.FixedValue = 1299.0
          [Phenology].Senescing.Target.FixedValue = 600
          [Phenology].YieldIncreasing.Target.FixedValue = 2001.0
          [Product].DryMatterContent.FixedValue = 0.05
          [Product].ExpectedYield.FixedValue = 5000
          [Product].HarvestIndex.FixedValue = 0.8
          [Product].MaximumNConc.FixedValue = 0.026
          [Product].MinimumNConc.FixedValue = 0.0182
          [Root].KLModifier.XYPairs.Y = 1,1,1,1,1,1,1,0.472,0.223,0.105,0,0,0,0,0,0,0,0,0,0,0,0,0,0,0,0,0,0,0,0
          [Root].MaximumNConc.FixedValue = 0.009
          [Root].MaximumRootDepth.FixedValue = 500
          [Root].MinimumNConc.FixedValue = 0.009
          [Root].RootProportion.FixedValue = 0.1
          [Stover].CoverFunction.Expanding.SigCoverFunction.Xo.FixedValue = 360
          [Stover].CoverFunction.Expanding.SigCoverFunction.Ymax.FixedValue = 0.8
          [Stover].CoverFunction.Expanding.SigCoverFunction.b.FixedValue = 120
          [Stover].MaximumNConc.FixedValue = 0.03
          [Stover].MinimumNConc.FixedValue = 0.03
          [Stover].XoBiomass.FixedValue = 1950.0
          [Stover].bBiomass.FixedValue = 390.0
      Cultivar Linseed
        Command:
          [Nodule].FixationMetabolicCost.FixedValue = 0
          [Nodule].FixationRate.FixedValue = 0
          [Phenology].CanopyExpanding.Target.FixedValue = 939.0
          [Phenology].Senescing.Target.FixedValue = 300
          [Phenology].YieldIncreasing.Target.FixedValue = 561.0
          [Product].DryMatterContent.FixedValue = 0.87
          [Product].ExpectedYield.FixedValue = 300
          [Product].HarvestIndex.FixedValue = 0.3
          [Product].MaximumNConc.FixedValue = 0.03
          [Product].MinimumNConc.FixedValue = 0.0091
          [Root].KLModifier.XYPairs.Y = 1,1,1,1,1,1,1,0.807,0.651,0.526,0.424,0.343,0.276,0.223,0.18,0.145,0.117,0.095,0.076,0.062,0,0,0,0,0,0,0,0,0,0
          [Root].MaximumNConc.FixedValue = 0.009
          [Root].MaximumRootDepth.FixedValue = 1000
          [Root].MinimumNConc.FixedValue = 0.009
          [Root].RootProportion.FixedValue = 0.1
          [Stover].CoverFunction.Expanding.SigCoverFunction.Xo.FixedValue = 540
          [Stover].CoverFunction.Expanding.SigCoverFunction.Ymax.FixedValue = 0.96
          [Stover].CoverFunction.Expanding.SigCoverFunction.b.FixedValue = 120
          [Stover].MaximumNConc.FixedValue = 0.01
          [Stover].MinimumNConc.FixedValue = 0.01
          [Stover].XoBiomass.FixedValue = 900.0
          [Stover].bBiomass.FixedValue = 180.0
      Cultivar Lupins
        Command:
          [Nodule].FixationMetabolicCost.FixedValue = 0
          [Nodule].FixationRate.FixedValue = 1000
          [Phenology].CanopyExpanding.Target.FixedValue = 420.0
          [Phenology].Senescing.Target.FixedValue = 0
          [Phenology].YieldIncreasing.Target.FixedValue = 1230.0
          [Product].DryMatterContent.FixedValue = 1.0
          [Product].ExpectedYield.FixedValue = 1200
          [Product].HarvestIndex.FixedValue = 0.9
          [Product].MaximumNConc.FixedValue = 0.03
          [Product].MinimumNConc.FixedValue = 0.021
          [Root].KLModifier.XYPairs.Y = 1,1,1,1,1,1,1,0.687,0.472,0.325,0.223,0.153,0.105,0.072,0,0,0,0,0,0,0,0,0,0,0,0,0,0,0,0
          [Root].MaximumNConc.FixedValue = 0.015
          [Root].MaximumRootDepth.FixedValue = 700
          [Root].MinimumNConc.FixedValue = 0.015
          [Root].RootProportion.FixedValue = 0.1
          [Stover].CoverFunction.Expanding.SigCoverFunction.Xo.FixedValue = 690
          [Stover].CoverFunction.Expanding.SigCoverFunction.Ymax.FixedValue = 0.96
          [Stover].CoverFunction.Expanding.SigCoverFunction.b.FixedValue = 60
          [Stover].MaximumNConc.FixedValue = 0.03
          [Stover].MinimumNConc.FixedValue = 0.03
          [Stover].XoBiomass.FixedValue = 825.0
          [Stover].bBiomass.FixedValue = 165.0
      Cultivar Maize_Long
        Command:
          [Nodule].FixationMetabolicCost.FixedValue = 0
          [Nodule].FixationRate.FixedValue = 0
          [Phenology].CanopyExpanding.Target.FixedValue = 1923.0
          [Phenology].Senescing.Target.FixedValue = 1800
          [Phenology].YieldIncreasing.Target.FixedValue = 477.0
          [Product].DryMatterContent.FixedValue = 0.87
          [Product].ExpectedYield.FixedValue = 1350
          [Product].HarvestIndex.FixedValue = 0.5
          [Product].MaximumNConc.FixedValue = 0.014
          [Product].MinimumNConc.FixedValue = 0.0098
          [Root].KLModifier.XYPairs.Y = 1,1,1,1,1,1,1,0.882,0.779,0.687,0.607,0.535,0.472,0.417,0.368,0.325,0.287,0.253,0.223,0.197,0.174,0.153,0.135,0.119,0.105,0.093,0.082,0.072,0.064,0.056
          [Root].MaximumNConc.FixedValue = 0.007
          [Root].MaximumRootDepth.FixedValue = 1500
          [Root].MinimumNConc.FixedValue = 0.007
          [Root].RootProportion.FixedValue = 0.1
          [Stover].CoverFunction.Expanding.SigCoverFunction.Xo.FixedValue = 1050
          [Stover].CoverFunction.Expanding.SigCoverFunction.Ymax.FixedValue = 0.92
          [Stover].CoverFunction.Expanding.SigCoverFunction.b.FixedValue = 180
          [Stover].MaximumNConc.FixedValue = 0.007
          [Stover].MinimumNConc.FixedValue = 0.007
          [Stover].XoBiomass.FixedValue = 2100.0
          [Stover].bBiomass.FixedValue = 420.0
      Cultivar Maize_Med
        Command:
          [Nodule].FixationMetabolicCost.FixedValue = 0
          [Nodule].FixationRate.FixedValue = 0
          [Phenology].CanopyExpanding.Target.FixedValue = 1785.0
          [Phenology].Senescing.Target.FixedValue = 1650
          [Phenology].YieldIncreasing.Target.FixedValue = 465.0
          [Product].DryMatterContent.FixedValue = 0.87
          [Product].ExpectedYield.FixedValue = 1330
          [Product].HarvestIndex.FixedValue = 0.5
          [Product].MaximumNConc.FixedValue = 0.014
          [Product].MinimumNConc.FixedValue = 0.0098
          [Root].KLModifier.XYPairs.Y = 1,1,1,1,1,1,1,0.882,0.779,0.687,0.607,0.535,0.472,0.417,0.368,0.325,0.287,0.253,0.223,0.197,0.174,0.153,0.135,0.119,0.105,0.093,0.082,0.072,0.064,0.056
          [Root].MaximumNConc.FixedValue = 0.007
          [Root].MaximumRootDepth.FixedValue = 1500
          [Root].MinimumNConc.FixedValue = 0.007
          [Root].RootProportion.FixedValue = 0.1
          [Stover].CoverFunction.Expanding.SigCoverFunction.Xo.FixedValue = 960
          [Stover].CoverFunction.Expanding.SigCoverFunction.Ymax.FixedValue = 0.85
          [Stover].CoverFunction.Expanding.SigCoverFunction.b.FixedValue = 180
          [Stover].MaximumNConc.FixedValue = 0.007
          [Stover].MinimumNConc.FixedValue = 0.007
          [Stover].XoBiomass.FixedValue = 1950.0
          [Stover].bBiomass.FixedValue = 390.0
      Cultivar Maize_Short
        Command:
          [Nodule].FixationMetabolicCost.FixedValue = 0
          [Nodule].FixationRate.FixedValue = 0
          [Phenology].CanopyExpanding.Target.FixedValue = 1648.0
          [Phenology].Senescing.Target.FixedValue = 1500
          [Phenology].YieldIncreasing.Target.FixedValue = 452.0
          [Product].DryMatterContent.FixedValue = 0.87
          [Product].ExpectedYield.FixedValue = 1220
          [Product].HarvestIndex.FixedValue = 0.5
          [Product].MaximumNConc.FixedValue = 0.014
          [Product].MinimumNConc.FixedValue = 0.0098
          [Root].KLModifier.XYPairs.Y = 1,1,1,1,1,1,1,0.882,0.779,0.687,0.607,0.535,0.472,0.417,0.368,0.325,0.287,0.253,0.223,0.197,0.174,0.153,0.135,0.119,0.105,0.093,0.082,0.072,0.064,0.056
          [Root].MaximumNConc.FixedValue = 0.007
          [Root].MaximumRootDepth.FixedValue = 1500
          [Root].MinimumNConc.FixedValue = 0.007
          [Root].RootProportion.FixedValue = 0.1
          [Stover].CoverFunction.Expanding.SigCoverFunction.Xo.FixedValue = 900
          [Stover].CoverFunction.Expanding.SigCoverFunction.Ymax.FixedValue = 0.75
          [Stover].CoverFunction.Expanding.SigCoverFunction.b.FixedValue = 180
          [Stover].MaximumNConc.FixedValue = 0.007
          [Stover].MinimumNConc.FixedValue = 0.007
          [Stover].XoBiomass.FixedValue = 1800.0
          [Stover].bBiomass.FixedValue = 360.0
      Cultivar Maizesilage
        Command:
          [Nodule].FixationMetabolicCost.FixedValue = 0
          [Nodule].FixationRate.FixedValue = 0
          [Phenology].CanopyExpanding.Target.FixedValue = 652.0
          [Phenology].Senescing.Target.FixedValue = 1350
          [Phenology].YieldIncreasing.Target.FixedValue = 1598.0
          [Product].DryMatterContent.FixedValue = 0.35
          [Product].ExpectedYield.FixedValue = 5000
          [Product].HarvestIndex.FixedValue = 0.95
          [Product].MaximumNConc.FixedValue = 0.014
          [Product].MinimumNConc.FixedValue = 0.0098
          [Root].KLModifier.XYPairs.Y = 1,1,1,1,1,1,1,0.882,0.779,0.687,0.607,0.535,0.472,0.417,0.368,0.325,0.287,0.253,0.223,0.197,0.174,0.153,0.135,0.119,0.105,0.093,0.082,0.072,0.064,0.056
          [Root].MaximumNConc.FixedValue = 0.007
          [Root].MaximumRootDepth.FixedValue = 1500
          [Root].MinimumNConc.FixedValue = 0.007
          [Root].RootProportion.FixedValue = 0.1
          [Stover].CoverFunction.Expanding.SigCoverFunction.Xo.FixedValue = 960
          [Stover].CoverFunction.Expanding.SigCoverFunction.Ymax.FixedValue = 0.85
          [Stover].CoverFunction.Expanding.SigCoverFunction.b.FixedValue = 180
          [Stover].MaximumNConc.FixedValue = 0.007
          [Stover].MinimumNConc.FixedValue = 0.007
          [Stover].XoBiomass.FixedValue = 1800.0
          [Stover].bBiomass.FixedValue = 360.0
      Cultivar Mustard
        Command:
          [Nodule].FixationMetabolicCost.FixedValue = 0
          [Nodule].FixationRate.FixedValue = 0
          [Phenology].CanopyExpanding.Target.FixedValue = 420.0
          [Phenology].Senescing.Target.FixedValue = 0
          [Phenology].YieldIncreasing.Target.FixedValue = 1230.0
          [Product].DryMatterContent.FixedValue = 1.0
          [Product].ExpectedYield.FixedValue = 700
          [Product].HarvestIndex.FixedValue = 0.9
          [Product].MaximumNConc.FixedValue = 0.03
          [Product].MinimumNConc.FixedValue = 0.021
          [Root].KLModifier.XYPairs.Y = 1,1,1,1,1,1,1,0.687,0.472,0.325,0.223,0.153,0.105,0.072,0,0,0,0,0,0,0,0,0,0,0,0,0,0,0,0
          [Root].MaximumNConc.FixedValue = 0.01
          [Root].MaximumRootDepth.FixedValue = 700
          [Root].MinimumNConc.FixedValue = 0.01
          [Root].RootProportion.FixedValue = 0.1
          [Stover].CoverFunction.Expanding.SigCoverFunction.Xo.FixedValue = 690
          [Stover].CoverFunction.Expanding.SigCoverFunction.Ymax.FixedValue = 0.96
          [Stover].CoverFunction.Expanding.SigCoverFunction.b.FixedValue = 60
          [Stover].MaximumNConc.FixedValue = 0.03
          [Stover].MinimumNConc.FixedValue = 0.03
          [Stover].XoBiomass.FixedValue = 825.0
          [Stover].bBiomass.FixedValue = 165.0
      Cultivar Mustard_Seed
        Command:
          [Nodule].FixationMetabolicCost.FixedValue = 0
          [Nodule].FixationRate.FixedValue = 0
          [Phenology].CanopyExpanding.Target.FixedValue = 1064.0
          [Phenology].Senescing.Target.FixedValue = 300
          [Phenology].YieldIncreasing.Target.FixedValue = 436.0
          [Product].DryMatterContent.FixedValue = 0.84
          [Product].ExpectedYield.FixedValue = 100
          [Product].HarvestIndex.FixedValue = 0.1
          [Product].MaximumNConc.FixedValue = 0.03
          [Product].MinimumNConc.FixedValue = 0.02
          [Root].KLModifier.XYPairs.Y = 1,1,1,1,1,1,1,0.807,0.651,0.526,0.424,0.343,0.276,0.223,0.18,0.145,0.117,0.095,0.076,0.062,0,0,0,0,0,0,0,0,0,0
          [Root].MaximumNConc.FixedValue = 0.008
          [Root].MaximumRootDepth.FixedValue = 1000
          [Root].MinimumNConc.FixedValue = 0.008
          [Root].RootProportion.FixedValue = 0.1
          [Stover].CoverFunction.Expanding.SigCoverFunction.Xo.FixedValue = 540
          [Stover].CoverFunction.Expanding.SigCoverFunction.Ymax.FixedValue = 0.96
          [Stover].CoverFunction.Expanding.SigCoverFunction.b.FixedValue = 120
          [Stover].MaximumNConc.FixedValue = 0.02
          [Stover].MinimumNConc.FixedValue = 0.02
          [Stover].XoBiomass.FixedValue = 900.0
          [Stover].bBiomass.FixedValue = 180.0
      Cultivar Oats&Rye
        Command:
          [Nodule].FixationMetabolicCost.FixedValue = 0
          [Nodule].FixationRate.FixedValue = 0
          [Phenology].CanopyExpanding.Target.FixedValue = 458.0
          [Phenology].Senescing.Target.FixedValue = 0
          [Phenology].YieldIncreasing.Target.FixedValue = 1342.0
          [Product].DryMatterContent.FixedValue = 1.0
          [Product].ExpectedYield.FixedValue = 1000
          [Product].HarvestIndex.FixedValue = 0.9
          [Product].MaximumNConc.FixedValue = 0.012
          [Product].MinimumNConc.FixedValue = 0.0084
          [Root].KLModifier.XYPairs.Y = 1,1,1,1,1,1,1,0.807,0.651,0.526,0.424,0.343,0.276,0.223,0.18,0.145,0.117,0.095,0.076,0.062,0,0,0,0,0,0,0,0,0,0
          [Root].MaximumNConc.FixedValue = 0.009
          [Root].MaximumRootDepth.FixedValue = 1000
          [Root].MinimumNConc.FixedValue = 0.009
          [Root].RootProportion.FixedValue = 0.1
          [Stover].CoverFunction.Expanding.SigCoverFunction.Xo.FixedValue = 540
          [Stover].CoverFunction.Expanding.SigCoverFunction.Ymax.FixedValue = 0.96
          [Stover].CoverFunction.Expanding.SigCoverFunction.b.FixedValue = 120
          [Stover].MaximumNConc.FixedValue = 0.012
          [Stover].MinimumNConc.FixedValue = 0.012
          [Stover].XoBiomass.FixedValue = 900.0
          [Stover].bBiomass.FixedValue = 180.0
      Cultivar Oats_Autumn
        Command:
          [Nodule].FixationMetabolicCost.FixedValue = 0
          [Nodule].FixationRate.FixedValue = 0
          [Phenology].CanopyExpanding.Target.FixedValue = 1546.0
          [Phenology].Senescing.Target.FixedValue = 600
          [Phenology].YieldIncreasing.Target.FixedValue = 854.0
          [Product].DryMatterContent.FixedValue = 0.87
          [Product].ExpectedYield.FixedValue = 800
          [Product].HarvestIndex.FixedValue = 0.32
          [Product].MaximumNConc.FixedValue = 0.013
          [Product].MinimumNConc.FixedValue = 0.0091
          [Root].KLModifier.XYPairs.Y = 1,1,1,1,1,1,1,0.882,0.779,0.687,0.607,0.535,0.472,0.417,0.368,0.325,0.287,0.253,0.223,0.197,0.174,0.153,0.135,0.119,0.105,0.093,0.082,0.072,0.064,0.056
          [Root].MaximumNConc.FixedValue = 0.009
          [Root].MaximumRootDepth.FixedValue = 1500
          [Root].MinimumNConc.FixedValue = 0.009
          [Root].RootProportion.FixedValue = 0.1
          [Stover].CoverFunction.Expanding.SigCoverFunction.Xo.FixedValue = 540
          [Stover].CoverFunction.Expanding.SigCoverFunction.Ymax.FixedValue = 0.96
          [Stover].CoverFunction.Expanding.SigCoverFunction.b.FixedValue = 120
          [Stover].MaximumNConc.FixedValue = 0.005
          [Stover].MinimumNConc.FixedValue = 0.005
          [Stover].XoBiomass.FixedValue = 1500.0
          [Stover].bBiomass.FixedValue = 300.0
      Cultivar Oats_AutumnForage
        Command:
          [Nodule].FixationMetabolicCost.FixedValue = 0
          [Nodule].FixationRate.FixedValue = 0
          [Phenology].CanopyExpanding.Target.FixedValue = 543.0
          [Phenology].Senescing.Target.FixedValue = 600
          [Phenology].YieldIncreasing.Target.FixedValue = 1857.0
          [Product].DryMatterContent.FixedValue = 0.4
          [Product].ExpectedYield.FixedValue = 3000
          [Product].HarvestIndex.FixedValue = 0.95
          [Product].MaximumNConc.FixedValue = 0.013
          [Product].MinimumNConc.FixedValue = 0.0091
          [Root].KLModifier.XYPairs.Y = 1,1,1,1,1,1,1,0.882,0.779,0.687,0.607,0.535,0.472,0.417,0.368,0.325,0.287,0.253,0.223,0.197,0.174,0.153,0.135,0.119,0.105,0.093,0.082,0.072,0.064,0.056
          [Root].MaximumNConc.FixedValue = 0.009
          [Root].MaximumRootDepth.FixedValue = 1500
          [Root].MinimumNConc.FixedValue = 0.009
          [Root].RootProportion.FixedValue = 0.1
          [Stover].CoverFunction.Expanding.SigCoverFunction.Xo.FixedValue = 540
          [Stover].CoverFunction.Expanding.SigCoverFunction.Ymax.FixedValue = 0.96
          [Stover].CoverFunction.Expanding.SigCoverFunction.b.FixedValue = 120
          [Stover].MaximumNConc.FixedValue = 0.005
          [Stover].MinimumNConc.FixedValue = 0.005
          [Stover].XoBiomass.FixedValue = 1500.0
          [Stover].bBiomass.FixedValue = 300.0
      Cultivar Oats_Spring
        Command:
          [Nodule].FixationMetabolicCost.FixedValue = 0
          [Nodule].FixationRate.FixedValue = 0
          [Phenology].CanopyExpanding.Target.FixedValue = 939.0
          [Phenology].Senescing.Target.FixedValue = 300
          [Phenology].YieldIncreasing.Target.FixedValue = 561.0
          [Product].DryMatterContent.FixedValue = 0.87
          [Product].ExpectedYield.FixedValue = 400
          [Product].HarvestIndex.FixedValue = 0.3
          [Product].MaximumNConc.FixedValue = 0.012
          [Product].MinimumNConc.FixedValue = 0.0084
          [Root].KLModifier.XYPairs.Y = 1,1,1,1,1,1,1,0.807,0.651,0.526,0.424,0.343,0.276,0.223,0.18,0.145,0.117,0.095,0.076,0.062,0,0,0,0,0,0,0,0,0,0
          [Root].MaximumNConc.FixedValue = 0.009
          [Root].MaximumRootDepth.FixedValue = 1000
          [Root].MinimumNConc.FixedValue = 0.009
          [Root].RootProportion.FixedValue = 0.1
          [Stover].CoverFunction.Expanding.SigCoverFunction.Xo.FixedValue = 540
          [Stover].CoverFunction.Expanding.SigCoverFunction.Ymax.FixedValue = 0.96
          [Stover].CoverFunction.Expanding.SigCoverFunction.b.FixedValue = 120
          [Stover].MaximumNConc.FixedValue = 0.005
          [Stover].MinimumNConc.FixedValue = 0.005
          [Stover].XoBiomass.FixedValue = 900.0
          [Stover].bBiomass.FixedValue = 180.0
      Cultivar Oats_SpringForage: same as Replacements.SCRUM.Barley_SpringForage
      Cultivar Onions
        Command:
          [Nodule].FixationMetabolicCost.FixedValue = 0
          [Nodule].FixationRate.FixedValue = 0
          [Phenology].CanopyExpanding.Target.FixedValue = 899.0
          [Phenology].Senescing.Target.FixedValue = 750
          [Phenology].YieldIncreasing.Target.FixedValue = 1051.0
          [Product].DryMatterContent.FixedValue = 0.11
          [Product].ExpectedYield.FixedValue = 7000
          [Product].HarvestIndex.FixedValue = 0.8
          [Product].MaximumNConc.FixedValue = 0.014
          [Product].MinimumNConc.FixedValue = 0.0098
          [Root].KLModifier.XYPairs.Y = 1,1,1,1,1,1,1,0.223,0,0,0,0,0,0,0,0,0,0,0,0,0,0,0,0,0,0,0,0,0,0
          [Root].MaximumNConc.FixedValue = 0.01
          [Root].MaximumRootDepth.FixedValue = 400
          [Root].MinimumNConc.FixedValue = 0.01
          [Root].RootProportion.FixedValue = 0.1
          [Stover].CoverFunction.Expanding.SigCoverFunction.Xo.FixedValue = 780
          [Stover].CoverFunction.Expanding.SigCoverFunction.Ymax.FixedValue = 0.8
          [Stover].CoverFunction.Expanding.SigCoverFunction.b.FixedValue = 120
          [Stover].MaximumNConc.FixedValue = 0.02
          [Stover].MinimumNConc.FixedValue = 0.02
          [Stover].XoBiomass.FixedValue = 1350.0
          [Stover].bBiomass.FixedValue = 270.0
      Cultivar PakChoi_Seed
        Command:
          [Nodule].FixationMetabolicCost.FixedValue = 0
          [Nodule].FixationRate.FixedValue = 0
          [Phenology].CanopyExpanding.Target.FixedValue = 939.0
          [Phenology].Senescing.Target.FixedValue = 300
          [Phenology].YieldIncreasing.Target.FixedValue = 561.0
          [Product].DryMatterContent.FixedValue = 0.84
          [Product].ExpectedYield.FixedValue = 200
          [Product].HarvestIndex.FixedValue = 0.3
          [Product].MaximumNConc.FixedValue = 0.03
          [Product].MinimumNConc.FixedValue = 0.02
          [Root].KLModifier.XYPairs.Y = 1,1,1,1,1,1,1,0.807,0.651,0.526,0.424,0.343,0.276,0.223,0.18,0.145,0.117,0.095,0.076,0.062,0,0,0,0,0,0,0,0,0,0
          [Root].MaximumNConc.FixedValue = 0.008
          [Root].MaximumRootDepth.FixedValue = 1000
          [Root].MinimumNConc.FixedValue = 0.008
          [Root].RootProportion.FixedValue = 0.1
          [Stover].CoverFunction.Expanding.SigCoverFunction.Xo.FixedValue = 540
          [Stover].CoverFunction.Expanding.SigCoverFunction.Ymax.FixedValue = 0.96
          [Stover].CoverFunction.Expanding.SigCoverFunction.b.FixedValue = 120
          [Stover].MaximumNConc.FixedValue = 0.02
          [Stover].MinimumNConc.FixedValue = 0.02
          [Stover].XoBiomass.FixedValue = 900.0
          [Stover].bBiomass.FixedValue = 180.0
      Cultivar Parsnips
        Command:
          [Nodule].FixationMetabolicCost.FixedValue = 0
          [Nodule].FixationRate.FixedValue = 0
          [Phenology].CanopyExpanding.Target.FixedValue = 489.0
          [Phenology].Senescing.Target.FixedValue = 750
          [Phenology].YieldIncreasing.Target.FixedValue = 1461.0
          [Product].DryMatterContent.FixedValue = 0.17
          [Product].ExpectedYield.FixedValue = 4400
          [Product].HarvestIndex.FixedValue = 0.95
          [Product].MaximumNConc.FixedValue = 0.014
          [Product].MinimumNConc.FixedValue = 0.0098
          [Root].KLModifier.XYPairs.Y = 1,1,1,1,1,1,1,0.472,0.223,0.105,0,0,0,0,0,0,0,0,0,0,0,0,0,0,0,0,0,0,0,0
          [Root].MaximumNConc.FixedValue = 0.01
          [Root].MaximumRootDepth.FixedValue = 500
          [Root].MinimumNConc.FixedValue = 0.01
          [Root].RootProportion.FixedValue = 0.1
          [Stover].CoverFunction.Expanding.SigCoverFunction.Xo.FixedValue = 690
          [Stover].CoverFunction.Expanding.SigCoverFunction.Ymax.FixedValue = 0.95
          [Stover].CoverFunction.Expanding.SigCoverFunction.b.FixedValue = 120
          [Stover].MaximumNConc.FixedValue = 0.02
          [Stover].MinimumNConc.FixedValue = 0.02
          [Stover].XoBiomass.FixedValue = 1350.0
          [Stover].bBiomass.FixedValue = 270.0
      Cultivar Phacelia
        Command:
          [Nodule].FixationMetabolicCost.FixedValue = 0
          [Nodule].FixationRate.FixedValue = 0
          [Phenology].CanopyExpanding.Target.FixedValue = 420.0
          [Phenology].Senescing.Target.FixedValue = 0
          [Phenology].YieldIncreasing.Target.FixedValue = 1230.0
          [Product].DryMatterContent.FixedValue = 1.0
          [Product].ExpectedYield.FixedValue = 500
          [Product].HarvestIndex.FixedValue = 0.9
          [Product].MaximumNConc.FixedValue = 0.03
          [Product].MinimumNConc.FixedValue = 0.021
          [Root].KLModifier.XYPairs.Y = 1,1,1,1,1,1,1,0.687,0.472,0.325,0.223,0.153,0.105,0.072,0,0,0,0,0,0,0,0,0,0,0,0,0,0,0,0
          [Root].MaximumNConc.FixedValue = 0.01
          [Root].MaximumRootDepth.FixedValue = 700
          [Root].MinimumNConc.FixedValue = 0.01
          [Root].RootProportion.FixedValue = 0.1
          [Stover].CoverFunction.Expanding.SigCoverFunction.Xo.FixedValue = 690
          [Stover].CoverFunction.Expanding.SigCoverFunction.Ymax.FixedValue = 0.96
          [Stover].CoverFunction.Expanding.SigCoverFunction.b.FixedValue = 60
          [Stover].MaximumNConc.FixedValue = 0.03
          [Stover].MinimumNConc.FixedValue = 0.03
          [Stover].XoBiomass.FixedValue = 825.0
          [Stover].bBiomass.FixedValue = 165.0
      Cultivar Plantain_Seed
        Command:
          [Nodule].FixationMetabolicCost.FixedValue = 0
          [Nodule].FixationRate.FixedValue = 0
          [Phenology].CanopyExpanding.Target.FixedValue = 1831.0
          [Phenology].Senescing.Target.FixedValue = 300
          [Phenology].YieldIncreasing.Target.FixedValue = 1169.0
          [Product].DryMatterContent.FixedValue = 0.85
          [Product].ExpectedYield.FixedValue = 200
          [Product].HarvestIndex.FixedValue = 0.2
          [Product].MaximumNConc.FixedValue = 0.03
          [Product].MinimumNConc.FixedValue = 0.0105
          [Root].KLModifier.XYPairs.Y = 1,1,1,1,1,1,1,0.472,0.223,0.105,0,0,0,0,0,0,0,0,0,0,0,0,0,0,0,0,0,0,0,0
          [Root].MaximumNConc.FixedValue = 0.01
          [Root].MaximumRootDepth.FixedValue = 500
          [Root].MinimumNConc.FixedValue = 0.01
          [Root].RootProportion.FixedValue = 0.1
          [Stover].CoverFunction.Expanding.SigCoverFunction.Xo.FixedValue = 690
          [Stover].CoverFunction.Expanding.SigCoverFunction.Ymax.FixedValue = 0.95
          [Stover].CoverFunction.Expanding.SigCoverFunction.b.FixedValue = 120
          [Stover].MaximumNConc.FixedValue = 0.02
          [Stover].MinimumNConc.FixedValue = 0.02
          [Stover].XoBiomass.FixedValue = 1650.0
          [Stover].bBiomass.FixedValue = 330.0
      Cultivar Potatoes_Long
        Command:
          [Nodule].FixationMetabolicCost.FixedValue = 0
          [Nodule].FixationRate.FixedValue = 0
          [Phenology].CanopyExpanding.Target.FixedValue = 690.0
          [Phenology].Senescing.Target.FixedValue = 600
          [Phenology].YieldIncreasing.Target.FixedValue = 1560.0
          [Product].DryMatterContent.FixedValue = 0.22
          [Product].ExpectedYield.FixedValue = 7100
          [Product].HarvestIndex.FixedValue = 0.911
          [Product].MaximumNConc.FixedValue = 0.018
          [Product].MinimumNConc.FixedValue = 0.0126
          [Root].KLModifier.XYPairs.Y = 1,1,1,1,1,1,1,0.807,0.651,0.526,0.424,0.343,0.276,0.223,0.18,0.145,0.117,0.095,0.076,0.062,0,0,0,0,0,0,0,0,0,0
          [Root].MaximumNConc.FixedValue = 0.01
          [Root].MaximumRootDepth.FixedValue = 1000
          [Root].MinimumNConc.FixedValue = 0.01
          [Root].RootProportion.FixedValue = 0.1
          [Stover].CoverFunction.Expanding.SigCoverFunction.Xo.FixedValue = 690
          [Stover].CoverFunction.Expanding.SigCoverFunction.Ymax.FixedValue = 0.96
          [Stover].CoverFunction.Expanding.SigCoverFunction.b.FixedValue = 60
          [Stover].MaximumNConc.FixedValue = 0.02
          [Stover].MinimumNConc.FixedValue = 0.02
          [Stover].XoBiomass.FixedValue = 1425.0
          [Stover].bBiomass.FixedValue = 285.0
      Cultivar Potatoes_Medium
        Command:
          [Nodule].FixationMetabolicCost.FixedValue = 0
          [Nodule].FixationRate.FixedValue = 0
          [Phenology].CanopyExpanding.Target.FixedValue = 638.0
          [Phenology].Senescing.Target.FixedValue = 600
          [Phenology].YieldIncreasing.Target.FixedValue = 1312.0
          [Product].DryMatterContent.FixedValue = 0.22
          [Product].ExpectedYield.FixedValue = 6400
          [Product].HarvestIndex.FixedValue = 0.904
          [Product].MaximumNConc.FixedValue = 0.018
          [Product].MinimumNConc.FixedValue = 0.0126
          [Root].KLModifier.XYPairs.Y = 1,1,1,1,1,1,1,0.807,0.651,0.526,0.424,0.343,0.276,0.223,0.18,0.145,0.117,0.095,0.076,0.062,0,0,0,0,0,0,0,0,0,0
          [Root].MaximumNConc.FixedValue = 0.01
          [Root].MaximumRootDepth.FixedValue = 1000
          [Root].MinimumNConc.FixedValue = 0.01
          [Root].RootProportion.FixedValue = 0.1
          [Stover].CoverFunction.Expanding.SigCoverFunction.Xo.FixedValue = 690
          [Stover].CoverFunction.Expanding.SigCoverFunction.Ymax.FixedValue = 0.96
          [Stover].CoverFunction.Expanding.SigCoverFunction.b.FixedValue = 60
          [Stover].MaximumNConc.FixedValue = 0.02
          [Stover].MinimumNConc.FixedValue = 0.02
          [Stover].XoBiomass.FixedValue = 1275.0
          [Stover].bBiomass.FixedValue = 255.0
      Cultivar Potatoes_Short
        Command:
          [Nodule].FixationMetabolicCost.FixedValue = 0
          [Nodule].FixationRate.FixedValue = 0
          [Phenology].CanopyExpanding.Target.FixedValue = 590.0
          [Phenology].Senescing.Target.FixedValue = 600
          [Phenology].YieldIncreasing.Target.FixedValue = 1060.0
          [Product].DryMatterContent.FixedValue = 0.23
          [Product].ExpectedYield.FixedValue = 5300
          [Product].HarvestIndex.FixedValue = 0.893
          [Product].MaximumNConc.FixedValue = 0.018
          [Product].MinimumNConc.FixedValue = 0.0126
          [Root].KLModifier.XYPairs.Y = 1,1,1,1,1,1,1,0.807,0.651,0.526,0.424,0.343,0.276,0.223,0.18,0.145,0.117,0.095,0.076,0.062,0,0,0,0,0,0,0,0,0,0
          [Root].MaximumNConc.FixedValue = 0.01
          [Root].MaximumRootDepth.FixedValue = 1000
          [Root].MinimumNConc.FixedValue = 0.01
          [Root].RootProportion.FixedValue = 0.1
          [Stover].CoverFunction.Expanding.SigCoverFunction.Xo.FixedValue = 690
          [Stover].CoverFunction.Expanding.SigCoverFunction.Ymax.FixedValue = 0.96
          [Stover].CoverFunction.Expanding.SigCoverFunction.b.FixedValue = 60
          [Stover].MaximumNConc.FixedValue = 0.02
          [Stover].MinimumNConc.FixedValue = 0.02
          [Stover].XoBiomass.FixedValue = 1125.0
          [Stover].bBiomass.FixedValue = 225.0
      Cultivar Radish_Seed
        Command:
          [Nodule].FixationMetabolicCost.FixedValue = 0
          [Nodule].FixationRate.FixedValue = 0
          [Phenology].CanopyExpanding.Target.FixedValue = 1064.0
          [Phenology].Senescing.Target.FixedValue = 300
          [Phenology].YieldIncreasing.Target.FixedValue = 436.0
          [Product].DryMatterContent.FixedValue = 0.84
          [Product].ExpectedYield.FixedValue = 170
          [Product].HarvestIndex.FixedValue = 0.1
          [Product].MaximumNConc.FixedValue = 0.03
          [Product].MinimumNConc.FixedValue = 0.02
          [Root].KLModifier.XYPairs.Y = 1,1,1,1,1,1,1,0.807,0.651,0.526,0.424,0.343,0.276,0.223,0.18,0.145,0.117,0.095,0.076,0.062,0,0,0,0,0,0,0,0,0,0
          [Root].MaximumNConc.FixedValue = 0.008
          [Root].MaximumRootDepth.FixedValue = 1000
          [Root].MinimumNConc.FixedValue = 0.008
          [Root].RootProportion.FixedValue = 0.1
          [Stover].CoverFunction.Expanding.SigCoverFunction.Xo.FixedValue = 540
          [Stover].CoverFunction.Expanding.SigCoverFunction.Ymax.FixedValue = 0.96
          [Stover].CoverFunction.Expanding.SigCoverFunction.b.FixedValue = 120
          [Stover].MaximumNConc.FixedValue = 0.02
          [Stover].MinimumNConc.FixedValue = 0.02
          [Stover].XoBiomass.FixedValue = 900.0
          [Stover].bBiomass.FixedValue = 180.0
      Cultivar Rape
        Command:
          [Nodule].FixationMetabolicCost.FixedValue = 0
          [Nodule].FixationRate.FixedValue = 0
          [Phenology].CanopyExpanding.Target.FixedValue = 999.0
          [Phenology].Senescing.Target.FixedValue = 0
          [Phenology].YieldIncreasing.Target.FixedValue = 2001.0
          [Product].DryMatterContent.FixedValue = 0.13
          [Product].ExpectedYield.FixedValue = 4615
          [Product].HarvestIndex.FixedValue = 0.8
          [Product].MaximumNConc.FixedValue = 0.03
          [Product].MinimumNConc.FixedValue = 0.02
          [Root].KLModifier.XYPairs.Y = 1,1,1,1,1,1,1,0.931,0.867,0.807,0.751,0.7,0.651,0.607,0.565,0.526,0.49,0.456,0.424,0.395,0.368,0.343,0.319,0.297,0.276,0.257,0.24,0.223,0.208,0.193
          [Root].MaximumNConc.FixedValue = 0.008
          [Root].MaximumRootDepth.FixedValue = 2400
          [Root].MinimumNConc.FixedValue = 0.008
          [Root].RootProportion.FixedValue = 0.1
          [Stover].CoverFunction.Expanding.SigCoverFunction.Xo.FixedValue = 770
          [Stover].CoverFunction.Expanding.SigCoverFunction.Ymax.FixedValue = 0.96
          [Stover].CoverFunction.Expanding.SigCoverFunction.b.FixedValue = 57
          [Stover].MaximumNConc.FixedValue = 0.01
          [Stover].MinimumNConc.FixedValue = 0.01
          [Stover].XoBiomass.FixedValue = 1500.0
          [Stover].bBiomass.FixedValue = 300.0
      Cultivar Rape_Seed: same as Replacements.SCRUM.Radish_Seed
      Cultivar RyeCorn_Autumn: same as Replacements.SCRUM.Oats_AutumnForage
      Cultivar RyeCorn_Spring: same as Replacements.SCRUM.Barley_SpringForage
      Cultivar Ryegrass_1styear
        Command:
          [Nodule].FixationMetabolicCost.FixedValue = 0
          [Nodule].FixationRate.FixedValue = 0
          [Phenology].CanopyExpanding.Target.FixedValue = 1590.0
          [Phenology].Senescing.Target.FixedValue = 450
          [Phenology].YieldIncreasing.Target.FixedValue = 660.0
          [Product].DryMatterContent.FixedValue = 0.85
          [Product].ExpectedYield.FixedValue = 150
          [Product].HarvestIndex.FixedValue = 0.105
          [Product].MaximumNConc.FixedValue = 0.015
          [Product].MinimumNConc.FixedValue = 0.0105
          [Root].KLModifier.XYPairs.Y = 1,1,1,1,1,1,1,0.687,0.472,0.325,0.223,0.153,0.105,0.072,0,0,0,0,0,0,0,0,0,0,0,0,0,0,0,0
          [Root].MaximumNConc.FixedValue = 0.01
          [Root].MaximumRootDepth.FixedValue = 700
          [Root].MinimumNConc.FixedValue = 0.01
          [Root].RootProportion.FixedValue = 0.1
          [Stover].CoverFunction.Expanding.SigCoverFunction.Xo.FixedValue = 540
          [Stover].CoverFunction.Expanding.SigCoverFunction.Ymax.FixedValue = 0.96
          [Stover].CoverFunction.Expanding.SigCoverFunction.b.FixedValue = 120
          [Stover].MaximumNConc.FixedValue = 0.015
          [Stover].MinimumNConc.FixedValue = 0.015
          [Stover].XoBiomass.FixedValue = 1350.0
          [Stover].bBiomass.FixedValue = 270.0
      Cultivar Ryegrass_2ndyear
        Command:
          [Nodule].FixationMetabolicCost.FixedValue = 0
          [Nodule].FixationRate.FixedValue = 0
          [Phenology].CanopyExpanding.Target.FixedValue = 1237.0
          [Phenology].Senescing.Target.FixedValue = 300
          [Phenology].YieldIncreasing.Target.FixedValue = 563.0
          [Product].DryMatterContent.FixedValue = 0.85
          [Product].ExpectedYield.FixedValue = 150
          [Product].HarvestIndex.FixedValue = 0.105
          [Product].MaximumNConc.FixedValue = 0.015
          [Product].MinimumNConc.FixedValue = 0.0105
          [Root].KLModifier.XYPairs.Y = 1,1,1,1,1,1,1,0.687,0.472,0.325,0.223,0.153,0.105,0.072,0,0,0,0,0,0,0,0,0,0,0,0,0,0,0,0
          [Root].MaximumNConc.FixedValue = 0.01
          [Root].MaximumRootDepth.FixedValue = 700
          [Root].MinimumNConc.FixedValue = 0.01
          [Root].RootProportion.FixedValue = 0.1
          [Stover].CoverFunction.Expanding.SigCoverFunction.Xo.FixedValue = 300
          [Stover].CoverFunction.Expanding.SigCoverFunction.Ymax.FixedValue = 0.96
          [Stover].CoverFunction.Expanding.SigCoverFunction.b.FixedValue = 120
          [Stover].MaximumNConc.FixedValue = 0.015
          [Stover].MinimumNConc.FixedValue = 0.015
          [Stover].XoBiomass.FixedValue = 1050.0
          [Stover].bBiomass.FixedValue = 210.0
      Cultivar Spinach
        Command:
          [Nodule].FixationMetabolicCost.FixedValue = 0
          [Nodule].FixationRate.FixedValue = 0
          [Phenology].CanopyExpanding.Target.FixedValue = 1150.0
          [Phenology].Senescing.Target.FixedValue = 900
          [Phenology].YieldIncreasing.Target.FixedValue = 950.0
          [Product].DryMatterContent.FixedValue = 0.05
          [Product].ExpectedYield.FixedValue = 2200
          [Product].HarvestIndex.FixedValue = 0.7
          [Product].MaximumNConc.FixedValue = 0.03
          [Product].MinimumNConc.FixedValue = 0.021
          [Root].KLModifier.XYPairs.Y = 1,1,1,1,1,1,1,0.472,0.223,0.105,0,0,0,0,0,0,0,0,0,0,0,0,0,0,0,0,0,0,0,0
          [Root].MaximumNConc.FixedValue = 0.009
          [Root].MaximumRootDepth.FixedValue = 500
          [Root].MinimumNConc.FixedValue = 0.009
          [Root].RootProportion.FixedValue = 0.1
          [Stover].CoverFunction.Expanding.SigCoverFunction.Xo.FixedValue = 360
          [Stover].CoverFunction.Expanding.SigCoverFunction.Ymax.FixedValue = 0.8
          [Stover].CoverFunction.Expanding.SigCoverFunction.b.FixedValue = 120
          [Stover].MaximumNConc.FixedValue = 0.015
          [Stover].MinimumNConc.FixedValue = 0.015
          [Stover].XoBiomass.FixedValue = 1500.0
          [Stover].bBiomass.FixedValue = 300.0
      Cultivar Spinach_Seed
        Command:
          [Nodule].FixationMetabolicCost.FixedValue = 0
          [Nodule].FixationRate.FixedValue = 0
          [Phenology].CanopyExpanding.Target.FixedValue = 939.0
          [Phenology].Senescing.Target.FixedValue = 300
          [Phenology].YieldIncreasing.Target.FixedValue = 561.0
          [Product].DryMatterContent.FixedValue = 0.84
          [Product].ExpectedYield.FixedValue = 300
          [Product].HarvestIndex.FixedValue = 0.3
          [Product].MaximumNConc.FixedValue = 0.03
          [Product].MinimumNConc.FixedValue = 0.02
          [Root].KLModifier.XYPairs.Y = 1,1,1,1,1,1,1,0.807,0.651,0.526,0.424,0.343,0.276,0.223,0.18,0.145,0.117,0.095,0.076,0.062,0,0,0,0,0,0,0,0,0,0
          [Root].MaximumNConc.FixedValue = 0.008
          [Root].MaximumRootDepth.FixedValue = 1000
          [Root].MinimumNConc.FixedValue = 0.008
          [Root].RootProportion.FixedValue = 0.1
          [Stover].CoverFunction.Expanding.SigCoverFunction.Xo.FixedValue = 540
          [Stover].CoverFunction.Expanding.SigCoverFunction.Ymax.FixedValue = 0.96
          [Stover].CoverFunction.Expanding.SigCoverFunction.b.FixedValue = 120
          [Stover].MaximumNConc.FixedValue = 0.02
          [Stover].MinimumNConc.FixedValue = 0.02
          [Stover].XoBiomass.FixedValue = 900.0
          [Stover].bBiomass.FixedValue = 180.0
      Cultivar SpringOnion_seed: same as Replacements.SCRUM.Radish_Seed
      Cultivar Squash
        Command:
          [Nodule].FixationMetabolicCost.FixedValue = 0
          [Nodule].FixationRate.FixedValue = 0
          [Phenology].CanopyExpanding.Target.FixedValue = 899.0
          [Phenology].Senescing.Target.FixedValue = 300
          [Phenology].YieldIncreasing.Target.FixedValue = 1501.0
          [Product].DryMatterContent.FixedValue = 0.2
          [Product].ExpectedYield.FixedValue = 2500
          [Product].HarvestIndex.FixedValue = 0.8
          [Product].MaximumNConc.FixedValue = 0.02
          [Product].MinimumNConc.FixedValue = 0.014
          [Root].KLModifier.XYPairs.Y = 1,1,1,1,1,1,1,0.472,0.223,0.105,0,0,0,0,0,0,0,0,0,0,0,0,0,0,0,0,0,0,0,0
          [Root].MaximumNConc.FixedValue = 0.01
          [Root].MaximumRootDepth.FixedValue = 500
          [Root].MinimumNConc.FixedValue = 0.01
          [Root].RootProportion.FixedValue = 0.1
          [Stover].CoverFunction.Expanding.SigCoverFunction.Xo.FixedValue = 600
          [Stover].CoverFunction.Expanding.SigCoverFunction.Ymax.FixedValue = 0.94
          [Stover].CoverFunction.Expanding.SigCoverFunction.b.FixedValue = 90
          [Stover].MaximumNConc.FixedValue = 0.02
          [Stover].MinimumNConc.FixedValue = 0.02
          [Stover].XoBiomass.FixedValue = 1350.0
          [Stover].bBiomass.FixedValue = 270.0
      Cultivar Sweetcorn
        Command:
          [Nodule].FixationMetabolicCost.FixedValue = 0
          [Nodule].FixationRate.FixedValue = 0
          [Phenology].CanopyExpanding.Target.FixedValue = 794.0
          [Phenology].Senescing.Target.FixedValue = 300
          [Phenology].YieldIncreasing.Target.FixedValue = 706.0
          [Product].DryMatterContent.FixedValue = 0.5
          [Product].ExpectedYield.FixedValue = 2500
          [Product].HarvestIndex.FixedValue = 0.55
          [Product].MaximumNConc.FixedValue = 0.014
          [Product].MinimumNConc.FixedValue = 0.0098
          [Root].KLModifier.XYPairs.Y = 1,1,1,1,1,1,1,0.807,0.651,0.526,0.424,0.343,0.276,0.223,0.18,0.145,0.117,0.095,0.076,0.062,0,0,0,0,0,0,0,0,0,0
          [Root].MaximumNConc.FixedValue = 0.007
          [Root].MaximumRootDepth.FixedValue = 1000
          [Root].MinimumNConc.FixedValue = 0.007
          [Root].RootProportion.FixedValue = 0.1
          [Stover].CoverFunction.Expanding.SigCoverFunction.Xo.FixedValue = 540
          [Stover].CoverFunction.Expanding.SigCoverFunction.Ymax.FixedValue = 0.75
          [Stover].CoverFunction.Expanding.SigCoverFunction.b.FixedValue = 120
          [Stover].MaximumNConc.FixedValue = 0.009
          [Stover].MinimumNConc.FixedValue = 0.009
          [Stover].XoBiomass.FixedValue = 900.0
          [Stover].bBiomass.FixedValue = 180.0
      Cultivar Tall_Fescue: same as Replacements.SCRUM.Ryegrass_1styear
      Cultivar Tomato
        Command:
          [Nodule].FixationMetabolicCost.FixedValue = 0
          [Nodule].FixationRate.FixedValue = 0
          [Phenology].CanopyExpanding.Target.FixedValue = 1236.0
          [Phenology].Senescing.Target.FixedValue = 750
          [Phenology].YieldIncreasing.Target.FixedValue = 714.0
          [Product].DryMatterContent.FixedValue = 0.05
          [Product].ExpectedYield.FixedValue = 10000
          [Product].HarvestIndex.FixedValue = 0.5
          [Product].MaximumNConc.FixedValue = 0.02
          [Product].MinimumNConc.FixedValue = 0.014
          [Root].KLModifier.XYPairs.Y = 1,1,1,1,1,1,1,0.472,0.223,0.105,0,0,0,0,0,0,0,0,0,0,0,0,0,0,0,0,0,0,0,0
          [Root].MaximumNConc.FixedValue = 0.01
          [Root].MaximumRootDepth.FixedValue = 500
          [Root].MinimumNConc.FixedValue = 0.01
          [Root].RootProportion.FixedValue = 0.1
          [Stover].CoverFunction.Expanding.SigCoverFunction.Xo.FixedValue = 690
          [Stover].CoverFunction.Expanding.SigCoverFunction.Ymax.FixedValue = 0.96
          [Stover].CoverFunction.Expanding.SigCoverFunction.b.FixedValue = 120
          [Stover].MaximumNConc.FixedValue = 0.02
          [Stover].MinimumNConc.FixedValue = 0.02
          [Stover].XoBiomass.FixedValue = 1350.0
          [Stover].bBiomass.FixedValue = 270.0
      Cultivar Triticalie_Autumn: same as Replacements.SCRUM.Oats_AutumnForage
      Cultivar Triticalie_Spring: same as Replacements.SCRUM.Barley_SpringForage
      Cultivar Wheat_Autumn: same as Replacements.SCRUM.Barley_Autumn
      Cultivar Wheat_Spring
        Command:
          [Nodule].FixationMetabolicCost.FixedValue = 0
          [Nodule].FixationRate.FixedValue = 0
          [Phenology].CanopyExpanding.Target.FixedValue = 848.0
          [Phenology].Senescing.Target.FixedValue = 300
          [Phenology].YieldIncreasing.Target.FixedValue = 652.0
          [Product].DryMatterContent.FixedValue = 0.87
          [Product].ExpectedYield.FixedValue = 800
          [Product].HarvestIndex.FixedValue = 0.46
          [Product].MaximumNConc.FixedValue = 0.013
          [Product].MinimumNConc.FixedValue = 0.0091
          [Root].KLModifier.XYPairs.Y = 1,1,1,1,1,1,1,0.807,0.651,0.526,0.424,0.343,0.276,0.223,0.18,0.145,0.117,0.095,0.076,0.062,0,0,0,0,0,0,0,0,0,0
          [Root].MaximumNConc.FixedValue = 0.009
          [Root].MaximumRootDepth.FixedValue = 1000
          [Root].MinimumNConc.FixedValue = 0.009
          [Root].RootProportion.FixedValue = 0.1
          [Stover].CoverFunction.Expanding.SigCoverFunction.Xo.FixedValue = 540
          [Stover].CoverFunction.Expanding.SigCoverFunction.Ymax.FixedValue = 0.96
          [Stover].CoverFunction.Expanding.SigCoverFunction.b.FixedValue = 120
          [Stover].MaximumNConc.FixedValue = 0.005
          [Stover].MinimumNConc.FixedValue = 0.005
          [Stover].XoBiomass.FixedValue = 900.0
          [Stover].bBiomass.FixedValue = 180.0
    Plant Slurp: CropType=Slurp
      Memo TitlePage
        # SLURP: the Sound of a crop using water

        This model has been built using the Plant Modelling Framework (PMF) of [brown_plant_2014] to provide a simple representation of crops.  It is usefull for water and nitrogen balance studies where the focus is on soil processes and a very simple crop is adequate.  The model does not predict crop growth, development or yields.  It simply takes up water and nitrogen.   .

        SLURP has no phenology so the behaviour of the SLURP is the same throughout its ontology (with the exception of root depth being able to increase).  SLURP consists of 2 organs:

           1. Leaf which ls represented with a Simpleleaf class and provides a Water uptake demand to the soil arbitrator.
           2. Root which extracts water and nitrogen from the soil for plant growth

        #Inclusion in APSIM simulations
        A Slurp crop is included in a simulation the same as any other APSIM crop

         * The Slurp object needs to be dragged or copied from the Crop folder in the tool box into the field of your simulation.
         * It is then planted with a sowing rule
        ~~~
        Slurp.Sow(cultivar: StaticCrop, population: 1, depth: 10, rowSpacing: 150);
        ~~~
          * Note that SLURP has no notion of population or rowSpacing but these parameters are required by the Sow method so filler values are provided
          * `depth` in the Sow arguement is the depth that the crop is sown at.  While this has no effect on emergence in SLURP it sets the depth that the root system is initialised at.  For static crops this depth should be set to the rooting depth that is expected as roots will not grow during the simulation

        #Altering Slurp properties during runs
        In some cases users will wish to change properties of Slurp while the simulation is running.  This can be done using a the set method in a manager script.

        ~~~
        object LAIResetValue = leaflai;
        zone.Set("Slurp.Leaf.LAIFunction.Value()", LAIResetValue);
        object HeightResetValue = CoverToday * MaximumHeight;
        zone.Set("Slurp.Leaf.HeightFunction.Value()", HeightResetValue);
        ~~~
      Phenology
        Constant ThermalTime: FixedValue=1; Units=days
        GenericPhase Initial: Start=Initialisation; End=Sowing
          VariableReference Progression: VariableName=[Phenology].ThermalTime.Value()
          Constant Target: FixedValue=0; Units=d
        GenericPhase Ongoing: Start=Sowing; End=Never
          VariableReference Progression: VariableName=[Phenology].ThermalTime.Value()
          Constant Target: FixedValue=1E+15; Units=d
      OrganArbitrator Arbitrator
        PrioritythenRelativeAllocation NArbitrator
        PrioritythenRelativeAllocation DMArbitrator
      Root: GrowthRespiration=0; MaintenanceRespiration=0
        MultiplyFunction RootFrontVelocity
          AirTemperatureFunction TemperatureEffect
            XYPairs: X=[0, 26, 35]; Y=[0, 1, 1]
          Constant Potential: FixedValue=0; Units=mm/d
          Constant DMConversionEfficiency: FixedValue=1
        Constant MaxDailyNUptake: FixedValue=1; Units=g/m2
        Constant DMConversionEfficiency: FixedValue=1; Units=g/m2
        Constant RemobilisationCost: FixedValue=0
        Constant MaximumRootDepth: FixedValue=1000; Units=mm
        Constant NitrogenDemandSwitch: FixedValue=1; Units=0-1
        Constant MaximumNConc: FixedValue=0.01
        Constant MinimumNConc: FixedValue=0.01
        LinearInterpolationFunction KLModifier: XProperty=[Root].LayerMidPointDepth
          XYPairs: X=[0, 400, 1500]; Y=[1, 1, 0]
          Memo Description
            This is important in SLURP as it is set for each species to represent their differences in rooting patterns between crop species
        Constant InitialDM: FixedValue=0.005; Units=g/plant
        Constant SenescenceRate: FixedValue=0; Units=/d
        PartitionFractionDemandFunction DMDemandFunction
          Constant PartitionFraction: FixedValue=0; Units=0-1
        Constant SpecificRootLength: FixedValue=105; Units=m/g
        LinearInterpolationFunction KNO3: XProperty=[Root].LengthDensity
          XYPairs: X=[0, 0.003]; Y=[0.02, 0.02]
        LinearInterpolationFunction KNH4: XProperty=[Root].LengthDensity
          XYPairs: X=[0, 0.003]; Y=[0, 0]
        BiomassRemoval BiomassRemovalDefaults: same as Replacements.SCRUM.Nodule.BiomassRemovalDefaults
        LinearInterpolationFunction NUptakeSWFactor: XProperty=[Root].RWC
          XYPairs: X=[0, 1]; Y=[0, 1]
        Constant CarbonConcentration: FixedValue=0.4
        Constant MaintenanceRespirationFunction: FixedValue=0
      SimpleLeaf Leaf: CohortsInitialised=false; Albedo=0.018; Gsmax=0.01; R50=200; MicroClimatePresent=true; LeafInitialisationStage=Sowing
        zero: ApicalCohortNo, InitialisedCohortNo, TipsAtEmergence, CohortsAtInitialisation, AppearedCohortNo, PlantAppearedLeafNo, LAI, Height, FRGR, PotentialEP, KDead, LAIDead
        Constant DetachmentRateFunction: FixedValue=0; Units=/d
        Constant RemobilisationCost: FixedValue=0
        MultiplyFunction InitialWtFunction
          Constant InitialPlantWt: FixedValue=0; Units=g/plant
          VariableReference Population: VariableName=[Plant].Population
        Constant LaiDeadFunction: FixedValue=0; Units=m^2/m^2
        Constant Photosynthesis: FixedValue=5; Units=g/m2/d
        AirTemperatureFunction FRGRFunction
          XYPairs: X=[0, 10, 25, 40]; Y=[0, 1, 1, 0]
        PartitionFractionDemandFunction DMDemandFunction
          Constant PartitionFraction: FixedValue=1; Units=0-1
        Constant MaximumNConc: FixedValue=0.05; Units=g/g
        Constant MinimumNConc: FixedValue=0.05; Units=g/g
        Constant LAIFunction: FixedValue=5; Units=m2/m2
        Constant ExtinctionCoefficientFunction: FixedValue=0.7
        Constant StructuralFraction: FixedValue=0.5; Units=0-1
        Constant HeightFunction: FixedValue=400; Units=mm
        Constant NReallocationFactor: FixedValue=0
        Constant SenescenceRate: FixedValue=0
        BiomassRemoval BiomassRemovalDefaults: same as Replacements.SCRUM.Nodule.BiomassRemovalDefaults
        Constant MaintenanceRespirationFunction: FixedValue=0; Units=0-1
        Constant DMConversionEfficiency: FixedValue=1; Units=0-1
        Constant NRetranslocationFactor: FixedValue=0
        Constant NitrogenDemandSwitch: FixedValue=1
        Constant DMReallocationFactor: FixedValue=0
        Constant DMRetranslocationFactor: FixedValue=0
        VariableReference CriticalNConc: VariableName=[Leaf].MinimumNConc.Value()
        Constant CarbonConcentration: FixedValue=0.4
      Cultivar StaticCrop
        Memo Description
          The static crop is the base crop and uses all the paramaters values specified above.
      Cultivar StaticTree
        Command:
          [Root].MaximumRootDepth.FixedValue = 2600
          [Leaf].ExtinctionCoefficientFunction.FixedValue = 0.65
          [Leaf].HeightFunction.FixedValue = 5000
          [Root].KLModifier.XYPairs.X = 0, 400, 500, 1000, 1500, 2000
          [Root].KLModifier.XYPairs.Y = 1, 1, 0.9, 0.6, 0.3, 0.1
        Memo Description
          The static tree is similar to the static crop but is taller, has a deeper root system and a lower extinction coefficient
      Cultivar Pasture
        Command:
          [Root].MaximumRootDepth.FixedValue = 800
          [Root].RootFrontVelocity.Potential.FixedValue = 15
          [Leaf].ExtinctionCoefficientFunction.FixedValue = 0.65
          [Root].KLModifier.XYPairs.X = 0, 200, 500, 1000
          [Root].KLModifier.XYPairs.Y = 1, 1, 0.7, 0.0
        Memo Description
          The pasture differs from the base crop because its has a RootFrontVelocity of 15 (as opposed to zero) which means the roots grow downward from sowing untill the MaximumRootDepth is reached.  It ExtinctionCoefficient and MaximumRootDepth are different to the base StaticCrop and it has a different pattern of kl with depth.
      Cultivar Lucerne
        Command:
          [Root].MaximumRootDepth.FixedValue = 2500
          [Root].RootFrontVelocity.Potential.FixedValue = 15
          [Leaf].ExtinctionCoefficientFunction.FixedValue = 0.8
          [Root].KLModifier.XYPairs.X = 0, 200, 500, 1000, 1500, 2000
          [Root].KLModifier.XYPairs.Y = 1, 1, 0.9, 0.6, 0.3, 0.1
        Memo Description
          Lucerne also grows root depth like pasture but has a greater root depth, different kl pattern and different extinction coefficient
    Plant Wheat: CropType=Wheat
      Memo TitlePage
        # The APSIM Wheat Model

        _Brown, H.E., Huth, N.I. and Holzworth, D.P._

        The APSIM wheat model has been developed using the Plant Modelling Framework (PMF) of [brown_plant_2014]. This new framework provides a library of plant organ and process submodels that can be coupled, at runtime, to construct a model in much the same way that models can be coupled to construct a simulation. This means that dynamic composition of lower level process and organ classes (e.g. photosynthesis, leaf) into larger constructions (e.g. maize, wheat, sorghum) can be achieved by the model developer without additional coding.

        The model consists of:

        * a phenology model to simulate development between developmental phases
        * a structure model to simulate plant morphology
        * a collection of organs to simulate the various plant parts
        * an arbitrator to allocate resources (N, biomass) to the various plant organs
      OrganArbitrator Arbitrator
        RelativeAllocation NArbitrator
        RelativeAllocation DMArbitrator
      Phenology
        Memo
          Wheat exhibits a range of developmental responses to environment and these are strongly influences by genotype characteristics.
          Temperature effects development increasing development rates and decreasing phase durations as temperatures increase.  Theset affects are captured by thermal time, .  However, wheat also exhibits vernalisation and photoperiod sensitivities in its Vegetative phase and further photoperiod sensitivity in the EarlyReproducivePhase.  Photoperiod responses are seen as a reduction in the length of a phase for a photoperiod sensitive genotype in response to a longer photoperiod.  Vernalisation responses are more complicated as they are driven by temperature but interact with photoperiod.  For vernalisation sensitive varieties (Winter types) exposure to cool temperatures or short photoperiods during the Vegetative phase will reduce the thermal time duration of the vegetative phase.

          We draw on the Kirby Framework to capture these vernalisation and photoperiod responses.  This framework assumes that the timing of anthesis is a result of the timing of flag leaf and an additional thermal time passage from there to anthesis.  It also assumes the timing of flag leaf is a result of the Final Leaf Number which sets a target, and leaf appearance rate, which sets the rate of progress toward this target.  Leaf appearance rate is a function of Thermal time and a genotype specific Phyllochron which changes with Haun stage as described by [Jamieson_LeafAppearance_1995].

          Final Leaf Number (FLN) is modeled as the sum of three numbers:

          FLN = MinLeafNumber + VernalLeaves + PhotoLeaves

          Where MinLeafNumber is the number of leaves that a wheat crop will produce when vernalisation is satisified early in the crops duration (before 2nd true leaf) and it is grown in a long photoperiod..  VernalLeaves are the number of leaves that are added due to vernalisation effects.  For insensitive varieties this will always be zero but this is potentially a larger number for sensitivie varieties and the number progresively decreases as the crop encounters more vernalisation.  PhotoLeaves are the number of leaves that are added to the minimum leaf number as a result of short day exposure.  For insensitive varieties this will be zero but is potential larger for more sensitivie varieties and decreases as day length increases.  More detailed explinations of the components of phenology are provided below.
        AirTemperatureFunction ThermalTime
          XYPairs: X=[0, 26, 37]; Y=[0, 26, 0]
          Memo
            Thermal time determines the rate of developmental progress through many of the crops phases and is used by organs to determing potential growth rates.
        MultiplyFunction DailyVernalisation
          Memo
            Vernalisation responses are based on those described by [Brown_Anthesis_2013].   Vernalisation is assumed to be related to the expression of the Vrn1 Gene.  Its experssion is accumulated daily and daily upregulation as a function of development (DeltaHaunStage) and a TempResponseProfile that declines exponentially from a maximum at 1<sup>o</sup>C to zero at 0<sup>o</sup>C and at 18<sup>o</sup>C.
          VariableReference DeltaHaunStage: VariableName=[Structure].DeltaHaunStage
          AirTemperatureFunction TempResponseProfile
            XYPairs
              X=[0, 1, 2, 3, 4, 5, 6, 7, 8, 9, 10, 11, 12, 13, 14, 15, 16, 17, 18, 19, 20, 30, 32]
              Y=[0, 1.205, 1.037, 0.893, 0.768, 0.661, 0.569, 0.49, 0.422, 0.363, 0.312, 0.269, 0.231, 0.199, 0.171, 0.148, 0.127, 0.109, 0.094, 0.081, 0, 0, -0.5]
        PhotoperiodFunction Photoperiod: Twilight=-6; DayLength=0
        PhaseLookup PerceivedPhotoPeriod
          PhaseLookupValue ApexBelowGround: Start=Germination; End=Emergence
            Constant Photoperiod: FixedValue=0; Units=h
          PhaseLookupValue ApexAboveGround: Start=Emergence; End=HarvestRipe
            VariableReference Photoperiod: VariableName=[Phenology].Photoperiod.Value()
        MinimumFunction Vrn1
          Memo
            Vrn1 accumulation begins when Vrn4 experssion is down regulated to zero and stops, assuming vernalisation saturation, at a value of 1
          Constant Saturation: FixedValue=1; Units=Relative Experssion
          AccumulateFunction CurrentExpression: StartStageName=Germination; EndStageName=TerminalSpikelet; FractionRemovedOnCut=0; FractionRemovedOnHarvest=0; FractionRemovedOnGraze=0; FractionRemovedOnPrune=0
            LessThanFunction Vernalisation
              VariableReference If_Vrn4: VariableName=[Phenology].Vrn4.Value()
              VariableReference IsLessThanLag: VariableName=[Phenology].VernLag.Value()
              Constant Return_Zero: FixedValue=0
              VariableReference elseReturn_Vernalisation: VariableName=[Phenology].DailyVernalisation.Value()
        MinimumFunction Vrn4
          VariableReference MaxExpression: VariableName=[Phenology].VernLag.Value()
          AccumulateFunction CurrentExpression: StartStageName=Germination; EndStageName=TerminalSpikelet; FractionRemovedOnCut=0; FractionRemovedOnHarvest=0; FractionRemovedOnGraze=0; FractionRemovedOnPrune=0
            VariableReference VernalisationConditioning: VariableName=[Phenology].DailyVernalisation.Value()
        Constant MinimumLeafNumber: FixedValue=7; Units=Leaves
          Memo
            Number of leaves the plant will produce when fully vernalised early and grown in long photoperiod
        Constant VrnSensitivity: FixedValue=0; Units=Leaves
          Memo
            The difference between Inherent earlyness leaf number and the number of leaves produced when the plant is unvernalised and grown in long photoperiod
        Constant VernLag: FixedValue=1; Units=Unitless
          Memo
            The amount of vernalising temperature required before vernalisation response will be evident.  Value of relative to the amount offl vernalisation temperature required from the end of the lag until vernalisation saturation.  A value of 0 means there is no lag, a value of 1 means the lag is the same (in vernal time) as the vernalisation requirement and a value of 2 means the lag is twice as long as the vernalisation response phase
        Constant PpSensitivity: FixedValue=3; Units=Leaves
          Memo
            The reduction in leaf number going from 8 to 16 h Pp
        Constant EarlyReproductivePpSensitivity: FixedValue=0
          Memo
            The phyllochrons duration for the plant to go from flag leaf ligual appearance at 16 h Pp compared to the phyllochron duration for the same phase at 8 h Pp.
        Constant EarlyReproductiveLongDayBase: FixedValue=2.5
          Memo
            The phyllochrons duration for the plant to go from flag leaf ligual appearance at 16 h Pp.
        GerminatingPhase Germinating: Start=Sowing; End=Germination
        EmergingPhase Emerging: ShootLag=40; ShootRate=1.5; Start=Germination; End=Emergence; TTForTimeStep=0
          VariableReference ThermalTime: VariableName=[Phenology].ThermalTime.Value()
        NodeNumberPhase Vegetative: Start=Emergence; End=TerminalSpikelet
          VariableReference ThermalTime: VariableName=[Phenology].ThermalTime.Value()
          VariableReference CompletionNodeNumber: VariableName=[Structure].HaunStageTerminalSpikelet.Value()
        LeafAppearancePhase StemElongation: Start=TerminalSpikelet; End=FlagLeaf
          Memo
            The Final leaf number is fixed at Terminal Spikelet and leaves contune to appear at a rate set by thermal time and phyllochron until flag leaf liguale appears and this phase is completed.
          VariableReference ThermalTime: VariableName=[Phenology].ThermalTime.Value()
        GenericPhase EarlyReproductive: Start=FlagLeaf; End=Flowering
          VariableReference Progression: VariableName=[Phenology].ThermalTime.Value()
          MultiplyFunction Target
            VariableReference Phyllochron: VariableName=[Structure].Phyllochron.BasePhyllochron.Value()
            AddFunction Phyllochrons
              VariableReference LongDayBase: VariableName=[Phenology].EarlyReproductiveLongDayBase.Value()
              MultiplyFunction IncreaseDueToShortPhotoPeriod
                LinearInterpolationFunction PhotoPeriodResponse: XProperty=[Phenology].Photoperiod.Value()
                  XYPairs: X=[11, 16]; Y=[1, 0]
                VariableReference PpSensitivity: VariableName=[Phenology].EarlyReproductivePpSensitivity.Value()
        GenericPhase GrainDevelopment: Start=Flowering; End=StartGrainFill
          Constant Target: FixedValue=120
          VariableReference Progression: VariableName=[Phenology].ThermalTime.Value()
        GenericPhase GrainFilling: Start=StartGrainFill; End=EndGrainFill
          Constant Target: FixedValue=545
          VariableReference Progression: VariableName=[Phenology].ThermalTime.Value()
        GenericPhase Maturing: Start=EndGrainFill; End=Maturity
          Constant Target: FixedValue=35
          VariableReference Progression: VariableName=[Phenology].ThermalTime.Value()
        GenericPhase Ripening: Start=Maturity; End=HarvestRipe
          Constant Target: FixedValue=300
          VariableReference Progression: VariableName=[Phenology].ThermalTime.Value()
        EndPhase ReadyForHarvesting: Start=HarvestRipe; End=Unused
          VariableReference ThermalTime: VariableName=[Phenology].ThermalTime.Value()
        ZadokPMF Zadok
        OnEventFunction FlagLeafDAS: SetEvent=FlagLeaf; ReSetEvent=never
          Memo
            A function is used to provide flowering date as days after sowing(DAS).
          Constant PreEventValue: FixedValue=0
          VariableReference PostEventValue: VariableName=[Phenology].DaysAfterSowing
        OnEventFunction FloweringDAS: same as Replacements.Maize.Phenology.FloweringDAS
        OnEventFunction MaturityDAS: same as Replacements.Maize.Phenology.MaturityDAS
        LinearInterpolationFunction RewindDueToBiomassRemoved: XProperty=[Phenology].FractionBiomassRemoved
          XYPairs: X=[0, 0.1, 0.4, 0.5, 1]; Y=[0, 0.08, 0.4, 0.5, 1]
      Structure: CohortInitialisationStage=Germination; LeafInitialisationStage=Emergence
        VariableReference ThermalTime: VariableName=[Phenology].ThermalTime.Value()
        MultiplyFunction Phyllochron
          Memo Rational
            This is the thermal time between the emergence of leaf tips.  The model used here is based on [Jamieson_SIRIUS_1998] where leaf appearace could be described by a base phyllochron determined between leaves 2 and 7 and a phyllochron that was 70% of base phyllochron for leaves < 2 and 130% of base phyllochron for leaves > 7
          LinearInterpolationFunction LeafStageFactor: XProperty=[Leaf].AppearedCohortNo
            XYPairs: X=[0, 2, 3, 7, 8, 11, 12]; Y=[0.75, 0.75, 1, 1, 1.4, 1.4, 1.4]
          Constant BasePhyllochron: FixedValue=120; Units=oC.d
          LinearInterpolationFunction PhotoPeriodEffect: XProperty=[Phenology].Photoperiod.Value()
            XYPairs: X=[8, 12, 14]; Y=[1.6, 1, 1]
        MultiplyFunction BranchingRate
          Memo
            Potential branching rate is determined by the commonly observed pattern of tillering in wheat, in which each tiller emerges with the third leaf on its parent axis (e.g. first tiller emerges at the same time as the third leaf on the main stem, the first secondary tiller appears with the third leaf on tiller 1).  This is described as a simple function of main stem leaf number.
          PhaseLookup PotentialBranchingRate
            PhaseLookupValue Vegetative: Start=Emergence; End=TerminalSpikelet
              LinearInterpolationFunction PotentialBranchingRate: XProperty=[Structure].LeafTipsAppeared
                XYPairs: X=[1, 2, 3, 4, 5, 6, 7, 8]; Y=[0, 0, 1, 2, 4, 7, 12, 20]
            PhaseLookupValue Reproductive: Start=TerminalSpikelet; End=HarvestRipe
              Constant Zero: FixedValue=0
          MinimumFunction StressFactors
            LinearInterpolationFunction NitrogenEffect: XProperty=[Arbitrator].FN
              Memo
                Inadequate Nitrogen supply is assumed to affect tillering prior to any effect on photosynthesis or leaf size.
              XYPairs: X=[0.5, 2, 3]; Y=[0, 1, 1]
            LinearInterpolationFunction CoverEffect: XProperty=[Leaf].CoverTotal
              Memo
                Tillering is said to cease once a threshold fraction of incoming radiation has been achieved.  This captures shading effects on tillering described by [evers2006cessation].
              XYPairs: X=[0, 0.1, 0.25]; Y=[1, 1, 0]
            LinearInterpolationFunction WaterStressEffect: XProperty=[Root].WaterTensionFactor
              XYPairs: X=[0, 1]; Y=[0, 1]
        PhaseLookup BranchMortality
          PhaseLookupValue MortalityPhase: Start=FlagLeaf; End=Flowering
            MultiplyFunction Mortality
              LinearInterpolationFunction MortalityPerDegDay: XProperty=[Structure].MeanTillerGrowthRate.Value()
                XYPairs: X=[0, 0.005]; Y=[0.002, 0]
              VariableReference ThermalTime: VariableName=[Phenology].ThermalTime.Value()
        HeightFunction HeightModel
          LinearInterpolationFunction PotentialHeight: XProperty=[Phenology].Stage
            XYPairs: X=[3, 4, 5, 6, 7]; Y=[10, 200, 1000, 1000, 1000]
          LinearInterpolationFunction WaterStress: XProperty=[Leaf].Fw
            XYPairs: X=[0.3, 1]; Y=[0, 1]
        MovingAverageFunction MeanTillerGrowthRate: NumberOfDays=5; StageToStartMovingAverage=Emergence
          Memo
            This is calculated to represent the supply of asslimilate to individual tillers over the past 5 days to use as an index to determine tiller mortality.  When tiller numbers are high or total crop assimilate supply is small there will not be enough assimilate to maintain all of the tillers so the model will senesce some.
          DivideFunction TillerGrowthRate
            VariableReference DailyGrowth: VariableName=[Arbitrator].DM.TotalFixationSupply
            VariableReference ThermalTime: VariableName=[Phenology].ThermalTime.Value()
            VariableReference StemPopulation: VariableName=[Structure].TotalStemPopn
        MovingAverageFunction MeanPhyllochron: NumberOfDays=300; StageToStartMovingAverage=Emergence
          VariableReference Phyllochron: VariableName=[Structure].Phyllochron.Value()
        HoldFunction FinalLeafNumber: WhenToHold=TerminalSpikelet
          AddFunction FinalNodeNumber
            VariableReference MinLeafNumber: VariableName=[Phenology].MinimumLeafNumber.Value()
            MultiplyFunction VernalLeaves
              VariableReference UnVernalisedLeaves: VariableName=[Phenology].VrnSensitivity.Value()
              SubtractFunction VernalisationReductionFactor
                Constant One: FixedValue=1
                VariableReference RelativeVrn1Expression: VariableName=[Phenology].Vrn1.Value()
            MultiplyFunction PhotoPLeaves
              VariableReference ShortPpLeaves: VariableName=[Phenology].PpSensitivity.Value()
              LinearInterpolationFunction PhotoPeriodReductionFactor: XProperty=[Phenology].Photoperiod.Value()
                XYPairs: X=[10, 16]; Y=[1, 0]
        ExpressionFunction HaunStageTerminalSpikelet: Expression=([Structure].FinalLeafNumber.Value() - 2.85)/1.1
          Memo
            The Haun stage at which Terminal Spikelet occurs is determined from final leaf number using the approach described in [Brown_Anthesis_2013].
        AddFunction HaunStage
          VariableReference AppearedLeaves: VariableName=[Leaf].ExpandedCohortNo
          VariableReference ProportionOfExpandingLeaf: VariableName=[Leaf].NextExpandingLeafProportion
        Constant StemSenescenceAge: FixedValue=0
      ReproductiveOrgan Grain: GrowthRespiration=0; MaintenanceRespiration=0; RipeStage=Ripe
        HoldFunction NumberFunction: WhenToHold=Flowering
          MultiplyFunction GrainNumber
            Constant GrainsPerGramOfStem: FixedValue=26; Units=grains
            VariableReference StemMass: VariableName=[StemPlusSpike].Wt
        Constant DMConversionEfficiency: FixedValue=1
        Constant RemobilisationCost: FixedValue=0
        Constant InitialGrainProportion: FixedValue=0.05
        Constant MaximumPotentialGrainSize: FixedValue=0.05; Units=g
        PhaseLookup DMDemandFunction
          PhaseLookupValue InitialPhase: Start=Flowering; End=StartGrainFill
            FillingRateFunction
              VariableReference NumberFunction: VariableName=[Grain].NumberFunction.Value()
              VariableReference FillingDuration: VariableName=[Phenology].GrainDevelopment.Target.Value()
              VariableReference ThermalTime: VariableName=[Phenology].ThermalTime.Value()
              MultiplyFunction PotentialSizeIncrement
                VariableReference InitialProportion: VariableName=[Grain].InitialGrainProportion.Value()
                VariableReference MaximumSize: VariableName=[Grain].MaximumPotentialGrainSize.Value()
          PhaseLookupValue LinearPhase: same as Replacements.Maize.Grain.DMDemandFunction.LinearPhase
        Constant MinimumNConc: FixedValue=0.0123
        Constant MaxNConcDailyGrowth: FixedValue=0.03
        Constant MaximumNConc: FixedValue=0.03
        PhaseLookup NFillingRate
          PhaseLookupValue GrainFilling: Start=Flowering; End=EndGrainFill
            FillingRateFunction
              VariableReference NumberFunction: VariableName=[Grain].NumberFunction.Value()
              AddFunction FillingDuration
                VariableReference FloweringToGrainFilling: VariableName=[Phenology].GrainDevelopment.Target.Value()
                VariableReference GrainFilling: VariableName=[Phenology].GrainFilling.Target.Value()
              VariableReference ThermalTime: VariableName=[Phenology].ThermalTime.Value()
              MultiplyFunction PotentialSizeIncrement
                VariableReference MaximumSize: VariableName=[Grain].MaximumPotentialGrainSize.Value()
                VariableReference MaximumNConc: VariableName=[Grain].MaximumNConc.Value()
        Constant WaterContent: FixedValue=0.12
        AccumulateFunction AccumThermalTime: StartStageName=Flowering; EndStageName=Maturity; FractionRemovedOnCut=0; FractionRemovedOnHarvest=0; FractionRemovedOnGraze=0; FractionRemovedOnPrune=0
          VariableReference DailyThermalTimeValue: VariableName=[Phenology].ThermalTime.Value()
        ExpressionFunction Protein
          Expression=([Grain].Live.N + [Grain].Dead.N)/([Grain].Live.Wt + [Grain].Dead.Wt) * 100 * 5.71
        BiomassRemoval BiomassRemovalDefaults
          OrganBiomassRemovalType Harvest: FractionLiveToRemove=1; FractionDeadToRemove=0; FractionLiveToResidue=0; FractionDeadToResidue=0
          OrganBiomassRemovalType Cut: FractionLiveToRemove=1; FractionDeadToRemove=0; FractionLiveToResidue=0; FractionDeadToResidue=0
          OrganBiomassRemovalType Prune: FractionLiveToRemove=0; FractionDeadToRemove=0; FractionLiveToResidue=0.8; FractionDeadToResidue=0
          OrganBiomassRemovalType Graze: FractionLiveToRemove=0.6; FractionDeadToRemove=0; FractionLiveToResidue=0.2; FractionDeadToResidue=0
          OrganBiomassRemovalType Thin: FractionLiveToRemove=0; FractionDeadToRemove=0; FractionLiveToResidue=0.05; FractionDeadToResidue=0
        Constant CarbonConcentration: FixedValue=0.4
        Live Biomass: DMDOfStructural=0.6
        Dead Biomass: DMDOfStructural=0.6
      Root: GrowthRespiration=0; MaintenanceRespiration=0
        Constant DMConversionEfficiency: FixedValue=1
        Constant RemobilisationCost: FixedValue=0
        Constant KLModifier: FixedValue=1
        Constant SoilWaterEffect: FixedValue=1
        Constant MaxDailyNUptake: FixedValue=20
        Constant SenescenceRate: FixedValue=0.005
        Constant StructuralFraction: FixedValue=1
        Constant MaximumRootDepth: FixedValue=1000000
        Constant MaximumNConc: FixedValue=0.01
        Constant MinimumNConc: FixedValue=0.01
        PhaseBasedSwitch NitrogenDemandSwitch: Start=Germination; End=Maturity
        BiomassRemoval BiomassRemovalDefaults: same as Replacements.Potato.Root.BiomassRemovalDefaults
        Constant KNO3: FixedValue=0.02
        Constant KNH4: FixedValue=0.01
        Constant InitialDM: FixedValue=0.005; Units=g/plant
        Constant SpecificRootLength: FixedValue=105; Units=m/g
        MultiplyFunction RootFrontVelocity
          PhaseLookup PotentialRootFrontVelocity
            PhaseLookupValue PreEmergence: Start=Germination; End=Emergence
              Constant Value: FixedValue=5; Units=mm/d
            PhaseLookupValue PostEmergence: Start=Emergence; End=Maturity
              Constant Value: FixedValue=20; Units=mm/d
          WeightedTemperatureFunction TemperatureFactor: MaximumTemperatureWeighting=0.5
            XYPairs: X=[0, 15, 25, 35]; Y=[0, 1, 1, 0]
          LinearInterpolationFunction WaterFactor: XProperty=[SoilWaterScale]
            SoilWaterScale
            XYPairs: X=[0, 0.25, 1]; Y=[0, 1, 1]
        LinearInterpolationFunction NUptakeSWFactor: XProperty=[SoilWaterScale]
          SoilWaterScale
          XYPairs: X=[0, 1]; Y=[0, 1]
          Memo
            This is modelled in the same way as the old wheat model where potential N uptake is decreased as the soil dries as described by NUptakeSWFactor
        PartitionFractionDemandFunction DMDemandFunction
          PhaseLookup PartitionFraction
            PhaseLookupValue PreEmergence: Start=Germination; End=Emergence
              Constant Value: FixedValue=0
            PhaseLookupValue PreFlowering: Start=Emergence; End=Flowering
              LinearInterpolationFunction AgeFactor: XProperty=[Phenology].Stage
                XYPairs: X=[3, 4]; Y=[0.5, 0.2]
            PhaseLookupValue PostFlowering: Start=Flowering; End=EndGrainFill
              Constant Value: FixedValue=0.2
        Constant CarbonConcentration: FixedValue=0.4
        Constant MaintenanceRespirationFunction: FixedValue=0
      Leaf: MaxCover=1; Albedo=0.25; Gsmax=0.011; R50=150; MicroClimatePresent=true; KDead=0.1; MaximumMainStemLeafNumber=30
        zero: CurrentExpandingLeaf, StartFractionExpanded, FractionNextleafExpanded, DeadNodesYesterday, GrowthRespiration, FRGR, PotentialEP, TipsAtEmergence, CohortsAtInitialisation, FractionDied
        LeafCohort InitialLeaves[1]: Rank=1; Area=200
          zero: NReallocationFactor, DMReallocationFactor, NRetranslocationFactor, DMRetranslocationFactor, ShadeInducedSenRate, SenescedFrac, DeltaPotentialArea, DeltaStressConstrainedArea, DeltaCarbonConstrainedArea, PotentialStructuralDMAllocation, PotentialMetabolicDMAllocation, MetabolicNReallocated, MetabolicWtReallocated, StorageNReallocated, StorageWtReallocated, MetabolicNRetranslocated, StorageNRetrasnlocated, DMRetranslocated, MetabolicNAllocation, StructuralDMAllocation, MetabolicDMAllocation, MaintenanceRespiration
        LeafCohort InitialLeaves[2]: same as Replacements.Maize.Leaf.InitialLeaves[2]
        ArrayBiomass CohortArrayLive: Propertys=[[Leaf].Live]; ArraySize=[Leaf].MaxNodeNo
        ArrayBiomass CohortArrayDead: Propertys=[[Leaf].Dead]; ArraySize=[Leaf].MaxNodeNo
        LeafCohortParameters CohortParameters: ExpansionStressValue=0
          Constant NReallocationFactor: FixedValue=1
          Constant RemobilisationCost: FixedValue=0
          Constant MaintenanceRespirationFunction: FixedValue=0
          Constant NRetranslocationFactor: FixedValue=0.03
          Constant DMReallocationFactor: FixedValue=1
          Constant DMRetranslocationFactor: FixedValue=1
          MinimumFunction CellDivisionStress
            LinearInterpolationFunction WaterStressEffect: XProperty=[Leaf].Fw
              XYPairs: X=[0.5, 1]; Y=[0.1, 1]
            LinearInterpolationFunction NitrogenStressEffect: XProperty=[Wheat].Leaf.Fn
              XYPairs: X=[0, 0.5, 1]; Y=[0.1, 0.1, 1]
          MinimumFunction ExpansionStress
            LinearInterpolationFunction WaterStressEffect: XProperty=[Root].WaterTensionFactor
              XYPairs: X=[0.1, 1.1, 1.3]; Y=[0, 1, 1]
            LinearInterpolationFunction TemperatureEffect: XProperty=[IWeather].MeanT
              XYPairs: X=[0, 12, 14]; Y=[0, 1, 1]
            LinearInterpolationFunction NitrogenStressEffect: XProperty=[Wheat].Leaf.Fn
              XYPairs: X=[0, 0.5, 1]; Y=[0.1, 0.1, 1]
          MultiplyFunction MaxArea
            Constant AreaLargestLeaves: FixedValue=2600; Units=mm^2
            LinearInterpolationFunction AgeFactor: XProperty=[Phenology].Stage
              XYPairs: X=[3, 3.45, 4]; Y=[0.1, 0.5, 1]
          MultiplyFunction GrowthDuration
            Constant Multiplier: FixedValue=1.3
            VariableReference Phyllochron: VariableName=[Structure].Phyllochron.Value()
          MultiplyFunction LagDuration
            LinearInterpolationFunction AgeFactor: XProperty=[Phenology].Stage
              XYPairs: X=[3, 4]; Y=[0.4, 1]
            SubtractFunction LastLeafDuration
              AddFunction ThermalTimeToRipe
                VariableReference EarlyReproductive: VariableName=[Phenology].EarlyReproductive.Target.Value()
                VariableReference GrainDevelopment: VariableName=[Phenology].GrainDevelopment.Target.Value()
                VariableReference GrainFilling: VariableName=[Phenology].GrainFilling.Target.Value()
                VariableReference Maturing: VariableName=[Phenology].Maturing.Target.Value()
                VariableReference Ripening: VariableName=[Phenology].Ripening.Target.Value()
              VariableReference SenescenceDuration: VariableName=[Leaf].CohortParameters.SenescenceDuration.Value()
          MultiplyFunction SenescenceDuration
            Constant Multiplier: FixedValue=3
            VariableReference Phyllochron: VariableName=[Structure].Phyllochron.Value()
          Constant DetachmentLagDuration: FixedValue=1000000
          Constant DetachmentDuration: FixedValue=1000000
          Constant RelativeBranchLeafSize: FixedValue=1
          LinearInterpolationFunction MaximumNConc: XProperty=[Phenology].Stage
            XYPairs: X=[3, 4, 6]; Y=[0.05, 0.05, 0.02]
          MultiplyFunction CriticalNConc
            LinearInterpolationFunction CriticalNConcAt350ppm: XProperty=[Phenology].Stage
              XYPairs: X=[3, 4, 6]; Y=[0.04, 0.04, 0.015]
            LinearInterpolationFunction CO2Factor: XProperty=[IWeather].CO2
              XYPairs: X=[350, 700]; Y=[1, 0.93]
          LinearInterpolationFunction MinimumNConc: XProperty=[Phenology].Stage
            XYPairs: X=[3, 4, 6]; Y=[0.01, 0.01, 0.01]
          AddFunction DroughtInducedLagAcceleration
            Constant One: FixedValue=1
            MultiplyFunction Stress
              Constant StressResponseCoefficient: FixedValue=1
              LinearInterpolationFunction StressFactor: XProperty=[Leaf].Fw
                XYPairs: X=[0, 1]; Y=[2, 0]
          AddFunction DroughtInducedSenAcceleration: same as Replacements.Wheat.Leaf.CohortParameters.DroughtInducedLagAcceleration
          LinearInterpolationFunction SpecificLeafAreaMax: XProperty=[Phenology].Stage
            XYPairs: X=[3, 4, 6]; Y=[17000, 20000, 17000]
          LinearInterpolationFunction SpecificLeafAreaMin: XProperty=[Leaf].Fn
            XYPairs: X=[0.4, 1]; Y=[14000, 14000]
          Constant InitialNConc: FixedValue=0
          Constant StructuralFraction: FixedValue=0.5
          Constant StorageFraction: FixedValue=0.3
          Constant LeafSizeShapeParameter: FixedValue=0.3
          Constant SenessingLeafRelativeSize: FixedValue=1; Units=0-1
          MultiplyFunction ShadeInducedSenescenceRate
            Constant RatePerDegDay: FixedValue=0
              Memo
                1% per degree day means it takes one phyllochron for a shaded leaf to fully sceness
            VariableReference ThermalTime: VariableName=[Phenology].ThermalTime.Value()
          ArrayFunction LagDurationAgeMultiplier: Values=1 1 1
          ArrayFunction SenescenceDurationAgeMultiplier: Values=1 1 1
          ArrayFunction LeafSizeAgeMultiplier: Values=1 1 1 1 1 1 1 1 1 1 1 1
        RUEModel Photosynthesis
          Constant RUE: FixedValue=1.5
          WeightedTemperatureFunction FT: MaximumTemperatureWeighting=0.75
            XYPairs: X=[0, 15, 25, 35]; Y=[0, 1, 1, 0]
          LinearInterpolationFunction FN: XProperty=[Leaf].Fn
            XYPairs: X=[0, 1, 1.5]; Y=[0, 1, 1]
          LinearInterpolationFunction FW: XProperty=[Leaf].Fw
            XYPairs: X=[0, 1, 1]; Y=[0, 1, 1]
          LinearInterpolationFunction FVPD: XProperty=[Photosynthesis].VPD
            XYPairs: X=[0, 10, 40]; Y=[1, 1, 0]
          RUECO2Function FCO2: PhotosyntheticPathway=C3
          VariableReference RadnInt: VariableName=[Leaf].RadIntTot
        Constant FrostFraction: FixedValue=0
        Constant RemobilisationCost: FixedValue=0
        VariableReference ThermalTime: VariableName=[Phenology].ThermalTime.Value()
        MinimumFunction FRGRFunction: same as Replacements.Potato.Leaf.FRGRFunction
        BiomassRemoval BiomassRemovalDefaults
          OrganBiomassRemovalType Harvest: FractionLiveToRemove=0; FractionDeadToRemove=0; FractionLiveToResidue=0.3; FractionDeadToResidue=0.3
          OrganBiomassRemovalType Cut: FractionLiveToRemove=0.8; FractionDeadToRemove=0.8; FractionLiveToResidue=0; FractionDeadToResidue=0
          OrganBiomassRemovalType Prune: FractionLiveToRemove=0; FractionDeadToRemove=0; FractionLiveToResidue=0.6; FractionDeadToResidue=0.6
          OrganBiomassRemovalType Graze: FractionLiveToRemove=0.6; FractionDeadToRemove=0.6; FractionLiveToResidue=0.1; FractionDeadToResidue=0.1
          OrganBiomassRemovalType Thin: FractionLiveToRemove=0; FractionDeadToRemove=0; FractionLiveToResidue=0.05; FractionDeadToResidue=0.05
        MultiplyFunction ExtinctionCoeff
          Constant VegetativePhase: FixedValue=0.5
          LinearInterpolationFunction DevelopmentFactor: XProperty=[Phenology].Stage
            XYPairs: X=[3, 4.7, 5]; Y=[1, 1, 1.2]
            Memo
              Exntiction coefficient increases at stem extension as leaves become more prostrate
        Constant StructuralFraction: FixedValue=0.5
        Constant DMConversionEfficiency: FixedValue=1
        Constant CarbonConcentration: FixedValue=0.4
      GenericOrgan Spike
        PartitionFractionDemandFunction DMDemandFunction
          LinearInterpolationFunction PartitionFraction: XProperty=[Phenology].Stage
            XYPairs: X=[3, 4, 4.7, 5, 7, 7.000001]; Y=[0, 0, 0.01, 0.7, 0.7, 0]
        Constant NReallocationFactor: FixedValue=0
        Constant RemobilisationCost: FixedValue=0
        PhaseLookup NRetranslocationFactor
          PhaseLookupValue EarlyGrowth: Start=Emergence; End=StartGrainFill
            Constant ValueDuringEarlyGrowth: FixedValue=0
          PhaseLookupValue ReproductiveGrowth: Start=StartGrainFill; End=EndGrainFill
            Constant ValueDuringGrainFill: FixedValue=0.5
        LinearInterpolationFunction MaximumNConc: XProperty=[Phenology].Stage
          XYPairs: X=[4, 4.5, 5.5, 6]; Y=[0.01, 0.01, 0.025, 0.025]
        PhaseLookup StructuralFraction
          PhaseLookupValue VegetativeGrowth: Start=Emergence; End=StartGrainFill
            Constant StructuralFractionEG: FixedValue=0.3
          PhaseLookupValue ReproductiveGrowth: Start=StartGrainFill; End=EndGrainFill
            Constant StructuralFractionGF: FixedValue=0
        Constant MinimumNConc: FixedValue=0.004
        BiomassRemoval BiomassRemovalDefaults
          OrganBiomassRemovalType Harvest: FractionLiveToRemove=0.5; FractionDeadToRemove=0; FractionLiveToResidue=0.1; FractionDeadToResidue=0
          OrganBiomassRemovalType Cut: FractionLiveToRemove=0.8; FractionDeadToRemove=0; FractionLiveToResidue=0; FractionDeadToResidue=0
          OrganBiomassRemovalType Prune: FractionLiveToRemove=0; FractionDeadToRemove=0; FractionLiveToResidue=0.6; FractionDeadToResidue=0
          OrganBiomassRemovalType Graze: FractionLiveToRemove=0.6; FractionDeadToRemove=0; FractionLiveToResidue=0.2; FractionDeadToResidue=0
          OrganBiomassRemovalType Thin: FractionLiveToRemove=0; FractionDeadToRemove=0; FractionLiveToResidue=0.05; FractionDeadToResidue=0
        PhaseBasedSwitch NitrogenDemandSwitch: Start=Emergence; End=StartGrainFill
        PhaseLookup DMRetranslocationFactor
          PhaseLookupValue VegetativeGrowth: Start=Emergence; End=StartGrainFill
            Constant DMRetranslocationFactor: FixedValue=0
          PhaseLookupValue ReproductiveGrowth: Start=StartGrainFill; End=EndGrainFill
            Constant DMRetranslocationFactor: FixedValue=0.5
        Constant InitialWtFunction: FixedValue=0; Units=g/m^2
        Constant DetachmentRateFunction: FixedValue=0; Units=/d
        Constant MaintenanceRespirationFunction: FixedValue=0; Units=0-1
        Constant DMConversionEfficiency: FixedValue=1; Units=0-1
        VariableReference HeadNumber: VariableName=[Structure].TotalStemPopn
        Constant DMReallocationFactor: FixedValue=0
        AddFunction CriticalNConc
          VariableReference MinimumNConc: VariableName=[Spike].MinimumNConc.Value()
          MultiplyFunction MetabolicNconc
            SubtractFunction NonStructuralN
              VariableReference MaximumNConc: VariableName=[Spike].MaximumNConc.Value()
              VariableReference MinimumNConc: VariableName=[Spike].MinimumNConc.Value()
            Constant Proportion: FixedValue=0.8
        LinearInterpolationFunction SenescenceRate: XProperty=[Phenology].Stage
          XYPairs: X=[3, 4, 5, 6]; Y=[0.07, 0.04, 0.015, 0.012]
        Constant CarbonConcentration: FixedValue=0.4
      GenericOrgan Stem
        PhaseLookup StructuralFraction
          PhaseLookupValue VegetativeGrowth: Start=Sowing; End=StartGrainFill
            Constant Fraction: FixedValue=0.3
          PhaseLookupValue ReproductiveGrowth: Start=StartGrainFill; End=HarvestRipe
            Constant Fraction: FixedValue=0.01
        LinearInterpolationFunction SenescenceRate: XProperty=[Phenology].Stage
          XYPairs: X=[3, 7, 8, 9]; Y=[0, 0, 0.2, 0.5]
        Constant RemobilisationCost: FixedValue=0
        LinearInterpolationFunction MaximumNConc: XProperty=[Phenology].Stage
          XYPairs: X=[3, 4, 5, 6]; Y=[0.07, 0.04, 0.015, 0.012]
        Constant MinimumNConc: FixedValue=0.0025
        PhaseBasedSwitch NitrogenDemandSwitch: Start=Emergence; End=StartGrainFill
        Constant NReallocationFactor: FixedValue=0
        PhaseLookup NRetranslocationFactor
          PhaseLookupValue VegetativeGrowth: Start=Sowing; End=Flowering
            Constant Fraction: FixedValue=0
          PhaseLookupValue ReproductiveGrowth: Start=Flowering; End=HarvestRipe
            Constant Fraction: FixedValue=0.5
        PhaseLookup DMRetranslocationFactor: same as Replacements.Wheat.Spike.DMRetranslocationFactor
        PartitionFractionDemandFunction DMDemandFunction
          PhaseLookup PartitionFraction
            PhaseLookupValue PreStemElongation: Start=Emergence; End=TerminalSpikelet
              Constant StemFraction: FixedValue=0.2
            PhaseLookupValue StemElongation: Start=TerminalSpikelet; End=StartGrainFill
              Constant StemFraction: FixedValue=0.7; Units=0
            PhaseLookupValue EarEmergence: Start=StartGrainFill; End=HarvestRipe
              Constant StemFraction: FixedValue=0
        BiomassRemoval BiomassRemovalDefaults: same as Replacements.Wheat.Spike.BiomassRemovalDefaults
        DivideFunction PercentWSC
          VariableReference WSC: VariableName=[Stem].Live.StorageWt
          VariableReference StemWt: VariableName=[Stem].Live.Wt
        Constant InitialWtFunction: FixedValue=0; Units=g/m^2
        Constant DetachmentRateFunction: FixedValue=0; Units=/d
        Constant MaintenanceRespirationFunction: FixedValue=0; Units=0-1
        Constant DMConversionEfficiency: FixedValue=1; Units=0-1
        Constant DMReallocationFactor: FixedValue=0
        AddFunction CriticalNConc
          VariableReference MinimumNConc: VariableName=[Stem].MinimumNConc.Value()
          MultiplyFunction MetabolicNconc
            SubtractFunction NonStructuralN
              VariableReference MaximumNConc: VariableName=[Stem].MaximumNConc.Value()
              VariableReference MinimumNConc: VariableName=[Stem].MinimumNConc.Value()
            Constant Proportion: FixedValue=0.5
        Constant CarbonConcentration: FixedValue=0.4
      CompositeBiomass AboveGround: DMDOfStructural=0.6
        Propertys=[[Leaf].Live, [Leaf].Dead, [Stem].Live, [Stem].Dead, [Spike].Live, [Spike].Dead, [Grain].Live, [Grain].Dead]
      CompositeBiomass AboveGroundLive: DMDOfStructural=0.6; Propertys=[[Leaf].Live, [Stem].Live, [Spike].Live, [Grain].Live]
      CompositeBiomass AboveGroundDead: DMDOfStructural=0.6; Propertys=[[Leaf].Dead, [Stem].Dead, [Spike].Dead, [Grain].Dead]
      CompositeBiomass BelowGround: DMDOfStructural=0.6; Propertys=[[Root].Live, [Root].Dead]
      CompositeBiomass Total: DMDOfStructural=0.6
        Propertys=[[Leaf].Live, [Leaf].Dead, [Stem].Live, [Stem].Dead, [Root].Live, [Root].Dead, [Spike].Live, [Spike].Dead, [Grain].Live, [Grain].Dead]
      CompositeBiomass TotalLive: DMDOfStructural=0.6
        Propertys=[[Leaf].Live, [Stem].Live, [Root].Live, [Spike].Live, [Grain].Live]
      CompositeBiomass TotalDead: DMDOfStructural=0.6
        Propertys=[[Leaf].Dead, [Stem].Dead, [Root].Dead, [Spike].Dead, [Grain].Dead]
      CompositeBiomass Ear: DMDOfStructural=0.6; Propertys=[[Spike].Live, [Grain].Live, [Spike].Dead, [Grain].Dead]
        Memo
          The Ear composite biomass object includes the Live and dead pools of all organs within the Ear to allow output for total dry matter and Nutrient contents, including total structural, non-structural and metabolic pools.
      CompositeBiomass StemPlusSpike: DMDOfStructural=0.6; Propertys=[[Stem].Live, [Spike].Live, [Stem].Dead, [Spike].Dead]
      CultivarFolder Cultivars
        CultivarFolder New Zealand
          Cultivar Alberic
            Command:
              [Phenology].MinimumLeafNumber.FixedValue = 9
              [Phenology].VrnSensitivity.FixedValue = 7
              [Phenology].PpSensitivity.FixedValue = 3
          Cultivar Amarok
            Command:
              [Phenology].MinimumLeafNumber.FixedValue = 9
              [Phenology].VrnSensitivity.FixedValue = 10
              [Phenology].PpSensitivity.FixedValue = 6
              [Phenology].EarlyReproductivePpSensitivity.FixedValue = 5
              [Structure].Phyllochron.BasePhyllochron.FixedValue = 80
          Cultivar Aspiring
            Command:
              [Phenology].MinimumLeafNumber.FixedValue = 9
              [Phenology].VrnSensitivity.FixedValue = 7
              [Phenology].PpSensitivity.FixedValue = 3
          Cultivar BattenWinter
            Command:
              [Phenology].MinimumLeafNumber.FixedValue = 8
              [Phenology].VrnSensitivity.FixedValue = 8
              [Phenology].PpSensitivity.FixedValue = 5
              [Phenology].EarlyReproductivePpSensitivity.FixedValue = 3
              [Structure].Phyllochron.BasePhyllochron.FixedValue = 100
              [Leaf].ExtinctionCoeff.VegetativePhase.FixedValue = 0.7
              [Grain].NumberFunction.GrainNumber.GrainsPerGramOfStem.FixedValue = 22
          Cultivar BattenSpring
            Command:
              [Phenology].MinimumLeafNumber.FixedValue = 7
              [Phenology].VrnSensitivity.FixedValue = 0
              [Phenology].PpSensitivity.FixedValue = 5
              [Phenology].EarlyReproductivePpSensitivity.FixedValue = 3
              [Structure].Phyllochron.BasePhyllochron.FixedValue = 100
              [Leaf].ExtinctionCoeff.VegetativePhase.FixedValue = 0.7
              [Grain].NumberFunction.GrainNumber.GrainsPerGramOfStem.FixedValue = 22
          Cultivar Centaur
            Command:
              [Phenology].MinimumLeafNumber.FixedValue = 9
              [Phenology].VrnSensitivity.FixedValue = 7
              [Phenology].PpSensitivity.FixedValue = 3
          Cultivar Claire
            Command:
              [Phenology].MinimumLeafNumber.FixedValue = 8
              [Phenology].VrnSensitivity.FixedValue = 8
              [Phenology].PpSensitivity.FixedValue = 8
              [Phenology].EarlyReproductivePpSensitivity.FixedValue = 3
              [Structure].Phyllochron.BasePhyllochron.FixedValue = 100
          Cultivar Conquest
            Command:
              [Phenology].MinimumLeafNumber.FixedValue = 7
              [Phenology].VrnSensitivity.FixedValue = 0
              [Phenology].PpSensitivity.FixedValue = 3
              [Structure].Phyllochron.BasePhyllochron.FixedValue = 100
          Cultivar Discovery
            Command:
              [Phenology].MinimumLeafNumber.FixedValue = 8.5
              [Phenology].VrnSensitivity.FixedValue = 0
              [Phenology].PpSensitivity.FixedValue = 0
              [Structure].Phyllochron.BasePhyllochron.FixedValue = 80
              [Leaf].CohortParameters.MaxArea.AreaLargestLeaves.FixedValue = 1600
              [Grain].MaximumPotentialGrainSize.FixedValue = 0.051
              [Grain].NumberFunction.GrainNumber.GrainsPerGramOfStem.FixedValue = 35
              [Leaf].ExtinctionCoeff.VegetativePhase.FixedValue = 0.5
              [Structure].BranchingRate.PotentialBranchingRate.Vegetative.PotentialBranchingRate.XYPairs.Y = 0,0,0,0,4,7,12,20
              [Grain].MaximumNConc.FixedValue = 0.025
              [Grain].MaxNConcDailyGrowth.FixedValue = 0.025
              [Leaf].ExtinctionCoeff.DevelopmentFactor.XYPairs.Y = 1,1,1.4
              [Leaf].CohortParameters.MinimumNConc.XYPairs.Y = 0.01,0.008,0.008
              [Stem].MinimumNConc.FixedValue = 0.006
              [Spike].DMRetranslocationFactor.ReproductiveGrowth.DMRetranslocationFactor.FixedValue = 0.05
            Memo
              This is a spring wheat with a high grain number and later tillering
          Cultivar Einstein
            Command:
              [Phenology].MinimumLeafNumber.FixedValue = 9
              [Phenology].VrnSensitivity.FixedValue = 7
              [Phenology].PpSensitivity.FixedValue = 3
          Cultivar Exceed
            Command:
              [Phenology].MinimumLeafNumber.FixedValue = 9
              [Phenology].VrnSensitivity.FixedValue = 7
              [Phenology].PpSensitivity.FixedValue = 3
          Cultivar Majestic
            Command:
              [Phenology].MinimumLeafNumber.FixedValue = 9
              [Phenology].VrnSensitivity.FixedValue = 7
              [Phenology].PpSensitivity.FixedValue = 3
          Cultivar Option
            Command:
              [Phenology].MinimumLeafNumber.FixedValue = 9
              [Phenology].VrnSensitivity.FixedValue = 7
              [Phenology].PpSensitivity.FixedValue = 3
          Cultivar Otane
            Command:
              [Phenology].MinimumLeafNumber.FixedValue = 6
              [Phenology].VrnSensitivity.FixedValue = 0
              [Phenology].PpSensitivity.FixedValue = 4
              [Phenology].EarlyReproductivePpSensitivity.FixedValue = 2
              [Structure].Phyllochron.BasePhyllochron.FixedValue = 100
          Cultivar Pennant
            Command:
              [Phenology].MinimumLeafNumber.FixedValue = 9
              [Phenology].VrnSensitivity.FixedValue = 7
              [Phenology].PpSensitivity.FixedValue = 3
          Cultivar Regency
            Command:
              [Phenology].MinimumLeafNumber.FixedValue = 9
              [Phenology].VrnSensitivity.FixedValue = 7
              [Phenology].PpSensitivity.FixedValue = 3
          Cultivar Richmond
            Command:
              [Phenology].MinimumLeafNumber.FixedValue = 9
              [Phenology].VrnSensitivity.FixedValue = 7
              [Phenology].PpSensitivity.FixedValue = 3
          Cultivar Robigus
            Command:
              [Phenology].MinimumLeafNumber.FixedValue = 9
              [Phenology].VrnSensitivity.FixedValue = 7
              [Phenology].PpSensitivity.FixedValue = 3
          Cultivar Rongotea
            Command:
              [Phenology].MinimumLeafNumber.FixedValue = 7
              [Phenology].VrnSensitivity.FixedValue = 0
              [Phenology].PpSensitivity.FixedValue = 2
              [Phenology].EarlyReproductivePpSensitivity.FixedValue = 3
              [Structure].Phyllochron.BasePhyllochron.FixedValue = 100
          Cultivar Rubric
            Command:
              [Phenology].MinimumLeafNumber.FixedValue = 9
              [Phenology].VrnSensitivity.FixedValue = 7
              [Phenology].PpSensitivity.FixedValue = 3
          Cultivar Sage
            Command:
              [Phenology].MinimumLeafNumber.FixedValue = 9
              [Phenology].VrnSensitivity.FixedValue = 7
              [Phenology].PpSensitivity.FixedValue = 3
          Cultivar Saracen
            Command:
              [Phenology].MinimumLeafNumber.FixedValue = 9
              [Phenology].VrnSensitivity.FixedValue = 7
              [Phenology].PpSensitivity.FixedValue = 3
          Cultivar Savannah
            Command:
              [Phenology].MinimumLeafNumber.FixedValue = 9
              [Phenology].VrnSensitivity.FixedValue = 7
              [Phenology].PpSensitivity.FixedValue = 3
          Cultivar Solstice
            Command:
              [Phenology].MinimumLeafNumber.FixedValue = 9
              [Phenology].VrnSensitivity.FixedValue = 7
              [Phenology].PpSensitivity.FixedValue = 3
          Cultivar Tanker
            Command:
              [Phenology].MinimumLeafNumber.FixedValue = 9
              [Phenology].VrnSensitivity.FixedValue = 7
              [Phenology].PpSensitivity.FixedValue = 3
          Cultivar Tribute
            Command:
              [Phenology].MinimumLeafNumber.FixedValue = 9
              [Phenology].VrnSensitivity.FixedValue = 7
              [Phenology].PpSensitivity.FixedValue = 3
          Cultivar Wakanui
            Command:
              [Phenology].MinimumLeafNumber.FixedValue = 8
              [Phenology].VrnSensitivity.FixedValue = 10
              [Phenology].PpSensitivity.FixedValue = 0
              [Phenology].EarlyReproductiveLongDayBase.FixedValue = 4
              [Structure].Phyllochron.BasePhyllochron.FixedValue = 100
              [Phenology].DailyVernalisation.TempResponseProfile.XYPairs.X = 0,1,8
              [Phenology].DailyVernalisation.TempResponseProfile.XYPairs.Y = 0,1.204,0
              [Leaf].ExtinctionCoeff.VegetativePhase.FixedValue = 0.7
              [Grain].NumberFunction.GrainNumber.GrainsPerGramOfStem.FixedValue = 22
              [Grain].MaximumPotentialGrainSize.FixedValue = 0.035
              [Leaf].CohortParameters.MaxArea.AreaLargestLeaves.FixedValue = 3000
          Cultivar Weston
            Command:
              [Phenology].MinimumLeafNumber.FixedValue = 9
              [Phenology].VrnSensitivity.FixedValue = 7
              [Phenology].PpSensitivity.FixedValue = 3
        CultivarFolder Australia
          Cultivar Axe
            Command:
              [Phenology].MinimumLeafNumber.FixedValue = 5
              [Phenology].VrnSensitivity.FixedValue = 0
              [Phenology].PpSensitivity.FixedValue = 4
              [Phenology].EarlyReproductivePpSensitivity.FixedValue = 0
              [Structure].Phyllochron.BasePhyllochron.FixedValue = 100
          Cultivar Bolac
            Command:
              [Phenology].MinimumLeafNumber.FixedValue = 6
              [Phenology].VrnSensitivity.FixedValue = 0
              [Phenology].PpSensitivity.FixedValue = 4
              [Structure].Phyllochron.BasePhyllochron.FixedValue = 100
          Cultivar Cunningham
            Command:
              [Phenology].MinimumLeafNumber.FixedValue = 6
              [Phenology].VrnSensitivity.FixedValue = 0
              [Phenology].PpSensitivity.FixedValue = 4
              [Structure].Phyllochron.BasePhyllochron.FixedValue = 100
            Alias Anlace
            Alias Arrivato
            Alias Babbler
            Alias Barham
            Alias Baxter
            Alias Bowie
            Alias Buckley
            Alias Buckly
            Alias Burunga
            Alias Camm
            Alias Carinya
            Alias ChiefCLPlus
            Alias CLF_Janz
            Alias Dagger
            Alias DBAAurora
            Alias ElmoreCLPlus
            Alias Espada
            Alias Frame
            Alias Gazelle
            Alias Halberd
            Alias Hybrid_Meteor
            Alias JusticaCLPlus
            Alias Preston
            Alias Saphire
            Alias Scout
            Alias Stiletto
            Alias Ventura
            Alias Wallup
          Cultivar Derrimut
            Command:
              [Phenology].MinimumLeafNumber.FixedValue = 6
              [Phenology].VrnSensitivity.FixedValue = 0
              [Phenology].PpSensitivity.FixedValue = 4
              [Structure].Phyllochron.BasePhyllochron.FixedValue = 100
          Cultivar EGAGregory
            Command:
              [Phenology].MinimumLeafNumber.FixedValue = 6
              [Phenology].VrnSensitivity.FixedValue = 1
              [Phenology].PpSensitivity.FixedValue = 4
              [Structure].Phyllochron.BasePhyllochron.FixedValue = 100
            Alias Gregory
            Alias Lancer
          Cultivar GattonHartog
            Command:
              [Phenology].MinimumLeafNumber.FixedValue = 8
              [Phenology].VrnSensitivity.FixedValue = 0
              [Phenology].PpSensitivity.FixedValue = 4
          Cultivar Gamenya
            Command:
              [Phenology].MinimumLeafNumber.FixedValue = 5
              [Phenology].VrnSensitivity.FixedValue = 0
              [Phenology].PpSensitivity.FixedValue = 3.5
              [Structure].Phyllochron.BasePhyllochron.FixedValue = 100
              [Phenology].EarlyReproductivePpSensitivity.FixedValue = 0
              [Phenology].EarlyReproductiveLongDayBase.FixedValue
          Cultivar Gauntlet
            Command:
              [Phenology].MinimumLeafNumber.FixedValue = 5
              [Phenology].VrnSensitivity.FixedValue = 0
              [Phenology].PpSensitivity.FixedValue = 4
              [Structure].Phyllochron.BasePhyllochron.FixedValue = 100
            Alias Braewood
            Alias Chara
            Alias Clearfield_stl
            Alias Drysdale
            Alias Envoy
            Alias Estoc
            Alias Giles
            Alias Harper
            Alias Krichauff
            Alias Magenta
            Alias Mitch
            Alias Phantom
            Alias Pugsley
            Alias Sentinel
            Alias Silverstar
            Alias Suneca
            Alias Sunlin
            Alias Sunvale
            Alias Trojan
            Alias Strzelecki
          Cultivar Gladius
            Command:
              [Phenology].MinimumLeafNumber.FixedValue = 6
              [Phenology].VrnSensitivity.FixedValue = 0
              [Phenology].PpSensitivity.FixedValue = 5
              [Structure].Phyllochron.BasePhyllochron.FixedValue = 100
          Cultivar Gutha
            Command:
              [Phenology].MinimumLeafNumber.FixedValue = 6
              [Phenology].VrnSensitivity.FixedValue = 0
              [Phenology].PpSensitivity.FixedValue = 5
              [Structure].Phyllochron.BasePhyllochron.FixedValue = 100
              [Grain].MaximumPotentialGrainSize.FixedValue = 0.041
              [Grain].NumberFunction.GrainNumber.GrainsPerGramOfStem.FixedValue = 17
          Cultivar H45
            Command:
              [Phenology].MinimumLeafNumber.FixedValue = 6
              [Phenology].VrnSensitivity.FixedValue = 0
              [Phenology].PpSensitivity.FixedValue = 4
              [Structure].Phyllochron.BasePhyllochron.FixedValue = 100
              [Grain].NumberFunction.GrainNumber.GrainsPerGramOfStem.FixedValue = 20
            Alias Saintly
            Alias Tamarinrock
            Alias Waagin
            Alias Wollaroi
            Alias Zippy
          Cultivar H46
            Command:
              [Phenology].MinimumLeafNumber.FixedValue = 8
              [Phenology].VrnSensitivity.FixedValue = 0
              [Phenology].PpSensitivity.FixedValue = 4
              [Structure].Phyllochron.BasePhyllochron.FixedValue = 100
          Cultivar Hartog
            Command:
              [Phenology].MinimumLeafNumber.FixedValue = 6
              [Phenology].VrnSensitivity.FixedValue = 0
              [Phenology].PpSensitivity.FixedValue = 5
              [Structure].Phyllochron.BasePhyllochron.FixedValue = 100
              [Grain].MaximumPotentialGrainSize.FixedValue = 0.041
            Alias Annuello
            Alias Carnamah
            Alias Catalina
            Alias CLF_Stiletto
            Alias Cobra
            Alias Corack
            Alias Correll
            Alias Diamondbird
            Alias Gladius
            Alias Goroke
            Alias GrenadeCLPlus
            Alias Guardian
            Alias Halbred
            Alias Impala
            Alias Justica
            Alias Kord
            Alias Merlin
            Alias Mitre
            Alias Peake
            Alias Shield
            Alias Spitfire
            Alias Sunguard
            Alias Sunstate
            Alias Yallaroi
            Alias Yawa
            Alias Yitpi
          Cultivar Hibred_Mercury
            Command:
              [Phenology].MinimumLeafNumber.FixedValue = 6
              [Phenology].VrnSensitivity.FixedValue = 0
              [Phenology].PpSensitivity.FixedValue = 4
              [Structure].Phyllochron.BasePhyllochron.FixedValue = 100
            Alias Agtscythe
            Alias Arrino
            Alias Bonnie_rock
            Alias Bowerbird
            Alias Condo
            Alias Dart
            Alias Dollarbird
            Alias Emurock
            Alias Hyperno
            Alias ImposeCLPlus
            Alias Kalka
            Alias Kirchauff
            Alias Kukri
            Alias Hunter
            Alias LRPBArrow
            Alias Mace
            Alias Ouyen
            Alias Ruby
            Alias Tamaroi
            Alias Young
            Alias Katana
          Cultivar Janz
            Command:
              [Phenology].MinimumLeafNumber.FixedValue = 6
              [Phenology].VrnSensitivity.FixedValue = 1
              [Phenology].PpSensitivity.FixedValue = 4
              [Structure].Phyllochron.BasePhyllochron.FixedValue = 100
          Cultivar Kelallac
            Command:
              [Phenology].MinimumLeafNumber.FixedValue = 8
              [Phenology].VrnSensitivity.FixedValue = 0
              [Phenology].PpSensitivity.FixedValue = 4
              [Structure].Phyllochron.BasePhyllochron.FixedValue = 100
            Alias Beaufort
            Alias Calingiri
            Alias Endure
            Alias Forrest
            Alias Scenario
            Alias Zen
          Cultivar Kennedy
            Command:
              [Phenology].MinimumLeafNumber.FixedValue = 8
              [Phenology].VrnSensitivity.FixedValue = 0
              [Phenology].PpSensitivity.FixedValue = 4
              [Structure].Phyllochron.BasePhyllochron.FixedValue = 100
          Cultivar Lang
            Command:
              [Phenology].MinimumLeafNumber.FixedValue = 6
              [Phenology].VrnSensitivity.FixedValue = 0
              [Phenology].PpSensitivity.FixedValue = 5
              [Structure].Phyllochron.BasePhyllochron.FixedValue = 100
          Cultivar Livingston
            Command:
              [Phenology].MinimumLeafNumber.FixedValue = 5
              [Phenology].VrnSensitivity.FixedValue = 0
              [Phenology].PpSensitivity.FixedValue = 4
              [Structure].Phyllochron.BasePhyllochron.FixedValue = 100
          Cultivar Lincoln
            Command:
              [Phenology].MinimumLeafNumber.FixedValue = 6
              [Phenology].VrnSensitivity.FixedValue = 0
              [Phenology].PpSensitivity.FixedValue = 4
              [Structure].Phyllochron.BasePhyllochron.FixedValue = 100
            Alias Crusader
          Cultivar Mace
            Command:
              [Phenology].MinimumLeafNumber.FixedValue = 6
              [Phenology].VrnSensitivity.FixedValue = 0
              [Phenology].PpSensitivity.FixedValue = 4
              [Structure].Phyllochron.BasePhyllochron.FixedValue = 100
          Cultivar MacKellar
            Command:
              [Phenology].MinimumLeafNumber.FixedValue = 7
              [Phenology].VrnSensitivity.FixedValue = 5
              [Phenology].PpSensitivity.FixedValue = 5
              [Phenology].EarlyReproductiveLongDayBase.FixedValue = 3.5
              [Structure].Phyllochron.BasePhyllochron.FixedValue = 100
            Alias Adagio
            Alias Brennan
            Alias Declic
            Alias Revenue
          Cultivar Matong
            Command:
              [Phenology].MinimumLeafNumber.FixedValue = 7
              [Phenology].VrnSensitivity.FixedValue = 1
              [Phenology].PpSensitivity.FixedValue = 4
              [Structure].Phyllochron.BasePhyllochron.FixedValue = 100
              [Grain].NumberFunction.GrainNumber.GrainsPerGramOfStem.FixedValue = 22
          Cultivar McCubbin
            Command:
              [Phenology].MinimumLeafNumber.FixedValue = 8
              [Phenology].VrnSensitivity.FixedValue = 0
              [Phenology].PpSensitivity.FixedValue = 5
              [Structure].Phyllochron.BasePhyllochron.FixedValue = 90
          Cultivar Mercury
            Command:
              [Phenology].MinimumLeafNumber.FixedValue = 7
              [Phenology].VrnSensitivity.FixedValue = 0
              [Phenology].PpSensitivity.FixedValue = 4
              [Phenology].EarlyReproductiveLongDayBase.FixedValue = 3.5
              [Structure].Phyllochron.BasePhyllochron.FixedValue = 80
          Cultivar Ruby
            Command:
              [Phenology].MinimumLeafNumber.FixedValue = 8
              [Phenology].VrnSensitivity.FixedValue = 0
              [Phenology].PpSensitivity.FixedValue = 4
              [Structure].Phyllochron.BasePhyllochron.FixedValue = 100
          Cultivar Spear
            Command:
              [Phenology].MinimumLeafNumber.FixedValue = 7
              [Phenology].VrnSensitivity.FixedValue = 0
              [Phenology].PpSensitivity.FixedValue = 4
              [Structure].Phyllochron.BasePhyllochron.FixedValue = 100
              [Grain].MaximumPotentialGrainSize.FixedValue = 0.045
          Cultivar Sunbri
            Command:
              [Phenology].MinimumLeafNumber.FixedValue = 7
              [Phenology].VrnSensitivity.FixedValue = 0
              [Phenology].PpSensitivity.FixedValue = 5
              [Structure].Phyllochron.BasePhyllochron.FixedValue = 100
          Cultivar Sunco
            Command:
              [Phenology].MinimumLeafNumber.FixedValue = 6.5
              [Phenology].VrnSensitivity.FixedValue = 0
              [Phenology].PpSensitivity.FixedValue = 3.5
              [Phenology].EarlyReproductivePpSensitivity.FixedValue = 4
              [Structure].Phyllochron.BasePhyllochron.FixedValue = 100
            Alias Advantage
            Alias Bellaroi
            Alias Caparoi
            Alias Ellison
            Alias Suntop
          Cultivar Ventura
            Command:
              [Phenology].MinimumLeafNumber.FixedValue = 8
              [Phenology].VrnSensitivity.FixedValue = 0
              [Phenology].PpSensitivity.FixedValue = 4
              [Structure].Phyllochron.BasePhyllochron.FixedValue = 100
          Cultivar Wedgetail
            Command:
              [Phenology].MinimumLeafNumber.FixedValue = 8
              [Phenology].VrnSensitivity.FixedValue = 0
              [Phenology].PpSensitivity.FixedValue = 4
              [Structure].Phyllochron.BasePhyllochron.FixedValue = 100
            Alias Lorikeet
            Alias Rosella
            Alias Whistler
            Alias Wylah
            Alias Eaglehawk
          Cultivar Westonia
            Command:
              [Phenology].MinimumLeafNumber.FixedValue = 5
              [Phenology].VrnSensitivity.FixedValue = 0
              [Phenology].PpSensitivity.FixedValue = 4
              [Structure].Phyllochron.BasePhyllochron.FixedValue = 100
          Cultivar Wilgoyne
            Command:
              [Phenology].MinimumLeafNumber.FixedValue = 6
              [Phenology].VrnSensitivity.FixedValue = 0
              [Phenology].PpSensitivity.FixedValue = 4
              [Structure].Phyllochron.BasePhyllochron.FixedValue = 100
              [Grain].NumberFunction.GrainNumber.GrainsPerGramOfStem.FixedValue = 20
              [Grain].MaximumPotentialGrainSize.FixedValue = 0.045
          Cultivar Wyalkatchem
            Command:
              [Phenology].MinimumLeafNumber.FixedValue = 8
              [Phenology].VrnSensitivity.FixedValue = 0
              [Phenology].PpSensitivity.FixedValue = 4
              [Structure].Phyllochron.BasePhyllochron.FixedValue = 100
          Cultivar Yitpi
            Command:
              [Phenology].MinimumLeafNumber.FixedValue = 8
              [Phenology].VrnSensitivity.FixedValue = 0
              [Phenology].PpSensitivity.FixedValue = 5
              [Phenology].EarlyReproductiveLongDayBase.FixedValue = 2.5
              [Phenology].EarlyReproductivePpSensitivity.FixedValue = 5
              [Structure].Phyllochron.BasePhyllochron.FixedValue = 80
          Cultivar Young
            Command:
              [Phenology].MinimumLeafNumber.FixedValue = 8
              [Phenology].VrnSensitivity.FixedValue = 0
              [Phenology].PpSensitivity.FixedValue = 4
              [Structure].Phyllochron.BasePhyllochron.FixedValue = 100
        CultivarFolder Turkey
          Cultivar Konya
            Command:
              [Phenology].MinimumLeafNumber.FixedValue = 7
              [Phenology].VrnSensitivity.FixedValue = 4
              [Phenology].PpSensitivity.FixedValue = 4
              [Structure].Phyllochron.BasePhyllochron.FixedValue = 100
              [Grain].NumberFunction.GrainNumber.GrainsPerGramOfStem.FixedValue = 16
              [Grain].MaximumPotentialGrainSize.FixedValue = 0.050
              [Grain].MaximumNConc.FixedValue = 0.026
              [Phenology].GrainFilling.Target.FixedValue = 450
              [Stem].DMRetranslocationFactor.ReproductiveGrowth.DMRetranslocationFactor.FixedValue = 0.2
              [Stem].StructuralFraction.VegetativeGrowth.Fraction.FixedValue = 0.6
              [Leaf].ExtinctionCoeff.VegetativePhase.FixedValue = 0.8
        CultivarFolder China
          Cultivar Keyu13
            Command:
              [Phenology].MinimumLeafNumber.FixedValue = 7
              [Phenology].VrnSensitivity.FixedValue = 5
              [Phenology].PpSensitivity.FixedValue = 3
              [Structure].Phyllochron.BasePhyllochron.FixedValue = 100
        CultivarFolder USA
          Cultivar Yecora
            Command:
              [Phenology].MinimumLeafNumber.FixedValue = 6
              [Phenology].VrnSensitivity.FixedValue = 0
              [Phenology].PpSensitivity.FixedValue = 4
              [Structure].Phyllochron.BasePhyllochron.FixedValue = 90
              [Leaf].CohortParameters.MaxArea.AreaLargestLeaves.FixedValue = 4000
          Cultivar Rex
            Command:
              [Phenology].MinimumLeafNumber.FixedValue = 7
              [Phenology].VrnSensitivity.FixedValue = 6
              [Phenology].PpSensitivity.FixedValue = 4
              [Grain].NumberFunction.GrainNumber.GrainsPerGramOfStem.FixedValue = 18
              [Grain].MaximumNConc.FixedValue = 0.02
          Cultivar Nugaines
            Command:
              [Phenology].MinimumLeafNumber.FixedValue = 7
              [Phenology].VrnSensitivity.FixedValue = 6
              [Phenology].PpSensitivity.FixedValue = 4
              [Grain].NumberFunction.GrainNumber.GrainsPerGramOfStem.FixedValue = 20
              [Grain].MaximumNConc.FixedValue = 0.02
          Cultivar Hyslop
            Command:
              [Phenology].MinimumLeafNumber.FixedValue = 7
              [Phenology].VrnSensitivity.FixedValue = 6
              [Phenology].PpSensitivity.FixedValue = 4
              [Grain].NumberFunction.GrainNumber.GrainsPerGramOfStem.FixedValue = 22
              [Grain].MaximumNConc.FixedValue = 0.02
          Cultivar Stephens
            Command:
              [Phenology].MinimumLeafNumber.FixedValue = 7
              [Phenology].VrnSensitivity.FixedValue = 6
              [Phenology].PpSensitivity.FixedValue = 4
              [Grain].NumberFunction.GrainNumber.GrainsPerGramOfStem.FixedValue = 25
              [Grain].MaximumNConc.FixedValue = 0.02
        CultivarFolder Europe
          Cultivar Dekan
            Command:
              [Phenology].MinimumLeafNumber.FixedValue = 9
              [Phenology].VrnSensitivity.FixedValue = 7
              [Phenology].PpSensitivity.FixedValue = 3
              [Phenology].EarlyReproductivePpSensitivity.FixedValue = 3
              [Structure].Phyllochron.BasePhyllochron.FixedValue = 100
              [Leaf].ExtinctionCoeff.VegetativePhase.FixedValue = 0.8
          Cultivar Rosario
            Command:
              [Phenology].MinimumLeafNumber.FixedValue = 9
              [Phenology].VrnSensitivity.FixedValue = 7
              [Phenology].PpSensitivity.FixedValue = 3
              [Phenology].EarlyReproductivePpSensitivity.FixedValue = 3
              [Structure].Phyllochron.BasePhyllochron.FixedValue = 100
              [Leaf].ExtinctionCoeff.VegetativePhase.FixedValue = 0.8
          Cultivar Ararat
            Command:
              [Phenology].MinimumLeafNumber.FixedValue = 9
              [Phenology].VrnSensitivity.FixedValue = 7
              [Phenology].PpSensitivity.FixedValue = 3
              [Phenology].EarlyReproductivePpSensitivity.FixedValue = 3
              [Structure].Phyllochron.BasePhyllochron.FixedValue = 100
              [Leaf].ExtinctionCoeff.VegetativePhase.FixedValue = 0.8
          Cultivar Tybalt
            Command:
              [Phenology].MinimumLeafNumber.FixedValue = 9
              [Phenology].VrnSensitivity.FixedValue = 0
              [Phenology].PpSensitivity.FixedValue = 0
              [Structure].Phyllochron.BasePhyllochron.FixedValue = 90
        CultivarFolder Africa
          Cultivar HAR1685
            Command:
              [Phenology].MinimumLeafNumber.FixedValue = 7
              [Phenology].VrnSensitivity.FixedValue = 0
              [Phenology].PpSensitivity.FixedValue = 3
              [Structure].Phyllochron.BasePhyllochron.FixedValue = 100
              [Grain].NumberFunction.GrainNumber.GrainsPerGramOfStem.FixedValue = 17
              [Phenology].GrainFilling.Target.FixedValue = 350
        CultivarFolder Iran
          Cultivar Gorgan
            Command:
              [Phenology].MinimumLeafNumber.FixedValue = 7
              [Phenology].VrnSensitivity.FixedValue = 0
              [Phenology].PpSensitivity.FixedValue = 4
              [Structure].Phyllochron.BasePhyllochron.FixedValue = 100
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