Simulations: Version=160
  Folder Replacements
    Plant SCRUM
      Cultivar Barley_Autumn
        Command:
          [Nodule].FixationMetabolicCost.FixedValue = 0
          [Nodule].FixationRate.FixedValue = 0
          [Phenology].CanopyExpanding.Target.FixedValue = 1461.0
          [Phenology].Senescing.Target.FixedValue = 600
          [Phenology].YieldIncreasing.Target.FixedValue = 939.0
          [Product].DryMatterContent.FixedValue = 0.87
          [Product].ExpectedYield.FixedValue = 1200
          [Product].HarvestIndex.FixedValue = 0.51
          [Product].MaximumNConc.FixedValue = 0.02
          [Product].MinimumNConc.FixedValue = 0.01
          [Root].KLModifier.XYPairs.Y = 1,1,1,1,1,1,1,0.882,0.779,0.687,0.607,0.535,0.472,0.417,0.368,0.325,0.287,0.253,0.223,0.197,0.174,0.153,0.135,0.119,0.105,0.093,0.082,0.072,0.064,0.056
          [Root].MaximumNConc.FixedValue = 0.009
          [Root].MaximumRootDepth.FixedValue = 1500
          [Root].MinimumNConc.FixedValue = 0.009
          [Root].RootProportion.FixedValue = 0.1
          [Stover].Cover.Expanding.SigCoverFunction.Xo.FixedValue = 540
          [Stover].Cover.Expanding.SigCoverFunction.Ymax.FixedValue = 0.96
          [Stover].Cover.Expanding.SigCoverFunction.b.FixedValue = 120
          [Stover].MaximumNConc.FixedValue = 0.006
          [Stover].MinimumNConc.FixedValue = 0.006
          [Stover].XoBiomass.FixedValue = 1500.0
          [Stover].bBiomass.FixedValue = 300.0
      Cultivar Barley_Spring
        Command:
          [Nodule].FixationMetabolicCost.FixedValue = 0
          [Nodule].FixationRate.FixedValue = 0
          [Phenology].CanopyExpanding.Target.FixedValue = 848.0
          [Phenology].Senescing.Target.FixedValue = 300
          [Phenology].YieldIncreasing.Target.FixedValue = 652.0
          [Product].DryMatterContent.FixedValue = 0.87
          [Product].ExpectedYield.FixedValue = 800
          [Product].HarvestIndex.FixedValue = 0.46
          [Product].MaximumNConc.FixedValue = 0.02
          [Product].MinimumNConc.FixedValue = 0.01
          [Root].KLModifier.XYPairs.Y = 1,1,1,1,1,1,1,0.807,0.651,0.526,0.424,0.343,0.276,0.223,0.18,0.145,0.117,0.095,0.076,0.062,0,0,0,0,0,0,0,0,0,0
          [Root].MaximumNConc.FixedValue = 0.009
          [Root].MaximumRootDepth.FixedValue = 1000
          [Root].MinimumNConc.FixedValue = 0.009
          [Root].RootProportion.FixedValue = 0.1
          [Stover].Cover.Expanding.SigCoverFunction.Xo.FixedValue = 540
          [Stover].Cover.Expanding.SigCoverFunction.Ymax.FixedValue = 0.96
          [Stover].Cover.Expanding.SigCoverFunction.b.FixedValue = 120
          [Stover].MaximumNConc.FixedValue = 0.006
          [Stover].MinimumNConc.FixedValue = 0.006
          [Stover].XoBiomass.FixedValue = 900.0
          [Stover].bBiomass.FixedValue = 180.0
      Cultivar Barley_SpringForage
        Command:
          [Nodule].FixationMetabolicCost.FixedValue = 0
          [Nodule].FixationRate.FixedValue = 0
          [Phenology].CanopyExpanding.Target.FixedValue = 326.0
          [Phenology].Senescing.Target.FixedValue = 300
          [Phenology].YieldIncreasing.Target.FixedValue = 1174.0
          [Product].DryMatterContent.FixedValue = 0.4
          [Product].ExpectedYield.FixedValue = 2000
          [Product].HarvestIndex.FixedValue = 0.95
          [Product].MaximumNConc.FixedValue = 0.013
          [Product].MinimumNConc.FixedValue = 0.0091
          [Root].KLModifier.XYPairs.Y = 1,1,1,1,1,1,1,0.882,0.779,0.687,0.607,0.535,0.472,0.417,0.368,0.325,0.287,0.253,0.223,0.197,0.174,0.153,0.135,0.119,0.105,0.093,0.082,0.072,0.064,0.056
          [Root].MaximumNConc.FixedValue = 0.009
          [Root].MaximumRootDepth.FixedValue = 1500
          [Root].MinimumNConc.FixedValue = 0.009
          [Root].RootProportion.FixedValue = 0.1
          [Stover].Cover.Expanding.SigCoverFunction.Xo.FixedValue = 540
          [Stover].Cover.Expanding.SigCoverFunction.Ymax.FixedValue = 0.96
          [Stover].Cover.Expanding.SigCoverFunction.b.FixedValue = 120
          [Stover].MaximumNConc.FixedValue = 0.005
          [Stover].MinimumNConc.FixedValue = 0.005
          [Stover].XoBiomass.FixedValue = 900.0
          [Stover].bBiomass.FixedValue = 180.0
      Cultivar Beets
        Command:
          [Nodule].FixationMetabolicCost.FixedValue = 0
          [Nodule].FixationRate.FixedValue = 0
          [Phenology].CanopyExpanding.Target.FixedValue = 874.0
          [Phenology].Senescing.Target.FixedValue = 750
          [Phenology].YieldIncreasing.Target.FixedValue = 1076.0
          [Product].DryMatterContent.FixedValue = 0.14
          [Product].ExpectedYield.FixedValue = 5500
          [Product].HarvestIndex.FixedValue = 0.815
          [Product].MaximumNConc.FixedValue = 0.015
          [Product].MinimumNConc.FixedValue = 0.0105
          [Root].KLModifier.XYPairs.Y = 1,1,1,1,1,1,1,0.472,0.223,0.105,0,0,0,0,0,0,0,0,0,0,0,0,0,0,0,0,0,0,0,0
          [Root].MaximumNConc.FixedValue = 0.01
          [Root].MaximumRootDepth.FixedValue = 500
          [Root].MinimumNConc.FixedValue = 0.01
          [Root].RootProportion.FixedValue = 0.1
          [Stover].Cover.Expanding.SigCoverFunction.Xo.FixedValue = 690
          [Stover].Cover.Expanding.SigCoverFunction.Ymax.FixedValue = 0.95
          [Stover].Cover.Expanding.SigCoverFunction.b.FixedValue = 120
          [Stover].MaximumNConc.FixedValue = 0.02
          [Stover].MinimumNConc.FixedValue = 0.02
          [Stover].XoBiomass.FixedValue = 1350.0
          [Stover].bBiomass.FixedValue = 270.0
      Cultivar Beets_Seed
        Command:
          [Nodule].FixationMetabolicCost.FixedValue = 0
          [Nodule].FixationRate.FixedValue = 0
          [Phenology].CanopyExpanding.Target.FixedValue = 1534.0
          [Phenology].Senescing.Target.FixedValue = 300
          [Phenology].YieldIncreasing.Target.FixedValue = 1107.0
          [Product].DryMatterContent.FixedValue = 0.85
          [Product].ExpectedYield.FixedValue = 200
          [Product].HarvestIndex.FixedValue = 0.2
          [Product].MaximumNConc.FixedValue = 0.03
          [Product].MinimumNConc.FixedValue = 0.0105
          [Root].KLModifier.XYPairs.Y = 1,1,1,1,1,1,1,0.807,0.651,0.526,0.424,0.343,0.276,0.223,0.18,0.145,0.117,0.095,0.076,0.062,0,0,0,0,0,0,0,0,0,0
          [Root].MaximumNConc.FixedValue = 0.008
          [Root].MaximumRootDepth.FixedValue = 1000
          [Root].MinimumNConc.FixedValue = 0.01
          [Root].RootProportion.FixedValue = 0.1
          [Stover].Cover.Expanding.SigCoverFunction.Xo.FixedValue = 540
          [Stover].Cover.Expanding.SigCoverFunction.Ymax.FixedValue = 0.96
          [Stover].Cover.Expanding.SigCoverFunction.b.FixedValue = 120
          [Stover].MaximumNConc.FixedValue = 0.02
          [Stover].MinimumNConc.FixedValue = 0.02
          [Stover].XoBiomass.FixedValue = 1470.0
          [Stover].bBiomass.FixedValue = 294.0
      Cultivar Brassica
        Command:
          [Nodule].FixationMetabolicCost.FixedValue = 0
          [Nodule].FixationRate.FixedValue = 0
          [Phenology].CanopyExpanding.Target.FixedValue = 420.0
          [Phenology].Senescing.Target.FixedValue = 0
          [Phenology].YieldIncreasing.Target.FixedValue = 1230.0
          [Product].DryMatterContent.FixedValue = 1.0
          [Product].ExpectedYield.FixedValue = 800
          [Product].HarvestIndex.FixedValue = 0.9
          [Product].MaximumNConc.FixedValue = 0.03
          [Product].MinimumNConc.FixedValue = 0.021
          [Root].KLModifier.XYPairs.Y = 1,1,1,1,1,1,1,0.687,0.472,0.325,0.223,0.153,0.105,0.072,0,0,0,0,0,0,0,0,0,0,0,0,0,0,0,0
          [Root].MaximumNConc.FixedValue = 0.01
          [Root].MaximumRootDepth.FixedValue = 700
          [Root].MinimumNConc.FixedValue = 0.01
          [Root].RootProportion.FixedValue = 0.1
          [Stover].Cover.Expanding.SigCoverFunction.Xo.FixedValue = 690
          [Stover].Cover.Expanding.SigCoverFunction.Ymax.FixedValue = 0.96
          [Stover].Cover.Expanding.SigCoverFunction.b.FixedValue = 60
          [Stover].MaximumNConc.FixedValue = 0.03
          [Stover].MinimumNConc.FixedValue = 0.03
          [Stover].XoBiomass.FixedValue = 825.0
          [Stover].bBiomass.FixedValue = 165.0
      Cultivar Broccoli_Seed
        Command:
          [Nodule].FixationMetabolicCost.FixedValue = 0
          [Nodule].FixationRate.FixedValue = 0
          [Phenology].CanopyExpanding.Target.FixedValue = 1192.0
          [Phenology].Senescing.Target.FixedValue = 300
          [Phenology].YieldIncreasing.Target.FixedValue = 523.0
          [Product].DryMatterContent.FixedValue = 0.84
          [Product].ExpectedYield.FixedValue = 150
          [Product].HarvestIndex.FixedValue = 0.2
          [Product].MaximumNConc.FixedValue = 0.03
          [Product].MinimumNConc.FixedValue = 0.02
          [Root].KLModifier.XYPairs.Y = 1,1,1,1,1,1,1,0.807,0.651,0.526,0.424,0.343,0.276,0.223,0.18,0.145,0.117,0.095,0.076,0.062,0,0,0,0,0,0,0,0,0,0
          [Root].MaximumNConc.FixedValue = 0.008
          [Root].MaximumRootDepth.FixedValue = 1000
          [Root].MinimumNConc.FixedValue = 0.008
          [Root].RootProportion.FixedValue = 0.1
          [Stover].Cover.Expanding.SigCoverFunction.Xo.FixedValue = 540
          [Stover].Cover.Expanding.SigCoverFunction.Ymax.FixedValue = 0.96
          [Stover].Cover.Expanding.SigCoverFunction.b.FixedValue = 120
          [Stover].MaximumNConc.FixedValue = 0.02
          [Stover].MinimumNConc.FixedValue = 0.02
          [Stover].XoBiomass.FixedValue = 1008.0
          [Stover].bBiomass.FixedValue = 202.0
      Cultivar Broccoli_summer
        Command:
          [Nodule].FixationMetabolicCost.FixedValue = 0
          [Nodule].FixationRate.FixedValue = 0
          [Phenology].CanopyExpanding.Target.FixedValue = 1664.0
          [Phenology].Senescing.Target.FixedValue = 900
          [Phenology].YieldIncreasing.Target.FixedValue = 436.0
          [Product].DryMatterContent.FixedValue = 0.11
          [Product].ExpectedYield.FixedValue = 1200
          [Product].HarvestIndex.FixedValue = 0.2
          [Product].MaximumNConc.FixedValue = 0.035
          [Product].MinimumNConc.FixedValue = 0.0245
          [Root].KLModifier.XYPairs.Y = 1,1,1,1,1,1,1,0.472,0.223,0.105,0,0,0,0,0,0,0,0,0,0,0,0,0,0,0,0,0,0,0,0
          [Root].MaximumNConc.FixedValue = 0.009
          [Root].MaximumRootDepth.FixedValue = 500
          [Root].MinimumNConc.FixedValue = 0.009
          [Root].RootProportion.FixedValue = 0.1
          [Stover].Cover.Expanding.SigCoverFunction.Xo.FixedValue = 450
          [Stover].Cover.Expanding.SigCoverFunction.Ymax.FixedValue = 0.8
          [Stover].Cover.Expanding.SigCoverFunction.b.FixedValue = 120
          [Stover].MaximumNConc.FixedValue = 0.038
          [Stover].MinimumNConc.FixedValue = 0.038
          [Stover].XoBiomass.FixedValue = 1500.0
          [Stover].bBiomass.FixedValue = 300.0
      Cultivar Broccoli_winter_spring
        Command:
          [Nodule].FixationMetabolicCost.FixedValue = 0
          [Nodule].FixationRate.FixedValue = 0
          [Phenology].CanopyExpanding.Target.FixedValue = 1739.0
          [Phenology].Senescing.Target.FixedValue = 900
          [Phenology].YieldIncreasing.Target.FixedValue = 361.0
          [Product].DryMatterContent.FixedValue = 0.11
          [Product].ExpectedYield.FixedValue = 800
          [Product].HarvestIndex.FixedValue = 0.13
          [Product].MaximumNConc.FixedValue = 0.035
          [Product].MinimumNConc.FixedValue = 0.0245
          [Root].KLModifier.XYPairs.Y = 1,1,1,1,1,1,1,0.472,0.223,0.105,0,0,0,0,0,0,0,0,0,0,0,0,0,0,0,0,0,0,0,0
          [Root].MaximumNConc.FixedValue = 0.009
          [Root].MaximumRootDepth.FixedValue = 500
          [Root].MinimumNConc.FixedValue = 0.009
          [Root].RootProportion.FixedValue = 0.1
          [Stover].Cover.Expanding.SigCoverFunction.Xo.FixedValue = 450
          [Stover].Cover.Expanding.SigCoverFunction.Ymax.FixedValue = 0.8
          [Stover].Cover.Expanding.SigCoverFunction.b.FixedValue = 120
          [Stover].MaximumNConc.FixedValue = 0.038
          [Stover].MinimumNConc.FixedValue = 0.038
          [Stover].XoBiomass.FixedValue = 1500.0
          [Stover].bBiomass.FixedValue = 300.0
      Cultivar BrusselSprouts
        Command:
          [Nodule].FixationMetabolicCost.FixedValue = 0
          [Nodule].FixationRate.FixedValue = 0
          [Phenology].CanopyExpanding.Target.FixedValue = 1470.0
          [Phenology].Senescing.Target.FixedValue = 900
          [Phenology].YieldIncreasing.Target.FixedValue = 630.0
          [Product].DryMatterContent.FixedValue = 0.2
          [Product].ExpectedYield.FixedValue = 1500
          [Product].HarvestIndex.FixedValue = 0.4
          [Product].MaximumNConc.FixedValue = 0.035
          [Product].MinimumNConc.FixedValue = 0.0245
          [Root].KLModifier.XYPairs.Y = 1,1,1,1,1,1,1,0.472,0.223,0.105,0,0,0,0,0,0,0,0,0,0,0,0,0,0,0,0,0,0,0,0
          [Root].MaximumNConc.FixedValue = 0.009
          [Root].MaximumRootDepth.FixedValue = 500
          [Root].MinimumNConc.FixedValue = 0.009
          [Root].RootProportion.FixedValue = 0.1
          [Stover].Cover.Expanding.SigCoverFunction.Xo.FixedValue = 450
          [Stover].Cover.Expanding.SigCoverFunction.Ymax.FixedValue = 0.8
          [Stover].Cover.Expanding.SigCoverFunction.b.FixedValue = 120
          [Stover].MaximumNConc.FixedValue = 0.038
          [Stover].MinimumNConc.FixedValue = 0.038
          [Stover].XoBiomass.FixedValue = 1500.0
          [Stover].bBiomass.FixedValue = 300.0
      Cultivar Cabbage_summer
        Command:
          [Nodule].FixationMetabolicCost.FixedValue = 0
          [Nodule].FixationRate.FixedValue = 0
          [Phenology].CanopyExpanding.Target.FixedValue = 1080.0
          [Phenology].Senescing.Target.FixedValue = 900
          [Phenology].YieldIncreasing.Target.FixedValue = 1020.0
          [Product].DryMatterContent.FixedValue = 0.08
          [Product].ExpectedYield.FixedValue = 7000
          [Product].HarvestIndex.FixedValue = 0.75
          [Product].MaximumNConc.FixedValue = 0.026
          [Product].MinimumNConc.FixedValue = 0.0182
          [Root].KLModifier.XYPairs.Y = 1,1,1,1,1,1,1,0.472,0.223,0.105,0,0,0,0,0,0,0,0,0,0,0,0,0,0,0,0,0,0,0,0
          [Root].MaximumNConc.FixedValue = 0.009
          [Root].MaximumRootDepth.FixedValue = 500
          [Root].MinimumNConc.FixedValue = 0.009
          [Root].RootProportion.FixedValue = 0.1
          [Stover].Cover.Expanding.SigCoverFunction.Xo.FixedValue = 360
          [Stover].Cover.Expanding.SigCoverFunction.Ymax.FixedValue = 0.8
          [Stover].Cover.Expanding.SigCoverFunction.b.FixedValue = 120
          [Stover].MaximumNConc.FixedValue = 0.03
          [Stover].MinimumNConc.FixedValue = 0.03
          [Stover].XoBiomass.FixedValue = 1500.0
          [Stover].bBiomass.FixedValue = 300.0
      Cultivar Cabbage_winter_spring
        Command:
          [Nodule].FixationMetabolicCost.FixedValue = 0
          [Nodule].FixationRate.FixedValue = 0
          [Phenology].CanopyExpanding.Target.FixedValue = 1269.0
          [Phenology].Senescing.Target.FixedValue = 900
          [Phenology].YieldIncreasing.Target.FixedValue = 831.0
          [Product].DryMatterContent.FixedValue = 0.12
          [Product].ExpectedYield.FixedValue = 5000
          [Product].HarvestIndex.FixedValue = 0.6
          [Product].MaximumNConc.FixedValue = 0.026
          [Product].MinimumNConc.FixedValue = 0.0182
          [Root].KLModifier.XYPairs.Y = 1,1,1,1,1,1,1,0.472,0.223,0.105,0,0,0,0,0,0,0,0,0,0,0,0,0,0,0,0,0,0,0,0
          [Root].MaximumNConc.FixedValue = 0.009
          [Root].MaximumRootDepth.FixedValue = 500
          [Root].MinimumNConc.FixedValue = 0.009
          [Root].RootProportion.FixedValue = 0.1
          [Stover].Cover.Expanding.SigCoverFunction.Xo.FixedValue = 360
          [Stover].Cover.Expanding.SigCoverFunction.Ymax.FixedValue = 0.8
          [Stover].Cover.Expanding.SigCoverFunction.b.FixedValue = 120
          [Stover].MaximumNConc.FixedValue = 0.03
          [Stover].MinimumNConc.FixedValue = 0.03
          [Stover].XoBiomass.FixedValue = 1500.0
          [Stover].bBiomass.FixedValue = 300.0
      Cultivar Carrots
        Command:
          [Nodule].FixationMetabolicCost.FixedValue = 0
          [Nodule].FixationRate.FixedValue = 0
          [Phenology].CanopyExpanding.Target.FixedValue = 955.0
          [Phenology].Senescing.Target.FixedValue = 750
          [Phenology].YieldIncreasing.Target.FixedValue = 2045.0
          [Product].DryMatterContent.FixedValue = 0.12
          [Product].ExpectedYield.FixedValue = 7000
          [Product].HarvestIndex.FixedValue = 0.9
          [Product].MaximumNConc.FixedValue = 0.01
          [Product].MinimumNConc.FixedValue = 0.007
          [Root].KLModifier.XYPairs.Y = 1,1,1,1,1,1,1,0.472,0.223,0.105,0,0,0,0,0,0,0,0,0,0,0,0,0,0,0,0,0,0,0,0
          [Root].MaximumNConc.FixedValue = 0.01
          [Root].MaximumRootDepth.FixedValue = 500
          [Root].MinimumNConc.FixedValue = 0.01
          [Root].RootProportion.FixedValue = 0.1
          [Stover].Cover.Expanding.SigCoverFunction.Xo.FixedValue = 690
          [Stover].Cover.Expanding.SigCoverFunction.Ymax.FixedValue = 0.9
          [Stover].Cover.Expanding.SigCoverFunction.b.FixedValue = 120
          [Stover].MaximumNConc.FixedValue = 0.02
          [Stover].MinimumNConc.FixedValue = 0.02
          [Stover].XoBiomass.FixedValue = 1875.0
          [Stover].bBiomass.FixedValue = 375.0
      Cultivar Carrot_Seed
        Command:
          [Nodule].FixationMetabolicCost.FixedValue = 0
          [Nodule].FixationRate.FixedValue = 0
          [Phenology].CanopyExpanding.Target.FixedValue = 2423.0
          [Phenology].Senescing.Target.FixedValue = 300
          [Phenology].YieldIncreasing.Target.FixedValue = 1511.0
          [Product].DryMatterContent.FixedValue = 0.85
          [Product].ExpectedYield.FixedValue = 170
          [Product].HarvestIndex.FixedValue = 0.15
          [Product].MaximumNConc.FixedValue = 0.03
          [Product].MinimumNConc.FixedValue = 0.01
          [Root].KLModifier.XYPairs.Y = 1,1,1,1,1,1,1,0.472,0.223,0.105,0,0,0,0,0,0,0,0,0,0,0,0,0,0,0,0,0,0,0,0
          [Root].MaximumNConc.FixedValue = 0.008
          [Root].MaximumRootDepth.FixedValue = 1000
          [Root].MinimumNConc.FixedValue = 0.008
          [Root].RootProportion.FixedValue = 0.1
          [Stover].Cover.Expanding.SigCoverFunction.Xo.FixedValue = 690
          [Stover].Cover.Expanding.SigCoverFunction.Ymax.FixedValue = 0.95
          [Stover].Cover.Expanding.SigCoverFunction.b.FixedValue = 120
          [Stover].MaximumNConc.FixedValue = 0.02
          [Stover].MinimumNConc.FixedValue = 0.02
          [Stover].XoBiomass.FixedValue = 2117.0
          [Stover].bBiomass.FixedValue = 423.0
      Cultivar Cauliflower_summer
        Command:
          [Nodule].FixationMetabolicCost.FixedValue = 0
          [Nodule].FixationRate.FixedValue = 0
          [Phenology].CanopyExpanding.Target.FixedValue = 1422.0
          [Phenology].Senescing.Target.FixedValue = 900
          [Phenology].YieldIncreasing.Target.FixedValue = 678.0
          [Product].DryMatterContent.FixedValue = 0.09
          [Product].ExpectedYield.FixedValue = 5000
          [Product].HarvestIndex.FixedValue = 0.45
          [Product].MaximumNConc.FixedValue = 0.035
          [Product].MinimumNConc.FixedValue = 0.0245
          [Root].KLModifier.XYPairs.Y = 1,1,1,1,1,1,1,0.472,0.223,0.105,0,0,0,0,0,0,0,0,0,0,0,0,0,0,0,0,0,0,0,0
          [Root].MaximumNConc.FixedValue = 0.009
          [Root].MaximumRootDepth.FixedValue = 500
          [Root].MinimumNConc.FixedValue = 0.009
          [Root].RootProportion.FixedValue = 0.1
          [Stover].Cover.Expanding.SigCoverFunction.Xo.FixedValue = 450
          [Stover].Cover.Expanding.SigCoverFunction.Ymax.FixedValue = 0.8
          [Stover].Cover.Expanding.SigCoverFunction.b.FixedValue = 120
          [Stover].MaximumNConc.FixedValue = 0.038
          [Stover].MinimumNConc.FixedValue = 0.038
          [Stover].XoBiomass.FixedValue = 1500.0
          [Stover].bBiomass.FixedValue = 300.0
      Cultivar Cauliflower_winter_spring
        Command:
          [Nodule].FixationMetabolicCost.FixedValue = 0
          [Nodule].FixationRate.FixedValue = 0
          [Phenology].CanopyExpanding.Target.FixedValue = 1566.0
          [Phenology].Senescing.Target.FixedValue = 900
          [Phenology].YieldIncreasing.Target.FixedValue = 534.0
          [Product].DryMatterContent.FixedValue = 0.1
          [Product].ExpectedYield.FixedValue = 3000
          [Product].HarvestIndex.FixedValue = 0.3
          [Product].MaximumNConc.FixedValue = 0.035
          [Product].MinimumNConc.FixedValue = 0.0245
          [Root].KLModifier.XYPairs.Y = 1,1,1,1,1,1,1,0.472,0.223,0.105,0,0,0,0,0,0,0,0,0,0,0,0,0,0,0,0,0,0,0,0
          [Root].MaximumNConc.FixedValue = 0.009
          [Root].MaximumRootDepth.FixedValue = 500
          [Root].MinimumNConc.FixedValue = 0.009
          [Root].RootProportion.FixedValue = 0.1
          [Stover].Cover.Expanding.SigCoverFunction.Xo.FixedValue = 450
          [Stover].Cover.Expanding.SigCoverFunction.Ymax.FixedValue = 0.8
          [Stover].Cover.Expanding.SigCoverFunction.b.FixedValue = 120
          [Stover].MaximumNConc.FixedValue = 0.038
          [Stover].MinimumNConc.FixedValue = 0.038
          [Stover].XoBiomass.FixedValue = 1500.0
          [Stover].bBiomass.FixedValue = 300.0
      Cultivar Chicory_Seed
        Command:
          [Nodule].FixationMetabolicCost.FixedValue = 0
          [Nodule].FixationRate.FixedValue = 0
          [Phenology].CanopyExpanding.Target.FixedValue = 2587.0
          [Phenology].Senescing.Target.FixedValue = 300
          [Phenology].YieldIncreasing.Target.FixedValue = 1347.0
          [Product].DryMatterContent.FixedValue = 0.85
          [Product].ExpectedYield.FixedValue = 150
          [Product].HarvestIndex.FixedValue = 0.05
          [Product].MaximumNConc.FixedValue = 0.03
          [Product].MinimumNConc.FixedValue = 0.0105
          [Root].KLModifier.XYPairs.Y = 1,1,1,1,1,1,1,0.807,0.651,0.526,0.424,0.343,0.276,0.223,0.18,0.145,0.117,0.095,0.076,0.062,0,0,0,0,0,0,0,0,0,0
          [Root].MaximumNConc.FixedValue = 0.01
          [Root].MaximumRootDepth.FixedValue = 1000
          [Root].MinimumNConc.FixedValue = 0.01
          [Root].RootProportion.FixedValue = 0.1
          [Stover].Cover.Expanding.SigCoverFunction.Xo.FixedValue = 690
          [Stover].Cover.Expanding.SigCoverFunction.Ymax.FixedValue = 0.95
          [Stover].Cover.Expanding.SigCoverFunction.b.FixedValue = 120
          [Stover].MaximumNConc.FixedValue = 0.015
          [Stover].MinimumNConc.FixedValue = 0.01
          [Stover].XoBiomass.FixedValue = 2117.0
          [Stover].bBiomass.FixedValue = 423.7
      Cultivar Clover_1styear
        Command:
          [Nodule].FixationMetabolicCost.FixedValue = 0
          [Nodule].FixationRate.FixedValue = 1000
          [Phenology].CanopyExpanding.Target.FixedValue = 2141.0
          [Phenology].Senescing.Target.FixedValue = 300
          [Phenology].YieldIncreasing.Target.FixedValue = 1159.0
          [Product].DryMatterContent.FixedValue = 0.85
          [Product].ExpectedYield.FixedValue = 60
          [Product].HarvestIndex.FixedValue = 0.09
          [Product].MaximumNConc.FixedValue = 0.035
          [Product].MinimumNConc.FixedValue = 0.0245
          [Root].KLModifier.XYPairs.Y = 1,1,1,1,1,1,1,0.779,0.607,0.472,0.368,0.287,0.223,0.174,0.135,0.105,0.082,0.064,0,0,0,0,0,0,0,0,0,0,0,0
          [Root].MaximumNConc.FixedValue = 0.01
          [Root].MaximumRootDepth.FixedValue = 900
          [Root].MinimumNConc.FixedValue = 0.01
          [Root].RootProportion.FixedValue = 0.1
          [Stover].Cover.Expanding.SigCoverFunction.Xo.FixedValue = 750
          [Stover].Cover.Expanding.SigCoverFunction.Ymax.FixedValue = 0.8
          [Stover].Cover.Expanding.SigCoverFunction.b.FixedValue = 120
          [Stover].MaximumNConc.FixedValue = 0.04
          [Stover].MinimumNConc.FixedValue = 0.04
          [Stover].XoBiomass.FixedValue = 1800.0
          [Stover].bBiomass.FixedValue = 360.0
      Cultivar Clover_2ndyear
        Command:
          [Nodule].FixationMetabolicCost.FixedValue = 0
          [Nodule].FixationRate.FixedValue = 1000
          [Phenology].CanopyExpanding.Target.FixedValue = 1249.0
          [Phenology].Senescing.Target.FixedValue = 300
          [Phenology].YieldIncreasing.Target.FixedValue = 551.0
          [Product].DryMatterContent.FixedValue = 0.85
          [Product].ExpectedYield.FixedValue = 60
          [Product].HarvestIndex.FixedValue = 0.09
          [Product].MaximumNConc.FixedValue = 0.037
          [Product].MinimumNConc.FixedValue = 0.0245
          [Root].KLModifier.XYPairs.Y = 1,1,1,1,1,1,1,0.779,0.607,0.472,0.368,0.287,0.223,0.174,0.135,0.105,0.082,0.064,0,0,0,0,0,0,0,0,0,0,0,0
          [Root].MaximumNConc.FixedValue = 0.01
          [Root].MaximumRootDepth.FixedValue = 900
          [Root].MinimumNConc.FixedValue = 0.01
          [Root].RootProportion.FixedValue = 0.1
          [Stover].Cover.Expanding.SigCoverFunction.Xo.FixedValue = 300
          [Stover].Cover.Expanding.SigCoverFunction.Ymax.FixedValue = 0.96
          [Stover].Cover.Expanding.SigCoverFunction.b.FixedValue = 120
          [Stover].MaximumNConc.FixedValue = 0.04
          [Stover].MinimumNConc.FixedValue = 0.04
          [Stover].XoBiomass.FixedValue = 1050.0
          [Stover].bBiomass.FixedValue = 210.0
      Cultivar Corn_Salad
        Command:
          [Nodule].FixationMetabolicCost.FixedValue = 0
          [Nodule].FixationRate.FixedValue = 0
          [Phenology].CanopyExpanding.Target.FixedValue = 1461.0
          [Phenology].Senescing.Target.FixedValue = 600
          [Phenology].YieldIncreasing.Target.FixedValue = 939.0
          [Product].DryMatterContent.FixedValue = 0.87
          [Product].ExpectedYield.FixedValue = 100
          [Product].HarvestIndex.FixedValue = 0.1
          [Product].MaximumNConc.FixedValue = 0.0205
          [Product].MinimumNConc.FixedValue = 0.01
          [Root].KLModifier.XYPairs.Y = 1,1,1,1,1,1,1,0.779,0.607,0.472,0.368,0.287,0.223,0.174,0.135,0.105,0.082,0.064,0,0,0,0,0,0,0,0,0,0,0,0
          [Root].MaximumNConc.FixedValue = 0.01
          [Root].MaximumRootDepth.FixedValue = 900
          [Root].MinimumNConc.FixedValue = 0.01
          [Root].RootProportion.FixedValue = 0.1
          [Stover].Cover.Expanding.SigCoverFunction.Xo.FixedValue = 540
          [Stover].Cover.Expanding.SigCoverFunction.Ymax.FixedValue = 0.96
          [Stover].Cover.Expanding.SigCoverFunction.b.FixedValue = 120
          [Stover].MaximumNConc.FixedValue = 0.0069
          [Stover].MinimumNConc.FixedValue = 0.0069
          [Stover].XoBiomass.FixedValue = 1500.0
          [Stover].bBiomass.FixedValue = 300.0
      Cultivar Dried_Beans
        Command:
          [Nodule].FixationMetabolicCost.FixedValue = 0
          [Nodule].FixationRate.FixedValue = 1000
          [Phenology].CanopyExpanding.Target.FixedValue = 755.0
          [Phenology].Senescing.Target.FixedValue = 300
          [Phenology].YieldIncreasing.Target.FixedValue = 595.0
          [Product].DryMatterContent.FixedValue = 0.86
          [Product].ExpectedYield.FixedValue = 350
          [Product].HarvestIndex.FixedValue = 0.5
          [Product].MaximumNConc.FixedValue = 0.035
          [Product].MinimumNConc.FixedValue = 0.0245
          [Root].KLModifier.XYPairs.Y = 1,1,1,1,1,1,1,0.687,0.472,0.325,0.223,0.153,0.105,0.072,0,0,0,0,0,0,0,0,0,0,0,0,0,0,0,0
          [Root].MaximumNConc.FixedValue = 0.015
          [Root].MaximumRootDepth.FixedValue = 700
          [Root].MinimumNConc.FixedValue = 0.015
          [Root].RootProportion.FixedValue = 0.1
          [Stover].Cover.Expanding.SigCoverFunction.Xo.FixedValue = 690
          [Stover].Cover.Expanding.SigCoverFunction.Ymax.FixedValue = 0.96
          [Stover].Cover.Expanding.SigCoverFunction.b.FixedValue = 60
          [Stover].MaximumNConc.FixedValue = 0.02
          [Stover].MinimumNConc.FixedValue = 0.02
          [Stover].XoBiomass.FixedValue = 825.0
          [Stover].bBiomass.FixedValue = 165.0
      Cultivar Dried_Peas
        Command:
          [Nodule].FixationMetabolicCost.FixedValue = 0
          [Nodule].FixationRate.FixedValue = 1000
          [Phenology].CanopyExpanding.Target.FixedValue = 755.0
          [Phenology].Senescing.Target.FixedValue = 300
          [Phenology].YieldIncreasing.Target.FixedValue = 595.0
          [Product].DryMatterContent.FixedValue = 0.86
          [Product].ExpectedYield.FixedValue = 350
          [Product].HarvestIndex.FixedValue = 0.5
          [Product].MaximumNConc.FixedValue = 0.035
          [Product].MinimumNConc.FixedValue = 0.0245
          [Root].KLModifier.XYPairs.Y = 1,1,1,1,1,1,1,0.846,0.717,0.607,0.513,0.435,0.368,0.311,0.264,0.223,0.189,0.16,0.135,0.115,0.097,0.082,0.069,0.059,0,0,0,0,0,0
          [Root].MaximumNConc.FixedValue = 0.015
          [Root].MaximumRootDepth.FixedValue = 1200
          [Root].MinimumNConc.FixedValue = 0.015
          [Root].RootProportion.FixedValue = 0.1
          [Stover].Cover.Expanding.SigCoverFunction.Xo.FixedValue = 690
          [Stover].Cover.Expanding.SigCoverFunction.Ymax.FixedValue = 0.96
          [Stover].Cover.Expanding.SigCoverFunction.b.FixedValue = 60
          [Stover].MaximumNConc.FixedValue = 0.02
          [Stover].MinimumNConc.FixedValue = 0.02
          [Stover].XoBiomass.FixedValue = 825.0
          [Stover].bBiomass.FixedValue = 165.0
      Cultivar Green_Beans
        Command:
          [Nodule].FixationMetabolicCost.FixedValue = 0
          [Nodule].FixationRate.FixedValue = 1000
          [Phenology].CanopyExpanding.Target.FixedValue = 782.0
          [Phenology].Senescing.Target.FixedValue = 300
          [Phenology].YieldIncreasing.Target.FixedValue = 568.0
          [Product].DryMatterContent.FixedValue = 0.21
          [Product].ExpectedYield.FixedValue = 800
          [Product].HarvestIndex.FixedValue = 0.45
          [Product].MaximumNConc.FixedValue = 0.035
          [Product].MinimumNConc.FixedValue = 0.0245
          [Root].KLModifier.XYPairs.Y = 1,1,1,1,1,1,1,0.687,0.472,0.325,0.223,0.153,0.105,0.072,0,0,0,0,0,0,0,0,0,0,0,0,0,0,0,0
          [Root].MaximumNConc.FixedValue = 0.015
          [Root].MaximumRootDepth.FixedValue = 700
          [Root].MinimumNConc.FixedValue = 0.015
          [Root].RootProportion.FixedValue = 0.1
          [Stover].Cover.Expanding.SigCoverFunction.Xo.FixedValue = 690
          [Stover].Cover.Expanding.SigCoverFunction.Ymax.FixedValue = 0.8
          [Stover].Cover.Expanding.SigCoverFunction.b.FixedValue = 60
          [Stover].MaximumNConc.FixedValue = 0.03
          [Stover].MinimumNConc.FixedValue = 0.03
          [Stover].XoBiomass.FixedValue = 825.0
          [Stover].bBiomass.FixedValue = 165.0
      Cultivar Green_Peas
        Command:
          [Nodule].FixationMetabolicCost.FixedValue = 0
          [Nodule].FixationRate.FixedValue = 1000
          [Phenology].CanopyExpanding.Target.FixedValue = 782.0
          [Phenology].Senescing.Target.FixedValue = 300
          [Phenology].YieldIncreasing.Target.FixedValue = 568.0
          [Product].DryMatterContent.FixedValue = 0.21
          [Product].ExpectedYield.FixedValue = 800
          [Product].HarvestIndex.FixedValue = 0.45
          [Product].MaximumNConc.FixedValue = 0.035
          [Product].MinimumNConc.FixedValue = 0.0245
          [Root].KLModifier.XYPairs.Y = 1,1,1,1,1,1,1,0.846,0.717,0.607,0.513,0.435,0.368,0.311,0.264,0.223,0.189,0.16,0.135,0.115,0.097,0.082,0.069,0.059,0,0,0,0,0,0
          [Root].MaximumNConc.FixedValue = 0.015
          [Root].MaximumRootDepth.FixedValue = 1200
          [Root].MinimumNConc.FixedValue = 0.015
          [Root].RootProportion.FixedValue = 0.1
          [Stover].Cover.Expanding.SigCoverFunction.Xo.FixedValue = 690
          [Stover].Cover.Expanding.SigCoverFunction.Ymax.FixedValue = 0.96
          [Stover].Cover.Expanding.SigCoverFunction.b.FixedValue = 60
          [Stover].MaximumNConc.FixedValue = 0.03
          [Stover].MinimumNConc.FixedValue = 0.03
          [Stover].XoBiomass.FixedValue = 825.0
          [Stover].bBiomass.FixedValue = 165.0
      Cultivar FodderBeet
        Command:
          [Nodule].FixationMetabolicCost.FixedValue = 0
          [Nodule].FixationRate.FixedValue = 0
          [Phenology].CanopyExpanding.Target.FixedValue = 1150.0
          [Phenology].Senescing.Target.FixedValue = 0
          [Phenology].YieldIncreasing.Target.FixedValue = 1850.0
          [Product].DryMatterContent.FixedValue = 0.16
          [Product].ExpectedYield.FixedValue = 12000
          [Product].HarvestIndex.FixedValue = 0.7
          [Product].MaximumNConc.FixedValue = 0.025
          [Product].MinimumNConc.FixedValue = 0.15
          [Root].KLModifier.XYPairs.Y = 1,1,1,1,1,1,1,0.946,0.895,0.846,0.801,0.757,0.717,0.678,0.641,0.607,0.574,0.543,0.513,0.486,0.459,0.435,0.411,0.389,0.368,0.348,0.329,0.311,0.295,0.279
          [Root].MaximumNConc.FixedValue = 0.008
          [Root].MaximumRootDepth.FixedValue = 3000
          [Root].MinimumNConc.FixedValue = 0.008
          [Root].RootProportion.FixedValue = 0.1
          [Stover].Cover.Expanding.SigCoverFunction.Xo.FixedValue = 867
          [Stover].Cover.Expanding.SigCoverFunction.Ymax.FixedValue = 0.96
          [Stover].Cover.Expanding.SigCoverFunction.b.FixedValue = 141
          [Stover].MaximumNConc.FixedValue = 0.01
          [Stover].MinimumNConc.FixedValue = 0.01
          [Stover].XoBiomass.FixedValue = 1500.0
          [Stover].bBiomass.FixedValue = 300.0
      Cultivar Italian_Ryegrass
        Command:
          [Nodule].FixationMetabolicCost.FixedValue = 0
          [Nodule].FixationRate.FixedValue = 0
          [Phenology].CanopyExpanding.Target.FixedValue = 1590.0
          [Phenology].Senescing.Target.FixedValue = 450
          [Phenology].YieldIncreasing.Target.FixedValue = 660.0
          [Product].DryMatterContent.FixedValue = 0.85
          [Product].ExpectedYield.FixedValue = 350
          [Product].HarvestIndex.FixedValue = 0.15
          [Product].MaximumNConc.FixedValue = 0.0205
          [Product].MinimumNConc.FixedValue = 0.01
          [Root].KLModifier.XYPairs.Y = 1,1,1,1,1,1,1,0.807,0.651,0.526,0.424,0.343,0.276,0.223,0.18,0.145,0.117,0.095,0.076,0.062,0,0,0,0,0,0,0,0,0,0
          [Root].MaximumNConc.FixedValue = 0.01
          [Root].MaximumRootDepth.FixedValue = 1000
          [Root].MinimumNConc.FixedValue = 0.01
          [Root].RootProportion.FixedValue = 0.1
          [Stover].Cover.Expanding.SigCoverFunction.Xo.FixedValue = 540
          [Stover].Cover.Expanding.SigCoverFunction.Ymax.FixedValue = 0.96
          [Stover].Cover.Expanding.SigCoverFunction.b.FixedValue = 120
          [Stover].MaximumNConc.FixedValue = 0.0069
          [Stover].MinimumNConc.FixedValue = 0.0069
          [Stover].XoBiomass.FixedValue = 900.0
          [Stover].bBiomass.FixedValue = 180.0
      Cultivar Kale
        Command:
          [Nodule].FixationMetabolicCost.FixedValue = 0
          [Nodule].FixationRate.FixedValue = 0
          [Phenology].CanopyExpanding.Target.FixedValue = 1150.0
          [Phenology].Senescing.Target.FixedValue = 0
          [Phenology].YieldIncreasing.Target.FixedValue = 1850.0
          [Product].DryMatterContent.FixedValue = 0.16
          [Product].ExpectedYield.FixedValue = 7500
          [Product].HarvestIndex.FixedValue = 0.7
          [Product].MaximumNConc.FixedValue = 0.03
          [Product].MinimumNConc.FixedValue = 0.02
          [Root].KLModifier.XYPairs.Y = 1,1,1,1,1,1,1,0.946,0.895,0.846,0.801,0.757,0.717,0.678,0.641,0.607,0.574,0.543,0.513,0.486,0.459,0.435,0.411,0.389,0.368,0.348,0.329,0.311,0.295,0.279
          [Root].MaximumNConc.FixedValue = 0.008
          [Root].MaximumRootDepth.FixedValue = 3000
          [Root].MinimumNConc.FixedValue = 0.008
          [Root].RootProportion.FixedValue = 0.1
          [Stover].Cover.Expanding.SigCoverFunction.Xo.FixedValue = 867
          [Stover].Cover.Expanding.SigCoverFunction.Ymax.FixedValue = 0.96
          [Stover].Cover.Expanding.SigCoverFunction.b.FixedValue = 141
          [Stover].MaximumNConc.FixedValue = 0.01
          [Stover].MinimumNConc.FixedValue = 0.01
          [Stover].XoBiomass.FixedValue = 1500.0
          [Stover].bBiomass.FixedValue = 300.0
      Cultivar Kumara
        Command:
          [Nodule].FixationMetabolicCost.FixedValue = 0
          [Nodule].FixationRate.FixedValue = 0
          [Phenology].CanopyExpanding.Target.FixedValue = 716.0
          [Phenology].Senescing.Target.FixedValue = 750
          [Phenology].YieldIncreasing.Target.FixedValue = 1234.0
          [Product].DryMatterContent.FixedValue = 0.23
          [Product].ExpectedYield.FixedValue = 5000
          [Product].HarvestIndex.FixedValue = 0.89
          [Product].MaximumNConc.FixedValue = 0.018
          [Product].MinimumNConc.FixedValue = 0.0126
          [Root].KLModifier.XYPairs.Y = 1,1,1,1,1,1,1,0.472,0.223,0.105,0,0,0,0,0,0,0,0,0,0,0,0,0,0,0,0,0,0,0,0
          [Root].MaximumNConc.FixedValue = 0.01
          [Root].MaximumRootDepth.FixedValue = 500
          [Root].MinimumNConc.FixedValue = 0.01
          [Root].RootProportion.FixedValue = 0.1
          [Stover].Cover.Expanding.SigCoverFunction.Xo.FixedValue = 690
          [Stover].Cover.Expanding.SigCoverFunction.Ymax.FixedValue = 0.96
          [Stover].Cover.Expanding.SigCoverFunction.b.FixedValue = 120
          [Stover].MaximumNConc.FixedValue = 0.02
          [Stover].MinimumNConc.FixedValue = 0.02
          [Stover].XoBiomass.FixedValue = 1350.0
          [Stover].bBiomass.FixedValue = 270.0
      Cultivar Lentils: same as Replacements.SCRUM.Dried_Beans
      Cultivar Lettuce
        Command:
          [Nodule].FixationMetabolicCost.FixedValue = 0
          [Nodule].FixationRate.FixedValue = 0
          [Phenology].CanopyExpanding.Target.FixedValue = 1299.0
          [Phenology].Senescing.Target.FixedValue = 600
          [Phenology].YieldIncreasing.Target.FixedValue = 2001.0
          [Product].DryMatterContent.FixedValue = 0.05
          [Product].ExpectedYield.FixedValue = 5000
          [Product].HarvestIndex.FixedValue = 0.8
          [Product].MaximumNConc.FixedValue = 0.026
          [Product].MinimumNConc.FixedValue = 0.0182
          [Root].KLModifier.XYPairs.Y = 1,1,1,1,1,1,1,0.472,0.223,0.105,0,0,0,0,0,0,0,0,0,0,0,0,0,0,0,0,0,0,0,0
          [Root].MaximumNConc.FixedValue = 0.009
          [Root].MaximumRootDepth.FixedValue = 500
          [Root].MinimumNConc.FixedValue = 0.009
          [Root].RootProportion.FixedValue = 0.1
          [Stover].Cover.Expanding.SigCoverFunction.Xo.FixedValue = 360
          [Stover].Cover.Expanding.SigCoverFunction.Ymax.FixedValue = 0.8
          [Stover].Cover.Expanding.SigCoverFunction.b.FixedValue = 120
          [Stover].MaximumNConc.FixedValue = 0.03
          [Stover].MinimumNConc.FixedValue = 0.03
          [Stover].XoBiomass.FixedValue = 1950.0
          [Stover].bBiomass.FixedValue = 390.0
      Cultivar Linseed
        Command:
          [Nodule].FixationMetabolicCost.FixedValue = 0
          [Nodule].FixationRate.FixedValue = 0
          [Phenology].CanopyExpanding.Target.FixedValue = 1564.0
          [Phenology].Senescing.Target.FixedValue = 300
          [Phenology].YieldIncreasing.Target.FixedValue = 1107.0
          [Product].DryMatterContent.FixedValue = 0.87
          [Product].ExpectedYield.FixedValue = 300
          [Product].HarvestIndex.FixedValue = 0.3
          [Product].MaximumNConc.FixedValue = 0.03
          [Product].MinimumNConc.FixedValue = 0.0091
          [Root].KLModifier.XYPairs.Y = 1,1,1,1,1,1,1,0.807,0.651,0.526,0.424,0.343,0.276,0.223,0.18,0.145,0.117,0.095,0.076,0.062,0,0,0,0,0,0,0,0,0,0
          [Root].MaximumNConc.FixedValue = 0.009
          [Root].MaximumRootDepth.FixedValue = 1000
          [Root].MinimumNConc.FixedValue = 0.009
          [Root].RootProportion.FixedValue = 0.1
          [Stover].Cover.Expanding.SigCoverFunction.Xo.FixedValue = 540
          [Stover].Cover.Expanding.SigCoverFunction.Ymax.FixedValue = 0.96
          [Stover].Cover.Expanding.SigCoverFunction.b.FixedValue = 120
          [Stover].MaximumNConc.FixedValue = 0.015
          [Stover].MinimumNConc.FixedValue = 0.01
          [Stover].XoBiomass.FixedValue = 1470.0
          [Stover].bBiomass.FixedValue = 294.0
      Cultivar Lupins
        Command:
          [Nodule].FixationMetabolicCost.FixedValue = 0
          [Nodule].FixationRate.FixedValue = 1000
          [Phenology].CanopyExpanding.Target.FixedValue = 420.0
          [Phenology].Senescing.Target.FixedValue = 0
          [Phenology].YieldIncreasing.Target.FixedValue = 1230.0
          [Product].DryMatterContent.FixedValue = 1.0
          [Product].ExpectedYield.FixedValue = 1200
          [Product].HarvestIndex.FixedValue = 0.9
          [Product].MaximumNConc.FixedValue = 0.03
          [Product].MinimumNConc.FixedValue = 0.021
          [Root].KLModifier.XYPairs.Y = 1,1,1,1,1,1,1,0.687,0.472,0.325,0.223,0.153,0.105,0.072,0,0,0,0,0,0,0,0,0,0,0,0,0,0,0,0
          [Root].MaximumNConc.FixedValue = 0.015
          [Root].MaximumRootDepth.FixedValue = 700
          [Root].MinimumNConc.FixedValue = 0.015
          [Root].RootProportion.FixedValue = 0.1
          [Stover].Cover.Expanding.SigCoverFunction.Xo.FixedValue = 690
          [Stover].Cover.Expanding.SigCoverFunction.Ymax.FixedValue = 0.96
          [Stover].Cover.Expanding.SigCoverFunction.b.FixedValue = 60
          [Stover].MaximumNConc.FixedValue = 0.03
          [Stover].MinimumNConc.FixedValue = 0.03
          [Stover].XoBiomass.FixedValue = 825.0
          [Stover].bBiomass.FixedValue = 165.0
      Cultivar Maize_Long
        Command:
          [Nodule].FixationMetabolicCost.FixedValue = 0
          [Nodule].FixationRate.FixedValue = 0
          [Phenology].CanopyExpanding.Target.FixedValue = 1923.0
          [Phenology].Senescing.Target.FixedValue = 1800
          [Phenology].YieldIncreasing.Target.FixedValue = 477.0
          [Product].DryMatterContent.FixedValue = 0.87
          [Product].ExpectedYield.FixedValue = 1350
          [Product].HarvestIndex.FixedValue = 0.5
          [Product].MaximumNConc.FixedValue = 0.014
          [Product].MinimumNConc.FixedValue = 0.0098
          [Root].KLModifier.XYPairs.Y = 1,1,1,1,1,1,1,0.882,0.779,0.687,0.607,0.535,0.472,0.417,0.368,0.325,0.287,0.253,0.223,0.197,0.174,0.153,0.135,0.119,0.105,0.093,0.082,0.072,0.064,0.056
          [Root].MaximumNConc.FixedValue = 0.007
          [Root].MaximumRootDepth.FixedValue = 1500
          [Root].MinimumNConc.FixedValue = 0.007
          [Root].RootProportion.FixedValue = 0.1
          [Stover].Cover.Expanding.SigCoverFunction.Xo.FixedValue = 1050
          [Stover].Cover.Expanding.SigCoverFunction.Ymax.FixedValue = 0.92
          [Stover].Cover.Expanding.SigCoverFunction.b.FixedValue = 180
          [Stover].MaximumNConc.FixedValue = 0.007
          [Stover].MinimumNConc.FixedValue = 0.007
          [Stover].XoBiomass.FixedValue = 2100.0
          [Stover].bBiomass.FixedValue = 420.0
      Cultivar Maize_Med
        Command:
          [Nodule].FixationMetabolicCost.FixedValue = 0
          [Nodule].FixationRate.FixedValue = 0
          [Phenology].CanopyExpanding.Target.FixedValue = 1785.0
          [Phenology].Senescing.Target.FixedValue = 1650
          [Phenology].YieldIncreasing.Target.FixedValue = 465.0
          [Product].DryMatterContent.FixedValue = 0.87
          [Product].ExpectedYield.FixedValue = 1330
          [Product].HarvestIndex.FixedValue = 0.5
          [Product].MaximumNConc.FixedValue = 0.014
          [Product].MinimumNConc.FixedValue = 0.0098
          [Root].KLModifier.XYPairs.Y = 1,1,1,1,1,1,1,0.882,0.779,0.687,0.607,0.535,0.472,0.417,0.368,0.325,0.287,0.253,0.223,0.197,0.174,0.153,0.135,0.119,0.105,0.093,0.082,0.072,0.064,0.056
          [Root].MaximumNConc.FixedValue = 0.007
          [Root].MaximumRootDepth.FixedValue = 1500
          [Root].MinimumNConc.FixedValue = 0.007
          [Root].RootProportion.FixedValue = 0.1
          [Stover].Cover.Expanding.SigCoverFunction.Xo.FixedValue = 960
          [Stover].Cover.Expanding.SigCoverFunction.Ymax.FixedValue = 0.85
          [Stover].Cover.Expanding.SigCoverFunction.b.FixedValue = 180
          [Stover].MaximumNConc.FixedValue = 0.007
          [Stover].MinimumNConc.FixedValue = 0.007
          [Stover].XoBiomass.FixedValue = 1950.0
          [Stover].bBiomass.FixedValue = 390.0
      Cultivar Maize_Short
        Command:
          [Nodule].FixationMetabolicCost.FixedValue = 0
          [Nodule].FixationRate.FixedValue = 0
          [Phenology].CanopyExpanding.Target.FixedValue = 1648.0
          [Phenology].Senescing.Target.FixedValue = 1500
          [Phenology].YieldIncreasing.Target.FixedValue = 452.0
          [Product].DryMatterContent.FixedValue = 0.87
          [Product].ExpectedYield.FixedValue = 1220
          [Product].HarvestIndex.FixedValue = 0.5
          [Product].MaximumNConc.FixedValue = 0.014
          [Product].MinimumNConc.FixedValue = 0.0098
          [Root].KLModifier.XYPairs.Y = 1,1,1,1,1,1,1,0.882,0.779,0.687,0.607,0.535,0.472,0.417,0.368,0.325,0.287,0.253,0.223,0.197,0.174,0.153,0.135,0.119,0.105,0.093,0.082,0.072,0.064,0.056
          [Root].MaximumNConc.FixedValue = 0.007
          [Root].MaximumRootDepth.FixedValue = 1500
          [Root].MinimumNConc.FixedValue = 0.007
          [Root].RootProportion.FixedValue = 0.1
          [Stover].Cover.Expanding.SigCoverFunction.Xo.FixedValue = 900
          [Stover].Cover.Expanding.SigCoverFunction.Ymax.FixedValue = 0.75
          [Stover].Cover.Expanding.SigCoverFunction.b.FixedValue = 180
          [Stover].MaximumNConc.FixedValue = 0.007
          [Stover].MinimumNConc.FixedValue = 0.007
          [Stover].XoBiomass.FixedValue = 1800.0
          [Stover].bBiomass.FixedValue = 360.0
      Cultivar Maizesilage
        Command:
          [Nodule].FixationMetabolicCost.FixedValue = 0
          [Nodule].FixationRate.FixedValue = 0
          [Phenology].CanopyExpanding.Target.FixedValue = 652.0
          [Phenology].Senescing.Target.FixedValue = 1350
          [Phenology].YieldIncreasing.Target.FixedValue = 1598.0
          [Product].DryMatterContent.FixedValue = 0.35
          [Product].ExpectedYield.FixedValue = 5000
          [Product].HarvestIndex.FixedValue = 0.95
          [Product].MaximumNConc.FixedValue = 0.014
          [Product].MinimumNConc.FixedValue = 0.0098
          [Root].KLModifier.XYPairs.Y = 1,1,1,1,1,1,1,0.882,0.779,0.687,0.607,0.535,0.472,0.417,0.368,0.325,0.287,0.253,0.223,0.197,0.174,0.153,0.135,0.119,0.105,0.093,0.082,0.072,0.064,0.056
          [Root].MaximumNConc.FixedValue = 0.007
          [Root].MaximumRootDepth.FixedValue = 1500
          [Root].MinimumNConc.FixedValue = 0.007
          [Root].RootProportion.FixedValue = 0.1
          [Stover].Cover.Expanding.SigCoverFunction.Xo.FixedValue = 960
          [Stover].Cover.Expanding.SigCoverFunction.Ymax.FixedValue = 0.85
          [Stover].Cover.Expanding.SigCoverFunction.b.FixedValue = 180
          [Stover].MaximumNConc.FixedValue = 0.007
          [Stover].MinimumNConc.FixedValue = 0.007
          [Stover].XoBiomass.FixedValue = 1800.0
          [Stover].bBiomass.FixedValue = 360.0
      Cultivar Mustard
        Command:
          [Nodule].FixationMetabolicCost.FixedValue = 0
          [Nodule].FixationRate.FixedValue = 0
          [Phenology].CanopyExpanding.Target.FixedValue = 420.0
          [Phenology].Senescing.Target.FixedValue = 0
          [Phenology].YieldIncreasing.Target.FixedValue = 1230.0
          [Product].DryMatterContent.FixedValue = 1.0
          [Product].ExpectedYield.FixedValue = 700
          [Product].HarvestIndex.FixedValue = 0.9
          [Product].MaximumNConc.FixedValue = 0.03
          [Product].MinimumNConc.FixedValue = 0.021
          [Root].KLModifier.XYPairs.Y = 1,1,1,1,1,1,1,0.687,0.472,0.325,0.223,0.153,0.105,0.072,0,0,0,0,0,0,0,0,0,0,0,0,0,0,0,0
          [Root].MaximumNConc.FixedValue = 0.01
          [Root].MaximumRootDepth.FixedValue = 700
          [Root].MinimumNConc.FixedValue = 0.01
          [Root].RootProportion.FixedValue = 0.1
          [Stover].Cover.Expanding.SigCoverFunction.Xo.FixedValue = 690
          [Stover].Cover.Expanding.SigCoverFunction.Ymax.FixedValue = 0.96
          [Stover].Cover.Expanding.SigCoverFunction.b.FixedValue = 60
          [Stover].MaximumNConc.FixedValue = 0.03
          [Stover].MinimumNConc.FixedValue = 0.03
          [Stover].XoBiomass.FixedValue = 825.0
          [Stover].bBiomass.FixedValue = 165.0
      Cultivar Mustard_Seed
        Command:
          [Nodule].FixationMetabolicCost.FixedValue = 0
          [Nodule].FixationRate.FixedValue = 0
          [Phenology].CanopyExpanding.Target.FixedValue = 1737.0
          [Phenology].Senescing.Target.FixedValue = 300
          [Phenology].YieldIncreasing.Target.FixedValue = 904.0
          [Product].DryMatterContent.FixedValue = 0.84
          [Product].ExpectedYield.FixedValue = 100
          [Product].HarvestIndex.FixedValue = 0.1
          [Product].MaximumNConc.FixedValue = 0.03
          [Product].MinimumNConc.FixedValue = 0.02
          [Root].KLModifier.XYPairs.Y = 1,1,1,1,1,1,1,0.807,0.651,0.526,0.424,0.343,0.276,0.223,0.18,0.145,0.117,0.095,0.076,0.062,0,0,0,0,0,0,0,0,0,0
          [Root].MaximumNConc.FixedValue = 0.008
          [Root].MaximumRootDepth.FixedValue = 1000
          [Root].MinimumNConc.FixedValue = 0.008
          [Root].RootProportion.FixedValue = 0.1
          [Stover].Cover.Expanding.SigCoverFunction.Xo.FixedValue = 540
          [Stover].Cover.Expanding.SigCoverFunction.Ymax.FixedValue = 0.96
          [Stover].Cover.Expanding.SigCoverFunction.b.FixedValue = 120
          [Stover].MaximumNConc.FixedValue = 0.015
          [Stover].MinimumNConc.FixedValue = 0.01
          [Stover].XoBiomass.FixedValue = 1470.0
          [Stover].bBiomass.FixedValue = 294.0
      Cultivar Oats&Rye
        Command:
          [Nodule].FixationMetabolicCost.FixedValue = 0
          [Nodule].FixationRate.FixedValue = 0
          [Phenology].CanopyExpanding.Target.FixedValue = 458.0
          [Phenology].Senescing.Target.FixedValue = 0
          [Phenology].YieldIncreasing.Target.FixedValue = 1342.0
          [Product].DryMatterContent.FixedValue = 1.0
          [Product].ExpectedYield.FixedValue = 1000
          [Product].HarvestIndex.FixedValue = 0.9
          [Product].MaximumNConc.FixedValue = 0.012
          [Product].MinimumNConc.FixedValue = 0.0084
          [Root].KLModifier.XYPairs.Y = 1,1,1,1,1,1,1,0.807,0.651,0.526,0.424,0.343,0.276,0.223,0.18,0.145,0.117,0.095,0.076,0.062,0,0,0,0,0,0,0,0,0,0
          [Root].MaximumNConc.FixedValue = 0.009
          [Root].MaximumRootDepth.FixedValue = 1000
          [Root].MinimumNConc.FixedValue = 0.009
          [Root].RootProportion.FixedValue = 0.1
          [Stover].Cover.Expanding.SigCoverFunction.Xo.FixedValue = 540
          [Stover].Cover.Expanding.SigCoverFunction.Ymax.FixedValue = 0.96
          [Stover].Cover.Expanding.SigCoverFunction.b.FixedValue = 120
          [Stover].MaximumNConc.FixedValue = 0.012
          [Stover].MinimumNConc.FixedValue = 0.012
          [Stover].XoBiomass.FixedValue = 900.0
          [Stover].bBiomass.FixedValue = 180.0
      Cultivar Oats_Autumn
        Command:
          [Nodule].FixationMetabolicCost.FixedValue = 0
          [Nodule].FixationRate.FixedValue = 0
          [Phenology].CanopyExpanding.Target.FixedValue = 1546.0
          [Phenology].Senescing.Target.FixedValue = 600
          [Phenology].YieldIncreasing.Target.FixedValue = 854.0
          [Product].DryMatterContent.FixedValue = 0.87
          [Product].ExpectedYield.FixedValue = 800
          [Product].HarvestIndex.FixedValue = 0.32
          [Product].MaximumNConc.FixedValue = 0.013
          [Product].MinimumNConc.FixedValue = 0.0091
          [Root].KLModifier.XYPairs.Y = 1,1,1,1,1,1,1,0.882,0.779,0.687,0.607,0.535,0.472,0.417,0.368,0.325,0.287,0.253,0.223,0.197,0.174,0.153,0.135,0.119,0.105,0.093,0.082,0.072,0.064,0.056
          [Root].MaximumNConc.FixedValue = 0.009
          [Root].MaximumRootDepth.FixedValue = 1500
          [Root].MinimumNConc.FixedValue = 0.009
          [Root].RootProportion.FixedValue = 0.1
          [Stover].Cover.Expanding.SigCoverFunction.Xo.FixedValue = 540
          [Stover].Cover.Expanding.SigCoverFunction.Ymax.FixedValue = 0.96
          [Stover].Cover.Expanding.SigCoverFunction.b.FixedValue = 120
          [Stover].MaximumNConc.FixedValue = 0.005
          [Stover].MinimumNConc.FixedValue = 0.005
          [Stover].XoBiomass.FixedValue = 1500.0
          [Stover].bBiomass.FixedValue = 300.0
      Cultivar Oats_AutumnForage
        Command:
          [Nodule].FixationMetabolicCost.FixedValue = 0
          [Nodule].FixationRate.FixedValue = 0
          [Phenology].CanopyExpanding.Target.FixedValue = 543.0
          [Phenology].Senescing.Target.FixedValue = 600
          [Phenology].YieldIncreasing.Target.FixedValue = 1857.0
          [Product].DryMatterContent.FixedValue = 0.4
          [Product].ExpectedYield.FixedValue = 3000
          [Product].HarvestIndex.FixedValue = 0.95
          [Product].MaximumNConc.FixedValue = 0.016
          [Product].MinimumNConc.FixedValue = 0.0091
          [Root].KLModifier.XYPairs.Y = 1,1,1,1,1,1,1,0.882,0.779,0.687,0.607,0.535,0.472,0.417,0.368,0.325,0.287,0.253,0.223,0.197,0.174,0.153,0.135,0.119,0.105,0.093,0.082,0.072,0.064,0.056
          [Root].MaximumNConc.FixedValue = 0.009
          [Root].MaximumRootDepth.FixedValue = 1500
          [Root].MinimumNConc.FixedValue = 0.009
          [Root].RootProportion.FixedValue = 0.1
          [Stover].Cover.Expanding.SigCoverFunction.Xo.FixedValue = 540
          [Stover].Cover.Expanding.SigCoverFunction.Ymax.FixedValue = 0.96
          [Stover].Cover.Expanding.SigCoverFunction.b.FixedValue = 120
          [Stover].MaximumNConc.FixedValue = 0.005
          [Stover].MinimumNConc.FixedValue = 0.005
          [Stover].XoBiomass.FixedValue = 1500.0
          [Stover].bBiomass.FixedValue = 300.0
      Cultivar Oats_Spring
        Command:
          [Nodule].FixationMetabolicCost.FixedValue = 0
          [Nodule].FixationRate.FixedValue = 0
          [Phenology].CanopyExpanding.Target.FixedValue = 848.0
          [Phenology].Senescing.Target.FixedValue = 300
          [Phenology].YieldIncreasing.Target.FixedValue = 652.0
          [Product].DryMatterContent.FixedValue = 0.87
          [Product].ExpectedYield.FixedValue = 800
          [Product].HarvestIndex.FixedValue = 0.46
          [Product].MaximumNConc.FixedValue = 0.015
          [Product].MinimumNConc.FixedValue = 0.005
          [Root].KLModifier.XYPairs.Y = 1,1,1,1,1,1,1,0.807,0.651,0.526,0.424,0.343,0.276,0.223,0.18,0.145,0.117,0.095,0.076,0.062,0,0,0,0,0,0,0,0,0,0
          [Root].MaximumNConc.FixedValue = 0.009
          [Root].MaximumRootDepth.FixedValue = 1000
          [Root].MinimumNConc.FixedValue = 0.009
          [Root].RootProportion.FixedValue = 0.1
          [Stover].Cover.Expanding.SigCoverFunction.Xo.FixedValue = 540
          [Stover].Cover.Expanding.SigCoverFunction.Ymax.FixedValue = 0.96
          [Stover].Cover.Expanding.SigCoverFunction.b.FixedValue = 120
          [Stover].MaximumNConc.FixedValue = 0.005
          [Stover].MinimumNConc.FixedValue = 0.0045
          [Stover].XoBiomass.FixedValue = 900.0
          [Stover].bBiomass.FixedValue = 180.0
      Cultivar Oats_SpringForage
        Command:
          [Nodule].FixationMetabolicCost.FixedValue = 0
          [Nodule].FixationRate.FixedValue = 0
          [Phenology].CanopyExpanding.Target.FixedValue = 326.0
          [Phenology].Senescing.Target.FixedValue = 300
          [Phenology].YieldIncreasing.Target.FixedValue = 1174.0
          [Product].DryMatterContent.FixedValue = 0.4
          [Product].ExpectedYield.FixedValue = 2000
          [Product].HarvestIndex.FixedValue = 0.95
          [Product].MaximumNConc.FixedValue = 0.016
          [Product].MinimumNConc.FixedValue = 0.0091
          [Root].KLModifier.XYPairs.Y = 1,1,1,1,1,1,1,0.882,0.779,0.687,0.607,0.535,0.472,0.417,0.368,0.325,0.287,0.253,0.223,0.197,0.174,0.153,0.135,0.119,0.105,0.093,0.082,0.072,0.064,0.056
          [Root].MaximumNConc.FixedValue = 0.009
          [Root].MaximumRootDepth.FixedValue = 1500
          [Root].MinimumNConc.FixedValue = 0.009
          [Root].RootProportion.FixedValue = 0.1
          [Stover].Cover.Expanding.SigCoverFunction.Xo.FixedValue = 540
          [Stover].Cover.Expanding.SigCoverFunction.Ymax.FixedValue = 0.96
          [Stover].Cover.Expanding.SigCoverFunction.b.FixedValue = 120
          [Stover].MaximumNConc.FixedValue = 0.006
          [Stover].MinimumNConc.FixedValue = 0.005
          [Stover].XoBiomass.FixedValue = 900.0
          [Stover].bBiomass.FixedValue = 180.0
      Cultivar Onions_Autumn
        Command:
          [Nodule].FixationMetabolicCost.FixedValue = 0
          [Nodule].FixationRate.FixedValue = 0
          [Phenology].CanopyExpanding.Target.FixedValue = 899.0
          [Phenology].Senescing.Target.FixedValue = 750
          [Phenology].YieldIncreasing.Target.FixedValue = 1051.0
          [Product].DryMatterContent.FixedValue = 0.11
          [Product].ExpectedYield.FixedValue = 8000
          [Product].HarvestIndex.FixedValue = 0.8
          [Product].MaximumNConc.FixedValue = 0.014
          [Product].MinimumNConc.FixedValue = 0.0098
          [Root].KLModifier.XYPairs.Y = 1,1,1,1,1,1,1,0.223,0,0,0,0,0,0,0,0,0,0,0,0,0,0,0,0,0,0,0,0,0,0
          [Root].MaximumNConc.FixedValue = 0.01
          [Root].MaximumRootDepth.FixedValue = 400
          [Root].MinimumNConc.FixedValue = 0.01
          [Root].RootProportion.FixedValue = 0.1
          [Stover].Cover.Expanding.SigCoverFunction.Xo.FixedValue = 780
          [Stover].Cover.Expanding.SigCoverFunction.Ymax.FixedValue = 0.8
          [Stover].Cover.Expanding.SigCoverFunction.b.FixedValue = 120
          [Stover].MaximumNConc.FixedValue = 0.02
          [Stover].MinimumNConc.FixedValue = 0.02
          [Stover].XoBiomass.FixedValue = 1350.0
          [Stover].bBiomass.FixedValue = 270.0
      Cultivar Onions_Spring
        Command:
          [Nodule].FixationMetabolicCost.FixedValue = 0
          [Nodule].FixationRate.FixedValue = 0
          [Phenology].CanopyExpanding.Target.FixedValue = 733.0
          [Phenology].Senescing.Target.FixedValue = 750
          [Phenology].YieldIncreasing.Target.FixedValue = 717.0
          [Product].DryMatterContent.FixedValue = 0.11
          [Product].ExpectedYield.FixedValue = 7000
          [Product].HarvestIndex.FixedValue = 0.8
          [Product].MaximumNConc.FixedValue = 0.014
          [Product].MinimumNConc.FixedValue = 0.0098
          [Root].KLModifier.XYPairs.Y = 1,1,1,1,1,1,1,0.223,0,0,0,0,0,0,0,0,0,0,0,0,0,0,0,0,0,0,0,0,0,0
          [Root].MaximumNConc.FixedValue = 0.01
          [Root].MaximumRootDepth.FixedValue = 400
          [Root].MinimumNConc.FixedValue = 0.01
          [Root].RootProportion.FixedValue = 0.1
          [Stover].Cover.Expanding.SigCoverFunction.Xo.FixedValue = 780
          [Stover].Cover.Expanding.SigCoverFunction.Ymax.FixedValue = 0.8
          [Stover].Cover.Expanding.SigCoverFunction.b.FixedValue = 120
          [Stover].MaximumNConc.FixedValue = 0.02
          [Stover].MinimumNConc.FixedValue = 0.02
          [Stover].XoBiomass.FixedValue = 1100.0
          [Stover].bBiomass.FixedValue = 220.0
      Cultivar PakChoi_Seed
        Command:
          [Nodule].FixationMetabolicCost.FixedValue = 0
          [Nodule].FixationRate.FixedValue = 0
          [Phenology].CanopyExpanding.Target.FixedValue = 939.0
          [Phenology].Senescing.Target.FixedValue = 300
          [Phenology].YieldIncreasing.Target.FixedValue = 561.0
          [Product].DryMatterContent.FixedValue = 0.84
          [Product].ExpectedYield.FixedValue = 200
          [Product].HarvestIndex.FixedValue = 0.3
          [Product].MaximumNConc.FixedValue = 0.03
          [Product].MinimumNConc.FixedValue = 0.02
          [Root].KLModifier.XYPairs.Y = 1,1,1,1,1,1,1,0.807,0.651,0.526,0.424,0.343,0.276,0.223,0.18,0.145,0.117,0.095,0.076,0.062,0,0,0,0,0,0,0,0,0,0
          [Root].MaximumNConc.FixedValue = 0.008
          [Root].MaximumRootDepth.FixedValue = 1000
          [Root].MinimumNConc.FixedValue = 0.008
          [Root].RootProportion.FixedValue = 0.1
          [Stover].Cover.Expanding.SigCoverFunction.Xo.FixedValue = 540
          [Stover].Cover.Expanding.SigCoverFunction.Ymax.FixedValue = 0.96
          [Stover].Cover.Expanding.SigCoverFunction.b.FixedValue = 120
          [Stover].MaximumNConc.FixedValue = 0.02
          [Stover].MinimumNConc.FixedValue = 0.02
          [Stover].XoBiomass.FixedValue = 900.0
          [Stover].bBiomass.FixedValue = 180.0
      Cultivar Parsnips
        Command:
          [Nodule].FixationMetabolicCost.FixedValue = 0
          [Nodule].FixationRate.FixedValue = 0
          [Phenology].CanopyExpanding.Target.FixedValue = 489.0
          [Phenology].Senescing.Target.FixedValue = 750
          [Phenology].YieldIncreasing.Target.FixedValue = 1461.0
          [Product].DryMatterContent.FixedValue = 0.17
          [Product].ExpectedYield.FixedValue = 4400
          [Product].HarvestIndex.FixedValue = 0.95
          [Product].MaximumNConc.FixedValue = 0.014
          [Product].MinimumNConc.FixedValue = 0.0098
          [Root].KLModifier.XYPairs.Y = 1,1,1,1,1,1,1,0.472,0.223,0.105,0,0,0,0,0,0,0,0,0,0,0,0,0,0,0,0,0,0,0,0
          [Root].MaximumNConc.FixedValue = 0.01
          [Root].MaximumRootDepth.FixedValue = 500
          [Root].MinimumNConc.FixedValue = 0.01
          [Root].RootProportion.FixedValue = 0.1
          [Stover].Cover.Expanding.SigCoverFunction.Xo.FixedValue = 690
          [Stover].Cover.Expanding.SigCoverFunction.Ymax.FixedValue = 0.95
          [Stover].Cover.Expanding.SigCoverFunction.b.FixedValue = 120
          [Stover].MaximumNConc.FixedValue = 0.02
          [Stover].MinimumNConc.FixedValue = 0.02
          [Stover].XoBiomass.FixedValue = 1350.0
          [Stover].bBiomass.FixedValue = 270.0
      Cultivar Phacelia
        Command:
          [Nodule].FixationMetabolicCost.FixedValue = 0
          [Nodule].FixationRate.FixedValue = 0
          [Phenology].CanopyExpanding.Target.FixedValue = 420.0
          [Phenology].Senescing.Target.FixedValue = 0
          [Phenology].YieldIncreasing.Target.FixedValue = 1230.0
          [Product].DryMatterContent.FixedValue = 1.0
          [Product].ExpectedYield.FixedValue = 500
          [Product].HarvestIndex.FixedValue = 0.9
          [Product].MaximumNConc.FixedValue = 0.03
          [Product].MinimumNConc.FixedValue = 0.021
          [Root].KLModifier.XYPairs.Y = 1,1,1,1,1,1,1,0.687,0.472,0.325,0.223,0.153,0.105,0.072,0,0,0,0,0,0,0,0,0,0,0,0,0,0,0,0
          [Root].MaximumNConc.FixedValue = 0.01
          [Root].MaximumRootDepth.FixedValue = 700
          [Root].MinimumNConc.FixedValue = 0.01
          [Root].RootProportion.FixedValue = 0.1
          [Stover].Cover.Expanding.SigCoverFunction.Xo.FixedValue = 690
          [Stover].Cover.Expanding.SigCoverFunction.Ymax.FixedValue = 0.96
          [Stover].Cover.Expanding.SigCoverFunction.b.FixedValue = 60
          [Stover].MaximumNConc.FixedValue = 0.03
          [Stover].MinimumNConc.FixedValue = 0.03
          [Stover].XoBiomass.FixedValue = 825.0
          [Stover].bBiomass.FixedValue = 165.0
      Cultivar Plantain_Seed
        Command:
          [Nodule].FixationMetabolicCost.FixedValue = 0
          [Nodule].FixationRate.FixedValue = 0
          [Phenology].CanopyExpanding.Target.FixedValue = 2070.0
          [Phenology].Senescing.Target.FixedValue = 300
          [Phenology].YieldIncreasing.Target.FixedValue = 1361.0
          [Product].DryMatterContent.FixedValue = 0.85
          [Product].ExpectedYield.FixedValue = 200
          [Product].HarvestIndex.FixedValue = 0.15
          [Product].MaximumNConc.FixedValue = 0.03
          [Product].MinimumNConc.FixedValue = 0.0105
          [Root].KLModifier.XYPairs.Y = 1,1,1,1,1,1,1,0.807,0.651,0.526,0.424,0.343,0.276,0.223,0.18,0.145,0.117,0.095,0.076,0.062,0,0,0,0,0,0,0,0,0,0
          [Root].MaximumNConc.FixedValue = 0.01
          [Root].MaximumRootDepth.FixedValue = 1000
          [Root].MinimumNConc.FixedValue = 0.01
          [Root].RootProportion.FixedValue = 0.1
          [Stover].Cover.Expanding.SigCoverFunction.Xo.FixedValue = 690
          [Stover].Cover.Expanding.SigCoverFunction.Ymax.FixedValue = 0.95
          [Stover].Cover.Expanding.SigCoverFunction.b.FixedValue = 120
          [Stover].MaximumNConc.FixedValue = 0.012
          [Stover].MinimumNConc.FixedValue = 0.01
          [Stover].XoBiomass.FixedValue = 1866.0
          [Stover].bBiomass.FixedValue = 370.0
      Cultivar Potatoes_Long
        Command:
          [Nodule].FixationMetabolicCost.FixedValue = 0
          [Nodule].FixationRate.FixedValue = 0
          [Phenology].CanopyExpanding.Target.FixedValue = 690.0
          [Phenology].Senescing.Target.FixedValue = 600
          [Phenology].YieldIncreasing.Target.FixedValue = 1560.0
          [Product].DryMatterContent.FixedValue = 0.22
          [Product].ExpectedYield.FixedValue = 7100
          [Product].HarvestIndex.FixedValue = 0.911
          [Product].MaximumNConc.FixedValue = 0.018
          [Product].MinimumNConc.FixedValue = 0.0126
          [Root].KLModifier.XYPairs.Y = 1,1,1,1,1,1,1,0.807,0.651,0.526,0.424,0.343,0.276,0.223,0.18,0.145,0.117,0.095,0.076,0.062,0,0,0,0,0,0,0,0,0,0
          [Root].MaximumNConc.FixedValue = 0.01
          [Root].MaximumRootDepth.FixedValue = 1000
          [Root].MinimumNConc.FixedValue = 0.01
          [Root].RootProportion.FixedValue = 0.1
          [Stover].Cover.Expanding.SigCoverFunction.Xo.FixedValue = 690
          [Stover].Cover.Expanding.SigCoverFunction.Ymax.FixedValue = 0.96
          [Stover].Cover.Expanding.SigCoverFunction.b.FixedValue = 60
          [Stover].MaximumNConc.FixedValue = 0.02
          [Stover].MinimumNConc.FixedValue = 0.02
          [Stover].XoBiomass.FixedValue = 1425.0
          [Stover].bBiomass.FixedValue = 285.0
      Cultivar Potatoes_Medium
        Command:
          [Nodule].FixationMetabolicCost.FixedValue = 0
          [Nodule].FixationRate.FixedValue = 0
          [Phenology].CanopyExpanding.Target.FixedValue = 638.0
          [Phenology].Senescing.Target.FixedValue = 600
          [Phenology].YieldIncreasing.Target.FixedValue = 1312.0
          [Product].DryMatterContent.FixedValue = 0.22
          [Product].ExpectedYield.FixedValue = 6400
          [Product].HarvestIndex.FixedValue = 0.904
          [Product].MaximumNConc.FixedValue = 0.018
          [Product].MinimumNConc.FixedValue = 0.0126
          [Root].KLModifier.XYPairs.Y = 1,1,1,1,1,1,1,0.807,0.651,0.526,0.424,0.343,0.276,0.223,0.18,0.145,0.117,0.095,0.076,0.062,0,0,0,0,0,0,0,0,0,0
          [Root].MaximumNConc.FixedValue = 0.01
          [Root].MaximumRootDepth.FixedValue = 1000
          [Root].MinimumNConc.FixedValue = 0.01
          [Root].RootProportion.FixedValue = 0.1
          [Stover].Cover.Expanding.SigCoverFunction.Xo.FixedValue = 690
          [Stover].Cover.Expanding.SigCoverFunction.Ymax.FixedValue = 0.96
          [Stover].Cover.Expanding.SigCoverFunction.b.FixedValue = 60
          [Stover].MaximumNConc.FixedValue = 0.02
          [Stover].MinimumNConc.FixedValue = 0.02
          [Stover].XoBiomass.FixedValue = 1275.0
          [Stover].bBiomass.FixedValue = 255.0
      Cultivar Potatoes_Short
        Command:
          [Nodule].FixationMetabolicCost.FixedValue = 0
          [Nodule].FixationRate.FixedValue = 0
          [Phenology].CanopyExpanding.Target.FixedValue = 590.0
          [Phenology].Senescing.Target.FixedValue = 600
          [Phenology].YieldIncreasing.Target.FixedValue = 1060.0
          [Product].DryMatterContent.FixedValue = 0.23
          [Product].ExpectedYield.FixedValue = 5300
          [Product].HarvestIndex.FixedValue = 0.893
          [Product].MaximumNConc.FixedValue = 0.018
          [Product].MinimumNConc.FixedValue = 0.0126
          [Root].KLModifier.XYPairs.Y = 1,1,1,1,1,1,1,0.807,0.651,0.526,0.424,0.343,0.276,0.223,0.18,0.145,0.117,0.095,0.076,0.062,0,0,0,0,0,0,0,0,0,0
          [Root].MaximumNConc.FixedValue = 0.01
          [Root].MaximumRootDepth.FixedValue = 1000
          [Root].MinimumNConc.FixedValue = 0.01
          [Root].RootProportion.FixedValue = 0.1
          [Stover].Cover.Expanding.SigCoverFunction.Xo.FixedValue = 690
          [Stover].Cover.Expanding.SigCoverFunction.Ymax.FixedValue = 0.96
          [Stover].Cover.Expanding.SigCoverFunction.b.FixedValue = 60
          [Stover].MaximumNConc.FixedValue = 0.02
          [Stover].MinimumNConc.FixedValue = 0.02
          [Stover].XoBiomass.FixedValue = 1125.0
          [Stover].bBiomass.FixedValue = 225.0
      Cultivar Radish_Seed
        Command:
          [Nodule].FixationMetabolicCost.FixedValue = 0
          [Nodule].FixationRate.FixedValue = 0
          [Phenology].CanopyExpanding.Target.FixedValue = 1737.0
          [Phenology].Senescing.Target.FixedValue = 300
          [Phenology].YieldIncreasing.Target.FixedValue = 904.0
          [Product].DryMatterContent.FixedValue = 0.84
          [Product].ExpectedYield.FixedValue = 170
          [Product].HarvestIndex.FixedValue = 0.16
          [Product].MaximumNConc.FixedValue = 0.049
          [Product].MinimumNConc.FixedValue = 0.02
          [Root].KLModifier.XYPairs.Y = 1,1,1,1,1,1,1,0.807,0.651,0.526,0.424,0.343,0.276,0.223,0.18,0.145,0.117,0.095,0.076,0.062,0,0,0,0,0,0,0,0,0,0
          [Root].MaximumNConc.FixedValue = 0.008
          [Root].MaximumRootDepth.FixedValue = 1000
          [Root].MinimumNConc.FixedValue = 0.008
          [Root].RootProportion.FixedValue = 0.1
          [Stover].Cover.Expanding.SigCoverFunction.Xo.FixedValue = 540
          [Stover].Cover.Expanding.SigCoverFunction.Ymax.FixedValue = 0.96
          [Stover].Cover.Expanding.SigCoverFunction.b.FixedValue = 120
          [Stover].MaximumNConc.FixedValue = 0.0102
          [Stover].MinimumNConc.FixedValue = 0.006
          [Stover].XoBiomass.FixedValue = 1470.0
          [Stover].bBiomass.FixedValue = 294.0
      Cultivar Rape
        Command:
          [Nodule].FixationMetabolicCost.FixedValue = 0
          [Nodule].FixationRate.FixedValue = 0
          [Phenology].CanopyExpanding.Target.FixedValue = 999.0
          [Phenology].Senescing.Target.FixedValue = 0
          [Phenology].YieldIncreasing.Target.FixedValue = 2001.0
          [Product].DryMatterContent.FixedValue = 0.13
          [Product].ExpectedYield.FixedValue = 4615
          [Product].HarvestIndex.FixedValue = 0.8
          [Product].MaximumNConc.FixedValue = 0.037
          [Product].MinimumNConc.FixedValue = 0.02
          [Root].KLModifier.XYPairs.Y = 1,1,1,1,1,1,1,0.931,0.867,0.807,0.751,0.7,0.651,0.607,0.565,0.526,0.49,0.456,0.424,0.395,0.368,0.343,0.319,0.297,0.276,0.257,0.24,0.223,0.208,0.193
          [Root].MaximumNConc.FixedValue = 0.008
          [Root].MaximumRootDepth.FixedValue = 2400
          [Root].MinimumNConc.FixedValue = 0.008
          [Root].RootProportion.FixedValue = 0.1
          [Stover].Cover.Expanding.SigCoverFunction.Xo.FixedValue = 770
          [Stover].Cover.Expanding.SigCoverFunction.Ymax.FixedValue = 0.96
          [Stover].Cover.Expanding.SigCoverFunction.b.FixedValue = 57
          [Stover].MaximumNConc.FixedValue = 0.01
          [Stover].MinimumNConc.FixedValue = 0.01
          [Stover].XoBiomass.FixedValue = 1500.0
          [Stover].bBiomass.FixedValue = 300.0
      Cultivar Rape_Seed
        Command:
          [Nodule].FixationMetabolicCost.FixedValue = 0
          [Nodule].FixationRate.FixedValue = 0
          [Phenology].CanopyExpanding.Target.FixedValue = 1465.0
          [Phenology].Senescing.Target.FixedValue = 300
          [Phenology].YieldIncreasing.Target.FixedValue = 716.0
          [Product].DryMatterContent.FixedValue = 0.84
          [Product].ExpectedYield.FixedValue = 170
          [Product].HarvestIndex.FixedValue = 0.1
          [Product].MaximumNConc.FixedValue = 0.037
          [Product].MinimumNConc.FixedValue = 0.02
          [Root].KLModifier.XYPairs.Y = 1,1,1,1,1,1,1,0.807,0.651,0.526,0.424,0.343,0.276,0.223,0.18,0.145,0.117,0.095,0.076,0.062,0,0,0,0,0,0,0,0,0,0
          [Root].MaximumNConc.FixedValue = 0.008
          [Root].MaximumRootDepth.FixedValue = 1000
          [Root].MinimumNConc.FixedValue = 0.008
          [Root].RootProportion.FixedValue = 0.1
          [Stover].Cover.Expanding.SigCoverFunction.Xo.FixedValue = 540
          [Stover].Cover.Expanding.SigCoverFunction.Ymax.FixedValue = 0.96
          [Stover].Cover.Expanding.SigCoverFunction.b.FixedValue = 120
          [Stover].MaximumNConc.FixedValue = 0.02
          [Stover].MinimumNConc.FixedValue = 0.02
          [Stover].XoBiomass.FixedValue = 1240.0
          [Stover].bBiomass.FixedValue = 248.0
      Cultivar RyeCorn_Autumn
        Command:
          [Nodule].FixationMetabolicCost.FixedValue = 0
          [Nodule].FixationRate.FixedValue = 0
          [Phenology].CanopyExpanding.Target.FixedValue = 543.0
          [Phenology].Senescing.Target.FixedValue = 600
          [Phenology].YieldIncreasing.Target.FixedValue = 1857.0
          [Product].DryMatterContent.FixedValue = 0.4
          [Product].ExpectedYield.FixedValue = 3000
          [Product].HarvestIndex.FixedValue = 0.95
          [Product].MaximumNConc.FixedValue = 0.013
          [Product].MinimumNConc.FixedValue = 0.0091
          [Root].KLModifier.XYPairs.Y = 1,1,1,1,1,1,1,0.882,0.779,0.687,0.607,0.535,0.472,0.417,0.368,0.325,0.287,0.253,0.223,0.197,0.174,0.153,0.135,0.119,0.105,0.093,0.082,0.072,0.064,0.056
          [Root].MaximumNConc.FixedValue = 0.009
          [Root].MaximumRootDepth.FixedValue = 1500
          [Root].MinimumNConc.FixedValue = 0.009
          [Root].RootProportion.FixedValue = 0.1
          [Stover].Cover.Expanding.SigCoverFunction.Xo.FixedValue = 540
          [Stover].Cover.Expanding.SigCoverFunction.Ymax.FixedValue = 0.96
          [Stover].Cover.Expanding.SigCoverFunction.b.FixedValue = 120
          [Stover].MaximumNConc.FixedValue = 0.005
          [Stover].MinimumNConc.FixedValue = 0.005
          [Stover].XoBiomass.FixedValue = 1500.0
          [Stover].bBiomass.FixedValue = 300.0
      Cultivar RyeCorn_Spring
        Command:
          [Nodule].FixationMetabolicCost.FixedValue = 0
          [Nodule].FixationRate.FixedValue = 0
          [Phenology].CanopyExpanding.Target.FixedValue = 326.0
          [Phenology].Senescing.Target.FixedValue = 300
          [Phenology].YieldIncreasing.Target.FixedValue = 1174.0
          [Product].DryMatterContent.FixedValue = 0.4
          [Product].ExpectedYield.FixedValue = 2000
          [Product].HarvestIndex.FixedValue = 0.95
          [Product].MaximumNConc.FixedValue = 0.02
          [Product].MinimumNConc.FixedValue = 0.0091
          [Root].KLModifier.XYPairs.Y = 1,1,1,1,1,1,1,0.882,0.779,0.687,0.607,0.535,0.472,0.417,0.368,0.325,0.287,0.253,0.223,0.197,0.174,0.153,0.135,0.119,0.105,0.093,0.082,0.072,0.064,0.056
          [Root].MaximumNConc.FixedValue = 0.009
          [Root].MaximumRootDepth.FixedValue = 1500
          [Root].MinimumNConc.FixedValue = 0.009
          [Root].RootProportion.FixedValue = 0.1
          [Stover].Cover.Expanding.SigCoverFunction.Xo.FixedValue = 540
          [Stover].Cover.Expanding.SigCoverFunction.Ymax.FixedValue = 0.96
          [Stover].Cover.Expanding.SigCoverFunction.b.FixedValue = 120
          [Stover].MaximumNConc.FixedValue = 0.005
          [Stover].MinimumNConc.FixedValue = 0.005
          [Stover].XoBiomass.FixedValue = 900.0
          [Stover].bBiomass.FixedValue = 180.0
      Cultivar Ryegrass_1styear
        Command:
          [Nodule].FixationMetabolicCost.FixedValue = 0
          [Nodule].FixationRate.FixedValue = 0
          [Phenology].CanopyExpanding.Target.FixedValue = 1590.0
          [Phenology].Senescing.Target.FixedValue = 450
          [Phenology].YieldIncreasing.Target.FixedValue = 660.0
          [Product].DryMatterContent.FixedValue = 0.85
          [Product].ExpectedYield.FixedValue = 150
          [Product].HarvestIndex.FixedValue = 0.105
          [Product].MaximumNConc.FixedValue = 0.02
          [Product].MinimumNConc.FixedValue = 0.0105
          [Root].KLModifier.XYPairs.Y = 1,1,1,1,1,1,1,0.807,0.651,0.526,0.424,0.343,0.276,0.223,0.18,0.145,0.117,0.095,0.076,0.062,0,0,0,0,0,0,0,0,0,0
          [Root].MaximumNConc.FixedValue = 0.01
          [Root].MaximumRootDepth.FixedValue = 1000
          [Root].MinimumNConc.FixedValue = 0.01
          [Root].RootProportion.FixedValue = 0.1
          [Stover].Cover.Expanding.SigCoverFunction.Xo.FixedValue = 540
          [Stover].Cover.Expanding.SigCoverFunction.Ymax.FixedValue = 0.96
          [Stover].Cover.Expanding.SigCoverFunction.b.FixedValue = 120
          [Stover].MaximumNConc.FixedValue = 0.015
          [Stover].MinimumNConc.FixedValue = 0.015
          [Stover].XoBiomass.FixedValue = 1350.0
          [Stover].bBiomass.FixedValue = 270.0
      Cultivar Ryegrass_2ndyear
        Command:
          [Nodule].FixationMetabolicCost.FixedValue = 0
          [Nodule].FixationRate.FixedValue = 0
          [Phenology].CanopyExpanding.Target.FixedValue = 1237.0
          [Phenology].Senescing.Target.FixedValue = 300
          [Phenology].YieldIncreasing.Target.FixedValue = 563.0
          [Product].DryMatterContent.FixedValue = 0.85
          [Product].ExpectedYield.FixedValue = 150
          [Product].HarvestIndex.FixedValue = 0.105
          [Product].MaximumNConc.FixedValue = 0.02
          [Product].MinimumNConc.FixedValue = 0.0105
          [Root].KLModifier.XYPairs.Y = 1,1,1,1,1,1,1,0.807,0.651,0.526,0.424,0.343,0.276,0.223,0.18,0.145,0.117,0.095,0.076,0.062,0,0,0,0,0,0,0,0,0,0
          [Root].MaximumNConc.FixedValue = 0.01
          [Root].MaximumRootDepth.FixedValue = 1000
          [Root].MinimumNConc.FixedValue = 0.01
          [Root].RootProportion.FixedValue = 0.1
          [Stover].Cover.Expanding.SigCoverFunction.Xo.FixedValue = 300
          [Stover].Cover.Expanding.SigCoverFunction.Ymax.FixedValue = 0.96
          [Stover].Cover.Expanding.SigCoverFunction.b.FixedValue = 120
          [Stover].MaximumNConc.FixedValue = 0.015
          [Stover].MinimumNConc.FixedValue = 0.015
          [Stover].XoBiomass.FixedValue = 1050.0
          [Stover].bBiomass.FixedValue = 210.0
      Cultivar Spinach
        Command:
          [Nodule].FixationMetabolicCost.FixedValue = 0
          [Nodule].FixationRate.FixedValue = 0
          [Phenology].CanopyExpanding.Target.FixedValue = 1150.0
          [Phenology].Senescing.Target.FixedValue = 900
          [Phenology].YieldIncreasing.Target.FixedValue = 950.0
          [Product].DryMatterContent.FixedValue = 0.05
          [Product].ExpectedYield.FixedValue = 2200
          [Product].HarvestIndex.FixedValue = 0.7
          [Product].MaximumNConc.FixedValue = 0.03
          [Product].MinimumNConc.FixedValue = 0.021
          [Root].KLModifier.XYPairs.Y = 1,1,1,1,1,1,1,0.472,0.223,0.105,0,0,0,0,0,0,0,0,0,0,0,0,0,0,0,0,0,0,0,0
          [Root].MaximumNConc.FixedValue = 0.009
          [Root].MaximumRootDepth.FixedValue = 500
          [Root].MinimumNConc.FixedValue = 0.009
          [Root].RootProportion.FixedValue = 0.1
          [Stover].Cover.Expanding.SigCoverFunction.Xo.FixedValue = 360
          [Stover].Cover.Expanding.SigCoverFunction.Ymax.FixedValue = 0.8
          [Stover].Cover.Expanding.SigCoverFunction.b.FixedValue = 120
          [Stover].MaximumNConc.FixedValue = 0.015
          [Stover].MinimumNConc.FixedValue = 0.015
          [Stover].XoBiomass.FixedValue = 1500.0
          [Stover].bBiomass.FixedValue = 300.0
      Cultivar Spinach_Seed
        Command:
          [Nodule].FixationMetabolicCost.FixedValue = 0
          [Nodule].FixationRate.FixedValue = 0
          [Phenology].CanopyExpanding.Target.FixedValue = 1534.0
          [Phenology].Senescing.Target.FixedValue = 300
          [Phenology].YieldIncreasing.Target.FixedValue = 1107.0
          [Product].DryMatterContent.FixedValue = 0.84
          [Product].ExpectedYield.FixedValue = 300
          [Product].HarvestIndex.FixedValue = 0.3
          [Product].MaximumNConc.FixedValue = 0.037
          [Product].MinimumNConc.FixedValue = 0.02
          [Root].KLModifier.XYPairs.Y = 1,1,1,1,1,1,1,0.807,0.651,0.526,0.424,0.343,0.276,0.223,0.18,0.145,0.117,0.095,0.076,0.062,0,0,0,0,0,0,0,0,0,0
          [Root].MaximumNConc.FixedValue = 0.008
          [Root].MaximumRootDepth.FixedValue = 1000
          [Root].MinimumNConc.FixedValue = 0.008
          [Root].RootProportion.FixedValue = 0.1
          [Stover].Cover.Expanding.SigCoverFunction.Xo.FixedValue = 540
          [Stover].Cover.Expanding.SigCoverFunction.Ymax.FixedValue = 0.96
          [Stover].Cover.Expanding.SigCoverFunction.b.FixedValue = 120
          [Stover].MaximumNConc.FixedValue = 0.02
          [Stover].MinimumNConc.FixedValue = 0.02
          [Stover].XoBiomass.FixedValue = 1470.0
          [Stover].bBiomass.FixedValue = 294.0
      Cultivar SpringOnion_seed
        Command:
          [Nodule].FixationMetabolicCost.FixedValue = 0
          [Nodule].FixationRate.FixedValue = 0
          [Phenology].CanopyExpanding.Target.FixedValue = 1737.0
          [Phenology].Senescing.Target.FixedValue = 300
          [Phenology].YieldIncreasing.Target.FixedValue = 904.0
          [Product].DryMatterContent.FixedValue = 0.84
          [Product].ExpectedYield.FixedValue = 170
          [Product].HarvestIndex.FixedValue = 0.15
          [Product].MaximumNConc.FixedValue = 0.03
          [Product].MinimumNConc.FixedValue = 0.02
          [Root].KLModifier.XYPairs.Y = 1,1,1,1,1,1,1,0.807,0.651,0.526,0.424,0.343,0.276,0.223,0.18,0.145,0.117,0.095,0.076,0.062,0,0,0,0,0,0,0,0,0,0
          [Root].MaximumNConc.FixedValue = 0.008
          [Root].MaximumRootDepth.FixedValue = 1000
          [Root].MinimumNConc.FixedValue = 0.008
          [Root].RootProportion.FixedValue = 0.1
          [Stover].Cover.Expanding.SigCoverFunction.Xo.FixedValue = 540
          [Stover].Cover.Expanding.SigCoverFunction.Ymax.FixedValue = 0.96
          [Stover].Cover.Expanding.SigCoverFunction.b.FixedValue = 120
          [Stover].MaximumNConc.FixedValue = 0.02
          [Stover].MinimumNConc.FixedValue = 0.02
          [Stover].XoBiomass.FixedValue = 1470.0
          [Stover].bBiomass.FixedValue = 294.0
      Cultivar Squash
        Command:
          [Nodule].FixationMetabolicCost.FixedValue = 0
          [Nodule].FixationRate.FixedValue = 0
          [Phenology].CanopyExpanding.Target.FixedValue = 899.0
          [Phenology].Senescing.Target.FixedValue = 300
          [Phenology].YieldIncreasing.Target.FixedValue = 1501.0
          [Product].DryMatterContent.FixedValue = 0.2
          [Product].ExpectedYield.FixedValue = 2500
          [Product].HarvestIndex.FixedValue = 0.8
          [Product].MaximumNConc.FixedValue = 0.02
          [Product].MinimumNConc.FixedValue = 0.014
          [Root].KLModifier.XYPairs.Y = 1,1,1,1,1,1,1,0.472,0.223,0.105,0,0,0,0,0,0,0,0,0,0,0,0,0,0,0,0,0,0,0,0
          [Root].MaximumNConc.FixedValue = 0.01
          [Root].MaximumRootDepth.FixedValue = 500
          [Root].MinimumNConc.FixedValue = 0.01
          [Root].RootProportion.FixedValue = 0.1
          [Stover].Cover.Expanding.SigCoverFunction.Xo.FixedValue = 600
          [Stover].Cover.Expanding.SigCoverFunction.Ymax.FixedValue = 0.94
          [Stover].Cover.Expanding.SigCoverFunction.b.FixedValue = 90
          [Stover].MaximumNConc.FixedValue = 0.02
          [Stover].MinimumNConc.FixedValue = 0.02
          [Stover].XoBiomass.FixedValue = 1350.0
          [Stover].bBiomass.FixedValue = 270.0
      Cultivar Sweetcorn
        Command:
          [Nodule].FixationMetabolicCost.FixedValue = 0
          [Nodule].FixationRate.FixedValue = 0
          [Phenology].CanopyExpanding.Target.FixedValue = 794.0
          [Phenology].Senescing.Target.FixedValue = 300
          [Phenology].YieldIncreasing.Target.FixedValue = 706.0
          [Product].DryMatterContent.FixedValue = 0.55
          [Product].ExpectedYield.FixedValue = 2500
          [Product].HarvestIndex.FixedValue = 0.55
          [Product].MaximumNConc.FixedValue = 0.0165
          [Product].MinimumNConc.FixedValue = 0.0098
          [Root].KLModifier.XYPairs.Y = 1,1,1,1,1,1,1,0.807,0.651,0.526,0.424,0.343,0.276,0.223,0.18,0.145,0.117,0.095,0.076,0.062,0,0,0,0,0,0,0,0,0,0
          [Root].MaximumNConc.FixedValue = 0.007
          [Root].MaximumRootDepth.FixedValue = 1000
          [Root].MinimumNConc.FixedValue = 0.007
          [Root].RootProportion.FixedValue = 0.1
          [Stover].Cover.Expanding.SigCoverFunction.Xo.FixedValue = 540
          [Stover].Cover.Expanding.SigCoverFunction.Ymax.FixedValue = 0.75
          [Stover].Cover.Expanding.SigCoverFunction.b.FixedValue = 120
          [Stover].MaximumNConc.FixedValue = 0.009
          [Stover].MinimumNConc.FixedValue = 0.009
          [Stover].XoBiomass.FixedValue = 900.0
          [Stover].bBiomass.FixedValue = 180.0
      Cultivar Tall_Fescue
        Command:
          [Nodule].FixationMetabolicCost.FixedValue = 0
          [Nodule].FixationRate.FixedValue = 0
          [Phenology].CanopyExpanding.Target.FixedValue = 1237.0
          [Phenology].Senescing.Target.FixedValue = 300
          [Phenology].YieldIncreasing.Target.FixedValue = 563.0
          [Product].DryMatterContent.FixedValue = 0.85
          [Product].ExpectedYield.FixedValue = 200
          [Product].HarvestIndex.FixedValue = 0.105
          [Product].MaximumNConc.FixedValue = 0.02
          [Product].MinimumNConc.FixedValue = 0.0105
          [Root].KLModifier.XYPairs.Y = 1,1,1,1,1,1,1,0.807,0.651,0.526,0.424,0.343,0.276,0.223,0.18,0.145,0.117,0.095,0.076,0.062,0,0,0,0,0,0,0,0,0,0
          [Root].MaximumNConc.FixedValue = 0.01
          [Root].MaximumRootDepth.FixedValue = 1000
          [Root].MinimumNConc.FixedValue = 0.01
          [Root].RootProportion.FixedValue = 0.1
          [Stover].Cover.Expanding.SigCoverFunction.Xo.FixedValue = 300
          [Stover].Cover.Expanding.SigCoverFunction.Ymax.FixedValue = 0.96
          [Stover].Cover.Expanding.SigCoverFunction.b.FixedValue = 120
          [Stover].MaximumNConc.FixedValue = 0.018
          [Stover].MinimumNConc.FixedValue = 0.015
          [Stover].XoBiomass.FixedValue = 1050.0
          [Stover].bBiomass.FixedValue = 210.0
      Cultivar Tomato
        Command:
          [Nodule].FixationMetabolicCost.FixedValue = 0
          [Nodule].FixationRate.FixedValue = 0
          [Phenology].CanopyExpanding.Target.FixedValue = 1236.0
          [Phenology].Senescing.Target.FixedValue = 750
          [Phenology].YieldIncreasing.Target.FixedValue = 714.0
          [Product].DryMatterContent.FixedValue = 0.05
          [Product].ExpectedYield.FixedValue = 10000
          [Product].HarvestIndex.FixedValue = 0.5
          [Product].MaximumNConc.FixedValue = 0.03
          [Product].MinimumNConc.FixedValue = 0.014
          [Root].KLModifier.XYPairs.Y = 1,1,1,1,1,1,1,0.472,0.223,0.105,0,0,0,0,0,0,0,0,0,0,0,0,0,0,0,0,0,0,0,0
          [Root].MaximumNConc.FixedValue = 0.01
          [Root].MaximumRootDepth.FixedValue = 500
          [Root].MinimumNConc.FixedValue = 0.01
          [Root].RootProportion.FixedValue = 0.1
          [Stover].Cover.Expanding.SigCoverFunction.Xo.FixedValue = 690
          [Stover].Cover.Expanding.SigCoverFunction.Ymax.FixedValue = 0.96
          [Stover].Cover.Expanding.SigCoverFunction.b.FixedValue = 120
          [Stover].MaximumNConc.FixedValue = 0.02
          [Stover].MinimumNConc.FixedValue = 0.02
          [Stover].XoBiomass.FixedValue = 1350.0
          [Stover].bBiomass.FixedValue = 270.0
      Cultivar Triticalie_Autumn: same as Replacements.SCRUM.RyeCorn_Autumn
      Cultivar Triticalie_Grain
        Command:
          [Nodule].FixationMetabolicCost.FixedValue = 0
          [Nodule].FixationRate.FixedValue = 0
          [Phenology].CanopyExpanding.Target.FixedValue = 1461.0
          [Phenology].Senescing.Target.FixedValue = 600
          [Phenology].YieldIncreasing.Target.FixedValue = 939.0
          [Product].DryMatterContent.FixedValue = 0.87
          [Product].ExpectedYield.FixedValue = 1100
          [Product].HarvestIndex.FixedValue = 0.41
          [Product].MaximumNConc.FixedValue = 0.015
          [Product].MinimumNConc.FixedValue = 0.0091
          [Root].KLModifier.XYPairs.Y = 1,1,1,1,1,1,1,0.882,0.779,0.687,0.607,0.535,0.472,0.417,0.368,0.325,0.287,0.253,0.223,0.197,0.174,0.153,0.135,0.119,0.105,0.093,0.082,0.072,0.064,0.056
          [Root].MaximumNConc.FixedValue = 0.009
          [Root].MaximumRootDepth.FixedValue = 1500
          [Root].MinimumNConc.FixedValue = 0.009
          [Root].RootProportion.FixedValue = 0.1
          [Stover].Cover.Expanding.SigCoverFunction.Xo.FixedValue = 540
          [Stover].Cover.Expanding.SigCoverFunction.Ymax.FixedValue = 0.96
          [Stover].Cover.Expanding.SigCoverFunction.b.FixedValue = 120
          [Stover].MaximumNConc.FixedValue = 0.005
          [Stover].MinimumNConc.FixedValue = 0.005
          [Stover].XoBiomass.FixedValue = 1500.0
          [Stover].bBiomass.FixedValue = 300.0
      Cultivar Triticalie_Spring: same as Replacements.SCRUM.Barley_SpringForage
      Cultivar Turnip_Seed
        Command:
          [Nodule].FixationMetabolicCost.FixedValue = 0
          [Nodule].FixationRate.FixedValue = 0
          [Phenology].CanopyExpanding.Target.FixedValue = 1717.0
          [Phenology].Senescing.Target.FixedValue = 300
          [Phenology].YieldIncreasing.Target.FixedValue = 983.0
          [Product].DryMatterContent.FixedValue = 0.84
          [Product].ExpectedYield.FixedValue = 170
          [Product].HarvestIndex.FixedValue = 0.15
          [Product].MaximumNConc.FixedValue = 0.037
          [Product].MinimumNConc.FixedValue = 0.011
          [Root].KLModifier.XYPairs.Y = 1,1,1,1,1,1,1,0.882,0.779,0.687,0.607,0.535,0.472,0.417,0.368,0.325,0.287,0.253,0.223,0.197,0.174,0.153,0.135,0.119,0.105,0.093,0.082,0.072,0.064,0.056
          [Root].MaximumNConc.FixedValue = 0.008
          [Root].MaximumRootDepth.FixedValue = 1500
          [Root].MinimumNConc.FixedValue = 0.009
          [Root].RootProportion.FixedValue = 0.1
          [Stover].Cover.Expanding.SigCoverFunction.Xo.FixedValue = 540
          [Stover].Cover.Expanding.SigCoverFunction.Ymax.FixedValue = 0.96
          [Stover].Cover.Expanding.SigCoverFunction.b.FixedValue = 120
          [Stover].MaximumNConc.FixedValue = 0.01
          [Stover].MinimumNConc.FixedValue = 0.01
          [Stover].XoBiomass.FixedValue = 1500.0
          [Stover].bBiomass.FixedValue = 300.0
      Cultivar Wheat_Autumn
        Command:
          [Nodule].FixationMetabolicCost.FixedValue = 0
          [Nodule].FixationRate.FixedValue = 0
          [Phenology].CanopyExpanding.Target.FixedValue = 1461.0
          [Phenology].Senescing.Target.FixedValue = 600
          [Phenology].YieldIncreasing.Target.FixedValue = 939.0
          [Product].DryMatterContent.FixedValue = 0.87
          [Product].ExpectedYield.FixedValue = 1200
          [Product].HarvestIndex.FixedValue = 0.51
          [Product].MaximumNConc.FixedValue = 0.0205
          [Product].MinimumNConc.FixedValue = 0.01
          [Root].KLModifier.XYPairs.Y = 1,1,1,1,1,1,1,0.882,0.779,0.687,0.607,0.535,0.472,0.417,0.368,0.325,0.287,0.253,0.223,0.197,0.174,0.153,0.135,0.119,0.105,0.093,0.082,0.072,0.064,0.056
          [Root].MaximumNConc.FixedValue = 0.009
          [Root].MaximumRootDepth.FixedValue = 1500
          [Root].MinimumNConc.FixedValue = 0.009
          [Root].RootProportion.FixedValue = 0.1
          [Stover].Cover.Expanding.SigCoverFunction.Xo.FixedValue = 540
          [Stover].Cover.Expanding.SigCoverFunction.Ymax.FixedValue = 0.96
          [Stover].Cover.Expanding.SigCoverFunction.b.FixedValue = 120
          [Stover].MaximumNConc.FixedValue = 0.0069
          [Stover].MinimumNConc.FixedValue = 0.0069
          [Stover].XoBiomass.FixedValue = 1500.0
          [Stover].bBiomass.FixedValue = 300.0
      Cultivar Wheat_Spring
        Command:
          [Nodule].FixationMetabolicCost.FixedValue = 0
          [Nodule].FixationRate.FixedValue = 0
          [Phenology].CanopyExpanding.Target.FixedValue = 848.0
          [Phenology].Senescing.Target.FixedValue = 300
          [Phenology].YieldIncreasing.Target.FixedValue = 652.0
          [Product].DryMatterContent.FixedValue = 0.87
          [Product].ExpectedYield.FixedValue = 900
          [Product].HarvestIndex.FixedValue = 0.46
          [Product].MaximumNConc.FixedValue = 0.0205
          [Product].MinimumNConc.FixedValue = 0.01
          [Root].KLModifier.XYPairs.Y = 1,1,1,1,1,1,1,0.807,0.651,0.526,0.424,0.343,0.276,0.223,0.18,0.145,0.117,0.095,0.076,0.062,0,0,0,0,0,0,0,0,0,0
          [Root].MaximumNConc.FixedValue = 0.009
          [Root].MaximumRootDepth.FixedValue = 1000
          [Root].MinimumNConc.FixedValue = 0.009
          [Root].RootProportion.FixedValue = 0.1
          [Stover].Cover.Expanding.SigCoverFunction.Xo.FixedValue = 540
          [Stover].Cover.Expanding.SigCoverFunction.Ymax.FixedValue = 0.96
          [Stover].Cover.Expanding.SigCoverFunction.b.FixedValue = 120
          [Stover].MaximumNConc.FixedValue = 0.0069
          [Stover].MinimumNConc.FixedValue = 0.0069
          [Stover].XoBiomass.FixedValue = 900.0
          [Stover].bBiomass.FixedValue = 180.0
      Memo TitlePage
        # SCRUM: the Simple Crop Resource Uptake Model

        _Hamish Brown and Rob Zyskowski, Plant and Food Research, New Zealand_

        This model has been built using the Plant Modelling Framework (PMF) of [brown_plant_2014] to simulate a range of different crops in simulations where water and nitrogen balance are of interest but a fully mechanistic plant model is not needed or is not available. It is a daily time step implementation of the crop model that is used on the Overseer nutrient balance model [Cichota_etal_2010].  It uses simple sigmoidal functions for estimating daily cover and biomass deltas to give realistic water and nitrogen demands. It does not simulate potential yield, this is specified as an input. Yield will be reduced below the specified potential yield if N or water supplies from the soil are insufficient to meet demand. The model has been paramaterised for simulating water and nitrogen balances of cropping rotations in New Zealand (where over 50 different crop types are grown and it is not feasible to produce full crop models for each of these).  Because of this the model is not as generically applicable as full APSIM crop models.   It may be adapted for other purposes and other crop types may be added but the user will need to keep in mind that because it is a simple model the the parameters might need changing for crops in different locations or for crops sown at different times of the year.  Some sensibility testing or validation is recommended before application in different sutuations.

        SCRUM has a simple phenology model which divides the crop growth into three main phases; a vegetative phase when the canopy is expanding, a reproductive phase when product is being formed and a senescing phase when the canopy is contracting.  SCRUM has 4 organ classes to represent different biomass components and the real biomass components that these classes represent changes from crop to crop:
           1. A Simple leaf class called <b>Stover</b> which represents the unharvested parts of the plant.  Generally, this represents the leaf and stem components of the crop but for crops where stem and leaf are part of the harvested product (e.g forages and leafy vegetables) than stover is the residual fraction of leaf and stem that is not harvested.
           2. A Generic organ class called <b>Product</b> which represents the plant parts that are harvested and removed from the field.  This could represent grain, fruits, tubers, leaf or stem depending on what sort of crop is being represented.
           3. A Root organ which extracts water and nitrogen from the soil for plant growth and returns biomass to the soil on harvest
           4. A Nodule organ which is only activated and fixes nitrogen for the legume crops.
        An Arbitrator is also included which determines the allocation of drymatter and nitrogen biomass between each of these organs.

        #Inclusion in APSIM simulations
        A scrum crop is included in a simulation the same as any other APSIM crop
         * The SCRUM object needs to be dragged or copied from the Crop folder in the tool box into the field of your simulation.
         * It is then planted with a sowing rule
        ~~~
        SCRUM.Sow(cultivar: Wheat_Autumn, population: 1, depth: 10, rowSpacing: 150);
        ~~~
          * Note that SCRUM has no notion of population or rowSpacing but these parameters are required by the Sow method so filler values are provided
          * To specify an expected Expected Yield that differs to the defalt value provided, included the following code in a manager script to be executed on the day of sowing.
        ~~~
         zone.Set("[SCRUM].Product.ExpectedYield.Value()", ResetValue);
        ~~~
        * SCRUM can be Harvested, Cut, Grazed and Pruned like other crops.  Defalt proportions of the biomass in each organ are removed from the sysem and/or added to the fields residue pools.  Note that defalt removal fraction for product on harvest is 0 (becaue it is represented with a generic organ) so more appropriate removal fractions should be sepcified in a manager script as follows:
        ~~~
        [EventSubscribe("Commencing")]
        private void OnSimulationCommencing(object sender, EventArgs e)
        {
          Remove = new RemovalFractions(SCRUM.Organs);
        }
        [EventSubscribe("DoManagement")]
        private void OnDoManagement(object sender, EventArgs e)
        {
          if (Clock.Today.Date == HarvestDate2)
          {
            Remove.SetFractionLiveToRemove("Product", 1.0);
            Remove.SetFractionLiveToRemove("Stover", 0.05);
            Remove.SetFractionLiveToResidue("Stover",0.95)
            SCRUM.Harvest(Remove);
            SCRUM.EndCrop();
          }
        }
        ~~~
        * A Remove class as shown above can be sent with Harvest, Cut, Graze and Prune events to specificy the proportions of removals.
         * Once a crop has been ended the field is open to plant another crop using another APSIM crop model or sowing another SCRUM crop.
      Phenology
        SubDailyInterpolation ThermalTime: agregationMethod=0
          Memo Description
            Progression through each of the phenological stages is driven by thermal time.  As temperature increases from zero to 30 degrees, development acelerates and then slows down again above 30 degress
          XYPairs Response: X=[0, 30, 40]; Y=[0, 30, 0]
          ThreeHourAirTemperature InterpolationMethod
        Memo Description
          As ThermalTime accumulates the crop progresses through the following phases:
        GenericPhase Seedling: Start=Sowing; End=Seedling
          Memo Description
            The phase that runs from sowing until the seedlings are established (later that emergence)
          Constant Target: FixedValue=1000; Units=<sup>o</sup>Cd
          VariableReference Progression: VariableName=[Phenology].ThermalTime
        GenericPhase Vegetative: Start=Seedling; End=Vegetative
          Memo Description
            During the vegetative phase the crop is producing leaf and stem and closing its canopy
          Constant Target: FixedValue=600; Units=<sup>o</sup>Cd
          VariableReference Progression: VariableName=[Phenology].ThermalTime
        GenericPhase EarlyReproductive: Start=Vegetative; End=EarlyReproductive
          Memo Description
            During the early reproductive stage the crop will be flowering
          Constant Target: FixedValue=600; Units=<sup>o</sup>Cd
          VariableReference Progression: VariableName=[Phenology].ThermalTime
        GenericPhase MidReproductive: Start=EarlyReproductive; End=MidReproductive
          Constant Target: FixedValue=600; Units=<sup>o</sup>Cd
          VariableReference Progression: VariableName=[Phenology].ThermalTime
          Memo Description
            During this plant has started grain filling.
        GenericPhase LateReproductive: Start=MidReproductive; End=LateReproductive
          Constant Target: FixedValue=600; Units=<sup>o</sup>Cd
          VariableReference Progression: VariableName=[Phenology].ThermalTime
          Memo Description
            During this phase the crop is completing grain filling
        GenericPhase Maturity: Start=LateReproductive; End=Maturity
          Constant Target: FixedValue=600; Units=<sup>o</sup>Cd
          VariableReference Progression: VariableName=[Phenology].ThermalTime
          Memo Description
            Grain filling is nearly complete
        GenericPhase Ripe: Start=Maturity; End=Ripe
          Constant Target: FixedValue=600; Units=<sup>o</sup>Cd
          VariableReference Progression: VariableName=[Phenology].ThermalTime
          Memo Description
            During this phase grains are drying down to be ready for harvest
        EndPhase ReadyForHarvesting: Start=Ripe; End=Unused
          VariableReference ThermalTime: VariableName=[Phenology].ThermalTime
      OrganArbitrator Arbitrator
        BiomassTypeArbitrator DMArbitration
          Folder PotentialPartitioningMethods
            ReallocationMethod
            AllocateFixationMethod
            RetranslocationMethod
            SendPotentialDMAllocationsMethod
          Folder AllocationMethods
            NutrientConstrainedAllocationMethod
            DryMatterAllocationsMethod
          RelativeAllocation ArbitrationMethod
        BiomassTypeArbitrator NArbitration
          Folder PotentialPartitioningMethods
            ReallocationMethod
          Folder ActualPartitioningMethods
            AllocateFixationMethod
            RetranslocationMethod
          Folder AllocationMethods
            NitrogenAllocationsMethod
          RelativeAllocation ArbitrationMethod
          AllocateUptakesMethod
        WaterUptakeMethod
        NitrogenUptakeMethod
      GenericOrgan Product: IsAboveGround=true
        Memo Description
          It is the biomass that is removed from the crop at harvest and may include grain, root, leaf, stem, pod or any other organ type depending on the type of crop and how it is harvested.
        Constant MaximumNConc: FixedValue=0.012
        VariableReference CriticalNConc: VariableName=[Product].MinimumNConc
        MultiplyFunction MinimumNConc
          VariableReference MaximumNConc: VariableName=[Product].MaximumNConc
          Constant Half: FixedValue=0.7
        Constant NReallocationFactor: FixedValue=0
        Constant RemobilisationCost: FixedValue=0
        Constant ExpectedYield: FixedValue=800
          Memo Description
            This is the Product yield (g/m2 fresh weight) that SCRUM will predict provided nitrogen and water supply are non-limiting
        Constant DryMatterContent: FixedValue=0.87
          Memo Description
            This is the dry matter content of the harvested yield and is used to convert fresh yield into *DryYield* which are subsequently used in determining *Ymax* (total biomass production), daily dry matter production, *HarvestIndex* and the *PartitioningFraction* of each organ
        MultiplyFunction DryYield
          Memo Description
            This variable is the product yield of the crop in g/m2 dry weight
          VariableReference FreshYld: VariableName=[Product].ExpectedYield
          VariableReference DMPercent: VariableName=[Product].DryMatterContent
        SubtractFunction WaterContent
          Memo Description
            This is used to convert the total Dry Matter of this organ back to fresh mass once daily partitining is complete.
          Constant One: FixedValue=1
          VariableReference DMcontent: VariableName=[Product].DryMatterContent
        Constant HarvestIndex: FixedValue=0.46
          Memo Description
            This is the Product yield (g/m2 fresh weight) that SCRUM will predict provided nitrogen and water supply are non-limiting
        Constant SenescenceRate: FixedValue=0; Units=/d
        BiomassRemoval BiomassRemovalDefaults
          OrganBiomassRemovalType Harvest: FractionLiveToRemove=1; FractionDeadToRemove=1; FractionLiveToResidue=0; FractionDeadToResidue=0
          OrganBiomassRemovalType Cut: FractionLiveToRemove=1; FractionDeadToRemove=1; FractionLiveToResidue=0; FractionDeadToResidue=0
          OrganBiomassRemovalType Prune: FractionLiveToRemove=0; FractionDeadToRemove=0; FractionLiveToResidue=0; FractionDeadToResidue=0
          OrganBiomassRemovalType Graze: FractionLiveToRemove=1; FractionDeadToRemove=1; FractionLiveToResidue=0; FractionDeadToResidue=0
        Constant DetachmentRateFunction: FixedValue=0; Units=/d
        Constant MaintenanceRespirationFunction: FixedValue=0; Units=0-1
        Constant DMConversionEfficiency: FixedValue=1; Units=0-1
        Constant NRetranslocationFactor: FixedValue=0
        Constant NitrogenDemandSwitch: FixedValue=1
        Constant DMReallocationFactor: FixedValue=0
        Constant DMRetranslocationFactor: FixedValue=0
        Constant CarbonConcentration: FixedValue=0.4
        NutrientDemandFunctions DMDemands
          MultiplyFunction Structural
            PartitionFractionDemandFunction DMDemandFunction
              SubtractFunction PartitionFraction
                Constant One: FixedValue=1
                VariableReference RootFraction: VariableName=[Root].RootProportion
                VariableReference StoverFraction
                  VariableName=[Stover].DMDemands.Structural.DMDemandFunction.PartitionFraction
            Constant StructuralFraction: FixedValue=1; Units=0-1
          Constant Metabolic: FixedValue=0
          Constant Storage: FixedValue=0
          Constant QStructuralPriority: FixedValue=1
          Constant QMetabolicPriority: FixedValue=1
          Constant QStoragePriority: FixedValue=1
        NutrientDemandFunctions NDemands
          MultiplyFunction Structural
            VariableReference MinNconc: VariableName=[Product].minimumNconc
            VariableReference PotentialDMAllocation: VariableName=[Product].potentialDMAllocation.Structural
          MultiplyFunction Metabolic
            SubtractFunction MetabolicNconc
              VariableReference CritNconc: VariableName=[Product].criticalNConc
              VariableReference MinNconc: VariableName=[Product].minimumNconc
            VariableReference PotentialDMAllocation: VariableName=[Product].potentialDMAllocation.Structural
          StorageNDemandFunction Storage
            VariableReference NitrogenDemandSwitch: VariableName=[Product].nitrogenDemandSwitch
            VariableReference MaxNconc: VariableName=[Product].MaximumNconc
          Constant QStructuralPriority: FixedValue=1
          Constant QMetabolicPriority: FixedValue=1
          Constant QStoragePriority: FixedValue=1
        RetranslocateNonStructural RetranslocateNitrogen
        NutrientPoolFunctions InitialWt
          Constant Structural: FixedValue=0; Units=g/m^2
          Constant Metabolic: FixedValue=0
          Constant Storage: FixedValue=0
        Constant Photosynthesis: FixedValue=0
        VariableReference initialNConcFunction: VariableName=[Product].MaximumNConc
      SimpleLeaf Stover: Albedo=0.18; Gsmax350=0.01; R50=150; LeafInitialisationStage=Seedling; Height=0; BaseHeight=0; Width=0; FRGR=0; PotentialEP=0; WaterDemand=0; KDead=0.1; LAIDead=0
        Memo Description
          Stover represents any part of the crop that is not removed at harvest (i.e not part of the product).
        Constant StomatalConductanceCO2Modifier: FixedValue=1
        Constant NReallocationFactor: FixedValue=0
        Constant RemobilisationCost: FixedValue=0
        Constant SenescenceRate: FixedValue=0
        Constant DetachmentRate: FixedValue=0; Units=/d
        MultiplyFunction InitialWt
          Constant InitialPlantWt: FixedValue=0; Units=g/plant
          VariableReference Population: VariableName=[Plant].Population
        ExpressionFunction
        MultiplyFunction Photosynthesis
          DeltaFunction UnStressedBiomass: StartStageName=Sowing
            SigmoidFunction Integral
              VariableReference Ymax: VariableName=[Scrum].TotalDMAtHarvest
              VariableReference XValue: VariableName=[Phenology].AccumulatedEmergedTT
              Constant Xo: FixedValue=800
                Memo Description
                  Is a coefficient for the potential biomass accumulation function
              Constant b: FixedValue=200
                Memo Description
                  Is another coefficient for the potential biomass accumulation function
          LinearInterpolationFunction WaterStressFactor
            XYPairs: X=[0, 0, 0.5, 1]; Y=[0, 0, 1, 1]
            VariableReference XValue: VariableName=[Stover].Fw
        MinimumFunction FRGR
          SubDailyInterpolation FRGRFunctionTemp: agregationMethod=0
            XYPairs Response: X=[0, 10, 25, 40]; Y=[0, 1, 1, 0]
            ThreeHourAirTemperature InterpolationMethod
        PhaseLookup LaiDead
          PhaseLookupValue Expanding: Start=Sowing; End=MidReproductive
            Constant: FixedValue=0
          PhaseLookupValue Senescence: Start=MidReproductive; End=Maturity
            MultiplyFunction SenescingLAI
              HoldFunction MaxLAI: WhenToHold=MidReproductive
                VariableReference ValueToHold: VariableName=[Stover].LAI
              SubtractFunction ProportionLost
                Constant One: FixedValue=1
              DivideFunction ProportionSenesced
                SubtractFunction TTSenesce
                  VariableReference AccumulatedThermalTime: VariableName=[Phenology].AccumulatedEmergedTT
                  AddFunction ThermalTimeAtStartSenescence
                    VariableReference Seedling: VariableName=[Phenology].Seedling.Target
                    VariableReference Vegetative: VariableName=[Phenology].Vegetative.Target
                    VariableReference EarlyReproductive: VariableName=[Phenology].EarlyReproductive.Target
                    VariableReference MidReproductive: VariableName=[Phenology].MidReproductive.Target
                AddFunction SenescentPhaseDuration
                  VariableReference LateReproductive: VariableName=[Phenology].LateReproductive.Target
                  VariableReference Maturity: VariableName=[Phenology].Maturity.Target
        PhaseLookup Cover
          PhaseLookupValue Expanding: Start=Sowing; End=MidReproductive
            SigmoidFunction SigCoverFunction
              Constant Ymax: FixedValue=0.97
              VariableReference XValue: VariableName=[Phenology].AccumulatedEmergedTT
              Constant Xo: FixedValue=540
              Constant b: FixedValue=120
          PhaseLookupValue Senescence: Start=MidReproductive; End=Maturity
            MultiplyFunction DecreasingCover
              HoldFunction MaxCover: WhenToHold=MidReproductive
                VariableReference ValueToHold: VariableName=[Stover].CoverGreen
              SubtractFunction ProportionLost
                Constant One: FixedValue=1
                DivideFunction ProportionRemaining: same as Replacements.SCRUM.Stover.LaiDead.Senescence.SenescingLAI.ProportionSenesced
        Constant ExtinctionCoefficient: FixedValue=0.85
          Memo Description
            The extinction coefficient is used to calculate a LAI value (needed by MicroClimate) from the canopy cover
        LinearInterpolationFunction Tallness
          XYPairs: X=[3, 5, 6]; Y=[100, 800, 1200]
          VariableReference XValue: VariableName=[Phenology].Stage
        Constant MaximumNConc: FixedValue=0.008
        VariableReference CriticalNConc: VariableName=[Stover].MinimumNConc
        MultiplyFunction MinimumNConc
          VariableReference MaximumNConc: VariableName=[Stover].MaximumNConc
          Constant Propn: FixedValue=0.7
        Constant NitrogenDemandSwitch: FixedValue=1
        SubtractFunction DMAtHarvest
          MultiplyFunction AboveGroundDMAtHarvest
            VariableReference ProductDM: VariableName=[Product].DryYield
            DivideFunction InvertedHI
              Constant One: FixedValue=1
              VariableReference HarvestIndex: VariableName=[Product].HarvestIndex
          VariableReference ProductDMAtHarvest: VariableName=[Product].DryYield
        BiomassRemoval BiomassRemovalDefaults
          OrganBiomassRemovalType Harvest: FractionLiveToRemove=0; FractionDeadToRemove=0; FractionLiveToResidue=1; FractionDeadToResidue=1
          OrganBiomassRemovalType Cut: FractionLiveToRemove=0; FractionDeadToRemove=0; FractionLiveToResidue=1; FractionDeadToResidue=1
          OrganBiomassRemovalType Prune: FractionLiveToRemove=0; FractionDeadToRemove=0; FractionLiveToResidue=0; FractionDeadToResidue=0
          OrganBiomassRemovalType Graze: FractionLiveToRemove=0; FractionDeadToRemove=0; FractionLiveToResidue=1; FractionDeadToResidue=1
        Constant MaintenanceRespiration: FixedValue=0; Units=0-1
        Constant DMConversionEfficiency: FixedValue=1; Units=0-1
        Constant NRetranslocationFactor: FixedValue=0
        Constant DMReallocationFactor: FixedValue=0
        Constant DMRetranslocationFactor: FixedValue=0
        Constant CarbonConcentration: FixedValue=0.4
        NutrientDemandFunctions DMDemands
          MultiplyFunction Structural
            PartitionFractionDemandFunction DMDemandFunction
              Memo Description
                DM demand is based on a simple partitioning coefficients.  At harvest the biomass partitioned to the stover = TotalDM * (1 - RootProportion) * (1 - Harvest index).  However the partitioningFraction is more complicated that this as it partitions more biomass to the stover in the CanopyExpanding Phase and less in the Yield increasing phase to give realistic patterns of accumulation of biomass in the Stover and Product over the duration of the crop
              DivideFunction PartitionFraction
                VariableReference StoverDMAtHarvest: VariableName=[Stover].DMAtHarvest
                VariableReference TotalDMAtHarvest: VariableName=[Scrum].TotalDMAtHarvest
            Constant StructuralFraction: FixedValue=1; Units=0-1
          Constant Metabolic: FixedValue=0
          Constant Storage: FixedValue=0
          Constant QStructuralPriority: FixedValue=1
          Constant QMetabolicPriority: FixedValue=1
          Constant QStoragePriority: FixedValue=1
        NutrientDemandFunctions NDemands
          MultiplyFunction Structural
            VariableReference MinNconc: VariableName=[Stover].minimumNconc
            VariableReference PotentialDMAllocation: VariableName=[Stover].potentialDMAllocation.Structural
          MultiplyFunction Metabolic
            SubtractFunction MetabolicNconc
              VariableReference CritNconc: VariableName=[Stover].criticalNConc
              VariableReference MinNconc: VariableName=[Stover].minimumNconc
            VariableReference PotentialDMAllocation: VariableName=[Stover].potentialDMAllocation.Structural
          StorageNDemandFunction Storage
            VariableReference NitrogenDemandSwitch: VariableName=[Stover].nitrogenDemandSwitch
            VariableReference MaxNconc: VariableName=[Stover].maximumNconc
          Constant QStructuralPriority: FixedValue=1
          Constant QMetabolicPriority: FixedValue=1
          Constant QStoragePriority: FixedValue=1
      Root: GrowthRespiration=0; MaintenanceRespiration=0
        RootShapeCylinder RootShape
        Memo Description
          The root organ demands and is partitioned N and DM and its depth increases through time to provide a water uptake supply
        Constant DMConversionEfficiency: FixedValue=1; Units=0-1
        Constant RemobilisationCost: FixedValue=0
        KLModiferVsDepthFunction KLModifier
          VariableReference LayerDepth: VariableName=[Physical].DepthMidPoints
          VariableReference MaximumRootDepth: VariableName=[Root].MaximumRootDepth
        Constant SoilWaterEffect: FixedValue=1
        Constant MaxDailyNUptake: FixedValue=12
        Constant SenescenceRate: FixedValue=0
        Constant MaximumNConc: FixedValue=0.009
        VariableReference CriticalNConc: VariableName=[Root].MaximumNConc
        VariableReference MinimumNConc: VariableName=[Root].MaximumNConc
        Constant NitrogenDemandSwitch: FixedValue=1
        Constant MaximumRootDepth: FixedValue=1500
        MultiplyFunction RootFrontVelocity
          LessThanFunction RootFrontVelocity
            VariableReference TestVariable: VariableName=[Phenology].AccumulatedEmergedTT
            AddFunction GrowthDuration
              VariableReference Seedling: VariableName=[Phenology].Seedling.Target
              VariableReference Vegetative: VariableName=[Phenology].Vegetative.Target
              VariableReference EarlyReproductive: VariableName=[Phenology].EarlyReproductive.Target
            DivideFunction IfTrue
              VariableReference MaxRootDepth: VariableName=[Root].MaximumRootDepth
              VariableReference GrowthDuration: VariableName=[Root].RootFrontVelocity.RootFrontVelocity.GrowthDuration
            Constant IfFalse: FixedValue=0
          VariableReference ThermalTime: VariableName=[Phenology].ThermalTime
        Constant RootProportion: FixedValue=0.1
          Memo Description
            This is the proportion of total biomass that is paritioned into the roots and is used to set the partitioning fraction for the roots
        BiomassRemoval BiomassRemovalDefaults
          OrganBiomassRemovalType Harvest: FractionLiveToRemove=0; FractionDeadToRemove=0; FractionLiveToResidue=1; FractionDeadToResidue=1
          OrganBiomassRemovalType Cut: FractionLiveToRemove=0; FractionDeadToRemove=0; FractionLiveToResidue=1; FractionDeadToResidue=1
          OrganBiomassRemovalType Prune: FractionLiveToRemove=0; FractionDeadToRemove=0; FractionLiveToResidue=0; FractionDeadToResidue=0
          OrganBiomassRemovalType Graze: FractionLiveToRemove=0; FractionDeadToRemove=0; FractionLiveToResidue=0.3; FractionDeadToResidue=0
        Constant SpecificRootLength: FixedValue=40; Units=m/g
        LinearInterpolationFunction KNO3
          XYPairs: X=[0, 0.003]; Y=[0.02, 0.02]
          VariableReference XValue: VariableName=[Root].LengthDensity
        LinearInterpolationFunction KNH4
          XYPairs: X=[0, 0.003]; Y=[0, 0]
          VariableReference XValue: VariableName=[Root].LengthDensity
        LinearInterpolationFunction NUptakeSWFactor
          XYPairs: X=[0, 1]; Y=[0, 1]
          VariableReference XValue: VariableName=[Root].RWC
        Constant MaintenanceRespirationFunction: FixedValue=0
        Constant CarbonConcentration: FixedValue=0.4
        NutrientDemandFunctions DMDemands
          MultiplyFunction Structural
            PartitionFractionDemandFunction DMDemandFunction
              VariableReference PartitionFraction: VariableName=[Root].RootProportion
            Constant StructuralFraction: FixedValue=1
          Constant Metabolic: FixedValue=0
          Constant Storage: FixedValue=0
          Constant QStructuralPriority: FixedValue=1
          Constant QMetabolicPriority: FixedValue=1
          Constant QStoragePriority: FixedValue=1
        NutrientDemandFunctions NDemands
          MultiplyFunction Structural
            VariableReference MinNconc: VariableName=[Root].minimumNconc
            VariableReference PotentialDMAllocation: VariableName=[Root].potentialDMAllocation.Structural
          Constant Metabolic: FixedValue=1
          Constant Storage: FixedValue=1
          Constant QStructuralPriority: FixedValue=1
          Constant QMetabolicPriority: FixedValue=1
          Constant QStoragePriority: FixedValue=1
        NutrientPoolFunctions InitialWt
          Constant Structural: FixedValue=0.2; Units=g/plant
          Constant Metabolic: FixedValue=0
          Constant Storage: FixedValue=0
      Nodule
        Memo Description
          The nodule organ is unparameterised and simply has a switch that is turned on for legume crops (so they can fix what ever N the crop demands) and switched off for non legume crops (which fix no N)
        Constant MaximumNConc: FixedValue=0
        Constant CriticalNConc: FixedValue=0
        Constant MinimumNConc: FixedValue=0
        Constant RemobilisationCost: FixedValue=0
        Constant NReallocationFactor: FixedValue=0
        Constant SenescenceRate: FixedValue=0
        Constant FixationRate: FixedValue=0
        BiomassRemoval BiomassRemovalDefaults
          OrganBiomassRemovalType Harvest: FractionLiveToRemove=0; FractionDeadToRemove=0; FractionLiveToResidue=0; FractionDeadToResidue=0
          OrganBiomassRemovalType Cut: FractionLiveToRemove=0; FractionDeadToRemove=0; FractionLiveToResidue=0; FractionDeadToResidue=0
          OrganBiomassRemovalType Prune: FractionLiveToRemove=0; FractionDeadToRemove=0; FractionLiveToResidue=0; FractionDeadToResidue=0
          OrganBiomassRemovalType Graze: FractionLiveToRemove=0; FractionDeadToRemove=0; FractionLiveToResidue=0; FractionDeadToResidue=0
        Constant InitialWtFunction: FixedValue=0; Units=g/m^2
        Constant DetachmentRateFunction: FixedValue=0; Units=/d
        Constant FixationMetabolicCost: FixedValue=0
        Constant MaintenanceRespirationFunction: FixedValue=0; Units=0-1
        Constant DMConversionEfficiency: FixedValue=1; Units=0-1
        Constant NRetranslocationFactor: FixedValue=0
        Constant NitrogenDemandSwitch: FixedValue=0
        Constant DMReallocationFactor: FixedValue=0
        Constant DMRetranslocationFactor: FixedValue=0
        Constant CarbonConcentration: FixedValue=0.4
        NutrientPoolFunctions DMDemands
          Constant Structural: FixedValue=0
          Constant Metabolic: FixedValue=0
          Constant Storage: FixedValue=0
        NutrientPoolFunctions NDemands: same as Replacements.SCRUM.Nodule.DMDemands
      CompositeBiomass Total: OrganNames=[Stover, Product, Root]; IncludeLive=true; IncludeDead=true
      CompositeBiomass AboveGround: OrganNames=[Stover, Product]; IncludeLive=true; IncludeDead=true
        Memo
          The AboveGround composite biomass object includes Stover and Product organs.
      Constant MortalityRate: FixedValue=0
      Constant SeedMortalityRate: FixedValue=0
      MultiplyFunction TotalDMAtHarvest
        VariableReference ProductDryYield: VariableName=[Product].DryYield
        DivideFunction InvertedHI
          Constant One: FixedValue=1
          VariableReference HarvestIndex: VariableName=[Product].HarvestIndex
        DivideFunction InvertedAboveGroundPropn
          Constant One: FixedValue=1
          SubtractFunction AboveGroundFunction
            Constant One: FixedValue=1
            VariableReference RootPropn: VariableName=[Root].RootProportion
      ScrumCrop Cereal: HarvestIndex=0.5; MoisturePc=12; Proot=0.1; MaxRD=1005; Acover=0.97; ExtinctCoeff=0.55; RootNConc=0.01; StoverNConc=0.01; ProductNConc=0.015; Legume=false; BaseT=0; OptT=30; MaxT=40
      ScrumCrop Legume: HarvestIndex=0.5; MoisturePc=12; Proot=0.1; MaxRD=600; Acover=0.97; ExtinctCoeff=0.85; RootNConc=0.01; StoverNConc=0.03; ProductNConc=0.025; Legume=true; BaseT=0; OptT=30; MaxT=40
  DataStore
  Simulation SCRUMTestBase
    Weather: FileName=%root%\Tests\WeatherFiles\lincoln.met
    Clock: Start=1998-10-14; End=1999-07-01
    Summary
    SoilArbitrator Soil Arbitrator
    GetTempSum
    Zone Field: Area=1; Slope=0; AspectAngle=0; Altitude=50
      Soil: Latitude=0; Longitude=0
        Chemical: Thickness=[100, 200, 300, 300, 300, 300]; PH=[6.6, 6.2, 5.7, 5.5, 5.5, 5.5]; PHUnits=Water
        Water: Thickness=[100, 200, 300, 300, 300, 300]; InitialValues=[0.33, 0.33, 0.31, 0.15, 0.1, 0.06]; InitialPAWmm=180; RelativeTo=LL15; FilledFromTop=false
        Physical
          Thickness  BD   AirDry  LL15  DUL   SAT
          100        1.2  0.08    0.13  0.33  0.5
          200        1.2  0.13    0.13  0.33  0.5
          300        1.2  0.1     0.1   0.31  0.44
          300        1.2  0.06    0.06  0.15  0.46
          300        1.2  0.04    0.04  0.1   0.44
          300        1.2  0.02    0.02  0.06  0.44
          SoilCrop SCRUMSoil: LL=[0.13, 0.13, 0.1, 0.08, 0.11, 0.11]; KL=[0.1, 0.1, 0.1, 0.1, 0.1, 0.1]; XF=[1, 1, 1, 1, 1, 1]
          SoilCrop PotatoSoil: LL=[0.13, 0.13, 0.27, 0.27, 0.3, 0.3]; KL=[0.1, 0.06, 0.03, 0.01, 0, 0]; XF=[1, 1, 0.1, 0, 0, 0]
        WaterBalance SoilWater: SummerDate=1-Nov; SummerU=9; SummerCona=4.4; WinterDate=1-Apr; WinterU=9; WinterCona=4.4; DiffusConst=88; DiffusSlope=35.4; Salb=0.18; CN2Bare=68; CNRed=20; CNCov=0.8; DischargeWidth=0; CatchmentArea=0; PSIDul=-100
          Thickness  SWCON  KLAT
          100        0.55   0
          200        0.55   0
          300        0.55   0
          300        0.55   0
          300        0.55   0
          300        0.55   0
        SoilNitrogen: fom_types=[default, manure, mucuna, lablab, shemp, stable]; fract_carb=[0.2, 0.3, 0.54, 0.57, 0.45, 0]; fract_cell=[0.7, 0.3, 0.37, 0.37, 0.47, 0.1]; fract_lign=[0.1, 0.4, 0.09, 0.06, 0.08, 0.9]; NPartitionApproach=0
        Organic: FOMCNRatio=30; CarbonUnits=Total
          Thickness  Carbon  SoilCNRatio  FBiom  FInert  FOM
          100        1.82    11.5         0.025  0.3     1243.93
          200        1.47    11.5         0.025  0.4     833.832
          300        1.2     11.5         0.015  0.75    457.617
          300        1.03    11.5         0.01   0.9     251.145
          300        0.47    11.5         0.01   0.96    137.831
          300        0.47    11.5         0.01   0.96    75.6435
        LayerStructure
          Thickness=[100, 100, 100, 100, 100, 100, 100, 100, 100, 100, 100, 100, 100, 100, 100]
        CERESSoilTemperature Temperature
        SoilNitrogenNO3 NO3: Thickness=[100, 200, 300, 300, 300, 300]; InitialValues=[225, 12.5, 1.38889, 1.38889, 0, 0]; InitialValuesUnits=ppm; WaterTableConcentration=0; D0=0; DepthConstant=0; MaxDepthSoluteAccessible=0; RunoffEffectivenessAtMovingSolute=0; MaxEffectiveRunoff=0
        SoilNitrogenNH4 NH4: Thickness=[100, 200, 300, 300, 300, 300]; InitialValues=[0, 0, 0, 0, 0, 0]; InitialValuesUnits=ppm; WaterTableConcentration=0; D0=0; DepthConstant=0; MaxDepthSoluteAccessible=0; RunoffEffectivenessAtMovingSolute=0; MaxEffectiveRunoff=0
        SoilNitrogenUrea Urea: Thickness=[100, 200, 300, 300, 300, 300]; InitialValues=[0, 0, 0, 0, 0, 0]; InitialValuesUnits=kg/ha; WaterTableConcentration=0; D0=0; DepthConstant=0; MaxDepthSoluteAccessible=0; RunoffEffectivenessAtMovingSolute=0; MaxEffectiveRunoff=0
      SurfaceOrganicMatter surface organic matter: InitialResidueName=wheat; InitialResidueType=wheat; InitialResidueMass=2000; InitialStandingFraction=0; InitialCPR=0; InitialCNR=80
      MicroClimate: a_interception=0; b_interception=1; c_interception=0; d_interception=0; SoilHeatFluxFraction=0.4; MinimumHeightDiffForNewLayer=0; NightInterceptionFraction=0.5; ReferenceHeight=2
      Manager Sow Cereal on a fixed date (disabled)
        CropName = Cereal
        EstablishDate = 10/14/1998 00:00:00
        EstablishStage = Sowing
        HarvestDate = 04/14/1999 00:00:00
        HarvestTT = -
        HarvestStage = Maturity
        ExpectedYield = 8.3
```csharp
using APSIM.Shared.Utilities;
using Models.Utilities;
using Models.Soils;
using Models.PMF;
using Models.Core;
using System;
using System.Linq;
using Models.PMF.Scrum;

namespace Models
{
    [Serializable]
    public class Script : Model
    {
        [Link] Clock clock;
        [Link] Zone zone;
        
        /// <summary>Establishemnt Date</summary>
        [Description("Crop to plant")]
        [Display(Type = DisplayType.SCRUMcropName)]
        public string CropName { get; set; }

        /// <summary>Establishemnt Date</summary>
        [Description("Establishment Date")]
        public DateTime EstablishDate { get; set; }

        /// <summary>Establishment Stage</summary>
        [Description("Establishment Stage")]
        [Display(Type = DisplayType.CropStageName)]
        public string EstablishStage { get; set; }

        /// <summary>Harvest Date</summary>
        [Description("Harvest Date")]
        public DateTime HarvestDate { get; set; }

        /// <summary>Harvest Tt (if blank or zero must specify harvest date)</summary>
        [Description("Harvest Tt (oCd)")]
        public double HarvestTT { get; set; }
        
        /// <summary>Harvest Stage</summary>
        [Description("Harvest Stage")]
        [Display(Type = DisplayType.CropStageName)]
        public string HarvestStage { get; set; }

        /// <summary>Expected Yield (g FW/m2)</summary>
        [Description("Expected Yield (t/Ha")]
        public double ExpectedYield { get; set; }
        
        private ScrumManagement management {get; set;}

        [EventSubscribe("DoManagement")]
        private void OnDoManagement(object sender, EventArgs e)
        {
            if (clock.Today == EstablishDate)
            {
                management = new ScrumManagement(CropName,EstablishDate,EstablishStage,HarvestStage,ExpectedYield,
                HarvestDate, HarvestTT);
                ScrumCrop currentCrop = zone.FindDescendant<ScrumCrop>(CropName);
                currentCrop.Establish(management);
                //referee.SetScrumRunning(management);   
            }
        }
    }
}
```
      Plant SCRUM
      ScrumManagement: CropName=Cereal; EstablishDate=1998-10-14; EstablishStage=Sowing; HarvestDate=1999-04-14; HarvestTt=0; HarvestStage=Maturity; ExpectedYield=5.3
      Irrigation
      Fertiliser
      Manager AutomaticIrrigation
        Irrigation_Yes_No = yes
        Season_Start = 1-Oct
        Season_End = 30-Apr
        Season_Allocation = 1000
        Refull_Frac = 0.9
        Trigger_Frac = 0.7
        Return_days = 3
        Maximum_Irrigation_Amount = 40
        Top_Depth = 600
```csharp
using Newtonsoft.Json;
using Models.PMF.Phen;
using APSIM.Shared.Utilities;
using System.Xml.Serialization;
using Models.Soils;
using Models.PMF;
using Models.Core;
using System;
using Models.PMF.Organs;
using Models.Interfaces;

        
namespace Models
{
    [Serializable] 
    [System.Xml.Serialization.XmlInclude(typeof(Model))]
    public class Script : Model
    {
        [Link] private ISummary summary;
        [Link] private Irrigation Irrigation;
        [Link] private Clock Clock;
        [Link] private Soil Soil;
        [Link] private Plant SCRUM;
        [Link(Type = LinkType.Path, Path = "[SCRUM].Root")]
        private Root root;
        [Link(Type = LinkType.Path, Path = "[SCRUM].Phenology")]
        private Phenology phenology;
        [Link]
        private IPhysical soilPhysical;
        [Link]
        private ISoilWater waterBalance;
        //Communication to other modules
       
        //User inputs from properties tab
        [Description("Irrigation on (yes or no)")]
        public string Irrigation_Yes_No { get; set; }
        [Description("SeasonStart (dd-MMM)")]
        public string Season_Start { get; set; }
        [Description("SeasonEnd (dd-MMM)")]
        public string Season_End { get; set; }
        [Description("Season Allocation (mm)")]
        public double Season_Allocation { get; set; }
        [Description("% PAWC to refill soil to (0-1)")]
        public double Refull_Frac { get; set; }
        [Description("% PAWC to trigger irrigation (0-1)")]
        public double Trigger_Frac { get; set; }
        [Description("Minimum days for irrigation to return")]
        public double Return_days { get; set; }
        [Description("Maximum irrigation application (mm)")]
        public double Maximum_Irrigation_Amount { get; set; }
        [Description("Depth to calculate PAWC (mm)")]
        public double Top_Depth { get; set; }
       
        //Class members
        [JsonIgnore] private bool IrrigationIsAvailable { get; set; }
        [JsonIgnore] public bool SeasonIsOpen { get; set; }
        [JsonIgnore] private bool CropIsActive { get; set; }
        [JsonIgnore] private bool IrrigatorIsAvailable { get; set; }
        [JsonIgnore] private bool SoilIsDry { get; set; }
        [JsonIgnore] public double Top_DUL { get; set; }
        [JsonIgnore] public double Top_Refull { get; set; }
        [JsonIgnore] public double Top_Trigger { get; set; }
        [JsonIgnore] public double Top_LL { get; set; }
        [JsonIgnore] public double Top_SW { get; set; }
        [JsonIgnore] public double Accumulated_depth { get; set; }
        [JsonIgnore] public double Days_since_irrigation { get; set; }
        [JsonIgnore] public double Amount_to_apply { get; set; }
        [JsonIgnore] public double Season_Application { get; set; }
        
        //Variables for date logic testing
        [JsonIgnore] public string StartString { get; set; }
        [JsonIgnore] public string EndString { get; set; }
        [JsonIgnore] public DateTime StartDate { get; set; }
        [JsonIgnore] public DateTime EndDate { get; set; }
        [JsonIgnore] public int TodayYear { get; set; }
        [JsonIgnore] public int TodayMonth { get; set; }
        [JsonIgnore] public int StartMonth { get; set; }
        [JsonIgnore] public int EndMonth { get; set; }
        [JsonIgnore] public int TodayDay { get; set; }
        [JsonIgnore] public int StartDay { get; set; }
        [JsonIgnore] public int EndDay { get; set; }
       
    
        //Calculate static soil variables
        [EventSubscribe("StartOfSimulation")]
        private void OnStartOfSimulation(object sender, EventArgs e)
        {   
            //Calculated soil water variables
            Accumulated_depth = 0;
            for (int layer = 0; Accumulated_depth < Top_Depth; layer++)
            {
                Top_LL += soilPhysical.LL15mm[layer];
                Top_DUL += soilPhysical.DULmm[layer];
                Accumulated_depth += soilPhysical.Thickness[layer];
            }
            Top_Refull = Top_LL + (Top_DUL - Top_LL) * Refull_Frac;
        }
       
      
        //Determine daily requirement for irrigation
        [EventSubscribe("StartOfDay")]
        private void OnStartOfDay(object sender, EventArgs e)
        { 
            //Can we irrigate?
            IrrigationIsAvailable = false; 
            if (Irrigation_Yes_No == "yes")
                IrrigationIsAvailable = true; 
    
            //Are we Allowed to Irrigate?
            TodayYear = Clock.Today.Year;
            StartString = Season_Start + "-" + TodayYear.ToString();
            EndString = Season_End + "-" + TodayYear.ToString();
            StartDate = DateTime.Parse(StartString);
            EndDate = DateTime.Parse(EndString);
            TodayMonth = Clock.Today.Month;
            TodayDay = Clock.Today.Day;
            StartDay = StartDate.Day;
            StartMonth = StartDate.Month;
            EndDay = EndDate.Day;
            EndMonth = EndDate.Month;
          
            SeasonIsOpen = false;
            //if we are in the spring and after the start date then yes
            if ((Clock.Today.Month > 6) && (Clock.Today >= StartDate))
                SeasonIsOpen = true;
            //if we are in the autumn and before the end date then yes
            if ((Clock.Today.Month <= 6) && (Clock.Today <= EndDate))
                SeasonIsOpen = true;
          
            //Is there a crop in the ground that needs irrigation?
            CropIsActive = false;
            if ((phenology.Stage >= 3.0) && (phenology.Stage < 6.0))
                CropIsActive = true;
          
            //Is the irrigator available?
            IrrigatorIsAvailable = false;
            Days_since_irrigation += 1;
            if (Days_since_irrigation >= Return_days)
                IrrigatorIsAvailable = true;
          
            //Is the soil dry enough to require irrigation?
            SoilIsDry = false;
            double CurrentRootDepth = 0;
            double RootDepth = root.Depth;
            CurrentRootDepth = Math.Max(RootDepth, CurrentRootDepth);
          
            double RelativeRootDepth = Math.Min(1.0, CurrentRootDepth / Top_Depth);
            Top_Trigger = Math.Min(Top_Refull, Top_DUL - (Top_DUL - Top_LL) * RelativeRootDepth * (1 - Trigger_Frac)); 
          
            Accumulated_depth = 0;
            Top_SW = 0;
            for (int layer = 0; Accumulated_depth < Top_Depth; layer++)
            {
                Top_SW += waterBalance.SWmm[layer];
                Accumulated_depth += soilPhysical.Thickness[layer];
            }
            if (Top_SW <= Top_Trigger)
                SoilIsDry = true;
                
            //Lets bloody well irrigate then!!!!
            if ((IrrigationIsAvailable) && (SeasonIsOpen) && (CropIsActive) && (IrrigatorIsAvailable) && (SoilIsDry)) //The conditions are rife for irrigation
            {
                Amount_to_apply = Math.Min(Top_Refull - Top_SW, Maximum_Irrigation_Amount);
                Amount_to_apply = Math.Min(Amount_to_apply, Season_Allocation - Season_Application); 
                Amount_to_apply = Math.Max(Amount_to_apply, 0.0);
                Irrigation.Apply(Amount_to_apply);
                Days_since_irrigation = 0;
                Season_Application += Amount_to_apply;
                summary.WriteMessage(this, "Automatic Irrigation", MessageType.Diagnostic);
            
            }
        }
    }
}
```
      Manager AutomaticFertiliser
        Fertiliser_Yes_No = no
        Season_Start = 1-Aug
        Season_End = 30-Apr
        Season_Allocation = 1000
        TriggerN = 50
        NApplicationAmount = 25
        Return_days = 3
        Top_Depth = 300
```csharp
using Newtonsoft.Json;
using Models.PMF.Phen;
using Models.Soils.Nutrients;
using Models.Interfaces;
using APSIM.Shared.Utilities;
using Models.PMF;
using System.Xml.Serialization;
using Models.Soils;
using Models.Core;
using System;
using Models.PMF.Organs;

        
namespace Models
{
    [Serializable] 
    [System.Xml.Serialization.XmlInclude(typeof(Model))]
    public class Script : Model
    {
        [Link] private ISummary summary;
        [Link] private Fertiliser Fertiliser;
        [Link] private Clock Clock;
        [Link] private Plant SCRUM;
        [Link(ByName = true)]
        private ISolute NO3;
        [Link] private Soils.Soil Soil;
        [Link(Type = LinkType.Path, Path = "[SCRUM].Root")]
        private Root root;
        [Link(Type = LinkType.Path, Path = "[SCRUM].Phenology")]
        private Phenology phenology;
        [Link]
        private IPhysical soilPhysical;
        //Communication to other modules
       
        //User inputs from properties tab
        [Description("Fertiliser on (yes or no)")]
        public string Fertiliser_Yes_No { get; set; }
        [Description("SeasonStart (dd-MMM)")]
        public string Season_Start { get; set; }
        [Description("SeasonEnd (dd-MMM)")]
        public string Season_End { get; set; }
        [Description("Season Allocation (kg/ha)")]
        public double Season_Allocation { get; set; }
        [Description("Mineral N to maintain soil above (kg/ha)")]
        public double TriggerN { get; set; }
        [Description("Amount of N to apply (kg/ha)")]
        public double NApplicationAmount { get; set; }
        [Description("Minimum days for Fertiliser spreader to return")]
        public double Return_days { get; set; }
        [Description("Depth to calculate mineral N (mm)")]
        public double Top_Depth { get; set; }
       
        //Class members
        [JsonIgnore] private bool FertiliserIsAvailable { get; set; }
        [JsonIgnore] public bool SeasonIsOpen { get; set; }
        [JsonIgnore] private bool CropIsActive { get; set; }
        [JsonIgnore] private bool FertSpreaderIsAvailable { get; set; }
        [JsonIgnore] private bool SoilNIsLow { get; set; }
        [JsonIgnore] public double Top_SoilN { get; set; }
        [JsonIgnore] public double Accumulated_depth { get; set; }
        [JsonIgnore] public double Days_since_fertiliser { get; set; }
        [JsonIgnore] public double Season_Application { get; set; }
        
        //Variables for date logic testing
        [JsonIgnore] public string StartString { get; set; }
        [JsonIgnore] public string EndString { get; set; }
        [JsonIgnore] public DateTime StartDate { get; set; }
        [JsonIgnore] public DateTime EndDate { get; set; }
        [JsonIgnore] public int TodayYear { get; set; }
        [JsonIgnore] public int TodayMonth { get; set; }
        [JsonIgnore] public int StartMonth { get; set; }
        [JsonIgnore] public int EndMonth { get; set; }
        [JsonIgnore] public int TodayDay { get; set; }
        [JsonIgnore] public int StartDay { get; set; }
        [JsonIgnore] public int EndDay { get; set; }
              
        //Determine daily requirement for fertiliser
        [EventSubscribe("StartOfDay")]
        private void OnStartOfDay(object sender, EventArgs e)
        { 
            //Can we irrigate?
            FertiliserIsAvailable = false; 
            if (Fertiliser_Yes_No == "yes")
                FertiliserIsAvailable = true; 
    
            //Are we Allowed to Irrigate?
            TodayYear = Clock.Today.Year;
            StartString = Season_Start + "-" + TodayYear.ToString();
            EndString = Season_End + "-" + TodayYear.ToString();
            StartDate = DateTime.Parse(StartString);
            EndDate = DateTime.Parse(EndString);
            TodayMonth = Clock.Today.Month;
            TodayDay = Clock.Today.Day;
            StartDay = StartDate.Day;
            StartMonth = StartDate.Month;
            EndDay = EndDate.Day;
            EndMonth = EndDate.Month;
          
            SeasonIsOpen = false;
            //if we are in the spring and after the start date then yes
            if ((Clock.Today.Month > 6) && (Clock.Today >= StartDate))
                SeasonIsOpen = true;
            //if we are in the autumn and before the end date then yes
            if ((Clock.Today.Month <= 6) && (Clock.Today <= EndDate))
                SeasonIsOpen = true;
          
            //Is there a crop in the ground that needs irrigation?
            CropIsActive = false;
            if ((phenology.Stage >= 3.0) && (phenology.Stage < 6.0))
                CropIsActive = true;
          
            //Is the irrigator available?
            FertSpreaderIsAvailable = false;
            Days_since_fertiliser += 1;
            if (Days_since_fertiliser >= Return_days)
                FertSpreaderIsAvailable = true;
          
            //Is the soil N low enough to require fertiliser?
            SoilNIsLow = false;
            double CurrentRootDepth = 0;
            double RootDepth = root.Depth;
            CurrentRootDepth = Math.Max(RootDepth, CurrentRootDepth);
          
            Accumulated_depth = 0;
            Top_SoilN = 0;
            for (int layer = 0; Accumulated_depth < Top_Depth; layer++)
            {
                Top_SoilN += NO3.kgha[layer];
                Accumulated_depth += soilPhysical.Thickness[layer];
            }
            if (Top_SoilN <= TriggerN)
                SoilNIsLow = true;
                
            //Lets bloody well irrigate then!!!!
            if ((FertiliserIsAvailable) && (SeasonIsOpen) && (CropIsActive) && (FertSpreaderIsAvailable) && (SoilNIsLow)) //The conditions are rife for irrigation
            {
                Fertiliser.Apply(NApplicationAmount, Fertiliser.Types.UreaN, 10);
                Days_since_fertiliser = 0;
                Season_Application += NApplicationAmount;
                summary.WriteMessage(this, "Automatic Fertiliser", MessageType.Diagnostic);
            
            }
        }
    }
}
```
      Report: EventNames=[Clock].DoReport
        VariableNames:
          [Clock].Today
          [Soil].SoilWater.Drainage
          [Soil].SoilWater.Runoff
          [Soil].SoilWater.Eo
          [Soil].SoilWater.Es
          [Soil].SoilWater.pond
          [Soil].Water.MM
          [Soil].NO3.kgha
          [SCRUM].Stover.Live.Wt
          [SCRUM].Root.Live.Wt
          [SCRUM].Product.Live.Wt
          [SCRUM].Stover.Live.N
          [SCRUM].Root.Live.N
          [SCRUM].Product.Live.N
          [SCRUM].Stover.Live.NConc
          [SCRUM].Root.Live.NConc
          [SCRUM].Product.Live.NConc
          [SCRUM].Root.WaterUptake
          [SCRUM].Stover.Transpiration
          [SCRUM].Stover.WaterDemand
          [SCRUM].Root.Depth
          [SCRUM].Stover.CoverTotal
          [SCRUM].Stover.CoverDead
          [SCRUM].Stover.CoverGreen
          [SCRUM].Stover.LAI
          [SCRUM].Stover.LAIDead
          [SCRUM].Stover.Height
          [SCRUM].Arbitrator.N.TotalPlantDemand
          [SCRUM].Arbitrator.N.TotalPlantSupply
          [SCRUM].Stover.Fw
          [SCRUM].Stover.Fn
          [SCRUM].Total.Wt
          [SCRUM].Total.N
          [SCRUM].Arbitrator.DM.TotalFixationSupply
          [SCRUM].Arbitrator.DM.TotalPlantDemand
          [SCRUM].Phenology.AccumulatedEmergedTT
          [SCRUM].Arbitrator.DM.SinkLimitation
          [SCRUM].Arbitrator.DM.NutrientLimitation
          [SCRUM].Phenology.ThermalTime
          [SCRUM].Phenology.CurrentPhase.Name
          [SCRUM].Phenology.Stage
          [SCRUM].Phenology.CurrentStageName
          [AutomaticIrrigation].Script.Top_Refull
          [AutomaticIrrigation].Script.Top_Trigger
          [AutomaticIrrigation].Script.Top_SW
          [AutomaticIrrigation].Script.Top_DUL
          [Irrigation].IrrigationApplied
          [AutomaticIrrigation].Script.Amount_to_apply
          [AutomaticIrrigation].Script.StartDate
          [Clock].Today
          [AutomaticIrrigation].Script.SeasonIsOpen
          [AutomaticIrrigation].Script.EndDate
          [AutomaticIrrigation].Script.TodayYear
          [SCRUM].Arbitrator.FN
          [SCRUM].Arbitrator.N.TotalPlantSupply
          [SCRUM].Product.DMDemands.Structural.DMDemandFunction.PartitionFraction
          [SCRUM].Stover.DMDemands.Structural.DMDemandFunction.PartitionFraction
          [SCRUM].Root.DMDemands.Structural.DMDemandFunction.PartitionFraction
    Memo Caption
      # SCRUM: the Simple Crop Resource Uptake Model

      _Hamish Brown and Rob Zyskowski, Plant and Food Research, New Zealand_

      This model has been built to simulate a range of different crops in simulations where water and nitrogen balance are of interest but a fully mechanistic plant model is not needed. It is a daily time step implementation of the crop model that is used on the Overseer nutrient balance model (Cichota_etal_2010).  It uses simple sigmoidal functions for estimating daily cover and biomass deltas to give realistic water and nitrogen demands. It does not simulate potential yield, this is specified as an input. Yield will be reduced below the specified potential yield if N or water supplies from the soil are insufficient to meet demand. The model has been paramaterised for simulating water and nitrogen balances of cropping rotations in New Zealand (where over 50 different crop types are grown and it is not feasible to produce full crop models for each of these). It may be adapted for other purposes and other crop types may be added but the user will need to keep in mind that it is empirical and the parameters might need changing for crops from different locations.
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